# soybeans; at harvest in 1996; at farm; 85%-92% moisture

Dataset: EcoSpold 2, unit process
Geography: GLO
Time period: 1996-01-02 to 1997-01-01
Scenario: Business-as-Usual
System model: Allocation, ecoinvent default
Generated by: cooperjs@u.washington.edu
isCopyrightProtected: false

## General comment
This unit process/ gate-to-gate dataset represents the production of 1 kg soybeans coproduced with residue. The process technologies are an aggregation of those applied in Iowa in 1996. Applicable classifications include ISIC 0111, NAIC 111110, UNSPSC 50407053; this dataset was prepared in ILCD format using the UWDFE Lab Excel to ILCD File Generator (beta version, August 2013)

Exchange "Metribuzin-soil agricultural" is the result of combining the following original LCA Commons flows: "Metribuzin; unspec. appl. method; kg AI", "Metribuzin; foliar or directed spray; kg AI", "Metribuzin; broadcast with incorporation; kg AI", "Metribuzin; broadcast without incorporation; kg AI", "Metribuzin; banded or side-dressed; kg AI".
Exchange "Bentazone-soil agricultural" is the result of combining the following original LCA Commons flows: "Bentazon; unspec. appl. method; kg AI", "Bentazon; foliar or directed spray; kg AI", "Bentazon; broadcast without incorporation; kg AI", "Bentazon; banded or side-dressed; kg AI", "Bentazon; broadcast with incorporation; kg AI".
Exchange "NMVOC, non-methane volatile organic compounds, unspecified origin-air low population density" is the result of combining the following original LCA Commons flows: "NMVOCs; from residue burning; kg C, biogenic", "NMVOCs; from residue burning; kg except C, biogenic".
Exchange "Glyphosate-soil agricultural" is the result of combining the following original LCA Commons flows: "Glyphosate; foliar or directed spray; kg AI", "Glyphosate; broadcast with incorporation; kg AI", "Glyphosate; banded or side-dressed; kg AI", "Glyphosate; unspec. appl. method; kg AI", "Glyphosate; broadcast without incorporation; kg AI".
Exchange "Imazethapyr-soil agricultural" is the result of combining the following original LCA Commons flows: "Imazethapyr; banded or side-dressed; kg AI", "Imazethapyr; foliar or directed spray; kg AI", "Imazethapyr; broadcast with incorporation; kg AI", "Imazethapyr; unspec. appl. method; kg AI", "Imazethapyr; broadcast without incorporation; kg AI".
Exchange "Carbon-soil agricultural" is the result of combining the following original LCA Commons flows: "Carbon; applied in limestone", "Carbon; in below-ground residue; biogenic", "Carbon; applied in sewage sludge", "Carbon; applied in dolomite", "Carbon; in above-ground residue left on field; biogenic".
Exchange "Particulates, < 2.5 um-air low population density" is the result of combining the following original LCA Commons flows: "PM2.5; from residue burning; kg C, biogenic", "PM2.5; from residue burning; kg except C, biogenic".
Exchange "Clomazone-soil agricultural" is the result of combining the following original LCA Commons flows: "Clomazone; broadcast with incorporation; kg AI", "Clomazone; foliar or directed spray; kg AI", "Clomazone; banded or side-dressed; kg AI", "Clomazone; unspec. appl. method; kg AI", "Clomazone; broadcast without incorporation; kg AI".
Exchange "Imazaquin-soil agricultural" is the result of combining the following original LCA Commons flows: "Imazaquin; broadcast with incorporation; kg AI", "Imazaquin; broadcast without incorporation; kg AI", "Imazaquin; foliar or directed spray; kg AI", "Imazaquin; unspec. appl. method; kg AI", "Imazaquin; banded or side-dressed; kg AI".
Exchange "Sethoxydim-soil agricultural" is the result of combining the following original LCA Commons flows: "Sethoxydim; broadcast with incorporation; kg AI", "Sethoxydim; banded or side-dressed; kg AI", "Sethoxydim; foliar or directed spray; kg AI", "Sethoxydim; unspec. appl. method; kg AI", "Sethoxydim; broadcast without incorporation; kg AI".
Exchange "Fluazifop-P-butyl-soil agricultural" is the result of combining the following original LCA Commons flows: "Fluazifop-p-butyl; foliar or directed spray; kg AI", "Fluazifop-p-butyl; unspec. appl. method; kg AI", "Fluazifop-p-butyl; broadcast with incorporation; kg AI", "Fluazifop-p-butyl; broadcast without incorporation; kg AI", "Fluazifop-p-butyl; banded or side-dressed; kg AI".
Exchange "Clethodim-soil agricultural" is the result of combining the following original LCA Commons flows: "Clethodim; unspec. appl. method; kg AI", "Clethodim; broadcast without incorporation; kg AI", "Clethodim; foliar or directed spray; kg AI", "Clethodim; broadcast with incorporation; kg AI", "Clethodim; banded or side-dressed; kg AI".
Exchange "Lactofen-soil agricultural" is the result of combining the following original LCA Commons flows: "Lactofen; unspec. appl. method; kg AI", "Lactofen; broadcast without incorporation; kg AI", "Lactofen; broadcast with incorporation; kg AI", "Lactofen; banded or side-dressed; kg AI", "Lactofen; foliar or directed spray; kg AI".
Exchange "Ash-soil agricultural" is the result of combining the following original LCA Commons flows: "Ash; from residue burning; kg except C, biogenic", "Ash; from residue burning; kg C, biogenic".
Exchange "Trifluralin-soil agricultural" is the result of combining the following original LCA Commons flows: "Trifluralin; unspec. appl. method; kg AI", "Trifluralin; broadcast with incorporation; kg AI", "Trifluralin; foliar or directed spray; kg AI", "Trifluralin; broadcast without incorporation; kg AI", "Trifluralin; banded or side-dressed; kg AI".
Exchange "Water-soil agricultural" is the result of combining the following original LCA Commons flows: "Water; in above-ground residue left on field; biogenic", "Water; from irrigation and applied with manure and sewage sludge", "Water; in below-ground residue; biogenic".
Exchange "Pendimethalin-soil agricultural" is the result of combining the following original LCA Commons flows: "Pendimethalin; unspec. appl. method; kg AI", "Pendimethalin; banded or side-dressed; kg AI", "Pendimethalin; broadcast without incorporation; kg AI", "Pendimethalin; foliar or directed spray; kg AI", "Pendimethalin; broadcast with incorporation; kg AI".
Exchange "Chlorimuron-ethyl-soil agricultural" is the result of combining the following original LCA Commons flows: "Chlorimuron-ethyl; unspec. appl. method; kg AI", "Chlorimuron-ethyl; broadcast with incorporation; kg AI", "Chlorimuron-ethyl; banded or side-dressed; kg AI", "Chlorimuron-ethyl; foliar or directed spray; kg AI", "Chlorimuron-ethyl; broadcast without incorporation; kg AI".
Exchange "Metolachlor-soil agricultural" is the result of combining the following original LCA Commons flows: "Propazine; broadcast without incorporation; kg AI", "Propazine; foliar or directed spray; kg AI", "Propazine; banded or side-dressed; kg AI", "Propazine; broadcast with incorporation; kg AI", "Propazine; unspec. appl. method; kg AI".
Exchange "Particulates, < 10 um-air low population density" is the result of combining the following original LCA Commons flows: "PM10; from residue burning; kg C, biogenic", "PM10; from residue burning; kg except C, biogenic".
Exchange "Flumetsulam-soil agricultural" is the result of combining the following original LCA Commons flows: "Flumetsulam; foliar or directed spray; kg AI", "Flumetsulam; banded or side-dressed; kg AI", "Flumetsulam; unspec. appl. method; kg AI", "Flumetsulam; broadcast without incorporation; kg AI", "Flumetsulam; broadcast with incorporation; kg AI".
Exchange "Transformation, from arable-resource land" is the result of combining the following original LCA Commons flows: "Transformation; from arable, from other to soybeans", "Transformation; from arable, from unspec. use to soybeans", "Transformation; from arable, from fallow to soybeans", "Transformation; from arable, from soy to soybeans", "Transformation; from arable, from corn to soybeans", "Transformation; from arable, from small grains to soybeans".
Exchange "Calcium-soil agricultural" is the result of combining the following original LCA Commons flows: "Calcium; applied in dolomite", "Calcium; applied in limestone".
Exchange "2,4-D-soil agricultural" is the result of combining the following original LCA Commons flows: "2,4-D; broadcast without incorporation; kg AI", "2,4-D; broadcast with incorporation; kg AI", "2,4-D; banded or side-dressed; kg AI", "2,4-D; foliar or directed spray; kg AI", "2,4-D; unspec. appl. method; kg AI".
Exchange "Alachlor-soil agricultural" is the result of combining the following original LCA Commons flows: "Alachlor; broadcast without incorporation; kg AI", "Alachlor; banded or side-dressed; kg AI", "Alachlor; broadcast with incorporation; kg AI", "Alachlor; foliar or directed spray; kg AI", "Alachlor; unspec. appl. method; kg AI".
Exchange "Quizalofop ethyl ester-soil agricultural" is the result of combining the following original LCA Commons flows: "Quizalofop, ethyl ; banded or side-dressed; kg AI", "Quizalofop, ethyl ; foliar or directed spray; kg AI", "Quizalofop, ethyl ; unspec. appl. method; kg AI", "Quizalofop, ethyl ; broadcast with incorporation; kg AI", "Quizalofop, ethyl ; broadcast without incorporation; kg AI".
Exchange "Hydrocyanic acid-2bdf9967-6dae-4183-88d1-8f612548c51e low population density" was originally named: "Hydrogen cyanide; from residue burning; kg C, biogenic" in this dataset.
Exchange "Carbon dioxide, in air-2bdf9967-6dae-4183-88d1-8f612548c51e low population density" was originally named: "Carbon dioxide; from residue burning; kg C, biogenic" in this dataset.
Exchange "isopentane-2bdf9967-6dae-4183-88d1-8f612548c51e low population density" was originally named: "I pentane; from residue burning; kg C, biogenic" in this dataset.
Exchange "Bentazone-2bdf9967-6dae-4183-88d1-8f612548c51e low population density" was originally named: "Bentazon; broadcast by air; kg AI" in this dataset.
Exchange "Toluene-2bdf9967-6dae-4183-88d1-8f612548c51e low population density" was originally named: "Toluene; from residue burning; kg C, biogenic" in this dataset.
Exchange "Magnesium-be1c0329-f1a8-4524-8420-a86d2a8dd358 agricultural" was originally named: "Magnesium; applied in dolomite" in this dataset.
Exchange "Butane-2bdf9967-6dae-4183-88d1-8f612548c51e low population density" was originally named: "N butane; from residue burning; kg C, biogenic" in this dataset.
Exchange "Phenol-2bdf9967-6dae-4183-88d1-8f612548c51e low population density" was originally named: "Phenol; from residue burning; kg C, biogenic" in this dataset.
Exchange "Quizalofop ethyl ester-2bdf9967-6dae-4183-88d1-8f612548c51e low population density" was originally named: "Quizalofop, ethyl ; broadcast by air; kg AI" in this dataset.
Exchange "Metolachlor-2bdf9967-6dae-4183-88d1-8f612548c51e low population density" was originally named: "Propazine; broadcast by air; kg AI" in this dataset.
Exchange "Imazaquin-2bdf9967-6dae-4183-88d1-8f612548c51e low population density" was originally named: "Imazaquin; broadcast by air; kg AI" in this dataset.
Exchange "Fluazifop-p-butyl-2bdf9967-6dae-4183-88d1-8f612548c51e low population density" was originally named: "Fluazifop-p-butyl; broadcast by air; kg AI" in this dataset.
Exchange "cis-2-Butene-2bdf9967-6dae-4183-88d1-8f612548c51e low population density" was originally named: "Cis 2 butene; from residue burning; kg C, biogenic" in this dataset.
Exchange "Trifluralin-2bdf9967-6dae-4183-88d1-8f612548c51e low population density" was originally named: "Trifluralin; broadcast by air; kg AI" in this dataset.
Exchange "Furan-2bdf9967-6dae-4183-88d1-8f612548c51e low population density" was originally named: "Furan; from residue burning; kg C, biogenic" in this dataset.
Exchange "isobutene-2bdf9967-6dae-4183-88d1-8f612548c51e low population density" was originally named: "I butene; from residue burning; kg C, biogenic" in this dataset.
Exchange "Carbon dioxide-c19fb2d9-98eb-4cd3-8761-81b71d8a9a1b unspecified" was originally named: "Carbon dioxide; from plant uptake; kg C, biogenic" in this dataset.
Exchange "Propane-2bdf9967-6dae-4183-88d1-8f612548c51e low population density" was originally named: "Propane; from residue burning; kg C, biogenic" in this dataset.
Exchange "Alachlor-2bdf9967-6dae-4183-88d1-8f612548c51e low population density" was originally named: "Alachlor; broadcast by air; kg AI" in this dataset.
Exchange "1-Butene-2bdf9967-6dae-4183-88d1-8f612548c51e low population density" was originally named: "1 butene; from residue burning; kg C, biogenic" in this dataset.
Exchange "Water-2bdf9967-6dae-4183-88d1-8f612548c51e low population density" was originally named: "Water; from residue burning; biogenic" in this dataset.
Exchange "Acetonitrile-2bdf9967-6dae-4183-88d1-8f612548c51e low population density" was originally named: "Acetonitrile; from residue burning; kg C, biogenic" in this dataset.
Exchange "Ethyne-2bdf9967-6dae-4183-88d1-8f612548c51e low population density" was originally named: "Acetylene; from residue burning; kg C, biogenic" in this dataset.
Exchange "Sulfuric acid-be1c0329-f1a8-4524-8420-a86d2a8dd358 agricultural" was originally named: "Sulfuric acid; as secondary application" in this dataset.
Exchange "Lactofen-2bdf9967-6dae-4183-88d1-8f612548c51e low population density" was originally named: "Lactofen; broadcast by air; kg AI" in this dataset.
Exchange "Clethodim-2bdf9967-6dae-4183-88d1-8f612548c51e low population density" was originally named: "Clethodim; broadcast by air; kg AI" in this dataset.
Exchange "Isoprene-2bdf9967-6dae-4183-88d1-8f612548c51e low population density" was originally named: "Isoprene; from residue burning; kg C, biogenic" in this dataset.
Exchange "Nitrogen dioxide-2bdf9967-6dae-4183-88d1-8f612548c51e low population density" was originally named: "Nitrogen dioxide; from residue burning; kg N, biogenic" in this dataset.
Exchange "Ethane-2bdf9967-6dae-4183-88d1-8f612548c51e low population density" was originally named: "Ethane; from residue burning; kg C, biogenic" in this dataset.
Exchange "Pendimethalin-2bdf9967-6dae-4183-88d1-8f612548c51e low population density" was originally named: "Pendimethalin; broadcast by air; kg AI" in this dataset.
Exchange "Formaldehyde-2bdf9967-6dae-4183-88d1-8f612548c51e low population density" was originally named: "Formaldehyde; from residue burning; kg C, biogenic" in this dataset.
Exchange "Formic acid-2bdf9967-6dae-4183-88d1-8f612548c51e low population density" was originally named: "Formic acid; from residue burning; kg C, biogenic" in this dataset.
Exchange "Acetone-2bdf9967-6dae-4183-88d1-8f612548c51e low population density" was originally named: "Acetone; from residue burning; kg C, biogenic" in this dataset.
Exchange "Sulfur-be1c0329-f1a8-4524-8420-a86d2a8dd358 agricultural" was originally named: "Sulfur; as secondary application" in this dataset.
Exchange "pursuit-2bdf9967-6dae-4183-88d1-8f612548c51e low population density" was originally named: "Imazethapyr; broadcast by air; kg AI" in this dataset.
Exchange "Acetaldehyde-2bdf9967-6dae-4183-88d1-8f612548c51e low population density" was originally named: "Acetaldehyde; from residue burning; kg C, biogenic" in this dataset.
Exchange "Pentane-2bdf9967-6dae-4183-88d1-8f612548c51e low population density" was originally named: "N pentane; from residue burning; kg C, biogenic" in this dataset.
Exchange "Flumetsulam-2bdf9967-6dae-4183-88d1-8f612548c51e low population density" was originally named: "Flumetsulam; broadcast by air; kg AI" in this dataset.
Exchange "Chlorimuron-ethyl-2bdf9967-6dae-4183-88d1-8f612548c51e low population density" was originally named: "Chlorimuron-ethyl; broadcast by air; kg AI" in this dataset.
Exchange "Acetic acid-2bdf9967-6dae-4183-88d1-8f612548c51e low population density" was originally named: "Acetic acid; from residue burning; kg C, biogenic" in this dataset.
Exchange "Metribuzin-2bdf9967-6dae-4183-88d1-8f612548c51e low population density" was originally named: "Metribuzin; broadcast by air; kg AI" in this dataset.
Exchange "Acrylonitrile-2bdf9967-6dae-4183-88d1-8f612548c51e low population density" was originally named: "Propenenitrile; from residue burning; kg C, biogenic" in this dataset.
Exchange "Water, unspecified origin-c19fb2d9-98eb-4cd3-8761-81b71d8a9a1b in water" was originally named: "Water; from plant uptake; biogenic" in this dataset.
Exchange "Benzene-2bdf9967-6dae-4183-88d1-8f612548c51e low population density" was originally named: "Benzene; from residue burning; kg C, biogenic" in this dataset.
Exchange "Carbon monoxide, fossil-2bdf9967-6dae-4183-88d1-8f612548c51e low population density" was originally named: "Carbon monoxide; from residue burning; kg C, biogenic" in this dataset.
Exchange "Transformation, to arable-c19fb2d9-98eb-4cd3-8761-81b71d8a9a1b land" was originally named: "Transformation; to arable, to soybeans" in this dataset.
Exchange "Propene-2bdf9967-6dae-4183-88d1-8f612548c51e low population density" was originally named: "Propylene; from residue burning; kg C, biogenic" in this dataset.
Exchange "Clomazone-2bdf9967-6dae-4183-88d1-8f612548c51e low population density" was originally named: "Clomazone; broadcast by air; kg AI" in this dataset.
Exchange "Glyphosate-2bdf9967-6dae-4183-88d1-8f612548c51e low population density" was originally named: "Glyphosate; broadcast by air; kg AI" in this dataset.
Exchange "Phosphorus-c19fb2d9-98eb-4cd3-8761-81b71d8a9a1b unspecified" was originally named: "Phosphorous; from plant uptake; biogenic" in this dataset.
Exchange "2,4-D-2bdf9967-6dae-4183-88d1-8f612548c51e low population density" was originally named: "2,4-D; broadcast by air; kg AI" in this dataset.
Exchange "Zinc compounds-be1c0329-f1a8-4524-8420-a86d2a8dd358 agricultural" was originally named: "Zinc compounds; as secondary application" in this dataset.
Exchange "trans-2-Butene-2bdf9967-6dae-4183-88d1-8f612548c51e low population density" was originally named: "Trans 2 butene; from residue burning; kg C, biogenic" in this dataset.
Exchange "Dinitrogen monoxide-2bdf9967-6dae-4183-88d1-8f612548c51e low population density" was originally named: "Dinitrogen monoxide; from residue burning; kg N, biogenic" in this dataset.
Exchange "Ammonia-2bdf9967-6dae-4183-88d1-8f612548c51e low population density" was originally named: "Ammonia; from residue burning; kg N, biogenic" in this dataset.
Exchange "Sulfur dioxide-2bdf9967-6dae-4183-88d1-8f612548c51e low population density" was originally named: "Sulfur dioxide; from residue burning; biogenic" in this dataset.
Exchange "Methanol-2bdf9967-6dae-4183-88d1-8f612548c51e low population density" was originally named: "Methanol; from residue burning; kg C, biogenic" in this dataset.
Exchange "Butadiene-2bdf9967-6dae-4183-88d1-8f612548c51e low population density" was originally named: "1,3 butadiene; from residue burning; kg C, biogenic" in this dataset.
Exchange "Sethoxydim-2bdf9967-6dae-4183-88d1-8f612548c51e low population density" was originally named: "Sethoxydim; broadcast by air; kg AI" in this dataset.
Exchange "Occupation, arable-c19fb2d9-98eb-4cd3-8761-81b71d8a9a1b land" was originally named: "Occupation; arable, as soybeans" in this dataset.
Exchange "Methane-2bdf9967-6dae-4183-88d1-8f612548c51e low population density" was originally named: "Methane; from residue burning; kg C, biogenic" in this dataset.
Exchange "Ethene-2bdf9967-6dae-4183-88d1-8f612548c51e low population density" was originally named: "Ethylene; from residue burning; kg C, biogenic" in this dataset.

## Geography
The unit process is assumed to represent production in Iowa (US State).

## Technology
This process produces soybeans; at harvest in 1996; at farm; 85%-92% moisture. The process is assumed to represent production in Iowa (US State). Yields and related inputs and outputs represent a single year of operation, in 1996. This dataset includes consideration of residue burning; soil preparation; planting or sowing; irrigation; application, storage, and transport of fertilizers, manures, liming materials, secondary materials, and pesticides; and harvest. Fate and transport of applications are not included as described in Cooper, J.S., Kahn, E., Noon, M. (2012) LCA Digital Commons Unit Process Data: field crop production Version 1 which is available at https://www.lcacommons.gov/discovery/docs/LCA%20Digital%20Commons%20Unit%20Process%20Data%20final%20updated.pdf

## Time period
Start and end dates match the underlying data obtained from the USDA Agricultural Resource Management Survey (ARMS).
## Parameters
- p1288: 0
- p2729: 1.87983e-6; = p2338*(p1078+p1080)
- p0220: 15.505
- p5155: 4.46353e-7; = p1776*p3484
- p2454: 4.00793e-5; = p2258*p1073
- p2987: 0; = p2401*(p1020+p1022)
- p1222: 0.94
- p1608: 0
- p1936: 0
- p2932: 1.1905e-6; = p2346*(p1079+p1081)
- p2125: 1.73237e-6; = p2015*p2053*p2087/(p0818*1000)
- p3840: 1.07176e-6; = p1903*p3477
- p2355: 0; = p2225*p2183
- p1128: 0.35758; = if(p1121=0;IF(p1123=1;0;IF(p1123+p1124>1;1-p1123;p1124));0)
- p0129: 4.015
- p1244: 0; = if(p1232>0;0;p1239*(p0725/100)*p0723*1000)
- p2884: 8.26549e-5; = p2298*(p1079+p1081)
- p0834: 0.00059
- p2880: 1.53493e-5; = p2294*(p1020+p1022)
- p2070: 0.282
- p1044: 0.0086688; = IF(p1012=0;IF(p1037=1;0;IF(p1037+p1038>1;1-p1037;p1038));0)
- p3249: 0
- p3228: 0.00436914; = p3224*p1229
- p1057: 0.82
- p1116: 2.39788e-5; = IF(p1071=0;p1106/(p1111*p0818);0)
- p2735: 2.09297e-8; = p2344*(p1078+p1080)
- p1338: 221062; = p1324*p0801
- p2897: 0.000624339; = p2311*(p1129+p1131)
- p2712: 0; = p2321*(p1019+p1021)
- p2885: 2.67658e-5; = p2299*(p1079+p1081)
- p2560: 0; = p2364*p1014
- p0543: 0; = IF(p0279<0.5;-SQRT(p0007*EXP(p0411^2*p0008)-p0007);SQRT(p0007*EXP(p0411^2*p0008)-p0007))
- p2677: 7.41498e-6; = p2286*(p1019+p1021)
- p3181: 0; = p2400*p1023
- p1208: 111.53; = p1205*p0818*p0822/p0801
- p0903: 0.0257527
- p4191: 1.23251e-7; = p1842*p3479
- p2056: 2.07882
- p3132: 4.25839e-7; = p2351*p1132
- p2713: 0; = p2322*(p1019+p1021)
- p1920: 0
- p5012: 0; = p1839*p3483
- p2792: 0; = p2401*(p1019+p1021)
- p1908: 0
- p1804: 0
- p2230: 0.619071; = if(p0783*p0787+p0784*p0788+p0785*p0789+p0786*p0790=0;0;p0787*p0783/(p0783*p0787+p0784*p0788+p0785*p0789+p0786*p0790))
- p1589: 0
- p1959: 10027.4; = if(p0738*p0740*p0739>0;p0738*1000*(p0740/100)*p0739/1000;p1958)
- p1985: 5.50909e7; = (if(p1057=0;0;p1050/p1057)+if(p1058=0;0;p1051/p1058)+if(p1059=0;0;p1052/p1059)+if(p1060=0;0;p1053/p1060)+if(p1061=0;0;p1054/p1061)+if(p1062=0;0;p1055/p1062)+if(p1063=0;0;p1056/p1063))*(1+p1157)
- p3776: 1.29128e-8; = p1839*p3477
- p1567: 0
- p0896: 0.497045
- p1024: 158851; = IF(p1012=0;p1014*(p0704/100)*p0703*1000;0)
- p2039: 1.3364e-6; = p2015*p2037*p2038/(p0818*1000)
- p2851: 0.000241036; = p2265*(p1079+p1081)
- p3341: 0; = if(and(p1232=0;p3254<>0);p3254*(p3271-p3336)/p3338;0)
- p1809: 0
- p0272: 8.961
- p2796: 0; = p2405*(p1019+p1021)
- p1852: 0
- p3141: 0; = p2360*p1023
- p3366: 0; = if(p1232=0;p3244*p3360/p0818;0)
- p0368: 0.5
- p2839: 3.05304e-7; = p2253*(p1020+p1022)
- p2625: 0; = p2429*p1123
- p0282: 0.5
- p2786: 0; = p2395*(p1019+p1021)
- p0853: 0; = p0803/(p0802+p0803)
- p1751: 0.791173
- p2396: 0; = p2234*p2185
- p2525: 0; = p2329*p1014
- p0438: 0; = SQRT(2)*(IF((2*p0306-1)<0;-1;IF((2*p0306-1)>0;1;0))*SQRT(SQRT((2/(pi()*0.140012289)+LN(1-(2*p0306-1)^2)/2)^2-LN(1-(2*p0306-1)^2)/0.140012289)-(2/(pi()*0.140012289)+LN(1-(2*p0306-1)^2)/2)))
- p2827: 1.18014e-5; = p2241*(p1020+p1022)
- p0843: 0.053185
- p3459: 0; = p3364*p1241
- p1607: 0
- p0833: 3.98537e10; = p0830+p0832
- p2257: 4.60489e-5; = p2222*p2203
- p1248: 0; = if(p1232>0;0;p1243*p0001/(p0818*p0002))
- p3203: 0; = p2422*p1082
- p2804: 0; = p2413*(p1019+p1021)
- p3100: 0; = p2319*p1023
- p2737: 7.48203e-7; = p2346*(p1078+p1080)
- p2563: 0; = p2367*p1014
- p2075: 0.072
- p0689: 0
- p1144: 2.10434e-7; = if(p1121=0;p1138*p0001/(p0818*p0002);0)
- p3985: 3.32035e-7; = p1842*p3478
- p0810: 0
- p2632: 8.47705e-6; = p2241*(p1019+p1021)
- p3146: 0; = p2365*p1023
- p1054: 5.82395e6; = IF(p1012=0;p1047*p1036;0)
- p3006: 0; = p2420*(p1079+p1081)
- p1296: 0; = p1292*p1252/p0818
- p2802: 0; = p2411*(p1019+p1021)
- p3780: 1.53724e-9; = p1843*p3477
- p0520: 0; = SQRT(2)*(IF((2*p0388-1)<0;-1;IF((2*p0388-1)>0;1;0))*SQRT(SQRT((2/(pi()*0.140012289)+LN(1-(2*p0388-1)^2)/2)^2-LN(1-(2*p0388-1)^2)/0.140012289)-(2/(pi()*0.140012289)+LN(1-(2*p0388-1)^2)/2)))
- p1033: 0; = IF(p1012=0;p1027*p0001/(p0818*p0002);0)
- p3103: 0; = p2322*p1023
- p2771: 0; = p2380*(p1078+p1080)
- p2836: 0.000103393; = p2250*(p1020+p1022)
- p0415: 0; = SQRT(2)*(IF((2*p0283-1)<0;-1;IF((2*p0283-1)>0;1;0))*SQRT(SQRT((2/(pi()*0.140012289)+LN(1-(2*p0283-1)^2)/2)^2-LN(1-(2*p0283-1)^2)/0.140012289)-(2/(pi()*0.140012289)+LN(1-(2*p0283-1)^2)/2)))
- p5146: 3.57297e-7; = p1767*p3484
- p2443: 3.95626e-6; = p2247*p1014
- p3656: 8.99934e-8; = p1925*p3476
- p1820: 0
- p1634: 0
- p4940: 0; = p1767*p3483
- p0768: 0
- p1190: 1.1355e-7; = p1188/p0818
- p3391: 0; = p3372*p1234
- p0762: 0
- p0772: 28.794; = p0112*(1+p0640*p0244/100)
- p4350: 0; = p1795*p3480
- p2128: 1.15508e-6; = p2015*p2056*p2090/(p0818*1000)
- p2168: 0.0186799; = p2166*(p0903)
- p5221: 1.39485e-8; = p1842*p3484
- p1859: 0
- p3224: 0.501945; = IF(p3216=0;0;1-p3221-p3222-p3223)
- p2860: 8.17145e-5; = p2274*(p1129+p1131)
- p1020: 0.4593; = IF(p1012=0;IF(p1014+p1019=1;0;IF(p1014+p1019+p1016>1;1-(p1014+p1019);p1016));0)
- p5132: 0; = p1963*p3483
- p2464: 4.67201e-6; = p2268*p1073
- p1013: 0; = p1012*p0001/(p0818*p0002)
- p1427: 72
- p2193: 0.000233444; = p1054/p0818
- p3470: 0; = p3375*p1241
- p2998: 0; = p2412*(p1020+p1022)
- p1141: 2.65655e-5; = if(p1121=0;p1135*p0001/(p0818*p0002);0)
- p1780: 0
- p1043: 0.183763
- p2926: 3.72805e-6; = p2340*(p1079+p1081)
- p1099: 0.663396
- p1156: 0.0142978; = p1064+p1065+p1066+p1067+p1068+p1069+p1070+p1116+p1117+p1118+p1119+p1120+p1154+p1155
- p0391: 0.5
- p0882: 4756; = p0869*p0856
- p1291: 0; = IF(p1287+p1290=p1264;0;IF(p1287+p1290+p1289>p1264;p1264-(p1287+p1290);p1289))
- p2716: 0; = p2325*(p1019+p1021)
- p1000: 0; = IF(p0996+p0999=1;0;IF(p0996+p0999+p0998>1;1-(p0996+p0999);p0998))
- p1177: 0.000339735; = p0801*p0001/(p0818*p0002)
- p1878: 0
- p2858: 0.00107665; = p2272*(p1129+p1131)
- p0731: 0
- p2301: 5.95046e-5; = p2227*p2208
- p1076: 0; = IF(p1071=0;p0714/100;0)
- p2850: 1.84062e-5; = p2264*(p1079+p1081)
- p3054: 1.20185e-5; = p2273*p1132
- p1833: 0
- p0089: 23.683
- p0409: 0; = SQRT(2)*(IF((2*p0277-1)<0;-1;IF((2*p0277-1)>0;1;0))*SQRT(SQRT((2/(pi()*0.140012289)+LN(1-(2*p0277-1)^2)/2)^2-LN(1-(2*p0277-1)^2)/0.140012289)-(2/(pi()*0.140012289)+LN(1-(2*p0277-1)^2)/2)))
- p2008: 0.0101511; = ((p1982*p1985+p1988*p1991+p1994*p1997+p2002*p2005)/p0818)*p0005*p0002/1000
- p2444: 2.23923e-5; = p2248*p1014
- p2700: 1.29386e-6; = p2309*(p1078+p1080)
- p1122: 0; = p1121*p0001/(p0818*p0002)
- p2108: 0.826583
- p0524: 0; = SQRT(2)*(IF((2*p0392-1)<0;-1;IF((2*p0392-1)>0;1;0))*SQRT(SQRT((2/(pi()*0.140012289)+LN(1-(2*p0392-1)^2)/2)^2-LN(1-(2*p0392-1)^2)/0.140012289)-(2/(pi()*0.140012289)+LN(1-(2*p0392-1)^2)/2)))
- p0511: 0; = SQRT(2)*(IF((2*p0379-1)<0;-1;IF((2*p0379-1)>0;1;0))*SQRT(SQRT((2/(pi()*0.140012289)+LN(1-(2*p0379-1)^2)/2)^2-LN(1-(2*p0379-1)^2)/0.140012289)-(2/(pi()*0.140012289)+LN(1-(2*p0379-1)^2)/2)))
- p2955: 0; = p2369*(p1020+p1022)
- p0799: 75.698; = p0139*(1+p0667*p0271/100)
- p3256: 0; = p1252*(p1307*(1-p3247)+p1310*(1-p3248)+p1311*(1-p3249)+p1312*(1-p3250))
- p2813: 0; = p2422*(p1078+p1080)
- p1593: 0.689607
- p2270: 1.03765e-5; = p2226*p2216
- p0150: 0
- p2681: 7.27686e-8; = p2290*(p1019+p1021)
- p1233: 0.000339735; = p1232*p0001/(p0818*p0002)
- p1812: 0
- p4596: 2.50474e-8; = p1835*p3481
- p1075: 0.56064; = IF(p1071=0;p0713/100;0)
- p2766: 0; = p2375*(p1078+p1080)
- p3110: 0; = p2329*p1023
- p0622: 0; = IF(p0358<0.5;-SQRT(p0007*EXP(p0490^2*p0008)-p0007);SQRT(p0007*EXP(p0490^2*p0008)-p0007))
- p1171: 0.000339735; = p0801*p0001/(p0818*p0002)
- p1864: 1.48308e-5; = p1456*1000/p0818
- p2785: 0; = p2394*(p1019+p1021)
- p0820: 0; = if(p0807=480;p0814;0)
- p1079: 0.56064; = IF(p1071=0;IF(p1073+p1078=1;0;IF(p1073+p1078+p1075>1;1-(p1073+p1078);p1075));0)
- p3214: 0.376406; = p1222*40.078/100.0869
- p0109: 36.022
- p1895: 0
- p0975: 0.0126902; = p0973*p0974/p0818
- p2624: 0; = p2428*p1123
- p2537: 2.61643e-7; = p2341*p1073
- p1553: 0
- p2345: 6.21138e-7; = p2228*p2213
- p1944: 0
- p1585: 0
- p2545: 3.20006e-7; = p2349*p1073
- p1166: 1.84009e-6; = p1164/p0818
- p2324: 0; = p2224*p2191
- p0609: 0; = IF(p0345<0.5;-SQRT(p0007*EXP(p0477^2*p0008)-p0007);SQRT(p0007*EXP(p0477^2*p0008)-p0007))
- p2828: 1.69848e-6; = p2242*(p1020+p1022)
- p4445: 0; = p1890*p3480
- p2988: 0; = p2402*(p1020+p1022)
- p2699: 2.5266e-5; = p2308*(p1078+p1080)
- p2431: 0; = p2236*p2221
- p0977: 0; = IF(p0687=0;IF(OR(p0686=0;p0688=0);0;p0686*1000*p0688/100);0)
- p2222: 0.45508; = if(p0765*p0769+p0766*p0770+p0767*p0771+p0768*p0772=0;0;p0769*p0765/(p0765*p0769+p0766*p0770+p0767*p0771+p0768*p0772))
- p3031: 0; = p2250*p1023
- p2271: 9.29992e-5; = p2226*p2217
- p1254: 0; = if(p1232>0;0;p0736/100)
- p2159: 2.48243e-6; = p2015*p2083*p2121/(p0818*1000)
- p2678: 4.19685e-5; = p2287*(p1019+p1021)
- p1040: 0.0227455
- p1863: 1.08225e-6; = p1455*1000/p0818
- p3801: 1.13756e-7; = p1864*p3477
- p2148: 6.77974e-8; = p2015*p2076*p2110/(p0818*1000)
- p2815: 0; = p2424*(p1078+p1080)
- p1678: 0
- p1003: 0; = p0999*p0888
- p1656: 0
- p0777: 0
- p2256: 4.01675e-6; = p2222*p2202
- p2012: 0.00266736
- p2620: 0; = p2424*p1073
- p0104: 7.937
- p1968: 0; = if(p0807=480;p0802*p0811;0)
- p0643: 0; = IF(p0379<0.5;-SQRT(p0007*EXP(p0511^2*p0008)-p0007);SQRT(p0007*EXP(p0511^2*p0008)-p0007))
- p2105: 0.888194
- p0640: 0; = IF(p0376<0.5;-SQRT(p0007*EXP(p0508^2*p0008)-p0007);SQRT(p0007*EXP(p0508^2*p0008)-p0007))
- p3051: 0; = p2270*p1082
- p2419: 0; = p2235*p2209
- p3376: 0; = if(p1232=0;p3246*p3358/p0818;0)
- p1761: 0
- p1080: 0; = IF(p1071=0;IF(p1073+p1078+p1079=1;0;IF(p1073+p1078+p1079+p1076>1;1-(p1073+p1078+p1079);p1076));0)
- p2610: 0; = p2414*p1073
- p1568: 0
- p3432: 0; = p3375*p1239
- p1814: 0
- p2476: 6.48502e-6; = p2280*p1014
- p3328: 0; = if(and(p1232=0;p3255<>0);p3255*(p3265*p3277-p3323)/p3327;0)
- p2871: 1.27558e-6; = p2285*(p1020+p1022)
- p2913: 0; = p2327*(p1020+p1022)
- p1603: 0
- p1890: 4.16867e-6; = p1482*1000/p0818
- p1699: 0.762907
- p3070: 0; = p2289*p1023
- p2283: 9.64833e-6; = p2223*p2189
- p1747: 0
- p0732: 0
- p1876: 0
- p1305: 0; = p1301*p1252/p0818
- p2608: 0; = p2412*p1014
- p2589: 0; = p2393*p1014
- p0485: 0; = SQRT(2)*(IF((2*p0353-1)<0;-1;IF((2*p0353-1)>0;1;0))*SQRT(SQRT((2/(pi()*0.140012289)+LN(1-(2*p0353-1)^2)/2)^2-LN(1-(2*p0353-1)^2)/0.140012289)-(2/(pi()*0.140012289)+LN(1-(2*p0353-1)^2)/2)))
- p1341: 0; = p1340*p0001/(p0818*p0002)
- p2811: 0; = p2420*(p1078+p1080)
- p4689: 3.61796e-8; = p1928*p3481
- p2182: 0.000320626; = p1050/p0818
- p3574: 1.66654e-8; = p1843*p3476
- p0667: 0; = IF(p0403<0.5;-SQRT(p0007*EXP(p0535^2*p0008)-p0007);SQRT(p0007*EXP(p0535^2*p0008)-p0007))
- p1179: 0.5
- p0278: 0.5
- p0939: 2.56661e-7; = p0933*p0001/(p0818*p0002)
- p1286: 0; = p1282*p1252/p0818
- p1557: 0
- p1207: 10.6963; = if(p1193>0;0;(p1194*p1050/p1057+p1195*p1051/p1058+p1196*p1052/p1059+p1197*p1053/p1060+p1198*p1054/p1061+p1199*p1055/p1062+p1200*p1056/p1063)/(p0702*1000)+(p1201*p1109/p1114+p1202*p1110/p1115)/(p0702*1000)+p1203*p1170/p0801+p1204*p1176/p0801)
- p0742: 97.783; = p0082*(1+p0610*p0214/100)
- p2941: 0; = p2355*(p1020+p1022)
- p0229: 0.019
- p1150: 7.67169e7; = if(p1121=0;p1149*p1146*p1145;0)
- p3180: 0; = p2399*p1023
- p0020: 1267.86
- p2005: 1.72763e7; = p1963*p0818+p1959*1000+p1170+p1176+p1182
- p1149: 0.830148
- p1012: 0
- p2943: 0; = p2357*(p1020+p1022)
- p0123: 83.75
- p2529: 0; = p2333*p1014
- p1626: 0
- p3047: 0; = p2266*p1082
- p2967: 0; = p2381*(p1079+p1081)
- p3115: 0; = p2334*p1023
- p0448: 0; = SQRT(2)*(IF((2*p0316-1)<0;-1;IF((2*p0316-1)>0;1;0))*SQRT(SQRT((2/(pi()*0.140012289)+LN(1-(2*p0316-1)^2)/2)^2-LN(1-(2*p0316-1)^2)/0.140012289)-(2/(pi()*0.140012289)+LN(1-(2*p0316-1)^2)/2)))
- p0136: 7.937
- p0919: 0.391761; = p0678*1000/p0801
- p1839: 1.6835e-6; = p1431*1000/p0818
- p0710: 11.845; = p0050*(1+p0578*p0182/100)
- p2409: 0; = p2234*p2199
- p2337: 1.64753e-5; = p2228*p2205
- p2335: 0; = p2224*p2203
- p2445: 4.80005e-6; = p2249*p1014
- p3106: 0; = p2325*p1023
- p3447: 0; = p3371*p1240
- p2482: 4.7373e-6; = p2286*p1014
- p0591: 0; = IF(p0327<0.5;-SQRT(p0007*EXP(p0459^2*p0008)-p0007);SQRT(p0007*EXP(p0459^2*p0008)-p0007))
- p2468: 0.000137789; = p2272*p1123
- p2349: 3.67781e-6; = p2228*p2217
- p0673: 20.36; = p0013*(1+p0541*p0145/100)
- p0979: 0; = IF(p0976=0;0;p0976*p0001/(p0818*p0002))
- p1963e: 3.49783e-6; = p1628*p1832+p1629*p1833+p1630*p1834+p1631*p1835+p1632*p1836+p1633*p1837+p1634*p1838+p1635*p1839+p1636*p1840+p1637*p1841+p1638*p1842+p1639*p1843+p1640*p1844+p1641*p1845+p1642*p1846+p1643*p1847+p1644*p1848+p1645*p1849+p1646*p1850
- p3356: 0; = if(p1232=0;p3306+p3317+p3328+p3339+p3350;0)
- p1629: 0
- p2101: 0.620397
- p2708: 0; = p2317*(p1019+p1021)
- p2794: 0; = p2403*(p1019+p1021)
- p0849: 0
- p2185: 2.32435e-5; = p1065-p2184
- p1324: 0.0232696; = IF(((p0745*1000*p0751/100)+(p0754*1000*p0760/100))/p0801<0;0;((p0745*1000*p0751/100)+(p0754*1000*p0760/100))/p0801)
- p2694: 4.0937e-6; = p2303*(p1078+p1080)
- p1127: 0; = if(p1121=0;p0721/100;0)
- p0119: 30.15
- p0327: 0.5
- p1303: 0; = p1297*p1252/p0818
- p1170: 3429.95; = p1169*p0801
- p2407: 0; = p2234*p2197
- p3208: 0; = p2427*p1082
- p2416: 0; = p2235*p2206
- p1345: 2.43829e-5; = IF(p1318=0;p1344*p0001/(p0818*p0002);0)
- p2838: 1.38863e-7; = p2252*(p1020+p1022)
- p1611: 0
- p0355: 0.5
- p3387: 0; = p3368*p1234
- p4424: 0; = p1869*p3480
- p3292: 0
- p3477: 0.00767021; = if(p1328+p1330+p1332+p1334+p1336+p1338+p1340+p1342+p1344=0;0;p1330/(p1328+p1330+p1332+p1334+p1336+p1338+p1340+p1342+p1344))
- p2428: 0; = p2236*p2218
- p2216: 1.4459e-5; = p1108/p0818
- p2110: 0.856281
- p1886: 0
- p2141: 2.4157e-7; = p2015*p2069*p2103/(p0818*1000)
- p2594: 0; = p2398*p1014
- p1770: 0
- p0892: 0; = if(p0891=0;0;(1-p1240)*p3251/p0891)
- p2645: 2.14772e-5; = p2254*(p1019+p1021)
- p1731: 0
- p3405: 0; = p3367*p1238
- p3319: 0; = if(and(p1232=0;p3253<>0);p3253*(p3263-p3314)/p3316;0)
- p2501: 4.62497e-8; = p2305*p1073
- p0999: 0; = IF(p0996=1;0;IF(p0996+p0997>1;1-p0996;p0997))
- p2224: 0; = if(p0765*p0769+p0766*p0770+p0767*p0771+p0768*p0772=0;0;p0771*p0767/(p0765*p0769+p0766*p0770+p0767*p0771+p0768*p0772))
- p1858: 0
- p2980: 0; = p2394*(p1020+p1022)
- p1822: 0
- p1181: 0.000110755
- p3290: 0
- p2516: 0; = p2320*p1014
- p1125: 0.56556; = if(p1121=0;p0719/100;0)
- p2830: 3.70086e-6; = p2244*(p1020+p1022)
- p2930: 3.33021e-8; = p2344*(p1079+p1081)
- p0678: 3721.73; = p0018*(1+p0546*p0150/100)
- p2388: 0; = p2229*p2217
- p3982: 1.07273e-6; = p1839*p3478
- p0950: 0; = if(and(p0683=0;or(p0807=480;p0807=32;p0807=1;and(p0807=60;p0901<0.03)));p0938;0)
- p1655: 0
- p0019: 2599.99
- p0763: 9495.23; = p0103*(1+p0631*p0235/100)
- p4528: 1.15844e-7; = p1767*p3481
- p3036: 0; = p2255*p1023
- p3143: 0; = p2362*p1023
- p2035: 4.59656e-6; = p2015*p2029*(1-p2031)/(p0818*1000)
- p0851: 0
- p2085: 0.0335294
- p1832: 0
- p0729: 0
- p3068: 0; = p2287*p1023
- p2162: 2.26469e-8; = p2015*p2086*p2124/(p0818*1000)
- p0741: 1.073; = p0081*(1+p0609*p0213/100)
- p3178: 0; = p2397*p1023
- p2752: 0; = p2361*(p1019+p1021)
- p2629: 1.0567e-5; = p2238*(p1019+p1021)
- p3298: 0; = if(p1283+p1284+p1285+p1286=0;0;p1283/(p1283+p1284+p1285+p1286))
- p3195: 0; = p2414*p1082
- p1132: 0.00448; = if(p1121=0;IF(p1123+p1128+p1129+p1130+p1131=1;0;1-(p1123+p1128+p1129+p1130+p1131));0)
- p0780: 4.773; = p0120*(1+p0648*p0252/100)
- p2909: 0; = p2323*(p1020+p1022)
- p2789: 0; = p2398*(p1019+p1021)
- p2740: 1.29588e-6; = p2349*(p1078+p1080)
- p0657: 0; = IF(p0393<0.5;-SQRT(p0007*EXP(p0525^2*p0008)-p0007);SQRT(p0007*EXP(p0525^2*p0008)-p0007))
- p2161: 1.22941e-8; = p2015*p2085*p2123/(p0818*1000)
- p0281: 0.5
- p1869: 2.32484e-6; = p1461*1000/p0818
- p0753: 0
- p3024: 0; = p2243*p1023
- p2572: 0; = p2376*p1073
- p4116: 3.15712e-6; = p1767*p3479
- p0475: 0; = SQRT(2)*(IF((2*p0343-1)<0;-1;IF((2*p0343-1)>0;1;0))*SQRT(SQRT((2/(pi()*0.140012289)+LN(1-(2*p0343-1)^2)/2)^2-LN(1-(2*p0343-1)^2)/0.140012289)-(2/(pi()*0.140012289)+LN(1-(2*p0343-1)^2)/2)))
- p5037: 0; = p1864*p3483
- p2451: 5.88269e-6; = p2255*p1014
- p1996: 30
- p3019: 0; = p2238*p1023
- p0964: 0; = 56/90000
- p3183: 0; = p2402*p1023
- p1182: 1052.17; = p1181*p0801
- p0909: 2.64159e8
- p1637: 0
- p2247: 1.87696e-5; = p2222*p2192
- p0707: 45.93; = p0047*(1+p0575*p0179/100)
- p2730: 1.56081e-5; = p2339*(p1078+p1080)
- p3090: 0; = p2309*p1082
- p0864: 0.0427193; = IF(p0858=1;0;IF(p0858+p0859>1;1-p0858;p0859))
- p0870: 8.56125e6; = p0858*p0856
- p3429: 0; = p3372*p1239
- p1690: 0
- p0122: 13.833
- p2320: 0; = p2224*p2187
- p1096: 0.00216322
- p2217: 0.000129588; = p1118-p2216
- p2322: 0; = p2224*p2189
- p2214: 7.48205e-5; = p1107/p0818
- p0944: 0; = if(and(p0683=0;p0950=0);p0938;0)
- p3454: 0; = p3378*p1240
- p1560: 0
- p2919: 0; = p2333*(p1020+p1022)
- p0506: 0; = SQRT(2)*(IF((2*p0374-1)<0;-1;IF((2*p0374-1)>0;1;0))*SQRT(SQRT((2/(pi()*0.140012289)+LN(1-(2*p0374-1)^2)/2)^2-LN(1-(2*p0374-1)^2)/0.140012289)-(2/(pi()*0.140012289)+LN(1-(2*p0374-1)^2)/2)))
- p0127: 48.675
- p0935: 0.000133095; = p0929*p0001/(p0818*p0002)
- p1733: 0
- p1205: 0.04725
- p3124: 0; = p2343*p1082
- p3247: 0
- p0550: 0; = IF(p0286<0.5;-SQRT(p0007*EXP(p0418^2*p0008)-p0007);SQRT(p0007*EXP(p0418^2*p0008)-p0007))
- p3269: 0
- p2795: 0; = p2404*(p1019+p1021)
- p2921: 0; = p2335*(p1020+p1022)
- p3340: 0; = if(and(p1232=0;p3254<>0);p3254*(p3270-p3335)/p3338;0)
- p2587: 0; = p2391*p1123
- p1159: 0.5
- p1077: 0; = IF(p1071=0;p0715/100;0)
- p1598: 0
- p2196: 0.00049466; = p1068-p2193-p2195
- p0774: 57.255; = p0114*(1+p0642*p0246/100)
- p1948: 0
- p2452: 8.46652e-7; = p2256*p1014
- p2387: 0; = p2229*p2216
- p1750: 0
- p1556: 0
- p2601: 0; = p2405*p1014
- p1332: 1.62302e7; = p1321*p0801
- p1782: 0
- p1682: 0
- p1716: 0
- p0283: 0.5
- p1973: 0; = if(p0807=480;p1968*p0001/(p0818*p0002);0)
- p3800: 8.3011e-9; = p1863*p3477
- p0672: 0
- p0546: 0; = IF(p0282<0.5;-SQRT(p0007*EXP(p0414^2*p0008)-p0007);SQRT(p0007*EXP(p0414^2*p0008)-p0007))
- p1084: 396291; = IF(p1071=0;p1078*(p0710/100)*p0703*1000;0)
- p0143: 0
- p3482: 0; = if(p1328+p1330+p1332+p1334+p1336+p1338+p1340+p1342+p1344=0;0;p1340/(p1328+p1330+p1332+p1334+p1336+p1338+p1340+p1342+p1344))
- p3435: 0; = p3378*p1239
- p3420: 0; = p3363*p1239
- p1228: 0.0559557; = IF(p1221=0;0;p0801*p1212*2000/(p1222+p1221*p1225)/p0818)
- p1239: 0; = if(p1232>0;0;IF(p1234+p1238=1;0;IF(p1234+p1238+p1236>1;1-(p1234+p1238);p1236)))
- p2776: 0; = p2385*(p1078+p1080)
- p0978: 9.5e6; = p0801
- p3312: 0; = if(and(p1232=0;p3253<>0);p3261*p3277*(p3298*p3290+(1-p3298)*p3294);0)
- p2211: 0.000599079; = p1120-p2209-p2208-p2210
- p3321: 0; = if(and(p1232=0;p3253<>0);IF((p3317+p3318+p3319+p3320)+(p3253*(p3261*(1-p3277))/p3316)>p3253;p3253-(p3317+p3318+p3319+p3320);p3253*(p3261*(1-p3277))/p3316);0)
- p1294: 0; = p1290*p1252/p0818
- p1854: 0
- p2154: 1.76121e-7; = p2015*p2082*p2116/(p0818*1000)
- p3102: 0; = p2321*p1023
- p2474: 7.75077e-7; = p2278*p1014
- p1292: 0; = IF(p1287+p1290+p1291=p1261;0;p1261-(p1287+p1290+p1291))
- p2055: 5.59471
- p2017: 1.58024e7; = p2015*p0898
- p2133: 5.51848e-7; = p2015*p2061*p2095/(p0818*1000)
- p0006: 15
- p1670: 0
- p2400: 0; = p2234*p2189
- p1931: 0
- p2412: 0; = p2234*p2202
- p2628: 4.81387e-5; = p2237*(p1019+p1021)
- p1694: 0
- p2053: 1.45647
- p1857: 0
- p2034: 5.53072e-6; = p2015*p2030*p2032/(p0818*1000)
- p2754: 0; = p2363*(p1019+p1021)
- p1184: 4.21747e-8; = p1182/p0818
- p1551: 0
- p3108: 0; = p2327*p1023
- p2066: 0.109412
- p1689: 0
- p2037: 3.16
- p1195: 0.45
- p2944: 0; = p2358*(p1020+p1022)
- p2098: 0.856281
- p0711: 8.701; = p0051*(1+p0579*p0183/100)
- p1963c: 5.36452e-6; = p1588*p1792+p1589*p1793+p1590*p1794+p1591*p1795+p1592*p1796+p1593*p1797+p1594*p1798+p1595*p1799+p1596*p1800+p1597*p1801+p1598*p1802+p1599*p1803+p1600*p1804+p1601*p1805+p1602*p1806+p1603*p1807+p1604*p1808+p1605*p1809+p1606*p1810+p1607*p1811
- p2137: 6.53931e-8; = p2015*p2065*p2099/(p0818*1000)
- p0267: 36.469
- p0079: 1.079
- p2535: 3.85429e-6; = p2339*p1073
- p3076: 0; = p2295*p1023
- p1926: 0
- p2189: 1.77059e-5; = p1053/p0818
- p1632: 0
- p2491: 1.0138e-6; = p2295*p1014
- p2294: 3.34189e-5; = p2223*p2201
- p2469: 0.000194174; = p2273*p1123
- p2119: 0.679049
- p1573: 0
- p1877: 0
- p2048: 1.38906e-14; = p2015*p2046/(p0818*1000000000000)
- p2389: 0; = p2233*p2218
- p0344: 0.5
- p1901: 0
- p2725: 0; = p2334*(p1019+p1021)
- p3674: 1.33324e-8; = p1943*p3476
- p2518: 0; = p2322*p1014
- p1616: 0
- p3404: 0; = p3366*p1238
- p3293: 0
- p5218: 4.50645e-8; = p1839*p3484
- p0017: 129.75
- p2237: 0.00014591; = p2222*p2182
- p4071: 2.65628e-6; = p1928*p3478
- p3074: 0; = p2293*p1023
- p2749: 0; = p2358*(p1019+p1021)
- p2868: 2.60176e-5; = p2282*(p1020+p1022)
- p0538: 0; = IF(p0274<0.5;-SQRT(p0007*EXP(p0406^2*p0008)-p0007);SQRT(p0007*EXP(p0406^2*p0008)-p0007))
- p3456: 0; = p3380*p1240
- p2842: 1.8449e-6; = p2256*(p1020+p1022)
- p2030: 8.87
- p0809: 0
- p0737: 0
- p4410: 0; = p1855*p3480
- p3772: 2.21363e-8; = p1835*p3477
- p1614: 0
- p2167: 0.330763; = p2166*(p0898)
- p3279: 0
- p2392: 0; = p2233*p2221
- p2901: 0; = p2315*(p1020+p1022)
- p2010: 0.000406043; = ((p1984*p1985+p1990*p1991+p1996*p1997+p2004*p2005)/p0818)*p0005*p0002/1000
- p0739: 1.079; = p0079*(1+p0607*p0211/100)
- p0358: 0.5
- p2586: 0; = p2390*p1123
- p2057: 3.28794
- p3409: 0; = p3371*p1238
- p3325: 0; = if(and(p1232=0;p3255<>0);p3267*p3289;0)
- p0775: 34.502; = p0115*(1+p0643*p0247/100)
- p2499: 1.01091e-6; = p2303*p1073
- p2890: 8.52992e-5; = p2304*(p1079+p1081)
- p0670: 8561.25; = p0010*(1+p0538*p0142/100)
- p0002: 0.453592
- p1905: 0
- p2095: 0.765734
- p0859: 0.0427193; = p0671*1000/p0856
- p1651: 0.299611
- p0783: 83.75; = p0123*(1+p0651*p0255/100)
- p1625: 0
- p3910: 8.5052e-6; = p1767*p3478
- p2676: 9.16262e-7; = p2285*(p1019+p1021)
- p0242: 22.111
- p4146: 1.3368e-6; = p1797*p3479
- p0797: 49.176; = p0137*(1+p0665*p0269/100)
- p2519: 0; = p2323*p1014
- p2036: 6.79027e-6; = p2015*p2030*(1-p2032)/(p0818*1000)
- p2763: 0; = p2372*(p1019+p1021)
- p0802: 9.45e6
- p2523: 0; = p2327*p1014
- p1277: 0
- p2660: 7.13961e-5; = p2269*(p1078+p1080)
- p0097: 75.514
- p1643: 0
- p2695: 5.36087e-5; = p2304*(p1078+p1080)
- p1561: 0
- p0738: 9495.27; = p0078*(1+p0606*p0210/100)
- p0669: 27.5173; = p0009*(1+p0537*p0141/100)
- p3133: 2.29348e-8; = p2352*p1132
- p1163: 0.00483226
- p2042: 0.07
- p1738: 0
- p2001: 400
- p2369: 0; = p2225*p2198
- p3360: 0; = if(p1232=0;p3310+p3321+p3332+p3343+p3354;0)
- p1063: 0.455
- p0771: 6.977; = p0111*(1+p0639*p0243/100)
- p4964: 0; = p1791*p3483
- p2564: 0; = p2368*p1014
- p4304: 3.39225e-5; = p1955*p3479
- p2472: 3.68265e-5; = p2276*p1014
- p3458: 0; = p3363*p1241
- p1896: 0
- p2978: 0; = p2392*(p1129+p1131)
- p3302: 0; = if(and(p1232=0;p3252<>0);p3258*(p3278*(p3282*p1256+p3286*(p1253+p1257)+p1258*p3288+p3297*p3287));0)
- p3291: 0
- p3166: 0; = p2385*p1082
- p1242: 0; = if(p1232>0;0;p1234*(p0725/100)*p0723*1000)
- p0854: 3.75143e6; = p0801*((1-p0853)*p0846+p0853*p0852)
- p0145: 0
- p3111: 0; = p2330*p1023
- p3620: 8.99934e-7; = p1889*p3476
- p2673: 1.86888e-5; = p2282*(p1019+p1021)
- p1047: 0.299887; = IF(p1012=0;IF(p1037+p1044+p1045+p1046=1;0;IF(p1037+p1044+p1045+p1046+p1041>1;1-(p1037+p1044+p1045+p1046);p1041));0)
- p1621: 0
- p2201: 6.1328e-5; = 12.01*p2200/(2*14.0067)
- p2145: 4.62478e-7; = p2015*p2073*p2107/(p0818*1000)
- p2087: 0.856281
- p1677: 0
- p4309: 0; = p1754*p3480
- p0912: 0
- p1224: 0.44; = IF(p1221=0;0;IF(p1193=0;1-p1223;0))
- p2577: 0; = p2381*p1073
- p1318: 0; = p1317*p0001/(p0818*p0002)
- p1062: 0.16
- p2067: 0.446471
- p3020: 0; = p2239*p1023
- p0869: 0.000500632; = IF(p0858+p0864+p0865+p0866+p0867+p0868=1;0;1-(p0858+p0864+p0865+p0866+p0867+p0868))
- p0873: 0.145132; = p0872*p0001*p0003/(p0818*p0002)
- p4716: 1.24472e-6; = p1955*p3481
- p0951: 0; = if(and(p0683=0;or(p0807=480;p0807=32;p0807=1;and(p0807=60;p0901<0.03)));p0939;0)
- p0572: 0; = IF(p0308<0.5;-SQRT(p0007*EXP(p0440^2*p0008)-p0007);SQRT(p0007*EXP(p0440^2*p0008)-p0007))
- p0921: 0.273684; = p0679*1000/p0801
- p4734: 0; = p1767*p3482
- p3200: 0; = p2419*p1082
- p2662: 3.27683e-5; = p2271*(p1078+p1080)
- p1035: 0; = IF(p1012=0;p1029*p0001/(p0818*p0002);0)
- p1282: 0; = IF(p1277+p1280+p1281=p1260;0;p1260-(p1277+p1280+p1281))
- p3130: 0; = p2349*p1082
- p0752: 0
- p1011: 0; = p1010*p0001*p0004/(p0818*p0002)
- p1884: 0
- p0484: 0; = SQRT(2)*(IF((2*p0352-1)<0;-1;IF((2*p0352-1)>0;1;0))*SQRT(SQRT((2/(pi()*0.140012289)+LN(1-(2*p0352-1)^2)/2)^2-LN(1-(2*p0352-1)^2)/0.140012289)-(2/(pi()*0.140012289)+LN(1-(2*p0352-1)^2)/2)))
- p3027: 0; = p2246*p1023
- p0993: 0; = p0989*p0001*p0004/(p0818*p0002)
- p2745: 0; = p2354*(p1019+p1021)
- p1671: 0
- p1941: 0
- p2855: 0.000113602; = p2269*(p1079+p1081)
- p2931: 3.48235e-7; = p2345*(p1079+p1081)
- p2047: 4.16719e-14; = p2015*p2045/(p0818*1000000000000)
- p0699: 0
- p0010: 8561.25
- p1456: 370
- p2816: 0; = p2425*(p1078+p1080)
- p1193: 0; = IF(OR(p1036=0;p1095=0);0.0001*p0857;0)
- p3012: 0; = p2426*(p1079+p1081)
- p0842: -0.109306
- p0974: 0.5
- p1133: 95069.3; = if(p1121=0;p1123*(p0716/100)*p0703*1000;0)
- p2997: 0; = p2411*(p1020+p1022)
- p2638: 6.19248e-6; = p2247*(p1019+p1021)
- p2928: 7.27904e-7; = p2342*(p1079+p1081)
- p5128: 0; = p1955*p3483
- p3600: 1.93319e-7; = p1869*p3476
- p2420: 0; = p2235*p2210
- p1813: 0
- p1823: 0
- p0648: 0; = IF(p0384<0.5;-SQRT(p0007*EXP(p0516^2*p0008)-p0007);SQRT(p0007*EXP(p0516^2*p0008)-p0007))
- p0835: 545.462; = -LN(1-p0669/100)/p0834
- p2434: 6.75109e-6; = p2238*p1014
- p4720: 2.51888e-6; = p1963*p3481
- p4292: 3.79234e-8; = p1943*p3479
- p3326: 0; = if(and(p1232=0;p3255<>0);p3268*p3289;0)
- p3316: 0; = if(and(p1232=0;p3253<>0);1-(p3312+p3313+p3314+p3315);0)
- p0342: 0.5
- p1094: 0; = IF(p1071=0;p1088*p0001/(p0818*p0002);0)
- p0128: 35.994
- p1068: 0.000778145; = IF(p1012=0;p1054/(p1061*p0818);0)
- p2020: 898299; = p2015*p2018*p2019
- p2756: 0; = p2365*(p1019+p1021)
- p0812: 0; = if(p0807=480;0.095/0.34;0)
- p0120: 4.773
- p2366: 0; = p2225*p2195
- p0687: 0
- p3474: 0; = p3379*p1241
- p2615: 0; = p2419*p1073
- p1667: 0
- p3015: 0; = p2429*(p1129+p1131)
- p1755: 0
- p2060: 0.272353
- p4927: 0; = p1754*p3483
- p1093: 0; = IF(p1071=0;p1087*p0001/(p0818*p0002);0)
- p3339: 0; = if(and(p1232=0;p3254<>0);p3254*(p3269*p3277-p3334)/p3338;0)
- p1779: 0
- p3204: 0; = p2423*p1082
- p2715: 0; = p2324*(p1019+p1021)
- p3002: 0; = p2416*(p1079+p1081)
- p2359: 0; = p2225*p2187
- p1870: 0
- p2379: 0; = p2229*p2208
- p1929: 0
- p0992: 0; = p0988*p0001*p0004/(p0818*p0002)
- p0900: 1.14331; = p0899/p0818
- p1742: 0
- p1435: 5
- p2578: 0; = p2382*p1073
- p3248: 0
- p1665: 0.575
- p2599: 0; = p2403*p1014
- p0148: 0
- p1762: 0
- p3185: 0; = p2404*p1023
- p3048: 0; = p2267*p1082
- p0712: 35.235; = p0052*(1+p0580*p0184/100)
- p1702: 0
- p2831: 4.23612e-6; = p2245*(p1020+p1022)
- p3386: 0; = p3367*p1234
- p2911: 0; = p2325*(p1020+p1022)
- p1240: 0; = if(p1232>0;0;IF(p1234+p1238+p1239=1;0;IF(p1234+p1238+p1239+p1237>1;1-(p1234+p1238+p1239);p1237)))
- p1554: 0
- p2302: 2.69087e-5; = p2227*p2209
- p2509: 6.06436e-6; = p2313*p1123
- p0776: 24.355; = p0116*(1+p0644*p0248/100)
- p1986: 4200
- p0866: 0.00214316; = IF(p0858+p0864+p0865=1;0;IF(p0858+p0864+p0865+p0861>1;1-(p0858+p0864+p0865);p0861))
- p3088: 0; = p2307*p1082
- p1146: 0.929457
- p0141: 84.1811
- p2173: 0.124066; = p0895*p0898/p0818
- p0881: 0.0202793; = p0880*p0001*p0003/(p0818*p0002)
- p1821: 0
- p3484: 0.0267683; = IF(p1344=0;0;p1344/(p1328+p1330+p1332+p1334+p1336+p1338+p1340+p1342+p1344))
- p1615: 0
- p2093: 0.260958
- p1145: 9.94274e7; = if(p1121=0;p0799*p0702*1000*p0800/100;0)
- p1188: 2832.84; = p1187*p0801
- p1455: 27
- p3257: 0
- p2925: 2.48347e-5; = p2339*(p1079+p1081)
- p3013: 0; = p2427*(p1079+p1081)
- p2408: 0; = p2234*p2198
- p3282: 0
- p0535: 0; = SQRT(2)*(IF((2*p0403-1)<0;-1;IF((2*p0403-1)>0;1;0))*SQRT(SQRT((2/(pi()*0.140012289)+LN(1-(2*p0403-1)^2)/2)^2-LN(1-(2*p0403-1)^2)/0.140012289)-(2/(pi()*0.140012289)+LN(1-(2*p0403-1)^2)/2)))
- p3174: 0; = p2393*p1023
- p0419: 0; = SQRT(2)*(IF((2*p0287-1)<0;-1;IF((2*p0287-1)>0;1;0))*SQRT(SQRT((2/(pi()*0.140012289)+LN(1-(2*p0287-1)^2)/2)^2-LN(1-(2*p0287-1)^2)/0.140012289)-(2/(pi()*0.140012289)+LN(1-(2*p0287-1)^2)/2)))
- p2264: 3.28307e-5; = p2226*p2210
- p4204: 9.02577e-6; = p1855*p3479
- p1976: 0.172
- p0453: 0; = SQRT(2)*(IF((2*p0321-1)<0;-1;IF((2*p0321-1)>0;1;0))*SQRT(SQRT((2/(pi()*0.140012289)+LN(1-(2*p0321-1)^2)/2)^2-LN(1-(2*p0321-1)^2)/0.140012289)-(2/(pi()*0.140012289)+LN(1-(2*p0321-1)^2)/2)))
- p2949: 0; = p2363*(p1020+p1022)
- p0844: 0.389489
- p1073: 0.08701; = IF(p1071=0;p0711/100;0)
- p0023: 66.685
- p1800: 0
- p1688: 0
- p1942: 0
- p2504: 6.23924e-6; = p2308*p1073
- p2425: 0; = p2235*p2215
- p0690: 0
- p0796: 7.937; = p0136*(1+p0664*p0268/100)
- p3273: 0
- p0893: 0; = 1000*(p0890+p0892)*p0001*p0003*p0004/(p0818*p0002)
- p1653: 0
- p0211: 13.302
- p2209: 0.000105954; = 14.0067*p2208/30.973762
- p2084: 0.21
- p0210: 0
- p1278: 0
- p2536: 5.78585e-7; = p2340*p1073
- p2386: 0; = p2229*p2215
- p3026: 0; = p2245*p1023
- p2889: 6.51368e-6; = p2303*(p1079+p1081)
- p2644: 2.19303e-7; = p2253*(p1019+p1021)
- p2995: 0; = p2409*(p1020+p1022)
- p1917: 0
- p2495: 4.15399e-6; = p2299*p1073
- p3478: 0.6372; = if(p1328+p1330+p1332+p1334+p1336+p1338+p1340+p1342+p1344=0;0;p1332/(p1328+p1330+p1332+p1334+p1336+p1338+p1340+p1342+p1344))
- p0751: 0.869; = p0091*(1+p0619*p0223/100)
- p1853: 0
- p2592: 0; = p2396*p1014
- p2496: 3.44903e-5; = p2300*p1073
- p0990: 0; = p0986*p0886
- p1727: 0
- p1005: 0; = p1001*p0888
- p1939: 0
- p3034: 0; = p2253*p1023
- p3433: 0; = p3376*p1239
- p2682: 1.19438e-7; = p2291*(p1019+p1021)
- p1110: 5.84533e6; = IF(p1071=0;p1105*p1104*p1095;0)
- p0480: 0; = SQRT(2)*(IF((2*p0348-1)<0;-1;IF((2*p0348-1)>0;1;0))*SQRT(SQRT((2/(pi()*0.140012289)+LN(1-(2*p0348-1)^2)/2)^2-LN(1-(2*p0348-1)^2)/0.140012289)-(2/(pi()*0.140012289)+LN(1-(2*p0348-1)^2)/2)))
- p3113: 0; = p2332*p1023
- p1535: 4
- p0671: 405.833; = p0011*(1+p0539*p0143/100)
- p1270: 0; = IF(p1267=p1259;0;IF(p1267+p1268>p1259;p1259-p1267;p1268))
- p1215: 0.0183471; = IF(p1214=0;0;(p1214-1.5)/(p1214-1)^2)
- p4252: 3.30502e-5; = p1903*p3479
- p2321: 0; = p2224*p2188
- p0547: 0; = IF(p0283<0.5;-SQRT(p0007*EXP(p0415^2*p0008)-p0007);SQRT(p0007*EXP(p0415^2*p0008)-p0007))
- p0639: 0; = IF(p0375<0.5;-SQRT(p0007*EXP(p0507^2*p0008)-p0007);SQRT(p0007*EXP(p0507^2*p0008)-p0007))
- p2983: 0; = p2397*(p1020+p1022)
- p1014: 0.21078; = IF(p1012=0;p0705/100;0)
- p1029: 0; = IF(p1012=0;IF(p0801<p1023*(p0704/100)*p0703*1000;p0801;p1023*(p0704/100)*p0703*1000);0)
- p3353: 0; = if(and(p1232=0;p3256<>0);p3256*(p3276-p3348)/p3349;0)
- p2558: 0; = p2362*p1014
- p2505: 3.19509e-7; = p2309*p1073
- p1783: 0
- p3324: 0; = if(and(p1232=0;p3255<>0);p3266*(p3279*(p3284*p1256+p3286*(p1253+p1257)+p1258*p3288+p3299*p3287));0)
- p1729: 0
- p3052: 0; = p2271*p1082
- p2772: 0; = p2381*(p1078+p1080)
- p0779: 30.15; = p0119*(1+p0647*p0251/100)
- p0517: 0; = SQRT(2)*(IF((2*p0385-1)<0;-1;IF((2*p0385-1)>0;1;0))*SQRT(SQRT((2/(pi()*0.140012289)+LN(1-(2*p0385-1)^2)/2)^2-LN(1-(2*p0385-1)^2)/0.140012289)-(2/(pi()*0.140012289)+LN(1-(2*p0385-1)^2)/2)))
- p4719: 0; = p1962*p3481
- p0482: 0; = SQRT(2)*(IF((2*p0350-1)<0;-1;IF((2*p0350-1)>0;1;0))*SQRT(SQRT((2/(pi()*0.140012289)+LN(1-(2*p0350-1)^2)/2)^2-LN(1-(2*p0350-1)^2)/0.140012289)-(2/(pi()*0.140012289)+LN(1-(2*p0350-1)^2)/2)))
- p3283: 0
- p0610: 0; = IF(p0346<0.5;-SQRT(p0007*EXP(p0478^2*p0008)-p0007);SQRT(p0007*EXP(p0478^2*p0008)-p0007))
- p3065: 0; = p2284*p1023
- p2547: 6.87995e-6; = p2351*p1123
- p1249: 0; = if(p1232>0;0;p1244*p0001/(p0818*p0002))
- p4444: 0; = p1889*p3480
- p2971: 0; = p2385*(p1079+p1081)
- p3473: 0; = p3378*p1241
- p2637: 7.65198e-7; = p2246*(p1019+p1021)
- p0502: 0; = SQRT(2)*(IF((2*p0370-1)<0;-1;IF((2*p0370-1)>0;1;0))*SQRT(SQRT((2/(pi()*0.140012289)+LN(1-(2*p0370-1)^2)/2)^2-LN(1-(2*p0370-1)^2)/0.140012289)-(2/(pi()*0.140012289)+LN(1-(2*p0370-1)^2)/2)))
- p2810: 0; = p2419*(p1078+p1080)
- p2996: 0; = p2410*(p1020+p1022)
- p1590: 0
- p0607: 0; = IF(p0343<0.5;-SQRT(p0007*EXP(p0475^2*p0008)-p0007);SQRT(p0007*EXP(p0475^2*p0008)-p0007))
- p0525: 0; = SQRT(2)*(IF((2*p0393-1)<0;-1;IF((2*p0393-1)>0;1;0))*SQRT(SQRT((2/(pi()*0.140012289)+LN(1-(2*p0393-1)^2)/2)^2-LN(1-(2*p0393-1)^2)/0.140012289)-(2/(pi()*0.140012289)+LN(1-(2*p0393-1)^2)/2)))
- p1139: 3.39983e-6; = if(p1121=0;p1133*p0001/(p0818*p0002);0)
- p0876: 20360; = p0866*p0856
- p3221: 0.146975; = IF(p3216=0;0;p1223*12.0107/100.0869+(1-p1224)*12.0107/84.3139)
- p2723: 0; = p2332*(p1019+p1021)
- p0785: 35.975; = p0125*(1+p0653*p0257/100)
- p3152: 0; = p2371*p1023
- p1299: 0
- p1183: 0.000339735; = p0801*p0001/(p0818*p0002)
- p0872: 405833; = p0864*p0856
- p3104: 0; = p2323*p1023
- p1107: 1.86662e6; = IF(p1071=0;p1105*p1101*p1095;0)
- p2299: 4.77415e-5; = p2227*p2206
- p1987: 400
- p2191: 5.09657e-6; = 8*1.00794*p2189/(2*14.0067)
- p0404: 0.5
- p1938: 0
- p2293: 7.79498e-5; = p2223*p2200
- p3261: 0
- p0651: 0; = IF(p0387<0.5;-SQRT(p0007*EXP(p0519^2*p0008)-p0007);SQRT(p0007*EXP(p0519^2*p0008)-p0007))
- p0850: 0
- p2571: 0; = p2375*p1073
- p1772: 0
- p2229: 0; = if(p0774*p0778+p0775*p0779+p0776*p0780+p0777*p0781=0;0;p0781*p0777/(p0774*p0778+p0775*p0779+p0776*p0780+p0777*p0781))
- p0501: 0; = SQRT(2)*(IF((2*p0369-1)<0;-1;IF((2*p0369-1)>0;1;0))*SQRT(SQRT((2/(pi()*0.140012289)+LN(1-(2*p0369-1)^2)/2)^2-LN(1-(2*p0369-1)^2)/0.140012289)-(2/(pi()*0.140012289)+LN(1-(2*p0369-1)^2)/2)))
- p1592: 0
- p1921: 0
- p2981: 0; = p2395*(p1020+p1022)
- p2598: 0; = p2402*p1014
- p2596: 0; = p2400*p1014
- p1482: 104
- p2430: 0; = p2236*p2220
- p1098: 0.0149443
- p0649: 0; = IF(p0385<0.5;-SQRT(p0007*EXP(p0517^2*p0008)-p0007);SQRT(p0007*EXP(p0517^2*p0008)-p0007))
- p2300: 0.000396394; = p2227*p2207
- p2710: 0; = p2319*(p1019+p1021)
- p3255: 0; = p1252*(p1297*(1-p3247)+p1300*(1-p3248)+p1301*(1-p3249)+p1302*(1-p3250))
- p0394: 0.5
- p2149: 5.11454e-8; = p2015*p2077*p2111/(p0818*1000)
- p2641: 7.42682e-5; = p2250*(p1019+p1021)
- p0836: 5.98888e8; = p0831*p0835*p0801/(1-p0831)
- p1137: 0; = if(p1121=0;p1131*(p0716/100)*p0703*1000;0)
- p2818: 0; = p2427*(p1078+p1080)
- p3190: 0; = p2409*p1023
- p3367: 0; = if(p1232=0;p3244*p3361/p0818;0)
- p3118: 0; = p2337*p1082
- p0245: 9.449
- p2808: 0; = p2417*(p1078+p1080)
- p0778: 51.34; = p0118*(1+p0646*p0250/100)
- p0013: 20.36
- p4895: 0; = p1928*p3482
- p3365: 0; = if(p1232=0;p3244*p3359/p0818;0)
- p2117: 0.585147
- p1017: 0; = IF(p1012=0;p0708/100;0)
- p1368: 416
- p3056: 1.12482e-6; = p2275*p1132
- p1196: 0.59
- p1331: 6.98669e-6; = p1330*p0001/(p0818*p0002)
- p3713: 1.27898e-7; = p1776*p3477
- p2935: 2.06193e-6; = p2349*(p1079+p1081)
- p0700: 0
- p2437: 5.41584e-6; = p2241*p1014
- p1297: 0
- p2688: 5.74364e-5; = p2297*(p1078+p1080)
- p2685: 1.10256e-5; = p2294*(p1019+p1021)
- p2777: 0; = p2386*(p1078+p1080)
- p1118: 0.000144047; = IF(p1071=0;p1108/(p1113*p0818);0)
- p0982: 0; = if(p0886=0;0;min(1;(p0691*p0690*1000*p0693/100)/p0886))
- p2834: 4.87939e-5; = p2248*(p1020+p1022)
- p3940: 3.6013e-6; = p1797*p3478
- p1052: 1.40859e6; = IF(p1012=0;p1045*p1036;0)
- p3216: 0.06; = IF(OR(p1226=0;p1228=0);0;1-p3213-p3214-p3215)
- p0320: 0.5
- p0587: 0; = IF(p0323<0.5;-SQRT(p0007*EXP(p0455^2*p0008)-p0007);SQRT(p0007*EXP(p0455^2*p0008)-p0007))
- p0140: 13.833
- p2689: 5.19468e-5; = p2298*(p1078+p1080)
- p0716: 13.833; = p0056*(1+p0584*p0188/100)
- p0760: 0
- p2690: 1.68217e-5; = p2299*(p1078+p1080)
- p2016: 0.000160539; = (p2014-p2015)/(p0818)
- p2962: 0; = p2376*(p1079+p1081)
- p0718: 35.758; = p0058*(1+p0586*p0190/100)
- p0996: 0; = if(p0888=0;0;if((p0691*p0690*1000*p0692/100)/p0888>1;1;(p0691*p0690*1000*p0692/100)/p0888))
- p2102: 0.922577
- p0056: 13.833
- p0385: 0.5
- p4910: 0; = p1943*p3482
- p1910: 0
- p2007: 0.00541391; = ((p1981*p1985+p1987*p1991+p1993*p1997+p2001*p2005)/p0818)*p0005*p0002/1000
- p2787: 0; = p2396*(p1019+p1021)
- p1964: 0.5
- p0715: 0
- p0081: 1.073
- p3281: 0
- p1902: 0
- p1723: 0
- p3267: 0
- p2351: 9.50533e-5; = p2232*p2219
- p1328: 2.11802e6; = p1319*p0801
- p1801: 0
- p1874: 0
- p2959: 0; = p2373*(p1020+p1022)
- p0857: 3.39735; = p0856*p0001*p0003/(p0818*p0002)
- p0369: 0.5
- p3483: 0; = if(p1328+p1330+p1332+p1334+p1336+p1338+p1340+p1342+p1344=0;0;p1342/(p1328+p1330+p1332+p1334+p1336+p1338+p1340+p1342+p1344))
- p0787: 48.675; = p0127*(1+p0655*p0259/100)
- p0176: 8.795
- p1952: 0
- p1271: 0; = IF(p1267+p1270=p1259;0;IF(p1267+p1270+p1269>p1259;p1259-(p1267+p1270);p1269))
- p1178: 1.53335e-7; = p1176/p0818
- p2709: 0; = p2318*(p1019+p1021)
- p1979: 6.33192e8; = p0973
- p1609: 0
- p1028: 0; = IF(p1012=0;p1022*(p0704/100)*p0703*1000;0)
- p1319: 0.222949; = IF(((p0745*1000*p0746/100)+(p0754*1000*p0755/100))/p0801<0;0;((p0745*1000*p0746/100)+(p0754*1000*p0755/100))/p0801)
- p1845: 0
- p0727: 0
- p0112: 28.794
- p1676: 0
- p3998: 2.43152e-5; = p1855*p3478
- p1937: 0
- p1050: 7.99897e6; = IF(p1012=0;p1037*p1036;0)
- p3149: 0; = p2368*p1023
- p1965: 0.000491195; = p1963+p1959*p1964*1000/p0818
- p4398: 0; = p1843*p3480
- p2883: 9.13896e-5; = p2297*(p1079+p1081)
- p0361: 0.5
- p1834: 0
- p2122: 0.341195
- p1202: 0.7
- p2143: 1.86297e-7; = p2015*p2071*p2105/(p0818*1000)
- p0273: 0.5
- p2395: 0; = p2234*p2184
- p2705: 5.20624e-5; = p2314*(p1128+p1130)
- p0214: 0.248
- p2295: 4.80973e-6; = p2223*p2202
- p0552: 0; = IF(p0288<0.5;-SQRT(p0007*EXP(p0420^2*p0008)-p0007);SQRT(p0007*EXP(p0420^2*p0008)-p0007))
- p2372: 0; = p2225*p2201
- p1230: 0.5
- p0906: 0.00672763
- p3135: 0; = p2354*p1023
- p2731: 2.343e-6; = p2340*(p1078+p1080)
- p0831: 0.1036; = 1-p0824
- p2748: 0; = p2357*(p1019+p1021)
- p2097: 0.40001
- p3417: 0; = p3379*p1238
- p2912: 0; = p2326*(p1020+p1022)
- p3442: 0; = p3366*p1240
- p2791: 0; = p2400*(p1019+p1021)
- p3485: 1.67988e-6; = p1754*p3476
- p0764: 7.937; = p0104*(1+p0632*p0236/100)
- p3880: 1.22979e-9; = p1943*p3477
- p3186: 0; = p2405*p1023
- p2774: 0; = p2383*(p1078+p1080)
- p0259: 10.302
- p0476: 0; = SQRT(2)*(IF((2*p0344-1)<0;-1;IF((2*p0344-1)>0;1;0))*SQRT(SQRT((2/(pi()*0.140012289)+LN(1-(2*p0344-1)^2)/2)^2-LN(1-(2*p0344-1)^2)/0.140012289)-(2/(pi()*0.140012289)+LN(1-(2*p0344-1)^2)/2)))
- p1963k: 0.000113469; = p1744*p1948+p1745*p1949+p1746*p1950+p1747*p1951+p1748*p1952+p1749*p1953+p1750*p1954+p1751*p1955+p1752*p1956+p1753*p1957+p1961*p1962
- p2759: 0; = p2368*(p1019+p1021)
- p1875: 0
- p2038: 0.304457
- p2964: 0; = p2378*(p1079+p1081)
- p3251: 0; = p1252-(p3252+p3253+p3254+p3255+p3256)
- p1111: 0.0872841
- p1599: 0
- p2401: 0; = p2234*p2190
- p3207: 0; = p2426*p1082
- p3156: 0; = p2375*p1082
- p2618: 0; = p2422*p1073
- p1725: 0
- p0443: 0; = SQRT(2)*(IF((2*p0311-1)<0;-1;IF((2*p0311-1)>0;1;0))*SQRT(SQRT((2/(pi()*0.140012289)+LN(1-(2*p0311-1)^2)/2)^2-LN(1-(2*p0311-1)^2)/0.140012289)-(2/(pi()*0.140012289)+LN(1-(2*p0311-1)^2)/2)))
- p2707: 0; = p2316*(p1019+p1021)
- p2539: 1.47937e-6; = p2343*p1073
- p1954: 0
- p0790: 11.763; = p0130*(1+p0658*p0262/100)
- p2942: 0; = p2356*(p1020+p1022)
- p2418: 0; = p2235*p2208
- p2952: 0; = p2366*(p1020+p1022)
- p2703: 0.000556276; = p2312*(p1128+p1130)
- p1713: 0
- p2323: 0; = p2224*p2190
- p1633: 0
- p2617: 0; = p2421*p1073
- p2074: 0.025
- p2368: 0; = p2225*p2197
- p3284: 0
- p1803: 0
- p3155: 0; = p2374*p1023
- p4418: 0; = p1863*p3480
- p1810: 0
- p0830: 3.57249e10; = p0825*p0821*p0824
- p1708: 0
- p1584: 0
- p0704: 7.937; = p0044*(1+p0572*p0176/100)
- p0728: 0
- p2640: 7.5132e-6; = p2249*(p1019+p1021)
- p2559: 0; = p2363*p1014
- p2849: 4.26299e-5; = p2263*(p1079+p1081)
- p2311: 0.00110393; = p2231*p2218
- p1841: 0
- p3349: 0; = if(and(p1232=0;p3256<>0);1-(p3345+p3346+p3347+p3348);0)
- p2764: 0; = p2373*(p1019+p1021)
- p5028: 0; = p1855*p3483
- p2163: 0.000491231; = (p2017-p2020)/p0818-(p2025+p2028+p2033+p2034+p2051+p2125+p2126+p2127+p2128+p2129+p2130+p2131+p2132+p2133+p2134+p2135+p2136+p2137+p2138+p2139+p2140+p2141+p2142+p2143+p2144+p2145+p2146+p2147+p2148+p2149+p2150+p2151+p2152+p2153+p2154+p2155+p2156+p2157)
- p1958: 10566
- p1775: 0
- p1744: 0
- p2683: 2.62597e-7; = p2292*(p1019+p1021)
- p1734: 0
- p1130: 0; = if(p1121=0;IF(p1123+p1128+p1129=1;0;IF(p1123+p1128+p1129+p1126>1;1-(p1123+p1128+p1129);p1126));0)
- p1219: 0; = if(p1218=0;0;SQRT(2)*(IF((2*p1218-1)<0;-1;IF((2*p1218-1)>0;1;0))*SQRT(SQRT((2/(pi()*0.140012289)+LN(1-(2*p1218-1)^2)/2)^2-LN(1-(2*p1218-1)^2)/0.140012289)-(2/(pi()*0.140012289)+LN(1-(2*p1218-1)^2)/2))))
- p4810: 0; = p1843*p3482
- p0895: 6.78773e9; = p0894*p0830
- p0403: 0.5
- p0923: 0.391761; = IF(p0918=1;0;IF(p0918+p0919>1;1-p0918;p0919))
- p3317: 0; = if(and(p1232=0;p3253<>0);p3253*(p3261*p3277-p3312)/p3316;0)
- p2071: 0.151
- p1212: 0.0814996; = if(p1211=0;0;if(p1193>0;0;(p1207+p1208+p1209)*p1210/(2000*p1211)))
- p1706: 0
- p0512: 0; = SQRT(2)*(IF((2*p0380-1)<0;-1;IF((2*p0380-1)>0;1;0))*SQRT(SQRT((2/(pi()*0.140012289)+LN(1-(2*p0380-1)^2)/2)^2-LN(1-(2*p0380-1)^2)/0.140012289)-(2/(pi()*0.140012289)+LN(1-(2*p0380-1)^2)/2)))
- p1447: 952
- p3016: 0; = p2430*(p1129+p1131)
- p1274: 0; = p1270*p1252/p0818
- p3426: 0; = p3369*p1239
- p3919: 1.06251e-5; = p1776*p3478
- p1913: 0
- p1660: 0.731714
- p2231: 0.358994; = if(p0783*p0787+p0784*p0788+p0785*p0789+p0786*p0790=0;0;p0788*p0784/(p0783*p0787+p0784*p0788+p0785*p0789+p0786*p0790))
- p0059: 56.556
- p0087: 0.768
- p2878: 3.65576e-7; = p2292*(p1020+p1022)
- p1147: 0.070543
- p3354: 0; = IF((p3350+p3351+p3352+p3353)+IF(p3349=0;0;(p3256*(p3273*(1-p3277))/p3349))>p3256;p3256-(p3350+p3351+p3352+p3353);IF(p3349=0;0;p3256*(p3273*(1-p3277))/p3349))
- p0551: 0; = IF(p0287<0.5;-SQRT(p0007*EXP(p0419^2*p0008)-p0007);SQRT(p0007*EXP(p0419^2*p0008)-p0007))
- p1657: 0
- p0861: 0.00214316; = p0673*1000/p0856
- p1661: 0
- p3378: 0; = if(p1232=0;p3246*p3360/p0818;0)
- p2872: 1.03228e-5; = p2286*(p1020+p1022)
- p1796: 0
- p1072: 0; = p1071*p0001/(p0818*p0002)
- p3022: 0; = p2241*p1023
- p2003: 50
- p0756: 0
- p2362: 0; = p2225*p2190
- p1101: 0.0773317; = IF(p1071=0;IF(p1096=1;0;IF(p1096+p1097>1;1-p1096;p1097));0)
- p2576: 0; = p2380*p1073
- p2402: 0; = p2234*p2191
- p2116: 0.444424
- p0287: 0.5
- p0875: 0; = p0874*p0001*p0003/(p0818*p0002)
- p1192: 5.6775e-8; = p1188*p1191/p0818
- p1787: 0
- p1058: 0.225
- p3223: 0.126838; = IF(p3216=0;0;(1-p1223)*24.3050/84.3139)
- p0314: 0.5
- p2265: 0.000429931; = p2226*p2211
- p0619: 0; = IF(p0355<0.5;-SQRT(p0007*EXP(p0487^2*p0008)-p0007);SQRT(p0007*EXP(p0487^2*p0008)-p0007))
- p3262: 0
- p0442: 0; = SQRT(2)*(IF((2*p0310-1)<0;-1;IF((2*p0310-1)>0;1;0))*SQRT(SQRT((2/(pi()*0.140012289)+LN(1-(2*p0310-1)^2)/2)^2-LN(1-(2*p0310-1)^2)/0.140012289)-(2/(pi()*0.140012289)+LN(1-(2*p0310-1)^2)/2)))
- p1581: 0
- p3000: 0; = p2414*(p1079+p1081)
- p2367: 0; = p2225*p2196
- p0519: 0; = SQRT(2)*(IF((2*p0387-1)<0;-1;IF((2*p0387-1)>0;1;0))*SQRT(SQRT((2/(pi()*0.140012289)+LN(1-(2*p0387-1)^2)/2)^2-LN(1-(2*p0387-1)^2)/0.140012289)-(2/(pi()*0.140012289)+LN(1-(2*p0387-1)^2)/2)))
- p3189: 0; = p2408*p1023
- p0487: 0; = SQRT(2)*(IF((2*p0355-1)<0;-1;IF((2*p0355-1)>0;1;0))*SQRT(SQRT((2/(pi()*0.140012289)+LN(1-(2*p0355-1)^2)/2)^2-LN(1-(2*p0355-1)^2)/0.140012289)-(2/(pi()*0.140012289)+LN(1-(2*p0355-1)^2)/2)))
- p1105: 0.436421
- p4721: 0; = p1754*p3482
- p1056: 3.56876e6; = IF(p1012=0;p1049*p1036;0)
- p2517: 0; = p2321*p1014
- p1314: 0; = p1310*p1252/p0818
- p2175: 0.00080889; = p0895*p0908/p0818
- p3865: 3.19746e-8; = p1928*p3477
- p2296: 5.51398e-5; = p2223*p2203
- p1308: 0
- p3425: 0; = p3368*p1239
- p4006: 6.89611e-7; = p1863*p3478
- p3440: 0; = p3364*p1240
- p2051: 3.39799e-5; = p2015*p2049*p2050/(p0818*1000)
- p1818: 0
- p1743: 0
- p0085: 25438.6
- p3125: 0; = p2344*p1082
- p1300: 0; = IF(p1297=p1265;0;IF(p1297+p1298>p1265;p1265-p1297;p1298))
- p0949: 0; = if(and(p0683=0;or(p0807=480;p0807=32;p0807=1;and(p0807=60;p0901<0.03)));p0937;0)
- p4419: 0; = p1864*p3480
- p2744: 3.18107e-6; = p2353*(p1128+p1130)
- p0218: 71.542
- p2922: 1.02128e-5; = p2336*(p1079+p1081)
- p3191: 0; = p2410*p1023
- p1993: 400
- p1728: 0
- p1737: 0
- p1916: 0
- p0668: 0; = IF(p0404<0.5;-SQRT(p0007*EXP(p0536^2*p0008)-p0007);SQRT(p0007*EXP(p0536^2*p0008)-p0007))
- p0152: 0
- p1204: 0.980791
- p2069: 0.190588
- p2765: 0; = p2374*(p1019+p1021)
- p2579: 0; = p2383*p1073
- p2557: 0; = p2361*p1014
- p2936: 3.81479e-5; = p2350*(p1129+p1131)
- p2993: 0; = p2407*(p1020+p1022)
- p1715: 0
- p3476: 0.0831539; = if(p1328+p1330+p1332+p1334+p1336+p1338+p1340+p1342+p1344=0;0;p1328/(p1328+p1330+p1332+p1334+p1336+p1338+p1340+p1342+p1344))
- p1988: 750
- p1774: 0
- p1977: 2832.84; = p1252+p1188
- p0793: 0
- p0373: 0.5
- p1334: 6.02463e6; = p1322*p0801
- p4822: 0; = p1855*p3482
- p2091: 0.374844
- p0125: 35.975
- p2630: 1.01316e-6; = p2239*(p1019+p1021)
- p0541: 0; = IF(p0277<0.5;-SQRT(p0007*EXP(p0409^2*p0008)-p0007);SQRT(p0007*EXP(p0409^2*p0008)-p0007))
- p3297: 0; = if(p1273+p1274+p1275+p1276=0;0;p1273/(p1273+p1274+p1275+p1276))
- p1999: 1.61319e9; = (p1228+p1229)*p0818+p1164
- p1994: 750
- p4892: 0; = p1925*p3482
- p1049: 0.183763; = IF(p1012=0;IF(p1037+p1044+p1045+p1046+p1047+p1048=1;0;1-(p1037+p1044+p1045+p1046+p1047+p1048));0)
- p0275: 0.5
- p1036: 1.94204e7; = IF(p1012=0;p0795*p0702*1000*p0796/100;0)
- p1764: 0
- p2891: 2.98005e-7; = p2305*(p1079+p1081)
- p1160: 0.00892433; = (p1156+p1158)*p1159
- p0001: 0.404686
- p2761: 0; = p2370*(p1019+p1021)
- p3412: 0; = p3374*p1238
- p0665: 0; = IF(p0401<0.5;-SQRT(p0007*EXP(p0533^2*p0008)-p0007);SQRT(p0007*EXP(p0533^2*p0008)-p0007))
- p3138: 0; = p2357*p1023
- p1520: 104
- p0930: 1.77349e6; = p0801*p0924
- p1213: 56
- p1123: 0.07238; = if(p1121=0;p0717/100;0)
- p2374: 0; = p2225*p2203
- p4102: 0.000184934; = p1963*p3478
- p1943: 1.60333e-7; = p1535*1000/p0818
- p2876: 1.01305e-7; = p2290*(p1020+p1022)
- p1048: 0.000519971; = IF(p1012=0;IF(p1037+p1044+p1045+p1046+p1047=1;0;IF(p1037+p1044+p1045+p1046+p1047+p1042>1;1-(p1037+p1044+p1045+p1046+p1047);p1042));0)
- p0539: 0; = IF(p0275<0.5;-SQRT(p0007*EXP(p0407^2*p0008)-p0007);SQRT(p0007*EXP(p0407^2*p0008)-p0007))
- p1951: 0
- p1675: 0
- p2241: 2.56943e-5; = p2222*p2186
- p1967: 0; = if(p0807=480;p0802*p0810;0)
- p2888: 1.50861e-5; = p2302*(p1079+p1081)
- p2166: 0.725357; = p2165*p0824
- p1006: 0; = p1002*p0001*p0004/(p0818*p0002)
- p1158: 0.00355086; = p1156*p1157
- p2018: 0.1978
- p1998: 277
- p0721: 0
- p2156: 3.16263e-8; = p2015*p2085*p2118/(p0818*1000)
- p0959: 0; = if(and(p0683>0;or(p0807=480;p0807=32;p0807=1;and(p0807=60;p0901<0.03)));p0935;0)
- p2635: 2.65837e-6; = p2244*(p1019+p1021)
- p0114: 57.255
- p0941: 0; = if(and(p0683=0;p0947=0);p0935;0)
- p2923: 9.2367e-6; = p2337*(p1079+p1081)
- p2762: 0; = p2371*(p1019+p1021)
- p0439: 0; = SQRT(2)*(IF((2*p0307-1)<0;-1;IF((2*p0307-1)>0;1;0))*SQRT(SQRT((2/(pi()*0.140012289)+LN(1-(2*p0307-1)^2)/2)^2-LN(1-(2*p0307-1)^2)/0.140012289)-(2/(pi()*0.140012289)+LN(1-(2*p0307-1)^2)/2)))
- p0878: 451096; = p0867*p0856
- p0411: 0; = SQRT(2)*(IF((2*p0279-1)<0;-1;IF((2*p0279-1)>0;1;0))*SQRT(SQRT((2/(pi()*0.140012289)+LN(1-(2*p0279-1)^2)/2)^2-LN(1-(2*p0279-1)^2)/0.140012289)-(2/(pi()*0.140012289)+LN(1-(2*p0279-1)^2)/2)))
- p3401: 0; = p3363*p1238
- p2750: 0; = p2359*(p1019+p1021)
- p2426: 0; = p2235*p2216
- p2262: 0.000168147; = p2226*p2208
- p0105: 15.31
- p0733: 0
- p0811: 0; = if(p0807=480;1-p0810;0)
- p0175: 0
- p0806: 4.158e8
- p2814: 0; = p2423*(p1078+p1080)
- p0579: 0; = IF(p0315<0.5;-SQRT(p0007*EXP(p0447^2*p0008)-p0007);SQRT(p0007*EXP(p0447^2*p0008)-p0007))
- p3359: 0; = if(p1232=0;p3309+p3320+p3331+p3342+p3353;0)
- p1306: 0; = p1302*p1252/p0818
- p2375: 0; = p2229*p2204
- p2659: 1.89195e-5; = p2268*(p1078+p1080)
- p0306: 0.5
- p0309: 0.5
- p1272: 0; = IF(p1267+p1270+p1271=p1259;0;p1259-(p1267+p1270+p1271))
- p2607: 0; = p2411*p1014
- p3246: 1; = IF(p3244+p3245=1;0;1-(p3244+p3245))
- p3128: 0; = p2347*p1082
- p0703: 9495.23; = p0043*(1+p0571*p0175/100)
- p1112: 0.209482
- p1168: 9.20044e-7; = p1164*p1167/p0818
- p1995: 50
- p0823: 0
- p2780: 0; = p2389*(p1128+p1130)
- p3522: 1.99985e-8; = p1791*p3476
- p2979: 0; = p2393*(p1020+p1022)
- p0986: 0; = IF(p0982+p0985=1;0;IF(p0982+p0985+p0984>1;1-(p0982+p0985);p0984))
- p2466: 9.02861e-7; = p2270*p1073
- p1572: 0.0125
- p0666: 0; = IF(p0402<0.5;-SQRT(p0007*EXP(p0534^2*p0008)-p0007);SQRT(p0007*EXP(p0534^2*p0008)-p0007))
- p3083: 0; = p2302*p1082
- p3069: 0; = p2288*p1023
- p0279: 0.5
- p2823: 6.70166e-5; = p2237*(p1020+p1022)
- p1434: 13
- p0046: 32.992
- p0754: 32.46; = p0094*(1+p0622*p0226/100)
- p0743: 0
- p2363: 0; = p2225*p2191
- p3062: 0; = p2281*p1023
- p0179: 5.956
- p2602: 0; = p2406*p1014
- p3586: 3.1731e-6; = p1855*p3476
- p4033: 2.65628e-6; = p1890*p3478
- p3018: 0; = p2237*p1023
- p3170: 0; = p2389*p1132
- p1963a: 2.50913e-5; = p1550*p1754+p1551*p1755+p1552*p1756+p1553*p1757+p1554*p1758+p1555*p1759+p1556*p1760+p1557*p1761+p1558*p1762+p1559*p1763+p1560*p1764+p1561*p1765+p1562*p1766+p1563*p1767+p1564*p1768+p1565*p1769+p1566*p1770+p1567*p1771+p1568*p1772
- p2424: 0; = p2235*p2214
- p2044: 6.18881e-8; = p2015*p2042*p2043/(p0818*1000)
- p3570: 1.3999e-7; = p1839*p3476
- p2887: 3.33606e-5; = p2301*(p1079+p1081)
- p1461: 58
- p1547: 3578
- p2306: 5.55828e-6; = p2227*p2213
- p2147: 8.26686e-8; = p2015*p2075*p2109/(p0818*1000)
- p2049: 25.6942
- p1102: 0.0149443; = IF(p1071=0;IF(p1096+p1101=1;0;IF(p1096+p1101+p1098>1;1-(p1096+p1101);p1098));0)
- p1203: 3
- p1135: 742849; = if(p1121=0;p1129*(p0716/100)*p0703*1000;0)
- p4762: 0; = p1795*p3482
- p0086: 8.326
- p3096: 0; = p2315*p1023
- p0226: 36.873
- p2344: 5.94002e-8; = p2228*p2212
- p3142: 0; = p2361*p1023
- p1211: 0.6
- p3089: 0; = p2308*p1082
- p3468: 0; = p3373*p1241
- p2722: 0; = p2331*(p1019+p1021)
- p3452: 0; = p3376*p1240
- p0094: 32.46
- p0868: 0.00596916; = IF(p0858+p0864+p0865+p0866+p0867=1;0;IF(p0858+p0864+p0865+p0866+p0867+p0863>1;1-(p0858+p0864+p0865+p0866+p0867);p0863))
- p2524: 0; = p2328*p1014
- p2370: 0; = p2225*p2199
- p0405: 0; = SQRT(2)*(IF((2*p0273-1)<0;-1;IF((2*p0273-1)>0;1;0))*SQRT(SQRT((2/(pi()*0.140012289)+LN(1-(2*p0273-1)^2)/2)^2-LN(1-(2*p0273-1)^2)/0.140012289)-(2/(pi()*0.140012289)+LN(1-(2*p0273-1)^2)/2)))
- p1562: 0
- p2151: 2.31239e-8; = p2015*p2079*p2113/(p0818*1000)
- p2755: 0; = p2364*(p1019+p1021)
- p2448: 6.37262e-8; = p2252*p1014
- p1030: 5.68078e-6; = IF(p1012=0;p1024*p0001/(p0818*p0002);0)
- p1837: 0
- p1031: 8.89175e-6; = IF(p1012=0;p1025*p0001/(p0818*p0002);0)
- p1034: 0; = IF(p1012=0;p1028*p0001/(p0818*p0002);0)
- p0345: 0.5
- p1201: 0.65
- p3303: 0; = if(and(p1232=0;p3252<>0);p3259*p3289;0)
- p3240: 5.31095e-9; = p3234*p1188*p3235/p0818
- p0874: 0; = p0865*p0856
- p2330: 0; = p2224*p2198
- p0521: 0; = SQRT(2)*(IF((2*p0389-1)<0;-1;IF((2*p0389-1)>0;1;0))*SQRT(SQRT((2/(pi()*0.140012289)+LN(1-(2*p0389-1)^2)/2)^2-LN(1-(2*p0389-1)^2)/0.140012289)-(2/(pi()*0.140012289)+LN(1-(2*p0389-1)^2)/2)))
- p2411: 0; = p2234*p2201
- p1649: 0
- p1091: 2.25497e-5; = IF(p1071=0;p1085*p0001/(p0818*p0002);0)
- p2950: 0; = p2364*(p1020+p1022)
- p5098: 0; = p1925*p3483
- p0149: 0
- p1070: 0.000314391; = IF(p1012=0;p1056/(p1063*p0818);0)
- p1892: 0
- p0894: 0.19
- p3410: 0; = p3372*p1238
- p2650: 0.00014679; = p2259*(p1078+p1080)
- p1788: 0
- p1899: 0
- p2315: 0; = p2224*p2182
- p2671: 1.01506e-5; = p2280*(p1019+p1021)
- p1856: 0
- p0748: 63.705; = p0088*(1+p0616*p0220/100)
- p2120: 0.51828
- p2014: 3.86595e7; = p0833*p2011*p2013
- p2423: 0; = p2235*p2213
- p1960: 0; = IF(p1959-p1958<0;0;p1959-p1958)
- p1695: 0
- p2588: 0; = p2392*p1123
- p1555: 0
- p2303: 1.16183e-5; = p2227*p2210
- p2958: 0; = p2372*(p1020+p1022)
- p0653: 0; = IF(p0389<0.5;-SQRT(p0007*EXP(p0521^2*p0008)-p0007);SQRT(p0007*EXP(p0521^2*p0008)-p0007))
- p2065: 0.0758824
- p0720: 0
- p2483: 2.68129e-5; = p2287*p1014
- p3278: 0
- p1961: 0
- p1596: 0
- p1285: 0; = p1281*p1252/p0818
- p3428: 0; = p3371*p1239
- p2290: 2.20564e-7; = p2223*p2197
- p0914: 7.22975e8; = p0825*p0911+(p0830+p0895)*p0824*p0913
- p3245: 0; = IF(p3244=1;0;if(p3244+p0792/100>1;1-p3244;p0792/100))
- p1218: 0.5
- p0697: 0
- p1256: 0; = if(p1232>0;0;IF(p1253=1;0;IF(p1253+p1254>1;1-p1253;p1254)))
- p0971: 0; = p0968/p0818
- p1883: 0
- p4098: 9.13862e-5; = p1955*p3478
- p0792: 0
- p4856: 0; = p1889*p3482
- p2146: 2.87044e-8; = p2015*p2074*p2108/(p0818*1000)
- p2436: 2.22956e-6; = p2240*p1014
- p4239: 9.86008e-7; = p1890*p3479
- p3978: 1.83896e-6; = p1835*p3478
- p2561: 0; = p2365*p1014
- p1126: 0; = if(p1121=0;p0720/100;0)
- p4140: 5.68851e-8; = p1791*p3479
- p0243: 23.633
- p1647: 0
- p0701: 0
- p3465: 0; = p3370*p1241
- p1550: 0.783979
- p0500: 0; = SQRT(2)*(IF((2*p0368-1)<0;-1;IF((2*p0368-1)>0;1;0))*SQRT(SQRT((2/(pi()*0.140012289)+LN(1-(2*p0368-1)^2)/2)^2-LN(1-(2*p0368-1)^2)/0.140012289)-(2/(pi()*0.140012289)+LN(1-(2*p0368-1)^2)/2)))
- p1989: 50
- p2261: 0.00112012; = p2226*p2207
- p1836: 0
- p2177: 0.1375; = p0895/p0818-(p2173+p2174+p2175+p2176)
- p4515: 1.75332e-7; = p1754*p3481
- p2832: 1.06527e-6; = p2246*(p1020+p1022)
- p0190: 8.188
- p1087: 0; = IF(p1071=0;p1081*(p0710/100)*p0703*1000;0)
- p2390: 0; = p2233*p2219
- p0981: 0.000339735; = p0978*p0001/(p0818*p0002)
- p0250: 7.102
- p2736: 2.18858e-7; = p2345*(p1078+p1080)
- p3008: 0; = p2422*(p1079+p1081)
- p2356: 0; = p2225*p2184
- p0348: 0.5
- p2549: 6.43901e-7; = p2353*p1123
- p0024: 4.886
- p2150: 1.39163e-7; = p2015*p2078*p2112/(p0818*1000)
- p1914: 0
- p1108: 360722; = IF(p1071=0;p1105*p1102*p1095;0)
- p2513: 0; = p2317*p1014
- p3139: 0; = p2358*p1023
- p2726: 0; = p2335*(p1019+p1021)
- p3213: 0.112803; = p1222*12.0107/100.0869
- p2399: 0; = p2234*p2188
- p2686: 1.58683e-6; = p2295*(p1019+p1021)
- p1604: 0
- p4968: 0; = p1795*p3483
- p1887: 0
- p2096: 0.486404
- p1060: 0.21
- p1840: 0
- p2206: 0.000187983; = 9*1.00794*p2204/30.973762
- p4101: 0; = p1962*p3478
- p0962: 0; = if(and(p0683>0;or(p0807=480;p0807=32;p0807=1;and(p0807=60;p0901<0.03)));p0938;0)
- p1911: 0
- p3071: 0; = p2290*p1023
- p3159: 0; = p2378*p1082
- p2126: 1.00982e-6; = p2015*p2054*p2088/(p0818*1000)
- p1933: 0
- p2612: 0; = p2416*p1073
- p1387: 54
- p1153: 0.365265
- p3007: 0; = p2421*(p1079+p1081)
- p2502: 4.83626e-7; = p2306*p1073
- p2494: 1.28278e-5; = p2298*p1073
- p1664: 0
- p3419: 0; = p3362*p1239
- p2704: 2.99599e-5; = p2313*(p1128+p1130)
- p0821: 1.77727
- p2169: 0.00215652; = p2166*(p0908)
- p2259: 0.000416603; = p2226*p2205
- p2528: 0; = p2332*p1014
- p0367: 0.5
- p2082: 0.285294
- p0961: 0; = if(and(p0683>0;or(p0807=480;p0807=32;p0807=1;and(p0807=60;p0901<0.03)));p0937;0)
- p3121: 0; = p2340*p1082
- p2573: 0; = p2377*p1073
- p4806: 0; = p1839*p3482
- p1088: 0; = IF(p1071=0;p1082*(p0710/100)*p0703*1000;0)
- p0277: 0.5
- p2031: 0.465411
- p1683: 0
- p3337: 0; = IF(or(p3254=0;p1232>0);0;p3272*p3289)
- p2353: 8.89612e-6; = p2232*p2221
- p3250: 0
- p5334: 3.83906e-6; = p1955*p3484
- p0388: 0.5
- p2475: 2.66971e-6; = p2279*p1014
- p2285: 2.77722e-6; = p2223*p2191
- p5282: 3.74035e-6; = p1903*p3484
- p0759: 0
- p0548: 0; = IF(p0284<0.5;-SQRT(p0007*EXP(p0416^2*p0008)-p0007);SQRT(p0007*EXP(p0416^2*p0008)-p0007))
- p2478: 1.19399e-5; = p2282*p1014
- p0907: 0
- p1828: 0
- p1684: 0
- p1825: 0
- p2269: 0.000202628; = p2226*p2215
- p2753: 0; = p2362*(p1019+p1021)
- p4498: 0; = p1943*p3480
- p1620: 0
- p4836: 0; = p1869*p3482
- p1344: 681817; = IF(p1318=0;p1327*p0801;0)
- p2398: 0; = p2234*p2187
- p1594: 0
- p2486: 4.64906e-8; = p2290*p1014
- p1681: 0
- p3109: 0; = p2328*p1023
- p3732: 1.66022e-8; = p1795*p3477
- p2741: 2.41193e-5; = p2350*(p1128+p1130)
- p4322: 0; = p1767*p3480
- p2026: 68.85
- p0899: 2.85232e10; = p0825*p0896+(p0830+p0895)*p0824*p0898
- p2405: 0; = p2234*p2195
- p0911: 0.0154167
- p3161: 0; = p2380*p1082
- p0644: 0; = IF(p0380<0.5;-SQRT(p0007*EXP(p0512^2*p0008)-p0007);SQRT(p0007*EXP(p0512^2*p0008)-p0007))
- p2252: 3.02335e-7; = p2222*p2198
- p0251: 43.788
- p1662: 0
- p2326: 0; = p2224*p2193
- p5016: 0; = p1843*p3483
- p2927: 1.68587e-6; = p2341*(p1079+p1081)
- p3352: 0; = if(and(p1232=0;p3256<>0);p3256*(p3275-p3347)/p3349;0)
- p1721: 0.5
- p3374: 0; = if(p1232=0;p3246*p3356/p0818;0)
- p1580: 0
- p0856: 9.5e6; = p0801
- p0269: 17.236
- p3265: 0
- p3145: 0; = p2364*p1023
- p0574: 0; = IF(p0310<0.5;-SQRT(p0007*EXP(p0442^2*p0008)-p0007);SQRT(p0007*EXP(p0442^2*p0008)-p0007))
- p1831: 0
- p3422: 0; = p3365*p1239
- p1644: 0
- p3053: 8.52852e-6; = p2272*p1132
- p0735: 0
- p1243: 0; = if(p1232>0;0;p1238*(p0725/100)*p0723*1000)
- p3444: 0; = p3368*p1240
- p1897: 0
- p2107: 0.881623
- p2907: 0; = p2321*(p1020+p1022)
- p0750: 0
- p2479: 2.03367e-6; = p2283*p1014
- p2801: 0; = p2410*(p1019+p1021)
- p1824: 0
- p3466: 0; = p3371*p1241
- p3450: 0; = p3374*p1240
- p1904: 0
- p2127: 3.10864e-6; = p2015*p2055*p2089/(p0818*1000)
- p0828: 0; = if(p0827=0;0;p0819-p0827/p0818)
- p0925: 0.273684; = IF(p0918+p0923+p0924=1;0;IF(p0918+p0923+p0924+p0921>1;1-(p0918+p0923+p0924);p0921))
- p2969: 0; = p2383*(p1079+p1081)
- p1925: 1.08225e-6; = p1517*1000/p0818
- p0837: 0.5
- p3225: 0.00127933; = p3221*p1229
- p2655: 1.15679e-5; = p2264*(p1078+p1080)
- p2550: 0; = p2354*p1014
- p0536: 0; = SQRT(2)*(IF((2*p0404-1)<0;-1;IF((2*p0404-1)>0;1;0))*SQRT(SQRT((2/(pi()*0.140012289)+LN(1-(2*p0404-1)^2)/2)^2-LN(1-(2*p0404-1)^2)/0.140012289)-(2/(pi()*0.140012289)+LN(1-(2*p0404-1)^2)/2)))
- p0976: 0; = IF(p0687=0;IF(OR(p0686=0;p0689=0);0;p0686*1000*p0689/100);0)
- p2702: 0.000394744; = p2311*(p1128+p1130)
- p0679: 2599.99; = p0019*(1+p0547*p0151/100)
- p0578: 0; = IF(p0314<0.5;-SQRT(p0007*EXP(p0446^2*p0008)-p0007);SQRT(p0007*EXP(p0446^2*p0008)-p0007))
- p1963h: 0.000108707; = p1686*p1890+p1687*p1891+p1688*p1892+p1689*p1893+p1690*p1894+p1691*p1895+p1692*p1896+p1693*p1897+p1694*p1898+p1695*p1899+p1696*p1900+p1697*p1901+p1698*p1902+p1699*p1903+p1700*p1904+p1701*p1905+p1702*p1906+p1703*p1907+p1704*p1908+p1705*p1909
- p0138: 11.845
- p2223: 0.54492; = if(p0765*p0769+p0766*p0770+p0767*p0771+p0768*p0772=0;0;p0770*p0766/(p0765*p0769+p0766*p0770+p0767*p0771+p0768*p0772))
- p3332: 0; = if(and(p1232=0;p3255<>0);IF((p3328+p3329+p3330+p3331)+(p3255*(p3265*(1-p3277))/p3327)>p3255;p3255-(p3328+p3329+p3330+p3331);p3255*(p3265*(1-p3277))/p3327);0)
- p3507: 1.38656e-6; = p1776*p3476
- p2833: 8.62089e-6; = p2247*(p1020+p1022)
- p1972: 0; = if(p0807=480;p1967*p0001/(p0818*p0002);0)
- p2929: 9.53219e-6; = p2343*(p1079+p1081)
- p3373: 0; = if(p1232=0;p3245*p3361/p0818;0)
- p2687: 1.81917e-5; = p2296*(p1019+p1021)
- p1806: 0
- p0393: 0.5
- p3198: 0; = p2417*p1082
- p2697: 1.95846e-6; = p2306*(p1078+p1080)
- p1691: 0
- p2946: 0; = p2360*(p1020+p1022)
- p2743: 1.83058e-6; = p2352*(p1128+p1130)
- p1199: -0.29
- p1601: 0
- p1627: 0
- p2236: 0; = 1-(p2230+p2231+p2232+p2233)
- p0454: 0; = SQRT(2)*(IF((2*p0322-1)<0;-1;IF((2*p0322-1)>0;1;0))*SQRT(SQRT((2/(pi()*0.140012289)+LN(1-(2*p0322-1)^2)/2)^2-LN(1-(2*p0322-1)^2)/0.140012289)-(2/(pi()*0.140012289)+LN(1-(2*p0322-1)^2)/2)))
- p4552: 2.08728e-9; = p1791*p3481
- p0115: 34.502
- p2404: 0; = p2234*p2193
- p0846: 0.394888; = p0841*p0845^3+p0842*p0845^2+p0843*p0845+p0844
- p2080: 0.025
- p0915: 0.0289793; = p0914/p0818
- p2822: 0; = p2431*(p1128+p1130)
- p4514: 0; = p1963*p3480
- p2203: 0.000101189; = p1070-p2200-p2201-p2202
- p0767: 0
- p2284: 1.10438e-5; = p2223*p2190
- p1198: 0.44
- p2040: 1.56
- p4125: 3.94403e-6; = p1776*p3479
- p2924: 2.99108e-6; = p2338*(p1079+p1081)
- p2966: 0; = p2380*(p1079+p1081)
- p2668: 1.26531e-5; = p2277*(p1019+p1021)
- p0803: 0
- p2593: 0; = p2397*p1014
- p3526: 1.79987e-7; = p1795*p3476
- p1763: 0
- p1238: 0; = if(p1232>0;0;IF(p1234=1;0;IF(p1234+p1235>1;1-p1234;p1235)))
- p0246: 5.107
- p2453: 9.70619e-6; = p2257*p1014
- p2076: 0.057
- p0352: 0.5
- p5008: 0; = p1835*p3483
- p0349: 0.5
- p2824: 1.4711e-5; = p2238*(p1020+p1022)
- p3309: 0; = if(and(p1232=0;p3252<>0);p3252*(p3260-p3304)/p3305;0)
- p2953: 0; = p2367*(p1020+p1022)
- p1321: 1.70844; = IF(((p0745*1000*p0748/100)+(p0754*1000*p0757/100))/p0801<0;0;((p0745*1000*p0748/100)+(p0754*1000*p0757/100))/p0801)
- p2977: 0; = p2391*(p1129+p1131)
- p1680: 0
- p0938: 4.64007e-6; = p0932*p0001/(p0818*p0002)
- p0516: 0; = SQRT(2)*(IF((2*p0384-1)<0;-1;IF((2*p0384-1)>0;1;0))*SQRT(SQRT((2/(pi()*0.140012289)+LN(1-(2*p0384-1)^2)/2)^2-LN(1-(2*p0384-1)^2)/0.140012289)-(2/(pi()*0.140012289)+LN(1-(2*p0384-1)^2)/2)))
- p1794: 0
- p2245: 9.22299e-6; = p2222*p2190
- p2347: 8.01328e-6; = p2228*p2215
- p3215: 0.450791; = p1222*3*15.9994/100.0869
- p4651: 3.61796e-8; = p1890*p3481
- p1605: 0
- p1827: 0
- p2672: 1.4609e-6; = p2281*(p1019+p1021)
- p0537: 0; = IF(p0273<0.5;-SQRT(p0007*EXP(p0405^2*p0008)-p0007);SQRT(p0007*EXP(p0405^2*p0008)-p0007))
- p3046: 0; = p2265*p1082
- p0103: 9495.23
- p2138: 1.07259e-7; = p2015*p2066*p2100/(p0818*1000)
- p0706: 32.992; = p0046*(1+p0574*p0178/100)
- p0865: 0; = IF(p0858+p0864=1;0;IF(p0858+p0864+p0860>1;1-(p0858+p0864);p0860))
- p3594: 8.99934e-8; = p1863*p3476
- p1693: 0
- p2546: 4.88214e-6; = p2350*p1123
- p3085: 0; = p2304*p1082
- p1826: 0
- p0932: 129750; = p0801*p0926
- p0374: 0.5
- p2852: 8.42096e-7; = p2266*(p1079+p1081)
- p1055: 10098.1; = IF(p1012=0;p1048*p1036;0)
- p1316: 0; = p1312*p1252/p0818
- p2616: 0; = p2420*p1073
- p1882: 0
- p1260: 0; = if(p1232>0;0;p0731/100)
- p3212: 0; = p2431*p1132
- p1714: 0
- p2623: 0; = p2427*p1073
- p2481: 5.85383e-7; = p2285*p1014
- p0956: 4.64007e-6; = if(and(p0683>0;or(p0807=56;p0807=100;and(p0807=60;p0901>0.06)));p0938;0)
- p1956: 0
- p2972: 0; = p2386*(p1079+p1081)
- p3033: 0; = p2252*p1023
- p2446: 4.74486e-5; = p2250*p1014
- p2123: 0.263965
- p0957: 2.56661e-7; = if(and(p0683>0;or(p0807=56;p0807=100;and(p0807=60;p0901>0.06)));p0939;0)
- p0526: 0; = SQRT(2)*(IF((2*p0394-1)<0;-1;IF((2*p0394-1)>0;1;0))*SQRT(SQRT((2/(pi()*0.140012289)+LN(1-(2*p0394-1)^2)/2)^2-LN(1-(2*p0394-1)^2)/0.140012289)-(2/(pi()*0.140012289)+LN(1-(2*p0394-1)^2)/2)))
- p0995: 0; = p0991*p0001*p0004/(p0818*p0002)
- p1100: 0.242165
- p3301: 0; = if(and(p1232=0;p3252<>0);p3257*p3277*(p3297*p3290+(1-p3297)*p3294);0)
- p1636: 0
- p2190: 2.02668e-5; = 32.065*p2189/(2*14.0067)
- p3381: 0; = p3362*p1234
- p2800: 0; = p2409*(p1019+p1021)
- p3311: 0; = if(and(p1232=0;p3252<>0);p3252-(p3306+p3307+p3308+p3309+p3310);0)
- p3315: 0; = if(and(p1232=0;p3253<>0);p3264*p3289;0)
- p0746: 8.326; = p0086*(1+p0614*p0218/100)
- p2807: 0; = p2416*(p1078+p1080)
- p0970: 0.00124009; = p0967/p0818
- p4743: 0; = p1776*p3482
- p3120: 0; = p2339*p1082
- p1932: 0
- p1293: 0; = p1287*p1252/p0818
- p5170: 6.43778e-9; = p1791*p3484
- p3333: 0; = if(and(p1232=0;p3255<>0);p3255-(p3328+p3329+p3330+p3331+p3332);0)
- p1720: 0
- p0839: 0.786733; = p0838/p0818
- p3173: 0; = p2392*p1132
- p1320: 0.0205651; = IF(((p0745*1000*p0747/100)+(p0754*1000*p0756/100))/p0801<0;0;((p0745*1000*p0747/100)+(p0754*1000*p0756/100))/p0801)
- p2900: 8.23435e-5; = p2314*(p1129+p1131)
- p2381: 0; = p2229*p2210
- p3061: 0; = p2280*p1023
- p1830: 0
- p2371: 0; = p2225*p2200
- p3434: 0; = p3377*p1239
- p3448: 0; = p3372*p1240
- p1290: 0; = IF(p1287=p1264;0;IF(p1287+p1288>p1264;p1264-p1287;p1288))
- p0725: 0
- p2902: 0; = p2316*(p1020+p1022)
- p0130: 11.763
- p2798: 0; = p2407*(p1019+p1021)
- p2439: 9.97138e-6; = p2243*p1014
- p0343: 0.5
- p3266: 0
- p4238: 2.55983e-6; = p1889*p3479
- p4103: 4.77835e-6; = p1754*p3479
- p0584: 0; = IF(p0320<0.5;-SQRT(p0007*EXP(p0452^2*p0008)-p0007);SQRT(p0007*EXP(p0452^2*p0008)-p0007))
- p2957: 0; = p2371*(p1020+p1022)
- p1619: 0
- p2208: 0.000234301; = p1110/p0818
- p1115: 0.237849
- p3287: 0
- p1707: 0
- p0257: 17.103
- p0135: 25.769
- p1639: 0.606248
- p4274: 2.55983e-7; = p1925*p3479
- p0606: 0; = IF(p0342<0.5;-SQRT(p0007*EXP(p0474^2*p0008)-p0007);SQRT(p0007*EXP(p0474^2*p0008)-p0007))
- p1843: 2.00417e-7; = p1435*1000/p0818
- p2968: 0; = p2382*(p1079+p1081)
- p0928: 1.26786e6; = p0801*p0918
- p2775: 0; = p2384*(p1078+p1080)
- p2916: 0; = p2330*(p1020+p1022)
- p0674: 451.096; = p0014*(1+p0542*p0146/100)
- p3398: 0; = p3379*p1234
- p2552: 0; = p2356*p1014
- p0608: 0; = IF(p0344<0.5;-SQRT(p0007*EXP(p0476^2*p0008)-p0007);SQRT(p0007*EXP(p0476^2*p0008)-p0007))
- p2582: 0; = p2386*p1073
- p2893: 1.06532e-5; = p2307*(p1079+p1081)
- p2696: 1.8729e-7; = p2305*(p1078+p1080)
- p1919: 0
- p2354: 0; = p2225*p2182
- p2266: 1.50203e-6; = p2226*p2212
- p1602: 0
- p0847: 0
- p1200: 0.84
- p2652: 0.000394675; = p2261*(p1078+p1080)
- p1980: 3521.6
- p2784: 0; = p2393*(p1019+p1021)
- p3206: 0; = p2425*p1082
- p0798: 11.845; = p0138*(1+p0666*p0270/100)
- p3379: 0; = if(p1232=0;p3246*p3361/p0818;0)
- p2331: 0; = p2224*p2199
- p0880: 56707; = p0868*p0856
- p1258: 0; = if(p1232>0;0;IF(p1253+p1256+p1257=1;0;1-(p1253+p1256+p1257)))
- p1134: 469672; = if(p1121=0;p1128*(p0716/100)*p0703*1000;0)
- p3210: 0; = p2429*p1132
- p2174: 0.00700667; = p0895*p0903/p0818
- p1718: 0
- p5322: 4.29185e-9; = p1943*p3484
- p1129: 0.56556; = if(p1121=0;IF(p1123+p1128=1;0;IF(p1123+p1128+p1125>1;1-(p1123+p1128);p1125));0)
- p0889: 0; = 1000*p0888*p0001*p0003*p0004/(p0818*p0002)
- p1659: 0.735543
- p2611: 0; = p2415*p1073
- p1687: 0
- p1142: 0; = if(p1121=0;p1136*p0001/(p0818*p0002);0)
- p1002: 0; = p0996*p0888
- p2856: 5.81749e-6; = p2270*(p1079+p1081)
- p3728: 1.84469e-9; = p1791*p3477
- p2242: 3.69798e-6; = p2222*p2187
- p3792: 2.9269e-7; = p1855*p3477
- p3081: 0; = p2300*p1082
- p0871: 3.06164; = p0870*p0001*p0003/(p0818*p0002)
- p2692: 2.09664e-5; = p2301*(p1078+p1080)
- p2198: 6.64357e-7; = 22.98976928*p2197/14.0067
- p0650: 0; = IF(p0386<0.5;-SQRT(p0007*EXP(p0518^2*p0008)-p0007);SQRT(p0007*EXP(p0518^2*p0008)-p0007))
- p1872: 0
- p1829: 0
- p3097: 0; = p2316*p1023
- p2338: 5.33512e-6; = p2228*p2206
- p2746: 0; = p2355*(p1019+p1021)
- p1339: 7.90552e-6; = p1338*p0001/(p0818*p0002)
- p5242: 2.897e-8; = p1863*p3484
- p2648: 1.51925e-5; = p2257*(p1019+p1021)
- p1784: 0
- p1037: 0.411884
- p2187: 8.12602e-6; = 4*1.00794*p2186/(2*14.0067)
- p3038: 0; = p2257*p1023
- p2915: 0; = p2329*(p1020+p1022)
- p1997: 2.50628e8; = (if(p1152=0;0;p1150/p1152)+if(p1153=0;0;p1151/p1153))*(1+p1157)
- p0784: 65.676; = p0124*(1+p0652*p0256/100)
- p4857: 0; = p1890*p3482
- p1140: 1.67962e-5; = if(p1121=0;p1134*p0001/(p0818*p0002);0)
- p1041: 0.299887
- p2199: 1.46066e-6; = p1069-p2197-p2198
- p3806: 1.7832e-8; = p1869*p3477
- p1698: 0
- p3017: 0; = p2431*(p1129+p1131)
- p1074: 0.35235; = IF(p1071=0;p0712/100;0)
- p2248: 0.000106235; = p2222*p2193
- p1563: 0.693253
- p0518: 0; = SQRT(2)*(IF((2*p0386-1)<0;-1;IF((2*p0386-1)>0;1;0))*SQRT(SQRT((2/(pi()*0.140012289)+LN(1-(2*p0386-1)^2)/2)^2-LN(1-(2*p0386-1)^2)/0.140012289)-(2/(pi()*0.140012289)+LN(1-(2*p0386-1)^2)/2)))
- p2760: 0; = p2369*(p1019+p1021)
- p1275: 0; = p1271*p1252/p0818
- p2157: 5.8259e-8; = p2015*p2086*p2119/(p0818*1000)
- p2555: 0; = p2359*p1014
- p1570: 0
- p3147: 0; = p2366*p1023
- p3176: 0; = p2395*p1023
- p3595: 1.23324e-6; = p1864*p3476
- p2254: 6.50982e-5; = p2222*p2200
- p1765: 0
- p3296: 0
- p0656: 0; = IF(p0392<0.5;-SQRT(p0007*EXP(p0524^2*p0008)-p0007);SQRT(p0007*EXP(p0524^2*p0008)-p0007))
- p2649: 0.000162302; = p2258*(p1078+p1080)
- p4032: 6.89611e-6; = p1889*p3478
- p2406: 0; = p2234*p2196
- p1879: 0
- p2647: 1.32521e-6; = p2256*(p1019+p1021)
- p0736: 0
- p0407: 0; = SQRT(2)*(IF((2*p0275-1)<0;-1;IF((2*p0275-1)>0;1;0))*SQRT(SQRT((2/(pi()*0.140012289)+LN(1-(2*p0275-1)^2)/2)^2-LN(1-(2*p0275-1)^2)/0.140012289)-(2/(pi()*0.140012289)+LN(1-(2*p0275-1)^2)/2)))
- p1969: 0; = p0803
- p2989: 0; = p2403*(p1020+p1022)
- p1323: 0; = IF(((p0745*1000*p0750/100)+(p0754*1000*p0759/100))/p0801<0;0;((p0745*1000*p0750/100)+(p0754*1000*p0759/100))/p0801)
- p0691: 0
- p3320: 0; = if(and(p1232=0;p3253<>0);p3253*(p3264-p3315)/p3316;0)
- p2675: 3.64356e-6; = p2284*(p1019+p1021)
- p0740: 97.872; = p0080*(1+p0608*p0212/100)
- p3461: 0; = p3366*p1241
- p0965: 0; = IF(p0684/100=1;0;IF(p0684/100+p0685/100>1;1-p0684/100;p0685/100))
- p3239: 0.013074; = IF(p3238+p3235+p3236=1;0;1-(p3238+p3235+p3236))
- p0757: 75.514; = p0097*(1+p0625*p0229/100)
- p1330: 195369; = p1320*p0801
- p2757: 0; = p2366*(p1019+p1021)
- p2394: 0; = p2234*p2183
- p2465: 1.76307e-5; = p2269*p1073
- p1710: 0
- p1871: 0
- p3402: 0; = p3364*p1238
- p0235: 0
- p0274: 0.5
- p2041: 2.16694e-6; = p2015*p2040/(p0818*1000)
- p3390: 0; = p3371*p1234
- p1752: 0
- p0770: 29.035; = p0110*(1+p0638*p0242/100)
- p2742: 3.39891e-5; = p2351*(p1128+p1130)
- p0531: 0; = SQRT(2)*(IF((2*p0399-1)<0;-1;IF((2*p0399-1)>0;1;0))*SQRT(SQRT((2/(pi()*0.140012289)+LN(1-(2*p0399-1)^2)/2)^2-LN(1-(2*p0399-1)^2)/0.140012289)-(2/(pi()*0.140012289)+LN(1-(2*p0399-1)^2)/2)))
- p3040: 0; = p2259*p1082
- p3032: 0; = p2251*p1023
- p1844: 0
- p4650: 9.39278e-8; = p1889*p3481
- p0647: 0; = IF(p0383<0.5;-SQRT(p0007*EXP(p0515^2*p0008)-p0007);SQRT(p0007*EXP(p0515^2*p0008)-p0007))
- p0688: 0
- p2391: 0; = p2233*p2220
- p2456: 1.17382e-5; = p2260*p1073
- p3025: 0; = p2244*p1023
- p3691: 1.54954e-7; = p1754*p3477
- p3453: 0; = p3377*p1240
- p2273: 0.0026827; = p2230*p2219
- p2061: 0.518824
- p1234: 0; = if(p1232>0;0;p0726/100)
- p2153: 2.25991e-9; = p2015*p2081*p2115/(p0818*1000)
- p2343: 1.70023e-5; = p2228*p2211
- p1571: 0
- p3236: 0.0140975
- p2417: 0; = p2235*p2207
- p1789: 0
- p3060: 0; = p2279*p1023
- p0353: 0.5
- p1325: 0; = IF(((p0745*1000*p0752/100)+(p0754*1000*p0761/100))/p0801<0;0;((p0745*1000*p0752/100)+(p0754*1000*p0761/100))/p0801)
- p1241: 0; = if(p1232>0;0;IF(p1234+p1238+p1239+p1240=1;0;1-(p1234+p1238+p1239+p1240)))
- p1797: 5.65176e-6; = p1389*1000/p0818
- p1583: 0
- p2866: 1.41312e-5; = p2280*(p1020+p1022)
- p3272: 0
- p1113: 0.100377
- p0958: 0; = if(and(p0683>0;or(p0807=480;p0807=32;p0807=1;and(p0807=60;p0901<0.03)));p0934;0)
- p5234: 1.02146e-6; = p1855*p3484
- p2631: 3.48978e-6; = p2240*(p1019+p1021)
- p3258: 0
- p1283: 0; = p1277*p1252/p0818
- p2289: 0.00026955; = p2223*p2196
- p0773: 11.845; = p0113*(1+p0641*p0245/100)
- p2461: 3.74083e-5; = p2265*p1073
- p4704: 1.39152e-9; = p1943*p3481
- p2213: 2.18859e-5; = p1116-p2212
- p2758: 0; = p2367*(p1019+p1021)
- p2653: 5.92464e-5; = p2262*(p1078+p1080)
- p1641: 0
- p3167: 0; = p2386*p1082
- p3418: 0; = p3380*p1238
- p0307: 0.5
- p2471: 1.81729e-5; = p2275*p1123
- p2450: 1.37214e-5; = p2254*p1014
- p1768: 0
- p1092: 0; = IF(p1071=0;p1086*p0001/(p0818*p0002);0)
- p3063: 0; = p2282*p1023
- p3274: 0
- p1165: 0.000339735; = p0801*p0001/(p0818*p0002)
- p3406: 0; = p3368*p1238
- p0745: 25438.6; = p0085*(1+p0613*p0217/100)
- p0983: 0; = if(p0886=0;0;min(1;(p0695*p0694*1000*p0697/100)/p0886))
- p0948: 0; = if(and(p0683=0;or(p0807=480;p0807=32;p0807=1;and(p0807=60;p0901<0.03)));p0936;0)
- p3003: 0; = p2417*(p1079+p1081)
- p2992: 0; = p2406*(p1020+p1022)
- p1026: 346145; = IF(p1012=0;p1020*(p0704/100)*p0703*1000;0)
- p0954: 6.34229e-5; = if(and(p0683>0;or(p0807=56;p0807=100;and(p0807=60;p0901>0.06)));p0936;0)
- p2160: 9.95276e-8; = p2015*p2084*p2122/(p0818*1000)
- p2783: 0; = p2392*(p1128+p1130)
- p0633: 0; = IF(p0369<0.5;-SQRT(p0007*EXP(p0501^2*p0008)-p0007);SQRT(p0007*EXP(p0501^2*p0008)-p0007))
- p0972: 0.0241404; = p0969/p0818
- p2314: 0.000145596; = p2231*p2221
- p2094: 0.922577
- p0420: 0; = SQRT(2)*(IF((2*p0288-1)<0;-1;IF((2*p0288-1)>0;1;0))*SQRT(SQRT((2/(pi()*0.140012289)+LN(1-(2*p0288-1)^2)/2)^2-LN(1-(2*p0288-1)^2)/0.140012289)-(2/(pi()*0.140012289)+LN(1-(2*p0288-1)^2)/2)))
- p2806: 0; = p2415*(p1078+p1080)
- p1623: 0
- p1176: 3825.4; = p1175*p0801
- p2862: 8.02468e-5; = p2276*(p1020+p1022)
- p3336: 0; = IF(or(p3254=0;p1232>0);0;p3271*p3289)
- p1194: 1.48
- p3288: 0
- p2463: 1.36662e-6; = p2267*p1073
- p0534: 0; = SQRT(2)*(IF((2*p0402-1)<0;-1;IF((2*p0402-1)>0;1;0))*SQRT(SQRT((2/(pi()*0.140012289)+LN(1-(2*p0402-1)^2)/2)^2-LN(1-(2*p0402-1)^2)/0.140012289)-(2/(pi()*0.140012289)+LN(1-(2*p0402-1)^2)/2)))
- p1558: 0
- p2052: 1.71096e-6; = p2015*p2049*(1-p2050)/(p0818*1000)
- p1206: 0.03829
- p3938: 1.37922e-6; = p1795*p3478
- p4188: 3.98196e-7; = p1839*p3479
- p2135: 1.11943e-6; = p2015*p2063*p2097/(p0818*1000)
- p2113: 0.832356
- p1654: 0
- p1154: 0.00740849; = if(p1152*p0818=0;0;p1150/(p1152*p0818))
- p0237: 23.136
- p2984: 0; = p2398*(p1020+p1022)
- p3263: 0
- p1846: 0
- p3346: 0; = if(and(p1232=0;p3256<>0);p3274*(p3281*(p3285*p1256+p3286*(p1253+p1257)+p1258*p3288));0)
- p1038: 0.0086688
- p1819: 0
- p1576: 0
- p2376: 0; = p2229*p2205
- p1600: 0
- p2570: 0; = p2374*p1014
- p1793: 0
- p2721: 0; = p2330*(p1019+p1021)
- p3237: 0.854735
- p1022: 0; = IF(p1012=0;IF(p1014+p1019+p1020+p1021=1;0;IF(p1014+p1019+p1020+p1021+p1018>1;1-(p1014+p1019+p1020+p1021);p1018));0)
- p0860: 0; = p0672*1000/p0856
- p0004: 0.0254
- p2440: 1.69838e-6; = p2244*p1014
- p2892: 3.11619e-6; = p2306*(p1079+p1081)
- p2164: 0.000497415; = (p2015/p0818)-(p2022)-(p2035+p2036+p2052)-(p2017/p0818)-(p2039+p2041+p2044+p2158+p2159+p2160+p2161+p2162)
- p3140: 0; = p2359*p1023
- p2438: 7.79461e-7; = p2242*p1014
- p2384: 0; = p2229*p2213
- p3235: 0.118093
- p2667: 5.76421e-5; = p2276*(p1019+p1021)
- p0702: 9495.23; = p0042*(1+p0570*p0174/100)
- p2497: 5.17749e-6; = p2301*p1073
- p2077: 0.043
- p4086: 1.02165e-7; = p1943*p3478
- p2646: 9.20778e-6; = p2255*(p1019+p1021)
- p3375: 0; = if(p1232=0;p3246*p3357/p0818;0)
- p0177: 10.472
- p2172: 0.366577; = p2166-(p2167+p2168+p2169+p2170)
- p2200: 0.000143048; = p1056/p0818
- p1389: 141
- p3014: 0; = p2428*(p1129+p1131)
- p1046: 0.0227455; = IF(p1012=0;IF(p1037+p1044+p1045=1;0;IF(p1037+p1044+p1045+p1040>1;1-(p1037+p1044+p1045);p1040));0)
- p1281: 0; = IF(p1277+p1280=p1263;0;IF(p1277+p1280+p1279>p1263;p1263-(p1277+p1280);p1279))
- p2819: 0; = p2428*(p1128+p1130)
- p1719: 0
- p1873: 0
- p1781: 0
- p2022: 0.00023875; = p2018*p2015/p0818-p2021
- p3467: 0; = p3372*p1241
- p2600: 0; = p2404*p1014
- p2835: 1.04595e-5; = p2249*(p1020+p1022)
- p4346: 0; = p1791*p3480
- p3431: 0; = p3374*p1239
- p1769: 0
- p3481: 0.00867893; = if(p1328+p1330+p1332+p1334+p1336+p1338+p1340+p1342+p1344=0;0;p1338/(p1328+p1330+p1332+p1334+p1336+p1338+p1340+p1342+p1344))
- p2720: 0; = p2329*(p1019+p1021)
- p2027: 0.428799
- p2180: 6.85773e-8; = p3233*p1188/(p0818)
- p3001: 0; = p2415*(p1079+p1081)
- p1246: 0; = if(p1232>0;0;p1241*(p0725/100)*p0723*1000)
- p2847: 0.000627985; = p2261*(p1079+p1081)
- p0863: 0.00596916; = p0675*1000/p0856
- p1042: 0.000519971
- p2312: 0.00155567; = p2231*p2219
- p3157: 0; = p2376*p1082
- p0884: 0; = IF(p0689=100;0;IF(p0689+p0688>100;100-p0689;p0688))
- p1065: 2.99916e-5; = IF(p1012=0;p1051/(p1058*p0818);0)
- p3338: 0; = if(and(p1232=0;p3254<>0);1-(p3334+p3335+p3336+p3337);0)
- p1574: 0
- p2531: 0; = p2335*p1014
- p1963d: 0; = p1608*p1812+p1609*p1813+p1610*p1814+p1611*p1815+p1612*p1816+p1613*p1817+p1614*p1818+p1615*p1819+p1616*p1820+p1617*p1821+p1618*p1822+p1619*p1823+p1620*p1824+p1621*p1825+p1622*p1826+p1623*p1827+p1624*p1828+p1625*p1829+p1626*p1830+p1627*p1831
- p3148: 0; = p2367*p1023
- p3192: 0; = p2411*p1023
- p2500: 1.32382e-5; = p2304*p1073
- p2975: 0; = p2389*(p1129+p1131)
- p1686: 0.505026
- p0781: 13.736; = p0121*(1+p0649*p0253/100)
- p1311: 0; = IF(p1307+p1310=p1266;0;IF(p1307+p1310+p1309>p1266;p1266-(p1307+p1310);p1309))
- p4616: 3.31182e-7; = p1855*p3481
- p2305: 5.31545e-7; = p2227*p2212
- p2421: 0; = p2235*p2211
- p1885: 0
- p2896: 1.84512e-5; = p2310*(p1079+p1081)
- p2278: 3.67719e-6; = p2223*p2184
- p1930: 0
- p2112: 0.856281
- p2841: 1.28187e-5; = p2255*(p1020+p1022)
- p3169: 0; = p2388*p1082
- p0963: 0; = if(and(p0683>0;or(p0807=480;p0807=32;p0807=1;and(p0807=60;p0901<0.03)));p0939;0)
- p1343: 0; = p1342*p0001/(p0818*p0002)
- p1001: 0; = if(p0978>0;0;if(and(p0687=0;p0691=0;p0695=0;p0699=0);0;IF(p0996+p0999+p1000=1;0;1-(p0996+p0999+p1000))))
- p1175: 0.000402674
- p0508: 0; = SQRT(2)*(IF((2*p0376-1)<0;-1;IF((2*p0376-1)>0;1;0))*SQRT(SQRT((2/(pi()*0.140012289)+LN(1-(2*p0376-1)^2)/2)^2-LN(1-(2*p0376-1)^2)/0.140012289)-(2/(pi()*0.140012289)+LN(1-(2*p0376-1)^2)/2)))
- p3268: 0
- p1032: 1.23787e-5; = IF(p1012=0;p1026*p0001/(p0818*p0002);0)
- p1078: 0.35235; = IF(p1071=0;IF(p1073=1;0;IF(p1073+p1074>1;1-p1073;p1074));0)
- p3779: 3.99682e-9; = p1842*p3477
- p3280: 0
- p1923: 0
- p3573: 4.33302e-8; = p1842*p3476
- p0952: 4.53407e-5; = if(and(p0683>0;or(p0807=56;p0807=100;and(p0807=60;p0901>0.06)));p0934;0)
- p2991: 0; = p2405*(p1020+p1022)
- p1945: 0
- p1162: 0.000380792; = p1161/p0818
- p3438: 0; = p3362*p1240
- p1067: 8.4314e-5; = IF(p1012=0;p1053/(p1060*p0818);0)
- p2132: 3.49025e-7; = p2015*p2060*p2094/(p0818*1000)
- p3306: 0; = if(and(p1232=0;p3252<>0);p3252*(p3257*p3277-p3301)/p3305;0)
- p0694: 0
- p2313: 8.37851e-5; = p2231*p2220
- p2197: 4.04765e-7; = p1055/p0818
- p1071: 0
- p0953: 0.000133095; = if(and(p0683>0;or(p0807=56;p0807=100;and(p0807=60;p0901>0.06)));p0935;0)
- p0937: 9.298e-5; = p0931*p0001/(p0818*p0002)
- p3042: 0; = p2261*p1082
- p2613: 0; = p2417*p1073
- p1148: 0.070543; = if(p1121=0;IF(p1146=1;0;1-p1146);0)
- p4352: 0; = p1797*p3480
- p1663: 0
- p0705: 21.078; = p0045*(1+p0573*p0177/100)
- p2487: 7.63069e-8; = p2291*p1014
- p3415: 0; = p3377*p1238
- p4831: 0; = p1864*p3482
- p2937: 5.37583e-5; = p2351*(p1129+p1131)
- p3394: 0; = p3375*p1234
- p3072: 0; = p2291*p1023
- p3187: 0; = p2406*p1023
- p2028: 4.1009e-5; = p2015*p2026*p2027/(p0818*1000)
- p5243: 3.96996e-7; = p1864*p3484
- p1946: 0
- p2492: 1.16224e-5; = p2296*p1014
- p0323: 0.5
- p3270: 0
- p2520: 0; = p2324*p1014
- p1317: 0
- p2000: 4000
- p3082: 0; = p2301*p1082
- p2234: 0; = 1-(p2222+p2223+p2224+p2225)
- p0675: 56.707; = p0015*(1+p0543*p0147/100)
- p0968: 0
- p1152: 0.415074
- p2006: 0.0534513; = ((p1980*p1985+p1986*p1991+p1992*p1997+p2000*p2005)/p0818)*p0005*p0002/1000
- p0827: 0; = p0818*p0819*p0823
- p3424: 0; = p3367*p1239
- p2751: 0; = p2360*(p1019+p1021)
- p1009: 0; = p1005*p0001*p0004/(p0818*p0002)
- p0308: 0.5
- p2661: 3.65617e-6; = p2270*(p1078+p1080)
- p3286: 0
- p1119: 0.00297116; = IF(p1071=0;p1109/(p1114*p0818);0)
- p2221: 0.000405568; = p1155-p2220
- p2124: 0.263965
- p0481: 0; = SQRT(2)*(IF((2*p0349-1)<0;-1;IF((2*p0349-1)>0;1;0))*SQRT(SQRT((2/(pi()*0.140012289)+LN(1-(2*p0349-1)^2)/2)^2-LN(1-(2*p0349-1)^2)/0.140012289)-(2/(pi()*0.140012289)+LN(1-(2*p0349-1)^2)/2)))
- p2109: 0.826583
- p1624: 0
- p0646: 0; = IF(p0382<0.5;-SQRT(p0007*EXP(p0514^2*p0008)-p0007);SQRT(p0007*EXP(p0514^2*p0008)-p0007))
- p0195: 0
- p1016: 0.4593; = IF(p1012=0;p0707/100;0)
- p2848: 9.42697e-5; = p2262*(p1079+p1081)
- p0890: 0; = p0686*1000*p0687*p0885/100
- p1431: 42
- p1322: 0.634171; = IF(((p0745*1000*p0749/100)+(p0754*1000*p0758/100))/p0801<0;0;((p0745*1000*p0749/100)+(p0754*1000*p0758/100))/p0801)
- p3304: 0; = if(and(p1232=0;p3252<>0);p3260*p3289;0)
- p1327: 0.0717702; = if(p1318=0;if(p1327a=0;1;if(p1327a<0;0;p1327a));0)
- p1963j: 9.34876e-8; = p1725*p1929+p1726*p1930+p1727*p1931+p1728*p1932+p1729*p1933+p1730*p1934+p1731*p1935+p1732*p1936+p1733*p1937+p1734*p1938+p1735*p1939+p1736*p1940+p1737*p1941+p1738*p1942+p1739*p1943+p1740*p1944+p1741*p1945+p1742*p1946+p1743*p1947
- p1287: 0
- p3377: 0; = if(p1232=0;p3246*p3359/p0818;0)
- p2058: 1.24412
- p1131: 0; = if(p1121=0;IF(p1123+p1128+p1129+p1130=1;0;IF(p1123+p1128+p1129+p1130+p1127>1;1-(p1123+p1128+p1129+p1130);p1127));0)
- p0680: 1267.86; = p0020*(1+p0548*p0152/100)
- p1564: 0
- p0515: 0; = SQRT(2)*(IF((2*p0383-1)<0;-1;IF((2*p0383-1)>0;1;0))*SQRT(SQRT((2/(pi()*0.140012289)+LN(1-(2*p0383-1)^2)/2)^2-LN(1-(2*p0383-1)^2)/0.140012289)-(2/(pi()*0.140012289)+LN(1-(2*p0383-1)^2)/2)))
- p1333: 0.000580417; = p1332*p0001/(p0818*p0002)
- p2393: 0; = p2234*p2182
- p1265: 0; = if(p1232>0;0;IF(p1259+p1263+p1264=1;0;IF(p1259+p1263+p1264+p1262>1;1-(p1259+p1263+p1264);p1262)))
- p0681: 0
- p0755: 0
- p2238: 3.20291e-5; = p2222*p2183
- p0043: 9495.23
- p0449: 0; = SQRT(2)*(IF((2*p0317-1)<0;-1;IF((2*p0317-1)>0;1;0))*SQRT(SQRT((2/(pi()*0.140012289)+LN(1-(2*p0317-1)^2)/2)^2-LN(1-(2*p0317-1)^2)/0.140012289)-(2/(pi()*0.140012289)+LN(1-(2*p0317-1)^2)/2)))
- p2566: 0; = p2370*p1014
- p2227: 0.253967; = if(p0774*p0778+p0775*p0779+p0776*p0780+p0777*p0781=0;0;p0779*p0775/(p0774*p0778+p0775*p0779+p0776*p0780+p0777*p0781))
- p0658: 0; = IF(p0394<0.5;-SQRT(p0007*EXP(p0526^2*p0008)-p0007);SQRT(p0007*EXP(p0526^2*p0008)-p0007))
- p2527: 0; = p2331*p1014
- p0916: 0.298109; = p0826+(p0832*(1+p0894))/p0818
- p1672: 0
- p1785: 0
- p3093: 6.9694e-6; = p2312*p1132
- p3331: 0; = if(and(p1232=0;p3255<>0);p3255*(p3268-p3326)/p3327;0)
- p3826: 8.3011e-8; = p1889*p3477
- p3427: 0; = p3370*p1239
- p2215: 0.000282349; = p1117-p2214
- p2543: 6.97236e-7; = p2347*p1073
- p4012: 1.48139e-6; = p1869*p3478
- p4870: 0; = p1903*p3482
- p2793: 0; = p2402*(p1019+p1021)
- p3411: 0; = p3373*p1238
- p1711: 0
- p1903: 0.000139731; = p1495*1000/p0818
- p2990: 0; = p2404*(p1020+p1022)
- p0722: 0
- p1640: 0
- p2183: 7.03812e-5; = p1064-p2182
- p0726: 0
- p1963g: 5.32307e-6; = p1667*p1871+p1668*p1872+p1669*p1873+p1670*p1874+p1671*p1875+p1672*p1876+p1673*p1877+p1674*p1878+p1675*p1879+p1676*p1880+p1677*p1881+p1678*p1882+p1679*p1883+p1680*p1884+p1681*p1885+p1682*p1886+p1683*p1887+p1684*p1888+p1685*p1889
- p1267: 0
- p1962: 0; = p1960*1000/p0818
- p2288: 2.72685e-5; = p2223*p2195
- p0118: 51.34
- p3201: 0; = p2420*p1082
- p1247: 0; = if(p1232>0;0;p1242*p0001/(p0818*p0002))
- p3049: 0; = p2268*p1082
- p2790: 0; = p2399*(p1019+p1021)
- p3407: 0; = p3369*p1238
- p1121: 0
- p3136: 0; = p2355*p1023
- p2574: 0; = p2378*p1073
- p5116: 0; = p1943*p3483
- p1983: 50
- p1786: 0
- p2982: 0; = p2396*(p1020+p1022)
- p0766: 22.744; = p0106*(1+p0634*p0238/100)
- p2724: 0; = p2333*(p1019+p1021)
- p1736: 0
- p1652: 0
- p0370: 0.5
- p1753: 0
- p3460: 0; = p3365*p1241
- p1791: 2.405e-7; = p1383*1000/p0818
- p0929: 3.72173e6; = p0801*p0923
- p2669: 1.21318e-6; = p2278*(p1019+p1021)
- p1172: 1.37484e-7; = p1170/p0818
- p1992: 3900
- p2583: 0; = p2387*p1073
- p0758: 0
- p2663: 0.000680721; = p2272*(p1128+p1130)
- p1335: 0.00021545; = p1334*p0001/(p0818*p0002)
- p3275: 0
- p2088: 0.798875
- p0908: 0.00297304
- p0014: 451.096
- p0459: 0; = SQRT(2)*(IF((2*p0327-1)<0;-1;IF((2*p0327-1)>0;1;0))*SQRT(SQRT((2/(pi()*0.140012289)+LN(1-(2*p0327-1)^2)/2)^2-LN(1-(2*p0327-1)^2)/0.140012289)-(2/(pi()*0.140012289)+LN(1-(2*p0327-1)^2)/2)))
- p2636: 3.04285e-6; = p2245*(p1019+p1021)
- p0877: 0.00728106; = p0876*p0001*p0003/(p0818*p0002)
- p1251: 0; = if(p1232>0;0;p1246*p0001/(p0818*p0002))
- p2595: 0; = p2399*p1014
- p0804: 0
- p3355: 0; = if(and(p1232=0;p3256<>0);p3256-(p3350+p3351+p3352+p3353+p3354);0)
- p3892: 1.10005e-6; = p1955*p3477
- p0794: 0
- p3686: 1.19258e-5; = p1955*p3476
- p0022: 9495.27
- p1984: 30
- p3462: 0; = p3367*p1241
- p1963f: 2.44177e-5; = p1647*p1851+p1648*p1852+p1649*p1853+p1650*p1854+p1651*p1855+p1652*p1856+p1653*p1857+p1654*p1858+p1655*p1859+p1656*p1860+p1657*p1861+p1658*p1862+p1659*p1863+p1660*p1864+p1661*p1865+p1662*p1866+p1663*p1867+p1664*p1868+p1665*p1869+p1666*p1870
- p4307: 0; = p1962*p3479
- p0544: 0; = IF(p0280<0.5;-SQRT(p0007*EXP(p0412^2*p0008)-p0007);SQRT(p0007*EXP(p0412^2*p0008)-p0007))
- p2308: 7.17072e-5; = p2227*p2215
- p0734: 0
- p2947: 0; = p2361*(p1020+p1022)
- p0392: 0.5
- p4046: 8.90364e-5; = p1903*p3478
- p2342: 1.29835e-6; = p2228*p2210
- p2903: 0; = p2317*(p1020+p1022)
- p1578: 0
- p3055: 6.47289e-7; = p2274*p1132
- p0570: 0; = IF(p0306<0.5;-SQRT(p0007*EXP(p0438^2*p0008)-p0007);SQRT(p0007*EXP(p0438^2*p0008)-p0007))
- p2081: 0.0019
- p0724: 0
- p0918: 0.133459; = p0680*1000/p0801
- p2825: 1.41048e-6; = p2239*(p1020+p1022)
- p3897: 1.28727e-5; = p1754*p3478
- p1666: 0
- p2643: 9.97464e-8; = p2252*(p1019+p1021)
- p0379: 0.5
- p2341: 3.00705e-6; = p2228*p2209
- p3094: 3.75357e-7; = p2313*p1132
- p1010: 0; = p0890
- p2179: 0.0253805; = p0970+p0971+p0972
- p1229: 0.00870441; = IF(p1221=0;0;p1228*p1221)
- p1008: 0; = p1004*p0001*p0004/(p0818*p0002)
- p0625: 0; = IF(p0361<0.5;-SQRT(p0007*EXP(p0493^2*p0008)-p0007);SQRT(p0007*EXP(p0493^2*p0008)-p0007))
- p2442: 4.88871e-7; = p2246*p1014
- p0542: 0; = IF(p0278<0.5;-SQRT(p0007*EXP(p0410^2*p0008)-p0007);SQRT(p0007*EXP(p0410^2*p0008)-p0007))
- p2597: 0; = p2401*p1014
- p3197: 0; = p2416*p1082
- p1646: 0
- p2718: 0; = p2327*(p1019+p1021)
- p2778: 0; = p2387*(p1078+p1080)
- p1106: 52215.4; = IF(p1071=0;p1105*p1096*p1095;0)
- p2258: 0.000460628; = p2226*p2204
- p0280: 0.5
- p2873: 5.84267e-5; = p2287*(p1020+p1022)
- p2072: 0.134
- p3455: 0; = p3379*p1240
- p3310: 0; = if(and(p1232=0;p3252<>0);IF((p3306+p3307+p3308+p3309)+(p3252*(p3257*(1-p3277))/p3305)>p3252;p3252-(p3306+p3307+p3308+p3309);p3252*(p3257*(1-p3277))/p3305);0)
- p3343: 0; = if(and(p1232=0;p3254<>0);IF((p3339+p3340+p3341+p3342)+(p3254*(p3269*(1-p3277))/p3338)>p3254;p3254-(p3339+p3340+p3341+p3342);p3254*(p3269*(1-p3277))/p3338);0)
- p2666: 8.97797e-5; = p2275*(p1128+p1130)
- p2083: 2.17294
- p0440: 0; = SQRT(2)*(IF((2*p0308-1)<0;-1;IF((2*p0308-1)>0;1;0))*SQRT(SQRT((2/(pi()*0.140012289)+LN(1-(2*p0308-1)^2)/2)^2-LN(1-(2*p0308-1)^2)/0.140012289)-(2/(pi()*0.140012289)+LN(1-(2*p0308-1)^2)/2)))
- p2307: 1.90019e-5; = p2227*p2214
- p1816: 0
- p2032: 0.448886
- p3217: 0.00631195; = p3213*p1228
- p0321: 0.5
- p0991: 0; = p0987*p0886
- p1900: 0
- p0413: 0; = SQRT(2)*(IF((2*p0281-1)<0;-1;IF((2*p0281-1)>0;1;0))*SQRT(SQRT((2/(pi()*0.140012289)+LN(1-(2*p0281-1)^2)/2)^2-LN(1-(2*p0281-1)^2)/0.140012289)-(2/(pi()*0.140012289)+LN(1-(2*p0281-1)^2)/2)))
- p1253: 0; = if(p1232>0;0;p0735/100)
- p0447: 0; = SQRT(2)*(IF((2*p0315-1)<0;-1;IF((2*p0315-1)>0;1;0))*SQRT(SQRT((2/(pi()*0.140012289)+LN(1-(2*p0315-1)^2)/2)^2-LN(1-(2*p0315-1)^2)/0.140012289)-(2/(pi()*0.140012289)+LN(1-(2*p0315-1)^2)/2)))
- p2614: 0; = p2418*p1073
- p1261: 0; = if(p1232>0;0;p0732/100)
- p2965: 0; = p2379*(p1079+p1081)
- p1700: 0
- p3264: 0
- p2184: 6.74812e-6; = p1051/p0818
- p1635: 0.921542
- p1893: 0
- p1517: 27
- p1741: 0
- p2130: 9.42346e-7; = p2015*p2058*p2092/(p0818*1000)
- p2129: 1.71197e-6; = p2015*p2057*p2091/(p0818*1000)
- p5063: 0; = p1890*p3483
- p2553: 0; = p2357*p1014
- p1835: 2.886e-6; = p1427*1000/p0818
- p1586: 0
- p2606: 0; = p2410*p1014
- p3073: 0; = p2292*p1023
- p2002: 750
- p1185: 0.5
- p1169: 0.000361047
- p0616: 0; = IF(p0352<0.5;-SQRT(p0007*EXP(p0484^2*p0008)-p0007);SQRT(p0007*EXP(p0484^2*p0008)-p0007))
- p2267: 1.57064e-5; = p2226*p2213
- p2383: 0; = p2229*p2212
- p2522: 0; = p2326*p1014
- p1953: 0
- p0183: 13.872
- p0942: 0; = if(and(p0683=0;p0948=0);p0936;0)
- p2821: 0; = p2430*(p1128+p1130)
- p2045: 30
- p0723: 9495.25; = p0063*(1+p0591*p0195/100)
- p2575: 0; = p2379*p1073
- p0573: 0; = IF(p0309<0.5;-SQRT(p0007*EXP(p0441^2*p0008)-p0007);SQRT(p0007*EXP(p0441^2*p0008)-p0007))
- p2106: 0.856281
- p1552: 0
- p2470: 1.04578e-5; = p2274*p1123
- p3184: 0; = p2403*p1023
- p1495: 3486
- p1692: 0
- p2556: 0; = p2360*p1014
- p3463: 0; = p3368*p1241
- p1257: 0; = if(p1232>0;0;IF(p1253+p1256=1;0;IF(p1253+p1256+p1255>1;1-(p1253+p1256);p1255)))
- p2894: 4.02019e-5; = p2308*(p1079+p1081)
- p0078: 9495.27
- p2994: 0; = p2408*(p1020+p1022)
- p1701: 0
- p0788: 35.994; = p0128*(1+p0656*p0260/100)
- p2779: 0; = p2388*(p1078+p1080)
- p0154: 0
- p1697: 0
- p1481: 270
- p4925: 0; = p1962*p3482
- p3079: 0; = p2298*p1082
- p0474: 0; = SQRT(2)*(IF((2*p0342-1)<0;-1;IF((2*p0342-1)>0;1;0))*SQRT(SQRT((2/(pi()*0.140012289)+LN(1-(2*p0342-1)^2)/2)^2-LN(1-(2*p0342-1)^2)/0.140012289)-(2/(pi()*0.140012289)+LN(1-(2*p0342-1)^2)/2)))
- p3395: 0; = p3376*p1234
- p4007: 9.45022e-6; = p1864*p3478
- p1955: 0.000143418; = p1547*1000/p0818
- p0350: 0.5
- p1227: 0.000339735; = IF(p1221=0;0;p1226*p0001/(p0818*p0002))
- p0121: 13.736
- p2656: 0.000151486; = p2265*(p1078+p1080)
- p0940: 0; = if(and(p0683=0;p0946=0);p0934;0)
- p1847: 0
- p0685: 0
- p2711: 0; = p2320*(p1019+p1021)
- p2023: 3.15
- p2054: 0.91
- p3704: 1.0238e-7; = p1767*p3477
- p0478: 0; = SQRT(2)*(IF((2*p0346-1)<0;-1;IF((2*p0346-1)>0;1;0))*SQRT(SQRT((2/(pi()*0.140012289)+LN(1-(2*p0346-1)^2)/2)^2-LN(1-(2*p0346-1)^2)/0.140012289)-(2/(pi()*0.140012289)+LN(1-(2*p0346-1)^2)/2)))
- p1949: 0
- p2165: 0.809189; = (p0833-p2014)/p0818-p0839
- p1298: 0
- p3252: 0; = p1252*(p1267*(1-p3247)+p1270*(1-p3248)+p1271*(1-p3249)+p1272*(1-p3250))
- p3689: 0; = p1962*p3476
- p1039: 0.0725313
- p0414: 0; = SQRT(2)*(IF((2*p0282-1)<0;-1;IF((2*p0282-1)>0;1;0))*SQRT(SQRT((2/(pi()*0.140012289)+LN(1-(2*p0282-1)^2)/2)^2-LN(1-(2*p0282-1)^2)/0.140012289)-(2/(pi()*0.140012289)+LN(1-(2*p0282-1)^2)/2)))
- p2298: 0.00014743; = p2227*p2205
- p2914: 0; = p2328*(p1020+p1022)
- p0632: 0; = IF(p0368<0.5;-SQRT(p0007*EXP(p0500^2*p0008)-p0007);SQRT(p0007*EXP(p0500^2*p0008)-p0007))
- p2548: 3.7054e-7; = p2352*p1123
- p5036: 0; = p1863*p3483
- p4277: 9.86008e-7; = p1928*p3479
- p0786: 0
- p2864: 1.68893e-6; = p2278*(p1020+p1022)
- p1746: 0
- p0446: 0; = SQRT(2)*(IF((2*p0314-1)<0;-1;IF((2*p0314-1)>0;1;0))*SQRT(SQRT((2/(pi()*0.140012289)+LN(1-(2*p0314-1)^2)/2)^2-LN(1-(2*p0314-1)^2)/0.140012289)-(2/(pi()*0.140012289)+LN(1-(2*p0314-1)^2)/2)))
- p1019: 0.32992; = IF(p1012=0;IF(p1014=1;0;IF(p1014+p1015>1;1-p1014;p1015));0)
- p1971: 0.000337947; = p1966*p0001/(p0818*p0002)
- p0532: 0; = SQRT(2)*(IF((2*p0400-1)<0;-1;IF((2*p0400-1)>0;1;0))*SQRT(SQRT((2/(pi()*0.140012289)+LN(1-(2*p0400-1)^2)/2)^2-LN(1-(2*p0400-1)^2)/0.140012289)-(2/(pi()*0.140012289)+LN(1-(2*p0400-1)^2)/2)))
- p2364: 0; = p2225*p2192
- p2004: 30
- p2195: 5.00413e-5; = p2194*p2193
- p3219: 0.0252244; = p3215*p1228
- p1817: 0
- p0137: 49.176
- p4144: 5.11966e-7; = p1795*p3479
- p1799: 0
- p2960: 0; = p2374*(p1020+p1022)
- p3295: 0
- p3318: 0; = if(and(p1232=0;p3253<>0);p3253*(p3262-p3313)/p3316;0)
- p2309: 3.67209e-6; = p2227*p2216
- p0268: 8.795
- p2728: 5.80506e-6; = p2337*(p1078+p1080)
- p1950: 0
- p2263: 7.60378e-5; = p2226*p2209
- p2100: 0.705744
- p2348: 4.10357e-7; = p2228*p2216
- p3119: 0; = p2338*p1082
- p0545: 0; = IF(p0281<0.5;-SQRT(p0007*EXP(p0413^2*p0008)-p0007);SQRT(p0007*EXP(p0413^2*p0008)-p0007))
- p3004: 0; = p2418*(p1079+p1081)
- p2498: 2.34132e-6; = p2302*p1073
- p3028: 0; = p2247*p1023
- p0091: 0.869
- p2250: 0.00022511; = p2222*p2196
- p2291: 3.62021e-7; = p2223*p2198
- p2805: 0; = p2414*(p1078+p1080)
- p1645: 0
- p2328: 0; = p2224*p2196
- p1209: 90.3809; = p1206*p0818*p0822/p0801
- p2769: 0; = p2378*(p1078+p1080)
- p3479: 0.236528; = if(p1328+p1330+p1332+p1334+p1336+p1338+p1340+p1342+p1344=0;0;p1334/(p1328+p1330+p1332+p1334+p1336+p1338+p1340+p1342+p1344))
- p1754: 2.0202e-5; = p1346*1000/p0818
- p2332: 0; = p2224*p2200
- p2427: 0; = p2235*p2217
- p3144: 0; = p2363*p1023
- p3414: 0; = p3376*p1238
- p0862: 0.0474838; = p0674*1000/p0856
- p3934: 1.53247e-7; = p1791*p3478
- p1307: 0
- p0116: 24.355
- p1638: 0.732906
- p0969: 6.02255e8; = p0966*p0683*p0682*1000
- p2202: 8.82649e-6; = 4*1.00794*p2201/(2*14.0067)
- p4558: 4.90512e-8; = p1797*p3481
- p2078: 0.117
- p4758: 0; = p1791*p3482
- p3350: 0; = if(and(p1232=0;p3256<>0);p3256*(p3273*p3277-p3345)/p3349;0)
- p1963i: 3.86512e-6; = p1706*p1910+p1707*p1911+p1708*p1912+p1709*p1913+p1710*p1914+p1711*p1915+p1712*p1916+p1713*p1917+p1714*p1918+p1715*p1919+p1716*p1920+p1717*p1921+p1718*p1922+p1719*p1923+p1720*p1924+p1721*p1925+p1722*p1926+p1723*p1927+p1724*p1928
- p4802: 0; = p1835*p3482
- p3480: 0; = if(p1328+p1330+p1332+p1334+p1336+p1338+p1340+p1342+p1344=0;0;p1336/(p1328+p1330+p1332+p1334+p1336+p1338+p1340+p1342+p1344))
- p2840: 2.98996e-5; = p2254*(p1020+p1022)
- p0008: 0.0739645; = (p0007-1.5)/(p0007-1)^2
- p0888: 0; = p0686*1000*p0687*p0884/100
- p3172: 0; = p2391*p1132
- p1940: 0
- p3199: 0; = p2418*p1082
- p3294: 0
- p2767: 0; = p2376*(p1078+p1080)
- p0493: 0; = SQRT(2)*(IF((2*p0361-1)<0;-1;IF((2*p0361-1)>0;1;0))*SQRT(SQRT((2/(pi()*0.140012289)+LN(1-(2*p0361-1)^2)/2)^2-LN(1-(2*p0361-1)^2)/0.140012289)-(2/(pi()*0.140012289)+LN(1-(2*p0361-1)^2)/2)))
- p1309: 0
- p1061: 0.3
- p2280: 3.07668e-5; = p2223*p2186
- p3066: 0; = p2285*p1023
- p3177: 0; = p2396*p1023
- p2382: 0; = p2229*p2211
- p0730: 0
- p0966: 0.95114; = if(p0683=0;0;IF(p0684/100+p0965=1;0;1-(p0684/100+p0965)))
- p2134: 2.5444e-6; = p2015*p2062*p2096/(p0818*1000)
- p2103: 0.912485
- p0018: 3721.73
- p0219: 51.981
- p3134: 3.98546e-8; = p2353*p1132
- p2910: 0; = p2324*(p1020+p1022)
- p1924: 0
- p1210: 0.46
- p1004: 0; = p1000*p0888
- p0841: 0.0490668
- p0111: 6.977
- p0816: 0
- p1582: 0
- p2240: 1.05776e-5; = p2222*p2185
- p1842: 5.21084e-7; = p1434*1000/p0818
- p3327: 0; = if(and(p1232=0;p3255<>0);1-(p3323+p3324+p3325+p3326);0)
- p3030: 0; = p2249*p1023
- p0510: 0; = SQRT(2)*(IF((2*p0378-1)<0;-1;IF((2*p0378-1)>0;1;0))*SQRT(SQRT((2/(pi()*0.140012289)+LN(1-(2*p0378-1)^2)/2)^2-LN(1-(2*p0378-1)^2)/0.140012289)-(2/(pi()*0.140012289)+LN(1-(2*p0378-1)^2)/2)))
- p3827: 3.19746e-8; = p1890*p3477
- p2484: 5.74766e-6; = p2288*p1014
- p0910: 0.0105884; = p0909/p0818
- p1221: 0.155559; = p1216*(1+p1220*p1217/100)
- p1280: 0; = IF(p1277=p1263;0;IF(p1277+p1278>p1263;p1263-p1277;p1278))
- p4603: 4.52245e-9; = p1842*p3481
- p0185: 7.214
- p2854: 3.01036e-5; = p2268*(p1079+p1081)
- p1798: 0
- p2569: 0; = p2373*p1014
- p0005: 1.60934
- p5101: 0; = p1928*p3483
- p3437: 0; = p3380*p1239
- p0288: 0.5
- p0904: 2.45415e9; = p0825*p0901+(p0830+p0895)*p0824*p0903
- p3285: 0
- p3126: 0; = p2345*p1082
- p2974: 0; = p2388*(p1079+p1081)
- p0795: 25.769; = p0135*(1+p0663*p0267/100)
- p0708: 0
- p3690: 2.41337e-5; = p1963*p3476
- p0898: 0.456
- p0088: 63.705
- p3154: 0; = p2373*p1023
- p1359: 333
- p0401: 0.5
- p1918: 0
- p3408: 0; = p3370*p1238
- p3039: 0; = p2258*p1082
- p0255: 9.205
- p0146: 0
- p2246: 2.31934e-6; = p2222*p2191
- p3382: 0; = p3363*p1234
- p2158: 2.0539e-7; = p2015*p2082*p2120/(p0818*1000)
- p2874: 1.25244e-5; = p2288*(p1020+p1022)
- p3299: 0; = if(p1303+p1304+p1305+p1306=0;0;p1303/(p1303+p1304+p1305+p1306))
- p2144: 1.59383e-7; = p2015*p2072*p2106/(p0818*1000)
- p2605: 0; = p2409*p1014
- p0713: 56.064; = p0053*(1+p0581*p0185/100)
- p2243: 4.73071e-5; = p2222*p2188
- p2961: 0; = p2375*(p1079+p1081)
- p0808: 0
- p3021: 0; = p2240*p1023
- p2477: 9.33341e-7; = p2281*p1014
- p1861: 0
- p0375: 0.5
- p3023: 0; = p2242*p1023
- p0191: 7.614
- p1085: 630557; = IF(p1071=0;p1079*(p0710/100)*p0703*1000;0)
- p4764: 0; = p1797*p3482
- p2239: 3.07093e-6; = p2222*p2184
- p0980: 0; = IF(p0977=0;0;p0977*p0001/(p0818*p0002))
- p1730: 0
- p0455: 0; = SQRT(2)*(IF((2*p0323-1)<0;-1;IF((2*p0323-1)>0;1;0))*SQRT(SQRT((2/(pi()*0.140012289)+LN(1-(2*p0323-1)^2)/2)^2-LN(1-(2*p0323-1)^2)/0.140012289)-(2/(pi()*0.140012289)+LN(1-(2*p0323-1)^2)/2)))
- p3423: 0; = p3366*p1239
- p2639: 3.50492e-5; = p2248*(p1019+p1021)
- p0813: 0; = if(p0807=480;1.56521739130435;0)
- p0418: 0; = SQRT(2)*(IF((2*p0286-1)<0;-1;IF((2*p0286-1)>0;1;0))*SQRT(SQRT((2/(pi()*0.140012289)+LN(1-(2*p0286-1)^2)/2)^2-LN(1-(2*p0286-1)^2)/0.140012289)-(2/(pi()*0.140012289)+LN(1-(2*p0286-1)^2)/2)))
- p3370: 0; = if(p1232=0;p3245*p3358/p0818;0)
- p0057: 7.238
- p0082: 97.783
- p1117: 0.000357169; = IF(p1071=0;p1107/(p1112*p0818);0)
- p3227: 0.00110405; = p3223*p1229
- p2590: 0; = p2394*p1014
- p2373: 0; = p2225*p2202
- p0384: 0.5
- p0807: 60
- p3078: 0; = p2297*p1082
- p0252: 23.584
- p1329: 7.57438e-5; = p1328*p0001/(p0818*p0002)
- p1559: 0
- p4625: 1.28716e-7; = p1864*p3481
- p3634: 1.16191e-5; = p1903*p3476
- p3080: 0; = p2299*p1082
- p0805: 0
- p4830: 0; = p1863*p3482
- p3347: 0; = if(and(p1232=0;p3256<>0);p3275*p3289;0)
- p0832: 4.12885e9; = p0831*p0830/(1-p0831)
- p2013: 0.75
- p1773: 0
- p2515: 0; = p2319*p1014
- p0943: 0; = if(and(p0683=0;p0949=0);p0937;0)
- p0110: 29.035
- p0791: 0
- p0505: 0; = SQRT(2)*(IF((2*p0373-1)<0;-1;IF((2*p0373-1)>0;1;0))*SQRT(SQRT((2/(pi()*0.140012289)+LN(1-(2*p0373-1)^2)/2)^2-LN(1-(2*p0373-1)^2)/0.140012289)-(2/(pi()*0.140012289)+LN(1-(2*p0373-1)^2)/2)))
- p1990: 30
- p5176: 1.51288e-7; = p1797*p3484
- p0693: 0
- p3383: 0; = p3364*p1234
- p1220: 0; = IF(p1218<0.5;-SQRT(p1214*EXP(p1219^2*p1215)-p1214);SQRT(p1214*EXP(p1219^2*p1215)-p1214))
- p3101: 0; = p2320*p1023
- p3289: 0
- p0346: 0.5
- p1978: 277
- p3393: 0; = p3374*p1234
- p0989: 0; = p0985*p0886
- p0615: 0; = IF(p0351<0.5;-SQRT(p0007*EXP(p0483^2*p0008)-p0007);SQRT(p0007*EXP(p0483^2*p0008)-p0007))
- p2279: 1.26659e-5; = p2223*p2185
- p1740: 0
- p0254: 8.961
- p3389: 0; = p3370*p1234
- p2938: 2.89531e-6; = p2352*(p1129+p1131)
- p0936: 6.34229e-5; = p0930*p0001/(p0818*p0002)
- p0749: 23.683; = p0089*(1+p0617*p0221/100)
- p4218: 5.49889e-7; = p1869*p3479
- p3896: 2.22612e-6; = p1963*p3477
- p1289: 0
- p0617: 0; = IF(p0353<0.5;-SQRT(p0007*EXP(p0485^2*p0008)-p0007);SQRT(p0007*EXP(p0485^2*p0008)-p0007))
- p4537: 1.44718e-7; = p1776*p3481
- p2142: 3.20085e-7; = p2015*p2070*p2104/(p0818*1000)
- p1766: 0
- p2870: 5.0724e-6; = p2284*(p1020+p1022)
- p2829: 2.17281e-5; = p2243*(p1020+p1022)
- p1236: 0; = if(p1232>0;0;p0728/100)
- p2719: 0; = p2328*(p1019+p1021)
- p2920: 0; = p2334*(p1020+p1022)
- p4922: 0; = p1955*p3482
- p1086: 0; = IF(p1071=0;p1080*(p0710/100)*p0703*1000;0)
- p2603: 0; = p2407*p1014
- p1223: 0.56
- p3044: 0; = p2263*p1082
- p1795: 2.1645e-6; = p1387*1000/p0818
- p1748: 0
- p2609: 0; = p2413*p1014
- p3196: 0; = p2415*p1082
- p2939: 5.03129e-6; = p2353*(p1129+p1131)
- p2684: 2.57172e-5; = p2293*(p1019+p1021)
- p3242: 3.84397e-8; = p3234*p1188*p3238/p0818
- p1595: 0
- p2282: 5.66463e-5; = p2223*p2188
- p1622: 0
- p1340: 0; = p1325*p0801
- p2945: 0; = p2359*(p1020+p1022)
- p3413: 0; = p3375*p1238
- p0581: 0; = IF(p0317<0.5;-SQRT(p0007*EXP(p0449^2*p0008)-p0007);SQRT(p0007*EXP(p0449^2*p0008)-p0007))
- p0586: 0; = IF(p0322<0.5;-SQRT(p0007*EXP(p0454^2*p0008)-p0007);SQRT(p0007*EXP(p0454^2*p0008)-p0007))
- p0223: 9.608
- p1217: 9.53097
- p2043: 0.636483
- p2797: 0; = p2406*(p1019+p1021)
- p1186: 2.10873e-8; = p1182*p1185/p0818
- p3179: 0; = p2398*p1023
- p5307: 1.11588e-7; = p1928*p3484
- p3421: 0; = p3364*p1239
- p2340: 6.64964e-6; = p2228*p2208
- p0007: 14; = p0006-1
- p0386: 0.5
- p2212: 2.09297e-6; = p1106/p0818
- p3137: 0; = p2356*p1023
- p3211: 0; = p2430*p1132
- p0050: 11.845
- p3344: 0; = if(and(p1232=0;p3254<>0);p3254-(p3339+p3340+p3341+p3342+p3343);0)
- p0174: 0
- p4809: 0; = p1842*p3482
- p1301: 0; = IF(p1297+p1300=p1265;0;IF(p1297+p1300+p1299>p1265;p1265-(p1297+p1300);p1299))
- p2734: 5.99078e-6; = p2343*(p1078+p1080)
- p0106: 22.744
- p0241: 23.733
- p3238: 0.854735; = IF(p3237+p3235+p3236>1;1-(p3235+p3236);p3237)
- p3232: 4.21747e-8; = p1182/p0818
- p2181: 6.85773e-8; = p0887+p0889+p0893+p2180
- p2350: 6.74515e-5; = p2232*p2218
- p2115: 0.856281
- p1815: 0
- p0533: 0; = SQRT(2)*(IF((2*p0401-1)<0;-1;IF((2*p0401-1)>0;1;0))*SQRT(SQRT((2/(pi()*0.140012289)+LN(1-(2*p0401-1)^2)/2)^2-LN(1-(2*p0401-1)^2)/0.140012289)-(2/(pi()*0.140012289)+LN(1-(2*p0401-1)^2)/2)))
- p0044: 7.937
- p2272: 0.00190369; = p2230*p2218
- p1066: 0.00016854; = IF(p1012=0;p1052/(p1059*p0818);0)
- p0156: 93.417
- p1909: 0
- p2062: 3.76588
- p2567: 0; = p2371*p1014
- p1097: 0.0773317
- p2886: 0.000222234; = p2300*(p1079+p1081)
- p0080: 97.872
- p2503: 1.65336e-6; = p2307*p1073
- p1082: 0; = IF(p1071=0;IF(p1073+p1078+p1079+p1080+p1081=1;0;1-(p1073+p1078+p1079+p1080+p1081));0)
- p2207: 0.00156081; = p1119-p2205-p2204-p2206
- p3469: 0; = p3374*p1241
- p2506: 2.86359e-6; = p2310*p1073
- p3243: 5.87974e-10; = p3234*p1188*p3239/p0818
- p2679: 8.99644e-6; = p2288*(p1019+p1021)
- p2664: 0.000959278; = p2273*(p1128+p1130)
- p3112: 0; = p2331*p1023
- p0315: 0.5
- p2917: 0; = p2331*(p1020+p1022)
- p2385: 0; = p2229*p2214
- p0253: 82.295
- p3168: 0; = p2387*p1082
- p0053: 56.064
- p1927: 0
- p0178: 37.706
- p3342: 0; = if(and(p1232=0;p3254<>0);p3254*(p3272-p3337)/p3338;0)
- p0815: 0
- p2489: 1.64303e-5; = p2293*p1014
- p5222: 5.36482e-9; = p1843*p3484
- p1124: 0.35758; = if(p1121=0;p0718/100;0)
- p0383: 0.5
- p4308: 6.86474e-5; = p1963*p3479
- p0389: 0.5
- p1808: 0
- p2773: 0; = p2382*(p1078+p1080)
- p1259: 0; = if(p1232>0;0;p0730/100)
- p0829: 0; = if(p0807=480;p0814*(1-p0824);0)
- p3205: 0; = p2424*p1082
- p3436: 0; = p3379*p1239
- p3050: 0; = p2269*p1082
- p3371: 0; = if(p1232=0;p3245*p3359/p0818;0)
- p1991: 1.39569e8; = (if(p1111=0;0;p1106/p1111)+if(p1112=0;0;p1107/p1112)+if(p1113=0;0;p1108/p1113)+if(p1114=0;0;p1109/p1114)+if(p1115=0;0;p1110/p1115))*(1+p1157)
- p0142: 0
- p0905: 0.0983707; = p0904/p0818
- p3153: 0; = p2372*p1023
- p1739: 0.583082
- p1151: 5.82258e6; = if(p1121=0;p1149*p1148*p1145;0)
- p1252: 0; = if(p1232>0;0;p0724*2000*p0723*1000*p0725/100)
- p1155: 0.000638957; = if(p1153*p0818=0;0;p1151/(p1153*p0818))
- p0380: 0.5
- p1114: 0.216028
- p1027: 0; = IF(p1012=0;p1021*(p0704/100)*p0703*1000;0)
- p1966: 9.45e6; = if(p0814=0;p0802;0)
- p1191: 0.5
- p2432: 0.00355086; = p1158
- p0824: 0.8964
- p2782: 0; = p2391*(p1128+p1130)
- p3095: 6.52272e-7; = p2314*p1132
- p1963b: 4.00688e-7; = p1569*p1773+p1570*p1774+p1571*p1775+p1572*p1776+p1573*p1777+p1574*p1778+p1575*p1779+p1576*p1780+p1577*p1781+p1578*p1782+p1579*p1783+p1580*p1784+p1581*p1785+p1582*p1786+p1583*p1787+p1584*p1788+p1585*p1789+p1586*p1790+p1587*p1791
- p2019: 0.13105
- p2422: 0; = p2235*p2212
- p0960: 0; = if(and(p0683>0;or(p0807=480;p0807=32;p0807=1;and(p0807=60;p0901<0.03)));p0936;0)
- p0902: 0
- p5133: 5.40773e-7; = p1754*p3484
- p2433: 3.0755e-5; = p2237*p1014
- p3122: 0; = p2341*p1082
- p2642: 6.07713e-8; = p2251*(p1019+p1021)
- p2908: 0; = p2322*(p1020+p1022)
- p2024: 0.748682
- p3160: 0; = p2379*p1082
- p2358: 0; = p2225*p2186
- p3345: 0; = if(and(p1232=0;p3256<>0);p3273*p3277*p3293;0)
- p0580: 0; = IF(p0316<0.5;-SQRT(p0007*EXP(p0448^2*p0008)-p0007);SQRT(p0007*EXP(p0448^2*p0008)-p0007))
- p0994: 0; = p0990*p0001*p0004/(p0818*p0002)
- p0247: 26.797
- p1279: 0
- p2526: 0; = p2330*p1014
- p4604: 1.7394e-9; = p1843*p3481

- p0416: 0; = SQRT(2)*(IF((2*p0284-1)<0;-1;IF((2*p0284-1)>0;1;0))*SQRT(SQRT((2/(pi()*0.140012289)+LN(1-(2*p0284-1)^2)/2)^2-LN(1-(2*p0284-1)^2)/0.140012289)-(2/(pi()*0.140012289)+LN(1-(2*p0284-1)^2)/2)))
- p2532: 1.585e-6; = p2336*p1073
- p0009: 27.5173
- p0927: 0.000755474; = IF(p0918+p0923+p0924+p0925+p0926=1;0;1-(p0918+p0923+p0924+p0925+p0926))
- p0188: 8.961
- p2480: 2.32781e-6; = p2284*p1014
- p0789: 4.015; = p0129*(1+p0657*p0261/100)
- p0782: 13.833; = p0122*(1+p0650*p0254/100)
- p1269: 0
- p0840: 0.0815056; = p0839*p0831
- p1722: 0
- p1805: 0
- p0310: 0.5
- p1745: 0
- p3222: 0.224242; = IF(p3216=0;0;p1223*40.078/100.0869)
- p4184: 6.82621e-7; = p1835*p3479
- p3271: 0
- p2809: 0; = p2418*(p1078+p1080)
- p1867: 0
- p1906: 0
- p2140: 1.96751e-7; = p2015*p2068*p2102/(p0818*1000)
- p0612: 0; = IF(p0348<0.5;-SQRT(p0007*EXP(p0480^2*p0008)-p0007);SQRT(p0007*EXP(p0480^2*p0008)-p0007))
- p0926: 0.0136579; = IF(p0918+p0923+p0924+p0925=1;0;IF(p0918+p0923+p0924+p0925+p0922>1;1-(p0918+p0923+p0924+p0925);p0922))
- p1922: 0
- p2530: 0; = p2334*p1014
- p1566: 0
- p1907: 0
- p2514: 0; = p2318*p1014
- p2585: 0; = p2389*p1123
- p2510: 1.05383e-5; = p2314*p1123
- p1327a: 0.0717702; = (p0745*1000/p0801)*(1-(p0746+p0747+p0748+p0749+p0750+p0751+p0752+p0753)/100)+(p0754*1000/p0801)*(1-(p0755+p0756+p0757+p0758+p0759+p0760+p0761+p0762)/100)
- p2260: 0.000134907; = p2226*p2206
- p0997: 0; = if(p0888=0;0;if((p0695*p0694*1000*p0696/100)/p0888>1;1;(p0695*p0694*1000*p0696/100)/p0888))
- p1868: 0
- p1216: 0.155559
- p0955: 9.298e-5; = if(and(p0683>0;or(p0807=56;p0807=100;and(p0807=60;p0901>0.06)));p0937;0)
- p3117: 0; = p2336*p1082
- p0402: 0.5
- p2951: 0; = p2365*(p1020+p1022)
- p1263: 0; = if(p1232>0;0;IF(p1259=1;0;IF(p1259+p1260>1;1-p1259;p1260)))
- p2954: 0; = p2368*(p1020+p1022)
- p0585: 0; = IF(p0321<0.5;-SQRT(p0007*EXP(p0453^2*p0008)-p0007);SQRT(p0007*EXP(p0453^2*p0008)-p0007))
- p3075: 0; = p2294*p1023
- p2380: 0; = p2229*p2209
- p2365: 0; = p2225*p2193
- p0015: 56.707
- p2604: 0; = p2408*p1014
- p3175: 0; = p2394*p1023
- p0382: 0.5
- p3098: 0; = p2317*p1023
- p0256: 13.874
- p2232: 0.0219349; = if(p0783*p0787+p0784*p0788+p0785*p0789+p0786*p0790=0;0;p0789*p0785/(p0783*p0787+p0784*p0788+p0785*p0789+p0786*p0790))
- p2139: 3.84755e-7; = p2015*p2067*p2101/(p0818*1000)
- p3164: 0; = p2383*p1082
- p3314: 0; = if(and(p1232=0;p3253<>0);p3263*p3289;0)
- p2249: 2.27728e-5; = p2222*p2195
- p0677: 129.75; = p0017*(1+p0545*p0149/100)
- p1912: 0
- p2837: 8.46031e-8; = p2251*(p1020+p1022)
- p3358: 0; = if(p1232=0;p3308+p3319+p3330+p3341+p3352;0)
- p2114: 0.832356
- p2565: 0; = p2369*p1014
- p0867: 0.0474838; = IF(p0858+p0864+p0865+p0866=1;0;IF(p0858+p0864+p0865+p0866+p0862>1;1-(p0858+p0864+p0865+p0866);p0862))
- p1276: 0; = p1272*p1252/p0818
- p2865: 5.81743e-6; = p2279*(p1020+p1022)
- p2869: 4.43148e-6; = p2283*(p1020+p1022)
- p3566: 2.39982e-7; = p1835*p3476
- p2327: 0; = p2224*p2195
- p3388: 0; = p3369*p1234
- p1838: 0
- p4949: 0; = p1776*p3483
- p2568: 0; = p2372*p1014
- p0683: 66.685; = p0023*(1+p0551*p0155/100)
- p2562: 0; = p2366*p1014
- p2881: 2.20911e-6; = p2295*(p1020+p1022)
- p2693: 9.48127e-6; = p2302*(p1078+p1080)
- p1045: 0.0725313; = IF(p1012=0;IF(p1037+p1044=1;0;IF(p1037+p1044+p1039>1;1-(p1037+p1044);p1039));0)
- p2895: 2.05872e-6; = p2309*(p1079+p1081)
- p3129: 0; = p2348*p1082
- p2817: 0; = p2426*(p1078+p1080)
- p3233: 0.60394
- p3457: 0; = p3362*p1241
- p0891: 0; = IF(p3251=0;0;62.4*6272640/(12*12*12))
- p2799: 0; = p2408*(p1019+p1021)
- p2253: 6.64715e-7; = p2222*p2199
- p2397: 0; = p2234*p2186
- p2287: 0.000127208; = p2223*p2193
- p3064: 0; = p2283*p1023
- p0988: 0; = p0982*p0886
- p1631: 0.5
- p3188: 0; = p2407*p1023
- p2634: 1.56075e-5; = p2243*(p1019+p1021)
- p2879: 3.58023e-5; = p2293*(p1020+p1022)
- p3369: 0; = if(p1232=0;p3245*p3357/p0818;0)
- p2580: 0; = p2384*p1073
- p2706: 0; = p2315*(p1019+p1021)
- p0261: 23.89
- p2068: 0.153529
- p2304: 0.000152146; = p2227*p2211
- p2627: 0; = p2431*p1123
- p3057: 0; = p2276*p1023
- p2843: 2.11503e-5; = p2257*(p1020+p1022)
- p2554: 0; = p2358*p1014
- p1157: 0.24835
- p2591: 0; = p2395*p1014
- p1015: 0.32992; = IF(p1012=0;p0706/100;0)
- p2933: 4.49257e-6; = p2347*(p1079+p1081)
- p3218: 0.0210621; = p3214*p1228
- p2899: 4.73855e-5; = p2313*(p1129+p1131)
- p0212: 0.232
- p2099: 0.620397
- p0045: 21.078
- p1811: 0
- p0514: 0; = SQRT(2)*(IF((2*p0382-1)<0;-1;IF((2*p0382-1)>0;1;0))*SQRT(SQRT((2/(pi()*0.140012289)+LN(1-(2*p0382-1)^2)/2)^2-LN(1-(2*p0382-1)^2)/0.140012289)-(2/(pi()*0.140012289)+LN(1-(2*p0382-1)^2)/2)))
- p1606: 0
- p3202: 0; = p2421*p1082
- p3010: 0; = p2424*(p1079+p1081)
- p2507: 7.99025e-5; = p2311*p1123
- p1749: 0
- p3084: 0; = p2303*p1082
- p1613: 0
- p2225: 0; = if(p0765*p0769+p0766*p0770+p0767*p0771+p0768*p0772=0;0;p0772*p0768/(p0765*p0769+p0766*p0770+p0767*p0771+p0768*p0772))
- p3165: 0; = p2384*p1082
- p2275: 0.000251076; = p2230*p2221
- p0664: 0; = IF(p0400<0.5;-SQRT(p0007*EXP(p0532^2*p0008)-p0007);SQRT(p0007*EXP(p0532^2*p0008)-p0007))
- p2073: 0.377647
- p2176: 0.00269353; = p0895*p0913/p0818
- p3445: 0; = p3369*p1240
- p2274: 0.000144484; = p2230*p2220
- p1346: 504
- p0058: 35.758
- p1880: 0
- p1214: 55; = IF(p1213=0;0;p1213-1)
- p1069: 2.52978e-6; = IF(p1012=0;p1055/(p1062*p0818);0)
- p2104: 0.817136
- p0913: 0.00989994
- p2844: 0.000258247; = p2258*(p1079+p1081)
- p2698: 6.69532e-6; = p2307*(p1078+p1080)
- p0248: 14.168
- p3399: 0; = p3380*p1234
- p3621: 3.46641e-7; = p1890*p3476
- p2226: 0.717653; = if(p0774*p0778+p0775*p0779+p0776*p0780+p0777*p0781=0;0;p0778*p0774/(p0774*p0778+p0775*p0779+p0776*p0780+p0777*p0781))
- p2447: 3.88257e-8; = p2251*p1014
- p2218: 0.00307507; = p1150/p0818
- p1934: 0
- p1081: 0; = IF(p1071=0;IF(p1073+p1078+p1079+p1080=1;0;IF(p1073+p1078+p1079+p1080+p1077>1;1-(p1073+p1078+p1079+p1080);p1077));0)
- p1898: 0
- p0947: 0; = if(and(p0683=0;or(p0807=480;p0807=32;p0807=1;and(p0807=60;p0901<0.03)));p0935;0)
- p0284: 0.5
- p0933: 7177; = p0801*p0927
- p1161: 9.5e6; = p0801
- p2488: 1.67769e-7; = p2292*p1014
- p2904: 0; = p2318*(p1020+p1022)
- p3659: 3.46641e-7; = p1928*p3476
- p2361: 0; = p2225*p2189
- p3253: 0; = p1252*(p1277*(1-p3247)+p1280*(1-p3248)+p1281*(1-p3249)+p1282*(1-p3250))
- p2268: 5.36951e-5; = p2226*p2214
- p1777: 0
- p0311: 0.5
- p0838: 1.96274e10; = (p0833-p0836)*p0837
- p0769: 36.022; = p0109*(1+p0637*p0241/100)
- p2512: 0; = p2316*p1014
- p1735: 0
- p2533: 1.43351e-6; = p2337*p1073
- p1336: 0; = p1323*p0801
- p1089: 3.49967e-6; = IF(p1071=0;p1083*p0001/(p0818*p0002);0)
- p3308: 0; = if(and(p1232=0;p3252<>0);p3252*(p3259-p3303)/p3305;0)
- p2063: 2.01468
- p0042: 9495.23
- p3163: 0; = p2382*p1082
- p0920: 0.186683; = p0676*1000/p0801
- p1588: 0
- p1007: 0; = p1003*p0001*p0004/(p0818*p0002)
- p3087: 0; = p2306*p1082
- p3116: 0; = p2335*p1023
- p5304: 2.897e-8; = p1925*p3484
- p0934: 4.53407e-5; = p0928*p0001/(p0818*p0002)
- p2336: 1.82163e-5; = p2228*p2204
- p2021: 3.60069e-5; = p2020/p0818
- p2317: 0; = p2224*p2184
- p0638: 0; = IF(p0374<0.5;-SQRT(p0007*EXP(p0506^2*p0008)-p0007);SQRT(p0007*EXP(p0506^2*p0008)-p0007))
- p1658: 0
- p2581: 0; = p2385*p1073
- p1284: 0; = p1280*p1252/p0818
- p2155: 1.70689e-7; = p2015*p2084*p2117/(p0818*1000)
- p2092: 0.54529
- p2033: 4.00174e-6; = p2015*p2029*p2031/(p0818*1000)
- p0412: 0; = SQRT(2)*(IF((2*p0280-1)<0;-1;IF((2*p0280-1)>0;1;0))*SQRT(SQRT((2/(pi()*0.140012289)+LN(1-(2*p0280-1)^2)/2)^2-LN(1-(2*p0280-1)^2)/0.140012289)-(2/(pi()*0.140012289)+LN(1-(2*p0280-1)^2)/2)))
- p2194: 0.214362
- p0631: 0; = IF(p0367<0.5;-SQRT(p0007*EXP(p0499^2*p0008)-p0007);SQRT(p0007*EXP(p0499^2*p0008)-p0007))
- p0696: 0
- p1756: 0
- p1090: 1.4172e-5; = IF(p1071=0;p1084*p0001/(p0818*p0002);0)
- p2204: 0.000641854; = p1109/p0818
- p1802: 0
- p2235: 0; = 1-(p2226+p2227+p2228+p2229)
- p0613: 0; = IF(p0349<0.5;-SQRT(p0007*EXP(p0481^2*p0008)-p0007);SQRT(p0007*EXP(p0481^2*p0008)-p0007))
- p0818: 2.4948e10; = p0806*p0807
- p5337: 0; = p1962*p3484
- p2739: 1.44589e-7; = p2348*(p1078+p1080)
- p1650: 0
- p2812: 0; = p2421*(p1078+p1080)
- p1083: 97861; = IF(p1071=0;p1073*(p0710/100)*p0703*1000;0)
- p1326: 0; = IF(((p0745*1000*p0753/100)+(p0754*1000*p0762/100))/p0801<0;0;((p0745*1000*p0753/100)+(p0754*1000*p0762/100))/p0801)
- p2228: 0.0283808; = if(p0774*p0778+p0775*p0779+p0776*p0780+p0777*p0781=0;0;p0780*p0776/(p0774*p0778+p0775*p0779+p0776*p0780+p0777*p0781))
- p2171: 0.083832; = p2165*p0831
- p1237: 0; = if(p1232>0;0;p0729/100)
- p2985: 0; = p2399*(p1020+p1022)
- p0652: 0; = IF(p0388<0.5;-SQRT(p0007*EXP(p0520^2*p0008)-p0007);SQRT(p0007*EXP(p0520^2*p0008)-p0007))
- p3464: 0; = p3369*p1241
- p1617: 0
- p0973: 6.33192e8; = p0967+p0968+p0969
- p0052: 35.235
- p0744: 0.342; = p0084*(1+p0612*p0216/100)
- p2170: 0.00718099; = p2166*(p0913)
- p3734: 4.33502e-8; = p1797*p3477
- p0709: 0
- p0184: 20.104
- p2551: 0; = p2355*p1014
- p0901: 0.0656776
- p1928: 4.16867e-6; = p1520*1000/p0818
- p4397: 0; = p1842*p3480
- p3895: 0; = p1962*p3477
- p0883: 0.00170082; = p0882*p0001*p0003/(p0818*p0002)
- p2276: 0.000174715; = p2223*p2182
- p1881: 0
- p4068: 6.89611e-7; = p1925*p3478
- p2768: 0; = p2377*(p1078+p1080)
- p1963: 0.000290229; = p1963a+p1963b+p1963c+p1963d+p1963e+p1963f+p1963g+p1963h+p1963i+p1963j+p1963k
- p1180: 7.66675e-8; = p1176*p1179/p0818
- p1630: 0
- p2788: 0; = p2397*(p1019+p1021)
- p3443: 0; = p3367*p1240
- p2665: 5.16647e-5; = p2274*(p1128+p1130)
- p2918: 0; = p2332*(p1020+p1022)
- p2658: 5.53417e-6; = p2267*(p1078+p1080)
- p0845: 0.5
- p2820: 0; = p2429*(p1128+p1130)
- p4513: 0; = p1962*p3480
- p0286: 0.5
- p0858: 0.901184; = p0670*1000/p0856
- p1232: 9.5e6; = p0801
- p0003: 10000
- p2521: 0; = p2325*p1014
- p5174: 5.794e-8; = p1795*p3484
- p1889: 1.08225e-5; = p1481*1000/p0818
- p2460: 2.8566e-6; = p2264*p1073
- p2875: 0.000123805; = p2289*(p1020+p1022)
- p0800: 13.833; = p0140*(1+p0668*p0272/100)
- p2131: 3.63097e-7; = p2015*p2059*p2093/(p0818*1000)
- p3307: 0; = if(and(p1232=0;p3252<>0);p3252*(p3258-p3302)/p3305;0)
- p0499: 0; = SQRT(2)*(IF((2*p0367-1)<0;-1;IF((2*p0367-1)>0;1;0))*SQRT(SQRT((2/(pi()*0.140012289)+LN(1-(2*p0367-1)^2)/2)^2-LN(1-(2*p0367-1)^2)/0.140012289)-(2/(pi()*0.140012289)+LN(1-(2*p0367-1)^2)/2)))
- p2059: 1.00168
- p4686: 9.39278e-9; = p1925*p3481
- p1865: 0
- p2410: 0; = p2234*p2200
- p0507: 0; = SQRT(2)*(IF((2*p0375-1)<0;-1;IF((2*p0375-1)>0;1;0))*SQRT(SQRT((2/(pi()*0.140012289)+LN(1-(2*p0375-1)^2)/2)^2-LN(1-(2*p0375-1)^2)/0.140012289)-(2/(pi()*0.140012289)+LN(1-(2*p0375-1)^2)/2)))
- p1104: 0.242165; = IF(p1071=0;IF(p1096+p1101+p1102+p1103=1;0;1-(p1096+p1101+p1102+p1103));0)
- p0922: 0.0136579; = p0677*1000/p0801
- p2152: 2.89049e-8; = p2015*p2080*p2114/(p0818*1000)
- p2976: 0; = p2390*(p1129+p1131)
- p0663: 0; = IF(p0399<0.5;-SQRT(p0007*EXP(p0531^2*p0008)-p0007);SQRT(p0007*EXP(p0531^2*p0008)-p0007))
- p2455: 3.62486e-5; = p2259*p1073
- p1709: 0
- p0765: 15.31; = p0105*(1+p0633*p0237/100)
- p1790: 0
- p0216: 33.917
- p0822: 0.898833
- p3449: 0; = p3373*p1240
- p0917: 1.32164
- p2973: 0; = p2387*(p1079+p1081)
- p3986: 1.27706e-7; = p1843*p3478
- p4458: 0; = p1903*p3480
- p2770: 0; = p2379*(p1078+p1080)
- p3334: 0; = IF(or(p3254=0;p1232>0);0;p3269*p3277*(p3300*p3292+(1-p3300)*p3296))
- p2011: 0.00129338
- p4213: 3.50791e-6; = p1864*p3479
- p4480: 0; = p1925*p3480
- p2508: 0.000112599; = p2312*p1123
- p2255: 2.79091e-5; = p2222*p2201
- p2086: 0.0617647
- p2956: 0; = p2370*(p1020+p1022)
- p3357: 0; = if(p1232=0;p3307+p3318+p3329+p3340+p3351;0)
- p4624: 9.39278e-9; = p1863*p3481
- p0452: 0; = SQRT(2)*(IF((2*p0320-1)<0;-1;IF((2*p0320-1)>0;1;0))*SQRT(SQRT((2/(pi()*0.140012289)+LN(1-(2*p0320-1)^2)/2)^2-LN(1-(2*p0320-1)^2)/0.140012289)-(2/(pi()*0.140012289)+LN(1-(2*p0320-1)^2)/2)))
- p3323: 0; = if(and(p1232=0;p3255<>0);p3265*p3277*(p3299*p3291+(1-p3299)*p3295);0)
- p0985: 0; = IF(p0982=1;0;IF(p0982+p0983>1;1-p0982;p0983))
- p4630: 2.01771e-8; = p1869*p3481
- p1250: 0; = if(p1232>0;0;p1245*p0001/(p0818*p0002))
- p3300: 0; = if(p1293+p1294+p1295+p1296=0;0;p1293/(p1293+p1294+p1295+p1296))
- p1851: 0
- p0826: 0.101167; = 1-p0825/p0818
- p0801: 9.5e6
- p2334: 0; = p2224*p2202
- p1565: 0
- p2046: 10
- p0747: 0.768; = p0087*(1+p0615*p0219/100)
- p1792: 0
- p3351: 0; = if(and(p1232=0;p3256<>0);p3256*(p3274-p3346)/p3349;0)
- p2310: 3.2911e-5; = p2227*p2217
- p2490: 7.04404e-6; = p2294*p1014
- p2877: 1.66276e-7; = p2291*(p1020+p1022)
- p1245: 0; = if(p1232>0;0;p1240*(p0725/100)*p0723*1000)
- p1231: 0.0323301; = IF(p1221=0;0;p1230*(p1228+p1229))
- p3362: 0; = if(p1232=0;p3244*p3356/p0818;0)
- p1642: 0
- p2462: 1.30691e-7; = p2266*p1073
- p2415: 0; = p2235*p2205
- p2584: 0; = p2388*p1073
- p2691: 0.00013967; = p2300*(p1078+p1080)
- p2670: 4.17872e-6; = p2279*(p1019+p1021)
- p2542: 1.84763e-7; = p2346*p1073
- p5042: 0; = p1869*p3483
- p0124: 65.676
- p1935: 0
- p3322: 0; = if(and(p1232=0;p3253<>0);p3253-(p3317+p3318+p3319+p3320+p3321);0)
- p0376: 0.5
- p2220: 0.000233389; = p1151/p0818
- p3254: 0; = p1252*(p1287*(1-p3247)+p1290*(1-p3248)+p1291*(1-p3249)+p1292*(1-p3250))
- p3230: 1.37484e-7; = p1170/p0818
- p0483: 0; = SQRT(2)*(IF((2*p0351-1)<0;-1;IF((2*p0351-1)>0;1;0))*SQRT(SQRT((2/(pi()*0.140012289)+LN(1-(2*p0351-1)^2)/2)^2-LN(1-(2*p0351-1)^2)/0.140012289)-(2/(pi()*0.140012289)+LN(1-(2*p0351-1)^2)/2)))
- p3348: 0; = if(and(p1232=0;p3256<>0);p3276*p3289;0)
- p1173: 0.5
- p2826: 4.85831e-6; = p2240*(p1020+p1022)
- p3231: 1.53335e-7; = p1176/p0818
- p3105: 0; = p2324*p1023
- p4192: 4.74042e-8; = p1843*p3479
- p1674: 0
- p0523: 0; = SQRT(2)*(IF((2*p0391-1)<0;-1;IF((2*p0391-1)>0;1;0))*SQRT(SQRT((2/(pi()*0.140012289)+LN(1-(2*p0391-1)^2)/2)^2-LN(1-(2*p0391-1)^2)/0.140012289)-(2/(pi()*0.140012289)+LN(1-(2*p0391-1)^2)/2)))
- p3244: 0; = p0791/100
- p3029: 0; = p2248*p1023
- p2626: 0; = p2430*p1123
- p1591: 0.677771
- p1569: 0
- p3330: 0; = if(and(p1232=0;p3255<>0);p3255*(p3267-p3325)/p3327;0)
- p4926: 0; = p1963*p3482
- p2534: 4.64209e-7; = p2338*p1073
- p0571: 0; = IF(p0307<0.5;-SQRT(p0007*EXP(p0439^2*p0008)-p0007);SQRT(p0007*EXP(p0439^2*p0008)-p0007))
- p0406: 0; = SQRT(2)*(IF((2*p0274-1)<0;-1;IF((2*p0274-1)>0;1;0))*SQRT(SQRT((2/(pi()*0.140012289)+LN(1-(2*p0274-1)^2)/2)^2-LN(1-(2*p0274-1)^2)/0.140012289)-(2/(pi()*0.140012289)+LN(1-(2*p0274-1)^2)/2)))
- p1579: 0
- p0063: 9495.25
- p1575: 0
- p1053: 441728; = IF(p1012=0;p1046*p1036;0)
- p0655: 0; = IF(p0391<0.5;-SQRT(p0007*EXP(p0523^2*p0008)-p0007);SQRT(p0007*EXP(p0523^2*p0008)-p0007))
- p2493: 1.41835e-5; = p2297*p1073
- p2377: 0; = p2229*p2206
- p0848: 0
- p1862: 0
- p3220: 0.00335734; = p3216*p1228
- p1225: 1.088; = IF(p1221=0;0;p1223+1.2*p1224)
- p2863: 1.76152e-5; = p2277*(p1020+p1022)
- p3123: 0; = p2342*p1082
- p1618: 0
- p0399: 0.5
- p3234: 0.39606; = 1-p3233
- p2511: 0; = p2315*p1014
- p1164: 45906.5; = p1163*p0801
- p0244: 53.562
- p2210: 4.57473e-5; = 6*1.00794*p2208/30.973762
- p1273: 0; = p1267*p1252/p0818
- p1120: 0.000985081; = IF(p1071=0;p1110/(p1115*p0818);0)
- p1023: 0; = IF(p1012=0;IF(p1014+p1019+p1020+p1021+p1022=1;0;1-(p1014+p1019+p1020+p1021+p1022));0)
- p2657: 5.29239e-7; = p2266*(p1078+p1080)
- p3037: 0; = p2256*p1023
- p2219: 0.00433342; = p1154-p2218
- p2316: 0; = p2224*p2183
- p2178: 0.0314446; = (p0895*p0831/(1-p0831))/(p0818)
- p5214: 7.72534e-8; = p1835*p3484
- p0714: 0
- p2325: 0; = p2224*p2192
- p2999: 0; = p2413*(p1020+p1022)
- p3171: 0; = p2390*p1132
- p0887: 0; = 1000*p0886*p0001*p0003*p0004/(p0818*p0002)
- p2732: 1.05953e-6; = p2341*(p1078+p1080)
- p1235: 0; = if(p1232>0;0;p0727/100)
- p1767: 1.33478e-5; = p1359*1000/p0818
- p2339: 4.42971e-5; = p2228*p2207
- p2333: 0; = p2224*p2201
- p2403: 0; = p2234*p2192
- p0885: 100; = IF(p0689+p0884=100;0;100-(p0689+p0884))
- p1612: 0
- p2727: 6.41852e-6; = p2336*(p1078+p1080)
- p1891: 0
- p1771: 0
- p2674: 3.18318e-6; = p2283*(p1019+p1021)
- p0814: 0; = if(p0807=480;p0810*p0812+p0811*p0813;0)
- p0879: 0.161319; = p0878*p0001*p0003/(p0818*p0002)
- p3498: 1.10992e-6; = p1767*p3476
- p1850: 0
- p3277: 0
- p2859: 0.00151723; = p2273*(p1129+p1131)
- p0016: 1773.49
- p1726: 0
- p2846: 7.56341e-5; = p2260*(p1079+p1081)
- p3368: 0; = if(p1232=0;p3245*p3356/p0818;0)
- p2205: 0.000580508; = 2*14.0067*p2204/30.973762
- p1021: 0; = IF(p1012=0;IF(p1014+p1019+p1020=1;0;IF(p1014+p1019+p1020+p1017>1;1-(p1014+p1019+p1020);p1017));0)
- p2654: 2.67919e-5; = p2263*(p1078+p1080)
- p0351: 0.5
- p1807: 0
- p2413: 0; = p2234*p2203
- p2803: 0; = p2412*(p1019+p1021)
- p0387: 0.5
- p3127: 0; = p2346*p1082
- p3182: 0; = p2401*p1023
- p4212: 2.55983e-7; = p1863*p3479
- p0221: 24.613
- p3059: 0; = p2278*p1023
- p1310: 0; = IF(p1307=p1266;0;IF(p1307+p1308>p1266;p1266-p1307;p1308))
- p2747: 0; = p2356*(p1019+p1021)
- p2277: 3.83522e-5; = p2223*p2183
- p3114: 0; = p2333*p1023
- p5015: 0; = p1842*p3483
- p1342: 0; = p1326*p0801
- p3380: 0; = p3251/p0818
- p3260: 0
- p1894: 0
- p0967: 3.09378e7; = (p0684/100)*p0683*p0682*1000
- p3475: 0; = p3380*p1241
- p1776: 1.66747e-5; = p1368*1000/p0818
- p2467: 8.09186e-6; = p2271*p1073
- p2459: 6.61605e-6; = p2263*p1073
- p1947: 0
- p0686: 0
- p1974: 0; = p1969*p0001/(p0818*p0002)
- p2621: 0; = p2425*p1073
- p1597: 0
- p3472: 0; = p3377*p1241
- p0047: 45.93
- p1174: 6.8742e-8; = p1170*p1173/p0818
- p2297: 0.000163009; = p2227*p2204
- p0946: 0; = if(and(p0683=0;or(p0807=480;p0807=32;p0807=1;and(p0807=60;p0901<0.03)));p0934;0)
- p1673: 0
- p4510: 0; = p1955*p3480
- p3403: 0; = p3365*p1238
- p1313: 0; = p1307*p1252/p0818
- p3416: 0; = p3378*p1238
- p2025: 3.27589e-6; = p2015*p2023*p2024/(p0818*1000)
- p1167: 0.5
- p1648: 0
- p0238: 25.553
- p3035: 0; = p2254*p1023
- p0817: 0
- p1759: 0
- p0855: 1.34157; = p0854*p0001*p0003/(p0818*p0002)
- p1679: 0
- p0614: 0; = IF(p0350<0.5;-SQRT(p0007*EXP(p0482^2*p0008)-p0007);SQRT(p0007*EXP(p0482^2*p0008)-p0007))
- p3058: 0; = p2277*p1023
- p2622: 0; = p2426*p1073
- p3471: 0; = p3376*p1241
- p0051: 8.701
- p1848: 0
- p0260: 13.514
- p3209: 0; = p2428*p1132
- p5062: 0; = p1889*p3483
- p1577: 0
- p2538: 1.12969e-7; = p2342*p1073
- p3384: 0; = p3365*p1234
- p1197: 1.806
- p2861: 0.000141998; = p2275*(p1129+p1131)
- p3005: 0; = p2419*(p1079+p1081)
- p4331: 0; = p1776*p3480
- p3528: 4.69965e-7; = p1797*p3476
- p2701: 1.15962e-5; = p2310*(p1078+p1080)
- p1732: 0
- p0684: 4.886; = p0024*(1+p0552*p0156/100)
- p0819: 0; = p0808*p0809/p0818
- p2319: 0; = p2224*p2186
- p5269: 1.11588e-7; = p1890*p3484
- p0682: 9495.27; = p0022*(1+p0550*p0154/100)
- p1226: 9.5e6; = IF(p1221=0;0;IF(p1193=0;p0801;0))
- p0236: 8.795
- p2441: 1.94402e-6; = p2245*p1014
- p2963: 0; = p2377*(p1079+p1081)
- p2867: 2.0338e-6; = p2281*(p1020+p1022)
- p1383: 6
- p5076: 0; = p1903*p3483
- p4483: 0; = p1928*p3480
- p0316: 0.5
- p0945: 0; = if(and(p0683=0;p0951=0);p0939;0)
- p0084: 0.342
- p3392: 0; = p3373*p1234
- p3446: 0; = p3370*p1240
- p1312: 0; = IF(p1307+p1310+p1311=p1266;0;p1266-(p1307+p1310+p1311))
- p2292: 7.95942e-7; = p2223*p2199
- p1262: 0; = if(p1232>0;0;p0733/100)
- p2251: 1.842e-7; = p2222*p2197
- p2136: 8.04894e-7; = p2015*p2064*p2098/(p0818*1000)
- p2009: 0.0188839; = ((p1983*p1985+p1989*p1991+p1995*p1997+p2003*p2005+p1976*p1977+p1978*p1979+p1998*p1999)/p0818)*p0005*p0002/1000
- p5268: 2.897e-7; = p1889*p3484
- p2357: 0; = p2225*p2185
- p2050: 0.952062
- p0490: 0; = SQRT(2)*(IF((2*p0358-1)<0;-1;IF((2*p0358-1)>0;1;0))*SQRT(SQRT((2/(pi()*0.140012289)+LN(1-(2*p0358-1)^2)/2)^2-LN(1-(2*p0358-1)^2)/0.140012289)-(2/(pi()*0.140012289)+LN(1-(2*p0358-1)^2)/2)))
- p2186: 5.6461e-5; = p1052/p0818
- p2717: 0; = p2326*(p1019+p1021)
- p0322: 0.5
- p3009: 0; = p2423*(p1079+p1081)
- p0897: 0
- p0410: 0; = SQRT(2)*(IF((2*p0278-1)<0;-1;IF((2*p0278-1)>0;1;0))*SQRT(SQRT((2/(pi()*0.140012289)+LN(1-(2*p0278-1)^2)/2)^2-LN(1-(2*p0278-1)^2)/0.140012289)-(2/(pi()*0.140012289)+LN(1-(2*p0278-1)^2)/2)))
- p2458: 1.46304e-5; = p2262*p1073
- p0182: 9.449
- p3086: 0; = p2305*p1082
- p1717: 0
- p2680: 8.89301e-5; = p2289*(p1019+p1021)
- p1757: 0
- p0695: 0
- p3439: 0; = p3363*p1240
- p0377: 0.5
- p3396: 0; = p3377*p1234
- p2329: 0; = p2224*p2197
- p1304: 0; = p1300*p1252/p0818
- p3305: 0; = if(and(p1232=0;p3252<>0);1-(p3301+p3302+p3303+p3304);0)
- p4600: 1.4611e-8; = p1839*p3481
- p3043: 0; = p2262*p1082
- p0441: 0; = SQRT(2)*(IF((2*p0309-1)<0;-1;IF((2*p0309-1)>0;1;0))*SQRT(SQRT((2/(pi()*0.140012289)+LN(1-(2*p0309-1)^2)/2)^2-LN(1-(2*p0309-1)^2)/0.140012289)-(2/(pi()*0.140012289)+LN(1-(2*p0309-1)^2)/2)))
- p1866: 0
- p3313: 0; = if(and(p1232=0;p3253<>0);p3262*(p3278*(p3282*p1256+p3286*(p1253+p1257)+p1258*p3288+p3298*p3287));0)
- p3430: 0; = p3373*p1239
- p2111: 0.856281
- p0719: 56.556; = p0059*(1+p0587*p0191/100)
- p2244: 8.05761e-6; = p2222*p2189
- p1266: 0; = if(p1232>0;0;IF(p1259+p1263+p1264+p1265=1;0;1-(p1259+p1263+p1264+p1265)))
- p3045: 0; = p2264*p1082
- p2064: 0.676706
- p3092: 4.94561e-6; = p2311*p1132
- p1712: 0
- p2853: 8.80566e-6; = p2267*(p1079+p1081)
- p1975: 0.000339735; = p1970*p0001/(p0818*p0002)
- p0998: 0; = if(p0888=0;0;if((p0699*p0698*1000*p0700/100)/p0888>1;1;(p0699*p0698*1000*p0700/100)/p0888))
- p1018: 0; = IF(p1012=0;p0709/100;0)
- p4664: 1.21271e-6; = p1903*p3481
- p1696: 0
- p1778: 0
- p2281: 4.42803e-6; = p2223*p2187
- p2714: 0; = p2323*(p1019+p1021)
- p3862: 8.3011e-9; = p1925*p3477
- p0213: 12.739
- p3441: 0; = p3365*p1240
- p2360: 0; = p2225*p2188
- p1724: 0.797375
- p3226: 0.00195189; = p3222*p1229
- p3107: 0; = p2326*p1023
- p2970: 0; = p2384*(p1079+p1081)
- p0717: 7.238; = p0057*(1+p0585*p0189/100)
- p0634: 0; = IF(p0370<0.5;-SQRT(p0007*EXP(p0502^2*p0008)-p0007);SQRT(p0007*EXP(p0502^2*p0008)-p0007))
- p0151: 0
- p1981: 400
- p2485: 5.68158e-5; = p2289*p1014
- p1064: 0.000391007; = IF(p1012=0;p1050/(p1057*p0818);0)
- p2089: 0.40001
- p4390: 0; = p1835*p3480
- p2378: 0; = p2229*p2207
- p2079: 0.02
- p3077: 0; = p2296*p1023
- p2118: 0.679049
- p1957: 0
- p0886: 0; = p0686*1000*p0687*p0689/100
- p0698: 0
- p1703: 0
- p2029: 6.19
- p1704: 0
- p0676: 1773.49; = p0016*(1+p0544*p0148/100)
- p2633: 1.22004e-6; = p2242*(p1019+p1021)
- p5248: 6.22319e-8; = p1869*p3484
- p1315: 0; = p1311*p1252/p0818
- p2346: 2.12347e-6; = p2228*p2214
- p3099: 0; = p2318*p1023
- p3400: 0; = p3362*p1238
- p0378: 0.5
- p0155: 1.566
- p3011: 0; = p2425*(p1079+p1081)
- p3329: 0; = if(and(p1232=0;p3255<>0);p3255*(p3266-p3324)/p3327;0)
- p2414: 0; = p2235*p2204
- p2733: 4.57472e-7; = p2342*(p1078+p1080)
- p0987: 0; = if(p0978>0;0;if(and(p0687=0;p0691=0;p0695=0;p0699=0);0;IF(p0982+p0985+p0986=1;0;1-(p0982+p0985+p0986))))
- p1915: 0
- p0400: 0.5
- p3363: 0; = if(p1232=0;p3244*p3357/p0818;0)
- p4556: 1.87856e-8; = p1795*p3481
- p1760: 0
- p1982: 750
- p1264: 0; = if(p1232>0;0;IF(p1259+p1263=1;0;IF(p1259+p1263+p1261>1;1-(p1259+p1263);p1261)))
- p0852: 0; = p0847*p0851^3+p0848*p0851^2+p0849*p0851+p0850
- p1705: 0
- p2435: 6.47291e-7; = p2239*p1014
- p0641: 0; = IF(p0377<0.5;-SQRT(p0007*EXP(p0509^2*p0008)-p0007);SQRT(p0007*EXP(p0509^2*p0008)-p0007))
- p1888: 0
- p2429: 0; = p2236*p2219
- p0575: 0; = IF(p0311<0.5;-SQRT(p0007*EXP(p0443^2*p0008)-p0007);SQRT(p0007*EXP(p0443^2*p0008)-p0007))
- p2352: 5.11936e-6; = p2232*p2220
- p1855: 3.81594e-5; = p1447*1000/p0818
- p4970: 0; = p1797*p3483
- p1628: 0
- p3067: 0; = p2286*p1023
- p1095: 5.53087e7; = IF(p1071=0;p0797*p0702*1000*p0798/100;0)
- p2090: 0.40001
- p1758: 0
- p1051: 168352; = IF(p1012=0;p1044*p1036;0)
- p2948: 0; = p2362*(p1020+p1022)
- p3361: 0; = if(p1232=0;p3311+p3322+p3333+p3344+p3355;0)
- p2651: 4.75344e-5; = p2260*(p1078+p1080)
- p3158: 0; = p2377*p1082
- p3150: 0; = p2369*p1023
- p1610: 0
- p2540: 5.16841e-9; = p2344*p1073
- p1025: 248640; = IF(p1012=0;p1019*(p0704/100)*p0703*1000;0)
- p0317: 0.5
- p3151: 0; = p2370*p1023
- p1189: 0.000339735; = p0801*p0001/(p0818*p0002)
- p3162: 0; = p2381*p1082
- p0924: 0.186683; = IF(p0918+p0923=1;0;IF(p0918+p0923+p0920>1;1-(p0918+p0923);p0920))
- p1059: 0.335
- p1860: 0
- p0113: 11.845
- p2449: 1.40109e-7; = p2253*p1014
- p0761: 0
- p3229: 1.84009e-6; = p1164/p0818
- p3385: 0; = p3366*p1234
- p1685: 0.491852
- p1136: 0; = if(p1121=0;p1130*(p0716/100)*p0703*1000;0)
- p2905: 0; = p2319*(p1020+p1022)
- p3451: 0; = p3375*p1240
- p2906: 0; = p2320*(p1020+p1022)
- p0147: 0
- p3276: 0
- p0825: 2.24241e10; = p0818*p0822
- p1255: 0; = if(p1232>0;0;p0737/100)
- p1109: 1.6013e7; = IF(p1071=0;p1105*p1103*p1095;0)
- p2781: 0; = p2390*(p1128+p1130)
- p1849: 0
- p0189: 13.847
- p0262: 79.915
- p3041: 0; = p2260*p1082
- p3194: 0; = p2413*p1023
- p0217: 73.064
- p2882: 2.53257e-5; = p2296*(p1020+p1022)
- p2457: 9.74617e-5; = p2261*p1073
- p1302: 0; = IF(p1297+p1300+p1301=p1262;0;p1262-(p1297+p1300+p1301))
- p0509: 0; = SQRT(2)*(IF((2*p0377-1)<0;-1;IF((2*p0377-1)>0;1;0))*SQRT(SQRT((2/(pi()*0.140012289)+LN(1-(2*p0377-1)^2)/2)^2-LN(1-(2*p0377-1)^2)/0.140012289)-(2/(pi()*0.140012289)+LN(1-(2*p0377-1)^2)/2)))
- p1268: 0
- p0692: 0
- p1970: 9.5e6; = p0801
- p2857: 5.21391e-5; = p2271*(p1079+p1081)
- p5131: 0; = p1962*p3483
- p1669: 0
- p2898: 0.000879825; = p2312*(p1129+p1131)
- p2473: 8.08387e-6; = p2277*p1014
- p3259: 0
- p0477: 0; = SQRT(2)*(IF((2*p0345-1)<0;-1;IF((2*p0345-1)>0;1;0))*SQRT(SQRT((2/(pi()*0.140012289)+LN(1-(2*p0345-1)^2)/2)^2-LN(1-(2*p0345-1)^2)/0.140012289)-(2/(pi()*0.140012289)+LN(1-(2*p0345-1)^2)/2)))
- p2940: 0; = p2354*(p1020+p1022)
- p3193: 0; = p2412*p1023
- p1295: 0; = p1291*p1252/p0818
- p2738: 2.82348e-6; = p2347*(p1078+p1080)
- p2121: 0.822447
- p2541: 5.40452e-8; = p2345*p1073
- p2192: 4.12447e-5; = p1067-p2189-p2190-p2191
- p3241: 6.34002e-10; = p3234*p1188*p3236/p0818
- p2544: 3.57052e-8; = p2348*p1073
- p0931: 2.6e6; = p0801*p0925
- p1187: 0.000298194
- p3091: 0; = p2310*p1082
- p0984: 0; = if(p0886=0;0;min(1;(p0699*p0698*1000*p0701/100)/p0886))
- p2233: 0; = if(p0783*p0787+p0784*p0788+p0785*p0789+p0786*p0790=0;0;p0790*p0786/(p0783*p0787+p0784*p0788+p0785*p0789+p0786*p0790))
- p2318: 0; = p2224*p2185
- p0011: 405.833
- p2619: 0; = p2423*p1073
- p0271: 13.064
- p3397: 0; = p3378*p1234
- p4394: 0; = p1839*p3480
- p2934: 2.30063e-7; = p2348*(p1079+p1081)
- p3335: 0; = IF(or(p3254=0;p1232>0);0;p3270*(p3280*(p3283*p1256+p3286*(p1253+p1257)+p1258*p3288+p3300*p3287)))
- p0270: 9.449
- p0642: 0; = IF(p0378<0.5;-SQRT(p0007*EXP(p0510^2*p0008)-p0007);SQRT(p0007*EXP(p0510^2*p0008)-p0007))
- p1103: 0.663396; = IF(p1071=0;IF(p1096+p1101+p1102=1;0;IF(p1096+p1101+p1102+p1099>1;1-(p1096+p1101+p1102);p1099));0)
- p3131: 3.02183e-7; = p2350*p1132
- p1143: 0; = if(p1121=0;p1137*p0001/(p0818*p0002);0)
- p3364: 0; = if(p1232=0;p3244*p3358/p0818;0)
- p2986: 0; = p2400*(p1020+p1022)
- p1138: 5884.37; = if(p1121=0;p1132*(p0716/100)*p0703*1000;0)
- p3372: 0; = if(p1232=0;p3245*p3360/p0818;0)
- p1668: 0
- p1337: 0; = p1336*p0001/(p0818*p0002)
- p2015: 3.46543e7; = p0830*p2011*p2013
- p2845: 0.000233564; = p2259*(p1079+p1081)
- p2286: 2.24751e-5; = p2223*p2192
- p5338: 7.76894e-6; = p1963*p3484
- p1587: 0.799395
- p0637: 0; = IF(p0373<0.5;-SQRT(p0007*EXP(p0505^2*p0008)-p0007);SQRT(p0007*EXP(p0505^2*p0008)-p0007))
- p0139: 75.698
- p2188: 0.000103953; = p1066-p2186-p2187

## Reference product
- soybeans; at harvest in 1996; at farm; 85%-92% moisture: 1 kg

## Inputs from technosphere
- CUTOFF nitrogenous fertilizer, ammonium nitrate; at point-of-sale: 0.00016854 kg; = p1066
- CUTOFF soya seeds; GMO herbicide resistant seed; at point-of-sale: 0.00124009 kg; = p0970
- CUTOFF pesticide, Imazethapyr; at point-of-sale; kg AI: 1.48308e-5 kg; = p1864
- CUTOFF pesticide, Fluazifop-p-butyl; at point-of-sale; kg AI: 1.6835e-6 kg; = p1839
- CUTOFF domestic barge transport; average fuel: 0.00541391 metric ton*km; = p2007
- CUTOFF zinc compounds storage: 2.10873e-8 kg*a; = p1186
- CUTOFF nitrogenous fertilizer, urea; at point-of-sale: 0.000314391 kg; = p1070
- CUTOFF sewage sludge storage: 5.6775e-8 kg*a; = p1192
- CUTOFF sewage sludge; at point-of-sale: 1.1355e-7 kg; = p1190
- CUTOFF pesticide, Alachlor; at point-of-sale; kg AI: 1.33478e-5 kg; = p1767
- CUTOFF seed storage; soybeans: 0.0126902 kg*a; = p0975
- CUTOFF pesticide, 2,4-D; at point-of-sale; kg AI: 2.0202e-5 kg; = p1754
- CUTOFF nitrogenous fertilizer, aqueous ammonia; at point-of-sale: 2.99916e-5 kg; = p1065
- CUTOFF prepare soil; for reduced till, soybeans; 15-30% residue: 9.298e-5 ha; = p0937
- CUTOFF planting; for unspec. till, soybeans: 2.56661e-7 ha; = p0957
- CUTOFF pesticide, Glyphosate; at point-of-sale; kg AI: 3.81594e-5 kg; = p1855
- CUTOFF apply P fertilizer; broadcast with incorporation: 1.4172e-5 ha; = p1090
- CUTOFF prepare soil; for ridge till, soybeans: 4.64007e-6 ha; = p0938
- CUTOFF apply pesticide; broadcast with incorporation: 0.000580417 ha; = p1333
- CUTOFF apply sewage sludge; unspecified method: 0.000339735 ha; = p1189
- CUTOFF harvest; soybeans: 0.000337947 ha; = p1971
- CUTOFF local area trucking; class 6, average fuel: 0.000406043 metric ton*km; = p2010
- CUTOFF prepare soil; for no-till, soybeans: 6.34229e-5 ha; = p0936
- CUTOFF apply pesticide; banded or side-dressed: 7.57438e-5 ha; = p1329
- CUTOFF phosphatic fertilizer, diammonium phosphate; at point-of-sale: 0.00297116 kg; = p1119
- CUTOFF pesticide, Lactofen; at point-of-sale; kg AI: 2.32484e-6 kg; = p1869
- CUTOFF manure appl svc; unspec rate, 1996 soybeans: 0.000339735 ha; = p1233
- CUTOFF liming materials storage: 0.0323301 kg*a; = p1231
- CUTOFF apply K fertilizer; broadcast with incorporation: 1.67962e-5 ha; = p1140
- CUTOFF prepare soil; for unspec. till, soybeans: 2.56661e-7 ha; = p0939
- CUTOFF N inhibitor appl svc; unspec rate & type, 1996 soybeans: 0.000380792 ha; = p1162
- CUTOFF sulfuric acid; at point-of-sale: 1.53335e-7 kg; = p1178
- CUTOFF apply sulfur; unspecified method: 0.000339735 ha; = p1171
- CUTOFF pesticide, Fenoxaprop P; at point-of-sale; kg AI: 2.886e-6 kg; = p1835
- CUTOFF apply gypsum; unspecified method: 0.000339735 ha; = p1165
- CUTOFF pesticide, Imazaquin; at point-of-sale; kg AI: 1.08225e-6 kg; = p1863
- CUTOFF prepare soil; for conventional till, soybeans; <15% residue: 4.53407e-5 ha; = p0934
- CUTOFF pesticide, Thifensulfuron methyl; at point-of-sale; kg AI: 1.60333e-7 kg; = p1943
- CUTOFF limestone, high-grade, pulverized; at point-of-sale: 0.0559557 kg; = p1228
- CUTOFF pesticide, Clomazone; at point-of-sale; kg AI: 5.65176e-6 kg; = p1797
- CUTOFF phosphatic fertilizer, superphos. grades 22% and under; at point-of-sale: 2.39788e-5 kg; = p1116
- CUTOFF planting; for conventional till, soybeans; <15% residue: 4.53407e-5 ha; = p0952
- CUTOFF planting; for mulch till, soybeans: 0.000133095 ha; = p0953
- CUTOFF pesticide, Flumiclorac pentyl ester; at point-of-sale; kg AI: 2.00417e-7 kg; = p1843
- CUTOFF sulfuric acid storage: 7.66675e-8 kg*a; = p1180
- CUTOFF nitrogenous fertilizer, sodium nitrate; at point-of-sale: 2.52978e-6 kg; = p1069
- CUTOFF zinc compounds; at point-of-sale: 4.21747e-8 kg; = p1184
- CUTOFF apply zinc compounds; unspecified method: 0.000339735 ha; = p1183
- CUTOFF pesticide, Propazine; at point-of-sale; kg AI: 1.08225e-5 kg; = p1889
- CUTOFF apply pesticide; unspecified application methods: 2.43829e-5 ha; = p1345
- CUTOFF pesticide, Sethoxydim; at point-of-sale; kg AI: 4.16867e-6 kg; = p1928
- CUTOFF apply K fertilizer; no broadcast application: 3.39983e-6 ha; = p1139
- CUTOFF nitrogenous fertilizer, anhydrous ammonia; at point-of-sale: 0.000391007 kg; = p1064
- CUTOFF gypsum; at point-of-sale: 1.84009e-6 kg; = p1166
- CUTOFF potassic fertilizer, other single nutrients; at point-of-sale: 0.000638957 kg; = p1155
- CUTOFF nitrogenous fertilizer, ammonium sulfate; at point-of-sale: 8.4314e-5 kg; = p1067
- CUTOFF apply P fertilizer; broadcast without incorporation: 2.25497e-5 ha; = p1091
- CUTOFF apply N fertilizer; broadcast with incorporation: 8.89175e-6 ha; = p1031
- CUTOFF pesticide, Bentazon; at point-of-sale; kg AI: 1.66747e-5 kg; = p1776
- CUTOFF pesticide, Flumetsulam; at point-of-sale; kg AI: 5.21084e-7 kg; = p1842
- CUTOFF fertilizer storage: 0.00892433 kg*a; = p1160
- CUTOFF international vessel transport; average fuel: 0.0534513 metric ton*km; = p2006
- CUTOFF pesticide, Trifluralin; at point-of-sale; kg AI: 0.000143418 kg; = p1955
- CUTOFF apply K fertilizer; broadcast without incorporation: 2.65655e-5 ha; = p1141
- CUTOFF soya seeds; unspec. type; at point-of-sale: 0.0241404 kg; = p0972
- CUTOFF planting; for ridge till, soybeans: 4.64007e-6 ha; = p0956
- soybean residue; at harvest in 1996; at farm; 88%-94% moisture: 0.786733 kg; = p0839
- CUTOFF apply pesticide; as foliar or directed spray: 7.90552e-6 ha; = p1339
- CUTOFF regional or national trucking; class 8, average fuel: 0.0188839 metric ton*km; = p2009
- CUTOFF pesticide, Pendimethalin; at point-of-sale; kg AI: 0.000139731 kg; = p1903
- CUTOFF potassic fertilizer, potassium chloride; at point-of-sale: 0.00740849 kg; = p1154
- CUTOFF pesticide storage: 0.000491195 kg*a; = p1965
- CUTOFF irrig svc; unspec wat source & rate, 1996 soybeans: 0.000339735 ha; = p0981
- CUTOFF bulk cargo rail transport; diesel: 0.0101511 metric ton*km; = p2008
- CUTOFF pesticide formulation balance; at point-of-sale: 0.000290229 kg; = p1963
- CUTOFF pesticide, Metribuzin; at point-of-sale; kg AI: 4.16867e-6 kg; = p1890
- CUTOFF apply N fertilizer; broadcast without incorporation: 1.23787e-5 ha; = p1032
- CUTOFF pesticide, Chlorimuron-ethyl; at point-of-sale; kg AI: 2.405e-7 kg; = p1791
- CUTOFF apply sulfuric acid; unspecified method: 0.000339735 ha; = p1177
- CUTOFF apply single or mixed K fertilizer; unspec. method: 2.10434e-7 ha; = p1144
- CUTOFF phosphatic fertilizer, superphosphate grades over 22%; at point-of-sale: 0.000357169 kg; = p1117
- CUTOFF sulfur; at point-of-sale: 1.37484e-7 kg; = p1172
- CUTOFF apply pesticide; broadcast without incorporation: 0.00021545 ha; = p1335
- CUTOFF apply P fertilizer; no broadcast application: 3.49967e-6 ha; = p1089
- CUTOFF sulfur storage: 6.8742e-8 kg*a; = p1174
- CUTOFF apply liming materials; unspecified method: 0.000339735 ha; = p1227
- CUTOFF planting; for reduced till, soybeans; 15-30% residue: 9.298e-5 ha; = p0955
- CUTOFF gypsum storage: 9.20044e-7 kg*a; = p1168
- CUTOFF phosphatic fertilizer, other single phosphates; at point-of-sale: 0.000144047 kg; = p1118
- CUTOFF pesticide, Clethodim; at point-of-sale; kg AI: 2.1645e-6 kg; = p1795
- CUTOFF harvest; soybeans residue management: 0.000339735 ha; = p1975
- CUTOFF nitrogenous fertilizer, nitrogen solutions; at point-of-sale: 0.000778145 kg; = p1068
- CUTOFF dolomite, pulverized; at point-of-sale: 0.00870441 kg; = p1229
- CUTOFF prepare soil; for mulch till, soybeans: 0.000133095 ha; = p0935
- CUTOFF pesticide, Quizalofop, ethyl ; at point-of-sale; kg AI: 1.08225e-6 kg; = p1925
- CUTOFF apply pesticide; broadcast by air: 6.98669e-6 ha; = p1331
- CUTOFF fertilizer filler materials; at point-of-sale: 0.00355086 kg; = p1158
- CUTOFF phosphatic fertilizer, monoammonium phosphate; at point-of-sale: 0.000985081 kg; = p1120
- CUTOFF planting; for no-till, soybeans: 6.34229e-5 ha; = p0954
- CUTOFF apply N fertilizer; no broadcast application: 5.68078e-6 ha; = p1030

## Inputs from nature
- Water, unspecified origin: 0.000298109 m3; = p0916*0.001
- Transformation, from annual crop [natural resource, land]: 3.39735 m2; = 1.0 * (p0879+p0883+p0881+p0873+p0871+p0877)
- Dry matter except CNPK; from plant uptake: 1.32164 kg; = p0917
- Occupation, annual crop [natural resource, land]: 1.34157 m2*year; = 1.0 * (p0855)
- Carbon dioxide: 4.19212 kg; = p0900*3.6666666667
- Transformation, to annual crop [natural resource, land]: 3.39735 m2; = 1.0 * (p0857)
- Potassium; from plant uptake; biogenic: 0.0289793 kg; = p0915
- Phosphorus: 0.0105884 kg; = p0910
- Nitrogen: 0.0983707 kg; = p0905

## Emissions to nature
- Nitrogen solution; no broadcast in fert. in spr. bef. plant.; no broadcast in fert. in spr. bef. plant.; kg N: 2.68129e-5 kg; = p2483
- Monoammonium phosphate; broadcast w/ incorp. in fert. in fall bef. plant.: 0.000220077 kg; = p2654*8.2142857143
- Flumiclorac pentyl ester; unspec. appl. method: 5.36482e-9 kg; = p5222
- Butane [air, non-urban air or from high stacks]: 8.43909e-8 kg; = 1.0 * (p2147*1.0208333333)
- Ammonium nitrate; broadcast w/o incorp. in fert. in spr. bef. plant.: 6.66184e-5 kg; = p2866*4.7142857143
- Diammonium phosphate; broadcast w/o incorp. in fert. at plant.: 4.35444e-5 kg; = p2923*4.7142857143
- Other single K nutrients; no broadcast in fert. in spr. bef. plant.; kg K: 6.06436e-6 kg; = p2509
- Oxygen; applied in dolomite: 0.00436914 kg; = p3228
- I butane; from residue burning: 2.93024e-8 kg; = p2146*1.0208333333
- Methyl vinyl ether; from residue burning: 1.05356e-7 kg; = p2137*1.6111111111
- Quizalofop ethyl ester [soil, agricultural]: 1.07395e-6 kg; = 1.0 * (p3656+p4686+p5304+p4068+p4274)
- Plant dry matter; in below-ground residue: 0.1375 kg; = p2177
- Sewage sludge dry matter; applied in sewage sludge: 5.87974e-10 kg; = p3243
- Diammonium phosphate; broadcast w/ incorp. in fert. at plant.: 2.73667e-5 kg; = p2728*4.7142857143
- Ammonium sulfate; no broadcast in fert. in fall bef. plant.: 8.00667e-6 kg; = p2440*4.7142857143
- Potassium chloride; broadcast w/ incorp. in fert. in fall bef. plant.: 0.00150893 kg; = p2663*2.2166666667
- Bentazone [soil, agricultural]: 1.65468e-5 kg; = 1.0 * (p5155+p4537+p4125+p3507+p3919)
- Fenoxaprop P; broadcast with incorporation: 1.83896e-6 kg; = p3978
- Fluazifop-P-butyl [soil, agricultural]: 1.67059e-6 kg; = 1.0 * (p4600+p5218+p3982+p4188+p3570)
- Ammonia [air, non-urban air or from high stacks]: 3.01439e-6 kg; = 1.0 * (p2159*1.2142857143)
- isobutene: 1.62357e-7 kg; = p2150*1.1666666667
- Ammonium sulfate; broadcast w/ incorp. in fert. in spr. bef. plant.: 1.50064e-5 kg; = p2674*4.7142857143
- Sodium nitrate; broadcast w/ incorp. in fert. in fall bef. plant.: 3.68969e-7 kg; = p2642*6.0714285714
- Thifensulfuron methyl; foliar or directed spray: 1.39152e-9 kg; = p4704
- Other single K nutrients; broadcast w/ incorp. in fert. in spr. bef. plant.; kg K: 2.99599e-5 kg; = p2704
- Potassium; in above-ground residue left on field; biogenic: 0.00718099 kg; = p2170
- Oxygen; applied in limestone: 0.0252244 kg; = p3219
- Clethodim [soil, agricultural]: 2.1479e-6 kg; = 1.0 * (p5174+p4144+p4556+p3938+p3526)
- Superphosphate, grades<= 22%; no broadcast in fert. in fall bef. plant.; kg P: 1.30691e-7 kg; = p2462
- Metolachlor [air, non-urban air or from high stacks]: 8.3011e-8 kg; = 1.0 * (p3826)
- Other single K nutrients; broadcast w/o incorp. in fert. at plant.; kg K: 2.89531e-6 kg; = p2938
- Toluene [air, non-urban air or from high stacks]: 2.64577e-7 kg; = 1.0 * (p2141*1.0952380952)
- Nitrogen solution; no broadcast in fert. in fall bef. plant.; no broadcast in fert. in fall bef. plant.; kg N: 2.23923e-5 kg; = p2444
- Superphosphate, grades>22%; no broadcast in fert. in spr. bef. plant.; kg P: 1.65336e-6 kg; = p2503
- Quizalofop ethyl ester: 8.3011e-9 kg; = p3862
- Other single K nutrients; broadcast w/ incorp. in fert. at plant.; kg K: 1.83058e-6 kg; = p2743
- Isoprene [air, non-urban air or from high stacks]: 5.24141e-7 kg; = 1.0 * (p2145*1.1333333333)
- Ammonium nitrate; broadcast w/ incorp. in fert. in fall bef. plant.: 3.99633e-5 kg; = p2632*4.7142857143
- Phenol [air, non-urban air or from high stacks]: 7.20469e-7 kg; = 1.0 * (p2133*1.3055555556)
- Flumetsulam [air, non-urban air or from high stacks]: 3.99682e-9 kg; = 1.0 * (p3779)
- Diammonium phosphate; broadcast w/ incorp. in fert. in fall bef. plant.: 0.00069201 kg; = p2650*4.7142857143
- Lactofen [air, non-urban air or from high stacks]: 1.7832e-8 kg; = 1.0 * (p3806)
- 2,4-D [air, non-urban air or from high stacks]: 1.54954e-7 kg; = 1.0 * (p3691)
- Potassium chloride; unspec. appl. method in fert. at plant.: 6.69838e-7 kg; = p3131*2.2166666667
- Propene [air, non-urban air or from high stacks]: 9.39042e-7 kg; = 1.0 * (p2136*1.1666666667)
- Imazaquin [soil, agricultural]: 1.07395e-6 kg; = 1.0 * (p4006+p4212+p4624+p5242+p3594)
- Pesticide formulation balance; broadcast by air: 2.22612e-6 kg; = p3896
- Fenoxaprop P; foliar or directed spray: 2.50474e-8 kg; = p4596
- Trifluralin [soil, agricultural]: 0.000142318 kg; = 1.0 * (p5334+p4098+p4716+p4304+p3686)
- Thifensulfuron methyl; banded or side-dressed: 1.33324e-8 kg; = p3674
- Imazethapyr [soil, agricultural]: 1.47171e-5 kg; = 1.0 * (p3595+p4625+p4007+p5243+p4213)
- Flumiclorac pentyl ester; broadcast with incorporation: 1.27706e-7 kg; = p3986
- Thifensulfuron methyl; broadcast without incorporation: 3.79234e-8 kg; = p4292
- Sodium nitrate; broadcast w/ incorp. in fert. in spr. bef. plant.: 4.4181e-7 kg; = p2681*6.0714285714
- Sulfur dioxide [air, non-urban air or from high stacks]: 2.16694e-6 kg; = 1.0 * (p2041)
- Nitrogen; in below-ground residue: 0.00700667 kg; = p2174
- Anhydrous ammonia; no broadcast in fert. in fall bef. plant.: 3.73453e-5 kg; = p2433*1.2142857143
- Carbon [soil, agricultural]: 0.46242 kg; = 1.0 * (p3217+p2173+p3242+p3225+p2167)
- Monoammonium phosphate; no broadcast in fert. in fall bef. plant.: 5.43461e-5 kg; = p2459*8.2142857143
- Flumiclorac pentyl ester; broadcast by air: 1.53724e-9 kg; = p3780
- Monoammonium phosphate; broadcast w/ incorp. in fert. at plant.: 8.7033e-6 kg; = p2732*8.2142857143
- Aqueous ammonia; no broadcast in fert. in spr. bef. plant.: 9.41165e-7 kg; = p2474*1.2142857143
- Other single K nutrients; unspec. appl. method in fert. in spr. bef. plant.; kg K: 3.75357e-7 kg; = p3094
- Diammonium phosphate; no broadcast in fert. at plant.: 6.75799e-6 kg; = p2533*4.7142857143
- Ammonium sulfate; broadcast w/ incorp. in fert. in fall bef. plant.: 1.25323e-5 kg; = p2635*4.7142857143
- Other single phosphates; broadcast w/ incorp. in fert. at plant.; kg P: 1.44589e-7 kg; = p2739
- Nitrogen dioxide: 4.39101e-6 kg; = p2039*3.2857142857
- Metribuzin [air, non-urban air or from high stacks]: 3.19746e-8 kg; = 1.0 * (p3827)
- Superphosphate, grades<= 22%; broadcast w/o incorp. in fert. in fall bef. plant.; kg P: 8.42096e-7 kg; = p2852
- Potassium chloride; unspec. appl. method in fert. in spr. bef. plant.: 1.09628e-5 kg; = p3092*2.2166666667
- Propane [air, non-urban air or from high stacks]: 3.91215e-7 kg; = 1.0 * (p2142*1.2222222222)
- Urea; broadcast w/ incorp. in fert. in fall bef. plant.: 4.60389e-5 kg; = p2646*5
- Ash: 0.000274757 kg; = p2022+p2021
- Urea; no broadcast in fert. in spr. bef. plant.: 3.52202e-5 kg; = p2490*5
- isopentane: 2.35093e-8 kg; = p2151*1.0166666667
- Alachlor [air, non-urban air or from high stacks]: 1.0238e-7 kg; = 1.0 * (p3704)
- Diammonium phosphate; broadcast w/ incorp. in fert. in spr. bef. plant.: 0.000244892 kg; = p2689*4.7142857143
- Glyphosate [soil, agricultural]: 3.78667e-5 kg; = 1.0 * (p4616+p3998+p3586+p5234+p4204)
- Aqueous ammonia; broadcast w/o incorp. in fert. in spr. bef. plant.: 2.05085e-6 kg; = p2864*1.2142857143
- Sodium nitrate; broadcast w/o incorp. in fert. in spr. bef. plant.: 6.15068e-7 kg; = p2876*6.0714285714
- Hydrocyanic acid: 3.96273e-7 kg; = p2154*2.25
- Trifluralin [air, non-urban air or from high stacks]: 1.10005e-6 kg; = 1.0 * (p3892)
- Acetonitrile [air, non-urban air or from high stacks]: 2.91594e-7 kg; = 1.0 * (p2155*1.7083333333)
- Sulfuric acid [soil, agricultural]: 1.53335e-7 kg; = 1.0 * (p3231)
- Nitrogen; applied in sewage sludge: 5.31095e-9 kg; = p3240
- Pentane [air, non-urban air or from high stacks]: 2.93866e-8 kg; = 1.0 * (p2152*1.0166666667)
- Superphosphate, grades>22%; broadcast w/ incorp. in fert. in spr. bef. plant.; kg P: 6.69532e-6 kg; = p2698
- Potassium chloride; broadcast w/ incorp. in fert. at plant.: 5.34644e-5 kg; = p2741*2.2166666667
- Sodium nitrate; no broadcast in fert. in fall bef. plant.: 2.35727e-7 kg; = p2447*6.0714285714
- Pesticide formulation balance; broadcast with incorporation: 0.000184934 kg; = p4102
- NMVOC, non-methane volatile organic compounds, unspecified origin [air, non-urban air or from high stacks]: 3.56909e-5 kg; = 1.0 * (p2051+p2052)
- Filler materials, applied with synthetic fertilizer: 0.00355086 kg; = p2432
- cyclopentane: 2.29758e-9 kg; = p2153*1.0166666667
- 1-Butene: 1.85947e-7 kg; = p2144*1.1666666667
- Diammonium phosphate; broadcast w/o incorp. in fert. in spr. bef. plant.: 0.000389659 kg; = p2884*4.7142857143
- Pesticide formulation balance; unspec. appl. method: 7.76894e-6 kg; = p5338
- Chlorimuron-ethyl [air, non-urban air or from high stacks]: 1.84469e-9 kg; = 1.0 * (p3728)
- Clomazone: 4.33502e-8 kg; = p3734
- Acetic acid [air, non-urban air or from high stacks]: 7.7716e-6 kg; = 1.0 * (p2127*2.5)
- Fenoxaprop P; broadcast without incorporation: 6.82621e-7 kg; = p4184
- Thifensulfuron methyl; broadcast with incorporation: 1.02165e-7 kg; = p4086
- Formic acid [air, non-urban air or from high stacks]: 1.39187e-6 kg; = 1.0 * (p2131*3.8333333333)
- Thifensulfuron methyl; unspec. appl. method: 4.29185e-9 kg; = p5322
- Magnesium [soil, agricultural]: 0.00110405 kg; = 1.0 * (p3227)
- Pendimethalin [air, non-urban air or from high stacks]: 1.07176e-6 kg; = 1.0 * (p3840)
- Fenoxaprop P; banded or side-dressed: 2.39982e-7 kg; = p3566
- Bentazone [air, non-urban air or from high stacks]: 1.27898e-7 kg; = 1.0 * (p3713)
- Glycolaldehyde; from residue burning: 2.79858e-6 kg; = p2135*2.5
- Lactofen [soil, agricultural]: 2.307e-6 kg; = 1.0 * (p5248+p4218+p4012+p3600+p4630)
- Acetone [air, non-urban air or from high stacks]: 6.19883e-7 kg; = 1.0 * (p2139*1.6111111111)
- Aqueous ammonia; no broadcast in fert. in fall bef. plant.: 7.85996e-7 kg; = p2435*1.2142857143
- Plant dry matter; in aboveground residue left on field: 0.366577 kg; = p2172
- Superphosphate, grades>22%; no broadcast in fert. in fall bef. plant.; kg P: 4.67201e-6 kg; = p2464
- Other single phosphates; broadcast w/o incorp. in fert. at plant.; kg P: 2.30063e-7 kg; = p2934
- Phosphorous; in above-ground residue left on field: 0.00215652 kg; = p2169
- Water [air, non-urban air or from high stacks]: 1.60539e-7 m3; = 0.001 * (p2016)
- Urea; no broadcast in fert. in fall bef. plant.: 2.94134e-5 kg; = p2451*5
- Potassium chloride; broadcast w/o incorp. in fert. in spr. bef. plant.: 0.00138395 kg; = p2897*2.2166666667
- Urea; broadcast w/o incorp. in fert. in fall bef. plant.: 6.40933e-5 kg; = p2841*5
- Formaldehyde [air, non-urban air or from high stacks]: 2.88769e-6 kg; = 1.0 * (p2128*2.5)
- Dinitrogen monoxide [air, non-urban air or from high stacks]: 9.72527e-8 kg; = 1.0 * (p2044*1.5714285714)
- Other single K nutrients; no broadcast in fert. at plant.; kg K: 3.7054e-7 kg; = p2548
- Superphosphate, grades>22%; broadcast w/o incorp. in fert. in spr. bef. plant.; kg P: 1.06532e-5 kg; = p2893
- Monoammonium phosphate; broadcast w/o incorp. in fert. at plant.: 1.38482e-5 kg; = p2927*8.2142857143
- Urea; broadcast w/ incorp. in fert. in spr. bef. plant.: 5.51278e-5 kg; = p2685*5
- Monoammonium phosphate; no broadcast in fert. in spr. bef. plant.: 1.92323e-5 kg; = p2498*8.2142857143
- Monoammonium phosphate; broadcast w/ incorp. in fert. in spr. bef. plant.: 7.78818e-5 kg; = p2693*8.2142857143
- Flumetsulam [soil, agricultural]: 5.17087e-7 kg; = 1.0 * (p4603+p3573+p5221+p4191+p3985)
- Fenoxaprop P; unspec. appl. method: 7.72534e-8 kg; = p5214
- Carbon monoxide, fossil [air, non-urban air or from high stacks]: 9.56878e-5 kg; = 1.0 * (p2028*2.3333333333)
- Potassium chloride; no broadcast in fert. in fall bef. plant.: 0.000305432 kg; = p2468*2.2166666667
- Pesticide formulation balance; foliar or directed spray: 2.51888e-6 kg; = p4720
- Aqueous ammonia; broadcast w/o incorp. in fert. in fall bef. plant.: 1.71272e-6 kg; = p2825*1.2142857143
- Flumiclorac pentyl ester; foliar or directed spray: 1.7394e-9 kg; = p4604
- Particulates, < 10 um: 1.2321e-5 kg; = p2034+p2036
- Nitrogen solution; broadcast w/o incorp. in fert. in fall bef. plant.; broadcast w/o incorp. in fert. in fall bef. pl...: 4.87939e-5 kg; = p2834
- Methanol [air, non-urban air or from high stacks]: 4.56526e-6 kg; = 1.0 * (p2129*2.6666666667)
- Ammonium sulfate; no broadcast in fert. in spr. bef. plant.: 9.58732e-6 kg; = p2479*4.7142857143
- Particulates, < 2.5 um [air, non-urban air or from high stacks]: 8.5983e-6 kg; = 1.0 * (p2033+p2035)
- Potassium chloride; unspec. appl. method in fert. in fall bef. plant.: 1.89049e-5 kg; = p3053*2.2166666667
- Monoammonium phosphate; broadcast w/o incorp. in fert. in spr. bef. plant.: 0.000123921 kg; = p2888*8.2142857143
- trans-2-Butene: 7.9097e-8 kg; = p2148*1.1666666667
- pursuit: 1.13756e-7 kg; = p3801
- Nitrogen solution; broadcast w/ incorp. in fert. in fall bef. plant.; broadcast w/ incorp. in fert. in fall bef. plan...: 3.50492e-5 kg; = p2639
- Ammonium nitrate; no broadcast in fert. in spr. bef. plant.: 3.05722e-5 kg; = p2476*4.7142857143
- Ammonium sulfate; broadcast w/o incorp. in fert. in fall bef. plant.: 1.74469e-5 kg; = p2830*4.7142857143
- Other single phosphates; broadcast w/o incorp. in fert. in fall bef. plant.; kg P: 5.81749e-6 kg; = p2856
- Chlorimuron-ethyl [soil, agricultural]: 2.38656e-7 kg; = 1.0 * (p5170+p3934+p3522+p4552+p4140)
- Furan [air, non-urban air or from high stacks]: 1.5195e-7 kg; = 1.0 * (p2138*1.4166666667)
- Anhydrous ammonia; broadcast w/ incorp. in fert. in spr. bef. plant.: 6.9994e-5 kg; = p2667*1.2142857143
- Plant dry matter; from residue burning: 0.000497415 kg; = p2164
- cis-2-Butene: 5.96697e-8 kg; = p2149*1.1666666667
- Potassium chloride; no broadcast in fert. at plant.: 1.08221e-5 kg; = p2546*2.2166666667
- Methane: 4.36786e-6 kg; = p2025*1.3333333333
- Other single phosphates; no broadcast in fert. at plant.; kg P: 3.57052e-8 kg; = p2544
- Anhydrous ammonia; no broadcast in fert. in spr. bef. plant.: 4.47179e-5 kg; = p2472*1.2142857143
- Other single phosphates; no broadcast in fert. in spr. bef. plant.; kg P: 3.19509e-7 kg; = p2505
- Thifensulfuron methyl; broadcast by air: 1.22979e-9 kg; = p3880
- 2,4-D [soil, agricultural]: 2.00471e-5 kg; = 1.0 * (p4103+p3897+p3485+p4515+p5133)
- Nitrogen solution; broadcast w/o incorp. in fert. in spr. bef. plant.; broadcast w/o incorp. in fert. in spr. bef. pl...: 5.84267e-5 kg; = p2873
- Pesticide formulation balance; banded or side-dressed: 2.41337e-5 kg; = p3690
- Acetol; from residue burning: 5.23016e-6 kg; = p2134*2.0555555556
- Sodium nitrate; no broadcast in fert. in spr. bef. plant.: 2.82264e-7 kg; = p2486*6.0714285714
- Phosphorous; in below-ground residue: 0.00080889 kg; = p2175
- Butadiene [air, non-urban air or from high stacks]: 2.09585e-7 kg; = 1.0 * (p2143*1.125)
- Dioxins and furans (PCDD/F); from residue burning: 4.16719e-14 kg TEQ; = p2047
- Superphosphate, grades<= 22%; broadcast w/o incorp. in fert. in spr. bef. plant.; kg P: 2.98005e-7 kg; = p2891
- Other single phosphates; broadcast w/ incorp. in fert. in spr. bef. plant.; kg P: 1.29386e-6 kg; = p2700
- Other single K nutrients; unspec. appl. method in fert. in fall bef. plant.; kg K: 6.47289e-7 kg; = p3055
- Propanenitrile: 8.90068e-8 kg; = p2157*1.5277777778
- Other single phosphates; no broadcast in fert. in fall bef. plant.; kg P: 9.02861e-7 kg; = p2466
- Potassium chloride; broadcast w/ incorp. in fert. in spr. bef. plant.: 0.000875015 kg; = p2702*2.2166666667
- Superphosphate, grades<= 22%; broadcast w/o incorp. in fert. at plant.; kg P: 3.33021e-8 kg; = p2930
- Ethane [air, non-urban air or from high stacks]: 1.26227e-6 kg; = 1.0 * (p2126*1.25)
- Water: 0.115277 kg; = p2171+p2181+p2178
- Superphosphate, grades<= 22%; broadcast w/ incorp. in fert. in spr. bef. plant.; kg P: 1.8729e-7 kg; = p2696
- Metolachlor [soil, agricultural]: 1.07395e-5 kg; = 1.0 * (p4238+p4650+p3620+p4032+p5268)
- Anhydrous ammonia; broadcast w/ incorp. in fert. in fall bef. plant.: 5.84541e-5 kg; = p2628*1.2142857143
- Superphosphate, grades>22%; broadcast w/ incorp. in fert. at plant.; kg P: 7.48203e-7 kg; = p2737
- Other single K nutrients; no broadcast in fert. in fall bef. plant.; kg K: 1.04578e-5 kg; = p2470
- Other single K nutrients; broadcast w/o incorp. in fert. in spr. bef. plant.; kg K: 4.73855e-5 kg; = p2899
- Anhydrous ammonia; broadcast w/o incorp. in fert. in spr. bef. plant.: 9.74426e-5 kg; = p2862*1.2142857143
- Phosphorous; applied in sewage sludge: 6.34002e-10 kg; = p3241
- Acrylonitrile: 4.6561e-8 kg; = p2156*1.4722222222
- Alachlor [soil, agricultural]: 1.32454e-5 kg; = 1.0 * (p4116+p3498+p3910+p4528+p5146)
- Calcium [soil, agricultural]: 0.023014 kg; = 1.0 * (p3226+p3218)
- Benzene [air, non-urban air or from high stacks]: 2.13147e-7 kg; = 1.0 * (p2140*1.0833333333)
- Potassium; in below-ground residue; biogenic: 0.00269353 kg; = p2176
- Potassium chloride; no broadcast in fert. in spr. bef. plant.: 0.000177117 kg; = p2507*2.2166666667
- Pendimethalin [soil, agricultural]: 0.000138659 kg; = 1.0 * (p5282+p3634+p4252+p4664+p4046)
- Zinc compounds: 4.21747e-8 kg; = p3232
- Other single K nutrients; unspec. appl. method in fert. at plant.; kg K: 2.29348e-8 kg; = p3133
- Sulfur [soil, agricultural]: 1.37484e-7 kg; = 1.0 * (p3230)
- Pesticide formulation balance; broadcast without incorporation: 6.86474e-5 kg; = p4308
- Superphosphate, grades<= 22%; broadcast w/ incorp. in fert. at plant.; kg P: 2.09297e-8 kg; = p2735
- Acetaldehyde [air, non-urban air or from high stacks]: 1.72764e-6 kg; = 1.0 * (p2130*1.8333333333)
- Potassium chloride; broadcast w/o incorp. in fert. at plant.: 8.45611e-5 kg; = p2936*2.2166666667
- Ethene [air, non-urban air or from high stacks]: 2.0211e-6 kg; = 1.0 * (p2125*1.1666666667)
- Aqueous ammonia; broadcast w/ incorp. in fert. in fall bef. plant.: 1.23027e-6 kg; = p2630*1.2142857143
- Aqueous ammonia; broadcast w/ incorp. in fert. in spr. bef. plant.: 1.47314e-6 kg; = p2669*1.2142857143
- Diammonium phosphate; broadcast w/o incorp. in fert. in fall bef. plant.: 0.00110109 kg; = p2845*4.7142857143
- Fluazifop-p-butyl [air, non-urban air or from high stacks]: 1.29128e-8 kg; = 1.0 * (p3776)
- Sodium nitrate; broadcast w/o incorp. in fert. in fall bef. plant.: 5.13662e-7 kg; = p2837*6.0714285714
- Ammonium nitrate; broadcast w/ incorp. in fert. in spr. bef. plant.: 4.78527e-5 kg; = p2671*4.7142857143
- Nitrogen solution; broadcast w/ incorp. in fert. in spr. bef. plant.; broadcast w/ incorp. in fert. in spr. bef. plan...: 4.19685e-5 kg; = p2678
- Metribuzin [soil, agricultural]: 4.1367e-6 kg; = 1.0 * (p5269+p4651+p4033+p4239+p3621)
- Sethoxydim [soil, agricultural]: 4.1367e-6 kg; = 1.0 * (p4071+p3659+p4689+p5307+p4277)
- Clethodim [air, non-urban air or from high stacks]: 1.66022e-8 kg; = 1.0 * (p3732)
- Ammonium nitrate; broadcast w/o incorp. in fert. in fall bef. plant.: 5.56351e-5 kg; = p2827*4.7142857143
- Superphosphate, grades<= 22%; no broadcast in fert. at plant.; kg P: 5.16841e-9 kg; = p2540
- Superphosphate, grades>22%; broadcast w/o incorp. in fert. in fall bef. plant.; kg P: 3.01036e-5 kg; = p2854
- Superphosphate, grades>22%; no broadcast in fert. at plant.; kg P: 1.84763e-7 kg; = p2542
- Superphosphate, grades>22%; broadcast w/o incorp. in fert. at plant.; kg P: 1.1905e-6 kg; = p2932
- Superphosphate, grades>22%; broadcast w/ incorp. in fert. in fall bef. plant.; kg P: 1.89195e-5 kg; = p2659
- Flumiclorac pentyl ester; banded or side-dressed: 1.66654e-8 kg; = p3574
- Clomazone [soil, agricultural]: 5.60841e-6 kg; = 1.0 * (p3940+p4558+p3528+p5176+p4146)
- Imazaquin [air, non-urban air or from high stacks]: 8.3011e-9 kg; = 1.0 * (p3800)
- Ammonium nitrate; no broadcast in fert. in fall bef. plant.: 2.55318e-5 kg; = p2437*4.7142857143
- Ethyne [air, non-urban air or from high stacks]: 3.78111e-7 kg; = 1.0 * (p2132*1.0833333333)
- Sethoxydim [air, non-urban air or from high stacks]: 3.19746e-8 kg; = 1.0 * (p3865)
- Other single phosphates; broadcast w/ incorp. in fert. in fall bef. plant.; kg P: 3.65617e-6 kg; = p2661
- Gypsum: 1.84009e-6 kg; = p3229
- Glyphosate [air, non-urban air or from high stacks]: 2.9269e-7 kg; = 1.0 * (p3792)
- Other single phosphates; broadcast w/o incorp. in fert. in spr. bef. plant.; kg P: 2.05872e-6 kg; = p2895
- Other single K nutrients; broadcast w/ incorp. in fert. in fall bef. plant.; kg K: 5.16647e-5 kg; = p2665
- Carbon dioxide, in air: 0.00180118 kg; = p2163*3.6666666667
- Other limestone constituents; applied in limestone: 0.00335734 kg; = p3220
- Superphosphate, grades<= 22%; broadcast w/ incorp. in fert. in fall bef. plant.; kg P: 5.29239e-7 kg; = p2657
- Flumiclorac pentyl ester; broadcast without incorporation: 4.74042e-8 kg; = p4192
- Diammonium phosphate; no broadcast in fert. in spr. bef. plant.: 6.04741e-5 kg; = p2494*4.7142857143
- Potassium chloride; broadcast w/o incorp. in fert. in fall bef. plant.: 0.00238657 kg; = p2858*2.2166666667
- Seeds; used in planting and sowing: 0.0253805 kg; = p2179
- Superphosphate, grades<= 22%; no broadcast in fert. in spr. bef. plant.; kg P: 4.62497e-8 kg; = p2501
- Anhydrous ammonia; broadcast w/o incorp. in fert. in fall bef. plant.: 8.13773e-5 kg; = p2823*1.2142857143
- Nitrogen; in above-ground residue left on field: 0.0186799 kg; = p2168
- Monoammonium phosphate; broadcast w/o incorp. in fert. in fall bef. plant.: 0.000350174 kg; = p2849*8.2142857143
- Other single K nutrients; broadcast w/o incorp. in fert. in fall bef. plant.; kg K: 8.17145e-5 kg; = p2860
- Fenoxaprop P; broadcast by air: 2.21363e-8 kg; = p3772
- Diammonium phosphate; no broadcast in fert. in fall bef. plant.: 0.000170886 kg; = p2455*4.7142857143
- Ammonium sulfate; broadcast w/o incorp. in fert. in spr. bef. plant.: 2.08912e-5 kg; = p2869*4.7142857143
- Monoammonium phosphate; no broadcast in fert. at plant.: 2.14921e-6 kg; = p2537*8.2142857143
- Urea; broadcast w/o incorp. in fert. in spr. bef. plant.: 7.67465e-5 kg; = p2880*5

## Sampling procedure
A delete-a-group jackknife is used by the USDA to estimate the ARMS sample means and RSEs, based on a 15 sample delete-a-group jackknife. Because of this relatively small sample size, a Students t distribution is used to represent ARMS data probability density functions. Other representations of uncertainty are described in Cooper, J.S., Kahn, E., Noon, M. (2012). LCA Digital Commons Unit Process Data: field crop production Version 1. Prepared for the US Department of Agriculture National Agricultural Library. Retrieved from https://www.lcacommons.gov/discovery/docs/LCA%20Digital%20Commons%20Unit%20Process%20Data%20final%20updated.pdf

## Extrapolations
Data represent an aggregation of processes applied in Iowa in 1996. Data development is demonstrated by parameterization (exlicitly presents all raw and uncertainty data and all calculations). Flow data quality according to the LCADC convention is provided for all flows.
