# durum wheat; at harvest in 1998; at farm; 88%-89% moisture

Dataset: EcoSpold 2, unit process
Geography: GLO
Time period: 1998-01-02 to 1999-01-01
Scenario: Business-as-Usual
System model: Allocation, ecoinvent default
Generated by: cooperjs@u.washington.edu
isCopyrightProtected: false

## General comment
This unit process/ gate-to-gate dataset represents the production of 1 kg durum wheat coproduced with residue. The process technologies are an aggregation of those applied in Montana in 1998. Applicable classifications include ISIC 0111, NAIC 111140, UNSPSC 50221101; this dataset was prepared in ILCD format using the UWDFE Lab Excel to ILCD File Generator (beta version, August 2013)

Exchange "NMVOC, non-methane volatile organic compounds, unspecified origin-air low population density" is the result of combining the following original LCA Commons flows: "NMVOCs; from residue burning; kg C, biogenic", "NMVOCs; from residue burning; kg except C, biogenic".
Exchange "Carbon-soil agricultural" is the result of combining the following original LCA Commons flows: "Carbon; applied in sewage sludge", "Carbon; in above-ground residue left on field; biogenic", "Carbon; in below-ground residue; biogenic".
Exchange "Particulates, < 2.5 um-air low population density" is the result of combining the following original LCA Commons flows: "PM2.5; from residue burning; kg C, biogenic", "PM2.5; from residue burning; kg except C, biogenic".
Exchange "Ash-soil agricultural" is the result of combining the following original LCA Commons flows: "Ash; from residue burning; kg C, biogenic", "Ash; from residue burning; kg except C, biogenic".
Exchange "Water-soil agricultural" is the result of combining the following original LCA Commons flows: "Water; from irrigation and applied with manure and sewage sludge", "Water; in below-ground residue; biogenic", "Water; in above-ground residue left on field; biogenic".
Exchange "Particulates, < 10 um-air low population density" is the result of combining the following original LCA Commons flows: "PM10; from residue burning; kg C, biogenic", "PM10; from residue burning; kg except C, biogenic".
Exchange "Sulfur-be1c0329-f1a8-4524-8420-a86d2a8dd358 agricultural" was originally named: "Sulfur; as secondary application" in this dataset.
Exchange "Ethyne-2bdf9967-6dae-4183-88d1-8f612548c51e low population density" was originally named: "Acetylene; from residue burning; kg C, biogenic" in this dataset.
Exchange "Pentane-2bdf9967-6dae-4183-88d1-8f612548c51e low population density" was originally named: "N pentane; from residue burning; kg C, biogenic" in this dataset.
Exchange "cis-2-Butene-2bdf9967-6dae-4183-88d1-8f612548c51e low population density" was originally named: "Cis 2 butene; from residue burning; kg C, biogenic" in this dataset.
Exchange "Water-2bdf9967-6dae-4183-88d1-8f612548c51e low population density" was originally named: "Water; from residue burning; biogenic" in this dataset.
Exchange "Phenol-2bdf9967-6dae-4183-88d1-8f612548c51e low population density" was originally named: "Phenol; from residue burning; kg C, biogenic" in this dataset.
Exchange "Occupation, arable-c19fb2d9-98eb-4cd3-8761-81b71d8a9a1b land" was originally named: "Occupation; arable, as wheat" in this dataset.
Exchange "Acetone-2bdf9967-6dae-4183-88d1-8f612548c51e low population density" was originally named: "Acetone; from residue burning; kg C, biogenic" in this dataset.
Exchange "Methanol-2bdf9967-6dae-4183-88d1-8f612548c51e low population density" was originally named: "Methanol; from residue burning; kg C, biogenic" in this dataset.
Exchange "Butane-2bdf9967-6dae-4183-88d1-8f612548c51e low population density" was originally named: "N butane; from residue burning; kg C, biogenic" in this dataset.
Exchange "Benzene-2bdf9967-6dae-4183-88d1-8f612548c51e low population density" was originally named: "Benzene; from residue burning; kg C, biogenic" in this dataset.
Exchange "Ethane-2bdf9967-6dae-4183-88d1-8f612548c51e low population density" was originally named: "Ethane; from residue burning; kg C, biogenic" in this dataset.
Exchange "isopentane-2bdf9967-6dae-4183-88d1-8f612548c51e low population density" was originally named: "I pentane; from residue burning; kg C, biogenic" in this dataset.
Exchange "isobutene-2bdf9967-6dae-4183-88d1-8f612548c51e low population density" was originally named: "I butene; from residue burning; kg C, biogenic" in this dataset.
Exchange "Carbon dioxide, in air-2bdf9967-6dae-4183-88d1-8f612548c51e low population density" was originally named: "Carbon dioxide; from residue burning; kg C, biogenic" in this dataset.
Exchange "Propene-2bdf9967-6dae-4183-88d1-8f612548c51e low population density" was originally named: "Propylene; from residue burning; kg C, biogenic" in this dataset.
Exchange "Transformation, from arable-c19fb2d9-98eb-4cd3-8761-81b71d8a9a1b land" was originally named: "Transformation; from arable, from unspec. use to wheat" in this dataset.
Exchange "1-Butene-2bdf9967-6dae-4183-88d1-8f612548c51e low population density" was originally named: "1 butene; from residue burning; kg C, biogenic" in this dataset.
Exchange "Propane-2bdf9967-6dae-4183-88d1-8f612548c51e low population density" was originally named: "Propane; from residue burning; kg C, biogenic" in this dataset.
Exchange "Acetonitrile-2bdf9967-6dae-4183-88d1-8f612548c51e low population density" was originally named: "Acetonitrile; from residue burning; kg C, biogenic" in this dataset.
Exchange "Sulfuric acid-be1c0329-f1a8-4524-8420-a86d2a8dd358 agricultural" was originally named: "Sulfuric acid; as secondary application" in this dataset.
Exchange "Ethene-2bdf9967-6dae-4183-88d1-8f612548c51e low population density" was originally named: "Ethylene; from residue burning; kg C, biogenic" in this dataset.
Exchange "trans-2-Butene-2bdf9967-6dae-4183-88d1-8f612548c51e low population density" was originally named: "Trans 2 butene; from residue burning; kg C, biogenic" in this dataset.
Exchange "Nitrogen dioxide-2bdf9967-6dae-4183-88d1-8f612548c51e low population density" was originally named: "Nitrogen dioxide; from residue burning; kg N, biogenic" in this dataset.
Exchange "Sulfur dioxide-2bdf9967-6dae-4183-88d1-8f612548c51e low population density" was originally named: "Sulfur dioxide; from residue burning; biogenic" in this dataset.
Exchange "Formic acid-2bdf9967-6dae-4183-88d1-8f612548c51e low population density" was originally named: "Formic acid; from residue burning; kg C, biogenic" in this dataset.
Exchange "Phosphorus-c19fb2d9-98eb-4cd3-8761-81b71d8a9a1b unspecified" was originally named: "Phosphorous; from plant uptake; biogenic" in this dataset.
Exchange "Carbon monoxide, fossil-2bdf9967-6dae-4183-88d1-8f612548c51e low population density" was originally named: "Carbon monoxide; from residue burning; kg C, biogenic" in this dataset.
Exchange "Acetic acid-2bdf9967-6dae-4183-88d1-8f612548c51e low population density" was originally named: "Acetic acid; from residue burning; kg C, biogenic" in this dataset.
Exchange "Acetaldehyde-2bdf9967-6dae-4183-88d1-8f612548c51e low population density" was originally named: "Acetaldehyde; from residue burning; kg C, biogenic" in this dataset.
Exchange "Dinitrogen monoxide-2bdf9967-6dae-4183-88d1-8f612548c51e low population density" was originally named: "Dinitrogen monoxide; from residue burning; kg N, biogenic" in this dataset.
Exchange "Isoprene-2bdf9967-6dae-4183-88d1-8f612548c51e low population density" was originally named: "Isoprene; from residue burning; kg C, biogenic" in this dataset.
Exchange "Water, unspecified origin-c19fb2d9-98eb-4cd3-8761-81b71d8a9a1b in water" was originally named: "Water; from plant uptake; biogenic" in this dataset.
Exchange "Formaldehyde-2bdf9967-6dae-4183-88d1-8f612548c51e low population density" was originally named: "Formaldehyde; from residue burning; kg C, biogenic" in this dataset.
Exchange "Furan-2bdf9967-6dae-4183-88d1-8f612548c51e low population density" was originally named: "Furan; from residue burning; kg C, biogenic" in this dataset.
Exchange "Hydrocyanic acid-2bdf9967-6dae-4183-88d1-8f612548c51e low population density" was originally named: "Hydrogen cyanide; from residue burning; kg C, biogenic" in this dataset.
Exchange "Acrylonitrile-2bdf9967-6dae-4183-88d1-8f612548c51e low population density" was originally named: "Propenenitrile; from residue burning; kg C, biogenic" in this dataset.
Exchange "Ammonia-2bdf9967-6dae-4183-88d1-8f612548c51e low population density" was originally named: "Ammonia; from residue burning; kg N, biogenic" in this dataset.
Exchange "Carbon dioxide-c19fb2d9-98eb-4cd3-8761-81b71d8a9a1b unspecified" was originally named: "Carbon dioxide; from plant uptake; kg C, biogenic" in this dataset.
Exchange "Butadiene-2bdf9967-6dae-4183-88d1-8f612548c51e low population density" was originally named: "1,3 butadiene; from residue burning; kg C, biogenic" in this dataset.
Exchange "Transformation, to arable-c19fb2d9-98eb-4cd3-8761-81b71d8a9a1b land" was originally named: "Transformation; to arable, to wheat" in this dataset.
Exchange "Methane-2bdf9967-6dae-4183-88d1-8f612548c51e low population density" was originally named: "Methane; from residue burning; kg C, biogenic" in this dataset.
Exchange "Zinc compounds-be1c0329-f1a8-4524-8420-a86d2a8dd358 agricultural" was originally named: "Zinc compounds; as secondary application" in this dataset.
Exchange "Toluene-2bdf9967-6dae-4183-88d1-8f612548c51e low population density" was originally named: "Toluene; from residue burning; kg C, biogenic" in this dataset.

## Geography
The unit process is assumed to represent production in Montana (US State).

## Technology
This process produces durum wheat; at harvest in 1998; at farm; 88%-89% moisture. The process is assumed to represent production in Montana (US State). Yields and related inputs and outputs represent a single year of operation, in 1998. This dataset includes consideration of residue burning; soil preparation; planting or sowing; irrigation; application, storage, and transport of fertilizers, manures, liming materials, secondary materials, and pesticides; and harvest. Fate and transport of applications are not included as described in Cooper, J.S., Kahn, E., Noon, M. (2012) LCA Digital Commons Unit Process Data: field crop production Version 1 which is available at https://www.lcacommons.gov/discovery/docs/LCA%20Digital%20Commons%20Unit%20Process%20Data%20final%20updated.pdf

## Time period
Start and end dates match the underlying data obtained from the USDA Agricultural Resource Management Survey (ARMS).

## Parameters
- p1557: 0
- p1635: 0
- p1754: 0
- p1165: 0.00055576; = p0801*p0001/(p0818*p0002)
- p1047: 0; = IF(p1012=0;IF(p1037+p1044+p1045+p1046=1;0;IF(p1037+p1044+p1045+p1046+p1041>1;1-(p1037+p1044+p1045+p1046);p1041));0)
- p2371: 0; = p2225*p2200
- p3011: 0; = p2425*(p1079+p1081)
- p2942: 0; = p2356*(p1020+p1022)
- p0708: 0
- p3307: 0; = if(and(p1232=0;p3252<>0);p3252*(p3258-p3302)/p3305;0)
- p1157: 0
- p3008: 0; = p2422*(p1079+p1081)
- p1619: 0
- p2910: 0; = p2324*(p1020+p1022)
- p1719: 0
- p3454: 0; = p3378*p1240
- p1112: 0
- p2329: 0; = p2224*p2197
- p1550: 0
- p5131: 0; = p1962*p3483
- p1242: 0; = if(p1232>0;0;p1234*(p0725/100)*p0723*1000)
- p0921: 0; = p0679*1000/p0801
- p2041: 3.52059e-6; = p2015*p2040/(p0818*1000)
- p2980: 0; = p2394*(p1020+p1022)
- p2354: 0; = p2225*p2182
- p1632: 0
- p2191: 0; = 8*1.00794*p2189/(2*14.0067)
- p2438: 0; = p2242*p1014
- p2074: 0.025
- p2339: 0; = p2228*p2207
- p1750: 0
- p3260: 0
- p0966: 0; = if(p0683=0;0;IF(p0684/100+p0965=1;0;1-(p0684/100+p0965)))
- p2495: 0; = p2299*p1073
- p2525: 0; = p2329*p1014
- p1140: 0; = if(p1121=0;p1134*p0001/(p0818*p0002);0)
- p1886: 0
- p2993: 0; = p2407*(p1020+p1022)
- p3407: 0; = p3369*p1238
- p0865: 0; = IF(p0858+p0864=1;0;IF(p0858+p0864+p0860>1;1-(p0858+p0864);p0860))
- p1288: 0
- p3452: 0; = p3376*p1240
- p3180: 0; = p2399*p1023
- p1928: 0
- p1718: 0
- p2252: 0; = p2222*p2198
- p0851: 0
- p2454: 0; = p2258*p1073
- p1051: 0; = IF(p1012=0;p1044*p1036;0)
- p2425: 0; = p2235*p2215
- p2582: 0; = p2386*p1073
- p2001: 400
- p3474: 0; = p3379*p1241
- p2795: 0; = p2404*(p1019+p1021)
- p2217: 0; = p1118-p2216
- p1931: 0
- p2689: 0; = p2298*(p1078+p1080)
- p3214: 0; = p1222*40.078/100.0869
- p1858: 0
- p1294: 0; = p1290*p1252/p0818
- p2953: 0; = p2367*(p1020+p1022)
- p2901: 0; = p2315*(p1020+p1022)
- p1595: 0
- p1964: 0.5
- p2299: 0; = p2227*p2206
- p2996: 0; = p2410*(p1020+p1022)
- p1827: 0
- p1688: 0
- p1217: 0
- p1833: 0
- p1724: 0
- p1301: 0; = IF(p1297+p1300=p1265;0;IF(p1297+p1300+p1299>p1265;p1265-(p1297+p1300);p1299))
- p1304: 0; = p1300*p1252/p0818
- p1209: 0; = p1206*p0818*p0822/p0801
- p3411: 0; = p3373*p1238
- p2012: 0.0129716
- p1560: 0
- p1803: 0
- p2902: 0; = p2316*(p1020+p1022)
- p2296: 0; = p2223*p2203
- p3147: 0; = p2366*p1023
- p1823: 0
- p1654: 0
- p3231: 6.08576e-8; = p1176/p0818
- p1820: 0
- p3009: 0; = p2423*(p1079+p1081)
- p2267: 0; = p2226*p2213
- p1585: 0
- p2383: 0; = p2229*p2212
- p3460: 0; = p3365*p1241
- p1064: 0; = IF(p1012=0;p1050/(p1057*p0818);0)
- p2066: 0.109412
- p3012: 0; = p2426*(p1079+p1081)
- p0926: 0; = IF(p0918+p0923+p0924+p0925=1;0;IF(p0918+p0923+p0924+p0925+p0922>1;1-(p0918+p0923+p0924+p0925);p0922))
- p3074: 0; = p2293*p1023
- p0721: 0
- p1143: 0; = if(p1121=0;p1137*p0001/(p0818*p0002);0)
- p2042: 0.07
- p2687: 0; = p2296*(p1019+p1021)
- p2489: 0; = p2293*p1014
- p2397: 0; = p2234*p2186
- p1938: 0
- p0006: 15
- p1193: 0.00055576; = IF(OR(p1036=0;p1095=0);0.0001*p0857;0)
- p3465: 0; = p3370*p1241
- p2598: 0; = p2402*p1014
- p1597: 0
- p3336: 0; = IF(or(p3254=0;p1232>0);0;p3271*p3289)
- p1787: 0
- p3097: 0; = p2316*p1023
- p1777: 0
- p2231: 0; = if(p0783*p0787+p0784*p0788+p0785*p0789+p0786*p0790=0;0;p0788*p0784/(p0783*p0787+p0784*p0788+p0785*p0789+p0786*p0790))
- p1963i: 0; = p1706*p1910+p1707*p1911+p1708*p1912+p1709*p1913+p1710*p1914+p1711*p1915+p1712*p1916+p1713*p1917+p1714*p1918+p1715*p1919+p1716*p1920+p1717*p1921+p1718*p1922+p1719*p1923+p1720*p1924+p1721*p1925+p1722*p1926+p1723*p1927+p1724*p1928
- p1331: 0; = p1330*p0001/(p0818*p0002)
- p1692: 0
- p0687: 0
- p3222: 0; = IF(p3216=0;0;p1223*40.078/100.0869)
- p2866: 0; = p2280*(p1020+p1022)
- p2359: 0; = p2225*p2187
- p0989: 0; = p0985*p0886
- p3215: 0; = p1222*3*15.9994/100.0869
- p3077: 0; = p2296*p1023
- p3104: 0; = p2323*p1023
- p0753: 0
- p1979: 0; = p0973
- p0925: 0; = IF(p0918+p0923+p0924=1;0;IF(p0918+p0923+p0924+p0921>1;1-(p0918+p0923+p0924);p0921))
- p1280: 0; = IF(p1277=p1263;0;IF(p1277+p1278>p1263;p1263-p1277;p1278))
- p2835: 0; = p2249*(p1020+p1022)
- p2668: 0; = p2277*(p1019+p1021)
- p1153: 0
- p2577: 0; = p2381*p1073
- p1021: 0; = IF(p1012=0;IF(p1014+p1019+p1020=1;0;IF(p1014+p1019+p1020+p1017>1;1-(p1014+p1019+p1020);p1017));0)
- p1163: 0.0086165
- p3276: 0
- p2967: 0; = p2381*(p1079+p1081)
- p1695: 0
- p2732: 0; = p2341*(p1078+p1080)
- p0681: 0
- p2408: 0; = p2234*p2198
- p3048: 0; = p2267*p1082
- p1672: 0
- p3135: 0; = p2354*p1023
- p3297: 0; = if(p1273+p1274+p1275+p1276=0;0;p1273/(p1273+p1274+p1275+p1276))
- p1290: 0; = IF(p1287=p1264;0;IF(p1287+p1288>p1264;p1264-p1287;p1288))
- p3107: 0; = p2326*p1023
- p3073: 0; = p2292*p1023
- p1737: 0
- p2480: 0; = p2284*p1014
- p2106: 0.856281
- p1025: 0; = IF(p1012=0;p1019*(p0704/100)*p0703*1000;0)
- p1564: 0
- p1218: 0
- p2640: 0; = p2249*(p1019+p1021)
- p2176: 0.00337742; = p0895*p0913/p0818
- p2685: 0; = p2294*(p1019+p1021)
- p2585: 0; = p2389*p1123
- p1956: 0
- p1656: 0
- p1214: 0; = IF(p1213=0;0;p1213-1)
- p2657: 0; = p2266*(p1078+p1080)
- p2188: 0; = p1066-p2186-p2187
- p3228: 0; = p3224*p1229
- p2178: 0.0445306; = (p0895*p0831/(1-p0831))/(p0818)
- p2429: 0; = p2236*p2219
- p3010: 0; = p2424*(p1079+p1081)
- p3236: 0.0140975
- p4514: 0; = p1963*p3480
- p3002: 0; = p2416*(p1079+p1081)
- p1748: 0
- p1807: 0
- p3243: 8.10971e-10; = p3234*p1188*p3239/p0818
- p3109: 0; = p2328*p1023
- p1890: 0
- p1216: 0
- p1285: 0; = p1281*p1252/p0818
- p2445: 0; = p2249*p1014
- p2170: 0.00643159; = p2166*(p0913)
- p2753: 0; = p2362*(p1019+p1021)
- p1913: 0
- p2580: 0; = p2384*p1073
- p2491: 0; = p2295*p1014
- p3046: 0; = p2265*p1082
- p2229: 0; = if(p0774*p0778+p0775*p0779+p0776*p0780+p0777*p0781=0;0;p0781*p0777/(p0774*p0778+p0775*p0779+p0776*p0780+p0777*p0781))
- p3138: 0; = p2357*p1023
- p2113: 0.832356
- p2372: 0; = p2225*p2201
- p2376: 0; = p2229*p2205
- p1244: 0; = if(p1232>0;0;p1239*(p0725/100)*p0723*1000)
- p3143: 0; = p2362*p1023
- p1248: 0; = if(p1232>0;0;p1243*p0001/(p0818*p0002))
- p1970: 450000; = p0801
- p0694: 0
- p3054: 0; = p2273*p1132
- p2862: 0; = p2276*(p1020+p1022)
- p2680: 0; = p2289*(p1019+p1021)
- p1222: 0
- p2773: 0; = p2382*(p1078+p1080)
- p2294: 0; = p2223*p2201
- p3221: 0; = IF(p3216=0;0;p1223*12.0107/100.0869+(1-p1224)*12.0107/84.3139)
- p2281: 0; = p2223*p2187
- p1984: 30
- p1147: 0
- p3234: 0.39606; = 1-p3233
- p3052: 0; = p2271*p1082
- p3079: 0; = p2298*p1082
- p2770: 0; = p2379*(p1078+p1080)
- p2349: 0; = p2228*p2217
- p0800: 0
- p2756: 0; = p2365*(p1019+p1021)
- p1616: 0
- p2270: 0; = p2226*p2216
- p2028: 0.000189184; = p2015*p2026*p2027/(p0818*1000)
- p1298: 0
- p1814: 0
- p2350: 0; = p2232*p2218
- p2490: 0; = p2294*p1014
- p1090: 0; = IF(p1071=0;p1084*p0001/(p0818*p0002);0)
- p2050: 0.952062
- p3042: 0; = p2261*p1082
- p1266: 0; = if(p1232>0;0;IF(p1259+p1263+p1264+p1265=1;0;1-(p1259+p1263+p1264+p1265)))
- p3382: 0; = p3363*p1234
- p2026: 55.14
- p2295: 0; = p2223*p2202
- p2089: 0.40001
- p3049: 0; = p2268*p1082
- p2214: 0; = p1107/p0818
- p3198: 0; = p2417*p1082
- p2382: 0; = p2229*p2211
- p1009: 0; = p1005*p0001*p0004/(p0818*p0002)
- p1611: 0
- p1955: 0
- p2523: 0; = p2327*p1014
- p0932: 0; = p0801*p0926
- p3364: 0; = if(p1232=0;p3244*p3358/p0818;0)
- p2721: 0; = p2330*(p1019+p1021)
- p1019: 0; = IF(p1012=0;IF(p1014=1;0;IF(p1014+p1015>1;1-p1014;p1015));0)
- p2860: 0; = p2274*(p1129+p1131)
- p1946: 0
- p2312: 0; = p2231*p2219
- p2440: 0; = p2244*p1014
- p2455: 0; = p2259*p1073
- p1987: 400
- p0871: 0; = p0870*p0001*p0003/(p0818*p0002)
- p2593: 0; = p2397*p1014
- p1905: 0
- p3060: 0; = p2279*p1023
- p0974: 0
- p2233: 0; = if(p0783*p0787+p0784*p0788+p0785*p0789+p0786*p0790=0;0;p0790*p0786/(p0783*p0787+p0784*p0788+p0785*p0789+p0786*p0790))
- p1126: 0; = if(p1121=0;p0720/100;0)
- p1910: 0
- p2541: 0; = p2345*p1073
- p3245: 0; = IF(p3244=1;0;if(p3244+p0792/100>1;1-p3244;p0792/100))
- p0306: 0.5
- p2734: 0; = p2343*(p1078+p1080)
- p1571: 0
- p1953: 0
- p1259: 0; = if(p1232>0;0;p0730/100)
- p2503: 0; = p2307*p1073
- p2322: 0; = p2224*p2189
- p2730: 0; = p2339*(p1078+p1080)
- p1682: 0
- p2530: 0; = p2334*p1014
- p2880: 0; = p2294*(p1020+p1022)
- p2311: 0; = p2231*p2218
- p3154: 0; = p2373*p1023
- p0880: 0; = p0868*p0856
- p1579: 0
- p1245: 0; = if(p1232>0;0;p1240*(p0725/100)*p0723*1000)
- p0706: 0
- p0864: 0; = IF(p0858=1;0;IF(p0858+p0859>1;1-p0858;p0859))
- p3284: 0
- p0686: 0
- p0857: 5.5576; = p0856*p0001*p0003/(p0818*p0002)
- p1149: 0
- p1623: 0
- p1130: 0; = if(p1121=0;IF(p1123+p1128+p1129=1;0;IF(p1123+p1128+p1129+p1126>1;1-(p1123+p1128+p1129);p1126));0)
- p2642: 0; = p2251*(p1019+p1021)
- p2959: 0; = p2373*(p1020+p1022)
- p2777: 0; = p2386*(p1078+p1080)
- p2951: 0; = p2365*(p1020+p1022)
- p1136: 0; = if(p1121=0;p1130*(p0716/100)*p0703*1000;0)
- p0671: 0
- p2342: 0; = p2228*p2210
- p2739: 0; = p2348*(p1078+p1080)
- p3254: 0; = p1252*(p1287*(1-p3247)+p1290*(1-p3248)+p1291*(1-p3249)+p1292*(1-p3250))
- p1104: 0; = IF(p1071=0;IF(p1096+p1101+p1102+p1103=1;0;1-(p1096+p1101+p1102+p1103));0)
- p5338: 0; = p1963*p3484
- p0235: 0
- p1716: 0
- p3091: 0; = p2310*p1082
- p1918: 0
- p1572: 0
- p1836: 0
- p1205: 0
- p1994: 750
- p1992: 3900
- p2686: 0; = p2295*(p1019+p1021)
- p2698: 0; = p2307*(p1078+p1080)
- p2586: 0; = p2390*p1123
- p1988: 750
- p2010: 1.01736e-8; = ((p1984*p1985+p1990*p1991+p1996*p1997+p2004*p2005)/p0818)*p0005*p0002/1000
- p1805: 0
- p2562: 0; = p2366*p1014
- p3375: 0; = if(p1232=0;p3246*p3357/p0818;0)
- p3028: 0; = p2247*p1023
- p1812: 0
- p2173: 0.128656; = p0895*p0898/p0818
- p1227: 0; = IF(p1221=0;0;p1226*p0001/(p0818*p0002))
- p2828: 0; = p2242*(p1020+p1022)
- p3436: 0; = p3379*p1239
- p1740: 0
- p0842: 0.153434
- p2160: 5.73304e-7; = p2015*p2084*p2122/(p0818*1000)
- p0787: 0
- p1220: 0; = IF(p1218<0.5;-SQRT(p1214*EXP(p1219^2*p1215)-p1214);SQRT(p1214*EXP(p1219^2*p1215)-p1214))
- p3372: 0; = if(p1232=0;p3245*p3360/p0818;0)
- p1696: 0
- p1680: 0
- p2338: 0; = p2228*p2206
- p0751: 0
- p2853: 0; = p2267*(p1079+p1081)
- p1781: 0
- p2724: 0; = p2333*(p1019+p1021)
- p3351: 0; = if(and(p1232=0;p3256<>0);p3256*(p3274-p3346)/p3349;0)
- p3275: 0
- p2146: 1.65344e-7; = p2015*p2074*p2108/(p0818*1000)
- p1700: 0
- p0803: 0
- p2521: 0; = p2325*p1014
- p0743: 0
- p3024: 0; = p2243*p1023
- p2666: 0; = p2275*(p1128+p1130)
- p2831: 0; = p2245*(p1020+p1022)
- p2849: 0; = p2263*(p1079+p1081)
- p3035: 0; = p2254*p1023
- p2075: 0.072
- p2565: 0; = p2369*p1014
- p1791: 0
- p2727: 0; = p2336*(p1078+p1080)
- p2449: 0; = p2253*p1014
- p0697: 0
- p1658: 0
- p2968: 0; = p2382*(p1079+p1081)
- p1615: 0
- p4925: 0; = p1962*p3482
- p0898: 0.45865
- p1926: 0
- p0631: 0; = IF(p0367<0.5;-SQRT(p0007*EXP(p0499^2*p0008)-p0007);SQRT(p0007*EXP(p0499^2*p0008)-p0007))
- p2478: 0; = p2282*p1014
- p3061: 0; = p2280*p1023
- p2875: 0; = p2289*(p1020+p1022)
- p0779: 0
- p3300: 0; = if(p1293+p1294+p1295+p1296=0;0;p1293/(p1293+p1294+p1295+p1296))
- p2334: 0; = p2224*p2202
- p2153: 1.30177e-8; = p2015*p2081*p2115/(p0818*1000)
- p1261: 0; = if(p1232>0;0;p0732/100)
- p3241: 8.74456e-10; = p3234*p1188*p3236/p0818
- p1885: 0
- p2419: 0; = p2235*p2209
- p2293: 0; = p2223*p2200
- p1772: 0
- p3269: 0
- p1666: 0
- p2360: 0; = p2225*p2188
- p2911: 0; = p2325*(p1020+p1022)
- p2105: 0.888194
- p3129: 0; = p2348*p1082
- p0688: 0
- p1166: 5.36742e-6; = p1164/p0818
- p2484: 0; = p2288*p1014
- p0901: 0.02432
- p2389: 0; = p2233*p2218
- p2470: 0; = p2274*p1123
- p1686: 0
- p2790: 0; = p2399*(p1019+p1021)
- p1915: 0
- p2780: 0; = p2389*(p1128+p1130)
- p1006: 0; = p1002*p0001*p0004/(p0818*p0002)
- p2647: 0; = p2256*(p1019+p1021)
- p1077: 0; = IF(p1071=0;p0715/100;0)
- p2034: 2.37411e-5; = p2015*p2030*p2032/(p0818*1000)
- p1853: 0
- p3462: 0; = p3367*p1241
- p2745: 0; = p2354*(p1019+p1021)
- p2226: 0; = if(p0774*p0778+p0775*p0779+p0776*p0780+p0777*p0781=0;0;p0778*p0774/(p0774*p0778+p0775*p0779+p0776*p0780+p0777*p0781))
- p2969: 0; = p2383*(p1079+p1081)
- p2458: 0; = p2262*p1073
- p1592: 0
- p3103: 0; = p2322*p1023
- p2966: 0; = p2380*(p1079+p1081)
- p1226: 0; = IF(p1221=0;0;IF(p1193=0;p0801;0))
- p1155: 0; = if(p1153*p0818=0;0;p1151/(p1153*p0818))
- p1676: 0
- p3056: 0; = p2275*p1132
- p2589: 0; = p2393*p1014
- p1251: 0; = if(p1232>0;0;p1246*p0001/(p0818*p0002))
- p1982: 750
- p2436: 0; = p2240*p1014
- p1862: 0
- p2818: 0; = p2427*(p1078+p1080)
- p3085: 0; = p2304*p1082
- p2813: 0; = p2422*(p1078+p1080)
- p2774: 0; = p2383*(p1078+p1080)
- p1029: 0; = IF(p1012=0;IF(p0801<p1023*(p0704/100)*p0703*1000;p0801;p1023*(p0704/100)*p0703*1000);0)
- p0930: 0; = p0801*p0924
- p2302: 0; = p2227*p2209
- p2456: 0; = p2260*p1073
- p4101: 0; = p1962*p3478
- p1801: 0
- p1942: 0
- p3175: 0; = p2394*p1023
- p2786: 0; = p2395*(p1019+p1021)
- p1123: 0; = if(p1121=0;p0717/100;0)
- p1108: 0; = IF(p1071=0;p1105*p1102*p1095;0)
- p3319: 0; = if(and(p1232=0;p3253<>0);p3253*(p3263-p3314)/p3316;0)
- p1747: 0
- p0852: 0; = p0847*p0851^3+p0848*p0851^2+p0849*p0851+p0850
- p2550: 0; = p2354*p1014
- p0990: 0; = p0986*p0886
- p0839: 0.532617; = p0838/p0818
- p2051: 0.000195733; = p2015*p2049*p2050/(p0818*1000)
- p2989: 0; = p2403*(p1020+p1022)
- p3038: 0; = p2257*p1023
- p2190: 0; = 32.065*p2189/(2*14.0067)
- p1893: 0
- p3242: 5.30184e-8; = p3234*p1188*p3238/p0818
- p3121: 0; = p2340*p1082
- p3113: 0; = p2332*p1023
- p2326: 0; = p2224*p2193
- p1036: 0; = IF(p1012=0;p0795*p0702*1000*p0796/100;0)
- p0789: 0
- p0684: 0
- p1554: 0
- p1095: 0; = IF(p1071=0;p0797*p0702*1000*p0798/100;0)
- p2358: 0; = p2225*p2186
- p0976: 0; = IF(p0687=0;IF(OR(p0686=0;p0689=0);0;p0686*1000*p0689/100);0)
- p2019: 0.13105
- p1279: 0
- p0862: 0; = p0674*1000/p0856
- p1771: 0
- p2617: 0; = p2421*p1073
- p2308: 0; = p2227*p2215
- p2883: 0; = p2297*(p1079+p1081)
- p0732: 0
- p2193: 0; = p1054/p0818
- p3212: 0; = p2431*p1132
- p2628: 0; = p2237*(p1019+p1021)
- p1010: 0; = p0890
- p2148: 3.9053e-7; = p2015*p2076*p2110/(p0818*1000)
- p2532: 0; = p2336*p1073
- p1975: 0.00055576; = p1970*p0001/(p0818*p0002)
- p2645: 0; = p2254*(p1019+p1021)
- p1225: 0; = IF(p1221=0;0;p1223+1.2*p1224)
- p1068: 0; = IF(p1012=0;p1054/(p1061*p0818);0)
- p2357: 0; = p2225*p2185
- p3310: 0; = if(and(p1232=0;p3252<>0);IF((p3306+p3307+p3308+p3309)+(p3252*(p3257*(1-p3277))/p3305)>p3252;p3252-(p3306+p3307+p3308+p3309);p3252*(p3257*(1-p3277))/p3305);0)
- p2340: 0; = p2228*p2208
- p1344: 0; = IF(p1318=0;p1327*p0801;0)
- p0744: 0
- p3263: 0
- p2125: 9.97887e-6; = p2015*p2053*p2087/(p0818*1000)
- p1117: 0; = IF(p1071=0;p1107/(p1112*p0818);0)
- p1584: 0
- p1985: 0; = (if(p1057=0;0;p1050/p1057)+if(p1058=0;0;p1051/p1058)+if(p1059=0;0;p1052/p1059)+if(p1060=0;0;p1053/p1060)+if(p1061=0;0;p1054/p1061)+if(p1062=0;0;p1055/p1062)+if(p1063=0;0;p1056/p1063))*(1+p1157)
- p2091: 0.374844
- p2483: 0; = p2287*p1014
- p1150: 0; = if(p1121=0;p1149*p1146*p1145;0)
- p1565: 0
- p1268: 0
- p0693: 0
- p2750: 0; = p2359*(p1019+p1021)
- p4926: 0; = p1963*p3482
- p2395: 0; = p2234*p2184
- p0766: 0
- p1904: 0
- p3033: 0; = p2252*p1023
- p1854: 0
- p3690: 0; = p1963*p3476
- p0915: 0.0177621; = p0914/p0818
- p2351: 0; = p2232*p2219
- p3326: 0; = if(and(p1232=0;p3255<>0);p3268*p3289;0)
- p1963d: 0; = p1608*p1812+p1609*p1813+p1610*p1814+p1611*p1815+p1612*p1816+p1613*p1817+p1614*p1818+p1615*p1819+p1616*p1820+p1617*p1821+p1618*p1822+p1619*p1823+p1620*p1824+p1621*p1825+p1622*p1826+p1623*p1827+p1624*p1828+p1625*p1829+p1626*p1830+p1627*p1831
- p2065: 0.0758824
- p2650: 0; = p2259*(p1078+p1080)
- p2472: 0; = p2276*p1014
- p2851: 0; = p2265*(p1079+p1081)
- p2412: 0; = p2234*p2202
- p1693: 0
- p1312: 0; = IF(p1307+p1310+p1311=p1266;0;p1266-(p1307+p1310+p1311))
- p2011: 0.00939622
- p2641: 0; = p2250*(p1019+p1021)
- p0984: 0; = if(p0886=0;0;min(1;(p0699*p0698*1000*p0701/100)/p0886))
- p1930: 0
- p2004: 30
- p2941: 0; = p2355*(p1020+p1022)
- p0933: 450000; = p0801*p0927
- p0980: 0; = IF(p0977=0;0;p0977*p0001/(p0818*p0002))
- p3252: 0; = p1252*(p1267*(1-p3247)+p1270*(1-p3248)+p1271*(1-p3249)+p1272*(1-p3250))
- p0768: 0
- p2544: 0; = p2348*p1073
- p2094: 0.922577
- p3414: 0; = p3376*p1238
- p1233: 0.00055576; = p1232*p0001/(p0818*p0002)
- p0929: 0; = p0801*p0923
- p1189: 0.00055576; = p0801*p0001/(p0818*p0002)
- p3051: 0; = p2270*p1082
- p1256: 0; = if(p1232>0;0;IF(p1253=1;0;IF(p1253+p1254>1;1-p1253;p1254)))
- p3373: 0; = if(p1232=0;p3245*p3361/p0818;0)
- p1790: 0
- p1839: 0
- p1282: 0; = IF(p1277+p1280+p1281=p1260;0;p1260-(p1277+p1280+p1281))
- p0824: 0.863
- p2447: 0; = p2251*p1014
- p0195: 0
- p1962: 0; = p1960*1000/p0818
- p3440: 0; = p3364*p1240
- p3251: 0; = p1252-(p3252+p3253+p3254+p3255+p3256)
- p2991: 0; = p2405*(p1020+p1022)
- p2749: 0; = p2358*(p1019+p1021)
- p1916: 0
- p1961: 0
- p3432: 0; = p3375*p1239
- p2643: 0; = p2252*(p1019+p1021)
- p2983: 0; = p2397*(p1020+p1022)
- p1993: 400
- p2030: 6.61
- p2555: 0; = p2359*p1014
- p1762: 0
- p0861: 0; = p0673*1000/p0856
- p1884: 0
- p2119: 0.679049
- p1876: 0
- p3329: 0; = if(and(p1232=0;p3255<>0);p3255*(p3266-p3324)/p3327;0)
- p1902: 0
- p2939: 0; = p2353*(p1129+p1131)
- p1599: 0
- p2908: 0; = p2322*(p1020+p1022)
- p2366: 0; = p2225*p2195
- p1333: 0; = p1332*p0001/(p0818*p0002)
- p2558: 0; = p2362*p1014
- p3169: 0; = p2388*p1082
- p0950: 0; = if(and(p0683=0;or(p0807=480;p0807=32;p0807=1;and(p0807=60;p0901<0.03)));p0938;0)
- p1644: 0
- p3330: 0; = if(and(p1232=0;p3255<>0);p3255*(p3267-p3325)/p3327;0)
- p3058: 0; = p2277*p1023
- p0837: 0.5
- p0780: 0
- p2535: 0; = p2339*p1073
- p2430: 0; = p2236*p2220
- p1859: 0
- p2272: 0; = p2230*p2218
- p2997: 0; = p2411*(p1020+p1022)
- p3318: 0; = if(and(p1232=0;p3253<>0);p3253*(p3262-p3313)/p3316;0)
- p1978: 240
- p0002: 0.453592
- p3348: 0; = if(and(p1232=0;p3256<>0);p3276*p3289;0)
- p3286: 0
- p1120: 0; = IF(p1071=0;p1110/(p1115*p0818);0)
- p2100: 0.705744
- p1281: 0; = IF(p1277+p1280=p1263;0;IF(p1277+p1280+p1279>p1263;p1263-(p1277+p1280);p1279))
- p2081: 0.0019
- p1562: 0
- p3237: 0.854735
- p0749: 0
- p0680: 0
- p2725: 0; = p2334*(p1019+p1021)
- p2895: 0; = p2309*(p1079+p1081)
- p3160: 0; = p2379*p1082
- p0792: 0
- p1723: 0
- p2825: 0; = p2239*(p1020+p1022)
- p2934: 0; = p2348*(p1079+p1081)
- p2251: 0; = p2222*p2197
- p3445: 0; = p3369*p1240
- p0838: 3.84762e8; = (p0833-p0836)*p0837
- p2236: 1; = 1-(p2230+p2231+p2232+p2233)
- p2651: 0; = p2260*(p1078+p1080)
- p0850: 0
- p1089: 0; = IF(p1071=0;p1083*p0001/(p0818*p0002);0)
- p0882: 450000; = p0869*p0856
- p2143: 1.07312e-6; = p2015*p2071*p2105/(p0818*1000)
- p1241: 0; = if(p1232>0;0;IF(p1234+p1238+p1239+p1240=1;0;1-(p1234+p1238+p1239+p1240)))
- p1246: 0; = if(p1232>0;0;p1241*(p0725/100)*p0723*1000)
- p0895: 2.02641e8; = p0894*p0830
- p2292: 0; = p2223*p2199
- p0854: 156376; = p0801*((1-p0853)*p0846+p0853*p0852)
- p0856: 450000; = p0801
- p2063: 2.01468
- p1852: 0
- p2421: 0; = p2235*p2211
- p2648: 0; = p2257*(p1019+p1021)
- p3225: 0; = p3221*p1229
- p2237: 0; = p2222*p2182
- p2599: 0; = p2403*p1014
- p2701: 0; = p2310*(p1078+p1080)
- p1832: 0
- p1586: 0
- p3371: 0; = if(p1232=0;p3245*p3359/p0818;0)
- p0760: 0
- p1231: 0; = IF(p1221=0;0;p1230*(p1228+p1229))
- p2060: 0.272353
- p1187: 0.00025142
- p2093: 0.260958
- p3191: 0; = p2410*p1023
- p2719: 0; = p2328*(p1019+p1021)
- p2279: 0; = p2223*p2185
- p3290: 0
- p1960: 0; = IF(p1959-p1958<0;0;p1959-p1958)
- p1855: 0
- p2255: 0; = p2222*p2201
- p3405: 0; = p3367*p1238
- p1335: 0; = p1334*p0001/(p0818*p0002)
- p3026: 0; = p2245*p1023
- p2870: 0; = p2284*(p1020+p1022)
- p3421: 0; = p3364*p1239
- p0938: 0; = p0932*p0001/(p0818*p0002)
- p2560: 0; = p2364*p1014
- p3298: 0; = if(p1283+p1284+p1285+p1286=0;0;p1283/(p1283+p1284+p1285+p1286))
- p3209: 0; = p2428*p1132
- p3274: 0
- p2029: 4.03
- p2183: 0; = p1064-p2182
- p3235: 0.118093
- p0858: 0; = p0670*1000/p0856
- p2067: 0.446471
- p1033: 0; = IF(p1012=0;p1027*p0001/(p0818*p0002);0)
- p2837: 0; = p2251*(p1020+p1022)
- p2633: 0; = p2242*(p1019+p1021)
- p0776: 0
- p2024: 0.748682
- p1729: 0
- p1221: 0
- p3352: 0; = if(and(p1232=0;p3256<>0);p3256*(p3275-p3347)/p3349;0)
- p3005: 0; = p2419*(p1079+p1081)
- p2390: 0; = p2233*p2219
- p3233: 0.60394
- p1201: 0
- p3257: 0
- p3302: 0; = if(and(p1232=0;p3252<>0);p3258*(p3278*(p3282*p1256+p3286*(p1253+p1257)+p1258*p3288+p3297*p3287));0)
- p2784: 0; = p2393*(p1019+p1021)
- p0459: 0; = SQRT(2)*(IF((2*p0327-1)<0;-1;IF((2*p0327-1)>0;1;0))*SQRT(SQRT((2/(pi()*0.140012289)+LN(1-(2*p0327-1)^2)/2)^2-LN(1-(2*p0327-1)^2)/0.140012289)-(2/(pi()*0.140012289)+LN(1-(2*p0327-1)^2)/2)))
- p1178: 6.08576e-8; = p1176/p0818
- p2889: 0; = p2303*(p1079+p1081)
- p1878: 0
- p2127: 1.79065e-5; = p2015*p2055*p2089/(p0818*1000)
- p1239: 0; = if(p1232>0;0;IF(p1234+p1238=1;0;IF(p1234+p1238+p1236>1;1-(p1234+p1238);p1236)))
- p3475: 0; = p3380*p1241
- p2401: 0; = p2234*p2190
- p2779: 0; = p2388*(p1078+p1080)
- p1939: 0
- p3395: 0; = p3376*p1234
- p2948: 0; = p2362*(p1020+p1022)
- p1074: 0; = IF(p1071=0;p0712/100;0)
- p3090: 0; = p2309*p1082
- p1316: 0; = p1312*p1252/p0818
- p2315: 0; = p2224*p2182
- p2886: 0; = p2300*(p1079+p1081)
- p1850: 0
- p2013: 0.85
- p1690: 0
- p2619: 0; = p2423*p1073
- p2667: 0; = p2276*(p1019+p1021)
- p1951: 0
- p2052: 9.85555e-6; = p2015*p2049*(1-p2050)/(p0818*1000)
- p0704: 0
- p0847: 0
- p2965: 0; = p2379*(p1079+p1081)
- p0827: 0; = p0818*p0819*p0823
- p2418: 0; = p2235*p2208
- p0705: 0
- p1277: 0
- p2434: 0; = p2238*p1014
- p2244: 0; = p2222*p2189
- p3356: 0; = if(p1232=0;p3306+p3317+p3328+p3339+p3350;0)
- p2604: 0; = p2408*p1014
- p2017: 2.65108e6; = p2015*p0898
- p3301: 0; = if(and(p1232=0;p3252<>0);p3257*p3277*(p3297*p3290+(1-p3297)*p3294);0)
- p2356: 0; = p2225*p2184
- p2652: 0; = p2261*(p1078+p1080)
- p2970: 0; = p2384*(p1079+p1081)
- p2471: 0; = p2275*p1123
- p1971: 0.00053106; = p1966*p0001/(p0818*p0002)
- p2964: 0; = p2378*(p1079+p1081)
- p0004: 0.0254
- p3343: 0; = if(and(p1232=0;p3254<>0);IF((p3339+p3340+p3341+p3342)+(p3254*(p3269*(1-p3277))/p3338)>p3254;p3254-(p3339+p3340+p3341+p3342);p3254*(p3269*(1-p3277))/p3338);0)
- p3264: 0
- p0843: -0.0156064
- p1948: 0
- p0709: 0
- p0876: 0; = p0866*p0856
- p1778: 0
- p3070: 0; = p2289*p1023
- p3122: 0; = p2341*p1082
- p2522: 0; = p2326*p1014
- p1648: 0
- p2304: 0; = p2227*p2211
- p0845: 0.5
- p1847: 0
- p1250: 0; = if(p1232>0;0;p1245*p0001/(p0818*p0002))
- p2071: 0.151
- p1148: 0; = if(p1121=0;IF(p1146=1;0;1-p1146);0)
- p0816: 0
- p2269: 0; = p2226*p2215
- p2797: 0; = p2406*(p1019+p1021)
- p1255: 0; = if(p1232>0;0;p0737/100)
- p0063: 450.21
- p2219: 0; = p1154-p2218
- p0939: 0.00055576; = p0933*p0001/(p0818*p0002)
- p2369: 0; = p2225*p2198
- p1204: 0
- p1770: 0
- p2396: 0; = p2234*p2185
- p3346: 0; = if(and(p1232=0;p3256<>0);p3274*(p3281*(p3285*p1256+p3286*(p1253+p1257)+p1258*p3288));0)
- p2728: 0; = p2337*(p1078+p1080)
- p2658: 0; = p2267*(p1078+p1080)
- p3268: 0
- p2897: 0; = p2311*(p1129+p1131)
- p1129: 0; = if(p1121=0;IF(p1123+p1128=1;0;IF(p1123+p1128+p1125>1;1-(p1123+p1128);p1125));0)
- p0703: 450.21; = p0043*(1+p0571*p0175/100)
- p3470: 0; = p3375*p1241
- p1963k: 0; = p1744*p1948+p1745*p1949+p1746*p1950+p1747*p1951+p1748*p1952+p1749*p1953+p1750*p1954+p1751*p1955+p1752*p1956+p1753*p1957+p1961*p1962
- p2175: 0.000554914; = p0895*p0908/p0818
- p1587: 0
- p2098: 0.856281
- p1162: 0.000622924; = p1161/p0818
- p3176: 0; = p2395*p1023
- p2695: 0; = p2304*(p1078+p1080)
- p2884: 0; = p2298*(p1079+p1081)
- p2954: 0; = p2368*(p1020+p1022)
- p1341: 0; = p1340*p0001/(p0818*p0002)
- p2572: 0; = p2376*p1073
- p1561: 0
- p1986: 4200
- p2064: 0.676706
- p3041: 0; = p2260*p1082
- p1888: 0
- p1116: 0; = IF(p1071=0;p1106/(p1111*p0818);0)
- p2893: 0; = p2307*(p1079+p1081)
- p2620: 0; = p2424*p1073
- p2787: 0; = p2396*(p1019+p1021)
- p1232: 450000; = p0801
- p2468: 0; = p2272*p1123
- p1602: 0
- p3277: 0
- p1610: 0
- p0750: 0
- p3208: 0; = p2427*p1082
- p3161: 0; = p2380*p1082
- p2016: 0.0012702; = (p2014-p2015)/(p0818)
- p2195: 0; = p2194*p2193
- p3291: 0
- p1558: 0
- p0761: 0
- p2817: 0; = p2426*(p1078+p1080)
- p2061: 0.518824
- p0986: 0; = IF(p0982+p0985=1;0;IF(p0982+p0985+p0984>1;1-(p0982+p0985);p0984))
- p0902: 0
- p2822: 0; = p2431*(p1128+p1130)
- p2124: 0.263965
- p3034: 0; = p2253*p1023
- p1802: 0
- p1028: 0; = IF(p1012=0;p1022*(p0704/100)*p0703*1000;0)
- p2332: 0; = p2224*p2200
- p1229: 0; = IF(p1221=0;0;p1228*p1221)
- p1324: 0; = IF(((p0745*1000*p0751/100)+(p0754*1000*p0760/100))/p0801<0;0;((p0745*1000*p0751/100)+(p0754*1000*p0760/100))/p0801)
- p2135: 6.44821e-6; = p2015*p2063*p2097/(p0818*1000)
- p3689: 0; = p1962*p3476
- p2152: 1.66499e-7; = p2015*p2080*p2114/(p0818*1000)
- p3023: 0; = p2242*p1023
- p0962: 0; = if(and(p0683>0;or(p0807=480;p0807=32;p0807=1;and(p0807=60;p0901<0.03)));p0938;0)
- p2564: 0; = p2368*p1014
- p2298: 0; = p2227*p2205
- p3057: 0; = p2276*p1023
- p2653: 0; = p2262*(p1078+p1080)
- p1097: 0
- p1606: 0
- p2498: 0; = p2302*p1073
- p2417: 0; = p2235*p2207
- p3458: 0; = p3363*p1241
- p1075: 0; = IF(p1071=0;p0713/100;0)
- p2276: 0; = p2223*p2182
- p1933: 0
- p3418: 0; = p3380*p1238
- p2479: 0; = p2283*p1014
- p2310: 0; = p2227*p2217
- p1775: 0
- p1175: 9.76968e-5
- p2025: 1.26998e-5; = p2015*p2023*p2024/(p0818*1000)
- p1865: 0
- p1174: 1.58304e-7; = p1170*p1173/p0818
- p3349: 0; = if(and(p1232=0;p3256<>0);1-(p3345+p3346+p3347+p3348);0)
- p1792: 0
- p2130: 5.42815e-6; = p2015*p2058*p2092/(p0818*1000)
- p1306: 0; = p1302*p1252/p0818
- p2432: 0; = p1158
- p2963: 0; = p2377*(p1079+p1081)
- p2622: 0; = p2426*p1073
- p1185: 0.5
- p2379: 0; = p2229*p2208
- p2259: 0; = p2226*p2205
- p3480: 0; = if(p1328+p1330+p1332+p1334+p1336+p1338+p1340+p1342+p1344=0;0;p1336/(p1328+p1330+p1332+p1334+p1336+p1338+p1340+p1342+p1344))
- p2515: 0; = p2319*p1014
- p3429: 0; = p3372*p1239
- p1661: 0
- p3063: 0; = p2282*p1023
- p2202: 0; = 4*1.00794*p2201/(2*14.0067)
- p0005: 1.60934
- p3053: 0; = p2272*p1132
- p1296: 0; = p1292*p1252/p0818
- p2747: 0; = p2356*(p1019+p1021)
- p3386: 0; = p3367*p1234
- p1594: 0
- p1145: 0; = if(p1121=0;p0799*p0702*1000*p0800/100;0)
- p3427: 0; = p3370*p1239
- p1079: 0; = IF(p1071=0;IF(p1073+p1078=1;0;IF(p1073+p1078+p1075>1;1-(p1073+p1078);p1075));0)
- p2414: 0; = p2235*p2204
- p2938: 0; = p2352*(p1129+p1131)
- p3471: 0; = p3376*p1241
- p2810: 0; = p2419*(p1078+p1080)
- p0943: 0; = if(and(p0683=0;p0949=0);p0937;0)
- p3167: 0; = p2386*p1082
- p1563: 0
- p1191: 0.5
- p2428: 0; = p2236*p2218
- p0759: 0
- p0903: 0.0129401
- p1721: 0
- p2403: 0; = p2234*p2192
- p2122: 0.341195
- p1705: 0
- p3455: 0; = p3379*p1240
- p0003: 10000
- p0885: 100; = IF(p0689+p0884=100;0;100-(p0689+p0884))
- p2108: 0.826583
- p2462: 0; = p2266*p1073
- p0924: 0; = IF(p0918+p0923=1;0;IF(p0918+p0923+p0920>1;1-(p0918+p0923);p0920))
- p1142: 0; = if(p1121=0;p1136*p0001/(p0818*p0002);0)
- p2420: 0; = p2235*p2210
- p0940: 0; = if(and(p0683=0;p0946=0);p0934;0)
- p2618: 0; = p2422*p1073
- p3178: 0; = p2397*p1023
- p3389: 0; = p3370*p1234
- p3279: 0
- p2534: 0; = p2338*p1073
- p3201: 0; = p2420*p1082
- p0819: 0; = p0808*p0809/p0818
- p1679: 0
- p0985: 0; = IF(p0982=1;0;IF(p0982+p0983>1;1-p0982;p0983))
- p2273: 0; = p2230*p2219
- p3368: 0; = if(p1232=0;p3245*p3356/p0818;0)
- p3895: 0; = p1962*p3477
- p1133: 0; = if(p1121=0;p1123*(p0716/100)*p0703*1000;0)
- p2665: 0; = p2274*(p1128+p1130)
- p1237: 0; = if(p1232>0;0;p0729/100)
- p1715: 0
- p0877: 0; = p0876*p0001*p0003/(p0818*p0002)
- p1342: 0; = p1326*p0801
- p2801: 0; = p2410*(p1019+p1021)
- p2247: 0; = p2222*p2192
- p2277: 0; = p2223*p2183
- p1734: 0
- p0754: 0
- p3197: 0; = p2416*p1082
- p1867: 0
- p3403: 0; = p3365*p1238
- p2227: 0; = if(p0774*p0778+p0775*p0779+p0776*p0780+p0777*p0781=0;0;p0779*p0775/(p0774*p0778+p0775*p0779+p0776*p0780+p0777*p0781))
- p2986: 0; = p2400*(p1020+p1022)
- p0042: 450.21
- p1922: 0
- p1950: 0
- p3340: 0; = if(and(p1232=0;p3254<>0);p3254*(p3270-p3335)/p3338;0)
- p0438: 0; = SQRT(2)*(IF((2*p0306-1)<0;-1;IF((2*p0306-1)>0;1;0))*SQRT(SQRT((2/(pi()*0.140012289)+LN(1-(2*p0306-1)^2)/2)^2-LN(1-(2*p0306-1)^2)/0.140012289)-(2/(pi()*0.140012289)+LN(1-(2*p0306-1)^2)/2)))
- p2922: 0; = p2336*(p1079+p1081)
- p2092: 0.54529
- p0967: 0
- p2410: 0; = p2234*p2200
- p1027: 0; = IF(p1012=0;p1021*(p0704/100)*p0703*1000;0)
- p3299: 0; = if(p1303+p1304+p1305+p1306=0;0;p1303/(p1303+p1304+p1305+p1306))
- p2539: 0; = p2343*p1073
- p0725: 0
- p2661: 0; = p2270*(p1078+p1080)
- p2999: 0; = p2413*(p1020+p1022)
- p2876: 0; = p2290*(p1020+p1022)
- p2547: 0; = p2351*p1123
- p1249: 0; = if(p1232>0;0;p1244*p0001/(p0818*p0002))
- p2918: 0; = p2332*(p1020+p1022)
- p3360: 0; = if(p1232=0;p3310+p3321+p3332+p3343+p3354;0)
- p2894: 0; = p2308*(p1079+p1081)
- p2355: 0; = p2225*p2183
- p1114: 0
- p1669: 0
- p3183: 0; = p2402*p1023
- p0805: 0
- p4720: 0; = p1963*p3481
- p2043: 0.636483
- p2291: 0; = p2223*p2198
- p1689: 0
- p0730: 0
- p2703: 0; = p2312*(p1128+p1130)
- p2110: 0.856281
- p1637: 0
- p2323: 0; = p2224*p2190
- p3309: 0; = if(and(p1232=0;p3252<>0);p3252*(p3260-p3304)/p3305;0)
- p1808: 0
- p3116: 0; = p2335*p1023
- p0829: 0; = if(p0807=480;p0814*(1-p0824);0)
- p3162: 0; = p2381*p1082
- p2344: 0; = p2228*p2212
- p2848: 0; = p2262*(p1079+p1081)
- p2463: 0; = p2267*p1073
- p1188: 113.139; = p1187*p0801
- p1063: 0
- p2431: 0; = p2236*p2221
- p0778: 0
- p3256: 0; = p1252*(p1307*(1-p3247)+p1310*(1-p3248)+p1311*(1-p3249)+p1312*(1-p3250))
- p1967: 0; = if(p0807=480;p0802*p0810;0)
- p3344: 0; = if(and(p1232=0;p3254<>0);p3254-(p3339+p3340+p3341+p3342+p3343);0)
- p1881: 0
- p0883: 5.5576; = p0882*p0001*p0003/(p0818*p0002)
- p2184: 0; = p1051/p0818
- p3068: 0; = p2287*p1023
- p0710: 0
- p3357: 0; = if(p1232=0;p3307+p3318+p3329+p3340+p3351;0)
- p3205: 0; = p2424*p1082
- p0992: 0; = p0988*p0001*p0004/(p0818*p0002)
- p2775: 0; = p2384*(p1078+p1080)
- p0960: 0; = if(and(p0683>0;or(p0807=480;p0807=32;p0807=1;and(p0807=60;p0901<0.03)));p0936;0)
- p3100: 0; = p2319*p1023
- p3402: 0; = p3364*p1238
- p2509: 0; = p2313*p1123
- p2228: 0; = if(p0774*p0778+p0775*p0779+p0776*p0780+p0777*p0781=0;0;p0780*p0776/(p0774*p0778+p0775*p0779+p0776*p0780+p0777*p0781))
- p2859: 0; = p2273*(p1129+p1131)
- p3022: 0; = p2241*p1023
- p2805: 0; = p2414*(p1078+p1080)
- p0821: 1.31667
- p3117: 0; = p2336*p1082
- p1553: 0
- p1007: 0; = p1003*p0001*p0004/(p0818*p0002)
- p3029: 0; = p2248*p1023
- p1877: 0
- p2393: 0; = p2234*p2182
- p2221: 0; = p1155-p2220
- p2899: 0; = p2313*(p1129+p1131)
- p0946: 0; = if(and(p0683=0;or(p0807=480;p0807=32;p0807=1;and(p0807=60;p0901<0.03)));p0934;0)
- p2040: 0.44
- p2177: 0.144292; = p0895/p0818-(p2173+p2174+p2175+p2176)
- p1614: 0
- p2758: 0; = p2367*(p1019+p1021)
- p2133: 3.17878e-6; = p2015*p2061*p2095/(p0818*1000)
- p2907: 0; = p2321*(p1020+p1022)
- p1739: 0
- p1874: 0
- p0956: 0; = if(and(p0683>0;or(p0807=56;p0807=100;and(p0807=60;p0901>0.06)));p0938;0)
- p0893: 0; = 1000*(p0890+p0892)*p0001*p0003*p0004/(p0818*p0002)
- p2510: 0; = p2314*p1123
- p1180: 3.04288e-8; = p1176*p1179/p0818
- p3125: 0; = p2344*p1082
- p1113: 0
- p2718: 0; = p2327*(p1019+p1021)
- p2317: 0; = p2224*p2184
- p1825: 0
- p2882: 0; = p2296*(p1020+p1022)
- p3064: 0; = p2283*p1023
- p1555: 0
- p2469: 0; = p2273*p1123
- p2852: 0; = p2266*(p1079+p1081)
- p3173: 0; = p2392*p1132
- p2442: 0; = p2246*p1014
- p0689: 0
- p2085: 0.0335294
- p2878: 0; = p2292*(p1020+p1022)
- p1795: 0
- p2841: 0; = p2255*(p1020+p1022)
- p0273: 0.5
- p2771: 0; = p2380*(p1078+p1080)
- p1314: 0; = p1310*p1252/p0818
- p3266: 0
- p3390: 0; = p3371*p1234
- p1192: 7.83077e-8; = p1188*p1191/p0818
- p3423: 0; = p3366*p1239
- p2144: 9.18088e-7; = p2015*p2072*p2106/(p0818*1000)
- p2693: 0; = p2302*(p1078+p1080)
- p3457: 0; = p3362*p1241
- p2096: 0.486404
- p2433: 0; = p2237*p1014
- p2018: 0.1978
- p1731: 0
- p1199: 0
- p1088: 0; = IF(p1071=0;p1082*(p0710/100)*p0703*1000;0)
- p1206: 0
- p0758: 0
- p2044: 3.5649e-7; = p2015*p2042*p2043/(p0818*1000)
- p2482: 0; = p2286*p1014
- p3439: 0; = p3363*p1240
- p1046: 0; = IF(p1012=0;IF(p1037+p1044+p1045=1;0;IF(p1037+p1044+p1045+p1040>1;1-(p1037+p1044+p1045);p1040));0)
- p2258: 0; = p2226*p2204
- p2220: 0; = p1151/p0818
- p1228: 0; = IF(p1221=0;0;p0801*p1212*2000/(p1222+p1221*p1225)/p0818)
- p1673: 0
- p2444: 0; = p2248*p1014
- p2156: 1.82175e-7; = p2015*p2085*p2118/(p0818*1000)
- p2717: 0; = p2326*(p1019+p1021)
- p2007: 1.35648e-7; = ((p1981*p1985+p1987*p1991+p1993*p1997+p2001*p2005)/p0818)*p0005*p0002/1000
- p2057: 3.28794
- p2945: 0; = p2359*(p1020+p1022)
- p3434: 0; = p3377*p1239
- p0798: 0
- p0995: 0; = p0991*p0001*p0004/(p0818*p0002)
- p1318: 0.00055576; = p1317*p0001/(p0818*p0002)
- p2142: 1.84377e-6; = p2015*p2070*p2104/(p0818*1000)
- p1851: 0
- p0846: 0.347502; = p0841*p0845^3+p0842*p0845^2+p0843*p0845+p0844
- p2614: 0; = p2418*p1073
- p2033: 1.50074e-5; = p2015*p2029*p2031/(p0818*1000)
- p1917: 0
- p3071: 0; = p2290*p1023
- p2556: 0; = p2360*p1014
- p1182: 62.9144; = p1181*p0801
- p3313: 0; = if(and(p1232=0;p3253<>0);p3262*(p3278*(p3282*p1256+p3286*(p1253+p1257)+p1258*p3288+p3298*p3287));0)
- p2740: 0; = p2349*(p1078+p1080)
- p2971: 0; = p2385*(p1079+p1081)
- p1722: 0
- p1934: 0
- p3325: 0; = if(and(p1232=0;p3255<>0);p3267*p3289;0)
- p3396: 0; = p3377*p1234
- p1620: 0
- p2230: 0; = if(p0783*p0787+p0784*p0788+p0785*p0789+p0786*p0790=0;0;p0787*p0783/(p0783*p0787+p0784*p0788+p0785*p0789+p0786*p0790))
- p3398: 0; = p3379*p1234
- p2700: 0; = p2309*(p1078+p1080)
- p0813: 0; = if(p0807=480;1.56521739130435;0)
- p1031: 0; = IF(p1012=0;p1025*p0001/(p0818*p0002);0)
- p1094: 0; = IF(p1071=0;p1088*p0001/(p0818*p0002);0)
- p3227: 0; = p3223*p1229
- p2508: 0; = p2312*p1123
- p1134: 0; = if(p1121=0;p1128*(p0716/100)*p0703*1000;0)
- p2249: 0; = p2222*p2195
- p2194: 0
- p1895: 0
- p2832: 0; = p2246*(p1020+p1022)
- p1026: 0; = IF(p1012=0;p1020*(p0704/100)*p0703*1000;0)
- p1297: 0
- p1745: 0
- p1284: 0; = p1280*p1252/p0818
- p1600: 0
- p2751: 0; = p2360*(p1019+p1021)
- p1141: 0; = if(p1121=0;p1135*p0001/(p0818*p0002);0)
- p3114: 0; = p2333*p1023
- p2646: 0; = p2255*(p1019+p1021)
- p3379: 0; = if(p1232=0;p3246*p3361/p0818;0)
- p1856: 0
- p3181: 0; = p2400*p1023
- p2726: 0; = p2335*(p1019+p1021)
- p2830: 0; = p2244*(p1020+p1022)
- p2084: 0.21
- p2363: 0; = p2225*p2191
- p1171: 0.00055576; = p0801*p0001/(p0818*p0002)
- p1903: 0
- p1794: 0
- p0724: 0
- p2446: 0; = p2250*p1014
- p3293: 0
- p1919: 0
- p2723: 0; = p2332*(p1019+p1021)
- p2235: 1; = 1-(p2226+p2227+p2228+p2229)
- p0740: 0
- p1789: 0
- p0670: 0
- p2914: 0; = p2328*(p1020+p1022)
- p2464: 0; = p2268*p1073
- p0719: 0
- p2763: 0; = p2372*(p1019+p1021)
- p2935: 0; = p2349*(p1079+p1081)
- p2891: 0; = p2305*(p1079+p1081)
- p2467: 0; = p2271*p1073
- p3476: 0; = if(p1328+p1330+p1332+p1334+p1336+p1338+p1340+p1342+p1344=0;0;p1328/(p1328+p1330+p1332+p1334+p1336+p1338+p1340+p1342+p1344))
- p2624: 0; = p2428*p1123
- p2117: 0.585147
- p1576: 0
- p3353: 0; = if(and(p1232=0;p3256<>0);p3256*(p3276-p3348)/p3349;0)
- p1016: 0; = IF(p1012=0;p0707/100;0)
- p1908: 0
- p1081: 0; = IF(p1071=0;IF(p1073+p1078+p1079+p1080=1;0;IF(p1073+p1078+p1079+p1080+p1077>1;1-(p1073+p1078+p1079+p1080);p1077));0)
- p2846: 0; = p2260*(p1079+p1081)
- p3004: 0; = p2418*(p1079+p1081)
- p0942: 0; = if(and(p0683=0;p0948=0);p0936;0)
- p2324: 0; = p2224*p2191
- p1628: 0
- p3036: 0; = p2255*p1023
- p2833: 0; = p2247*(p1020+p1022)
- p1640: 0
- p2610: 0; = p2414*p1073
- p2378: 0; = p2229*p2207
- p1161: 450000; = p0801
- p2377: 0; = p2229*p2206
- p1115: 0
- p2554: 0; = p2358*p1014
- p1607: 0
- p0866: 0; = IF(p0858+p0864+p0865=1;0;IF(p0858+p0864+p0865+p0861>1;1-(p0858+p0864+p0865);p0861))
- p0405: 0; = SQRT(2)*(IF((2*p0273-1)<0;-1;IF((2*p0273-1)>0;1;0))*SQRT(SQRT((2/(pi()*0.140012289)+LN(1-(2*p0273-1)^2)/2)^2-LN(1-(2*p0273-1)^2)/0.140012289)-(2/(pi()*0.140012289)+LN(1-(2*p0273-1)^2)/2)))
- p1712: 0
- p2174: 0.00362983; = p0895*p0903/p0818
- p1809: 0
- p2909: 0; = p2323*(p1020+p1022)
- p3119: 0; = p2338*p1082
- p1084: 0; = IF(p1071=0;p1078*(p0710/100)*p0703*1000;0)
- p1001: 0; = if(p0978>0;0;if(and(p0687=0;p0691=0;p0695=0;p0699=0);0;IF(p0996+p0999+p1000=1;0;1-(p0996+p0999+p1000))))
- p3481: 0; = if(p1328+p1330+p1332+p1334+p1336+p1338+p1340+p1342+p1344=0;0;p1338/(p1328+p1330+p1332+p1334+p1336+p1338+p1340+p1342+p1344))
- p1880: 0
- p1340: 0; = p1325*p0801
- p3092: 0; = p2311*p1132
- p2450: 0; = p2254*p1014
- p1073: 0; = IF(p1071=0;p0711/100;0)
- p1923: 0
- p1008: 0; = p1004*p0001*p0004/(p0818*p0002)
- p0741: 0
- p2452: 0; = p2256*p1014
- p1578: 0
- p1873: 0
- p2616: 0; = p2420*p1073
- p1263: 0; = if(p1232>0;0;IF(p1259=1;0;IF(p1259+p1260>1;1-p1259;p1260)))
- p2956: 0; = p2370*(p1020+p1022)
- p0996: 0; = if(p0888=0;0;if((p0691*p0690*1000*p0692/100)/p0888>1;1;(p0691*p0690*1000*p0692/100)/p0888))
- p1119: 0; = IF(p1071=0;p1109/(p1114*p0818);0)
- p2006: 1.35648e-6; = ((p1980*p1985+p1986*p1991+p1992*p1997+p2000*p2005)/p0818)*p0005*p0002/1000
- p2590: 0; = p2394*p1014
- p1698: 0
- p3304: 0; = if(and(p1232=0;p3252<>0);p3260*p3289;0)
- p2159: 1.42994e-5; = p2015*p2083*p2121/(p0818*1000)
- p2783: 0; = p2392*(p1128+p1130)
- p1821: 0
- p2314: 0; = p2231*p2221
- p0794: 0
- p3218: 0; = p3214*p1228
- p3294: 0
- p1687: 0
- p1799: 0
- p1286: 0; = p1282*p1252/p0818
- p1706: 0
- p1618: 0
- p1292: 0; = IF(p1287+p1290+p1291=p1261;0;p1261-(p1287+p1290+p1291))
- p3219: 0; = p3215*p1228
- p1173: 0.5
- p1624: 0
- p0673: 0
- p0952: 0; = if(and(p0683>0;or(p0807=56;p0807=100;and(p0807=60;p0901>0.06)));p0934;0)
- p3115: 0; = p2334*p1023
- p0914: 1.28314e7; = p0825*p0911+(p0830+p0895)*p0824*p0913
- p1593: 0
- p1300: 0; = IF(p1297=p1265;0;IF(p1297+p1298>p1265;p1265-p1297;p1298))
- p0007: 14; = p0006-1
- p0771: 0
- p1146: 0
- p2713: 0; = p2322*(p1019+p1021)
- p0975: 0; = p0973*p0974/p0818
- p2380: 0; = p2229*p2209
- p0959: 0; = if(and(p0683>0;or(p0807=480;p0807=32;p0807=1;and(p0807=60;p0901<0.03)));p0935;0)
- p1769: 0
- p1061: 0
- p2605: 0; = p2409*p1014
- p1612: 0
- p1849: 0
- p3239: 0.013074; = IF(p3238+p3235+p3236=1;0;1-(p3238+p3235+p3236))
- p2088: 0.798875
- p3015: 0; = p2429*(p1129+p1131)
- p2591: 0; = p2395*p1014
- p3328: 0; = if(and(p1232=0;p3255<>0);p3255*(p3265*p3277-p3323)/p3327;0)
- p2055: 5.59471
- p0826: 0.118333; = 1-p0825/p0818
- p2574: 0; = p2378*p1073
- p1963: 0; = p1963a+p1963b+p1963c+p1963d+p1963e+p1963f+p1963g+p1963h+p1963i+p1963j+p1963k
- p2423: 0; = p2235*p2213
- p3232: 8.70907e-8; = p1182/p0818
- p1642: 0
- p0908: 0.00197823
- p0907: 0
- p2253: 0; = p2222*p2199
- p2223: 0; = if(p0765*p0769+p0766*p0770+p0767*p0771+p0768*p0772=0;0;p0770*p0766/(p0765*p0769+p0766*p0770+p0767*p0771+p0768*p0772))
- p2947: 0; = p2361*(p1020+p1022)
- p3334: 0; = IF(or(p3254=0;p1232>0);0;p3269*p3277*(p3300*p3292+(1-p3300)*p3296))
- p1639: 0
- p1066: 0; = IF(p1012=0;p1052/(p1059*p0818);0)
- p2962: 0; = p2376*(p1079+p1081)
- p3374: 0; = if(p1232=0;p3246*p3356/p0818;0)
- p2068: 0.153529
- p1989: 50
- p1732: 0
- p0812: 0; = if(p0807=480;0.095/0.34;0)
- p1053: 0; = IF(p1012=0;p1046*p1036;0)
- p3246: 1; = IF(p3244+p3245=1;0;1-(p3244+p3245))
- p3044: 0; = p2263*p1082
- p2373: 0; = p2225*p2202
- p2634: 0; = p2243*(p1019+p1021)
- p3433: 0; = p3376*p1239
- p0867: 0; = IF(p0858+p0864+p0865+p0866=1;0;IF(p0858+p0864+p0865+p0866+p0862>1;1-(p0858+p0864+p0865+p0866);p0862))
- p1144: 0; = if(p1121=0;p1138*p0001/(p0818*p0002);0)
- p0669: 43.4782; = p0009*(1+p0537*p0141/100)
- p0954: 0; = if(and(p0683>0;or(p0807=56;p0807=100;and(p0807=60;p0901>0.06)));p0936;0)
- p1892: 0
- p2200: 0; = p1056/p0818
- p2158: 1.1831e-6; = p2015*p2082*p2120/(p0818*1000)
- p1160: 0; = (p1156+p1158)*p1159
- p2639: 0; = p2248*(p1019+p1021)
- p3363: 0; = if(p1232=0;p3244*p3357/p0818;0)
- p1198: 0
- p2995: 0; = p2409*(p1020+p1022)
- p3003: 0; = p2417*(p1079+p1081)
- p2166: 0.534173; = p2165*p0824
- p2794: 0; = p2403*(p1019+p1021)
- p5132: 0; = p1963*p3483
- p1782: 0
- p1062: 0
- p0757: 0
- p2659: 0; = p2268*(p1078+p1080)
- p1125: 0; = if(p1121=0;p0719/100;0)
- p1096: 0
- p2099: 0.620397
- p2129: 9.86138e-6; = p2015*p2057*p2091/(p0818*1000)
- p2912: 0; = p2326*(p1020+p1022)
- p1980: 3521.6
- p2545: 0; = p2349*p1073
- p0825: 6.36916e8; = p0818*p0822
- p1067: 0; = IF(p1012=0;p1053/(p1060*p0818);0)
- p3195: 0; = p2414*p1082
- p1044: 0; = IF(p1012=0;IF(p1037=1;0;IF(p1037+p1038>1;1-p1037;p1038));0)
- p3399: 0; = p3380*p1234
- p2218: 0; = p1150/p0818
- p3083: 0; = p2302*p1082
- p1020: 0; = IF(p1012=0;IF(p1014+p1019=1;0;IF(p1014+p1019+p1016>1;1-(p1014+p1019);p1016));0)
- p1668: 0
- p1665: 0
- p2684: 0; = p2293*(p1019+p1021)
- p2570: 0; = p2374*p1014
- p2764: 0; = p2373*(p1019+p1021)
- p1107: 0; = IF(p1071=0;p1105*p1101*p1095;0)
- p1211: 0
- p1625: 0
- p2752: 0; = p2361*(p1019+p1021)
- p2321: 0; = p2224*p2188
- p1720: 0
- p3089: 0; = p2308*p1082
- p1257: 0; = if(p1232>0;0;IF(p1253+p1256=1;0;IF(p1253+p1256+p1255>1;1-(p1253+p1256);p1255)))
- p2083: 2.17294
- p2123: 0.263965
- p2457: 0; = p2261*p1073
- p1289: 0
- p2888: 0; = p2302*(p1079+p1081)
- p2245: 0; = p2222*p2190
- p0735: 0
- p2240: 0; = p2222*p2185
- p2149: 2.9461e-7; = p2015*p2077*p2111/(p0818*1000)
- p2185: 0; = p1065-p2184
- p1675: 0
- p1842: 0
- p1714: 0
- p2288: 0; = p2223*p2195
- p3408: 0; = p3370*p1238
- p2368: 0; = p2225*p2197
- p2606: 0; = p2410*p1014
- p0889: 0; = 1000*p0888*p0001*p0003*p0004/(p0818*p0002)
- p2232: 0; = if(p0783*p0787+p0784*p0788+p0785*p0789+p0786*p0790=0;0;p0789*p0785/(p0783*p0787+p0784*p0788+p0785*p0789+p0786*p0790))
- p0991: 0; = p0987*p0886
- p0748: 0
- p1076: 0; = IF(p1071=0;p0714/100;0)
- p1605: 0
- p2109: 0.826583
- p2388: 0; = p2229*p2217
- p3059: 0; = p2278*p1023
- p2370: 0; = p2225*p2199
- p2465: 0; = p2269*p1073
- p3145: 0; = p2364*p1023
- p2629: 0; = p2238*(p1019+p1021)
- p2937: 0; = p2351*(p1129+p1131)
- p2164: 0.00287505; = (p2015/p0818)-(p2022)-(p2035+p2036+p2052)-(p2017/p0818)-(p2039+p2041+p2044+p2158+p2159+p2160+p2161+p2162)
- p1963c: 0; = p1588*p1792+p1589*p1793+p1590*p1794+p1591*p1795+p1592*p1796+p1593*p1797+p1594*p1798+p1595*p1799+p1596*p1800+p1597*p1801+p1598*p1802+p1599*p1803+p1600*p1804+p1601*p1805+p1602*p1806+p1603*p1807+p1604*p1808+p1605*p1809+p1606*p1810+p1607*p1811
- p2260: 0; = p2226*p2206
- p2138: 6.17838e-7; = p2015*p2066*p2100/(p0818*1000)
- p1730: 0
- p1121: 450000; = p0801
- p3076: 0; = p2295*p1023
- p2157: 3.35586e-7; = p2015*p2086*p2119/(p0818*1000)
- p2808: 0; = p2417*(p1078+p1080)
- p2933: 0; = p2347*(p1079+p1081)
- p1629: 0
- p2845: 0; = p2259*(p1079+p1081)
- p0775: 0
- p2154: 1.0145e-6; = p2015*p2082*p2116/(p0818*1000)
- p2519: 0; = p2323*p1014
- p1906: 0
- p2451: 0; = p2255*p1014
- p1023: 0; = IF(p1012=0;IF(p1014+p1019+p1020+p1021+p1022=1;0;1-(p1014+p1019+p1020+p1021+p1022));0)
- p0973: 0; = p0967+p0968+p0969
- p2407: 0; = p2234*p2197
- p1972: 0; = if(p0807=480;p1967*p0001/(p0818*p0002);0)
- p2186: 0; = p1052/p0818
- p2327: 0; = p2224*p2195
- p1804: 0
- p1567: 0
- p1845: 0
- p1829: 0
- p1761: 0
- p1212: 0; = if(p1211=0;0;if(p1193>0;0;(p1207+p1208+p1209)*p1210/(2000*p1211)))
- p3456: 0; = p3380*p1240
- p1032: 0; = IF(p1012=0;p1026*p0001/(p0818*p0002);0)
- p3185: 0; = p2404*p1023
- p3289: 0
- p2863: 0; = p2277*(p1020+p1022)
- p2720: 0; = p2329*(p1019+p1021)
- p2654: 0; = p2263*(p1078+p1080)
- p2460: 0; = p2264*p1073
- p1278: 0
- p2049: 25.6942
- p2506: 0; = p2310*p1073
- p0945: 0; = if(and(p0683=0;p0951=0);p0939;0)
- p2161: 7.08168e-8; = p2015*p2085*p2123/(p0818*1000)
- p1999: 3877.43; = (p1228+p1229)*p0818+p1164
- p2134: 1.46564e-5; = p2015*p2062*p2096/(p0818*1000)
- p1664: 0
- p0439: 0; = SQRT(2)*(IF((2*p0307-1)<0;-1;IF((2*p0307-1)>0;1;0))*SQRT(SQRT((2/(pi()*0.140012289)+LN(1-(2*p0307-1)^2)/2)^2-LN(1-(2*p0307-1)^2)/0.140012289)-(2/(pi()*0.140012289)+LN(1-(2*p0307-1)^2)/2)))
- p1822: 0
- p0765: 0
- p2755: 0; = p2364*(p1019+p1021)
- p0677: 0
- p2453: 0; = p2257*p1014
- p2561: 0; = p2365*p1014
- p2224: 0; = if(p0765*p0769+p0766*p0770+p0767*p0771+p0768*p0772=0;0;p0771*p0767/(p0765*p0769+p0766*p0770+p0767*p0771+p0768*p0772))
- p2283: 0; = p2223*p2189
- p0859: 0; = p0671*1000/p0856
- p0969: 0
- p3459: 0; = p3364*p1241
- p1321: 0; = IF(((p0745*1000*p0748/100)+(p0754*1000*p0757/100))/p0801<0;0;((p0745*1000*p0748/100)+(p0754*1000*p0757/100))/p0801)
- p2815: 0; = p2424*(p1078+p1080)
- p3148: 0; = p2367*p1023
- p0678: 0
- p3442: 0; = p3366*p1240
- p1590: 0
- p2520: 0; = p2324*p1014
- p2512: 0; = p2316*p1014
- p2603: 0; = p2407*p1014
- p2053: 1.45647
- p0695: 0
- p2952: 0; = p2366*(p1020+p1022)
- p2608: 0; = p2412*p1014
- p1638: 0
- p0692: 0
- p0916: 0.321902; = p0826+(p0832*(1+p0894))/p0818
- p2681: 0; = p2290*(p1019+p1021)
- p1208: 0; = p1205*p0818*p0822/p0801
- p0752: 0
- p3087: 0; = p2306*p1082
- p1707: 0
- p2824: 0; = p2238*(p1020+p1022)
- p1784: 0
- p1552: 0
- p1098: 0
- p2027: 0.428799
- p3166: 0; = p2385*p1082
- p2955: 0; = p2369*(p1020+p1022)
- p2540: 0; = p2344*p1073
- p1704: 0
- p2697: 0; = p2306*(p1078+p1080)
- p3020: 0; = p2239*p1023
- p0860: 0; = p0672*1000/p0856
- p1247: 0; = if(p1232>0;0;p1242*p0001/(p0818*p0002))
- p2600: 0; = p2404*p1014
- p0890: 0; = p0686*1000*p0687*p0885/100
- p1788: 0
- p2362: 0; = p2225*p2190
- p2674: 0; = p2283*(p1019+p1021)
- p2936: 0; = p2350*(p1129+p1131)
- p1265: 0; = if(p1232>0;0;IF(p1259+p1263+p1264=1;0;IF(p1259+p1263+p1264+p1262>1;1-(p1259+p1263+p1264);p1262)))
- p3146: 0; = p2365*p1023
- p1156: 0; = p1064+p1065+p1066+p1067+p1068+p1069+p1070+p1116+p1117+p1118+p1119+p1120+p1154+p1155
- p1337: 0; = p1336*p0001/(p0818*p0002)
- p0141: 64.4579
- p2714: 0; = p2323*(p1019+p1021)
- p1139: 0; = if(p1121=0;p1133*p0001/(p0818*p0002);0)
- p1045: 0; = IF(p1012=0;IF(p1037+p1044=1;0;IF(p1037+p1044+p1039>1;1-(p1037+p1044);p1039));0)
- p3450: 0; = p3374*p1240
- p0811: 0; = if(p0807=480;1-p0810;0)
- p2708: 0; = p2317*(p1019+p1021)
- p2557: 0; = p2361*p1014
- p2266: 0; = p2226*p2212
- p1741: 0
- p1085: 0; = IF(p1071=0;p1079*(p0710/100)*p0703*1000;0)
- p1267: 0
- p2271: 0; = p2226*p2217
- p2736: 0; = p2345*(p1078+p1080)
- p2994: 0; = p2408*(p1020+p1022)
- p1921: 0
- p2353: 0; = p2232*p2221
- p1779: 0
- p1963e: 0; = p1628*p1832+p1629*p1833+p1630*p1834+p1631*p1835+p1632*p1836+p1633*p1837+p1634*p1838+p1635*p1839+p1636*p1840+p1637*p1841+p1638*p1842+p1639*p1843+p1640*p1844+p1641*p1845+p1642*p1846+p1643*p1847+p1644*p1848+p1645*p1849+p1646*p1850
- p1684: 0
- p2239: 0; = p2222*p2184
- p3163: 0; = p2382*p1082
- p0782: 0
- p2242: 0; = p2222*p2187
- p1272: 0; = IF(p1267+p1270+p1271=p1259;0;p1259-(p1267+p1270+p1271))
- p1760: 0
- p2809: 0; = p2418*(p1078+p1080)
- p3358: 0; = if(p1232=0;p3308+p3319+p3330+p3341+p3352;0)
- p1110: 0; = IF(p1071=0;p1105*p1104*p1095;0)
- p3039: 0; = p2258*p1082
- p2426: 0; = p2235*p2216
- p3207: 0; = p2426*p1082
- p2754: 0; = p2363*(p1019+p1021)
- p2744: 0; = p2353*(p1128+p1130)
- p2972: 0; = p2386*(p1079+p1081)
- p2443: 0; = p2247*p1014
- p0831: 0.137; = 1-p0824
- p1653: 0
- p2806: 0; = p2415*(p1078+p1080)
- p2182: 0; = p1050/p0818
- p2282: 0; = p2223*p2188
- p1011: 0; = p1010*p0001*p0004/(p0818*p0002)
- p1200: 0
- p0922: 0; = p0677*1000/p0801
- p2280: 0; = p2223*p2186
- p3261: 0
- p3393: 0; = p3374*p1234
- p0977: 0; = IF(p0687=0;IF(OR(p0686=0;p0688=0);0;p0686*1000*p0688/100);0)
- p0791: 0
- p2915: 0; = p2329*(p1020+p1022)
- p2694: 0; = p2303*(p1078+p1080)
- p1879: 0
- p2900: 0; = p2314*(p1129+p1131)
- p2222: 0; = if(p0765*p0769+p0766*p0770+p0767*p0771+p0768*p0772=0;0;p0769*p0765/(p0765*p0769+p0766*p0770+p0767*p0771+p0768*p0772))
- p2761: 0; = p2370*(p1019+p1021)
- p2435: 0; = p2239*p1014
- p1609: 0
- p0772: 0
- p2631: 0; = p2240*(p1019+p1021)
- p1302: 0; = IF(p1297+p1300+p1301=p1262;0;p1262-(p1297+p1300+p1301))
- p2527: 0; = p2331*p1014
- p2960: 0; = p2374*(p1020+p1022)
- p2500: 0; = p2304*p1073
- p1234: 0; = if(p1232>0;0;p0726/100)
- p2365: 0; = p2225*p2193
- p3420: 0; = p3363*p1239
- p2151: 1.33199e-7; = p2015*p2079*p2113/(p0818*1000)
- p1977: 113.139; = p1252+p1188
- p2677: 0; = p2286*(p1019+p1021)
- p2250: 0; = p2222*p2196
- p1861: 0
- p1196: 0
- p1844: 0
- p2905: 0; = p2319*(p1020+p1022)
- p1603: 0
- p0591: 0; = IF(p0327<0.5;-SQRT(p0007*EXP(p0459^2*p0008)-p0007);SQRT(p0007*EXP(p0459^2*p0008)-p0007))
- p1655: 0
- p2261: 0; = p2226*p2207
- p1154: 0; = if(p1152*p0818=0;0;p1150/(p1152*p0818))
- p2978: 0; = p2392*(p1129+p1131)
- p2776: 0; = p2385*(p1078+p1080)
- p0878: 0; = p0867*p0856
- p1891: 0
- p0043: 450.21
- p0745: 0
- p1703: 0
- p1864: 0
- p2626: 0; = p2430*p1123
- p1763: 0
- p1868: 0
- p1834: 0
- p2087: 0.856281
- p1103: 0; = IF(p1071=0;IF(p1096+p1101+p1102=1;0;IF(p1096+p1101+p1102+p1099>1;1-(p1096+p1101+p1102);p1099));0)
- p0702: 450.21; = p0042*(1+p0570*p0174/100)
- p2285: 0; = p2223*p2191
- p2579: 0; = p2383*p1073
- p3213: 0; = p1222*12.0107/100.0869
- p2014: 6.69776e6; = p0833*p2011*p2013
- p0947: 0; = if(and(p0683=0;or(p0807=480;p0807=32;p0807=1;and(p0807=60;p0901<0.03)));p0935;0)
- p1709: 0
- p3404: 0; = p3366*p1238
- p3306: 0; = if(and(p1232=0;p3252<>0);p3252*(p3257*p3277-p3301)/p3305;0)
- p2596: 0; = p2400*p1014
- p2778: 0; = p2387*(p1078+p1080)
- p3484: 0; = IF(p1344=0;0;p1344/(p1328+p1330+p1332+p1334+p1336+p1338+p1340+p1342+p1344))
- p0307: 0.5
- p1959: 0; = if(p0738*p0740*p0739>0;p0738*1000*(p0740/100)*p0739/1000;p1958)
- p2799: 0; = p2408*(p1019+p1021)
- p2552: 0; = p2356*p1014
- p2543: 0; = p2347*p1073
- p3355: 0; = if(and(p1232=0;p3256<>0);p3256-(p3350+p3351+p3352+p3353+p3354);0)
- p1169: 0.000508261
- p0793: 0
- p2722: 0; = p2331*(p1019+p1021)
- p2987: 0; = p2401*(p1020+p1022)
- p0928: 0; = p0801*p0918
- p1159: 0
- p0675: 0
- p1746: 0
- p2597: 0; = p2401*p1014
- p3120: 0; = p2339*p1082
- p0917: 1.19318
- p2212: 0; = p1106/p0818
- p0715: 0
- p3391: 0; = p3372*p1234
- p0896: 0.458
- p2573: 0; = p2377*p1073
- p2206: 0; = 9*1.00794*p2204/30.973762
- p2715: 0; = p2324*(p1019+p1021)
- p3443: 0; = p3367*p1240
- p1694: 0
- p3311: 0; = if(and(p1232=0;p3252<>0);p3252-(p3306+p3307+p3308+p3309+p3310);0)
- p2141: 1.3915e-6; = p2015*p2069*p2103/(p0818*1000)
- p1815: 0
- p1699: 0
- p3339: 0; = if(and(p1232=0;p3254<>0);p3254*(p3269*p3277-p3334)/p3338;0)
- p2257: 0; = p2222*p2203
- p0953: 0; = if(and(p0683>0;or(p0807=56;p0807=100;and(p0807=60;p0901>0.06)));p0935;0)
- p3416: 0; = p3378*p1238
- p3031: 0; = p2250*p1023
- p0849: 0
- p1883: 0
- p2977: 0; = p2391*(p1129+p1131)
- p0972: 0; = p0969/p0818
- p3441: 0; = p3365*p1240
- p2748: 0; = p2357*(p1019+p1021)
- p0722: 0
- p2313: 0; = p2231*p2220
- p3177: 0; = p2396*p1023
- p2559: 0; = p2363*p1014
- p2167: 0.244999; = p2166*(p0898)
- p2131: 2.09153e-6; = p2015*p2059*p2093/(p0818*1000)
- p2819: 0; = p2428*(p1128+p1130)
- p3369: 0; = if(p1232=0;p3245*p3357/p0818;0)
- p3384: 0; = p3365*p1234
- p2738: 0; = p2347*(p1078+p1080)
- p1568: 0
- p0958: 0; = if(and(p0683>0;or(p0807=480;p0807=32;p0807=1;and(p0807=60;p0901<0.03)));p0934;0)
- p2906: 0; = p2320*(p1020+p1022)
- p2690: 0; = p2299*(p1078+p1080)
- p3338: 0; = if(and(p1232=0;p3254<>0);1-(p3334+p3335+p3336+p3337);0)
- p0720: 0
- p2328: 0; = p2224*p2196
- p1183: 0.00055576; = p0801*p0001/(p0818*p0002)
- p1943: 0
- p1168: 2.68371e-6; = p1164*p1167/p0818
- p3259: 0
- p0823: 0
- p1954: 0
- p1702: 0
- p0570: 0; = IF(p0306<0.5;-SQRT(p0007*EXP(p0438^2*p0008)-p0007);SQRT(p0007*EXP(p0438^2*p0008)-p0007))
- p1973: 0; = if(p0807=480;p1968*p0001/(p0818*p0002);0)
- p2415: 0; = p2235*p2205
- p1172: 3.16608e-7; = p1170/p0818
- p2814: 0; = p2423*(p1078+p1080)
- p2892: 0; = p2306*(p1079+p1081)
- p0961: 0; = if(and(p0683>0;or(p0807=480;p0807=32;p0807=1;and(p0807=60;p0901<0.03)));p0937;0)
- p1912: 0
- p3098: 0; = p2317*p1023
- p1621: 0
- p1060: 0
- p3186: 0; = p2405*p1023
- p0571: 0; = IF(p0307<0.5;-SQRT(p0007*EXP(p0439^2*p0008)-p0007);SQRT(p0007*EXP(p0439^2*p0008)-p0007))
- p3451: 0; = p3375*p1240
- p2920: 0; = p2334*(p1020+p1022)
- p0970: 0; = p0967/p0818
- p0971: 0; = p0968/p0818
- p0993: 0; = p0989*p0001*p0004/(p0818*p0002)
- p1215: 0; = IF(p1214=0;0;(p1214-1.5)/(p1214-1)^2)
- p1872: 0
- p1613: 0
- p3182: 0; = p2401*p1023
- p1152: 0
- p1813: 0
- p0941: 0; = if(and(p0683=0;p0947=0);p0935;0)
- p0927: 1; = IF(p0918+p0923+p0924+p0925+p0926=1;0;1-(p0918+p0923+p0924+p0925+p0926))
- p2513: 0; = p2317*p1014
- p2002: 750
- p2427: 0; = p2235*p2217
- p1626: 0
- p0795: 0
- p2203: 0; = p1070-p2200-p2201-p2202
- p0944: 0; = if(and(p0683=0;p0950=0);p0938;0)
- p3270: 0
- p2583: 0; = p2387*p1073
- p0872: 0; = p0864*p0856
- p2766: 0; = p2375*(p1078+p1080)
- p2688: 0; = p2297*(p1078+p1080)
- p1744: 0
- p0919: 0; = p0678*1000/p0801
- p1570: 0
- p2664: 0; = p2273*(p1128+p1130)
- p1837: 0
- p1224: 0; = IF(p1221=0;0;IF(p1193=0;1-p1223;0))
- p2571: 0; = p2375*p1073
- p3088: 0; = p2307*p1082
- p1276: 0; = p1272*p1252/p0818
- p2165: 0.618973; = (p0833-p2014)/p0818-p0839
- p3165: 0; = p2384*p1082
- p2275: 0; = p2230*p2221
- p2303: 0; = p2227*p2210
- p2671: 0; = p2280*(p1019+p1021)
- p2416: 0; = p2235*p2206
- p2682: 0; = p2291*(p1019+p1021)
- p0909: 4.27777e6
- p1170: 228.718; = p1169*p0801
- p1773: 0
- p2116: 0.444424
- p2481: 0; = p2285*p1014
- p1260: 0; = if(p1232>0;0;p0731/100)
- p2140: 1.13333e-6; = p2015*p2068*p2102/(p0818*1000)
- p1758: 0
- p2179: 0; = p0970+p0971+p0972
- p2829: 0; = p2243*(p1020+p1022)
- p2516: 0; = p2320*p1014
- p2834: 0; = p2248*(p1020+p1022)
- p1181: 0.00013981
- p1768: 0
- p1681: 0
- p2077: 0.043
- p2638: 0; = p2247*(p1019+p1021)
- p2975: 0; = p2389*(p1129+p1131)
- p0899: 6.58374e8; = p0825*p0896+(p0830+p0895)*p0824*p0898
- p0717: 0
- p1649: 0
- p2921: 0; = p2335*(p1020+p1022)
- p2078: 0.117
- p1309: 0
- p2710: 0; = p2319*(p1019+p1021)
- p1811: 0
- p2601: 0; = p2405*p1014
- p1651: 0
- p3444: 0; = p3368*p1240
- p0935: 0; = p0929*p0001/(p0818*p0002)
- p0756: 0
- p2707: 0; = p2316*(p1019+p1021)
- p1065: 0; = IF(p1012=0;p1051/(p1058*p0818);0)
- p2046: 10
- p3332: 0; = if(and(p1232=0;p3255<>0);IF((p3328+p3329+p3330+p3331)+(p3255*(p3265*(1-p3277))/p3327)>p3255;p3255-(p3328+p3329+p3330+p3331);p3255*(p3265*(1-p3277))/p3327);0)
- p1949: 0
- p2168: 0.00691224; = p2166*(p0903)
- p2630: 0; = p2239*(p1019+p1021)
- p2289: 0; = p2223*p2196
- p1604: 0
- p2246: 0; = p2222*p2191
- p3448: 0; = p3372*p1240
- p2711: 0; = p2320*(p1019+p1021)
- p2807: 0; = p2416*(p1078+p1080)
- p2998: 0; = p2412*(p1020+p1022)
- p2731: 0; = p2340*(p1078+p1080)
- p2118: 0.679049
- p2056: 2.07882
- p1869: 0
- p2613: 0; = p2417*p1073
- p2857: 0; = p2271*(p1079+p1081)
- p2927: 0; = p2341*(p1079+p1081)
- p3066: 0; = p2285*p1023
- p1657: 0
- p2243: 0; = p2222*p2188
- p2411: 0; = p2234*p2201
- p1667: 0
- p2045: 30
- p1800: 0
- p2145: 2.66398e-6; = p2015*p2073*p2107/(p0818*1000)
- p1674: 0
- p1819: 0
- p1186: 4.35454e-8; = p1182*p1185/p0818
- p2838: 0; = p2252*(p1020+p1022)
- p0830: 7.23717e8; = p0825*p0821*p0824
- p3240: 7.3252e-9; = p3234*p1188*p3235/p0818
- p1786: 0
- p3324: 0; = if(and(p1232=0;p3255<>0);p3266*(p3279*(p3284*p1256+p3286*(p1253+p1257)+p1258*p3288+p3299*p3287));0)
- p2120: 0.51828
- p3400: 0; = p3362*p1238
- p1151: 0; = if(p1121=0;p1149*p1148*p1145;0)
- p3127: 0; = p2346*p1082
- p2072: 0.134
- p0912: 0
- p3204: 0; = p2423*p1082
- p1339: 0; = p1338*p0001/(p0818*p0002)
- p1991: 0; = (if(p1111=0;0;p1106/p1111)+if(p1112=0;0;p1107/p1112)+if(p1113=0;0;p1108/p1113)+if(p1114=0;0;p1109/p1114)+if(p1115=0;0;p1110/p1115))*(1+p1157)
- p1717: 0
- p2021: 0.000207408; = p2020/p0818
- p0840: 0.0729685; = p0839*p0831
- p0815: 0
- p1203: 0
- p3123: 0; = p2342*p1082
- p1577: 0
- p2871: 0; = p2285*(p1020+p1022)
- p3464: 0; = p3369*p1241
- p1751: 0
- p2992: 0; = p2406*(p1020+p1022)
- p1293: 0; = p1287*p1252/p0818
- p2769: 0; = p2378*(p1078+p1080)
- p3262: 0
- p3084: 0; = p2303*p1082
- p0701: 0
- p0978: 450000; = p0801
- p3479: 0; = if(p1328+p1330+p1332+p1334+p1336+p1338+p1340+p1342+p1344=0;0;p1334/(p1328+p1330+p1332+p1334+p1336+p1338+p1340+p1342+p1344))
- p1551: 0
- p3370: 0; = if(p1232=0;p3245*p3358/p0818;0)
- p0981: 0.00055576; = p0978*p0001/(p0818*p0002)
- p2843: 0; = p2257*(p1020+p1022)
- p3896: 0; = p1963*p3477
- p2070: 0.282
- p2793: 0; = p2402*(p1019+p1021)
- p1131: 0; = if(p1121=0;IF(p1123+p1128+p1129+p1130=1;0;IF(p1123+p1128+p1129+p1130+p1127>1;1-(p1123+p1128+p1129+p1130);p1127));0)
- p3158: 0; = p2377*p1082
- p2238: 0; = p2222*p2183
- p3265: 0
- p3078: 0; = p2297*p1082
- p2663: 0; = p2272*(p1128+p1130)
- p3139: 0; = p2358*p1023
- p1582: 0
- p0836: 6.90811e7; = p0831*p0835*p0801/(1-p0831)
- p1755: 0
- p2609: 0; = p2413*p1014
- p2679: 0; = p2288*(p1019+p1021)
- p2924: 0; = p2338*(p1079+p1081)
- p1796: 0
- p2448: 0; = p2252*p1014
- p3140: 0; = p2359*p1023
- p0853: 0; = p0803/(p0802+p0803)
- p2504: 0; = p2308*p1073
- p2333: 0; = p2224*p2201
- p0835: 967.023; = -LN(1-p0669/100)/p0834
- p3413: 0; = p3375*p1238
- p2474: 0; = p2278*p1014
- p2331: 0; = p2224*p2199
- p2958: 0; = p2372*(p1020+p1022)
- p2137: 3.76681e-7; = p2015*p2065*p2099/(p0818*1000)
- p1014: 0; = IF(p1012=0;p0705/100;0)
- p2439: 0; = p2243*p1014
- p3193: 0; = p2412*p1023
- p2826: 0; = p2240*(p1020+p1022)
- p3244: 0; = p0791/100
- p1774: 0
- p3013: 0; = p2427*(p1079+p1081)
- p1283: 0; = p1277*p1252/p0818
- p0810: 0
- p0913: 0.0120403
- p2086: 0.0617647
- p3366: 0; = if(p1232=0;p3244*p3360/p0818;0)
- p3141: 0; = p2360*p1023
- p3179: 0; = p2398*p1023
- p1944: 0
- p3149: 0; = p2368*p1023
- p2150: 8.01614e-7; = p2015*p2078*p2112/(p0818*1000)
- p2039: 4.84777e-6; = p2015*p2037*p2038/(p0818*1000)
- p2398: 0; = p2234*p2187
- p3426: 0; = p3369*p1239
- p0764: 0
- p1898: 0
- p2692: 0; = p2301*(p1078+p1080)
- p2981: 0; = p2395*(p1020+p1022)
- p3200: 0; = p2419*p1082
- p0982: 0; = if(p0886=0;0;min(1;(p0691*p0690*1000*p0693/100)/p0886))
- p0696: 0
- p3247: 0
- p3131: 0; = p2350*p1132
- p1838: 0
- p1887: 0
- p2696: 0; = p2305*(p1078+p1080)
- p2660: 0; = p2269*(p1078+p1080)
- p3137: 0; = p2356*p1023
- p1817: 0
- p3267: 0
- p3216: 0; = IF(OR(p1226=0;p1228=0);0;1-p3213-p3214-p3215)
- p2210: 0; = 6*1.00794*p2208/30.973762
- p2737: 0; = p2346*(p1078+p1080)
- p1830: 0
- p1122: 0.00055576; = p1121*p0001/(p0818*p0002)
- p3473: 0; = p3378*p1241
- p3075: 0; = p2294*p1023
- p1100: 0
- p2847: 0; = p2261*(p1079+p1081)
- p1338: 0; = p1324*p0801
- p2409: 0; = p2234*p2199
- p3331: 0; = if(and(p1232=0;p3255<>0);p3255*(p3268-p3326)/p3327;0)
- p2985: 0; = p2399*(p1020+p1022)
- p2080: 0.025
- p1957: 0
- p2816: 0; = p2425*(p1078+p1080)
- p1270: 0; = IF(p1267=p1259;0;IF(p1267+p1268>p1259;p1259-p1267;p1268))
- p2537: 0; = p2341*p1073
- p1733: 0
- p3419: 0; = p3362*p1239
- p3292: 0
- p1743: 0
- p2367: 0; = p2225*p2196
- p1070: 0; = IF(p1012=0;p1056/(p1063*p0818);0)
- p3383: 0; = p3364*p1234
- p2284: 0; = p2223*p2190
- p2913: 0; = p2327*(p1020+p1022)
- p2441: 0; = p2245*p1014
- p2162: 1.30452e-7; = p2015*p2086*p2124/(p0818*1000)
- p2107: 0.881623
- p0367: 0.5
- p0763: 450.21; = p0103*(1+p0631*p0235/100)
- p2263: 0; = p2226*p2209
- p0999: 0; = IF(p0996=1;0;IF(p0996+p0997>1;1-p0996;p0997))
- p1670: 0
- p3016: 0; = p2430*(p1129+p1131)
- p1058: 0
- p2869: 0; = p2283*(p1020+p1022)
- p2632: 0; = p2241*(p1019+p1021)
- p3392: 0; = p3373*p1234
- p3211: 0; = p2430*p1132
- p1997: 0; = (if(p1152=0;0;p1150/p1152)+if(p1153=0;0;p1151/p1153))*(1+p1157)
- p2611: 0; = p2415*p1073
- p2059: 1.00168
- p0746: 0
- p2132: 2.01047e-6; = p2015*p2060*p2094/(p0818*1000)
- p3280: 0
- p2683: 0; = p2292*(p1019+p1021)
- p1334: 0; = p1322*p0801
- p0998: 0; = if(p0888=0;0;if((p0699*p0698*1000*p0700/100)/p0888>1;1;(p0699*p0698*1000*p0700/100)/p0888))
- p4308: 0; = p1963*p3479
- p2788: 0; = p2397*(p1019+p1021)
- p2649: 0; = p2258*(p1078+p1080)
- p2488: 0; = p2292*p1014
- p2759: 0; = p2368*(p1019+p1021)
- p2765: 0; = p2374*(p1019+p1021)
- p1179: 0.5
- p0786: 0
- p1003: 0; = p0999*p0888
- p2485: 0; = p2289*p1014
- p1559: 0
- p3305: 0; = if(and(p1232=0;p3252<>0);1-(p3301+p3302+p3303+p3304);0)
- p0905: 0.0357623; = p0904/p0818
- p0818: 7.224e8; = p0806*p0807
- p1274: 0; = p1270*p1252/p0818
- p3361: 0; = if(p1232=0;p3311+p3322+p3333+p3344+p3355;0)
- p2213: 0; = p1116-p2212
- p0894: 0.28
- p1299: 0
- p2254: 0; = p2222*p2200
- p2476: 0; = p2280*p1014
- p1990: 30
- p2234: 1; = 1-(p2222+p2223+p2224+p2225)
- p2101: 0.620397
- p2256: 0; = p2222*p2202
- p2268: 0; = p2226*p2214
- p2492: 0; = p2296*p1014
- p2032: 0.448886
- p1735: 0
- p1295: 0; = p1291*p1252/p0818
- p3417: 0; = p3379*p1238
- p2811: 0; = p2420*(p1078+p1080)
- p3152: 0; = p2371*p1023
- p0987: 0; = if(p0978>0;0;if(and(p0687=0;p0691=0;p0695=0;p0699=0);0;IF(p0982+p0985+p0986=1;0;1-(p0982+p0985+p0986))))
- p3126: 0; = p2345*p1082
- p1583: 0
- p2278: 0; = p2223*p2184
- p2542: 0; = p2346*p1073
- p2861: 0; = p2275*(p1129+p1131)
- p1925: 0
- p2205: 0; = 2*14.0067*p2204/30.973762
- p1105: 0
- p1210: 0
- p1697: 0
- p2644: 0; = p2253*(p1019+p1021)
- p1630: 0
- p3206: 0; = p2425*p1082
- p1897: 0
- p3422: 0; = p3365*p1239
- p3341: 0; = if(and(p1232=0;p3254<>0);p3254*(p3271-p3336)/p3338;0)
- p1317: 450000; = p0801
- p0679: 0
- p2670: 0; = p2279*(p1019+p1021)
- p2588: 0; = p2392*p1123
- p1643: 0
- p2812: 0; = p2421*(p1078+p1080)
- p2984: 0; = p2398*(p1020+p1022)
- p0799: 0
- p3187: 0; = p2406*p1023
- p1797: 0
- p2873: 0; = p2287*(p1020+p1022)
- p1307: 0
- p1818: 0
- p2867: 0; = p2281*(p1020+p1022)
- p1000: 0; = IF(p0996+p0999=1;0;IF(p0996+p0999+p0998>1;1-(p0996+p0999);p0998))
- p3463: 0; = p3368*p1241
- p1050: 0; = IF(p1012=0;p1037*p1036;0)
- p3188: 0; = p2407*p1023
- p2335: 0; = p2224*p2203
- p3217: 0; = p3213*p1228
- p1332: 0; = p1321*p0801
- p3285: 0
- p3295: 0
- p3021: 0; = p2240*p1023
- p1901: 0
- p0888: 0; = p0686*1000*p0687*p0884/100
- p1091: 0; = IF(p1071=0;p1085*p0001/(p0818*p0002);0)
- p1253: 0; = if(p1232>0;0;p0735/100)
- p2712: 0; = p2321*(p1019+p1021)
- p2392: 0; = p2233*p2221
- p3101: 0; = p2320*p1023
- p2821: 0; = p2430*(p1128+p1130)
- p1345: 0; = IF(p1318=0;p1344*p0001/(p0818*p0002);0)
- p3226: 0; = p3222*p1229
- p1138: 0; = if(p1121=0;p1132*(p0716/100)*p0703*1000;0)
- p2820: 0; = p2429*(p1128+p1130)
- p3105: 0; = p2324*p1023
- p3093: 0; = p2312*p1132
- p3387: 0; = p3368*p1234
- p0698: 0
- p1652: 0
- p2704: 0; = p2313*(p1128+p1130)
- p2031: 0.465411
- p2569: 0; = p2373*p1014
- p1963f: 0; = p1647*p1851+p1648*p1852+p1649*p1853+p1650*p1854+p1651*p1855+p1652*p1856+p1653*p1857+p1654*p1858+p1655*p1859+p1656*p1860+p1657*p1861+p1658*p1862+p1659*p1863+p1660*p1864+p1661*p1865+p1662*p1866+p1663*p1867+p1664*p1868+p1665*p1869+p1666*p1870
- p1326: 0; = IF(((p0745*1000*p0753/100)+(p0754*1000*p0762/100))/p0801<0;0;((p0745*1000*p0753/100)+(p0754*1000*p0762/100))/p0801)
- p1824: 0
- p2896: 0; = p2310*(p1079+p1081)
- p1093: 0; = IF(p1071=0;p1087*p0001/(p0818*p0002);0)
- p3466: 0; = p3371*p1241
- p1069: 0; = IF(p1012=0;p1055/(p1062*p0818);0)
- p3006: 0; = p2420*(p1079+p1081)
- p3118: 0; = p2337*p1082
- p3415: 0; = p3377*p1238
- p3065: 0; = p2284*p1023
- p2320: 0; = p2224*p2187
- p2384: 0; = p2229*p2213
- p0814: 0; = if(p0807=480;p0810*p0812+p0811*p0813;0)
- p2037: 1.99
- p2940: 0; = p2354*(p1020+p1022)
- p2929: 0; = p2343*(p1079+p1081)
- p0955: 0; = if(and(p0683>0;or(p0807=56;p0807=100;and(p0807=60;p0901>0.06)));p0937;0)
- p0869: 1; = IF(p0858+p0864+p0865+p0866+p0867+p0868=1;0;1-(p0858+p0864+p0865+p0866+p0867+p0868))
- p3430: 0; = p3373*p1239
- p2767: 0; = p2376*(p1078+p1080)
- p1828: 0
- p2038: 0.304457
- p2669: 0; = p2278*(p1019+p1021)
- p0949: 0; = if(and(p0683=0;or(p0807=480;p0807=32;p0807=1;and(p0807=60;p0901<0.03)));p0937;0)
- p3133: 0; = p2352*p1132
- p3086: 0; = p2305*p1082
- p1866: 0
- p1969: 0; = p0803
- p3271: 0
- p1240: 0; = if(p1232>0;0;IF(p1234+p1238+p1239=1;0;IF(p1234+p1238+p1239+p1237>1;1-(p1234+p1238+p1239);p1237)))
- p2676: 0; = p2285*(p1019+p1021)
- p3174: 0; = p2393*p1023
- p3376: 0; = if(p1232=0;p3246*p3358/p0818;0)
- p1663: 0
- p3069: 0; = p2288*p1023
- p2635: 0; = p2244*(p1019+p1021)
- p3438: 0; = p3362*p1240
- p2225: 0; = if(p0765*p0769+p0766*p0770+p0767*p0771+p0768*p0772=0;0;p0772*p0768/(p0765*p0769+p0766*p0770+p0767*p0771+p0768*p0772))
- p0728: 0
- p1710: 0
- p3164: 0; = p2383*p1082
- p2919: 0; = p2333*(p1020+p1022)
- p2345: 0; = p2228*p2213
- p1197: 0
- p2264: 0; = p2226*p2210
- p1816: 0
- p3278: 0
- p1968: 0; = if(p0807=480;p0802*p0811;0)
- p2309: 0; = p2227*p2216
- p2361: 0; = p2225*p2189
- p2858: 0; = p2272*(p1129+p1131)
- p0537: 0; = IF(p0273<0.5;-SQRT(p0007*EXP(p0405^2*p0008)-p0007);SQRT(p0007*EXP(p0405^2*p0008)-p0007))
- p3155: 0; = p2374*p1023
- p0729: 0
- p0731: 0
- p1846: 0
- p0951: 0.00055576; = if(and(p0683=0;or(p0807=480;p0807=32;p0807=1;and(p0807=60;p0901<0.03)));p0939;0)
- p3401: 0; = p3363*p1238
- p2499: 0; = p2303*p1073
- p2741: 0; = p2350*(p1128+p1130)
- p2405: 0; = p2234*p2195
- p1013: 0.00055576; = p1012*p0001/(p0818*p0002)
- p0327: 0.5
- p0785: 0
- p1327a: 0; = (p0745*1000/p0801)*(1-(p0746+p0747+p0748+p0749+p0750+p0751+p0752+p0753)/100)+(p0754*1000/p0801)*(1-(p0755+p0756+p0757+p0758+p0759+p0760+p0761+p0762)/100)
- p2319: 0; = p2224*p2186
- p1004: 0; = p1000*p0888
- p2402: 0; = p2234*p2191
- p2546: 0; = p2350*p1123
- p0834: 0.00059
- p0879: 0; = p0878*p0001*p0003/(p0818*p0002)
- p0833: 8.38606e8; = p0830+p0832
- p0897: 0
- p3281: 0
- p3230: 3.16608e-7; = p1170/p0818
- p2111: 0.856281
- p3159: 0; = p2378*p1082
- p3449: 0; = p3373*p1240
- p1566: 0
- p2925: 0; = p2339*(p1079+p1081)
- p1900: 0
- p0809: 0
- p2406: 0; = p2234*p2196
- p1835: 0
- p1158: 0; = p1156*p1157
- p1056: 0; = IF(p1012=0;p1049*p1036;0)
- p2928: 0; = p2342*(p1079+p1081)
- p1843: 0
- p1757: 0
- p1230: 0
- p3478: 0; = if(p1328+p1330+p1332+p1334+p1336+p1338+p1340+p1342+p1344=0;0;p1332/(p1328+p1330+p1332+p1334+p1336+p1338+p1340+p1342+p1344))
- p2058: 1.24412
- p0983: 0; = if(p0886=0;0;min(1;(p0695*p0694*1000*p0697/100)/p0886))
- p2792: 0; = p2401*(p1019+p1021)
- p3018: 0; = p2237*p1023
- p3253: 0; = p1252*(p1277*(1-p3247)+p1280*(1-p3248)+p1281*(1-p3249)+p1282*(1-p3250))
- p1870: 0
- p2318: 0; = p2224*p2185
- p0910: 0.0059216; = p0909/p0818
- p0001: 0.404686
- p2531: 0; = p2335*p1014
- p2706: 0; = p2315*(p1019+p1021)
- p3081: 0; = p2300*p1082
- p2114: 0.832356
- p2375: 0; = p2229*p2204
- p0979: 0; = IF(p0976=0;0;p0976*p0001/(p0818*p0002))
- p2961: 0; = p2375*(p1079+p1081)
- p2709: 0; = p2318*(p1019+p1021)
- p2336: 0; = p2228*p2204
- p2172: 0.274774; = p2166-(p2167+p2168+p2169+p2170)
- p0965: 0; = IF(p0684/100=1;0;IF(p0684/100+p0685/100>1;1-p0684/100;p0685/100))
- p2000: 4000
- p2241: 0; = p2222*p2186
- p2625: 0; = p2429*p1123
- p2789: 0; = p2398*(p1019+p1021)
- p2743: 0; = p2352*(p1128+p1130)
- p2348: 0; = p2228*p2216
- p3001: 0; = p2415*(p1079+p1081)
- p3342: 0; = if(and(p1232=0;p3254<>0);p3254*(p3272-p3337)/p3338;0)
- p1303: 0; = p1297*p1252/p0818
- p2879: 0; = p2293*(p1020+p1022)
- p1343: 0; = p1342*p0001/(p0818*p0002)
- p2082: 0.285294
- p1034: 0; = IF(p1012=0;p1028*p0001/(p0818*p0002);0)
- p0707: 0
- p2501: 0; = p2305*p1073
- p0848: 0
- p2136: 4.63638e-6; = p2015*p2064*p2098/(p0818*1000)
- p3168: 0; = p2387*p1082
- p2316: 0; = p2224*p2183
- p2800: 0; = p2409*(p1019+p1021)
- p0994: 0; = p0990*p0001*p0004/(p0818*p0002)
- p2330: 0; = p2224*p2198
- p1015: 0; = IF(p1012=0;p0706/100;0)
- p2466: 0; = p2270*p1073
- p3303: 0; = if(and(p1232=0;p3252<>0);p3259*p3289;0)
- p1137: 0; = if(p1121=0;p1131*(p0716/100)*p0703*1000;0)
- p2839: 0; = p2253*(p1020+p1022)
- p1127: 0; = if(p1121=0;p0721/100;0)
- p0964: 0; = 56/90000
- p3150: 0; = p2369*p1023
- p1092: 0; = IF(p1071=0;p1086*p0001/(p0818*p0002);0)
- p2147: 4.76192e-7; = p2015*p2075*p2109/(p0818*1000)
- p1132: 0; = if(p1121=0;IF(p1123+p1128+p1129+p1130+p1131=1;0;1-(p1123+p1128+p1129+p1130+p1131));0)
- p1983: 50
- p2538: 0; = p2342*p1073
- p2612: 0; = p2416*p1073
- p1124: 0; = if(p1121=0;p0718/100;0)
- p3468: 0; = p3373*p1241
- p1275: 0; = p1271*p1252/p0818
- p2424: 0; = p2235*p2214
- p3094: 0; = p2313*p1132
- p0801: 450000
- p2576: 0; = p2380*p1073
- p2760: 0; = p2369*(p1019+p1021)
- p3184: 0; = p2403*p1023
- p2877: 0; = p2291*(p1020+p1022)
- p3014: 0; = p2428*(p1129+p1131)
- p2904: 0; = p2318*(p1020+p1022)
- p1310: 0; = IF(p1307=p1266;0;IF(p1307+p1308>p1266;p1266-p1307;p1308))
- p1049: 0; = IF(p1012=0;IF(p1037+p1044+p1045+p1046+p1047+p1048=1;0;1-(p1037+p1044+p1045+p1046+p1047+p1048));0)
- p3132: 0; = p2351*p1132
- p3067: 0; = p2286*p1023
- p3296: 0
- p2781: 0; = p2390*(p1128+p1130)
- p2823: 0; = p2237*(p1020+p1022)
- p2473: 0; = p2277*p1014
- p1914: 0
- p3040: 0; = p2259*p1082
- p1650: 0
- p1581: 0
- p2742: 0; = p2351*(p1128+p1130)
- p0711: 0
- p1055: 0; = IF(p1012=0;p1048*p1036;0)
- p3350: 0; = if(and(p1232=0;p3256<>0);p3256*(p3273*p3277-p3345)/p3349;0)
- p0822: 0.881667
- p1575: 0
- p2139: 2.21628e-6; = p2015*p2067*p2101/(p0818*1000)
- p2782: 0; = p2391*(p1128+p1130)
- p0841: -0.158807
- p2916: 0; = p2330*(p1020+p1022)
- p2662: 0; = p2271*(p1078+p1080)
- p3249: 0
- p3327: 0; = if(and(p1232=0;p3255<>0);1-(p3323+p3324+p3325+p3326);0)
- p1591: 0
- p3082: 0; = p2301*p1082
- p1646: 0
- p3461: 0; = p3366*p1241
- p1937: 0
- p2399: 0; = p2234*p2188
- p1678: 0
- p1167: 0.5
- p0747: 0
- p3062: 0; = p2281*p1023
- p2121: 0.822447
- p1264: 0; = if(p1232>0;0;IF(p1259+p1263=1;0;IF(p1259+p1263+p1261>1;1-(p1259+p1263);p1261)))
- p1765: 0
- p3050: 0; = p2269*p1082
- p2803: 0; = p2412*(p1019+p1021)
- p2487: 0; = p2291*p1014
- p1685: 0
- p0736: 0
- p3312: 0; = if(and(p1232=0;p3253<>0);p3261*p3277*(p3298*p3290+(1-p3298)*p3294);0)
- p2982: 0; = p2396*(p1020+p1022)
- p2623: 0; = p2427*p1073
- p2128: 6.65352e-6; = p2015*p2056*p2090/(p0818*1000)
- p3102: 0; = p2321*p1023
- p1598: 0
- p3287: 0
- p1320: 0; = IF(((p0745*1000*p0747/100)+(p0754*1000*p0756/100))/p0801<0;0;((p0745*1000*p0747/100)+(p0754*1000*p0756/100))/p0801)
- p0685: 0
- p2533: 0; = p2337*p1073
- p1574: 0
- p2988: 0; = p2402*(p1020+p1022)
- p2023: 2.12
- p2265: 0; = p2226*p2211
- p2932: 0; = p2346*(p1079+p1081)
- p2300: 0; = p2227*p2207
- p0790: 0
- p2306: 0; = p2227*p2213
- p2079: 0.02
- p1195: 0
- p2842: 0; = p2256*(p1020+p1022)
- p3194: 0; = p2413*p1023
- p1810: 0
- p1072: 0.00055576; = p1071*p0001/(p0818*p0002)
- p3321: 0; = if(and(p1232=0;p3253<>0);IF((p3317+p3318+p3319+p3320)+(p3253*(p3261*(1-p3277))/p3316)>p3253;p3253-(p3317+p3318+p3319+p3320);p3253*(p3261*(1-p3277))/p3316);0)
- p2772: 0; = p2381*(p1078+p1080)
- p2502: 0; = p2306*p1073
- p2702: 0; = p2311*(p1128+p1130)
- p0726: 0
- p3250: 0
- p1327: 0; = if(p1318=0;if(p1327a=0;1;if(p1327a<0;0;p1327a));0)
- p3482: 0; = if(p1328+p1330+p1332+p1334+p1336+p1338+p1340+p1342+p1344=0;0;p1340/(p1328+p1330+p1332+p1334+p1336+p1338+p1340+p1342+p1344))
- p1659: 0
- p0499: 0; = SQRT(2)*(IF((2*p0367-1)<0;-1;IF((2*p0367-1)>0;1;0))*SQRT(SQRT((2/(pi()*0.140012289)+LN(1-(2*p0367-1)^2)/2)^2-LN(1-(2*p0367-1)^2)/0.140012289)-(2/(pi()*0.140012289)+LN(1-(2*p0367-1)^2)/2)))
- p3000: 0; = p2414*(p1079+p1081)
- p2890: 0; = p2304*(p1079+p1081)
- p1048: 0; = IF(p1012=0;IF(p1037+p1044+p1045+p1046+p1047=1;0;IF(p1037+p1044+p1045+p1046+p1047+p1042>1;1-(p1037+p1044+p1045+p1046+p1047);p1042));0)
- p1767: 0
- p2729: 0; = p2338*(p1078+p1080)
- p0727: 0
- p1736: 0
- p2015: 5.78017e6; = p0830*p2011*p2013
- p1111: 0
- p2735: 0; = p2344*(p1078+p1080)
- p2208: 0; = p1110/p0818
- p0672: 0
- p2976: 0; = p2390*(p1129+p1131)
- p1223: 0
- p2990: 0; = p2404*(p1020+p1022)
- p1164: 3877.43; = p1163*p0801
- p0699: 0
- p2215: 0; = p1117-p2214
- p3106: 0; = p2325*p1023
- p1633: 0
- p0948: 0; = if(and(p0683=0;or(p0807=480;p0807=32;p0807=1;and(p0807=60;p0901<0.03)));p0936;0)
- p1728: 0
- p1631: 0
- p2836: 0; = p2250*(p1020+p1022)
- p1059: 0
- p2566: 0; = p2370*p1014
- p1841: 0
- p0773: 0
- p3238: 0.854735; = IF(p3237+p3235+p3236>1;1-(p3235+p3236);p3237)
- p3045: 0; = p2264*p1082
- p1976: 0.1766
- p3096: 0; = p2315*p1023
- p1118: 0; = IF(p1071=0;p1108/(p1113*p0818);0)
- p1671: 0
- p3314: 0; = if(and(p1232=0;p3253<>0);p3263*p3289;0)
- p1677: 0
- p2567: 0; = p2371*p1014
- p0817: 0
- p0820: 0; = if(p0807=480;p0814;0)
- p0920: 0; = p0676*1000/p0801
- p3153: 0; = p2372*p1023
- p2868: 0; = p2282*(p1020+p1022)
- p0832: 1.14889e8; = p0831*p0830/(1-p0831)
- p2386: 0; = p2229*p2215
- p1052: 0; = IF(p1012=0;p1045*p1036;0)
- p2301: 0; = p2227*p2208
- p0762: 0
- p2187: 0; = 4*1.00794*p2186/(2*14.0067)
- p2602: 0; = p2406*p1014
- p3156: 0; = p2375*p1082
- p3412: 0; = p3374*p1238
- p2198: 0; = 22.98976928*p2197/14.0067
- p0900: 0.91137; = p0899/p0818
- p1194: 0
- p2180: 9.45863e-8; = p3233*p1188/(p0818)
- p1941: 0
- p1764: 0
- p1083: 0; = IF(p1071=0;p1073*(p0710/100)*p0703*1000;0)
- p2009: 9.5733e-7; = ((p1983*p1985+p1989*p1991+p1995*p1997+p2003*p2005+p1976*p1977+p1978*p1979+p1998*p1999)/p0818)*p0005*p0002/1000
- p2854: 0; = p2268*(p1079+p1081)
- p2672: 0; = p2281*(p1019+p1021)
- p3385: 0; = p3366*p1234
- p0742: 0
- p1622: 0
- p0802: 430000
- p2898: 0; = p2312*(p1129+p1131)
- p2595: 0; = p2399*p1014
- p1601: 0
- p0174: 0
- p2385: 0; = p2229*p2214
- p0691: 0
- p1645: 0
- p2526: 0; = p2330*p1014
- p2008: 2.5434e-7; = ((p1982*p1985+p1988*p1991+p1994*p1997+p2002*p2005)/p0818)*p0005*p0002/1000
- p0806: 1.204e7
- p3362: 0; = if(p1232=0;p3244*p3356/p0818;0)
- p2923: 0; = p2337*(p1079+p1081)
- p1569: 0
- p3394: 0; = p3375*p1234
- p0733: 0
- p3128: 0; = p2347*p1082
- p1252: 0; = if(p1232>0;0;p0724*2000*p0723*1000*p0725/100)
- p1806: 0
- p2461: 0; = p2265*p1073
- p0870: 0; = p0858*p0856
- p2069: 0.190588
- p1776: 0
- p0828: 0; = if(p0827=0;0;p0819-p0827/p0818)
- p0887: 0; = 1000*p0886*p0001*p0003*p0004/(p0818*p0002)
- p2486: 0; = p2290*p1014
- p3110: 0; = p2329*p1023
- p2496: 0; = p2300*p1073
- p1102: 0; = IF(p1071=0;IF(p1096+p1101=1;0;IF(p1096+p1101+p1098>1;1-(p1096+p1101);p1098));0)
- p3453: 0; = p3377*p1240
- p3080: 0; = p2299*p1082
- p2930: 0; = p2344*(p1079+p1081)
- p1683: 0
- p3170: 0; = p2389*p1132
- p2827: 0; = p2241*(p1020+p1022)
- p2746: 0; = p2355*(p1019+p1021)
- p0807: 60
- p2022: 0.00137526; = p2018*p2015/p0818-p2021
- p0891: 0; = IF(p3251=0;0;62.4*6272640/(12*12*12))
- p1308: 0
- p1109: 0; = IF(p1071=0;p1105*p1103*p1095;0)
- p2607: 0; = p2411*p1014
- p1627: 0
- p1617: 0
- p0875: 0; = p0874*p0001*p0003/(p0818*p0002)
- p2286: 0; = p2223*p2192
- p3447: 0; = p3371*p1240
- p3224: 0; = IF(p3216=0;0;1-p3221-p3222-p3223)
- p2621: 0; = p2425*p1073
- p1328: 0; = p1319*p0801
- p3142: 0; = p2361*p1023
- p0755: 0
- p2287: 0; = p2223*p2193
- p2005: 335.596; = p1963*p0818+p1959*1000+p1170+p1176+p1182
- p2979: 0; = p2393*(p1020+p1022)
- p2505: 0; = p2309*p1073
- p2374: 0; = p2225*p2203
- p2422: 0; = p2235*p2212
- p3099: 0; = p2318*p1023
- p0774: 0
- p1305: 0; = p1301*p1252/p0818
- p0937: 0; = p0931*p0001/(p0818*p0002)
- p2126: 5.81679e-6; = p2015*p2054*p2088/(p0818*1000)
- p1998: 240
- p2297: 0; = p2227*p2204
- p2563: 0; = p2367*p1014
- p1826: 0
- p1322: 0; = IF(((p0745*1000*p0749/100)+(p0754*1000*p0758/100))/p0801<0;0;((p0745*1000*p0749/100)+(p0754*1000*p0758/100))/p0801)
- p1176: 43.9635; = p1175*p0801
- p2855: 0; = p2269*(p1079+p1081)
- p3337: 0; = IF(or(p3254=0;p1232>0);0;p3272*p3289)
- p1313: 0; = p1307*p1252/p0818
- p2699: 0; = p2308*(p1078+p1080)
- p3202: 0; = p2421*p1082
- p2003: 50
- p2181: 9.45863e-8; = p0887+p0889+p0893+p2180
- p2881: 0; = p2295*(p1020+p1022)
- p1071: 450000; = p0801
- p2394: 0; = p2234*p2183
- p5337: 0; = p1962*p3484
- p1927: 0
- p3483: 0; = if(p1328+p1330+p1332+p1334+p1336+p1338+p1340+p1342+p1344=0;0;p1342/(p1328+p1330+p1332+p1334+p1336+p1338+p1340+p1342+p1344))
- p3377: 0; = if(p1232=0;p3246*p3359/p0818;0)
- p2802: 0; = p2411*(p1019+p1021)
- p2507: 0; = p2311*p1123
- p2549: 0; = p2353*p1123
- p3255: 0; = p1252*(p1297*(1-p3247)+p1300*(1-p3248)+p1301*(1-p3249)+p1302*(1-p3250))
- p1596: 0
- p0911: 0.00503333
- p2346: 0; = p2228*p2214
- p2036: 2.91478e-5; = p2015*p2030*(1-p2032)/(p0818*1000)
- p1753: 0
- p2844: 0; = p2258*(p1079+p1081)
- p0009: 43.4782
- p1636: 0
- p2887: 0; = p2301*(p1079+p1081)
- p0968: 0
- p2347: 0; = p2228*p2215
- p1269: 0
- p1940: 0
- p1219: 0; = if(p1218=0;0;SQRT(2)*(IF((2*p1218-1)<0;-1;IF((2*p1218-1)>0;1;0))*SQRT(SQRT((2/(pi()*0.140012289)+LN(1-(2*p1218-1)^2)/2)^2-LN(1-(2*p1218-1)^2)/0.140012289)-(2/(pi()*0.140012289)+LN(1-(2*p1218-1)^2)/2))))
- p2553: 0; = p2357*p1014
- p1589: 0
- p2705: 0; = p2314*(p1128+p1130)
- p2874: 0; = p2288*(p1020+p1022)
- p2865: 0; = p2279*(p1020+p1022)
- p3019: 0; = p2238*p1023
- p2796: 0; = p2405*(p1019+p1021)
- p1911: 0
- p1017: 0; = IF(p1012=0;p0708/100;0)
- p3424: 0; = p3367*p1239
- p2575: 0; = p2379*p1073
- p1766: 0
- p0175: 0
- p3409: 0; = p3371*p1238
- p2529: 0; = p2333*p1014
- p1087: 0; = IF(p1071=0;p1081*(p0710/100)*p0703*1000;0)
- p4307: 0; = p1962*p3479
- p3322: 0; = if(and(p1232=0;p3253<>0);p3253-(p3317+p3318+p3319+p3320+p3321);0)
- p1634: 0
- p1958: 0
- p1254: 0; = if(p1232>0;0;p0736/100)
- p2459: 0; = p2263*p1073
- p3055: 0; = p2274*p1132
- p3378: 0; = if(p1232=0;p3246*p3360/p0818;0)
- p2325: 0; = p2224*p2192
- p3320: 0; = if(and(p1232=0;p3253<>0);p3253*(p3264-p3315)/p3316;0)
- p0997: 0; = if(p0888=0;0;if((p0695*p0694*1000*p0696/100)/p0888>1;1;(p0695*p0694*1000*p0696/100)/p0888))
- p1336: 0; = p1323*p0801
- p0739: 0
- p2290: 0; = p2223*p2197
- p0700: 0
- p2196: 0; = p1068-p2193-p2195
- p2112: 0.856281
- p2517: 0; = p2321*p1014
- p1793: 0
- p0797: 0
- p3469: 0; = p3374*p1241
- p1018: 0; = IF(p1012=0;p0709/100;0)
- p1078: 0; = IF(p1071=0;IF(p1073=1;0;IF(p1073+p1074>1;1-p1073;p1074));0)
- p2274: 0; = p2230*p2220
- p2097: 0.40001
- p3199: 0; = p2418*p1082
- p1966: 430000; = if(p0814=0;p0802;0)
- p3472: 0; = p3377*p1241
- p3410: 0; = p3372*p1238
- p2716: 0; = p2325*(p1019+p1021)
- p3258: 0
- p2477: 0; = p2281*p1014
- p3308: 0; = if(and(p1232=0;p3252<>0);p3252*(p3259-p3303)/p3305;0)
- p3388: 0; = p3369*p1234
- p0923: 0; = IF(p0918=1;0;IF(p0918+p0919>1;1-p0918;p0919))
- p0892: 0; = if(p0891=0;0;(1-p1240)*p3251/p0891)
- p1323: 0; = IF(((p0745*1000*p0750/100)+(p0754*1000*p0759/100))/p0801<0;0;((p0745*1000*p0750/100)+(p0754*1000*p0759/100))/p0801)
- p1963b: 0; = p1569*p1773+p1570*p1774+p1571*p1775+p1572*p1776+p1573*p1777+p1574*p1778+p1575*p1779+p1576*p1780+p1577*p1781+p1578*p1782+p1579*p1783+p1580*p1784+p1581*p1785+p1582*p1786+p1583*p1787+p1584*p1788+p1585*p1789+p1586*p1790+p1587*p1791
- p3007: 0; = p2421*(p1079+p1081)
- p2950: 0; = p2364*(p1020+p1022)
- p0716: 0
- p2691: 0; = p2300*(p1078+p1080)
- p0918: 0; = p0680*1000/p0801
- p2216: 0; = p1108/p0818
- p3333: 0; = if(and(p1232=0;p3255<>0);p3255-(p3328+p3329+p3330+p3331+p3332);0)
- p2305: 0; = p2227*p2212
- p1287: 0
- p2804: 0; = p2413*(p1019+p1021)
- p0886: 0; = p0686*1000*p0687*p0689/100
- p3316: 0; = if(and(p1232=0;p3253<>0);1-(p3312+p3313+p3314+p3315);0)
- p0934: 0; = p0928*p0001/(p0818*p0002)
- p2733: 0; = p2342*(p1078+p1080)
- p1935: 0
- p0690: 0
- p2352: 0; = p2232*p2220
- p3144: 0; = p2363*p1023
- p1981: 400
- p2391: 0; = p2233*p2220
- p0804: 0
- p0674: 0
- p2047: 2.4004e-13; = p2015*p2045/(p0818*1000000000000)
- p1128: 0; = if(p1121=0;IF(p1123=1;0;IF(p1123+p1124>1;1-p1123;p1124));0)
- p0683: 0
- p3365: 0; = if(p1232=0;p3244*p3359/p0818;0)
- p2578: 0; = p2382*p1073
- p1235: 0; = if(p1232>0;0;p0727/100)
- p0863: 0; = p0675*1000/p0856
- p2163: 0.00292019; = (p2017-p2020)/p0818-(p2025+p2028+p2033+p2034+p2051+p2125+p2126+p2127+p2128+p2129+p2130+p2131+p2132+p2133+p2134+p2135+p2136+p2137+p2138+p2139+p2140+p2141+p2142+p2143+p2144+p2145+p2146+p2147+p2148+p2149+p2150+p2151+p2152+p2153+p2154+p2155+p2156+p2157)
- p3043: 0; = p2262*p1082
- p1848: 0
- p3425: 0; = p3368*p1239
- p1024: 0; = IF(p1012=0;p1014*(p0704/100)*p0703*1000;0)
- p2197: 0; = p1055/p0818
- p3323: 0; = if(and(p1232=0;p3255<>0);p3265*p3277*(p3299*p3291+(1-p3299)*p3295);0)
- p1035: 0; = IF(p1012=0;p1029*p0001/(p0818*p0002);0)
- p1894: 0
- p3367: 0; = if(p1232=0;p3244*p3361/p0818;0)
- p1660: 0
- p1875: 0
- p1291: 0; = IF(p1287+p1290=p1264;0;IF(p1287+p1290+p1289>p1264;p1264-(p1287+p1290);p1289))
- p1080: 0; = IF(p1071=0;IF(p1073+p1078+p1079=1;0;IF(p1073+p1078+p1079+p1076>1;1-(p1073+p1078+p1079);p1076));0)
- p3157: 0; = p2376*p1082
- p2678: 0; = p2287*(p1019+p1021)
- p0777: 0
- p1236: 0; = if(p1232>0;0;p0728/100)
- p1963a: 0; = p1550*p1754+p1551*p1755+p1552*p1756+p1553*p1757+p1554*p1758+p1555*p1759+p1556*p1760+p1557*p1761+p1558*p1762+p1559*p1763+p1560*p1764+p1561*p1765+p1562*p1766+p1563*p1767+p1564*p1768+p1565*p1769+p1566*p1770+p1567*p1771+p1568*p1772
- p2400: 0; = p2234*p2189
- p2248: 0; = p2222*p2193
- p1932: 0
- p1082: 0; = IF(p1071=0;IF(p1073+p1078+p1079+p1080+p1081=1;0;1-(p1073+p1078+p1079+p1080+p1081));0)
- p3203: 0; = p2422*p1082
- p3431: 0; = p3374*p1239
- p3124: 0; = p2343*p1082
- p3283: 0
- p1099: 0
- p2872: 0; = p2286*(p1020+p1022)
- p1325: 0; = IF(((p0745*1000*p0752/100)+(p0754*1000*p0761/100))/p0801<0;0;((p0745*1000*p0752/100)+(p0754*1000*p0761/100))/p0801)
- p2404: 0; = p2234*p2193
- p1947: 0
- p2551: 0; = p2355*p1014
- p1588: 0
- p1896: 0
- p0904: 2.58347e7; = p0825*p0901+(p0830+p0895)*p0824*p0903
- p3273: 0
- p3210: 0; = p2429*p1132
- p1783: 0
- p0008: 0.0739645; = (p0007-1.5)/(p0007-1)^2
- p2102: 0.922577
- p0714: 0
- p2594: 0; = p2398*p1014
- p0868: 0; = IF(p0858+p0864+p0865+p0866+p0867=1;0;IF(p0858+p0864+p0865+p0866+p0867+p0863>1;1-(p0858+p0864+p0865+p0866+p0867);p0863))
- p0884: 0; = IF(p0689=100;0;IF(p0689+p0688>100;100-p0689;p0688))
- p2518: 0; = p2322*p1014
- p2341: 0; = p2228*p2209
- p2262: 0; = p2226*p2208
- p2864: 0; = p2278*(p1020+p1022)
- p2035: 1.72381e-5; = p2015*p2029*(1-p2031)/(p0818*1000)
- p3335: 0; = IF(or(p3254=0;p1232>0);0;p3270*(p3280*(p3283*p1256+p3286*(p1253+p1257)+p1258*p3288+p3300*p3287)))
- p3272: 0
- p0737: 0
- p2103: 0.912485
- p3317: 0; = if(and(p1232=0;p3253<>0);p3253*(p3261*p3277-p3312)/p3316;0)
- p1054: 0; = IF(p1012=0;p1047*p1036;0)
- p3027: 0; = p2246*p1023
- p2675: 0; = p2284*(p1019+p1021)
- p1315: 0; = p1311*p1252/p0818
- p1086: 0; = IF(p1071=0;p1080*(p0710/100)*p0703*1000;0)
- p1749: 0
- p2095: 0.765734
- p2903: 0; = p2317*(p1020+p1022)
- p3220: 0; = p3216*p1228
- p1238: 0; = if(p1232>0;0;IF(p1234=1;0;IF(p1234+p1235>1;1-p1234;p1235)))
- p2171: 0.0847992; = p2165*p0831
- p3359: 0; = if(p1232=0;p3309+p3320+p3331+p3342+p3353;0)
- p0783: 0
- p0718: 0
- p2155: 9.83212e-7; = p2015*p2084*p2117/(p0818*1000)
- p4719: 0; = p1962*p3481
- p1860: 0
- p3381: 0; = p3362*p1234
- p1996: 30
- p0770: 0
- p0781: 0
- p0936: 0; = p0930*p0001/(p0818*p0002)
- p1840: 0
- p2768: 0; = p2377*(p1078+p1080)
- p0738: 0
- p0767: 0
- p1963h: 0; = p1686*p1890+p1687*p1891+p1688*p1892+p1689*p1893+p1690*p1894+p1691*p1895+p1692*p1896+p1693*p1897+p1694*p1898+p1695*p1899+p1696*p1900+p1697*p1901+p1698*p1902+p1699*p1903+p1700*p1904+p1701*p1905+p1702*p1906+p1703*p1907+p1704*p1908+p1705*p1909
- p2757: 0; = p2366*(p1019+p1021)
- p1262: 0; = if(p1232>0;0;p0733/100)
- p2536: 0; = p2340*p1073
- p1752: 0
- p2673: 0; = p2282*(p1019+p1021)
- p1882: 0
- p2413: 0; = p2234*p2203
- p1995: 50
- p4102: 0; = p1963*p3478
- p1785: 0
- p0784: 0
- p2931: 0; = p2345*(p1079+p1081)
- p3347: 0; = if(and(p1232=0;p3256<>0);p3275*p3289;0)
- p2054: 0.91
- p1207: 0; = if(p1193>0;0;(p1194*p1050/p1057+p1195*p1051/p1058+p1196*p1052/p1059+p1197*p1053/p1060+p1198*p1054/p1061+p1199*p1055/p1062+p1200*p1056/p1063)/(p0702*1000)+(p1201*p1109/p1114+p1202*p1110/p1115)/(p0702*1000)+p1203*p1170/p0801+p1204*p1176/p0801)
- p2528: 0; = p2332*p1014
- p3172: 0; = p2391*p1132
- p2656: 0; = p2265*(p1078+p1080)
- p3130: 0; = p2349*p1082
- p1759: 0
- p0874: 0; = p0865*p0856
- p2020: 149832; = p2015*p2018*p2019
- p2497: 0; = p2301*p1073
- p2973: 0; = p2387*(p1079+p1081)
- p2944: 0; = p2358*(p1020+p1022)
- p1022: 0; = IF(p1012=0;IF(p1014+p1019+p1020+p1021=1;0;IF(p1014+p1019+p1020+p1021+p1018>1;1-(p1014+p1019+p1020+p1021);p1018));0)
- p2524: 0; = p2328*p1014
- p3032: 0; = p2251*p1023
- p1273: 0; = p1267*p1252/p0818
- p0881: 0; = p0880*p0001*p0003/(p0818*p0002)
- p1330: 0; = p1320*p0801
- p1742: 0
- p3030: 0; = p2249*p1023
- p1662: 0
- p1713: 0
- p1319: 0; = IF(((p0745*1000*p0746/100)+(p0754*1000*p0755/100))/p0801<0;0;((p0745*1000*p0746/100)+(p0754*1000*p0755/100))/p0801)
- p0988: 0; = p0982*p0886
- p3446: 0; = p3370*p1240
- p0734: 0
- p2926: 0; = p2340*(p1079+p1081)
- p3354: 0; = IF((p3350+p3351+p3352+p3353)+IF(p3349=0;0;(p3256*(p3273*(1-p3277))/p3349))>p3256;p3256-(p3350+p3351+p3352+p3353);IF(p3349=0;0;p3256*(p3273*(1-p3277))/p3349))
- p1936: 0
- p4513: 0; = p1962*p3480
- p1899: 0
- p2387: 0; = p2229*p2216
- p1727: 0
- p2514: 0; = p2318*p1014
- p0931: 0; = p0801*p0925
- p1258: 0; = if(p1232>0;0;IF(p1253+p1256+p1257=1;0;1-(p1253+p1256+p1257)))
- p1608: 0
- p2581: 0; = p2385*p1073
- p1701: 0
- p3037: 0; = p2256*p1023
- p2615: 0; = p2419*p1073
- p1738: 0
- p3112: 0; = p2331*p1023
- p2840: 0; = p2254*(p1020+p1022)
- p3315: 0; = if(and(p1232=0;p3253<>0);p3264*p3289;0)
- p3282: 0
- p2957: 0; = p2371*(p1020+p1022)
- p1311: 0; = IF(p1307+p1310=p1266;0;IF(p1307+p1310+p1309>p1266;p1266-(p1307+p1310);p1309))
- p3190: 0; = p2409*p1023
- p2201: 0; = 12.01*p2200/(2*14.0067)
- p2207: 0; = p1119-p2205-p2204-p2206
- p3025: 0; = p2244*p1023
- p1963j: 0; = p1725*p1929+p1726*p1930+p1727*p1931+p1728*p1932+p1729*p1933+p1730*p1934+p1731*p1935+p1732*p1936+p1733*p1937+p1734*p1938+p1735*p1939+p1736*p1940+p1737*p1941+p1738*p1942+p1739*p1943+p1740*p1944+p1741*p1945+p1742*p1946+p1743*p1947
- p1952: 0
- p3288: 0
- p1005: 0; = p1001*p0888
- p3428: 0; = p3371*p1239
- p2568: 0; = p2372*p1014
- p2115: 0.856281
- p1002: 0; = p0996*p0888
- p1831: 0
- p1012: 450000; = p0801
- p2211: 0; = p1120-p2209-p2208-p2210
- p2307: 0; = p2227*p2214
- p3072: 0; = p2291*p1023
- p3192: 0; = p2411*p1023
- p3223: 0; = IF(p3216=0;0;(1-p1223)*24.3050/84.3139)
- p2381: 0; = p2229*p2210
- p1780: 0
- p1909: 0
- p2494: 0; = p2298*p1073
- p1271: 0; = IF(p1267+p1270=p1259;0;IF(p1267+p1270+p1269>p1259;p1259-(p1267+p1270);p1269))
- p2204: 0; = p1109/p0818
- p1647: 0
- p1889: 0
- p3467: 0; = p3372*p1241
- p1924: 0
- p0788: 0
- p3108: 0; = p2327*p1023
- p2209: 0; = 14.0067*p2208/30.973762
- p0855: 1.93128; = p0854*p0001*p0003/(p0818*p0002)
- p1708: 0
- p2655: 0; = p2264*(p1078+p1080)
- p3229: 5.36742e-6; = p1164/p0818
- p1756: 0
- p2946: 0; = p2360*(p1020+p1022)
- p1202: 0
- p1945: 0
- p1863: 0
- p1857: 0
- p1580: 0
- p3171: 0; = p2390*p1132
- p2062: 3.76588
- p2949: 0; = p2363*(p1020+p1022)
- p1101: 0; = IF(p1071=0;IF(p1096=1;0;IF(p1096+p1097>1;1-p1096;p1097));0)
- p3380: 0; = p3251/p0818
- p0676: 0
- p0769: 0
- p2791: 0; = p2400*(p1019+p1021)
- p1641: 0
- p2199: 0; = p1069-p2197-p2198
- p2511: 0; = p2315*p1014
- p1871: 0
- p3189: 0; = p2408*p1023
- p0796: 0
- p1798: 0
- p1725: 0
- p2475: 0; = p2279*p1014
- p2785: 0; = p2394*(p1019+p1021)
- p2104: 0.817136
- p2636: 0; = p2245*(p1019+p1021)
- p2090: 0.40001
- p0808: 0
- p2343: 0; = p2228*p2211
- p2048: 8.00134e-14; = p2015*p2046/(p0818*1000000000000)
- p3435: 0; = p3378*p1239
- p0906: 0.00423333
- p2189: 0; = p1053/p0818
- p3111: 0; = p2330*p1023
- p2917: 0; = p2331*(p1020+p1022)
- p0682: 0
- p1177: 0.00055576; = p0801*p0001/(p0818*p0002)
- p1243: 0; = if(p1232>0;0;p1238*(p0725/100)*p0723*1000)
- p2437: 0; = p2241*p1014
- p2169: 0.00105672; = p2166*(p0908)
- p1691: 0
- p2885: 0; = p2299*(p1079+p1081)
- p3397: 0; = p3378*p1234
- p3017: 0; = p2431*(p1129+p1131)
- p1184: 8.70907e-8; = p1182/p0818
- p0873: 0; = p0872*p0001*p0003/(p0818*p0002)
- p0844: 0.336797
- p2943: 0; = p2357*(p1020+p1022)
- p3136: 0; = p2355*p1023
- p3406: 0; = p3368*p1238
- p1965: 0; = p1963+p1959*p1964*1000/p0818
- p3095: 0; = p2314*p1132
- p0963: 0; = if(and(p0683>0;or(p0807=480;p0807=32;p0807=1;and(p0807=60;p0901<0.03)));p0939;0)
- p3151: 0; = p2370*p1023
- p1726: 0
- p0957: 0; = if(and(p0683>0;or(p0807=56;p0807=100;and(p0807=60;p0901>0.06)));p0939;0)
- p1556: 0
- p2637: 0; = p2246*(p1019+p1021)
- p1573: 0
- p3345: 0; = if(and(p1232=0;p3256<>0);p3273*p3277*p3293;0)
- p2493: 0; = p2297*p1073
- p1213: 0
- p3196: 0; = p2415*p1082
- p0723: 450.21; = p0063*(1+p0591*p0195/100)
- p2627: 0; = p2431*p1123
- p1030: 0; = IF(p1012=0;p1024*p0001/(p0818*p0002);0)
- p3047: 0; = p2266*p1082
- p2587: 0; = p2391*p1123
- p1057: 0
- p3134: 0; = p2353*p1132
- p1329: 0; = p1328*p0001/(p0818*p0002)
- p1920: 0
- p3437: 0; = p3380*p1239
- p0712: 0
- p1963g: 0; = p1667*p1871+p1668*p1872+p1669*p1873+p1670*p1874+p1671*p1875+p1672*p1876+p1673*p1877+p1674*p1878+p1675*p1879+p1676*p1880+p1677*p1881+p1678*p1882+p1679*p1883+p1680*p1884+p1681*p1885+p1682*p1886+p1683*p1887+p1684*p1888+p1685*p1889
- p1907: 0
- p2592: 0; = p2396*p1014
- p1135: 0; = if(p1121=0;p1129*(p0716/100)*p0703*1000;0)
- p2337: 0; = p2228*p2205
- p2974: 0; = p2388*(p1079+p1081)
- p1711: 0
- p0713: 0
- p2798: 0; = p2407*(p1019+p1021)
- p0103: 450.21
- p2762: 0; = p2371*(p1019+p1021)
- p2850: 0; = p2264*(p1079+p1081)
- p3248: 0
- p2584: 0; = p2388*p1073
- p2192: 0; = p1067-p2189-p2190-p2191
- p1190: 1.56615e-7; = p1188/p0818
- p2548: 0; = p2352*p1123
- p2076: 0.057
- p2364: 0; = p2225*p2192
- p2856: 0; = p2270*(p1079+p1081)
- p1974: 0; = p1969*p0001/(p0818*p0002)
- p2073: 0.377647
- p3477: 0; = if(p1328+p1330+p1332+p1334+p1336+p1338+p1340+p1342+p1344=0;0;p1330/(p1328+p1330+p1332+p1334+p1336+p1338+p1340+p1342+p1344))
- p1929: 0
- p1106: 0; = IF(p1071=0;p1105*p1096*p1095;0)

## Reference product
- durum wheat; at harvest in 1998; at farm; 88%-89% moisture: 1 kg
## Inputs from technosphere
- CUTOFF harvest; durum wheat residue management: 0.00055576 ha; = p1975
- CUTOFF gypsum; at point-of-sale: 5.36742e-6 kg; = p1166
- CUTOFF apply sewage sludge; unspecified method: 0.00055576 ha; = p1189
- CUTOFF apply sulfur; unspecified method: 0.00055576 ha; = p1171
- CUTOFF manure appl svc; unspec rate, 1998 durum wheat: 0.00055576 ha; = p1233
- CUTOFF sulfur storage: 1.58304e-7 kg*a; = p1174
- CUTOFF international vessel transport; average fuel: 1.35648e-6 metric ton*km; = p2006
- CUTOFF sulfuric acid storage: 3.04288e-8 kg*a; = p1180
- durum wheat residue; at harvest in 1998; at farm; 83%-90% moisture: 0.532617 kg; = p0839
- CUTOFF prepare soil; for unspec. till, wheat: 0.00055576 ha; = p0939
- CUTOFF zinc compounds; at point-of-sale: 8.70907e-8 kg; = p1184
- CUTOFF pesticide formulation balance; at point-of-sale: 0 kg; = p1963
- CUTOFF P fertilizer appl svc; unspec rate, 1998 durum wheat: 0.00055576 ha; = p1072
- CUTOFF bulk cargo rail transport; diesel: 2.5434e-7 metric ton*km; = p2008
- CUTOFF N fertilizer appl svc; unspec rate, 1998 durum wheat: 0.00055576 ha; = p1013
- CUTOFF harvest; durum: 0.00053106 ha; = p1971
- CUTOFF sewage sludge storage: 7.83077e-8 kg*a; = p1192
- CUTOFF local area trucking; class 6, average fuel: 1.01736e-8 metric ton*km; = p2010
- CUTOFF apply gypsum; unspecified method: 0.00055576 ha; = p1165
- CUTOFF liming material appl svc; unspec rate, 1998 durum wheat: 0.00055576 ha; = p1193
- CUTOFF sowing svc; for unspec till, 1998 durum wheat: 0.00055576 ha; = p0951
- CUTOFF K fertilizer appl svc; unspec rate, 1998 durum wheat: 0.00055576 ha; = p1122
- CUTOFF irrig svc; unspec wat source & rate, 1998 durum wheat: 0.00055576 ha; = p0981
- CUTOFF sulfuric acid; at point-of-sale: 6.08576e-8 kg; = p1178
- CUTOFF apply sulfuric acid; unspecified method: 0.00055576 ha; = p1177
- CUTOFF gypsum storage: 2.68371e-6 kg*a; = p1168
- CUTOFF sulfur; at point-of-sale: 3.16608e-7 kg; = p1172
- CUTOFF apply zinc compounds; unspecified method: 0.00055576 ha; = p1183
- CUTOFF domestic barge transport; average fuel: 1.35648e-7 metric ton*km; = p2007
- CUTOFF N inhibitor appl svc; unspec rate & type, 1998 durum wheat: 0.000622924 ha; = p1162
- CUTOFF sewage sludge; at point-of-sale: 1.56615e-7 kg; = p1190
- CUTOFF pesticide appl svc; unspec rate, 1998 durum wheat: 0.00055576 ha; = p1318
- CUTOFF zinc compounds storage: 4.35454e-8 kg*a; = p1186
- CUTOFF regional or national trucking; class 8, average fuel: 9.5733e-7 metric ton*km; = p2009

## Inputs from nature
- Transformation, from annual crop [natural resource, land]: 5.5576 m2; = 1.0 * (p0883)
- Carbon dioxide: 3.34169 kg; = p0900*3.6666666667
- Occupation, annual crop [natural resource, land]: 1.93128 m2*year; = 1.0 * (p0855)
- Potassium; from plant uptake; biogenic: 0.0177621 kg; = p0915
- Dry matter except CNPK; from plant uptake: 1.19318 kg; = p0917
- Transformation, to annual crop [natural resource, land]: 5.5576 m2; = 1.0 * (p0857)
- Phosphorus: 0.0059216 kg; = p0910
- Nitrogen: 0.0357623 kg; = p0905
- Water, unspecified origin: 0.000321902 m3; = p0916*0.001

## Emissions to nature
- Nitrogen; in above-ground residue left on field: 0.00691224 kg; = p2168
- Sewage sludge dry matter; applied in sewage sludge: 8.10971e-10 kg; = p3243
- Plant dry matter; from residue burning: 0.00287505 kg; = p2164
- Dioxins and furans (PCDD/F); from residue burning: 2.4004e-13 kg TEQ; = p2047
- Methane: 1.6933e-5 kg; = p2025*1.3333333333
- Formic acid [air, non-urban air or from high stacks]: 8.01751e-6 kg; = 1.0 * (p2131*3.8333333333)
- Potassium; in below-ground residue; biogenic: 0.00337742 kg; = p2176
- Butane [air, non-urban air or from high stacks]: 4.86112e-7 kg; = 1.0 * (p2147*1.0208333333)
- Nitrogen dioxide: 1.59284e-5 kg; = p2039*3.2857142857
- Particulates, < 10 um: 5.28889e-5 kg; = p2034+p2036
- cis-2-Butene: 3.43712e-7 kg; = p2149*1.1666666667
- Sulfur [soil, agricultural]: 3.16608e-7 kg; = 1.0 * (p3230)
- Benzene [air, non-urban air or from high stacks]: 1.22778e-6 kg; = 1.0 * (p2140*1.0833333333)
- Ammonia [air, non-urban air or from high stacks]: 1.73636e-5 kg; = 1.0 * (p2159*1.2142857143)
- Acetone [air, non-urban air or from high stacks]: 3.57068e-6 kg; = 1.0 * (p2139*1.6111111111)
- Methanol [air, non-urban air or from high stacks]: 2.6297e-5 kg; = 1.0 * (p2129*2.6666666667)
- Ethene [air, non-urban air or from high stacks]: 1.1642e-5 kg; = 1.0 * (p2125*1.1666666667)
- Water [air, non-urban air or from high stacks]: 1.2702e-6 m3; = 0.001 * (p2016)
- Pentane [air, non-urban air or from high stacks]: 1.69274e-7 kg; = 1.0 * (p2152*1.0166666667)
- Carbon dioxide, in air: 0.0107073 kg; = p2163*3.6666666667
- Acetonitrile [air, non-urban air or from high stacks]: 1.67965e-6 kg; = 1.0 * (p2155*1.7083333333)
- Phosphorous; applied in sewage sludge: 8.74456e-10 kg; = p3241
- Nitrogen; applied in sewage sludge: 7.3252e-9 kg; = p3240
- Particulates, < 2.5 um [air, non-urban air or from high stacks]: 3.22454e-5 kg; = 1.0 * (p2033+p2035)
- Formaldehyde [air, non-urban air or from high stacks]: 1.66338e-5 kg; = 1.0 * (p2128*2.5)
- Glycolaldehyde; from residue burning: 1.61205e-5 kg; = p2135*2.5
- Phenol [air, non-urban air or from high stacks]: 4.15008e-6 kg; = 1.0 * (p2133*1.3055555556)
- Plant dry matter; in below-ground residue: 0.144292 kg; = p2177
- Phosphorous; in below-ground residue: 0.000554914 kg; = p2175
- Acetaldehyde [air, non-urban air or from high stacks]: 9.9516e-6 kg; = 1.0 * (p2130*1.8333333333)
- Dinitrogen monoxide [air, non-urban air or from high stacks]: 5.60199e-7 kg; = 1.0 * (p2044*1.5714285714)
- Carbon monoxide, fossil [air, non-urban air or from high stacks]: 0.000441428 kg; = 1.0 * (p2028*2.3333333333)
- I butane; from residue burning: 1.68789e-7 kg; = p2146*1.0208333333
- Potassium; in above-ground residue left on field; biogenic: 0.00643159 kg; = p2170
- Propene [air, non-urban air or from high stacks]: 5.40912e-6 kg; = 1.0 * (p2136*1.1666666667)
- Isoprene [air, non-urban air or from high stacks]: 3.01918e-6 kg; = 1.0 * (p2145*1.1333333333)
- Ethane [air, non-urban air or from high stacks]: 7.27098e-6 kg; = 1.0 * (p2126*1.25)
- Plant dry matter; in aboveground residue left on field: 0.274774 kg; = p2172
- Sulfuric acid [soil, agricultural]: 6.08576e-8 kg; = 1.0 * (p3231)
- Ash: 0.00158267 kg; = p2021+p2022
- cyclopentane: 1.32346e-8 kg; = p2153*1.0166666667
- trans-2-Butene: 4.55618e-7 kg; = p2148*1.1666666667
- Methyl vinyl ether; from residue burning: 6.06874e-7 kg; = p2137*1.6111111111
- Sulfur dioxide [air, non-urban air or from high stacks]: 3.52059e-6 kg; = 1.0 * (p2041)
- Acetic acid [air, non-urban air or from high stacks]: 4.47663e-5 kg; = 1.0 * (p2127*2.5)
- Hydrocyanic acid: 2.28263e-6 kg; = p2154*2.25
- Gypsum: 5.36742e-6 kg; = p3229
- isopentane: 1.35419e-7 kg; = p2151*1.0166666667
- Ethyne [air, non-urban air or from high stacks]: 2.17801e-6 kg; = 1.0 * (p2132*1.0833333333)
- Furan [air, non-urban air or from high stacks]: 8.7527e-7 kg; = 1.0 * (p2138*1.4166666667)
- Propane [air, non-urban air or from high stacks]: 2.25349e-6 kg; = 1.0 * (p2142*1.2222222222)
- Toluene [air, non-urban air or from high stacks]: 1.52403e-6 kg; = 1.0 * (p2141*1.0952380952)
- Acetol; from residue burning: 3.0127e-5 kg; = p2134*2.0555555556
- 1-Butene: 1.0711e-6 kg; = p2144*1.1666666667
- isobutene: 9.35216e-7 kg; = p2150*1.1666666667
- Water: 0.12933 kg; = p2181+p2178+p2171
- Phosphorous; in above-ground residue left on field: 0.00105672 kg; = p2169
- Propanenitrile: 5.12701e-7 kg; = p2157*1.5277777778
- Nitrogen; in below-ground residue: 0.00362983 kg; = p2174
- Carbon [soil, agricultural]: 0.373655 kg; = 1.0 * (p3242+p2167+p2173)
- Acrylonitrile: 2.68203e-7 kg; = p2156*1.4722222222
- Zinc compounds: 8.70907e-8 kg; = p3232
- NMVOC, non-methane volatile organic compounds, unspecified origin [air, non-urban air or from high stacks]: 0.000205588 kg; = 1.0 * (p2051+p2052)
- Butadiene [air, non-urban air or from high stacks]: 1.20726e-6 kg; = 1.0 * (p2143*1.125)

## Sampling procedure
A delete-a-group jackknife is used by the USDA to estimate the ARMS sample means and RSEs, based on a 15 sample delete-a-group jackknife. Because of this relatively small sample size, a Students t distribution is used to represent ARMS data probability density functions. Other representations of uncertainty are described in Cooper, J.S., Kahn, E., Noon, M. (2012). LCA Digital Commons Unit Process Data: field crop production Version 1. Prepared for the US Department of Agriculture National Agricultural Library. Retrieved from https://www.lcacommons.gov/discovery/docs/LCA%20Digital%20Commons%20Unit%20Process%20Data%20final%20updated.pdf

## Extrapolations
Data represent an aggregation of processes applied in Montana in 1998. Data development is demonstrated by parameterization (exlicitly presents all raw and uncertainty data and all calculations). Flow data quality according to the LCADC convention is provided for all flows.
