# spring wheat, excl. durum; at harvest in 1998; at farm; 86%-90% moisture

Dataset: EcoSpold 2, unit process
Geography: GLO
Time period: 1998-01-02 to 1999-01-01
Scenario: Business-as-Usual
System model: Allocation, ecoinvent default
Generated by: cooperjs@u.washington.edu
isCopyrightProtected: false

## General comment
This unit process/ gate-to-gate dataset represents the production of 1 kg spring wheat (excl. durum) coproduced with residue. The process technologies are an aggregation of those applied in North Dakota in 1998. Applicable classifications include ISIC 0111, NAIC 111140, UNSPSC 50221101; this dataset was prepared in ILCD format using the UWDFE Lab Excel to ILCD File Generator (beta version, August 2013)

Exchange "NMVOC, non-methane volatile organic compounds, unspecified origin-air low population density" is the result of combining the following original LCA Commons flows: "NMVOCs; from residue burning; kg except C, biogenic", "NMVOCs; from residue burning; kg C, biogenic".
Exchange "Glyphosate-soil agricultural" is the result of combining the following original LCA Commons flows: "Glyphosate; broadcast with incorporation; kg AI", "Glyphosate; unspec. appl. method; kg AI", "Glyphosate; broadcast without incorporation; kg AI", "Glyphosate; foliar or directed spray; kg AI".
Exchange "Dicamba-soil agricultural" is the result of combining the following original LCA Commons flows: "Dicamba; broadcast with incorporation; kg AI", "Dicamba; unspec. appl. method; kg AI", "Dicamba; broadcast without incorporation; kg AI", "Dicamba; foliar or directed spray; kg AI".
Exchange "Carbon-soil agricultural" is the result of combining the following original LCA Commons flows: "Carbon; broadcast w/o incorp. in manure at an unknown time", "Carbon; applied in sewage sludge", "Carbon; applied in dolomite", "Carbon; in above-ground residue left on field; biogenic", "Carbon; using unspec. method in manure at an unknown time", "Carbon; applied in limestone", "Carbon; in below-ground residue; biogenic".
Exchange "Particulates, < 2.5 um-air low population density" is the result of combining the following original LCA Commons flows: "PM2.5; from residue burning; kg except C, biogenic", "PM2.5; from residue burning; kg C, biogenic".
Exchange "Pesticides, unspecified-soil agricultural" is the result of combining the following original LCA Commons flows: "Unspecified pesticide; broadcast with incorporation; kg AI", "Unspecified pesticide; unspec. appl. method; kg AI", "Unspecified pesticide; foliar or directed spray; kg AI", "Unspecified pesticide; broadcast without incorporation; kg AI".
Exchange "Ash-soil agricultural" is the result of combining the following original LCA Commons flows: "Ash; from residue burning; kg C, biogenic", "Ash; from residue burning; kg except C, biogenic".
Exchange "Trifluralin-soil agricultural" is the result of combining the following original LCA Commons flows: "Trifluralin; foliar or directed spray; kg AI", "Trifluralin; broadcast without incorporation; kg AI", "Trifluralin; broadcast with incorporation; kg AI", "Trifluralin; unspec. appl. method; kg AI".
Exchange "Water-soil agricultural" is the result of combining the following original LCA Commons flows: "Water; in above-ground residue left on field; biogenic", "Water; broadcast w/o incorp. in manure", "Water; from irrigation and applied with manure and sewage sludge", "Water; in below-ground residue; biogenic", "Water; using unspec. method in manure".
Exchange "Clopyralid-soil agricultural" is the result of combining the following original LCA Commons flows: "Clopyralid; broadcast without incorporation; kg AI", "Clopyralid; unspec. appl. method; kg AI", "Clopyralid; broadcast with incorporation; kg AI", "Clopyralid; foliar or directed spray; kg AI".
Exchange "Tebuconazole-soil agricultural" is the result of combining the following original LCA Commons flows: "Tebuconazole; foliar or directed spray; kg AI", "Tebuconazole; broadcast without incorporation; kg AI", "Tebuconazole; broadcast with incorporation; kg AI", "Tebuconazole; unspec. appl. method; kg AI".
Exchange "Water, unspecified origin-resource in water" is the result of combining the following original LCA Commons flows: "Water; from plant uptake; biogenic", "Water; withdrawal from unspec. source, for spring wheat (excl. durum), in 1998".
Exchange "Particulates, < 10 um-air low population density" is the result of combining the following original LCA Commons flows: "PM10; from residue burning; kg except C, biogenic", "PM10; from residue burning; kg C, biogenic".
Exchange "Bromoxynil-soil agricultural" is the result of combining the following original LCA Commons flows: "Bromoxynil; broadcast with incorporation; kg AI", "Bromoxynil; foliar or directed spray; kg AI", "Bromoxynil; unspec. appl. method; kg AI", "Bromoxynil; broadcast without incorporation; kg AI".
Exchange "MCPA-soil agricultural" is the result of combining the following original LCA Commons flows: "MCPA; broadcast without incorporation; kg AI", "MCPA; unspec. appl. method; kg AI", "MCPA; broadcast with incorporation; kg AI", "MCPA; foliar or directed spray; kg AI".
Exchange "Tribenuron-methyl-soil agricultural" is the result of combining the following original LCA Commons flows: "Tribenuron-methyl; foliar or directed spray; kg AI", "Tribenuron-methyl; unspec. appl. method; kg AI", "Tribenuron-methyl; broadcast with incorporation; kg AI", "Tribenuron-methyl; broadcast without incorporation; kg AI".
Exchange "Calcium-soil agricultural" is the result of combining the following original LCA Commons flows: "Calcium; applied in dolomite", "Calcium; applied in limestone".
Exchange "2,4-D-soil agricultural" is the result of combining the following original LCA Commons flows: "2,4-D; foliar or directed spray; kg AI", "2,4-D; broadcast without incorporation; kg AI", "2,4-D; broadcast with incorporation; kg AI", "2,4-D; unspec. appl. method; kg AI".
Exchange "Ethane-2bdf9967-6dae-4183-88d1-8f612548c51e low population density" was originally named: "Ethane; from residue burning; kg C, biogenic" in this dataset.
Exchange "Occupation, arable-c19fb2d9-98eb-4cd3-8761-81b71d8a9a1b land" was originally named: "Occupation; arable, as wheat" in this dataset.
Exchange "Ethyne-2bdf9967-6dae-4183-88d1-8f612548c51e low population density" was originally named: "Acetylene; from residue burning; kg C, biogenic" in this dataset.
Exchange "Acetonitrile-2bdf9967-6dae-4183-88d1-8f612548c51e low population density" was originally named: "Acetonitrile; from residue burning; kg C, biogenic" in this dataset.
Exchange "Acetone-2bdf9967-6dae-4183-88d1-8f612548c51e low population density" was originally named: "Acetone; from residue burning; kg C, biogenic" in this dataset.
Exchange "Carbon monoxide, fossil-2bdf9967-6dae-4183-88d1-8f612548c51e low population density" was originally named: "Carbon monoxide; from residue burning; kg C, biogenic" in this dataset.
Exchange "Transformation, to arable-c19fb2d9-98eb-4cd3-8761-81b71d8a9a1b land" was originally named: "Transformation; to arable, to wheat" in this dataset.
Exchange "Tebuconazole-2bdf9967-6dae-4183-88d1-8f612548c51e low population density" was originally named: "Tebuconazole; broadcast by air; kg AI" in this dataset.
Exchange "Transformation, from arable-c19fb2d9-98eb-4cd3-8761-81b71d8a9a1b land" was originally named: "Transformation; from arable, from unspec. use to wheat" in this dataset.
Exchange "Nitrogen dioxide-2bdf9967-6dae-4183-88d1-8f612548c51e low population density" was originally named: "Nitrogen dioxide; from residue burning; kg N, biogenic" in this dataset.
Exchange "Benzene-2bdf9967-6dae-4183-88d1-8f612548c51e low population density" was originally named: "Benzene; from residue burning; kg C, biogenic" in this dataset.
Exchange "Carbon dioxide-c19fb2d9-98eb-4cd3-8761-81b71d8a9a1b unspecified" was originally named: "Carbon dioxide; from plant uptake; kg C, biogenic" in this dataset.
Exchange "Formic acid-2bdf9967-6dae-4183-88d1-8f612548c51e low population density" was originally named: "Formic acid; from residue burning; kg C, biogenic" in this dataset.
Exchange "Pentane-2bdf9967-6dae-4183-88d1-8f612548c51e low population density" was originally named: "N pentane; from residue burning; kg C, biogenic" in this dataset.
Exchange "isopentane-2bdf9967-6dae-4183-88d1-8f612548c51e low population density" was originally named: "I pentane; from residue burning; kg C, biogenic" in this dataset.
Exchange "Acetic acid-2bdf9967-6dae-4183-88d1-8f612548c51e low population density" was originally named: "Acetic acid; from residue burning; kg C, biogenic" in this dataset.
Exchange "Sulfur dioxide-2bdf9967-6dae-4183-88d1-8f612548c51e low population density" was originally named: "Sulfur dioxide; from residue burning; biogenic" in this dataset.
Exchange "Glyphosate-2bdf9967-6dae-4183-88d1-8f612548c51e low population density" was originally named: "Glyphosate; broadcast by air; kg AI" in this dataset.
Exchange "Hydrocyanic acid-2bdf9967-6dae-4183-88d1-8f612548c51e low population density" was originally named: "Hydrogen cyanide; from residue burning; kg C, biogenic" in this dataset.
Exchange "Magnesium-be1c0329-f1a8-4524-8420-a86d2a8dd358 agricultural" was originally named: "Magnesium; applied in dolomite" in this dataset.
Exchange "Toluene-2bdf9967-6dae-4183-88d1-8f612548c51e low population density" was originally named: "Toluene; from residue burning; kg C, biogenic" in this dataset.
Exchange "Butadiene-2bdf9967-6dae-4183-88d1-8f612548c51e low population density" was originally named: "1,3 butadiene; from residue burning; kg C, biogenic" in this dataset.
Exchange "Trifluralin-2bdf9967-6dae-4183-88d1-8f612548c51e low population density" was originally named: "Trifluralin; broadcast by air; kg AI" in this dataset.
Exchange "isobutene-2bdf9967-6dae-4183-88d1-8f612548c51e low population density" was originally named: "I butene; from residue burning; kg C, biogenic" in this dataset.
Exchange "Water-2bdf9967-6dae-4183-88d1-8f612548c51e low population density" was originally named: "Water; from residue burning; biogenic" in this dataset.
Exchange "Bromoxynil-2bdf9967-6dae-4183-88d1-8f612548c51e low population density" was originally named: "Bromoxynil; broadcast by air; kg AI" in this dataset.
Exchange "Sulfur-be1c0329-f1a8-4524-8420-a86d2a8dd358 agricultural" was originally named: "Sulfur; as secondary application" in this dataset.
Exchange "Formaldehyde-2bdf9967-6dae-4183-88d1-8f612548c51e low population density" was originally named: "Formaldehyde; from residue burning; kg C, biogenic" in this dataset.
Exchange "Propene-2bdf9967-6dae-4183-88d1-8f612548c51e low population density" was originally named: "Propylene; from residue burning; kg C, biogenic" in this dataset.
Exchange "Ammonia-2bdf9967-6dae-4183-88d1-8f612548c51e low population density" was originally named: "Ammonia; from residue burning; kg N, biogenic" in this dataset.
Exchange "Clopyralid-2bdf9967-6dae-4183-88d1-8f612548c51e low population density" was originally named: "Clopyralid; broadcast by air; kg AI" in this dataset.
Exchange "Isoprene-2bdf9967-6dae-4183-88d1-8f612548c51e low population density" was originally named: "Isoprene; from residue burning; kg C, biogenic" in this dataset.
Exchange "Dicamba-2bdf9967-6dae-4183-88d1-8f612548c51e low population density" was originally named: "Dicamba; broadcast by air; kg AI" in this dataset.
Exchange "Sulfuric acid-be1c0329-f1a8-4524-8420-a86d2a8dd358 agricultural" was originally named: "Sulfuric acid; as secondary application" in this dataset.
Exchange "Butane-2bdf9967-6dae-4183-88d1-8f612548c51e low population density" was originally named: "N butane; from residue burning; kg C, biogenic" in this dataset.
Exchange "trans-2-Butene-2bdf9967-6dae-4183-88d1-8f612548c51e low population density" was originally named: "Trans 2 butene; from residue burning; kg C, biogenic" in this dataset.
Exchange "Ethene-2bdf9967-6dae-4183-88d1-8f612548c51e low population density" was originally named: "Ethylene; from residue burning; kg C, biogenic" in this dataset.
Exchange "Acetaldehyde-2bdf9967-6dae-4183-88d1-8f612548c51e low population density" was originally named: "Acetaldehyde; from residue burning; kg C, biogenic" in this dataset.
Exchange "1-Butene-2bdf9967-6dae-4183-88d1-8f612548c51e low population density" was originally named: "1 butene; from residue burning; kg C, biogenic" in this dataset.
Exchange "Methanol-2bdf9967-6dae-4183-88d1-8f612548c51e low population density" was originally named: "Methanol; from residue burning; kg C, biogenic" in this dataset.
Exchange "Acrylonitrile-2bdf9967-6dae-4183-88d1-8f612548c51e low population density" was originally named: "Propenenitrile; from residue burning; kg C, biogenic" in this dataset.
Exchange "Phenol-2bdf9967-6dae-4183-88d1-8f612548c51e low population density" was originally named: "Phenol; from residue burning; kg C, biogenic" in this dataset.
Exchange "Dinitrogen monoxide-2bdf9967-6dae-4183-88d1-8f612548c51e low population density" was originally named: "Dinitrogen monoxide; from residue burning; kg N, biogenic" in this dataset.
Exchange "MCPA-2bdf9967-6dae-4183-88d1-8f612548c51e low population density" was originally named: "MCPA; broadcast by air; kg AI" in this dataset.
Exchange "cis-2-Butene-2bdf9967-6dae-4183-88d1-8f612548c51e low population density" was originally named: "Cis 2 butene; from residue burning; kg C, biogenic" in this dataset.
Exchange "Zinc compounds-be1c0329-f1a8-4524-8420-a86d2a8dd358 agricultural" was originally named: "Zinc compounds; as secondary application" in this dataset.
Exchange "Carbon dioxide, in air-2bdf9967-6dae-4183-88d1-8f612548c51e low population density" was originally named: "Carbon dioxide; from residue burning; kg C, biogenic" in this dataset.
Exchange "2,4-D-2bdf9967-6dae-4183-88d1-8f612548c51e low population density" was originally named: "2,4-D; broadcast by air; kg AI" in this dataset.
Exchange "Furan-2bdf9967-6dae-4183-88d1-8f612548c51e low population density" was originally named: "Furan; from residue burning; kg C, biogenic" in this dataset.
Exchange "Propane-2bdf9967-6dae-4183-88d1-8f612548c51e low population density" was originally named: "Propane; from residue burning; kg C, biogenic" in this dataset.
Exchange "Phosphorus-c19fb2d9-98eb-4cd3-8761-81b71d8a9a1b unspecified" was originally named: "Phosphorous; from plant uptake; biogenic" in this dataset.
Exchange "Methane-2bdf9967-6dae-4183-88d1-8f612548c51e low population density" was originally named: "Methane; from residue burning; kg C, biogenic" in this dataset.
Exchange "Tribenuron-methyl-2bdf9967-6dae-4183-88d1-8f612548c51e low population density" was originally named: "Tribenuron-methyl; broadcast by air; kg AI" in this dataset.

## Geography
The unit process is assumed to represent production in North Dakota (US State).

## Technology
This process produces spring wheat, excl. durum; at harvest in 1998; at farm; 86%-90% moisture. The process is assumed to represent production in North Dakota (US State). Yields and related inputs and outputs represent a single year of operation, in 1998. This dataset includes consideration of residue burning; soil preparation; planting or sowing; irrigation; application, storage, and transport of fertilizers, manures, liming materials, secondary materials, and pesticides; and harvest. Fate and transport of applications are not included as described in Cooper, J.S., Kahn, E., Noon, M. (2012) LCA Digital Commons Unit Process Data: field crop production Version 1 which is available at https://www.lcacommons.gov/discovery/docs/LCA%20Digital%20Commons%20Unit%20Process%20Data%20final%20updated.pdf

## Time period
Start and end dates match the underlying data obtained from the USDA Agricultural Resource Management Survey (ARMS).
## Parameters
- p2839: 4.99279e-6; = p2253*(p1020+p1022)
- p0219: 38.955
- p2868: 0.000260486; = p2282*(p1020+p1022)
- p2676: 1.37139e-5; = p2285*(p1019+p1021)
- p2987: 0; = p2401*(p1020+p1022)
- p3446: 0; = p3370*p1240
- p1886: 0
- p0868: 0; = IF(p0858+p0864+p0865+p0866+p0867=1;0;IF(p0858+p0864+p0865+p0866+p0867+p0863>1;1-(p0858+p0864+p0865+p0866+p0867);p0863))
- p0481: 0; = SQRT(2)*(IF((2*p0349-1)<0;-1;IF((2*p0349-1)>0;1;0))*SQRT(SQRT((2/(pi()*0.140012289)+LN(1-(2*p0349-1)^2)/2)^2-LN(1-(2*p0349-1)^2)/0.140012289)-(2/(pi()*0.140012289)+LN(1-(2*p0349-1)^2)/2)))
- p2609: 0; = p2413*p1014
- p2667: 0.000749572; = p2276*(p1019+p1021)
- p1693: 0
- p0653: 0; = IF(p0389<0.5;-SQRT(p0007*EXP(p0521^2*p0008)-p0007);SQRT(p0007*EXP(p0521^2*p0008)-p0007))
- p2439: 0.00134395; = p2243*p1014
- p1827: 0
- p0444: 0; = SQRT(2)*(IF((2*p0312-1)<0;-1;IF((2*p0312-1)>0;1;0))*SQRT(SQRT((2/(pi()*0.140012289)+LN(1-(2*p0312-1)^2)/2)^2-LN(1-(2*p0312-1)^2)/0.140012289)-(2/(pi()*0.140012289)+LN(1-(2*p0312-1)^2)/2)))
- p3400: 0; = p3362*p1238
- p1208: 0; = p1205*p0818*p0822/p0801
- p0004: 0.0254
- p2288: 0.00100158; = p2223*p2195
- p1655: 0
- p1231: 0.0121163; = IF(p1221=0;0;p1230*(p1228+p1229))
- p1660: 0
- p1079: 0.03334; = IF(p1071=0;IF(p1073+p1078=1;0;IF(p1073+p1078+p1075>1;1-(p1073+p1078);p1075));0)
- p0611: 0; = IF(p0347<0.5;-SQRT(p0007*EXP(p0479^2*p0008)-p0007);SQRT(p0007*EXP(p0479^2*p0008)-p0007))
- p3470: 0.000473787; = p3375*p1241
- p2786: 0; = p2395*(p1019+p1021)
- p2178: 0.0447242; = (p0895*p0831/(1-p0831))/(p0818)
- p1105: 0.436421
- p1253: 0; = if(p1232>0;0;p0735/100)
- p2020: 1.9783e6; = p2015*p2018*p2019
- p1033: 2.059e-5; = IF(p1012=0;p1027*p0001/(p0818*p0002);0)
- p2931: 5.06819e-6; = p2345*(p1079+p1081)
- p1807: 0
- p3045: 6.34883e-8; = p2264*p1082
- p1882: 0
- p1880: 0
- p3177: 0; = p2396*p1023
- p3166: 0; = p2385*p1082
- p2585: 0; = p2389*p1123
- p3461: 0; = p3366*p1241
- p0884: 0; = IF(p0689=100;0;IF(p0689+p0688>100;100-p0689;p0688))
- p2282: 0.00182426; = p2223*p2188
- p0053: 3.334
- p2642: 1.31709e-6; = p2251*(p1019+p1021)
- p2526: 5.80398e-6; = p2330*p1014
- p2044: 2.6833e-7; = p2015*p2042*p2043/(p0818*1000)
- p0383: 0.5
- p0148: 0
- p3479: 0.03997; = if(p1328+p1330+p1332+p1334+p1336+p1338+p1340+p1342+p1344=0;0;p1334/(p1328+p1330+p1332+p1334+p1336+p1338+p1340+p1342+p1344))
- p1958: 3597
- p0714: 0
- p0809: 0
- p2542: 0.000222579; = p2346*p1073
- p0449: 0; = SQRT(2)*(IF((2*p0317-1)<0;-1;IF((2*p0317-1)>0;1;0))*SQRT(SQRT((2/(pi()*0.140012289)+LN(1-(2*p0317-1)^2)/2)^2-LN(1-(2*p0317-1)^2)/0.140012289)-(2/(pi()*0.140012289)+LN(1-(2*p0317-1)^2)/2)))
- p2588: 0; = p2392*p1123
- p0403: 0.5
- p1128: 0; = if(p1121=0;IF(p1123=1;0;IF(p1123+p1124>1;1-p1123;p1124));0)
- p2833: 0.000119077; = p2247*(p1020+p1022)
- p1000: 0; = IF(p0996+p0999=1;0;IF(p0996+p0999+p0998>1;1-(p0996+p0999);p0998))
- p0442: 0; = SQRT(2)*(IF((2*p0310-1)<0;-1;IF((2*p0310-1)>0;1;0))*SQRT(SQRT((2/(pi()*0.140012289)+LN(1-(2*p0310-1)^2)/2)^2-LN(1-(2*p0310-1)^2)/0.140012289)-(2/(pi()*0.140012289)+LN(1-(2*p0310-1)^2)/2)))
- p2318: 0.000163162; = p2224*p2185
- p1853: 0
- p0185: 30.841
- p2507: 0; = p2311*p1123
- p2954: 0; = p2368*(p1020+p1022)
- p1569: 0
- p1996: 30
- p2189: 0.000889633; = p1053/p0818
- p3420: 0; = p3363*p1239
- p3529: 0; = p1798*p3476
- p2392: 0; = p2233*p2221
- p1038: 0.00623446
- p3389: 0; = p3370*p1234
- p2804: 0; = p2413*(p1019+p1021)
- p1269: 0
- p3016: 0; = p2430*(p1129+p1131)
- p4927: 0; = p1754*p3483
- p0241: 15.274
- p3070: 0; = p2289*p1023
- p0137: 28.624
- p2402: 0; = p2234*p2191
- p0617: 0; = IF(p0353<0.5;-SQRT(p0007*EXP(p0485^2*p0008)-p0007);SQRT(p0007*EXP(p0485^2*p0008)-p0007))
- p1333: 0.000453277; = p1332*p0001/(p0818*p0002)
- p3745: 1.11295e-6; = p1808*p3477
- p3077: 0; = p2296*p1023
- p2461: 0.000408957; = p2265*p1073
- p3076: 0; = p2295*p1023
- p0978: 6.7e6; = p0801
- p2677: 0.000110982; = p2286*(p1019+p1021)
- p4513: 0; = p1962*p3480
- p2930: 4.84678e-7; = p2344*(p1079+p1081)
- p2992: 0; = p2406*(p1020+p1022)
- p1961: 0.5
- p1928: 0
- p1941: 0
- p0912: 0
- p2784: 0; = p2393*(p1019+p1021)
- p3896: 2.24385e-5; = p1963*p3477
- p0736: 0
- p0828: 0; = if(p0827=0;0;p0819-p0827/p0818)
- p1221: 0.0583196
- p3324: 0; = if(and(p1232=0;p3255<>0);p3266*(p3279*(p3284*p1256+p3286*(p1253+p1257)+p1258*p3288+p3299*p3287));0)
- p0237: 5.271
- p1100: 0.261145
- p1617: 0
- p2157: 2.52595e-7; = p2015*p2086*p2119/(p0818*1000)
- p0592: 0; = IF(p0328<0.5;-SQRT(p0007*EXP(p0460^2*p0008)-p0007);SQRT(p0007*EXP(p0460^2*p0008)-p0007))
- p3269: 0.851786
- p1075: 0.03334; = IF(p1071=0;p0713/100;0)
- p0748: 33.22; = p0088*(1+p0616*p0220/100)
- p1696: 0
- p2095: 0.765734
- p0917: 1.19669
- p3316: 0; = if(and(p1232=0;p3253<>0);1-(p3312+p3313+p3314+p3315);0)
- p1906: 0
- p2401: 0; = p2234*p2190
- p2235: 0; = 1-(p2226+p2227+p2228+p2229)
- p1011: 0; = p1010*p0001*p0004/(p0818*p0002)
- p2455: 0.000361356; = p2259*p1073
- p3093: 0; = p2312*p1132
- p2749: 0; = p2358*(p1019+p1021)
- p2579: 0; = p2383*p1073
- p1845: 0
- p1306: 0; = p1302*p1252/p0818
- p1094: 6.89573e-7; = IF(p1071=0;p1088*p0001/(p0818*p0002);0)
- p2073: 0.377647
- p0976: 0; = IF(p0687=0;IF(OR(p0686=0;p0689=0);0;p0686*1000*p0689/100);0)
- p1907: 0
- p3111: 0; = p2330*p1023
- p1971: 0.000464677; = p1966*p0001/(p0818*p0002)
- p1044: 0.00623446; = IF(p1012=0;IF(p1037=1;0;IF(p1037+p1038>1;1-p1037;p1038));0)
- p3151: 0; = p2370*p1023
- p2616: 0; = p2420*p1073
- p1167: 0.5
- p4910: 0; = p1943*p3482
- p0852: 0; = p0847*p0851^3+p0848*p0851^2+p0849*p0851+p0850
- p3476: 0; = if(p1328+p1330+p1332+p1334+p1336+p1338+p1340+p1342+p1344=0;0;p1328/(p1328+p1330+p1332+p1334+p1336+p1338+p1340+p1342+p1344))
- p2411: 0; = p2234*p2201
- p3012: 0; = p2426*(p1079+p1081)
- p2487: 1.12308e-5; = p2291*p1014
- p2298: 0.000412904; = p2227*p2205
- p2809: 0; = p2418*(p1078+p1080)
- p2215: 0.00135656; = p1117-p2214
- p0919: 0.330928; = p0678*1000/p0801
- p0043: 6699.91
- p3348: 0.00443516; = if(and(p1232=0;p3256<>0);p3276*p3289;0)
- p0412: 0; = SQRT(2)*(IF((2*p0280-1)<0;-1;IF((2*p0280-1)>0;1;0))*SQRT(SQRT((2/(pi()*0.140012289)+LN(1-(2*p0280-1)^2)/2)^2-LN(1-(2*p0280-1)^2)/0.140012289)-(2/(pi()*0.140012289)+LN(1-(2*p0280-1)^2)/2)))
- p0877: 0; = p0876*p0001*p0003/(p0818*p0002)
- p3481: 0.50671; = if(p1328+p1330+p1332+p1334+p1336+p1338+p1340+p1342+p1344=0;0;p1338/(p1328+p1330+p1332+p1334+p1336+p1338+p1340+p1342+p1344))
- p1095: 1.66876e8; = IF(p1071=0;p0797*p0702*1000*p0798/100;0)
- p3178: 0; = p2397*p1023
- p5337: 5.37353e-7; = p1962*p3484
- p1118: 0.00117867; = IF(p1071=0;p1108/(p1113*p0818);0)
- p1180: 2.58273e-8; = p1176*p1179/p0818
- p1197: 1.806
- p3231: 5.16547e-8; = p1176/p0818
- p2316: 0.000625564; = p2224*p2183
- p0972: 0; = p0969/p0818
- p0544: 0; = IF(p0280<0.5;-SQRT(p0007*EXP(p0412^2*p0008)-p0007);SQRT(p0007*EXP(p0412^2*p0008)-p0007))
- p2942: 0; = p2356*(p1020+p1022)
- p2933: 3.38876e-5; = p2347*(p1079+p1081)
- p0306: 0.5
- p1574: 0
- p2501: 1.95241e-6; = p2305*p1073
- p1679: 0
- p3038: 0; = p2257*p1023
- p3263: 0.0214527
- p2114: 0.832356
- p3289: 0.05
- p3343: 0; = if(and(p1232=0;p3254<>0);IF((p3339+p3340+p3341+p3342)+(p3254*(p3269*(1-p3277))/p3338)>p3254;p3254-(p3339+p3340+p3341+p3342);p3254*(p3269*(1-p3277))/p3338);0)
- p1311: 0; = IF(p1307+p1310=p1266;0;IF(p1307+p1310+p1309>p1266;p1266-(p1307+p1310);p1309))
- p0106: 69.936
- p2826: 4.60461e-5; = p2240*(p1020+p1022)
- p2974: 0; = p2388*(p1079+p1081)
- p0175: 0
- p1676: 0
- p0152: 0
- p1726: 0
- p1839: 0
- p2294: 0.00131747; = p2223*p2201
- p2980: 0; = p2394*(p1020+p1022)
- p1844: 0
- p3138: 0; = p2357*p1023
- p0738: 6699.91; = p0078*(1+p0606*p0210/100)
- p0799: 6.845; = p0139*(1+p0667*p0271/100)
- p1743: 0
- p1931: 0
- p0785: 6.683; = p0125*(1+p0653*p0257/100)
- p0776: 25.941; = p0116*(1+p0644*p0248/100)
- p3119: 1.38217e-6; = p2338*p1082
- p0178: 35.918
- p1887: 0
- p3674: 0; = p1943*p3476
- p0214: 3.339
- p1855: 1.64931e-5; = p1447*1000/p0818
- p0915: 0.0170129; = p0914/p0818
- p3267: 0.0170629
- p2034: 1.78699e-5; = p2015*p2030*p2032/(p0818*1000)
- p2074: 0.025
- p0793: 0
- p3123: 3.6887e-7; = p2342*p1082
- p3338: 0; = if(and(p1232=0;p3254<>0);1-(p3334+p3335+p3336+p3337);0)
- p1112: 0.209482
- p0009: 41.3071
- p1181: 0.00013981
- p5128: 0; = p1955*p3483
- p1792: 0
- p0743: 0.389; = p0083*(1+p0611*p0215/100)
- p0850: 0
- p1037: 0.375071
- p2601: 0; = p2405*p1014
- p0042: 6699.91
- p2824: 0.000176541; = p2238*(p1020+p1022)
- p3126: 2.55386e-7; = p2345*p1082
- p1692: 0
- p2867: 2.03621e-5; = p2281*(p1020+p1022)
- p2231: 0; = if(p0783*p0787+p0784*p0788+p0785*p0789+p0786*p0790=0;0;p0788*p0784/(p0783*p0787+p0784*p0788+p0785*p0789+p0786*p0790))
- p0085: 19380.1
- p2224: 0.203607; = if(p0765*p0769+p0766*p0770+p0767*p0771+p0768*p0772=0;0;p0771*p0767/(p0765*p0769+p0766*p0770+p0767*p0771+p0768*p0772))
- p1815: 0
- p1082: 0.00168; = IF(p1071=0;IF(p1073+p1078+p1079+p1080+p1081=1;0;1-(p1073+p1078+p1079+p1080+p1081));0)
- p1832: 0
- p0677: 0
- p3326: 0; = if(and(p1232=0;p3255<>0);p3268*p3289;0)
- p4428: 0; = p1873*p3480
- p1291: 0; = IF(p1287+p1290=p1264;0;IF(p1287+p1290+p1289>p1264;p1264-(p1287+p1290);p1289))
- p0860: 0; = p0672*1000/p0856
- p0044: 97.367
- p0810: 0
- p3169: 0; = p2388*p1082
- p1784: 0
- p2714: 2.81828e-5; = p2323*(p1019+p1021)
- p1137: 0; = if(p1121=0;p1131*(p0716/100)*p0703*1000;0)
- p1336: 0; = p1323*p0801
- p3315: 0; = if(and(p1232=0;p3253<>0);p3264*p3289;0)
- p2802: 0; = p2411*(p1019+p1021)
- p2469: 0; = p2273*p1123
- p3401: 0; = p3363*p1238
- p2336: 0.0028091; = p2228*p2204
- p1685: 0
- p1728: 0
- p1866: 0
- p1682: 0
- p2801: 0; = p2410*(p1019+p1021)
- p3129: 1.48926e-7; = p2348*p1082
- p0764: 97.367; = p0104*(1+p0632*p0236/100)
- p2110: 0.856281
- p2512: 0.000451207; = p2316*p1014
- p3036: 0; = p2255*p1023
- p2889: 1.1897e-6; = p2303*(p1079+p1081)
- p3061: 0; = p2280*p1023
- p3335: 0; = IF(or(p3254=0;p1232>0);0;p3270*(p3280*(p3283*p1256+p3286*(p1253+p1257)+p1258*p3288+p3300*p3287)))
- p2894: 5.50744e-6; = p2308*(p1079+p1081)
- p2395: 0; = p2234*p2184
- p3162: 0; = p2381*p1082
- p0211: 7.545
- p1691: 0
- p1561: 0
- p2070: 0.282
- p5109: 0; = p1936*p3483
- p2733: 3.04339e-5; = p2342*(p1078+p1080)
- p2361: 0; = p2225*p2189
- p0969: 0
- p2726: 0.000152702; = p2335*(p1019+p1021)
- p3280: 0.375
- p0248: 6.21
- p3298: 0; = if(p1283+p1284+p1285+p1286=0;0;p1283/(p1283+p1284+p1285+p1286))
- p0824: 0.863
- p2523: 0.000373342; = p2327*p1014
- p0830: 1.27503e10; = p0825*p0821*p0824
- p2803: 0; = p2412*(p1019+p1021)
- p3165: 0; = p2384*p1082
- p1588: 0
- p2901: 0.000406922; = p2315*(p1020+p1022)
- p2345: 0.000152015; = p2228*p2213
- p0730: 95.7; = p0070*(1+p0598*p0202/100)
- p0453: 0; = SQRT(2)*(IF((2*p0321-1)<0;-1;IF((2*p0321-1)>0;1;0))*SQRT(SQRT((2/(pi()*0.140012289)+LN(1-(2*p0321-1)^2)/2)^2-LN(1-(2*p0321-1)^2)/0.140012289)-(2/(pi()*0.140012289)+LN(1-(2*p0321-1)^2)/2)))
- p1274: 0; = p1270*p1252/p0818
- p0955: 0; = if(and(p0683>0;or(p0807=56;p0807=100;and(p0807=60;p0901>0.06)));p0937;0)
- p0020: 1599.67
- p2447: 6.98882e-6; = p2251*p1014
- p3306: 1.11212e8; = if(and(p1232=0;p3252<>0);p3252*(p3257*p3277-p3301)/p3305;0)
- p3035: 0; = p2254*p1023
- p2647: 2.63256e-5; = p2256*(p1019+p1021)
- p1051: 2.94816e6; = IF(p1012=0;p1044*p1036;0)
- p1748: 0
- p2596: 0; = p2400*p1014
- p2348: 8.86467e-5; = p2228*p2216
- p1783: 0
- p0111: 85.009
- p2873: 0.000667172; = p2287*(p1020+p1022)
- p0282: 0.5
- p3214: 0.376406; = p1222*40.078/100.0869
- p1345: 1.37402e-5; = IF(p1318=0;p1344*p0001/(p0818*p0002);0)
- p2711: 1.00174e-5; = p2320*(p1019+p1021)
- p1042: 0.000645242
- p2795: 0; = p2404*(p1019+p1021)
- p1564: 0
- p2861: 0; = p2275*(p1129+p1131)
- p1227: 0.000471718; = IF(p1221=0;0;p1226*p0001/(p0818*p0002))
- p1305: 0; = p1301*p1252/p0818
- p1022: 0.09006; = IF(p1012=0;IF(p1014+p1019+p1020+p1021=1;0;IF(p1014+p1019+p1020+p1021+p1018>1;1-(p1014+p1019+p1020+p1021);p1018));0)
- p2734: 0.000398544; = p2343*(p1078+p1080)
- p1993: 400
- p2139: 1.66819e-6; = p2015*p2067*p2101/(p0818*1000)
- p3355: 923679; = if(and(p1232=0;p3256<>0);p3256-(p3350+p3351+p3352+p3353+p3354);0)
- p3278: 0.46
- p0879: 0; = p0878*p0001*p0003/(p0818*p0002)
- p0135: 72.489
- p5338: 2.03472e-6; = p1963*p3484
- p3201: 0; = p2420*p1082
- p2494: 0.000341211; = p2298*p1073
- p3091: 2.16925e-7; = p2310*p1082
- p0979: 0; = IF(p0976=0;0;p0976*p0001/(p0818*p0002))
- p2948: 0; = p2362*(p1020+p1022)
- p1204: 0.980791
- p2016: 0.000956079; = (p2014-p2015)/(p0818)
- p0448: 0; = SQRT(2)*(IF((2*p0316-1)<0;-1;IF((2*p0316-1)>0;1;0))*SQRT(SQRT((2/(pi()*0.140012289)+LN(1-(2*p0316-1)^2)/2)^2-LN(1-(2*p0316-1)^2)/0.140012289)-(2/(pi()*0.140012289)+LN(1-(2*p0316-1)^2)/2)))
- p1704: 0
- p2519: 0.000149545; = p2323*p1014
- p0729: 0
- p3321: 0; = if(and(p1232=0;p3253<>0);IF((p3317+p3318+p3319+p3320)+(p3253*(p3261*(1-p3277))/p3316)>p3253;p3253-(p3317+p3318+p3319+p3320);p3253*(p3261*(1-p3277))/p3316);0)
- p0692: 0
- p3265: 0.696292
- p3037: 0; = p2256*p1023
- p3009: 0; = p2423*(p1079+p1081)
- p2250: 0.0101125; = p2222*p2196
- p0833: 1.47744e10; = p0830+p0832
- p1024: 4.70527e6; = IF(p1012=0;p1014*(p0704/100)*p0703*1000;0)
- p2618: 0; = p2422*p1073
- p2529: 0.00049109; = p2333*p1014
- p2572: 0; = p2376*p1073
- p1604: 0.92902
- p2827: 0.000144506; = p2241*(p1020+p1022)
- p1698: 0
- p1171: 0.000471718; = p0801*p0001/(p0818*p0002)
- p2214: 0.000359478; = p1107/p0818
- p2660: 2.42488e-5; = p2269*(p1078+p1080)
- p4292: 1.5771e-8; = p1943*p3479
- p1798: 2.44634e-6; = p1390*1000/p0818
- p0399: 0.5
- p3359: 1.20828e7; = if(p1232=0;p3309+p3320+p3331+p3342+p3353;0)
- p3261: 0.908439
- p0882: 6.7e6; = p0869*p0856
- p2911: 6.02491e-5; = p2325*(p1020+p1022)
- p3281: 0.46
- p3422: 0; = p3365*p1239
- p2082: 0.285294
- p0981: 0.000471718; = p0978*p0001/(p0818*p0002)
- p2640: 0.000139058; = p2249*(p1019+p1021)
- p1187: 0.00025142
- p0872: 0; = p0864*p0856
- p1020: 0.05273; = IF(p1012=0;IF(p1014+p1019=1;0;IF(p1014+p1019+p1016>1;1-(p1014+p1019);p1016));0)
- p1049: 0.209016; = IF(p1012=0;IF(p1037+p1044+p1045+p1046+p1047+p1048=1;0;1-(p1037+p1044+p1045+p1046+p1047+p1048));0)
- p3206: 0; = p2425*p1082
- p1905: 0
- p3681: 0; = p1950*p3476
- p3057: 0; = p2276*p1023
- p2656: 6.85958e-5; = p2265*(p1078+p1080)
- p3090: 2.42037e-8; = p2309*p1082
- p0710: 87.015; = p0050*(1+p0578*p0182/100)
- p2287: 0.0046724; = p2223*p2193
- p1745: 0
- p0992: 0; = p0988*p0001*p0004/(p0818*p0002)
- p1909: 0
- p2324: 5.21389e-5; = p2224*p2191
- p2705: 0; = p2314*(p1128+p1130)
- p2441: 0.000295562; = p2245*p1014
- p1619: 0
- p3149: 0; = p2368*p1023
- p2924: 2.74294e-5; = p2338*(p1079+p1081)
- p1175: 9.76968e-5
- p2456: 0.000117016; = p2260*p1073
- p1302: 0; = IF(p1297+p1300+p1301=p1262;0;p1262-(p1297+p1300+p1301))
- p2166: 0.529776; = p2165*p0824
- p2284: 0.000401193; = p2223*p2190
- p1565: 0
- p2606: 0; = p2410*p1014
- p3339: 0; = if(and(p1232=0;p3254<>0);p3254*(p3269*p3277-p3334)/p3338;0)
- p1953: 0
- p1813: 0
- p2967: 0; = p2381*(p1079+p1081)
- p1198: 0.44
- p0270: 5.076
- p2234: 0; = 1-(p2222+p2223+p2224+p2225)
- p0591: 0; = IF(p0327<0.5;-SQRT(p0007*EXP(p0459^2*p0008)-p0007);SQRT(p0007*EXP(p0459^2*p0008)-p0007))
- p0691: 0
- p2562: 0; = p2366*p1014
- p3224: 0.501945; = IF(p3216=0;0;1-p3221-p3222-p3223)
- p2989: 0; = p2403*(p1020+p1022)
- p1749: 0
- p2406: 0; = p2234*p2196
- p0089: 3.997
- p2247: 0.00083393; = p2222*p2192
- p2313: 0; = p2231*p2220
- p2218: 0.000542411; = p1150/p0818
- p0113: 87.015
- p4840: 0; = p1873*p3482
- p1869: 0
- p3302: 0.0114097; = if(and(p1232=0;p3252<>0);p3258*(p3278*(p3282*p1256+p3286*(p1253+p1257)+p1258*p3288+p3297*p3287));0)
- p0719: 0
- p2265: 0.000494884; = p2226*p2211
- p3274: 0.0768939
- p0595: 0; = IF(p0331<0.5;-SQRT(p0007*EXP(p0463^2*p0008)-p0007);SQRT(p0007*EXP(p0463^2*p0008)-p0007))
- p2201: 0.00334399; = 12.01*p2200/(2*14.0067)
- p0608: 0; = IF(p0344<0.5;-SQRT(p0007*EXP(p0476^2*p0008)-p0007);SQRT(p0007*EXP(p0476^2*p0008)-p0007))
- p0861: 0; = p0673*1000/p0856
- p3175: 0; = p2394*p1023
- p1071: 0
- p2263: 8.75254e-5; = p2226*p2209
- p5187: 1.00923e-7; = p1808*p3484
- p1339: 0.00069139; = p1338*p0001/(p0818*p0002)
- p0855: 1.35878; = p0854*p0001*p0003/(p0818*p0002)
- p0016: 609.468
- p2407: 0; = p2234*p2197
- p1060: 0.21
- p2305: 2.36264e-6; = p2227*p2212
- p2136: 3.4898e-6; = p2015*p2064*p2098/(p0818*1000)
- p0316: 0.5
- p0783: 0
- p4765: 0; = p1798*p3482
- p2610: 0; = p2414*p1073
- p0280: 0.5
- p3319: 0; = if(and(p1232=0;p3253<>0);p3253*(p3263-p3314)/p3316;0)
- p2437: 0.000729949; = p2241*p1014
- p1987: 400
- p3275: 0.0214527
- p0986: 0; = IF(p0982+p0985=1;0;IF(p0982+p0985+p0984>1;1-(p0982+p0985);p0984))
- p2639: 0.000648706; = p2248*(p1019+p1021)
- p3051: 2.56326e-8; = p2270*p1082
- p1621: 0
- p2159: 1.07632e-5; = p2015*p2083*p2121/(p0818*1000)
- p3056: 0; = p2275*p1132
- p2779: 0; = p2388*(p1078+p1080)
- p2694: 4.94615e-6; = p2303*(p1078+p1080)
- p1270: 0; = IF(p1267=p1259;0;IF(p1267+p1268>p1259;p1259-p1267;p1268))
- p3394: 0; = p3375*p1234
- p1296: 0; = p1292*p1252/p0818
- p0129: 97.503
- p2351: 0.000764371; = p2232*p2219
- p1954: 0
- p3007: 0; = p2421*(p1079+p1081)
- p2946: 0; = p2360*(p1020+p1022)
- p2084: 0.21
- p0635: 0; = IF(p0371<0.5;-SQRT(p0007*EXP(p0503^2*p0008)-p0007);SQRT(p0007*EXP(p0503^2*p0008)-p0007))
- p2533: 0.00209949; = p2337*p1073
- p3337: 0; = IF(or(p3254=0;p1232>0);0;p3272*p3289)
- p4335: 0; = p1780*p3480
- p2412: 0; = p2234*p2202
- p2853: 8.72317e-7; = p2267*(p1079+p1081)
- p4541: 7.91734e-6; = p1780*p3481
- p0815: 0
- p3040: 7.34632e-7; = p2259*p1082
- p5252: 1.21504e-6; = p1873*p3484
- p2951: 0; = p2365*(p1020+p1022)
- p2386: 0; = p2229*p2215
- p0870: 0; = p0858*p0856
- p3106: 0; = p2325*p1023
- p2493: 0.000377269; = p2297*p1073
- p3196: 0; = p2415*p1082
- p1016: 0.05273; = IF(p1012=0;p0707/100;0)
- p3239: 0.013074; = IF(p3238+p3235+p3236=1;0;1-(p3238+p3235+p3236))
- p1766: 0
- p2321: 0.00094276; = p2224*p2188
- p0643: 0; = IF(p0379<0.5;-SQRT(p0007*EXP(p0511^2*p0008)-p0007);SQRT(p0007*EXP(p0511^2*p0008)-p0007))
- p3439: 0; = p3363*p1240
- p1990: 30
- p1711: 0
- p1876: 0
- p1125: 0; = if(p1121=0;p0719/100;0)
- p2371: 0; = p2225*p2200
- p3362: 0; = if(p1232=0;p3244*p3356/p0818;0)
- p1251: 2.39063e-6; = if(p1232>0;0;p1246*p0001/(p0818*p0002))
- p5008: 0; = p1835*p3483
- p1327a: 0.029128; = (p0745*1000/p0801)*(1-(p0746+p0747+p0748+p0749+p0750+p0751+p0752+p0753)/100)+(p0754*1000/p0801)*(1-(p0755+p0756+p0757+p0758+p0759+p0760+p0761+p0762)/100)
- p1106: 245864; = IF(p1071=0;p1105*p1096*p1095;0)
- p0199: 81.653
- p3182: 0; = p2401*p1023
- p0393: 0.5
- p0479: 0; = SQRT(2)*(IF((2*p0347-1)<0;-1;IF((2*p0347-1)>0;1;0))*SQRT(SQRT((2/(pi()*0.140012289)+LN(1-(2*p0347-1)^2)/2)^2-LN(1-(2*p0347-1)^2)/0.140012289)-(2/(pi()*0.140012289)+LN(1-(2*p0347-1)^2)/2)))
- p2950: 0; = p2364*(p1020+p1022)
- p2725: 1.33199e-5; = p2334*(p1019+p1021)
- p2756: 0; = p2365*(p1019+p1021)
- p2817: 0; = p2426*(p1078+p1080)
- p2362: 0; = p2225*p2190
- p3244: 0; = p0791/100
- p2545: 0.000656545; = p2349*p1073
- p2484: 0.000722422; = p2288*p1014
- p2650: 6.06115e-5; = p2259*(p1078+p1080)
- p3055: 0; = p2274*p1132
- p1949: 0
- p2259: 0.000437281; = p2226*p2205
- p3041: 2.37893e-7; = p2260*p1082
- p3053: 0; = p2272*p1132
- p1026: 343984; = IF(p1012=0;p1020*(p0704/100)*p0703*1000;0)
- p1707: 0
- p0807: 60
- p2781: 0; = p2390*(p1128+p1130)
- p2912: 0.000344789; = p2326*(p1020+p1022)
- p3418: 0.0898135; = p3380*p1238
- p2292: 3.42337e-5; = p2223*p2199
- p3452: 0; = p3376*p1240
- p1858: 0
- p1963c: 1.1111e-5; = p1588*p1792+p1589*p1793+p1590*p1794+p1591*p1795+p1592*p1796+p1593*p1797+p1594*p1798+p1595*p1799+p1596*p1800+p1597*p1801+p1598*p1802+p1599*p1803+p1600*p1804+p1601*p1805+p1602*p1806+p1603*p1807+p1604*p1808+p1605*p1809+p1606*p1810+p1607*p1811
- p1262: 0; = if(p1232>0;0;p0733/100)
- p0402: 0.5
- p1782: 0
- p3067: 0; = p2286*p1023
- p2557: 0; = p2361*p1014
- p0735: 0
- p2936: 0; = p2350*(p1129+p1131)
- p1746: 0.615605
- p1922: 0
- p3044: 1.47043e-7; = p2263*p1082
- p0639: 0; = IF(p0375<0.5;-SQRT(p0007*EXP(p0507^2*p0008)-p0007);SQRT(p0007*EXP(p0507^2*p0008)-p0007))
- p3292: 0.258
- p1074: 0.13861; = IF(p1071=0;p0712/100;0)
- p3013: 0; = p2427*(p1079+p1081)
- p2217: 0.00106036; = p1118-p2216
- p1626: 0
- p2347: 0.00101642; = p2228*p2215
- p1923: 0
- p2597: 0; = p2401*p1014
- p2979: 0; = p2393*(p1020+p1022)
- p0907: 0
- p3102: 0; = p2321*p1023
- p3058: 0; = p2277*p1023
- p2322: 0.000181135; = p2224*p2189
- p0728: 0
- p1008: 0; = p1004*p0001*p0004/(p0818*p0002)
- p3313: 0; = if(and(p1232=0;p3253<>0);p3262*(p3278*(p3282*p1256+p3286*(p1253+p1257)+p1258*p3288+p3298*p3287));0)
- p0756: 0
- p1968: 0; = if(p0807=480;p0802*p0811;0)
- p0889: 0; = 1000*p0888*p0001*p0003*p0004/(p0818*p0002)
- p1633: 0
- p2398: 0; = p2234*p2187
- p2917: 2.52619e-6; = p2331*(p1020+p1022)
- p2132: 1.51328e-6; = p2015*p2060*p2094/(p0818*1000)
- p2064: 0.676706
- p2925: 0.000227744; = p2339*(p1079+p1081)
- p3978: 4.48281e-6; = p1835*p3478
- p1535: 5
- p1045: 0.0673925; = IF(p1012=0;IF(p1037+p1044=1;0;IF(p1037+p1044+p1039>1;1-(p1037+p1044);p1039));0)
- p0344: 0.5
- p1191: 0.5
- p1064: 0.017069; = IF(p1012=0;p1050/(p1057*p0818);0)
- p3396: 0; = p3377*p1234
- p1778: 0
- p1056: 9.884e7; = IF(p1012=0;p1049*p1036;0)
- p1575: 0
- p3210: 0; = p2429*p1132
- p3430: 0; = p3373*p1239
- p0136: 97.367
- p1814: 0
- p3094: 0; = p2313*p1132
- p0005: 1.60934
- p3234: 0.39606; = 1-p3233
- p0749: 3.997; = p0089*(1+p0617*p0221/100)
- p1207: 161.25; = if(p1193>0;0;(p1194*p1050/p1057+p1195*p1051/p1058+p1196*p1052/p1059+p1197*p1053/p1060+p1198*p1054/p1061+p1199*p1055/p1062+p1200*p1056/p1063)/(p0702*1000)+(p1201*p1109/p1114+p1202*p1110/p1115)/(p0702*1000)+p1203*p1170/p0801+p1204*p1176/p0801)
- p1293: 0; = p1287*p1252/p0818
- p0511: 0; = SQRT(2)*(IF((2*p0379-1)<0;-1;IF((2*p0379-1)>0;1;0))*SQRT(SQRT((2/(pi()*0.140012289)+LN(1-(2*p0379-1)^2)/2)^2-LN(1-(2*p0379-1)^2)/0.140012289)-(2/(pi()*0.140012289)+LN(1-(2*p0379-1)^2)/2)))
- p0418: 0; = SQRT(2)*(IF((2*p0286-1)<0;-1;IF((2*p0286-1)>0;1;0))*SQRT(SQRT((2/(pi()*0.140012289)+LN(1-(2*p0286-1)^2)/2)^2-LN(1-(2*p0286-1)^2)/0.140012289)-(2/(pi()*0.140012289)+LN(1-(2*p0286-1)^2)/2)))
- p0309: 0.5
- p2772: 0; = p2381*(p1078+p1080)
- p1332: 6.43807e6; = p1321*p0801
- p1812: 0
- p1630: 0
- p1135: 0; = if(p1121=0;p1129*(p0716/100)*p0703*1000;0)
- p1069: 0.000150491; = IF(p1012=0;p1055/(p1062*p0818);0)
- p4505: 0; = p1950*p3480
- p1706: 0
- p2451: 0.000970595; = p2255*p1014
- p0998: 0; = if(p0888=0;0;if((p0699*p0698*1000*p0700/100)/p0888>1;1;(p0699*p0698*1000*p0700/100)/p0888))
- p1047: 0.317801; = IF(p1012=0;IF(p1037+p1044+p1045+p1046=1;0;IF(p1037+p1044+p1045+p1046+p1041>1;1-(p1037+p1044+p1045+p1046);p1041));0)
- p3453: 0; = p3377*p1240
- p2192: 0.00207234; = p1067-p2189-p2190-p2191
- p2083: 2.17294
- p5046: 0; = p1873*p3483
- p2378: 0; = p2229*p2207
- p2887: 6.09322e-6; = p2301*(p1079+p1081)
- p1063: 0.455
- p3325: 0; = if(and(p1232=0;p3255<>0);p3267*p3289;0)
- p2438: 0.000105056; = p2242*p1014
- p0535: 0; = SQRT(2)*(IF((2*p0403-1)<0;-1;IF((2*p0403-1)>0;1;0))*SQRT(SQRT((2/(pi()*0.140012289)+LN(1-(2*p0403-1)^2)/2)^2-LN(1-(2*p0403-1)^2)/0.140012289)-(2/(pi()*0.140012289)+LN(1-(2*p0403-1)^2)/2)))
- p0760: 0
- p2914: 0.000730598; = p2328*(p1020+p1022)
- p0382: 0.5
- p0754: 0
- p3015: 0; = p2429*(p1129+p1131)
- p1132: 0.00744; = if(p1121=0;IF(p1123+p1128+p1129+p1130+p1131=1;0;1-(p1123+p1128+p1129+p1130+p1131));0)
- p3285: 0.275
- p1212: 0.021728; = if(p1211=0;0;if(p1193>0;0;(p1207+p1208+p1209)*p1210/(2000*p1211)))
- p3235: 0.118093
- p1873: 0.00012066; = p1465*1000/p0818
- p2648: 0.000301802; = p2257*(p1019+p1021)
- p1567: 0
- p3254: 0; = p1252*(p1287*(1-p3247)+p1290*(1-p3248)+p1291*(1-p3249)+p1292*(1-p3250))
- p2900: 0; = p2314*(p1129+p1131)
- p2576: 0; = p2380*p1073
- p2566: 0; = p2370*p1014
- p0284: 0.5
- p1963j: 3.16646e-6; = p1725*p1929+p1726*p1930+p1727*p1931+p1728*p1932+p1729*p1933+p1730*p1934+p1731*p1935+p1732*p1936+p1733*p1937+p1734*p1938+p1735*p1939+p1736*p1940+p1737*p1941+p1738*p1942+p1739*p1943+p1740*p1944+p1741*p1945+p1742*p1946+p1743*p1947
- p1713: 0
- p2425: 0; = p2235*p2215
- p2560: 0; = p2364*p1014
- p2391: 0; = p2233*p2220
- p1241: 0.44929; = if(p1232>0;0;IF(p1234+p1238+p1239+p1240=1;0;1-(p1234+p1238+p1239+p1240)))
- p2922: 9.36555e-5; = p2336*(p1079+p1081)
- p1871: 0
- p0914: 2.15587e8; = p0825*p0911+(p0830+p0895)*p0824*p0913
- p1194: 1.48
- p3456: 0; = p3380*p1240
- p0310: 0.5
- p0831: 0.137; = 1-p0824
- p1099: 0.652345
- p3397: 0; = p3378*p1234
- p3097: 0; = p2316*p1023
- p1759: 0
- p2515: 0.000369331; = p2319*p1014
- p1226: 6.7e6; = IF(p1221=0;0;IF(p1193=0;p0801;0))
- p2027: 0.428799
- p0933: 64631; = p0801*p0927
- p0002: 0.453592
- p0371: 0.5
- p0772: 0
- p2238: 0.00123637; = p2222*p2183
- p2113: 0.832356
- p2143: 8.07735e-7; = p2015*p2071*p2105/(p0818*1000)
- p2134: 1.10318e-5; = p2015*p2062*p2096/(p0818*1000)
- p0676: 609.468; = p0016*(1+p0544*p0148/100)
- p1427: 171
- p1963d: 0; = p1608*p1812+p1609*p1813+p1610*p1814+p1611*p1815+p1612*p1816+p1613*p1817+p1614*p1818+p1615*p1819+p1616*p1820+p1617*p1821+p1618*p1822+p1619*p1823+p1620*p1824+p1621*p1825+p1622*p1826+p1623*p1827+p1624*p1828+p1625*p1829+p1626*p1830+p1627*p1831
- p0701: 0
- p2940: 0; = p2354*(p1020+p1022)
- p2892: 8.23688e-7; = p2306*(p1079+p1081)
- p1607: 0
- p3186: 0; = p2405*p1023
- p2308: 0.00016519; = p2227*p2215
- p2814: 0; = p2423*(p1078+p1080)
- p1787: 0
- p3157: 0; = p2376*p1082
- p2735: 2.01503e-6; = p2344*(p1078+p1080)
- p2254: 0.00313875; = p2222*p2200
- p3352: 317057; = if(and(p1232=0;p3256<>0);p3256*(p3275-p3347)/p3349;0)
- p1238: 0.55071; = if(p1232>0;0;IF(p1234=1;0;IF(p1234+p1235>1;1-p1234;p1235)))
- p1776: 0
- p1717: 0
- p0988: 0; = p0982*p0886
- p0154: 0
- p1837: 0
- p0051: 82.637
- p3124: 4.83049e-6; = p2343*p1082
- p1571: 0
- p1281: 0; = IF(p1277+p1280=p1263;0;IF(p1277+p1280+p1279>p1263;p1263-(p1277+p1280);p1279))
- p1111: 0.0872841
- p2427: 0; = p2235*p2217
- p1921: 0
- p2913: 7.39096e-5; = p2327*(p1020+p1022)
- p1335: 5.45378e-5; = p1334*p0001/(p0818*p0002)
- p1218: 0
- p1035: 0; = IF(p1012=0;p1029*p0001/(p0818*p0002);0)
- p1712: 0
- p1570: 0
- p3089: 2.7752e-7; = p2308*p1082
- p1767: 0
- p2258: 0.000483491; = p2226*p2204
- p0283: 0.5
- p0813: 0; = if(p0807=480;1.56521739130435;0)
- p2888: 2.75543e-6; = p2302*(p1079+p1081)
- p0741: 0.651; = p0081*(1+p0609*p0213/100)
- p1117: 0.00171603; = IF(p1071=0;p1107/(p1112*p0818);0)
- p0847: 0
- p0885: 100; = IF(p0689+p0884=100;0;100-(p0689+p0884))
- p0499: 0; = SQRT(2)*(IF((2*p0367-1)<0;-1;IF((2*p0367-1)>0;1;0))*SQRT(SQRT((2/(pi()*0.140012289)+LN(1-(2*p0367-1)^2)/2)^2-LN(1-(2*p0367-1)^2)/0.140012289)-(2/(pi()*0.140012289)+LN(1-(2*p0367-1)^2)/2)))
- p2611: 0; = p2415*p1073
- p1090: 5.68938e-5; = IF(p1071=0;p1084*p0001/(p0818*p0002);0)
- p0525: 0; = SQRT(2)*(IF((2*p0393-1)<0;-1;IF((2*p0393-1)>0;1;0))*SQRT(SQRT((2/(pi()*0.140012289)+LN(1-(2*p0393-1)^2)/2)^2-LN(1-(2*p0393-1)^2)/0.140012289)-(2/(pi()*0.140012289)+LN(1-(2*p0393-1)^2)/2)))
- p2604: 0; = p2408*p1014
- p2944: 0; = p2358*(p1020+p1022)
- p0314: 0.5
- p3383: 0; = p3364*p1234
- p3069: 0; = p2288*p1023
- p0873: 0; = p0872*p0001*p0003/(p0818*p0002)
- p0688: 0
- p0380: 0.5
- p3200: 0; = p2419*p1082
- p3099: 0; = p2318*p1023
- p1984: 30
- p1595: 0
- p0063: 6699.91
- p2286: 0.000816464; = p2223*p2192
- p3237: 0.854735
- p1594: 0.735896
- p2403: 0; = p2234*p2192
- p2923: 8.47042e-5; = p2337*(p1079+p1081)
- p3363: 0; = if(p1232=0;p3244*p3357/p0818;0)
- p1667: 0
- p3691: 8.22008e-6; = p1754*p3477
- p2742: 0; = p2351*(p1128+p1130)
- p3098: 0; = p2317*p1023
- p3022: 0; = p2241*p1023
- p1133: 1.30873e6; = if(p1121=0;p1123*(p0716/100)*p0703*1000;0)
- p2302: 8.26462e-5; = p2227*p2209
- p1577: 0
- p4410: 0; = p1855*p3480
- p2240: 0.000322474; = p2222*p2185
- p1168: 2.27788e-6; = p1164*p1167/p0818
- p2578: 0; = p2382*p1073
- p3031: 0; = p2250*p1023
- p2049: 25.6942
- p2797: 0; = p2406*(p1019+p1021)
- p1945: 0
- p2834: 0.000681444; = p2248*(p1020+p1022)
- p2902: 8.93243e-5; = p2316*(p1020+p1022)
- p2882: 0.000310393; = p2296*(p1020+p1022)
- p3117: 4.71929e-6; = p2336*p1082
- p2862: 0.0007874; = p2276*(p1020+p1022)
- p0267: 6.691
- p2285: 0.00010089; = p2223*p2191
- p1804: 0
- p5131: 0; = p1962*p3483
- p3171: 0; = p2390*p1132
- p3145: 0; = p2364*p1023
- p2918: 0.000226766; = p2332*(p1020+p1022)
- p1910: 0
- p1769: 0
- p3377: 0.000953505; = if(p1232=0;p3246*p3359/p0818;0)
- p2264: 3.77907e-5; = p2226*p2210
- p2745: 0; = p2354*(p1019+p1021)
- p0770: 40.733; = p0110*(1+p0638*p0242/100)
- p1313: 0; = p1307*p1252/p0818
- p0668: 0; = IF(p0404<0.5;-SQRT(p0007*EXP(p0536^2*p0008)-p0007);SQRT(p0007*EXP(p0536^2*p0008)-p0007))
- p1121: 0
- p1963: 0.000202058; = p1963a+p1963b+p1963c+p1963d+p1963e+p1963f+p1963g+p1963h+p1963i+p1963j+p1963k
- p0352: 0.5
- p2164: 0.00216404; = (p2015/p0818)-(p2022)-(p2035+p2036+p2052)-(p2017/p0818)-(p2039+p2041+p2044+p2158+p2159+p2160+p2161+p2162)
- p2210: 0.00029304; = 6*1.00794*p2208/30.973762
- p0480: 0; = SQRT(2)*(IF((2*p0348-1)<0;-1;IF((2*p0348-1)>0;1;0))*SQRT(SQRT((2/(pi()*0.140012289)+LN(1-(2*p0348-1)^2)/2)^2-LN(1-(2*p0348-1)^2)/0.140012289)-(2/(pi()*0.140012289)+LN(1-(2*p0348-1)^2)/2)))
- p2949: 0; = p2363*(p1020+p1022)
- p0887: 0; = 1000*p0886*p0001*p0003*p0004/(p0818*p0002)
- p1598: 0
- p1891: 0
- p3174: 0; = p2393*p1023
- p3268: 0.0232481
- p2510: 0; = p2314*p1123
- p0483: 0; = SQRT(2)*(IF((2*p0351-1)<0;-1;IF((2*p0351-1)>0;1;0))*SQRT(SQRT((2/(pi()*0.140012289)+LN(1-(2*p0351-1)^2)/2)^2-LN(1-(2*p0351-1)^2)/0.140012289)-(2/(pi()*0.140012289)+LN(1-(2*p0351-1)^2)/2)))
- p3287: 0.745
- p2504: 0.000136508; = p2308*p1073
- p2829: 0.000266058; = p2243*(p1020+p1022)
- p0216: 36.227
- p1170: 3405.35; = p1169*p0801
- p3318: 0; = if(and(p1232=0;p3253<>0);p3253*(p3262-p3313)/p3316;0)
- p2326: 0.00241466; = p2224*p2193
- p1297: 0
- p2978: 0; = p2392*(p1129+p1131)
- p1189: 0.000471718; = p0801*p0001/(p0818*p0002)
- p1573: 0
- p1777: 0
- p3431: 0; = p3374*p1239
- p3195: 0; = p2414*p1082
- p2422: 0; = p2235*p2212
- p2191: 0.000256076; = 8*1.00794*p2189/(2*14.0067)
- p1195: 0.45
- p1688: 0
- p2375: 0; = p2229*p2204
- p2171: 0.0841012; = p2165*p0831
- p3373: 0; = if(p1232=0;p3245*p3361/p0818;0)
- p2724: 9.25492e-5; = p2333*(p1019+p1021)
- p2393: 0; = p2234*p2182
- p2330: 8.04677e-6; = p2224*p2198
- p0666: 0; = IF(p0402<0.5;-SQRT(p0007*EXP(p0534^2*p0008)-p0007);SQRT(p0007*EXP(p0534^2*p0008)-p0007))
- p2223: 0.393983; = if(p0765*p0769+p0766*p0770+p0767*p0771+p0768*p0772=0;0;p0770*p0766/(p0765*p0769+p0766*p0770+p0767*p0771+p0768*p0772))
- p3220: 0.00137383; = p3216*p1228
- p2939: 0; = p2353*(p1129+p1131)
- p1699: 0
- p1043: 0.209016
- p4129: 6.24531e-7; = p1780*p3479
- p4498: 0; = p1943*p3480
- p0348: 0.5
- p1919: 0
- p0751: 50.671; = p0091*(1+p0619*p0223/100)
- p1738: 0
- p3192: 0; = p2411*p1023
- p2332: 0.00158811; = p2224*p2200
- p2569: 0; = p2373*p1014
- p2909: 2.96051e-5; = p2323*(p1020+p1022)
- p2964: 0; = p2378*(p1079+p1081)
- p3215: 0.450791; = p1222*3*15.9994/100.0869
- p1857: 0
- p3471: 9.97617e-5; = p3376*p1241
- p2641: 0.00137459; = p2250*(p1019+p1021)
- p3717: 1.73516e-6; = p1780*p3477
- p4309: 0; = p1754*p3480
- p0778: 8.412; = p0118*(1+p0646*p0250/100)
- p1826: 0
- p1267: 0
- p3810: 1.33993e-5; = p1873*p3477
- p2682: 2.11652e-6; = p2291*(p1019+p1021)
- p0956: 0; = if(and(p0683>0;or(p0807=56;p0807=100;and(p0807=60;p0901>0.06)));p0938;0)
- p2584: 0; = p2388*p1073
- p1260: 0; = if(p1232>0;0;p0731/100)
- p2038: 0.304457
- p2363: 0; = p2225*p2191
- p2041: 2.64994e-6; = p2015*p2040/(p0818*1000)
- p1248: 2.93028e-6; = if(p1232>0;0;p1243*p0001/(p0818*p0002))
- p2652: 0.000162966; = p2261*(p1078+p1080)
- p1631: 0.5
- p1102: 0.020586; = IF(p1071=0;IF(p1096+p1101=1;0;IF(p1096+p1101+p1098>1;1-(p1096+p1101);p1098));0)
- p2293: 0.00307301; = p2223*p2200
- p2699: 2.2897e-5; = p2308*(p1078+p1080)
- p2843: 0.000317033; = p2257*(p1020+p1022)
- p2274: 0; = p2230*p2220
- p3026: 0; = p2245*p1023
- p3139: 0; = p2358*p1023
- p1856: 0
- p2838: 2.27089e-6; = p2252*(p1020+p1022)
- p0512: 0; = SQRT(2)*(IF((2*p0380-1)<0;-1;IF((2*p0380-1)>0;1;0))*SQRT(SQRT((2/(pi()*0.140012289)+LN(1-(2*p0380-1)^2)/2)^2-LN(1-(2*p0380-1)^2)/0.140012289)-(2/(pi()*0.140012289)+LN(1-(2*p0380-1)^2)/2)))
- p0819: 0; = p0808*p0809/p0818
- p1894: 0
- p1139: 9.21422e-5; = if(p1121=0;p1133*p0001/(p0818*p0002);0)
- p3464: 0; = p3369*p1241
- p1950: 9.4697e-7; = p1542*1000/p0818
- p2126: 4.37829e-6; = p2015*p2054*p2088/(p0818*1000)
- p0447: 0; = SQRT(2)*(IF((2*p0315-1)<0;-1;IF((2*p0315-1)>0;1;0))*SQRT(SQRT((2/(pi()*0.140012289)+LN(1-(2*p0315-1)^2)/2)^2-LN(1-(2*p0315-1)^2)/0.140012289)-(2/(pi()*0.140012289)+LN(1-(2*p0315-1)^2)/2)))
- p3050: 2.93904e-7; = p2269*p1082
- p0195: 0
- p0949: 0.000155527; = if(and(p0683=0;or(p0807=480;p0807=32;p0807=1;and(p0807=60;p0901<0.03)));p0937;0)
- p2152: 1.25324e-7; = p2015*p2080*p2114/(p0818*1000)
- p1224: 0.44; = IF(p1221=0;0;IF(p1193=0;1-p1223;0))
- p2561: 0; = p2365*p1014
- p0759: 0
- p0675: 0
- p3204: 0; = p2423*p1082
- p1899: 0
- p0321: 0.5
- p0684: 0
- p2080: 0.025
- p1913: 0
- p3354: 5.2756e6; = IF((p3350+p3351+p3352+p3353)+IF(p3349=0;0;(p3256*(p3273*(1-p3277))/p3349))>p3256;p3256-(p3350+p3351+p3352+p3353);IF(p3349=0;0;p3256*(p3273*(1-p3277))/p3349))
- p3472: 0.0004284; = p3377*p1241
- p3353: 1.31098e6; = if(and(p1232=0;p3256<>0);p3256*(p3276-p3348)/p3349;0)
- p1860: 0
- p2204: 0.00374913; = p1109/p0818
- p2684: 0.000417715; = p2293*(p1019+p1021)
- p0217: 16.389
- p2369: 0; = p2225*p2198
- p2665: 0; = p2274*(p1128+p1130)
- p3032: 0; = p2251*p1023
- p1861: 0
- p0346: 0.5
- p2453: 0.00160144; = p2257*p1014
- p3240: 6.21748e-9; = p3234*p1188*p3235/p0818
- p2111: 0.856281
- p2228: 0.749267; = if(p0774*p0778+p0775*p0779+p0776*p0780+p0777*p0781=0;0;p0780*p0776/(p0774*p0778+p0775*p0779+p0776*p0780+p0777*p0781))
- p1980: 3521.6
- p0869: 1; = IF(p0858+p0864+p0865+p0866+p0867+p0868=1;0;1-(p0858+p0864+p0865+p0866+p0867+p0868))
- p5315: 4.13226e-8; = p1936*p3484
- p2414: 0; = p2235*p2204
- p1176: 654.568; = p1175*p0801
- p0943: 0; = if(and(p0683=0;p0949=0);p0937;0)
- p0740: 93.519; = p0080*(1+p0608*p0212/100)
- p0817: 0
- p0484: 0; = SQRT(2)*(IF((2*p0352-1)<0;-1;IF((2*p0352-1)>0;1;0))*SQRT(SQRT((2/(pi()*0.140012289)+LN(1-(2*p0352-1)^2)/2)^2-LN(1-(2*p0352-1)^2)/0.140012289)-(2/(pi()*0.140012289)+LN(1-(2*p0352-1)^2)/2)))
- p2799: 0; = p2408*(p1019+p1021)
- p0966: 0; = if(p0683=0;0;IF(p0684/100+p0965=1;0;1-(p0684/100+p0965)))
- p2485: 0.00714117; = p2289*p1014
- p1126: 0; = if(p1121=0;p0720/100;0)
- p2342: 0.000219565; = p2228*p2210
- p2865: 4.50817e-5; = p2279*(p1020+p1022)
- p0575: 0; = IF(p0311<0.5;-SQRT(p0007*EXP(p0443^2*p0008)-p0007);SQRT(p0007*EXP(p0443^2*p0008)-p0007))
- p3253: 0; = p1252*(p1277*(1-p3247)+p1280*(1-p3248)+p1281*(1-p3249)+p1282*(1-p3250))
- p4802: 0; = p1835*p3482
- p3127: 4.525e-7; = p2346*p1082
- p2018: 0.1978
- p1209: 39.3156; = p1206*p0818*p0822/p0801
- p2934: 2.95548e-6; = p2348*(p1079+p1081)
- p2160: 4.31525e-7; = p2015*p2084*p2122/(p0818*1000)
- p0931: 2.20901e6; = p0801*p0925
- p3181: 0; = p2400*p1023
- p0766: 69.936; = p0106*(1+p0634*p0238/100)
- p2137: 2.83527e-7; = p2015*p2065*p2099/(p0818*1000)
- p1997: 2.30012e7; = (if(p1152=0;0;p1150/p1152)+if(p1153=0;0;p1151/p1153))*(1+p1157)
- p0238: 14.232
- p2592: 0; = p2396*p1014
- p1797: 0
- p1760: 0
- p0515: 0; = SQRT(2)*(IF((2*p0383-1)<0;-1;IF((2*p0383-1)>0;1;0))*SQRT(SQRT((2/(pi()*0.140012289)+LN(1-(2*p0383-1)^2)/2)^2-LN(1-(2*p0383-1)^2)/0.140012289)-(2/(pi()*0.140012289)+LN(1-(2*p0383-1)^2)/2)))
- p0056: 19.68
- p1586: 0
- p3951: 3.32934e-6; = p1808*p3478
- p1929: 0
- p2664: 0; = p2273*(p1128+p1130)
- p2276: 0.00551439; = p2223*p2182
- p0806: 2.112e8
- p2086: 0.0617647
- p2397: 0; = p2234*p2186
- p0615: 0; = IF(p0351<0.5;-SQRT(p0007*EXP(p0483^2*p0008)-p0007);SQRT(p0007*EXP(p0483^2*p0008)-p0007))
- p3188: 0; = p2407*p1023
- p0715: 0
- p0374: 0.5
- p2468: 0; = p2272*p1123
- p2547: 0.000758684; = p2351*p1123
- p0502: 0; = SQRT(2)*(IF((2*p0370-1)<0;-1;IF((2*p0370-1)>0;1;0))*SQRT(SQRT((2/(pi()*0.140012289)+LN(1-(2*p0370-1)^2)/2)^2-LN(1-(2*p0370-1)^2)/0.140012289)-(2/(pi()*0.140012289)+LN(1-(2*p0370-1)^2)/2)))
- p1982: 750
- p3248: 0
- p2424: 0; = p2235*p2214
- p2076: 0.057
- p0720: 0
- p4184: 5.39368e-7; = p1835*p3479
- p2195: 0.0025422; = p2194*p2193
- p0945: 0; = if(and(p0683=0;p0951=0);p0939;0)
- p2050: 0.952062
- p0648: 0; = IF(p0384<0.5;-SQRT(p0007*EXP(p0516^2*p0008)-p0007);SQRT(p0007*EXP(p0516^2*p0008)-p0007))
- p3282: 0.3
- p1998: 403
- p0997: 0; = if(p0888=0;0;if((p0695*p0694*1000*p0696/100)/p0888>1;1;(p0695*p0694*1000*p0696/100)/p0888))
- p2935: 2.64884e-5; = p2349*(p1079+p1081)
- p1684: 0
- p2518: 0.000130649; = p2322*p1014
- p2434: 0.00089177; = p2238*p1014
- p2582: 0; = p2386*p1073
- p2262: 0.00019355; = p2226*p2208
- p0632: 0; = IF(p0368<0.5;-SQRT(p0007*EXP(p0500^2*p0008)-p0007);SQRT(p0007*EXP(p0500^2*p0008)-p0007))
- p0965: 0; = IF(p0684/100=1;0;IF(p0684/100+p0685/100>1;1-p0684/100;p0685/100))
- p2622: 0; = p2426*p1073
- p2823: 0.000804244; = p2237*(p1020+p1022)
- p1843: 0
- p2736: 2.10709e-5; = p2345*(p1078+p1080)
- p1182: 936.725; = p1181*p0801
- p1052: 3.18687e7; = IF(p1012=0;p1045*p1036;0)
- p4098: 8.51997e-6; = p1955*p3478
- p2693: 1.14556e-5; = p2302*(p1078+p1080)
- p2096: 0.486404
- p3125: 2.44229e-8; = p2344*p1082
- p1690: 0
- p1771: 0
- p1015: 0.0911; = IF(p1012=0;p0706/100;0)
- p3088: 7.35408e-8; = p2307*p1082
- p0441: 0; = SQRT(2)*(IF((2*p0309-1)<0;-1;IF((2*p0309-1)>0;1;0))*SQRT(SQRT((2/(pi()*0.140012289)+LN(1-(2*p0309-1)^2)/2)^2-LN(1-(2*p0309-1)^2)/0.140012289)-(2/(pi()*0.140012289)+LN(1-(2*p0309-1)^2)/2)))
- p1130: 0; = if(p1121=0;IF(p1123+p1128+p1129=1;0;IF(p1123+p1128+p1129+p1126>1;1-(p1123+p1128+p1129);p1126));0)
- p2907: 0.000134617; = p2321*(p1020+p1022)
- p1834: 0
- p3386: 0; = p3367*p1234
- p0308: 0.5
- p1206: 0.023475
- p2008: 0.0795563; = ((p1982*p1985+p1988*p1991+p1994*p1997+p2002*p2005)/p0818)*p0005*p0002/1000
- p2655: 5.23816e-6; = p2264*(p1078+p1080)
- p0996: 0; = if(p0888=0;0;if((p0691*p0690*1000*p0692/100)/p0888>1;1;(p0691*p0690*1000*p0692/100)/p0888))
- p1979: 0; = p0973
- p3260: 0.0343561
- p2149: 2.21753e-7; = p2015*p2077*p2111/(p0818*1000)
- p1616: 0
- p4304: 1.02511e-6; = p1955*p3479
- p0183: 6.647
- p2311: 0; = p2231*p2218
- p1848: 0
- p0679: 2209.01; = p0019*(1+p0547*p0151/100)
- p2255: 0.00134566; = p2222*p2201
- p1963k: 4.75551e-5; = p1744*p1948+p1745*p1949+p1746*p1950+p1747*p1951+p1748*p1952+p1749*p1953+p1750*p1954+p1751*p1955+p1752*p1956+p1753*p1957+p1961*p1962
- p1758: 0
- p1986: 4200
- p2976: 0; = p2390*(p1129+p1131)
- p2535: 0.0056449; = p2339*p1073
- p1316: 0.00801455; = p1312*p1252/p0818
- p1649: 0
- p2605: 0; = p2409*p1014
- p1136: 0; = if(p1121=0;p1130*(p0716/100)*p0703*1000;0)
- p1098: 0.020586
- p0269: 6.869
- p3366: 0; = if(p1232=0;p3244*p3360/p0818;0)
- p1553: 0
- p0801: 6.7e6
- p2731: 0.000155871; = p2340*(p1078+p1080)
- p0236: 2.295
- p0616: 0; = IF(p0352<0.5;-SQRT(p0007*EXP(p0484^2*p0008)-p0007);SQRT(p0007*EXP(p0484^2*p0008)-p0007))
- p0731: 0
- p1915: 0
- p3288: 0.505
- p1702: 0
- p2603: 0; = p2407*p1014
- p3392: 0; = p3373*p1234
- p3484: 0.01007; = IF(p1344=0;0;p1344/(p1328+p1330+p1332+p1334+p1336+p1338+p1340+p1342+p1344))
- p3230: 2.6873e-7; = p1170/p0818
- p1007: 0; = p1003*p0001*p0004/(p0818*p0002)
- p2532: 0.00232136; = p2336*p1073
- p2197: 2.40786e-5; = p1055/p0818
- p3073: 0; = p2292*p1023
- p0820: 0; = if(p0807=480;p0814;0)
- p2239: 9.36215e-5; = p2222*p2184
- p2329: 4.90256e-6; = p2224*p2197
- p2300: 0.00111018; = p2227*p2207
- p2496: 0.000917416; = p2300*p1073
- p2319: 0.000512049; = p2224*p2186
- p1863: 0
- p2543: 0.000839942; = p2347*p1073
- p2383: 0; = p2229*p2212
- p1643: 0
- p1629: 0
- p2729: 0.000114037; = p2338*(p1078+p1080)
- p2048: 6.0226e-14; = p2015*p2046/(p0818*1000000000000)
- p2700: 1.99695e-6; = p2309*(p1078+p1080)
- p0812: 0; = if(p0807=480;0.095/0.34;0)
- p1165: 0.000471718; = p0801*p0001/(p0818*p0002)
- p0477: 0; = SQRT(2)*(IF((2*p0345-1)<0;-1;IF((2*p0345-1)>0;1;0))*SQRT(SQRT((2/(pi()*0.140012289)+LN(1-(2*p0345-1)^2)/2)^2-LN(1-(2*p0345-1)^2)/0.140012289)-(2/(pi()*0.140012289)+LN(1-(2*p0345-1)^2)/2)))
- p0940: 0; = if(and(p0683=0;p0946=0);p0934;0)
- p2279: 0.00031572; = p2223*p2185
- p1390: 31
- p2717: 0.000328224; = p2326*(p1019+p1021)
- p3385: 0; = p3366*p1234
- p1988: 750
- p2850: 1.25994e-6; = p2264*(p1079+p1081)
- p5132: 0; = p1963*p3483
- p2956: 0; = p2370*(p1020+p1022)
- p1589: 0
- p3161: 0; = p2380*p1082
- p1697: 0
- p2182: 0.0139965; = p1050/p0818
- p1902: 0
- p4157: 4.00583e-7; = p1808*p3479
- p2916: 1.149e-6; = p2330*(p1020+p1022)
- p1272: 0.957; = IF(p1267+p1270+p1271=p1259;0;p1259-(p1267+p1270+p1271))
- p1228: 0.0228972; = IF(p1221=0;0;p0801*p1212*2000/(p1222+p1221*p1225)/p0818)
- p2087: 0.856281
- p1765: 0
- p1942: 0
- p1162: 0.000528725; = p1161/p0818
- p2830: 5.11185e-5; = p2244*(p1020+p1022)
- p4102: 6.71236e-5; = p1963*p3478
- p3369: 0; = if(p1232=0;p3245*p3357/p0818;0)
- p2644: 4.75293e-6; = p2253*(p1019+p1021)
- p1864: 0
- p3404: 0; = p3366*p1238
- p1786: 0
- p1266: 0.043; = if(p1232>0;0;IF(p1259+p1263+p1264+p1265=1;0;1-(p1259+p1263+p1264+p1265)))
- p3191: 0; = p2410*p1023
- p1239: 0; = if(p1232>0;0;IF(p1234+p1238=1;0;IF(p1234+p1238+p1236>1;1-(p1234+p1238);p1236)))
- p0657: 0; = IF(p0393<0.5;-SQRT(p0007*EXP(p0525^2*p0008)-p0007);SQRT(p0007*EXP(p0525^2*p0008)-p0007))
- p2943: 0; = p2357*(p1020+p1022)
- p2327: 0.00051761; = p2224*p2195
- p1972: 0; = if(p0807=480;p1967*p0001/(p0818*p0002);0)
- p0223: 16.125
- p0878: 0; = p0867*p0856
- p3341: 0; = if(and(p1232=0;p3254<>0);p3254*(p3271-p3336)/p3338;0)
- p2177: 0.14492; = p0895/p0818-(p2173+p2174+p2175+p2176)
- p3792: 1.83155e-6; = p1855*p3477
- p0839: 0.545052; = p0838/p0818
- p1303: 0; = p1297*p1252/p0818
- p1868: 0
- p0572: 0; = IF(p0308<0.5;-SQRT(p0007*EXP(p0440^2*p0008)-p0007);SQRT(p0007*EXP(p0440^2*p0008)-p0007))
- p3229: 4.55576e-6; = p1164/p0818
- p1101: 0.0625488; = IF(p1071=0;IF(p1096=1;0;IF(p1096+p1097>1;1-p1096;p1097));0)
- p2275: 0; = p2230*p2221
- p0521: 0; = SQRT(2)*(IF((2*p0389-1)<0;-1;IF((2*p0389-1)>0;1;0))*SQRT(SQRT((2/(pi()*0.140012289)+LN(1-(2*p0389-1)^2)/2)^2-LN(1-(2*p0389-1)^2)/0.140012289)-(2/(pi()*0.140012289)+LN(1-(2*p0389-1)^2)/2)))
- p2172: 0.272512; = p2166-(p2167+p2168+p2169+p2170)
- p1188: 1684.51; = p1187*p0801
- p2068: 0.153529
- p1736: 0
- p1846: 0
- p0867: 0; = IF(p0858+p0864+p0865+p0866=1;0;IF(p0858+p0864+p0865+p0866+p0862>1;1-(p0858+p0864+p0865+p0866);p0862))
- p0927: 0.00964642; = IF(p0918+p0923+p0924+p0925+p0926=1;0;1-(p0918+p0923+p0924+p0925+p0926))
- p2365: 0; = p2225*p2193
- p2289: 0.00990069; = p2223*p2196
- p2334: 9.7991e-5; = p2224*p2202
- p2458: 0.000159944; = p2262*p1073
- p2780: 0; = p2389*(p1128+p1130)
- p2567: 0; = p2371*p1014
- p1201: 0.65
- p0703: 6699.91; = p0043*(1+p0571*p0175/100)
- p0811: 0; = if(p0807=480;1-p0810;0)
- p0929: 2.21722e6; = p0801*p0923
- p2983: 0; = p2397*(p1020+p1022)
- p3107: 0; = p2326*p1023
- p0733: 0
- p1673: 0
- p3474: 0.000721006; = p3379*p1241
- p1183: 0.000471718; = p0801*p0001/(p0818*p0002)
- p2341: 0.000508526; = p2228*p2209
- p1918: 0
- p2791: 0; = p2400*(p1019+p1021)
- p0046: 9.11
- p3084: 5.99491e-8; = p2303*p1082
- p2085: 0.0335294
- p0377: 0.5
- p1896: 0
- p1657: 0
- p2875: 0.00141372; = p2289*(p1020+p1022)
- p1904: 0
- p1054: 1.50282e8; = IF(p1012=0;p1047*p1036;0)
- p1735: 0
- p2185: 0.000801356; = p1065-p2184
- p3005: 0; = p2419*(p1079+p1081)
- p2051: 0.000147328; = p2015*p2049*p2050/(p0818*1000)
- p0900: 0.915333; = p0899/p0818
- p1825: 0
- p2595: 0; = p2399*p1014
- p5322: 3.97333e-9; = p1943*p3484
- p0500: 0; = SQRT(2)*(IF((2*p0368-1)<0;-1;IF((2*p0368-1)>0;1;0))*SQRT(SQRT((2/(pi()*0.140012289)+LN(1-(2*p0368-1)^2)/2)^2-LN(1-(2*p0368-1)^2)/0.140012289)-(2/(pi()*0.140012289)+LN(1-(2*p0368-1)^2)/2)))
- p0220: 27.939
- p0808: 0
- p2419: 0; = p2235*p2209
- p2199: 8.68913e-5; = p1069-p2197-p2198
- p0080: 93.519
- p1614: 0
- p1172: 2.6873e-7; = p1170/p0818
- p2762: 0; = p2371*(p1019+p1021)
- p1159: 0.5
- p2459: 7.23284e-5; = p2263*p1073
- p3014: 0; = p2428*(p1129+p1131)
- p3331: 0; = if(and(p1232=0;p3255<>0);p3255*(p3268-p3326)/p3327;0)
- p1652: 0
- p2685: 0.000179084; = p2294*(p1019+p1021)
- p3427: 0; = p3370*p1239
- p0999: 0; = IF(p0996=1;0;IF(p0996+p0997>1;1-p0996;p0997))
- p1166: 4.55576e-6; = p1164/p0818
- p2556: 0; = p2360*p1014
- p2513: 3.41667e-5; = p2317*p1014
- p3170: 0; = p2389*p1132
- p2207: 0.00911686; = p1119-p2205-p2204-p2206
- p2858: 0; = p2272*(p1129+p1131)
- p0384: 0.5
- p1346: 938
- p3897: 2.45899e-5; = p1754*p3478
- p0049: 9.006
- p2060: 0.272353
- p0924: 0.0909654; = IF(p0918+p0923=1;0;IF(p0918+p0923+p0920>1;1-(p0918+p0923);p0920))
- p0079: 0.682
- p0141: 89.3458
- p0251: 40.132
- p0970: 0; = p0967/p0818
- p4147: 9.77801e-8; = p1798*p3479
- p0774: 43.871; = p0114*(1+p0642*p0246/100)
- p1627: 0
- p0261: 3.101
- p1829: 0
- p3440: 0; = p3364*p1240
- p0747: 11.105; = p0087*(1+p0615*p0219/100)
- p5177: 2.46346e-8; = p1798*p3484
- p1312: 0.043; = IF(p1307+p1310+p1311=p1266;0;p1266-(p1307+p1310+p1311))
- p0814: 0; = if(p0807=480;p0810*p0812+p0811*p0813;0)
- p2559: 0; = p2363*p1014
- p1315: 0; = p1311*p1252/p0818
- p1637: 0
- p2480: 0.000289372; = p2284*p1014
- p1969: 0; = p0803
- p3199: 0; = p2418*p1082
- p2030: 6.61
- p1762: 0
- p2953: 0; = p2367*(p1020+p1022)
- p3459: 0; = p3364*p1241
- p3411: 0; = p3373*p1238
- p0977: 0; = IF(p0687=0;IF(OR(p0686=0;p0688=0);0;p0686*1000*p0688/100);0)
- p3137: 0; = p2356*p1023
- p0967: 0
- p1030: 0.000331278; = IF(p1012=0;p1024*p0001/(p0818*p0002);0)
- p2620: 0; = p2424*p1073
- p3290: 0.195
- p2632: 0.000137564; = p2241*(p1019+p1021)
- p3066: 0; = p2285*p1023
- p0875: 0; = p0874*p0001*p0003/(p0818*p0002)
- p1644: 0
- p2061: 0.518824
- p2399: 0; = p2234*p2188
- p0272: 39.883
- p3419: 0; = p3362*p1239
- p3092: 0; = p2311*p1132
- p3006: 0; = p2420*(p1079+p1081)
- p0825: 1.12211e10; = p0818*p0822
- p1875: 0
- p2959: 0; = p2373*(p1020+p1022)
- p4775: 0; = p1808*p3482
- p2104: 0.817136
- p1927: 0
- p2982: 0; = p2396*(p1020+p1022)
- p3686: 0; = p1955*p3476
- p0007: 14; = p0006-1
- p1232: 0
- p1323: 0; = IF(((p0745*1000*p0750/100)+(p0754*1000*p0759/100))/p0801<0;0;((p0745*1000*p0750/100)+(p0754*1000*p0759/100))/p0801)
- p1447: 209
- p0189: 0.981
- p3370: 0; = if(p1232=0;p3245*p3358/p0818;0)
- p0405: 0; = SQRT(2)*(IF((2*p0273-1)<0;-1;IF((2*p0273-1)>0;1;0))*SQRT(SQRT((2/(pi()*0.140012289)+LN(1-(2*p0273-1)^2)/2)^2-LN(1-(2*p0273-1)^2)/0.140012289)-(2/(pi()*0.140012289)+LN(1-(2*p0273-1)^2)/2)))
- p3311: 1.94119e7; = if(and(p1232=0;p3252<>0);p3252-(p3306+p3307+p3308+p3309+p3310);0)
- p4079: 1.36319e-6; = p1936*p3478
- p2146: 1.24454e-7; = p2015*p2074*p2108/(p0818*1000)
- p1687: 0
- p3923: 5.19062e-6; = p1780*p3478
- p2815: 0; = p2424*(p1078+p1080)
- p2747: 0; = p2356*(p1019+p1021)
- p0690: 0
- p3327: 0; = if(and(p1232=0;p3255<>0);1-(p3323+p3324+p3325+p3326);0)
- p2430: 0; = p2236*p2220
- p2589: 0; = p2393*p1014
- p1818: 0
- p1310: 0; = IF(p1307=p1266;0;IF(p1307+p1308>p1266;p1266-p1307;p1308))
- p1250: 0; = if(p1232>0;0;p1245*p0001/(p0818*p0002))
- p2006: 0.390956; = ((p1980*p1985+p1986*p1991+p1992*p1997+p2000*p2005)/p0818)*p0005*p0002/1000
- p2920: 1.39921e-5; = p2334*(p1020+p1022)
- p2813: 0; = p2422*(p1078+p1080)
- p2019: 0.13105
- p0537: 0; = IF(p0273<0.5;-SQRT(p0007*EXP(p0405^2*p0008)-p0007);SQRT(p0007*EXP(p0405^2*p0008)-p0007))
- p2105: 0.888194
- p0084: 6.75
- p2805: 0; = p2414*(p1078+p1080)
- p3303: 0.000398148; = if(and(p1232=0;p3252<>0);p3259*p3289;0)
- p0909: 7.66347e7
- p2436: 0.000232594; = p2240*p1014
- p1091: 1.36847e-5; = IF(p1071=0;p1085*p0001/(p0818*p0002);0)
- p0313: 0.5
- p1319: 0; = IF(((p0745*1000*p0746/100)+(p0754*1000*p0755/100))/p0801<0;0;((p0745*1000*p0746/100)+(p0754*1000*p0755/100))/p0801)
- p2534: 0.000679869; = p2338*p1073
- p2454: 0.000399543; = p2258*p1073
- p2623: 0; = p2427*p1073
- p0903: 0.0129401
- p3351: 918365; = if(and(p1232=0;p3256<>0);p3256*(p3274-p3346)/p3349;0)
- p0065: 1.128
- p4390: 0; = p1835*p3480
- p2666: 0; = p2275*(p1128+p1130)
- p1587: 0
- p0612: 0; = IF(p0348<0.5;-SQRT(p0007*EXP(p0480^2*p0008)-p0007);SQRT(p0007*EXP(p0480^2*p0008)-p0007))
- p0378: 0.5
- p1342: 0; = p1326*p0801
- p1600: 0
- p0116: 25.941
- p3028: 0; = p2247*p1023
- p2475: 0.000227723; = p2279*p1014
- p1203: 3
- p0854: 1.92993e6; = p0801*((1-p0853)*p0846+p0853*p0852)
- p3272: 0.0398246
- p1330: 2.15216e6; = p1320*p0801
- p2249: 0.00102301; = p2222*p2195
- p0485: 0; = SQRT(2)*(IF((2*p0353-1)<0;-1;IF((2*p0353-1)>0;1;0))*SQRT(SQRT((2/(pi()*0.140012289)+LN(1-(2*p0353-1)^2)/2)^2-LN(1-(2*p0353-1)^2)/0.140012289)-(2/(pi()*0.140012289)+LN(1-(2*p0353-1)^2)/2)))
- p0438: 0; = SQRT(2)*(IF((2*p0306-1)<0;-1;IF((2*p0306-1)>0;1;0))*SQRT(SQRT((2/(pi()*0.140012289)+LN(1-(2*p0306-1)^2)/2)^2-LN(1-(2*p0306-1)^2)/0.140012289)-(2/(pi()*0.140012289)+LN(1-(2*p0306-1)^2)/2)))
- p1946: 0
- p1662: 0
- p0844: 0.296529
- p1202: 0.7
- p1625: 0
- p1122: 0; = p1121*p0001/(p0818*p0002)
- p1695: 0
- p1087: 0; = IF(p1071=0;p1081*(p0710/100)*p0703*1000;0)
- p4720: 0.000102385; = p1963*p3481
- p2643: 2.16179e-6; = p2252*(p1019+p1021)
- p1750: 0
- p2681: 1.2895e-6; = p2290*(p1019+p1021)
- p1307: 0
- p3441: 0; = p3365*p1240
- p2183: 0.00307241; = p1064-p2182
- p2488: 2.46921e-5; = p2292*p1014
- p3349: 0.816024; = if(and(p1232=0;p3256<>0);1-(p3345+p3346+p3347+p3348);0)
- p3690: 0; = p1963*p3476
- p2473: 0.000873093; = p2277*p1014
- p1093: 0; = IF(p1071=0;p1087*p0001/(p0818*p0002);0)
- p1050: 1.77364e8; = IF(p1012=0;p1037*p1036;0)
- p2054: 0.91
- p0368: 0.5
- p1703: 0
- p2102: 0.922577
- p3136: 0; = p2355*p1023
- p1788: 0
- p0022: 6699.91
- p1258: 1; = if(p1232>0;0;IF(p1253+p1256+p1257=1;0;1-(p1253+p1256+p1257)))
- p0082: 92.865
- p2462: 2.06768e-6; = p2266*p1073
- p0534: 0; = SQRT(2)*(IF((2*p0402-1)<0;-1;IF((2*p0402-1)>0;1;0))*SQRT(SQRT((2/(pi()*0.140012289)+LN(1-(2*p0402-1)^2)/2)^2-LN(1-(2*p0402-1)^2)/0.140012289)-(2/(pi()*0.140012289)+LN(1-(2*p0402-1)^2)/2)))
- p1599: 0
- p3279: 0.37
- p3064: 0; = p2283*p1023
- p1148: 0.082617; = if(p1121=0;IF(p1146=1;0;1-p1146);0)
- p0902: 0
- p2594: 0; = p2398*p1014
- p0862: 0; = p0674*1000/p0856
- p2448: 1.1471e-5; = p2252*p1014
- p2841: 0.000192146; = p2255*(p1020+p1022)
- p0761: 0
- p1940: 0
- p2355: 0; = p2225*p2183
- p2896: 4.30492e-6; = p2310*(p1079+p1081)
- p3003: 0; = p2417*(p1079+p1081)
- p1579: 0
- p2089: 0.40001
- p2058: 1.24412
- p0773: 87.015; = p0113*(1+p0641*p0245/100)
- p1583: 0
- p2544: 7.3255e-5; = p2348*p1073
- p0890: 0; = p0686*1000*p0687*p0885/100
- p1216: 0
- p3152: 0; = p2371*p1023
- p3892: 2.84811e-6; = p1955*p3477
- p3001: 0; = p2415*(p1079+p1081)
- p3297: 0; = if(p1273+p1274+p1275+p1276=0;0;p1273/(p1273+p1274+p1275+p1276))
- p1131: 0; = if(p1121=0;IF(p1123+p1128+p1129+p1130=1;0;IF(p1123+p1128+p1129+p1130+p1127>1;1-(p1123+p1128+p1129+p1130);p1127));0)
- p0804: 0
- p1730: 0
- p2831: 5.85118e-5; = p2245*(p1020+p1022)
- p1196: 0.59
- p2552: 0; = p2356*p1014
- p2877: 2.22333e-6; = p2291*(p1020+p1022)
- p1900: 0
- p1199: -0.29
- p1563: 0
- p2806: 0; = p2415*(p1078+p1080)
- p1145: 9.02542e6; = if(p1121=0;p0799*p0702*1000*p0800/100;0)
- p2899: 0; = p2313*(p1129+p1131)
- p1963f: 4.9415e-6; = p1647*p1851+p1648*p1852+p1649*p1853+p1650*p1854+p1651*p1855+p1652*p1856+p1653*p1857+p1654*p1858+p1655*p1859+p1656*p1860+p1657*p1861+p1658*p1862+p1659*p1863+p1660*p1864+p1661*p1865+p1662*p1866+p1663*p1867+p1664*p1868+p1665*p1869+p1666*p1870
- p2634: 0.000253276; = p2243*(p1019+p1021)
- p4353: 0; = p1798*p3480
- p0460: 0; = SQRT(2)*(IF((2*p0328-1)<0;-1;IF((2*p0328-1)>0;1;0))*SQRT(SQRT((2/(pi()*0.140012289)+LN(1-(2*p0328-1)^2)/2)^2-LN(1-(2*p0328-1)^2)/0.140012289)-(2/(pi()*0.140012289)+LN(1-(2*p0328-1)^2)/2)))
- p1317: 0
- p3030: 0; = p2249*p1023
- p0613: 0; = IF(p0349<0.5;-SQRT(p0007*EXP(p0481^2*p0008)-p0007);SQRT(p0007*EXP(p0481^2*p0008)-p0007))
- p2118: 0.679049
- p3429: 0; = p3372*p1239
- p1550: 0.783979
- p1158: 0.0298782; = p1156*p1157
- p1742: 0
- p2645: 0.00042665; = p2254*(p1019+p1021)
- p2352: 4.8848e-5; = p2232*p2220
- p3211: 0; = p2430*p1132
- p2394: 0; = p2234*p2183
- p1666: 0
- p0001: 0.404686
- p3141: 0; = p2360*p1023
- p2444: 0.0034422; = p2248*p1014
- p0386: 0.5
- p2043: 0.636483
- p0936: 4.291e-5; = p0930*p0001/(p0818*p0002)
- p2220: 4.8848e-5; = p1151/p0818
- p1214: 0; = IF(p1213=0;0;p1213-1)
- p0548: 0; = IF(p0284<0.5;-SQRT(p0007*EXP(p0416^2*p0008)-p0007);SQRT(p0007*EXP(p0416^2*p0008)-p0007))
- p1152: 0.415074
- p3116: 0; = p2335*p1023
- p0416: 0; = SQRT(2)*(IF((2*p0284-1)<0;-1;IF((2*p0284-1)>0;1;0))*SQRT(SQRT((2/(pi()*0.140012289)+LN(1-(2*p0284-1)^2)/2)^2-LN(1-(2*p0284-1)^2)/0.140012289)-(2/(pi()*0.140012289)+LN(1-(2*p0284-1)^2)/2)))
- p2985: 0; = p2399*(p1020+p1022)
- p2069: 0.190588
- p0150: 0
- p1012: 0
- p0713: 3.334; = p0053*(1+p0581*p0185/100)
- p0702: 6699.91; = p0042*(1+p0570*p0174/100)
- p1756: 0
- p2673: 0.000247971; = p2282*(p1019+p1021)
- p3425: 0; = p3368*p1239
- p2966: 0; = p2380*(p1079+p1081)
- p5133: 7.45396e-7; = p1754*p3484
- p1719: 0
- p2052: 7.41826e-6; = p2015*p2049*(1-p2050)/(p0818*1000)
- p2042: 0.07
- p0994: 0; = p0990*p0001*p0004/(p0818*p0002)
- p0822: 0.8855
- p2130: 4.08576e-6; = p2015*p2058*p2092/(p0818*1000)
- p1731: 0
- p1282: 0; = IF(p1277+p1280+p1281=p1260;0;p1260-(p1277+p1280+p1281))
- p1210: 0.13
- p0518: 0; = SQRT(2)*(IF((2*p0386-1)<0;-1;IF((2*p0386-1)>0;1;0))*SQRT(SQRT((2/(pi()*0.140012289)+LN(1-(2*p0386-1)^2)/2)^2-LN(1-(2*p0386-1)^2)/0.140012289)-(2/(pi()*0.140012289)+LN(1-(2*p0386-1)^2)/2)))
- p2869: 5.00479e-5; = p2283*(p1020+p1022)
- p1964: 0.5
- p1772: 0
- p2768: 0; = p2377*(p1078+p1080)
- p2004: 30
- p2426: 0; = p2235*p2216
- p0779: 9.102; = p0119*(1+p0647*p0251/100)
- p2511: 0.0020555; = p2315*p1014
- p1186: 3.69604e-8; = p1182*p1185/p0818
- p0752: 0
- p2549: 8.42536e-5; = p2353*p1123
- p3667: 0; = p1936*p3476
- p3449: 0; = p3373*p1240
- p3159: 0; = p2378*p1082
- p0791: 0
- p1275: 0; = p1271*p1252/p0818
- p0404: 0.5
- p4822: 0; = p1855*p3482
- p2928: 7.3203e-6; = p2342*(p1079+p1081)
- p0138: 87.015
- p2450: 0.00226392; = p2254*p1014
- p0215: 19.298
- p3225: 0.000196263; = p3221*p1229
- p2312: 0; = p2231*p2219
- p1211: 0.6
- p1560: 0
- p1308: 0
- p0723: 6699.91; = p0063*(1+p0591*p0195/100)
- p2140: 8.53058e-7; = p2015*p2068*p2102/(p0818*1000)
- p0245: 5.076
- p1010: 0; = p0890
- p0841: 0.0309785
- p4716: 1.29956e-5; = p1955*p3481
- p1773: 0
- p3096: 0; = p2315*p1023
- p0476: 0; = SQRT(2)*(IF((2*p0344-1)<0;-1;IF((2*p0344-1)>0;1;0))*SQRT(SQRT((2/(pi()*0.140012289)+LN(1-(2*p0344-1)^2)/2)^2-LN(1-(2*p0344-1)^2)/0.140012289)-(2/(pi()*0.140012289)+LN(1-(2*p0344-1)^2)/2)))
- p3941: 8.12674e-7; = p1798*p3478
- p0780: 82.655; = p0120*(1+p0648*p0252/100)
- p1057: 0.82
- p1991: 4.27636e8; = (if(p1111=0;0;p1106/p1111)+if(p1112=0;0;p1107/p1112)+if(p1113=0;0;p1108/p1113)+if(p1114=0;0;p1109/p1114)+if(p1115=0;0;p1110/p1115))*(1+p1157)
- p2798: 0; = p2407*(p1019+p1021)
- p2624: 0; = p2428*p1123
- p2272: 0; = p2230*p2218
- p2413: 0; = p2234*p2203
- p2661: 2.11484e-6; = p2270*(p1078+p1080)
- p2029: 4.03
- p0858: 0; = p0670*1000/p0856
- p2190: 0.0010183; = 32.065*p2189/(2*14.0067)
- p0737: 0
- p2870: 5.72863e-5; = p2284*(p1020+p1022)
- p0753: 0
- p0334: 0.5
- p1675: 0
- p2792: 0; = p2401*(p1019+p1021)
- p0501: 0; = SQRT(2)*(IF((2*p0369-1)<0;-1;IF((2*p0369-1)>0;1;0))*SQRT(SQRT((2/(pi()*0.140012289)+LN(1-(2*p0369-1)^2)/2)^2-LN(1-(2*p0369-1)^2)/0.140012289)-(2/(pi()*0.140012289)+LN(1-(2*p0369-1)^2)/2)))
- p0937: 0.000155527; = p0931*p0001/(p0818*p0002)
- p2995: 0; = p2409*(p1020+p1022)
- p2744: 0; = p2353*(p1128+p1130)
- p3304: 0.0017178; = if(and(p1232=0;p3252<>0);p3260*p3289;0)
- p2857: 4.55907e-6; = p2271*(p1079+p1081)
- p2421: 0; = p2235*p2211
- p3247: 0
- p2630: 1.2726e-5; = p2239*(p1019+p1021)
- p3301: 0.130394; = if(and(p1232=0;p3252<>0);p3257*p3277*(p3297*p3290+(1-p3297)*p3294);0)
- p1120: 0.00631005; = IF(p1071=0;p1110/(p1115*p0818);0)
- p1559: 0
- p1154: 0.00130678; = if(p1152*p0818=0;0;p1150/(p1152*p0818))
- p1289: 0
- p1930: 0
- p2003: 50
- p1680: 0
- p2337: 0.00254062; = p2228*p2205
- p2706: 0.000387372; = p2315*(p1019+p1021)
- p2115: 0.856281
- p2993: 0; = p2407*(p1020+p1022)
- p3361: 2.03356e7; = if(p1232=0;p3311+p3322+p3333+p3344+p3355;0)
- p2423: 0; = p2235*p2213
- p1805: 0
- p2847: 3.91984e-5; = p2261*(p1079+p1081)
- p2472: 0.00397742; = p2276*p1014
- p3132: 5.68692e-6; = p2351*p1132
- p1246: 33955.1; = if(p1232>0;0;p1241*(p0725/100)*p0723*1000)
- p2695: 6.47718e-5; = p2304*(p1078+p1080)
- p3156: 0; = p2375*p1082
- p0531: 0; = SQRT(2)*(IF((2*p0399-1)<0;-1;IF((2*p0399-1)>0;1;0))*SQRT(SQRT((2/(pi()*0.140012289)+LN(1-(2*p0399-1)^2)/2)^2-LN(1-(2*p0399-1)^2)/0.140012289)-(2/(pi()*0.140012289)+LN(1-(2*p0399-1)^2)/2)))
- p1912: 0
- p1701: 0
- p1593: 0
- p2037: 1.99
- p1801: 0
- p0576: 0; = IF(p0312<0.5;-SQRT(p0007*EXP(p0444^2*p0008)-p0007);SQRT(p0007*EXP(p0444^2*p0008)-p0007))
- p0957: 0; = if(and(p0683>0;or(p0807=56;p0807=100;and(p0807=60;p0901>0.06)));p0939;0)
- p1338: 9.82009e6; = p1324*p0801
- p2505: 1.19055e-5; = p2309*p1073
- p3277: 0.55
- p3243: 6.88335e-10; = p3234*p1188*p3239/p0818
- p1847: 0
- p1286: 0; = p1282*p1252/p0818
- p3379: 0.00160477; = if(p1232=0;p3246*p3361/p0818;0)
- p3442: 0; = p3366*p1240
- p3390: 0; = p3371*p1234
- p1943: 3.94571e-7; = p1535*1000/p0818
- p3478: 0.3322; = if(p1328+p1330+p1332+p1334+p1336+p1338+p1340+p1342+p1344=0;0;p1332/(p1328+p1330+p1332+p1334+p1336+p1338+p1340+p1342+p1344))
- p2668: 0.00016454; = p2277*(p1019+p1021)
- p1632: 0
- p0935: 0.000156105; = p0929*p0001/(p0818*p0002)
- p3010: 0; = p2424*(p1079+p1081)
- p2142: 1.3878e-6; = p2015*p2070*p2104/(p0818*1000)
- p0634: 0; = IF(p0370<0.5;-SQRT(p0007*EXP(p0502^2*p0008)-p0007);SQRT(p0007*EXP(p0502^2*p0008)-p0007))
- p1803: 0
- p0923: 0.330928; = IF(p0918=1;0;IF(p0918+p0919>1;1-p0918;p0919))
- p3296: 0.514
- p1096: 0.00337596
- p3342: 0; = if(and(p1232=0;p3254<>0);p3254*(p3272-p3337)/p3338;0)
- p2117: 0.585147
- p2457: 0.000971578; = p2261*p1073
- p0763: 6699.91; = p0103*(1+p0631*p0235/100)
- p1677: 0
- p2904: 2.32978e-5; = p2318*(p1020+p1022)
- p1994: 750
- p2465: 0.000144567; = p2269*p1073
- p3393: 0; = p3374*p1234
- p2429: 0; = p2236*p2219
- p0349: 0.5
- p1237: 0; = if(p1232>0;0;p0729/100)
- p0578: 0; = IF(p0314<0.5;-SQRT(p0007*EXP(p0446^2*p0008)-p0007);SQRT(p0007*EXP(p0446^2*p0008)-p0007))
- p0452: 0; = SQRT(2)*(IF((2*p0320-1)<0;-1;IF((2*p0320-1)>0;1;0))*SQRT(SQRT((2/(pi()*0.140012289)+LN(1-(2*p0320-1)^2)/2)^2-LN(1-(2*p0320-1)^2)/0.140012289)-(2/(pi()*0.140012289)+LN(1-(2*p0320-1)^2)/2)))
- p5234: 1.66085e-7; = p1855*p3484
- p3218: 0.00861864; = p3214*p1228
- p2478: 0.0013158; = p2282*p1014
- p2884: 1.37662e-5; = p2298*(p1079+p1081)
- p3772: 1.49854e-6; = p1835*p3477
- p3310: 1.26202e8; = if(and(p1232=0;p3252<>0);IF((p3306+p3307+p3308+p3309)+(p3252*(p3257*(1-p3277))/p3305)>p3252;p3252-(p3306+p3307+p3308+p3309);p3252*(p3257*(1-p3277))/p3305);0)
- p2739: 1.22873e-5; = p2348*(p1078+p1080)
- p1340: 0; = p1325*p0801
- p3140: 0; = p2359*p1023
- p2445: 0.000737876; = p2249*p1014
- p2477: 0.000102856; = p2281*p1014
- p1757: 0
- p2170: 0.00637865; = p2166*(p0913)
- p2471: 0; = p2275*p1123
- p2415: 0; = p2235*p2205
- p2752: 0; = p2361*(p1019+p1021)
- p1852: 0
- p1059: 0.335
- p2090: 0.40001
- p1263: 0; = if(p1232>0;0;IF(p1259=1;0;IF(p1259+p1260>1;1-p1259;p1260)))
- p0180: 43.649
- p2194: 0.214362
- p3062: 0; = p2281*p1023
- p2186: 0.00251489; = p1052/p0818
- p2520: 3.76068e-5; = p2324*p1014
- p4510: 0; = p1955*p3480
- p2056: 2.07882
- p0739: 0.682; = p0079*(1+p0607*p0211/100)
- p0745: 19380.1; = p0085*(1+p0613*p0217/100)
- p1092: 0; = IF(p1071=0;p1086*p0001/(p0818*p0002);0)
- p1963h: 0; = p1686*p1890+p1687*p1891+p1688*p1892+p1689*p1893+p1690*p1894+p1691*p1895+p1692*p1896+p1693*p1897+p1694*p1898+p1695*p1899+p1696*p1900+p1697*p1901+p1698*p1902+p1699*p1903+p1700*p1904+p1701*p1905+p1702*p1906+p1703*p1907+p1704*p1908+p1705*p1909
- p3294: 0.279
- p1324: 1.46569; = IF(((p0745*1000*p0751/100)+(p0754*1000*p0760/100))/p0801<0;0;((p0745*1000*p0751/100)+(p0754*1000*p0760/100))/p0801)
- p0864: 0; = IF(p0858=1;0;IF(p0858+p0859>1;1-p0858;p0859))
- p2296: 0.00217378; = p2223*p2203
- p1223: 0.56
- p2783: 0; = p2392*(p1128+p1130)
- p0883: 4.71718; = p0882*p0001*p0003/(p0818*p0002)
- p2893: 1.45943e-6; = p2307*(p1079+p1081)
- p0550: 0; = IF(p0286<0.5;-SQRT(p0007*EXP(p0418^2*p0008)-p0007);SQRT(p0007*EXP(p0418^2*p0008)-p0007))
- p1661: 0
- p2828: 2.07977e-5; = p2242*(p1020+p1022)
- p3468: 0; = p3373*p1241
- p0196: 11.472
- p1334: 774623; = p1322*p0801
- p2125: 7.51108e-6; = p2015*p2053*p2087/(p0818*1000)
- p1737: 0
- p1811: 0
- p0709: 9.006; = p0049*(1+p0577*p0181/100)
- p2879: 0.000438796; = p2293*(p1020+p1022)
- p4922: 0; = p1955*p3482
- p1220: 0; = IF(p1218<0.5;-SQRT(p1214*EXP(p1219^2*p1215)-p1214);SQRT(p1214*EXP(p1219^2*p1215)-p1214))
- p0685: 0
- p4285: 1.64018e-7; = p1936*p3479
- p1806: 0
- p3100: 0; = p2319*p1023
- p0139: 6.845
- p3391: 0; = p3372*p1234
- p0478: 0; = SQRT(2)*(IF((2*p0346-1)<0;-1;IF((2*p0346-1)>0;1;0))*SQRT(SQRT((2/(pi()*0.140012289)+LN(1-(2*p0346-1)^2)/2)^2-LN(1-(2*p0346-1)^2)/0.140012289)-(2/(pi()*0.140012289)+LN(1-(2*p0346-1)^2)/2)))
- p0722: 0
- p1681: 0
- p2760: 0; = p2369*(p1019+p1021)
- p1966: 6.6e6; = if(p0814=0;p0802;0)
- p2751: 0; = p2360*(p1019+p1021)
- p4103: 2.95864e-6; = p1754*p3479
- p2252: 1.59037e-5; = p2222*p2198
- p2273: 0; = p2230*p2219
- p2492: 0.0015679; = p2296*p1014
- p1934: 0
- p3114: 0; = p2333*p1023
- p3086: 3.96923e-9; = p2305*p1082
- p0991: 0; = p0987*p0886
- p3160: 0; = p2379*p1082
- p1021: 0.04483; = IF(p1012=0;IF(p1014+p1019+p1020=1;0;IF(p1014+p1019+p1020+p1017>1;1-(p1014+p1019+p1020);p1017));0)
- p1774: 0
- p0699: 0
- p0842: 0.0122666
- p4222: 4.82277e-6; = p1873*p3479
- p1190: 1.32932e-7; = p1188/p0818
- p3444: 0; = p3368*p1240
- p2770: 0; = p2379*(p1078+p1080)
- p2481: 7.27697e-5; = p2285*p1014
- p2563: 0; = p2367*p1014
- p2583: 0; = p2387*p1073
- p1978: 403
- p2524: 0.0036905; = p2328*p1014
- p0939: 4.55039e-6; = p0933*p0001/(p0818*p0002)
- p2097: 0.40001
- p3358: 2.81373e6; = if(p1232=0;p3308+p3319+p3330+p3341+p3352;0)
- p1019: 0.0911; = IF(p1012=0;IF(p1014=1;0;IF(p1014+p1015>1;1-p1014;p1015));0)
- p4363: 0; = p1808*p3480
- p2173: 0.129216; = p0895*p0898/p0818
- p1576: 0.47191
- p2364: 0; = p2225*p2192
- p0700: 0
- p1640: 0
- p4711: 4.79839e-7; = p1950*p3481
- p2794: 0; = p2403*(p1019+p1021)
- p2759: 0; = p2368*(p1019+p1021)
- p1572: 0
- p1032: 2.42184e-5; = IF(p1012=0;p1026*p0001/(p0818*p0002);0)
- p1603: 0
- p3236: 0.0140975
- p3283: 0.3
- p1046: 0.0238398; = IF(p1012=0;IF(p1037+p1044+p1045=1;0;IF(p1037+p1044+p1045+p1040>1;1-(p1037+p1044+p1045);p1040));0)
- p3398: 0; = p3379*p1234
- p3330: 0; = if(and(p1232=0;p3255<>0);p3255*(p3267-p3325)/p3327;0)
- p1937: 0
- p1580: 0
- p1663: 0
- p1714: 0
- p3346: 0.0178625; = if(and(p1232=0;p3256<>0);p3274*(p3281*(p3285*p1256+p3286*(p1253+p1257)+p1258*p3288));0)
- p2093: 0.260958
- p2825: 1.33682e-5; = p2239*(p1020+p1022)
- p3226: 0.000299443; = p3222*p1229
- p2490: 0.000950267; = p2294*p1014
- p2718: 7.03587e-5; = p2327*(p1019+p1021)
- p3113: 0; = p2332*p1023
- p1862: 0
- p3021: 0; = p2240*p1023
- p2750: 0; = p2359*(p1019+p1021)
- p1465: 1529
- p0176: 2.295
- p1851: 0
- p3473: 0.00466158; = p3378*p1241
- p2679: 0.000136145; = p2288*(p1019+p1021)
- p1638: 0
- p2015: 7.63184e7; = p0830*p2011*p2013
- p0678: 2217.22; = p0018*(1+p0546*p0150/100)
- p0706: 9.11; = p0046*(1+p0574*p0178/100)
- p3437: 0; = p3380*p1239
- p0328: 0.5
- p1299: 0
- p1841: 0
- p0707: 5.273; = p0047*(1+p0575*p0179/100)
- p1838: 0
- p2971: 0; = p2385*(p1079+p1081)
- p0859: 0; = p0671*1000/p0856
- p2720: 6.66405e-7; = p2329*(p1019+p1021)
- p3423: 0; = p3366*p1239
- p0188: 39.883
- p3387: 0; = p3368*p1234
- p0816: 0
- p2876: 1.35458e-6; = p2290*(p1020+p1022)
- p2317: 4.73695e-5; = p2224*p2184
- p2629: 0.00016806; = p2238*(p1019+p1021)
- p0369: 0.5
- p3413: 0.000580736; = p3375*p1238
- p3454: 0; = p3378*p1240
- p0721: 0
- p2793: 0; = p2402*(p1019+p1021)
- p2573: 0; = p2377*p1073
- p4925: 0; = p1962*p3482
- p3047: 4.20356e-9; = p2266*p1082
- p0671: 0
- p1932: 0
- p2593: 0; = p2397*p1014
- p1678: 0
- p1870: 0
- p3143: 0; = p2362*p1023
- p2551: 0; = p2355*p1014
- p2651: 1.96276e-5; = p2260*(p1078+p1080)
- p3375: 0.00105452; = if(p1232=0;p3246*p3357/p0818;0)
- p1957: 0
- p1144: 6.90676e-7; = if(p1121=0;p1138*p0001/(p0818*p0002);0)
- p0078: 6699.91
- p3286: 0.185
- p3017: 0; = p2431*(p1129+p1131)
- p0667: 0; = IF(p0403<0.5;-SQRT(p0007*EXP(p0535^2*p0008)-p0007);SQRT(p0007*EXP(p0535^2*p0008)-p0007))
- p2785: 0; = p2394*(p1019+p1021)
- p0856: 6.7e6; = p0801
- p0110: 40.733
- p1076: 0; = IF(p1071=0;p0714/100;0)
- p2072: 0.134
- p2574: 0; = p2378*p1073
- p0607: 0; = IF(p0343<0.5;-SQRT(p0007*EXP(p0475^2*p0008)-p0007);SQRT(p0007*EXP(p0475^2*p0008)-p0007))
- p1547: 325
- p2696: 3.27485e-7; = p2305*(p1078+p1080)
- p1558: 0
- p2001: 400
- p2333: 0.000680859; = p2224*p2201
- p0805: 0
- p2315: 0.00284979; = p2224*p2182
- p1245: 0; = if(p1232>0;0;p1240*(p0725/100)*p0723*1000)
- p2728: 0.000352155; = p2337*(p1078+p1080)
- p4634: 6.11395e-5; = p1873*p3481
- p2433: 0.00406251; = p2237*p1014
- p1555: 0
- p2874: 0.000143016; = p2288*(p1020+p1022)
- p2499: 2.94882e-5; = p2303*p1073
- p1280: 0; = IF(p1277=p1263;0;IF(p1277+p1278>p1263;p1263-p1277;p1278))
- p1967: 0; = if(p0807=480;p0802*p0810;0)
- p1664: 0
- p3378: 0.0103754; = if(p1232=0;p3246*p3360/p0818;0)
- p2840: 0.000448182; = p2254*(p1020+p1022)
- p2820: 0; = p2429*(p1128+p1130)
- p2091: 0.374844
- p3209: 0; = p2428*p1132
- p1149: 0.830148
- p0821: 1.31667
- p2776: 0; = p2385*(p1078+p1080)
- p0347: 0.5
- p1903: 0
- p0104: 97.367
- p0547: 0; = IF(p0283<0.5;-SQRT(p0007*EXP(p0415^2*p0008)-p0007);SQRT(p0007*EXP(p0415^2*p0008)-p0007))
- p2743: 0; = p2352*(p1128+p1130)
- p0950: 0; = if(and(p0683=0;or(p0807=480;p0807=32;p0807=1;and(p0807=60;p0901<0.03)));p0938;0)
- p2179: 0; = p0970+p0971+p0972
- p2479: 0.000252808; = p2283*p1014
- p0982: 0; = if(p0886=0;0;min(1;(p0691*p0690*1000*p0693/100)/p0886))
- p1276: 0.17837; = p1272*p1252/p0818
- p2926: 3.74919e-5; = p2340*(p1079+p1081)
- p2180: 8.02829e-8; = p3233*p1188/(p0818)
- p0851: 0
- p3112: 0; = p2331*p1023
- p0647: 0; = IF(p0383<0.5;-SQRT(p0007*EXP(p0515^2*p0008)-p0007);SQRT(p0007*EXP(p0515^2*p0008)-p0007))
- p1252: 2.36187e9; = if(p1232>0;0;p0724*2000*p0723*1000*p0725/100)
- p3403: 0; = p3365*p1238
- p2659: 6.42577e-6; = p2268*(p1078+p1080)
- p1878: 0
- p1819: 0
- p3203: 0; = p2422*p1082
- p2343: 0.00287529; = p2228*p2211
- p0646: 0; = IF(p0382<0.5;-SQRT(p0007*EXP(p0514^2*p0008)-p0007);SQRT(p0007*EXP(p0514^2*p0008)-p0007))
- p3193: 0; = p2412*p1023
- p3312: 0; = if(and(p1232=0;p3253<>0);p3261*p3277*(p3298*p3290+(1-p3298)*p3294);0)
- p0762: 0
- p3179: 0; = p2398*p1023
- p0952: 0; = if(and(p0683>0;or(p0807=56;p0807=100;and(p0807=60;p0901>0.06)));p0934;0)
- p2788: 0; = p2397*(p1019+p1021)
- p1935: 0
- p1981: 400
- p2965: 0; = p2379*(p1079+p1081)
- p0784: 0
- p1222: 0.94
- p1290: 0; = IF(p1287=p1264;0;IF(p1287+p1288>p1264;p1264-p1287;p1288))
- p1247: 0; = if(p1232>0;0;p1242*p0001/(p0818*p0002))
- p3187: 0; = p2406*p1023
- p3299: 0; = if(p1303+p1304+p1305+p1306=0;0;p1303/(p1303+p1304+p1305+p1306))
- p2977: 0; = p2391*(p1129+p1131)
- p0941: 0; = if(and(p0683=0;p0947=0);p0935;0)
- p1329: 0; = p1328*p0001/(p0818*p0002)
- p3604: 0; = p1873*p3476
- p1029: 0; = IF(p1012=0;IF(p0801<p1023*(p0704/100)*p0703*1000;p0801;p1023*(p0704/100)*p0703*1000);0)
- p2256: 0.00019367; = p2222*p2202
- p3566: 0; = p1835*p3476
- p0712: 13.861; = p0052*(1+p0580*p0184/100)
- p0987: 0; = if(p0978>0;0;if(and(p0687=0;p0691=0;p0695=0;p0699=0);0;IF(p0982+p0985+p0986=1;0;1-(p0982+p0985+p0986))))
- p1822: 0
- p2653: 2.68279e-5; = p2262*(p1078+p1080)
- p0663: 0; = IF(p0399<0.5;-SQRT(p0007*EXP(p0531^2*p0008)-p0007);SQRT(p0007*EXP(p0531^2*p0008)-p0007))
- p1721: 0
- p3144: 0; = p2363*p1023
- p1716: 0
- p2915: 7.00037e-7; = p2329*(p1020+p1022)
- p3052: 2.29731e-7; = p2271*p1082
- p2649: 6.70167e-5; = p2258*(p1078+p1080)
- p2704: 0; = p2313*(p1128+p1130)
- p0177: 9.583
- p0775: 38.285; = p0115*(1+p0643*p0247/100)
- p2466: 1.26083e-5; = p2270*p1073
- p0742: 92.865; = p0082*(1+p0610*p0214/100)
- p2065: 0.0758824
- p0311: 0.5
- p3689: 0; = p1962*p3476
- p2370: 0; = p2225*p2199
- p3212: 0; = p2431*p1132
- p0959: 0; = if(and(p0683>0;or(p0807=480;p0807=32;p0807=1;and(p0807=60;p0901<0.03)));p0935;0)
- p0857: 4.71718; = p0856*p0001*p0003/(p0818*p0002)
- p1140: 0; = if(p1121=0;p1134*p0001/(p0818*p0002);0)
- p0389: 0.5
- p1963b: 7.37359e-6; = p1569*p1773+p1570*p1774+p1571*p1775+p1572*p1776+p1573*p1777+p1574*p1778+p1575*p1779+p1576*p1780+p1577*p1781+p1578*p1782+p1579*p1783+p1580*p1784+p1581*p1785+p1582*p1786+p1583*p1787+p1584*p1788+p1585*p1789+p1586*p1790+p1587*p1791
- p0475: 0; = SQRT(2)*(IF((2*p0343-1)<0;-1;IF((2*p0343-1)>0;1;0))*SQRT(SQRT((2/(pi()*0.140012289)+LN(1-(2*p0343-1)^2)/2)^2-LN(1-(2*p0343-1)^2)/0.140012289)-(2/(pi()*0.140012289)+LN(1-(2*p0343-1)^2)/2)))
- p0958: 0; = if(and(p0683>0;or(p0807=480;p0807=32;p0807=1;and(p0807=60;p0901<0.03)));p0934;0)
- p2241: 0.00101202; = p2222*p2186
- p1123: 0.99256; = if(p1121=0;p0717/100;0)
- p0984: 0; = if(p0886=0;0;min(1;(p0699*p0698*1000*p0701/100)/p0886))
- p1278: 0
- p2088: 0.798875
- p2508: 0; = p2312*p1123
- p1556: 0
- p0375: 0.5
- p2236: 0; = 1-(p2230+p2231+p2232+p2233)
- p3135: 0; = p2354*p1023
- p0922: 0; = p0677*1000/p0801
- p0789: 97.503; = p0129*(1+p0657*p0261/100)
- p2636: 5.57007e-5; = p2245*(p1019+p1021)
- p1146: 0.917383
- p2046: 10
- p0954: 0; = if(and(p0683>0;or(p0807=56;p0807=100;and(p0807=60;p0901>0.06)));p0936;0)
- p0536: 0; = SQRT(2)*(IF((2*p0404-1)<0;-1;IF((2*p0404-1)>0;1;0))*SQRT(SQRT((2/(pi()*0.140012289)+LN(1-(2*p0404-1)^2)/2)^2-LN(1-(2*p0404-1)^2)/0.140012289)-(2/(pi()*0.140012289)+LN(1-(2*p0404-1)^2)/2)))
- p1264: 0; = if(p1232>0;0;IF(p1259+p1263=1;0;IF(p1259+p1263+p1261>1;1-(p1259+p1263);p1261)))
- p2213: 0.000202885; = p1116-p2212
- p3332: 0; = if(and(p1232=0;p3255<>0);IF((p3328+p3329+p3330+p3331)+(p3255*(p3265*(1-p3277))/p3327)>p3255;p3255-(p3328+p3329+p3330+p3331);p3255*(p3265*(1-p3277))/p3327);0)
- p3259: 0.00796296
- p3241: 7.42221e-10; = p3234*p1188*p3236/p0818
- p0904: 4.85671e8; = p0825*p0901+(p0830+p0895)*p0824*p0903
- p2079: 0.02
- p3060: 0; = p2279*p1023
- p5116: 0; = p1943*p3483
- p2268: 4.63586e-5; = p2226*p2214
- p1018: 0.09006; = IF(p1012=0;p0709/100;0)
- p2460: 3.12291e-5; = p2264*p1073
- p1781: 0
- p0514: 0; = SQRT(2)*(IF((2*p0382-1)<0;-1;IF((2*p0382-1)>0;1;0))*SQRT(SQRT((2/(pi()*0.140012289)+LN(1-(2*p0382-1)^2)/2)^2-LN(1-(2*p0382-1)^2)/0.140012289)-(2/(pi()*0.140012289)+LN(1-(2*p0382-1)^2)/2)))
- p1624: 0
- p3223: 0.126838; = IF(p3216=0;0;(1-p1223)*24.3050/84.3139)
- p2151: 1.00259e-7; = p2015*p2079*p2113/(p0818*1000)
- p3480: 0; = if(p1328+p1330+p1332+p1334+p1336+p1338+p1340+p1342+p1344=0;0;p1336/(p1328+p1330+p1332+p1334+p1336+p1338+p1340+p1342+p1344))
- p3271: 0.0195489
- p2078: 0.117
- p0091: 50.671
- p1249: 0; = if(p1232>0;0;p1244*p0001/(p0818*p0002))
- p1309: 0
- p0507: 0; = SQRT(2)*(IF((2*p0375-1)<0;-1;IF((2*p0375-1)>0;1;0))*SQRT(SQRT((2/(pi()*0.140012289)+LN(1-(2*p0375-1)^2)/2)^2-LN(1-(2*p0375-1)^2)/0.140012289)-(2/(pi()*0.140012289)+LN(1-(2*p0375-1)^2)/2)))
- p0052: 13.861
- p0837: 0.5
- p1651: 0.299611
- p0571: 0; = IF(p0307<0.5;-SQRT(p0007*EXP(p0439^2*p0008)-p0007);SQRT(p0007*EXP(p0439^2*p0008)-p0007))
- p3457: 0; = p3362*p1241
- p2514: 0.000117685; = p2318*p1014
- p2281: 0.000142602; = p2223*p2187
- p3242: 4.5001e-8; = p3234*p1188*p3238/p0818
- p3046: 8.31404e-7; = p2265*p1082
- p3998: 5.47899e-6; = p1855*p3478
- p2778: 0; = p2387*(p1078+p1080)
- p2209: 0.000678698; = 14.0067*p2208/30.973762
- p1155: 0.000133733; = if(p1153*p0818=0;0;p1151/(p1153*p0818))
- p0510: 0; = SQRT(2)*(IF((2*p0378-1)<0;-1;IF((2*p0378-1)>0;1;0))*SQRT(SQRT((2/(pi()*0.140012289)+LN(1-(2*p0378-1)^2)/2)^2-LN(1-(2*p0378-1)^2)/0.140012289)-(2/(pi()*0.140012289)+LN(1-(2*p0378-1)^2)/2)))
- p2612: 0; = p2416*p1073
- p0067: 55.071
- p2746: 0; = p2355*(p1019+p1021)
- p3219: 0.0103219; = p3215*p1228
- p1343: 0; = p1342*p0001/(p0818*p0002)
- p2774: 0; = p2383*(p1078+p1080)
- p3043: 3.25163e-7; = p2262*p1082
- p0414: 0; = SQRT(2)*(IF((2*p0282-1)<0;-1;IF((2*p0282-1)>0;1;0))*SQRT(SQRT((2/(pi()*0.140012289)+LN(1-(2*p0282-1)^2)/2)^2-LN(1-(2*p0282-1)^2)/0.140012289)-(2/(pi()*0.140012289)+LN(1-(2*p0282-1)^2)/2)))
- p0003: 10000
- p3448: 0; = p3372*p1240
- p2832: 1.47142e-5; = p2246*(p1020+p1022)
- p3735: 2.71666e-7; = p1798*p3477
- p2999: 0; = p2413*(p1020+p1022)
- p3360: 1.31477e8; = if(p1232=0;p3310+p3321+p3332+p3343+p3354;0)
- p0687: 0
- p1975: 0.000471718; = p1970*p0001/(p0818*p0002)
- p1326: 0; = IF(((p0745*1000*p0753/100)+(p0754*1000*p0762/100))/p0801<0;0;((p0745*1000*p0753/100)+(p0754*1000*p0762/100))/p0801)
- p2356: 0; = p2225*p2184
- p4514: 0; = p1963*p3480
- p1816: 0
- p3202: 0; = p2421*p1082
- p0665: 0; = IF(p0401<0.5;-SQRT(p0007*EXP(p0533^2*p0008)-p0007);SQRT(p0007*EXP(p0533^2*p0008)-p0007))
- p2200: 0.00779987; = p1056/p0818
- p2848: 6.45295e-6; = p2262*(p1079+p1081)
- p2903: 6.76389e-6; = p2317*(p1020+p1022)
- p2144: 6.91044e-7; = p2015*p2072*p2106/(p0818*1000)
- p2663: 0; = p2272*(p1128+p1130)
- p2836: 0.00144396; = p2250*(p1020+p1022)
- p4697: 2.0793e-6; = p1936*p3481
- p3071: 0; = p2290*p1023
- p3164: 0; = p2383*p1082
- p2233: 0; = if(p0783*p0787+p0784*p0788+p0785*p0789+p0786*p0790=0;0;p0790*p0786/(p0783*p0787+p0784*p0788+p0785*p0789+p0786*p0790))
- p2071: 0.151
- p3539: 0; = p1808*p3476
- p2354: 0; = p2225*p2182
- p0174: 0
- p2856: 5.08685e-7; = p2270*(p1079+p1081)
- p2278: 9.16607e-5; = p2223*p2184
- p1615: 0
- p1723: 0
- p0343: 0.5
- p1724: 0
- p3059: 0; = p2278*p1023
- p3087: 4.15056e-8; = p2306*p1082
- p1141: 0; = if(p1121=0;p1135*p0001/(p0818*p0002);0)
- p2955: 0; = p2369*(p1020+p1022)
- p3167: 0; = p2386*p1082
- p2796: 0; = p2405*(p1019+p1021)
- p0351: 0.5
- p1229: 0.00133536; = IF(p1221=0;0;p1228*p1221)
- p3249: 0
- p3447: 0; = p3371*p1240
- p1795: 0
- p1705: 0
- p3399: 0; = p3380*p1234
- p1722: 0
- p3197: 0; = p2416*p1082
- p1219: 0; = if(p1218=0;0;SQRT(2)*(IF((2*p1218-1)<0;-1;IF((2*p1218-1)>0;1;0))*SQRT(SQRT((2/(pi()*0.140012289)+LN(1-(2*p1218-1)^2)/2)^2-LN(1-(2*p1218-1)^2)/0.140012289)-(2/(pi()*0.140012289)+LN(1-(2*p1218-1)^2)/2))))
- p3475: 0.0732733; = p3380*p1241
- p2675: 5.45341e-5; = p2284*(p1019+p1021)
- p1344: 195158; = IF(p1318=0;p1327*p0801;0)
- p1048: 0.000645242; = IF(p1012=0;IF(p1037+p1044+p1045+p1046+p1047=1;0;IF(p1037+p1044+p1045+p1046+p1047+p1042>1;1-(p1037+p1044+p1045+p1046+p1047);p1042));0)
- p0724: 15.626; = p0064*(1+p0592*p0196/100)
- p3075: 0; = p2294*p1023
- p3482: 0; = if(p1328+p1330+p1332+p1334+p1336+p1338+p1340+p1342+p1344=0;0;p1340/(p1328+p1330+p1332+p1334+p1336+p1338+p1340+p1342+p1344))
- p3284: 0.275
- p1279: 0
- p1898: 0
- p0932: 0; = p0801*p0926
- p1732: 0.715577
- p1103: 0.652345; = IF(p1071=0;IF(p1096+p1101+p1102=1;0;IF(p1096+p1101+p1102+p1099>1;1-(p1096+p1101+p1102);p1099));0)
- p2701: 1.78976e-5; = p2310*(p1078+p1080)
- p0843: -0.0308386
- p2387: 0; = p2229*p2216
- p1794: 0
- p0695: 0
- p2338: 0.000822718; = p2228*p2206
- p0580: 0; = IF(p0316<0.5;-SQRT(p0007*EXP(p0448^2*p0008)-p0007);SQRT(p0007*EXP(p0448^2*p0008)-p0007))
- p2550: 0; = p2354*p1014
- p2221: 8.48851e-5; = p1155-p2220
- p2148: 2.93951e-7; = p2015*p2076*p2110/(p0818*1000)
- p2012: 0.0102252
- p3042: 1.97521e-6; = p2261*p1082
- p1114: 0.216028
- p0083: 0.389
- p2568: 0; = p2372*p1014
- p2310: 0.000129122; = p2227*p2217
- p1107: 4.55531e6; = IF(p1071=0;p1105*p1101*p1095;0)
- p3183: 0; = p2402*p1023
- p0960: 0; = if(and(p0683>0;or(p0807=480;p0807=32;p0807=1;and(p0807=60;p0901<0.03)));p0936;0)
- p1911: 0
- p0373: 0.5
- p2297: 0.000456538; = p2227*p2204
- p1854: 0
- p0581: 0; = IF(p0317<0.5;-SQRT(p0007*EXP(p0449^2*p0008)-p0007);SQRT(p0007*EXP(p0449^2*p0008)-p0007))
- p3190: 0; = p2409*p1023
- p1273: 0; = p1267*p1252/p0818
- p1068: 0.0395314; = IF(p1012=0;p1054/(p1061*p0818);0)
- p1066: 0.00750714; = IF(p1012=0;p1052/(p1059*p0818);0)
- p1947: 0
- p1287: 0
- p0317: 0.5
- p2766: 0; = p2375*(p1078+p1080)
- p1143: 0; = if(p1121=0;p1137*p0001/(p0818*p0002);0)
- p4086: 1.31076e-7; = p1943*p3478
- p0916: 0.318954; = p0826+(p0832*(1+p0894))/p0818
- p2608: 0; = p2412*p1014
- p0650: 0; = IF(p0386<0.5;-SQRT(p0007*EXP(p0518^2*p0008)-p0007);SQRT(p0007*EXP(p0518^2*p0008)-p0007))
- p1944: 0
- p1554: 0
- p2253: 3.4966e-5; = p2222*p2199
- p0459: 0; = SQRT(2)*(IF((2*p0327-1)<0;-1;IF((2*p0327-1)>0;1;0))*SQRT(SQRT((2/(pi()*0.140012289)+LN(1-(2*p0327-1)^2)/2)^2-LN(1-(2*p0327-1)^2)/0.140012289)-(2/(pi()*0.140012289)+LN(1-(2*p0327-1)^2)/2)))
- p1164: 57730.6; = p1163*p0801
- p1314: 0; = p1310*p1252/p0818
- p1153: 0.365265
- p1881: 0
- p2446: 0.00729393; = p2250*p1014
- p2558: 0; = p2362*p1014
- p1259: 0.957; = if(p1232>0;0;p0730/100)
- p3207: 0; = p2426*p1082
- p0781: 0
- p1591: 0
- p1031: 4.18415e-5; = IF(p1012=0;p1025*p0001/(p0818*p0002);0)
- p1820: 0
- p2929: 9.58623e-5; = p2343*(p1079+p1081)
- p1185: 0.5
- p3395: 0; = p3376*p1234
- p3245: 0; = IF(p3244=1;0;if(p3244+p0792/100>1;1-p3244;p0792/100))
- p2654: 1.21319e-5; = p2263*(p1078+p1080)
- p1840: 0
- p0641: 0; = IF(p0377<0.5;-SQRT(p0007*EXP(p0509^2*p0008)-p0007);SQRT(p0007*EXP(p0509^2*p0008)-p0007))
- p1683: 0
- p2906: 1.0523e-5; = p2320*(p1020+p1022)
- p3445: 0; = p3369*p1240
- p0920: 0.0909654; = p0676*1000/p0801
- p2193: 0.0118594; = p1054/p0818
- p0584: 0; = IF(p0320<0.5;-SQRT(p0007*EXP(p0452^2*p0008)-p0007);SQRT(p0007*EXP(p0452^2*p0008)-p0007))
- p2483: 0.00337011; = p2287*p1014
- p3115: 0; = p2334*p1023
- p2503: 3.61738e-5; = p2307*p1073
- p3450: 0; = p3374*p1240
- p2880: 0.000188122; = p2294*(p1020+p1022)
- p3895: 5.92582e-6; = p1962*p3477
- p3147: 0; = p2366*p1023
- p2175: 0.000557327; = p0895*p0908/p0818
- p1601: 0
- p3103: 0; = p2322*p1023
- p0181: 39.079
- p2757: 0; = p2366*(p1019+p1021)
- p2863: 0.000172844; = p2277*(p1020+p1022)
- p0461: 0; = SQRT(2)*(IF((2*p0329-1)<0;-1;IF((2*p0329-1)>0;1;0))*SQRT(SQRT((2/(pi()*0.140012289)+LN(1-(2*p0329-1)^2)/2)^2-LN(1-(2*p0329-1)^2)/0.140012289)-(2/(pi()*0.140012289)+LN(1-(2*p0329-1)^2)/2)))
- p2548: 4.84846e-5; = p2352*p1123
- p0975: 0; = p0973*p0974/p0818
- p1086: 0; = IF(p1071=0;p1080*(p0710/100)*p0703*1000;0)
- p0631: 0; = IF(p0367<0.5;-SQRT(p0007*EXP(p0499^2*p0008)-p0007);SQRT(p0007*EXP(p0499^2*p0008)-p0007))
- p3380: 0.163087; = p3251/p0818
- p3345: 0.160606; = if(and(p1232=0;p3256<>0);p3273*p3277*p3293;0)
- p0895: 3.57008e9; = p0894*p0830
- p2103: 0.912485
- p0466: 0; = SQRT(2)*(IF((2*p0334-1)<0;-1;IF((2*p0334-1)>0;1;0))*SQRT(SQRT((2/(pi()*0.140012289)+LN(1-(2*p0334-1)^2)/2)^2-LN(1-(2*p0334-1)^2)/0.140012289)-(2/(pi()*0.140012289)+LN(1-(2*p0334-1)^2)/2)))
- p2127: 1.34782e-5; = p2015*p2055*p2089/(p0818*1000)
- p2509: 0; = p2313*p1123
- p1070: 0.0171426; = IF(p1012=0;p1056/(p1063*p0818);0)
- p3068: 0; = p2287*p1023
- p2486: 6.84245e-6; = p2290*p1014
- p2530: 7.06789e-5; = p2334*p1014
- p0802: 6.6e6
- p2531: 0.000810278; = p2335*p1014
- p0577: 0; = IF(p0313<0.5;-SQRT(p0007*EXP(p0445^2*p0008)-p0007);SQRT(p0007*EXP(p0445^2*p0008)-p0007))
- p1670: 0
- p0670: 0
- p1963i: 0; = p1706*p1910+p1707*p1911+p1708*p1912+p1709*p1913+p1710*p1914+p1711*p1915+p1712*p1916+p1713*p1917+p1714*p1918+p1715*p1919+p1716*p1920+p1717*p1921+p1718*p1922+p1719*p1923+p1720*p1924+p1721*p1925+p1722*p1926+p1723*p1927+p1724*p1928
- p4719: 2.70389e-5; = p1962*p3481
- p1963g: 6.31316e-5; = p1667*p1871+p1668*p1872+p1669*p1873+p1670*p1874+p1671*p1875+p1672*p1876+p1673*p1877+p1674*p1878+p1675*p1879+p1676*p1880+p1677*p1881+p1678*p1882+p1679*p1883+p1680*p1884+p1681*p1885+p1682*p1886+p1683*p1887+p1684*p1888+p1685*p1889
- p3356: 1.15161e8; = if(p1232=0;p3306+p3317+p3328+p3339+p3350;0)
- p1217: 0
- p2571: 0; = p2375*p1073
- p4299: 3.78504e-8; = p1950*p3479
- p0606: 0; = IF(p0342<0.5;-SQRT(p0007*EXP(p0474^2*p0008)-p0007);SQRT(p0007*EXP(p0474^2*p0008)-p0007))
- p3305: 0.856081; = if(and(p1232=0;p3252<>0);1-(p3301+p3302+p3303+p3304);0)
- p0179: 48.792
- p3008: 0; = p2422*(p1079+p1081)
- p2031: 0.465411
- p4704: 1.99933e-7; = p1943*p3481
- p1261: 0; = if(p1232>0;0;p0732/100)
- p0777: 0
- p1708: 0
- p1821: 0
- p2357: 0; = p2225*p2185
- p0184: 36.88
- p4981: 0; = p1808*p3483
- p3101: 0; = p2320*p1023
- p2765: 0; = p2374*(p1019+p1021)
- p0838: 6.9069e9; = (p0833-p0836)*p0837
- p1596: 0
- p2619: 0; = p2423*p1073
- p0866: 0; = IF(p0858+p0864+p0865=1;0;IF(p0858+p0864+p0865+p0861>1;1-(p0858+p0864+p0865);p0861))
- p0633: 0; = IF(p0369<0.5;-SQRT(p0007*EXP(p0501^2*p0008)-p0007);SQRT(p0007*EXP(p0501^2*p0008)-p0007))
- p2059: 1.00168
- p2789: 0; = p2398*(p1019+p1021)
- p2075: 0.072
- p3402: 0; = p3364*p1238
- p2713: 2.46217e-5; = p2322*(p1019+p1021)
- p2764: 0; = p2373*(p1019+p1021)
- p1755: 0
- p2994: 0; = p2408*(p1020+p1022)
- p2897: 0; = p2311*(p1129+p1131)
- p0367: 0.5
- p2295: 0.000189614; = p2223*p2202
- p1874: 0
- p1884: 0
- p2709: 2.21786e-5; = p2318*(p1019+p1021)
- p2495: 0.000110493; = p2299*p1073
- p0962: 0; = if(and(p0683>0;or(p0807=480;p0807=32;p0807=1;and(p0807=60;p0901<0.03)));p0938;0)
- p0674: 0
- p1116: 0.000222288; = IF(p1071=0;p1106/(p1111*p0818);0)
- p1999: 3.07133e8; = (p1228+p1229)*p0818+p1164
- p1963a: 5.80313e-5; = p1550*p1754+p1551*p1755+p1552*p1756+p1553*p1757+p1554*p1758+p1555*p1759+p1556*p1760+p1557*p1761+p1558*p1762+p1559*p1763+p1560*p1764+p1561*p1765+p1562*p1766+p1563*p1767+p1564*p1768+p1565*p1769+p1566*p1770+p1567*p1771+p1568*p1772
- p2208: 0.00150084; = p1110/p0818
- p1013: 0; = p1012*p0001/(p0818*p0002)
- p2947: 0; = p2361*(p1020+p1022)
- p2328: 0.00511659; = p2224*p2196
- p0995: 0; = p0991*p0001*p0004/(p0818*p0002)
- p2767: 0; = p2376*(p1078+p1080)
- p1255: 0; = if(p1232>0;0;p0737/100)
- p3163: 0; = p2382*p1082
- p1965: 0.000370666; = p1963+p1959*p1964*1000/p0818
- p1257: 0; = if(p1232>0;0;IF(p1253+p1256=1;0;IF(p1253+p1256+p1255>1;1-(p1253+p1256);p1255)))
- p2859: 0; = p2273*(p1129+p1131)
- p2340: 0.00112453; = p2228*p2208
- p2431: 0; = p2236*p2221
- p0532: 0; = SQRT(2)*(IF((2*p0400-1)<0;-1;IF((2*p0400-1)>0;1;0))*SQRT(SQRT((2/(pi()*0.140012289)+LN(1-(2*p0400-1)^2)/2)^2-LN(1-(2*p0400-1)^2)/0.140012289)-(2/(pi()*0.140012289)+LN(1-(2*p0400-1)^2)/2)))
- p1605: 0
- p2702: 0; = p2311*(p1128+p1130)
- p1294: 0; = p1290*p1252/p0818
- p0268: 2.295
- p1976: 0.115222
- p1952: 0
- p2382: 0; = p2229*p2211
- p1669: 0.523221
- p1277: 0
- p1842: 0
- p1085: 194370; = IF(p1071=0;p1079*(p0710/100)*p0703*1000;0)
- p1034: 4.13638e-5; = IF(p1012=0;p1028*p0001/(p0818*p0002);0)
- p2174: 0.00364561; = p0895*p0903/p0818
- p3252: 2.82539e8; = p1252*(p1267*(1-p3247)+p1270*(1-p3248)+p1271*(1-p3249)+p1272*(1-p3250))
- p1590: 0
- p2229: 0; = if(p0774*p0778+p0775*p0779+p0776*p0780+p0777*p0781=0;0;p0781*p0777/(p0774*p0778+p0775*p0779+p0776*p0780+p0777*p0781))
- p1055: 305124; = IF(p1012=0;p1048*p1036;0)
- p3121: 1.88921e-6; = p2340*p1082
- p1225: 1.088; = IF(p1221=0;0;p1223+1.2*p1224)
- p1163: 0.0086165
- p1331: 0.000151524; = p1330*p0001/(p0818*p0002)
- p3426: 0; = p3369*p1239
- p1720: 0
- p1292: 0; = IF(p1287+p1290+p1291=p1261;0;p1261-(p1287+p1290+p1291))
- p1809: 0
- p1835: 1.34943e-5; = p1427*1000/p0818
- p2698: 6.06755e-6; = p2307*(p1078+p1080)
- p0880: 0; = p0868*p0856
- p3455: 0; = p3379*p1240
- p3000: 0; = p2414*(p1079+p1081)
- p0782: 19.68; = p0122*(1+p0650*p0254/100)
- p1995: 50
- p0853: 0; = p0803/(p0802+p0803)
- p3048: 4.3956e-8; = p2267*p1082
- p0926: 0; = IF(p0918+p0923+p0924+p0925=1;0;IF(p0918+p0923+p0924+p0925+p0922>1;1-(p0918+p0923+p0924+p0925);p0922))
- p2245: 0.000409775; = p2222*p2190
- p2452: 0.00013969; = p2256*p1014
- p1040: 0.0238398
- p2101: 0.620397
- p1849: 0
- p2491: 0.000136765; = p2295*p1014
- p3085: 7.85057e-7; = p2304*p1082
- p2937: 0; = p2351*(p1129+p1131)
- p2577: 0; = p2381*p1073
- p3467: 0; = p3372*p1241
- p1127: 0; = if(p1121=0;p0721/100;0)
- p0573: 0; = IF(p0309<0.5;-SQRT(p0007*EXP(p0441^2*p0008)-p0007);SQRT(p0007*EXP(p0441^2*p0008)-p0007))
- p1235: 0.55071; = if(p1232>0;0;p0727/100)
- p3180: 0; = p2399*p1023
- p3372: 0; = if(p1232=0;p3245*p3360/p0818;0)
- p2100: 0.705744
- p2516: 5.3155e-5; = p2320*p1014
- p1184: 7.39208e-8; = p1182/p0818
- p2230: 0; = if(p0783*p0787+p0784*p0788+p0785*p0789+p0786*p0790=0;0;p0787*p0783/(p0783*p0787+p0784*p0788+p0785*p0789+p0786*p0790))
- p2787: 0; = p2396*(p1019+p1021)
- p1793: 0
- p3189: 0; = p2408*p1023
- p2782: 0; = p2391*(p1128+p1130)
- p0320: 0.5
- p1528: 52
- p1734: 0
- p1916: 0
- p1602: 0
- p2697: 3.42446e-6; = p2306*(p1078+p1080)
- p1234: 0; = if(p1232>0;0;p0726/100)
- p1970: 6.7e6; = p0801
- p1960: 676.2; = IF(p1959-p1958<0;0;p1959-p1958)
- p0786: 0
- p1062: 0.16
- p1725: 0
- p0585: 0; = IF(p0321<0.5;-SQRT(p0007*EXP(p0453^2*p0008)-p0007);SQRT(p0007*EXP(p0453^2*p0008)-p0007))
- p3034: 0; = p2253*p1023
- p3416: 0.00571385; = p3378*p1238
- p2251: 9.68947e-6; = p2222*p2197
- p0901: 0.02704
- p2730: 0.00094684; = p2339*(p1078+p1080)
- p2537: 0.000420231; = p2341*p1073
- p1178: 5.16547e-8; = p1176/p0818
- p2385: 0; = p2229*p2214
- p5159: 1.57344e-7; = p1780*p3484
- p3415: 0.000525105; = p3377*p1238
- p0474: 0; = SQRT(2)*(IF((2*p0342-1)<0;-1;IF((2*p0342-1)>0;1;0))*SQRT(SQRT((2/(pi()*0.140012289)+LN(1-(2*p0342-1)^2)/2)^2-LN(1-(2*p0342-1)^2)/0.140012289)-(2/(pi()*0.140012289)+LN(1-(2*p0342-1)^2)/2)))
- p2972: 0; = p2386*(p1079+p1081)
- p1648: 0
- p1014: 0.72128; = IF(p1012=0;p0705/100;0)
- p2009: 0.0124496; = ((p1983*p1985+p1989*p1991+p1995*p1997+p2003*p2005+p1976*p1977+p1978*p1979+p1998*p1999)/p0818)*p0005*p0002/1000
- p2498: 6.82964e-5; = p2302*p1073
- p1083: 4.81768e6; = IF(p1071=0;p1073*(p0710/100)*p0703*1000;0)
- p2409: 0; = p2234*p2199
- p3232: 7.39208e-8; = p1182/p0818
- p0767: 17.318; = p0107*(1+p0635*p0239/100)
- p2014: 8.84338e7; = p0833*p2011*p2013
- p1304: 0; = p1300*p1252/p0818
- p0718: 0
- p2541: 0.000125621; = p2345*p1073
- p2970: 0; = p2384*(p1079+p1081)
- p1865: 0
- p0951: 4.55039e-6; = if(and(p0683=0;or(p0807=480;p0807=32;p0807=1;and(p0807=60;p0901<0.03)));p0939;0)
- p1243: 41619.9; = if(p1232>0;0;p1238*(p0725/100)*p0723*1000)
- p2389: 0; = p2233*p2218
- p1151: 619002; = if(p1121=0;p1149*p1148*p1145;0)
- p2910: 7.44491e-6; = p2324*(p1020+p1022)
- p0045: 72.128
- p2269: 0.000174943; = p2226*p2215
- p0796: 97.367; = p0136*(1+p0664*p0268/100)
- p3432: 0; = p3375*p1239
- p2872: 0.000116583; = p2286*(p1020+p1022)
- p0983: 0; = if(p0886=0;0;min(1;(p0695*p0694*1000*p0697/100)/p0886))
- p1108: 1.49924e6; = IF(p1071=0;p1105*p1102*p1095;0)
- p3365: 0; = if(p1232=0;p3244*p3359/p0818;0)
- p3257: 0.849747
- p1985: 1.38391e9; = (if(p1057=0;0;p1050/p1057)+if(p1058=0;0;p1051/p1058)+if(p1059=0;0;p1052/p1059)+if(p1060=0;0;p1053/p1060)+if(p1061=0;0;p1054/p1061)+if(p1062=0;0;p1055/p1062)+if(p1063=0;0;p1056/p1063))*(1+p1157)
- p2525: 3.53612e-6; = p2329*p1014
- p2671: 0.000134683; = p2280*(p1019+p1021)
- p3222: 0.224242; = IF(p3216=0;0;p1223*40.078/100.0869)
- p2883: 1.5221e-5; = p2297*(p1079+p1081)
- p1097: 0.0625488
- p0273: 0.5
- p0963: 0; = if(and(p0683>0;or(p0807=480;p0807=32;p0807=1;and(p0807=60;p0901<0.03)));p0939;0)
- p2885: 4.45786e-6; = p2299*(p1079+p1081)
- p3184: 0; = p2403*p1023
- p2147: 3.58429e-7; = p2015*p2075*p2109/(p0818*1000)
- p0570: 0; = IF(p0306<0.5;-SQRT(p0007*EXP(p0438^2*p0008)-p0007);SQRT(p0007*EXP(p0438^2*p0008)-p0007))
- p1890: 0
- p0610: 0; = IF(p0346<0.5;-SQRT(p0007*EXP(p0478^2*p0008)-p0007);SQRT(p0007*EXP(p0478^2*p0008)-p0007))
- p4616: 8.3572e-6; = p1855*p3481
- p3320: 0; = if(and(p1232=0;p3253<>0);p3253*(p3264-p3315)/p3316;0)
- p2168: 0.00685534; = p2166*(p0903)
- p3309: 1.07718e7; = if(and(p1232=0;p3252<>0);p3252*(p3260-p3304)/p3305;0)
- p2719: 0.000695498; = p2328*(p1019+p1021)
- p2689: 5.72326e-5; = p2298*(p1078+p1080)
- p1885: 0
- p2380: 0; = p2229*p2209
- p0114: 43.871
- p0642: 0; = IF(p0378<0.5;-SQRT(p0007*EXP(p0510^2*p0008)-p0007);SQRT(p0007*EXP(p0510^2*p0008)-p0007))
- p3082: 3.07037e-7; = p2301*p1082
- p1936: 4.10354e-6; = p1528*1000/p0818
- p2053: 1.45647
- p2686: 2.57742e-5; = p2295*(p1019+p1021)
- p3388: 0; = p3369*p1234
- p2373: 0; = p2225*p2202
- p2420: 0; = p2235*p2210
- p0247: 18.679
- p2819: 0; = p2428*(p1128+p1130)
- p2131: 1.57429e-6; = p2015*p2059*p2093/(p0818*1000)
- p3131: 4.03554e-6; = p2350*p1132
- p1799: 0
- p4016: 4.00832e-5; = p1873*p3478
- p2860: 0; = p2274*(p1129+p1131)
- p2129: 7.42265e-6; = p2015*p2057*p2091/(p0818*1000)
- p2540: 1.20133e-5; = p2344*p1073
- p1129: 0; = if(p1121=0;IF(p1123+p1128=1;0;IF(p1123+p1128+p1125>1;1-(p1123+p1128);p1125));0)
- p0928: 1.59967e6; = p0801*p0918
- p0355: 0.5
- p3054: 0; = p2273*p1132
- p2156: 1.37123e-7; = p2015*p2085*p2118/(p0818*1000)
- p0239: 19.744
- p1193: 0; = IF(OR(p1036=0;p1095=0);0.0001*p0857;0)
- p3250: 0.875
- p3434: 0; = p3377*p1239
- p2476: 0.000714661; = p2280*p1014
- p2812: 0; = p2421*(p1078+p1080)
- p0716: 19.68; = p0056*(1+p0584*p0188/100)
- p0125: 6.683
- p2150: 6.03374e-7; = p2015*p2078*p2112/(p0818*1000)
- p2449: 2.52203e-5; = p2253*p1014
- p2120: 0.51828
- p3256: 1.2695e7; = p1252*(p1307*(1-p3247)+p1310*(1-p3248)+p1311*(1-p3249)+p1312*(1-p3250))
- p2464: 3.83094e-5; = p2268*p1073
- p2153: 9.79838e-9; = p2015*p2081*p2115/(p0818*1000)
- p2377: 0; = p2229*p2206
- p2690: 1.85334e-5; = p2299*(p1078+p1080)
- p2435: 6.75273e-5; = p2239*p1014
- p0122: 19.68
- p0103: 6699.91
- p3172: 0; = p2391*p1132
- p0221: 50.59
- p2107: 0.881623
- p0790: 0
- p2320: 7.36954e-5; = p2224*p2187
- p0638: 0; = IF(p0374<0.5;-SQRT(p0007*EXP(p0506^2*p0008)-p0007);SQRT(p0007*EXP(p0506^2*p0008)-p0007))
- p1608: 0
- p0118: 8.412
- p0669: 41.3071; = p0009*(1+p0537*p0141/100)
- p3078: 7.66984e-7; = p2297*p1082
- p1951: 0
- p0213: 8.87
- p3130: 1.33475e-6; = p2349*p1082
- p2400: 0; = p2234*p2189
- p2123: 0.263965
- p2372: 0; = p2225*p2201
- p0818: 1.2672e10; = p0806*p0807
- p3227: 0.000169374; = p3223*p1229
- p2002: 750
- p1200: 0.84
- p2066: 0.109412
- p2248: 0.00477235; = p2222*p2193
- p2627: 0; = p2431*p1123
- p2808: 0; = p2417*(p1078+p1080)
- p2304: 0.000467296; = p2227*p2211
- p1718: 0
- p2898: 0; = p2312*(p1129+p1131)
- p2306: 2.47057e-5; = p2227*p2213
- p3873: 4.55698e-7; = p1936*p3477
- p1236: 0; = if(p1232>0;0;p0728/100)
- p2442: 7.43263e-5; = p2246*p1014
- p1647: 0
- p1642: 0
- p1645: 0
- p2538: 0.000181442; = p2342*p1073
- p0415: 0; = SQRT(2)*(IF((2*p0283-1)<0;-1;IF((2*p0283-1)>0;1;0))*SQRT(SQRT((2/(pi()*0.140012289)+LN(1-(2*p0283-1)^2)/2)^2-LN(1-(2*p0283-1)^2)/0.140012289)-(2/(pi()*0.140012289)+LN(1-(2*p0283-1)^2)/2)))
- p2267: 2.61643e-5; = p2226*p2213
- p3409: 0; = p3371*p1238
- p2991: 0; = p2405*(p1020+p1022)
- p2440: 0.000258216; = p2244*p1014
- p1039: 0.0673925
- p0243: 9.944
- p4926: 0; = p1963*p3482
- p1977: 2.36187e9; = p1252+p1188
- p1779: 0
- p2687: 0.000295481; = p2296*(p1019+p1021)
- p2467: 0.000113002; = p2271*p1073
- p2331: 1.76917e-5; = p2224*p2199
- p1328: 0; = p1319*p0801
- p0798: 87.015; = p0138*(1+p0666*p0270/100)
- p2161: 5.33037e-8; = p2015*p2085*p2123/(p0818*1000)
- p2026: 55.14
- p0717: 99.256; = p0057*(1+p0585*p0189/100)
- p3148: 0; = p2367*p1023
- p0140: 19.68
- p2384: 0; = p2229*p2213
- p2374: 0; = p2225*p2203
- p0696: 0
- p2023: 2.12
- p2758: 0; = p2367*(p1019+p1021)
- p0792: 0
- p1254: 0; = if(p1232>0;0;p0736/100)
- p0732: 0
- p3291: 0.437
- p1747: 0
- p0574: 0; = IF(p0310<0.5;-SQRT(p0007*EXP(p0442^2*p0008)-p0007);SQRT(p0007*EXP(p0442^2*p0008)-p0007))
- p2350: 0.000542411; = p2232*p2218
- p0863: 0; = p0675*1000/p0856
- p3314: 0; = if(and(p1232=0;p3253<>0);p3263*p3289;0)
- p2707: 8.5033e-5; = p2316*(p1019+p1021)
- p2842: 2.76542e-5; = p2256*(p1020+p1022)
- p2094: 0.922577
- p1639: 0
- p1775: 0
- p2997: 0; = p2411*(p1020+p1022)
- p1963e: 6.74716e-6; = p1628*p1832+p1629*p1833+p1630*p1834+p1631*p1835+p1632*p1836+p1633*p1837+p1634*p1838+p1635*p1839+p1636*p1840+p1637*p1841+p1638*p1842+p1639*p1843+p1640*p1844+p1641*p1845+p1642*p1846+p1643*p1847+p1644*p1848+p1645*p1849+p1646*p1850
- p2973: 0; = p2387*(p1079+p1081)
- p3238: 0.854735; = IF(p3237+p3235+p3236>1;1-(p3235+p3236);p3237)
- p0698: 0
- p2546: 0.000538375; = p2350*p1123
- p2631: 4.38339e-5; = p2240*(p1019+p1021)
- p2528: 0.00114547; = p2332*p1014
- p0771: 85.009; = p0111*(1+p0639*p0243/100)
- p1124: 0; = if(p1121=0;p0718/100;0)
- p3118: 4.26824e-6; = p2337*p1082
- p2837: 1.38356e-6; = p2251*(p1020+p1022)
- p1613: 0
- p2128: 5.0081e-6; = p2015*p2056*p2090/(p0818*1000)
- p1400: 127
- p2133: 2.39266e-6; = p2015*p2061*p2095/(p0818*1000)
- p2852: 8.34207e-8; = p2266*(p1079+p1081)
- p0836: 9.60592e8; = p0831*p0835*p0801/(1-p0831)
- p0989: 0; = p0985*p0886
- p3033: 0; = p2252*p1023
- p1700: 0
- p2219: 0.000764371; = p1154-p2218
- p3328: 0; = if(and(p1232=0;p3255<>0);p3255*(p3265*p3277-p3323)/p3327;0)
- p2309: 1.4407e-5; = p2227*p2216
- p1761: 0
- p2716: 5.73545e-5; = p2325*(p1019+p1021)
- p2554: 0; = p2358*p1014
- p3460: 0; = p3365*p1241
- p0845: 0.5
- p1744: 0
- p1753: 0
- p2712: 0.000128149; = p2321*(p1019+p1021)
- p1080: 0; = IF(p1071=0;IF(p1073+p1078+p1079=1;0;IF(p1073+p1078+p1079+p1076>1;1-(p1073+p1078+p1079);p1076));0)
- p0985: 0; = IF(p0982=1;0;IF(p0982+p0983>1;1-p0982;p0983))
- p3273: 0.753577
- p2908: 2.58643e-5; = p2322*(p1020+p1022)
- p1156: 0.114893; = p1064+p1065+p1066+p1067+p1068+p1069+p1070+p1116+p1117+p1118+p1119+p1120+p1154+p1155
- p2098: 0.856281
- p0897: 0
- p0871: 0; = p0870*p0001*p0003/(p0818*p0002)
- p2000: 4000
- p1322: 0.115615; = IF(((p0745*1000*p0749/100)+(p0754*1000*p0758/100))/p0801<0;0;((p0745*1000*p0749/100)+(p0754*1000*p0758/100))/p0801)
- p2984: 0; = p2398*(p1020+p1022)
- p2614: 0; = p2418*p1073
- p3153: 0; = p2372*p1023
- p2417: 0; = p2235*p2207
- p0401: 0.5
- p1244: 0; = if(p1232>0;0;p1239*(p0725/100)*p0723*1000)
- p2376: 0; = p2229*p2205
- p2176: 0.00339211; = p0895*p0913/p0818
- p2261: 0.00117572; = p2226*p2207
- p2658: 3.62663e-6; = p2267*(p1078+p1080)
- p2737: 3.7334e-5; = p2346*(p1078+p1080)
- p2851: 1.64994e-5; = p2265*(p1079+p1081)
- p2013: 0.85
- p2703: 0; = p2312*(p1128+p1130)
- p0968: 0
- p2353: 8.48851e-5; = p2232*p2221
- p0946: 0.000112626; = if(and(p0683=0;or(p0807=480;p0807=32;p0807=1;and(p0807=60;p0901<0.03)));p0934;0)
- p1790: 0
- p3122: 8.54324e-7; = p2341*p1082
- p1893: 0
- p1003: 0; = p0999*p0888
- p3208: 0; = p2427*p1082
- p2932: 8.97997e-6; = p2346*(p1079+p1081)
- p0832: 2.02409e9; = p0831*p0830/(1-p0831)
- p2368: 0; = p2225*p2197
- p1205: 0
- p2277: 0.00121048; = p2223*p2183
- p3154: 0; = p2373*p1023
- p0212: 3.381
- p2811: 0; = p2420*(p1078+p1080)
- p2821: 0; = p2430*(p1128+p1130)
- p2905: 7.31155e-5; = p2319*(p1020+p1022)
- p0755: 0
- p2864: 1.30882e-5; = p2278*(p1020+p1022)
- p1002: 0; = p0996*p0888
- p0911: 0.0041
- p0953: 0; = if(and(p0683>0;or(p0807=56;p0807=100;and(p0807=60;p0901>0.06)));p0935;0)
- p1025: 594291; = IF(p1012=0;p1019*(p0704/100)*p0703*1000;0)
- p2586: 0; = p2390*p1123
- p3586: 0; = p1855*p3476
- p1300: 0; = IF(p1297=p1265;0;IF(p1297+p1298>p1265;p1265-p1297;p1298))
- p0182: 5.076
- p3347: 0.00107264; = if(and(p1232=0;p3256<>0);p3275*p3289;0)
- p2246: 0.000103048; = p2222*p2191
- p2418: 0; = p2235*p2208
- p1741: 0
- p2669: 1.24594e-5; = p2278*(p1019+p1021)
- p0008: 0.0739645; = (p0007-1.5)/(p0007-1)^2
- p2225: 0; = if(p0765*p0769+p0766*p0770+p0767*p0771+p0768*p0772=0;0;p0772*p0768/(p0765*p0769+p0766*p0770+p0767*p0771+p0768*p0772))
- p1989: 50
- p0980: 0; = IF(p0977=0;0;p0977*p0001/(p0818*p0002))
- p0673: 0
- p1962: 5.33617e-5; = p1960*1000/p0818
- p2226: 0.128961; = if(p0774*p0778+p0775*p0779+p0776*p0780+p0777*p0781=0;0;p0778*p0774/(p0774*p0778+p0775*p0779+p0776*p0780+p0777*p0781))
- p2344: 1.45374e-5; = p2228*p2212
- p2975: 0; = p2389*(p1129+p1131)
- p3216: 0.06; = IF(OR(p1226=0;p1228=0);0;1-p3213-p3214-p3215)
- p1817: 0
- p1983: 50
- p4569: 5.0783e-6; = p1808*p3481
- p0993: 0; = p0989*p0001*p0004/(p0818*p0002)
- p1908: 0
- p2167: 0.242982; = p2166*(p0898)
- p3133: 3.63429e-7; = p2352*p1132
- p0342: 0.5
- p1671: 0
- p2628: 0.000765606; = p2237*(p1019+p1021)
- p3410: 0; = p3372*p1238
- p3142: 0; = p2361*p1023
- p1897: 0
- p2500: 0.000386159; = p2304*p1073
- p2723: 0.000215871; = p2332*(p1019+p1021)
- p0546: 0; = IF(p0282<0.5;-SQRT(p0007*EXP(p0414^2*p0008)-p0007);SQRT(p0007*EXP(p0414^2*p0008)-p0007))
- p4903: 0; = p1936*p3482
- p1295: 0; = p1291*p1252/p0818
- p2672: 1.93839e-5; = p2281*(p1019+p1021)
- p3221: 0.146975; = IF(p3216=0;0;p1223*12.0107/100.0869+(1-p1224)*12.0107/84.3139)
- p1879: 0
- p2158: 8.90516e-7; = p2015*p2082*p2120/(p0818*1000)
- p0881: 0; = p0880*p0001*p0003/(p0818*p0002)
- p3323: 0; = if(and(p1232=0;p3255<>0);p3265*p3277*(p3299*p3291+(1-p3299)*p3295);0)
- p0727: 55.071; = p0067*(1+p0595*p0199/100)
- p2615: 0; = p2419*p1073
- p0242: 18.878
- p3002: 0; = p2416*(p1079+p1081)
- p1785: 0
- p2638: 0.000113356; = p2247*(p1019+p1021)
- p2715: 7.08724e-6; = p2324*(p1019+p1021)
- p3368: 0; = if(p1232=0;p3245*p3356/p0818;0)
- p0827: 0; = p0818*p0819*p0823
- p0047: 5.273
- p2206: 0.00109803; = 9*1.00794*p2204/30.973762
- p1733: 0
- p1618: 0
- p0906: 0.0043465
- p5123: 0; = p1950*p3483
- p1157: 0.260052
- p2323: 0.000207333; = p2224*p2190
- p3458: 0; = p3363*p1241
- p3451: 0; = p3375*p1240
- p2753: 0; = p2362*(p1019+p1021)
- p1566: 0
- p3408: 0; = p3370*p1238
- p2565: 0; = p2369*p1014
- p1327: 0.029128; = if(p1318=0;if(p1327a=0;1;if(p1327a<0;0;p1327a));0)
- p0826: 0.1145; = 1-p0825/p0818
- p2754: 0; = p2363*(p1019+p1021)
- p3120: 1.1476e-5; = p2339*p1082
- p1081: 0; = IF(p1071=0;IF(p1073+p1078+p1079+p1080=1;0;IF(p1073+p1078+p1079+p1080+p1077>1;1-(p1073+p1078+p1079+p1080);p1077));0)
- p0788: 0
- p3083: 1.38846e-7; = p2302*p1082
- p1659: 0
- p2303: 3.5684e-5; = p2227*p2210
- p1611: 0
- p0750: 0
- p1256: 0; = if(p1232>0;0;IF(p1253=1;0;IF(p1253+p1254>1;1-p1253;p1254)))
- p0934: 0.000112626; = p0928*p0001/(p0818*p0002)
- p3364: 0; = if(p1232=0;p3244*p3358/p0818;0)
- p1150: 6.87343e6; = if(p1121=0;p1149*p1146*p1145;0)
- p0876: 0; = p0866*p0856
- p3173: 0; = p2392*p1132
- p4204: 6.59227e-7; = p1855*p3479
- p3424: 0; = p3367*p1239
- p0734: 0
- p2121: 0.822447
- p0345: 0.5
- p2881: 2.7075e-5; = p2295*(p1020+p1022)
- p1138: 9809.95; = if(p1121=0;p1132*(p0716/100)*p0703*1000;0)
- p2835: 0.000146076; = p2249*(p1020+p1022)
- p0105: 67.409
- p1892: 0
- p1179: 0.5
- p0379: 0.5
- p0307: 0.5
- p1581: 0
- p0803: 0
- p2981: 0; = p2395*(p1020+p1022)
- p1635: 0
- p1142: 0; = if(p1121=0;p1136*p0001/(p0818*p0002);0)
- p0942: 0; = if(and(p0683=0;p0948=0);p0936;0)
- p1053: 1.12734e7; = IF(p1012=0;p1046*p1036;0)
- p1610: 0
- p4559: 1.23958e-6; = p1798*p3481
- p3168: 0; = p2387*p1082
- p1582: 0
- p3880: 4.38171e-8; = p1943*p3477
- p3417: 0.000883761; = p3379*p1238
- p1109: 4.7509e7; = IF(p1071=0;p1105*p1103*p1095;0)
- p2919: 9.72198e-5; = p2333*(p1020+p1022)
- p2025: 9.55911e-6; = p2015*p2023*p2024/(p0818*1000)
- p1285: 0; = p1281*p1252/p0818
- p1938: 0
- p3376: 0.000222043; = if(p1232=0;p3246*p3358/p0818;0)
- p2349: 0.000794493; = p2228*p2217
- p0018: 2217.22
- p1078: 0.13861; = IF(p1071=0;IF(p1073=1;0;IF(p1073+p1074>1;1-p1073;p1074));0)
- p3004: 0; = p2418*(p1079+p1081)
- p3414: 0.000122281; = p3376*p1238
- p2963: 0; = p2377*(p1079+p1081)
- p0440: 0; = SQRT(2)*(IF((2*p0308-1)<0;-1;IF((2*p0308-1)>0;1;0))*SQRT(SQRT((2/(pi()*0.140012289)+LN(1-(2*p0308-1)^2)/2)^2-LN(1-(2*p0308-1)^2)/0.140012289)-(2/(pi()*0.140012289)+LN(1-(2*p0308-1)^2)/2)))
- p3194: 0; = p2413*p1023
- p1173: 0.5
- p1926: 0
- p2463: 2.16214e-5; = p2267*p1073
- p3109: 0; = p2328*p1023
- p2662: 1.89542e-5; = p2271*(p1078+p1080)
- p2428: 0; = p2236*p2218
- p3463: 0; = p3368*p1241
- p2871: 1.4406e-5; = p2285*(p1020+p1022)
- p2564: 0; = p2368*p1014
- p3246: 1; = IF(p3244+p3245=1;0;1-(p3244+p3245))
- p2849: 2.9181e-6; = p2263*(p1079+p1081)
- p1006: 0; = p1002*p0001*p0004/(p0818*p0002)
- p2678: 0.00063512; = p2287*(p1019+p1021)
- p2040: 0.44
- p1833: 0
- p3264: 0.0887032
- p2122: 0.341195
- p1288: 0
- p1192: 6.64659e-8; = p1188*p1191/p0818
- p2024: 0.748682
- p1620: 0
- p3104: 0; = p2323*p1023
- p2961: 0; = p2375*(p1079+p1081)
- p2271: 0.000136745; = p2226*p2217
- p2688: 6.32808e-5; = p2297*(p1078+p1080)
- p0257: 4.755
- p2032: 0.448886
- p3270: 0.0747083
- p0443: 0; = SQRT(2)*(IF((2*p0311-1)<0;-1;IF((2*p0311-1)>0;1;0))*SQRT(SQRT((2/(pi()*0.140012289)+LN(1-(2*p0311-1)^2)/2)^2-LN(1-(2*p0311-1)^2)/0.140012289)-(2/(pi()*0.140012289)+LN(1-(2*p0311-1)^2)/2)))
- p1318: 0; = p1317*p0001/(p0818*p0002)
- p2035: 1.29751e-5; = p2015*p2029*(1-p2031)/(p0818*1000)
- p2657: 3.46819e-7; = p2266*(p1078+p1080)
- p2738: 0.000140886; = p2347*(p1078+p1080)
- p4101: 1.77268e-5; = p1962*p3478
- p0947: 0.000156105; = if(and(p0683=0;or(p0807=480;p0807=32;p0807=1;and(p0807=60;p0901<0.03)));p0935;0)
- p1883: 0
- p2165: 0.613878; = (p0833-p2014)/p0818-p0839
- p2346: 0.000269345; = p2228*p2214
- p1147: 0.082617
- p0070: 95.7
- p3293: 0.3875
- p2927: 1.69543e-5; = p2341*(p1079+p1081)
- p2886: 3.70133e-5; = p2300*(p1079+p1081)
- p1213: 0
- p3340: 0; = if(and(p1232=0;p3254<>0);p3254*(p3270-p3335)/p3338;0)
- p0797: 28.624; = p0137*(1+p0665*p0269/100)
- p1674: 0
- p2482: 0.000588899; = p2286*p1014
- p2099: 0.620397
- p2635: 4.86626e-5; = p2244*(p1019+p1021)
- p3266: 0.0545989
- p0050: 87.015
- p0886: 0; = p0686*1000*p0687*p0689/100
- p3276: 0.0887032

- p3329: 0; = if(and(p1232=0;p3255<>0);p3255*(p3266-p3324)/p3327;0)
- p1914: 0
- p0896: 0.458
- p2986: 0; = p2400*(p1020+p1022)
- p2570: 0; = p2374*p1014
- p0891: 226512; = IF(p3251=0;0;62.4*6272640/(12*12*12))
- p2124: 0.263965
- p0944: 0; = if(and(p0683=0;p0950=0);p0938;0)
- p1686: 0
- p0006: 15
- p1924: 0
- p0644: 0; = IF(p0380<0.5;-SQRT(p0007*EXP(p0512^2*p0008)-p0007);SQRT(p0007*EXP(p0512^2*p0008)-p0007))
- p2237: 0.00563236; = p2222*p2182
- p0846: 0.288049; = p0841*p0845^3+p0842*p0845^2+p0843*p0845+p0844
- p2335: 0.00112339; = p2224*p2203
- p0888: 0; = p0686*1000*p0687*p0884/100
- p4491: 0; = p1936*p3480
- p2748: 0; = p2357*(p1019+p1021)
- p2763: 0; = p2372*(p1019+p1021)
- p2202: 0.000481275; = 4*1.00794*p2201/(2*14.0067)
- p1160: 0.0723857; = (p1156+p1158)*p1159
- p2021: 0.000156116; = p2020/p0818
- p1115: 0.237849
- p2741: 0; = p2350*(p1128+p1130)
- p1796: 0
- p1265: 0; = if(p1232>0;0;IF(p1259+p1263+p1264=1;0;IF(p1259+p1263+p1264+p1262>1;1-(p1259+p1263+p1264);p1262)))
- p0874: 0; = p0865*p0856
- p2360: 0; = p2225*p2188
- p0087: 11.105
- p3466: 0; = p3371*p1241
- p1791: 0
- p3018: 0; = p2237*p1023
- p2527: 1.27606e-5; = p2331*p1014
- p1585: 0
- p2092: 0.54529
- p2325: 0.000421942; = p2224*p2192
- p4093: 3.14583e-7; = p1950*p3478
- p2683: 4.65338e-6; = p2292*(p1019+p1021)
- p2988: 0; = p2402*(p1020+p1022)
- p2938: 0; = p2352*(p1129+p1131)
- p0894: 0.28
- p1917: 0
- p3308: 2.49667e6; = if(and(p1232=0;p3252<>0);p3252*(p3259-p3303)/p3305;0)
- p2181: 0.16316; = p0887+p0889+p0893+p2180
- p3198: 0; = p2417*p1082
- p2891: 7.87703e-8; = p2305*(p1079+p1081)
- p1689: 0
- p0964: 0; = 56/90000
- p1542: 12
- p0693: 0
- p3407: 0; = p3369*p1238
- p2617: 0; = p2421*p1073
- p3039: 8.12265e-7; = p2258*p1082
- p1110: 1.90187e7; = IF(p1071=0;p1105*p1104*p1095;0)
- p0794: 0
- p0930: 609468; = p0801*p0924
- p3438: 0; = p3362*p1240
- p3019: 0; = p2238*p1023
- p1836: 0
- p3374: 0.00908785; = if(p1232=0;p3246*p3356/p0818;0)
- p1005: 0; = p1001*p0888
- p1017: 0.04483; = IF(p1012=0;p0708/100;0)
- p2067: 0.446471
- p2722: 2.40483e-6; = p2331*(p1019+p1021)
- p1901: 0
- p3029: 0; = p2248*p1023
- p2777: 0; = p2386*(p1078+p1080)
- p4308: 8.07625e-6; = p1963*p3479
- p2432: 0.0298782; = p1158
- p2106: 0.856281
- p1808: 1.00221e-5; = p1400*1000/p0818
- p1552: 0
- p0974: 0
- p2109: 0.826583
- p1925: 0
- p0682: 6699.91; = p0022*(1+p0550*p0154/100)
- p0081: 0.651
- p2502: 2.04161e-5; = p2306*p1073
- p3158: 0; = p2377*p1082
- p1740: 0
- p2367: 0; = p2225*p2196
- p1974: 0; = p1969*p0001/(p0818*p0002)
- p0705: 72.128; = p0045*(1+p0573*p0177/100)
- p2011: 0.0070419
- p2771: 0; = p2380*(p1078+p1080)
- p3258: 0.0491162
- p2553: 0; = p2357*p1014
- p3128: 1.70759e-6; = p2347*p1082
- p2359: 0; = p2225*p2187
- p2489: 0.0022165; = p2293*p1014
- p1028: 587507; = IF(p1012=0;p1022*(p0704/100)*p0703*1000;0)
- p3384: 0; = p3365*p1234
- p1739: 0.583082
- p2844: 1.61196e-5; = p2258*(p1079+p1081)
- p2854: 1.5456e-6; = p2268*(p1079+p1081)
- p1933: 0
- p1709: 0
- p3108: 0; = p2327*p1023
- p0119: 9.102
- p0088: 33.22
- p1668: 0
- p2855: 5.83259e-6; = p2269*(p1079+p1081)
- p0353: 0.5
- p0315: 0.5
- p5334: 2.58266e-7; = p1955*p3484
- p2063: 2.01468
- p3079: 6.93679e-7; = p2298*p1082
- p2761: 0; = p2370*(p1019+p1021)
- p2790: 0; = p2399*(p1019+p1021)
- p1177: 0.000471718; = p0801*p0001/(p0818*p0002)
- p0921: 0.329704; = p0679*1000/p0801
- p1089: 0.000339192; = IF(p1071=0;p1083*p0001/(p0818*p0002);0)
- p2895: 4.80328e-7; = p2309*(p1079+p1081)
- p3477: 0.11105; = if(p1328+p1330+p1332+p1334+p1336+p1338+p1340+p1342+p1344=0;0;p1330/(p1328+p1330+p1332+p1334+p1336+p1338+p1340+p1342+p1344))
- p2866: 0.00014148; = p2280*(p1020+p1022)
- p1072: 0; = p1071*p0001/(p0818*p0002)
- p2119: 0.679049
- p2260: 0.000141603; = p2226*p2206
- p2222: 0.402411; = if(p0765*p0769+p0766*p0770+p0767*p0771+p0768*p0772=0;0;p0769*p0765/(p0765*p0769+p0766*p0770+p0767*p0771+p0768*p0772))
- p2691: 0.000153881; = p2300*(p1078+p1080)
- p3307: 1.24445e7; = if(and(p1232=0;p3252<>0);p3252*(p3258-p3302)/p3305;0)
- p1041: 0.317801
- p0503: 0; = SQRT(2)*(IF((2*p0371-1)<0;-1;IF((2*p0371-1)>0;1;0))*SQRT(SQRT((2/(pi()*0.140012289)+LN(1-(2*p0371-1)^2)/2)^2-LN(1-(2*p0371-1)^2)/0.140012289)-(2/(pi()*0.140012289)+LN(1-(2*p0371-1)^2)/2)))
- p0746: 0
- p2270: 1.52575e-5; = p2226*p2216
- p0681: 0
- p0048: 4.483
- p3344: 0; = if(and(p1232=0;p3254<>0);p3254-(p3339+p3340+p3341+p3342+p3343);0)
- p2626: 0; = p2430*p1123
- p2969: 0; = p2383*(p1079+p1081)
- p2017: 3.50034e7; = p2015*p0898
- p3300: 0; = if(p1293+p1294+p1295+p1296=0;0;p1293/(p1293+p1294+p1295+p1296))
- p0533: 0; = SQRT(2)*(IF((2*p0401-1)<0;-1;IF((2*p0401-1)>0;1;0))*SQRT(SQRT((2/(pi()*0.140012289)+LN(1-(2*p0401-1)^2)/2)^2-LN(1-(2*p0401-1)^2)/0.140012289)-(2/(pi()*0.140012289)+LN(1-(2*p0401-1)^2)/2)))
- p0744: 6.75; = p0084*(1+p0612*p0216/100)
- p3350: 3.94937e6; = if(and(p1232=0;p3256<>0);p3256*(p3273*p3277-p3345)/p3349;0)
- p1752: 0
- p4721: 0; = p1754*p3482
- p2198: 3.95211e-5; = 22.98976928*p2197/14.0067
- p2108: 0.826583
- p0509: 0; = SQRT(2)*(IF((2*p0377-1)<0;-1;IF((2*p0377-1)>0;1;0))*SQRT(SQRT((2/(pi()*0.140012289)+LN(1-(2*p0377-1)^2)/2)^2-LN(1-(2*p0377-1)^2)/0.140012289)-(2/(pi()*0.140012289)+LN(1-(2*p0377-1)^2)/2)))
- p0439: 0; = SQRT(2)*(IF((2*p0307-1)<0;-1;IF((2*p0307-1)>0;1;0))*SQRT(SQRT((2/(pi()*0.140012289)+LN(1-(2*p0307-1)^2)/2)^2-LN(1-(2*p0307-1)^2)/0.140012289)-(2/(pi()*0.140012289)+LN(1-(2*p0307-1)^2)/2)))
- p2163: 0.00219802; = (p2017-p2020)/p0818-(p2025+p2028+p2033+p2034+p2051+p2125+p2126+p2127+p2128+p2129+p2130+p2131+p2132+p2133+p2134+p2135+p2136+p2137+p2138+p2139+p2140+p2141+p2142+p2143+p2144+p2145+p2146+p2147+p2148+p2149+p2150+p2151+p2152+p2153+p2154+p2155+p2156+p2157)
- p2307: 4.37743e-5; = p2227*p2214
- p2257: 0.00222028; = p2222*p2203
- p3511: 0; = p1780*p3476
- p2807: 0; = p2416*(p1078+p1080)
- p2203: 0.00551744; = p1070-p2200-p2201-p2202
- p0795: 72.489; = p0135*(1+p0663*p0267/100)
- p2299: 0.000133709; = p2227*p2206
- p0787: 0
- p2536: 0.000929279; = p2340*p1073
- p0516: 0; = SQRT(2)*(IF((2*p0384-1)<0;-1;IF((2*p0384-1)>0;1;0))*SQRT(SQRT((2/(pi()*0.140012289)+LN(1-(2*p0384-1)^2)/2)^2-LN(1-(2*p0384-1)^2)/0.140012289)-(2/(pi()*0.140012289)+LN(1-(2*p0384-1)^2)/2)))
- p3443: 0; = p3367*p1240
- p0487: 0; = SQRT(2)*(IF((2*p0355-1)<0;-1;IF((2*p0355-1)>0;1;0))*SQRT(SQRT((2/(pi()*0.140012289)+LN(1-(2*p0355-1)^2)/2)^2-LN(1-(2*p0355-1)^2)/0.140012289)-(2/(pi()*0.140012289)+LN(1-(2*p0355-1)^2)/2)))
- p3317: 0; = if(and(p1232=0;p3253<>0);p3253*(p3261*p3277-p3312)/p3316;0)
- p0598: 0; = IF(p0334<0.5;-SQRT(p0007*EXP(p0466^2*p0008)-p0007);SQRT(p0007*EXP(p0466^2*p0008)-p0007))
- p2243: 0.00186328; = p2222*p2188
- p1001: 0; = if(p0978>0;0;if(and(p0687=0;p0691=0;p0695=0;p0699=0);0;IF(p0996+p0999+p1000=1;0;1-(p0996+p0999+p1000))))
- p1859: 0
- p1810: 0
- p1301: 0; = IF(p1297+p1300=p1265;0;IF(p1297+p1300+p1299>p1265;p1265-(p1297+p1300);p1299))
- p4747: 0; = p1780*p3482
- p2396: 0; = p2234*p2185
- p1653: 0
- p2033: 1.1296e-5; = p2015*p2029*p2031/(p0818*1000)
- p1636: 0
- p3295: 0.58
- p1710: 0
- p2005: 6.83867e6; = p1963*p0818+p1959*1000+p1170+p1176+p1182
- p3357: 1.33629e7; = if(p1232=0;p3307+p3318+p3329+p3340+p3351;0)
- p0593: 0; = IF(p0329<0.5;-SQRT(p0007*EXP(p0461^2*p0008)-p0007);SQRT(p0007*EXP(p0461^2*p0008)-p0007))
- p1077: 0; = IF(p1071=0;p0715/100;0)
- p1027: 292449; = IF(p1012=0;p1021*(p0704/100)*p0703*1000;0)
- p0689: 0
- p3251: 2.06664e9; = p1252-(p3252+p3253+p3254+p3255+p3256)
- p3176: 0; = p2395*p1023
- p1802: 0
- p4307: 2.13287e-6; = p1962*p3479
- p2708: 6.43894e-6; = p2317*(p1019+p1021)
- p0057: 99.256
- p3233: 0.60394
- p1850: 0
- p1073: 0.82637; = IF(p1071=0;p0711/100;0)
- p1298: 0
- p1764: 0
- p3065: 0; = p2284*p1023
- p1284: 0; = p1280*p1252/p0818
- p0107: 17.318
- p3146: 0; = p2365*p1023
- p2216: 0.000118311; = p1108/p0818
- p2670: 4.29159e-5; = p2279*(p1019+p1021)
- p0664: 0; = IF(p0400<0.5;-SQRT(p0007*EXP(p0532^2*p0008)-p0007);SQRT(p0007*EXP(p0532^2*p0008)-p0007))
- p0757: 0
- p0910: 0.00604756; = p0909/p0818
- p5028: 0; = p1855*p3483
- p1009: 0; = p1005*p0001*p0004/(p0818*p0002)
- p3412: 0.00500477; = p3374*p1238
- p1789: 0
- p2775: 0; = p2384*(p1078+p1080)
- p1268: 0
- p1831: 0
- p2555: 0; = p2359*p1014
- p1104: 0.261145; = IF(p1071=0;IF(p1096+p1101+p1102+p1103=1;0;1-(p1096+p1101+p1102+p1103));0)
- p1751: 0.791173
- p1242: 0; = if(p1232>0;0;p1234*(p0725/100)*p0723*1000)
- p2575: 0; = p2379*p1073
- p0694: 0
- p3024: 0; = p2243*p1023
- p3333: 0; = if(and(p1232=0;p3255<>0);p3255-(p3328+p3329+p3330+p3331+p3332);0)
- p2607: 0; = p2411*p1014
- p0254: 39.883
- p0505: 0; = SQRT(2)*(IF((2*p0373-1)<0;-1;IF((2*p0373-1)>0;1;0))*SQRT(SQRT((2/(pi()*0.140012289)+LN(1-(2*p0373-1)^2)/2)^2-LN(1-(2*p0373-1)^2)/0.140012289)-(2/(pi()*0.140012289)+LN(1-(2*p0373-1)^2)/2)))
- p2081: 0.0019
- p2358: 0; = p2225*p2186
- p3205: 0; = p2424*p1082
- p4596: 6.83771e-6; = p1835*p3481
- p2062: 3.76588
- p1877: 0
- p3020: 0; = p2239*p1023
- p1658: 0
- p2625: 0; = p2429*p1123
- p3025: 0; = p2244*p1023
- p2280: 0.000990823; = p2223*p2186
- p2522: 0.00174164; = p2326*p1014
- p3462: 0; = p3367*p1241
- p0506: 0; = SQRT(2)*(IF((2*p0374-1)<0;-1;IF((2*p0374-1)>0;1;0))*SQRT(SQRT((2/(pi()*0.140012289)+LN(1-(2*p0374-1)^2)/2)^2-LN(1-(2*p0374-1)^2)/0.140012289)-(2/(pi()*0.140012289)+LN(1-(2*p0374-1)^2)/2)))
- p3428: 0; = p3371*p1239
- p3469: 0.00408308; = p3374*p1241
- p3334: 0; = IF(or(p3254=0;p1232>0);0;p3269*p3277*(p3300*p3292+(1-p3300)*p3296))
- p1867: 0
- p1562: 0
- p2404: 0; = p2234*p2193
- p2732: 7.04868e-5; = p2341*(p1078+p1080)
- p0064: 15.626
- p3105: 0; = p2324*p1023
- p1341: 0; = p1340*p0001/(p0818*p0002)
- p2721: 1.0938e-6; = p2330*(p1019+p1021)
- p1036: 4.72882e8; = IF(p1012=0;p0795*p0702*1000*p0796/100;0)
- p2921: 0.000160409; = p2335*(p1020+p1022)
- p3080: 2.24631e-7; = p2299*p1082
- p1088: 9794.28; = IF(p1071=0;p1082*(p0710/100)*p0703*1000;0)
- p1023: 0; = IF(p1012=0;IF(p1014+p1019+p1020+p1021+p1022=1;0;1-(p1014+p1019+p1020+p1021+p1022));0)
- p2154: 7.63614e-7; = p2015*p2082*p2116/(p0818*1000)
- p2521: 0.000304338; = p2325*p1014
- p2692: 2.53324e-5; = p2301*(p1078+p1080)
- p2036: 2.19395e-5; = p2015*p2030*(1-p2032)/(p0818*1000)
- p1727: 0
- p2637: 1.40073e-5; = p2246*(p1019+p1021)
- p1283: 0; = p1277*p1252/p0818
- p1828: 0
- p0973: 0; = p0967+p0968+p0969
- p0329: 0.5
- p2339: 0.00683096; = p2228*p2207
- p2613: 0; = p2417*p1073
- p1161: 6.7e6; = p0801
- p2232: 1; = if(p0783*p0787+p0784*p0788+p0785*p0789+p0786*p0790=0;0;p0789*p0785/(p0783*p0787+p0784*p0788+p0785*p0789+p0786*p0790))
- p4971: 0; = p1798*p3483
- p2845: 1.45789e-5; = p2259*(p1079+p1081)
- p0637: 0; = IF(p0373<0.5;-SQRT(p0007*EXP(p0505^2*p0008)-p0007);SQRT(p0007*EXP(p0505^2*p0008)-p0007))
- p0252: 6.506
- p2028: 0.000142398; = p2015*p2026*p2027/(p0818*1000)
- p2740: 0.000110125; = p2349*(p1078+p1080)
- p1939: 0
- p2517: 0.000679994; = p2321*p1014
- p1609: 0
- p2301: 0.00018276; = p2227*p2208
- p2996: 0; = p2410*(p1020+p1022)
- p2810: 0; = p2419*(p1078+p1080)
- p2598: 0; = p2402*p1014
- p2408: 0; = p2234*p2198
- p1557: 0
- p2846: 4.72104e-6; = p2260*(p1079+p1081)
- p2212: 1.94022e-5; = p1106/p0818
- p3063: 0; = p2282*p1023
- p3371: 0; = if(p1232=0;p3245*p3359/p0818;0)
- p2497: 0.000151027; = p2301*p1073
- p0768: 0
- p1889: 0
- p3134: 6.31545e-7; = p2353*p1132
- p0711: 82.637; = p0051*(1+p0579*p0183/100)
- p2314: 0; = p2231*p2221
- p0835: 903.139; = -LN(1-p0669/100)/p0834
- p2022: 0.00103515; = p2018*p2015/p0818-p2021
- p1959: 4273.2; = if(p0738*p0740*p0739>0;p0738*1000*(p0740/100)*p0739/1000;p1958)
- p1568: 0
- p1215: 0; = IF(p1214=0;0;(p1214-1.5)/(p1214-1)^2)
- p2968: 0; = p2382*(p1079+p1081)
- p2773: 0; = p2382*(p1078+p1080)
- p3381: 0; = p3362*p1234
- p2390: 0; = p2233*p2219
- p1606: 0
- p2646: 0.000182915; = p2255*(p1019+p1021)
- p3081: 1.8651e-6; = p2300*p1082
- p2184: 0.000232652; = p1051/p0818
- p0109: 43.164
- p2890: 1.55796e-5; = p2304*(p1079+p1081)
- p2188: 0.0046303; = p1066-p2186-p2187
- p1895: 0
- p2680: 0.0013458; = p2289*(p1019+p1021)
- p3217: 0.00258286; = p3213*p1228
- p1084: 808086; = IF(p1071=0;p1078*(p0710/100)*p0703*1000;0)
- p2621: 0; = p2425*p1073
- p0726: 0
- p0286: 0.5
- p2116: 0.444424
- p1800: 0
- p0893: 0.16316; = 1000*(p0890+p0892)*p0001*p0003*p0004/(p0818*p0002)
- p2581: 0; = p2385*p1073
- p2816: 0; = p2425*(p1078+p1080)
- p2381: 0; = p2229*p2210
- p1174: 1.34365e-7; = p1170*p1173/p0818
- p2800: 0; = p2409*(p1019+p1021)
- p1337: 0; = p1336*p0001/(p0818*p0002)
- p2187: 0.000361949; = 4*1.00794*p2186/(2*14.0067)
- p1654: 0
- p1656: 0
- p2952: 0; = p2366*(p1020+p1022)
- p1973: 0; = if(p0807=480;p1968*p0001/(p0818*p0002);0)
- p2960: 0; = p2374*(p1020+p1022)
- p0948: 4.291e-5; = if(and(p0683=0;or(p0807=480;p0807=32;p0807=1;and(p0807=60;p0901<0.03)));p0936;0)
- p3406: 0; = p3368*p1238
- p0579: 0; = IF(p0315<0.5;-SQRT(p0007*EXP(p0447^2*p0008)-p0007);SQRT(p0007*EXP(p0447^2*p0008)-p0007))
- p0865: 0; = IF(p0858+p0864=1;0;IF(p0858+p0864+p0860>1;1-(p0858+p0864);p0860))
- p2818: 0; = p2427*(p1078+p1080)
- p0445: 0; = SQRT(2)*(IF((2*p0313-1)<0;-1;IF((2*p0313-1)>0;1;0))*SQRT(SQRT((2/(pi()*0.140012289)+LN(1-(2*p0313-1)^2)/2)^2-LN(1-(2*p0313-1)^2)/0.140012289)-(2/(pi()*0.140012289)+LN(1-(2*p0313-1)^2)/2)))
- p3322: 0; = if(and(p1232=0;p3253<>0);p3253-(p3317+p3318+p3319+p3320+p3321);0)
- p2599: 0; = p2403*p1014
- p0609: 0; = IF(p0345<0.5;-SQRT(p0007*EXP(p0477^2*p0008)-p0007);SQRT(p0007*EXP(p0477^2*p0008)-p0007))
- p3150: 0; = p2369*p1023
- p3011: 0; = p2425*(p1079+p1081)
- p2957: 0; = p2371*(p1020+p1022)
- p0905: 0.0383263; = p0904/p0818
- p0202: 8.409
- p0697: 0
- p0115: 38.285
- p3155: 0; = p2374*p1023
- p2291: 1.55706e-5; = p2223*p2198
- p1061: 0.3
- p1058: 0.225
- p0672: 0
- p2710: 6.96028e-5; = p2319*(p1019+p1021)
- p1634: 0
- p3074: 0; = p2293*p1023
- p1641: 0
- p0019: 2209.01
- p2135: 4.85356e-6; = p2015*p2063*p2097/(p0818*1000)
- p3213: 0.112803; = p1222*12.0107/100.0869
- p3255: 0; = p1252*(p1297*(1-p3247)+p1300*(1-p3248)+p1301*(1-p3249)+p1302*(1-p3250))
- p2244: 0.000357998; = p2222*p2189
- p2580: 0; = p2384*p1073
- p2474: 6.61131e-5; = p2278*p1014
- p3095: 0; = p2314*p1132
- p0400: 0.5
- p4515: 3.75074e-5; = p1754*p3481
- p0704: 97.367; = p0044*(1+p0572*p0176/100)
- p0197: 61.832
- p3435: 0; = p3378*p1239
- p0370: 0.5
- p1271: 0; = IF(p1267+p1270=p1259;0;IF(p1267+p1270+p1269>p1259;p1259-(p1267+p1270);p1269))
- p1992: 3900
- p1888: 0
- p2470: 0; = p2274*p1123
- p1948: 0
- p0908: 0.00197823
- p4917: 0; = p1950*p3482
- p2205: 0.0033908; = 2*14.0067*p2204/30.973762
- p2878: 4.88822e-6; = p2292*(p1020+p1022)
- p0680: 1599.67; = p0020*(1+p0548*p0152/100)
- p1233: 0; = p1232*p0001/(p0818*p0002)
- p1004: 0; = p1000*p0888
- p0840: 0.0746721; = p0839*p0831
- p2047: 1.80678e-13; = p2015*p2045/(p0818*1000000000000)
- p3405: 0; = p3367*p1238
- p2539: 0.00237606; = p2343*p1073
- p2633: 1.97985e-5; = p2242*(p1019+p1021)
- p2405: 0; = p2234*p2195
- p0210: 0
- p0765: 67.409; = p0105*(1+p0633*p0237/100)
- p3483: 0; = if(p1328+p1330+p1332+p1334+p1336+p1338+p1340+p1342+p1344=0;0;p1342/(p1328+p1330+p1332+p1334+p1336+p1338+p1340+p1342+p1344))
- p0312: 0.5
- p0619: 0; = IF(p0355<0.5;-SQRT(p0007*EXP(p0487^2*p0008)-p0007);SQRT(p0007*EXP(p0487^2*p0008)-p0007))
- p0686: 0
- p2010: 0.00318225; = ((p1984*p1985+p1990*p1991+p1996*p1997+p2004*p2005)/p0818)*p0005*p0002/1000
- p1694: 0
- p3023: 0; = p2242*p1023
- p0151: 0
- p2196: 0.0251298; = p1068-p2193-p2195
- p2945: 0; = p2359*(p1020+p1022)
- p1872: 0
- p0892: 9123.74; = if(p0891=0;0;(1-p1240)*p3251/p0891)
- p0708: 4.483; = p0048*(1+p0576*p0180/100)
- p0918: 0.238756; = p0680*1000/p0801
- p1372: 198
- p2674: 4.76434e-5; = p2283*(p1019+p1021)
- p1830: 0
- p0446: 0; = SQRT(2)*(IF((2*p0314-1)<0;-1;IF((2*p0314-1)>0;1;0))*SQRT(SQRT((2/(pi()*0.140012289)+LN(1-(2*p0314-1)^2)/2)^2-LN(1-(2*p0314-1)^2)/0.140012289)-(2/(pi()*0.140012289)+LN(1-(2*p0314-1)^2)/2)))
- p2242: 0.000145652; = p2222*p2187
- p2416: 0; = p2235*p2206
- p2366: 0; = p2225*p2195
- p2443: 0.000601497; = p2247*p1014
- p0971: 0; = p0968/p0818
- p2591: 0; = p2395*p1014
- p2822: 0; = p2431*(p1128+p1130)
- p2587: 0; = p2391*p1123
- p2755: 0; = p2364*(p1019+p1021)
- p3185: 0; = p2404*p1023
- p2162: 9.8191e-8; = p2015*p2086*p2124/(p0818*1000)
- p2112: 0.856281
- p0848: 0
- p3027: 0; = p2246*p1023
- p1119: 0.0173548; = IF(p1071=0;p1109/(p1114*p0818);0)
- p1067: 0.00423635; = IF(p1012=0;p1053/(p1060*p0818);0)
- p1240: 0; = if(p1232>0;0;IF(p1234+p1238+p1239=1;0;IF(p1234+p1238+p1239+p1237>1;1-(p1234+p1238+p1239);p1237)))
- p0849: 0
- p1780: 1.5625e-5; = p1372*1000/p0818
- p0834: 0.00059
- p4953: 0; = p1780*p3483
- p3336: 0; = IF(or(p3254=0;p1232>0);0;p3271*p3289)
- p3382: 0; = p3363*p1234
- p1646: 0
- p2057: 3.28794
- p2958: 0; = p2372*(p1020+p1022)
- p3421: 0; = p3364*p1239
- p2227: 0.121772; = if(p0774*p0778+p0775*p0779+p0776*p0780+p0777*p0781=0;0;p0779*p0775/(p0774*p0778+p0775*p0779+p0776*p0780+p0777*p0781))
- p0990: 0; = p0986*p0886
- p2155: 7.40062e-7; = p2015*p2084*p2117/(p0818*1000)
- p3072: 0; = p2291*p1023
- p0829: 0; = if(p0807=480;p0814*(1-p0824);0)
- p3465: 0; = p3370*p1241
- p3049: 7.78825e-8; = p2268*p1082
- p1956: 0
- p2055: 5.59471
- p2077: 0.043
- p2045: 30
- p1729: 0
- p0938: 0; = p0932*p0001/(p0818*p0002)
- p1665: 0
- p1592: 0
- p2283: 0.0003505; = p2223*p2189
- p1955: 2.56471e-5; = p1547*1000/p0818
- p0250: 46.1
- p0758: 0
- p0800: 19.68; = p0140*(1+p0668*p0272/100)
- p2211: 0.00383747; = p1120-p2209-p2208-p2210
- p1672: 0
- p3228: 0.000670275; = p3224*p1229
- p2388: 0; = p2229*p2217
- p1320: 0.321218; = IF(((p0745*1000*p0747/100)+(p0754*1000*p0756/100))/p0801<0;0;((p0745*1000*p0747/100)+(p0754*1000*p0756/100))/p0801)
- p1628: 0
- p2602: 0; = p2406*p1014
- p0327: 0.5
- p2769: 0; = p2378*(p1078+p1080)
- p2138: 4.65046e-7; = p2015*p2066*p2100/(p0818*1000)
- p1823: 0
- p2266: 2.50212e-6; = p2226*p2212
- p0683: 0
- p3887: 1.05161e-7; = p1950*p3477
- p1551: 0
- p2145: 2.00518e-6; = p2015*p2073*p2107/(p0818*1000)
- p3436: 0; = p3379*p1239
- p2141: 1.04738e-6; = p2015*p2069*p2103/(p0818*1000)
- p1920: 0
- p1612: 0
- p1715: 0
- p3433: 0; = p3376*p1239
- p1622: 0
- p1065: 0.00103401; = IF(p1012=0;p1051/(p1058*p0818);0)
- p1325: 0; = IF(((p0745*1000*p0752/100)+(p0754*1000*p0761/100))/p0801<0;0;((p0745*1000*p0752/100)+(p0754*1000*p0761/100))/p0801)
- p0925: 0.329704; = IF(p0918+p0923+p0924=1;0;IF(p0918+p0923+p0924+p0921>1;1-(p0918+p0923+p0924);p0921))
- p2379: 0; = p2229*p2208
- p1597: 0
- p3485: 0; = p1754*p3476
- p0235: 0
- p2600: 0; = p2404*p1014
- p2727: 0.00038937; = p2336*(p1078+p1080)
- p2506: 0.000106702; = p2310*p1073
- p1770: 0
- p0271: 5.971
- p0899: 1.15991e10; = p0825*p0896+(p0830+p0895)*p0824*p0898
- p0725: 1.128; = p0065*(1+p0593*p0197/100)
- p0961: 0; = if(and(p0683>0;or(p0807=480;p0807=32;p0807=1;and(p0807=60;p0901<0.03)));p0937;0)
- p2169: 0.00104802; = p2166*(p0908)
- p0769: 43.164; = p0109*(1+p0637*p0241/100)
- p1623: 0
- p1578: 0
- p1584: 0
- p0246: 10.6
- p2039: 3.64891e-6; = p2015*p2037*p2038/(p0818*1000)
- p1321: 0.960906; = IF(((p0745*1000*p0748/100)+(p0754*1000*p0757/100))/p0801<0;0;((p0745*1000*p0748/100)+(p0754*1000*p0757/100))/p0801)
- p5214: 1.35888e-7; = p1835*p3484
- p2007: 0.04243; = ((p1981*p1985+p1987*p1991+p1993*p1997+p2001*p2005)/p0818)*p0005*p0002/1000
- p1824: 0
- p0898: 0.45865
- p1169: 0.000508261
- p1754: 7.40215e-5; = p1346*1000/p0818
- p3367: 0; = if(p1232=0;p3244*p3361/p0818;0)
- p0463: 0; = SQRT(2)*(IF((2*p0331-1)<0;-1;IF((2*p0331-1)>0;1;0))*SQRT(SQRT((2/(pi()*0.140012289)+LN(1-(2*p0331-1)^2)/2)^2-LN(1-(2*p0331-1)^2)/0.140012289)-(2/(pi()*0.140012289)+LN(1-(2*p0331-1)^2)/2)))
- p1230: 0.5
- p5329: 9.53598e-9; = p1950*p3484
- p1763: 0
- p0331: 0.5
- p0823: 0
- p3110: 0; = p2329*p1023
- p1134: 0; = if(p1121=0;p1128*(p0716/100)*p0703*1000;0)
- p1113: 0.100377
- p2410: 0; = p2234*p2200
- p2998: 0; = p2412*(p1020+p1022)
- p2962: 0; = p2376*(p1079+p1081)
- p2290: 9.48653e-6; = p2223*p2197
- p2941: 0; = p2355*(p1020+p1022)
- p1768: 0
- p0913: 0.0120403
- p2590: 0; = p2394*p1014
- p1650: 0
- p3262: 0.0787162
- p0120: 82.655
- p2990: 0; = p2404*(p1020+p1022)

## Reference product
- spring wheat, excl. durum; at harvest in 1998; at farm; 86%-90% moisture: 1 kg

## Inputs from technosphere
- CUTOFF domestic barge transport; average fuel: 0.04243 metric ton*km; = p2007
- CUTOFF pesticide formulation balance; at point-of-sale: 0.000202058 kg; = p1963
- CUTOFF sowing svc; for conventional till, 1998 spring wheat (excl. durum): 0.000112626 ha; = p0946
- CUTOFF pesticide, 2,4-D; at point-of-sale; kg AI: 7.40215e-5 kg; = p1754
- CUTOFF gypsum; at point-of-sale: 4.55576e-6 kg; = p1166
- CUTOFF nitrogenous fertilizer, ammonium nitrate; at point-of-sale: 0.00750714 kg; = p1066
- CUTOFF pesticide storage: 0.000370666 kg*a; = p1965
- CUTOFF apply pesticide; broadcast without incorporation: 5.45378e-5 ha; = p1335
- CUTOFF phosphatic fertilizer, superphos. grades 22% and under; at point-of-sale: 0.000222288 kg; = p1116
- CUTOFF liming materials storage: 0.0121163 kg*a; = p1231
- CUTOFF regional or national trucking; class 8, average fuel: 0.0124496 metric ton*km; = p2009
- CUTOFF apply pesticide; broadcast with incorporation: 0.000453277 ha; = p1333
- CUTOFF apply K fertilizer; no broadcast application: 9.21422e-5 ha; = p1139
- CUTOFF apply P fertilizer; no broadcast application: 0.000339192 ha; = p1089
- CUTOFF apply sewage sludge; unspecified method: 0.000471718 ha; = p1189
- CUTOFF pesticide, Clopyralid; at point-of-sale; kg AI: 2.44634e-6 kg; = p1798
- CUTOFF apply single or mixed P fertilizer; unspec. method: 6.89573e-7 ha; = p1094
- CUTOFF sowing svc; for unspec till, 1998 spring wheat (excl. durum): 4.55039e-6 ha; = p0951
- CUTOFF international vessel transport; average fuel: 0.390956 metric ton*km; = p2006
- CUTOFF prepare soil; for unspec. till, wheat: 4.55039e-6 ha; = p0939
- CUTOFF nitrogenous fertilizer, sodium nitrate; at point-of-sale: 0.000150491 kg; = p1069
- CUTOFF pesticide, Thifensulfuron methyl; at point-of-sale; kg AI: 3.94571e-7 kg; = p1943
- CUTOFF phosphatic fertilizer, monoammonium phosphate; at point-of-sale: 0.00631005 kg; = p1120
- CUTOFF nitrogenous fertilizer, anhydrous ammonia; at point-of-sale: 0.017069 kg; = p1064
- CUTOFF apply N fertilizer; no broadcast application: 0.000331278 ha; = p1030
- CUTOFF potassic fertilizer, other single nutrients; at point-of-sale: 0.000133733 kg; = p1155
- CUTOFF limestone, high-grade, pulverized; at point-of-sale: 0.0228972 kg; = p1228
- CUTOFF sowing svc; for reduced till, 1998 spring wheat (excl. durum): 0.000155527 ha; = p0949
- CUTOFF sulfuric acid; at point-of-sale: 5.16547e-8 kg; = p1178
- CUTOFF nitrogenous fertilizer, urea; at point-of-sale: 0.0171426 kg; = p1070
- CUTOFF N inhibitor appl svc; unspec rate & type, 1998 spring wheat (excl. durum): 0.000528725 ha; = p1162
- CUTOFF nitrogenous fertilizer, nitrogen solutions; at point-of-sale: 0.0395314 kg; = p1068
- CUTOFF apply manure; unspec. method: 2.39063e-6 ha; = p1251
- CUTOFF zinc compounds storage: 3.69604e-8 kg*a; = p1186
- CUTOFF apply P fertilizer; broadcast without incorporation: 1.36847e-5 ha; = p1091
- CUTOFF unspecified animal manure; from unspecified storage; at point-of-sale: 0.00801455 kg; = p1316
- CUTOFF apply mixed N fertilizer; with incorporation: 2.059e-5 ha; = p1033
- CUTOFF pesticide, Dicamba; at point-of-sale; kg AI: 1.00221e-5 kg; = p1808
- CUTOFF pesticide, unspecified type; at point-of-sale; kg AI: 5.33617e-5 kg; = p1962
- CUTOFF pesticide, MCPA; at point-of-sale; kg AI: 0.00012066 kg; = p1873
- CUTOFF apply N fertilizer; broadcast without incorporation: 2.42184e-5 ha; = p1032
- CUTOFF beef manure; from unspecified storage; at point-of-sale: 0.17837 kg; = p1276
- CUTOFF bulk cargo rail transport; diesel: 0.0795563 metric ton*km; = p2008
- CUTOFF sewage sludge storage: 6.64659e-8 kg*a; = p1192
- CUTOFF apply sulfuric acid; unspecified method: 0.000471718 ha; = p1177
- CUTOFF sulfur storage: 1.34365e-7 kg*a; = p1174
- CUTOFF apply P fertilizer; broadcast with incorporation: 5.68938e-5 ha; = p1090
- CUTOFF apply pesticide; broadcast by air: 0.000151524 ha; = p1331
- CUTOFF harvest; spring: 0.000464677 ha; = p1971
- CUTOFF prepare soil; for mulch till, wheat: 0.000156105 ha; = p0935
- CUTOFF irrig svc; unspec wat source & rate, 1998 spring wheat (excl. durum): 0.000471718 ha; = p0981
- CUTOFF potassic fertilizer, potassium chloride; at point-of-sale: 0.00130678 kg; = p1154
- CUTOFF apply mixed N fertilizer; without incorporation: 4.13638e-5 ha; = p1034
- CUTOFF prepare soil; for reduced till, wheat; 15-30% residue: 0.000155527 ha; = p0937
- CUTOFF fertilizer storage: 0.0723857 kg*a; = p1160
- CUTOFF harvest; spring wheat residue management: 0.000471718 ha; = p1975
- CUTOFF phosphatic fertilizer, other single phosphates; at point-of-sale: 0.00117867 kg; = p1118
- CUTOFF sulfuric acid storage: 2.58273e-8 kg*a; = p1180
- CUTOFF pesticide, Trifluralin; at point-of-sale; kg AI: 2.56471e-5 kg; = p1955
- CUTOFF apply gypsum; unspecified method: 0.000471718 ha; = p1165
- CUTOFF phosphatic fertilizer, superphosphate grades over 22%; at point-of-sale: 0.00171603 kg; = p1117
- CUTOFF apply sulfur; unspecified method: 0.000471718 ha; = p1171
- CUTOFF prepare soil; for conventional till, wheat; <15% residue: 0.000112626 ha; = p0934
- CUTOFF nitrogenous fertilizer, aqueous ammonia; at point-of-sale: 0.00103401 kg; = p1065
- CUTOFF pesticide, Glyphosate; at point-of-sale; kg AI: 1.64931e-5 kg; = p1855
- CUTOFF pesticide, Fenoxaprop P; at point-of-sale; kg AI: 1.34943e-5 kg; = p1835
- CUTOFF local area trucking; class 6, average fuel: 0.00318225 metric ton*km; = p2010
- CUTOFF apply single or mixed K fertilizer; unspec. method: 6.90676e-7 ha; = p1144
- CUTOFF sewage sludge; at point-of-sale: 1.32932e-7 kg; = p1190
- CUTOFF nitrogenous fertilizer, ammonium sulfate; at point-of-sale: 0.00423635 kg; = p1067
- CUTOFF apply pesticide; as foliar or directed spray: 0.00069139 ha; = p1339
- CUTOFF zinc compounds; at point-of-sale: 7.39208e-8 kg; = p1184
- CUTOFF phosphatic fertilizer, diammonium phosphate; at point-of-sale: 0.0173548 kg; = p1119
- CUTOFF prepare soil; for no-till, wheat: 4.291e-5 ha; = p0936
- CUTOFF gypsum storage: 2.27788e-6 kg*a; = p1168
- CUTOFF apply pesticide; unspecified application methods: 1.37402e-5 ha; = p1345
- CUTOFF pesticide, Tribenuron-methyl; at point-of-sale; kg AI: 9.4697e-7 kg; = p1950
- CUTOFF fertilizer filler materials; at point-of-sale: 0.0298782 kg; = p1158
- spring wheat residue, excl. durum; at harvest in 1998; at farm; 83%-90% moisture: 0.545052 kg; = p0839
- CUTOFF pesticide, Tebuconazole; at point-of-sale; kg AI: 4.10354e-6 kg; = p1936
- CUTOFF apply liming materials; unspecified method: 0.000471718 ha; = p1227
- CUTOFF sowing svc; for mulch till, 1998 spring wheat (excl. durum): 0.000156105 ha; = p0947
- CUTOFF apply zinc compounds; unspecified method: 0.000471718 ha; = p1183
- CUTOFF pesticide, Bromoxynil; at point-of-sale; kg AI: 1.5625e-5 kg; = p1780
- CUTOFF sulfur; at point-of-sale: 2.6873e-7 kg; = p1172
- CUTOFF apply manure; broadcast without incorporation: 2.93028e-6 ha; = p1248
- CUTOFF sowing svc; for no-till, 1998 spring wheat (excl. durum): 4.291e-5 ha; = p0948
- CUTOFF dolomite, pulverized; at point-of-sale: 0.00133536 kg; = p1229
- CUTOFF apply N fertilizer; broadcast with incorporation: 4.18415e-5 ha; = p1031

## Inputs from nature
- Transformation, from annual crop [natural resource, land]: 4.71718 m2; = 1.0 * (p0883)
- Occupation, annual crop [natural resource, land]: 1.35878 m2*year; = 1.0 * (p0855)
- Carbon dioxide: 3.35622 kg; = p0900*3.6666666667
- Nitrogen: 0.0383263 kg; = p0905
- Water, unspecified origin: 0.000482114 m3; = p0916*0.001+p0893*0.001
- Potassium; from plant uptake; biogenic: 0.0170129 kg; = p0915
- Dry matter except CNPK; from plant uptake: 1.19669 kg; = p0917
- Phosphorus: 0.00604756 kg; = p0910
- Transformation, to annual crop [natural resource, land]: 4.71718 m2; = 1.0 * (p0857)

## Emissions to nature
- Monoammonium phosphate; unspec. appl. method in fert. in spr. bef. plant.: 1.14052e-6 kg; = p3083*8.2142857143
- Superphosphate, grades<= 22%; no broadcast in fert. in spr. bef. plant.; kg P: 1.95241e-6 kg; = p2501
- Monoammonium phosphate; broadcast w/o incorp. in fert. in fall bef. plant.: 2.39701e-5 kg; = p2849*8.2142857143
- Fenoxaprop P; broadcast by air: 1.49854e-6 kg; = p3772
- Nitrogen solution; broadcast w/ incorp. in fert. at plant.; broadcast w/ incorp. in fert. at plant.; kg N: 0.000328224 kg; = p2717
- Anhydrous ammonia; broadcast w/o incorp. in fert. in fall bef. plant.: 0.000976582 kg; = p2823*1.2142857143
- Acetol; from residue burning: 2.26766e-5 kg; = p2134*2.0555555556
- Anhydrous ammonia; broadcast w/ incorp. in fert. in fall bef. plant.: 0.000929665 kg; = p2628*1.2142857143
- Ammonium sulfate; broadcast w/o incorp. in fert. at plant.: 0.000121932 kg; = p2908*4.7142857143
- Tebuconazole: 4.55698e-7 kg; = p3873
- Anhydrous ammonia; no broadcast in fert. in spr. bef. plant.: 0.00482973 kg; = p2472*1.2142857143
- Other single phosphates; unspec. appl. method in fert. at plant.; kg P: 1.48926e-7 kg; = p3129
- Ammonium sulfate; broadcast w/o incorp. in fert. in fall bef. plant.: 0.000240987 kg; = p2830*4.7142857143
- Urea; no broadcast in fert. at plant.: 0.00245545 kg; = p2529*5
- Urea; no broadcast in fert. in spr. bef. plant.: 0.00475133 kg; = p2490*5
- Other single phosphates; no broadcast in fert. at plant.; kg P: 7.3255e-5 kg; = p2544
- Nitrogen solution; broadcast w/o incorp. in fert. at plant.; broadcast w/o incorp. in fert. at plant.; kg N: 0.000344789 kg; = p2912
- Plant dry matter; in aboveground residue left on field: 0.272512 kg; = p2172
- Nitrogen solution; broadcast w/o incorp. in fert. in spr. bef. plant.; broadcast w/o incorp. in fert. in spr. bef. pl...: 0.000667172 kg; = p2873
- Superphosphate, grades>22%; unspec. appl. method in fert. in fall bef. plant.; kg P: 7.78825e-8 kg; = p3049
- Acetone [air, non-urban air or from high stacks]: 2.68764e-6 kg; = 1.0 * (p2139*1.6111111111)
- 2,4-D [soil, agricultural]: 6.58014e-5 kg; = 1.0 * (p4515+p4103+p3897+p5133)
- Nitrogen solution; no broadcast in fert. at plant.; no broadcast in fert. at plant.; kg N: 0.00174164 kg; = p2522
- 2,4-D [air, non-urban air or from high stacks]: 8.22008e-6 kg; = 1.0 * (p3691)
- Pesticides, unspecified: 5.92582e-6 kg; = p3895
- Thifensulfuron methyl; broadcast with incorporation: 1.31076e-7 kg; = p4086
- Acetic acid [air, non-urban air or from high stacks]: 3.36955e-5 kg; = 1.0 * (p2127*2.5)
- Phosphorous; using unspec. method in manure at an unknown time: 9.97617e-5 kg; = p3471
- Carbon [soil, agricultural]: 0.384064 kg; = 1.0 * (p3412+p3242+p3225+p2167+p3469+p3217+p2173)
- Ammonium sulfate; no broadcast in fert. in spr. bef. plant.: 0.00119181 kg; = p2479*4.7142857143
- Ammonium sulfate; no broadcast in fert. at plant.: 0.000615918 kg; = p2518*4.7142857143
- Superphosphate, grades<= 22%; no broadcast in fert. in fall bef. plant.; kg P: 2.06768e-6 kg; = p2462
- Thifensulfuron methyl; unspec. appl. method: 3.97333e-9 kg; = p5322
- Pesticide formulation balance; unspec. appl. method: 2.03472e-6 kg; = p5338
- Other single phosphates; broadcast w/ incorp. in fert. in spr. bef. plant.; kg P: 1.99695e-6 kg; = p2700
- Nitrogen solution; no broadcast in fert. in spr. bef. plant.; no broadcast in fert. in spr. bef. plant.; kg N: 0.00337011 kg; = p2483
- Urea; no broadcast in fert. in fall bef. plant.: 0.00485297 kg; = p2451*5
- Anhydrous ammonia; broadcast w/o incorp. in fert. at plant.: 0.00049412 kg; = p2901*1.2142857143
- MCPA [soil, agricultural]: 0.00010726 kg; = 1.0 * (p4222+p5252+p4016+p4634)
- Clopyralid [soil, agricultural]: 2.17467e-6 kg; = 1.0 * (p4147+p5177+p3941+p4559)
- Superphosphate, grades<= 22%; unspec. appl. method in fert. in spr. bef. plant.; kg P: 3.96923e-9 kg; = p3086
- Monoammonium phosphate; no broadcast in fert. at plant.: 0.0034519 kg; = p2537*8.2142857143
- Superphosphate, grades<= 22%; broadcast w/o incorp. in fert. in spr. bef. plant.; kg P: 7.87703e-8 kg; = p2891
- Ammonium nitrate; no broadcast in fert. in spr. bef. plant.: 0.00336912 kg; = p2476*4.7142857143
- Ash: 0.00119127 kg; = p2021+p2022
- Sewage sludge dry matter; applied in sewage sludge: 6.88335e-10 kg; = p3243
- Fenoxaprop P; broadcast with incorporation: 4.48281e-6 kg; = p3978
- Nitrogen solution; broadcast w/o incorp. in fert. in fall bef. plant.; broadcast w/o incorp. in fert. in fall bef. pl...: 0.000681444 kg; = p2834
- Diammonium phosphate; no broadcast in fert. at plant.: 0.0098976 kg; = p2533*4.7142857143
- Diammonium phosphate; broadcast w/ incorp. in fert. in spr. bef. plant.: 0.000269811 kg; = p2689*4.7142857143
- Aqueous ammonia; no broadcast in fert. at plant.: 4.14881e-5 kg; = p2513*1.2142857143
- Potassium chloride; unspec. appl. method in fert. at plant.: 8.94544e-6 kg; = p3131*2.2166666667
- Anhydrous ammonia; broadcast w/ incorp. in fert. in spr. bef. plant.: 0.000910194 kg; = p2667*1.2142857143
- Propene [air, non-urban air or from high stacks]: 4.07143e-6 kg; = 1.0 * (p2136*1.1666666667)
- Aqueous ammonia; broadcast w/ incorp. in fert. in fall bef. plant.: 1.5453e-5 kg; = p2630*1.2142857143
- Sodium nitrate; broadcast w/o incorp. in fert. in spr. bef. plant.: 8.22425e-6 kg; = p2876*6.0714285714
- Ammonium sulfate; no broadcast in fert. in fall bef. plant.: 0.00121731 kg; = p2440*4.7142857143
- Potassium; using unspec. method in manure at an unknown time: 0.0004284 kg; = p3472
- Monoammonium phosphate; broadcast w/ incorp. in fert. in spr. bef. plant.: 9.40995e-5 kg; = p2693*8.2142857143
- Ammonium nitrate; broadcast w/o incorp. in fert. at plant.: 0.000344687 kg; = p2905*4.7142857143
- Monoammonium phosphate; broadcast w/o incorp. in fert. in spr. bef. plant.: 2.26338e-5 kg; = p2888*8.2142857143
- Monoammonium phosphate; unspec. appl. method in fert. at plant.: 7.01766e-6 kg; = p3122*8.2142857143
- Nitrogen; in above-ground residue left on field: 0.00685534 kg; = p2168
- Aqueous ammonia; broadcast w/o incorp. in fert. at plant.: 8.2133e-6 kg; = p2903*1.2142857143
- cyclopentane: 9.96169e-9 kg; = p2153*1.0166666667
- Other single K nutrients; no broadcast in fert. at plant.; kg K: 4.84846e-5 kg; = p2548
- Superphosphate, grades>22%; broadcast w/o incorp. in fert. in fall bef. plant.; kg P: 1.5456e-6 kg; = p2854
- Superphosphate, grades>22%; no broadcast in fert. at plant.; kg P: 0.000222579 kg; = p2542
- Zinc compounds: 7.39208e-8 kg; = p3232
- Potassium; in below-ground residue; biogenic: 0.00339211 kg; = p2176
- Diammonium phosphate; broadcast w/o incorp. in fert. at plant.: 0.00039932 kg; = p2923*4.7142857143
- Aqueous ammonia; no broadcast in fert. in fall bef. plant.: 8.19975e-5 kg; = p2435*1.2142857143
- Other single K nutrients; unspec. appl. method in fert. at plant.; kg K: 3.63429e-7 kg; = p3133
- Monoammonium phosphate; no broadcast in fert. in fall bef. plant.: 0.000594126 kg; = p2459*8.2142857143
- Diammonium phosphate; unspec. appl. method in fert. in fall bef. plant.: 3.46326e-6 kg; = p3040*4.7142857143
- Nitrogen; broadcast w/o incorp. in manure at an unknown time: 0.000580736 kg; = p3413
- Ethane [air, non-urban air or from high stacks]: 5.47286e-6 kg; = 1.0 * (p2126*1.25)
- Fenoxaprop P; broadcast without incorporation: 5.39368e-7 kg; = p4184
- Superphosphate, grades<= 22%; broadcast w/ incorp. in fert. at plant.; kg P: 2.01503e-6 kg; = p2735
- Urea; broadcast w/o incorp. in fert. at plant.: 0.000486099 kg; = p2919*5
- Sodium nitrate; broadcast w/ incorp. in fert. at plant.: 4.04603e-6 kg; = p2720*6.0714285714
- Furan [air, non-urban air or from high stacks]: 6.58814e-7 kg; = 1.0 * (p2138*1.4166666667)
- Benzene [air, non-urban air or from high stacks]: 9.24146e-7 kg; = 1.0 * (p2140*1.0833333333)
- trans-2-Butene: 3.42943e-7 kg; = p2148*1.1666666667
- Ethyne [air, non-urban air or from high stacks]: 1.63939e-6 kg; = 1.0 * (p2132*1.0833333333)
- Sodium nitrate; no broadcast in fert. in fall bef. plant.: 4.24321e-5 kg; = p2447*6.0714285714
- Toluene [air, non-urban air or from high stacks]: 1.14713e-6 kg; = 1.0 * (p2141*1.0952380952)
- Volatile constituents; broadcast w/o incorp. in man. at unknown time: 0.00571385 kg; = p3416
- Ammonium nitrate; broadcast w/ incorp. in fert. in spr. bef. plant.: 0.000634932 kg; = p2671*4.7142857143
- Superphosphate, grades>22%; broadcast w/ incorp. in fert. in fall bef. plant.; kg P: 6.42577e-6 kg; = p2659
- I butane; from residue burning: 1.27047e-7 kg; = p2146*1.0208333333
- Nitrogen dioxide: 1.19893e-5 kg; = p2039*3.2857142857
- Ethene [air, non-urban air or from high stacks]: 8.76293e-6 kg; = 1.0 * (p2125*1.1666666667)
- Propane [air, non-urban air or from high stacks]: 1.6962e-6 kg; = 1.0 * (p2142*1.2222222222)
- Anhydrous ammonia; broadcast w/ incorp. in fert. at plant.: 0.000470381 kg; = p2706*1.2142857143
- Diammonium phosphate; broadcast w/ incorp. in fert. in fall bef. plant.: 0.00028574 kg; = p2650*4.7142857143
- Acetonitrile [air, non-urban air or from high stacks]: 1.26427e-6 kg; = 1.0 * (p2155*1.7083333333)
- Bromoxynil [soil, agricultural]: 1.38898e-5 kg; = 1.0 * (p3923+p4541+p5159+p4129)
- Oxygen; applied in limestone: 0.0103219 kg; = p3219
- Ammonium sulfate; broadcast w/ incorp. in fert. in fall bef. plant.: 0.000229409 kg; = p2635*4.7142857143
- isobutene: 7.03936e-7 kg; = p2150*1.1666666667
- Aqueous ammonia; no broadcast in fert. in spr. bef. plant.: 8.02801e-5 kg; = p2474*1.2142857143
- Trifluralin [air, non-urban air or from high stacks]: 2.84811e-6 kg; = 1.0 * (p3892)
- Nitrogen solution; broadcast w/ incorp. in fert. in fall bef. plant.; broadcast w/ incorp. in fert. in fall bef. plan...: 0.000648706 kg; = p2639
- Plant dry matter; from residue burning: 0.00216404 kg; = p2164
- Urea; broadcast w/o incorp. in fert. in fall bef. plant.: 0.000960731 kg; = p2841*5
- Nitrogen solution; broadcast w/ incorp. in fert. in spr. bef. plant.; broadcast w/ incorp. in fert. in spr. bef. plan...: 0.00063512 kg; = p2678
- Carbon dioxide, in air: 0.00805941 kg; = p2163*3.6666666667
- Nitrogen; applied in sewage sludge: 6.21748e-9 kg; = p3240
- Monoammonium phosphate; broadcast w/ incorp. in fert. in fall bef. plant.: 9.96549e-5 kg; = p2654*8.2142857143
- Ammonium sulfate; broadcast w/ incorp. in fert. in spr. bef. plant.: 0.000224605 kg; = p2674*4.7142857143
- Dicamba [soil, agricultural]: 8.90914e-6 kg; = 1.0 * (p3951+p5187+p4157+p4569)
- Superphosphate, grades>22%; unspec. appl. method in fert. at plant.; kg P: 4.525e-7 kg; = p3127
- Hydrocyanic acid: 1.71813e-6 kg; = p2154*2.25
- Superphosphate, grades>22%; no broadcast in fert. in fall bef. plant.; kg P: 3.83094e-5 kg; = p2464
- Formic acid [air, non-urban air or from high stacks]: 6.03477e-6 kg; = 1.0 * (p2131*3.8333333333)
- Diammonium phosphate; broadcast w/o incorp. in fert. in fall bef. plant.: 6.87293e-5 kg; = p2845*4.7142857143
- Dicamba [air, non-urban air or from high stacks]: 1.11295e-6 kg; = 1.0 * (p3745)
- Superphosphate, grades>22%; broadcast w/ incorp. in fert. in spr. bef. plant.; kg P: 6.06755e-6 kg; = p2698
- Butane [air, non-urban air or from high stacks]: 3.65896e-7 kg; = 1.0 * (p2147*1.0208333333)
- Phosphorous; applied in sewage sludge: 7.42221e-10 kg; = p3241
- Pesticide formulation balance; broadcast with incorporation: 6.71236e-5 kg; = p4102
- Tribenuron-methyl [soil, agricultural]: 8.41809e-7 kg; = 1.0 * (p4711+p5329+p4093+p4299)
- MCPA: 1.33993e-5 kg; = p3810
- Ammonia [air, non-urban air or from high stacks]: 1.30696e-5 kg; = 1.0 * (p2159*1.2142857143)
- Superphosphate, grades>22%; broadcast w/o incorp. in fert. at plant.; kg P: 8.97997e-6 kg; = p2932
- Phosphorous; in above-ground residue left on field: 0.00104802 kg; = p2169
- Superphosphate, grades<= 22%; broadcast w/ incorp. in fert. in spr. bef. plant.; kg P: 3.27485e-7 kg; = p2696
- Acrylonitrile: 2.01876e-7 kg; = p2156*1.4722222222
- Other single phosphates; broadcast w/ incorp. in fert. in fall bef. plant.; kg P: 2.11484e-6 kg; = p2661
- Particulates, < 2.5 um [air, non-urban air or from high stacks]: 2.42711e-5 kg; = 1.0 * (p2035+p2033)
- Fenoxaprop P; foliar or directed spray: 6.83771e-6 kg; = p4596
- Superphosphate, grades>22%; unspec. appl. method in fert. in spr. bef. plant.; kg P: 7.35408e-8 kg; = p3088
- Monoammonium phosphate; unspec. appl. method in fert. in fall bef. plant.: 1.20785e-6 kg; = p3044*8.2142857143
- Ammonium nitrate; broadcast w/o incorp. in fert. in spr. bef. plant.: 0.000666975 kg; = p2866*4.7142857143
- Anhydrous ammonia; no broadcast in fert. at plant.: 0.00249596 kg; = p2511*1.2142857143
- Pesticides, unspecified [soil, agricultural]: 4.74359e-5 kg; = 1.0 * (p4101+p5337+p4719+p4307)
- Diammonium phosphate; unspec. appl. method in fert. in spr. bef. plant.: 3.2702e-6 kg; = p3079*4.7142857143
- Pentane [air, non-urban air or from high stacks]: 1.27413e-7 kg; = 1.0 * (p2152*1.0166666667)
- Filler materials, applied with synthetic fertilizer: 0.0298782 kg; = p2432
- Anhydrous ammonia; broadcast w/o incorp. in fert. in spr. bef. plant.: 0.000956129 kg; = p2862*1.2142857143
- Water [air, non-urban air or from high stacks]: 9.56079e-7 m3; = 0.001 * (p2016)
- Phosphorous; broadcast w/o incorp. in manure at an unknown time: 0.000122281 kg; = p3414
- Water: 0.455072 kg; = p2171+p3418+p2181+p2178+p3475
- Diammonium phosphate; no broadcast in fert. in fall bef. plant.: 0.00170353 kg; = p2455*4.7142857143
- Potassium chloride; no broadcast in fert. at plant.: 0.0011934 kg; = p2546*2.2166666667
- Plant dry matter; in below-ground residue: 0.14492 kg; = p2177
- Other single phosphates; unspec. appl. method in fert. in fall bef. plant.; kg P: 2.56326e-8 kg; = p3051
- Particulates, < 10 um: 3.98094e-5 kg; = p2036+p2034
- Other single phosphates; unspec. appl. method in fert. in spr. bef. plant.; kg P: 2.42037e-8 kg; = p3090
- Fenoxaprop P; unspec. appl. method: 1.35888e-7 kg; = p5214
- Ammonium nitrate; broadcast w/o incorp. in fert. in fall bef. plant.: 0.000681243 kg; = p2827*4.7142857143
- Other single phosphates; broadcast w/o incorp. in fert. at plant.; kg P: 2.95548e-6 kg; = p2934
- Formaldehyde [air, non-urban air or from high stacks]: 1.25202e-5 kg; = 1.0 * (p2128*2.5)
- Butadiene [air, non-urban air or from high stacks]: 9.08702e-7 kg; = 1.0 * (p2143*1.125)
- Ammonium nitrate; broadcast w/ incorp. in fert. at plant.: 0.000328128 kg; = p2710*4.7142857143
- Dioxins and furans (PCDD/F); from residue burning: 1.80678e-13 kg TEQ; = p2047
- Carbon monoxide, fossil [air, non-urban air or from high stacks]: 0.000332263 kg; = 1.0 * (p2028*2.3333333333)
- Dinitrogen monoxide [air, non-urban air or from high stacks]: 4.21661e-7 kg; = 1.0 * (p2044*1.5714285714)
- Sulfur dioxide [air, non-urban air or from high stacks]: 2.64994e-6 kg; = 1.0 * (p2041)
- Monoammonium phosphate; broadcast w/o incorp. in fert. at plant.: 0.000139267 kg; = p2927*8.2142857143
- NMVOC, non-methane volatile organic compounds, unspecified origin [air, non-urban air or from high stacks]: 0.000154746 kg; = 1.0 * (p2052+p2051)
- Other single phosphates; no broadcast in fert. in spr. bef. plant.; kg P: 1.19055e-5 kg; = p2505
- Phenol [air, non-urban air or from high stacks]: 3.12376e-6 kg; = 1.0 * (p2133*1.3055555556)
- Ammonium nitrate; broadcast w/ incorp. in fert. in fall bef. plant.: 0.000648515 kg; = p2632*4.7142857143
- Other single phosphates; no broadcast in fert. in fall bef. plant.; kg P: 1.26083e-5 kg; = p2466
- Methanol [air, non-urban air or from high stacks]: 1.97937e-5 kg; = 1.0 * (p2129*2.6666666667)
- Isoprene [air, non-urban air or from high stacks]: 2.27254e-6 kg; = 1.0 * (p2145*1.1333333333)
- Tribenuron-methyl: 1.05161e-7 kg; = p3887
- Nitrogen; using unspec. method in manure at an unknown time: 0.000473787 kg; = p3470
- Trifluralin [soil, agricultural]: 2.2799e-5 kg; = 1.0 * (p4716+p4304+p4098+p5334)
- Pesticide formulation balance; foliar or directed spray: 0.000102385 kg; = p4720
- Phosphorous; in below-ground residue: 0.000557327 kg; = p2175
- Aqueous ammonia; broadcast w/ incorp. in fert. in spr. bef. plant.: 1.51293e-5 kg; = p2669*1.2142857143
- Nonvolatile constituents; using unspec. method in man. at unknown time; exc.CNPK,biogenic: 0.000721006 kg; = p3474
- Glyphosate [air, non-urban air or from high stacks]: 1.83155e-6 kg; = 1.0 * (p3792)
- Superphosphate, grades<= 22%; no broadcast in fert. at plant.; kg P: 1.20133e-5 kg; = p2540
- Clopyralid: 2.71666e-7 kg; = p3735
- Tebuconazole [soil, agricultural]: 3.64784e-6 kg; = 1.0 * (p4697+p4285+p4079+p5315)
- Aqueous ammonia; broadcast w/o incorp. in fert. in spr. bef. plant.: 1.58929e-5 kg; = p2864*1.2142857143
- Nitrogen; in below-ground residue: 0.00364561 kg; = p2174
- Nitrogen solution; no broadcast in fert. in fall bef. plant.; no broadcast in fert. in fall bef. plant.; kg N: 0.0034422 kg; = p2444
- Magnesium [soil, agricultural]: 0.000169374 kg; = 1.0 * (p3227)
- Propanenitrile: 3.8591e-7 kg; = p2157*1.5277777778
- Volatile constituents; using unspec. method in man. at unknown time: 0.00466158 kg; = p3473
- Nonvolatile constituents; broadcast w/o incorp. in man. at unknown time; exc.CNPK,biogenic: 0.000883761 kg; = p3417
- Monoammonium phosphate; broadcast w/ incorp. in fert. at plant.: 0.000578999 kg; = p2732*8.2142857143
- Sodium nitrate; broadcast w/ incorp. in fert. in fall bef. plant.: 7.99661e-6 kg; = p2642*6.0714285714
- Superphosphate, grades>22%; broadcast w/o incorp. in fert. in spr. bef. plant.; kg P: 1.45943e-6 kg; = p2893
- isopentane: 1.0193e-7 kg; = p2151*1.0166666667
- Thifensulfuron methyl; broadcast without incorporation: 1.5771e-8 kg; = p4292
- 1-Butene: 8.06218e-7 kg; = p2144*1.1666666667
- Diammonium phosphate; no broadcast in fert. in spr. bef. plant.: 0.00160857 kg; = p2494*4.7142857143
- Calcium [soil, agricultural]: 0.00891809 kg; = 1.0 * (p3226+p3218)
- Methyl vinyl ether; from residue burning: 4.56793e-7 kg; = p2137*1.6111111111
- Pesticide formulation balance; broadcast without incorporation: 8.07625e-6 kg; = p4308
- Aqueous ammonia; broadcast w/o incorp. in fert. in fall bef. plant.: 1.62328e-5 kg; = p2825*1.2142857143
- Diammonium phosphate; broadcast w/ incorp. in fert. at plant.: 0.00166016 kg; = p2728*4.7142857143
- Superphosphate, grades<= 22%; broadcast w/o incorp. in fert. in fall bef. plant.; kg P: 8.34207e-8 kg; = p2852
- Sodium nitrate; no broadcast in fert. at plant.: 2.14693e-5 kg; = p2525*6.0714285714
- Superphosphate, grades<= 22%; unspec. appl. method in fert. at plant.; kg P: 2.44229e-8 kg; = p3125
- Urea; broadcast w/ incorp. in fert. at plant.: 0.000462746 kg; = p2724*5
- Monoammonium phosphate; no broadcast in fert. in spr. bef. plant.: 0.000561006 kg; = p2498*8.2142857143
- Thifensulfuron methyl; broadcast by air: 4.38171e-8 kg; = p3880
- Ammonium sulfate; broadcast w/ incorp. in fert. at plant.: 0.000116074 kg; = p2713*4.7142857143
- Diammonium phosphate; broadcast w/o incorp. in fert. in spr. bef. plant.: 6.48979e-5 kg; = p2884*4.7142857143
- Superphosphate, grades>22%; broadcast w/ incorp. in fert. at plant.; kg P: 3.7334e-5 kg; = p2737
- Gypsum: 4.55576e-6 kg; = p3229
- Sodium nitrate; broadcast w/o incorp. in fert. in fall bef. plant.: 8.40018e-6 kg; = p2837*6.0714285714
- Superphosphate, grades<= 22%; broadcast w/o incorp. in fert. at plant.; kg P: 4.84678e-7 kg; = p2930
- Diammonium phosphate; unspec. appl. method in fert. at plant.: 2.01217e-5 kg; = p3118*4.7142857143
- Aqueous ammonia; broadcast w/ incorp. in fert. at plant.: 7.81871e-6 kg; = p2708*1.2142857143
- Other single phosphates; broadcast w/o incorp. in fert. in spr. bef. plant.; kg P: 4.80328e-7 kg; = p2895
- Sodium nitrate; broadcast w/ incorp. in fert. in spr. bef. plant.: 7.82913e-6 kg; = p2681*6.0714285714
- Superphosphate, grades>22%; no broadcast in fert. in spr. bef. plant.; kg P: 3.61738e-5 kg; = p2503
- Sodium nitrate; no broadcast in fert. in spr. bef. plant.: 4.15434e-5 kg; = p2486*6.0714285714
- Ammonium nitrate; no broadcast in fert. at plant.: 0.00174113 kg; = p2515*4.7142857143
- Acetaldehyde [air, non-urban air or from high stacks]: 7.49056e-6 kg; = 1.0 * (p2130*1.8333333333)
- Ammonium nitrate; no broadcast in fert. in fall bef. plant.: 0.00344119 kg; = p2437*4.7142857143
- Sulfuric acid [soil, agricultural]: 5.16547e-8 kg; = 1.0 * (p3231)
- Bromoxynil: 1.73516e-6 kg; = p3717
- Sulfur [soil, agricultural]: 2.6873e-7 kg; = 1.0 * (p3230)
- Superphosphate, grades<= 22%; broadcast w/ incorp. in fert. in fall bef. plant.; kg P: 3.46819e-7 kg; = p2657
- Other single phosphates; broadcast w/o incorp. in fert. in fall bef. plant.; kg P: 5.08685e-7 kg; = p2856
- Oxygen; applied in dolomite: 0.000670275 kg; = p3228
- Pesticide formulation balance; broadcast by air: 2.24385e-5 kg; = p3896
- Glyphosate [soil, agricultural]: 1.46615e-5 kg; = 1.0 * (p3998+p5234+p4204+p4616)
- Superphosphate, grades<= 22%; unspec. appl. method in fert. in fall bef. plant.; kg P: 4.20356e-9 kg; = p3047
- Sodium nitrate; broadcast w/o incorp. in fert. at plant.: 4.25022e-6 kg; = p2915*6.0714285714
- Urea; broadcast w/ incorp. in fert. in spr. bef. plant.: 0.00089542 kg; = p2685*5
- Anhydrous ammonia; no broadcast in fert. in fall bef. plant.: 0.00493304 kg; = p2433*1.2142857143
- Methane: 1.27455e-5 kg; = p2025*1.3333333333
- Potassium; broadcast w/o incorp. in manure at an unknown time: 0.000525105 kg; = p3415
- Urea; broadcast w/ incorp. in fert. in fall bef. plant.: 0.000914575 kg; = p2646*5
- Ammonium sulfate; broadcast w/o incorp. in fert. in spr. bef. plant.: 0.00023594 kg; = p2869*4.7142857143
- Potassium; in above-ground residue left on field; biogenic: 0.00637865 kg; = p2170
- Glycolaldehyde; from residue burning: 1.21339e-5 kg; = p2135*2.5
- Other single phosphates; broadcast w/ incorp. in fert. at plant.; kg P: 1.22873e-5 kg; = p2739
- Urea; broadcast w/o incorp. in fert. in spr. bef. plant.: 0.00094061 kg; = p2880*5
- Other limestone constituents; applied in limestone: 0.00137383 kg; = p3220
- cis-2-Butene: 2.58712e-7 kg; = p2149*1.1666666667
- Thifensulfuron methyl; foliar or directed spray: 1.99933e-7 kg; = p4704

## Sampling procedure
A delete-a-group jackknife is used by the USDA to estimate the ARMS sample means and RSEs, based on a 15 sample delete-a-group jackknife. Because of this relatively small sample size, a Students t distribution is used to represent ARMS data probability density functions. Other representations of uncertainty are described in Cooper, J.S., Kahn, E., Noon, M. (2012). LCA Digital Commons Unit Process Data: field crop production Version 1. Prepared for the US Department of Agriculture National Agricultural Library. Retrieved from https://www.lcacommons.gov/discovery/docs/LCA%20Digital%20Commons%20Unit%20Process%20Data%20final%20updated.pdf

## Extrapolations
Data represent an aggregation of processes applied in North Dakota in 1998. Data development is demonstrated by parameterization (exlicitly presents all raw and uncertainty data and all calculations). Flow data quality according to the LCADC convention is provided for all flows.
