# soybeans; at harvest in 2002; at farm; 85%-92% moisture

Dataset: EcoSpold 2, unit process
Geography: GLO
Time period: 2002-01-02 to 2003-01-01
Scenario: Business-as-Usual
System model: Allocation, ecoinvent default
Generated by: cooperjs@u.washington.edu
isCopyrightProtected: false

## General comment
This unit process/ gate-to-gate dataset represents the production of 1 kg soybeans coproduced with residue. The process technologies are an aggregation of those applied in Illinois in 2002. Applicable classifications include ISIC 0111, NAIC 111110, UNSPSC 50407053; this dataset was prepared in ILCD format using the UWDFE Lab Excel to ILCD File Generator (beta version, August 2013)

Exchange "NMVOC, non-methane volatile organic compounds, unspecified origin-air low population density" is the result of combining the following original LCA Commons flows: "NMVOCs; from residue burning; kg C, biogenic", "NMVOCs; from residue burning; kg except C, biogenic".
Exchange "Glyphosate-soil agricultural" is the result of combining the following original LCA Commons flows: "Glyphosate; unspec. appl. method; kg AI", "Glyphosate; foliar or directed spray; kg AI", "Glyphosate; broadcast without incorporation; kg AI", "Glyphosate; broadcast with incorporation; kg AI".
Exchange "Imazethapyr-soil agricultural" is the result of combining the following original LCA Commons flows: "Imazethapyr; broadcast with incorporation; kg AI", "Imazethapyr; foliar or directed spray; kg AI", "Imazethapyr; broadcast without incorporation; kg AI", "Imazethapyr; unspec. appl. method; kg AI".
Exchange "Carbon-soil agricultural" is the result of combining the following original LCA Commons flows: "Carbon; broadcast w/o incorp. in manure at an unknown time", "Carbon; in below-ground residue; biogenic", "Carbon; injected/knifed in manure at an unknown time", "Carbon; applied in limestone", "Carbon; using unspec. method in manure at an unknown time", "Carbon; applied in dolomite", "Carbon; applied in sewage sludge", "Carbon; in above-ground residue left on field; biogenic".
Exchange "Particulates, < 2.5 um-air low population density" is the result of combining the following original LCA Commons flows: "PM2.5; from residue burning; kg C, biogenic", "PM2.5; from residue burning; kg except C, biogenic".
Exchange "Pesticides, unspecified-soil agricultural" is the result of combining the following original LCA Commons flows: "Unspecified pesticide; broadcast with incorporation; kg AI", "Unspecified pesticide; foliar or directed spray; kg AI", "Unspecified pesticide; unspec. appl. method; kg AI", "Unspecified pesticide; broadcast without incorporation; kg AI".
Exchange "Sulfentrazone-soil agricultural" is the result of combining the following original LCA Commons flows: "Sulfentrazone; foliar or directed spray; kg AI", "Sulfentrazone; broadcast without incorporation; kg AI", "Sulfentrazone; unspec. appl. method; kg AI", "Sulfentrazone; broadcast with incorporation; kg AI".
Exchange "Fluazifop-P-butyl-soil agricultural" is the result of combining the following original LCA Commons flows: "Fluazifop-p-butyl; foliar or directed spray; kg AI", "Fluazifop-p-butyl; unspec. appl. method; kg AI", "Fluazifop-p-butyl; broadcast with incorporation; kg AI", "Fluazifop-p-butyl; broadcast without incorporation; kg AI".
Exchange "Clethodim-soil agricultural" is the result of combining the following original LCA Commons flows: "Clethodim; foliar or directed spray; kg AI", "Clethodim; broadcast without incorporation; kg AI", "Clethodim; unspec. appl. method; kg AI", "Clethodim; broadcast with incorporation; kg AI".
Exchange "Lactofen-soil agricultural" is the result of combining the following original LCA Commons flows: "Lactofen; foliar or directed spray; kg AI", "Lactofen; broadcast with incorporation; kg AI", "Lactofen; unspec. appl. method; kg AI", "Lactofen; broadcast without incorporation; kg AI".
Exchange "Ash-soil agricultural" is the result of combining the following original LCA Commons flows: "Ash; from residue burning; kg C, biogenic", "Ash; from residue burning; kg except C, biogenic".
Exchange "Trifluralin-soil agricultural" is the result of combining the following original LCA Commons flows: "Trifluralin; unspec. appl. method; kg AI", "Trifluralin; broadcast with incorporation; kg AI", "Trifluralin; foliar or directed spray; kg AI", "Trifluralin; broadcast without incorporation; kg AI".
Exchange "Water-soil agricultural" is the result of combining the following original LCA Commons flows: "Water; in below-ground residue; biogenic", "Water; in above-ground residue left on field; biogenic", "Water; injected/knifed in manure", "Water; broadcast w/o incorp. in manure", "Water; using unspec. method in manure", "Water; from irrigation and applied with manure and sewage sludge".
Exchange "Pendimethalin-soil agricultural" is the result of combining the following original LCA Commons flows: "Pendimethalin; broadcast with incorporation; kg AI", "Pendimethalin; broadcast without incorporation; kg AI", "Pendimethalin; unspec. appl. method; kg AI", "Pendimethalin; foliar or directed spray; kg AI".
Exchange "Chlorimuron-ethyl-soil agricultural" is the result of combining the following original LCA Commons flows: "Chlorimuron-ethyl; broadcast without incorporation; kg AI", "Chlorimuron-ethyl; foliar or directed spray; kg AI", "Chlorimuron-ethyl; broadcast with incorporation; kg AI", "Chlorimuron-ethyl; unspec. appl. method; kg AI".
Exchange "Acifluorfen-soil agricultural" is the result of combining the following original LCA Commons flows: "Acifluorfen; unspec. appl. method; kg AI", "Acifluorfen; broadcast without incorporation; kg AI", "Acifluorfen; foliar or directed spray; kg AI", "Acifluorfen; broadcast with incorporation; kg AI".
Exchange "Water, unspecified origin-resource in water" is the result of combining the following original LCA Commons flows: "Water; from plant uptake; biogenic", "Water; withdrawal from unspec. source, for soybeans, in 2002".
Exchange "Fomesafen-soil agricultural" is the result of combining the following original LCA Commons flows: "Sodium bentazon; foliar or directed spray; kg AI", "Sodium bentazon; unspec. appl. method; kg AI", "Sodium bentazon; broadcast without incorporation; kg AI", "Sodium bentazon; broadcast with incorporation; kg AI".
Exchange "Cloransulam-methyl-soil agricultural" is the result of combining the following original LCA Commons flows: "Cloransulam-methyl; broadcast with incorporation; kg AI", "Cloransulam-methyl; unspec. appl. method; kg AI", "Cloransulam-methyl; broadcast without incorporation; kg AI", "Cloransulam-methyl; foliar or directed spray; kg AI".
Exchange "Particulates, < 10 um-air low population density" is the result of combining the following original LCA Commons flows: "PM10; from residue burning; kg except C, biogenic", "PM10; from residue burning; kg C, biogenic".
Exchange "Tribenuron-methyl-soil agricultural" is the result of combining the following original LCA Commons flows: "Tribenuron-methyl; unspec. appl. method; kg AI", "Tribenuron-methyl; foliar or directed spray; kg AI", "Tribenuron-methyl; broadcast without incorporation; kg AI", "Tribenuron-methyl; broadcast with incorporation; kg AI".
Exchange "Transformation, from arable-resource land" is the result of combining the following original LCA Commons flows: "Transformation; from arable, from small grains to soybeans", "Transformation; from arable, from soy to soybeans", "Transformation; from arable, from corn to soybeans", "Transformation; from arable, from unspec. use to soybeans".
Exchange "Calcium-soil agricultural" is the result of combining the following original LCA Commons flows: "Calcium; applied in dolomite", "Calcium; applied in limestone".
Exchange "Imazamox-soil agricultural" is the result of combining the following original LCA Commons flows: "Imazamox; foliar or directed spray; kg AI", "Imazamox; unspec. appl. method; kg AI", "Imazamox; broadcast with incorporation; kg AI", "Imazamox; broadcast without incorporation; kg AI".
Exchange "2,4-D-soil agricultural" is the result of combining the following original LCA Commons flows: "2,4-D; foliar or directed spray; kg AI", "2,4-D; broadcast without incorporation; kg AI", "2,4-D; broadcast with incorporation; kg AI", "2,4-D; unspec. appl. method; kg AI".
Exchange "Zinc compounds-be1c0329-f1a8-4524-8420-a86d2a8dd358 agricultural" was originally named: "Zinc compounds; as secondary application" in this dataset.
Exchange "Ethane-2bdf9967-6dae-4183-88d1-8f612548c51e low population density" was originally named: "Ethane; from residue burning; kg C, biogenic" in this dataset.
Exchange "Phenol-2bdf9967-6dae-4183-88d1-8f612548c51e low population density" was originally named: "Phenol; from residue burning; kg C, biogenic" in this dataset.
Exchange "Benzene-2bdf9967-6dae-4183-88d1-8f612548c51e low population density" was originally named: "Benzene; from residue burning; kg C, biogenic" in this dataset.
Exchange "Isoprene-2bdf9967-6dae-4183-88d1-8f612548c51e low population density" was originally named: "Isoprene; from residue burning; kg C, biogenic" in this dataset.
Exchange "Water-2bdf9967-6dae-4183-88d1-8f612548c51e low population density" was originally named: "Water; from residue burning; biogenic" in this dataset.
Exchange "Methanol-2bdf9967-6dae-4183-88d1-8f612548c51e low population density" was originally named: "Methanol; from residue burning; kg C, biogenic" in this dataset.
Exchange "Formic acid-2bdf9967-6dae-4183-88d1-8f612548c51e low population density" was originally named: "Formic acid; from residue burning; kg C, biogenic" in this dataset.
Exchange "Acetonitrile-2bdf9967-6dae-4183-88d1-8f612548c51e low population density" was originally named: "Acetonitrile; from residue burning; kg C, biogenic" in this dataset.
Exchange "isobutene-2bdf9967-6dae-4183-88d1-8f612548c51e low population density" was originally named: "I butene; from residue burning; kg C, biogenic" in this dataset.
Exchange "Acetone-2bdf9967-6dae-4183-88d1-8f612548c51e low population density" was originally named: "Acetone; from residue burning; kg C, biogenic" in this dataset.
Exchange "Butadiene-2bdf9967-6dae-4183-88d1-8f612548c51e low population density" was originally named: "1,3 butadiene; from residue burning; kg C, biogenic" in this dataset.
Exchange "Carbon dioxide-c19fb2d9-98eb-4cd3-8761-81b71d8a9a1b unspecified" was originally named: "Carbon dioxide; from plant uptake; kg C, biogenic" in this dataset.
Exchange "Ethyne-2bdf9967-6dae-4183-88d1-8f612548c51e low population density" was originally named: "Acetylene; from residue burning; kg C, biogenic" in this dataset.
Exchange "Pentane-2bdf9967-6dae-4183-88d1-8f612548c51e low population density" was originally named: "N pentane; from residue burning; kg C, biogenic" in this dataset.
Exchange "Acetaldehyde-2bdf9967-6dae-4183-88d1-8f612548c51e low population density" was originally named: "Acetaldehyde; from residue burning; kg C, biogenic" in this dataset.
Exchange "Acetic acid-2bdf9967-6dae-4183-88d1-8f612548c51e low population density" was originally named: "Acetic acid; from residue burning; kg C, biogenic" in this dataset.
Exchange "Methane-2bdf9967-6dae-4183-88d1-8f612548c51e low population density" was originally named: "Methane; from residue burning; kg C, biogenic" in this dataset.
Exchange "Dinitrogen monoxide-2bdf9967-6dae-4183-88d1-8f612548c51e low population density" was originally named: "Dinitrogen monoxide; from residue burning; kg N, biogenic" in this dataset.
Exchange "Furan-2bdf9967-6dae-4183-88d1-8f612548c51e low population density" was originally named: "Furan; from residue burning; kg C, biogenic" in this dataset.
Exchange "Ammonia-2bdf9967-6dae-4183-88d1-8f612548c51e low population density" was originally named: "Ammonia; from residue burning; kg N, biogenic" in this dataset.
Exchange "Transformation, to arable-c19fb2d9-98eb-4cd3-8761-81b71d8a9a1b land" was originally named: "Transformation; to arable, to soybeans" in this dataset.
Exchange "isopentane-2bdf9967-6dae-4183-88d1-8f612548c51e low population density" was originally named: "I pentane; from residue burning; kg C, biogenic" in this dataset.
Exchange "Sulfuric acid-be1c0329-f1a8-4524-8420-a86d2a8dd358 agricultural" was originally named: "Sulfuric acid; as secondary application" in this dataset.
Exchange "Butane-2bdf9967-6dae-4183-88d1-8f612548c51e low population density" was originally named: "N butane; from residue burning; kg C, biogenic" in this dataset.
Exchange "Magnesium-be1c0329-f1a8-4524-8420-a86d2a8dd358 agricultural" was originally named: "Magnesium; applied in dolomite" in this dataset.
Exchange "Ethene-2bdf9967-6dae-4183-88d1-8f612548c51e low population density" was originally named: "Ethylene; from residue burning; kg C, biogenic" in this dataset.
Exchange "Carbon monoxide, fossil-2bdf9967-6dae-4183-88d1-8f612548c51e low population density" was originally named: "Carbon monoxide; from residue burning; kg C, biogenic" in this dataset.
Exchange "Acrylonitrile-2bdf9967-6dae-4183-88d1-8f612548c51e low population density" was originally named: "Propenenitrile; from residue burning; kg C, biogenic" in this dataset.
Exchange "Phosphorus-c19fb2d9-98eb-4cd3-8761-81b71d8a9a1b unspecified" was originally named: "Phosphorous; from plant uptake; biogenic" in this dataset.
Exchange "Formaldehyde-2bdf9967-6dae-4183-88d1-8f612548c51e low population density" was originally named: "Formaldehyde; from residue burning; kg C, biogenic" in this dataset.
Exchange "Sulfur dioxide-2bdf9967-6dae-4183-88d1-8f612548c51e low population density" was originally named: "Sulfur dioxide; from residue burning; biogenic" in this dataset.
Exchange "Carbon dioxide, in air-2bdf9967-6dae-4183-88d1-8f612548c51e low population density" was originally named: "Carbon dioxide; from residue burning; kg C, biogenic" in this dataset.
Exchange "Propane-2bdf9967-6dae-4183-88d1-8f612548c51e low population density" was originally named: "Propane; from residue burning; kg C, biogenic" in this dataset.
Exchange "trans-2-Butene-2bdf9967-6dae-4183-88d1-8f612548c51e low population density" was originally named: "Trans 2 butene; from residue burning; kg C, biogenic" in this dataset.
Exchange "Hydrocyanic acid-2bdf9967-6dae-4183-88d1-8f612548c51e low population density" was originally named: "Hydrogen cyanide; from residue burning; kg C, biogenic" in this dataset.
Exchange "Occupation, arable-c19fb2d9-98eb-4cd3-8761-81b71d8a9a1b land" was originally named: "Occupation; arable, as soybeans" in this dataset.
Exchange "Nitrogen dioxide-2bdf9967-6dae-4183-88d1-8f612548c51e low population density" was originally named: "Nitrogen dioxide; from residue burning; kg N, biogenic" in this dataset.
Exchange "Toluene-2bdf9967-6dae-4183-88d1-8f612548c51e low population density" was originally named: "Toluene; from residue burning; kg C, biogenic" in this dataset.
Exchange "cis-2-Butene-2bdf9967-6dae-4183-88d1-8f612548c51e low population density" was originally named: "Cis 2 butene; from residue burning; kg C, biogenic" in this dataset.
Exchange "Sulfur-be1c0329-f1a8-4524-8420-a86d2a8dd358 agricultural" was originally named: "Sulfur; as secondary application" in this dataset.
Exchange "Propene-2bdf9967-6dae-4183-88d1-8f612548c51e low population density" was originally named: "Propylene; from residue burning; kg C, biogenic" in this dataset.
Exchange "1-Butene-2bdf9967-6dae-4183-88d1-8f612548c51e low population density" was originally named: "1 butene; from residue burning; kg C, biogenic" in this dataset.

## Geography
The unit process is assumed to represent production in Illinois (US State).

## Technology
This process produces soybeans; at harvest in 2002; at farm; 85%-92% moisture. The process is assumed to represent production in Illinois (US State). Yields and related inputs and outputs represent a single year of operation, in 2002. This dataset includes consideration of residue burning; soil preparation; planting or sowing; irrigation; application, storage, and transport of fertilizers, manures, liming materials, secondary materials, and pesticides; and harvest. Fate and transport of applications are not included as described in Cooper, J.S., Kahn, E., Noon, M. (2012) LCA Digital Commons Unit Process Data: field crop production Version 1 which is available at https://www.lcacommons.gov/discovery/docs/LCA%20Digital%20Commons%20Unit%20Process%20Data%20final%20updated.pdf

## Time period
Start and end dates match the underlying data obtained from the USDA Agricultural Resource Management Survey (ARMS).
## Parameters
- p0715: 0
- p0885: 0; = IF(p0689+p0884=100;0;100-(p0689+p0884))
- p1737: 0
- p4213: 1.31634e-7; = p1864*p3479
- p2570: 0; = p2374*p1014
- p2563: 0; = p2367*p1014
- p2186: 8.89356e-5; = p1052/p0818
- p2540: 0; = p2344*p1073
- p3323: 0; = if(and(p1232=0;p3255<>0);p3265*p3277*(p3299*p3291+(1-p3299)*p3295);0)
- p2274: 0.000474511; = p2230*p2220
- p1827: 0
- p4693: 1.90936e-6; = p1932*p3481
- p1908: 0
- p2751: 0; = p2360*(p1019+p1021)
- p3215: 0.450791; = p1222*3*15.9994/100.0869
- p1661: 0
- p2667: 8.91757e-5; = p2276*(p1019+p1021)
- p2586: 0; = p2390*p1123
- p2877: 4.70106e-7; = p2291*(p1020+p1022)
- p1102: 0.0269305; = IF(p1071=0;IF(p1096+p1101=1;0;IF(p1096+p1101+p1098>1;1-(p1096+p1101);p1098));0)
- p1854: 0
- p0967: 5.84635e8; = (p0684/100)*p0683*p0682*1000
- p2334: 0; = p2224*p2202
- p0328: 0.5
- p2549: 0; = p2353*p1123
- p2938: 0; = p2352*(p1129+p1131)
- p5034: 0; = p1861*p3483
- p2280: 5.76906e-5; = p2223*p2186
- p0113: 28.532
- p1129: 0.64949; = if(p1121=0;IF(p1123+p1128=1;0;IF(p1123+p1128+p1125>1;1-(p1123+p1128);p1125));0)
- p0461: 0; = SQRT(2)*(IF((2*p0329-1)<0;-1;IF((2*p0329-1)>0;1;0))*SQRT(SQRT((2/(pi()*0.140012289)+LN(1-(2*p0329-1)^2)/2)^2-LN(1-(2*p0329-1)^2)/0.140012289)-(2/(pi()*0.140012289)+LN(1-(2*p0329-1)^2)/2)))
- p2049: 25.6942
- p1945: 0
- p1212: 0.0856952; = if(p1211=0;0;if(p1193>0;0;(p1207+p1208+p1209)*p1210/(2000*p1211)))
- p2711: 0; = p2320*(p1019+p1021)
- p1323: 0; = IF(((p0745*1000*p0750/100)+(p0754*1000*p0759/100))/p0801<0;0;((p0745*1000*p0750/100)+(p0754*1000*p0759/100))/p0801)
- p1998: 355
- p3287: 0.745
- p1030: 0; = IF(p1012=0;p1024*p0001/(p0818*p0002);0)
- p2233: 0; = if(p0783*p0787+p0784*p0788+p0785*p0789+p0786*p0790=0;0;p0790*p0786/(p0783*p0787+p0784*p0788+p0785*p0789+p0786*p0790))
- p1191: 0.5
- p0353: 0.5
- p2666: 0.000289022; = p2275*(p1128+p1130)
- p0289: 0.5
- p1566: 0
- p2774: 0; = p2383*(p1078+p1080)
- p2433: 0; = p2237*p1014
- p2438: 0; = p2242*p1014
- p0797: 54.54; = p0137*(1+p0665*p0269/100)
- p3407: 0; = p3369*p1238
- p0801: 1.06e7
- p3681: 0; = p1950*p3476
- p3420: 0; = p3363*p1239
- p1233: 0; = p1232*p0001/(p0818*p0002)
- p1655: 0
- p0080: 95.388
- p1084: 899168; = IF(p1071=0;p1078*(p0710/100)*p0703*1000;0)
- p2378: 0; = p2229*p2207
- p0937: 7.84709e-5; = p0931*p0001/(p0818*p0002)
- p2387: 0; = p2229*p2216
- p2102: 0.922577
- p1959: 12326.2; = if(p0738*p0740*p0739>0;p0738*1000*(p0740/100)*p0739/1000;p1958)
- p2515: 0; = p2319*p1014
- p1887: 0
- p3359: 1.22091e8; = if(p1232=0;p3309+p3320+p3331+p3342+p3353;0)
- p1839: 6.61303e-7; = p1431*1000/p0818
- p1339: 0.000406333; = p1338*p0001/(p0818*p0002)
- p1928: 0
- p0174: 0
- p4103: 1.51714e-6; = p1754*p3479
- p2693: 5.71624e-5; = p2302*(p1078+p1080)
- p2223: 0.648678; = if(p0765*p0769+p0766*p0770+p0767*p0771+p0768*p0772=0;0;p0770*p0766/(p0765*p0769+p0766*p0770+p0767*p0771+p0768*p0772))
- p3245: 0; = IF(p3244=1;0;if(p3244+p0792/100>1;1-p3244;p0792/100))
- p4617: 1.28259e-5; = p1856*p3481
- p2748: 0; = p2357*(p1019+p1021)
- p0699: 0
- p2393: 0; = p2234*p2182
- p2132: 1.80353e-7; = p2015*p2060*p2094/(p0818*1000)
- p1787: 0
- p0282: 0.5
- p2052: 8.84112e-7; = p2015*p2049*(1-p2050)/(p0818*1000)
- p2147: 4.27178e-8; = p2015*p2075*p2109/(p0818*1000)
- p2279: 2.2938e-5; = p2223*p2185
- p0810: 0
- p2869: 1.51783e-5; = p2283*(p1020+p1022)
- p3089: 0; = p2308*p1082
- p3008: 0; = p2422*(p1079+p1081)
- p3064: 2.95357e-6; = p2283*p1023
- p1569: 0
- p2002: 750
- p1955: 5.43738e-6; = p1547*1000/p0818
- p3732: 0; = p1795*p3477
- p2289: 0.000646307; = p2223*p2196
- p0368: 0.5
- p2514: 0; = p2318*p1014
- p2205: 0.00138009; = 2*14.0067*p2204/30.973762
- p0220: 91.716
- p1553: 0
- p1052: 2.42074e6; = IF(p1012=0;p1045*p1036;0)
- p0214: 17.683
- p0835: 582.904; = -LN(1-p0669/100)/p0834
- p3365: 0; = if(p1232=0;p3244*p3359/p0818;0)
- p2432: 0.0105457; = p1158
- p0770: 56.416; = p0110*(1+p0638*p0242/100)
- p3450: 0; = p3374*p1240
- p2701: 9.02599e-5; = p2310*(p1078+p1080)
- p0802: 1.055e7
- p3413: 0.000820082; = p3375*p1238
- p3397: 0; = p3378*p1234
- p2297: 0.000725722; = p2227*p2204
- p2322: 0; = p2224*p2189
- p4307: 1.5556e-6; = p1962*p3479
- p2151: 1.19489e-8; = p2015*p2079*p2113/(p0818*1000)
- p1763: 0
- p2085: 0.0335294
- p1274: 0; = p1270*p1252/p0818
- p0689: 100; = p0029*(1+p0557*p0161/100)
- p2941: 0; = p2355*(p1020+p1022)
- p1637: 0
- p3398: 0; = p3379*p1234
- p3184: 0; = p2403*p1023
- p2122: 0.341195
- p0767: 0
- p2365: 0; = p2225*p2193
- p1848: 0
- p0743: 0
- p0755: 0
- p2946: 0; = p2360*(p1020+p1022)
- p0272: 48.698
- p3480: 0; = if(p1328+p1330+p1332+p1334+p1336+p1338+p1340+p1342+p1344=0;0;p1336/(p1328+p1330+p1332+p1334+p1336+p1338+p1340+p1342+p1344))
- p0692: 0
- p1441: 80
- p2986: 0; = p2400*(p1020+p1022)
- p3443: 0; = p3367*p1240
- p2520: 0; = p2324*p1014
- p0088: 37.12
- p1987: 400
- p1647: 0
- p2769: 0; = p2378*(p1078+p1080)
- p2019: 0.13105
- p2902: 0; = p2316*(p1020+p1022)
- p2533: 0; = p2337*p1073
- p0832: 4.50469e9; = p0831*p0830/(1-p0831)
- p1902: 0
- p3453: 0; = p3377*p1240
- p2306: 1.64709e-5; = p2227*p2213
- p0063: 10548.7
- p0316: 0.5
- p0003: 10000
- p1734: 0
- p1999: 1.89262e9; = (p1228+p1229)*p0818+p1164
- p0974: 0.5
- p3197: 0; = p2416*p1082
- p2293: 0.000265058; = p2223*p2200
- p3160: 0; = p2379*p1082
- p3189: 0; = p2408*p1023
- p2368: 0; = p2225*p2197
- p0449: 0; = SQRT(2)*(IF((2*p0317-1)<0;-1;IF((2*p0317-1)>0;1;0))*SQRT(SQRT((2/(pi()*0.140012289)+LN(1-(2*p0317-1)^2)/2)^2-LN(1-(2*p0317-1)^2)/0.140012289)-(2/(pi()*0.140012289)+LN(1-(2*p0317-1)^2)/2)))
- p1653: 0
- p3806: 0; = p1869*p3477
- p2364: 0; = p2225*p2192
- p3132: 0; = p2351*p1132
- p0216: 0
- p2512: 0; = p2316*p1014
- p5282: 2.00644e-7; = p1903*p3484
- p2009: 0.0271468; = ((p1983*p1985+p1989*p1991+p1995*p1997+p2003*p2005+p1976*p1977+p1978*p1979+p1998*p1999)/p0818)*p0005*p0002/1000
- p3358: 3.18152e7; = if(p1232=0;p3308+p3319+p3330+p3341+p3352;0)
- p2916: 0; = p2330*(p1020+p1022)
- p1069: 4.4292e-6; = IF(p1012=0;p1055/(p1062*p0818);0)
- p4299: 2.23109e-9; = p1950*p3479
- p2579: 0; = p2383*p1073
- p0007: 14; = p0006-1
- p0857: 3.47445; = p0856*p0001*p0003/(p0818*p0002)
- p1291: 0; = IF(p1287+p1290=p1264;0;IF(p1287+p1290+p1289>p1264;p1264-(p1287+p1290);p1289))
- p2055: 5.59471
- p0869: 0.0114456; = IF(p0858+p0864+p0865+p0866+p0867+p0868=1;0;1-(p0858+p0864+p0865+p0866+p0867+p0868))
- p1077: 0; = IF(p1071=0;p0715/100;0)
- p2998: 0; = p2412*(p1020+p1022)
- p2951: 0; = p2365*(p1020+p1022)
- p1195: 0.45
- p2097: 0.40001
- p2658: 5.42579e-6; = p2267*(p1078+p1080)
- p2974: 0; = p2388*(p1079+p1081)
- p1870: 0
- p1855: 0.000323414; = p1447*1000/p0818
- p3566: 0; = p1835*p3476
- p2622: 0; = p2426*p1073
- p0815: 0
- p2872: 3.53568e-5; = p2286*(p1020+p1022)
- p0533: 0; = SQRT(2)*(IF((2*p0401-1)<0;-1;IF((2*p0401-1)>0;1;0))*SQRT(SQRT((2/(pi()*0.140012289)+LN(1-(2*p0401-1)^2)/2)^2-LN(1-(2*p0401-1)^2)/0.140012289)-(2/(pi()*0.140012289)+LN(1-(2*p0401-1)^2)/2)))
- p0643: 0; = IF(p0379<0.5;-SQRT(p0007*EXP(p0511^2*p0008)-p0007);SQRT(p0007*EXP(p0511^2*p0008)-p0007))
- p2662: 9.95251e-5; = p2271*(p1078+p1080)
- p2904: 0; = p2318*(p1020+p1022)
- p1273: 0; = p1267*p1252/p0818
- p3909: 4.74098e-7; = p1766*p3478
- p3316: 0; = if(and(p1232=0;p3253<>0);1-(p3312+p3313+p3314+p3315);0)
- p0308: 0.5
- p1137: 0; = if(p1121=0;p1131*(p0716/100)*p0703*1000;0)
- p2552: 0; = p2356*p1014
- p2709: 0; = p2318*(p1019+p1021)
- p1345: 4.07926e-6; = IF(p1318=0;p1344*p0001/(p0818*p0002);0)
- p2815: 0; = p2424*(p1078+p1080)
- p1288: 0
- p2410: 0; = p2234*p2200
- p0468: 0; = SQRT(2)*(IF((2*p0336-1)<0;-1;IF((2*p0336-1)>0;1;0))*SQRT(SQRT((2/(pi()*0.140012289)+LN(1-(2*p0336-1)^2)/2)^2-LN(1-(2*p0336-1)^2)/0.140012289)-(2/(pi()*0.140012289)+LN(1-(2*p0336-1)^2)/2)))
- p0391: 0.5
- p3522: 0; = p1791*p3476
- p0959: 0; = if(and(p0683>0;or(p0807=480;p0807=32;p0807=1;and(p0807=60;p0901<0.03)));p0935;0)
- p0575: 0; = IF(p0311<0.5;-SQRT(p0007*EXP(p0443^2*p0008)-p0007);SQRT(p0007*EXP(p0443^2*p0008)-p0007))
- p2603: 0; = p2407*p1014
- p2838: 2.54608e-7; = p2252*(p1020+p1022)
- p0665: 0; = IF(p0401<0.5;-SQRT(p0007*EXP(p0533^2*p0008)-p0007);SQRT(p0007*EXP(p0533^2*p0008)-p0007))
- p2263: 0.00021098; = p2226*p2209
- p2000: 4000
- p4458: 0; = p1903*p3480
- p3600: 0; = p1869*p3476
- p3485: 0; = p1754*p3476
- p0157: 9.181
- p2273: 0.00814061; = p2230*p2219
- p3270: 0.0747083
- p2805: 0; = p2414*(p1078+p1080)
- p2822: 0; = p2431*(p1128+p1130)
- p4252: 2.14854e-6; = p1903*p3479
- p3149: 0; = p2368*p1023
- p1131: 0; = if(p1121=0;IF(p1123+p1128+p1129+p1130=1;0;IF(p1123+p1128+p1129+p1130+p1127>1;1-(p1123+p1128+p1129+p1130);p1127));0)
- p5240: 3.95871e-9; = p1861*p3484
- p1997: 1.01896e9; = (if(p1152=0;0;p1150/p1152)+if(p1153=0;0;p1151/p1153))*(1+p1157)
- p0571: 0; = IF(p0307<0.5;-SQRT(p0007*EXP(p0439^2*p0008)-p0007);SQRT(p0007*EXP(p0439^2*p0008)-p0007))
- p1660: 0.731714
- p0100: 53.862
- p0724: 10.813; = p0064*(1+p0592*p0196/100)
- p0539: 0; = IF(p0275<0.5;-SQRT(p0007*EXP(p0407^2*p0008)-p0007);SQRT(p0007*EXP(p0407^2*p0008)-p0007))
- p2602: 0; = p2406*p1014
- p3135: 0; = p2354*p1023
- p1992: 3900
- p2966: 0; = p2380*(p1079+p1081)
- p0917: 1.32164
- p1656: 0
- p2814: 0; = p2423*(p1078+p1080)
- p2893: 4.74159e-5; = p2307*(p1079+p1081)
- p1811: 0
- p2113: 0.832356
- p2884: 0.000460272; = p2298*(p1079+p1081)
- p3376: 0.00116886; = if(p1232=0;p3246*p3358/p0818;0)
- p0402: 0.5
- p3152: 0; = p2371*p1023
- p3036: 7.46175e-6; = p2255*p1023
- p2179: 0.0270751; = p0970+p0971+p0972
- p2901: 0; = p2315*(p1020+p1022)
- p0139: 104.083
- p1682: 0
- p2469: 0; = p2273*p1123
- p0025: 7.98
- p1551: 0
- p3736: 0; = p1799*p3477
- p1826: 0
- p2657: 5.18875e-7; = p2266*(p1078+p1080)
- p1103: 0.57977; = IF(p1071=0;IF(p1096+p1101+p1102=1;0;IF(p1096+p1101+p1102+p1099>1;1-(p1096+p1101+p1102);p1099));0)
- p1745: 0
- p1118: 0.000706144; = IF(p1071=0;p1108/(p1113*p0818);0)
- p2491: 0; = p2295*p1014
- p2262: 0.00046655; = p2226*p2208
- p1875: 0
- p1557: 0
- p2878: 1.03358e-6; = p2292*(p1020+p1022)
- p3280: 0.375
- p1222: 0.94
- p1947: 0
- p3140: 0; = p2359*p1023
- p1625: 0
- p0709: 0
- p2054: 0.91
- p0293: 0.5
- p3446: 0; = p3370*p1240
- p2559: 0; = p2363*p1014
- p2846: 0.000164348; = p2260*(p1079+p1081)
- p2314: 0.000827961; = p2231*p2221
- p2599: 0; = p2403*p1014
- p1241: 0.69372; = if(p1232>0;0;IF(p1234+p1238+p1239+p1240=1;0;1-(p1234+p1238+p1239+p1240)))
- p3066: 8.5017e-7; = p2285*p1023
- p0664: 0; = IF(p0400<0.5;-SQRT(p0007*EXP(p0532^2*p0008)-p0007);SQRT(p0007*EXP(p0532^2*p0008)-p0007))
- p1913: 0
- p0858: 0.891524; = p0670*1000/p0856
- p0825: 2.44653e10; = p0818*p0822
- p3000: 0; = p2414*(p1079+p1081)
- p0744: 1.331; = p0084*(1+p0612*p0216/100)
- p3144: 0; = p2363*p1023
- p0751: 56.508; = p0091*(1+p0619*p0223/100)
- p0871: 3.09756; = p0870*p0001*p0003/(p0818*p0002)
- p2044: 3.19797e-8; = p2015*p2042*p2043/(p0818*1000)
- p2471: 0; = p2275*p1123
- p2226: 0.52441; = if(p0774*p0778+p0775*p0779+p0776*p0780+p0777*p0781=0;0;p0778*p0774/(p0774*p0778+p0775*p0779+p0776*p0780+p0777*p0781))
- p5234: 1.83413e-6; = p1855*p3484
- p1063: 0.455
- p2889: 5.7933e-5; = p2303*(p1079+p1081)
- p0887: 0; = 1000*p0886*p0001*p0003*p0004/(p0818*p0002)
- p3028: 3.72626e-6; = p2247*p1023
- p1761: 0
- p1182: 1087.91; = p1181*p0801
- p1075: 0.70125; = IF(p1071=0;p0713/100;0)
- p3201: 0; = p2420*p1082
- p2372: 0; = p2225*p2201
- p0722: 0
- p3029: 2.00279e-5; = p2248*p1023
- p2033: 2.06784e-6; = p2015*p2029*p2031/(p0818*1000)
- p2439: 0; = p2243*p1014
- p2651: 7.00163e-5; = p2260*(p1078+p1080)
- p0947: 0; = if(and(p0683=0;or(p0807=480;p0807=32;p0807=1;and(p0807=60;p0901<0.03)));p0935;0)
- p1629: 0
- p2324: 0; = p2224*p2191
- p4802: 0; = p1835*p3482
- p0327: 0.5
- p0580: 0; = IF(p0316<0.5;-SQRT(p0007*EXP(p0448^2*p0008)-p0007);SQRT(p0007*EXP(p0448^2*p0008)-p0007))
- p1824: 0
- p3178: 0; = p2397*p1023
- p1828: 0
- p3183: 0; = p2402*p1023
- p3076: 1.98287e-6; = p2295*p1023
- p2879: 0.000165145; = p2293*(p1020+p1022)
- p0758: 0
- p0968: 5.88091e7; = p0965*p0683*p0682*1000
- p1135: 2.56328e6; = if(p1121=0;p1129*(p0716/100)*p0703*1000;0)
- p2627: 0; = p2431*p1123
- p2367: 0; = p2225*p2196
- p1197: 1.806
- p2863: 4.76958e-5; = p2277*(p1020+p1022)
- p2388: 0; = p2229*p2217
- p2294: 0.000113637; = p2223*p2201
- p0254: 48.698
- p4552: 2.90555e-7; = p1791*p3481
- p3145: 0; = p2364*p1023
- p0999: 0; = IF(p0996=1;0;IF(p0996+p0997>1;1-p0996;p0997))
- p1588: 0
- p1263: 0; = if(p1232>0;0;IF(p1259=1;0;IF(p1259+p1260>1;1-p1259;p1260)))
- p1313: 0; = p1307*p1252/p0818
- p0846: 0.394888; = p0841*p0845^3+p0842*p0845^2+p0843*p0845+p0844
- p2337: 0; = p2228*p2205
- p1632: 0
- p2358: 0; = p2225*p2186
- p0531: 0; = SQRT(2)*(IF((2*p0399-1)<0;-1;IF((2*p0399-1)>0;1;0))*SQRT(SQRT((2/(pi()*0.140012289)+LN(1-(2*p0399-1)^2)/2)^2-LN(1-(2*p0399-1)^2)/0.140012289)-(2/(pi()*0.140012289)+LN(1-(2*p0399-1)^2)/2)))
- p2034: 2.85791e-6; = p2015*p2030*p2032/(p0818*1000)
- p0524: 0; = SQRT(2)*(IF((2*p0392-1)<0;-1;IF((2*p0392-1)>0;1;0))*SQRT(SQRT((2/(pi()*0.140012289)+LN(1-(2*p0392-1)^2)/2)^2-LN(1-(2*p0392-1)^2)/0.140012289)-(2/(pi()*0.140012289)+LN(1-(2*p0392-1)^2)/2)))
- p0310: 0.5
- p1723: 0
- p2678: 7.7994e-5; = p2287*(p1019+p1021)
- p0314: 0.5
- p0919: 0.311908; = p0678*1000/p0801
- p0136: 21.085
- p2772: 0; = p2381*(p1078+p1080)
- p2462: 0; = p2266*p1073
- p2012: 0.00127101
- p4836: 0; = p1869*p3482
- p1338: 1.23966e7; = p1324*p0801
- p1236: 0.0683; = if(p1232>0;0;p0728/100)
- p3337: 0.00199123; = IF(or(p3254=0;p1232>0);0;p3272*p3289)
- p1708: 0
- p3038: 1.23116e-5; = p2257*p1023
- p2545: 0; = p2349*p1073
- p1570: 0
- p2888: 0.000134176; = p2302*(p1079+p1081)
- p1906: 0
- p2537: 0; = p2341*p1073
- p1047: 0.302596; = IF(p1012=0;IF(p1037+p1044+p1045+p1046=1;0;IF(p1037+p1044+p1045+p1046+p1041>1;1-(p1037+p1044+p1045+p1046);p1041));0)
- p0141: 92.2833
- p1331: 0; = p1330*p0001/(p0818*p0002)
- p2845: 0.000507519; = p2259*(p1079+p1081)
- p4205: 1.37881e-6; = p1856*p3479
- p2767: 0; = p2376*(p1078+p1080)
- p0463: 0; = SQRT(2)*(IF((2*p0331-1)<0;-1;IF((2*p0331-1)>0;1;0))*SQRT(SQRT((2/(pi()*0.140012289)+LN(1-(2*p0331-1)^2)/2)^2-LN(1-(2*p0331-1)^2)/0.140012289)-(2/(pi()*0.140012289)+LN(1-(2*p0331-1)^2)/2)))
- p3285: 0.275
- p3373: 0; = if(p1232=0;p3245*p3361/p0818;0)
- p1738: 0
- p1963f: 0.00011504; = p1647*p1851+p1648*p1852+p1649*p1853+p1650*p1854+p1651*p1855+p1652*p1856+p1653*p1857+p1654*p1858+p1655*p1859+p1656*p1860+p1657*p1861+p1658*p1862+p1659*p1863+p1660*p1864+p1661*p1865+p1662*p1866+p1663*p1867+p1664*p1868+p1665*p1869+p1666*p1870
- p1873: 0
- p2856: 2.60657e-5; = p2270*(p1079+p1081)
- p2883: 0.000508912; = p2297*(p1079+p1081)
- p2240: 1.24232e-5; = p2222*p2185
- p3460: 0; = p3365*p1241
- p1140: 4.53424e-5; = if(p1121=0;p1134*p0001/(p0818*p0002);0)
- p2727: 0; = p2336*(p1078+p1080)
- p2397: 0; = p2234*p2186
- p0439: 0; = SQRT(2)*(IF((2*p0307-1)<0;-1;IF((2*p0307-1)>0;1;0))*SQRT(SQRT((2/(pi()*0.140012289)+LN(1-(2*p0307-1)^2)/2)^2-LN(1-(2*p0307-1)^2)/0.140012289)-(2/(pi()*0.140012289)+LN(1-(2*p0307-1)^2)/2)))
- p2871: 4.36901e-6; = p2285*(p1020+p1022)
- p4410: 0; = p1855*p3480
- p0926: 0; = IF(p0918+p0923+p0924+p0925=1;0;IF(p0918+p0923+p0924+p0925+p0922>1;1-(p0918+p0923+p0924+p0925);p0922))
- p0154: 0
- p2899: 0.000309455; = p2313*(p1129+p1131)
- p1107: 3.86981e6; = IF(p1071=0;p1105*p1101*p1095;0)
- p1834: 0
- p2370: 0; = p2225*p2199
- p3474: 0.00211491; = p3379*p1241
- p1015: 0.25571; = IF(p1012=0;p0706/100;0)
- p2247: 3.07345e-5; = p2222*p2192
- p1894: 0
- p1963g: 0; = p1667*p1871+p1668*p1872+p1669*p1873+p1670*p1874+p1671*p1875+p1672*p1876+p1673*p1877+p1674*p1878+p1675*p1879+p1676*p1880+p1677*p1881+p1678*p1882+p1679*p1883+p1680*p1884+p1681*p1885+p1682*p1886+p1683*p1887+p1684*p1888+p1685*p1889
- p0759: 0
- p4098: 2.00476e-6; = p1955*p3478
- p0680: 871.375; = p0020*(1+p0548*p0152/100)
- p3366: 0; = if(p1232=0;p3244*p3360/p0818;0)
- p0952: 2.85618e-5; = if(and(p0683>0;or(p0807=56;p0807=100;and(p0807=60;p0901>0.06)));p0934;0)
- p2735: 0; = p2344*(p1078+p1080)
- p2309: 3.37101e-5; = p2227*p2216
- p2153: 1.16778e-9; = p2015*p2081*p2115/(p0818*1000)
- p2844: 0.000561152; = p2258*(p1079+p1081)
- p1832: 0
- p2230: 0.498976; = if(p0783*p0787+p0784*p0788+p0785*p0789+p0786*p0790=0;0;p0787*p0783/(p0783*p0787+p0784*p0788+p0785*p0789+p0786*p0790))
- p2828: 2.80177e-6; = p2242*(p1020+p1022)
- p2690: 6.34982e-5; = p2299*(p1078+p1080)
- p0197: 56.469
- p1217: 9.53097
- p2673: 2.71608e-5; = p2282*(p1019+p1021)
- p2053: 1.45647
- p2021: 1.8606e-5; = p2020/p0818
- p1097: 0.0540177
- p0693: 0
- p1885: 0
- p1343: 0; = p1342*p0001/(p0818*p0002)
- p1960: 697.239; = IF(p1959-p1958<0;0;p1959-p1958)
- p2063: 2.01468
- p0454: 0; = SQRT(2)*(IF((2*p0322-1)<0;-1;IF((2*p0322-1)>0;1;0))*SQRT(SQRT((2/(pi()*0.140012289)+LN(1-(2*p0322-1)^2)/2)^2-LN(1-(2*p0322-1)^2)/0.140012289)-(2/(pi()*0.140012289)+LN(1-(2*p0322-1)^2)/2)))
- p2565: 0; = p2369*p1014
- p5334: 3.08363e-8; = p1955*p3484
- p2881: 1.01899e-5; = p2295*(p1020+p1022)
- p1295: 0; = p1291*p1252/p0818
- p3251: 8.91464e9; = p1252-(p3252+p3253+p3254+p3255+p3256)
- p1168: 6.91364e-7; = p1164*p1167/p0818
- p1070: 0.000898051; = IF(p1012=0;p1056/(p1063*p0818);0)
- p0161: 0
- p3409: 0; = p3371*p1238
- p2494: 0; = p2298*p1073
- p0011: 762.019
- p1965: 0.000413083; = p1963+p1959*p1964*1000/p0818
- p2216: 7.08804e-5; = p1108/p0818
- p1251: 1.07123e-5; = if(p1232>0;0;p1246*p0001/(p0818*p0002))
- p2628: 4.82973e-5; = p2237*(p1019+p1021)
- p0953: 0.000108371; = if(and(p0683>0;or(p0807=56;p0807=100;and(p0807=60;p0901>0.06)));p0935;0)
- p2620: 0; = p2424*p1073
- p2804: 0; = p2413*(p1019+p1021)
- p2127: 1.60634e-6; = p2015*p2055*p2089/(p0818*1000)
- p2160: 5.14294e-8; = p2015*p2084*p2122/(p0818*1000)
- p1907: 0
- p2407: 0; = p2234*p2197
- p1944: 0
- p3298: 0; = if(p1283+p1284+p1285+p1286=0;0;p1283/(p1283+p1284+p1285+p1286))
- p2145: 2.38978e-7; = p2015*p2073*p2107/(p0818*1000)
- p1166: 1.38273e-6; = p1164/p0818
- p2043: 0.636483
- p1255: 0; = if(p1232>0;0;p0737/100)
- p0156: 35.922
- p3114: 0; = p2333*p1023
- p5338: 1.05855e-6; = p1963*p3484
- p1111: 0.0872841
- p2670: 5.86549e-6; = p2279*(p1019+p1021)
- p2664: 0.00285337; = p2273*(p1128+p1130)
- p0499: 0; = SQRT(2)*(IF((2*p0367-1)<0;-1;IF((2*p0367-1)>0;1;0))*SQRT(SQRT((2/(pi()*0.140012289)+LN(1-(2*p0367-1)^2)/2)^2-LN(1-(2*p0367-1)^2)/0.140012289)-(2/(pi()*0.140012289)+LN(1-(2*p0367-1)^2)/2)))
- p4102: 6.88197e-5; = p1963*p3478
- p1346: 680
- p1281: 0; = IF(p1277+p1280=p1263;0;IF(p1277+p1280+p1279>p1263;p1263-(p1277+p1280);p1279))
- p1559: 0
- p0237: 6.832
- p0852: 0; = p0847*p0851^3+p0848*p0851^2+p0849*p0851+p0850
- p2300: 0.00176476; = p2227*p2207
- p0631: 0; = IF(p0367<0.5;-SQRT(p0007*EXP(p0499^2*p0008)-p0007);SQRT(p0007*EXP(p0499^2*p0008)-p0007))
- p0955: 7.84709e-5; = if(and(p0683>0;or(p0807=56;p0807=100;and(p0807=60;p0901>0.06)));p0937;0)
- p1333: 0.000265205; = p1332*p0001/(p0818*p0002)
- p2637: 9.71145e-7; = p2246*(p1019+p1021)
- p0949: 0; = if(and(p0683=0;or(p0807=480;p0807=32;p0807=1;and(p0807=60;p0901<0.03)));p0937;0)
- p2739: 0; = p2348*(p1078+p1080)
- p3116: 0; = p2335*p1023
- p1786: 0
- p1740: 0
- p2165: 0.811053; = (p0833-p2014)/p0818-p0839
- p3176: 0; = p2395*p1023
- p1268: 0
- p1058: 0.225
- p2444: 0; = p2248*p1014
- p1265: 0; = if(p1232>0;0;IF(p1259+p1263+p1264=1;0;IF(p1259+p1263+p1264+p1262>1;1-(p1259+p1263+p1264);p1262)))
- p2785: 0; = p2394*(p1019+p1021)
- p1805: 0
- p2330: 0; = p2224*p2198
- p1888: 0
- p1002: 0; = p0996*p0888
- p2573: 0; = p2377*p1073
- p3163: 0; = p2382*p1082
- p2144: 8.2359e-8; = p2015*p2072*p2106/(p0818*1000)
- p0235: 0
- p1301: 0; = IF(p1297+p1300=p1265;0;IF(p1297+p1300+p1299>p1265;p1265-(p1297+p1300);p1299))
- p2192: 8.74825e-5; = p1067-p2189-p2190-p2191
- p3434: 0.00030636; = p3377*p1239
- p3171: 0; = p2390*p1132
- p2281: 8.30298e-6; = p2223*p2187
- p2106: 0.856281
- p2091: 0.374844
- p2855: 0.0001973; = p2269*(p1079+p1081)
- p1341: 0; = p1340*p0001/(p0818*p0002)
- p1985: 1.20803e8; = (if(p1057=0;0;p1050/p1057)+if(p1058=0;0;p1051/p1058)+if(p1059=0;0;p1052/p1059)+if(p1060=0;0;p1053/p1060)+if(p1061=0;0;p1054/p1061)+if(p1062=0;0;p1055/p1062)+if(p1063=0;0;p1056/p1063))*(1+p1157)
- p2026: 68.85
- p1862: 0
- p2839: 5.59782e-7; = p2253*(p1020+p1022)
- p2455: 0; = p2259*p1073
- p2418: 0; = p2235*p2208
- p2714: 0; = p2323*(p1019+p1021)
- p2181: 0.327663; = p0887+p0889+p0893+p2180
- p1820: 0
- p2581: 0; = p2385*p1073
- p2915: 0; = p2329*(p1020+p1022)
- p2266: 1.73682e-6; = p2226*p2212
- p3452: 0; = p3376*p1240
- p3305: 0; = if(and(p1232=0;p3252<>0);1-(p3301+p3302+p3303+p3304);0)
- p1147: 0.0759068
- p2219: 0.0163146; = p1154-p2218
- p2793: 0; = p2402*(p1019+p1021)
- p0128: 50.388
- p2098: 0.856281
- p1223: 0.56
- p4596: 7.26388e-7; = p1835*p3481
- p1743: 0
- p1758: 0
- p4926: 0; = p1963*p3482
- p2830: 8.22054e-6; = p2244*(p1020+p1022)
- p2317: 0; = p2224*p2184
- p0406: 0; = SQRT(2)*(IF((2*p0274-1)<0;-1;IF((2*p0274-1)>0;1;0))*SQRT(SQRT((2/(pi()*0.140012289)+LN(1-(2*p0274-1)^2)/2)^2-LN(1-(2*p0274-1)^2)/0.140012289)-(2/(pi()*0.140012289)+LN(1-(2*p0274-1)^2)/2)))
- p3255: 0; = p1252*(p1297*(1-p3247)+p1300*(1-p3248)+p1301*(1-p3249)+p1302*(1-p3250))
- p2336: 0; = p2228*p2204
- p2947: 0; = p2361*(p1020+p1022)
- p0509: 0; = SQRT(2)*(IF((2*p0377-1)<0;-1;IF((2*p0377-1)>0;1;0))*SQRT(SQRT((2/(pi()*0.140012289)+LN(1-(2*p0377-1)^2)/2)^2-LN(1-(2*p0377-1)^2)/0.140012289)-(2/(pi()*0.140012289)+LN(1-(2*p0377-1)^2)/2)))
- p2121: 0.822447
- p2511: 0; = p2315*p1014
- p3405: 0; = p3367*p1238
- p0982: 0; = if(p0886=0;0;min(1;(p0691*p0690*1000*p0693/100)/p0886))
- p1950: 3.6739e-8; = p1542*1000/p0818
- p2650: 0.000216216; = p2259*(p1078+p1080)
- p3091: 0; = p2310*p1082
- p1624: 0
- p2114: 0.832356
- p2858: 0.00375192; = p2272*(p1129+p1131)
- p2166: 0.727028; = p2165*p0824
- p1056: 1.1122e7; = IF(p1012=0;p1049*p1036;0)
- p3372: 0; = if(p1232=0;p3245*p3360/p0818;0)
- p2084: 0.21
- p2377: 0; = p2229*p2206
- p2760: 0; = p2369*(p1019+p1021)
- p2039: 6.90562e-7; = p2015*p2037*p2038/(p0818*1000)
- p5008: 0; = p1835*p3483
- p1654: 0
- p1729: 0
- p2381: 0; = p2229*p2210
- p3158: 0; = p2377*p1082
- p0970: 0.0214789; = p0967/p0818
- p3111: 0; = p2330*p1023
- p0669: 29.101; = p0009*(1+p0537*p0141/100)
- p3109: 0; = p2328*p1023
- p2466: 0; = p2270*p1073
- p1574: 0
- p2258: 0.000800217; = p2226*p2204
- p3080: 0; = p2299*p1082
- p2116: 0.444424
- p1210: 0.46
- p1639: 0
- p2476: 0; = p2280*p1014
- p3065: 3.38074e-6; = p2284*p1023
- p1060: 0.21
- p2373: 0; = p2225*p2202
- p3120: 0; = p2339*p1082
- p1895: 0
- p0430: 0; = SQRT(2)*(IF((2*p0298-1)<0;-1;IF((2*p0298-1)>0;1;0))*SQRT(SQRT((2/(pi()*0.140012289)+LN(1-(2*p0298-1)^2)/2)^2-LN(1-(2*p0298-1)^2)/0.140012289)-(2/(pi()*0.140012289)+LN(1-(2*p0298-1)^2)/2)))
- p0988: 0; = p0982*p0886
- p2082: 0.285294
- p0286: 0.5
- p2276: 0.000348738; = p2223*p2182
- p2245: 1.51023e-5; = p2222*p2190
- p1093: 0; = IF(p1071=0;p1087*p0001/(p0818*p0002);0)
- p1071: 0
- p1695: 0
- p0875: 0; = p0874*p0001*p0003/(p0818*p0002)
- p2057: 3.28794
- p0705: 0
- p2340: 0; = p2228*p2208
- p1982: 750
- p2873: 0.000190036; = p2287*(p1020+p1022)
- p0826: 0.101167; = 1-p0825/p0818
- p0348: 0.5
- p1802: 0
- p2448: 0; = p2252*p1014
- p2927: 0; = p2341*(p1079+p1081)
- p1759: 0
- p2757: 0; = p2366*(p1019+p1021)
- p1732: 0
- p2722: 0; = p2331*(p1019+p1021)
- p0872: 762019; = p0864*p0856
- p2641: 8.95082e-5; = p2250*(p1019+p1021)
- p2768: 0; = p2377*(p1078+p1080)
- p2970: 0; = p2384*(p1079+p1081)
- p1037: 0.345978
- p2062: 3.76588
- p2954: 0; = p2368*(p1020+p1022)
- p2832: 2.36624e-6; = p2246*(p1020+p1022)
- p3286: 0.185
- p3110: 0; = p2329*p1023
- p0748: 37.12; = p0088*(1+p0616*p0220/100)
- p2957: 0; = p2371*(p1020+p1022)
- p0609: 0; = IF(p0345<0.5;-SQRT(p0007*EXP(p0477^2*p0008)-p0007);SQRT(p0007*EXP(p0477^2*p0008)-p0007))
- p4664: 1.99861e-5; = p1903*p3481
- p0714: 0
- p1272: 0; = IF(p1267+p1270+p1271=p1259;0;p1259-(p1267+p1270+p1271))
- p0422: 0; = SQRT(2)*(IF((2*p0290-1)<0;-1;IF((2*p0290-1)>0;1;0))*SQRT(SQRT((2/(pi()*0.140012289)+LN(1-(2*p0290-1)^2)/2)^2-LN(1-(2*p0290-1)^2)/0.140012289)-(2/(pi()*0.140012289)+LN(1-(2*p0290-1)^2)/2)))
- p2818: 0; = p2427*(p1078+p1080)
- p3063: 1.28778e-5; = p2282*p1023
- p0731: 0
- p0775: 53.56; = p0115*(1+p0643*p0247/100)
- p2326: 0; = p2224*p2193
- p2271: 0.000333138; = p2226*p2217
- p1776: 0
- p2944: 0; = p2358*(p1020+p1022)
- p2976: 0; = p2390*(p1129+p1131)
- p2787: 0; = p2396*(p1019+p1021)
- p0273: 0.5
- p1550: 0.783979
- p4350: 0; = p1795*p3480
- p0553: 0; = IF(p0289<0.5;-SQRT(p0007*EXP(p0421^2*p0008)-p0007);SQRT(p0007*EXP(p0421^2*p0008)-p0007))
- p2172: 0.367421; = p2166-(p2167+p2168+p2169+p2170)
- p0655: 0; = IF(p0391<0.5;-SQRT(p0007*EXP(p0523^2*p0008)-p0007);SQRT(p0007*EXP(p0523^2*p0008)-p0007))
- p2202: 2.52126e-5; = 4*1.00794*p2201/(2*14.0067)
- p1059: 0.335
- p0906: 0.00672763
- p0837: 0.5
- p2488: 0; = p2292*p1014
- p5012: 0; = p1839*p3483
- p2580: 0; = p2384*p1073
- p0948: 0; = if(and(p0683=0;or(p0807=480;p0807=32;p0807=1;and(p0807=60;p0901<0.03)));p0936;0)
- p1799: 4.04129e-7; = p1391*1000/p0818
- p3024: 6.97456e-6; = p2243*p1023
- p0178: 82.521
- p1565: 0
- p0752: 0
- p1698: 0
- p1610: 0
- p0119: 48.43
- p1317: 0
- p1757: 0
- p3728: 0; = p1791*p3477
- p5170: 2.91694e-9; = p1791*p3484
- p1076: 0; = IF(p1071=0;p0714/100;0)
- p0729: 0
- p3332: 0; = if(and(p1232=0;p3255<>0);IF((p3328+p3329+p3330+p3331)+(p3255*(p3265*(1-p3277))/p3327)>p3255;p3255-(p3328+p3329+p3330+p3331);p3255*(p3265*(1-p3277))/p3327);0)
- p0978: 0
- p1578: 0
- p1753: 0
- p2907: 0; = p2321*(p1020+p1022)
- p0059: 64.949
- p3186: 0; = p2405*p1023
- p0382: 0.5
- p2158: 1.06132e-7; = p2015*p2082*p2120/(p0818*1000)
- p0790: 0
- p3317: 0; = if(and(p1232=0;p3253<>0);p3253*(p3261*p3277-p3312)/p3316;0)
- p2071: 0.151
- p0940: 0; = if(and(p0683=0;p0946=0);p0934;0)
- p1231: 0.0347659; = IF(p1221=0;0;p1230*(p1228+p1229))
- p2796: 0; = p2405*(p1019+p1021)
- p3340: 1.47051e7; = if(and(p1232=0;p3254<>0);p3254*(p3270-p3335)/p3338;0)
- p1762: 0
- p0698: 0
- p1064: 0.000655626; = IF(p1012=0;p1050/(p1057*p0818);0)
- p1730: 0
- p1968: 0; = if(p0807=480;p0802*p0811;0)
- p2577: 0; = p2381*p1073
- p3428: 0; = p3371*p1239
- p0668: 0; = IF(p0404<0.5;-SQRT(p0007*EXP(p0536^2*p0008)-p0007);SQRT(p0007*EXP(p0536^2*p0008)-p0007))
- p1922: 0
- p1891: 0
- p1725: 0
- p0727: 23.798; = p0067*(1+p0595*p0199/100)
- p0184: 42.341
- p0735: 0
- p1149: 0.830148
- p2489: 0; = p2293*p1014
- p1751: 0.791173
- p1591: 0.677771
- p0927: 0.00483547; = IF(p0918+p0923+p0924+p0925+p0926=1;0;1-(p0918+p0923+p0924+p0925+p0926))
- p1657: 0.687857
- p3458: 0; = p3363*p1241
- p0713: 70.125; = p0053*(1+p0581*p0185/100)
- p2311: 0.00580044; = p2231*p2218
- p0844: 0.389489
- p2554: 0; = p2358*p1014
- p0813: 0; = if(p0807=480;1.56521739130435;0)
- p0148: 0
- p0064: 10.813
- p3229: 1.38273e-6; = p1164/p0818
- p1427: 35
- p1199: -0.29
- p1160: 0.0284416; = (p1156+p1158)*p1159
- p1943: 0
- p1956: 0
- p2495: 0; = p2299*p1073
- p2447: 0; = p2251*p1014
- p2917: 0; = p2331*(p1020+p1022)
- p1801: 0
- p2191: 1.08101e-5; = 8*1.00794*p2189/(2*14.0067)
- p2677: 1.4511e-5; = p2286*(p1019+p1021)
- p1981: 400
- p2385: 0; = p2229*p2214
- p1007: 0; = p1003*p0001*p0004/(p0818*p0002)
- p5132: 0; = p1963*p3483
- p3212: 0; = p2431*p1132
- p1214: 55; = IF(p1213=0;0;p1213-1)
- p2635: 3.37384e-6; = p2244*(p1019+p1021)
- p2507: 0; = p2311*p1123
- p3101: 0; = p2320*p1023
- p2361: 0; = p2225*p2189
- p2320: 0; = p2224*p2187
- p1937: 0
- p3205: 0; = p2424*p1082
- p3233: 0.60394
- p0783: 102.936; = p0123*(1+p0651*p0255/100)
- p2829: 3.58421e-5; = p2243*(p1020+p1022)
- p2643: 1.04495e-7; = p2252*(p1019+p1021)
- p2629: 1.06018e-5; = p2238*(p1019+p1021)
- p4404: 0; = p1849*p3480
- p3191: 0; = p2410*p1023
- p5123: 0; = p1950*p3483
- p1898: 0
- p2908: 0; = p2322*(p1020+p1022)
- p4004: 2.57367e-7; = p1861*p3478
- p3187: 0; = p2406*p1023
- p0696: 0
- p1949: 0
- p1710: 0
- p0707: 62.305; = p0047*(1+p0575*p0179/100)
- p0323: 0.5
- p2921: 0; = p2335*(p1020+p1022)
- p0374: 0.5
- p0992: 0; = p0988*p0001*p0004/(p0818*p0002)
- p0275: 0.5
- p3417: 0.000725517; = p3379*p1238
- p2357: 0; = p2225*p2185
- p1322: 0.125722; = IF(((p0745*1000*p0749/100)+(p0754*1000*p0758/100))/p0801<0;0;((p0745*1000*p0749/100)+(p0754*1000*p0758/100))/p0801)
- p0956: 0; = if(and(p0683>0;or(p0807=56;p0807=100;and(p0807=60;p0901>0.06)));p0938;0)
- p3400: 0; = p3362*p1238
- p3033: 4.95445e-8; = p2252*p1023
- p0044: 21.085
- p1646: 0
- p1260: 0; = if(p1232>0;0;p0731/100)
- p1983: 50
- p3271: 0.0195489
- p3154: 0; = p2373*p1023
- p0685: 7.98; = p0025*(1+p0553*p0157/100)
- p3297: 0; = if(p1273+p1274+p1275+p1276=0;0;p1273/(p1273+p1274+p1275+p1276))
- p1701: 0
- p0477: 0; = SQRT(2)*(IF((2*p0345-1)<0;-1;IF((2*p0345-1)>0;1;0))*SQRT(SQRT((2/(pi()*0.140012289)+LN(1-(2*p0345-1)^2)/2)^2-LN(1-(2*p0345-1)^2)/0.140012289)-(2/(pi()*0.140012289)+LN(1-(2*p0345-1)^2)/2)))
- p1884: 0
- p3150: 0; = p2369*p1023
- p1302: 0; = IF(p1297+p1300+p1301=p1262;0;p1262-(p1297+p1300+p1301))
- p3043: 0; = p2262*p1082
- p0939: 1.68006e-6; = p0933*p0001/(p0818*p0002)
- p2070: 0.282
- p3887: 0; = p1950*p3477
- p0387: 0.5
- p2046: 10
- p2059: 1.00168
- p0217: 271.518
- p3343: 9.30725e7; = if(and(p1232=0;p3254<>0);IF((p3339+p3340+p3341+p3342)+(p3254*(p3269*(1-p3277))/p3338)>p3254;p3254-(p3339+p3340+p3341+p3342);p3254*(p3269*(1-p3277))/p3338);0)
- p1122: 0; = p1121*p0001/(p0818*p0002)
- p2867: 5.17317e-6; = p2281*(p1020+p1022)
- p3441: 0; = p3365*p1240
- p2175: 0.00080889; = p0895*p0908/p0818
- p3379: 0.00304865; = if(p1232=0;p3246*p3361/p0818;0)
- p1198: 0.44
- p0373: 0.5
- p3121: 0; = p2340*p1082
- p2973: 0; = p2387*(p1079+p1081)
- p0716: 37.413; = p0056*(1+p0584*p0188/100)
- p3427: 0; = p3370*p1239
- p1954: 0
- p3023: 5.452e-7; = p2242*p1023
- p2934: 0; = p2348*(p1079+p1081)
- p1221: 0.155559; = p1216*(1+p1220*p1217/100)
- p0876: 266501; = p0866*p0856
- p2195: 0.000100793; = p2194*p2193
- p3131: 0; = p2350*p1132
- p2527: 0; = p2331*p1014
- p2134: 1.31478e-6; = p2015*p2062*p2096/(p0818*1000)
- p3329: 0; = if(and(p1232=0;p3255<>0);p3255*(p3266-p3324)/p3327;0)
- p2887: 0.000296711; = p2301*(p1079+p1081)
- p2067: 0.446471
- p1321: 0.763299; = IF(((p0745*1000*p0748/100)+(p0754*1000*p0757/100))/p0801<0;0;((p0745*1000*p0748/100)+(p0754*1000*p0757/100))/p0801)
- p0909: 2.88205e8
- p2011: 0.000668334
- p0029: 100
- p1917: 0
- p3138: 0; = p2357*p1023
- p2827: 1.94672e-5; = p2241*(p1020+p1022)
- p0043: 10548.7
- p1253: 0; = if(p1232>0;0;p0735/100)
- p3234: 0.39606; = 1-p3233
- p2080: 0.025
- p2339: 0; = p2228*p2207
- p3180: 0; = p2399*p1023
- p1750: 0
- p2638: 7.85913e-6; = p2247*(p1019+p1021)
- p0673: 266.501; = p0013*(1+p0541*p0145/100)
- p2807: 0; = p2416*(p1078+p1080)
- p1897: 0
- p0534: 0; = SQRT(2)*(IF((2*p0402-1)<0;-1;IF((2*p0402-1)>0;1;0))*SQRT(SQRT((2/(pi()*0.140012289)+LN(1-(2*p0402-1)^2)/2)^2-LN(1-(2*p0402-1)^2)/0.140012289)-(2/(pi()*0.140012289)+LN(1-(2*p0402-1)^2)/2)))
- p1014: 0; = IF(p1012=0;p0705/100;0)
- p2984: 0; = p2398*(p1020+p1022)
- p1211: 0.6
- p1689: 0
- p1697: 0
- p3012: 0; = p2426*(p1079+p1081)
- p2529: 0; = p2333*p1014
- p2457: 0; = p2261*p1073
- p0105: 17.933
- p2836: 0.000218091; = p2250*(p1020+p1022)
- p0600: 0; = IF(p0336<0.5;-SQRT(p0007*EXP(p0468^2*p0008)-p0007);SQRT(p0007*EXP(p0468^2*p0008)-p0007))
- p1585: 0
- p3437: 0.0223693; = p3380*p1239
- p0738: 10548.7; = p0078*(1+p0606*p0210/100)
- p0882: 121323; = p0869*p0856
- p0056: 37.413
- p0274: 0.5
- p1067: 0.000178835; = IF(p1012=0;p1053/(p1060*p0818);0)
- p2644: 2.29744e-7; = p2253*(p1019+p1021)
- p2931: 0; = p2345*(p1079+p1081)
- p1756: 0
- p1126: 0; = if(p1121=0;p0720/100;0)
- p1742: 0
- p0345: 0.5
- p3686: 0; = p1955*p3476
- p1315: 0; = p1311*p1252/p0818
- p2390: 0; = p2233*p2219
- p4115: 7.80882e-8; = p1766*p3479
- p0370: 0.5
- p1579: 0
- p2133: 2.85159e-7; = p2015*p2061*p2095/(p0818*1000)
- p1912: 0
- p0766: 20.039; = p0106*(1+p0634*p0238/100)
- p1008: 0; = p1004*p0001*p0004/(p0818*p0002)
- p2104: 0.817136
- p0803: 0
- p0829: 0; = if(p0807=480;p0814*(1-p0824);0)
- p0633: 0; = IF(p0369<0.5;-SQRT(p0007*EXP(p0501^2*p0008)-p0007);SQRT(p0007*EXP(p0501^2*p0008)-p0007))
- p3375: 0.00344601; = if(p1232=0;p3246*p3357/p0818;0)
- p3444: 0; = p3368*p1240
- p2479: 0; = p2283*p1014
- p2800: 0; = p2409*(p1019+p1021)
- p2837: 1.55122e-7; = p2251*(p1020+p1022)
- p0155: 16.523
- p4505: 0; = p1950*p3480
- p3465: 0; = p3370*p1241
- p2762: 0; = p2371*(p1019+p1021)
- p0550: 0; = IF(p0286<0.5;-SQRT(p0007*EXP(p0418^2*p0008)-p0007);SQRT(p0007*EXP(p0418^2*p0008)-p0007))
- p1163: 0.00355061
- p2137: 3.37909e-8; = p2015*p2065*p2099/(p0818*1000)
- p1011: 0; = p1010*p0001*p0004/(p0818*p0002)
- p1066: 0.000265479; = IF(p1012=0;p1052/(p1059*p0818);0)
- p2109: 0.826583
- p1431: 18
- p2255: 6.15453e-5; = p2222*p2201
- p2162: 1.17025e-8; = p2015*p2086*p2124/(p0818*1000)
- p1148: 0.0759068; = if(p1121=0;IF(p1146=1;0;1-p1146);0)
- p3408: 0; = p3370*p1238
- p1838: 0
- p2750: 0; = p2359*(p1019+p1021)
- p3309: 0; = if(and(p1232=0;p3252<>0);p3252*(p3260-p3304)/p3305;0)
- p2443: 0; = p2247*p1014
- p2203: 0.000289043; = p1070-p2200-p2201-p2202
- p1940: 0
- p2352: 0; = p2232*p2220
- p2421: 0; = p2235*p2211
- p3395: 0; = p3376*p1234
- p2256: 8.85776e-6; = p2222*p2202
- p1709: 0
- p4346: 0; = p1791*p3480
- p1634: 0
- p5037: 0; = p1864*p3483
- p5248: 4.37541e-9; = p1869*p3484
- p0646: 0; = IF(p0382<0.5;-SQRT(p0007*EXP(p0514^2*p0008)-p0007);SQRT(p0007*EXP(p0514^2*p0008)-p0007))
- p1671: 0
- p2567: 0; = p2371*p1014
- p5218: 3.75036e-9; = p1839*p3484
- p2708: 0; = p2317*(p1019+p1021)
- p2031: 0.465411
- p5311: 1.91685e-8; = p1932*p3484
- p3236: 0.0140975
- p2351: 0; = p2232*p2219
- p1461: 21
- p1600: 0
- p2906: 0; = p2320*(p1020+p1022)
- p2094: 0.922577
- p2264: 9.10941e-5; = p2226*p2210
- p0902: 0
- p3195: 0; = p2414*p1082
- p3193: 0; = p2412*p1023
- p0024: 79.331
- p1821: 0
- p3295: 0.58
- p3331: 0; = if(and(p1232=0;p3255<>0);p3255*(p3268-p3326)/p3327;0)
- p0592: 0; = IF(p0328<0.5;-SQRT(p0007*EXP(p0460^2*p0008)-p0007);SQRT(p0007*EXP(p0460^2*p0008)-p0007))
- p0089: 6.114
- p1963a: 2.02287e-5; = p1550*p1754+p1551*p1755+p1552*p1756+p1553*p1757+p1554*p1758+p1555*p1759+p1556*p1760+p1557*p1761+p1558*p1762+p1559*p1763+p1560*p1764+p1561*p1765+p1562*p1766+p1563*p1767+p1564*p1768+p1565*p1769+p1566*p1770+p1567*p1771+p1568*p1772
- p2131: 1.87625e-7; = p2015*p2059*p2093/(p0818*1000)
- p1768: 0
- p2852: 1.21794e-6; = p2266*(p1079+p1081)
- p1890: 0
- p0343: 0.5
- p1185: 0.5
- p0695: 0
- p1259: 0; = if(p1232>0;0;p0730/100)
- p0280: 0.5
- p1456: 59
- p0898: 0.456
- p1721: 0
- p1611: 0
- p3237: 0.854735
- p0421: 0; = SQRT(2)*(IF((2*p0289-1)<0;-1;IF((2*p0289-1)>0;1;0))*SQRT(SQRT((2/(pi()*0.140012289)+LN(1-(2*p0289-1)^2)/2)^2-LN(1-(2*p0289-1)^2)/0.140012289)-(2/(pi()*0.140012289)+LN(1-(2*p0289-1)^2)/2)))
- p1138: 0; = if(p1121=0;p1132*(p0716/100)*p0703*1000;0)
- p2424: 0; = p2235*p2214
- p3353: 1.12904e8; = if(and(p1232=0;p3256<>0);p3256*(p3276-p3348)/p3349;0)
- p0855: 1.37202; = p0854*p0001*p0003/(p0818*p0002)
- p1024: 0; = IF(p1012=0;p1014*(p0704/100)*p0703*1000;0)
- p3356: 3.95415e8; = if(p1232=0;p3306+p3317+p3328+p3339+p3350;0)
- p1825: 0
- p2239: 3.60673e-6; = p2222*p2184
- p1772: 0
- p0945: 0; = if(and(p0683=0;p0951=0);p0939;0)
- p3476: 0; = if(p1328+p1330+p1332+p1334+p1336+p1338+p1340+p1342+p1344=0;0;p1328/(p1328+p1330+p1332+p1334+p1336+p1338+p1340+p1342+p1344))
- p1705: 0
- p4766: 0; = p1799*p3482
- p1879: 0
- p0415: 0; = SQRT(2)*(IF((2*p0283-1)<0;-1;IF((2*p0283-1)>0;1;0))*SQRT(SQRT((2/(pi()*0.140012289)+LN(1-(2*p0283-1)^2)/2)^2-LN(1-(2*p0283-1)^2)/0.140012289)-(2/(pi()*0.140012289)+LN(1-(2*p0283-1)^2)/2)))
- p3263: 0.0214527
- p3194: 0; = p2413*p1023
- p2913: 0; = p2327*(p1020+p1022)
- p2840: 8.94418e-5; = p2254*(p1020+p1022)
- p0718: 35.051; = p0058*(1+p0586*p0190/100)
- p2268: 7.4557e-5; = p2226*p2214
- p0765: 17.933; = p0105*(1+p0633*p0237/100)
- p2211: 0.00227477; = p1120-p2209-p2208-p2210
- p3203: 0; = p2422*p1082
- p0241: 154.218
- p1952: 0
- p2718: 0; = p2327*(p1019+p1021)
- p0238: 28.879
- p2780: 0; = p2389*(p1128+p1130)
- p2177: 0.1375; = p0895/p0818-(p2173+p2174+p2175+p2176)
- p1735: 0
- p4148: 2.4542e-8; = p1799*p3479
- p0900: 1.14331; = p0899/p0818
- p3133: 0; = p2352*p1132
- p1605: 0
- p0793: 0
- p2472: 0; = p2276*p1014
- p4140: 3.12353e-8; = p1791*p3479
- p2578: 0; = p2382*p1073
- p0712: 29.875; = p0052*(1+p0580*p0184/100)
- p1049: 0.262961; = IF(p1012=0;IF(p1037+p1044+p1045+p1046+p1047+p1048=1;0;1-(p1037+p1044+p1045+p1046+p1047+p1048));0)
- p0641: 0; = IF(p0377<0.5;-SQRT(p0007*EXP(p0509^2*p0008)-p0007);SQRT(p0007*EXP(p0509^2*p0008)-p0007))
- p0989: 0; = p0985*p0886
- p0298: 0.5
- p2456: 0; = p2260*p1073
- p0072: 14.149
- p3982: 2.43822e-7; = p1839*p3478
- p0481: 0; = SQRT(2)*(IF((2*p0349-1)<0;-1;IF((2*p0349-1)>0;1;0))*SQRT(SQRT((2/(pi()*0.140012289)+LN(1-(2*p0349-1)^2)/2)^2-LN(1-(2*p0349-1)^2)/0.140012289)-(2/(pi()*0.140012289)+LN(1-(2*p0349-1)^2)/2)))
- p2606: 0; = p2410*p1014
- p2810: 0; = p2419*(p1078+p1080)
- p3526: 0; = p1795*p3476
- p1604: 0
- p2355: 0; = p2225*p2183
- p2949: 0; = p2363*(p1020+p1022)
- p1201: 0.65
- p1124: 0.35051; = if(p1121=0;p0718/100;0)
- p5022: 0; = p1849*p3483
- p2613: 0; = p2417*p1073
- p2157: 3.01045e-8; = p2015*p2086*p2119/(p0818*1000)
- p2291: 7.54524e-7; = p2223*p2198
- p2015: 1.95372e7; = p0830*p2011*p2013
- p1871: 0
- p0047: 62.305
- p0929: 3.30623e6; = p0801*p0923
- p2890: 0.000758655; = p2304*(p1079+p1081)
- p0776: 0
- p2589: 0; = p2393*p1014
- p2389: 0; = p2233*p2218
- p2150: 7.19105e-8; = p2015*p2078*p2112/(p0818*1000)
- p2075: 0.072
- p2721: 0; = p2330*(p1019+p1021)
- p0990: 0; = p0986*p0886
- p3390: 0; = p3371*p1234
- p1242: 0; = if(p1232>0;0;p1234*(p0725/100)*p0723*1000)
- p2990: 0; = p2404*(p1020+p1022)
- p4616: 0.000182697; = p1855*p3481
- p0737: 0
- p0019: 2394.02
- p0247: 13.068
- p1883: 0
- p0892: 39356.1; = if(p0891=0;0;(1-p1240)*p3251/p0891)
- p1109: 4.15345e7; = IF(p1071=0;p1105*p1103*p1095;0)
- p2933: 0; = p2347*(p1079+p1081)
- p2108: 0.826583
- p0757: 0
- p1899: 0
- p3016: 0; = p2430*(p1129+p1131)
- p2073: 0.377647
- p3084: 0; = p2303*p1082
- p0933: 51256; = p0801*p0927
- p1686: 0
- p0267: 25.198
- p1034: 0; = IF(p1012=0;p1028*p0001/(p0818*p0002);0)
- p3303: 0; = if(and(p1232=0;p3252<>0);p3259*p3289;0)
- p2347: 0; = p2228*p2215
- p1964: 0.5
- p2653: 0.000139382; = p2262*(p1078+p1080)
- p0798: 28.532; = p0138*(1+p0666*p0270/100)
- p1930: 0
- p3283: 0.3
- p2853: 1.27358e-5; = p2267*(p1079+p1081)
- p2705: 0.000290209; = p2314*(p1128+p1130)
- p1636: 0
- p2199: 2.55735e-6; = p1069-p2197-p2198
- p2544: 0; = p2348*p1073
- p2077: 0.043
- p3426: 0; = p3369*p1239
- p0018: 3306.23
- p3393: 0; = p3374*p1234
- p1874: 0
- p4822: 0; = p1855*p3482
- p3054: 0; = p2273*p1132
- p1666: 0
- p1328: 0; = p1319*p0801
- p1325: 0; = IF(((p0745*1000*p0752/100)+(p0754*1000*p0761/100))/p0801<0;0;((p0745*1000*p0752/100)+(p0754*1000*p0761/100))/p0801)
- p1778: 0
- p0650: 0; = IF(p0386<0.5;-SQRT(p0007*EXP(p0518^2*p0008)-p0007);SQRT(p0007*EXP(p0518^2*p0008)-p0007))
- p2731: 0; = p2340*(p1078+p1080)
- p0831: 0.1036; = 1-p0824
- p3423: 0; = p3366*p1239
- p1178: 1.24951e-7; = p1176/p0818
- p3482: 0; = if(p1328+p1330+p1332+p1334+p1336+p1338+p1340+p1342+p1344=0;0;p1340/(p1328+p1330+p1332+p1334+p1336+p1338+p1340+p1342+p1344))
- p2400: 0; = p2234*p2189
- p1703: 0
- p2452: 0; = p2256*p1014
- p2437: 0; = p2241*p1014
- p1086: 0; = IF(p1071=0;p1080*(p0710/100)*p0703*1000;0)
- p2315: 0; = p2224*p2182
- p2072: 0.134
- p2702: 0.00203311; = p2311*(p1128+p1130)
- p2450: 0; = p2254*p1014
- p2803: 0; = p2412*(p1019+p1021)
- p2303: 8.26138e-5; = p2227*p2210
- p1115: 0.237849
- p1804: 0
- p0642: 0; = IF(p0378<0.5;-SQRT(p0007*EXP(p0510^2*p0008)-p0007);SQRT(p0007*EXP(p0510^2*p0008)-p0007))
- p2848: 0.000327168; = p2262*(p1079+p1081)
- p3086: 0; = p2305*p1082
- p2468: 0; = p2272*p1123
- p1712: 0
- p1117: 0.00067869; = IF(p1071=0;p1107/(p1112*p0818);0)
- p3258: 0.0491162
- p1978: 355
- p3478: 0.368699; = if(p1328+p1330+p1332+p1334+p1336+p1338+p1340+p1342+p1344=0;0;p1332/(p1328+p1330+p1332+p1334+p1336+p1338+p1340+p1342+p1344))
- p2382: 0; = p2229*p2211
- p3998: 0.000119242; = p1855*p3478
- p0506: 0; = SQRT(2)*(IF((2*p0374-1)<0;-1;IF((2*p0374-1)>0;1;0))*SQRT(SQRT((2/(pi()*0.140012289)+LN(1-(2*p0374-1)^2)/2)^2-LN(1-(2*p0374-1)^2)/0.140012289)-(2/(pi()*0.140012289)+LN(1-(2*p0374-1)^2)/2)))
- p3211: 0; = p2430*p1132
- p0873: 0.249774; = p0872*p0001*p0003/(p0818*p0002)
- p2725: 0; = p2334*(p1019+p1021)
- p3349: 0.816024; = if(and(p1232=0;p3256<>0);1-(p3345+p3346+p3347+p3348);0)
- p0896: 0.497045
- p3044: 0; = p2263*p1082
- p1963b: 4.11166e-7; = p1569*p1773+p1570*p1774+p1571*p1775+p1572*p1776+p1573*p1777+p1574*p1778+p1575*p1779+p1576*p1780+p1577*p1781+p1578*p1782+p1579*p1783+p1580*p1784+p1581*p1785+p1582*p1786+p1583*p1787+p1584*p1788+p1585*p1789+p1586*p1790+p1587*p1791
- p0122: 37.413
- p0847: 0
- p0442: 0; = SQRT(2)*(IF((2*p0310-1)<0;-1;IF((2*p0310-1)>0;1;0))*SQRT(SQRT((2/(pi()*0.140012289)+LN(1-(2*p0310-1)^2)/2)^2-LN(1-(2*p0310-1)^2)/0.140012289)-(2/(pi()*0.140012289)+LN(1-(2*p0310-1)^2)/2)))
- p2004: 30
- p4046: 1.30445e-5; = p1903*p3478
- p3354: 4.54348e8; = IF((p3350+p3351+p3352+p3353)+IF(p3349=0;0;(p3256*(p3273*(1-p3277))/p3349))>p3256;p3256-(p3350+p3351+p3352+p3353);IF(p3349=0;0;p3256*(p3273*(1-p3277))/p3349))
- p2756: 0; = p2365*(p1019+p1021)
- p2542: 0; = p2346*p1073
- p3058: 9.28119e-6; = p2277*p1023
- p1073: 0; = IF(p1071=0;p0711/100;0)
- p2020: 506437; = p2015*p2018*p2019
- p3384: 0; = p3365*p1234
- p1179: 0.5
- p2994: 0; = p2408*(p1020+p1022)
- p1448: 618
- p2169: 0.00216148; = p2166*(p0908)
- p1684: 0
- p2107: 0.881623
- p0226: 0
- p2892: 1.15502e-5; = p2306*(p1079+p1081)
- p3192: 0; = p2411*p1023
- p2404: 0; = p2234*p2193
- p0143: 0
- p2560: 0; = p2364*p1014
- p0854: 4.18581e6; = p0801*((1-p0853)*p0846+p0853*p0852)
- p2985: 0; = p2399*(p1020+p1022)
- p3090: 0; = p2309*p1082
- p0541: 0; = IF(p0277<0.5;-SQRT(p0007*EXP(p0409^2*p0008)-p0007);SQRT(p0007*EXP(p0409^2*p0008)-p0007))
- p1183: 0.000347445; = p0801*p0001/(p0818*p0002)
- p0078: 10548.7
- p2797: 0; = p2406*(p1019+p1021)
- p0889: 0; = 1000*p0888*p0001*p0003*p0004/(p0818*p0002)
- p0708: 0
- p1145: 4.10774e8; = if(p1121=0;p0799*p0702*1000*p0800/100;0)
- p1795: 1.17565e-6; = p1387*1000/p0818
- p2392: 0; = p2233*p2221
- p1104: 0.338023; = IF(p1071=0;IF(p1096+p1101+p1102+p1103=1;0;1-(p1096+p1101+p1102+p1103));0)
- p0762: 0
- p1155: 0.00260351; = if(p1153*p0818=0;0;p1151/(p1153*p0818))
- p2123: 0.263965
- p2548: 0; = p2352*p1123
- p3013: 0; = p2427*(p1079+p1081)
- p3401: 0; = p3363*p1238
- p1048: 0.000456062; = IF(p1012=0;IF(p1037+p1044+p1045+p1046+p1047=1;0;IF(p1037+p1044+p1045+p1046+p1047+p1042>1;1-(p1037+p1044+p1045+p1046+p1047);p1042));0)
- p1344: 124452; = IF(p1318=0;p1327*p0801;0)
- p0510: 0; = SQRT(2)*(IF((2*p0378-1)<0;-1;IF((2*p0378-1)>0;1;0))*SQRT(SQRT((2/(pi()*0.140012289)+LN(1-(2*p0378-1)^2)/2)^2-LN(1-(2*p0378-1)^2)/0.140012289)-(2/(pi()*0.140012289)+LN(1-(2*p0378-1)^2)/2)))
- p3164: 0; = p2383*p1082
- p0674: 0
- p2958: 0; = p2372*(p1020+p1022)
- p3690: 0; = p1963*p3476
- p2363: 0; = p2225*p2191
- p2234: 0; = 1-(p2222+p2223+p2224+p2225)
- p0416: 0; = SQRT(2)*(IF((2*p0284-1)<0;-1;IF((2*p0284-1)>0;1;0))*SQRT(SQRT((2/(pi()*0.140012289)+LN(1-(2*p0284-1)^2)/2)^2-LN(1-(2*p0284-1)^2)/0.140012289)-(2/(pi()*0.140012289)+LN(1-(2*p0284-1)^2)/2)))
- p3148: 0; = p2367*p1023
- p0772: 0
- p3174: 0; = p2393*p1023
- p1099: 0.57977
- p0034: 148.843
- p0006: 15
- p0930: 3.97712e6; = p0801*p0924
- p2218: 0.0115772; = p1150/p0818
- p4424: 0; = p1869*p3480
- p2353: 0; = p2232*p2221
- p1782: 0
- p0266: 112.742
- p2229: 0; = if(p0774*p0778+p0775*p0779+p0776*p0780+p0777*p0781=0;0;p0781*p0777/(p0774*p0778+p0775*p0779+p0776*p0780+p0777*p0781))
- p3374: 0.0145272; = if(p1232=0;p3246*p3356/p0818;0)
- p4610: 1.66032e-6; = p1849*p3481
- p1966: 1.055e7; = if(p0814=0;p0802;0)
- p2691: 0.000527221; = p2300*(p1078+p1080)
- p2095: 0.765734
- p0903: 0.0257527
- p1843: 0
- p1026: 1.38579e6; = IF(p1012=0;p1020*(p0704/100)*p0703*1000;0)
- p3786: 0; = p1849*p3477
- p3319: 0; = if(and(p1232=0;p3253<>0);p3253*(p3263-p3314)/p3316;0)
- p1329: 0; = p1328*p0001/(p0818*p0002)
- p2440: 0; = p2244*p1014
- p1162: 0.000389434; = p1161/p0818
- p1596: 0
- p3399: 0; = p3380*p1234
- p1760: 0
- p2061: 0.518824
- p1391: 11
- p2483: 0; = p2287*p1014
- p2454: 0; = p2258*p1073
- p0895: 7.40561e9; = p0894*p0830
- p2125: 8.95175e-7; = p2015*p2053*p2087/(p0818*1000)
- p1572: 0
- p0401: 0.5
- p1039: 0.057234
- p2943: 0; = p2357*(p1020+p1022)
- p1089: 0; = IF(p1071=0;p1083*p0001/(p0818*p0002);0)
- p1972: 0; = if(p0807=480;p1967*p0001/(p0818*p0002);0)
- p0994: 0; = p0990*p0001*p0004/(p0818*p0002)
- p0016: 3977.12
- p2005: 1.7417e7; = p1963*p0818+p1959*1000+p1170+p1176+p1182
- p1132: 0; = if(p1121=0;IF(p1123+p1128+p1129+p1130+p1131=1;0;1-(p1123+p1128+p1129+p1130+p1131));0)
- p3018: 2.28992e-5; = p2237*p1023
- p0344: 0.5
- p3156: 0; = p2375*p1082
- p1970: 1.06e7; = p0801
- p2923: 0; = p2337*(p1079+p1081)
- p3484: 0.00567116; = IF(p1344=0;0;p1344/(p1328+p1330+p1332+p1334+p1336+p1338+p1340+p1342+p1344))
- p1921: 0
- p3223: 0.126838; = IF(p3216=0;0;(1-p1223)*24.3050/84.3139)
- p2576: 0; = p2380*p1073
- p1108: 1.92929e6; = IF(p1071=0;p1105*p1102*p1095;0)
- p1642: 0
- p2880: 7.08013e-5; = p2294*(p1020+p1022)
- p3402: 0; = p3364*p1238
- p4510: 0; = p1955*p3480
- p3239: 0.013074; = IF(p3238+p3235+p3236=1;0;1-(p3238+p3235+p3236))
- p3479: 0.0607281; = if(p1328+p1330+p1332+p1334+p1336+p1338+p1340+p1342+p1344=0;0;p1334/(p1328+p1330+p1332+p1334+p1336+p1338+p1340+p1342+p1344))
- p1733: 0
- p0740: 95.388; = p0080*(1+p0608*p0212/100)
- p1121: 0
- p1641: 0
- p2060: 0.272353
- p1196: 0.59
- p3385: 0; = p3366*p1234
- p3170: 0; = p2389*p1132
- p2316: 0; = p2224*p2183
- p2161: 6.35276e-9; = p2015*p2085*p2123/(p0818*1000)
- p0833: 4.34816e10; = p0830+p0832
- p2699: 7.62297e-5; = p2308*(p1078+p1080)
- p2050: 0.952062
- p3104: 0; = p2323*p1023
- p0860: 0; = p0672*1000/p0856
- p2465: 0; = p2269*p1073
- p1299: 0
- p2016: 8.29559e-5; = (p2014-p2015)/(p0818)
- p3096: 0; = p2315*p1023
- p3431: 0.000992206; = p3374*p1239
- p0878: 0; = p0867*p0856
- p1867: 0
- p3128: 0; = p2347*p1082
- p1050: 1.46333e7; = IF(p1012=0;p1037*p1036;0)
- p1617: 0
- p3391: 0; = p3372*p1234
- p0405: 0; = SQRT(2)*(IF((2*p0273-1)<0;-1;IF((2*p0273-1)>0;1;0))*SQRT(SQRT((2/(pi()*0.140012289)+LN(1-(2*p0273-1)^2)/2)^2-LN(1-(2*p0273-1)^2)/0.140012289)-(2/(pi()*0.140012289)+LN(1-(2*p0273-1)^2)/2)))
- p0960: 0; = if(and(p0683>0;or(p0807=480;p0807=32;p0807=1;and(p0807=60;p0901<0.03)));p0936;0)
- p0884: 0; = IF(p0689=100;0;IF(p0689+p0688>100;100-p0689;p0688))
- p1941: 0
- p1298: 0
- p2885: 0.000149048; = p2299*(p1079+p1081)
- p0897: 0
- p1303: 0; = p1297*p1252/p0818
- p0079: 1.225
- p2417: 0; = p2235*p2207
- p2120: 0.51828
- p3169: 0; = p2388*p1082
- p3119: 0; = p2338*p1082
- p1016: 0.62305; = IF(p1012=0;p0707/100;0)
- p2831: 9.40948e-6; = p2245*(p1020+p1022)
- p0409: 0; = SQRT(2)*(IF((2*p0277-1)<0;-1;IF((2*p0277-1)>0;1;0))*SQRT(SQRT((2/(pi()*0.140012289)+LN(1-(2*p0277-1)^2)/2)^2-LN(1-(2*p0277-1)^2)/0.140012289)-(2/(pi()*0.140012289)+LN(1-(2*p0277-1)^2)/2)))
- p2152: 1.49362e-8; = p2015*p2080*p2114/(p0818*1000)
- p1785: 0
- p2041: 1.11973e-6; = p2015*p2040/(p0818*1000)
- p1159: 0.5
- p3483: 0; = if(p1328+p1330+p1332+p1334+p1336+p1338+p1340+p1342+p1344=0;0;p1342/(p1328+p1330+p1332+p1334+p1336+p1338+p1340+p1342+p1344))
- p0706: 25.571; = p0046*(1+p0574*p0178/100)
- p3430: 0; = p3373*p1239
- p0578: 0; = IF(p0314<0.5;-SQRT(p0007*EXP(p0446^2*p0008)-p0007);SQRT(p0007*EXP(p0446^2*p0008)-p0007))
- p0023: 69.862
- p3235: 0.118093
- p2474: 0; = p2278*p1014
- p2535: 0; = p2339*p1073
- p2210: 0.000173708; = 6*1.00794*p2208/30.973762
- p3247: 0
- p0954: 0.000130361; = if(and(p0683>0;or(p0807=56;p0807=100;and(p0807=60;p0901>0.06)));p0936;0)
- p1963e: 3.05877e-6; = p1628*p1832+p1629*p1833+p1630*p1834+p1631*p1835+p1632*p1836+p1633*p1837+p1634*p1838+p1635*p1839+p1636*p1840+p1637*p1841+p1638*p1842+p1639*p1843+p1640*p1844+p1641*p1845+p1642*p1846+p1643*p1847+p1644*p1848+p1645*p1849+p1646*p1850
- p0904: 2.67755e9; = p0825*p0901+(p0830+p0895)*p0824*p0903
- p3067: 6.88013e-6; = p2286*p1023
- p2539: 0; = p2343*p1073
- p1816: 0
- p3347: 0.00107264; = if(and(p1232=0;p3256<>0);p3275*p3289;0)
- p2771: 0; = p2380*(p1078+p1080)
- p3087: 0; = p2306*p1082
- p0485: 0; = SQRT(2)*(IF((2*p0353-1)<0;-1;IF((2*p0353-1)>0;1;0))*SQRT(SQRT((2/(pi()*0.140012289)+LN(1-(2*p0353-1)^2)/2)^2-LN(1-(2*p0353-1)^2)/0.140012289)-(2/(pi()*0.140012289)+LN(1-(2*p0353-1)^2)/2)))
- p3265: 0.696292
- p2414: 0; = p2235*p2204
- p2758: 0; = p2367*(p1019+p1021)
- p2118: 0.679049
- p1607: 0
- p0418: 0; = SQRT(2)*(IF((2*p0286-1)<0;-1;IF((2*p0286-1)>0;1;0))*SQRT(SQRT((2/(pi()*0.140012289)+LN(1-(2*p0286-1)^2)/2)^2-LN(1-(2*p0286-1)^2)/0.140012289)-(2/(pi()*0.140012289)+LN(1-(2*p0286-1)^2)/2)))
- p1556: 0
- p1619: 0
- p2241: 3.1245e-5; = p2222*p2186
- p2170: 0.00719753; = p2166*(p0913)
- p2395: 0; = p2234*p2184
- p3244: 0; = p0791/100
- p3093: 0; = p2312*p1132
- p1127: 0; = if(p1121=0;p0721/100;0)
- p1300: 0; = IF(p1297=p1265;0;IF(p1297+p1298>p1265;p1265-p1297;p1298))
- p3464: 0; = p3369*p1241
- p2343: 0; = p2228*p2211
- p3793: 0; = p1856*p3477
- p3414: 0.000278165; = p3376*p1238
- p1746: 0.615605
- p1814: 0
- p2897: 0.00376733; = p2311*(p1129+p1131)
- p1749: 0
- p0176: 50.795
- p0853: 0; = p0803/(p0802+p0803)
- p2924: 0; = p2338*(p1079+p1081)
- p0972: 0.00343556; = p0969/p0818
- p1980: 3521.6
- p2719: 0; = p2328*(p1019+p1021)
- p0760: 53.862; = p0100*(1+p0628*p0232/100)
- p2243: 5.75269e-5; = p2222*p2188
- p0593: 0; = IF(p0329<0.5;-SQRT(p0007*EXP(p0461^2*p0008)-p0007);SQRT(p0007*EXP(p0461^2*p0008)-p0007))
- p1687: 0
- p1330: 0; = p1320*p0801
- p0784: 103.494; = p0124*(1+p0652*p0256/100)
- p3122: 0; = p2341*p1082
- p3202: 0; = p2421*p1082
- p1019: 0.25571; = IF(p1012=0;IF(p1014=1;0;IF(p1014+p1015>1;1-p1014;p1015));0)
- p0106: 20.039
- p2064: 0.676706
- p3592: 0; = p1861*p3476
- p3230: 2.10145e-7; = p1170/p0818
- p1194: 1.48
- p0809: 0
- p3798: 0; = p1861*p3477
- p2618: 0; = p2422*p1073
- p3439: 0; = p3363*p1240
- p0899: 3.11196e10; = p0825*p0896+(p0830+p0895)*p0824*p0898
- p0739: 1.225; = p0079*(1+p0607*p0211/100)
- p1219: 0; = if(p1218=0;0;SQRT(2)*(IF((2*p1218-1)<0;-1;IF((2*p1218-1)>0;1;0))*SQRT(SQRT((2/(pi()*0.140012289)+LN(1-(2*p1218-1)^2)/2)^2-LN(1-(2*p1218-1)^2)/0.140012289)-(2/(pi()*0.140012289)+LN(1-(2*p1218-1)^2)/2))))
- p1029: 269662; = IF(p1012=0;IF(p0801<p1023*(p0704/100)*p0703*1000;p0801;p1023*(p0704/100)*p0703*1000);0)
- p4394: 0; = p1839*p3480
- p2146: 1.48326e-8; = p2015*p2074*p2108/(p0818*1000)
- p1796: 0
- p2975: 0; = p2389*(p1129+p1131)
- p4925: 0; = p1962*p3482
- p4719: 1.44705e-5; = p1962*p3481
- p0515: 0; = SQRT(2)*(IF((2*p0383-1)<0;-1;IF((2*p0383-1)>0;1;0))*SQRT(SQRT((2/(pi()*0.140012289)+LN(1-(2*p0383-1)^2)/2)^2-LN(1-(2*p0383-1)^2)/0.140012289)-(2/(pi()*0.140012289)+LN(1-(2*p0383-1)^2)/2)))
- p1690: 0
- p1306: 0; = p1302*p1252/p0818
- p1025: 568751; = IF(p1012=0;p1019*(p0704/100)*p0703*1000;0)
- p0997: 0; = if(p0888=0;0;if((p0695*p0694*1000*p0696/100)/p0888>1;1;(p0695*p0694*1000*p0696/100)/p0888))
- p3248: 0
- p2532: 0; = p2336*p1073
- p1592: 0
- p2345: 0; = p2228*p2213
- p3304: 0; = if(and(p1232=0;p3252<>0);p3260*p3289;0)
- p0352: 0.5
- p3046: 0; = p2265*p1082
- p2918: 0; = p2332*(p1020+p1022)
- p3095: 0; = p2314*p1132
- p2307: 6.76162e-5; = p2227*p2214
- p3127: 0; = p2346*p1082
- p2761: 0; = p2370*(p1019+p1021)
- p5131: 0; = p1962*p3483
- p2446: 0; = p2250*p1014
- p1136: 0; = if(p1121=0;p1130*(p0716/100)*p0703*1000;0)
- p1658: 0
- p2521: 0; = p2325*p1014
- p0613: 0; = IF(p0349<0.5;-SQRT(p0007*EXP(p0481^2*p0008)-p0007);SQRT(p0007*EXP(p0481^2*p0008)-p0007))
- p3051: 0; = p2270*p1082
- p2013: 0.75
- p2900: 0.000537752; = p2314*(p1129+p1131)
- p2791: 0; = p2400*(p1019+p1021)
- p3380: 0.327515; = p3251/p0818
- p1803: 0
- p3078: 0; = p2297*p1082
- p2037: 3.16
- p0991: 0; = p0987*p0886
- p0331: 0.5
- p1835: 1.28587e-6; = p1427*1000/p0818
- p1257: 0; = if(p1232>0;0;IF(p1253+p1256=1;0;IF(p1253+p1256+p1255>1;1-(p1253+p1256);p1255)))
- p0200: 154.702
- p2987: 0; = p2401*(p1020+p1022)
- p3369: 0; = if(p1232=0;p3245*p3357/p0818;0)
- p2386: 0; = p2229*p2215
- p2473: 0; = p2277*p1014
- p1012: 0
- p0195: 0
- p2068: 0.153529
- p0037: 100
- p0145: 0
- p1589: 0
- p1957: 0
- p2204: 0.00152594; = p1109/p0818
- p3155: 0; = p2374*p1023
- p4560: 2.28293e-7; = p1799*p3481
- p2982: 0; = p2396*(p1020+p1022)
- p0138: 28.532
- p1208: 109.055; = p1205*p0818*p0822/p0801
- p1358: 35
- p2765: 0; = p2374*(p1019+p1021)
- p0963: 0; = if(and(p0683>0;or(p0807=480;p0807=32;p0807=1;and(p0807=60;p0901<0.03)));p0939;0)
- p0830: 3.89769e10; = p0825*p0821*p0824
- p0259: 127.592
- p0271: 26.47
- p2680: 0.000165267; = p2289*(p1019+p1021)
- p2480: 0; = p2284*p1014
- p3227: 0.00118723; = p3223*p1229
- p2478: 0; = p2282*p1014
- p3077: 2.2732e-5; = p2296*p1023
- p2909: 0; = p2323*(p1020+p1022)
- p2851: 0.000836531; = p2265*(p1079+p1081)
- p0996: 0; = if(p0888=0;0;if((p0691*p0690*1000*p0692/100)/p0888>1;1;(p0691*p0690*1000*p0692/100)/p0888))
- p0840: 0.0813901; = p0839*p0831
- p0284: 0.5
- p3115: 0; = p2334*p1023
- p3045: 0; = p2264*p1082
- p2617: 0; = p2421*p1073
- p2524: 0; = p2328*p1014
- p2058: 1.24412
- p2595: 0; = p2399*p1014
- p2601: 0; = p2405*p1014
- p2416: 0; = p2235*p2206
- p1773: 0
- p3289: 0.05
- p2272: 0.00577672; = p2230*p2218
- p3378: 0.0201117; = if(p1232=0;p3246*p3360/p0818;0)
- p4308: 1.13352e-5; = p1963*p3479
- p0212: 18.671
- p3368: 0; = if(p1232=0;p3245*p3356/p0818;0)
- p1239: 0.0683; = if(p1232>0;0;IF(p1234+p1238=1;0;IF(p1234+p1238+p1236>1;1-(p1234+p1238);p1236)))
- p1665: 0.575
- p1769: 0
- p1125: 0.64949; = if(p1121=0;p0719/100;0)
- p1612: 0
- p3342: 9.18657e6; = if(and(p1232=0;p3254<>0);p3254*(p3272-p3337)/p3338;0)
- p2342: 0; = p2228*p2210
- p3435: 0.00137363; = p3378*p1239
- p2285: 7.01229e-6; = p2223*p2191
- p3294: 0.279
- p1238: 0.23798; = if(p1232>0;0;IF(p1234=1;0;IF(p1234+p1235>1;1-p1234;p1235)))
- p0812: 0; = if(p0807=480;0.095/0.34;0)
- p0914: 7.88787e8; = p0825*p0911+(p0830+p0895)*p0824*p0913
- p2517: 0; = p2321*p1014
- p1892: 0
- p1110: 2.42159e7; = IF(p1071=0;p1105*p1104*p1095;0)
- p0923: 0.311908; = IF(p0918=1;0;IF(p0918+p0919>1;1-p0918;p0919))
- p1031: 1.86424e-5; = IF(p1012=0;p1025*p0001/(p0818*p0002);0)
- p1995: 50
- p1663: 0
- p4968: 0; = p1795*p3483
- p0134: 0.043
- p4716: 3.07158e-6; = p1955*p3481
- p0742: 95.628; = p0082*(1+p0610*p0214/100)
- p2593: 0; = p2397*p1014
- p1173: 0.5
- p3284: 0.275
- p3129: 0; = p2348*p1082
- p2961: 0; = p2375*(p1079+p1081)
- p2200: 0.000408613; = p1056/p0818
- p1204: 0.980791
- p4188: 4.01596e-8; = p1839*p3479
- p1781: 0
- p1054: 1.27984e7; = IF(p1012=0;p1047*p1036;0)
- p2857: 0.000233613; = p2271*(p1079+p1081)
- p1114: 0.216028
- p2176: 0.00269353; = p0895*p0913/p0818
- p0785: 0
- p2086: 0.0617647
- p1670: 0
- p1678: 0
- p0995: 0; = p0991*p0001*p0004/(p0818*p0002)
- p3056: 0; = p2275*p1132
- p2359: 0; = p2225*p2187
- p1615: 0
- p3324: 0; = if(and(p1232=0;p3255<>0);p3266*(p3279*(p3284*p1256+p3286*(p1253+p1257)+p1258*p3288+p3299*p3287));0)
- p0552: 0; = IF(p0288<0.5;-SQRT(p0007*EXP(p0420^2*p0008)-p0007);SQRT(p0007*EXP(p0420^2*p0008)-p0007))
- p3069: 7.92696e-6; = p2288*p1023
- p0500: 0; = SQRT(2)*(IF((2*p0368-1)<0;-1;IF((2*p0368-1)>0;1;0))*SQRT(SQRT((2/(pi()*0.140012289)+LN(1-(2*p0368-1)^2)/2)^2-LN(1-(2*p0368-1)^2)/0.140012289)-(2/(pi()*0.140012289)+LN(1-(2*p0368-1)^2)/2)))
- p0455: 0; = SQRT(2)*(IF((2*p0323-1)<0;-1;IF((2*p0323-1)>0;1;0))*SQRT(SQRT((2/(pi()*0.140012289)+LN(1-(2*p0323-1)^2)/2)^2-LN(1-(2*p0323-1)^2)/0.140012289)-(2/(pi()*0.140012289)+LN(1-(2*p0323-1)^2)/2)))
- p3210: 0; = p2429*p1132
- p1840: 0
- p1120: 0.00374047; = IF(p1071=0;p1110/(p1115*p0818);0)
- p0841: 0.0490668
- p0763: 10548.7; = p0103*(1+p0631*p0235/100)
- p3108: 0; = p2327*p1023
- p0388: 0.5
- p1005: 0; = p1001*p0888
- p4600: 3.73571e-7; = p1839*p3481
- p2634: 1.47102e-5; = p2243*(p1019+p1021)
- p1976: 0.043
- p1918: 0
- p4816: 0; = p1849*p3482
- p2420: 0; = p2235*p2210
- p0114: 55.22
- p0151: 0
- p0773: 28.532; = p0113*(1+p0641*p0245/100)
- p2655: 2.72144e-5; = p2264*(p1078+p1080)
- p2864: 4.14916e-6; = p2278*(p1020+p1022)
- p1748: 0
- p0346: 0.5
- p2111: 0.856281
- p1092: 0; = IF(p1071=0;p1086*p0001/(p0818*p0002);0)
- p4321: 0; = p1766*p3480
- p1948: 0
- p1830: 0
- p2167: 0.331525; = p2166*(p0898)
- p2398: 0; = p2234*p2187
- p4218: 4.68529e-8; = p1869*p3479
- p3220: 0.0036103; = p3216*p1228
- p2598: 0; = p2402*p1014
- p3473: 0.0139519; = p3378*p1241
- p3792: 0; = p1855*p3477
- p0723: 10548.7; = p0063*(1+p0591*p0195/100)
- p2945: 0; = p2359*(p1020+p1022)
- p0440: 0; = SQRT(2)*(IF((2*p0308-1)<0;-1;IF((2*p0308-1)>0;1;0))*SQRT(SQRT((2/(pi()*0.140012289)+LN(1-(2*p0308-1)^2)/2)^2-LN(1-(2*p0308-1)^2)/0.140012289)-(2/(pi()*0.140012289)+LN(1-(2*p0308-1)^2)/2)))
- p3425: 0; = p3368*p1239
- p2929: 0; = p2343*(p1079+p1081)
- p1909: 0
- p1143: 0; = if(p1121=0;p1137*p0001/(p0818*p0002);0)
- p2467: 0; = p2271*p1073
- p1006: 0; = p1002*p0001*p0004/(p0818*p0002)
- p4927: 0; = p1754*p3483
- p2911: 0; = p2325*(p1020+p1022)
- p1942: 0
- p1013: 0; = p1012*p0001/(p0818*p0002)
- p1275: 0; = p1271*p1252/p0818
- p2745: 0; = p2354*(p1019+p1021)
- p0786: 0
- p2042: 0.07
- p3422: 0; = p3365*p1239
- p2671: 1.47521e-5; = p2280*(p1019+p1021)
- p0306: 0.5
- p1915: 0
- p0880: 0; = p0868*p0856
- p3497: 0; = p1766*p3476
- p2964: 0; = p2378*(p1079+p1081)
- p0745: 21796.8; = p0085*(1+p0613*p0217/100)
- p0761: 0
- p2024: 0.748682
- p2025: 1.69277e-6; = p2015*p2023*p2024/(p0818*1000)
- p2574: 0; = p2378*p1073
- p1319: 0; = IF(((p0745*1000*p0746/100)+(p0754*1000*p0755/100))/p0801<0;0;((p0745*1000*p0746/100)+(p0754*1000*p0755/100))/p0801)
- p0404: 0.5
- p1967: 0; = if(p0807=480;p0802*p0810;0)
- p2792: 0; = p2401*(p1019+p1021)
- p4823: 0; = p1856*p3482
- p3481: 0.564902; = if(p1328+p1330+p1332+p1334+p1336+p1338+p1340+p1342+p1344=0;0;p1338/(p1328+p1330+p1332+p1334+p1336+p1338+p1340+p1342+p1344))
- p0008: 0.0739645; = (p0007-1.5)/(p0007-1)^2
- p0242: 69.46
- p1292: 0.14149; = IF(p1287+p1290+p1291=p1261;0;p1261-(p1287+p1290+p1291))
- p2786: 0; = p2395*(p1019+p1021)
- p1754: 2.49825e-5; = p1346*1000/p0818
- p0925: 0.225851; = IF(p0918+p0923+p0924=1;0;IF(p0918+p0923+p0924+p0921>1;1-(p0918+p0923+p0924);p0921))
- p1284: 0; = p1280*p1252/p0818
- p2952: 0; = p2366*(p1020+p1022)
- p4144: 7.13949e-8; = p1795*p3479
- p3897: 9.21104e-6; = p1754*p3478
- p2547: 0; = p2351*p1123
- p1691: 0
- p0551: 0; = IF(p0287<0.5;-SQRT(p0007*EXP(p0419^2*p0008)-p0007);SQRT(p0007*EXP(p0419^2*p0008)-p0007))
- p1764: 0
- p2458: 0; = p2262*p1073
- p3021: 1.50619e-6; = p2240*p1023
- p3433: 7.98331e-5; = p3376*p1239
- p1309: 0
- p1316: 0.321343; = p1312*p1252/p0818
- p1244: 32176.6; = if(p1232>0;0;p1239*(p0725/100)*p0723*1000)
- p1562: 0.5
- p0782: 37.413; = p0122*(1+p0650*p0254/100)
- p1184: 3.99687e-8; = p1182/p0818
- p0726: 0
- p2017: 8.90895e6; = p2015*p0898
- p4831: 0; = p1864*p3482
- p0943: 0; = if(and(p0683=0;p0949=0);p0937;0)
- p0881: 0; = p0880*p0001*p0003/(p0818*p0002)
- p3322: 0; = if(and(p1232=0;p3253<>0);p3253-(p3317+p3318+p3319+p3320+p3321);0)
- p3367: 0; = if(p1232=0;p3244*p3361/p0818;0)
- p5128: 0; = p1955*p3483
- p0817: 0
- p2895: 2.36392e-5; = p2309*(p1079+p1081)
- p2956: 0; = p2370*(p1020+p1022)
- p2795: 0; = p2404*(p1019+p1021)
- p1931: 0
- p1971: 0.000345806; = p1966*p0001/(p0818*p0002)
- p0851: 0
- p0288: 0.5
- p1876: 0
- p2647: 2.26502e-6; = p2256*(p1019+p1021)
- p3117: 0; = p2336*p1082
- p0502: 0; = SQRT(2)*(IF((2*p0370-1)<0;-1;IF((2*p0370-1)>0;1;0))*SQRT(SQRT((2/(pi()*0.140012289)+LN(1-(2*p0370-1)^2)/2)^2-LN(1-(2*p0370-1)^2)/0.140012289)-(2/(pi()*0.140012289)+LN(1-(2*p0370-1)^2)/2)))
- p0686: 148.843; = p0026*(1+p0554*p0158/100)
- p2504: 0; = p2308*p1073
- p0277: 0.5
- p1747: 0
- p0932: 0; = p0801*p0926
- p0052: 29.875
- p2523: 0; = p2327*p1014
- p1003: 0; = p0999*p0888
- p0355: 0.5
- p1996: 30
- p2978: 0; = p2392*(p1129+p1131)
- p2968: 0; = p2382*(p1079+p1081)
- p2925: 0; = p2339*(p1079+p1081)
- p3222: 0.224242; = IF(p3216=0;0;p1223*40.078/100.0869)
- p3059: 8.0739e-7; = p2278*p1023
- p2674: 6.22944e-6; = p2283*(p1019+p1021)
- p3262: 0.0787162
- p2724: 0; = p2333*(p1019+p1021)
- p3010: 0; = p2424*(p1079+p1081)
- p2265: 0.00119291; = p2226*p2211
- p1808: 0
- p0702: 10548.7; = p0042*(1+p0570*p0174/100)
- p2010: 0.00125973; = ((p1984*p1985+p1990*p1991+p1996*p1997+p2004*p2005)/p0818)*p0005*p0002/1000
- p3188: 0; = p2407*p1023
- p2770: 0; = p2379*(p1078+p1080)
- p3300: 0; = if(p1293+p1294+p1295+p1296=0;0;p1293/(p1293+p1294+p1295+p1296))
- p3252: 0; = p1252*(p1267*(1-p3247)+p1270*(1-p3248)+p1271*(1-p3249)+p1272*(1-p3250))
- p3411: 0; = p3373*p1238
- p4828: 0; = p1861*p3482
- p0622: 0; = IF(p0358<0.5;-SQRT(p0007*EXP(p0490^2*p0008)-p0007);SQRT(p0007*EXP(p0490^2*p0008)-p0007))
- p1318: 0; = p1317*p0001/(p0818*p0002)
- p0678: 3306.23; = p0018*(1+p0546*p0150/100)
- p2679: 1.67189e-5; = p2288*(p1019+p1021)
- p1022: 0; = IF(p1012=0;IF(p1014+p1019+p1020+p1021=1;0;IF(p1014+p1019+p1020+p1021+p1018>1;1-(p1014+p1019+p1020+p1021);p1018));0)
- p0870: 9.45016e6; = p0858*p0856
- p2717: 0; = p2326*(p1019+p1021)
- p1334: 1.33266e6; = p1322*p0801
- p1225: 1.088; = IF(p1221=0;0;p1223+1.2*p1224)
- p1326: 0; = IF(((p0745*1000*p0753/100)+(p0754*1000*p0762/100))/p0801<0;0;((p0745*1000*p0753/100)+(p0754*1000*p0762/100))/p0801)
- p0425: 0; = SQRT(2)*(IF((2*p0293-1)<0;-1;IF((2*p0293-1)>0;1;0))*SQRT(SQRT((2/(pi()*0.140012289)+LN(1-(2*p0293-1)^2)/2)^2-LN(1-(2*p0293-1)^2)/0.140012289)-(2/(pi()*0.140012289)+LN(1-(2*p0293-1)^2)/2)))
- p3469: 0.0100778; = p3374*p1241
- p3011: 0; = p2425*(p1079+p1081)
- p1784: 0
- p2698: 2.02003e-5; = p2307*(p1078+p1080)
- p2808: 0; = p2417*(p1078+p1080)
- p2812: 0; = p2421*(p1078+p1080)
- p2806: 0; = p2415*(p1078+p1080)
- p2503: 0; = p2307*p1073
- p1643: 0
- p1621: 0
- p0221: 183.479
- p2117: 0.585147
- p1101: 0.0540177; = IF(p1071=0;IF(p1096=1;0;IF(p1096+p1097>1;1-p1096;p1097));0)
- p2569: 0; = p2373*p1014
- p2436: 0; = p2240*p1014
- p2321: 0; = p2224*p2188
- p3098: 0; = p2317*p1023
- p3073: 2.01125e-7; = p2292*p1023
- p2292: 1.6589e-6; = p2223*p2199
- p0523: 0; = SQRT(2)*(IF((2*p0391-1)<0;-1;IF((2*p0391-1)>0;1;0))*SQRT(SQRT((2/(pi()*0.140012289)+LN(1-(2*p0391-1)^2)/2)^2-LN(1-(2*p0391-1)^2)/0.140012289)-(2/(pi()*0.140012289)+LN(1-(2*p0391-1)^2)/2)))
- p2798: 0; = p2407*(p1019+p1021)
- p2766: 0; = p2375*(p1078+p1080)
- p1752: 0
- p3424: 0; = p3367*p1239
- p2687: 4.79446e-5; = p2296*(p1019+p1021)
- p2419: 0; = p2235*p2209
- p2301: 0.000423117; = p2227*p2208
- p0965: 0.0798; = IF(p0684/100=1;0;IF(p0684/100+p0685/100>1;1-p0684/100;p0685/100))
- p1601: 0
- p2221: 0.00165254; = p1155-p2220
- p1841: 0
- p2463: 0; = p2267*p1073
- p2282: 0.000106217; = p2223*p2188
- p1623: 0
- p2619: 0; = p2423*p1073
- p2652: 0.00058134; = p2261*(p1078+p1080)
- p2138: 5.54244e-8; = p2015*p2066*p2100/(p0818*1000)
- p2960: 0; = p2374*(p1020+p1022)
- p3057: 4.2281e-5; = p2276*p1023
- p2449: 0; = p2253*p1014
- p0754: 147.852; = p0094*(1+p0622*p0226/100)
- p1675: 0
- p1829: 0
- p0094: 147.852
- p3134: 0; = p2353*p1132
- p2530: 0; = p2334*p1014
- p1714: 0
- p3081: 0; = p2300*p1082
- p1849: 2.93912e-6; = p1441*1000/p0818
- p2403: 0; = p2234*p2192
- p1065: 4.56274e-5; = IF(p1012=0;p1051/(p1058*p0818);0)
- p0874: 0; = p0865*p0856
- p4198: 1.78487e-7; = p1849*p3479
- p0169: 0
- p0676: 3977.12; = p0016*(1+p0544*p0148/100)
- p0260: 139.858
- p2926: 0; = p2340*(p1079+p1081)
- p1963: 0.000186656; = p1963a+p1963b+p1963c+p1963d+p1963e+p1963f+p1963g+p1963h+p1963i+p1963j+p1963k
- p3181: 0; = p2400*p1023
- p2557: 0; = p2361*p1014
- p2876: 2.86416e-7; = p2290*(p1020+p1022)
- p2779: 0; = p2388*(p1078+p1080)
- p1963h: 2.69914e-5; = p1686*p1890+p1687*p1891+p1688*p1892+p1689*p1893+p1690*p1894+p1691*p1895+p1692*p1896+p1693*p1897+p1694*p1898+p1695*p1899+p1696*p1900+p1697*p1901+p1698*p1902+p1699*p1903+p1700*p1904+p1701*p1905+p1702*p1906+p1703*p1907+p1704*p1908+p1705*p1909
- p0587: 0; = IF(p0323<0.5;-SQRT(p0007*EXP(p0455^2*p0008)-p0007);SQRT(p0007*EXP(p0455^2*p0008)-p0007))
- p3273: 0.753577
- p1555: 0
- p3139: 0; = p2358*p1023
- p3103: 0; = p2322*p1023
- p1991: 4.08543e8; = (if(p1111=0;0;p1106/p1111)+if(p1112=0;0;p1107/p1112)+if(p1113=0;0;p1108/p1113)+if(p1114=0;0;p1109/p1114)+if(p1115=0;0;p1110/p1115))*(1+p1157)
- p2105: 0.888194
- p1877: 0
- p3312: 0; = if(and(p1232=0;p3253<>0);p3261*p3277*(p3298*p3290+(1-p3298)*p3294);0)
- p1904: 0
- p2510: 0; = p2314*p1123
- p2140: 1.01668e-7; = p2015*p2068*p2102/(p0818*1000)
- p0474: 0; = SQRT(2)*(IF((2*p0342-1)<0;-1;IF((2*p0342-1)>0;1;0))*SQRT(SQRT((2/(pi()*0.140012289)+LN(1-(2*p0342-1)^2)/2)^2-LN(1-(2*p0342-1)^2)/0.140012289)-(2/(pi()*0.140012289)+LN(1-(2*p0342-1)^2)/2)))
- p0820: 0; = if(p0807=480;p0814;0)
- p0554: 0; = IF(p0290<0.5;-SQRT(p0007*EXP(p0422^2*p0008)-p0007);SQRT(p0007*EXP(p0422^2*p0008)-p0007))
- p0975: 0.0135375; = p0973*p0974/p0818
- p5042: 0; = p1869*p3483
- p2633: 1.14989e-6; = p2242*(p1019+p1021)
- p2237: 0.000188875; = p2222*p2182
- p0819: 0; = p0808*p0809/p0818
- p3047: 0; = p2266*p1082
- p1850: 0
- p2661: 1.11047e-5; = p2270*(p1078+p1080)
- p3274: 0.0768939
- p0924: 0.3752; = IF(p0918+p0923=1;0;IF(p0918+p0923+p0920>1;1-(p0918+p0923);p0920))
- p2571: 0; = p2375*p1073
- p1285: 0; = p1281*p1252/p0818
- p1290: 0; = IF(p1287=p1264;0;IF(p1287+p1288>p1264;p1264-p1287;p1288))
- p0966: 0.12689; = if(p0683=0;0;IF(p0684/100+p0965=1;0;1-(p0684/100+p0965)))
- p2834: 0.000102923; = p2248*(p1020+p1022)
- p1172: 2.10145e-7; = p1170/p0818
- p0332: 0.5
- p1297: 0
- p1597: 0
- p2119: 0.679049
- p0732: 14.149; = p0072*(1+p0600*p0204/100)
- p1287: 0
- p2304: 0.00108186; = p2227*p2211
- p1593: 0
- p2100: 0.705744
- p0806: 4.5365e8
- p2616: 0; = p2420*p1073
- p2732: 0; = p2341*(p1078+p1080)
- p0859: 0.0718886; = p0671*1000/p0856
- p2582: 0; = p2386*p1073
- p2412: 0; = p2234*p2202
- p2823: 0.000117679; = p2237*(p1020+p1022)
- p4012: 2.84459e-7; = p1869*p3478
- p4007: 7.99193e-7; = p1864*p3478
- p2047: 2.15333e-14; = p2015*p2045/(p0818*1000000000000)
- p2164: 0.000257032; = (p2015/p0818)-(p2022)-(p2035+p2036+p2052)-(p2017/p0818)-(p2039+p2041+p2044+p2158+p2159+p2160+p2161+p2162)
- p0496: 0; = SQRT(2)*(IF((2*p0364-1)<0;-1;IF((2*p0364-1)>0;1;0))*SQRT(SQRT((2/(pi()*0.140012289)+LN(1-(2*p0364-1)^2)/2)^2-LN(1-(2*p0364-1)^2)/0.140012289)-(2/(pi()*0.140012289)+LN(1-(2*p0364-1)^2)/2)))
- p2749: 0; = p2358*(p1019+p1021)
- p2069: 0.190588
- p3241: 6.16634e-10; = p3234*p1188*p3236/p0818
- p3137: 0; = p2356*p1023
- p1962: 2.56159e-5; = p1960*1000/p0818
- p3477: 0; = if(p1328+p1330+p1332+p1334+p1336+p1338+p1340+p1342+p1344=0;0;p1330/(p1328+p1330+p1332+p1334+p1336+p1338+p1340+p1342+p1344))
- p3031: 4.24386e-5; = p2250*p1023
- p0268: 50.795
- p2501: 0; = p2305*p1073
- p3471: 0.000810861; = p3376*p1241
- p3143: 0; = p2362*p1023
- p3200: 0; = p2419*p1082
- p0250: 111.051
- p2668: 1.95752e-5; = p2277*(p1019+p1021)
- p2406: 0; = p2234*p2196
- p0918: 0.0822052; = p0680*1000/p0801
- p1608: 0
- p2308: 0.000255162; = p2227*p2215
- p2825: 2.24717e-6; = p2239*(p1020+p1022)
- p0501: 0; = SQRT(2)*(IF((2*p0369-1)<0;-1;IF((2*p0369-1)>0;1;0))*SQRT(SQRT((2/(pi()*0.140012289)+LN(1-(2*p0369-1)^2)/2)^2-LN(1-(2*p0369-1)^2)/0.140012289)-(2/(pi()*0.140012289)+LN(1-(2*p0369-1)^2)/2)))
- p2522: 0; = p2326*p1014
- p3231: 1.24951e-7; = p1176/p0818
- p3467: 0; = p3372*p1241
- p2401: 0; = p2234*p2190
- p1237: 0; = if(p1232>0;0;p0729/100)
- p0938: 0; = p0932*p0001/(p0818*p0002)
- p1243: 112114; = if(p1232>0;0;p1238*(p0725/100)*p0723*1000)
- p5029: 0; = p1856*p3483
- p2270: 3.71704e-5; = p2226*p2216
- p1134: 1.38332e6; = if(p1121=0;p1128*(p0716/100)*p0703*1000;0)
- p2842: 5.51883e-6; = p2256*(p1020+p1022)
- p2261: 0.00194591; = p2226*p2207
- p2428: 0; = p2236*p2218
- p3072: 9.14785e-8; = p2291*p1023
- p2930: 0; = p2344*(p1079+p1081)
- p2988: 0; = p2402*(p1020+p1022)
- p3438: 0; = p3362*p1240
- p2434: 0; = p2238*p1014
- p3318: 0; = if(and(p1232=0;p3253<>0);p3253*(p3262-p3313)/p3316;0)
- p3006: 0; = p2420*(p1079+p1081)
- p0683: 69.862; = p0023*(1+p0551*p0155/100)
- p2870: 1.73736e-5; = p2284*(p1020+p1022)
- p1961: 0.5
- p0269: 13.268
- p2534: 0; = p2338*p1073
- p2642: 6.36646e-8; = p2251*(p1019+p1021)
- p3092: 0; = p2311*p1132
- p2654: 6.30301e-5; = p2263*(p1078+p1080)
- p0971: 0.00216059; = p0968/p0818
- p0746: 0
- p3161: 0; = p2380*p1082
- p1692: 0
- p2865: 1.42916e-5; = p2279*(p1020+p1022)
- p1186: 1.99844e-8; = p1182*p1185/p0818
- p0721: 0
- p3264: 0.0887032
- p1893: 0
- p0969: 9.35124e7; = p0966*p0683*p0682*1000
- p0777: 0
- p0204: 202.571
- p3328: 0; = if(and(p1232=0;p3255<>0);p3255*(p3265*p3277-p3323)/p3327;0)
- p2682: 1.92939e-7; = p2291*(p1019+p1021)
- p1901: 0
- p1310: 0; = IF(p1307=p1266;0;IF(p1307+p1308>p1266;p1266-p1307;p1308))
- p2596: 0; = p2400*p1014
- p0459: 0; = SQRT(2)*(IF((2*p0327-1)<0;-1;IF((2*p0327-1)>0;1;0))*SQRT(SQRT((2/(pi()*0.140012289)+LN(1-(2*p0327-1)^2)/2)^2-LN(1-(2*p0327-1)^2)/0.140012289)-(2/(pi()*0.140012289)+LN(1-(2*p0327-1)^2)/2)))
- p3003: 0; = p2417*(p1079+p1081)
- p1190: 1.10439e-7; = p1188/p0818
- p1157: 0.227583
- p2197: 7.08672e-7; = p1055/p0818
- p3083: 0; = p2302*p1082
- p0378: 0.5
- p1586: 0
- p2788: 0; = p2397*(p1019+p1021)
- p0808: 0
- p0433: 0; = SQRT(2)*(IF((2*p0301-1)<0;-1;IF((2*p0301-1)>0;1;0))*SQRT(SQRT((2/(pi()*0.140012289)+LN(1-(2*p0301-1)^2)/2)^2-LN(1-(2*p0301-1)^2)/0.140012289)-(2/(pi()*0.140012289)+LN(1-(2*p0301-1)^2)/2)))
- p4939: 0; = p1766*p3483
- p0711: 0
- p1218: 0.5
- p0816: 0
- p0591: 0; = IF(p0327<0.5;-SQRT(p0007*EXP(p0459^2*p0008)-p0007);SQRT(p0007*EXP(p0459^2*p0008)-p0007))
- p0042: 10548.7
- p2174: 0.00700667; = p0895*p0903/p0818
- p3306: 0; = if(and(p1232=0;p3252<>0);p3252*(p3257*p3277-p3301)/p3305;0)
- p1090: 2.94728e-5; = IF(p1071=0;p1084*p0001/(p0818*p0002);0)
- p1662: 0
- p3938: 4.33461e-7; = p1795*p3478
- p2323: 0; = p2224*p2190
- p2284: 2.78847e-5; = p2223*p2190
- p2609: 0; = p2413*p1014
- p0670: 9450.16; = p0010*(1+p0538*p0142/100)
- p0514: 0; = SQRT(2)*(IF((2*p0382-1)<0;-1;IF((2*p0382-1)>0;1;0))*SQRT(SQRT((2/(pi()*0.140012289)+LN(1-(2*p0382-1)^2)/2)^2-LN(1-(2*p0382-1)^2)/0.140012289)-(2/(pi()*0.140012289)+LN(1-(2*p0382-1)^2)/2)))
- p0547: 0; = IF(p0283<0.5;-SQRT(p0007*EXP(p0415^2*p0008)-p0007);SQRT(p0007*EXP(p0415^2*p0008)-p0007))
- p1990: 30
- p2331: 0; = p2224*p2199
- p2496: 0; = p2300*p1073
- p0946: 0; = if(and(p0683=0;or(p0807=480;p0807=32;p0807=1;and(p0807=60;p0901<0.03)));p0934;0)
- p2079: 0.02
- p1161: 1.06e7; = p0801
- p1977: 1.01882e10; = p1252+p1188
- p1495: 963
- p1973: 0; = if(p0807=480;p1968*p0001/(p0818*p0002);0)
- p0009: 29.101
- p2327: 0; = p2224*p2195
- p2283: 2.43613e-5; = p2223*p2189
- p0581: 0; = IF(p0317<0.5;-SQRT(p0007*EXP(p0449^2*p0008)-p0007);SQRT(p0007*EXP(p0449^2*p0008)-p0007))
- p3392: 0; = p3373*p1234
- p0562: 0; = IF(p0298<0.5;-SQRT(p0007*EXP(p0430^2*p0008)-p0007);SQRT(p0007*EXP(p0430^2*p0008)-p0007))
- p2784: 0; = p2393*(p1019+p1021)
- p2214: 0.000142173; = p1107/p0818
- p3142: 0; = p2361*p1023
- p3082: 0; = p2301*p1082
- p2383: 0; = p2229*p2212
- p1818: 0
- p3466: 0; = p3371*p1241
- p1130: 0; = if(p1121=0;IF(p1123+p1128+p1129=1;0;IF(p1123+p1128+p1129+p1126>1;1-(p1123+p1128+p1129);p1126));0)
- p3330: 0; = if(and(p1232=0;p3255<>0);p3255*(p3267-p3325)/p3327;0)
- p3165: 0; = p2384*p1082
- p0822: 0.898833
- p3269: 0.851786
- p3226: 0.00209896; = p3222*p1229
- p2411: 0; = p2234*p2201
- p0682: 10548.7; = p0022*(1+p0550*p0154/100)
- p0091: 56.508
- p3278: 0.46
- p0142: 0
- p3037: 1.07391e-6; = p2256*p1023
- p3456: 0; = p3380*p1240
- p1958: 11629
- p3052: 0; = p2271*p1082
- p0270: 36.993
- p2686: 4.18211e-6; = p2295*(p1019+p1021)
- p2763: 0; = p2372*(p1019+p1021)
- p3277: 0.55
- p2252: 4.08648e-7; = p2222*p2198
- p2149: 2.64286e-8; = p2015*p2077*p2111/(p0818*1000)
- p0420: 0; = SQRT(2)*(IF((2*p0288-1)<0;-1;IF((2*p0288-1)>0;1;0))*SQRT(SQRT((2/(pi()*0.140012289)+LN(1-(2*p0288-1)^2)/2)^2-LN(1-(2*p0288-1)^2)/0.140012289)-(2/(pi()*0.140012289)+LN(1-(2*p0288-1)^2)/2)))
- p1969: 0; = p0803
- p2485: 0; = p2289*p1014
- p5028: 0; = p1855*p3483
- p1270: 0; = IF(p1267=p1259;0;IF(p1267+p1268>p1259;p1259-p1267;p1268))
- p1098: 0.0269305
- p1079: 0.70125; = IF(p1071=0;IF(p1073+p1078=1;0;IF(p1073+p1078+p1075>1;1-(p1073+p1078);p1075));0)
- p2254: 0.000143555; = p2222*p2200
- p1881: 0
- p1602: 0
- p0082: 95.628
- p0210: 0
- p3457: 0; = p3362*p1241
- p2935: 0; = p2349*(p1079+p1081)
- p0908: 0.00297304
- p1232: 0
- p2451: 0; = p2255*p1014
- p0412: 0; = SQRT(2)*(IF((2*p0280-1)<0;-1;IF((2*p0280-1)>0;1;0))*SQRT(SQRT((2/(pi()*0.140012289)+LN(1-(2*p0280-1)^2)/2)^2-LN(1-(2*p0280-1)^2)/0.140012289)-(2/(pi()*0.140012289)+LN(1-(2*p0280-1)^2)/2)))
- p0538: 0; = IF(p0274<0.5;-SQRT(p0007*EXP(p0406^2*p0008)-p0007);SQRT(p0007*EXP(p0406^2*p0008)-p0007))
- p3094: 0; = p2313*p1132
- p2746: 0; = p2355*(p1019+p1021)
- p2135: 5.7845e-7; = p2015*p2063*p2097/(p0818*1000)
- p4304: 3.30201e-7; = p1955*p3479
- p2962: 0; = p2376*(p1079+p1081)
- p0452: 0; = SQRT(2)*(IF((2*p0320-1)<0;-1;IF((2*p0320-1)>0;1;0))*SQRT(SQRT((2/(pi()*0.140012289)+LN(1-(2*p0320-1)^2)/2)^2-LN(1-(2*p0320-1)^2)/0.140012289)-(2/(pi()*0.140012289)+LN(1-(2*p0320-1)^2)/2)))
- p1387: 32
- p0725: 4.466; = p0065*(1+p0593*p0197/100)
- p0586: 0; = IF(p0322<0.5;-SQRT(p0007*EXP(p0454^2*p0008)-p0007);SQRT(p0007*EXP(p0454^2*p0008)-p0007))
- p1724: 0
- p2180: 6.66987e-8; = p3233*p1188/(p0818)
- p0118: 51.796
- p0838: 2.13837e10; = (p0833-p0836)*p0837
- p1919: 0
- p0358: 0.5
- p1571: 0
- p1248: 3.67486e-6; = if(p1232>0;0;p1243*p0001/(p0818*p0002))
- p2227: 0.47559; = if(p0774*p0778+p0775*p0779+p0776*p0780+p0777*p0781=0;0;p0779*p0775/(p0774*p0778+p0775*p0779+p0776*p0780+p0777*p0781))
- p1203: 3
- p3105: 0; = p2324*p1023
- p1868: 0
- p3240: 5.16546e-9; = p3234*p1188*p3235/p0818
- p0799: 104.083; = p0139*(1+p0667*p0271/100)
- p3014: 0; = p2428*(p1129+p1131)
- p2409: 0; = p2234*p2199
- p1864: 2.1676e-6; = p1456*1000/p0818
- p1245: 0; = if(p1232>0;0;p1240*(p0725/100)*p0723*1000)
- p1628: 0
- p1770: 0
- p2251: 2.48972e-7; = p2222*p2197
- p3207: 0; = p2426*p1082
- p2366: 0; = p2225*p2195
- p2435: 0; = p2239*p1014
- p2286: 5.6748e-5; = p2223*p2192
- p3634: 0; = p1903*p3476
- p1606: 0
- p0255: 24.639
- p2236: 0; = 1-(p2230+p2231+p2232+p2233)
- p1308: 0
- p2045: 30
- p2753: 0; = p2362*(p1019+p1021)
- p1205: 0.04725
- p1081: 0; = IF(p1071=0;IF(p1073+p1078+p1079+p1080=1;0;IF(p1073+p1078+p1079+p1080+p1077>1;1-(p1073+p1078+p1079+p1080);p1077));0)
- p2610: 0; = p2414*p1073
- p0377: 0.5
- p1307: 0
- p0570: 0; = IF(p0306<0.5;-SQRT(p0007*EXP(p0438^2*p0008)-p0007);SQRT(p0007*EXP(p0438^2*p0008)-p0007))
- p1858: 0
- p1220: 0; = IF(p1218<0.5;-SQRT(p1214*EXP(p1219^2*p1215)-p1214);SQRT(p1214*EXP(p1219^2*p1215)-p1214))
- p2190: 4.2987e-5; = 32.065*p2189/(2*14.0067)
- p3005: 0; = p2419*(p1079+p1081)
- p2481: 0; = p2285*p1014
- p0672: 0
- p1252: 1.01882e10; = if(p1232>0;0;p0724*2000*p0723*1000*p0725/100)
- p2163: 0.000253836; = (p2017-p2020)/p0818-(p2025+p2028+p2033+p2034+p2051+p2125+p2126+p2127+p2128+p2129+p2130+p2131+p2132+p2133+p2134+p2135+p2136+p2137+p2138+p2139+p2140+p2141+p2142+p2143+p2144+p2145+p2146+p2147+p2148+p2149+p2150+p2151+p2152+p2153+p2154+p2155+p2156+p2157)
- p0607: 0; = IF(p0343<0.5;-SQRT(p0007*EXP(p0475^2*p0008)-p0007);SQRT(p0007*EXP(p0475^2*p0008)-p0007))
- p5105: 0; = p1932*p3483
- p1280: 0; = IF(p1277=p1263;0;IF(p1277+p1278>p1263;p1263-p1277;p1278))
- p3292: 0.258
- p2781: 0; = p2390*(p1128+p1130)
- p3027: 4.6045e-7; = p2246*p1023
- p1736: 0
- p1766: 1.28587e-6; = p1358*1000/p0818
- p3041: 0; = p2260*p1082
- p1700: 0
- p0984: 0; = if(p0886=0;0;min(1;(p0699*p0698*1000*p0701/100)/p0886))
- p3276: 0.0887032
- p2646: 1.57377e-5; = p2255*(p1019+p1021)
- p0619: 0; = IF(p0355<0.5;-SQRT(p0007*EXP(p0487^2*p0008)-p0007);SQRT(p0007*EXP(p0487^2*p0008)-p0007))
- p2023: 3.15
- p3360: 5.4742e8; = if(p1232=0;p3310+p3321+p3332+p3343+p3354;0)
- p0690: 0
- p0475: 0; = SQRT(2)*(IF((2*p0343-1)<0;-1;IF((2*p0343-1)>0;1;0))*SQRT(SQRT((2/(pi()*0.140012289)+LN(1-(2*p0343-1)^2)/2)^2-LN(1-(2*p0343-1)^2)/0.140012289)-(2/(pi()*0.140012289)+LN(1-(2*p0343-1)^2)/2)))
- p1040: 0.0241685
- p0520: 0; = SQRT(2)*(IF((2*p0388-1)<0;-1;IF((2*p0388-1)>0;1;0))*SQRT(SQRT((2/(pi()*0.140012289)+LN(1-(2*p0388-1)^2)/2)^2-LN(1-(2*p0388-1)^2)/0.140012289)-(2/(pi()*0.140012289)+LN(1-(2*p0388-1)^2)/2)))
- p3301: 0; = if(and(p1232=0;p3252<>0);p3257*p3277*(p3297*p3290+(1-p3297)*p3294);0)
- p0911: 0.0154167
- p0804: 0
- p3204: 0; = p2423*p1082
- p1105: 0.436421
- p3259: 0.00796296
- p1609: 0
- p2267: 1.81616e-5; = p2226*p2213
- p0256: 42.512
- p1188: 3006.05; = p1187*p0801
- p1524: 92
- p2482: 0; = p2286*p1014
- p1613: 0
- p3326: 0; = if(and(p1232=0;p3255<>0);p3268*p3289;0)
- p3275: 0.0214527
- p2130: 4.86943e-7; = p2015*p2058*p2092/(p0818*1000)
- p2198: 1.16317e-6; = 22.98976928*p2197/14.0067
- p2826: 7.74026e-6; = p2240*(p1020+p1022)
- p0728: 6.83; = p0068*(1+p0596*p0200/100)
- p0103: 10548.7
- p0317: 0.5
- p1731: 0
- p3934: 1.89639e-7; = p1791*p3478
- p2712: 0; = p2321*(p1019+p1021)
- p2594: 0; = p2398*p1014
- p1095: 1.64153e8; = IF(p1071=0;p0797*p0702*1000*p0798/100;0)
- p0856: 1.06e7; = p0801
- p3288: 0.505
- p1250: 0; = if(p1232>0;0;p1245*p0001/(p0818*p0002))
- p0407: 0; = SQRT(2)*(IF((2*p0275-1)<0;-1;IF((2*p0275-1)>0;1;0))*SQRT(SQRT((2/(pi()*0.140012289)+LN(1-(2*p0275-1)^2)/2)^2-LN(1-(2*p0275-1)^2)/0.140012289)-(2/(pi()*0.140012289)+LN(1-(2*p0275-1)^2)/2)))
- p3034: 1.08929e-7; = p2253*p1023
- p2459: 0; = p2263*p1073
- p2429: 0; = p2236*p2219
- p3118: 0; = p2337*p1082
- p1847: 0
- p2112: 0.856281
- p1294: 0; = p1290*p1252/p0818
- p0778: 51.796; = p0118*(1+p0646*p0250/100)
- p2248: 0.000165192; = p2222*p2193
- p0115: 53.56
- p1780: 0
- p0565: 0; = IF(p0301<0.5;-SQRT(p0007*EXP(p0433^2*p0008)-p0007);SQRT(p0007*EXP(p0433^2*p0008)-p0007))
- p2344: 0; = p2228*p2212
- p2260: 0.000234364; = p2226*p2206
- p2659: 2.22739e-5; = p2268*(p1078+p1080)
- p1152: 0.415074
- p2405: 0; = p2234*p2195
- p3586: 0; = p1855*p3476
- p2332: 0; = p2224*p2200
- p4281: 2.0526e-7; = p1932*p3479
- p5174: 6.6673e-9; = p1795*p3484
- p1688: 0
- p2632: 7.98967e-6; = p2241*(p1019+p1021)
- p1633: 0
- p3339: 5.52851e7; = if(and(p1232=0;p3254<>0);p3254*(p3269*p3277-p3334)/p3338;0)
- p1187: 0.000283589
- p2605: 0; = p2409*p1014
- p3256: 1.09333e9; = p1252*(p1307*(1-p3247)+p1310*(1-p3248)+p1311*(1-p3249)+p1312*(1-p3250))
- p2566: 0; = p2370*p1014
- p0910: 0.0105884; = p0909/p0818
- p2716: 0; = p2325*(p1019+p1021)
- p3219: 0.0271248; = p3215*p1228
- p2734: 0; = p2343*(p1078+p1080)
- p2592: 0; = p2396*p1014
- p1262: 0; = if(p1232>0;0;p0733/100)
- p2747: 0; = p2356*(p1019+p1021)
- p1289: 0
- p3389: 0; = p3370*p1234
- p2891: 1.10456e-6; = p2305*(p1079+p1081)
- p0251: 117.899
- p0490: 0; = SQRT(2)*(IF((2*p0358-1)<0;-1;IF((2*p0358-1)>0;1;0))*SQRT(SQRT((2/(pi()*0.140012289)+LN(1-(2*p0358-1)^2)/2)^2-LN(1-(2*p0358-1)^2)/0.140012289)-(2/(pi()*0.140012289)+LN(1-(2*p0358-1)^2)/2)))
- p2685: 2.9058e-5; = p2294*(p1019+p1021)
- p2948: 0; = p2362*(p1020+p1022)
- p0720: 0
- p0980: 0; = IF(p0977=0;0;p0977*p0001/(p0818*p0002))
- p0085: 21796.8
- p4184: 7.80882e-8; = p1835*p3479
- p2744: 0; = p2353*(p1128+p1130)
- p2597: 0; = p2401*p1014
- p1866: 0
- p1833: 0
- p1057: 0.82
- p1676: 0
- p4093: 1.35456e-8; = p1950*p3478
- p0557: 0; = IF(p0293<0.5;-SQRT(p0007*EXP(p0425^2*p0008)-p0007);SQRT(p0007*EXP(p0425^2*p0008)-p0007))
- p1042: 0.000456062
- p0684: 79.331; = p0024*(1+p0552*p0156/100)
- p1165: 0.000347445; = p0801*p0001/(p0818*p0002)
- p2399: 0; = p2234*p2188
- p2076: 0.057
- p1836: 0
- p2003: 50
- p2196: 0.000996345; = p1068-p2193-p2195
- p0005: 1.60934
- p1320: 0; = IF(((p0745*1000*p0747/100)+(p0754*1000*p0756/100))/p0801<0;0;((p0745*1000*p0747/100)+(p0754*1000*p0756/100))/p0801)
- p1017: 0; = IF(p1012=0;p0708/100;0)
- p3355: 7.95496e7; = if(and(p1232=0;p3256<>0);p3256-(p3350+p3351+p3352+p3353+p3354);0)
- p1869: 7.7152e-7; = p1461*1000/p0818
- p0301: 0.5
- p0322: 0.5
- p2325: 0; = p2224*p2192
- p2707: 0; = p2316*(p1019+p1021)
- p3032: 3.01854e-8; = p2251*p1023
- p1150: 3.15119e8; = if(p1121=0;p1149*p1146*p1145;0)
- p2752: 0; = p2361*(p1019+p1021)
- p2525: 0; = p2329*p1014
- p0828: 0; = if(p0827=0;0;p0819-p0827/p0818)
- p3387: 0; = p3368*p1234
- p2983: 0; = p2397*(p1020+p1022)
- p0596: 0; = IF(p0332<0.5;-SQRT(p0007*EXP(p0464^2*p0008)-p0007);SQRT(p0007*EXP(p0464^2*p0008)-p0007))
- p2648: 2.59666e-5; = p2257*(p1019+p1021)
- p1004: 0; = p1000*p0888
- p2919: 0; = p2333*(p1020+p1022)
- p1792: 0
- p0004: 0.0254
- p2374: 0; = p2225*p2203
- p2182: 0.000537613; = p1050/p0818
- p2912: 0; = p2326*(p1020+p1022)
- p3068: 3.69794e-5; = p2287*p1023
- p1953: 0
- p3448: 0; = p3372*p1240
- p3325: 0; = if(and(p1232=0;p3255<>0);p3267*p3289;0)
- p0979: 4.87876e-6; = IF(p0976=0;0;p0976*p0001/(p0818*p0002))
- p1038: 0.00660673
- p3370: 0; = if(p1232=0;p3245*p3358/p0818;0)
- p0942: 0; = if(and(p0683=0;p0948=0);p0936;0)
- p0993: 0; = p0989*p0001*p0004/(p0818*p0002)
- p1717: 0
- p4101: 9.44456e-6; = p1962*p3478
- p2611: 0; = p2415*p1073
- p1852: 0
- p2866: 3.59441e-5; = p2280*(p1020+p1022)
- p0736: 0
- p1791: 5.14347e-7; = p1383*1000/p0818
- p1044: 0.00660673; = IF(p1012=0;IF(p1037=1;0;IF(p1037+p1038>1;1-p1037;p1038));0)
- p4899: 0; = p1932*p3482
- p3412: 0.00345718; = p3374*p1238
- p0687: 0
- p1861: 6.98042e-7; = p1453*1000/p0818
- p3019: 5.02666e-6; = p2238*p1023
- p3406: 0; = p3368*p1238
- p2562: 0; = p2366*p1014
- p2715: 0; = p2324*(p1019+p1021)
- p0638: 0; = IF(p0374<0.5;-SQRT(p0007*EXP(p0506^2*p0008)-p0007);SQRT(p0007*EXP(p0506^2*p0008)-p0007))
- p0232: 0
- p3146: 0; = p2365*p1023
- p2546: 0; = p2350*p1123
- p4625: 1.22448e-6; = p1864*p3481
- p2819: 0; = p2428*(p1128+p1130)
- p1267: 0
- p0931: 2.39402e6; = p0801*p0925
- p1882: 0
- p1020: 0.62305; = IF(p1012=0;IF(p1014+p1019=1;0;IF(p1014+p1019+p1016>1;1-(p1014+p1019);p1016));0)
- p2051: 1.75586e-5; = p2015*p2049*p2050/(p0818*1000)
- p2868: 6.61786e-5; = p2282*(p1020+p1022)
- p3362: 0; = if(p1232=0;p3244*p3356/p0818;0)
- p2704: 0.000167004; = p2313*(p1128+p1130)
- p2362: 0; = p2225*p2190
- p1925: 0
- p3404: 0; = p3366*p1238
- p0697: 100; = p0037*(1+p0565*p0169/100)
- p1158: 0.0105457; = p1156*p1157
- p1988: 750
- p2333: 0; = p2224*p2201
- p1774: 0
- p0013: 266.501
- p0595: 0; = IF(p0331<0.5;-SQRT(p0007*EXP(p0463^2*p0008)-p0007);SQRT(p0007*EXP(p0463^2*p0008)-p0007))
- p2854: 5.22831e-5; = p2268*(p1079+p1081)
- p5178: 2.29188e-9; = p1799*p3484
- p0987: 0; = if(p0978>0;0;if(and(p0687=0;p0691=0;p0695=0;p0699=0);0;IF(p0982+p0985+p0986=1;0;1-(p0982+p0985+p0986))))
- p0546: 0; = IF(p0282<0.5;-SQRT(p0007*EXP(p0414^2*p0008)-p0007);SQRT(p0007*EXP(p0414^2*p0008)-p0007))
- p1739: 0
- p1896: 0
- p2590: 0; = p2394*p1014
- p1139: 0; = if(p1121=0;p1133*p0001/(p0818*p0002);0)
- p0811: 0; = if(p0807=480;1-p0810;0)
- p1264: 0.14149; = if(p1232>0;0;IF(p1259+p1263=1;0;IF(p1259+p1263+p1261>1;1-(p1259+p1263);p1261)))
- p2733: 0; = p2342*(p1078+p1080)
- p3470: 0.00239057; = p3375*p1241
- p1853: 0
- p1577: 0
- p0827: 0; = p0818*p0819*p0823
- p2235: 0; = 1-(p2226+p2227+p2228+p2229)
- p0768: 0
- p3015: 0; = p2429*(p1129+p1131)
- p2087: 0.856281
- p1672: 0
- p1681: 0
- p0749: 6.114; = p0089*(1+p0617*p0221/100)
- p4922: 0; = p1955*p3482
- p1798: 0
- p0890: 0; = p0686*1000*p0687*p0885/100
- p3055: 0; = p2274*p1132
- p4354: 0; = p1799*p3480
- p0606: 0; = IF(p0342<0.5;-SQRT(p0007*EXP(p0474^2*p0008)-p0007);SQRT(p0007*EXP(p0474^2*p0008)-p0007))
- p2231: 0.501024; = if(p0783*p0787+p0784*p0788+p0785*p0789+p0786*p0790=0;0;p0788*p0784/(p0783*p0787+p0784*p0788+p0785*p0789+p0786*p0790))
- p0789: 0
- p4917: 0; = p1950*p3482
- p0964: 0; = 56/90000
- p0877: 0.0873533; = p0876*p0001*p0003/(p0818*p0002)
- p2740: 0; = p2349*(p1078+p1080)
- p2789: 0; = p2398*(p1019+p1021)
- p3445: 0; = p3369*p1240
- p0544: 0; = IF(p0280<0.5;-SQRT(p0007*EXP(p0412^2*p0008)-p0007);SQRT(p0007*EXP(p0412^2*p0008)-p0007))
- p1788: 0
- p3461: 0; = p3366*p1241
- p1074: 0.29875; = IF(p1071=0;p0712/100;0)
- p2640: 9.05492e-6; = p2249*(p1019+p1021)
- p2461: 0; = p2265*p1073
- p3022: 3.78815e-6; = p2241*p1023
- p0843: 0.053185
- p2811: 0; = p2420*(p1078+p1080)
- p1167: 0.5
- p1679: 0
- p0637: 0; = IF(p0373<0.5;-SQRT(p0007*EXP(p0505^2*p0008)-p0007);SQRT(p0007*EXP(p0505^2*p0008)-p0007))
- p3040: 0; = p2259*p1082
- p2543: 0; = p2347*p1073
- p2939: 0; = p2353*(p1129+p1131)
- p2553: 0; = p2357*p1014
- p2081: 0.0019
- p2089: 0.40001
- p2074: 0.025
- p1806: 0
- p2886: 0.00123754; = p2300*(p1079+p1081)
- p2817: 0; = p2426*(p1078+p1080)
- p2728: 0; = p2337*(p1078+p1080)
- p1651: 0.299611
- p0961: 0; = if(and(p0683>0;or(p0807=480;p0807=32;p0807=1;and(p0807=60;p0901<0.03)));p0937;0)
- p2963: 0; = p2377*(p1079+p1081)
- p3167: 0; = p2386*p1082
- p1043: 0.262961
- p1246: 326816; = if(p1232>0;0;p1241*(p0725/100)*p0723*1000)
- p3182: 0; = p2401*p1023
- p3232: 3.99687e-8; = p1182/p0818
- p1590: 0
- p2310: 0.000302125; = p2227*p2217
- p2402: 0; = p2234*p2191
- p3383: 0; = p3364*p1234
- p1630: 0
- p3455: 0; = p3379*p1240
- p2776: 0; = p2385*(p1078+p1080)
- p1627: 0
- p1193: 0; = IF(OR(p1036=0;p1095=0);0.0001*p0857;0)
- p0150: 0
- p1032: 4.54232e-5; = IF(p1012=0;p1026*p0001/(p0818*p0002);0)
- p0998: 0; = if(p0888=0;0;if((p0699*p0698*1000*p0700/100)/p0888>1;1;(p0699*p0698*1000*p0700/100)/p0888))
- p0158: 0
- p1286: 0; = p1282*p1252/p0818
- p0863: 0; = p0675*1000/p0856
- p0446: 0; = SQRT(2)*(IF((2*p0314-1)<0;-1;IF((2*p0314-1)>0;1;0))*SQRT(SQRT((2/(pi()*0.140012289)+LN(1-(2*p0314-1)^2)/2)^2-LN(1-(2*p0314-1)^2)/0.140012289)-(2/(pi()*0.140012289)+LN(1-(2*p0314-1)^2)/2)))
- p1080: 0; = IF(p1071=0;IF(p1073+p1078+p1079=1;0;IF(p1073+p1078+p1079+p1076>1;1-(p1073+p1078+p1079);p1076));0)
- p1100: 0.338023
- p0800: 37.413; = p0140*(1+p0668*p0272/100)
- p0814: 0; = if(p0807=480;p0810*p0812+p0811*p0813;0)
- p2989: 0; = p2403*(p1020+p1022)
- p0081: 1.217
- p2697: 4.92068e-6; = p2306*(p1078+p1080)
- p2688: 0.000216809; = p2297*(p1078+p1080)
- p2096: 0.486404
- p2626: 0; = p2430*p1123
- p2250: 0.000350038; = p2222*p2196
- p3462: 0; = p3367*p1241
- p2955: 0; = p2369*(p1020+p1022)
- p2692: 0.000126406; = p2301*(p1078+p1080)
- p2816: 0; = p2425*(p1078+p1080)
- p3253: 0; = p1252*(p1277*(1-p3247)+p1280*(1-p3248)+p1281*(1-p3249)+p1282*(1-p3250))
- p0677: 0
- p3299: 0; = if(p1303+p1304+p1305+p1306=0;0;p1303/(p1303+p1304+p1305+p1306))
- p1576: 0
- p0836: 7.14102e8; = p0831*p0835*p0801/(1-p0831)
- p0464: 0; = SQRT(2)*(IF((2*p0332-1)<0;-1;IF((2*p0332-1)>0;1;0))*SQRT(SQRT((2/(pi()*0.140012289)+LN(1-(2*p0332-1)^2)/2)^2-LN(1-(2*p0332-1)^2)/0.140012289)-(2/(pi()*0.140012289)+LN(1-(2*p0332-1)^2)/2)))
- p2820: 0; = p2429*(p1128+p1130)
- p4416: 0; = p1861*p3480
- p0891: 226512; = IF(p3251=0;0;62.4*6272640/(12*12*12))
- p1923: 0
- p5235: 1.28762e-7; = p1856*p3484
- p3361: 8.29812e7; = if(p1232=0;p3311+p3322+p3333+p3344+p3355;0)
- p1228: 0.0601716; = IF(p1221=0;0;p0801*p1212*2000/(p1222+p1221*p1225)/p0818)
- p4204: 1.96403e-5; = p1855*p3479
- p1151: 2.58845e7; = if(p1121=0;p1149*p1148*p1145;0)
- p0805: 0
- p3030: 4.29322e-6; = p2249*p1023
- p1247: 0; = if(p1232>0;0;p1242*p0001/(p0818*p0002))
- p2833: 1.91492e-5; = p2247*(p1020+p1022)
- p3168: 0; = p2387*p1082
- p3074: 3.21357e-5; = p2293*p1023
- p2232: 0; = if(p0783*p0787+p0784*p0788+p0785*p0789+p0786*p0790=0;0;p0789*p0785/(p0783*p0787+p0784*p0788+p0785*p0789+p0786*p0790))
- p3447: 0; = p3371*p1240
- p1336: 0; = p1323*p0801
- p2487: 0; = p2291*p1014
- p3327: 0; = if(and(p1232=0;p3255<>0);1-(p3323+p3324+p3325+p3326);0)
- p2743: 0; = p2352*(p1128+p1130)
- p2029: 6.19
- p3530: 0; = p1799*p3476
- p2384: 0; = p2229*p2213
- p2755: 0; = p2364*(p1019+p1021)
- p1209: 88.3753; = p1206*p0818*p0822/p0801
- p4758: 0; = p1791*p3482
- p0511: 0; = SQRT(2)*(IF((2*p0379-1)<0;-1;IF((2*p0379-1)>0;1;0))*SQRT(SQRT((2/(pi()*0.140012289)+LN(1-(2*p0379-1)^2)/2)^2-LN(1-(2*p0379-1)^2)/0.140012289)-(2/(pi()*0.140012289)+LN(1-(2*p0379-1)^2)/2)))
- p2813: 0; = p2422*(p1078+p1080)
- p1599: 0
- p2564: 0; = p2368*p1014
- p2809: 0; = p2418*(p1078+p1080)
- p2490: 0; = p2294*p1014
- p0941: 0; = if(and(p0683=0;p0947=0);p0935;0)
- p2999: 0; = p2413*(p1020+p1022)
- p1652: 0.6885
- p2269: 0.000281354; = p2226*p2215
- p0480: 0; = SQRT(2)*(IF((2*p0348-1)<0;-1;IF((2*p0348-1)>0;1;0))*SQRT(SQRT((2/(pi()*0.140012289)+LN(1-(2*p0348-1)^2)/2)^2-LN(1-(2*p0348-1)^2)/0.140012289)-(2/(pi()*0.140012289)+LN(1-(2*p0348-1)^2)/2)))
- p0484: 0; = SQRT(2)*(IF((2*p0352-1)<0;-1;IF((2*p0352-1)>0;1;0))*SQRT(SQRT((2/(pi()*0.140012289)+LN(1-(2*p0352-1)^2)/2)^2-LN(1-(2*p0352-1)^2)/0.140012289)-(2/(pi()*0.140012289)+LN(1-(2*p0352-1)^2)/2)))
- p2799: 0; = p2408*(p1019+p1021)
- p1713: 0
- p1880: 0
- p3396: 0; = p3377*p1234
- p1667: 0
- p2736: 0; = p2345*(p1078+p1080)
- p0400: 0.5
- p0962: 0; = if(and(p0683>0;or(p0807=480;p0807=32;p0807=1;and(p0807=60;p0901<0.03)));p0938;0)
- p1041: 0.302596
- p1878: 0
- p0741: 1.217; = p0081*(1+p0609*p0213/100)
- p3942: 1.49002e-7; = p1799*p3478
- p3357: 9.3797e7; = if(p1232=0;p3307+p3318+p3329+p3340+p3351;0)
- p2660: 8.40546e-5; = p2269*(p1078+p1080)
- p0934: 2.85618e-5; = p0928*p0001/(p0818*p0002)
- p1304: 0; = p1300*p1252/p0818
- p3004: 0; = p2418*(p1079+p1081)
- p1142: 0; = if(p1121=0;p1136*p0001/(p0818*p0002);0)
- p1224: 0.44; = IF(p1221=0;0;IF(p1193=0;1-p1223;0))
- p1033: 0; = IF(p1012=0;p1027*p0001/(p0818*p0002);0)
- p3049: 0; = p2268*p1082
- p1699: 0.762907
- p2519: 0; = p2323*p1014
- p3382: 0; = p3363*p1234
- p1620: 0
- p1085: 2.1106e6; = IF(p1071=0;p1079*(p0710/100)*p0703*1000;0)
- p1631: 0.5
- p2498: 0; = p2302*p1073
- p1702: 0
- p2621: 0; = p2425*p1073
- p0616: 0; = IF(p0352<0.5;-SQRT(p0007*EXP(p0484^2*p0008)-p0007);SQRT(p0007*EXP(p0484^2*p0008)-p0007))
- p2608: 0; = p2412*p1014
- p1061: 0.3
- p0976: 148843; = IF(p0687=0;IF(OR(p0686=0;p0689=0);0;p0686*1000*p0689/100);0)
- p2319: 0; = p2224*p2186
- p0667: 0; = IF(p0403<0.5;-SQRT(p0007*EXP(p0535^2*p0008)-p0007);SQRT(p0007*EXP(p0535^2*p0008)-p0007))
- p0532: 0; = SQRT(2)*(IF((2*p0400-1)<0;-1;IF((2*p0400-1)>0;1;0))*SQRT(SQRT((2/(pi()*0.140012289)+LN(1-(2*p0400-1)^2)/2)^2-LN(1-(2*p0400-1)^2)/0.140012289)-(2/(pi()*0.140012289)+LN(1-(2*p0400-1)^2)/2)))
- p1865: 0
- p3394: 0; = p3375*p1234
- p0311: 0.5
- p0794: 0.043; = p0134*(1+p0662*p0266/100)
- p1951: 0
- p2568: 0; = p2372*p1014
- p0796: 21.085; = p0136*(1+p0664*p0268/100)
- p0379: 0.5
- p1994: 750
- p1668: 0
- p3313: 0; = if(and(p1232=0;p3253<>0);p3262*(p3278*(p3282*p1256+p3286*(p1253+p1257)+p1258*p3288+p3298*p3287));0)
- p2088: 0.798875
- p3999: 8.37121e-6; = p1856*p3478
- p3246: 1; = IF(p3244+p3245=1;0;1-(p3244+p3245))
- p1638: 0
- p2630: 9.22277e-7; = p2239*(p1019+p1021)
- p2588: 0; = p2392*p1123
- p2038: 0.304457
- p2778: 0; = p2387*(p1078+p1080)
- p2477: 0; = p2281*p1014
- p2862: 0.000217281; = p2276*(p1020+p1022)
- p1146: 0.924093
- p2486: 0; = p2290*p1014
- p3238: 0.854735; = IF(p3237+p3235+p3236>1;1-(p3235+p3236);p3237)
- p0780: 0
- p1094: 0; = IF(p1071=0;p1088*p0001/(p0818*p0002);0)
- p0774: 55.22; = p0114*(1+p0642*p0246/100)
- p0688: 0
- p4733: 0; = p1766*p3482
- p3419: 0; = p3362*p1239
- p3199: 0; = p2418*p1082
- p2492: 0; = p2296*p1014
- p2244: 1.3194e-5; = p2222*p2189
- p0349: 0.5
- p1283: 0; = p1277*p1252/p0818
- p0750: 0
- p0753: 0
- p3279: 0.37
- p0861: 0.0251416; = p0673*1000/p0856
- p1797: 0
- p1831: 0
- p2604: 0; = p2408*p1014
- p0717: 0
- p3113: 0; = p2332*p1023
- p3377: 0.00448551; = if(p1232=0;p3246*p3359/p0818;0)
- p3335: 0.0141479; = IF(or(p3254=0;p1232>0);0;p3270*(p3280*(p3283*p1256+p3286*(p1253+p1257)+p1258*p3288+p3300*p3287)))
- p3442: 0; = p3366*p1240
- p2014: 2.17952e7; = p0833*p2011*p2013
- p5228: 1.66682e-8; = p1849*p3484
- p3302: 0; = if(and(p1232=0;p3252<>0);p3258*(p3278*(p3282*p1256+p3286*(p1253+p1257)+p1258*p3288+p3297*p3287));0)
- p3336: 0.000977444; = IF(or(p3254=0;p1232>0);0;p3271*p3289)
- p5133: 1.4168e-7; = p1754*p3484
- p0958: 0; = if(and(p0683>0;or(p0807=480;p0807=32;p0807=1;and(p0807=60;p0901<0.03)));p0934;0)
- p1045: 0.057234; = IF(p1012=0;IF(p1037+p1044=1;0;IF(p1037+p1044+p1039>1;1-(p1037+p1044);p1039));0)
- p0944: 0; = if(and(p0683=0;p0950=0);p0938;0)
- p2493: 0; = p2297*p1073
- p0505: 0; = SQRT(2)*(IF((2*p0373-1)<0;-1;IF((2*p0373-1)>0;1;0))*SQRT(SQRT((2/(pi()*0.140012289)+LN(1-(2*p0373-1)^2)/2)^2-LN(1-(2*p0373-1)^2)/0.140012289)-(2/(pi()*0.140012289)+LN(1-(2*p0373-1)^2)/2)))
- p3177: 0; = p2396*p1023
- p2298: 0.00065636; = p2227*p2205
- p0985: 0; = IF(p0982=1;0;IF(p0982+p0983>1;1-p0982;p0983))
- p3097: 0; = p2316*p1023
- p0845: 0.5
- p0283: 0.5
- p0730: 0
- p0866: 0.0251416; = IF(p0858+p0864+p0865=1;0;IF(p0858+p0864+p0865+p0861>1;1-(p0858+p0864+p0865);p0861))
- p0913: 0.00989994
- p0398: 0.5
- p2625: 0; = p2429*p1123
- p2706: 0; = p2315*(p1019+p1021)
- p2093: 0.260958
- p1021: 0; = IF(p1012=0;IF(p1014+p1019+p1020=1;0;IF(p1014+p1019+p1020+p1017>1;1-(p1014+p1019+p1020);p1017));0)
- p3071: 5.5734e-8; = p2290*p1023
- p2238: 4.14604e-5; = p2222*p2183
- p2065: 0.0758824
- p1986: 4200
- p0656: 0; = IF(p0392<0.5;-SQRT(p0007*EXP(p0524^2*p0008)-p0007);SQRT(p0007*EXP(p0524^2*p0008)-p0007))
- p3266: 0.0545989
- p2193: 0.000470202; = p1054/p0818
- p1180: 6.24757e-8; = p1176*p1179/p0818
- p3125: 0; = p2344*p1082
- p2936: 0; = p2350*(p1129+p1131)
- p0921: 0.225851; = p0679*1000/p0801
- p1765: 0
- p1575: 0
- p0399: 0.5
- p1096: 0.00125835
- p2154: 9.1008e-8; = p2015*p2082*p2116/(p0818*1000)
- p0188: 48.698
- p0067: 23.798
- p0022: 10548.7
- p0386: 0.5
- p0223: 45.342
- p3338: 0.742084; = if(and(p1232=0;p3254<>0);1-(p3334+p3335+p3336+p3337);0)
- p1200: 0.84
- p2259: 0.000723735; = p2226*p2205
- p2508: 0; = p2312*p1123
- p4309: 0; = p1754*p3480
- p2528: 0; = p2332*p1014
- p0535: 0; = SQRT(2)*(IF((2*p0403-1)<0;-1;IF((2*p0403-1)>0;1;0))*SQRT(SQRT((2/(pi()*0.140012289)+LN(1-(2*p0403-1)^2)/2)^2-LN(1-(2*p0403-1)^2)/0.140012289)-(2/(pi()*0.140012289)+LN(1-(2*p0403-1)^2)/2)))
- p0787: 50.454; = p0127*(1+p0655*p0259/100)
- p2967: 0; = p2381*(p1079+p1081)
- p2139: 1.98816e-7; = p2015*p2067*p2101/(p0818*1000)
- p3017: 0; = p2431*(p1129+p1131)
- p2092: 0.54529
- p1728: 0.836335
- p1859: 0
- p2346: 0; = p2228*p2214
- p3364: 0; = if(p1232=0;p3244*p3358/p0818;0)
- p2142: 1.65399e-7; = p2015*p2070*p2104/(p0818*1000)
- p0110: 56.416
- p2048: 7.17777e-15; = p2015*p2046/(p0818*1000000000000)
- p2376: 0; = p2229*p2205
- p0010: 9450.16
- p2861: 0.000535554; = p2275*(p1129+p1131)
- p1383: 14
- p0584: 0; = IF(p0320<0.5;-SQRT(p0007*EXP(p0452^2*p0008)-p0007);SQRT(p0007*EXP(p0452^2*p0008)-p0007))
- p0058: 35.051
- p2090: 0.40001
- p1213: 56
- p1554: 0
- p1001: 0; = if(p0978>0;0;if(and(p0687=0;p0691=0;p0695=0;p0699=0);0;IF(p0996+p0999+p1000=1;0;1-(p0996+p0999+p1000))))
- p3348: 0.00443516; = if(and(p1232=0;p3256<>0);p3276*p3289;0)
- p2636: 3.86181e-6; = p2245*(p1019+p1021)
- p2032: 0.448886
- p0935: 0.000108371; = p0929*p0001/(p0818*p0002)
- p2859: 0.00528725; = p2273*(p1129+p1131)
- p2754: 0; = p2363*(p1019+p1021)
- p2759: 0; = p2368*(p1019+p1021)
- p0369: 0.5
- p1072: 0; = p1071*p0001/(p0818*p0002)
- p3371: 0; = if(p1232=0;p3245*p3359/p0818;0)
- p1116: 3.79445e-5; = IF(p1071=0;p1106/(p1111*p0818);0)
- p1174: 1.05072e-7; = p1170*p1173/p0818
- p3267: 0.0170629
- p2922: 0; = p2336*(p1079+p1081)
- p2415: 0; = p2235*p2205
- p1963j: 2.82681e-6; = p1725*p1929+p1726*p1930+p1727*p1931+p1728*p1932+p1729*p1933+p1730*p1934+p1731*p1935+p1732*p1936+p1733*p1937+p1734*p1938+p1735*p1939+p1736*p1940+p1737*p1941+p1738*p1942+p1739*p1943+p1740*p1944+p1741*p1945+p1742*p1946+p1743*p1947
- p2551: 0; = p2355*p1014
- p1552: 0
- p3388: 0; = p3369*p1234
- p1640: 0
- p2518: 0; = p2322*p1014
- p2656: 0.000356383; = p2265*(p1078+p1080)
- p3691: 0; = p1754*p3477
- p1771: 0
- p1568: 0
- p1113: 0.100377
- p2505: 0; = p2309*p1073
- p4806: 0; = p1839*p3482
- p1584: 0
- p2341: 0; = p2228*p2209
- p0703: 10548.7; = p0043*(1+p0571*p0175/100)
- p3061: 6.99441e-6; = p2280*p1023
- p1342: 0; = p1326*p0801
- p1087: 0; = IF(p1071=0;p1081*(p0710/100)*p0703*1000;0)
- p1963k: 1.71325e-5; = p1744*p1948+p1745*p1949+p1746*p1950+p1747*p1951+p1748*p1952+p1749*p1953+p1750*p1954+p1751*p1955+p1752*p1956+p1753*p1957+p1961*p1962
- p1777: 0
- p0733: 0
- p2215: 0.000536516; = p1117-p2214
- p1207: 26.122; = if(p1193>0;0;(p1194*p1050/p1057+p1195*p1051/p1058+p1196*p1052/p1059+p1197*p1053/p1060+p1198*p1054/p1061+p1199*p1055/p1062+p1200*p1056/p1063)/(p0702*1000)+(p1201*p1109/p1114+p1202*p1110/p1115)/(p0702*1000)+p1203*p1170/p0801+p1204*p1176/p0801)
- p2953: 0; = p2367*(p1020+p1022)
- p0137: 54.54
- p1622: 0
- p3268: 0.0232481
- p2299: 0.000212546; = p2227*p2206
- p0190: 47.218
- p1335: 4.36816e-5; = p1334*p0001/(p0818*p0002)
- p0704: 21.085; = p0044*(1+p0572*p0176/100)
- p2422: 0; = p2235*p2212
- p2178: 0.0314446; = (p0895*p0831/(1-p0831))/(p0818)
- p2649: 0.000239065; = p2258*(p1078+p1080)
- p0936: 0.000130361; = p0930*p0001/(p0818*p0002)
- p2497: 0; = p2301*p1073
- p3249: 0
- p3440: 0; = p3364*p1240
- p2391: 0; = p2233*p2220
- p2194: 0.214362
- p2253: 8.98455e-7; = p2222*p2199
- p3363: 0; = if(p1232=0;p3244*p3357/p0818;0)
- p3130: 0; = p2349*p1082
- p1809: 0
- p0792: 0
- p0329: 0.5
- p2669: 1.70288e-6; = p2278*(p1019+p1021)
- p0807: 60
- p1645: 0.61461
- p1144: 0; = if(p1121=0;p1138*p0001/(p0818*p0002);0)
- p3088: 0; = p2307*p1082
- p1582: 0
- p2083: 2.17294
- p1256: 0; = if(p1232>0;0;IF(p1253=1;0;IF(p1253+p1254>1;1-p1253;p1254)))
- p0818: 2.7219e10; = p0806*p0807
- p2928: 0; = p2342*(p1079+p1081)
- p2824: 2.58319e-5; = p2238*(p1020+p1022)
- p1327: 0.0117407; = if(p1318=0;if(p1327a=0;1;if(p1327a<0;0;p1327a));0)
- p2585: 0; = p2389*p1123
- p1027: 0; = IF(p1012=0;p1021*(p0704/100)*p0703*1000;0)
- p2242: 4.49687e-6; = p2222*p2187
- p2008: 0.0314933; = ((p1982*p1985+p1988*p1991+p1994*p1997+p2002*p2005)/p0818)*p0005*p0002/1000
- p2972: 0; = p2386*(p1079+p1081)
- p1564: 0
- p2425: 0; = p2235*p2215
- p3333: 0; = if(and(p1232=0;p3255<>0);p3255-(p3328+p3329+p3330+p3331+p3332);0)
- p3020: 4.3728e-7; = p2239*p1023
- p3429: 0; = p3372*p1239
- p2932: 0; = p2346*(p1079+p1081)
- p1141: 8.40188e-5; = if(p1121=0;p1135*p0001/(p0818*p0002);0)
- p3281: 0.46
- p1226: 1.06e7; = IF(p1221=0;0;IF(p1193=0;p0801;0))
- p2783: 0; = p2392*(p1128+p1130)
- p2329: 0; = p2224*p2197
- p4762: 0; = p1795*p3482
- p1164: 37636.5; = p1163*p0801
- p0666: 0; = IF(p0402<0.5;-SQRT(p0007*EXP(p0534^2*p0008)-p0007);SQRT(p0007*EXP(p0534^2*p0008)-p0007))
- p2556: 0; = p2360*p1014
- p0152: 0
- p1583: 0
- p1933: 0
- p2575: 0; = p2379*p1073
- p1716: 0
- p2213: 3.46325e-5; = p1116-p2212
- p0476: 0; = SQRT(2)*(IF((2*p0344-1)<0;-1;IF((2*p0344-1)>0;1;0))*SQRT(SQRT((2/(pi()*0.140012289)+LN(1-(2*p0344-1)^2)/2)^2-LN(1-(2*p0344-1)^2)/0.140012289)-(2/(pi()*0.140012289)+LN(1-(2*p0344-1)^2)/2)))
- p1078: 0.29875; = IF(p1071=0;IF(p1073=1;0;IF(p1073+p1074>1;1-p1073;p1074));0)
- p0734: 0
- p3895: 0; = p1962*p3477
- p2782: 0; = p2391*(p1128+p1130)
- p1447: 8803
- p1332: 8.09097e6; = p1321*p0801
- p1018: 0; = IF(p1012=0;p0709/100;0)
- p1036: 4.22954e7; = IF(p1012=0;p0795*p0702*1000*p0796/100;0)
- p1726: 0
- p1068: 0.00156734; = IF(p1012=0;p1054/(p1061*p0818);0)
- p2110: 0.856281
- p3218: 0.022649; = p3214*p1228
- p1614: 0
- p2277: 7.65522e-5; = p2223*p2183
- p0781: 0
- p3048: 0; = p2267*p1082
- p1269: 0
- p3869: 0; = p1932*p3477
- p1558: 0
- p0879: 0; = p0878*p0001*p0003/(p0818*p0002)
- p0791: 0
- p1914: 0
- p3663: 0; = p1932*p3476
- p1696: 0
- p0109: 34.143
- p3185: 0; = p2404*p1023
- p2663: 0.0020248; = p2272*(p1128+p1130)
- p1088: 0; = IF(p1071=0;p1082*(p0710/100)*p0703*1000;0)
- p5214: 7.29236e-9; = p1835*p3484
- p3346: 0.0178625; = if(and(p1232=0;p3256<>0);p3274*(p3281*(p3285*p1256+p3286*(p1253+p1257)+p1258*p3288));0)
- p0487: 0; = SQRT(2)*(IF((2*p0355-1)<0;-1;IF((2*p0355-1)>0;1;0))*SQRT(SQRT((2/(pi()*0.140012289)+LN(1-(2*p0355-1)^2)/2)^2-LN(1-(2*p0355-1)^2)/0.140012289)-(2/(pi()*0.140012289)+LN(1-(2*p0355-1)^2)/2)))
- p1249: 1.05468e-6; = if(p1232>0;0;p1244*p0001/(p0818*p0002))
- p1603: 0
- p0530: 0; = SQRT(2)*(IF((2*p0398-1)<0;-1;IF((2*p0398-1)>0;1;0))*SQRT(SQRT((2/(pi()*0.140012289)+LN(1-(2*p0398-1)^2)/2)^2-LN(1-(2*p0398-1)^2)/0.140012289)-(2/(pi()*0.140012289)+LN(1-(2*p0398-1)^2)/2)))
- p1674: 0
- p1845: 0
- p1618: 0
- p2453: 0; = p2257*p1014
- p4487: 0; = p1932*p3480
- p1171: 0.000347445; = p0801*p0001/(p0818*p0002)
- p2742: 0; = p2351*(p1128+p1130)
- p1091: 6.91809e-5; = IF(p1071=0;p1085*p0001/(p0818*p0002);0)
- p0839: 0.785618; = p0838/p0818
- p1979: 7.36956e8; = p0973
- p1563: 0
- p0905: 0.0983707; = p0904/p0818
- p2979: 0; = p2393*(p1020+p1022)
- p1911: 0
- p1727: 0
- p3801: 0; = p1864*p3477
- p2720: 0; = p2329*(p1019+p1021)
- p1916: 0
- p1844: 0
- p3892: 0; = p1955*p3477
- p2802: 0; = p2411*(p1019+p1021)
- p1932: 3.37999e-6; = p1524*1000/p0818
- p0983: 0; = if(p0886=0;0;min(1;(p0695*p0694*1000*p0697/100)/p0886))
- p2396: 0; = p2234*p2185
- p2898: 0.00530895; = p2312*(p1129+p1131)
- p1296: 0.0529602; = p1292*p1252/p0818
- p3418: 0.0779421; = p3380*p1238
- p1234: 0; = if(p1232>0;0;p0726/100)
- p0213: 26.356
- p3035: 1.74046e-5; = p2254*p1023
- p1053: 1.02222e6; = IF(p1012=0;p1046*p1036;0)
- p2288: 6.53824e-5; = p2223*p2195
- p2991: 0; = p2405*(p1020+p1022)
- p2128: 5.96868e-7; = p2015*p2056*p2090/(p0818*1000)

- p3311: 0; = if(and(p1232=0;p3252<>0);p3252-(p3306+p3307+p3308+p3309+p3310);0)
- p2220: 0.00095097; = p1151/p0818
- p0747: 0
- p2843: 6.3269e-5; = p2257*(p1020+p1022)
- p0652: 0; = IF(p0388<0.5;-SQRT(p0007*EXP(p0520^2*p0008)-p0007);SQRT(p0007*EXP(p0520^2*p0008)-p0007))
- p2583: 0; = p2387*p1073
- p1123: 0; = if(p1121=0;p0717/100;0)
- p2723: 0; = p2332*(p1019+p1021)
- p3157: 0; = p2376*p1082
- p2208: 0.000889668; = p1110/p0818
- p1279: 0
- p3580: 0; = p1849*p3476
- p0779: 48.43; = p0119*(1+p0647*p0251/100)
- p2078: 0.117
- p3410: 0; = p3372*p1238
- p1580: 0
- p3141: 0; = p2360*p1023
- p0211: 26.94
- p2849: 0.000147949; = p2263*(p1079+p1081)
- p0020: 871.375
- p3689: 0; = p1962*p3476
- p0981: 0; = p0978*p0001/(p0818*p0002)
- p1819: 0
- p3209: 0; = p2428*p1132
- p1793: 0
- p3166: 0; = p2385*p1082
- p2001: 400
- p0888: 0; = p0686*1000*p0687*p0884/100
- p0364: 0.5
- p2156: 1.63424e-8; = p2015*p2085*p2118/(p0818*1000)
- p1616: 0
- p2173: 0.124066; = p0895*p0898/p0818
- p3198: 0; = p2417*p1082
- p3062: 1.00665e-6; = p2281*p1023
- p2295: 1.63549e-5; = p2223*p2202
- p1863: 0
- p2222: 0.351322; = if(p0765*p0769+p0766*p0770+p0767*p0771+p0768*p0772=0;0;p0769*p0765/(p0765*p0769+p0766*p0770+p0767*p0771+p0768*p0772))
- p1857: 0
- p1993: 400
- p1846: 0
- p2275: 0.000824576; = p2230*p2221
- p1235: 0.23798; = if(p1232>0;0;p0727/100)
- p0950: 0; = if(and(p0683=0;or(p0807=480;p0807=32;p0807=1;and(p0807=60;p0901<0.03)));p0938;0)
- p3102: 0; = p2321*p1023
- p2502: 0; = p2306*p1073
- p1741: 0
- p3179: 0; = p2398*p1023
- p0795: 19.016; = p0135*(1+p0663*p0267/100)
- p0478: 0; = SQRT(2)*(IF((2*p0346-1)<0;-1;IF((2*p0346-1)>0;1;0))*SQRT(SQRT((2/(pi()*0.140012289)+LN(1-(2*p0346-1)^2)/2)^2-LN(1-(2*p0346-1)^2)/0.140012289)-(2/(pi()*0.140012289)+LN(1-(2*p0346-1)^2)/2)))
- p2189: 3.75554e-5; = p1053/p0818
- p2764: 0; = p2373*(p1019+p1021)
- p2874: 4.07365e-5; = p2288*(p1020+p1022)
- p1189: 0.000347445; = p0801*p0001/(p0818*p0002)
- p1823: 0
- p0868: 0; = IF(p0858+p0864+p0865+p0866+p0867=1;0;IF(p0858+p0864+p0865+p0866+p0867+p0863>1;1-(p0858+p0864+p0865+p0866+p0867);p0863))
- p3463: 0; = p3368*p1241
- p2910: 0; = p2324*(p1020+p1022)
- p2338: 0; = p2228*p2206
- p3840: 0; = p1903*p3477
- p0764: 21.085; = p0104*(1+p0632*p0236/100)
- p3053: 0; = p2272*p1132
- p0894: 0.19
- p0414: 0; = SQRT(2)*(IF((2*p0282-1)<0;-1;IF((2*p0282-1)>0;1;0))*SQRT(SQRT((2/(pi()*0.140012289)+LN(1-(2*p0282-1)^2)/2)^2-LN(1-(2*p0282-1)^2)/0.140012289)-(2/(pi()*0.140012289)+LN(1-(2*p0282-1)^2)/2)))
- p3260: 0.0343561
- p2541: 0; = p2345*p1073
- p0647: 0; = IF(p0383<0.5;-SQRT(p0007*EXP(p0515^2*p0008)-p0007);SQRT(p0007*EXP(p0515^2*p0008)-p0007))
- p3321: 0; = if(and(p1232=0;p3253<>0);IF((p3317+p3318+p3319+p3320)+(p3253*(p3261*(1-p3277))/p3316)>p3253;p3253-(p3317+p3318+p3319+p3320);p3253*(p3261*(1-p3277))/p3316);0)
- p0199: 143.227
- p2516: 0; = p2320*p1014
- p1669: 0
- p1789: 0
- p3001: 0; = p2415*(p1079+p1081)
- p2790: 0; = p2399*(p1019+p1021)
- p2464: 0; = p2268*p1073
- p1106: 90148; = IF(p1071=0;p1105*p1096*p1095;0)
- p1635: 0.921542
- p2103: 0.912485
- p1547: 148
- p2710: 0; = p2319*(p1019+p1021)
- p3475: 0.227204; = p3380*p1241
- p1872: 0
- p4419: 0; = p1864*p3480
- p2561: 0; = p2365*p1014
- p3172: 0; = p2391*p1132
- p0140: 37.413
- p2531: 0; = p2335*p1014
- p0084: 1.331
- p1807: 0
- p2875: 0.000402681; = p2289*(p1020+p1022)
- p0922: 0; = p0677*1000/p0801
- p1790: 0
- p3296: 0.514
- p1649: 0
- p3153: 0; = p2372*p1023
- p1744: 0
- p1453: 19
- p2290: 4.597e-7; = p2223*p2197
- p1815: 0
- p2713: 0; = p2322*(p1019+p1021)
- p0443: 0; = SQRT(2)*(IF((2*p0311-1)<0;-1;IF((2*p0311-1)>0;1;0))*SQRT(SQRT((2/(pi()*0.140012289)+LN(1-(2*p0311-1)^2)/2)^2-LN(1-(2*p0311-1)^2)/0.140012289)-(2/(pi()*0.140012289)+LN(1-(2*p0311-1)^2)/2)))
- p2914: 0; = p2328*(p1020+p1022)
- p1673: 0
- p2155: 8.82011e-8; = p2015*p2084*p2117/(p0818*1000)
- p0867: 0; = IF(p0858+p0864+p0865+p0866=1;0;IF(p0858+p0864+p0865+p0866+p0862>1;1-(p0858+p0864+p0865+p0866);p0862))
- p2847: 0.00136457; = p2261*(p1079+p1081)
- p1062: 0.16
- p1900: 0
- p2591: 0; = p2395*p1014
- p2115: 0.856281
- p0572: 0; = IF(p0308<0.5;-SQRT(p0007*EXP(p0440^2*p0008)-p0007);SQRT(p0007*EXP(p0440^2*p0008)-p0007))
- p3075: 1.37773e-5; = p2294*p1023
- p1822: 0
- p2639: 4.22413e-5; = p2248*(p1019+p1021)
- p1340: 0; = p1325*p0801
- p1939: 0
- p2056: 2.07882
- p1598: 0
- p1813: 0
- p0185: 18.038
- p1009: 0; = p1005*p0001*p0004/(p0818*p0002)
- p2171: 0.0840251; = p2165*p0831
- p1258: 1; = if(p1232>0;0;IF(p1253+p1256+p1257=1;0;1-(p1253+p1256+p1257)))
- p0700: 0
- p2794: 0; = p2403*(p1019+p1021)
- p3421: 0; = p3364*p1239
- p0196: 47.127
- p0236: 50.795
- p1938: 0
- p1271: 0; = IF(p1267+p1270=p1259;0;IF(p1267+p1270+p1269>p1259;p1259-(p1267+p1270);p1269))
- p2995: 0; = p2409*(p1020+p1022)
- p1051: 279435; = IF(p1012=0;p1044*p1036;0)
- p1783: 0
- p2672: 2.12315e-6; = p2281*(p1019+p1021)
- p1837: 0
- p2607: 0; = p2411*p1014
- p0246: 12.75
- p2555: 0; = p2359*p1014
- p0537: 0; = IF(p0273<0.5;-SQRT(p0007*EXP(p0405^2*p0008)-p0007);SQRT(p0007*EXP(p0405^2*p0008)-p0007))
- p0342: 0.5
- p2665: 0.000166321; = p2274*(p1128+p1130)
- p3243: 5.71867e-10; = p3234*p1188*p3239/p0818
- p1278: 0
- p1035: 8.83895e-6; = IF(p1012=0;p1029*p0001/(p0818*p0002);0)
- p1227: 0.000347445; = IF(p1221=0;0;p1226*p0001/(p0818*p0002))
- p2394: 0; = p2234*p2183
- p2835: 2.20628e-5; = p2249*(p1020+p1022)
- p0681: 0
- p2730: 0; = p2339*(p1078+p1080)
- p1817: 0
- p3282: 0.3
- p3007: 0; = p2421*(p1079+p1081)
- p2801: 0; = p2410*(p1019+p1021)
- p2408: 0; = p2234*p2198
- p2969: 0; = p2383*(p1079+p1081)
- p4630: 4.35833e-7; = p1869*p3481
- p1929: 0
- p1694: 0
- p1083: 0; = IF(p1071=0;p1073*(p0710/100)*p0703*1000;0)
- p2977: 0; = p2391*(p1129+p1131)
- p0886: 0; = p0686*1000*p0687*p0689/100
- p1706: 0
- p3147: 0; = p2366*p1023
- p0519: 0; = SQRT(2)*(IF((2*p0387-1)<0;-1;IF((2*p0387-1)>0;1;0))*SQRT(SQRT((2/(pi()*0.140012289)+LN(1-(2*p0387-1)^2)/2)^2-LN(1-(2*p0387-1)^2)/0.140012289)-(2/(pi()*0.140012289)+LN(1-(2*p0387-1)^2)/2)))
- p3261: 0.908439
- p4720: 0.000105442; = p1963*p3481
- p3403: 0; = p3365*p1238
- p1707: 0
- p1595: 0.418143
- p3050: 0; = p2269*p1082
- p0001: 0.404686
- p2600: 0; = p2404*p1014
- p1119: 0.00706361; = IF(p1071=0;p1109/(p1114*p0818);0)
- p2354: 0; = p2225*p2182
- p2380: 0; = p2229*p2209
- p1028: 0; = IF(p1012=0;p1022*(p0704/100)*p0703*1000;0)
- p2624: 0; = p2428*p1123
- p2287: 0.00030501; = p2223*p2193
- p1010: 0; = p0890
- p2645: 3.67084e-5; = p2254*(p1019+p1021)
- p1683: 0
- p1266: 0.85851; = if(p1232>0;0;IF(p1259+p1263+p1264+p1265=1;0;1-(p1259+p1263+p1264+p1265)))
- p0719: 64.949; = p0059*(1+p0587*p0191/100)
- p2896: 0.000211865; = p2310*(p1079+p1081)
- p1722: 0
- p0788: 50.388; = p0128*(1+p0656*p0260/100)
- p0710: 28.532; = p0050*(1+p0578*p0182/100)
- p2442: 0; = p2246*p1014
- p2509: 0; = p2313*p1123
- p3190: 0; = p2409*p1023
- p4556: 6.64126e-7; = p1795*p3481
- p1963i: 0; = p1706*p1910+p1707*p1911+p1708*p1912+p1709*p1913+p1710*p1914+p1711*p1915+p1712*p1916+p1713*p1917+p1714*p1918+p1715*p1919+p1716*p1920+p1717*p1921+p1718*p1922+p1719*p1923+p1720*p1924+p1721*p1925+p1722*p1926+p1723*p1927+p1724*p1928
- p1794: 0
- p0065: 4.466
- p1240: 0; = if(p1232>0;0;IF(p1234+p1238+p1239=1;0;IF(p1234+p1238+p1239+p1237>1;1-(p1234+p1238+p1239);p1237)))
- p3772: 0; = p1835*p3477
- p4622: 3.94325e-7; = p1861*p3481
- p2141: 1.24828e-7; = p2015*p2069*p2103/(p0818*1000)
- p0701: 0
- p2572: 0; = p2376*p1073
- p1594: 0
- p3992: 1.08365e-6; = p1849*p3478
- p4515: 1.41127e-5; = p1754*p3481
- p1886: 0
- p4390: 0; = p1835*p3480
- p0367: 0.5
- p0307: 0.5
- p2905: 0; = p2319*(p1020+p1022)
- p2413: 0; = p2234*p2203
- p2614: 0; = p2418*p1073
- p0068: 6.83
- p2937: 0; = p2351*(p1129+p1131)
- p3352: 2.73057e7; = if(and(p1232=0;p3256<>0);p3256*(p3275-p3347)/p3349;0)
- p2426: 0; = p2235*p2216
- p3703: 0; = p1766*p3477
- p3208: 0; = p2427*p1082
- p3776: 0; = p1839*p3477
- p3026: 1.831e-6; = p2245*p1023
- p2894: 0.000178932; = p2308*(p1079+p1081)
- p2675: 7.1304e-6; = p2284*(p1019+p1021)
- p2506: 0; = p2310*p1073
- p0973: 7.36956e8; = p0967+p0968+p0969
- p3206: 0; = p2425*p1082
- p2441: 0; = p2245*p1014
- p1720: 0
- p2375: 0; = p2229*p2204
- p5329: 2.08353e-10; = p1950*p3484
- p1924: 0
- p2423: 0; = p2235*p2213
- p2313: 0.000476459; = p2231*p2220
- p2168: 0.0187229; = p2166*(p0903)
- p0392: 0.5
- p0907: 0
- p0460: 0; = SQRT(2)*(IF((2*p0328-1)<0;-1;IF((2*p0328-1)>0;1;0))*SQRT(SQRT((2/(pi()*0.140012289)+LN(1-(2*p0328-1)^2)/2)^2-LN(1-(2*p0328-1)^2)/0.140012289)-(2/(pi()*0.140012289)+LN(1-(2*p0328-1)^2)/2)))
- p2371: 0; = p2225*p2200
- p0053: 70.125
- p1560: 0
- p1755: 0
- p0336: 0.5
- p2030: 8.87
- p1169: 0.000539616
- p1230: 0.5
- p2703: 0.00286508; = p2312*(p1128+p1130)
- p0824: 0.8964
- p1903: 3.53797e-5; = p1495*1000/p0818
- p2018: 0.1978
- p3221: 0.146975; = IF(p3216=0;0;p1223*12.0107/100.0869+(1-p1224)*12.0107/84.3139)
- p3136: 0; = p2355*p1023
- p1254: 0; = if(p1232>0;0;p0736/100)
- p2738: 0; = p2347*(p1078+p1080)
- p2513: 0; = p2317*p1014
- p1305: 0; = p1301*p1252/p0818
- p3106: 0; = p2325*p1023
- p1842: 0
- p3381: 0; = p3362*p1234
- p1170: 5719.92; = p1169*p0801
- p4527: 7.26388e-7; = p1766*p3481
- p2965: 0; = p2379*(p1079+p1081)
- p2882: 0.000116819; = p2296*(p1020+p1022)
- p0135: 19.016
- p2379: 0; = p2229*p2208
- p2741: 0; = p2350*(p1128+p1130)
- p2318: 0; = p2224*p2185
- p1626: 0
- p2228: 0; = if(p0774*p0778+p0775*p0779+p0776*p0780+p0777*p0781=0;0;p0780*p0776/(p0774*p0778+p0775*p0779+p0776*p0780+p0777*p0781))
- p2460: 0; = p2264*p1073
- p0883: 0.0397671; = p0882*p0001*p0003/(p0818*p0002)
- p0663: 0; = IF(p0399<0.5;-SQRT(p0007*EXP(p0531^2*p0008)-p0007);SQRT(p0007*EXP(p0531^2*p0008)-p0007))
- p1719: 0
- p3310: 0; = if(and(p1232=0;p3252<>0);IF((p3306+p3307+p3308+p3309)+(p3252*(p3257*(1-p3277))/p3305)>p3252;p3252-(p3306+p3307+p3308+p3309);p3252*(p3257*(1-p3277))/p3305);0)
- p0124: 103.494
- p2006: 0.165873; = ((p1980*p1985+p1986*p1991+p1992*p1997+p2000*p2005)/p0818)*p0005*p0002/1000
- p1567: 0
- p2225: 0; = if(p0765*p0769+p0766*p0770+p0767*p0771+p0768*p0772=0;0;p0772*p0768/(p0765*p0769+p0766*p0770+p0767*p0771+p0768*p0772))
- p2997: 0; = p2411*(p1020+p1022)
- p0179: 37.161
- p1581: 0
- p1693: 0
- p2950: 0; = p2364*(p1020+p1022)
- p0865: 0; = IF(p0858+p0864=1;0;IF(p0858+p0864+p0860>1;1-(p0858+p0864);p0860))
- p0928: 871375; = p0801*p0918
- p2312: 0.00817404; = p2231*p2219
- p2124: 0.263965
- p1337: 0; = p1336*p0001/(p0818*p0002)
- p1775: 0
- p2676: 1.79311e-6; = p2285*(p1019+p1021)
- p1889: 0
- p1659: 0
- p2550: 0; = p2354*p1014
- p2430: 0; = p2236*p2220
- p5076: 0; = p1903*p3483
- p2475: 0; = p2279*p1014
- p2136: 4.15916e-7; = p2015*p2064*p2098/(p0818*1000)
- p1910: 0
- p3217: 0.00678751; = p3213*p1228
- p2278: 6.65943e-6; = p2223*p2184
- p2903: 0; = p2317*(p1020+p1022)
- p2631: 3.17673e-6; = p2240*(p1019+p1021)
- p3224: 0.501945; = IF(p3216=0;0;1-p3221-p3222-p3223)
- p2369: 0; = p2225*p2198
- p0771: 0
- p2348: 0; = p2228*p2216
- p0823: 0
- p1648: 0
- p1153: 0.365265
- p0769: 34.143; = p0109*(1+p0637*p0241/100)
- p2027: 0.428799
- p3060: 2.78101e-6; = p2279*p1023
- p5243: 1.22928e-8; = p1864*p3484
- p2996: 0; = p2410*(p1020+p1022)
- p2615: 0; = p2419*p1073
- p1133: 0; = if(p1121=0;p1123*(p0716/100)*p0703*1000;0)
- p3432: 0.000235363; = p3375*p1239
- p0850: 0
- p1154: 0.0278918; = if(p1152*p0818=0;0;p1150/(p1152*p0818))
- p2349: 0; = p2228*p2217
- p1156: 0.0463376; = p1064+p1065+p1066+p1067+p1068+p1069+p1070+p1116+p1117+p1118+p1119+p1120+p1154+p1155
- p2217: 0.000635263; = p1118-p2216
- p2209: 0.000402318; = 14.0067*p2208/30.973762
- p0448: 0; = SQRT(2)*(IF((2*p0316-1)<0;-1;IF((2*p0316-1)>0;1;0))*SQRT(SQRT((2/(pi()*0.140012289)+LN(1-(2*p0316-1)^2)/2)^2-LN(1-(2*p0316-1)^2)/0.140012289)-(2/(pi()*0.140012289)+LN(1-(2*p0316-1)^2)/2)))
- p2148: 3.50333e-8; = p2015*p2076*p2110/(p0818*1000)
- p3315: 0; = if(and(p1232=0;p3253<>0);p3264*p3289;0)
- p3159: 0; = p2378*p1082
- p3254: 1.8019e8; = p1252*(p1287*(1-p3247)+p1290*(1-p3248)+p1291*(1-p3249)+p1292*(1-p3250))
- p5337: 1.45272e-7; = p1962*p3484
- p0821: 1.77727
- p2584: 0; = p2388*p1073
- p2129: 8.84635e-7; = p2015*p2057*p2091/(p0818*1000)
- p3459: 0; = p3364*p1241
- p1905: 0
- p2028: 2.11908e-5; = p2015*p2026*p2027/(p0818*1000)
- p1810: 0
- p3472: 0.00311169; = p3377*p1241
- p3213: 0.112803; = p1222*12.0107/100.0869
- p2207: 0.00371066; = p1119-p2205-p2204-p2206
- p2536: 0; = p2340*p1073
- p1046: 0.0241685; = IF(p1012=0;IF(p1037+p1044+p1045=1;0;IF(p1037+p1044+p1045+p1040>1;1-(p1037+p1044+p1045);p1040));0)
- p1989: 50
- p2187: 1.27998e-5; = 4*1.00794*p2186/(2*14.0067)
- p2500: 0; = p2304*p1073
- p1229: 0.00936023; = IF(p1221=0;0;p1228*p1221)
- p2212: 3.31195e-6; = p1106/p0818
- p3345: 0.160606; = if(and(p1232=0;p3256<>0);p3273*p3277*p3293;0)
- p2587: 0; = p2391*p1123
- p0691: 0
- p1718: 0
- p0662: 0; = IF(p0398<0.5;-SQRT(p0007*EXP(p0530^2*p0008)-p0007);SQRT(p0007*EXP(p0530^2*p0008)-p0007))
- p2499: 0; = p2303*p1073
- p3124: 0; = p2343*p1082
- p4513: 0; = p1962*p3480
- p3341: 4.50945e6; = if(and(p1232=0;p3254<>0);p3254*(p3271-p3336)/p3338;0)
- p3344: 3.43161e6; = if(and(p1232=0;p3254<>0);p3254-(p3339+p3340+p3341+p3342+p3343);0)
- p2623: 0; = p2427*p1073
- p1946: 0
- p1176: 3401.05; = p1175*p0801
- p2726: 0; = p2335*(p1019+p1021)
- p2335: 0; = p2224*p2203
- p1677: 0
- p4972: 0; = p1799*p3483
- p3307: 0; = if(and(p1232=0;p3252<>0);p3252*(p3258-p3302)/p3305;0)
- p0617: 0; = IF(p0353<0.5;-SQRT(p0007*EXP(p0485^2*p0008)-p0007);SQRT(p0007*EXP(p0485^2*p0008)-p0007))
- p2431: 0; = p2236*p2221
- p0915: 0.0289793; = p0914/p0818
- p1644: 0
- p1927: 0
- p4411: 0; = p1856*p3480
- p0548: 0; = IF(p0284<0.5;-SQRT(p0007*EXP(p0416^2*p0008)-p0007);SQRT(p0007*EXP(p0416^2*p0008)-p0007))
- p2184: 1.02662e-5; = p1051/p0818
- p3272: 0.0398246
- p2773: 0; = p2382*(p1078+p1080)
- p1112: 0.209482
- p3314: 0; = if(and(p1232=0;p3253<>0);p3263*p3289;0)
- p2942: 0; = p2356*(p1020+p1022)
- p2737: 0; = p2346*(p1078+p1080)
- p0287: 0.5
- p2484: 0; = p2288*p1014
- p3025: 1.59964e-6; = p2244*p1023
- p3291: 0.437
- p0166: 0
- p3162: 0; = p2381*p1082
- p0901: 0.0656776
- p3126: 0; = p2345*p1082
- p3214: 0.376406; = p1222*40.078/100.0869
- p0290: 0.5
- p3216: 0.06; = IF(OR(p1226=0;p1228=0);0;1-p3213-p3214-p3215)
- p3293: 0.3875
- p1215: 0.0183471; = IF(p1214=0;0;(p1214-1.5)/(p1214-1)^2)
- p0002: 0.453592
- p1282: 0; = IF(p1277+p1280+p1281=p1260;0;p1260-(p1277+p1280+p1281))
- p0951: 0; = if(and(p0683=0;or(p0807=480;p0807=32;p0807=1;and(p0807=60;p0901<0.03)));p0939;0)
- p3099: 0; = p2318*p1023
- p2224: 0; = if(p0765*p0769+p0766*p0770+p0767*p0771+p0768*p0772=0;0;p0771*p0767/(p0765*p0769+p0766*p0770+p0767*p0771+p0768*p0772))
- p2992: 0; = p2406*(p1020+p1022)
- p2427: 0; = p2235*p2217
- p1277: 0
- p2695: 0.000323206; = p2304*(p1078+p1080)
- p2681: 1.1755e-7; = p2290*(p1019+p1021)
- p1779: 0
- p2099: 0.620397
- p3308: 0; = if(and(p1232=0;p3252<>0);p3252*(p3259-p3303)/p3305;0)
- p3451: 0; = p3375*p1240
- p1963d: 0; = p1608*p1812+p1609*p1813+p1610*p1814+p1611*p1815+p1612*p1816+p1613*p1817+p1614*p1818+p1615*p1819+p1616*p1820+p1617*p1821+p1618*p1822+p1619*p1823+p1620*p1824+p1621*p1825+p1622*p1826+p1623*p1827+p1624*p1828+p1625*p1829+p1626*p1830+p1627*p1831
- p2689: 0.000196088; = p2298*(p1078+p1080)
- p3173: 0; = p2392*p1132
- p2035: 2.3752e-6; = p2015*p2029*(1-p2031)/(p0818*1000)
- p2246: 3.79784e-6; = p2222*p2191
- p2821: 0; = p2430*(p1128+p1130)
- p1177: 0.000347445; = p0801*p0001/(p0818*p0002)
- p1561: 0
- p1975: 0.000347445; = p1970*p0001/(p0818*p0002)
- p0862: 0; = p0674*1000/p0856
- p2470: 0; = p2274*p1123
- p2040: 1.56
- p2302: 0.000191339; = p2227*p2209
- p0383: 0.5
- p1206: 0.03829
- p0175: 0
- p0651: 0; = IF(p0387<0.5;-SQRT(p0007*EXP(p0519^2*p0008)-p0007);SQRT(p0007*EXP(p0519^2*p0008)-p0007))
- p3290: 0.195
- p2850: 6.38798e-5; = p2264*(p1079+p1081)
- p0920: 0.3752; = p0676*1000/p0801
- p0675: 0
- p3449: 0; = p3373*p1240
- p2683: 4.24197e-7; = p2292*(p1019+p1021)
- p0612: 0; = IF(p0348<0.5;-SQRT(p0007*EXP(p0480^2*p0008)-p0007);SQRT(p0007*EXP(p0480^2*p0008)-p0007))
- p2022: 0.00012337; = p2018*p2015/p0818-p2021
- p2538: 0; = p2342*p1073
- p0608: 0; = IF(p0344<0.5;-SQRT(p0007*EXP(p0476^2*p0008)-p0007);SQRT(p0007*EXP(p0476^2*p0008)-p0007))
- p0245: 36.993
- p2328: 0; = p2224*p2196
- p2185: 3.53612e-5; = p1065-p2184
- p4514: 0; = p1963*p3480
- p2305: 1.57513e-6; = p2227*p2212
- p3002: 0; = p2416*(p1079+p1081)
- p0848: 0
- p2700: 1.00709e-5; = p2309*(p1078+p1080)
- p3587: 0; = p1856*p3476
- p1311: 0; = IF(p1307+p1310=p1266;0;IF(p1307+p1310+p1309>p1266;p1266-(p1307+p1310);p1309))
- p0403: 0.5
- p1327a: 0.0117407; = (p0745*1000/p0801)*(1-(p0746+p0747+p0748+p0749+p0750+p0751+p0752+p0753)/100)+(p0754*1000/p0801)*(1-(p0755+p0756+p0757+p0758+p0759+p0760+p0761+p0762)/100)
- p1664: 0
- p1082: 0; = IF(p1071=0;IF(p1073+p1078+p1079+p1080+p1081=1;0;1-(p1073+p1078+p1079+p1080+p1081));0)
- p2188: 0.000163744; = p1066-p2186-p2187
- p0438: 0; = SQRT(2)*(IF((2*p0306-1)<0;-1;IF((2*p0306-1)>0;1;0))*SQRT(SQRT((2/(pi()*0.140012289)+LN(1-(2*p0306-1)^2)/2)^2-LN(1-(2*p0306-1)^2)/0.140012289)-(2/(pi()*0.140012289)+LN(1-(2*p0306-1)^2)/2)))
- p0026: 148.843
- p2841: 3.83458e-5; = p2255*(p1020+p1022)
- p0842: -0.109306
- p3386: 0; = p3367*p1234
- p2775: 0; = p2384*(p1078+p1080)
- p1216: 0.155559
- p2940: 0; = p2354*(p1020+p1022)
- p0610: 0; = IF(p0346<0.5;-SQRT(p0007*EXP(p0478^2*p0008)-p0007);SQRT(p0007*EXP(p0478^2*p0008)-p0007))
- p4721: 0; = p1754*p3482
- p1587: 0.799395
- p1276: 0; = p1272*p1252/p0818
- p1934: 0
- p2860: 0.00030819; = p2274*(p1129+p1131)
- p3228: 0.00469832; = p3224*p1229
- p2101: 0.620397
- p3570: 0; = p1839*p3476
- p2159: 1.28276e-6; = p2015*p2083*p2121/(p0818*1000)
- p2445: 0; = p2249*p1014
- p0518: 0; = SQRT(2)*(IF((2*p0386-1)<0;-1;IF((2*p0386-1)>0;1;0))*SQRT(SQRT((2/(pi()*0.140012289)+LN(1-(2*p0386-1)^2)/2)^2-LN(1-(2*p0386-1)^2)/0.140012289)-(2/(pi()*0.140012289)+LN(1-(2*p0386-1)^2)/2)))
- p0694: 148.843; = p0034*(1+p0562*p0166/100)
- p3350: 3.4013e8; = if(and(p1232=0;p3256<>0);p3256*(p3273*p3277-p3345)/p3349;0)
- p2257: 0.000101547; = p2222*p2203
- p1935: 0
- p1055: 19289.3; = IF(p1012=0;p1048*p1036;0)
- p3196: 0; = p2415*p1082
- p3595: 0; = p1864*p3476
- p4964: 0; = p1791*p3483
- p0671: 762.019; = p0011*(1+p0539*p0143/100)
- p2980: 0; = p2394*(p1020+p1022)
- p3070: 7.83582e-5; = p2289*p1023
- p3225: 0.00137572; = p3221*p1229
- p3009: 0; = p2423*(p1079+p1081)
- p2356: 0; = p2225*p2184
- p3257: 0.849747
- p4870: 0; = p1903*p3482
- p2694: 2.46809e-5; = p2303*(p1078+p1080)
- p3468: 0; = p3373*p1241
- p2920: 0; = p2334*(p1020+p1022)
- p1851: 0
- p1926: 0
- p1175: 0.000320854
- p3250: 0.875
- p2360: 0; = p2225*p2188
- p3039: 0; = p2258*p1082
- p2684: 6.77781e-5; = p2293*(p1019+p1021)
- p0046: 25.571
- p1128: 0.35051; = if(p1121=0;IF(p1123=1;0;IF(p1123+p1124>1;1-p1123;p1124));0)
- p0320: 0.5
- p1974: 0; = p1969*p0001/(p0818*p0002)
- p1920: 0
- p3175: 0; = p2394*p1023
- p0864: 0.0718886; = IF(p0858=1;0;IF(p0858+p0859>1;1-p0858;p0859))
- p1860: 0
- p3415: 0.00106746; = p3377*p1238
- p2729: 0; = p2338*(p1078+p1080)
- p1000: 0; = IF(p0996+p0999=1;0;IF(p0996+p0999+p0998>1;1-(p0996+p0999);p0998))
- p2183: 0.000118013; = p1064-p2182
- p1192: 5.52197e-8; = p1188*p1191/p0818
- p3351: 7.90919e7; = if(and(p1232=0;p3256<>0);p3256*(p3274-p3346)/p3349;0)
- p1704: 0
- p0986: 0; = IF(p0982+p0985=1;0;IF(p0982+p0985+p0984>1;1-(p0982+p0985);p0984))
- p0419: 0; = SQRT(2)*(IF((2*p0287-1)<0;-1;IF((2*p0287-1)>0;1;0))*SQRT(SQRT((2/(pi()*0.140012289)+LN(1-(2*p0287-1)^2)/2)^2-LN(1-(2*p0287-1)^2)/0.140012289)-(2/(pi()*0.140012289)+LN(1-(2*p0287-1)^2)/2)))
- p1963c: 9.65805e-7; = p1588*p1792+p1589*p1793+p1590*p1794+p1591*p1795+p1592*p1796+p1593*p1797+p1594*p1798+p1595*p1799+p1596*p1800+p1597*p1801+p1598*p1802+p1599*p1803+p1600*p1804+p1601*p1805+p1602*p1806+p1603*p1807+p1604*p1808+p1605*p1809+p1606*p1810+p1607*p1811
- p2143: 9.62663e-8; = p2015*p2071*p2105/(p0818*1000)
- p0834: 0.00059
- p3896: 0; = p1963*p3477
- p1650: 0
- p1715: 0
- p2993: 0; = p2407*(p1020+p1022)
- p3436: 0.000208223; = p3379*p1239
- p0977: 0; = IF(p0687=0;IF(OR(p0686=0;p0688=0);0;p0686*1000*p0688/100);0)
- p0912: 0
- p0182: 36.993
- p5145: 7.29236e-9; = p1766*p3484
- p1812: 0
- p3123: 0; = p2342*p1082
- p0756: 0
- p3454: 0; = p3378*p1240
- p0632: 0; = IF(p0368<0.5;-SQRT(p0007*EXP(p0500^2*p0008)-p0007);SQRT(p0007*EXP(p0500^2*p0008)-p0007))
- p4075: 1.2462e-6; = p1932*p3478
- p0536: 0; = SQRT(2)*(IF((2*p0404-1)<0;-1;IF((2*p0404-1)>0;1;0))*SQRT(SQRT((2/(pi()*0.140012289)+LN(1-(2*p0404-1)^2)/2)^2-LN(1-(2*p0404-1)^2)/0.140012289)-(2/(pi()*0.140012289)+LN(1-(2*p0404-1)^2)/2)))
- p3100: 0; = p2319*p1023
- p3085: 0; = p2304*p1082
- p3416: 0.00478618; = p3378*p1238
- p1181: 0.000102633
- p1312: 0.85851; = IF(p1307+p1310+p1311=p1266;0;p1266-(p1307+p1310+p1311))
- p1573: 0
- p2206: 0.00044691; = 9*1.00794*p2204/30.973762
- p0628: 0; = IF(p0364<0.5;-SQRT(p0007*EXP(p0496^2*p0008)-p0007);SQRT(p0007*EXP(p0496^2*p0008)-p0007))
- p1800: 0
- p0893: 0.327663; = 1000*(p0890+p0892)*p0001*p0003*p0004/(p0818*p0002)
- p1202: 0.7
- p0104: 21.085
- p0679: 2394.02; = p0019*(1+p0547*p0151/100)
- p3079: 0; = p2298*p1082
- p1324: 1.16949; = IF(((p0745*1000*p0751/100)+(p0754*1000*p0760/100))/p0801<0;0;((p0745*1000*p0751/100)+(p0754*1000*p0760/100))/p0801)
- p1314: 0; = p1310*p1252/p0818
- p2066: 0.109412
- p3151: 0; = p2370*p1023
- p0957: 1.68006e-6; = if(and(p0683>0;or(p0807=56;p0807=100;and(p0807=60;p0901>0.06)));p0939;0)
- p0916: 0.298109; = p0826+(p0832*(1+p0894))/p0818
- p3242: 3.73866e-8; = p3234*p1188*p3238/p0818
- p2696: 4.70571e-7; = p2305*(p1078+p1080)
- p2249: 3.54109e-5; = p2222*p2195
- p0634: 0; = IF(p0370<0.5;-SQRT(p0007*EXP(p0502^2*p0008)-p0007);SQRT(p0007*EXP(p0502^2*p0008)-p0007))
- p2959: 0; = p2373*(p1020+p1022)
- p2126: 5.21807e-7; = p2015*p2054*p2088/(p0818*1000)
- p1261: 0.14149; = if(p1232>0;0;p0732/100)
- p2201: 0.000175182; = 12.01*p2200/(2*14.0067)
- p3320: 0; = if(and(p1232=0;p3253<>0);p3253*(p3264-p3315)/p3316;0)
- p1711: 0
- p2350: 0; = p2232*p2218
- p2971: 0; = p2385*(p1079+p1081)
- p2558: 0; = p2362*p1014
- p0123: 102.936
- p1767: 0
- p3978: 4.74098e-7; = p1835*p3478
- p1293: 0; = p1287*p1252/p0818
- p2981: 0; = p2395*(p1020+p1022)
- p0849: 0
- p1685: 0
- p1542: 1
- p0050: 28.532
- p0191: 25.481
- p2036: 3.50877e-6; = p2015*p2030*(1-p2032)/(p0818*1000)
- p2296: 0.000187496; = p2223*p2203
- p1984: 30
- p0127: 50.454
- p2007: 0.0167964; = ((p1981*p1985+p1987*p1991+p1993*p1997+p2001*p2005)/p0818)*p0005*p0002/1000
- p2526: 0; = p2330*p1014
- p4210: 4.23907e-8; = p1861*p3479
- p3107: 0; = p2326*p1023
- p4711: 2.07539e-8; = p1950*p3481
- p3334: 0.2408; = IF(or(p3254=0;p1232>0);0;p3269*p3277*(p3300*p3292+(1-p3300)*p3296))
- p1856: 2.27047e-5; = p1448*1000/p0818
- p2612: 0; = p2416*p1073
- p2777: 0; = p2386*(p1078+p1080)
- p3042: 0; = p2261*p1082
- p1680: 0
- p1023: 0.12124; = IF(p1012=0;IF(p1014+p1019+p1020+p1021+p1022=1;0;1-(p1014+p1019+p1020+p1021+p1022));0)
- p3112: 0; = p2331*p1023
- p1936: 0
- p0574: 0; = IF(p0310<0.5;-SQRT(p0007*EXP(p0442^2*p0008)-p0007);SQRT(p0007*EXP(p0442^2*p0008)-p0007))

## Reference product
- soybeans; at harvest in 2002; at farm; 85%-92% moisture: 1 kg

## Inputs from technosphere
- CUTOFF planting; for unspec. till, soybeans: 1.68006e-6 ha; = p0957
- CUTOFF unspecified animal manure; from unspecified storage; at point-of-sale: 0.321343 kg; = p1316
- CUTOFF pesticide, Fluazifop-p-butyl; at point-of-sale; kg AI: 6.61303e-7 kg; = p1839
- CUTOFF seed storage; soybeans: 0.0135375 kg*a; = p0975
- CUTOFF pesticide, Lactofen; at point-of-sale; kg AI: 7.7152e-7 kg; = p1869
- CUTOFF zinc compounds storage: 1.99844e-8 kg*a; = p1186
- CUTOFF potassic fertilizer, potassium chloride; at point-of-sale: 0.0278918 kg; = p1154
- CUTOFF pesticide, Imazamox; at point-of-sale; kg AI: 6.98042e-7 kg; = p1861
- CUTOFF pesticide, Glyphosate; at point-of-sale; kg AI: 0.000323414 kg; = p1855
- CUTOFF gypsum storage: 6.91364e-7 kg*a; = p1168
- CUTOFF prepare soil; for no-till, soybeans: 0.000130361 ha; = p0936
- CUTOFF apply pesticide; unspecified application methods: 4.07926e-6 ha; = p1345
- CUTOFF pesticide, Acifluorfen; at point-of-sale; kg AI: 1.28587e-6 kg; = p1766
- CUTOFF soya seeds; GMO herbicide resistant seed; at point-of-sale: 0.0214789 kg; = p0970
- CUTOFF nitrogenous fertilizer, anhydrous ammonia; at point-of-sale: 0.000655626 kg; = p1064
- CUTOFF pesticide, Clethodim; at point-of-sale; kg AI: 1.17565e-6 kg; = p1795
- CUTOFF soya seeds; nonGMO herbicide resistant seed; at point-of-sale: 0.00216059 kg; = p0971
- CUTOFF pesticide, Pendimethalin; at point-of-sale; kg AI: 3.53797e-5 kg; = p1903
- CUTOFF phosphatic fertilizer, monoammonium phosphate; at point-of-sale: 0.00374047 kg; = p1120
- CUTOFF international vessel transport; average fuel: 0.165873 metric ton*km; = p2006
- CUTOFF liming materials storage: 0.0347659 kg*a; = p1231
- CUTOFF domestic barge transport; average fuel: 0.0167964 metric ton*km; = p2007
- CUTOFF planting; for mulch till, soybeans: 0.000108371 ha; = p0953
- CUTOFF prepare soil; for unspec. till, soybeans: 1.68006e-6 ha; = p0939
- CUTOFF pesticide, Tribenuron-methyl; at point-of-sale; kg AI: 3.6739e-8 kg; = p1950
- CUTOFF apply pesticide; broadcast without incorporation: 4.36816e-5 ha; = p1335
- CUTOFF pesticide formulation balance; at point-of-sale: 0.000186656 kg; = p1963
- CUTOFF prepare soil; for conventional till, soybeans; <15% residue: 2.85618e-5 ha; = p0934
- CUTOFF nitrogenous fertilizer, aqueous ammonia; at point-of-sale: 4.56274e-5 kg; = p1065
- CUTOFF sewage sludge storage: 5.52197e-8 kg*a; = p1192
- CUTOFF apply P fertilizer; broadcast without incorporation: 6.91809e-5 ha; = p1091
- CUTOFF pesticide, Fenoxaprop P; at point-of-sale; kg AI: 1.28587e-6 kg; = p1835
- CUTOFF nitrogenous fertilizer, sodium nitrate; at point-of-sale: 4.4292e-6 kg; = p1069
- CUTOFF apply N fertilizer; broadcast without incorporation: 4.54232e-5 ha; = p1032
- CUTOFF pesticide, Chlorimuron-ethyl; at point-of-sale; kg AI: 5.14347e-7 kg; = p1791
- CUTOFF pesticide, Cloransulam-methyl; at point-of-sale; kg AI: 4.04129e-7 kg; = p1799
- CUTOFF sewage sludge; at point-of-sale: 1.10439e-7 kg; = p1190
- CUTOFF phosphatic fertilizer, superphosphate grades over 22%; at point-of-sale: 0.00067869 kg; = p1117
- CUTOFF pesticide, Imazethapyr; at point-of-sale; kg AI: 2.1676e-6 kg; = p1864
- CUTOFF local area trucking; class 6, average fuel: 0.00125973 metric ton*km; = p2010
- CUTOFF apply pesticide; as foliar or directed spray: 0.000406333 ha; = p1339
- CUTOFF planting; for conventional till, soybeans; <15% residue: 2.85618e-5 ha; = p0952
- CUTOFF prepare soil; for mulch till, soybeans: 0.000108371 ha; = p0935
- CUTOFF N inhibitor appl svc; unspec rate & type, 2002 soybeans: 0.000389434 ha; = p1162
- CUTOFF planting; for no-till, soybeans: 0.000130361 ha; = p0954
- CUTOFF gypsum; at point-of-sale: 1.38273e-6 kg; = p1166
- CUTOFF soya seeds; unspec. type; at point-of-sale: 0.00343556 kg; = p0972
- CUTOFF hog manure; from unspecified storage; at point-of-sale: 0.0529602 kg; = p1296
- CUTOFF phosphatic fertilizer, other single phosphates; at point-of-sale: 0.000706144 kg; = p1118
- CUTOFF harvest; soybeans: 0.000345806 ha; = p1971
- CUTOFF apply manure; injected/knifed in: 1.05468e-6 ha; = p1249
- CUTOFF sulfuric acid; at point-of-sale: 1.24951e-7 kg; = p1178
- CUTOFF sulfuric acid storage: 6.24757e-8 kg*a; = p1180
- CUTOFF nitrogenous fertilizer, nitrogen solutions; at point-of-sale: 0.00156734 kg; = p1068
- CUTOFF fertilizer storage: 0.0284416 kg*a; = p1160
- CUTOFF nitrogenous fertilizer, ammonium nitrate; at point-of-sale: 0.000265479 kg; = p1066
- CUTOFF nitrogenous fertilizer, ammonium sulfate; at point-of-sale: 0.000178835 kg; = p1067
- CUTOFF pesticide, Trifluralin; at point-of-sale; kg AI: 5.43738e-6 kg; = p1955
- CUTOFF apply sulfuric acid; unspecified method: 0.000347445 ha; = p1177
- CUTOFF phosphatic fertilizer, superphos. grades 22% and under; at point-of-sale: 3.79445e-5 kg; = p1116
- CUTOFF pesticide, Sodium bentazon; at point-of-sale; kg AI: 2.93912e-6 kg; = p1849
- CUTOFF planting; for reduced till, soybeans; 15-30% residue: 7.84709e-5 ha; = p0955
- CUTOFF dolomite, pulverized; at point-of-sale: 0.00936023 kg; = p1229
- CUTOFF apply sewage sludge; unspecified method: 0.000347445 ha; = p1189
- CUTOFF potassic fertilizer, other single nutrients; at point-of-sale: 0.00260351 kg; = p1155
- CUTOFF apply K fertilizer; broadcast without incorporation: 8.40188e-5 ha; = p1141
- CUTOFF pesticide storage: 0.000413083 kg*a; = p1965
- CUTOFF apply N fertilizer; broadcast with incorporation: 1.86424e-5 ha; = p1031
- CUTOFF bulk cargo rail transport; diesel: 0.0314933 metric ton*km; = p2008
- CUTOFF regional or national trucking; class 8, average fuel: 0.0271468 metric ton*km; = p2009
- CUTOFF pesticide, Glyphosate diammonium salt; at point-of-sale; kg AI: 2.27047e-5 kg; = p1856
- CUTOFF apply sulfur; unspecified method: 0.000347445 ha; = p1171
- CUTOFF apply P fertilizer; broadcast with incorporation: 2.94728e-5 ha; = p1090
- CUTOFF sulfur storage: 1.05072e-7 kg*a; = p1174
- CUTOFF pesticide, unspecified type; at point-of-sale; kg AI: 2.56159e-5 kg; = p1962
- CUTOFF irrig svc; gnd wat source, unspec rate, 2002 soybeans: 4.87876e-6 ha; = p0979
- CUTOFF limestone, high-grade, pulverized; at point-of-sale: 0.0601716 kg; = p1228
- CUTOFF apply manure; broadcast without incorporation: 3.67486e-6 ha; = p1248
- CUTOFF zinc compounds; at point-of-sale: 3.99687e-8 kg; = p1184
- CUTOFF apply gypsum; unspecified method: 0.000347445 ha; = p1165
- CUTOFF apply zinc compounds; unspecified method: 0.000347445 ha; = p1183
- CUTOFF prepare soil; for reduced till, soybeans; 15-30% residue: 7.84709e-5 ha; = p0937
- CUTOFF apply manure; unspec. method: 1.07123e-5 ha; = p1251
- CUTOFF harvest; soybeans residue management: 0.000347445 ha; = p1975
- CUTOFF apply single or mixed N fertilizer; unspec. method: 8.83895e-6 ha; = p1035
- CUTOFF pesticide, 2,4-D; at point-of-sale; kg AI: 2.49825e-5 kg; = p1754
- CUTOFF sulfur; at point-of-sale: 2.10145e-7 kg; = p1172
- CUTOFF fertilizer filler materials; at point-of-sale: 0.0105457 kg; = p1158
- CUTOFF phosphatic fertilizer, diammonium phosphate; at point-of-sale: 0.00706361 kg; = p1119
- CUTOFF pesticide, Sulfentrazone; at point-of-sale; kg AI: 3.37999e-6 kg; = p1932
- soybean residue; at harvest in 2002; at farm; 88%-94% moisture: 0.785618 kg; = p0839
- CUTOFF apply liming materials; unspecified method: 0.000347445 ha; = p1227
- CUTOFF nitrogenous fertilizer, urea; at point-of-sale: 0.000898051 kg; = p1070
- CUTOFF apply K fertilizer; broadcast with incorporation: 4.53424e-5 ha; = p1140
- CUTOFF apply pesticide; broadcast with incorporation: 0.000265205 ha; = p1333

## Inputs from nature
- Transformation, from annual crop [natural resource, land]: 3.47445 m2; = 1.0 * (p0877+p0873+p0871+p0883)
- Potassium; from plant uptake; biogenic: 0.0289793 kg; = p0915
- Water, unspecified origin: 0.000625772 m3; = p0916*0.001+p0893*0.001
- Nitrogen: 0.0983707 kg; = p0905
- Carbon dioxide: 4.19212 kg; = p0900*3.6666666667
- Occupation, annual crop [natural resource, land]: 1.37202 m2*year; = 1.0 * (p0855)
- Transformation, to annual crop [natural resource, land]: 3.47445 m2; = 1.0 * (p0857)
- Dry matter except CNPK; from plant uptake: 1.32164 kg; = p0917
- Phosphorus: 0.0105884 kg; = p0910

## Emissions to nature
- I butane; from residue burning: 1.51416e-8 kg; = p2146*1.0208333333
- Superphosphate, grades>22%; broadcast w/ incorp. in fert. in spr. bef. plant.; kg P: 2.02003e-5 kg; = p2698
- Ash: 0.000141976 kg; = p2021+p2022
- Seeds; used in planting and sowing: 0.0270751 kg; = p2179
- Ammonium sulfate; broadcast w/ incorp. in fert. in spr. bef. plant.: 2.93673e-5 kg; = p2674*4.7142857143
- Clethodim [soil, agricultural]: 1.17565e-6 kg; = 1.0 * (p4556+p4144+p5174+p3938)
- Trifluralin [soil, agricultural]: 5.43738e-6 kg; = 1.0 * (p5334+p4098+p4716+p4304)
- Ammonium sulfate; unspec. appl. method in fert. in spr. bef. plant.: 1.3924e-5 kg; = p3064*4.7142857143
- Ammonium sulfate; unspec. appl. method in fert. in fall bef. plant.: 7.54118e-6 kg; = p3025*4.7142857143
- Anhydrous ammonia; unspec. appl. method in fert. in fall bef. plant.: 2.78062e-5 kg; = p3018*1.2142857143
- Oxygen; applied in limestone: 0.0271248 kg; = p3219
- Glyphosate diammonium salt; broadcast with incorporation: 8.37121e-6 kg; = p3999
- Other single K nutrients; broadcast w/o incorp. in fert. in spr. bef. plant.; kg K: 0.000309455 kg; = p2899
- Urea; broadcast w/o incorp. in fert. in spr. bef. plant.: 0.000354007 kg; = p2880*5
- Water [air, non-urban air or from high stacks]: 8.29559e-8 m3; = 0.001 * (p2016)
- Ethane [air, non-urban air or from high stacks]: 6.52259e-7 kg; = 1.0 * (p2126*1.25)
- Plant dry matter; in aboveground residue left on field: 0.367421 kg; = p2172
- NMVOC, non-methane volatile organic compounds, unspecified origin [air, non-urban air or from high stacks]: 1.84427e-5 kg; = 1.0 * (p2051+p2052)
- Nitrogen solution; unspec. appl. method in fert. in spr. bef. plant.; unspec. appl. method in fert. in spr. bef. plan...: 3.69794e-5 kg; = p3068
- Zinc compounds: 3.99687e-8 kg; = p3232
- Formic acid [air, non-urban air or from high stacks]: 7.19228e-7 kg; = 1.0 * (p2131*3.8333333333)
- Ammonium nitrate; unspec. appl. method in fert. in fall bef. plant.: 1.78584e-5 kg; = p3022*4.7142857143
- Dinitrogen monoxide [air, non-urban air or from high stacks]: 5.02538e-8 kg; = 1.0 * (p2044*1.5714285714)
- Sulfuric acid [soil, agricultural]: 1.24951e-7 kg; = 1.0 * (p3231)
- Aqueous ammonia; broadcast w/o incorp. in fert. in fall bef. plant.: 2.72871e-6 kg; = p2825*1.2142857143
- Pesticide formulation balance; unspec. appl. method: 1.05855e-6 kg; = p5338
- Aqueous ammonia; unspec. appl. method in fert. in fall bef. plant.: 5.30983e-7 kg; = p3020*1.2142857143
- Potassium; injected/knifed in manure at an unknown time: 0.00030636 kg; = p3434
- Glyphosate diammonium salt; broadcast without incorporation: 1.37881e-6 kg; = p4205
- Superphosphate, grades>22%; broadcast w/o incorp. in fert. in spr. bef. plant.; kg P: 4.74159e-5 kg; = p2893
- Nitrogen; in below-ground residue: 0.00700667 kg; = p2174
- Plant dry matter; in below-ground residue: 0.1375 kg; = p2177
- Sodium nitrate; broadcast w/ incorp. in fert. in fall bef. plant.: 3.86535e-7 kg; = p2642*6.0714285714
- cyclopentane: 1.18724e-9 kg; = p2153*1.0166666667
- Benzene [air, non-urban air or from high stacks]: 1.1014e-7 kg; = 1.0 * (p2140*1.0833333333)
- Sodium nitrate; unspec. appl. method in fert. in spr. bef. plant.: 3.38385e-7 kg; = p3071*6.0714285714
- Acetonitrile [air, non-urban air or from high stacks]: 1.50677e-7 kg; = 1.0 * (p2155*1.7083333333)
- Urea; broadcast w/o incorp. in fert. in fall bef. plant.: 0.000191729 kg; = p2841*5
- Other single K nutrients; broadcast w/ incorp. in fert. in spr. bef. plant.; kg K: 0.000167004 kg; = p2704
- Carbon monoxide, fossil [air, non-urban air or from high stacks]: 4.94452e-5 kg; = 1.0 * (p2028*2.3333333333)
- isobutene: 8.38955e-8 kg; = p2150*1.1666666667
- Anhydrous ammonia; broadcast w/ incorp. in fert. in spr. bef. plant.: 0.000108285 kg; = p2667*1.2142857143
- Dioxins and furans (PCDD/F); from residue burning: 2.15333e-14 kg TEQ; = p2047
- Ammonium nitrate; broadcast w/o incorp. in fert. in fall bef. plant.: 9.17741e-5 kg; = p2827*4.7142857143
- Potassium chloride; broadcast w/o incorp. in fert. in spr. bef. plant.: 0.00835091 kg; = p2897*2.2166666667
- Volatile constituents; using unspec. method in man. at unknown time: 0.0139519 kg; = p3473
- Anhydrous ammonia; broadcast w/o incorp. in fert. in spr. bef. plant.: 0.000263841 kg; = p2862*1.2142857143
- Aqueous ammonia; broadcast w/o incorp. in fert. in spr. bef. plant.: 5.03827e-6 kg; = p2864*1.2142857143
- Nitrogen; broadcast w/o incorp. in manure at an unknown time: 0.000820082 kg; = p3413
- Nitrogen; injected/knifed in manure at an unknown time: 0.000235363 kg; = p3432
- Urea; unspec. appl. method in fert. in spr. bef. plant.: 6.88866e-5 kg; = p3075*5
- Sodium nitrate; broadcast w/o incorp. in fert. in spr. bef. plant.: 1.73895e-6 kg; = p2876*6.0714285714
- Filler materials, applied with synthetic fertilizer: 0.0105457 kg; = p2432
- Phenol [air, non-urban air or from high stacks]: 3.72291e-7 kg; = 1.0 * (p2133*1.3055555556)
- Magnesium [soil, agricultural]: 0.00118723 kg; = 1.0 * (p3227)
- Ammonia [air, non-urban air or from high stacks]: 1.55764e-6 kg; = 1.0 * (p2159*1.2142857143)
- Superphosphate, grades<= 22%; broadcast w/ incorp. in fert. in fall bef. plant.; kg P: 5.18875e-7 kg; = p2657
- Potassium; using unspec. method in manure at an unknown time: 0.00311169 kg; = p3472
- Aqueous ammonia; broadcast w/ incorp. in fert. in fall bef. plant.: 1.11991e-6 kg; = p2630*1.2142857143
- Acetic acid [air, non-urban air or from high stacks]: 4.01585e-6 kg; = 1.0 * (p2127*2.5)
- Sodium nitrate; broadcast w/o incorp. in fert. in fall bef. plant.: 9.41812e-7 kg; = p2837*6.0714285714
- Acetone [air, non-urban air or from high stacks]: 3.20315e-7 kg; = 1.0 * (p2139*1.6111111111)
- Monoammonium phosphate; broadcast w/o incorp. in fert. in spr. bef. plant.: 0.00110216 kg; = p2888*8.2142857143
- Potassium chloride; broadcast w/o incorp. in fert. in fall bef. plant.: 0.00831676 kg; = p2858*2.2166666667
- Other single phosphates; broadcast w/o incorp. in fert. in fall bef. plant.; kg P: 2.60657e-5 kg; = p2856
- Sodium nitrate; unspec. appl. method in fert. in fall bef. plant.: 1.83268e-7 kg; = p3032*6.0714285714
- Fenoxaprop P; foliar or directed spray: 7.26388e-7 kg; = p4596
- Other single phosphates; broadcast w/ incorp. in fert. in fall bef. plant.; kg P: 1.11047e-5 kg; = p2661
- Nitrogen; in above-ground residue left on field: 0.0187229 kg; = p2168
- Phosphorous; injected/knifed in manure at an unknown time: 7.98331e-5 kg; = p3433
- Diammonium phosphate; broadcast w/o incorp. in fert. in fall bef. plant.: 0.00239259 kg; = p2845*4.7142857143
- 1-Butene: 9.60855e-8 kg; = p2144*1.1666666667
- Monoammonium phosphate; broadcast w/ incorp. in fert. in fall bef. plant.: 0.000517748 kg; = p2654*8.2142857143
- trans-2-Butene: 4.08722e-8 kg; = p2148*1.1666666667
- Propanenitrile: 4.59929e-8 kg; = p2157*1.5277777778
- Fenoxaprop P; broadcast without incorporation: 7.80882e-8 kg; = p4184
- Sewage sludge dry matter; applied in sewage sludge: 5.71867e-10 kg; = p3243
- Methane: 2.25702e-6 kg; = p2025*1.3333333333
- Ammonium nitrate; broadcast w/o incorp. in fert. in spr. bef. plant.: 0.000169451 kg; = p2866*4.7142857143
- Potassium; in above-ground residue left on field; biogenic: 0.00719753 kg; = p2170
- Diammonium phosphate; broadcast w/o incorp. in fert. in spr. bef. plant.: 0.00216986 kg; = p2884*4.7142857143
- Superphosphate, grades<= 22%; broadcast w/o incorp. in fert. in spr. bef. plant.; kg P: 1.10456e-6 kg; = p2891
- Nitrogen solution; unspec. appl. method in fert. in fall bef. plant.; unspec. appl. method in fert. in fall bef. plan...: 2.00279e-5 kg; = p3029
- Plant dry matter; from residue burning: 0.000257032 kg; = p2164
- Ammonium sulfate; broadcast w/o incorp. in fert. in fall bef. plant.: 3.8754e-5 kg; = p2830*4.7142857143
- Aqueous ammonia; broadcast w/ incorp. in fert. in spr. bef. plant.: 2.06779e-6 kg; = p2669*1.2142857143
- Nitrogen solution; broadcast w/o incorp. in fert. in fall bef. plant.; broadcast w/o incorp. in fert. in fall bef. pl...: 0.000102923 kg; = p2834
- Anhydrous ammonia; broadcast w/ incorp. in fert. in fall bef. plant.: 5.86467e-5 kg; = p2628*1.2142857143
- isopentane: 1.21481e-8 kg; = p2151*1.0166666667
- Phosphorous; using unspec. method in manure at an unknown time: 0.000810861 kg; = p3471
- Superphosphate, grades>22%; broadcast w/o incorp. in fert. in fall bef. plant.; kg P: 5.22831e-5 kg; = p2854
- Potassium chloride; broadcast w/ incorp. in fert. in fall bef. plant.: 0.0044883 kg; = p2663*2.2166666667
- Other single K nutrients; broadcast w/ incorp. in fert. in fall bef. plant.; kg K: 0.000166321 kg; = p2665
- Nonvolatile constituents; broadcast w/o incorp. in man. at unknown time; exc.CNPK,biogenic: 0.000725517 kg; = p3417
- Sulfur [soil, agricultural]: 2.10145e-7 kg; = 1.0 * (p3230)
- Ammonium nitrate; broadcast w/ incorp. in fert. in fall bef. plant.: 3.76656e-5 kg; = p2632*4.7142857143
- cis-2-Butene: 3.08334e-8 kg; = p2149*1.1666666667
- Pesticide formulation balance; foliar or directed spray: 0.000105442 kg; = p4720
- Acrylonitrile: 2.40597e-8 kg; = p2156*1.4722222222
- Diammonium phosphate; broadcast w/ incorp. in fert. in spr. bef. plant.: 0.000924413 kg; = p2689*4.7142857143
- Superphosphate, grades<= 22%; broadcast w/o incorp. in fert. in fall bef. plant.; kg P: 1.21794e-6 kg; = p2852
- Potassium; in below-ground residue; biogenic: 0.00269353 kg; = p2176
- Phosphorous; in below-ground residue: 0.00080889 kg; = p2175
- Volatile constituents; broadcast w/o incorp. in man. at unknown time: 0.00478618 kg; = p3416
- Gypsum: 1.38273e-6 kg; = p3229
- Pesticide formulation balance; broadcast with incorporation: 6.88197e-5 kg; = p4102
- Oxygen; applied in dolomite: 0.00469832 kg; = p3228
- Toluene [air, non-urban air or from high stacks]: 1.36716e-7 kg; = 1.0 * (p2141*1.0952380952)
- Phosphorous; in above-ground residue left on field: 0.00216148 kg; = p2169
- Propane [air, non-urban air or from high stacks]: 2.02154e-7 kg; = 1.0 * (p2142*1.2222222222)
- Potassium; broadcast w/o incorp. in manure at an unknown time: 0.00106746 kg; = p3415
- Hydrocyanic acid: 2.04768e-7 kg; = p2154*2.25
- Butane [air, non-urban air or from high stacks]: 4.36077e-8 kg; = 1.0 * (p2147*1.0208333333)
- Ethyne [air, non-urban air or from high stacks]: 1.95383e-7 kg; = 1.0 * (p2132*1.0833333333)
- Other single K nutrients; broadcast w/o incorp. in fert. in fall bef. plant.; kg K: 0.00030819 kg; = p2860
- Glycolaldehyde; from residue burning: 1.44613e-6 kg; = p2135*2.5
- Sulfur dioxide [air, non-urban air or from high stacks]: 1.11973e-6 kg; = 1.0 * (p2041)
- Nitrogen dioxide: 2.26899e-6 kg; = p2039*3.2857142857
- Glyphosate [soil, agricultural]: 0.000323414 kg; = 1.0 * (p5234+p4616+p4204+p3998)
- Chlorimuron-ethyl [soil, agricultural]: 5.14347e-7 kg; = 1.0 * (p4140+p4552+p3934+p5170)
- Nonvolatile constituents; using unspec. method in man. at unknown time; exc.CNPK,biogenic: 0.00211491 kg; = p3474
- Superphosphate, grades>22%; broadcast w/ incorp. in fert. in fall bef. plant.; kg P: 2.22739e-5 kg; = p2659
- Fluazifop-P-butyl [soil, agricultural]: 6.61303e-7 kg; = 1.0 * (p4600+p5218+p3982+p4188)
- Tribenuron-methyl [soil, agricultural]: 3.6739e-8 kg; = 1.0 * (p5329+p4711+p4299+p4093)
- Nitrogen solution; broadcast w/ incorp. in fert. in spr. bef. plant.; broadcast w/ incorp. in fert. in spr. bef. plan...: 7.7994e-5 kg; = p2678
- Carbon dioxide, in air: 0.000930733 kg; = p2163*3.6666666667
- Furan [air, non-urban air or from high stacks]: 7.85179e-8 kg; = 1.0 * (p2138*1.4166666667)
- Fenoxaprop P; unspec. appl. method: 7.29236e-9 kg; = p5214
- Glyphosate diammonium salt; foliar or directed spray: 1.28259e-5 kg; = p4617
- Particulates, < 2.5 um [air, non-urban air or from high stacks]: 4.44304e-6 kg; = 1.0 * (p2033+p2035)
- Urea; broadcast w/ incorp. in fert. in spr. bef. plant.: 0.00014529 kg; = p2685*5
- Volatile constituents; injected/knifed in man. at unknown time: 0.00137363 kg; = p3435
- Fomesafen [soil, agricultural]: 2.93912e-6 kg; = 1.0 * (p4610+p5228+p4198+p3992)
- Propene [air, non-urban air or from high stacks]: 4.85236e-7 kg; = 1.0 * (p2136*1.1666666667)
- Sulfentrazone [soil, agricultural]: 3.37999e-6 kg; = 1.0 * (p4693+p4281+p5311+p4075)
- Pentane [air, non-urban air or from high stacks]: 1.51851e-8 kg; = 1.0 * (p2152*1.0166666667)
- Formaldehyde [air, non-urban air or from high stacks]: 1.49217e-6 kg; = 1.0 * (p2128*2.5)
- Ammonium sulfate; broadcast w/o incorp. in fert. in spr. bef. plant.: 7.1555e-5 kg; = p2869*4.7142857143
- Aqueous ammonia; unspec. appl. method in fert. in spr. bef. plant.: 9.80402e-7 kg; = p3059*1.2142857143
- Other single phosphates; broadcast w/ incorp. in fert. in spr. bef. plant.; kg P: 1.00709e-5 kg; = p2700
- Phosphorous; applied in sewage sludge: 6.16634e-10 kg; = p3241
- Sodium nitrate; broadcast w/ incorp. in fert. in spr. bef. plant.: 7.13695e-7 kg; = p2681*6.0714285714
- Cloransulam-methyl [soil, agricultural]: 4.04129e-7 kg; = 1.0 * (p3942+p5178+p4148+p4560)
- Nitrogen; applied in sewage sludge: 5.16546e-9 kg; = p3240
- Urea; broadcast w/ incorp. in fert. in fall bef. plant.: 7.86887e-5 kg; = p2646*5
- Monoammonium phosphate; broadcast w/ incorp. in fert. in spr. bef. plant.: 0.000469548 kg; = p2693*8.2142857143
- Lactofen [soil, agricultural]: 7.7152e-7 kg; = 1.0 * (p4630+p4012+p5248+p4218)
- Nitrogen solution; broadcast w/o incorp. in fert. in spr. bef. plant.; broadcast w/o incorp. in fert. in spr. bef. pl...: 0.000190036 kg; = p2873
- Ammonium nitrate; broadcast w/ incorp. in fert. in spr. bef. plant.: 6.95454e-5 kg; = p2671*4.7142857143
- Anhydrous ammonia; broadcast w/o incorp. in fert. in fall bef. plant.: 0.000142896 kg; = p2823*1.2142857143
- Imazamox [soil, agricultural]: 6.98042e-7 kg; = 1.0 * (p4622+p5240+p4004+p4210)
- Urea; unspec. appl. method in fert. in fall bef. plant.: 3.73088e-5 kg; = p3036*5
- Anhydrous ammonia; unspec. appl. method in fert. in spr. bef. plant.: 5.13412e-5 kg; = p3057*1.2142857143
- Acetol; from residue burning: 2.70261e-6 kg; = p2134*2.0555555556
- Phosphorous; broadcast w/o incorp. in manure at an unknown time: 0.000278165 kg; = p3414
- 2,4-D [soil, agricultural]: 2.49825e-5 kg; = 1.0 * (p4515+p4103+p3897+p5133)
- Other single phosphates; broadcast w/o incorp. in fert. in spr. bef. plant.; kg P: 2.36392e-5 kg; = p2895
- Butadiene [air, non-urban air or from high stacks]: 1.083e-7 kg; = 1.0 * (p2143*1.125)
- Potassium chloride; broadcast w/ incorp. in fert. in spr. bef. plant.: 0.00450673 kg; = p2702*2.2166666667
- Imazethapyr [soil, agricultural]: 2.1676e-6 kg; = 1.0 * (p4007+p4625+p4213+p5243)
- Acifluorfen [soil, agricultural]: 1.28587e-6 kg; = 1.0 * (p5145+p4115+p4527+p3909)
- Diammonium phosphate; broadcast w/ incorp. in fert. in fall bef. plant.: 0.0010193 kg; = p2650*4.7142857143
- Monoammonium phosphate; broadcast w/o incorp. in fert. in fall bef. plant.: 0.0012153 kg; = p2849*8.2142857143
- Water: 0.770648 kg; = p2178+p2171+p3437+p3418+p3475+p2181
- Acetaldehyde [air, non-urban air or from high stacks]: 8.92729e-7 kg; = 1.0 * (p2130*1.8333333333)
- Glyphosate diammonium salt; unspec. appl. method: 1.28762e-7 kg; = p5235
- Nitrogen solution; broadcast w/ incorp. in fert. in fall bef. plant.; broadcast w/ incorp. in fert. in fall bef. plan...: 4.22413e-5 kg; = p2639
- Fenoxaprop P; broadcast with incorporation: 4.74098e-7 kg; = p3978
- Other limestone constituents; applied in limestone: 0.0036103 kg; = p3220
- Isoprene [air, non-urban air or from high stacks]: 2.70842e-7 kg; = 1.0 * (p2145*1.1333333333)
- Particulates, < 10 um: 6.36668e-6 kg; = p2036+p2034
- Pesticides, unspecified [soil, agricultural]: 2.56159e-5 kg; = 1.0 * (p4101+p4719+p5337+p4307)
- Methyl vinyl ether; from residue burning: 5.44409e-8 kg; = p2137*1.6111111111
- Calcium [soil, agricultural]: 0.0247479 kg; = 1.0 * (p3226+p3218)
- Nitrogen; using unspec. method in manure at an unknown time: 0.00239057 kg; = p3470
- Ethene [air, non-urban air or from high stacks]: 1.04437e-6 kg; = 1.0 * (p2125*1.1666666667)
- Carbon [soil, agricultural]: 0.478281 kg; = 1.0 * (p3412+p2173+p3431+p3217+p3469+p3225+p3242+p2167)
- Pendimethalin [soil, agricultural]: 3.53797e-5 kg; = 1.0 * (p4046+p4252+p5282+p4664)
- Superphosphate, grades<= 22%; broadcast w/ incorp. in fert. in spr. bef. plant.; kg P: 4.70571e-7 kg; = p2696
- Nonvolatile constituents; injected/knifed in man. at unknown time; exc.CNPK,biogenic: 0.000208223 kg; = p3436
- Pesticide formulation balance; broadcast without incorporation: 1.13352e-5 kg; = p4308
- Ammonium sulfate; broadcast w/ incorp. in fert. in fall bef. plant.: 1.59053e-5 kg; = p2635*4.7142857143
- Methanol [air, non-urban air or from high stacks]: 2.35903e-6 kg; = 1.0 * (p2129*2.6666666667)
- Ammonium nitrate; unspec. appl. method in fert. in spr. bef. plant.: 3.29736e-5 kg; = p3061*4.7142857143

## Sampling procedure
A delete-a-group jackknife is used by the USDA to estimate the ARMS sample means and RSEs, based on a 15 sample delete-a-group jackknife. Because of this relatively small sample size, a Students t distribution is used to represent ARMS data probability density functions. Other representations of uncertainty are described in Cooper, J.S., Kahn, E., Noon, M. (2012). LCA Digital Commons Unit Process Data: field crop production Version 1. Prepared for the US Department of Agriculture National Agricultural Library. Retrieved from https://www.lcacommons.gov/discovery/docs/LCA%20Digital%20Commons%20Unit%20Process%20Data%20final%20updated.pdf

## Extrapolations
Data represent an aggregation of processes applied in Illinois in 2002. Data development is demonstrated by parameterization (exlicitly presents all raw and uncertainty data and all calculations). Flow data quality according to the LCADC convention is provided for all flows.
