# corn grain; at harvest in 1999; at farm; 85%-91% moisture

Dataset: EcoSpold 2, unit process
Geography: GLO
Time period: 1999-01-02 to 2000-01-01
Scenario: Business-as-Usual
System model: Allocation, ecoinvent default
Generated by: cooperjs@u.washington.edu
isCopyrightProtected: false

## General comment
This unit process/ gate-to-gate dataset represents the production of 1 kg corn coproduced with silage and residue. The process technologies are an aggregation of those applied in Illinois in 1999. Applicable classifications include ISIC 0111, NAIC 111150, UNSPSC 50403200; this dataset was prepared in ILCD format using the UWDFE Lab Excel to ILCD File Generator (beta version, August 2013)

Exchange "Prosulfuron-soil agricultural" is the result of combining the following original LCA Commons flows: "Prosulfuron; foliar or directed spray; kg AI", "Prosulfuron; banded or side-dressed; kg AI", "Prosulfuron; broadcast with incorporation; kg AI", "Prosulfuron; in seed furrow; kg AI", "Prosulfuron; unspec. appl. method; kg AI", "Prosulfuron; broadcast without incorporation; kg AI".
Exchange "Cyanazine-soil agricultural" is the result of combining the following original LCA Commons flows: "Cyanazine; banded or side-dressed; kg AI", "Cyanazine; in seed furrow; kg AI", "Cyanazine; unspec. appl. method; kg AI", "Cyanazine; foliar or directed spray; kg AI", "Cyanazine; broadcast without incorporation; kg AI", "Cyanazine; broadcast with incorporation; kg AI".
Exchange "Terbufos-soil agricultural" is the result of combining the following original LCA Commons flows: "Terbufos; broadcast without incorporation; kg AI", "Terbufos; broadcast with incorporation; kg AI", "Terbufos; banded or side-dressed; kg AI", "Terbufos; unspec. appl. method; kg AI", "Terbufos; foliar or directed spray; kg AI", "Terbufos; in seed furrow; kg AI".
Exchange "Bentazone-soil agricultural" is the result of combining the following original LCA Commons flows: "Bentazon; broadcast without incorporation; kg AI", "Bentazon; unspec. appl. method; kg AI", "Bentazon; in seed furrow; kg AI", "Bentazon; foliar or directed spray; kg AI", "Bentazon; broadcast with incorporation; kg AI", "Bentazon; banded or side-dressed; kg AI".
Exchange "Tefluthrin-soil agricultural" is the result of combining the following original LCA Commons flows: "Tefluthrin; broadcast without incorporation; kg AI", "Tefluthrin; foliar or directed spray; kg AI", "Tefluthrin; in seed furrow; kg AI", "Tefluthrin; unspec. appl. method; kg AI", "Tefluthrin; broadcast with incorporation; kg AI", "Tefluthrin; banded or side-dressed; kg AI".
Exchange "NMVOC, non-methane volatile organic compounds, unspecified origin-air low population density" is the result of combining the following original LCA Commons flows: "NMVOCs; from residue burning; kg C, biogenic", "NMVOCs; from residue burning; kg except C, biogenic".
Exchange "Glyphosate-soil agricultural" is the result of combining the following original LCA Commons flows: "Glyphosate; broadcast with incorporation; kg AI", "Glyphosate; banded or side-dressed; kg AI", "Glyphosate; unspec. appl. method; kg AI", "Glyphosate; in seed furrow; kg AI", "Glyphosate; foliar or directed spray; kg AI", "Glyphosate; broadcast without incorporation; kg AI".
Exchange "Simazine-soil agricultural" is the result of combining the following original LCA Commons flows: "Simazine; banded or side-dressed; kg AI", "Simazine; foliar or directed spray; kg AI", "Simazine; broadcast without incorporation; kg AI", "Simazine; in seed furrow; kg AI", "Simazine; unspec. appl. method; kg AI", "Simazine; broadcast with incorporation; kg AI".
Exchange "Imazethapyr-soil agricultural" is the result of combining the following original LCA Commons flows: "Imazethapyr; broadcast without incorporation; kg AI", "Imazethapyr; in seed furrow; kg AI", "Imazethapyr; foliar or directed spray; kg AI", "Imazethapyr; broadcast with incorporation; kg AI", "Imazethapyr; unspec. appl. method; kg AI", "Imazethapyr; banded or side-dressed; kg AI".
Exchange "Dicamba-soil agricultural" is the result of combining the following original LCA Commons flows: "Dicamba; broadcast without incorporation; kg AI", "Dicamba; broadcast with incorporation; kg AI", "Dicamba; unspec. appl. method; kg AI", "Dicamba; in seed furrow; kg AI", "Dicamba; foliar or directed spray; kg AI", "Dicamba; banded or side-dressed; kg AI".
Exchange "Pyridate-soil agricultural" is the result of combining the following original LCA Commons flows: "Pyridate; in seed furrow; kg AI", "Pyridate; unspec. appl. method; kg AI", "Pyridate; foliar or directed spray; kg AI", "Pyridate; banded or side-dressed; kg AI", "Pyridate; broadcast without incorporation; kg AI", "Pyridate; broadcast with incorporation; kg AI".
Exchange "Nicosulfuron-soil agricultural" is the result of combining the following original LCA Commons flows: "Nicosulfuron; banded or side-dressed; kg AI", "Nicosulfuron; foliar or directed spray; kg AI", "Nicosulfuron; unspec. appl. method; kg AI", "Nicosulfuron; broadcast with incorporation; kg AI", "Nicosulfuron; in seed furrow; kg AI", "Nicosulfuron; broadcast without incorporation; kg AI".
Exchange "Tebupirimphos-soil agricultural" is the result of combining the following original LCA Commons flows: "Tebupirimfos; banded or side-dressed; kg AI", "Tebupirimfos; foliar or directed spray; kg AI", "Tebupirimfos; in seed furrow; kg AI", "Tebupirimfos; broadcast with incorporation; kg AI", "Tebupirimfos; broadcast without incorporation; kg AI", "Tebupirimfos; unspec. appl. method; kg AI".
Exchange "Permethrin-soil agricultural" is the result of combining the following original LCA Commons flows: "Permethrin, mixed cis,trans; broadcast without incorporation; kg AI", "Permethrin, mixed cis,trans; broadcast with incorporation; kg AI", "Permethrin, mixed cis,trans; foliar or directed spray; kg AI", "Permethrin, mixed cis,trans; in seed furrow; kg AI", "Permethrin, mixed cis,trans; unspec. appl. method; kg AI", "Permethrin, mixed cis,trans; banded or side-dressed; kg AI".
Exchange "Carbon-soil agricultural" is the result of combining the following original LCA Commons flows: "Carbon; in above-ground residue left on field; biogenic", "Carbon; applied in limestone", "Carbon; applied in dolomite", "Carbon; using unspec. method in manure at an unknown time", "Carbon; broadcast w/o incorp. in manure at an unknown time", "Carbon; in below-ground residue; biogenic", "Carbon; broadcast w/ incorp. in manure at an unknown time", "Carbon; applied in sewage sludge".
Exchange "Particulates, < 2.5 um-air low population density" is the result of combining the following original LCA Commons flows: "PM2.5; from residue burning; kg except C, biogenic", "PM2.5; from residue burning; kg C, biogenic".
Exchange "Dimethenamid-soil agricultural" is the result of combining the following original LCA Commons flows: "Dimethenamid; unspec. appl. method; kg AI", "Dimethenamid; banded or side-dressed; kg AI", "Dimethenamid; broadcast with incorporation; kg AI", "Dimethenamid; foliar or directed spray; kg AI", "Dimethenamid; in seed furrow; kg AI", "Dimethenamid; broadcast without incorporation; kg AI".
Exchange "Chlorpyrifos-soil agricultural" is the result of combining the following original LCA Commons flows: "Chlorpyrifos; broadcast without incorporation; kg AI", "Chlorpyrifos; broadcast with incorporation; kg AI", "Chlorpyrifos; foliar or directed spray; kg AI", "Chlorpyrifos; banded or side-dressed; kg AI", "Chlorpyrifos; in seed furrow; kg AI", "Chlorpyrifos; unspec. appl. method; kg AI".
Exchange "Pesticides, unspecified-soil agricultural" is the result of combining the following original LCA Commons flows: "Unspecified pesticide; unspec. appl. method; kg AI", "Unspecified pesticide; broadcast without incorporation; kg AI", "Unspecified pesticide; in seed furrow; kg AI", "Unspecified pesticide; banded or side-dressed; kg AI", "Unspecified pesticide; foliar or directed spray; kg AI", "Unspecified pesticide; broadcast with incorporation; kg AI".
Exchange "Rimsulfuron-soil agricultural" is the result of combining the following original LCA Commons flows: "Rimsulfuron; banded or side-dressed; kg AI", "Rimsulfuron; unspec. appl. method; kg AI", "Rimsulfuron; broadcast without incorporation; kg AI", "Rimsulfuron; foliar or directed spray; kg AI", "Rimsulfuron; in seed furrow; kg AI", "Rimsulfuron; broadcast with incorporation; kg AI".
Exchange "Ash-soil agricultural" is the result of combining the following original LCA Commons flows: "Ash; from residue burning; kg C, biogenic", "Ash; from residue burning; kg except C, biogenic".
Exchange "Isoxaflutole-soil agricultural" is the result of combining the following original LCA Commons flows: "Isoxaflutole; in seed furrow; kg AI", "Isoxaflutole; broadcast with incorporation; kg AI", "Isoxaflutole; foliar or directed spray; kg AI", "Isoxaflutole; unspec. appl. method; kg AI", "Isoxaflutole; banded or side-dressed; kg AI", "Isoxaflutole; broadcast without incorporation; kg AI".
Exchange "Acetochlor-soil agricultural" is the result of combining the following original LCA Commons flows: "Acetochlor; broadcast with incorporation; kg AI", "Acetochlor; unspec. appl. method; kg AI", "Acetochlor; broadcast without incorporation; kg AI", "Acetochlor; banded or side-dressed; kg AI", "Acetochlor; in seed furrow; kg AI", "Acetochlor; foliar or directed spray; kg AI".
Exchange "Water-soil agricultural" is the result of combining the following original LCA Commons flows: "Water; broadcast w/ incorp. in manure", "Water; using unspec. method in manure", "Water; from irrigation and applied with manure and sewage sludge", "Water; in above-ground residue left on field; biogenic", "Water; broadcast w/o incorp. in manure", "Water; in below-ground residue; biogenic".
Exchange "Pendimethalin-soil agricultural" is the result of combining the following original LCA Commons flows: "Pendimethalin; unspec. appl. method; kg AI", "Pendimethalin; broadcast with incorporation; kg AI", "Pendimethalin; banded or side-dressed; kg AI", "Pendimethalin; in seed furrow; kg AI", "Pendimethalin; foliar or directed spray; kg AI", "Pendimethalin; broadcast without incorporation; kg AI".
Exchange "Clopyralid-soil agricultural" is the result of combining the following original LCA Commons flows: "Clopyralid; broadcast without incorporation; kg AI", "Clopyralid; foliar or directed spray; kg AI", "Clopyralid; unspec. appl. method; kg AI", "Clopyralid; broadcast with incorporation; kg AI", "Clopyralid; banded or side-dressed; kg AI", "Clopyralid; in seed furrow; kg AI".
Exchange "Primisulfuron-soil agricultural" is the result of combining the following original LCA Commons flows: "Primisulfuron-methyl; broadcast with incorporation; kg AI", "Primisulfuron-methyl; broadcast without incorporation; kg AI", "Primisulfuron-methyl; in seed furrow; kg AI", "Primisulfuron-methyl; foliar or directed spray; kg AI", "Primisulfuron-methyl; unspec. appl. method; kg AI", "Primisulfuron-methyl; banded or side-dressed; kg AI".
Exchange "Water, unspecified origin-resource in water" is the result of combining the following original LCA Commons flows: "Water; from plant uptake; biogenic", "Water; withdrawal from unspec. source, for corn, in 1999".
Exchange "Diflufenzopyr-sodium-soil agricultural" is the result of combining the following original LCA Commons flows: "Diflufenzopyr-sodium; unspec. appl. method; kg AI", "Diflufenzopyr-sodium; foliar or directed spray; kg AI", "Diflufenzopyr-sodium; in seed furrow; kg AI", "Diflufenzopyr-sodium; banded or side-dressed; kg AI", "Diflufenzopyr-sodium; broadcast without incorporation; kg AI", "Diflufenzopyr-sodium; broadcast with incorporation; kg AI".
Exchange "Metolachlor-soil agricultural" is the result of combining the following original LCA Commons flows: "Propazine; foliar or directed spray; kg AI", "Propazine; in seed furrow; kg AI", "Propazine; broadcast with incorporation; kg AI", "Propazine; broadcast without incorporation; kg AI", "Propazine; banded or side-dressed; kg AI", "Propazine; unspec. appl. method; kg AI".
Exchange "Particulates, < 10 um-air low population density" is the result of combining the following original LCA Commons flows: "PM10; from residue burning; kg except C, biogenic", "PM10; from residue burning; kg C, biogenic".
Exchange "Cyfluthrin-soil agricultural" is the result of combining the following original LCA Commons flows: "Beta-Cyfluthrin; broadcast with incorporation; kg AI", "Beta-Cyfluthrin; broadcast without incorporation; kg AI", "Beta-Cyfluthrin; unspec. appl. method; kg AI", "Beta-Cyfluthrin; in seed furrow; kg AI", "Beta-Cyfluthrin; foliar or directed spray; kg AI", "Beta-Cyfluthrin; banded or side-dressed; kg AI".
Exchange "Bromoxynil-soil agricultural" is the result of combining the following original LCA Commons flows: "Bromoxynil; broadcast without incorporation; kg AI", "Bromoxynil; banded or side-dressed; kg AI", "Bromoxynil; foliar or directed spray; kg AI", "Bromoxynil; broadcast with incorporation; kg AI", "Bromoxynil; in seed furrow; kg AI", "Bromoxynil; unspec. appl. method; kg AI".
Exchange "Flumetsulam-soil agricultural" is the result of combining the following original LCA Commons flows: "Flumetsulam; broadcast without incorporation; kg AI", "Flumetsulam; foliar or directed spray; kg AI", "Flumetsulam; unspec. appl. method; kg AI", "Flumetsulam; banded or side-dressed; kg AI", "Flumetsulam; in seed furrow; kg AI", "Flumetsulam; broadcast with incorporation; kg AI".
Exchange "Atrazine-soil agricultural" is the result of combining the following original LCA Commons flows: "Atrazine; banded or side-dressed; kg AI", "Atrazine; in seed furrow; kg AI", "Atrazine; broadcast with incorporation; kg AI", "Atrazine; unspec. appl. method; kg AI", "Atrazine; foliar or directed spray; kg AI", "Atrazine; broadcast without incorporation; kg AI".
Exchange "Transformation, from arable-resource land" is the result of combining the following original LCA Commons flows: "Transformation; from arable, from corn to corn", "Transformation; from arable, from other to corn", "Transformation; from arable, from soy to corn", "Transformation; from arable, from unspec. use to corn".
Exchange "Calcium-soil agricultural" is the result of combining the following original LCA Commons flows: "Calcium; applied in limestone", "Calcium; applied in dolomite".
Exchange "Lambda-cyhalothrin-soil agricultural" is the result of combining the following original LCA Commons flows: "Lambda-cyhalothrin; banded or side-dressed; kg AI", "Lambda-cyhalothrin; broadcast without incorporation; kg AI", "Lambda-cyhalothrin; foliar or directed spray; kg AI", "Lambda-cyhalothrin; unspec. appl. method; kg AI", "Lambda-cyhalothrin; in seed furrow; kg AI", "Lambda-cyhalothrin; broadcast with incorporation; kg AI".
Exchange "2,4-D-soil agricultural" is the result of combining the following original LCA Commons flows: "2,4-D; broadcast without incorporation; kg AI", "2,4-D; in seed furrow; kg AI", "2,4-D; unspec. appl. method; kg AI", "2,4-D; banded or side-dressed; kg AI", "2,4-D; broadcast with incorporation; kg AI", "2,4-D; foliar or directed spray; kg AI".
Exchange "Paraquat dichloride-soil unspecified" is the result of combining the following original LCA Commons flows: "Paraquat dichloride; in seed furrow; kg AI", "Paraquat dichloride; broadcast with incorporation; kg AI", "Paraquat dichloride; foliar or directed spray; kg AI", "Paraquat dichloride; banded or side-dressed; kg AI", "Paraquat dichloride; broadcast without incorporation; kg AI", "Paraquat dichloride; unspec. appl. method; kg AI".
Exchange "Water-2bdf9967-6dae-4183-88d1-8f612548c51e low population density" was originally named: "Water; from residue burning; biogenic" in this dataset.
Exchange "Butadiene-2bdf9967-6dae-4183-88d1-8f612548c51e low population density" was originally named: "1,3 butadiene; from residue burning; kg C, biogenic" in this dataset.
Exchange "Carbon dioxide, in air-2bdf9967-6dae-4183-88d1-8f612548c51e low population density" was originally named: "Carbon dioxide; from residue burning; kg C, biogenic" in this dataset.
Exchange "isopentane-2bdf9967-6dae-4183-88d1-8f612548c51e low population density" was originally named: "I pentane; from residue burning; kg C, biogenic" in this dataset.
Exchange "Ethene-2bdf9967-6dae-4183-88d1-8f612548c51e low population density" was originally named: "Ethylene; from residue burning; kg C, biogenic" in this dataset.
Exchange "Formaldehyde-2bdf9967-6dae-4183-88d1-8f612548c51e low population density" was originally named: "Formaldehyde; from residue burning; kg C, biogenic" in this dataset.
Exchange "Propene-2bdf9967-6dae-4183-88d1-8f612548c51e low population density" was originally named: "Propylene; from residue burning; kg C, biogenic" in this dataset.
Exchange "Acrylonitrile-2bdf9967-6dae-4183-88d1-8f612548c51e low population density" was originally named: "Propenenitrile; from residue burning; kg C, biogenic" in this dataset.
Exchange "Sulfur dioxide-2bdf9967-6dae-4183-88d1-8f612548c51e low population density" was originally named: "Sulfur dioxide; from residue burning; biogenic" in this dataset.
Exchange "isobutene-2bdf9967-6dae-4183-88d1-8f612548c51e low population density" was originally named: "I butene; from residue burning; kg C, biogenic" in this dataset.
Exchange "Formic acid-2bdf9967-6dae-4183-88d1-8f612548c51e low population density" was originally named: "Formic acid; from residue burning; kg C, biogenic" in this dataset.
Exchange "Nitrogen dioxide-2bdf9967-6dae-4183-88d1-8f612548c51e low population density" was originally named: "Nitrogen dioxide; from residue burning; kg N, biogenic" in this dataset.
Exchange "Sulfuric acid-be1c0329-f1a8-4524-8420-a86d2a8dd358 agricultural" was originally named: "Sulfuric acid; as secondary application" in this dataset.
Exchange "Carbon monoxide, fossil-2bdf9967-6dae-4183-88d1-8f612548c51e low population density" was originally named: "Carbon monoxide; from residue burning; kg C, biogenic" in this dataset.
Exchange "Transformation, to arable-c19fb2d9-98eb-4cd3-8761-81b71d8a9a1b land" was originally named: "Transformation; to arable, to corn" in this dataset.
Exchange "Ammonia-2bdf9967-6dae-4183-88d1-8f612548c51e low population density" was originally named: "Ammonia; from residue burning; kg N, biogenic" in this dataset.
Exchange "Phosphorus-c19fb2d9-98eb-4cd3-8761-81b71d8a9a1b unspecified" was originally named: "Phosphorous; from plant uptake; biogenic" in this dataset.
Exchange "Propane-2bdf9967-6dae-4183-88d1-8f612548c51e low population density" was originally named: "Propane; from residue burning; kg C, biogenic" in this dataset.
Exchange "Pentane-2bdf9967-6dae-4183-88d1-8f612548c51e low population density" was originally named: "N pentane; from residue burning; kg C, biogenic" in this dataset.
Exchange "1-Butene-2bdf9967-6dae-4183-88d1-8f612548c51e low population density" was originally named: "1 butene; from residue burning; kg C, biogenic" in this dataset.
Exchange "Acetic acid-2bdf9967-6dae-4183-88d1-8f612548c51e low population density" was originally named: "Acetic acid; from residue burning; kg C, biogenic" in this dataset.
Exchange "Acetonitrile-2bdf9967-6dae-4183-88d1-8f612548c51e low population density" was originally named: "Acetonitrile; from residue burning; kg C, biogenic" in this dataset.
Exchange "Toluene-2bdf9967-6dae-4183-88d1-8f612548c51e low population density" was originally named: "Toluene; from residue burning; kg C, biogenic" in this dataset.
Exchange "Carbon dioxide-c19fb2d9-98eb-4cd3-8761-81b71d8a9a1b unspecified" was originally named: "Carbon dioxide; from plant uptake; kg C, biogenic" in this dataset.
Exchange "Ethane-2bdf9967-6dae-4183-88d1-8f612548c51e low population density" was originally named: "Ethane; from residue burning; kg C, biogenic" in this dataset.
Exchange "Water, ground-c19fb2d9-98eb-4cd3-8761-81b71d8a9a1b in water" was originally named: "Water; withdrawal from groundwater, for corn, in 1999" in this dataset.
Exchange "Occupation, arable-c19fb2d9-98eb-4cd3-8761-81b71d8a9a1b land" was originally named: "Occupation; arable, as corn" in this dataset.
Exchange "Acetone-2bdf9967-6dae-4183-88d1-8f612548c51e low population density" was originally named: "Acetone; from residue burning; kg C, biogenic" in this dataset.
Exchange "Magnesium-be1c0329-f1a8-4524-8420-a86d2a8dd358 agricultural" was originally named: "Magnesium; applied in dolomite" in this dataset.
Exchange "Acetaldehyde-2bdf9967-6dae-4183-88d1-8f612548c51e low population density" was originally named: "Acetaldehyde; from residue burning; kg C, biogenic" in this dataset.
Exchange "Phenol-2bdf9967-6dae-4183-88d1-8f612548c51e low population density" was originally named: "Phenol; from residue burning; kg C, biogenic" in this dataset.
Exchange "Dinitrogen monoxide-2bdf9967-6dae-4183-88d1-8f612548c51e low population density" was originally named: "Dinitrogen monoxide; from residue burning; kg N, biogenic" in this dataset.
Exchange "Butane-2bdf9967-6dae-4183-88d1-8f612548c51e low population density" was originally named: "N butane; from residue burning; kg C, biogenic" in this dataset.
Exchange "Methanol-2bdf9967-6dae-4183-88d1-8f612548c51e low population density" was originally named: "Methanol; from residue burning; kg C, biogenic" in this dataset.
Exchange "Zinc compounds-be1c0329-f1a8-4524-8420-a86d2a8dd358 agricultural" was originally named: "Zinc compounds; as secondary application" in this dataset.
Exchange "Sulfur-be1c0329-f1a8-4524-8420-a86d2a8dd358 agricultural" was originally named: "Sulfur; as secondary application" in this dataset.
Exchange "Ethyne-2bdf9967-6dae-4183-88d1-8f612548c51e low population density" was originally named: "Acetylene; from residue burning; kg C, biogenic" in this dataset.
Exchange "trans-2-Butene-2bdf9967-6dae-4183-88d1-8f612548c51e low population density" was originally named: "Trans 2 butene; from residue burning; kg C, biogenic" in this dataset.
Exchange "Benzene-2bdf9967-6dae-4183-88d1-8f612548c51e low population density" was originally named: "Benzene; from residue burning; kg C, biogenic" in this dataset.
Exchange "Furan-2bdf9967-6dae-4183-88d1-8f612548c51e low population density" was originally named: "Furan; from residue burning; kg C, biogenic" in this dataset.
Exchange "Methane-2bdf9967-6dae-4183-88d1-8f612548c51e low population density" was originally named: "Methane; from residue burning; kg C, biogenic" in this dataset.
Exchange "Isoprene-2bdf9967-6dae-4183-88d1-8f612548c51e low population density" was originally named: "Isoprene; from residue burning; kg C, biogenic" in this dataset.
Exchange "cis-2-Butene-2bdf9967-6dae-4183-88d1-8f612548c51e low population density" was originally named: "Cis 2 butene; from residue burning; kg C, biogenic" in this dataset.
Exchange "Hydrocyanic acid-2bdf9967-6dae-4183-88d1-8f612548c51e low population density" was originally named: "Hydrogen cyanide; from residue burning; kg C, biogenic" in this dataset.

## Geography
The unit process is assumed to represent production in Illinois (US State).

## Technology
This process produces corn grain; at harvest in 1999; at farm; 85%-91% moisture. The process is assumed to represent production in Illinois (US State). Yields and related inputs and outputs represent a single year of operation, in 1999. This dataset includes consideration of residue burning; soil preparation; planting or sowing; irrigation; application, storage, and transport of fertilizers, manures, liming materials, secondary materials, and pesticides; and harvest. Fate and transport of applications are not included as described in Cooper, J.S., Kahn, E., Noon, M. (2012) LCA Digital Commons Unit Process Data: field crop production Version 1 which is available at https://www.lcacommons.gov/discovery/docs/LCA%20Digital%20Commons%20Unit%20Process%20Data%20final%20updated.pdf

## Time period
Start and end dates match the underlying data obtained from the USDA Agricultural Resource Management Survey (ARMS).
## Parameters
- p2770: 0; = p2379*(p1078+p1080)
- p1789: 3.83252e-7; = p1381*1000/p0818
- p2647: 3.61594e-5; = p2256*(p1019+p1021)
- p1838: 0
- p2587: 0; = p2391*p1123
- p0847: -0.267484
- p0509: 0; = SQRT(2)*(IF((2*p0377-1)<0;-1;IF((2*p0377-1)>0;1;0))*SQRT(SQRT((2/(pi()*0.140012289)+LN(1-(2*p0377-1)^2)/2)^2-LN(1-(2*p0377-1)^2)/0.140012289)-(2/(pi()*0.140012289)+LN(1-(2*p0377-1)^2)/2)))
- p2323: 1.22027e-5; = p2224*p2190
- p0274: 0.5
- p3231: 2.01528e-8; = p1176/p0818
- p1567: 0.629912
- p2223: 0.369755; = if(p0765*p0769+p0766*p0770+p0767*p0771+p0768*p0772=0;0;p0770*p0766/(p0765*p0769+p0766*p0770+p0767*p0771+p0768*p0772))
- p0241: 8.282
- p1867: 5.86854e-7; = p1459*1000/p0818
- p4883: 0; = p1916*p3482
- p5181: 4.38996e-8; = p1802*p3484
- p0787: 62.405; = p0127*(1+p0655*p0259/100)
- p1319: 0.232603; = IF(((p0745*1000*p0746/100)+(p0754*1000*p0755/100))/p0801<0;0;((p0745*1000*p0746/100)+(p0754*1000*p0755/100))/p0801)
- p2880: 0.000262684; = p2294*(p1020+p1022)
- p3022: 0; = p2241*p1023
- p1645: 0
- p3206: 0; = p2425*p1082
- p0546: 0; = IF(p0282<0.5;-SQRT(p0007*EXP(p0414^2*p0008)-p0007);SQRT(p0007*EXP(p0414^2*p0008)-p0007))
- p3324: 0; = if(and(p1232=0;p3255<>0);p3266*(p3279*(p3284*p1256+p3286*(p1253+p1257)+p1258*p3288+p3299*p3287));0)
- p0837: 0.5
- p1753: 0
- p0916: 0.53639; = p0826+p0828+(p0832*(1+p0894))/p0818
- p0862: 0.00862167; = p0674*1000/p0856
- p0928: 3.12631e6; = p0801*p0918
- p0516: 0; = SQRT(2)*(IF((2*p0384-1)<0;-1;IF((2*p0384-1)>0;1;0))*SQRT(SQRT((2/(pi()*0.140012289)+LN(1-(2*p0384-1)^2)/2)^2-LN(1-(2*p0384-1)^2)/0.140012289)-(2/(pi()*0.140012289)+LN(1-(2*p0384-1)^2)/2)))
- p3171: 0; = p2390*p1132
- p3372: 0; = if(p1232=0;p3245*p3360/p0818;0)
- p0705: 28.084; = p0045*(1+p0573*p0177/100)
- p0671: 9216.62; = p0011*(1+p0539*p0143/100)
- p3148: 0; = p2367*p1023
- p2626: 0; = p2430*p1123
- p3183: 0; = p2402*p1023
- p0646: 0; = IF(p0382<0.5;-SQRT(p0007*EXP(p0514^2*p0008)-p0007);SQRT(p0007*EXP(p0514^2*p0008)-p0007))
- p3469: 0.000917393; = p3374*p1241
- p2768: 0; = p2377*(p1078+p1080)
- p3465: 0; = p3370*p1241
- p0088: 63.615
- p5187: 2.52815e-8; = p1808*p3484
- p0718: 35.267; = p0058*(1+p0586*p0190/100)
- p0744: 37.954; = p0084*(1+p0612*p0216/100)
- p0749: 19.861; = p0089*(1+p0617*p0221/100)
- p1877: 0
- p4982: 3.663e-7; = p1809*p3483
- p3015: 0; = p2429*(p1129+p1131)
- p0721: 1.929; = p0061*(1+p0589*p0193/100)
- p0053: 42.094
- p1946: 0
- p0345: 0.5
- p1323: 0; = IF(((p0745*1000*p0750/100)+(p0754*1000*p0759/100))/p0801<0;0;((p0745*1000*p0750/100)+(p0754*1000*p0759/100))/p0801)
- p1930: 0
- p2958: 0.000112574; = p2372*(p1020+p1022)
- p3468: 0; = p3373*p1241
- p1602: 0
- p0552: 0; = IF(p0288<0.5;-SQRT(p0007*EXP(p0420^2*p0008)-p0007);SQRT(p0007*EXP(p0420^2*p0008)-p0007))
- p2708: 1.16659e-6; = p2317*(p1019+p1021)
- p0731: 9.686; = p0071*(1+p0599*p0203/100)
- p1981: 400
- p2418: 0; = p2235*p2208
- p2049: 25.6942
- p0736: 0
- p1462: 7
- p1119: 0.0091941; = IF(p1071=0;p1109/(p1114*p0818);0)
- p2356: 2.44948e-5; = p2225*p2184
- p1672: 0
- p3249: 0
- p0934: 3.34056e-5; = p0928*p0001/(p0818*p0002)
- p0367: 0.5
- p4905: 0; = p1938*p3482
- p0614: 0; = IF(p0350<0.5;-SQRT(p0007*EXP(p0482^2*p0008)-p0007);SQRT(p0007*EXP(p0482^2*p0008)-p0007))
- p4320: 0; = p1765*p3480
- p4335: 0; = p1780*p3480
- p2399: 0; = p2234*p2188
- p3052: 1.23777e-5; = p2271*p1082
- p2036: 1.72091e-6; = p2015*p2030*(1-p2032)/(p0818*1000)
- p2591: 0; = p2395*p1014
- p1648: 0
- p3432: 0; = p3375*p1239
- p2240: 0.000238533; = p2222*p2185
- p1216: 0.155559
- p2387: 0; = p2229*p2216
- p1003: 0; = p0999*p0888
- p3350: 1.23675e7; = if(and(p1232=0;p3256<>0);p3256*(p3273*p3277-p3345)/p3349;0)
- p3717: 0; = p1780*p3477
- p1589: 0.897233
- p0578: 0; = IF(p0314<0.5;-SQRT(p0007*EXP(p0446^2*p0008)-p0007);SQRT(p0007*EXP(p0446^2*p0008)-p0007))
- p0079: 2.911
- p0091: 12.457
- p4269: 1.32116e-6; = p1920*p3479
- p2570: 0.000129794; = p2374*p1014
- p2203: 0.00291658; = p1070-p2200-p2201-p2202
- p3573: 2.48304e-8; = p1842*p3476
- p3124: 7.38754e-6; = p2343*p1082
- p2808: 0; = p2417*(p1078+p1080)
- p0956: 0; = if(and(p0683>0;or(p0807=56;p0807=100;and(p0807=60;p0901>0.06)));p0938;0)
- p1142: 0; = if(p1121=0;p1136*p0001/(p0818*p0002);0)
- p5295: 1.9598e-10; = p1916*p3484
- p2195: 0.00130728; = p2194*p2193
- p2067: 0.446471
- p2310: 0.00026437; = p2227*p2217
- p0299: 0.5
- p1554: 0
- p2946: 0.000144488; = p2360*(p1020+p1022)
- p3179: 0; = p2398*p1023
- p2579: 0; = p2383*p1073
- p5275: 3.72363e-9; = p1896*p3484
- p0690: 0
- p1285: 0; = p1281*p1252/p0818
- p2849: 9.01239e-5; = p2263*(p1079+p1081)
- p4265: 2.10376e-9; = p1916*p3479
- p1265: 0; = if(p1232>0;0;IF(p1259+p1263+p1264=1;0;IF(p1259+p1263+p1264+p1262>1;1-(p1259+p1263+p1264);p1262)))
- p0728: 0
- p1612: 0
- p1742: 0
- p3436: 0; = p3379*p1239
- p0634: 0; = IF(p0370<0.5;-SQRT(p0007*EXP(p0502^2*p0008)-p0007);SQRT(p0007*EXP(p0502^2*p0008)-p0007))
- p1846: 0
- p2701: 9.09433e-5; = p2310*(p1078+p1080)
- p2064: 0.676706
- p1890: 0
- p0871: 0.152335; = p0870*p0001*p0003/(p0818*p0002)
- p2987: 0; = p2401*(p1020+p1022)
- p1115: 0.237849
- p2429: 0; = p2236*p2219
- p1630: 0
- p2189: 0.000448169; = p1053/p0818
- p1824: 0
- p1583: 0
- p0640: 0; = IF(p0376<0.5;-SQRT(p0007*EXP(p0508^2*p0008)-p0007);SQRT(p0007*EXP(p0508^2*p0008)-p0007))
- p1447: 425
- p0840: 0.137825; = p0839*p0831
- p2169: 0.000317444; = p2166*(p0908)
- p2511: 5.07811e-5; = p2315*p1014
- p1150: 7.59314e8; = if(p1121=0;p1149*p1146*p1145;0)
- p0600: 0; = IF(p0336<0.5;-SQRT(p0007*EXP(p0468^2*p0008)-p0007);SQRT(p0007*EXP(p0468^2*p0008)-p0007))
- p0103: 10798.8
- p0833: 7.36097e10; = p0830+p0832
- p1905: 0
- p3095: 1.86869e-5; = p2314*p1132
- p3144: 0; = p2363*p1023
- p2319: 2.93126e-5; = p2224*p2186
- p0347: 0.5
- p0619: 0; = IF(p0355<0.5;-SQRT(p0007*EXP(p0487^2*p0008)-p0007);SQRT(p0007*EXP(p0487^2*p0008)-p0007))
- p2893: 3.21959e-5; = p2307*(p1079+p1081)
- p2832: 2.32271e-5; = p2246*(p1020+p1022)
- p4464: 0; = p1909*p3480
- p2723: 3.11163e-5; = p2332*(p1019+p1021)
- p2813: 0; = p2422*(p1078+p1080)
- p0766: 94.657; = p0106*(1+p0634*p0238/100)
- p2658: 3.61788e-5; = p2267*(p1078+p1080)
- p0346: 0.5
- p1860: 0
- p1935: 0
- p2574: 0; = p2378*p1073
- p2853: 4.42706e-5; = p2267*(p1079+p1081)
- p5234: 8.32917e-8; = p1855*p3484
- p4690: 7.13849e-7; = p1929*p3481
- p2170: 0.00483363; = p2166*(p0913)
- p3018: 0; = p2237*p1023
- p1683: 0
- p1252: 6.49987e9; = if(p1232>0;0;p0724*2000*p0723*1000*p0725/100)
- p3345: 0.160606; = if(and(p1232=0;p3256<>0);p3273*p3277*p3293;0)
- p0524: 0; = SQRT(2)*(IF((2*p0392-1)<0;-1;IF((2*p0392-1)>0;1;0))*SQRT(SQRT((2/(pi()*0.140012289)+LN(1-(2*p0392-1)^2)/2)^2-LN(1-(2*p0392-1)^2)/0.140012289)-(2/(pi()*0.140012289)+LN(1-(2*p0392-1)^2)/2)))
- p2706: 5.73665e-5; = p2315*(p1019+p1021)
- p2959: 1.6202e-5; = p2373*(p1020+p1022)
- p4926: 0; = p1963*p3482
- p0755: 35.427; = p0095*(1+p0623*p0227/100)
- p2106: 0.856281
- p3071: 0; = p2290*p1023
- p0379: 0.5
- p0553: 0; = IF(p0289<0.5;-SQRT(p0007*EXP(p0421^2*p0008)-p0007);SQRT(p0007*EXP(p0421^2*p0008)-p0007))
- p1255: 0; = if(p1232>0;0;p0737/100)
- p0158: 23.536
- p1082: 0.03038; = IF(p1071=0;IF(p1073+p1078+p1079+p1080+p1081=1;0;1-(p1073+p1078+p1079+p1080+p1081));0)
- p0951: 0; = if(and(p0683=0;or(p0807=480;p0807=32;p0807=1;and(p0807=60;p0901<0.03)));p0939;0)
- p1298: 0
- p0636: 0; = IF(p0372<0.5;-SQRT(p0007*EXP(p0504^2*p0008)-p0007);SQRT(p0007*EXP(p0504^2*p0008)-p0007))
- p0234: 12.537
- p3463: 0; = p3368*p1241
- p0960: 0; = if(and(p0683>0;or(p0807=480;p0807=32;p0807=1;and(p0807=60;p0901<0.03)));p0936;0)
- p1049: 0.209623; = IF(p1012=0;IF(p1037+p1044+p1045+p1046+p1047+p1048=1;0;1-(p1037+p1044+p1045+p1046+p1047+p1048));0)
- p0212: 1.227
- p1893: 0
- p2396: 0; = p2234*p2185
- p0227: 20.195
- p2236: 0; = 1-(p2230+p2231+p2232+p2233)
- p2225: 0.15846; = if(p0765*p0769+p0766*p0770+p0767*p0771+p0768*p0772=0;0;p0772*p0768/(p0765*p0769+p0766*p0770+p0767*p0771+p0768*p0772))
- p3110: 0; = p2329*p1023
- p0535: 0; = SQRT(2)*(IF((2*p0403-1)<0;-1;IF((2*p0403-1)>0;1;0))*SQRT(SQRT((2/(pi()*0.140012289)+LN(1-(2*p0403-1)^2)/2)^2-LN(1-(2*p0403-1)^2)/0.140012289)-(2/(pi()*0.140012289)+LN(1-(2*p0403-1)^2)/2)))
- p3002: 0; = p2416*(p1079+p1081)
- p0084: 37.954
- p2154: 3.70712e-8; = p2015*p2082*p2116/(p0818*1000)
- p5337: 1.21959e-7; = p1962*p3484
- p2460: 1.89211e-5; = p2264*p1073
- p2761: 2.02616e-6; = p2370*(p1019+p1021)
- p1156: 0.0845387; = p1064+p1065+p1066+p1067+p1068+p1069+p1070+p1116+p1117+p1118+p1119+p1120+p1154+p1155
- p1064: 0.00927001; = IF(p1012=0;p1050/(p1057*p0818);0)
- p2315: 0.000180819; = p2224*p2182
- p1812: 0
- p3154: 0; = p2373*p1023
- p1165: 0.000115401; = p0801*p0001/(p0818*p0002)
- p2762: 0.000207281; = p2371*(p1019+p1021)
- p3176: 0; = p2395*p1023
- p3400: 0; = p3362*p1238
- p4949: 1.8315e-7; = p1776*p3483
- p2261: 0.00261109; = p2226*p2207
- p3478: 0.578208; = if(p1328+p1330+p1332+p1334+p1336+p1338+p1340+p1342+p1344=0;0;p1332/(p1328+p1330+p1332+p1334+p1336+p1338+p1340+p1342+p1344))
- p2014: 3.79118e7; = p0833*p2011*p2013
- p2337: 0.000195075; = p2228*p2205
- p4887: 0; = p1920*p3482
- p0714: 0
- p4906: 0; = p1939*p3482
- p0863: 0; = p0675*1000/p0856
- p0899: 5.03404e10; = p0825*p0896+p0827*p0897+(p0830+p0895)*p0824*p0898
- p1988: 750
- p1600: 0.895638
- p2259: 0.000971134; = p2226*p2205
- p1904: 1.55696e-7; = p1496*1000/p0818
- p3418: 0.016941; = p3380*p1238
- p1939: 2.048e-6; = p1531*1000/p0818
- p1172: 8.04264e-8; = p1170/p0818
- p1766: 0
- p0406: 0; = SQRT(2)*(IF((2*p0274-1)<0;-1;IF((2*p0274-1)>0;1;0))*SQRT(SQRT((2/(pi()*0.140012289)+LN(1-(2*p0274-1)^2)/2)^2-LN(1-(2*p0274-1)^2)/0.140012289)-(2/(pi()*0.140012289)+LN(1-(2*p0274-1)^2)/2)))
- p2635: 6.3699e-5; = p2244*(p1019+p1021)
- p0551: 0; = IF(p0287<0.5;-SQRT(p0007*EXP(p0419^2*p0008)-p0007);SQRT(p0007*EXP(p0419^2*p0008)-p0007))
- p2035: 7.76825e-7; = p2015*p2029*(1-p2031)/(p0818*1000)
- p0967: 9.40448e6; = (p0684/100)*p0964*p0683*p0682*1000
- p2970: 0; = p2384*(p1079+p1081)
- p3185: 0; = p2404*p1023
- p0323: 0.5
- p0751: 12.457; = p0091*(1+p0619*p0223/100)
- p1320: 0; = IF(((p0745*1000*p0747/100)+(p0754*1000*p0756/100))/p0801<0;0;((p0745*1000*p0747/100)+(p0754*1000*p0756/100))/p0801)
- p0565: 0; = IF(p0301<0.5;-SQRT(p0007*EXP(p0433^2*p0008)-p0007);SQRT(p0007*EXP(p0433^2*p0008)-p0007))
- p4953: 9.05904e-8; = p1780*p3483
- p1924: 0
- p1696: 0
- p2047: 8.77138e-15; = p2015*p2045/(p0818*1000000000000)
- p1002: 0; = p0996*p0888
- p2949: 8.21559e-6; = p2363*(p1020+p1022)
- p2732: 1.47945e-5; = p2341*(p1078+p1080)
- p0157: 38.549
- p0829: 0; = if(p0807=480;p0814*(1-p0824);0)
- p3840: 0; = p1903*p3477
- p1963g: 3.37715e-5; = p1667*p1871+p1668*p1872+p1669*p1873+p1670*p1874+p1671*p1875+p1672*p1876+p1673*p1877+p1674*p1878+p1675*p1879+p1676*p1880+p1677*p1881+p1678*p1882+p1679*p1883+p1680*p1884+p1681*p1885+p1682*p1886+p1683*p1887+p1684*p1888+p1685*p1889
- p0353: 0.5
- p3317: 3.38788e7; = if(and(p1232=0;p3253<>0);p3253*(p3261*p3277-p3312)/p3316;0)
- p0273: 0.5
- p1270: 0; = IF(p1267=p1259;0;IF(p1267+p1268>p1259;p1259-p1267;p1268))
- p2886: 0.000713184; = p2300*(p1079+p1081)
- p1864: 7.18597e-8; = p1456*1000/p0818
- p2528: 2.75443e-5; = p2332*p1014
- p1778: 0
- p2830: 8.0693e-5; = p2244*(p1020+p1022)
- p2017: 1.11985e7; = p2015*p0898
- p3233: 0.60394
- p1123: 0.07999; = if(p1121=0;p0717/100;0)
- p2994: 0; = p2408*(p1020+p1022)
- p2714: 3.87143e-6; = p2323*(p1019+p1021)
- p4537: 3.6814e-7; = p1776*p3481
- p1650: 0
- p1131: 0.01929; = if(p1121=0;IF(p1123+p1128+p1129+p1130=1;0;IF(p1123+p1128+p1129+p1130+p1127>1;1-(p1123+p1128+p1129+p1130);p1127));0)
- p2817: 0; = p2426*(p1078+p1080)
- p2754: 6.48539e-6; = p2363*(p1019+p1021)
- p2432: 0.018837; = p1158
- p4047: 9.00247e-8; = p1904*p3478
- p0790: 0
- p2639: 0.000866786; = p2248*(p1019+p1021)
- p0108: 102.638
- p1096: 0.00584539
- p2971: 0; = p2385*(p1079+p1081)
- p2054: 0.91
- p2157: 1.22627e-8; = p2015*p2086*p2119/(p0818*1000)
- p1644: 0
- p2404: 0; = p2234*p2193
- p1287: 0
- p3032: 0; = p2251*p1023
- p0229: 22.524
- p2042: 0.07
- p0248: 11.453
- p1289: 0
- p0820: 0; = if(p0807=480;p0814;0)
- p2009: 0.00582156; = ((p1983*p1985+p1989*p1991+p1995*p1997+p2003*p2005+p1976*p1977+p1978*p1979+p1998*p1999)/p0818)*p0005*p0002/1000
- p2598: 0; = p2402*p1014
- p2283: 0.000165713; = p2223*p2189
- p3420: 0; = p3363*p1239
- p2839: 7.2566e-6; = p2253*(p1020+p1022)
- p2934: 3.84387e-6; = p2348*(p1079+p1081)
- p2757: 6.57209e-5; = p2366*(p1019+p1021)
- p0663: 0; = IF(p0399<0.5;-SQRT(p0007*EXP(p0531^2*p0008)-p0007);SQRT(p0007*EXP(p0531^2*p0008)-p0007))
- p2301: 0.000307212; = p2227*p2208
- p2809: 0; = p2418*(p1078+p1080)
- p1965: 0.000397281; = p1963+p1959*p1964*1000/p0818
- p1179: 0.5
- p2753: 2.57895e-5; = p2362*(p1019+p1021)
- p3660: 4.19788e-7; = p1929*p3476
- p2244: 0.000200779; = p2222*p2189
- p1040: 0.0227854
- p1899: 0
- p2359: 2.8103e-5; = p2225*p2187
- p2827: 0.00022187; = p2241*(p1020+p1022)
- p0023: 28482.1
- p0753: 0
- p0971: 0.000275969; = p0968/p0818
- p2969: 0; = p2383*(p1079+p1081)
- p2002: 750
- p0056: 80.779
- p0058: 35.267
- p1250: 0; = if(p1232>0;0;p1245*p0001/(p0818*p0002))
- p4374: 0; = p1819*p3480
- p1673: 0
- p1217: 9.53097
- p0984: 0; = if(p0886=0;0;min(1;(p0699*p0698*1000*p0701/100)/p0886))
- p1105: 0.436421
- p0733: 0
- p1253: 0; = if(p1232>0;0;p0735/100)
- p3464: 0; = p3369*p1241
- p3425: 0; = p3368*p1239
- p3792: 0; = p1855*p3477
- p1944: 0
- p3222: 0.224242; = IF(p3216=0;0;p1223*40.078/100.0869)
- p0874: 0; = p0865*p0856
- p2943: 3.39087e-5; = p2357*(p1020+p1022)
- p0973: 1.91381e8; = p0967+p0968+p0969
- p4834: 0; = p1867*p3482
- p1194: 1.48
- p1801: 0
- p4777: 0; = p1810*p3482
- p0125: 24.698
- p2749: 6.19498e-5; = p2358*(p1019+p1021)
- p2074: 0.025
- p1158: 0.018837; = p1156*p1157
- p5283: 2.54775e-9; = p1904*p3484
- p2659: 4.05489e-5; = p2268*(p1078+p1080)
- p3299: 0; = if(p1303+p1304+p1305+p1306=0;0;p1303/(p1303+p1304+p1305+p1306))
- p0834: 0.00038
- p0415: 0; = SQRT(2)*(IF((2*p0283-1)<0;-1;IF((2*p0283-1)>0;1;0))*SQRT(SQRT((2/(pi()*0.140012289)+LN(1-(2*p0283-1)^2)/2)^2-LN(1-(2*p0283-1)^2)/0.140012289)-(2/(pi()*0.140012289)+LN(1-(2*p0283-1)^2)/2)))
- p3038: 0; = p2257*p1023
- p0514: 0; = SQRT(2)*(IF((2*p0382-1)<0;-1;IF((2*p0382-1)>0;1;0))*SQRT(SQRT((2/(pi()*0.140012289)+LN(1-(2*p0382-1)^2)/2)^2-LN(1-(2*p0382-1)^2)/0.140012289)-(2/(pi()*0.140012289)+LN(1-(2*p0382-1)^2)/2)))
- p1710: 0
- p1806: 0
- p0542: 0; = IF(p0278<0.5;-SQRT(p0007*EXP(p0410^2*p0008)-p0007);SQRT(p0007*EXP(p0410^2*p0008)-p0007))
- p2930: 8.50429e-7; = p2344*(p1079+p1081)
- p0537: 0; = IF(p0273<0.5;-SQRT(p0007*EXP(p0405^2*p0008)-p0007);SQRT(p0007*EXP(p0405^2*p0008)-p0007))
- p3524: 8.55096e-7; = p1793*p3476
- p2010: 0.0022766; = ((p1984*p1985+p1990*p1991+p1996*p1997+p2004*p2005)/p0818)*p0005*p0002/1000
- p2908: 4.28459e-6; = p2322*(p1020+p1022)
- p3266: 0.0545989
- p3451: 0; = p3375*p1240
- p2171: 0.175925; = p2165*p0831
- p0880: 0; = p0868*p0856
- p2416: 0; = p2235*p2206
- p1346: 411
- p1228: 0.0237948; = IF(p1221=0;0;p0801*p1212*2000/(p1222+p1221*p1225)/p0818)
- p3135: 0; = p2354*p1023
- p0289: 0.5
- p2668: 0.000195741; = p2277*(p1019+p1021)
- p3338: 0.742084; = if(and(p1232=0;p3254<>0);1-(p3334+p3335+p3336+p3337);0)
- p2872: 0.00015514; = p2286*(p1020+p1022)
- p2554: 5.48382e-5; = p2358*p1014
- p3334: 0.2408; = IF(or(p3254=0;p1232>0);0;p3269*p3277*(p3300*p3292+(1-p3300)*p3296))
- p2776: 0; = p2385*(p1078+p1080)
- p1919: 0
- p2216: 8.40886e-5; = p1108/p0818
- p2982: 0; = p2396*(p1020+p1022)
- p1084: 2.97245e6; = IF(p1071=0;p1078*(p0710/100)*p0703*1000;0)
- p2015: 2.44125e7; = p0830*p2011*p2013
- p2948: 3.26697e-5; = p2362*(p1020+p1022)
- p1160: 0.0516878; = (p1156+p1158)*p1159
- p3386: 0; = p3367*p1234
- p1331: 0; = p1330*p0001/(p0818*p0002)
- p1611: 0
- p2452: 3.20085e-5; = p2256*p1014
- p2857: 0.000171503; = p2271*(p1079+p1081)
- p2176: 0.00189747; = p0895*p0913/p0818
- p0548: 0; = IF(p0284<0.5;-SQRT(p0007*EXP(p0416^2*p0008)-p0007);SQRT(p0007*EXP(p0416^2*p0008)-p0007))
- p1655: 0
- p1752: 0
- p1957: 0
- p4059: 6.92498e-9; = p1916*p3478
- p2441: 6.45419e-5; = p2245*p1014
- p1858: 0
- p3019: 0; = p2238*p1023
- p4344: 0; = p1789*p3480
- p3131: 8.77323e-6; = p2350*p1132
- p0184: 12.326
- p2348: 9.13163e-6; = p2228*p2216
- p2692: 0.000105681; = p2301*(p1078+p1080)
- p1213: 56
- p1100: 0.275167
- p2038: 0.304457
- p2722: 3.04161e-7; = p2331*(p1019+p1021)
- p0930: 1.59542e6; = p0801*p0924
- p2065: 0.0758824
- p0019: 2119.53
- p2422: 0; = p2235*p2212
- p1983: 50
- p2835: 0.000235376; = p2249*(p1020+p1022)
- p1726: 0
- p0756: 0
- p1940: 5.43739e-6; = p1532*1000/p0818
- p2605: 0; = p2409*p1014
- p0217: 6.661
- p0939: 6.50853e-7; = p0933*p0001/(p0818*p0002)
- p3232: 2.06737e-8; = p1182/p0818
- p3082: 9.33309e-6; = p2301*p1082
- p2173: 0.0572899; = p0895*p0898/p0818
- p0504: 0; = SQRT(2)*(IF((2*p0372-1)<0;-1;IF((2*p0372-1)>0;1;0))*SQRT(SQRT((2/(pi()*0.140012289)+LN(1-(2*p0372-1)^2)/2)^2-LN(1-(2*p0372-1)^2)/0.140012289)-(2/(pi()*0.140012289)+LN(1-(2*p0372-1)^2)/2)))
- p1368: 279
- p3779: 0; = p1842*p3477
- p1744: 0
- p0001: 0.404686
- p2536: 1.9466e-5; = p2340*p1073
- p0113: 80.017
- p0082: 97.33
- p1991: 1.52823e9; = (if(p1111=0;0;p1106/p1111)+if(p1112=0;0;p1107/p1112)+if(p1113=0;0;p1108/p1113)+if(p1114=0;0;p1109/p1114)+if(p1115=0;0;p1110/p1115))*(1+p1157)
- p2135: 2.35626e-7; = p2015*p2063*p2097/(p0818*1000)
- p1698: 0
- p1191: 0.5
- p0937: 2.26478e-5; = p0931*p0001/(p0818*p0002)
- p0811: 0; = if(p0807=480;1-p0810;0)
- p3533: 1.73813e-7; = p1802*p3476
- p2462: 2.05859e-6; = p2266*p1073
- p3143: 0; = p2362*p1023
- p0611: 0; = IF(p0347<0.5;-SQRT(p0007*EXP(p0479^2*p0008)-p0007);SQRT(p0007*EXP(p0479^2*p0008)-p0007))
- p1085: 3.63728e6; = IF(p1071=0;p1079*(p0710/100)*p0703*1000;0)
- p2380: 0; = p2229*p2209
- p1725: 0.705252
- p2581: 0; = p2385*p1073
- p0011: 9216.62
- p0917: 0.953019; = (p0825+p0827+(p0830+p0895))/p0818-(p0900+p0905+p0910+p0915)
- p0607: 0; = IF(p0343<0.5;-SQRT(p0007*EXP(p0475^2*p0008)-p0007);SQRT(p0007*EXP(p0475^2*p0008)-p0007))
- p3058: 0; = p2277*p1023
- p2855: 0.000187243; = p2269*(p1079+p1081)
- p1120: 0.00368204; = IF(p1071=0;p1110/(p1115*p0818);0)
- p1329: 2.68427e-5; = p1328*p0001/(p0818*p0002)
- p3627: 1.4743e-8; = p1896*p3476
- p2593: 0; = p2397*p1014
- p1016: 0.13673; = IF(p1012=0;p0707/100;0)
- p5188: 1.09357e-7; = p1809*p3484
- p2510: 4.00849e-5; = p2314*p1123
- p1294: 0; = p1290*p1252/p0818
- p3458: 0; = p3363*p1241
- p1014: 0.28084; = IF(p1012=0;p0705/100;0)
- p3165: 0; = p2384*p1082
- p3247: 0
- p1154: 0.0219094; = if(p1152*p0818=0;0;p1150/(p1152*p0818))
- p2962: 0; = p2376*(p1079+p1081)
- p1770: 0
- p2674: 5.2574e-5; = p2283*(p1019+p1021)
- p1825: 0
- p2148: 1.42705e-8; = p2015*p2076*p2110/(p0818*1000)
- p3380: 0.0681157; = p3251/p0818
- p3127: 7.19336e-7; = p2346*p1082
- p3406: 0; = p3368*p1238
- p3373: 0; = if(p1232=0;p3245*p3361/p0818;0)
- p2227: 0.35079; = if(p0774*p0778+p0775*p0779+p0776*p0780+p0777*p0781=0;0;p0779*p0775/(p0774*p0778+p0775*p0779+p0776*p0780+p0777*p0781))
- p1245: 0; = if(p1232>0;0;p1240*(p0725/100)*p0723*1000)
- p2314: 0.000501124; = p2231*p2221
- p4550: 4.2224e-8; = p1789*p3481
- p0105: 93.242
- p2436: 6.69897e-5; = p2240*p1014
- p2878: 5.98923e-6; = p2292*(p1020+p1022)
- p3111: 0; = p2330*p1023
- p0399: 0.5
- p3278: 0.46
- p1045: 0.0626496; = IF(p1012=0;IF(p1037+p1044=1;0;IF(p1037+p1044+p1039>1;1-(p1037+p1044);p1039));0)
- p2978: 0; = p2392*(p1129+p1131)
- p3174: 0; = p2393*p1023
- p4893: 0; = p1926*p3482
- p0476: 0; = SQRT(2)*(IF((2*p0344-1)<0;-1;IF((2*p0344-1)>0;1;0))*SQRT(SQRT((2/(pi()*0.140012289)+LN(1-(2*p0344-1)^2)/2)^2-LN(1-(2*p0344-1)^2)/0.140012289)-(2/(pi()*0.140012289)+LN(1-(2*p0344-1)^2)/2)))
- p1341: 0; = p1340*p0001/(p0818*p0002)
- p0963: 0; = if(and(p0683>0;or(p0807=480;p0807=32;p0807=1;and(p0807=60;p0901<0.03)));p0939;0)
- p1656: 0
- p1827: 0
- p1704: 0
- p2158: 4.32319e-8; = p2015*p2082*p2120/(p0818*1000)
- p1008: 0; = p1004*p0001*p0004/(p0818*p0002)
- p2815: 0; = p2424*(p1078+p1080)
- p2119: 0.679049
- p0769: 74.379; = p0109*(1+p0637*p0241/100)
- p1677: 0
- p1727: 0
- p1954: 0
- p1054: 5.09198e8; = IF(p1012=0;p1047*p1036;0)
- p1593: 0
- p4326: 0; = p1771*p3480
- p3479: 0.175656; = if(p1328+p1330+p1332+p1334+p1336+p1338+p1340+p1342+p1344=0;0;p1334/(p1328+p1330+p1332+p1334+p1336+p1338+p1340+p1342+p1344))
- p0374: 0.5
- p0375: 0.5
- p1917: 0
- p2174: 0.00133079; = p0895*p0903/p0818
- p0501: 0; = SQRT(2)*(IF((2*p0369-1)<0;-1;IF((2*p0369-1)>0;1;0))*SQRT(SQRT((2/(pi()*0.140012289)+LN(1-(2*p0369-1)^2)/2)^2-LN(1-(2*p0369-1)^2)/0.140012289)-(2/(pi()*0.140012289)+LN(1-(2*p0369-1)^2)/2)))
- p1508: 1
- p2933: 3.76122e-5; = p2347*(p1079+p1081)
- p1931: 0
- p2131: 7.6427e-8; = p2015*p2059*p2093/(p0818*1000)
- p0140: 80.779
- p3540: 4.3298e-7; = p1809*p3476
- p0136: 98.241
- p5112: 1.12253e-7; = p1939*p3483
- p1113: 0.100377
- p0071: 9.686
- p1072: 0; = p1071*p0001/(p0818*p0002)
- p0722: 25.105; = p0062*(1+p0590*p0194/100)
- p0969: 1.58935e8; = p0966*p0964*p0683*p0682*1000
- p3199: 0; = p2418*p1082
- p2246: 5.77932e-5; = p2222*p2191
- p3218: 0.00895652; = p3214*p1228
- p1271: 0; = IF(p1267+p1270=p1259;0;IF(p1267+p1270+p1269>p1259;p1259-(p1267+p1270);p1269))
- p0716: 80.779; = p0056*(1+p0584*p0188/100)
- p1979: 1.91381e8; = p0973
- p2243: 0.00101641; = p2222*p2188
- p1761: 0
- p1244: 0; = if(p1232>0;0;p1239*(p0725/100)*p0723*1000)
- p3138: 0; = p2357*p1023
- p2308: 0.000288633; = p2227*p2215
- p0959: 0; = if(and(p0683>0;or(p0807=480;p0807=32;p0807=1;and(p0807=60;p0901<0.03)));p0935;0)
- p0267: 3.657
- p2284: 0.00018968; = p2223*p2190
- p2492: 0.000302863; = p2296*p1014
- p1889: 6.8662e-5; = p1481*1000/p0818
- p3952: 3.86414e-6; = p1809*p3478
- p3245: 0; = IF(p3244=1;0;if(p3244+p0792/100>1;1-p3244;p0792/100))
- p1787: 0
- p0998: 0; = if(p0888=0;0;if((p0699*p0698*1000*p0700/100)/p0888>1;1;(p0699*p0698*1000*p0700/100)/p0888))
- p0404: 0.5
- p1196: 0.59
- p2464: 2.41266e-5; = p2268*p1073
- p3203: 0; = p2422*p1082
- p1594: 0.735896
- p2680: 0.00151592; = p2289*(p1019+p1021)
- p4938: 3.49036e-6; = p1765*p3483
- p2248: 0.0027321; = p2222*p2193
- p1590: 0
- p2318: 1.26655e-5; = p2224*p2185
- p1307: 0
- p2523: 8.73326e-6; = p2327*p1014
- p2881: 3.78061e-5; = p2295*(p1020+p1022)
- p1034: 3.00592e-5; = IF(p1012=0;p1028*p0001/(p0818*p0002);0)
- p3472: 0.000128046; = p3377*p1241
- p1496: 13
- p0083: 0.448
- p2413: 0; = p2234*p2203
- p0328: 0.5
- p2810: 0; = p2419*(p1078+p1080)
- p1653: 0
- p3263: 0.0214527
- p0325: 0.5
- p1662: 0
- p3402: 0; = p3364*p1238
- p2306: 6.82425e-5; = p2227*p2213
- p2269: 0.000444822; = p2226*p2215
- p2467: 8.33927e-5; = p2271*p1073
- p0257: 47.219
- p2040: 1.19
- p2627: 0; = p2431*p1123
- p3838: 0; = p1901*p3477
- p1832: 0
- p2217: 0.000753642; = p1118-p2216
- p4252: 3.15564e-7; = p1903*p3479
- p0139: 115.099
- p3434: 0; = p3377*p1239
- p3186: 0; = p2405*p1023
- p2991: 0; = p2405*(p1020+p1022)
- p1171: 0.000115401; = p0801*p0001/(p0818*p0002)
- p2927: 1.81035e-5; = p2341*(p1079+p1081)
- p1177: 0.000115401; = p0801*p0001/(p0818*p0002)
- p0841: 0.307247
- p1001: 1; = if(p0978>0;0;if(and(p0687=0;p0691=0;p0695=0;p0699=0);0;IF(p0996+p0999+p1000=1;0;1-(p0996+p0999+p1000))))
- p3941: 2.63149e-7; = p1798*p3478
- p0182: 4.828
- p2197: 1.11685e-5; = p1055/p0818
- p0745: 34292.7; = p0085*(1+p0613*p0217/100)
- p2393: 0; = p2234*p2182
- p2398: 0; = p2234*p2187
- p0911: 0.00344444
- p3384: 0; = p3365*p1234
- p5133: 8.0548e-8; = p1754*p3484
- p2123: 0.263965
- p4153: 4.20753e-9; = p1804*p3479
- p0461: 0; = SQRT(2)*(IF((2*p0329-1)<0;-1;IF((2*p0329-1)>0;1;0))*SQRT(SQRT((2/(pi()*0.140012289)+LN(1-(2*p0329-1)^2)/2)^2-LN(1-(2*p0329-1)^2)/0.140012289)-(2/(pi()*0.140012289)+LN(1-(2*p0329-1)^2)/2)))
- p3234: 0.39606; = 1-p3233
- p2793: 0; = p2402*(p1019+p1021)
- p3253: 7.86972e7; = p1252*(p1277*(1-p3247)+p1280*(1-p3248)+p1281*(1-p3249)+p1282*(1-p3250))
- p0118: 49.817
- p1666: 0.885279
- p2164: 0.000103988; = (p2015/p0818)-(p2022)-(p2035+p2036+p2052)-(p2017/p0818)-(p2039+p2041+p2044+p2158+p2159+p2160+p2161+p2162)
- p3061: 0; = p2280*p1023
- p3390: 0; = p3371*p1234
- p1481: 5733
- p1763: 0
- p3077: 0; = p2296*p1023
- p0842: -0.445511
- p4665: 1.71535e-8; = p1904*p3481
- p1844: 0
- p1335: 7.27762e-5; = p1334*p0001/(p0818*p0002)
- p2522: 4.07408e-5; = p2326*p1014
- p1628: 0
- p2302: 0.000138925; = p2227*p2209
- p1006: 0; = p1002*p0001*p0004/(p0818*p0002)
- p2571: 0; = p2375*p1073
- p3480: 0; = if(p1328+p1330+p1332+p1334+p1336+p1338+p1340+p1342+p1344=0;0;p1336/(p1328+p1330+p1332+p1334+p1336+p1338+p1340+p1342+p1344))
- p2655: 3.18001e-5; = p2264*(p1078+p1080)
- p0789: 12.03; = p0129*(1+p0657*p0261/100)
- p0111: 21.875
- p2132: 7.34651e-8; = p2015*p2060*p2094/(p0818*1000)
- p0177: 18.26
- p2920: 2.43219e-6; = p2334*(p1020+p1022)
- p3142: 0; = p2361*p1023
- p0366: 0.5
- p2226: 0.540615; = if(p0774*p0778+p0775*p0779+p0776*p0780+p0777*p0781=0;0;p0778*p0774/(p0774*p0778+p0775*p0779+p0776*p0780+p0777*p0781))
- p1340: 0; = p1325*p0801
- p4776: 0; = p1809*p3482
- p2929: 0.00010236; = p2343*(p1079+p1081)
- p1134: 3.07639e6; = if(p1121=0;p1128*(p0716/100)*p0703*1000;0)
- p1868: 0
- p0287: 0.5
- p3042: 7.93249e-5; = p2261*p1082
- p0466: 0; = SQRT(2)*(IF((2*p0334-1)<0;-1;IF((2*p0334-1)>0;1;0))*SQRT(SQRT((2/(pi()*0.140012289)+LN(1-(2*p0334-1)^2)/2)^2-LN(1-(2*p0334-1)^2)/0.140012289)-(2/(pi()*0.140012289)+LN(1-(2*p0334-1)^2)/2)))
- p3254: 2.44029e8; = p1252*(p1287*(1-p3247)+p1290*(1-p3248)+p1291*(1-p3249)+p1292*(1-p3250))
- p2869: 6.65999e-5; = p2283*(p1020+p1022)
- p4397: 0; = p1842*p3480
- p2861: 0.000531457; = p2275*(p1129+p1131)
- p2660: 0.000153019; = p2269*(p1078+p1080)
- p0057: 7.999
- p1276: 0.043116; = p1272*p1252/p0818
- p1845: 0
- p1942: 0
- p0272: 2.734
- p2354: 0.00120452; = p2225*p2182
- p2818: 0; = p2427*(p1078+p1080)
- p2256: 0.000113974; = p2222*p2202
- p2275: 0.00100265; = p2230*p2221
- p1694: 0
- p1097: 0.0685077
- p3349: 0.816024; = if(and(p1232=0;p3256<>0);1-(p3345+p3346+p3347+p3348);0)
- p0777: 0
- p0078: 10799
- p4422: 0; = p1867*p3480
- p3369: 0; = if(p1232=0;p3245*p3357/p0818;0)
- p3196: 0; = p2415*p1082
- p1241: 0.25683; = if(p1232>0;0;IF(p1234+p1238+p1239+p1240=1;0;1-(p1234+p1238+p1239+p1240)))
- p3133: 8.57012e-7; = p2352*p1132
- p3003: 0; = p2417*(p1079+p1081)
- p0845: 0.5
- p1918: 0
- p2545: 1.67514e-5; = p2349*p1073
- p0246: 5.342
- p3397: 0.00220809; = p3378*p1234
- p2563: 0.000575076; = p2367*p1014
- p2727: 7.41974e-5; = p2336*(p1078+p1080)
- p1687: 0
- p2252: 8.21236e-6; = p2222*p2198
- p0571: 0; = IF(p0307<0.5;-SQRT(p0007*EXP(p0439^2*p0008)-p0007);SQRT(p0007*EXP(p0439^2*p0008)-p0007))
- p2133: 1.16157e-7; = p2015*p2061*p2095/(p0818*1000)
- p2146: 6.04189e-9; = p2015*p2074*p2108/(p0818*1000)
- p3060: 0; = p2279*p1023
- p1730: 0
- p2642: 1.58739e-6; = p2251*(p1019+p1021)
- p1273: 0; = p1267*p1252/p0818
- p1585: 0.7961
- p2615: 0; = p2419*p1073
- p2988: 0; = p2402*(p1020+p1022)
- p4657: 2.50705e-8; = p1896*p3481
- p2469: 0.000665811; = p2273*p1123
- p2428: 0; = p2236*p2218
- p3259: 0.00796296
- p3419: 0; = p3362*p1239
- p1325: 0; = IF(((p0745*1000*p0752/100)+(p0754*1000*p0761/100))/p0801<0;0;((p0745*1000*p0752/100)+(p0754*1000*p0761/100))/p0801)
- p2998: 0; = p2412*(p1020+p1022)
- p1993: 400
- p0482: 0; = SQRT(2)*(IF((2*p0350-1)<0;-1;IF((2*p0350-1)>0;1;0))*SQRT(SQRT((2/(pi()*0.140012289)+LN(1-(2*p0350-1)^2)/2)^2-LN(1-(2*p0350-1)^2)/0.140012289)-(2/(pi()*0.140012289)+LN(1-(2*p0350-1)^2)/2)))
- p2107: 0.881623
- p3100: 0; = p2319*p1023
- p4631: 9.23649e-9; = p1870*p3481
- p0586: 0; = IF(p0322<0.5;-SQRT(p0007*EXP(p0454^2*p0008)-p0007);SQRT(p0007*EXP(p0454^2*p0008)-p0007))
- p2052: 3.60134e-7; = p2015*p2049*(1-p2050)/(p0818*1000)
- p2575: 0; = p2379*p1073
- p0114: 76.281
- p2779: 0; = p2388*(p1078+p1080)
- p2073: 0.377647
- p0932: 0; = p0801*p0926
- p1943: 0
- p1267: 0
- p0387: 0.5
- p0704: 98.241; = p0044*(1+p0572*p0176/100)
- p4871: 0; = p1904*p3482
- p1025: 1.18628e6; = IF(p1012=0;p1019*(p0704/100)*p0703*1000;0)
- p3351: 2.87588e6; = if(and(p1232=0;p3256<>0);p3256*(p3274-p3346)/p3349;0)
- p2612: 0; = p2416*p1073
- p4046: 1.03875e-6; = p1903*p3478
- p1200: 0.84
- p0676: 1595.42; = p0016*(1+p0544*p0148/100)
- p2412: 0; = p2234*p2202
- p1823: 0
- p0982: 0; = if(p0886=0;0;min(1;(p0691*p0690*1000*p0693/100)/p0886))
- p3328: 0; = if(and(p1232=0;p3255<>0);p3255*(p3265*p3277-p3323)/p3327;0)
- p1723: 0
- p1963h: 2.60658e-6; = p1686*p1890+p1687*p1891+p1688*p1892+p1689*p1893+p1690*p1894+p1691*p1895+p1692*p1896+p1693*p1897+p1694*p1898+p1695*p1899+p1696*p1900+p1697*p1901+p1698*p1902+p1699*p1903+p1700*p1904+p1701*p1905+p1702*p1906+p1703*p1907+p1704*p1908+p1705*p1909
- p3435: 0; = p3378*p1239
- p3103: 0; = p2322*p1023
- p2336: 0.00021569; = p2228*p2204
- p2016: 0.000161676; = (p2014-p2015)/(p0818)
- p1110: 7.31233e7; = IF(p1071=0;p1105*p1104*p1095;0)
- p3104: 0; = p2323*p1023
- p3308: 3.97648e6; = if(and(p1232=0;p3252<>0);p3252*(p3259-p3303)/p3305;0)
- p2975: 0; = p2389*(p1129+p1131)
- p4515: 5.42314e-7; = p1754*p3481
- p2317: 3.67708e-6; = p2224*p2184
- p2245: 0.000229817; = p2222*p2190
- p0197: 21.855
- p1226: 1.08e7; = IF(p1221=0;0;IF(p1193=0;p0801;0))
- p2977: 0; = p2391*(p1129+p1131)
- p0572: 0; = IF(p0308<0.5;-SQRT(p0007*EXP(p0440^2*p0008)-p0007);SQRT(p0007*EXP(p0440^2*p0008)-p0007))
- p2230: 0.649507; = if(p0783*p0787+p0784*p0788+p0785*p0789+p0786*p0790=0;0;p0787*p0783/(p0783*p0787+p0784*p0788+p0785*p0789+p0786*p0790))
- p1281: 0; = IF(p1277+p1280=p1263;0;IF(p1277+p1280+p1279>p1263;p1263-(p1277+p1280);p1279))
- p3118: 5.92639e-6; = p2337*p1082
- p1212: 0.102029; = if(p1211=0;0;if(p1193>0;0;(p1207+p1208+p1209)*p1210/(2000*p1211)))
- p2403: 0; = p2234*p2192
- p2209: 0.000396034; = 14.0067*p2208/30.973762
- p0708: 20.544; = p0048*(1+p0576*p0180/100)
- p3191: 0; = p2410*p1023
- p1094: 2.80499e-6; = IF(p1071=0;p1088*p0001/(p0818*p0002);0)
- p3429: 0; = p3372*p1239
- p2235: 0; = 1-(p2226+p2227+p2228+p2229)
- p3446: 0; = p3370*p1240
- p2765: 0.000146625; = p2374*(p1019+p1021)
- p5249: 1.37186e-9; = p1870*p3484
- p3147: 0; = p2366*p1023
- p2960: 0.000185743; = p2374*(p1020+p1022)
- p2544: 1.86906e-6; = p2348*p1073
- p4747: 0; = p1780*p3482
- p1145: 1.00402e9; = if(p1121=0;p0799*p0702*1000*p0800/100;0)
- p0127: 62.405
- p2784: 0; = p2393*(p1019+p1021)
- p3601: 5.43164e-9; = p1870*p3476
- p0484: 0; = SQRT(2)*(IF((2*p0352-1)<0;-1;IF((2*p0352-1)>0;1;0))*SQRT(SQRT((2/(pi()*0.140012289)+LN(1-(2*p0352-1)^2)/2)^2-LN(1-(2*p0352-1)^2)/0.140012289)-(2/(pi()*0.140012289)+LN(1-(2*p0352-1)^2)/2)))
- p0430: 0; = SQRT(2)*(IF((2*p0298-1)<0;-1;IF((2*p0298-1)>0;1;0))*SQRT(SQRT((2/(pi()*0.140012289)+LN(1-(2*p0298-1)^2)/2)^2-LN(1-(2*p0298-1)^2)/0.140012289)-(2/(pi()*0.140012289)+LN(1-(2*p0298-1)^2)/2)))
- p3264: 0.0887032
- p0839: 0.387071; = p0838/p0818
- p0503: 0; = SQRT(2)*(IF((2*p0371-1)<0;-1;IF((2*p0371-1)>0;1;0))*SQRT(SQRT((2/(pi()*0.140012289)+LN(1-(2*p0371-1)^2)/2)^2-LN(1-(2*p0371-1)^2)/0.140012289)-(2/(pi()*0.140012289)+LN(1-(2*p0371-1)^2)/2)))
- p1231: 0.0137482; = IF(p1221=0;0;p1230*(p1228+p1229))
- p0924: 0.147724; = IF(p0918+p0923=1;0;IF(p0918+p0923+p0920>1;1-(p0918+p0923);p0920))
- p2936: 0.000124705; = p2350*(p1129+p1131)
- p3280: 0.375
- p1058: 0.225
- p2632: 0.000175144; = p2241*(p1019+p1021)
- p1136: 0; = if(p1121=0;p1130*(p0716/100)*p0703*1000;0)
- p2585: 0; = p2389*p1123
- p1623: 0
- p3251: 5.68739e9; = p1252-(p3252+p3253+p3254+p3255+p3256)
- p2710: 9.2997e-6; = p2319*(p1019+p1021)
- p2624: 0; = p2428*p1123
- p1038: 0.00785902
- p3228: 0.00185795; = p3224*p1229
- p2912: 5.83026e-5; = p2326*(p1020+p1022)
- p1634: 0
- p3377: 0.000498563; = if(p1232=0;p3246*p3359/p0818;0)
- p0448: 0; = SQRT(2)*(IF((2*p0316-1)<0;-1;IF((2*p0316-1)>0;1;0))*SQRT(SQRT((2/(pi()*0.140012289)+LN(1-(2*p0316-1)^2)/2)^2-LN(1-(2*p0316-1)^2)/0.140012289)-(2/(pi()*0.140012289)+LN(1-(2*p0316-1)^2)/2)))
- p1326: 0.196782; = IF(((p0745*1000*p0753/100)+(p0754*1000*p0762/100))/p0801<0;0;((p0745*1000*p0753/100)+(p0754*1000*p0762/100))/p0801)
- p2491: 2.64182e-5; = p2295*p1014
- p0141: 75.5218
- p2500: 0.000160777; = p2304*p1073
- p3833: 0; = p1896*p3477
- p3300: 0; = if(p1293+p1294+p1295+p1296=0;0;p1293/(p1293+p1294+p1295+p1296))
- p2826: 9.58665e-5; = p2240*(p1020+p1022)
- p2623: 0; = p2427*p1073
- p4331: 0; = p1776*p3480
- p3437: 0; = p3380*p1239
- p3012: 0; = p2426*(p1079+p1081)
- p0389: 0.5
- p3756: 0; = p1819*p3477
- p0330: 0.5
- p4444: 0; = p1889*p3480
- p3896: 0; = p1963*p3477
- p1574: 0
- p0792: 0
- p3671: 3.52281e-7; = p1940*p3476
- p0815: 0
- p1363: 11384
- p1758: 0
- p0539: 0; = IF(p0275<0.5;-SQRT(p0007*EXP(p0407^2*p0008)-p0007);SQRT(p0007*EXP(p0407^2*p0008)-p0007))
- p3411: 0; = p3373*p1238
- p2858: 0.00313081; = p2272*(p1129+p1131)
- p0159: 3.08
- p5076: 9.84678e-8; = p1903*p3483
- p1608: 0
- p2645: 0.000586023; = p2254*(p1019+p1021)
- p1249: 0; = if(p1232>0;0;p1244*p0001/(p0818*p0002))
- p0433: 0; = SQRT(2)*(IF((2*p0301-1)<0;-1;IF((2*p0301-1)>0;1;0))*SQRT(SQRT((2/(pi()*0.140012289)+LN(1-(2*p0301-1)^2)/2)^2-LN(1-(2*p0301-1)^2)/0.140012289)-(2/(pi()*0.140012289)+LN(1-(2*p0301-1)^2)/2)))
- p2126: 2.12553e-7; = p2015*p2054*p2088/(p0818*1000)
- p2873: 0.00090626; = p2287*(p1020+p1022)
- p1257: 0; = if(p1232>0;0;IF(p1253+p1256=1;0;IF(p1253+p1256+p1255>1;1-(p1253+p1256);p1255)))
- p3375: 0.000578405; = if(p1232=0;p3246*p3357/p0818;0)
- p0987: 0; = if(p0978>0;0;if(and(p0687=0;p0691=0;p0695=0;p0699=0);0;IF(p0982+p0985+p0986=1;0;1-(p0982+p0985+p0986))))
- p0788: 33.753; = p0128*(1+p0656*p0260/100)
- p1842: 3.83252e-7; = p1434*1000/p0818
- p1972: 0; = if(p0807=480;p1967*p0001/(p0818*p0002);0)
- p0446: 0; = SQRT(2)*(IF((2*p0314-1)<0;-1;IF((2*p0314-1)>0;1;0))*SQRT(SQRT((2/(pi()*0.140012289)+LN(1-(2*p0314-1)^2)/2)^2-LN(1-(2*p0314-1)^2)/0.140012289)-(2/(pi()*0.140012289)+LN(1-(2*p0314-1)^2)/2)))
- p2068: 0.153529
- p0051: 20.468
- p3669: 2.94861e-8; = p1938*p3476
- p2640: 0.000185806; = p2249*(p1019+p1021)
- p3539: 1.00097e-7; = p1808*p3476
- p2341: 4.30074e-5; = p2228*p2209
- p5089: 6.56452e-10; = p1916*p3483
- p0315: 0.5
- p1011: 1.31345e-7; = p1010*p0001*p0004/(p0818*p0002)
- p0754: 4481.27; = p0094*(1+p0622*p0226/100)
- p3302: 0.0114097; = if(and(p1232=0;p3252<>0);p3258*(p3278*(p3282*p1256+p3286*(p1253+p1257)+p1258*p3288+p3297*p3287));0)
- p3250: 0.875
- p1181: 0.000159831
- p1582: 0
- p2821: 0; = p2430*(p1128+p1130)
- p3452: 0; = p3376*p1240
- p1999: 2.29589e9; = (p1228+p1229)*p0818+p1164
- p3392: 0; = p3373*p1234
- p2424: 0; = p2235*p2214
- p2349: 8.18419e-5; = p2228*p2217
- p1879: 0
- p0391: 0.5
- p0768: 102.638; = p0108*(1+p0636*p0240/100)
- p1907: 0
- p1688: 0
- p2518: 2.99399e-6; = p2322*p1014
- p3134: 1.48926e-6; = p2353*p1132
- p0048: 20.544
- p3535: 1.5519e-9; = p1804*p3476
- p0044: 98.241
- p0882: 64614; = p0869*p0856
- p1282: 0.09686; = IF(p1277+p1280+p1281=p1260;0;p1260-(p1277+p1280+p1281))
- p1206: 0.0206875
- p1182: 1726.17; = p1181*p0801
- p3713: 0; = p1776*p3477
- p4559: 5.0141e-8; = p1798*p3481
- p2546: 1.88193e-5; = p2350*p1123
- p3271: 0.0195489
- p2000: 4000
- p0947: 0; = if(and(p0683=0;or(p0807=480;p0807=32;p0807=1;and(p0807=60;p0901<0.03)));p0935;0)
- p2063: 2.01468
- p2350: 0.00023527; = p2232*p2218
- p2833: 0.000187968; = p2247*(p1020+p1022)
- p2990: 0; = p2404*(p1020+p1022)
- p3651: 4.87296e-7; = p1920*p3476
- p2262: 0.000473454; = p2226*p2208
- p2024: 0.748682
- p4771: 0; = p1804*p3482
- p3238: 0.854735; = IF(p3237+p3235+p3236>1;1-(p3235+p3236);p3237)
- p2916: 1.75251e-7; = p2330*(p1020+p1022)
- p3287: 0.745
- p2734: 8.36508e-5; = p2343*(p1078+p1080)
- p1884: 0
- p0816: 0
- p2610: 0; = p2414*p1073
- p4514: 0; = p1963*p3480
- p1225: 1.088; = IF(p1221=0;0;p1223+1.2*p1224)
- p4720: 2.35857e-5; = p1963*p3481
- p1718: 0
- p3421: 0; = p3364*p1239
- p0694: 285.509; = p0034*(1+p0562*p0166/100)
- p1646: 0
- p1114: 0.216028
- p0933: 60911; = p0801*p0927
- p2904: 5.09027e-6; = p2318*(p1020+p1022)
- p1663: 0.69001
- p3246: 1; = IF(p3244+p3245=1;0;1-(p3244+p3245))
- p2477: 1.84165e-5; = p2281*p1014
- p4719: 8.21124e-7; = p1962*p3481
- p3194: 0; = p2413*p1023
- p1873: 0
- p0988: 0; = p0982*p0886
- p2846: 0.000132376; = p2260*(p1079+p1081)
- p2495: 4.17663e-5; = p2299*p1073
- p1051: 1.29068e7; = IF(p1012=0;p1044*p1036;0)
- p3670: 1.32687e-7; = p1939*p3476
- p2633: 2.52072e-5; = p2242*(p1019+p1021)
- p1020: 0.13673; = IF(p1012=0;IF(p1014+p1019=1;0;IF(p1014+p1019+p1016>1;1-(p1014+p1019);p1016));0)
- p1180: 1.00764e-8; = p1176*p1179/p0818
- p1689: 0
- p2145: 9.73454e-8; = p2015*p2073*p2107/(p0818*1000)
- p1041: 0.310052
- p2657: 3.45982e-6; = p2266*(p1078+p1080)
- p0616: 0; = IF(p0352<0.5;-SQRT(p0007*EXP(p0484^2*p0008)-p0007);SQRT(p0007*EXP(p0484^2*p0008)-p0007))
- p2577: 0; = p2381*p1073
- p2109: 0.826583
- p0961: 0; = if(and(p0683>0;or(p0807=480;p0807=32;p0807=1;and(p0807=60;p0901<0.03)));p0937;0)
- p2504: 5.90774e-5; = p2308*p1073
- p4481: 0; = p1926*p3480
- p2562: 5.81764e-5; = p2366*p1014
- p2766: 0; = p2375*(p1078+p1080)
- p1667: 0
- p0853: 0.0116009; = p0803/(p0802+p0803)
- p0400: 0.5
- p3067: 0; = p2286*p1023
- p0782: 80.779; = p0122*(1+p0650*p0254/100)
- p1927: 0
- p5074: 7.35227e-8; = p1901*p3483
- p2018: 0.1978
- p0067: 24.871
- p2003: 50
- p0589: 0; = IF(p0325<0.5;-SQRT(p0007*EXP(p0457^2*p0008)-p0007);SQRT(p0007*EXP(p0457^2*p0008)-p0007))
- p0010: 1425.65
- p3272: 0.0398246
- p2501: 1.33576e-6; = p2305*p1073
- p1692: 0.454882
- p3073: 0; = p2292*p1023
- p1173: 0.5
- p0948: 0; = if(and(p0683=0;or(p0807=480;p0807=32;p0807=1;and(p0807=60;p0901<0.03)));p0936;0)
- p1495: 150
- p2406: 0; = p2234*p2196
- p2430: 0; = p2236*p2220
- p3140: 0; = p2359*p1023
- p0849: 0.0657513
- p4670: 1.0556e-8; = p1909*p3481
- p3207: 0; = p2426*p1082
- p3139: 0; = p2358*p1023
- p2159: 5.22519e-7; = p2015*p2083*p2121/(p0818*1000)
- p3690: 1.38699e-5; = p1963*p3476
- p2937: 0.000175736; = p2351*(p1129+p1131)
- p2497: 6.28801e-5; = p2301*p1073
- p1088: 262509; = IF(p1071=0;p1082*(p0710/100)*p0703*1000;0)
- p2117: 0.585147
- p0178: 18.611
- p1167: 0.5
- p3030: 0; = p2249*p1023
- p0238: 5.425
- p2601: 0; = p2405*p1014
- p3276: 0.0887032
- p1779: 0
- p3066: 0; = p2285*p1023
- p1974: 1.33566e-6; = p1969*p0001/(p0818*p0002)
- p1243: 237663; = if(p1232>0;0;p1238*(p0725/100)*p0723*1000)
- p1966: 1.065e7; = if(p0814=0;p0802;0)
- p1601: 0
- p2374: 0.000462162; = p2225*p2203
- p4579: 2.94248e-7; = p1818*p3481
- p3081: 5.14718e-5; = p2300*p1082
- p2440: 5.63867e-5; = p2244*p1014
- p2311: 0.00295212; = p2231*p2218
- p3520: 2.48304e-8; = p1789*p3476
- p1947: 0
- p3368: 0; = if(p1232=0;p3245*p3356/p0818;0)
- p1258: 1; = if(p1232>0;0;IF(p1253+p1256+p1257=1;0;1-(p1253+p1256+p1257)))
- p2720: 8.42865e-8; = p2329*(p1019+p1021)
- p0255: 4.774
- p0290: 0.5
- p1272: 0.55386; = IF(p1267+p1270+p1271=p1259;0;p1259-(p1267+p1270+p1271))
- p1632: 0
- p0861: 0; = p0673*1000/p0856
- p3998: 2.94312e-6; = p1855*p3478
- p2568: 7.86647e-5; = p2372*p1014
- p3337: 0.00199123; = IF(or(p3254=0;p1232>0);0;p3272*p3289)
- p0359: 0.5
- p3008: 0; = p2422*(p1079+p1081)
- p2186: 0.00123227; = p1052/p0818
- p2844: 0.000451989; = p2258*(p1079+p1081)
- p0372: 0.5
- p2172: 0.163665; = p2166-(p2167+p2168+p2169+p2170)
- p0775: 79.209; = p0115*(1+p0643*p0247/100)
- p0970: 0.000112634; = p0967/p0818
- p0794: 0
- p1090: 3.17615e-5; = IF(p1071=0;p1084*p0001/(p0818*p0002);0)
- p4157: 2.71385e-7; = p1808*p3479
- p2083: 2.17294
- p1396: 2
- p3007: 0; = p2421*(p1079+p1081)
- p0485: 0; = SQRT(2)*(IF((2*p0353-1)<0;-1;IF((2*p0353-1)>0;1;0))*SQRT(SQRT((2/(pi()*0.140012289)+LN(1-(2*p0353-1)^2)/2)^2-LN(1-(2*p0353-1)^2)/0.140012289)-(2/(pi()*0.140012289)+LN(1-(2*p0353-1)^2)/2)))
- p1950: 0
- p1783: 0
- p1657: 0
- p2796: 0; = p2405*(p1019+p1021)
- p1780: 1.65277e-6; = p1372*1000/p0818
- p1218: 0.5
- p4120: 2.39492e-5; = p1771*p3479
- p3444: 0; = p3368*p1240
- p0169: 1.936
- p4526: 7.01578e-6; = p1765*p3481
- p2758: 0.000649653; = p2367*(p1019+p1021)
- p0665: 0; = IF(p0401<0.5;-SQRT(p0007*EXP(p0533^2*p0008)-p0007);SQRT(p0007*EXP(p0533^2*p0008)-p0007))
- p1046: 0.0227854; = IF(p1012=0;IF(p1037+p1044+p1045=1;0;IF(p1037+p1044+p1045+p1040>1;1-(p1037+p1044+p1045);p1040));0)
- p2069: 0.190588
- p2707: 1.25927e-5; = p2316*(p1019+p1021)
- p0945: 0; = if(and(p0683=0;p0951=0);p0939;0)
- p0154: 0
- p2963: 0; = p2377*(p1079+p1081)
- p3224: 0.501945; = IF(p3216=0;0;1-p3221-p3222-p3223)
- p0657: 0; = IF(p0393<0.5;-SQRT(p0007*EXP(p0525^2*p0008)-p0007);SQRT(p0007*EXP(p0525^2*p0008)-p0007))
- p0944: 0; = if(and(p0683=0;p0950=0);p0938;0)
- p3054: 0.00031039; = p2273*p1132
- p1316: 0.00380903; = p1312*p1252/p0818
- p2332: 9.80783e-5; = p2224*p2200
- p3113: 0; = p2332*p1023
- p1702: 0
- p2152: 6.08409e-9; = p2015*p2080*p2114/(p0818*1000)
- p0190: 13.968
- p2475: 5.52899e-5; = p2279*p1014
- p3125: 6.1377e-8; = p2344*p1082
- p1093: 0; = IF(p1071=0;p1087*p0001/(p0818*p0002);0)
- p0063: 10798.8
- p2143: 3.92131e-8; = p2015*p2071*p2105/(p0818*1000)
- p3016: 0; = p2430*(p1129+p1131)
- p0490: 0; = SQRT(2)*(IF((2*p0358-1)<0;-1;IF((2*p0358-1)>0;1;0))*SQRT(SQRT((2/(pi()*0.140012289)+LN(1-(2*p0358-1)^2)/2)^2-LN(1-(2*p0358-1)^2)/0.140012289)-(2/(pi()*0.140012289)+LN(1-(2*p0358-1)^2)/2)))
- p1799: 0
- p4253: 2.73489e-8; = p1904*p3479
- p2738: 3.07374e-5; = p2347*(p1078+p1080)
- p3221: 0.146975; = IF(p3216=0;0;p1223*12.0107/100.0869+(1-p1224)*12.0107/84.3139)
- p1327a: 0.0587482; = (p0745*1000/p0801)*(1-(p0746+p0747+p0748+p0749+p0750+p0751+p0752+p0753)/100)+(p0754*1000/p0801)*(1-(p0755+p0756+p0757+p0758+p0759+p0760+p0761+p0762)/100)
- p0344: 0.5
- p0895: 1.04279e10; = p0894*p0830
- p2932: 9.96699e-6; = p2346*(p1079+p1081)
- p1743: 0
- p4307: 1.30917e-6; = p1962*p3479
- p2298: 0.000630143; = p2227*p2205
- p2928: 7.81652e-6; = p2342*(p1079+p1081)
- p2263: 0.000214102; = p2226*p2209
- p2914: 0.000123542; = p2328*(p1020+p1022)
- p2583: 0; = p2387*p1073
- p3367: 0; = if(p1232=0;p3244*p3361/p0818;0)
- p1853: 0
- p3352: 992871; = if(and(p1232=0;p3256<>0);p3256*(p3275-p3347)/p3349;0)
- p1068: 0.0203282; = IF(p1012=0;p1054/(p1061*p0818);0)
- p2128: 2.43128e-7; = p2015*p2056*p2090/(p0818*1000)
- p2909: 4.90427e-6; = p2323*(p1020+p1022)
- p3069: 0; = p2288*p1023
- p2122: 0.341195
- p0844: 0.409944
- p0803: 125000
- p1926: 1.79649e-7; = p1518*1000/p0818
- p1017: 0.20544; = IF(p1012=0;p0708/100;0)
- p4966: 7.2341e-7; = p1793*p3483
- p3344: 4.64739e6; = if(and(p1232=0;p3254<>0);p3254-(p3339+p3340+p3341+p3342+p3343);0)
- p1997: 2.48528e9; = (if(p1152=0;0;p1150/p1152)+if(p1153=0;0;p1151/p1153))*(1+p1157)
- p3257: 0.849747
- p0710: 80.017; = p0050*(1+p0578*p0182/100)
- p2160: 2.09492e-8; = p2015*p2084*p2122/(p0818*1000)
- p0912: 0.0117949
- p1941: 0
- p1079: 0.42094; = IF(p1071=0;IF(p1073+p1078=1;0;IF(p1073+p1078+p1075>1;1-(p1073+p1078);p1075));0)
- p2265: 0.00121057; = p2226*p2211
- p3424: 0; = p3367*p1239
- p2648: 0.000414539; = p2257*(p1019+p1021)
- p0978: 0
- p1332: 2.24194e7; = p1321*p0801
- p0369: 0.5
- p1240: 0; = if(p1232>0;0;IF(p1234+p1238+p1239=1;0;IF(p1234+p1238+p1239+p1237>1;1-(p1234+p1238+p1239);p1237)))
- p3156: 0; = p2375*p1082
- p0167: 3.08
- p0827: 1.4875e9; = p0818*p0819*p0823
- p2207: 0.00482986; = p1119-p2205-p2204-p2206
- p3412: 0.000888388; = p3374*p1238
- p0008: 0.0739645; = (p0007-1.5)/(p0007-1)^2
- p0770: 60.471; = p0110*(1+p0638*p0242/100)
- p0883: 0.00690421; = p0882*p0001*p0003/(p0818*p0002)
- p1077: 0; = IF(p1071=0;p0715/100;0)
- p1626: 0
- p4013: 4.84748e-8; = p1870*p3478
- p0877: 0; = p0876*p0001*p0003/(p0818*p0002)
- p2372: 0.000280105; = p2225*p2201
- p2865: 7.91234e-5; = p2279*(p1020+p1022)
- p3123: 5.64132e-7; = p2342*p1082
- p1964: 0.5
- p4603: 4.2224e-8; = p1842*p3481
- p1116: 0.000213143; = IF(p1071=0;p1106/(p1111*p0818);0)
- p1293: 0; = p1287*p1252/p0818
- p2748: 2.67675e-5; = p2357*(p1019+p1021)
- p0250: 8.703
- p3401: 0; = p3363*p1238
- p2369: 2.90477e-6; = p2225*p2198
- p2338: 6.31704e-5; = p2228*p2206
- p1587: 0
- p2737: 8.14521e-6; = p2346*(p1078+p1080)
- p0802: 1.065e7
- p2383: 0; = p2229*p2212
- p2379: 0; = p2229*p2208
- p0237: 4.764
- p2194: 0.214362
- p1618: 0
- p0198: 28.216
- p2539: 4.97722e-5; = p2343*p1073
- p2894: 0.000121497; = p2308*(p1079+p1081)
- p1607: 0
- p3173: 0; = p2392*p1132
- p2794: 0; = p2403*(p1019+p1021)
- p1199: -0.29
- p2558: 2.2829e-5; = p2362*p1014
- p3091: 8.03156e-6; = p2310*p1082
- p1767: 0
- p0739: 2.911; = p0079*(1+p0607*p0211/100)
- p3107: 0; = p2326*p1023
- p1317: 0
- p2366: 0.000207151; = p2225*p2195
- p3184: 0; = p2403*p1023
- p0809: 2000
- p2327: 3.10969e-5; = p2224*p2195
- p1184: 2.06737e-8; = p1182/p0818
- p2921: 2.78831e-5; = p2335*(p1020+p1022)
- p2752: 2.25308e-5; = p2361*(p1019+p1021)
- p0355: 0.5
- p2797: 0; = p2406*(p1019+p1021)
- p2478: 0.000235595; = p2282*p1014
- p2358: 0.000195265; = p2225*p2186
- p1963: 0.000214079; = p1963a+p1963b+p1963c+p1963d+p1963e+p1963f+p1963g+p1963h+p1963i+p1963j+p1963k
- p1649: 0
- p2875: 0.00192034; = p2289*(p1020+p1022)
- p3360: 3.72864e8; = if(p1232=0;p3310+p3321+p3332+p3343+p3354;0)
- p0457: 0; = SQRT(2)*(IF((2*p0325-1)<0;-1;IF((2*p0325-1)>0;1;0))*SQRT(SQRT((2/(pi()*0.140012289)+LN(1-(2*p0325-1)^2)/2)^2-LN(1-(2*p0325-1)^2)/0.140012289)-(2/(pi()*0.140012289)+LN(1-(2*p0325-1)^2)/2)))
- p2031: 0.465411
- p1578: 0
- p0223: 21.869
- p1074: 0.344; = IF(p1071=0;p0712/100;0)
- p1934: 0
- p2421: 0; = p2235*p2211
- p0065: 8.849
- p0142: 0
- p2717: 4.60241e-5; = p2326*(p1019+p1021)
- p1670: 0
- p1176: 1682.68; = p1175*p0801
- p5221: 6.27138e-9; = p1842*p3484
- p1914: 0
- p3305: 0.856081; = if(and(p1232=0;p3252<>0);1-(p3301+p3302+p3303+p3304);0)
- p3702: 0; = p1765*p3477
- p2689: 0.000216769; = p2298*(p1078+p1080)
- p2867: 2.63551e-5; = p2281*(p1020+p1022)
- p0653: 0; = IF(p0389<0.5;-SQRT(p0007*EXP(p0521^2*p0008)-p0007);SQRT(p0007*EXP(p0521^2*p0008)-p0007))
- p1230: 0.5
- p1804: 2.39532e-8; = p1396*1000/p0818
- p0009: 43.4977
- p2177: 0.0642478; = p0895/p0818-(p2173+p2174+p2175+p2176)
- p2361: 7.10169e-5; = p2225*p2189
- p3000: 0; = p2414*(p1079+p1081)
- p3312: 0.1394; = if(and(p1232=0;p3253<>0);p3261*p3277*(p3298*p3290+(1-p3298)*p3294);0)
- p0955: 2.26478e-5; = if(and(p0683>0;or(p0807=56;p0807=100;and(p0807=60;p0901>0.06)));p0937;0)
- p2828: 3.19321e-5; = p2242*(p1020+p1022)
- p1169: 0.000621786
- p1151: 7.41735e7; = if(p1121=0;p1149*p1148*p1145;0)
- p2616: 0; = p2420*p1073
- p5099: 9.84678e-9; = p1926*p3483
- p2981: 0; = p2395*(p1020+p1022)
- p1746: 0
- p2180: 1.96515e-8; = p3233*p1188/(p0818)
- p2339: 0.000524499; = p2228*p2207
- p0825: 7.34486e10; = p0818*p0822
- p0983: 1; = if(p0886=0;0;min(1;(p0695*p0694*1000*p0697/100)/p0886))
- p2208: 0.000875771; = p1110/p0818
- p1973: 0; = if(p0807=480;p1968*p0001/(p0818*p0002);0)
- p3461: 0; = p3366*p1241
- p0037: 81.594
- p3804: 0; = p1867*p3477
- p1269: 0
- p2672: 2.08047e-5; = p2281*(p1019+p1021)
- p2028: 6.65098e-6; = p2015*p2026*p2027/(p0818*1000)
- p3027: 0; = p2246*p1023
- p2415: 0; = p2235*p2205
- p2274: 0.000576988; = p2230*p2220
- p1963c: 2.6375e-5; = p1588*p1792+p1589*p1793+p1590*p1794+p1591*p1795+p1592*p1796+p1593*p1797+p1594*p1798+p1595*p1799+p1596*p1800+p1597*p1801+p1598*p1802+p1599*p1803+p1600*p1804+p1601*p1805+p1602*p1806+p1603*p1807+p1604*p1808+p1605*p1809+p1606*p1810+p1607*p1811
- p0236: 1.358
- p2041: 3.47931e-7; = p2015*p2040/(p0818*1000)
- p1641: 0
- p3511: 1.07081e-7; = p1780*p3476
- p2514: 3.55698e-6; = p2318*p1014
- p3362: 0; = if(p1232=0;p3244*p3356/p0818;0)
- p0349: 0.5
- p4039: 1.31575e-7; = p1896*p3478
- p2517: 1.51566e-5; = p2321*p1014
- p0591: 0; = IF(p0327<0.5;-SQRT(p0007*EXP(p0459^2*p0008)-p0007);SQRT(p0007*EXP(p0459^2*p0008)-p0007))
- p2309: 2.94975e-5; = p2227*p2216
- p3209: 0; = p2428*p1132
- p0221: 9.745
- p3462: 0; = p3367*p1241
- p1063: 0.455
- p1791: 0
- p3068: 0; = p2287*p1023
- p2141: 5.08473e-8; = p2015*p2069*p2103/(p0818*1000)
- p0608: 0; = IF(p0344<0.5;-SQRT(p0007*EXP(p0476^2*p0008)-p0007);SQRT(p0007*EXP(p0476^2*p0008)-p0007))
- p2121: 0.822447
- p2487: 1.90355e-6; = p2291*p1014
- p3166: 0; = p2385*p1082
- p3075: 0; = p2294*p1023
- p3028: 0; = p2247*p1023
- p1697: 0.705252
- p3333: 0; = if(and(p1232=0;p3255<>0);p3255-(p3328+p3329+p3330+p3331+p3332);0)
- p2442: 1.62306e-5; = p2246*p1014
- p1141: 4.76076e-5; = if(p1121=0;p1135*p0001/(p0818*p0002);0)
- p4721: 0; = p1754*p3482
- p2618: 0; = p2422*p1073
- p2799: 0; = p2408*(p1019+p1021)
- p0952: 3.34056e-5; = if(and(p0683>0;or(p0807=56;p0807=100;and(p0807=60;p0901>0.06)));p0934;0)
- p1268: 0
- p0868: 0; = IF(p0858+p0864+p0865+p0866+p0867=1;0;IF(p0858+p0864+p0865+p0866+p0867+p0863>1;1-(p0858+p0864+p0865+p0866+p0867);p0863))
- p3877: 0; = p1940*p3477
- p1837: 0
- p1305: 0; = p1301*p1252/p0818
- p0747: 0
- p0689: 81.594; = p0029*(1+p0557*p0161/100)
- p0929: 3.89783e6; = p0801*p0923
- p1908: 0
- p1747: 0
- p1302: 0; = IF(p1297+p1300+p1301=p1262;0;p1262-(p1297+p1300+p1301))
- p2184: 0.00015458; = p1051/p0818
- p1625: 0
- p2201: 0.00176767; = 12.01*p2200/(2*14.0067)
- p2445: 0.000164476; = p2249*p1014
- p2547: 2.65203e-5; = p2351*p1123
- p0999: 0; = IF(p0996=1;0;IF(p0996+p0997>1;1-p0996;p0997))
- p3301: 0.130394; = if(and(p1232=0;p3252<>0);p3257*p3277*(p3297*p3290+(1-p3297)*p3294);0)
- p2944: 7.8477e-5; = p2358*(p1020+p1022)
- p3908: 3.68201e-5; = p1765*p3478
- p2854: 4.96182e-5; = p2268*(p1079+p1081)
- p0478: 0; = SQRT(2)*(IF((2*p0346-1)<0;-1;IF((2*p0346-1)>0;1;0))*SQRT(SQRT((2/(pi()*0.140012289)+LN(1-(2*p0346-1)^2)/2)^2-LN(1-(2*p0346-1)^2)/0.140012289)-(2/(pi()*0.140012289)+LN(1-(2*p0346-1)^2)/2)))
- p3460: 0; = p3365*p1241
- p3080: 6.19923e-6; = p2299*p1082
- p0447: 0; = SQRT(2)*(IF((2*p0315-1)<0;-1;IF((2*p0315-1)>0;1;0))*SQRT(SQRT((2/(pi()*0.140012289)+LN(1-(2*p0315-1)^2)/2)^2-LN(1-(2*p0315-1)^2)/0.140012289)-(2/(pi()*0.140012289)+LN(1-(2*p0315-1)^2)/2)))
- p2836: 0.0023267; = p2250*(p1020+p1022)
- p1050: 6.34687e8; = IF(p1012=0;p1037*p1036;0)
- p0024: 4.914
- p3470: 0.000148552; = p3375*p1241
- p0018: 3897.83
- p2549: 3.19459e-6; = p2353*p1123
- p1124: 0.35267; = if(p1121=0;p0718/100;0)
- p3396: 0.000246519; = p3377*p1234
- p1402: 582
- p0801: 1.08e7
- p0791: 0
- p3295: 0.58
- p0885: 18.406; = IF(p0689+p0884=100;0;100-(p0689+p0884))
- p0577: 0; = IF(p0313<0.5;-SQRT(p0007*EXP(p0445^2*p0008)-p0007);SQRT(p0007*EXP(p0445^2*p0008)-p0007))
- p2051: 7.15232e-6; = p2015*p2049*p2050/(p0818*1000)
- p0735: 0
- p0352: 0.5
- p2993: 0; = p2407*(p1020+p1022)
- p3031: 0; = p2250*p1023
- p3541: 4.51602e-7; = p1810*p3476
- p0507: 0; = SQRT(2)*(IF((2*p0375-1)<0;-1;IF((2*p0375-1)>0;1;0))*SQRT(SQRT((2/(pi()*0.140012289)+LN(1-(2*p0375-1)^2)/2)^2-LN(1-(2*p0375-1)^2)/0.140012289)-(2/(pi()*0.140012289)+LN(1-(2*p0375-1)^2)/2)))
- p0910: 0.00351406; = p0909/p0818
- p0350: 0.5
- p2670: 6.246e-5; = p2279*(p1019+p1021)
- p2559: 5.74089e-6; = p2363*p1014
- p3214: 0.376406; = p1222*40.078/100.0869
- p2328: 0.000307394; = p2224*p2196
- p0760: 0
- p2089: 0.40001
- p5268: 1.12356e-6; = p1889*p3484
- p2531: 1.94842e-5; = p2335*p1014
- p2437: 0.000155038; = p2241*p1014
- p2438: 2.23135e-5; = p2242*p1014
- p3914: 7.88339e-5; = p1771*p3478
- p0072: 30.035
- p0622: 0; = IF(p0358<0.5;-SQRT(p0007*EXP(p0490^2*p0008)-p0007);SQRT(p0007*EXP(p0490^2*p0008)-p0007))
- p1338: 4.27184e6; = p1324*p0801
- p3286: 0.185
- p2079: 0.02
- p0779: 31.13; = p0119*(1+p0647*p0251/100)
- p1961: 0.5
- p0135: 154.805
- p0025: 12.04
- p1817: 0
- p3481: 0.110173; = if(p1328+p1330+p1332+p1334+p1336+p1338+p1340+p1342+p1344=0;0;p1338/(p1328+p1330+p1332+p1334+p1336+p1338+p1340+p1342+p1344))
- p1288: 0
- p0852: 0.365262; = p0847*p0851^3+p0848*p0851^2+p0849*p0851+p0850
- p4971: 2.49452e-8; = p1798*p3483
- p2305: 6.52611e-6; = p2227*p2212
- p3471: 3.99661e-5; = p3376*p1241
- p2053: 1.45647
- p1790: 0
- p3342: 1.24413e7; = if(and(p1232=0;p3254<>0);p3254*(p3272-p3337)/p3338;0)
- p2476: 0.000127961; = p2280*p1014
- p2705: 0.000176731; = p2314*(p1128+p1130)
- p2589: 0; = p2393*p1014
- p2859: 0.00441197; = p2273*(p1129+p1131)
- p2521: 6.97428e-6; = p2325*p1014
- p2190: 0.000512988; = 32.065*p2189/(2*14.0067)
- p2113: 0.832356
- p1659: 0
- p2288: 0.000483372; = p2223*p2195
- p1970: 1.08e7; = p0801
- p2979: 0; = p2393*(p1020+p1022)
- p1794: 0
- p2922: 9.07927e-5; = p2336*(p1079+p1081)
- p2939: 2.11688e-5; = p2353*(p1129+p1131)
- p1032: 1.54995e-5; = IF(p1012=0;p1026*p0001/(p0818*p0002);0)
- p1933: 0
- p0765: 93.242; = p0105*(1+p0633*p0237/100)
- p2550: 0.000338277; = p2354*p1014
- p3476: 0.0647886; = if(p1328+p1330+p1332+p1334+p1336+p1338+p1340+p1342+p1344=0;0;p1328/(p1328+p1330+p1332+p1334+p1336+p1338+p1340+p1342+p1344))
- p0656: 0; = IF(p0392<0.5;-SQRT(p0007*EXP(p0524^2*p0008)-p0007);SQRT(p0007*EXP(p0524^2*p0008)-p0007))
- p3260: 0.0343561
- p1301: 0; = IF(p1297+p1300=p1265;0;IF(p1297+p1300+p1299>p1265;p1265-(p1297+p1300);p1299))
- p0468: 0; = SQRT(2)*(IF((2*p0336-1)<0;-1;IF((2*p0336-1)>0;1;0))*SQRT(SQRT((2/(pi()*0.140012289)+LN(1-(2*p0336-1)^2)/2)^2-LN(1-(2*p0336-1)^2)/0.140012289)-(2/(pi()*0.140012289)+LN(1-(2*p0336-1)^2)/2)))
- p1996: 30
- p2652: 0.000898215; = p2261*(p1078+p1080)
- p2364: 0.000165429; = p2225*p2192
- p3190: 0; = p2409*p1023
- p2127: 6.54327e-7; = p2015*p2055*p2089/(p0818*1000)
- p0685: 12.04; = p0025*(1+p0553*p0157/100)
- p3453: 0; = p3377*p1240
- p2870: 7.62323e-5; = p2284*(p1020+p1022)
- p2224: 0.0237875; = if(p0765*p0769+p0766*p0770+p0767*p0771+p0768*p0772=0;0;p0771*p0767/(p0765*p0769+p0766*p0770+p0767*p0771+p0768*p0772))
- p3128: 2.71454e-6; = p2347*p1082
- p2239: 6.92516e-5; = p2222*p2184
- p5043: 4.59517e-9; = p1870*p3483
- p5243: 1.17588e-9; = p1864*p3484
- p0531: 0; = SQRT(2)*(IF((2*p0399-1)<0;-1;IF((2*p0399-1)>0;1;0))*SQRT(SQRT((2/(pi()*0.140012289)+LN(1-(2*p0399-1)^2)/2)^2-LN(1-(2*p0399-1)^2)/0.140012289)-(2/(pi()*0.140012289)+LN(1-(2*p0399-1)^2)/2)))
- p3945: 1.5512e-6; = p1802*p3478
- p1334: 6.81086e6; = p1322*p0801
- p1019: 0.11182; = IF(p1012=0;IF(p1014=1;0;IF(p1014+p1015>1;1-p1014;p1015));0)
- p2355: 0.000264407; = p2225*p2183
- p1259: 0.55386; = if(p1232>0;0;p0730/100)
- p3146: 0; = p2365*p1023
- p3025: 0; = p2244*p1023
- p0210: 0
- p1951: 0
- p3529: 2.94861e-8; = p1798*p3476
- p3343: 1.26047e8; = if(and(p1232=0;p3254<>0);IF((p3339+p3340+p3341+p3342)+(p3254*(p3269*(1-p3277))/p3338)>p3254;p3254-(p3339+p3340+p3341+p3342);p3254*(p3269*(1-p3277))/p3338);0)
- p1936: 0
- p0412: 0; = SQRT(2)*(IF((2*p0280-1)<0;-1;IF((2*p0280-1)>0;1;0))*SQRT(SQRT((2/(pi()*0.140012289)+LN(1-(2*p0280-1)^2)/2)^2-LN(1-(2*p0280-1)^2)/0.140012289)-(2/(pi()*0.140012289)+LN(1-(2*p0280-1)^2)/2)))
- p1622: 0
- p2862: 0.0011296; = p2276*(p1020+p1022)
- p2345: 2.1126e-5; = p2228*p2213
- p0388: 0.5
- p0891: 226512; = IF(p3251=0;0;62.4*6272640/(12*12*12))
- p2596: 0; = p2400*p1014
- p3326: 0; = if(and(p1232=0;p3255<>0);p3268*p3289;0)
- p2851: 0.000509576; = p2265*(p1079+p1081)
- p1242: 472497; = if(p1232>0;0;p1234*(p0725/100)*p0723*1000)
- p1315: 0; = p1311*p1252/p0818
- p2149: 1.07654e-8; = p2015*p2077*p2111/(p0818*1000)
- p2651: 0.000108181; = p2260*(p1078+p1080)
- p2102: 0.922577
- p2232: 0.0258709; = if(p0783*p0787+p0784*p0788+p0785*p0789+p0786*p0790=0;0;p0789*p0785/(p0783*p0787+p0784*p0788+p0785*p0789+p0786*p0790))
- p1760: 0
- p3507: 2.1649e-7; = p1776*p3476
- p3450: 0; = p3374*p1240
- p0927: 0.00563991; = IF(p0918+p0923+p0924+p0925+p0926=1;0;1-(p0918+p0923+p0924+p0925+p0926))
- p1087: 0; = IF(p1071=0;p1081*(p0710/100)*p0703*1000;0)
- p0598: 0; = IF(p0334<0.5;-SQRT(p0007*EXP(p0466^2*p0008)-p0007);SQRT(p0007*EXP(p0466^2*p0008)-p0007))
- p3285: 0.275
- p1599: 0
- p2519: 3.42701e-6; = p2323*p1014
- p2941: 0.000106265; = p2355*(p1020+p1022)
- p2080: 0.025
- p0298: 0.5
- p1023: 0; = IF(p1012=0;IF(p1014+p1019+p1020+p1021+p1022=1;0;1-(p1014+p1019+p1020+p1021+p1022));0)
- p1597: 0
- p3114: 0; = p2333*p1023
- p3195: 0; = p2414*p1082
- p3383: 0; = p3364*p1234
- p0886: 2.14531e6; = p0686*1000*p0687*p0689/100
- p0286: 0.5
- p0867: 0.00862167; = IF(p0858+p0864+p0865+p0866=1;0;IF(p0858+p0864+p0865+p0866+p0862>1;1-(p0858+p0864+p0865+p0866);p0862))
- p1568: 0
- p2471: 8.02023e-5; = p2275*p1123
- p2234: 0; = 1-(p2222+p2223+p2224+p2225)
- p2871: 1.91705e-5; = p2285*(p1020+p1022)
- p1839: 0
- p4701: 5.99053e-7; = p1940*p3481
- p1204: 0.980791
- p1633: 0
- p0890: 483940; = p0686*1000*p0687*p0885/100
- p1781: 0
- p2059: 1.00168
- p2791: 0; = p2400*(p1019+p1021)
- p2304: 0.000785504; = p2227*p2211
- p2482: 0.000108409; = p2286*p1014
- p0920: 0.147724; = p0676*1000/p0801
- p3417: 0.000114554; = p3379*p1238
- p2435: 1.94486e-5; = p2239*p1014
- p4425: 0; = p1870*p3480
- p0949: 0; = if(and(p0683=0;or(p0807=480;p0807=32;p0807=1;and(p0807=60;p0901<0.03)));p0937;0)
- p3269: 0.851786
- p2450: 0.000518751; = p2254*p1014
- p1849: 0
- p3160: 0; = p2379*p1082
- p3036: 0; = p2255*p1023
- p1223: 0.56
- p0377: 0.5
- p2578: 0; = p2382*p1073
- p2900: 0.000265621; = p2314*(p1129+p1131)
- p0239: 20.95
- p0282: 0.5
- p4743: 0; = p1776*p3482
- p0557: 0; = IF(p0293<0.5;-SQRT(p0007*EXP(p0425^2*p0008)-p0007);SQRT(p0007*EXP(p0425^2*p0008)-p0007))
- p3108: 0; = p2327*p1023
- p2804: 0; = p2413*(p1019+p1021)
- p2116: 0.444424
- p0836: 8.97203e9; = p0831*p0835*p0801/(1-p0831)
- p1980: 3521.6
- p1684: 0
- p1569: 0
- p1892: 0
- p3415: 0.000123998; = p3377*p1238
- p2715: 9.73566e-7; = p2324*(p1019+p1021)
- p3096: 0; = p2315*p1023
- p1831: 0
- p1876: 0
- p3201: 0; = p2420*p1082
- p3355: 2.89252e6; = if(and(p1232=0;p3256<>0);p3256-(p3350+p3351+p3352+p3353+p3354);0)
- p1521: 541
- p2391: 0; = p2233*p2220
- p2062: 3.76588
- p3230: 8.04264e-8; = p1170/p0818
- p0593: 0; = IF(p0329<0.5;-SQRT(p0007*EXP(p0461^2*p0008)-p0007);SQRT(p0007*EXP(p0461^2*p0008)-p0007))
- p2250: 0.00578924; = p2222*p2196
- p0935: 4.16495e-5; = p0929*p0001/(p0818*p0002)
- p2898: 0.00220509; = p2312*(p1129+p1131)
- p1731: 0
- p4142: 2.31835e-6; = p1793*p3479
- p1759: 0
- p0699: 0
- p3746: 0; = p1809*p3477
- p3457: 0; = p3362*p1241
- p3213: 0.112803; = p1222*12.0107/100.0869
- p2423: 0; = p2235*p2213
- p3092: 0.000110084; = p2311*p1132
- p2293: 0.00152454; = p2223*p2200
- p0742: 97.33; = p0082*(1+p0610*p0214/100)
- p1595: 0
- p0763: 10798.8; = p0103*(1+p0631*p0235/100)
- p2401: 0; = p2234*p2190
- p0670: 1425.65; = p0010*(1+p0538*p0142/100)
- p0758: 0
- p2834: 0.00109803; = p2248*(p1020+p1022)
- p2780: 0; = p2389*(p1128+p1130)
- p2409: 0; = p2234*p2199
- p3863: 0; = p1926*p3477
- p3348: 0.00443516; = if(and(p1232=0;p3256<>0);p3276*p3289;0)
- p2012: 0.00122471
- p2582: 0; = p2386*p1073
- p2746: 8.38857e-5; = p2355*(p1019+p1021)
- p2099: 0.620397
- p2168: 0.00339005; = p2166*(p0903)
- p2472: 0.000789345; = p2276*p1014
- p2508: 0.000332771; = p2312*p1123
- p0913: 0.0151931
- p2165: 0.494071; = (p0833-p2014)/p0818-p0839
- p1021: 0.20544; = IF(p1012=0;IF(p1014+p1019+p1020=1;0;IF(p1014+p1019+p1020+p1017>1;1-(p1014+p1019+p1020);p1017));0)
- p1275: 0; = p1271*p1252/p0818
- p0866: 0; = IF(p0858+p0864+p0865=1;0;IF(p0858+p0864+p0865+p0861>1;1-(p0858+p0864+p0865);p0861))
- p2357: 8.4371e-5; = p2225*p2185
- p2656: 0.000416435; = p2265*(p1078+p1080)
- p5062: 3.76344e-6; = p1889*p3483
- p3241: 1.8168e-10; = p3234*p1188*p3236/p0818
- p3192: 0; = p2411*p1023
- p0965: 0.1204; = IF(p0684/100=1;0;IF(p0684/100+p0685/100>1;1-p0684/100;p0685/100))
- p2599: 0; = p2403*p1014
- p0410: 0; = SQRT(2)*(IF((2*p0278-1)<0;-1;IF((2*p0278-1)>0;1;0))*SQRT(SQRT((2/(pi()*0.140012289)+LN(1-(2*p0278-1)^2)/2)^2-LN(1-(2*p0278-1)^2)/0.140012289)-(2/(pi()*0.140012289)+LN(1-(2*p0278-1)^2)/2)))
- p3153: 0; = p2372*p1023
- p3382: 0; = p3363*p1234
- p5299: 1.23076e-7; = p1920*p3484
- p1971: 0.000113799; = p1966*p0001/(p0818*p0002)
- p1229: 0.0037015; = IF(p1221=0;0;p1228*p1221)
- p0693: 0
- p2775: 0; = p2384*(p1078+p1080)
- p4216: 1.03084e-7; = p1867*p3479
- p1030: 3.18356e-5; = IF(p1012=0;p1024*p0001/(p0818*p0002);0)
- p0003: 10000
- p0579: 0; = IF(p0315<0.5;-SQRT(p0007*EXP(p0447^2*p0008)-p0007);SQRT(p0007*EXP(p0447^2*p0008)-p0007))
- p4662: 1.47784e-7; = p1901*p3481
- p3268: 0.0232481
- p0684: 4.914; = p0024*(1+p0552*p0156/100)
- p4687: 1.97925e-8; = p1926*p3481
- p4896: 0; = p1929*p3482
- p2300: 0.00169427; = p2227*p2207
- p2351: 0.000331545; = p2232*p2219
- p1621: 0
- p2329: 2.6567e-7; = p2224*p2197
- p1888: 0
- p0309: 0.5
- p2443: 0.000131349; = p2247*p1014
- p2532: 4.41475e-5; = p2336*p1073
- p0678: 3897.83; = p0018*(1+p0546*p0150/100)
- p1133: 697763; = if(p1121=0;p1123*(p0716/100)*p0703*1000;0)
- p2420: 0; = p2235*p2210
- p0562: 0; = IF(p0298<0.5;-SQRT(p0007*EXP(p0430^2*p0008)-p0007);SQRT(p0007*EXP(p0430^2*p0008)-p0007))
- p3062: 0; = p2281*p1023
- p1828: 0
- p3227: 0.00046949; = p3223*p1229
- p1056: 3.44262e8; = IF(p1012=0;p1049*p1036;0)
- p1948: 0
- p0119: 31.13
- p1802: 2.68276e-6; = p1394*1000/p0818
- p4373: 0; = p1818*p3480
- p3485: 3.18915e-7; = p1754*p3476
- p0203: 59.976
- p2278: 5.71568e-5; = p2223*p2184
- p1869: 0
- p3236: 0.0140975
- p0980: 0; = IF(p0977=0;0;p0977*p0001/(p0818*p0002))
- p3335: 0.0141479; = IF(or(p3254=0;p1232>0);0;p3270*(p3280*(p3283*p1256+p3286*(p1253+p1257)+p1258*p3288+p3300*p3287)))
- p2742: 0.000116926; = p2351*(p1128+p1130)
- p0445: 0; = SQRT(2)*(IF((2*p0313-1)<0;-1;IF((2*p0313-1)>0;1;0))*SQRT(SQRT((2/(pi()*0.140012289)+LN(1-(2*p0313-1)^2)/2)^2-LN(1-(2*p0313-1)^2)/0.140012289)-(2/(pi()*0.140012289)+LN(1-(2*p0313-1)^2)/2)))
- p0259: 7.397
- p0348: 0.5
- p1963d: 7.87893e-6; = p1608*p1812+p1609*p1813+p1610*p1814+p1611*p1815+p1612*p1816+p1613*p1817+p1614*p1818+p1615*p1819+p1616*p1820+p1617*p1821+p1618*p1822+p1619*p1823+p1620*p1824+p1621*p1825+p1622*p1826+p1623*p1827+p1624*p1828+p1625*p1829+p1626*p1830+p1627*p1831
- p2755: 5.2484e-5; = p2364*(p1019+p1021)
- p0823: 0.35
- p3339: 7.48719e7; = if(and(p1232=0;p3254<>0);p3254*(p3269*p3277-p3334)/p3338;0)
- p2924: 2.6591e-5; = p2338*(p1079+p1081)
- p1157: 0.222821
- p1067: 0.00213414; = IF(p1012=0;p1053/(p1060*p0818);0)
- p4664: 1.97925e-7; = p1903*p3481
- p3282: 0.3
- p2277: 0.000616973; = p2223*p2183
- p2385: 0; = p2229*p2214
- p3033: 0; = p2252*p1023
- p3289: 0.05
- p3689: 4.82873e-7; = p1962*p3476
- p0647: 0; = IF(p0383<0.5;-SQRT(p0007*EXP(p0515^2*p0008)-p0007);SQRT(p0007*EXP(p0515^2*p0008)-p0007))
- p3430: 0; = p3373*p1239
- p0918: 0.289473; = p0680*1000/p0801
- p1703: 0
- p1855: 5.09006e-6; = p1447*1000/p0818
- p0438: 0; = SQRT(2)*(IF((2*p0306-1)<0;-1;IF((2*p0306-1)>0;1;0))*SQRT(SQRT((2/(pi()*0.140012289)+LN(1-(2*p0306-1)^2)/2)^2-LN(1-(2*p0306-1)^2)/0.140012289)-(2/(pi()*0.140012289)+LN(1-(2*p0306-1)^2)/2)))
- p2449: 5.07077e-6; = p2253*p1014
- p0416: 0; = SQRT(2)*(IF((2*p0284-1)<0;-1;IF((2*p0284-1)>0;1;0))*SQRT(SQRT((2/(pi()*0.140012289)+LN(1-(2*p0284-1)^2)/2)^2-LN(1-(2*p0284-1)^2)/0.140012289)-(2/(pi()*0.140012289)+LN(1-(2*p0284-1)^2)/2)))
- p0686: 285.509; = p0026*(1+p0554*p0158/100)
- p2006: 0.284731; = ((p1980*p1985+p1986*p1991+p1992*p1997+p2000*p2005)/p0818)*p0005*p0002/1000
- p1764: 0
- p0260: 14.522
- p2650: 0.00033407; = p2259*(p1078+p1080)
- p1140: 3.28721e-5; = if(p1121=0;p1134*p0001/(p0818*p0002);0)
- p1065: 0.000687023; = IF(p1012=0;p1051/(p1058*p0818);0)
- p1153: 0.365265
- p0706: 11.182; = p0046*(1+p0574*p0178/100)
- p2699: 9.92897e-5; = p2308*(p1078+p1080)
- p2840: 0.000742365; = p2254*(p1020+p1022)
- p2543: 1.82888e-5; = p2347*p1073
- p1239: 0; = if(p1232>0;0;IF(p1234+p1238=1;0;IF(p1234+p1238+p1236>1;1-(p1234+p1238);p1236)))
- p0331: 0.5
- p0855: 0.514763; = p0854*p0001*p0003/(p0818*p0002)
- p3550: 8.92341e-7; = p1819*p3476
- p2144: 3.35481e-8; = p2015*p2072*p2106/(p0818*1000)
- p2185: 0.000532443; = p1065-p2184
- p0990: 0; = p0986*p0886
- p0805: 0
- p3169: 0; = p2388*p1082
- p4494: 0; = p1939*p3480
- p2688: 0.000239677; = p2297*(p1078+p1080)
- p3876: 0; = p1939*p3477
- p3279: 0.37
- p2954: 7.11265e-7; = p2368*(p1020+p1022)
- p1738: 0
- p2316: 3.96919e-5; = p2224*p2183
- p5318: 3.35127e-8; = p1939*p3484
- p3021: 0; = p2240*p1023
- p0804: 0
- p0810: 0
- p2454: 0.000219777; = p2258*p1073
- p0696: 0
- p0575: 0; = IF(p0311<0.5;-SQRT(p0007*EXP(p0443^2*p0008)-p0007);SQRT(p0007*EXP(p0443^2*p0008)-p0007))
- p0637: 0; = IF(p0373<0.5;-SQRT(p0007*EXP(p0505^2*p0008)-p0007);SQRT(p0007*EXP(p0505^2*p0008)-p0007))
- p1897: 0
- p3313: 0.0182858; = if(and(p1232=0;p3253<>0);p3262*(p3278*(p3282*p1256+p3286*(p1253+p1257)+p1258*p3288+p3298*p3287));0)
- p4927: 2.69802e-7; = p1754*p3483
- p2210: 0.000170995; = 6*1.00794*p2208/30.973762
- p0161: 1.936
- p1010: 483940; = p0890
- p2228: 0.108595; = if(p0774*p0778+p0775*p0779+p0776*p0780+p0777*p0781=0;0;p0780*p0776/(p0774*p0778+p0775*p0779+p0776*p0780+p0777*p0781))
- p1209: 140.692; = p1206*p0818*p0822/p0801
- p1834: 0
- p0610: 0; = IF(p0346<0.5;-SQRT(p0007*EXP(p0478^2*p0008)-p0007);SQRT(p0007*EXP(p0478^2*p0008)-p0007))
- p2446: 0.00162585; = p2250*p1014
- p3172: 0; = p2391*p1132
- p1852: 0
- p1896: 2.27556e-7; = p1488*1000/p0818
- p1175: 0.000155803
- p1773: 0
- p2205: 0.00179635; = 2*14.0067*p2204/30.973762
- p2352: 2.29824e-5; = p2232*p2220
- p4513: 0; = p1962*p3480
- p1695: 0
- p2505: 6.03754e-6; = p2309*p1073
- p1782: 0
- p3745: 0; = p1808*p3477
- p2212: 1.8604e-5; = p1106/p0818
- p1306: 0; = p1302*p1252/p0818
- p2011: 0.000686717
- p0767: 16.834; = p0107*(1+p0635*p0239/100)
- p2296: 0.00107842; = p2223*p2203
- p2803: 0; = p2412*(p1019+p1021)
- p0235: 0
- p0442: 0; = SQRT(2)*(IF((2*p0310-1)<0;-1;IF((2*p0310-1)>0;1;0))*SQRT(SQRT((2/(pi()*0.140012289)+LN(1-(2*p0310-1)^2)/2)^2-LN(1-(2*p0310-1)^2)/0.140012289)-(2/(pi()*0.140012289)+LN(1-(2*p0310-1)^2)/2)))
- p0166: 23.536
- p3409: 0; = p3371*p1238
- p2455: 0.000198772; = p2259*p1073
- p2260: 0.000314478; = p2226*p2206
- p4275: 3.15564e-8; = p1926*p3479
- p1028: 2.81314e6; = IF(p1012=0;p1022*(p0704/100)*p0703*1000;0)
- p2721: 1.38343e-7; = p2330*(p1019+p1021)
- p3039: 3.26208e-5; = p2258*p1082
- p3057: 0; = p2276*p1023
- p2155: 3.59278e-8; = p2015*p2084*p2117/(p0818*1000)
- p1866: 0
- p5093: 4.12252e-7; = p1920*p3483
- p1638: 0.732906
- p2897: 0.00156477; = p2311*(p1129+p1131)
- p0440: 0; = SQRT(2)*(IF((2*p0308-1)<0;-1;IF((2*p0308-1)>0;1;0))*SQRT(SQRT((2/(pi()*0.140012289)+LN(1-(2*p0308-1)^2)/2)^2-LN(1-(2*p0308-1)^2)/0.140012289)-(2/(pi()*0.140012289)+LN(1-(2*p0308-1)^2)/2)))
- p2736: 7.26736e-6; = p2345*(p1078+p1080)
- p0997: 0; = if(p0888=0;0;if((p0695*p0694*1000*p0696/100)/p0888>1;1;(p0695*p0694*1000*p0696/100)/p0888))
- p3258: 0.0491162
- p4628: 6.46555e-8; = p1867*p3481
- p1089: 1.88981e-5; = IF(p1071=0;p1083*p0001/(p0818*p0002);0)
- p1037: 0.386463
- p4159: 1.22439e-6; = p1810*p3479
- p3953: 4.03034e-6; = p1810*p3478
- p2512: 1.11471e-5; = p2316*p1014
- p5082: 5.25162e-9; = p1909*p3483
- p0493: 0; = SQRT(2)*(IF((2*p0361-1)<0;-1;IF((2*p0361-1)>0;1;0))*SQRT(SQRT((2/(pi()*0.140012289)+LN(1-(2*p0361-1)^2)/2)^2-LN(1-(2*p0361-1)^2)/0.140012289)-(2/(pi()*0.140012289)+LN(1-(2*p0361-1)^2)/2)))
- p1309: 0
- p0725: 8.849; = p0065*(1+p0593*p0197/100)
- p3288: 0.505
- p3216: 0.06; = IF(OR(p1226=0;p1228=0);0;1-p3213-p3214-p3215)
- p2747: 7.77122e-6; = p2356*(p1019+p1021)
- p3083: 4.22053e-6; = p2302*p1082
- p2555: 7.89246e-6; = p2359*p1014
- p2114: 0.832356
- p2023: 2.24
- p1339: 4.56459e-5; = p1338*p0001/(p0818*p0002)
- p3801: 0; = p1864*p3477
- p2667: 0.000891709; = p2276*(p1019+p1021)
- p0915: 0.0100157; = p0914/p0818
- p3094: 1.07536e-5; = p2313*p1132
- p2048: 2.92379e-15; = p2015*p2046/(p0818*1000000000000)
- p2622: 0; = p2426*p1073
- p3985: 2.21599e-7; = p1842*p3478
- p1310: 0; = IF(p1307=p1266;0;IF(p1307+p1308>p1266;p1266-p1307;p1308))
- p2085: 0.0335294
- p1932: 0
- p2004: 30
- p1776: 3.34148e-6; = p1368*1000/p0818
- p2287: 0.00225494; = p2223*p2193
- p2566: 1.79357e-6; = p2370*p1014
- p1108: 7.02107e6; = IF(p1071=0;p1105*p1102*p1095;0)
- p0449: 0; = SQRT(2)*(IF((2*p0317-1)<0;-1;IF((2*p0317-1)>0;1;0))*SQRT(SQRT((2/(pi()*0.140012289)+LN(1-(2*p0317-1)^2)/2)^2-LN(1-(2*p0317-1)^2)/0.140012289)-(2/(pi()*0.140012289)+LN(1-(2*p0317-1)^2)/2)))
- p1798: 4.55112e-7; = p1390*1000/p0818
- p2439: 0.000285449; = p2243*p1014
- p2740: 2.81536e-5; = p2349*(p1078+p1080)
- p3270: 0.0747083
- p2679: 0.000153355; = p2288*(p1019+p1021)
- p2771: 0; = p2380*(p1078+p1080)
- p2617: 0; = p2421*p1073
- p0946: 0; = if(and(p0683=0;or(p0807=480;p0807=32;p0807=1;and(p0807=60;p0901<0.03)));p0934;0)
- p1952: 0
- p2682: 2.15041e-6; = p2291*(p1019+p1021)
- p0218: 47.243
- p3164: 0; = p2383*p1082
- p1707: 0
- p1203: 3
- p3361: 3.84575e7; = if(p1232=0;p3311+p3322+p3333+p3344+p3355;0)
- p1617: 0
- p2825: 2.78322e-5; = p2239*(p1020+p1022)
- p1803: 0
- p4456: 0; = p1901*p3480
- p2280: 0.000455636; = p2223*p2186
- p3327: 0; = if(and(p1232=0;p3255<>0);1-(p3323+p3324+p3325+p3326);0)
- p2198: 1.83313e-5; = 22.98976928*p2197/14.0067
- p2772: 0; = p2381*(p1078+p1080)
- p2915: 1.06773e-7; = p2329*(p1020+p1022)
- p0194: 23.043
- p0444: 0; = SQRT(2)*(IF((2*p0312-1)<0;-1;IF((2*p0312-1)>0;1;0))*SQRT(SQRT((2/(pi()*0.140012289)+LN(1-(2*p0312-1)^2)/2)^2-LN(1-(2*p0312-1)^2)/0.140012289)-(2/(pi()*0.140012289)+LN(1-(2*p0312-1)^2)/2)))
- p1321: 2.07587; = IF(((p0745*1000*p0748/100)+(p0754*1000*p0757/100))/p0801<0;0;((p0745*1000*p0748/100)+(p0754*1000*p0757/100))/p0801)
- p1737: 0
- p0864: 0.853391; = IF(p0858=1;0;IF(p0858+p0859>1;1-p0858;p0859))
- p2619: 0; = p2423*p1073
- p1254: 0; = if(p1232>0;0;p0736/100)
- p0875: 0; = p0874*p0001*p0003/(p0818*p0002)
- p2204: 0.00198618; = p1109/p0818
- p2750: 8.91597e-6; = p2359*(p1019+p1021)
- p5155: 5.46786e-8; = p1776*p3484
- p2162: 4.76688e-9; = p2015*p2086*p2124/(p0818*1000)
- p1748: 0
- p2561: 0.000271394; = p2365*p1014
- p0962: 0; = if(and(p0683>0;or(p0807=480;p0807=32;p0807=1;and(p0807=60;p0901<0.03)));p0938;0)
- p0368: 0.5
- p2188: 0.00226879; = p1066-p2186-p2187
- p1616: 0
- p0720: 0
- p1187: 0.000251562
- p2382: 0; = p2229*p2211
- p1660: 0.731714
- p3726: 0; = p1789*p3477
- p2743: 8.10519e-6; = p2352*(p1128+p1130)
- p0975: 0.00114605; = p0973*p0974/p0818
- p1197: 1.806
- p2923: 8.2115e-5; = p2337*(p1079+p1081)
- p0475: 0; = SQRT(2)*(IF((2*p0343-1)<0;-1;IF((2*p0343-1)>0;1;0))*SQRT(SQRT((2/(pi()*0.140012289)+LN(1-(2*p0343-1)^2)/2)^2-LN(1-(2*p0343-1)^2)/0.140012289)-(2/(pi()*0.140012289)+LN(1-(2*p0343-1)^2)/2)))
- p2918: 3.94177e-5; = p2332*(p1020+p1022)
- p3121: 2.88928e-6; = p2340*p1082
- p1814: 0
- p2386: 0; = p2229*p2215
- p4944: 7.47305e-6; = p1771*p3483
- p1059: 0.335
- p2675: 6.01778e-5; = p2284*(p1019+p1021)
- p0284: 0.5
- p0974: 0.5
- p0681: 0
- p2485: 0.0013419; = p2289*p1014
- p2057: 3.28794
- p1863: 0
- p0812: 0; = if(p0807=480;0.095/0.34;0)
- p0538: 0; = IF(p0274<0.5;-SQRT(p0007*EXP(p0406^2*p0008)-p0007);SQRT(p0007*EXP(p0406^2*p0008)-p0007))
- p4484: 0; = p1929*p3480
- p0453: 0; = SQRT(2)*(IF((2*p0321-1)<0;-1;IF((2*p0321-1)>0;1;0))*SQRT(SQRT((2/(pi()*0.140012289)+LN(1-(2*p0321-1)^2)/2)^2-LN(1-(2*p0321-1)^2)/0.140012289)-(2/(pi()*0.140012289)+LN(1-(2*p0321-1)^2)/2)))
- p1328: 2.51211e6; = p1319*p0801
- p2147: 1.74006e-8; = p2015*p2075*p2109/(p0818*1000)
- p2592: 0; = p2396*p1014
- p0921: 0.196252; = p0679*1000/p0801
- p3320: 7.92496e6; = if(and(p1232=0;p3253<>0);p3253*(p3264-p3315)/p3316;0)
- p3318: 5.68316e6; = if(and(p1232=0;p3253<>0);p3253*(p3262-p3313)/p3316;0)
- p1881: 0
- p1132: 0.03729; = if(p1121=0;IF(p1123+p1128+p1129+p1130+p1131=1;0;1-(p1123+p1128+p1129+p1130+p1131));0)
- p2917: 3.85307e-7; = p2331*(p1020+p1022)
- p2484: 0.00013575; = p2288*p1014
- p3447: 0; = p3371*p1240
- p2285: 4.76996e-5; = p2223*p2191
- p0698: 0
- p0977: 0; = IF(p0687=0;IF(OR(p0686=0;p0688=0);0;p0686*1000*p0688/100);0)
- p0838: 3.23188e10; = (p0833-p0836)*p0837
- p4410: 0; = p1855*p3480
- p3405: 0; = p3367*p1238
- p2094: 0.922577
- p3204: 0; = p2423*p1082
- p0402: 0.5
- p3197: 0; = p2416*p1082
- p3181: 0; = p2400*p1023
- p0633: 0; = IF(p0369<0.5;-SQRT(p0007*EXP(p0501^2*p0008)-p0007);SQRT(p0007*EXP(p0501^2*p0008)-p0007))
- p3454: 0; = p3378*p1240
- p1843: 0
- p0795: 154.805; = p0135*(1+p0663*p0267/100)
- p2273: 0.00832368; = p2230*p2219
- p2882: 0.000433417; = p2296*(p1020+p1022)
- p4475: 0; = p1920*p3480
- p0306: 0.5
- p0138: 80.017
- p2266: 1.00576e-5; = p2226*p2212
- p0752: 0
- p1000: 0; = IF(p0996+p0999=1;0;IF(p0996+p0999+p0998>1;1-(p0996+p0999);p0998))
- p0183: 25.438
- p2807: 0; = p2416*(p1078+p1080)
- p4822: 0; = p1855*p3482
- p1080: 0; = IF(p1071=0;IF(p1073+p1078+p1079=1;0;IF(p1073+p1078+p1079+p1076>1;1-(p1073+p1078+p1079);p1076));0)
- p4348: 0; = p1793*p3480
- p3306: 1.77128e8; = if(and(p1232=0;p3252<>0);p3252*(p3257*p3277-p3301)/p3305;0)
- p2751: 0.000114059; = p2360*(p1019+p1021)
- p1564: 0
- p0179: 14.272
- p1992: 3900
- p0759: 0
- p1717: 0
- p0358: 0.5
- p0554: 0; = IF(p0290<0.5;-SQRT(p0007*EXP(p0422^2*p0008)-p0007);SQRT(p0007*EXP(p0422^2*p0008)-p0007))
- p1290: 0; = IF(p1287=p1264;0;IF(p1287+p1288>p1264;p1264-p1287;p1288))
- p1565: 0
- p1880: 0
- p1279: 0
- p3826: 0; = p1889*p3477
- p5113: 2.98029e-7; = p1940*p3483
- p2142: 6.73736e-8; = p2015*p2070*p2104/(p0818*1000)
- p1101: 0.0685077; = IF(p1071=0;IF(p1096=1;0;IF(p1096+p1097>1;1-p1096;p1097));0)
- p0798: 80.017; = p0138*(1+p0666*p0270/100)
- p2901: 7.2671e-5; = p2315*(p1020+p1022)
- p3248: 0
- p0695: 9.209; = p0035*(1+p0563*p0167/100)
- p0502: 0; = SQRT(2)*(IF((2*p0370-1)<0;-1;IF((2*p0370-1)>0;1;0))*SQRT(SQRT((2/(pi()*0.140012289)+LN(1-(2*p0370-1)^2)/2)^2-LN(1-(2*p0370-1)^2)/0.140012289)-(2/(pi()*0.140012289)+LN(1-(2*p0370-1)^2)/2)))
- p2507: 0.00023614; = p2311*p1123
- p2320: 4.21874e-6; = p2224*p2187
- p1654: 0
- p4213: 1.26226e-8; = p1864*p3479
- p3059: 0; = p2278*p1023
- p3001: 0; = p2415*(p1079+p1081)
- p0439: 0; = SQRT(2)*(IF((2*p0307-1)<0;-1;IF((2*p0307-1)>0;1;0))*SQRT(SQRT((2/(pi()*0.140012289)+LN(1-(2*p0307-1)^2)/2)^2-LN(1-(2*p0307-1)^2)/0.140012289)-(2/(pi()*0.140012289)+LN(1-(2*p0307-1)^2)/2)))
- p4650: 7.56469e-6; = p1889*p3481
- p2553: 2.36947e-5; = p2357*p1014
- p0957: 6.50853e-7; = if(and(p0683>0;or(p0807=56;p0807=100;and(p0807=60;p0901>0.06)));p0939;0)
- p2199: 4.03032e-5; = p1069-p2197-p2198
- p2108: 0.826583
- p3006: 0; = p2420*(p1079+p1081)
- p0312: 0.5
- p2664: 0.00293551; = p2273*(p1128+p1130)
- p3309: 1.71564e7; = if(and(p1232=0;p3252<>0);p3252*(p3260-p3304)/p3305;0)
- p4287: 7.9943e-8; = p1938*p3479
- p1235: 0.24871; = if(p1232>0;0;p0727/100)
- p1903: 1.79649e-6; = p1495*1000/p0818
- p0152: 0
- p0641: 0; = IF(p0377<0.5;-SQRT(p0007*EXP(p0509^2*p0008)-p0007);SQRT(p0007*EXP(p0509^2*p0008)-p0007))
- p0500: 0; = SQRT(2)*(IF((2*p0368-1)<0;-1;IF((2*p0368-1)>0;1;0))*SQRT(SQRT((2/(pi()*0.140012289)+LN(1-(2*p0368-1)^2)/2)^2-LN(1-(2*p0368-1)^2)/0.140012289)-(2/(pi()*0.140012289)+LN(1-(2*p0368-1)^2)/2)))
- p1847: 0
- p0631: 0; = IF(p0367<0.5;-SQRT(p0007*EXP(p0499^2*p0008)-p0007);SQRT(p0007*EXP(p0499^2*p0008)-p0007))
- p1685: 0.491852
- p1143: 1.79801e-6; = if(p1121=0;p1137*p0001/(p0818*p0002);0)
- p1164: 52503.7; = p1163*p0801
- p2494: 0.000128978; = p2298*p1073
- p2096: 0.486404
- p0807: 56
- p1775: 0
- p0776: 33.245; = p0116*(1+p0644*p0248/100)
- p2586: 0; = p2390*p1123
- p3188: 0; = p2407*p1023
- p0851: 0.5
- p1984: 30
- p3159: 0; = p2378*p1082
- p1220: 0; = IF(p1218<0.5;-SQRT(p1214*EXP(p1219^2*p1215)-p1214);SQRT(p1214*EXP(p1219^2*p1215)-p1214))
- p1336: 0; = p1323*p0801
- p1552: 0
- p0334: 0.5
- p5319: 8.89751e-8; = p1940*p3484
- p2347: 8.9353e-5; = p2228*p2215
- p3640: 6.20759e-9; = p1909*p3476
- p3370: 0; = if(p1232=0;p3245*p3358/p0818;0)
- p4565: 2.639e-9; = p1804*p3481
- p4925: 0; = p1962*p3482
- p2541: 4.32408e-6; = p2345*p1073
- p0215: 21.105
- p4138: 6.73204e-8; = p1789*p3479
- p2502: 1.39679e-5; = p2306*p1073
- p2191: 0.000129003; = 8*1.00794*p2189/(2*14.0067)
- p3088: 2.32364e-6; = p2307*p1082
- p1215: 0.0183471; = IF(p1214=0;0;(p1214-1.5)/(p1214-1)^2)
- p0738: 10799; = p0078*(1+p0606*p0210/100)
- p2685: 0.000207362; = p2294*(p1019+p1021)
- p1159: 0.5
- p3013: 0; = p2427*(p1079+p1081)
- p0712: 34.4; = p0052*(1+p0580*p0184/100)
- p2289: 0.00477815; = p2223*p2196
- p3168: 0; = p2387*p1082
- p4765: 0; = p1798*p3482
- p1701: 0
- p3037: 0; = p2256*p1023
- p0938: 0; = p0932*p0001/(p0818*p0002)
- p0050: 80.017
- p2408: 0; = p2234*p2198
- p1236: 0; = if(p1232>0;0;p0728/100)
- p3923: 9.55647e-7; = p1780*p3478
- p3438: 0; = p3362*p1240
- p2984: 0; = p2398*(p1020+p1022)
- p1125: 0.51076; = if(p1121=0;p0719/100;0)
- p2716: 7.87872e-6; = p2325*(p1019+p1021)
- p2698: 2.63111e-5; = p2307*(p1078+p1080)
- p1640: 0
- p2078: 0.117
- p2665: 0.000203486; = p2274*(p1128+p1130)
- p2489: 0.000428151; = p2293*p1014
- p0455: 0; = SQRT(2)*(IF((2*p0323-1)<0;-1;IF((2*p0323-1)>0;1;0))*SQRT(SQRT((2/(pi()*0.140012289)+LN(1-(2*p0323-1)^2)/2)^2-LN(1-(2*p0323-1)^2)/0.140012289)-(2/(pi()*0.140012289)+LN(1-(2*p0323-1)^2)/2)))
- p3281: 0.46
- p4732: 0; = p1765*p3482
- p1553: 0
- p4168: 2.41933e-6; = p1819*p3479
- p2584: 0; = p2388*p1073
- p3149: 0; = p2368*p1023
- p1234: 0.49446; = if(p1232>0;0;p0726/100)
- p4992: 7.5492e-7; = p1819*p3483
- p3170: 0; = p2389*p1132
- p0143: 0
- p0778: 49.817; = p0118*(1+p0646*p0250/100)
- p0070: 55.386
- p4554: 1.45409e-6; = p1793*p3481
- p0176: 1.358
- p3407: 0; = p3369*p1238
- p0181: 18.728
- p1668: 0
- p3152: 0; = p2371*p1023
- p1862: 0
- p2838: 3.30055e-6; = p2252*(p1020+p1022)
- p2965: 0; = p2379*(p1079+p1081)
- p3048: 3.19509e-6; = p2267*p1082
- p5288: 1.56784e-9; = p1909*p3484
- p3182: 0; = p2401*p1023
- p2214: 0.000218038; = p1107/p0818
- p0425: 0; = SQRT(2)*(IF((2*p0293-1)<0;-1;IF((2*p0293-1)>0;1;0))*SQRT(SQRT((2/(pi()*0.140012289)+LN(1-(2*p0293-1)^2)/2)^2-LN(1-(2*p0293-1)^2)/0.140012289)-(2/(pi()*0.140012289)+LN(1-(2*p0293-1)^2)/2)))
- p0508: 0; = SQRT(2)*(IF((2*p0376-1)<0;-1;IF((2*p0376-1)>0;1;0))*SQRT(SQRT((2/(pi()*0.140012289)+LN(1-(2*p0376-1)^2)/2)^2-LN(1-(2*p0376-1)^2)/0.140012289)-(2/(pi()*0.140012289)+LN(1-(2*p0376-1)^2)/2)))
- p0407: 0; = SQRT(2)*(IF((2*p0275-1)<0;-1;IF((2*p0275-1)>0;1;0))*SQRT(SQRT((2/(pi()*0.140012289)+LN(1-(2*p0275-1)^2)/2)^2-LN(1-(2*p0275-1)^2)/0.140012289)-(2/(pi()*0.140012289)+LN(1-(2*p0275-1)^2)/2)))
- p2077: 0.043
- p3391: 0; = p3372*p1234
- p0892: 25108.5; = if(p0891=0;0;(1-p1240)*p3251/p0891)
- p0220: 6.074
- p3141: 0; = p2360*p1023
- p2603: 0; = p2407*p1014
- p1584: 0
- p0584: 0; = IF(p0320<0.5;-SQRT(p0007*EXP(p0452^2*p0008)-p0007);SQRT(p0007*EXP(p0452^2*p0008)-p0007))
- p2712: 1.71222e-5; = p2321*(p1019+p1021)
- p3448: 0; = p3372*p1240
- p1912: 0
- p3040: 2.95031e-5; = p2259*p1082
- p1639: 0
- p2883: 0.000293283; = p2297*(p1079+p1081)
- p2895: 1.24167e-5; = p2309*(p1079+p1081)
- p2931: 8.8928e-6; = p2345*(p1079+p1081)
- p2534: 1.29297e-5; = p2338*p1073
- p2666: 0.000353606; = p2275*(p1128+p1130)
- p1146: 0.911008
- p1075: 0.42094; = IF(p1071=0;p0713/100;0)
- p0380: 0.5
- p1691: 0
- p1835: 0
- p4471: 0; = p1916*p3480
- p2137: 1.37644e-8; = p2015*p2065*p2099/(p0818*1000)
- p1238: 0.24871; = if(p1232>0;0;IF(p1234=1;0;IF(p1234+p1235>1;1-p1234;p1235)))
- p2631: 7.56771e-5; = p2240*(p1019+p1021)
- p3090: 8.96133e-7; = p2309*p1082
- p1809: 6.68295e-6; = p1401*1000/p0818
- p3374: 0.00357199; = if(p1232=0;p3246*p3356/p0818;0)
- p1039: 0.0626496
- p0189: 33.914
- p4868: 0; = p1901*p3482
- p0288: 0.5
- p0213: 3.428
- p3364: 0; = if(p1232=0;p3244*p3358/p0818;0)
- p2368: 1.76976e-6; = p2225*p2197
- p3340: 1.99149e7; = if(and(p1232=0;p3254<>0);p3254*(p3270-p3335)/p3338;0)
- p0887: 5.82252; = 1000*p0886*p0001*p0003*p0004/(p0818*p0002)
- p1811: 0
- p0512: 0; = SQRT(2)*(IF((2*p0380-1)<0;-1;IF((2*p0380-1)>0;1;0))*SQRT(SQRT((2/(pi()*0.140012289)+LN(1-(2*p0380-1)^2)/2)^2-LN(1-(2*p0380-1)^2)/0.140012289)-(2/(pi()*0.140012289)+LN(1-(2*p0380-1)^2)/2)))
- p0386: 0.5
- p1166: 6.28817e-7; = p1164/p0818
- p2466: 9.30466e-6; = p2270*p1073
- p2608: 0; = p2412*p1014
- p1596: 0
- p3598: 3.80215e-8; = p1867*p3476
- p0049: 26.517
- p2629: 0.000237161; = p2238*(p1019+p1021)
- p3385: 0; = p3366*p1234
- p1091: 3.88654e-5; = IF(p1071=0;p1085*p0001/(p0818*p0002);0)
- p2086: 0.0617647
- p2005: 4.84782e7; = p1963*p0818+p1959*1000+p1170+p1176+p1182
- p2573: 0; = p2377*p1073
- p2092: 0.54529
- p1708: 0
- p3093: 0.000155132; = p2312*p1132
- p3101: 0; = p2320*p1023
- p3229: 6.28817e-7; = p1164/p0818
- p3150: 0; = p2369*p1023
- p1155: 0.00243206; = if(p1153*p0818=0;0;p1151/(p1153*p0818))
- p3356: 2.98246e8; = if(p1232=0;p3306+p3317+p3328+p3339+p3350;0)
- p2136: 1.69419e-7; = p2015*p2064*p2098/(p0818*1000)
- p1949: 0
- p3730: 0; = p1793*p3477
- p2724: 1.33403e-5; = p2333*(p1019+p1021)
- p0729: 0
- p2330: 4.36055e-7; = p2224*p2198
- p4700: 2.25634e-7; = p1939*p3481
- p2829: 0.000408496; = p2243*(p1020+p1022)
- p1678: 0
- p0860: 0; = p0672*1000/p0856
- p2346: 2.36779e-5; = p2228*p2214
- p2457: 0.000534438; = p2261*p1073
- p1303: 0; = p1297*p1252/p0818
- p2661: 1.56381e-5; = p2270*(p1078+p1080)
- p2548: 1.83836e-6; = p2352*p1123
- p2847: 0.00109911; = p2261*(p1079+p1081)
- p1642: 0
- p4081: 2.63149e-7; = p1938*p3478
- p3475: 0.0174941; = p3380*p1241
- p1953: 0
- p1550: 0.783979
- p0818: 8.3496e10; = p0806*p0807
- p1117: 0.00104085; = IF(p1071=0;p1107/(p1112*p0818);0)
- p3735: 0; = p1798*p3477
- p3586: 3.29778e-7; = p1855*p3476
- p2056: 2.07882
- p2237: 0.00340541; = p2222*p2182
- p4907: 0; = p1940*p3482
- p0580: 0; = IF(p0316<0.5;-SQRT(p0007*EXP(p0448^2*p0008)-p0007);SQRT(p0007*EXP(p0448^2*p0008)-p0007))
- p0919: 0.36091; = p0678*1000/p0801
- p0109: 74.379
- p2321: 5.39689e-5; = p2224*p2188
- p4072: 3.74641e-6; = p1929*p3478
- p0902: 0.0130121
- p2218: 0.00909402; = p1150/p0818
- p3009: 0; = p2423*(p1079+p1081)
- p1963e: 2.80887e-7; = p1628*p1832+p1629*p1833+p1630*p1834+p1631*p1835+p1632*p1836+p1633*p1837+p1634*p1838+p1635*p1839+p1636*p1840+p1637*p1841+p1638*p1842+p1639*p1843+p1640*p1844+p1641*p1845+p1642*p1846+p1643*p1847+p1644*p1848+p1645*p1849+p1646*p1850
- p0520: 0; = SQRT(2)*(IF((2*p0388-1)<0;-1;IF((2*p0388-1)>0;1;0))*SQRT(SQRT((2/(pi()*0.140012289)+LN(1-(2*p0388-1)^2)/2)^2-LN(1-(2*p0388-1)^2)/0.140012289)-(2/(pi()*0.140012289)+LN(1-(2*p0388-1)^2)/2)))
- p3316: 0.836806; = if(and(p1232=0;p3253<>0);1-(p3312+p3313+p3314+p3315);0)
- p2312: 0.00416015; = p2231*p2219
- p3243: 1.6849e-10; = p3234*p1188*p3239/p0818
- p1807: 0
- p0128: 33.753
- p2938: 1.21818e-5; = p2352*(p1129+p1131)
- p2258: 0.00107376; = p2226*p2204
- p2888: 5.8479e-5; = p2302*(p1079+p1081)
- p1963k: 3.72652e-6; = p1744*p1948+p1745*p1949+p1746*p1950+p1747*p1951+p1748*p1952+p1749*p1953+p1750*p1954+p1751*p1955+p1752*p1956+p1753*p1957+p1961*p1962
- p1126: 0; = if(p1121=0;p0720/100;0)
- p3330: 0; = if(and(p1232=0;p3255<>0);p3255*(p3267-p3325)/p3327;0)
- p3137: 0; = p2356*p1023
- p1130: 0; = if(p1121=0;IF(p1123+p1128+p1129=1;0;IF(p1123+p1128+p1129+p1126>1;1-(p1123+p1128+p1129);p1126));0)
- p1044: 0.00785902; = IF(p1012=0;IF(p1037=1;0;IF(p1037+p1038>1;1-p1037;p1038));0)
- p5282: 2.93971e-8; = p1903*p3484
- p1183: 0.000115401; = p0801*p0001/(p0818*p0002)
- p0784: 110.454; = p0124*(1+p0652*p0256/100)
- p0014: 93.114
- p2730: 0.000180428; = p2339*(p1078+p1080)
- p2756: 0.000306589; = p2365*(p1019+p1021)
- p0687: 9.209; = p0027*(1+p0555*p0159/100)
- p2470: 4.61533e-5; = p2274*p1123
- p0673: 0
- p1788: 0
- p2694: 2.06342e-5; = p2303*(p1078+p1080)
- p0097: 13.481
- p0059: 51.076
- p2407: 0; = p2234*p2197
- p2103: 0.912485
- p3226: 0.000830031; = p3222*p1229
- p3162: 0; = p2381*p1082
- p0112: 23.9
- p1874: 0
- p1757: 0
- p4083: 3.14394e-6; = p1940*p3478
- p1345: 6.77962e-6; = IF(p1318=0;p1344*p0001/(p0818*p0002);0)
- p2856: 1.91357e-5; = p2270*(p1079+p1081)
- p3151: 0; = p2370*p1023
- p1982: 750
- p1178: 2.01528e-8; = p1176/p0818
- p2325: 2.48336e-5; = p2224*p2192
- p0214: 1.259
- p2043: 0.636483
- p0835: 1502.34; = -LN(1-p0669/100)/p0834
- p1679: 0
- p2140: 4.14134e-8; = p2015*p2068*p2102/(p0818*1000)
- p3431: 0; = p3374*p1239
- p1192: 1.62695e-8; = p1188*p1191/p0818
- p0382: 0.5
- p2098: 0.856281
- p3620: 4.44852e-6; = p1889*p3476
- p1658: 0
- p3332: 0; = if(and(p1232=0;p3255<>0);IF((p3328+p3329+p3330+p3331)+(p3255*(p3265*(1-p3277))/p3327)>p3255;p3255-(p3328+p3329+p3330+p3331);p3255*(p3265*(1-p3277))/p3327);0)
- p3041: 9.55385e-6; = p2260*p1082
- p3634: 1.16392e-7; = p1903*p3476
- p0155: 0.824
- p0707: 13.673; = p0047*(1+p0575*p0179/100)
- p3237: 0.854735
- p1278: 0
- p0966: 0.83046; = if(p0683=0;0;IF(p0684/100+p0965=1;0;1-(p0684/100+p0965)))
- p1830: 0
- p2384: 0; = p2229*p2213
- p0525: 0; = SQRT(2)*(IF((2*p0393-1)<0;-1;IF((2*p0393-1)>0;1;0))*SQRT(SQRT((2/(pi()*0.140012289)+LN(1-(2*p0393-1)^2)/2)^2-LN(1-(2*p0393-1)^2)/0.140012289)-(2/(pi()*0.140012289)+LN(1-(2*p0393-1)^2)/2)))
- p0499: 0; = SQRT(2)*(IF((2*p0367-1)<0;-1;IF((2*p0367-1)>0;1;0))*SQRT(SQRT((2/(pi()*0.140012289)+LN(1-(2*p0367-1)^2)/2)^2-LN(1-(2*p0367-1)^2)/0.140012289)-(2/(pi()*0.140012289)+LN(1-(2*p0367-1)^2)/2)))
- p2646: 0.000251242; = p2255*(p1019+p1021)
- p2468: 0.000472471; = p2272*p1123
- p1005: 0; = p1001*p0888
- p2850: 3.89126e-5; = p2264*(p1079+p1081)
- p1227: 0.000115401; = IF(p1221=0;0;p1226*p0001/(p0818*p0002))
- p1885: 0
- p2677: 0.000122467; = p2286*(p1019+p1021)
- p0958: 0; = if(and(p0683>0;or(p0807=480;p0807=32;p0807=1;and(p0807=60;p0901<0.03)));p0934;0)
- p1637: 0
- p4681: 8.28645e-7; = p1920*p3481
- p3304: 0.0017178; = if(and(p1232=0;p3252<>0);p3260*p3289;0)
- p2101: 0.620397
- p0813: 0; = if(p0807=480;1.56521739130435;0)
- p0536: 0; = SQRT(2)*(IF((2*p0404-1)<0;-1;IF((2*p0404-1)>0;1;0))*SQRT(SQRT((2/(pi()*0.140012289)+LN(1-(2*p0404-1)^2)/2)^2-LN(1-(2*p0404-1)^2)/0.140012289)-(2/(pi()*0.140012289)+LN(1-(2*p0404-1)^2)/2)))
- p2798: 0; = p2407*(p1019+p1021)
- p2392: 0; = p2233*p2221
- p2600: 0; = p2404*p1014
- p1188: 2716.87; = p1187*p0801
- p4158: 1.1739e-6; = p1809*p3479
- p3632: 8.69063e-8; = p1901*p3476
- p2247: 0.0004677; = p2222*p2192
- p4458: 0; = p1903*p3480
- p2367: 0.0020477; = p2225*p2196
- p2891: 2.7471e-6; = p2305*(p1079+p1081)
- p1928: 0
- p0371: 0.5
- p3065: 0; = p2284*p1023
- p1591: 0
- p2324: 3.06867e-6; = p2224*p2191
- p3399: 0.0336805; = p3380*p1234
- p0881: 0; = p0880*p0001*p0003/(p0818*p0002)
- p2001: 400
- p2480: 5.32697e-5; = p2284*p1014
- p2196: 0.0129225; = p1068-p2193-p2195
- p2964: 0; = p2378*(p1079+p1081)
- p0393: 0.5
- p2091: 0.374844
- p0278: 0.5
- p3132: 1.23633e-5; = p2351*p1132
- p2860: 0.000305833; = p2274*(p1129+p1131)
- p3235: 0.118093
- p1820: 0
- p0936: 1.70475e-5; = p0930*p0001/(p0818*p0002)
- p2241: 0.000552052; = p2222*p2186
- p0547: 0; = IF(p0283<0.5;-SQRT(p0007*EXP(p0415^2*p0008)-p0007);SQRT(p0007*EXP(p0415^2*p0008)-p0007))
- p3064: 0; = p2283*p1023
- p2233: 0; = if(p0783*p0787+p0784*p0788+p0785*p0789+p0786*p0790=0;0;p0790*p0786/(p0783*p0787+p0784*p0788+p0785*p0789+p0786*p0790))
- p2735: 6.94987e-7; = p2344*(p1078+p1080)
- p3275: 0.0214527
- p3466: 0; = p3371*p1241
- p3005: 0; = p2419*(p1079+p1081)
- p2812: 0; = p2421*(p1078+p1080)
- p2394: 0; = p2234*p2183
- p1189: 0.000115401; = p0801*p0001/(p0818*p0002)
- p3051: 1.38106e-6; = p2270*p1082
- p2889: 2.52493e-5; = p2303*(p1079+p1081)
- p2331: 9.58713e-7; = p2224*p2199
- p2999: 0; = p2413*(p1020+p1022)
- p2447: 1.40517e-6; = p2251*p1014
- p2110: 0.856281
- p1606: 0.80434
- p0773: 80.017; = p0113*(1+p0641*p0245/100)
- p0893: 1.38159; = 1000*(p0890+p0892)*p0001*p0003*p0004/(p0818*p0002)
- p2448: 2.30636e-6; = p2252*p1014
- p0061: 1.929
- p1724: 0
- p0420: 0; = SQRT(2)*(IF((2*p0288-1)<0;-1;IF((2*p0288-1)>0;1;0))*SQRT(SQRT((2/(pi()*0.140012289)+LN(1-(2*p0288-1)^2)/2)^2-LN(1-(2*p0288-1)^2)/0.140012289)-(2/(pi()*0.140012289)+LN(1-(2*p0288-1)^2)/2)))
- p1588: 0
- p1721: 0
- p0953: 4.16495e-5; = if(and(p0683>0;or(p0807=56;p0807=100;and(p0807=60;p0901>0.06)));p0935;0)
- p2458: 9.69066e-5; = p2262*p1073
- p4495: 0; = p1940*p3480
- p4756: 0; = p1789*p3482
- p4063: 4.34889e-6; = p1920*p3478
- p1299: 0
- p0403: 0.5
- p0376: 0.5
- p3315: 0.00443516; = if(and(p1232=0;p3253<>0);p3264*p3289;0)
- p0454: 0; = SQRT(2)*(IF((2*p0322-1)<0;-1;IF((2*p0322-1)>0;1;0))*SQRT(SQRT((2/(pi()*0.140012289)+LN(1-(2*p0322-1)^2)/2)^2-LN(1-(2*p0322-1)^2)/0.140012289)-(2/(pi()*0.140012289)+LN(1-(2*p0322-1)^2)/2)))
- p0865: 0; = IF(p0858+p0864=1;0;IF(p0858+p0864+p0860>1;1-(p0858+p0864);p0860))
- p0441: 0; = SQRT(2)*(IF((2*p0309-1)<0;-1;IF((2*p0309-1)>0;1;0))*SQRT(SQRT((2/(pi()*0.140012289)+LN(1-(2*p0309-1)^2)/2)^2-LN(1-(2*p0309-1)^2)/0.140012289)-(2/(pi()*0.140012289)+LN(1-(2*p0309-1)^2)/2)))
- p0680: 3126.31; = p0020*(1+p0548*p0152/100)
- p0679: 2119.53; = p0019*(1+p0547*p0151/100)
- p0666: 0; = IF(p0402<0.5;-SQRT(p0007*EXP(p0534^2*p0008)-p0007);SQRT(p0007*EXP(p0534^2*p0008)-p0007))
- p2506: 5.41113e-5; = p2310*p1073
- p0889: 0; = 1000*p0888*p0001*p0003*p0004/(p0818*p0002)
- p2957: 0.00026258; = p2371*(p1020+p1022)
- p2100: 0.705744
- p0211: 3.24
- p2843: 0.000525131; = p2257*(p1020+p1022)
- p3394: 0.000285998; = p3375*p1234
- p0291: 0.5
- p2572: 0; = p2376*p1073
- p3017: 0; = p2431*(p1129+p1131)
- p3459: 0; = p3364*p1241
- p1284: 0; = p1280*p1252/p0818
- p2151: 4.86728e-9; = p2015*p2079*p2113/(p0818*1000)
- p0550: 0; = IF(p0286<0.5;-SQRT(p0007*EXP(p0418^2*p0008)-p0007);SQRT(p0007*EXP(p0418^2*p0008)-p0007))
- p2879: 0.000612711; = p2293*(p1020+p1022)
- p1127: 0.01929; = if(p1121=0;p0721/100;0)
- p4975: 1.47045e-7; = p1802*p3483
- p1026: 1.45054e6; = IF(p1012=0;p1020*(p0704/100)*p0703*1000;0)
- p1277: 0
- p2955: 1.16743e-6; = p2369*(p1020+p1022)
- p2221: 0.00154372; = p1155-p2220
- p2530: 1.69957e-6; = p2334*p1014
- p0692: 0
- p0741: 2.736; = p0081*(1+p0609*p0213/100)
- p2286: 0.000386016; = p2223*p2192
- p3951: 8.93322e-7; = p1808*p3478
- p0094: 4481.27
- p2426: 0; = p2235*p2216
- p3252: 4.50002e8; = p1252*(p1267*(1-p3247)+p1270*(1-p3248)+p1271*(1-p3249)+p1272*(1-p3250))
- p1092: 0; = IF(p1071=0;p1086*p0001/(p0818*p0002);0)
- p1459: 49
- p0719: 51.076; = p0059*(1+p0587*p0191/100)
- p3410: 0; = p3372*p1238
- p1493: 112
- p3116: 0; = p2335*p1023
- p2630: 2.19708e-5; = p2239*(p1019+p1021)
- p3102: 0; = p2321*p1023
- p0310: 0.5
- p0943: 0; = if(and(p0683=0;p0949=0);p0937;0)
- p2490: 0.000183558; = p2294*p1014
- p2526: 1.22462e-7; = p2330*p1014
- p2463: 2.15264e-5; = p2267*p1073
- p0313: 0.5
- p3043: 1.43835e-5; = p2262*p1082
- p1960: 622.3; = IF(p1959-p1958<0;0;p1959-p1958)
- p2649: 0.000369374; = p2258*(p1078+p1080)
- p0702: 10798.8; = p0042*(1+p0570*p0174/100)
- p1614: 0.65436
- p3297: 0; = if(p1273+p1274+p1275+p1276=0;0;p1273/(p1273+p1274+p1275+p1276))
- p3045: 2.80839e-6; = p2264*p1082
- p0630: 0; = IF(p0366<0.5;-SQRT(p0007*EXP(p0498^2*p0008)-p0007);SQRT(p0007*EXP(p0498^2*p0008)-p0007))
- p0481: 0; = SQRT(2)*(IF((2*p0349-1)<0;-1;IF((2*p0349-1)>0;1;0))*SQRT(SQRT((2/(pi()*0.140012289)+LN(1-(2*p0349-1)^2)/2)^2-LN(1-(2*p0349-1)^2)/0.140012289)-(2/(pi()*0.140012289)+LN(1-(2*p0349-1)^2)/2)))
- p3244: 0; = p0791/100
- p1551: 0
- p1532: 454
- p2034: 1.4017e-6; = p2015*p2030*p2032/(p0818*1000)
- p1816: 0
- p3395: 7.69445e-5; = p3376*p1234
- p3044: 6.50441e-6; = p2263*p1082
- p2906: 1.69551e-6; = p2320*(p1020+p1022)
- p1581: 0
- p1033: 2.32883e-5; = IF(p1012=0;p1027*p0001/(p0818*p0002);0)
- p2968: 0; = p2382*(p1079+p1081)
- p0806: 1.491e9
- p2129: 3.60347e-7; = p2015*p2057*p2091/(p0818*1000)
- p0843: 0.22008
- p4870: 0; = p1903*p3482
- p0700: 0
- p5338: 3.5031e-6; = p1963*p3484
- p1042: 0.000567816
- p1916: 1.19766e-8; = p1508*1000/p0818
- p2800: 0; = p2409*(p1019+p1021)
- p3381: 0; = p3362*p1234
- p2499: 1.22774e-5; = p2303*p1073
- p2947: 2.85417e-5; = p2361*(p1020+p1022)
- p0035: 9.209
- p0251: 10.878
- p2848: 0.000199296; = p2262*(p1079+p1081)
- p1635: 0
- p3897: 2.84617e-6; = p1754*p3478
- p2434: 0.000209936; = p2238*p1014
- p2291: 6.77807e-6; = p2223*p2198
- p0993: 5.82252e-7; = p0989*p0001*p0004/(p0818*p0002)
- p1266: 0.04893; = if(p1232>0;0;IF(p1259+p1263+p1264+p1265=1;0;1-(p1259+p1263+p1264+p1265)))
- p1769: 0
- p1027: 2.17947e6; = IF(p1012=0;p1021*(p0704/100)*p0703*1000;0)
- p1680: 0
- p3311: 3.09176e7; = if(and(p1232=0;p3252<>0);p3252-(p3306+p3307+p3308+p3309+p3310);0)
- p0764: 98.241; = p0104*(1+p0632*p0236/100)
- p2525: 7.46108e-8; = p2329*p1014
- p2625: 0; = p2429*p1123
- p0652: 0; = IF(p0388<0.5;-SQRT(p0007*EXP(p0520^2*p0008)-p0007);SQRT(p0007*EXP(p0520^2*p0008)-p0007))
- p1998: 93
- p3219: 0.0107265; = p3215*p1228
- p1531: 171
- p0137: 70.469
- p0401: 0.5
- p1772: 0
- p1530: 38
- p0521: 0; = SQRT(2)*(IF((2*p0389-1)<0;-1;IF((2*p0389-1)>0;1;0))*SQRT(SQRT((2/(pi()*0.140012289)+LN(1-(2*p0389-1)^2)/2)^2-LN(1-(2*p0389-1)^2)/0.140012289)-(2/(pi()*0.140012289)+LN(1-(2*p0389-1)^2)/2)))
- p1840: 0
- p2643: 2.60545e-6; = p2252*(p1019+p1021)
- p2989: 0; = p2403*(p1020+p1022)
- p1135: 4.45543e6; = if(p1121=0;p1129*(p0716/100)*p0703*1000;0)
- p2474: 1.60519e-5; = p2278*p1014
- p1066: 0.00367841; = IF(p1012=0;p1052/(p1059*p0818);0)
- p3387: 0; = p3368*p1234
- p2139: 8.09858e-8; = p2015*p2067*p2101/(p0818*1000)
- p2874: 0.000194267; = p2288*(p1020+p1022)
- p1898: 0
- p2163: 0.000106302; = (p2017-p2020)/p0818-(p2025+p2028+p2033+p2034+p2051+p2125+p2126+p2127+p2128+p2129+p2130+p2131+p2132+p2133+p2134+p2135+p2136+p2137+p2138+p2139+p2140+p2141+p2142+p2143+p2144+p2145+p2146+p2147+p2148+p2149+p2150+p2151+p2152+p2153+p2154+p2155+p2156+p2157)
- p1118: 0.00083773; = IF(p1071=0;p1108/(p1113*p0818);0)
- p3046: 3.6777e-5; = p2265*p1082
- p1233: 0; = p1232*p0001/(p0818*p0002)
- p2020: 632813; = p2015*p2018*p2019
- p2425: 0; = p2235*p2215
- p3115: 0; = p2334*p1023
- p0954: 1.70475e-5; = if(and(p0683>0;or(p0807=56;p0807=100;and(p0807=60;p0901>0.06)));p0936;0)
- p3085: 2.38636e-5; = p2304*p1082
- p2282: 0.000838896; = p2223*p2188
- p1246: 245422; = if(p1232>0;0;p1241*(p0725/100)*p0723*1000)
- p2841: 0.000318269; = p2255*(p1020+p1022)
- p0869: 0.00598278; = IF(p0858+p0864+p0865+p0866+p0867+p0868=1;0;1-(p0858+p0864+p0865+p0866+p0867+p0868))
- p2125: 3.6464e-7; = p2015*p2053*p2087/(p0818*1000)
- p2251: 5.00345e-6; = p2222*p2197
- p3129: 2.77419e-7; = p2348*p1082
- p0314: 0.5
- p0226: 14.832
- p1745: 0
- p4365: 0; = p1810*p3480
- p3741: 0; = p1804*p3477
- p0688: 0
- p0632: 0; = IF(p0368<0.5;-SQRT(p0007*EXP(p0500^2*p0008)-p0007);SQRT(p0007*EXP(p0500^2*p0008)-p0007))
- p0824: 0.643929
- p2419: 0; = p2235*p2209
- p2025: 4.90334e-7; = p2015*p2023*p2024/(p0818*1000)
- p0384: 0.5
- p2842: 4.58061e-5; = p2256*(p1020+p1022)
- p3483: 0.0548111; = if(p1328+p1330+p1332+p1334+p1336+p1338+p1340+p1342+p1344=0;0;p1342/(p1328+p1330+p1332+p1334+p1336+p1338+p1340+p1342+p1344))
- p1292: 0.30035; = IF(p1287+p1290+p1291=p1261;0;p1261-(p1287+p1290+p1291))
- p2402: 0; = p2234*p2191
- p2353: 3.99373e-5; = p2232*p2221
- p2542: 4.8464e-6; = p2346*p1073
- p1247: 5.04878e-6; = if(p1232>0;0;p1242*p0001/(p0818*p0002))
- p2193: 0.00609847; = p1054/p0818
- p1895: 0
- p2795: 0; = p2404*(p1019+p1021)
- p2569: 1.13216e-5; = p2373*p1014
- p0870: 1.42565e6; = p0858*p0856
- p4032: 3.97009e-5; = p1889*p3478
- p2783: 0; = p2392*(p1128+p1130)
- p0106: 94.657
- p2551: 7.4256e-5; = p2355*p1014
- p2363: 2.04419e-5; = p2225*p2191
- p3023: 0; = p2242*p1023
- p4082: 1.18417e-6; = p1939*p3478
- p3346: 0.0178625; = if(and(p1232=0;p3256<>0);p3274*(p3281*(p3285*p1256+p3286*(p1253+p1257)+p1258*p3288));0)
- p2985: 0; = p2399*(p1020+p1022)
- p2890: 0.00033065; = p2304*(p1079+p1081)
- p4809: 0; = p1842*p3482
- p0992: 0; = p0988*p0001*p0004/(p0818*p0002)
- p4459: 0; = p1904*p3480
- p1106: 1.55336e6; = IF(p1071=0;p1105*p1096*p1095;0)
- p1795: 0
- p2362: 8.12881e-5; = p2225*p2190
- p2837: 2.01088e-6; = p2251*(p1020+p1022)
- p2444: 0.000767283; = p2248*p1014
- p3155: 0; = p2374*p1023
- p3167: 0; = p2386*p1082
- p3708: 0; = p1771*p3477
- p3099: 0; = p2318*p1023
- p0748: 63.615; = p0088*(1+p0616*p0220/100)
- p4983: 3.82055e-7; = p1810*p3483
- p3119: 1.91912e-6; = p2338*p1082
- p1318: 0; = p1317*p0001/(p0818*p0002)
- p1841: 0
- p2877: 2.72411e-6; = p2291*(p1020+p1022)
- p2741: 8.29728e-5; = p2350*(p1128+p1130)
- p2292: 1.49023e-5; = p2223*p2199
- p0667: 0; = IF(p0403<0.5;-SQRT(p0007*EXP(p0535^2*p0008)-p0007);SQRT(p0007*EXP(p0535^2*p0008)-p0007))
- p2606: 0; = p2410*p1014
- p1572: 0.0125
- p2535: 0.000107355; = p2339*p1073
- p1700: 0.918695
- p3414: 3.87026e-5; = p3376*p1238
- p0479: 0; = SQRT(2)*(IF((2*p0347-1)<0;-1;IF((2*p0347-1)>0;1;0))*SQRT(SQRT((2/(pi()*0.140012289)+LN(1-(2*p0347-1)^2)/2)^2-LN(1-(2*p0347-1)^2)/0.140012289)-(2/(pi()*0.140012289)+LN(1-(2*p0347-1)^2)/2)))
- p2926: 4.00333e-5; = p2340*(p1079+p1081)
- p0995: 0; = p0991*p0001*p0004/(p0818*p0002)
- p2071: 0.151
- p1882: 0
- p2641: 0.0018367; = p2250*(p1019+p1021)
- p0996: 0; = if(p0888=0;0;if((p0691*p0690*1000*p0692/100)/p0888>1;1;(p0691*p0690*1000*p0692/100)/p0888))
- p1720: 0
- p1201: 0.65
- p1665: 0
- p2687: 0.000342139; = p2296*(p1019+p1021)
- p2378: 0; = p2229*p2207
- p2790: 0; = p2399*(p1019+p1021)
- p1586: 0
- p3294: 0.279
- p0123: 119.531
- p0523: 0; = SQRT(2)*(IF((2*p0391-1)<0;-1;IF((2*p0391-1)>0;1;0))*SQRT(SQRT((2/(pi()*0.140012289)+LN(1-(2*p0391-1)^2)/2)^2-LN(1-(2*p0391-1)^2)/0.140012289)-(2/(pi()*0.140012289)+LN(1-(2*p0391-1)^2)/2)))
- p5132: 1.17339e-5; = p1963*p3483
- p2167: 0.14594; = p2166*(p0898)
- p1793: 1.31982e-5; = p1385*1000/p0818
- p4699: 5.0141e-8; = p1938*p3481
- p3307: 1.98206e7; = if(and(p1232=0;p3252<>0);p3252*(p3258-p3302)/p3305;0)
- p1018: 0.26517; = IF(p1012=0;p0709/100;0)
- p2956: 2.56671e-6; = p2370*(p1020+p1022)
- p3359: 4.1628e7; = if(p1232=0;p3309+p3320+p3331+p3342+p3353;0)
- p0674: 93.114; = p0014*(1+p0542*p0146/100)
- p2744: 1.40847e-5; = p2353*(p1128+p1130)
- p1357: 5317
- p1102: 0.0264207; = IF(p1071=0;IF(p1096+p1101=1;0;IF(p1096+p1101+p1098>1;1-(p1096+p1101);p1098));0)
- p0418: 0; = SQRT(2)*(IF((2*p0286-1)<0;-1;IF((2*p0286-1)>0;1;0))*SQRT(SQRT((2/(pi()*0.140012289)+LN(1-(2*p0286-1)^2)/2)^2-LN(1-(2*p0286-1)^2)/0.140012289)-(2/(pi()*0.140012289)+LN(1-(2*p0286-1)^2)/2)))
- p1103: 0.624059; = IF(p1071=0;IF(p1096+p1101+p1102=1;0;IF(p1096+p1101+p1102+p1099>1;1-(p1096+p1101+p1102);p1099));0)
- p3296: 0.514
- p2150: 2.9292e-8; = p2015*p2078*p2112/(p0818*1000)
- p2663: 0.00208309; = p2272*(p1128+p1130)
- p3325: 0; = if(and(p1232=0;p3255<>0);p3267*p3289;0)
- p1137: 168269; = if(p1121=0;p1131*(p0716/100)*p0703*1000;0)
- p2268: 0.000117875; = p2226*p2214
- p0196: 22.138
- p1647: 0
- p2297: 0.000696734; = p2227*p2204
- p3747: 0; = p1810*p3477
- p0879: 0.00994952; = p0878*p0001*p0003/(p0818*p0002)
- p1333: 0.000239558; = p1332*p0001/(p0818*p0002)
- p3217: 0.00268412; = p3213*p1228
- p3846: 0; = p1909*p3477
- p1675: 0
- p3198: 0; = p2417*p1082
- p2183: 0.0016686; = p1064-p2182
- p0308: 0.5
- p0342: 0.5
- p2726: 2.20109e-5; = p2335*(p1019+p1021)
- p2411: 0; = p2234*p2201
- p1312: 0.04893; = IF(p1307+p1310+p1311=p1266;0;p1266-(p1307+p1310+p1311))
- p1047: 0.310052; = IF(p1012=0;IF(p1037+p1044+p1045+p1046=1;0;IF(p1037+p1044+p1045+p1046+p1041>1;1-(p1037+p1044+p1045+p1046);p1041));0)
- p0669: 43.4977; = p0009*(1+p0537*p0141/100)
- p2876: 1.65968e-6; = p2290*(p1020+p1022)
- p2220: 0.000888348; = p1151/p0818
- p2709: 4.01826e-6; = p2318*(p1019+p1021)
- p3049: 3.58103e-6; = p2268*p1082
- p2662: 0.000140156; = p2271*(p1078+p1080)
- p1036: 1.6423e9; = IF(p1012=0;p0795*p0702*1000*p0796/100;0)
- p3363: 0; = if(p1232=0;p3244*p3357/p0818;0)
- p2868: 0.000337152; = p2282*(p1020+p1022)
- p2992: 0; = p2406*(p1020+p1022)
- p5168: 6.27138e-9; = p1789*p3484
- p1870: 8.38364e-8; = p1462*1000/p0818
- p3074: 0; = p2293*p1023
- p0555: 0; = IF(p0291<0.5;-SQRT(p0007*EXP(p0423^2*p0008)-p0007);SQRT(p0007*EXP(p0423^2*p0008)-p0007))
- p0460: 0; = SQRT(2)*(IF((2*p0328-1)<0;-1;IF((2*p0328-1)>0;1;0))*SQRT(SQRT((2/(pi()*0.140012289)+LN(1-(2*p0328-1)^2)/2)^2-LN(1-(2*p0328-1)^2)/0.140012289)-(2/(pi()*0.140012289)+LN(1-(2*p0328-1)^2)/2)))
- p1577: 0
- p1631: 0
- p1248: 2.5395e-6; = if(p1232>0;0;p1243*p0001/(p0818*p0002))
- p1681: 0
- p0613: 0; = IF(p0349<0.5;-SQRT(p0007*EXP(p0481^2*p0008)-p0007);SQRT(p0007*EXP(p0481^2*p0008)-p0007))
- p1296: 0.0233812; = p1292*p1252/p0818
- p0405: 0; = SQRT(2)*(IF((2*p0273-1)<0;-1;IF((2*p0273-1)>0;1;0))*SQRT(SQRT((2/(pi()*0.140012289)+LN(1-(2*p0273-1)^2)/2)^2-LN(1-(2*p0273-1)^2)/0.140012289)-(2/(pi()*0.140012289)+LN(1-(2*p0273-1)^2)/2)))
- p0062: 25.105
- p0884: 0; = IF(p0689=100;0;IF(p0689+p0688>100;100-p0689;p0688))
- p2950: 6.64859e-5; = p2364*(p1020+p1022)
- p0419: 0; = SQRT(2)*(IF((2*p0287-1)<0;-1;IF((2*p0287-1)>0;1;0))*SQRT(SQRT((2/(pi()*0.140012289)+LN(1-(2*p0287-1)^2)/2)^2-LN(1-(2*p0287-1)^2)/0.140012289)-(2/(pi()*0.140012289)+LN(1-(2*p0287-1)^2)/2)))
- p1144: 3.47578e-6; = if(p1121=0;p1138*p0001/(p0818*p0002);0)
- p1261: 0.30035; = if(p1232>0;0;p0732/100)
- p0275: 0.5
- p1138: 325285; = if(p1121=0;p1132*(p0716/100)*p0703*1000;0)
- p2124: 0.263965
- p2192: 0.00104398; = p1067-p2189-p2190-p2191
- p4760: 0; = p1793*p3482
- p1580: 0
- p2967: 0; = p2381*(p1079+p1081)
- p2805: 0; = p2414*(p1078+p1080)
- p2294: 0.000653604; = p2223*p2201
- p2887: 0.000129318; = p2301*(p1079+p1081)
- p1894: 0
- p2513: 1.03267e-6; = p2317*p1014
- p1729: 0
- p3416: 0.00111065; = p3378*p1238
- p1613: 0
- p2952: 8.32542e-5; = p2366*(p1020+p1022)
- p2529: 1.18089e-5; = p2333*p1014
- p4364: 0; = p1809*p3480
- p2974: 0; = p2388*(p1079+p1081)
- p2884: 0.000265252; = p2298*(p1079+p1081)
- p2899: 0.000152854; = p2313*(p1129+p1131)
- p3178: 0; = p2397*p1023
- p1629: 0
- p1829: 0
- p2115: 0.856281
- p0511: 0; = SQRT(2)*(IF((2*p0379-1)<0;-1;IF((2*p0379-1)>0;1;0))*SQRT(SQRT((2/(pi()*0.140012289)+LN(1-(2*p0379-1)^2)/2)^2-LN(1-(2*p0379-1)^2)/0.140012289)-(2/(pi()*0.140012289)+LN(1-(2*p0379-1)^2)/2)))
- p2669: 1.81336e-5; = p2278*(p1019+p1021)
- p1057: 0.82
- p4981: 8.46823e-8; = p1808*p3483
- p1734: 0.7899
- p4288: 3.59743e-7; = p1939*p3479
- p2431: 0; = p2236*p2221
- p1736: 0.641
- p2033: 6.763e-7; = p2015*p2029*p2031/(p0818*1000)
- p1168: 3.14408e-7; = p1164*p1167/p0818
- p1719: 0

- p0204: 39.021
- p1070: 0.00906176; = IF(p1012=0;p1056/(p1063*p0818);0)
- p3322: 0; = if(and(p1232=0;p3253<>0);p3253-(p3317+p3318+p3319+p3320+p3321);0)
- p0151: 0
- p1856: 0
- p0373: 0.5
- p2090: 0.40001
- p3427: 0; = p3370*p1239
- p1699: 0.762907
- p0757: 13.481; = p0097*(1+p0625*p0229/100)
- p4147: 7.9943e-8; = p1798*p3479
- p1906: 0
- p2112: 0.856281
- p0498: 0; = SQRT(2)*(IF((2*p0366-1)<0;-1;IF((2*p0366-1)>0;1;0))*SQRT(SQRT((2/(pi()*0.140012289)+LN(1-(2*p0366-1)^2)/2)^2-LN(1-(2*p0366-1)^2)/0.140012289)-(2/(pi()*0.140012289)+LN(1-(2*p0366-1)^2)/2)))
- p1636: 0
- p5246: 9.60304e-9; = p1867*p3484
- p2081: 0.0019
- p5197: 4.37036e-8; = p1818*p3484
- p1563: 0
- p1603: 0
- p1714: 0
- p1891: 0
- p1111: 0.0872841
- p0245: 4.828
- p3283: 0.3
- p0081: 2.736
- p3936: 7.63133e-6; = p1793*p3478
- p0783: 119.531; = p0123*(1+p0651*p0255/100)
- p2801: 0; = p2410*(p1019+p1021)
- p3089: 8.76866e-6; = p2308*p1082
- p1401: 558
- p0020: 3126.31
- p1558: 0
- p2451: 0.000222401; = p2255*p1014
- p0462: 0; = SQRT(2)*(IF((2*p0330-1)<0;-1;IF((2*p0330-1)>0;1;0))*SQRT(SQRT((2/(pi()*0.140012289)+LN(1-(2*p0330-1)^2)/2)^2-LN(1-(2*p0330-1)^2)/0.140012289)-(2/(pi()*0.140012289)+LN(1-(2*p0330-1)^2)/2)))
- p2509: 2.30673e-5; = p2313*p1123
- p2673: 0.000266148; = p2282*(p1019+p1021)
- p0459: 0; = SQRT(2)*(IF((2*p0327-1)<0;-1;IF((2*p0327-1)>0;1;0))*SQRT(SQRT((2/(pi()*0.140012289)+LN(1-(2*p0327-1)^2)/2)^2-LN(1-(2*p0327-1)^2)/0.140012289)-(2/(pi()*0.140012289)+LN(1-(2*p0327-1)^2)/2)))
- p3255: 0; = p1252*(p1297*(1-p3247)+p1300*(1-p3248)+p1301*(1-p3249)+p1302*(1-p3250))
- p0800: 80.779; = p0140*(1+p0668*p0272/100)
- p1311: 0; = IF(p1307+p1310=p1266;0;IF(p1307+p1310+p1309>p1266;p1266-(p1307+p1310);p1309))
- p1083: 1.76861e6; = IF(p1071=0;p1073*(p0710/100)*p0703*1000;0)
- p0606: 0; = IF(p0342<0.5;-SQRT(p0007*EXP(p0474^2*p0008)-p0007);SQRT(p0007*EXP(p0474^2*p0008)-p0007))
- p0900: 0.602908; = p0899/p0818
- p1262: 0; = if(p1232>0;0;p0733/100)
- p2138: 2.25766e-8; = p2015*p2066*p2100/(p0818*1000)
- p0908: 0.000997792
- p0392: 0.5
- p2703: 0.00146716; = p2312*(p1128+p1130)
- p2953: 0.00082297; = p2367*(p1020+p1022)
- p2781: 0; = p2390*(p1128+p1130)
- p3657: 1.16392e-8; = p1926*p3476
- p2903: 1.47782e-6; = p2317*(p1020+p1022)
- p3078: 2.11668e-5; = p2297*p1082
- p3484: 0.0163636; = IF(p1344=0;0;p1344/(p1328+p1330+p1332+p1334+p1336+p1338+p1340+p1342+p1344))
- p2940: 0.000484097; = p2354*(p1020+p1022)
- p0120: 22.961
- p2479: 4.65387e-5; = p2283*p1014
- p1739: 0
- p3212: 0; = p2431*p1132
- p3379: 0.000460591; = if(p1232=0;p3246*p3361/p0818;0)
- p1280: 0; = IF(p1277=p1263;0;IF(p1277+p1278>p1263;p1263-p1277;p1278))
- p0191: 10.961
- p1221: 0.155559; = p1216*(1+p1220*p1217/100)
- p2638: 0.000148382; = p2247*(p1019+p1021)
- p2050: 0.952062
- p2076: 0.057
- p2537: 8.80275e-6; = p2341*p1073
- p0655: 0; = IF(p0391<0.5;-SQRT(p0007*EXP(p0523^2*p0008)-p0007);SQRT(p0007*EXP(p0523^2*p0008)-p0007))
- p2907: 2.16901e-5; = p2321*(p1020+p1022)
- p2527: 2.69245e-7; = p2331*p1014
- p1620: 0
- p1669: 0
- p2789: 0; = p2398*(p1019+p1021)
- p2381: 0; = p2229*p2210
- p3136: 0; = p2355*p1023
- p2945: 1.12946e-5; = p2359*(p1020+p1022)
- p4837: 0; = p1870*p3482
- p0256: 9.678
- p1570: 0
- p3024: 0; = p2243*p1023
- p2671: 0.000144555; = p2280*(p1019+p1021)
- p1260: 0.09686; = if(p1232>0;0;p0731/100)
- p0587: 0; = IF(p0323<0.5;-SQRT(p0007*EXP(p0455^2*p0008)-p0007);SQRT(p0007*EXP(p0455^2*p0008)-p0007))
- p2019: 0.13105
- p2120: 0.51828
- p3647: 7.75949e-10; = p1916*p3476
- p1712: 0.60504
- p0104: 98.241
- p1579: 0
- p0750: 0
- p0199: 37.451
- p2498: 2.84351e-5; = p2302*p1073
- p0808: 2.125e6
- p0730: 55.386; = p0070*(1+p0598*p0202/100)
- p1986: 4200
- p1163: 0.00486145
- p0244: 25.334
- p3866: 0; = p1929*p3477
- p1911: 0
- p0254: 2.734
- p2644: 5.72836e-6; = p2253*(p1019+p1021)
- p1069: 6.98029e-5; = IF(p1012=0;p1055/(p1062*p0818);0)
- p4570: 7.36281e-7; = p1809*p3481
- p4250: 2.35621e-7; = p1901*p3479
- p1571: 0
- p1562: 0
- p2773: 0; = p2382*(p1078+p1080)
- p1671: 0
- p2919: 1.68993e-5; = p2333*(p1020+p1022)
- p3011: 0; = p2425*(p1079+p1081)
- p3163: 0; = p2382*p1082
- p4357: 0; = p1802*p3480
- p2433: 0.000956376; = p2237*p1014
- p2008: 0.0569149; = ((p1982*p1985+p1988*p1991+p1994*p1997+p2002*p2005)/p0818)*p0005*p0002/1000
- p4785: 0; = p1818*p3482
- p0723: 10798.8; = p0063*(1+p0591*p0195/100)
- p1078: 0.344; = IF(p1071=0;IF(p1073=1;0;IF(p1073+p1074>1;1-p1073;p1074));0)
- p0595: 0; = IF(p0331<0.5;-SQRT(p0007*EXP(p0463^2*p0008)-p0007);SQRT(p0007*EXP(p0463^2*p0008)-p0007))
- p2231: 0.324622; = if(p0783*p0787+p0784*p0788+p0785*p0789+p0786*p0790=0;0;p0788*p0784/(p0783*p0787+p0784*p0788+p0785*p0789+p0786*p0790))
- p0195: 0
- p3353: 4.10535e6; = if(and(p1232=0;p3256<>0);p3256*(p3276-p3348)/p3349;0)
- p3053: 0.000220258; = p2272*p1132
- p3112: 0; = p2331*p1023
- p1815: 0
- p2942: 9.84446e-6; = p2356*(p1020+p1022)
- p1627: 0
- p3932: 2.21599e-7; = p1789*p3478
- p1604: 0.92902
- p0107: 16.834
- p3087: 2.07321e-6; = p2306*p1082
- p1883: 0
- p1664: 0
- p3323: 0; = if(and(p1232=0;p3255<>0);p3265*p3277*(p3299*p3291+(1-p3299)*p3295);0)
- p1566: 0
- p3239: 0.013074; = IF(p3238+p3235+p3236=1;0;1-(p3238+p3235+p3236))
- p1555: 0
- p1573: 0
- p1686: 0
- p0043: 10798.8
- p3056: 3.7389e-5; = p2275*p1132
- p3157: 0; = p2376*p1082
- p2156: 6.65692e-9; = p2015*p2085*p2118/(p0818*1000)
- p2902: 1.59522e-5; = p2316*(p1020+p1022)
- p1878: 0
- p3314: 0.00107264; = if(and(p1232=0;p3253<>0);p3263*p3289;0)
- p2997: 0; = p2411*(p1020+p1022)
- p2279: 0.000196873; = p2223*p2185
- p2267: 0.000105171; = p2226*p2213
- p0573: 0; = IF(p0309<0.5;-SQRT(p0007*EXP(p0441^2*p0008)-p0007);SQRT(p0007*EXP(p0441^2*p0008)-p0007))
- p2580: 0; = p2384*p1073
- p0532: 0; = SQRT(2)*(IF((2*p0400-1)<0;-1;IF((2*p0400-1)>0;1;0))*SQRT(SQRT((2/(pi()*0.140012289)+LN(1-(2*p0400-1)^2)/2)^2-LN(1-(2*p0400-1)^2)/0.140012289)-(2/(pi()*0.140012289)+LN(1-(2*p0400-1)^2)/2)))
- p0846: 0.447012; = p0841*p0845^3+p0842*p0845^2+p0843*p0845+p0844
- p0901: 0.0177532
- p4769: 0; = p1802*p3482
- p2759: 5.61473e-7; = p2368*(p1019+p1021)
- p4786: 0; = p1819*p3482
- p0648: 0; = IF(p0384<0.5;-SQRT(p0007*EXP(p0516^2*p0008)-p0007);SQRT(p0007*EXP(p0516^2*p0008)-p0007))
- p3331: 0; = if(and(p1232=0;p3255<>0);p3255*(p3268-p3326)/p3327;0)
- p0703: 10798.8; = p0043*(1+p0571*p0175/100)
- p0322: 0.5
- p3456: 0; = p3380*p1240
- p3455: 0; = p3379*p1240
- p3442: 0; = p3366*p1240
- p3079: 1.91437e-5; = p2298*p1082
- p1060: 0.21
- p2595: 0; = p2399*p1014
- p1822: 0
- p0817: 0
- p0431: 0; = SQRT(2)*(IF((2*p0299-1)<0;-1;IF((2*p0299-1)>0;1;0))*SQRT(SQRT((2/(pi()*0.140012289)+LN(1-(2*p0299-1)^2)/2)^2-LN(1-(2*p0299-1)^2)/0.140012289)-(2/(pi()*0.140012289)+LN(1-(2*p0299-1)^2)/2)))
- p2729: 2.17306e-5; = p2338*(p1078+p1080)
- p3691: 0; = p1754*p3477
- p2980: 0; = p2394*(p1020+p1022)
- p2104: 0.817136
- p3962: 7.96372e-6; = p1819*p3478
- p0422: 0; = SQRT(2)*(IF((2*p0290-1)<0;-1;IF((2*p0290-1)>0;1;0))*SQRT(SQRT((2/(pi()*0.140012289)+LN(1-(2*p0290-1)^2)/2)^2-LN(1-(2*p0290-1)^2)/0.140012289)-(2/(pi()*0.140012289)+LN(1-(2*p0290-1)^2)/2)))
- p3284: 0.275
- p0796: 98.241; = p0136*(1+p0664*p0268/100)
- p3439: 0; = p3363*p1240
- p1313: 0; = p1307*p1252/p0818
- p2557: 1.99444e-5; = p2361*p1014
- p2819: 0; = p2428*(p1128+p1130)
- p2911: 9.98064e-6; = p2325*(p1020+p1022)
- p3291: 0.437
- p2611: 0; = p2415*p1073
- p2299: 0.000204056; = p2227*p2206
- p2161: 2.58773e-9; = p2015*p2085*p2123/(p0818*1000)
- p2863: 0.000247962; = p2277*(p1020+p1022)
- p0697: 81.594; = p0037*(1+p0565*p0169/100)
- p1099: 0.624059
- p2973: 0; = p2387*(p1079+p1081)
- p1813: 0
- p1304: 0; = p1300*p1252/p0818
- p0675: 0
- p1784: 0
- p3807: 0; = p1870*p3477
- p0022: 10799
- p3755: 0; = p1818*p3477
- p1012: 0
- p0202: 17.527
- p0726: 49.446; = p0066*(1+p0594*p0198/100)
- p2045: 30
- p0477: 0; = SQRT(2)*(IF((2*p0345-1)<0;-1;IF((2*p0345-1)>0;1;0))*SQRT(SQRT((2/(pi()*0.140012289)+LN(1-(2*p0345-1)^2)/2)^2-LN(1-(2*p0345-1)^2)/0.140012289)-(2/(pi()*0.140012289)+LN(1-(2*p0345-1)^2)/2)))
- p0574: 0; = IF(p0310<0.5;-SQRT(p0007*EXP(p0442^2*p0008)-p0007);SQRT(p0007*EXP(p0442^2*p0008)-p0007))
- p2637: 1.83355e-5; = p2246*(p1019+p1021)
- p0914: 8.36274e8; = p0825*p0911+p0827*p0912+(p0830+p0895)*p0824*p0913
- p2219: 0.0128154; = p1154-p2218
- p2733: 6.38781e-6; = p2342*(p1078+p1080)
- p5308: 1.06025e-7; = p1929*p3484
- p3310: 2.01003e8; = if(and(p1232=0;p3252<>0);IF((p3306+p3307+p3308+p3309)+(p3252*(p3257*(1-p3277))/p3305)>p3252;p3252-(p3306+p3307+p3308+p3309);p3252*(p3257*(1-p3277))/p3305);0)
- p3853: 0; = p1916*p3477
- p3635: 1.00873e-8; = p1904*p3476
- p5198: 2.25378e-7; = p1819*p3484
- p2896: 0.000111284; = p2310*(p1079+p1081)
- p4353: 0; = p1798*p3480
- p1854: 0
- p3262: 0.0787162
- p2405: 0; = p2234*p2195
- p1162: 3.2469e-5; = p1161/p0818
- p1071: 0
- p2609: 0; = p2413*p1014
- p3474: 0.000118294; = p3379*p1241
- p1381: 32
- p2607: 0; = p2411*p1014
- p5131: 4.0851e-7; = p1962*p3483
- p1264: 0.30035; = if(p1232>0;0;IF(p1259+p1263=1;0;IF(p1259+p1263+p1261>1;1-(p1259+p1263);p1261)))
- p1920: 7.52132e-6; = p1512*1000/p0818
- p4863: 0; = p1896*p3482
- p2039: 2.04739e-7; = p2015*p2037*p2038/(p0818*1000)
- p3223: 0.126838; = IF(p3216=0;0;(1-p1223)*24.3050/84.3139)
- p1765: 6.36797e-5; = p1357*1000/p0818
- p2634: 0.000322467; = p2243*(p1019+p1021)
- p2400: 0; = p2234*p2189
- p2774: 0; = p2383*(p1078+p1080)
- p1330: 0; = p1320*p0801
- p1871: 0
- p5150: 2.23104e-6; = p1771*p3484
- p4125: 5.8695e-7; = p1776*p3479
- p1909: 9.5813e-8; = p1501*1000/p0818
- p0592: 0; = IF(p0328<0.5;-SQRT(p0007*EXP(p0460^2*p0008)-p0007);SQRT(p0007*EXP(p0460^2*p0008)-p0007))
- p2787: 0; = p2396*(p1019+p1021)
- p1987: 400
- p1709: 0
- p3739: 0; = p1802*p3477
- p3187: 0; = p2406*p1023
- p2540: 4.13517e-7; = p2344*p1073
- p2342: 1.85692e-5; = p2228*p2210
- p0981: 0; = p0978*p0001/(p0818*p0002)
- p1237: 0; = if(p1232>0;0;p0729/100)
- p0923: 0.36091; = IF(p0918=1;0;IF(p0918+p0919>1;1-p0918;p0919))
- p2295: 9.40684e-5; = p2223*p2202
- p3398: 0.000227744; = p3379*p1234
- p0972: 0.0019035; = p0969/p0818
- p0293: 0.5
- p3215: 0.450791; = p1222*3*15.9994/100.0869
- p1755: 0
- p0046: 11.182
- p2802: 0; = p2411*(p1019+p1021)
- p1256: 0; = if(p1232>0;0;IF(p1253=1;0;IF(p1253+p1254>1;1-p1253;p1254)))
- p1976: 0.0861
- p2322: 1.06608e-5; = p2224*p2189
- p0042: 10798.8
- p2702: 0.00104112; = p2311*(p1128+p1130)
- p1963b: 1.12684e-6; = p1569*p1773+p1570*p1774+p1571*p1775+p1572*p1776+p1573*p1777+p1574*p1778+p1575*p1779+p1576*p1780+p1577*p1781+p1578*p1782+p1579*p1783+p1580*p1784+p1581*p1785+p1582*p1786+p1583*p1787+p1584*p1788+p1585*p1789+p1586*p1790+p1587*p1791
- p1749: 0
- p5144: 1.04203e-6; = p1765*p3484
- p4167: 4.69139e-7; = p1818*p3479
- p2118: 0.679049
- p1139: 7.45581e-6; = if(p1121=0;p1133*p0001/(p0818*p0002);0)
- p1836: 0
- p1925: 0
- p1149: 0.830148
- p0762: 47.425; = p0102*(1+p0630*p0234/100)
- p1061: 0.3
- p3319: 1.91664e6; = if(and(p1232=0;p3253<>0);p3253*(p3263-p3314)/p3316;0)
- p3029: 0; = p2248*p1023
- p0609: 0; = IF(p0345<0.5;-SQRT(p0007*EXP(p0477^2*p0008)-p0007);SQRT(p0007*EXP(p0477^2*p0008)-p0007))
- p2966: 0; = p2380*(p1079+p1081)
- p2376: 0; = p2229*p2205
- p2389: 0; = p2233*p2218
- p0474: 0; = SQRT(2)*(IF((2*p0342-1)<0;-1;IF((2*p0342-1)>0;1;0))*SQRT(SQRT((2/(pi()*0.140012289)+LN(1-(2*p0342-1)^2)/2)^2-LN(1-(2*p0342-1)^2)/0.140012289)-(2/(pi()*0.140012289)+LN(1-(2*p0342-1)^2)/2)))
- p0774: 76.281; = p0114*(1+p0642*p0246/100)
- p1098: 0.0264207
- p1833: 0
- p0034: 285.509
- p1969: 125000; = p0803
- p2253: 1.80557e-5; = p2222*p2199
- p2524: 8.63285e-5; = p2328*p1014
- p1559: 0
- p2696: 2.24498e-6; = p2305*(p1078+p1080)
- p2395: 0; = p2234*p2184
- p0329: 0.5
- p1963j: 9.94975e-6; = p1725*p1929+p1726*p1930+p1727*p1931+p1728*p1932+p1729*p1933+p1730*p1934+p1731*p1935+p1732*p1936+p1733*p1937+p1734*p1938+p1735*p1939+p1736*p1940+p1737*p1941+p1738*p1942+p1739*p1943+p1740*p1944+p1741*p1945+p1742*p1946+p1743*p1947
- p2255: 0.000791912; = p2222*p2201
- p1913: 0
- p2788: 0; = p2397*(p1019+p1021)
- p4569: 1.70215e-7; = p1808*p3481
- p2983: 0; = p2397*(p1020+p1022)
- p1048: 0.000567816; = IF(p1012=0;IF(p1037+p1044+p1045+p1046+p1047=1;0;IF(p1037+p1044+p1045+p1046+p1047+p1042>1;1-(p1037+p1044+p1045+p1046+p1047);p1042));0)
- p2360: 0.000359513; = p2225*p2188
- p3193: 0; = p2412*p1023
- p0085: 34292.7
- p2782: 0; = p2391*(p1128+p1130)
- p1733: 0
- p2515: 8.23214e-6; = p2319*p1014
- p0317: 0.5
- p3200: 0; = p2419*p1082
- p2560: 4.6459e-5; = p2364*p1014
- p1690: 0
- p2864: 2.29713e-5; = p2278*(p1020+p1022)
- p3440: 0; = p3364*p1240
- p2503: 1.56551e-5; = p2307*p1073
- p1300: 0; = IF(p1297=p1265;0;IF(p1297+p1298>p1265;p1265-p1297;p1298))
- p1872: 0
- p1024: 2.97938e6; = IF(p1012=0;p1014*(p0704/100)*p0703*1000;0)
- p2238: 0.00074753; = p2222*p2183
- p3875: 0; = p1938*p3477
- p2728: 6.71059e-5; = p2337*(p1078+p1080)
- p0876: 0; = p0866*p0856
- p2105: 0.888194
- p0904: 1.72008e9; = p0825*p0901+p0827*p0902+(p0830+p0895)*p0824*p0903
- p1122: 0; = p1121*p0001/(p0818*p0002)
- p0005: 1.60934
- p1922: 0
- p0443: 0; = SQRT(2)*(IF((2*p0311-1)<0;-1;IF((2*p0311-1)>0;1;0))*SQRT(SQRT((2/(pi()*0.140012289)+LN(1-(2*p0311-1)^2)/2)^2-LN(1-(2*p0311-1)^2)/0.140012289)-(2/(pi()*0.140012289)+LN(1-(2*p0311-1)^2)/2)))
- p3105: 0; = p2324*p1023
- p1792: 0
- p0336: 0.5
- p2461: 0.000247779; = p2265*p1073
- p1109: 1.65838e8; = IF(p1071=0;p1105*p1103*p1095;0)
- p0316: 0.5
- p1031: 1.26757e-5; = IF(p1012=0;p1025*p0001/(p0818*p0002);0)
- p0650: 0; = IF(p0386<0.5;-SQRT(p0007*EXP(p0518^2*p0008)-p0007);SQRT(p0007*EXP(p0518^2*p0008)-p0007))
- p1900: 0
- p3076: 0; = p2295*p1023
- p0828: 0.0330854; = if(p0827=0;0;p0819-p0827/p0818)
- p2414: 0; = p2235*p2204
- p0458: 0; = SQRT(2)*(IF((2*p0326-1)<0;-1;IF((2*p0326-1)>0;1;0))*SQRT(SQRT((2/(pi()*0.140012289)+LN(1-(2*p0326-1)^2)/2)^2-LN(1-(2*p0326-1)^2)/0.140012289)-(2/(pi()*0.140012289)+LN(1-(2*p0326-1)^2)/2)))
- p3371: 0; = if(p1232=0;p3245*p3359/p0818;0)
- p3292: 0.258
- p0814: 0; = if(p0807=480;p0810*p0812+p0811*p0813;0)
- p0979: 0; = IF(p0976=0;0;p0976*p0001/(p0818*p0002))
- p0193: 34.365
- p2153: 4.75682e-10; = p2015*p2081*p2115/(p0818*1000)
- p1990: 30
- p0174: 0
- p1619: 0
- p2044: 1.30266e-8; = p2015*p2042*p2043/(p0818*1000)
- p3482: 0; = if(p1328+p1330+p1332+p1334+p1336+p1338+p1340+p1342+p1344=0;0;p1340/(p1328+p1330+p1332+p1334+p1336+p1338+p1340+p1342+p1344))
- p0989: 2.14531e6; = p0985*p0886
- p0311: 0.5
- p0691: 0
- p0925: 0.196252; = IF(p0918+p0923+p0924=1;0;IF(p0918+p0923+p0924+p0921>1;1-(p0918+p0923+p0924);p0921))
- p1372: 138
- p1857: 0
- p2373: 4.03134e-5; = p2225*p2202
- p5015: 2.10065e-8; = p1842*p3483
- p0045: 28.084
- p1923: 0
- p1501: 8
- p4616: 5.60787e-7; = p1855*p3481
- p2690: 7.01954e-5; = p2299*(p1078+p1080)
- p1598: 0.392863
- p0931: 2.11953e6; = p0801*p0925
- p2824: 0.000300432; = p2238*(p1020+p1022)
- p3205: 0; = p2424*p1082
- p1035: 0; = IF(p1012=0;p1029*p0001/(p0818*p0002);0)
- p0638: 0; = IF(p0374<0.5;-SQRT(p0007*EXP(p0506^2*p0008)-p0007);SQRT(p0007*EXP(p0506^2*p0008)-p0007))
- p2684: 0.000483674; = p2293*(p1019+p1021)
- p0110: 60.471
- p3267: 0.0170629
- p1968: 0; = if(p0807=480;p0802*p0811;0)
- p0968: 2.30423e7; = p0965*p0964*p0683*p0682*1000
- p3496: 4.12572e-6; = p1765*p3476
- p2493: 0.000142608; = p2297*p1073
- p0122: 80.779
- p2326: 0.000145068; = p2224*p2193
- p2377: 0; = p2229*p2206
- p1291: 0; = IF(p1287+p1290=p1264;0;IF(p1287+p1290+p1289>p1264;p1264-(p1287+p1290);p1289))
- p3211: 0; = p2430*p1132
- p0102: 47.425
- p1985: 4.61795e9; = (if(p1057=0;0;p1050/p1057)+if(p1058=0;0;p1051/p1058)+if(p1059=0;0;p1052/p1059)+if(p1060=0;0;p1053/p1060)+if(p1061=0;0;p1054/p1061)+if(p1062=0;0;p1055/p1062)+if(p1063=0;0;p1056/p1063))*(1+p1157)
- p2483: 0.000633277; = p2287*p1014
- p3225: 0.000544027; = p3221*p1229
- p4278: 1.13814e-6; = p1929*p3479
- p0651: 0; = IF(p0387<0.5;-SQRT(p0007*EXP(p0519^2*p0008)-p0007);SQRT(p0007*EXP(p0519^2*p0008)-p0007))
- p4493: 0; = p1938*p3480
- p1643: 0
- p0047: 13.673
- p3175: 0; = p2394*p1023
- p0781: 0
- p1062: 0.16
- p1337: 0; = p1336*p0001/(p0818*p0002)
- p0016: 1595.42
- p0772: 23.9; = p0112*(1+p0640*p0244/100)
- p0480: 0; = SQRT(2)*(IF((2*p0348-1)<0;-1;IF((2*p0348-1)>0;1;0))*SQRT(SQRT((2/(pi()*0.140012289)+LN(1-(2*p0348-1)^2)/2)^2-LN(1-(2*p0348-1)^2)/0.140012289)-(2/(pi()*0.140012289)+LN(1-(2*p0348-1)^2)/2)))
- p0873: 0.984825; = p0872*p0001*p0003/(p0818*p0002)
- p3357: 4.82945e7; = if(p1232=0;p3307+p3318+p3329+p3340+p3351;0)
- p2711: 1.33844e-6; = p2320*(p1019+p1021)
- p0283: 0.5
- p2340: 9.51046e-5; = p2228*p2208
- p0370: 0.5
- p1768: 0
- p2182: 0.00760141; = p1050/p0818
- p3274: 0.0768939
- p3063: 0; = p2282*p1023
- p0709: 26.517; = p0049*(1+p0577*p0181/100)
- p3180: 0; = p2399*p1023
- p0544: 0; = IF(p0280<0.5;-SQRT(p0007*EXP(p0412^2*p0008)-p0007);SQRT(p0007*EXP(p0412^2*p0008)-p0007))
- p2130: 1.98351e-7; = p2015*p2058*p2092/(p0818*1000)
- p2075: 0.072
- p0326: 0.5
- p2229: 0; = if(p0774*p0778+p0775*p0779+p0776*p0780+p0777*p0781=0;0;p0781*p0777/(p0774*p0778+p0775*p0779+p0776*p0780+p0777*p0781))
- p1865: 0
- p2058: 1.24412
- p3010: 0; = p2424*(p1079+p1081)
- p1211: 0.6
- p2215: 0.000822807; = p1117-p2214
- p0243: 21.671
- p4102: 0.000123782; = p1963*p3478
- p3210: 0; = p2429*p1132
- p0780: 22.961; = p0120*(1+p0648*p0252/100)
- p1902: 0
- p1706: 0
- p5317: 7.44726e-9; = p1938*p3484
- p2066: 0.109412
- p5111: 2.49452e-8; = p1938*p3483
- p3072: 0; = p2291*p1023
- p3070: 0; = p2289*p1023
- p1975: 0.000115401; = p1970*p0001/(p0818*p0002)
- p0737: 0
- p3961: 1.54427e-6; = p1818*p3478
- p0761: 0
- p2905: 1.17807e-5; = p2319*(p1020+p1022)
- p3020: 0; = p2239*p1023
- p0080: 97.32
- p2700: 1.01471e-5; = p2309*(p1078+p1080)
- p0897: 0.458721
- p0909: 2.9341e8; = p0825*p0906+p0827*p0907+(p0830+p0895)*p0824*p0908
- p0007: 14; = p0006-1
- p2533: 3.9928e-5; = p2337*p1073
- p3388: 0; = p3369*p1234
- p1955: 0
- p2473: 0.000173271; = p2277*p1014
- p1385: 1102
- p2831: 9.23636e-5; = p2245*(p1020+p1022)
- p2370: 6.38645e-6; = p2225*p2199
- p3549: 1.73037e-7; = p1818*p3476
- p1013: 0; = p1012*p0001/(p0818*p0002)
- p2604: 0; = p2408*p1014
- p0240: 16.951
- p1152: 0.415074
- p2739: 3.14128e-6; = p2348*(p1078+p1080)
- p1400: 129
- p4151: 4.71243e-7; = p1802*p3479
- p1295: 0; = p1291*p1252/p0818
- p0668: 0; = IF(p0404<0.5;-SQRT(p0007*EXP(p0536^2*p0008)-p0007);SQRT(p0007*EXP(p0536^2*p0008)-p0007))
- p1297: 0
- p1557: 0
- p2486: 1.15975e-6; = p2290*p1014
- p0711: 20.468; = p0051*(1+p0579*p0183/100)
- p2678: 0.000715402; = p2287*(p1019+p1021)
- p2007: 0.0303546; = ((p1981*p1985+p1987*p1991+p1993*p1997+p2001*p2005)/p0818)*p0005*p0002/1000
- p2636: 7.29119e-5; = p2245*(p1019+p1021)
- p0452: 0; = SQRT(2)*(IF((2*p0320-1)<0;-1;IF((2*p0320-1)>0;1;0))*SQRT(SQRT((2/(pi()*0.140012289)+LN(1-(2*p0320-1)^2)/2)^2-LN(1-(2*p0320-1)^2)/0.140012289)-(2/(pi()*0.140012289)+LN(1-(2*p0320-1)^2)/2)))
- p2249: 0.000585658; = p2222*p2195
- p1314: 0; = p1310*p1252/p0818
- p1009: 0; = p1005*p0001*p0004/(p0818*p0002)
- p2453: 0.000366952; = p2257*p1014
- p0785: 24.698; = p0125*(1+p0653*p0257/100)
- p2731: 3.2716e-5; = p2340*(p1078+p1080)
- p1198: 0.44
- p0089: 19.861
- p1848: 0
- p2913: 1.24979e-5; = p2327*(p1020+p1022)
- p0896: 0.443532
- p1615: 0.445163
- p0858: 0.132005; = p0670*1000/p0856
- p0268: 1.358
- p3034: 0; = p2253*p1023
- p2093: 0.260958
- p2181: 7.20412; = p0887+p0889+p0893+p2180
- p3035: 0; = p2254*p1023
- p4876: 0; = p1909*p3482
- p4258: 1.68301e-8; = p1909*p3479
- p4419: 0; = p1864*p3480
- p1963i: 3.23582e-6; = p1706*p1910+p1707*p1911+p1708*p1912+p1709*p1913+p1710*p1914+p1711*p1915+p1712*p1916+p1713*p1917+p1714*p1918+p1715*p1919+p1716*p1920+p1717*p1921+p1718*p1922+p1719*p1923+p1720*p1924+p1721*p1925+p1722*p1926+p1723*p1927+p1724*p1928
- p1488: 19
- p3084: 1.82229e-6; = p2303*p1082
- p2681: 1.31015e-6; = p2290*(p1019+p1021)
- p1095: 6.08912e8; = IF(p1071=0;p0797*p0702*1000*p0798/100;0)
- p3404: 0; = p3366*p1238
- p4580: 1.51742e-6; = p1819*p3481
- p1850: 0
- p0821: 1.00219
- p2576: 0; = p2380*p1073
- p0701: 0
- p2767: 0; = p2376*(p1078+p1080)
- p0994: 0; = p0990*p0001*p0004/(p0818*p0002)
- p1977: 6.49987e9; = p1252+p1188
- p0940: 0; = if(and(p0683=0;p0946=0);p0934;0)
- p0826: 0.120333; = 1-p0825/p0818
- p3403: 0; = p3365*p1238
- p5177: 7.44726e-9; = p1798*p3484
- p4114: 1.11857e-5; = p1765*p3479
- p5189: 1.14061e-7; = p1810*p3484
- p1995: 50
- p1322: 0.630635; = IF(((p0745*1000*p0749/100)+(p0754*1000*p0758/100))/p0801<0;0;((p0745*1000*p0749/100)+(p0754*1000*p0758/100))/p0801)
- p5028: 2.78992e-7; = p1855*p3483
- p2516: 1.18479e-6; = p2320*p1014
- p3202: 0; = p2421*p1082
- p2496: 0.000346782; = p2300*p1073
- p0642: 0; = IF(p0378<0.5;-SQRT(p0007*EXP(p0510^2*p0008)-p0007);SQRT(p0007*EXP(p0510^2*p0008)-p0007))
- p0907: 0.00295453
- p2552: 6.87912e-6; = p2356*p1014
- p0129: 12.03
- p2590: 0; = p2394*p1014
- p2653: 0.000162868; = p2262*(p1078+p1080)
- p1055: 932522; = IF(p1012=0;p1048*p1036;0)
- p3055: 2.15159e-5; = p2274*p1132
- p0026: 285.509
- p1851: 0
- p0421: 0; = SQRT(2)*(IF((2*p0289-1)<0;-1;IF((2*p0289-1)>0;1;0))*SQRT(SQRT((2/(pi()*0.140012289)+LN(1-(2*p0289-1)^2)/2)^2-LN(1-(2*p0289-1)^2)/0.140012289)-(2/(pi()*0.140012289)+LN(1-(2*p0289-1)^2)/2)))
- p1222: 0.94
- p3177: 0; = p2396*p1023
- p2845: 0.000408789; = p2259*(p1079+p1081)
- p2816: 0; = p2425*(p1078+p1080)
- p1818: 2.67079e-6; = p1410*1000/p0818
- p0799: 115.099; = p0139*(1+p0667*p0271/100)
- p1208: 0; = p1205*p0818*p0822/p0801
- p3378: 0.00446565; = if(p1232=0;p3246*p3360/p0818;0)
- p4991: 1.46389e-7; = p1818*p3483
- p1682: 0
- p0905: 0.0206008; = p0904/p0818
- p0985: 1; = IF(p0982=1;0;IF(p0982+p0983>1;1-p0982;p0983))
- p1810: 6.97039e-6; = p1402*1000/p0818
- p0515: 0; = SQRT(2)*(IF((2*p0383-1)<0;-1;IF((2*p0383-1)>0;1;0))*SQRT(SQRT((2/(pi()*0.140012289)+LN(1-(2*p0383-1)^2)/2)^2-LN(1-(2*p0383-1)^2)/0.140012289)-(2/(pi()*0.140012289)+LN(1-(2*p0383-1)^2)/2)))
- p4977: 1.3129e-9; = p1804*p3483
- p1561: 0.52337
- p0505: 0; = SQRT(2)*(IF((2*p0373-1)<0;-1;IF((2*p0373-1)>0;1;0))*SQRT(SQRT((2/(pi()*0.140012289)+LN(1-(2*p0373-1)^2)/2)^2-LN(1-(2*p0373-1)^2)/0.140012289)-(2/(pi()*0.140012289)+LN(1-(2*p0373-1)^2)/2)))
- p1826: 0
- p3298: 0; = if(p1283+p1284+p1285+p1286=0;0;p1283/(p1283+p1284+p1285+p1286))
- p4962: 2.10065e-8; = p1789*p3483
- p2365: 0.000966364; = p2225*p2193
- p1661: 0
- p3408: 0; = p3370*p1238
- p0576: 0; = IF(p0312<0.5;-SQRT(p0007*EXP(p0444^2*p0008)-p0007);SQRT(p0007*EXP(p0444^2*p0008)-p0007))
- p2264: 9.24422e-5; = p2226*p2210
- p1609: 0
- p0771: 21.875; = p0111*(1+p0639*p0243/100)
- p0064: 3.401
- p2465: 9.10461e-5; = p2269*p1073
- p3919: 1.93207e-6; = p1776*p3478
- p1652: 0
- p5159: 2.70453e-8; = p1780*p3484
- p0150: 0
- p2222: 0.447998; = if(p0765*p0769+p0766*p0770+p0767*p0771+p0768*p0772=0;0;p0769*p0765/(p0765*p0769+p0766*p0770+p0767*p0771+p0768*p0772))
- p5037: 3.93871e-9; = p1864*p3483
- p0856: 1.08e7; = p0801
- p4010: 3.39324e-7; = p1867*p3478
- p1219: 0; = if(p1218=0;0;SQRT(2)*(IF((2*p1218-1)<0;-1;IF((2*p1218-1)>0;1;0))*SQRT(SQRT((2/(pi()*0.140012289)+LN(1-(2*p1218-1)^2)/2)^2-LN(1-(2*p1218-1)^2)/0.140012289)-(2/(pi()*0.140012289)+LN(1-(2*p1218-1)^2)/2))))
- p2597: 0; = p2401*p1014
- p4775: 0; = p1808*p3482
- p4069: 1.03875e-7; = p1926*p3478
- p0848: 0.158241
- p2111: 0.856281
- p1819: 1.37731e-5; = p1411*1000/p0818
- p3130: 2.48636e-6; = p2349*p1082
- p0850: 0.326261
- p0672: 0
- p0086: 2.696
- p2995: 0; = p2409*(p1020+p1022)
- p0639: 0; = IF(p0375<0.5;-SQRT(p0007*EXP(p0507^2*p0008)-p0007);SQRT(p0007*EXP(p0507^2*p0008)-p0007))
- p1129: 0.51076; = if(p1121=0;IF(p1123+p1128=1;0;IF(p1123+p1128+p1125>1;1-(p1123+p1128);p1125));0)
- p3329: 0; = if(and(p1232=0;p3255<>0);p3255*(p3266-p3324)/p3327;0)
- p2792: 0; = p2401*(p1019+p1021)
- p1962: 7.45305e-6; = p1960*1000/p0818
- p0903: 0.0106556
- p0898: 0.458721
- p1308: 0
- p3097: 0; = p2316*p1023
- p0280: 0.5
- p2290: 4.12959e-6; = p2223*p2197
- p4245: 3.99715e-8; = p1896*p3479
- p0664: 0; = IF(p0400<0.5;-SQRT(p0007*EXP(p0532^2*p0008)-p0007);SQRT(p0007*EXP(p0532^2*p0008)-p0007))
- p2013: 0.75
- p3426: 0; = p3369*p1239
- p0743: 0.448; = p0083*(1+p0611*p0215/100)
- p1886: 0
- p3423: 0; = p3366*p1239
- p2866: 0.00018312; = p2280*(p1020+p1022)
- p1015: 0.11182; = IF(p1012=0;p0706/100;0)
- p2691: 0.000582827; = p2300*(p1078+p1080)
- p3841: 0; = p1904*p3477
- p2410: 0; = p2234*p2200
- p2567: 0.000183486; = p2371*p1014
- p0786: 0
- p2072: 0.134
- p2032: 0.448886
- p1800: 0
- p4571: 7.67949e-7; = p1810*p3481
- p1592: 0
- p1740: 0
- p2704: 0.000101702; = p2313*(p1128+p1130)
- p1994: 750
- p3120: 1.59343e-5; = p2339*p1082
- p0732: 30.035; = p0072*(1+p0600*p0204/100)
- p3303: 0.000398148; = if(and(p1232=0;p3252<>0);p3259*p3289;0)
- p1210: 0.25
- p3443: 0; = p3367*p1240
- p3145: 0; = p2364*p1023
- p5183: 3.91961e-10; = p1804*p3484
- p0793: 0
- p2427: 0; = p2235*p2217
- p3122: 1.30656e-6; = p2341*p1082
- p4738: 0; = p1771*p3482
- p3376: 0.000155613; = if(p1232=0;p3246*p3358/p0818;0)
- p1774: 0
- p2242: 7.94528e-5; = p2222*p2187
- p1711: 0
- p1910: 0
- p0878: 93114; = p0867*p0856
- p1043: 0.209623
- p3336: 0.000977444; = IF(or(p3254=0;p1232>0);0;p3271*p3289)
- p2620: 0; = p2424*p1073
- p3117: 6.55267e-6; = p2336*p1082
- p1989: 50
- p1327: 0.0587482; = if(p1318=0;if(p1327a=0;1;if(p1327a<0;0;p1327a));0)
- p2520: 8.61805e-7; = p2324*p1014
- p0491: 0; = SQRT(2)*(IF((2*p0359-1)<0;-1;IF((2*p0359-1)>0;1;0))*SQRT(SQRT((2/(pi()*0.140012289)+LN(1-(2*p0359-1)^2)/2)^2-LN(1-(2*p0359-1)^2)/0.140012289)-(2/(pi()*0.140012289)+LN(1-(2*p0359-1)^2)/2)))
- p3477: 0; = if(p1328+p1330+p1332+p1334+p1336+p1338+p1340+p1342+p1344=0;0;p1330/(p1328+p1330+p1332+p1334+p1336+p1338+p1340+p1342+p1344))
- p1342: 2.12524e6; = p1326*p0801
- p1796: 0
- p1512: 628
- p3189: 0; = p2408*p1023
- p2281: 6.55763e-5; = p2223*p2187
- p1283: 0; = p1277*p1252/p0818
- p0677: 0
- p0740: 97.32; = p0080*(1+p0608*p0212/100)
- p3947: 1.385e-8; = p1804*p3478
- p1963a: 0.00012307; = p1550*p1754+p1551*p1755+p1552*p1756+p1553*p1757+p1554*p1758+p1555*p1759+p1556*p1760+p1557*p1761+p1558*p1762+p1559*p1763+p1560*p1764+p1561*p1765+p1562*p1766+p1563*p1767+p1564*p1768+p1565*p1769+p1566*p1770+p1567*p1771+p1568*p1772
- p0423: 0; = SQRT(2)*(IF((2*p0291-1)<0;-1;IF((2*p0291-1)>0;1;0))*SQRT(SQRT((2/(pi()*0.140012289)+LN(1-(2*p0291-1)^2)/2)^2-LN(1-(2*p0291-1)^2)/0.140012289)-(2/(pi()*0.140012289)+LN(1-(2*p0291-1)^2)/2)))
- p0942: 0; = if(and(p0683=0;p0948=0);p0936;0)
- p5077: 8.53388e-9; = p1904*p3483
- p2272: 0.00590663; = p2230*p2218
- p2179: 0.0022921; = p0970+p0971+p0972
- p0002: 0.453592
- p5069: 1.24726e-8; = p1896*p3483
- p2343: 0.000243171; = p2228*p2211
- p1821: 0
- p1343: 2.27089e-5; = p1342*p0001/(p0818*p0002)
- p2029: 4.97
- p2335: 6.93783e-5; = p2224*p2203
- p4289: 9.55108e-7; = p1940*p3479
- p3208: 0; = p2427*p1082
- p3445: 0; = p3369*p1240
- p2621: 0; = p2425*p1073
- p4308: 3.76042e-5; = p1963*p3479
- p0625: 0; = IF(p0361<0.5;-SQRT(p0007*EXP(p0493^2*p0008)-p0007);SQRT(p0007*EXP(p0493^2*p0008)-p0007))
- p1674: 0
- p0180: 25.099
- p1076: 0; = IF(p1071=0;p0714/100;0)
- p2885: 8.58955e-5; = p2299*(p1079+p1081)
- p2693: 4.77901e-5; = p2302*(p1078+p1080)
- p2925: 0.000220783; = p2339*(p1079+p1081)
- p2037: 2.3
- p0832: 2.62103e10; = p0831*p0830/(1-p0831)
- p0301: 0.5
- p3393: 0.0017662; = p3374*p1234
- p1735: 0.749667
- p3895: 0; = p1962*p3477
- p0599: 0; = IF(p0335<0.5;-SQRT(p0007*EXP(p0467^2*p0008)-p0007);SQRT(p0007*EXP(p0467^2*p0008)-p0007))
- p4101: 4.30941e-6; = p1962*p3478
- p2806: 0; = p2415*(p1078+p1080)
- p2022: 5.02537e-5; = p2018*p2015/p0818-p2021
- p1073: 0.20468; = IF(p1071=0;p0711/100;0)
- p1004: 0; = p1000*p0888
- p2686: 2.98441e-5; = p2295*(p1019+p1021)
- p2594: 0; = p2398*p1014
- p0922: 0; = p0677*1000/p0801
- p3293: 0.3875
- p2961: 0; = p2375*(p1079+p1081)
- p3220: 0.00142769; = p3216*p1228
- p0269: 3.937
- p3595: 4.65569e-9; = p1864*p3476
- p3422: 0; = p3365*p1239
- p2166: 0.318147; = p2165*p0824
- p5280: 2.19498e-8; = p1901*p3484
- p2769: 0; = p2378*(p1078+p1080)
- p0487: 0; = SQRT(2)*(IF((2*p0355-1)<0;-1;IF((2*p0355-1)>0;1;0))*SQRT(SQRT((2/(pi()*0.140012289)+LN(1-(2*p0355-1)^2)/2)^2-LN(1-(2*p0355-1)^2)/0.140012289)-(2/(pi()*0.140012289)+LN(1-(2*p0355-1)^2)/2)))
- p0976: 0; = IF(p0687=0;IF(OR(p0686=0;p0689=0);0;p0686*1000*p0689/100);0)
- p1715: 0
- p5172: 2.15971e-7; = p1793*p3484
- p1214: 55; = IF(p1213=0;0;p1213-1)
- p0888: 0; = p0686*1000*p0687*p0884/100
- p1263: 0.09686; = if(p1232>0;0;IF(p1259=1;0;IF(p1259+p1260>1;1-p1259;p1260)))
- p2175: 0.000124615; = p0895*p0908/p0818
- p3441: 0; = p3365*p1240
- p0510: 0; = SQRT(2)*(IF((2*p0378-1)<0;-1;IF((2*p0378-1)>0;1;0))*SQRT(SQRT((2/(pi()*0.140012289)+LN(1-(2*p0378-1)^2)/2)^2-LN(1-(2*p0378-1)^2)/0.140012289)-(2/(pi()*0.140012289)+LN(1-(2*p0378-1)^2)/2)))
- p0926: 0; = IF(p0918+p0923+p0924+p0925=1;0;IF(p0918+p0923+p0924+p0925+p0922>1;1-(p0918+p0923+p0924+p0925);p0922))
- p1859: 0
- p4677: 1.3195e-9; = p1916*p3481
- p3473: 0.00114691; = p3378*p1241
- p1560: 0
- p4238: 1.20609e-5; = p1889*p3479
- p1693: 0
- p0724: 3.401; = p0064*(1+p0592*p0196/100)
- p2097: 0.40001
- p0717: 7.999; = p0057*(1+p0585*p0189/100)
- p0518: 0; = SQRT(2)*(IF((2*p0386-1)<0;-1;IF((2*p0386-1)>0;1;0))*SQRT(SQRT((2/(pi()*0.140012289)+LN(1-(2*p0386-1)^2)/2)^2-LN(1-(2*p0386-1)^2)/0.140012289)-(2/(pi()*0.140012289)+LN(1-(2*p0386-1)^2)/2)))
- p2972: 0; = p2386*(p1079+p1081)
- p1556: 0
- p0644: 0; = IF(p0380<0.5;-SQRT(p0007*EXP(p0512^2*p0008)-p0007);SQRT(p0007*EXP(p0512^2*p0008)-p0007))
- p0327: 0.5
- p3242: 1.10153e-8; = p3234*p1188*p3238/p0818
- p2095: 0.765734
- p1959: 30593.3; = if(p0738*p0740*p0739>0;p0738*1000*(p0740/100)*p0739/1000;p1958)
- p1202: 0.7
- p0463: 0; = SQRT(2)*(IF((2*p0331-1)<0;-1;IF((2*p0331-1)>0;1;0))*SQRT(SQRT((2/(pi()*0.140012289)+LN(1-(2*p0331-1)^2)/2)^2-LN(1-(2*p0331-1)^2)/0.140012289)-(2/(pi()*0.140012289)+LN(1-(2*p0331-1)^2)/2)))
- p1797: 0
- p3098: 0; = p2317*p1023
- p2390: 0; = p2233*p2219
- p1185: 0.5
- p3290: 0.195
- p3366: 0; = if(p1232=0;p3244*p3360/p0818;0)
- p2654: 7.3651e-5; = p2263*(p1078+p1080)
- p0216: 14.32
- p0563: 0; = IF(p0299<0.5;-SQRT(p0007*EXP(p0431^2*p0008)-p0007);SQRT(p0007*EXP(p0431^2*p0008)-p0007))
- p3158: 0; = p2377*p1082
- p1805: 0
- p3502: 8.8334e-6; = p1771*p3476
- p3449: 0; = p3373*p1240
- p0066: 49.446
- p0859: 0.853391; = p0671*1000/p0856
- p0872: 9.21662e6; = p0864*p0856
- p0146: 0
- p2178: 0.0690604; = (p0895*p0831/(1-p0831))/(p0818)
- p0570: 0; = IF(p0306<0.5;-SQRT(p0007*EXP(p0438^2*p0008)-p0007);SQRT(p0007*EXP(p0438^2*p0008)-p0007))
- p2764: 1.27898e-5; = p2373*(p1019+p1021)
- p2763: 8.88661e-5; = p2372*(p1019+p1021)
- p0906: 0.00342907
- p1104: 0.275167; = IF(p1071=0;IF(p1096+p1101+p1102+p1103=1;0;1-(p1096+p1101+p1102+p1103));0)
- p1112: 0.209482
- p0343: 0.5
- p2270: 4.54595e-5; = p2226*p2216
- p0682: 10799; = p0022*(1+p0550*p0154/100)
- p3365: 0; = if(p1232=0;p3244*p3359/p0818;0)
- p0857: 1.15401; = p0856*p0001*p0003/(p0818*p0002)
- p2814: 0; = p2423*(p1078+p1080)
- p1722: 0.728757
- p3413: 0.000143855; = p3375*p1238
- p2456: 6.43674e-5; = p2260*p1073
- p4129: 2.90319e-7; = p1780*p3479
- p0252: 23.66
- p1081: 0; = IF(p1071=0;IF(p1073+p1078+p1079+p1080=1;0;IF(p1073+p1078+p1079+p1080+p1077>1;1-(p1073+p1078+p1079+p1080);p1077));0)
- p2375: 0; = p2229*p2204
- p2777: 0; = p2386*(p1078+p1080)
- p0617: 0; = IF(p0353<0.5;-SQRT(p0007*EXP(p0485^2*p0008)-p0007);SQRT(p0007*EXP(p0485^2*p0008)-p0007))
- p2725: 1.91997e-6; = p2334*(p1019+p1021)
- p0581: 0; = IF(p0317<0.5;-SQRT(p0007*EXP(p0449^2*p0008)-p0007);SQRT(p0007*EXP(p0449^2*p0008)-p0007))
- p1651: 0.299611
- p1052: 1.02889e8; = IF(p1012=0;p1045*p1036;0)
- p3389: 0; = p3370*p1234
- p1967: 0; = if(p0807=480;p0802*p0810;0)
- p2397: 0; = p2234*p2186
- p0991: 0; = p0987*p0886
- p2030: 10.68
- p0950: 0; = if(and(p0683=0;or(p0807=480;p0807=32;p0807=1;and(p0807=60;p0901<0.03)));p0938;0)
- p0590: 0; = IF(p0326<0.5;-SQRT(p0007*EXP(p0458^2*p0008)-p0007);SQRT(p0007*EXP(p0458^2*p0008)-p0007))
- p2021: 7.57896e-6; = p2020/p0818
- p1605: 0.909913
- p2388: 0; = p2229*p2217
- p3354: 1.65207e7; = IF((p3350+p3351+p3352+p3353)+IF(p3349=0;0;(p3256*(p3273*(1-p3277))/p3349))>p3256;p3256-(p3350+p3351+p3352+p3353);IF(p3349=0;0;p3256*(p3273*(1-p3277))/p3349))
- p0261: 35.152
- p2417: 0; = p2235*p2207
- p1147: 0.0889917
- p1174: 4.02132e-8; = p1170*p1173/p0818
- p0612: 0; = IF(p0348<0.5;-SQRT(p0007*EXP(p0480^2*p0008)-p0007);SQRT(p0007*EXP(p0480^2*p0008)-p0007))
- p1929: 6.47935e-6; = p1521*1000/p0818
- p1713: 0
- p0941: 0; = if(and(p0683=0;p0947=0);p0935;0)
- p1029: 0; = IF(p1012=0;IF(p0801<p1023*(p0704/100)*p0703*1000;p0801;p1023*(p0704/100)*p0703*1000);0)
- p2344: 2.02031e-6; = p2228*p2212
- p3256: 3.97548e7; = p1252*(p1307*(1-p3247)+p1310*(1-p3248)+p1311*(1-p3249)+p1312*(1-p3250))
- p0831: 0.356071; = 1-p0824
- p0623: 0; = IF(p0359<0.5;-SQRT(p0007*EXP(p0491^2*p0008)-p0007);SQRT(p0007*EXP(p0491^2*p0008)-p0007))
- p2257: 0.00130662; = p2222*p2203
- p4103: 8.64647e-7; = p1754*p3479
- p1324: 0.39554; = IF(((p0745*1000*p0751/100)+(p0754*1000*p0760/100))/p0801<0;0;((p0745*1000*p0751/100)+(p0754*1000*p0760/100))/p0801)
- p1232: 0
- p1945: 0
- p2556: 0.000100966; = p2360*p1014
- p2087: 0.856281
- p1887: 0
- p4191: 6.73204e-8; = p1842*p3479
- p0271: 4.666
- p2027: 0.428799
- p2697: 2.34754e-5; = p2306*(p1078+p1080)
- p2303: 5.99832e-5; = p2227*p2210
- p5102: 3.55141e-7; = p1929*p3483
- p2683: 4.7279e-6; = p2292*(p1019+p1021)
- p1937: 0
- p2935: 3.44505e-5; = p2349*(p1079+p1081)
- p0643: 0; = IF(p0379<0.5;-SQRT(p0007*EXP(p0511^2*p0008)-p0007);SQRT(p0007*EXP(p0511^2*p0008)-p0007))
- p2565: 8.15776e-7; = p2369*p1014
- p3261: 0.908439
- p3347: 0.00107264; = if(and(p1232=0;p3256<>0);p3275*p3289;0)
- p2676: 1.51332e-5; = p2285*(p1019+p1021)
- p0029: 81.594
- p2200: 0.0041231; = p1056/p0818
- p4044: 7.75598e-7; = p1901*p3478
- p0986: 0; = IF(p0982+p0985=1;0;IF(p0982+p0985+p0984>1;1-(p0982+p0985);p0984))
- p1754: 4.92239e-6; = p1346*1000/p0818
- p1786: 0
- p1390: 38
- p0713: 42.094; = p0053*(1+p0581*p0185/100)
- p2695: 0.000270213; = p2304*(p1078+p1080)
- p1771: 0.000136342; = p1363*1000/p0818
- p0533: 0; = SQRT(2)*(IF((2*p0401-1)<0;-1;IF((2*p0401-1)>0;1;0))*SQRT(SQRT((2/(pi()*0.140012289)+LN(1-(2*p0401-1)^2)/2)^2-LN(1-(2*p0401-1)^2)/0.140012289)-(2/(pi()*0.140012289)+LN(1-(2*p0401-1)^2)/2)))
- p0185: 12.91
- p2481: 1.33959e-5; = p2285*p1014
- p1921: 0
- p2760: 9.21568e-7; = p2369*(p1019+p1021)
- p1676: 0
- p3004: 0; = p2418*(p1079+p1081)
- p0361: 0.5
- p2628: 0.0010804; = p2237*(p1019+p1021)
- p3026: 0; = p2245*p1023
- p2602: 0; = p2406*p1014
- p1861: 0
- p2892: 2.8726e-5; = p2306*(p1079+p1081)
- p2996: 0; = p2410*(p1020+p1022)
- p2254: 0.00184714; = p2222*p2200
- p1728: 0
- p2202: 0.000254408; = 4*1.00794*p2201/(2*14.0067)
- p0854: 4.81749e6; = p0801*((1-p0853)*p0846+p0853*p0852)
- p2371: 0.000653347; = p2225*p2200
- p2061: 0.518824
- p3358: 1.29931e7; = if(p1232=0;p3308+p3319+p3330+p3341+p3352;0)
- p1207: 349.047; = if(p1193>0;0;(p1194*p1050/p1057+p1195*p1051/p1058+p1196*p1052/p1059+p1197*p1053/p1060+p1198*p1054/p1061+p1199*p1055/p1062+p1200*p1056/p1063)/(p0702*1000)+(p1201*p1109/p1114+p1202*p1110/p1115)/(p0702*1000)+p1203*p1170/p0801+p1204*p1176/p0801)
- p1978: 93
- p2811: 0; = p2420*(p1078+p1080)
- p2088: 0.798875
- p4204: 8.94099e-7; = p1855*p3479
- p4856: 0; = p1889*p3482
- p0594: 0; = IF(p0330<0.5;-SQRT(p0007*EXP(p0462^2*p0008)-p0007);SQRT(p0007*EXP(p0462^2*p0008)-p0007))
- p4359: 0; = p1804*p3480
- p1875: 0
- p0148: 0
- p0734: 0
- p1344: 634480; = IF(p1318=0;p1327*p0801;0)
- p1107: 1.82053e7; = IF(p1071=0;p1105*p1101*p1095;0)
- p1518: 15
- p0307: 0.5
- p1193: 0; = IF(OR(p1036=0;p1095=0);0.0001*p0857;0)
- p1756: 0
- p1434: 32
- p0715: 0
- p2745: 0.000382146; = p2354*(p1019+p1021)
- p1053: 3.74203e7; = IF(p1012=0;p1046*p1036;0)
- p1205: 0
- p3265: 0.696292
- p2488: 4.18516e-6; = p2292*p1014
- p3321: 2.92936e7; = if(and(p1232=0;p3253<>0);IF((p3317+p3318+p3319+p3320)+(p3253*(p3261*(1-p3277))/p3316)>p3253;p3253-(p3317+p3318+p3319+p3320);p3253*(p3261*(1-p3277))/p3316);0)
- p3047: 3.0555e-7; = p2266*p1082
- p3126: 6.41809e-7; = p2345*p1082
- p1956: 0
- p2613: 0; = p2417*p1073
- p1394: 224
- p4563: 2.95568e-7; = p1802*p3481
- p4532: 1.50212e-5; = p1771*p3481
- p4541: 1.82091e-7; = p1780*p3481
- p1456: 6
- p1915: 0
- p1186: 1.03368e-8; = p1182*p1185/p0818
- p5040: 3.21662e-8; = p1867*p3483
- p3050: 1.35137e-5; = p2269*p1082
- p2307: 7.64857e-5; = p2227*p2214
- p2564: 4.97018e-7; = p2368*p1014
- p0683: 28482.1; = p0023*(1+p0551*p0155/100)
- p0378: 0.5
- p0095: 35.427
- p3014: 0; = p2428*(p1129+p1131)
- p0746: 2.696; = p0086*(1+p0614*p0218/100)
- p0027: 9.209
- p1808: 1.54498e-6; = p1400*1000/p0818
- p4831: 0; = p1864*p3482
- p2820: 0; = p2429*(p1128+p1130)
- p3086: 1.98263e-7; = p2305*p1082
- p2718: 9.86581e-6; = p2327*(p1019+p1021)
- p0635: 0; = IF(p0371<0.5;-SQRT(p0007*EXP(p0503^2*p0008)-p0007);SQRT(p0007*EXP(p0503^2*p0008)-p0007))
- p1121: 0
- p0335: 0.5
- p1777: 0
- p1576: 0.47191
- p2070: 0.282
- p1732: 0
- p2084: 0.21
- p3341: 6.1071e6; = if(and(p1232=0;p3254<>0);p3254*(p3271-p3336)/p3338;0)
- p2134: 5.35563e-7; = p2015*p2062*p2096/(p0818*1000)
- p2786: 0; = p2395*(p1019+p1021)
- p2313: 0.000288377; = p2231*p2220
- p4219: 1.47263e-8; = p1870*p3479
- p1128: 0.35267; = if(p1121=0;IF(p1123=1;0;IF(p1123+p1124>1;1-p1123;p1124));0)
- p2082: 0.285294
- p3433: 0; = p3376*p1239
- p2822: 0; = p2431*(p1128+p1130)
- p1575: 0
- p3857: 0; = p1920*p3477
- p3240: 1.52191e-9; = p3234*p1188*p3235/p0818
- p2614: 0; = p2418*p1073
- p4309: 0; = p1754*p3480
- p3106: 0; = p2325*p1023
- p2333: 4.20485e-5; = p2224*p2201
- p2588: 0; = p2392*p1123
- p1286: 0.00754021; = p1282*p1252/p0818
- p4451: 0; = p1896*p3480
- p2187: 0.000177351; = 4*1.00794*p2186/(2*14.0067)
- p1195: 0.45
- p1785: 0
- p1624: 0
- p1410: 223
- p1750: 0
- p0822: 0.879667
- p0156: 40.083
- p2211: 0.00223924; = p1120-p2209-p2208-p2210
- p3277: 0.55
- p4052: 5.53998e-8; = p1909*p3478
- p1716: 0.41185
- p0819: 0.0509006; = p0808*p0809/p0818
- p3273: 0.753577
- p0414: 0; = SQRT(2)*(IF((2*p0282-1)<0;-1;IF((2*p0282-1)>0;1;0))*SQRT(SQRT((2/(pi()*0.140012289)+LN(1-(2*p0282-1)^2)/2)^2-LN(1-(2*p0282-1)^2)/0.140012289)-(2/(pi()*0.140012289)+LN(1-(2*p0282-1)^2)/2)))
- p0467: 0; = SQRT(2)*(IF((2*p0335-1)<0;-1;IF((2*p0335-1)>0;1;0))*SQRT(SQRT((2/(pi()*0.140012289)+LN(1-(2*p0335-1)^2)/2)^2-LN(1-(2*p0335-1)^2)/0.140012289)-(2/(pi()*0.140012289)+LN(1-(2*p0335-1)^2)/2)))
- p1086: 0; = IF(p1071=0;p1080*(p0710/100)*p0703*1000;0)
- p0006: 15
- p2719: 9.75238e-5; = p2328*(p1019+p1021)
- p0004: 0.0254
- p1411: 1150
- p0116: 33.245
- p2271: 0.00040743; = p2226*p2217
- p4007: 4.15499e-8; = p1864*p3478
- p1963f: 2.05677e-6; = p1647*p1851+p1648*p1852+p1649*p1853+p1650*p1854+p1651*p1855+p1652*p1856+p1653*p1857+p1654*p1858+p1655*p1859+p1656*p1860+p1657*p1861+p1658*p1862+p1659*p1863+p1660*p1864+p1661*p1865+p1662*p1866+p1663*p1867+p1664*p1868+p1665*p1869+p1666*p1870
- p3428: 0; = p3371*p1239
- p1007: 0; = p1003*p0001*p0004/(p0818*p0002)
- p0894: 0.22
- p2046: 10
- p0320: 0.5
- p0321: 0.5
- p3109: 0; = p2328*p1023
- p1762: 0
- p0124: 110.454
- p0175: 0
- p1751: 0
- p2785: 0; = p2394*(p1019+p1021)
- p2334: 6.05172e-6; = p2224*p2202
- p2951: 0.000388382; = p2365*(p1020+p1022)
- p1705: 0.453667
- p4363: 0; = p1808*p3480
- p0270: 4.828
- p0964: 0.000622222; = 56/90000
- p2276: 0.00281066; = p2223*p2182
- p0830: 4.73994e10; = p0825*p0821*p0824
- p1148: 0.0889917; = if(p1121=0;IF(p1146=1;0;1-p1146);0)
- p0506: 0; = SQRT(2)*(IF((2*p0374-1)<0;-1;IF((2*p0374-1)>0;1;0))*SQRT(SQRT((2/(pi()*0.140012289)+LN(1-(2*p0374-1)^2)/2)^2-LN(1-(2*p0374-1)^2)/0.140012289)-(2/(pi()*0.140012289)+LN(1-(2*p0374-1)^2)/2)))
- p1224: 0.44; = IF(p1221=0;0;IF(p1193=0;1-p1223;0))
- p2026: 53.05
- p1251: 2.62241e-6; = if(p1232>0;0;p1246*p0001/(p0818*p0002))
- p2910: 1.2333e-6; = p2324*(p1020+p1022)
- p0727: 24.871; = p0067*(1+p0595*p0199/100)
- p2538: 3.80074e-6; = p2342*p1073
- p2213: 0.000194539; = p1116-p2212
- p1274: 0; = p1270*p1252/p0818
- p2055: 5.59471
- p0242: 10.387
- p1741: 0
- p1610: 0
- p0534: 0; = SQRT(2)*(IF((2*p0402-1)<0;-1;IF((2*p0402-1)>0;1;0))*SQRT(SQRT((2/(pi()*0.140012289)+LN(1-(2*p0402-1)^2)/2)^2-LN(1-(2*p0402-1)^2)/0.140012289)-(2/(pi()*0.140012289)+LN(1-(2*p0402-1)^2)/2)))
- p0519: 0; = SQRT(2)*(IF((2*p0387-1)<0;-1;IF((2*p0387-1)>0;1;0))*SQRT(SQRT((2/(pi()*0.140012289)+LN(1-(2*p0387-1)^2)/2)^2-LN(1-(2*p0387-1)^2)/0.140012289)-(2/(pi()*0.140012289)+LN(1-(2*p0387-1)^2)/2)))
- p4625: 7.91699e-9; = p1864*p3481
- p2713: 3.38226e-6; = p2322*(p1019+p1021)
- p2986: 0; = p2400*(p1020+p1022)
- p1170: 6715.28; = p1169*p0801
- p0188: 2.734
- p0247: 7.079
- p2060: 0.272353
- p2852: 4.23365e-6; = p2266*(p1079+p1081)
- p2459: 4.38223e-5; = p2263*p1073
- p0585: 0; = IF(p0321<0.5;-SQRT(p0007*EXP(p0453^2*p0008)-p0007);SQRT(p0007*EXP(p0453^2*p0008)-p0007))
- p1022: 0.26517; = IF(p1012=0;IF(p1014+p1019+p1020+p1021=1;0;IF(p1014+p1019+p1020+p1021+p1018>1;1-(p1014+p1019+p1020+p1021);p1018));0)
- p3161: 0; = p2380*p1082
- p0052: 34.4
- p5305: 2.93971e-9; = p1926*p3484
- p3467: 0; = p3372*p1241
- p1938: 4.55112e-7; = p1530*1000/p0818
- p0115: 79.209
- p0797: 70.469; = p0137*(1+p0665*p0269/100)
- p1161: 2.71103e6; = (p0722/100)*p0702*1000
- p0383: 0.5
- p1190: 3.25389e-8; = p1188/p0818
- p1958: 29971
- p2976: 0; = p2390*(p1129+p1131)
- p2823: 0.00136864; = p2237*(p1020+p1022)
- p2206: 0.000581705; = 9*1.00794*p2204/30.973762
- p1901: 1.34138e-6; = p1493*1000/p0818
- p2778: 0; = p2387*(p1078+p1080)

## Reference product
- corn grain; at harvest in 1999; at farm; 85%-91% moisture: 1 kg

## Inputs from technosphere
- CUTOFF sulfuric acid storage: 1.00764e-8 kg*a; = p1180
- CUTOFF corn seeds; GMO herbicide resistant seed; at point-of-sale: 0.000112634 kg; = p0970
- CUTOFF dairy manure; from unspecified storage; at point-of-sale: 0.00754021 kg; = p1286
- CUTOFF N inhibitor appl svc; unspec rate & type, 1999 corn: 3.2469e-5 ha; = p1162
- CUTOFF apply pesticide; unspecified application methods: 6.77962e-6 ha; = p1345
- CUTOFF apply mixed N fertilizer; without incorporation: 3.00592e-5 ha; = p1034
- CUTOFF potassic fertilizer, potassium chloride; at point-of-sale: 0.0219094 kg; = p1154
- CUTOFF irrigate; unspec. irrigation method, unspec. water source, in 1999: 1.31345e-7 ha-m; = p1011
- CUTOFF apply mixed N fertilizer; with incorporation: 2.32883e-5 ha; = p1033
- CUTOFF pesticide, Chlorpyrifos; at point-of-sale; kg AI: 1.31982e-5 kg; = p1793
- CUTOFF apply manure; unspec. method: 2.62241e-6 ha; = p1251
- CUTOFF international vessel transport; average fuel: 0.284731 metric ton*km; = p2006
- CUTOFF domestic barge transport; average fuel: 0.0303546 metric ton*km; = p2007
- CUTOFF pesticide, Simazine; at point-of-sale; kg AI: 6.47935e-6 kg; = p1929
- CUTOFF pesticide, Dimethylamine 3,6-dichloro-o-anisate; at point-of-sale; kg AI: 6.68295e-6 kg; = p1809
- CUTOFF phosphatic fertilizer, superphos. grades 22% and under; at point-of-sale: 0.000213143 kg; = p1116
- CUTOFF hog manure; from unspecified storage; at point-of-sale: 0.0233812 kg; = p1296
- corn silage; at harvest in 1999; at farm; 28%-40% moisture: 0.0509006 kg; = p0819
- CUTOFF planting; for reduced till, corn; 15-30% residue: 2.26478e-5 ha; = p0955
- corn residue; at harvest in 1999; at farm; 22%-91% moisture: 0.387071 kg; = p0839
- CUTOFF phosphatic fertilizer, superphosphate grades over 22%; at point-of-sale: 0.00104085 kg; = p1117
- CUTOFF pesticide, Dicamba; at point-of-sale; kg AI: 1.54498e-6 kg; = p1808
- CUTOFF potassic fertilizer, other single nutrients; at point-of-sale: 0.00243206 kg; = p1155
- CUTOFF fertilizer storage: 0.0516878 kg*a; = p1160
- CUTOFF seed storage; corn: 0.00114605 kg*a; = p0975
- CUTOFF apply manure; broadcast without incorporation: 2.5395e-6 ha; = p1248
- CUTOFF sewage sludge storage: 1.62695e-8 kg*a; = p1192
- CUTOFF zinc compounds storage: 1.03368e-8 kg*a; = p1186
- CUTOFF limestone, high-grade, pulverized; at point-of-sale: 0.0237948 kg; = p1228
- CUTOFF bulk cargo rail transport; diesel: 0.0569149 metric ton*km; = p2008
- CUTOFF pesticide, Atrazine; at point-of-sale; kg AI: 0.000136342 kg; = p1771
- CUTOFF pesticide, Primisulfuron-methyl; at point-of-sale; kg AI: 9.5813e-8 kg; = p1909
- CUTOFF apply K fertilizer; no broadcast application: 7.45581e-6 ha; = p1139
- CUTOFF apply pesticide; in seed furrow: 2.27089e-5 ha; = p1343
- CUTOFF apply liming materials; unspecified method: 0.000115401 ha; = p1227
- CUTOFF pesticide, Dimethenamid; at point-of-sale; kg AI: 1.37731e-5 kg; = p1819
- CUTOFF nitrogenous fertilizer, ammonium sulfate; at point-of-sale: 0.00213414 kg; = p1067
- CUTOFF pesticide, Permethrin, mixed cis,trans; at point-of-sale; kg AI: 1.55696e-7 kg; = p1904
- CUTOFF apply K fertilizer; broadcast without incorporation: 4.76076e-5 ha; = p1141
- CUTOFF pesticide, Rimsulfuron; at point-of-sale; kg AI: 1.79649e-7 kg; = p1926
- CUTOFF apply N fertilizer; broadcast with incorporation: 1.26757e-5 ha; = p1031
- CUTOFF pesticide, Bromoxynil; at point-of-sale; kg AI: 1.65277e-6 kg; = p1780
- CUTOFF nitrogenous fertilizer, sodium nitrate; at point-of-sale: 6.98029e-5 kg; = p1069
- CUTOFF planting; for conventional till, corn; <15% residue: 3.34056e-5 ha; = p0952
- CUTOFF apply zinc compounds; unspecified method: 0.000115401 ha; = p1183
- CUTOFF apply sewage sludge; unspecified method: 0.000115401 ha; = p1189
- CUTOFF nitrogenous fertilizer, anhydrous ammonia; at point-of-sale: 0.00927001 kg; = p1064
- CUTOFF apply gypsum; unspecified method: 0.000115401 ha; = p1165
- CUTOFF apply pesticide; as foliar or directed spray: 4.56459e-5 ha; = p1339
- CUTOFF phosphatic fertilizer, monoammonium phosphate; at point-of-sale: 0.00368204 kg; = p1120
- CUTOFF apply pesticide; broadcast with incorporation: 0.000239558 ha; = p1333
- CUTOFF pesticide, 2,4-D; at point-of-sale; kg AI: 4.92239e-6 kg; = p1754
- CUTOFF apply P fertilizer; broadcast with incorporation: 3.17615e-5 ha; = p1090
- CUTOFF pesticide storage: 0.000397281 kg*a; = p1965
- CUTOFF pesticide, Propazine; at point-of-sale; kg AI: 6.8662e-5 kg; = p1889
- CUTOFF phosphatic fertilizer, other single phosphates; at point-of-sale: 0.00083773 kg; = p1118
- CUTOFF apply sulfur; unspecified method: 0.000115401 ha; = p1171
- CUTOFF sewage sludge; at point-of-sale: 3.25389e-8 kg; = p1190
- CUTOFF pesticide, Acetochlor; at point-of-sale; kg AI: 6.36797e-5 kg; = p1765
- CUTOFF corn seeds; nonGMO herbicide resistant seed; at point-of-sale: 0.000275969 kg; = p0971
- CUTOFF apply single or mixed P fertilizer; unspec. method: 2.80499e-6 ha; = p1094
- CUTOFF pesticide, Pyridate; at point-of-sale; kg AI: 7.52132e-6 kg; = p1920
- CUTOFF pesticide, Cyanazine; at point-of-sale; kg AI: 2.68276e-6 kg; = p1802
- CUTOFF apply P fertilizer; broadcast without incorporation: 3.88654e-5 ha; = p1091
- CUTOFF pesticide, Imazethapyr; at point-of-sale; kg AI: 7.18597e-8 kg; = p1864
- CUTOFF pesticide, Bentazon; at point-of-sale; kg AI: 3.34148e-6 kg; = p1776
- CUTOFF pesticide, Isoxaflutole; at point-of-sale; kg AI: 5.86854e-7 kg; = p1867
- CUTOFF liming materials storage: 0.0137482 kg*a; = p1231
- CUTOFF pesticide formulation balance; at point-of-sale: 0.000214079 kg; = p1963
- CUTOFF planting; for unspec. till, corn: 6.50853e-7 ha; = p0957
- CUTOFF prepare soil; for mulch till, corn: 4.16495e-5 ha; = p0935
- CUTOFF sulfuric acid; at point-of-sale: 2.01528e-8 kg; = p1178
- CUTOFF pesticide, Nicosulfuron; at point-of-sale; kg AI: 2.27556e-7 kg; = p1896
- CUTOFF gypsum storage: 3.14408e-7 kg*a; = p1168
- CUTOFF pesticide, Clopyralid; at point-of-sale; kg AI: 4.55112e-7 kg; = p1798
- CUTOFF pesticide, Tebupirimfos; at point-of-sale; kg AI: 4.55112e-7 kg; = p1938
- CUTOFF pesticide, Glyphosate; at point-of-sale; kg AI: 5.09006e-6 kg; = p1855
- CUTOFF irrigate; pressure, groundwater source, in 1999: 5.82252e-7 ha-m; = p0993
- CUTOFF apply P fertilizer; no broadcast application: 1.88981e-5 ha; = p1089
- CUTOFF planting; for mulch till, corn: 4.16495e-5 ha; = p0953
- CUTOFF zinc compounds; at point-of-sale: 2.06737e-8 kg; = p1184
- CUTOFF corn seeds; seed, unspec. type; at point-of-sale: 0.0019035 kg; = p0972
- CUTOFF pesticide, Flumetsulam; at point-of-sale; kg AI: 3.83252e-7 kg; = p1842
- CUTOFF dolomite, pulverized; at point-of-sale: 0.0037015 kg; = p1229
- CUTOFF pesticide, Paraquat dichloride; at point-of-sale; kg AI: 1.34138e-6 kg; = p1901
- CUTOFF fertilizer filler materials; at point-of-sale: 0.018837 kg; = p1158
- CUTOFF apply N fertilizer; no broadcast application: 3.18356e-5 ha; = p1030
- CUTOFF prepare soil; for reduced till, corn; 15-30% residue: 2.26478e-5 ha; = p0937
- CUTOFF regional or national trucking; class 8, average fuel: 0.00582156 metric ton*km; = p2009
- CUTOFF pesticide, Tefluthrin; at point-of-sale; kg AI: 2.048e-6 kg; = p1939
- CUTOFF sulfur storage: 4.02132e-8 kg*a; = p1174
- CUTOFF pesticide, Chlorethoxyfos; at point-of-sale; kg AI: 3.83252e-7 kg; = p1789
- CUTOFF pesticide, beta-Cyfluthrin; at point-of-sale; kg AI: 2.39532e-8 kg; = p1804
- CUTOFF planting; for no-till, corn: 1.70475e-5 ha; = p0954
- CUTOFF apply K fertilizer; broadcast with incorporation: 3.28721e-5 ha; = p1140
- CUTOFF pesticide, unspecified type; at point-of-sale; kg AI: 7.45305e-6 kg; = p1962
- CUTOFF unspecified animal manure; from unspecified storage; at point-of-sale: 0.00380903 kg; = p1316
- CUTOFF pesticide, Prosulfuron; at point-of-sale; kg AI: 1.19766e-8 kg; = p1916
- CUTOFF harvest; corn silage: 1.33566e-6 ha; = p1974
- CUTOFF pesticide, Diflufenzopyr-sodium; at point-of-sale; kg AI: 2.67079e-6 kg; = p1818
- CUTOFF nitrogenous fertilizer, urea; at point-of-sale: 0.00906176 kg; = p1070
- CUTOFF sulfur; at point-of-sale: 8.04264e-8 kg; = p1172
- CUTOFF prepare soil; for no-till, corn: 1.70475e-5 ha; = p0936
- CUTOFF apply mixed K fertilizer; without incorporation: 1.79801e-6 ha; = p1143
- CUTOFF harvest; corn residue management: 0.000115401 ha; = p1975
- CUTOFF pesticide, Dicamba-potassium; at point-of-sale; kg AI: 6.97039e-6 kg; = p1810
- CUTOFF local area trucking; class 6, average fuel: 0.0022766 metric ton*km; = p2010
- CUTOFF apply N fertilizer; broadcast without incorporation: 1.54995e-5 ha; = p1032
- CUTOFF prepare soil; for unspec. till, corn: 6.50853e-7 ha; = p0939
- CUTOFF nitrogenous fertilizer, ammonium nitrate; at point-of-sale: 0.00367841 kg; = p1066
- CUTOFF apply sulfuric acid; unspecified method: 0.000115401 ha; = p1177
- CUTOFF gypsum; at point-of-sale: 6.28817e-7 kg; = p1166
- CUTOFF phosphatic fertilizer, diammonium phosphate; at point-of-sale: 0.0091941 kg; = p1119
- CUTOFF prepare soil; for conventional till, corn; <15% residue: 3.34056e-5 ha; = p0934
- CUTOFF harvest; corn: 0.000113799 ha; = p1971
- CUTOFF nitrogenous fertilizer, nitrogen solutions; at point-of-sale: 0.0203282 kg; = p1068
- CUTOFF pesticide, Terbufos; at point-of-sale; kg AI: 5.43739e-6 kg; = p1940
- CUTOFF apply pesticide; broadcast without incorporation: 7.27762e-5 ha; = p1335
- CUTOFF pesticide, Lambda-cyhalothrin; at point-of-sale; kg AI: 8.38364e-8 kg; = p1870
- CUTOFF apply pesticide; banded or side-dressed: 2.68427e-5 ha; = p1329
- CUTOFF apply manure; broadcast or spray with incorporation: 5.04878e-6 ha; = p1247
- CUTOFF beef manure; from unspecified storage; at point-of-sale: 0.043116 kg; = p1276
- CUTOFF apply single or mixed K fertilizer; unspec. method: 3.47578e-6 ha; = p1144
- CUTOFF nitrogenous fertilizer, aqueous ammonia; at point-of-sale: 0.000687023 kg; = p1065
- CUTOFF pesticide, Pendimethalin; at point-of-sale; kg AI: 1.79649e-6 kg; = p1903

## Inputs from nature
- Potassium; from plant uptake; biogenic: 0.0100157 kg; = p0915
- Water, unspecified origin: 0.00191798 m3; = p0916*0.001+p0893*0.001
- Transformation, to annual crop [natural resource, land]: 1.15401 m2; = 1.0 * (p0857)
- Occupation, annual crop [natural resource, land]: 0.514763 m2*year; = 1.0 * (p0855)
- Transformation, from annual crop [natural resource, land]: 1.15401 m2; = 1.0 * (p0871+p0879+p0873+p0883)
- Dry matter except CNPK; from plant uptake: 0.953019 kg; = p0917
- Nitrogen: 0.0206008 kg; = p0905
- Phosphorus: 0.00351406 kg; = p0910
- Water, ground: 5.82252 kg; = p0887
- Carbon dioxide: 2.21066 kg; = p0900*3.6666666667

## Emissions to nature
- Aqueous ammonia; broadcast w/ incorp. in fert. in spr. bef. plant.: 2.20193e-5 kg; = p2669*1.2142857143
- Urea; broadcast w/ incorp. in fert. in spr. bef. plant.: 0.00103681 kg; = p2685*5
- Chlorethoxyfos; broadcast without incorporation: 6.73204e-8 kg; = p4138
- Potassium chloride; broadcast w/ incorp. in fert. in spr. bef. plant.: 0.00230782 kg; = p2702*2.2166666667
- Anhydrous ammonia; broadcast w/o incorp. in fert. in fall bef. plant.: 0.00166191 kg; = p2823*1.2142857143
- Dicamba [soil, agricultural]: 1.54498e-6 kg; = 1.0 * (p4157+p3951+p5187+p4981+p4569+p3539)
- Superphosphate, grades>22%; broadcast w/o incorp. in fert. at plant.; kg P: 9.96699e-6 kg; = p2932
- Metolachlor [soil, agricultural]: 6.8662e-5 kg; = 1.0 * (p4650+p5062+p4032+p4238+p3620+p5268)
- Terbufos [soil, agricultural]: 5.43739e-6 kg; = 1.0 * (p4289+p4083+p3671+p5319+p4701+p5113)
- Sulfur dioxide [air, non-urban air or from high stacks]: 3.47931e-7 kg; = 1.0 * (p2041)
- Potassium chloride; broadcast w/ incorp. in fert. in fall bef. plant.: 0.00461752 kg; = p2663*2.2166666667
- Aqueous ammonia; no broadcast in fert. at plant.: 1.25396e-6 kg; = p2513*1.2142857143
- Ammonium nitrate; broadcast w/ incorp. in fert. after plant.: 0.000292049 kg; = p2749*4.7142857143
- Monoammonium phosphate; unspec. appl. method in fert. at plant.: 1.07325e-5 kg; = p3122*8.2142857143
- Seeds; used in planting and sowing: 0.0022921 kg; = p2179
- Pesticides, unspecified [soil, agricultural]: 7.45305e-6 kg; = 1.0 * (p5337+p4307+p5131+p3689+p4719+p4101)
- Dicamba-potassium; foliar or directed spray: 7.67949e-7 kg; = p4571
- Pesticide formulation balance; broadcast without incorporation: 3.76042e-5 kg; = p4308
- Chlorpyrifos [soil, agricultural]: 1.31982e-5 kg; = 1.0 * (p4142+p3936+p4554+p3524+p4966+p5172)
- Superphosphate, grades<= 22%; broadcast w/o incorp. in fert. in spr. bef. plant.; kg P: 2.7471e-6 kg; = p2891
- Acetochlor [soil, agricultural]: 6.36797e-5 kg; = 1.0 * (p3908+p5144+p4114+p3496+p4938+p4526)
- Monoammonium phosphate; broadcast w/ incorp. in fert. at plant.: 0.000121527 kg; = p2732*8.2142857143
- Monoammonium phosphate; no broadcast in fert. in fall bef. plant.: 0.000359969 kg; = p2459*8.2142857143
- Nitrogen solution; broadcast w/ incorp. in fert. after plant.; broadcast w/ incorp. in fert. after plant.; kg N: 0.000306589 kg; = p2756
- Diammonium phosphate; unspec. appl. method in fert. in fall bef. plant.: 0.000139086 kg; = p3040*4.7142857143
- Diammonium phosphate; broadcast w/o incorp. in fert. at plant.: 0.000387114 kg; = p2923*4.7142857143
- Ammonium sulfate; no broadcast in fert. after plant.: 9.40235e-5 kg; = p2557*4.7142857143
- Potassium chloride; unspec. appl. method in fert. in fall bef. plant.: 0.000488239 kg; = p3053*2.2166666667
- Potassium chloride; unspec. appl. method in fert. at plant.: 1.94473e-5 kg; = p3131*2.2166666667
- Potassium; in below-ground residue; biogenic: 0.00189747 kg; = p2176
- Dicamba-potassium; in seed furrow: 3.82055e-7 kg; = p4983
- Filler materials, applied with synthetic fertilizer: 0.018837 kg; = p2432
- Diammonium phosphate; unspec. appl. method in fert. at plant.: 2.79387e-5 kg; = p3118*4.7142857143
- Dimethylamine 3,6-dichloro-o-anisate; unspec. appl. method: 1.09357e-7 kg; = p5188
- Monoammonium phosphate; broadcast w/o incorp. in fert. at plant.: 0.000148708 kg; = p2927*8.2142857143
- Other single phosphates; broadcast w/o incorp. in fert. in fall bef. plant.; kg P: 1.91357e-5 kg; = p2856
- Potassium; broadcast w/ incorp. in manure at an unknown time: 0.000246519 kg; = p3396
- Other single phosphates; broadcast w/ incorp. in fert. at plant.; kg P: 3.14128e-6 kg; = p2739
- Acetaldehyde [air, non-urban air or from high stacks]: 3.63644e-7 kg; = 1.0 * (p2130*1.8333333333)
- Dimethylamine 3,6-dichloro-o-anisate; banded or side-dressed: 4.3298e-7 kg; = p3540
- Ammonia [air, non-urban air or from high stacks]: 6.34488e-7 kg; = 1.0 * (p2159*1.2142857143)
- Ammonium nitrate; broadcast w/ incorp. in fert. at plant.: 4.38415e-5 kg; = p2710*4.7142857143
- Dimethenamid [soil, agricultural]: 1.37731e-5 kg; = 1.0 * (p5198+p3550+p3962+p4580+p4992+p4168)
- Other limestone constituents; applied in limestone: 0.00142769 kg; = p3220
- Glyphosate [soil, agricultural]: 5.09006e-6 kg; = 1.0 * (p3998+p3586+p5234+p5028+p4616+p4204)
- Other single phosphates; unspec. appl. method in fert. in fall bef. plant.; kg P: 1.38106e-6 kg; = p3051
- Particulates, < 10 um: 3.12261e-6 kg; = p2036+p2034
- Tebupirimphos [soil, agricultural]: 4.55112e-7 kg; = 1.0 * (p3669+p4699+p5111+p4081+p4287+p5317)
- Superphosphate, grades>22%; broadcast w/ incorp. in fert. at plant.; kg P: 8.14521e-6 kg; = p2737
- Superphosphate, grades<= 22%; broadcast w/o incorp. in fert. in fall bef. plant.; kg P: 4.23365e-6 kg; = p2852
- Prosulfuron [soil, agricultural]: 1.19766e-8 kg; = 1.0 * (p4677+p3647+p4059+p5089+p5295+p4265)
- Other single K nutrients; no broadcast in fert. in fall bef. plant.; kg K: 4.61533e-5 kg; = p2470
- Other single phosphates; unspec. appl. method in fert. at plant.; kg P: 2.77419e-7 kg; = p3129
- Chlorethoxyfos; broadcast with incorporation: 2.21599e-7 kg; = p3932
- Potassium; in above-ground residue left on field; biogenic: 0.00483363 kg; = p2170
- Superphosphate, grades>22%; unspec. appl. method in fert. in fall bef. plant.; kg P: 3.58103e-6 kg; = p3049
- Nitrogen; in below-ground residue: 0.00133079 kg; = p2174
- Dioxins and furans (PCDD/F); from residue burning: 8.77138e-15 kg TEQ; = p2047
- Monoammonium phosphate; unspec. appl. method in fert. in fall bef. plant.: 5.34291e-5 kg; = p3044*8.2142857143
- Ammonium sulfate; broadcast w/o incorp. in fert. in fall bef. plant.: 0.00038041 kg; = p2830*4.7142857143
- Potassium chloride; no broadcast in fert. in fall bef. plant.: 0.00104731 kg; = p2468*2.2166666667
- Water: 7.51722 kg; = p3399+p3475+p2181+p2171+p3418+p2178
- Imazethapyr [soil, agricultural]: 7.18597e-8 kg; = 1.0 * (p4213+p5037+p4625+p4007+p5243+p3595)
- Pesticide formulation balance; unspec. appl. method: 3.5031e-6 kg; = p5338
- Ammonium nitrate; broadcast w/o incorp. in fert. in spr. bef. plant.: 0.000863281 kg; = p2866*4.7142857143
- Lambda-cyhalothrin [soil, agricultural]: 8.38364e-8 kg; = 1.0 * (p3601+p4219+p4631+p5249+p5043+p4013)
- Superphosphate, grades>22%; no broadcast in fert. in fall bef. plant.; kg P: 2.41266e-5 kg; = p2464
- Aqueous ammonia; no broadcast in fert. in spr. bef. plant.: 1.94916e-5 kg; = p2474*1.2142857143
- Ammonium nitrate; no broadcast in fert. in fall bef. plant.: 0.000730895 kg; = p2437*4.7142857143
- Phosphorous; applied in sewage sludge: 1.8168e-10 kg; = p3241
- Dinitrogen monoxide [air, non-urban air or from high stacks]: 2.04704e-8 kg; = 1.0 * (p2044*1.5714285714)
- Chlorethoxyfos; banded or side-dressed: 2.48304e-8 kg; = p3520
- Tefluthrin [soil, agricultural]: 2.048e-6 kg; = 1.0 * (p4288+p4700+p5112+p5318+p4082+p3670)
- Ammonium nitrate; broadcast w/o incorp. in fert. after plant.: 0.000369963 kg; = p2944*4.7142857143
- Ammonium sulfate; broadcast w/ incorp. in fert. in spr. bef. plant.: 0.000247849 kg; = p2674*4.7142857143
- Isoprene [air, non-urban air or from high stacks]: 1.10325e-7 kg; = 1.0 * (p2145*1.1333333333)
- Volatile constituents; broadcast w/o incorp. in man. at unknown time: 0.00111065 kg; = p3416
- Superphosphate, grades<= 22%; broadcast w/ incorp. in fert. at plant.; kg P: 6.94987e-7 kg; = p2735
- Pesticide formulation balance; broadcast with incorporation: 0.000123782 kg; = p4102
- Urea; broadcast w/o incorp. in fert. after plant.: 0.000562871 kg; = p2958*5
- Isoxaflutole [soil, agricultural]: 5.86854e-7 kg; = 1.0 * (p5040+p4010+p4628+p5246+p3598+p4216)
- Propanenitrile: 1.87348e-8 kg; = p2157*1.5277777778
- Benzene [air, non-urban air or from high stacks]: 4.48645e-8 kg; = 1.0 * (p2140*1.0833333333)
- Phosphorous; in above-ground residue left on field: 0.000317444 kg; = p2169
- Dimethylamine 3,6-dichloro-o-anisate; broadcast without incorporation: 1.1739e-6 kg; = p4158
- Methanol [air, non-urban air or from high stacks]: 9.60926e-7 kg; = 1.0 * (p2129*2.6666666667)
- Methane: 6.53779e-7 kg; = p2025*1.3333333333
- Nitrogen; broadcast w/o incorp. in manure at an unknown time: 0.000143855 kg; = p3413
- Ammonium nitrate; broadcast w/o incorp. in fert. in fall bef. plant.: 0.00104596 kg; = p2827*4.7142857143
- Dicamba-potassium; broadcast with incorporation: 4.03034e-6 kg; = p3953
- Zinc compounds: 2.06737e-8 kg; = p3232
- Ammonium nitrate; no broadcast in fert. in spr. bef. plant.: 0.000603244 kg; = p2476*4.7142857143
- Anhydrous ammonia; no broadcast in fert. in spr. bef. plant.: 0.00095849 kg; = p2472*1.2142857143
- Ethyne [air, non-urban air or from high stacks]: 7.95872e-8 kg; = 1.0 * (p2132*1.0833333333)
- Anhydrous ammonia; broadcast w/ incorp. in fert. in fall bef. plant.: 0.00131192 kg; = p2628*1.2142857143
- Potassium chloride; no broadcast in fert. in spr. bef. plant.: 0.000523444 kg; = p2507*2.2166666667
- Nitrogen solution; broadcast w/ incorp. in fert. in spr. bef. plant.; broadcast w/ incorp. in fert. in spr. bef. plan...: 0.000715402 kg; = p2678
- Other single phosphates; no broadcast in fert. in fall bef. plant.; kg P: 9.30466e-6 kg; = p2466
- Ammonium sulfate; no broadcast in fert. at plant.: 1.41145e-5 kg; = p2518*4.7142857143
- Phosphorous; broadcast w/ incorp. in manure at an unknown time: 7.69445e-5 kg; = p3395
- 2,4-D [soil, agricultural]: 4.92239e-6 kg; = 1.0 * (p4103+p4927+p5133+p3485+p3897+p4515)
- Ammonium nitrate; broadcast w/ incorp. in fert. in spr. bef. plant.: 0.000681474 kg; = p2671*4.7142857143
- Sodium nitrate; no broadcast in fert. after plant.: 3.01761e-6 kg; = p2564*6.0714285714
- Acetone [air, non-urban air or from high stacks]: 1.30477e-7 kg; = 1.0 * (p2139*1.6111111111)
- Phosphorous; using unspec. method in manure at an unknown time: 3.99661e-5 kg; = p3471
- Chlorethoxyfos; foliar or directed spray: 4.2224e-8 kg; = p4550
- Ammonium sulfate; broadcast w/o incorp. in fert. after plant.: 0.000134554 kg; = p2947*4.7142857143
- Aqueous ammonia; broadcast w/ incorp. in fert. after plant.: 9.43648e-6 kg; = p2747*1.2142857143
- trans-2-Butene: 1.66489e-8 kg; = p2148*1.1666666667
- Particulates, < 2.5 um [air, non-urban air or from high stacks]: 1.45312e-6 kg; = 1.0 * (p2035+p2033)
- Anhydrous ammonia; broadcast w/o incorp. in fert. in spr. bef. plant.: 0.00137166 kg; = p2862*1.2142857143
- Hydrocyanic acid: 8.34102e-8 kg; = p2154*2.25
- Ammonium sulfate; broadcast w/ incorp. in fert. at plant.: 1.59449e-5 kg; = p2713*4.7142857143
- Nonvolatile constituents; using unspec. method in man. at unknown time; exc.CNPK,biogenic: 0.000118294 kg; = p3474
- Urea; broadcast w/o incorp. in fert. at plant.: 8.44964e-5 kg; = p2919*5
- Ethane [air, non-urban air or from high stacks]: 2.65691e-7 kg; = 1.0 * (p2126*1.25)
- Diammonium phosphate; broadcast w/ incorp. in fert. at plant.: 0.000316356 kg; = p2728*4.7142857143
- Nitrogen solution; broadcast w/o incorp. in fert. in spr. bef. plant.; broadcast w/o incorp. in fert. in spr. bef. pl...: 0.00090626 kg; = p2873
- Other single K nutrients; broadcast w/ incorp. in fert. at plant.; kg K: 8.10519e-6 kg; = p2743
- Urea; no broadcast in fert. in spr. bef. plant.: 0.000917791 kg; = p2490*5
- Dicamba-potassium; broadcast without incorporation: 1.22439e-6 kg; = p4159
- Other single K nutrients; broadcast w/o incorp. in fert. at plant.; kg K: 1.21818e-5 kg; = p2938
- Sodium nitrate; no broadcast in fert. at plant.: 4.52994e-7 kg; = p2525*6.0714285714
- Cyanazine [soil, agricultural]: 2.68276e-6 kg; = 1.0 * (p3533+p4975+p5181+p4563+p4151+p3945)
- Volatile constituents; using unspec. method in man. at unknown time: 0.00114691 kg; = p3473
- Simazine [soil, agricultural]: 6.47935e-6 kg; = 1.0 * (p3660+p4690+p4278+p5102+p5308+p4072)
- Methyl vinyl ether; from residue burning: 2.2176e-8 kg; = p2137*1.6111111111
- Aqueous ammonia; broadcast w/ incorp. in fert. at plant.: 1.41657e-6 kg; = p2708*1.2142857143
- Superphosphate, grades<= 22%; no broadcast in fert. in fall bef. plant.; kg P: 2.05859e-6 kg; = p2462
- Oxygen; applied in limestone: 0.0107265 kg; = p3219
- Other single phosphates; no broadcast in fert. at plant.; kg P: 1.86906e-6 kg; = p2544
- Acetol; from residue burning: 1.10088e-6 kg; = p2134*2.0555555556
- Urea; broadcast w/o incorp. in fert. in spr. bef. plant.: 0.00131342 kg; = p2880*5
- Plant dry matter; in below-ground residue: 0.0642478 kg; = p2177
- Potassium chloride; broadcast w/o incorp. in fert. in fall bef. plant.: 0.00693996 kg; = p2858*2.2166666667
- Diammonium phosphate; no broadcast in fert. in spr. bef. plant.: 0.000608037 kg; = p2494*4.7142857143
- Ammonium sulfate; broadcast w/ incorp. in fert. in fall bef. plant.: 0.000300295 kg; = p2635*4.7142857143
- Ammonium nitrate; no broadcast in fert. at plant.: 3.88087e-5 kg; = p2515*4.7142857143
- Ammonium sulfate; no broadcast in fert. in spr. bef. plant.: 0.000219397 kg; = p2479*4.7142857143
- Sodium nitrate; broadcast w/o incorp. in fert. in spr. bef. plant.: 1.00766e-5 kg; = p2876*6.0714285714
- Superphosphate, grades<= 22%; no broadcast in fert. at plant.; kg P: 4.13517e-7 kg; = p2540
- Diammonium phosphate; broadcast w/o incorp. in fert. in spr. bef. plant.: 0.00125047 kg; = p2884*4.7142857143
- Carbon dioxide, in air: 0.000389773 kg; = p2163*3.6666666667
- Paraquat dichloride: 1.34138e-6 kg; = p5074+p4044+p4662+p3632+p4250+p5280
- Acetonitrile [air, non-urban air or from high stacks]: 6.13767e-8 kg; = 1.0 * (p2155*1.7083333333)
- Potassium chloride; broadcast w/ incorp. in fert. at plant.: 0.000183923 kg; = p2741*2.2166666667
- Diammonium phosphate; no broadcast in fert. in fall bef. plant.: 0.000937067 kg; = p2455*4.7142857143
- Furan [air, non-urban air or from high stacks]: 3.19835e-8 kg; = 1.0 * (p2138*1.4166666667)
- Sodium nitrate; broadcast w/ incorp. in fert. in fall bef. plant.: 9.63774e-6 kg; = p2642*6.0714285714
- Plant dry matter; from residue burning: 0.000103988 kg; = p2164
- Urea; no broadcast in fert. in fall bef. plant.: 0.001112 kg; = p2451*5
- Sodium nitrate; broadcast w/o incorp. in fert. in fall bef. plant.: 1.22089e-5 kg; = p2837*6.0714285714
- Ammonium nitrate; no broadcast in fert. after plant.: 0.000258523 kg; = p2554*4.7142857143
- NMVOC, non-methane volatile organic compounds, unspecified origin [air, non-urban air or from high stacks]: 7.51245e-6 kg; = 1.0 * (p2051+p2052)
- Anhydrous ammonia; no broadcast in fert. at plant.: 6.16628e-5 kg; = p2511*1.2142857143
- Nitrogen solution; no broadcast in fert. at plant.; no broadcast in fert. at plant.; kg N: 4.07408e-5 kg; = p2522
- Sulfuric acid [soil, agricultural]: 2.01528e-8 kg; = 1.0 * (p3231)
- Aqueous ammonia; broadcast w/ incorp. in fert. in fall bef. plant.: 2.66788e-5 kg; = p2630*1.2142857143
- Sulfur [soil, agricultural]: 8.04264e-8 kg; = 1.0 * (p3230)
- Atrazine [soil, agricultural]: 0.000136342 kg; = 1.0 * (p3502+p4944+p3914+p5150+p4532+p4120)
- Cyfluthrin [soil, agricultural]: 2.39532e-8 kg; = 1.0 * (p3947+p4153+p5183+p4977+p4565+p3535)
- Oxygen; applied in dolomite: 0.00185795 kg; = p3228
- Potassium; broadcast w/o incorp. in manure at an unknown time: 0.000123998 kg; = p3415
- Anhydrous ammonia; no broadcast in fert. after plant.: 0.000410765 kg; = p2550*1.2142857143
- Urea; broadcast w/ incorp. in fert. at plant.: 6.67015e-5 kg; = p2724*5
- Other single K nutrients; no broadcast in fert. at plant.; kg K: 1.83836e-6 kg; = p2548
- cis-2-Butene: 1.25597e-8 kg; = p2149*1.1666666667
- Phosphorous; broadcast w/o incorp. in manure at an unknown time: 3.87026e-5 kg; = p3414
- Butadiene [air, non-urban air or from high stacks]: 4.41148e-8 kg; = 1.0 * (p2143*1.125)
- Propane [air, non-urban air or from high stacks]: 8.23455e-8 kg; = 1.0 * (p2142*1.2222222222)
- Pesticide formulation balance; in seed furrow: 1.17339e-5 kg; = p5132
- Glycolaldehyde; from residue burning: 5.89065e-7 kg; = p2135*2.5
- Anhydrous ammonia; no broadcast in fert. in fall bef. plant.: 0.00116131 kg; = p2433*1.2142857143
- Aqueous ammonia; no broadcast in fert. after plant.: 8.35322e-6 kg; = p2552*1.2142857143
- Other single phosphates; broadcast w/ incorp. in fert. in fall bef. plant.; kg P: 1.56381e-5 kg; = p2661
- Other single K nutrients; broadcast w/o incorp. in fert. in fall bef. plant.; kg K: 0.000305833 kg; = p2860
- Diammonium phosphate; no broadcast in fert. at plant.: 0.000188232 kg; = p2533*4.7142857143
- Anhydrous ammonia; broadcast w/o incorp. in fert. after plant.: 0.000587832 kg; = p2940*1.2142857143
- Nonvolatile constituents; broadcast w/o incorp. in man. at unknown time; exc.CNPK,biogenic: 0.000114554 kg; = p3417
- Pesticide formulation balance; banded or side-dressed: 1.38699e-5 kg; = p3690
- Dimethylamine 3,6-dichloro-o-anisate; broadcast with incorporation: 3.86414e-6 kg; = p3952
- Pyridate [soil, agricultural]: 7.52132e-6 kg; = 1.0 * (p5093+p5299+p4681+p3651+p4269+p4063)
- Sodium nitrate; broadcast w/ incorp. in fert. at plant.: 5.11739e-7 kg; = p2720*6.0714285714
- Volatile constituents; broadcast w/ incorp. in man. at unknown time: 0.00220809 kg; = p3397
- Nitrogen solution; no broadcast in fert. in spr. bef. plant.; no broadcast in fert. in spr. bef. plant.; kg N: 0.000633277 kg; = p2483
- I butane; from residue burning: 6.16776e-9 kg; = p2146*1.0208333333
- Urea; broadcast w/o incorp. in fert. in fall bef. plant.: 0.00159135 kg; = p2841*5
- Superphosphate, grades>22%; no broadcast in fert. at plant.; kg P: 4.8464e-6 kg; = p2542
- Aqueous ammonia; broadcast w/o incorp. in fert. in spr. bef. plant.: 2.78937e-5 kg; = p2864*1.2142857143
- Ammonium nitrate; broadcast w/ incorp. in fert. in fall bef. plant.: 0.00082568 kg; = p2632*4.7142857143
- Nitrogen; in above-ground residue left on field: 0.00339005 kg; = p2168
- Superphosphate, grades<= 22%; no broadcast in fert. in spr. bef. plant.; kg P: 1.33576e-6 kg; = p2501
- Dimethylamine 3,6-dichloro-o-anisate; foliar or directed spray: 7.36281e-7 kg; = p4570
- Superphosphate, grades<= 22%; broadcast w/ incorp. in fert. in fall bef. plant.; kg P: 3.45982e-6 kg; = p2657
- Formaldehyde [air, non-urban air or from high stacks]: 6.0782e-7 kg; = 1.0 * (p2128*2.5)
- Dicamba-potassium; banded or side-dressed: 4.51602e-7 kg; = p3541
- Diammonium phosphate; broadcast w/ incorp. in fert. in fall bef. plant.: 0.0015749 kg; = p2650*4.7142857143
- Aqueous ammonia; broadcast w/o incorp. in fert. in fall bef. plant.: 3.37963e-5 kg; = p2825*1.2142857143
- Monoammonium phosphate; broadcast w/ incorp. in fert. in spr. bef. plant.: 0.000392562 kg; = p2693*8.2142857143
- Phenol [air, non-urban air or from high stacks]: 1.51649e-7 kg; = 1.0 * (p2133*1.3055555556)
- Nitrogen solution; broadcast w/ incorp. in fert. in fall bef. plant.; broadcast w/ incorp. in fert. in fall bef. plan...: 0.000866786 kg; = p2639
- Other single phosphates; broadcast w/o incorp. in fert. at plant.; kg P: 3.84387e-6 kg; = p2934
- Other single phosphates; broadcast w/ incorp. in fert. in spr. bef. plant.; kg P: 1.01471e-5 kg; = p2700
- Pentane [air, non-urban air or from high stacks]: 6.1855e-9 kg; = 1.0 * (p2152*1.0166666667)
- Sodium nitrate; broadcast w/o incorp. in fert. at plant.: 6.48263e-7 kg; = p2915*6.0714285714
- Superphosphate, grades>22%; broadcast w/o incorp. in fert. in spr. bef. plant.; kg P: 3.21959e-5 kg; = p2893
- Aqueous ammonia; broadcast w/o incorp. in fert. after plant.: 1.1954e-5 kg; = p2942*1.2142857143
- cyclopentane: 4.8361e-10 kg; = p2153*1.0166666667
- Diammonium phosphate; broadcast w/ incorp. in fert. in spr. bef. plant.: 0.00102191 kg; = p2689*4.7142857143
- Chlorethoxyfos; unspec. appl. method: 6.27138e-9 kg; = p5168
- Aqueous ammonia; no broadcast in fert. in fall bef. plant.: 2.36162e-5 kg; = p2435*1.2142857143
- Anhydrous ammonia; broadcast w/ incorp. in fert. at plant.: 6.96594e-5 kg; = p2706*1.2142857143
- Nitrogen; using unspec. method in manure at an unknown time: 0.000148552 kg; = p3470
- Butane [air, non-urban air or from high stacks]: 1.77632e-8 kg; = 1.0 * (p2147*1.0208333333)
- Ammonium sulfate; broadcast w/ incorp. in fert. after plant.: 0.000106217 kg; = p2752*4.7142857143
- Plant dry matter; in aboveground residue left on field: 0.163665 kg; = p2172
- Sewage sludge dry matter; applied in sewage sludge: 1.6849e-10 kg; = p3243
- Nitrogen solution; broadcast w/o incorp. in fert. in fall bef. plant.; broadcast w/o incorp. in fert. in fall bef. pl...: 0.00109803 kg; = p2834
- Ash: 5.78326e-5 kg; = p2021+p2022
- Pesticide formulation balance; foliar or directed spray: 2.35857e-5 kg; = p4720
- Gypsum: 6.28817e-7 kg; = p3229
- Other single phosphates; broadcast w/o incorp. in fert. in spr. bef. plant.; kg P: 1.24167e-5 kg; = p2895
- Anhydrous ammonia; broadcast w/ incorp. in fert. in spr. bef. plant.: 0.00108279 kg; = p2667*1.2142857143
- Superphosphate, grades<= 22%; broadcast w/ incorp. in fert. in spr. bef. plant.; kg P: 2.24498e-6 kg; = p2696
- Other single phosphates; no broadcast in fert. in spr. bef. plant.; kg P: 6.03754e-6 kg; = p2505
- Propene [air, non-urban air or from high stacks]: 1.97656e-7 kg; = 1.0 * (p2136*1.1666666667)
- Superphosphate, grades>22%; unspec. appl. method in fert. in spr. bef. plant.; kg P: 2.32364e-6 kg; = p3088
- Other single K nutrients; broadcast w/o incorp. in fert. in spr. bef. plant.; kg K: 0.000152854 kg; = p2899
- Potassium chloride; no broadcast in fert. at plant.: 4.17161e-5 kg; = p2546*2.2166666667
- Diammonium phosphate; unspec. appl. method in fert. in spr. bef. plant.: 9.0249e-5 kg; = p3079*4.7142857143
- Superphosphate, grades>22%; broadcast w/o incorp. in fert. in fall bef. plant.; kg P: 4.96182e-5 kg; = p2854
- Ammonium sulfate; no broadcast in fert. in fall bef. plant.: 0.000265823 kg; = p2440*4.7142857143
- Superphosphate, grades>22%; unspec. appl. method in fert. at plant.; kg P: 7.19336e-7 kg; = p3127
- Superphosphate, grades<= 22%; broadcast w/o incorp. in fert. at plant.; kg P: 8.50429e-7 kg; = p2930
- Urea; broadcast w/ incorp. in fert. after plant.: 0.000444331 kg; = p2763*5
- Toluene [air, non-urban air or from high stacks]: 5.56899e-8 kg; = 1.0 * (p2141*1.0952380952)
- Sodium nitrate; no broadcast in fert. in fall bef. plant.: 8.53138e-6 kg; = p2447*6.0714285714
- Other single K nutrients; no broadcast in fert. in spr. bef. plant.; kg K: 2.30673e-5 kg; = p2509
- Bentazone [soil, agricultural]: 3.34148e-6 kg; = 1.0 * (p4125+p5155+p4949+p4537+p3919+p3507)
- Other single K nutrients; broadcast w/ incorp. in fert. in spr. bef. plant.; kg K: 0.000101702 kg; = p2704
- Nicosulfuron [soil, agricultural]: 2.27556e-7 kg; = 1.0 * (p3627+p4657+p5275+p4039+p5069+p4245)
- Urea; no broadcast in fert. after plant.: 0.000393324 kg; = p2568*5
- Dimethylamine 3,6-dichloro-o-anisate; in seed furrow: 3.663e-7 kg; = p4982
- Other single K nutrients; broadcast w/ incorp. in fert. in fall bef. plant.; kg K: 0.000203486 kg; = p2665
- Anhydrous ammonia; broadcast w/o incorp. in fert. at plant.: 8.82434e-5 kg; = p2901*1.2142857143
- Monoammonium phosphate; broadcast w/o incorp. in fert. in fall bef. plant.: 0.000740304 kg; = p2849*8.2142857143
- Superphosphate, grades<= 22%; unspec. appl. method in fert. at plant.; kg P: 6.1377e-8 kg; = p3125
- isopentane: 4.9484e-9 kg; = p2151*1.0166666667
- Sodium nitrate; broadcast w/o incorp. in fert. after plant.: 4.31839e-6 kg; = p2954*6.0714285714
- Diflufenzopyr-sodium [soil, agricultural]: 2.67079e-6 kg; = 1.0 * (p5197+p4579+p4991+p3549+p4167+p3961)
- Anhydrous ammonia; broadcast w/ incorp. in fert. after plant.: 0.000464034 kg; = p2745*1.2142857143
- Permethrin [soil, agricultural]: 1.55696e-7 kg; = 1.0 * (p4253+p4047+p4665+p5077+p5283+p3635)
- Nitrogen; broadcast w/ incorp. in manure at an unknown time: 0.000285998 kg; = p3394
- Calcium [soil, agricultural]: 0.00978655 kg; = 1.0 * (p3218+p3226)
- Water [air, non-urban air or from high stacks]: 1.61676e-7 m3; = 0.001 * (p2016)
- Ammonium sulfate; broadcast w/o incorp. in fert. at plant.: 2.01988e-5 kg; = p2908*4.7142857143
- Monoammonium phosphate; broadcast w/ incorp. in fert. in fall bef. plant.: 0.00060499 kg; = p2654*8.2142857143
- Nonvolatile constituents; broadcast w/ incorp. in man. at unknown time; exc.CNPK,biogenic: 0.000227744 kg; = p3398
- Sodium nitrate; no broadcast in fert. in spr. bef. plant.: 7.04137e-6 kg; = p2486*6.0714285714
- Carbon monoxide, fossil [air, non-urban air or from high stacks]: 1.5519e-5 kg; = 1.0 * (p2028*2.3333333333)
- Pendimethalin [soil, agricultural]: 1.79649e-6 kg; = 1.0 * (p5282+p4046+p3634+p5076+p4664+p4252)
- Other single phosphates; unspec. appl. method in fert. in spr. bef. plant.; kg P: 8.96133e-7 kg; = p3090
- Sodium nitrate; broadcast w/ incorp. in fert. after plant.: 3.40894e-6 kg; = p2759*6.0714285714
- Monoammonium phosphate; no broadcast in fert. at plant.: 7.23083e-5 kg; = p2537*8.2142857143
- Acrylonitrile: 9.80047e-9 kg; = p2156*1.4722222222
- Nitrogen solution; no broadcast in fert. after plant.; no broadcast in fert. after plant.; kg N: 0.000271394 kg; = p2561
- Superphosphate, grades<= 22%; unspec. appl. method in fert. in fall bef. plant.; kg P: 3.0555e-7 kg; = p3047
- Magnesium [soil, agricultural]: 0.00046949 kg; = 1.0 * (p3227)
- Nitrogen; applied in sewage sludge: 1.52191e-9 kg; = p3240
- Primisulfuron [soil, agricultural]: 9.5813e-8 kg; = 1.0 * (p4052+p4258+p5082+p4670+p5288+p3640)
- Superphosphate, grades>22%; no broadcast in fert. in spr. bef. plant.; kg P: 1.56551e-5 kg; = p2503
- Monoammonium phosphate; no broadcast in fert. in spr. bef. plant.: 0.000233574 kg; = p2498*8.2142857143
- Potassium chloride; broadcast w/o incorp. in fert. at plant.: 0.00027643 kg; = p2936*2.2166666667
- Potassium; using unspec. method in manure at an unknown time: 0.000128046 kg; = p3472
- Ammonium nitrate; broadcast w/o incorp. in fert. at plant.: 5.55377e-5 kg; = p2905*4.7142857143
- Nitrogen solution; broadcast w/ incorp. in fert. at plant.; broadcast w/ incorp. in fert. at plant.; kg N: 4.60241e-5 kg; = p2717
- Phosphorous; in below-ground residue: 0.000124615 kg; = p2175
- Ammonium sulfate; broadcast w/o incorp. in fert. in spr. bef. plant.: 0.000313971 kg; = p2869*4.7142857143
- Aqueous ammonia; broadcast w/o incorp. in fert. at plant.: 1.79449e-6 kg; = p2903*1.2142857143
- Monoammonium phosphate; broadcast w/o incorp. in fert. in spr. bef. plant.: 0.000480363 kg; = p2888*8.2142857143
- Flumetsulam [soil, agricultural]: 3.83252e-7 kg; = 1.0 * (p4191+p4603+p5221+p3573+p5015+p3985)
- Chlorethoxyfos; in seed furrow: 2.10065e-8 kg; = p4962
- Other single K nutrients; unspec. appl. method in fert. at plant.; kg K: 8.57012e-7 kg; = p3133
- Urea; no broadcast in fert. at plant.: 5.90445e-5 kg; = p2529*5
- Potassium chloride; unspec. appl. method in fert. in spr. bef. plant.: 0.000244021 kg; = p3092*2.2166666667
- Carbon [soil, agricultural]: 0.210031 kg; = 1.0 * (p2167+p3217+p3225+p3469+p3412+p2173+p3393+p3242)
- Sodium nitrate; broadcast w/ incorp. in fert. in spr. bef. plant.: 7.95451e-6 kg; = p2681*6.0714285714
- Other single K nutrients; unspec. appl. method in fert. in fall bef. plant.; kg K: 2.15159e-5 kg; = p3055
- Urea; broadcast w/ incorp. in fert. in fall bef. plant.: 0.00125621 kg; = p2646*5
- 1-Butene: 3.91394e-8 kg; = p2144*1.1666666667
- Superphosphate, grades>22%; broadcast w/ incorp. in fert. in fall bef. plant.; kg P: 4.05489e-5 kg; = p2659
- Nitrogen solution; broadcast w/o incorp. in fert. at plant.; broadcast w/o incorp. in fert. at plant.; kg N: 5.83026e-5 kg; = p2912
- Formic acid [air, non-urban air or from high stacks]: 2.9297e-7 kg; = 1.0 * (p2131*3.8333333333)
- Dicamba-potassium; unspec. appl. method: 1.14061e-7 kg; = p5189
- Superphosphate, grades<= 22%; unspec. appl. method in fert. in spr. bef. plant.; kg P: 1.98263e-7 kg; = p3086
- Nitrogen dioxide: 6.72714e-7 kg; = p2039*3.2857142857
- Nitrogen solution; no broadcast in fert. in fall bef. plant.; no broadcast in fert. in fall bef. plant.; kg N: 0.000767283 kg; = p2444
- Other single K nutrients; unspec. appl. method in fert. in spr. bef. plant.; kg K: 1.07536e-5 kg; = p3094
- Superphosphate, grades>22%; broadcast w/ incorp. in fert. in spr. bef. plant.; kg P: 2.63111e-5 kg; = p2698
- Clopyralid [soil, agricultural]: 4.55112e-7 kg; = 1.0 * (p4147+p4559+p5177+p3941+p3529+p4971)
- Acetic acid [air, non-urban air or from high stacks]: 1.63582e-6 kg; = 1.0 * (p2127*2.5)
- Ethene [air, non-urban air or from high stacks]: 4.25414e-7 kg; = 1.0 * (p2125*1.1666666667)
- Monoammonium phosphate; unspec. appl. method in fert. in spr. bef. plant.: 3.46687e-5 kg; = p3083*8.2142857143
- Rimsulfuron [soil, agricultural]: 1.79649e-7 kg; = 1.0 * (p3657+p5305+p4275+p4687+p5099+p4069)
- Nitrogen solution; broadcast w/o incorp. in fert. after plant.; broadcast w/o incorp. in fert. after plant.; kg N: 0.000388382 kg; = p2951
- isobutene: 3.4174e-8 kg; = p2150*1.1666666667
- Potassium chloride; broadcast w/o incorp. in fert. in spr. bef. plant.: 0.00346857 kg; = p2897*2.2166666667
- Bromoxynil [soil, agricultural]: 1.65277e-6 kg; = 1.0 * (p4129+p3511+p4541+p3923+p4953+p5159)
- Diammonium phosphate; broadcast w/o incorp. in fert. in fall bef. plant.: 0.00192715 kg; = p2845*4.7142857143

## Sampling procedure
A delete-a-group jackknife is used by the USDA to estimate the ARMS sample means and RSEs, based on a 15 sample delete-a-group jackknife. Because of this relatively small sample size, a Students t distribution is used to represent ARMS data probability density functions. Other representations of uncertainty are described in Cooper, J.S., Kahn, E., Noon, M. (2012). LCA Digital Commons Unit Process Data: field crop production Version 1. Prepared for the US Department of Agriculture National Agricultural Library. Retrieved from https://www.lcacommons.gov/discovery/docs/LCA%20Digital%20Commons%20Unit%20Process%20Data%20final%20updated.pdf

## Extrapolations
Data represent an aggregation of processes applied in Illinois in 1999. Data development is demonstrated by parameterization (exlicitly presents all raw and uncertainty data and all calculations). Flow data quality according to the LCADC convention is provided for all flows.
