# durum wheat; at harvest in 2004; at farm; 88%-89% moisture

Dataset: EcoSpold 2, unit process
Geography: GLO
Time period: 2004-01-02 to 2005-01-01
Scenario: Business-as-Usual
System model: Allocation, ecoinvent default
Generated by: cooperjs@u.washington.edu
isCopyrightProtected: false

## General comment
This unit process/ gate-to-gate dataset represents the production of 1 kg durum wheat coproduced with residue. The process technologies are an aggregation of those applied in North Dakota in 2004. Applicable classifications include ISIC 0111, NAIC 111140, UNSPSC 50221101; this dataset was prepared in ILCD format using the UWDFE Lab Excel to ILCD File Generator (beta version, August 2013)

Exchange "NMVOC, non-methane volatile organic compounds, unspecified origin-air low population density" is the result of combining the following original LCA Commons flows: "NMVOCs; from residue burning; kg C, biogenic", "NMVOCs; from residue burning; kg except C, biogenic".
Exchange "Carbon-soil agricultural" is the result of combining the following original LCA Commons flows: "Carbon; applied in limestone", "Carbon; applied in sewage sludge", "Carbon; applied in dolomite", "Carbon; in below-ground residue; biogenic", "Carbon; in above-ground residue left on field; biogenic".
Exchange "Particulates, < 2.5 um-air low population density" is the result of combining the following original LCA Commons flows: "PM2.5; from residue burning; kg C, biogenic", "PM2.5; from residue burning; kg except C, biogenic".
Exchange "Ash-soil agricultural" is the result of combining the following original LCA Commons flows: "Ash; from residue burning; kg C, biogenic", "Ash; from residue burning; kg except C, biogenic".
Exchange "Water-soil agricultural" is the result of combining the following original LCA Commons flows: "Water; in above-ground residue left on field; biogenic", "Water; from irrigation and applied with manure and sewage sludge", "Water; in below-ground residue; biogenic".
Exchange "Particulates, < 10 um-air low population density" is the result of combining the following original LCA Commons flows: "PM10; from residue burning; kg C, biogenic", "PM10; from residue burning; kg except C, biogenic".
Exchange "Calcium-soil agricultural" is the result of combining the following original LCA Commons flows: "Calcium; applied in limestone", "Calcium; applied in dolomite".
Exchange "Dinitrogen monoxide-2bdf9967-6dae-4183-88d1-8f612548c51e low population density" was originally named: "Dinitrogen monoxide; from residue burning; kg N, biogenic" in this dataset.
Exchange "Glyphosate-be1c0329-f1a8-4524-8420-a86d2a8dd358 agricultural" was originally named: "Glyphosate; unspec. appl. method; kg AI" in this dataset.
Exchange "Clodinafop-propargyl-be1c0329-f1a8-4524-8420-a86d2a8dd358 agricultural" was originally named: "Clodinafop-propargyl; unspec. appl. method; kg AI" in this dataset.
Exchange "Occupation, arable-c19fb2d9-98eb-4cd3-8761-81b71d8a9a1b land" was originally named: "Occupation; arable, as wheat" in this dataset.
Exchange "Acetic acid-2bdf9967-6dae-4183-88d1-8f612548c51e low population density" was originally named: "Acetic acid; from residue burning; kg C, biogenic" in this dataset.
Exchange "2,4-D-be1c0329-f1a8-4524-8420-a86d2a8dd358 agricultural" was originally named: "2,4-D; unspec. appl. method; kg AI" in this dataset.
Exchange "Ammonia-2bdf9967-6dae-4183-88d1-8f612548c51e low population density" was originally named: "Ammonia; from residue burning; kg N, biogenic" in this dataset.
Exchange "Phosphorus-c19fb2d9-98eb-4cd3-8761-81b71d8a9a1b unspecified" was originally named: "Phosphorous; from plant uptake; biogenic" in this dataset.
Exchange "trans-2-Butene-2bdf9967-6dae-4183-88d1-8f612548c51e low population density" was originally named: "Trans 2 butene; from residue burning; kg C, biogenic" in this dataset.
Exchange "isopentane-2bdf9967-6dae-4183-88d1-8f612548c51e low population density" was originally named: "I pentane; from residue burning; kg C, biogenic" in this dataset.
Exchange "1-Butene-2bdf9967-6dae-4183-88d1-8f612548c51e low population density" was originally named: "1 butene; from residue burning; kg C, biogenic" in this dataset.
Exchange "Carbon dioxide, in air-2bdf9967-6dae-4183-88d1-8f612548c51e low population density" was originally named: "Carbon dioxide; from residue burning; kg C, biogenic" in this dataset.
Exchange "Water-2bdf9967-6dae-4183-88d1-8f612548c51e low population density" was originally named: "Water; from residue burning; biogenic" in this dataset.
Exchange "Trifluralin-be1c0329-f1a8-4524-8420-a86d2a8dd358 agricultural" was originally named: "Trifluralin; unspec. appl. method; kg AI" in this dataset.
Exchange "Sulfur dioxide-2bdf9967-6dae-4183-88d1-8f612548c51e low population density" was originally named: "Sulfur dioxide; from residue burning; biogenic" in this dataset.
Exchange "Methane-2bdf9967-6dae-4183-88d1-8f612548c51e low population density" was originally named: "Methane; from residue burning; kg C, biogenic" in this dataset.
Exchange "MCPA-be1c0329-f1a8-4524-8420-a86d2a8dd358 agricultural" was originally named: "MCPA; unspec. appl. method; kg AI" in this dataset.
Exchange "Hydrocyanic acid-2bdf9967-6dae-4183-88d1-8f612548c51e low population density" was originally named: "Hydrogen cyanide; from residue burning; kg C, biogenic" in this dataset.
Exchange "Formaldehyde-2bdf9967-6dae-4183-88d1-8f612548c51e low population density" was originally named: "Formaldehyde; from residue burning; kg C, biogenic" in this dataset.
Exchange "Furan-2bdf9967-6dae-4183-88d1-8f612548c51e low population density" was originally named: "Furan; from residue burning; kg C, biogenic" in this dataset.
Exchange "Acetonitrile-2bdf9967-6dae-4183-88d1-8f612548c51e low population density" was originally named: "Acetonitrile; from residue burning; kg C, biogenic" in this dataset.
Exchange "Acetaldehyde-2bdf9967-6dae-4183-88d1-8f612548c51e low population density" was originally named: "Acetaldehyde; from residue burning; kg C, biogenic" in this dataset.
Exchange "Phenol-2bdf9967-6dae-4183-88d1-8f612548c51e low population density" was originally named: "Phenol; from residue burning; kg C, biogenic" in this dataset.
Exchange "Butadiene-2bdf9967-6dae-4183-88d1-8f612548c51e low population density" was originally named: "1,3 butadiene; from residue burning; kg C, biogenic" in this dataset.
Exchange "Magnesium-be1c0329-f1a8-4524-8420-a86d2a8dd358 agricultural" was originally named: "Magnesium; applied in dolomite" in this dataset.
Exchange "Sulfuric acid-be1c0329-f1a8-4524-8420-a86d2a8dd358 agricultural" was originally named: "Sulfuric acid; as secondary application" in this dataset.
Exchange "Toluene-2bdf9967-6dae-4183-88d1-8f612548c51e low population density" was originally named: "Toluene; from residue burning; kg C, biogenic" in this dataset.
Exchange "Tribenuron-methyl-be1c0329-f1a8-4524-8420-a86d2a8dd358 agricultural" was originally named: "Tribenuron-methyl; unspec. appl. method; kg AI" in this dataset.
Exchange "Bromoxynil octanoate-be1c0329-f1a8-4524-8420-a86d2a8dd358 unspecified" was originally named: "Bromoxynil octanoate; unspec. appl. method; kg AI" in this dataset.
Exchange "Formic acid-2bdf9967-6dae-4183-88d1-8f612548c51e low population density" was originally named: "Formic acid; from residue burning; kg C, biogenic" in this dataset.
Exchange "Fluroxypyr-be1c0329-f1a8-4524-8420-a86d2a8dd358 agricultural" was originally named: "Fluroxypyr; unspec. appl. method; kg AI" in this dataset.
Exchange "Sulfur-be1c0329-f1a8-4524-8420-a86d2a8dd358 agricultural" was originally named: "Sulfur; as secondary application" in this dataset.
Exchange "isobutene-2bdf9967-6dae-4183-88d1-8f612548c51e low population density" was originally named: "I butene; from residue burning; kg C, biogenic" in this dataset.
Exchange "Acetone-2bdf9967-6dae-4183-88d1-8f612548c51e low population density" was originally named: "Acetone; from residue burning; kg C, biogenic" in this dataset.
Exchange "Ethane-2bdf9967-6dae-4183-88d1-8f612548c51e low population density" was originally named: "Ethane; from residue burning; kg C, biogenic" in this dataset.
Exchange "Carbon dioxide-c19fb2d9-98eb-4cd3-8761-81b71d8a9a1b unspecified" was originally named: "Carbon dioxide; from plant uptake; kg C, biogenic" in this dataset.
Exchange "Methanol-2bdf9967-6dae-4183-88d1-8f612548c51e low population density" was originally named: "Methanol; from residue burning; kg C, biogenic" in this dataset.
Exchange "Transformation, to arable-c19fb2d9-98eb-4cd3-8761-81b71d8a9a1b land" was originally named: "Transformation; to arable, to wheat" in this dataset.
Exchange "Benzene-2bdf9967-6dae-4183-88d1-8f612548c51e low population density" was originally named: "Benzene; from residue burning; kg C, biogenic" in this dataset.
Exchange "Isoprene-2bdf9967-6dae-4183-88d1-8f612548c51e low population density" was originally named: "Isoprene; from residue burning; kg C, biogenic" in this dataset.
Exchange "Propane-2bdf9967-6dae-4183-88d1-8f612548c51e low population density" was originally named: "Propane; from residue burning; kg C, biogenic" in this dataset.
Exchange "Bromoxynil-be1c0329-f1a8-4524-8420-a86d2a8dd358 agricultural" was originally named: "Bromoxynil; unspec. appl. method; kg AI" in this dataset.
Exchange "Propene-2bdf9967-6dae-4183-88d1-8f612548c51e low population density" was originally named: "Propylene; from residue burning; kg C, biogenic" in this dataset.
Exchange "Nitrogen dioxide-2bdf9967-6dae-4183-88d1-8f612548c51e low population density" was originally named: "Nitrogen dioxide; from residue burning; kg N, biogenic" in this dataset.
Exchange "Zinc compounds-be1c0329-f1a8-4524-8420-a86d2a8dd358 agricultural" was originally named: "Zinc compounds; as secondary application" in this dataset.
Exchange "Pesticides, unspecified-be1c0329-f1a8-4524-8420-a86d2a8dd358 agricultural" was originally named: "Unspecified pesticide; unspec. appl. method; kg AI" in this dataset.
Exchange "Water, unspecified origin-c19fb2d9-98eb-4cd3-8761-81b71d8a9a1b in water" was originally named: "Water; from plant uptake; biogenic" in this dataset.
Exchange "Ethyne-2bdf9967-6dae-4183-88d1-8f612548c51e low population density" was originally named: "Acetylene; from residue burning; kg C, biogenic" in this dataset.
Exchange "Acrylonitrile-2bdf9967-6dae-4183-88d1-8f612548c51e low population density" was originally named: "Propenenitrile; from residue burning; kg C, biogenic" in this dataset.
Exchange "Dicamba-be1c0329-f1a8-4524-8420-a86d2a8dd358 agricultural" was originally named: "Dicamba; unspec. appl. method; kg AI" in this dataset.
Exchange "Butane-2bdf9967-6dae-4183-88d1-8f612548c51e low population density" was originally named: "N butane; from residue burning; kg C, biogenic" in this dataset.
Exchange "Starane-be1c0329-f1a8-4524-8420-a86d2a8dd358 agricultural" was originally named: "Fluroxypyr-meptyl; unspec. appl. method; kg AI" in this dataset.
Exchange "Carbon monoxide, fossil-2bdf9967-6dae-4183-88d1-8f612548c51e low population density" was originally named: "Carbon monoxide; from residue burning; kg C, biogenic" in this dataset.
Exchange "Flucarbazone sodium salt-be1c0329-f1a8-4524-8420-a86d2a8dd358 agricultural" was originally named: "Flucarbazone-sodium; unspec. appl. method; kg AI" in this dataset.
Exchange "Pentane-2bdf9967-6dae-4183-88d1-8f612548c51e low population density" was originally named: "N pentane; from residue burning; kg C, biogenic" in this dataset.
Exchange "Transformation, from arable-c19fb2d9-98eb-4cd3-8761-81b71d8a9a1b land" was originally named: "Transformation; from arable, from unspec. use to wheat" in this dataset.
Exchange "cis-2-Butene-2bdf9967-6dae-4183-88d1-8f612548c51e low population density" was originally named: "Cis 2 butene; from residue burning; kg C, biogenic" in this dataset.
Exchange "Ethene-2bdf9967-6dae-4183-88d1-8f612548c51e low population density" was originally named: "Ethylene; from residue burning; kg C, biogenic" in this dataset.

## Geography
The unit process is assumed to represent production in North Dakota (US State).

## Technology
This process produces durum wheat; at harvest in 2004; at farm; 88%-89% moisture. The process is assumed to represent production in North Dakota (US State). Yields and related inputs and outputs represent a single year of operation, in 2004. This dataset includes consideration of residue burning; soil preparation; planting or sowing; irrigation; application, storage, and transport of fertilizers, manures, liming materials, secondary materials, and pesticides; and harvest. Fate and transport of applications are not included as described in Cooper, J.S., Kahn, E., Noon, M. (2012) LCA Digital Commons Unit Process Data: field crop production Version 1 which is available at https://www.lcacommons.gov/discovery/docs/LCA%20Digital%20Commons%20Unit%20Process%20Data%20final%20updated.pdf

## Time period
Start and end dates match the underlying data obtained from the USDA Agricultural Resource Management Survey (ARMS).
## Parameters
- p2515: 0.000470777; = p2319*p1014
- p2662: 0; = p2271*(p1078+p1080)
- p3154: 0; = p2373*p1023
- p2261: 0; = p2226*p2207
- p0978: 1.75e6; = p0801
- p1189: 0.00049284; = p0801*p0001/(p0818*p0002)
- p3017: 0; = p2431*(p1129+p1131)
- p2511: 0.00306965; = p2315*p1014
- p0975: 0; = p0973*p0974/p0818
- p1792: 0
- p1552: 0
- p2449: 1.44958e-6; = p2253*p1014
- p3034: 0; = p2253*p1023
- p2116: 0.444424
- p1188: 317.351; = p1187*p0801
- p2203: 0.00586556; = p1070-p2200-p2201-p2202
- p2664: 0; = p2273*(p1128+p1130)
- p3041: 0; = p2260*p1082
- p3442: 0; = p3366*p1240
- p1934: 0
- p1945: 0
- p0239: 10.123
- p4616: 0; = p1855*p3481
- p1867: 0
- p3295: 0
- p1309: 0
- p2450: 0.000383738; = p2254*p1014
- p0243: 6.744
- p2088: 0.798875
- p1433: 1
- p2478: 0.0011741; = p2282*p1014
- p1756: 0
- p2068: 0.153529
- p2684: 0.00046914; = p2293*(p1019+p1021)
- p2578: 0; = p2382*p1073
- p4925: 0; = p1962*p3482
- p0444: 0; = SQRT(2)*(IF((2*p0312-1)<0;-1;IF((2*p0312-1)>0;1;0))*SQRT(SQRT((2/(pi()*0.140012289)+LN(1-(2*p0312-1)^2)/2)^2-LN(1-(2*p0312-1)^2)/0.140012289)-(2/(pi()*0.140012289)+LN(1-(2*p0312-1)^2)/2)))
- p4401: 0; = p1846*p3480
- p1974: 0; = p1969*p0001/(p0818*p0002)
- p1660: 0
- p3321: 0; = if(and(p1232=0;p3253<>0);IF((p3317+p3318+p3319+p3320)+(p3253*(p3261*(1-p3277))/p3316)>p3253;p3253-(p3317+p3318+p3319+p3320);p3253*(p3261*(1-p3277))/p3316);0)
- p1654: 0
- p3302: 0; = if(and(p1232=0;p3252<>0);p3258*(p3278*(p3282*p1256+p3286*(p1253+p1257)+p1258*p3288+p3297*p3287));0)
- p1713: 0
- p3212: 0; = p2431*p1132
- p1679: 0
- p1920: 0
- p3330: 0; = if(and(p1232=0;p3255<>0);p3255*(p3267-p3325)/p3327;0)
- p0516: 0; = SQRT(2)*(IF((2*p0384-1)<0;-1;IF((2*p0384-1)>0;1;0))*SQRT(SQRT((2/(pi()*0.140012289)+LN(1-(2*p0384-1)^2)/2)^2-LN(1-(2*p0384-1)^2)/0.140012289)-(2/(pi()*0.140012289)+LN(1-(2*p0384-1)^2)/2)))
- p1257: 0; = if(p1232>0;0;IF(p1253+p1256=1;0;IF(p1253+p1256+p1255>1;1-(p1253+p1256);p1255)))
- p0779: 0
- p2348: 7.62608e-5; = p2228*p2216
- p1857: 0
- p2720: 3.62545e-7; = p2329*(p1019+p1021)
- p2483: 0.00417857; = p2287*p1014
- p2646: 2.41193e-5; = p2255*(p1019+p1021)
- p4402: 0; = p1847*p3480
- p3128: 5.03324e-5; = p2347*p1082
- p2193: 0.0108277; = p1054/p0818
- p0682: 0
- p1698: 0
- p0974: 0
- p4808: 0; = p1841*p3482
- p1103: 0.564594; = IF(p1071=0;IF(p1096+p1101+p1102=1;0;IF(p1096+p1101+p1102+p1099>1;1-(p1096+p1101+p1102);p1099));0)
- p2442: 1.11083e-5; = p2246*p1014
- p2107: 0.881623
- p1207: 131.942; = if(p1193>0;0;(p1194*p1050/p1057+p1195*p1051/p1058+p1196*p1052/p1059+p1197*p1053/p1060+p1198*p1054/p1061+p1199*p1055/p1062+p1200*p1056/p1063)/(p0702*1000)+(p1201*p1109/p1114+p1202*p1110/p1115)/(p0702*1000)+p1203*p1170/p0801+p1204*p1176/p0801)
- p2195: 0.00232105; = p2194*p2193
- p5252: 7.92298e-5; = p1873*p3484
- p0901: 0.02432
- p2381: 0; = p2229*p2210
- p2243: 0.000196344; = p2222*p2188
- p1717: 0
- p3341: 0; = if(and(p1232=0;p3254<>0);p3254*(p3271-p3336)/p3338;0)
- p2689: 0; = p2298*(p1078+p1080)
- p2207: 0.00555443; = p1119-p2205-p2204-p2206
- p1060: 0.21
- p0899: 2.88722e9; = p0825*p0896+(p0830+p0895)*p0824*p0898
- p2935: 0; = p2349*(p1079+p1081)
- p2673: 0.000172131; = p2282*(p1019+p1021)
- p0884: 0; = IF(p0689=100;0;IF(p0689+p0688>100;100-p0689;p0688))
- p3186: 0; = p2405*p1023
- p0668: 0; = IF(p0404<0.5;-SQRT(p0007*EXP(p0536^2*p0008)-p0007);SQRT(p0007*EXP(p0536^2*p0008)-p0007))
- p3217: 0.00227933; = p3213*p1228
- p2863: 0.000226286; = p2277*(p1020+p1022)
- p0104: 94.213
- p1269: 0
- p1110: 4.90138e6; = IF(p1071=0;p1105*p1104*p1095;0)
- p2521: 0.000553418; = p2325*p1014
- p2338: 0.000668973; = p2228*p2206
- p1576: 0.47191
- p2864: 3.61255e-5; = p2278*(p1020+p1022)
- p2739: 3.09542e-6; = p2348*(p1078+p1080)
- p2513: 0.000107573; = p2317*p1014
- p3169: 0; = p2388*p1082
- p0856: 1.75e6; = p0801
- p2806: 0; = p2415*(p1078+p1080)
- p3056: 0; = p2275*p1132
- p4775: 0; = p1808*p3482
- p0346: 0.5
- p1145: 1.2925e6; = if(p1121=0;p0799*p0702*1000*p0800/100;0)
- p1967: 0; = if(p0807=480;p0802*p0810;0)
- p1751: 0.791173
- p2480: 0.000368357; = p2284*p1014
- p4813: 0; = p1846*p3482
- p1002: 0; = p0996*p0888
- p2075: 0.072
- p2821: 0; = p2430*(p1128+p1130)
- p2708: 1.57709e-5; = p2317*(p1019+p1021)
- p0818: 3.168e9; = p0806*p0807
- p0442: 0; = SQRT(2)*(IF((2*p0310-1)<0;-1;IF((2*p0310-1)>0;1;0))*SQRT(SQRT((2/(pi()*0.140012289)+LN(1-(2*p0310-1)^2)/2)^2-LN(1-(2*p0310-1)^2)/0.140012289)-(2/(pi()*0.140012289)+LN(1-(2*p0310-1)^2)/2)))
- p0452: 0; = SQRT(2)*(IF((2*p0320-1)<0;-1;IF((2*p0320-1)>0;1;0))*SQRT(SQRT((2/(pi()*0.140012289)+LN(1-(2*p0320-1)^2)/2)^2-LN(1-(2*p0320-1)^2)/0.140012289)-(2/(pi()*0.140012289)+LN(1-(2*p0320-1)^2)/2)))
- p1897: 0
- p2204: 0.00228415; = p1109/p0818
- p3951: 0; = p1808*p3478
- p3061: 0; = p2280*p1023
- p3113: 0; = p2332*p1023
- p4814: 0; = p1847*p3482
- p0082: 96.511
- p4157: 0; = p1808*p3479
- p1038: 0.0115234
- p3025: 0; = p2244*p1023
- p0959: 0; = if(and(p0683>0;or(p0807=480;p0807=32;p0807=1;and(p0807=60;p0901<0.03)));p0935;0)
- p5226: 2.2096e-6; = p1847*p3484
- p1208: 0; = p1205*p0818*p0822/p0801
- p3001: 0; = p2415*(p1079+p1081)
- p1627: 0
- p2799: 0; = p2408*(p1019+p1021)
- p1154: 0.000724954; = if(p1152*p0818=0;0;p1150/(p1152*p0818))
- p4308: 0; = p1963*p3479
- p2630: 2.56179e-6; = p2239*(p1019+p1021)
- p0681: 0
- p0402: 0.5
- p1059: 0.335
- p2390: 0; = p2233*p2219
- p3417: 0; = p3379*p1238
- p0693: 0
- p1095: 2.93676e7; = IF(p1071=0;p0797*p0702*1000*p0798/100;0)
- p3203: 0; = p2422*p1082
- p2046: 10
- p3356: 0; = if(p1232=0;p3306+p3317+p3328+p3339+p3350;0)
- p3333: 0; = if(and(p1232=0;p3255<>0);p3255-(p3328+p3329+p3330+p3331+p3332);0)
- p2189: 0.0008339; = p1053/p0818
- p2416: 0; = p2235*p2206
- p3270: 0
- p0245: 10.273
- p0237: 20.545
- p1318: 0; = p1317*p0001/(p0818*p0002)
- p1839: 0
- p1852: 0
- p0928: 101572; = p0801*p0918
- p2043: 0.636483
- p3073: 0; = p2292*p1023
- p3155: 0; = p2374*p1023
- p2297: 0; = p2227*p2204
- p3300: 0; = if(p1293+p1294+p1295+p1296=0;0;p1293/(p1293+p1294+p1295+p1296))
- p2190: 0.000954507; = 32.065*p2189/(2*14.0067)
- p3194: 0; = p2413*p1023
- p3103: 0; = p2322*p1023
- p3042: 0; = p2261*p1082
- p1086: 0; = IF(p1071=0;p1080*(p0710/100)*p0703*1000;0)
- p4822: 0; = p1855*p3482
- p1439: 7
- p1741: 0
- p2318: 0.000516713; = p2224*p2185
- p1734: 0
- p2710: 6.90189e-5; = p2319*(p1019+p1021)
- p3696: 0; = p1759*p3477
- p3083: 0; = p2302*p1082
- p1998: 244
- p1569: 0
- p2560: 0; = p2364*p1014
- p1686: 0
- p2951: 0; = p2365*(p1020+p1022)
- p1855: 0.000110795; = p1447*1000/p0818
- p5019: 0; = p1846*p3483
- p2956: 0; = p2370*(p1020+p1022)
- p1580: 0
- p2158: 8.86661e-7; = p2015*p2082*p2120/(p0818*1000)
- p2946: 0; = p2360*(p1020+p1022)
- p1742: 0
- p1227: 0.00049284; = IF(p1221=0;0;p1226*p0001/(p0818*p0002))
- p5337: 8.35172e-6; = p1962*p3484
- p1160: 0.0593178; = (p1156+p1158)*p1159
- p3268: 0
- p2772: 0; = p2381*(p1078+p1080)
- p3014: 0; = p2428*(p1129+p1131)
- p2011: 0.0070419
- p1622: 0
- p2222: 0.064536; = if(p0765*p0769+p0766*p0770+p0767*p0771+p0768*p0772=0;0;p0769*p0765/(p0765*p0769+p0766*p0770+p0767*p0771+p0768*p0772))
- p1277: 0
- p2555: 0; = p2359*p1014
- p3195: 0; = p2414*p1082
- p3026: 0; = p2245*p1023
- p3342: 0; = if(and(p1232=0;p3254<>0);p3254*(p3272-p3337)/p3338;0)
- p2802: 0; = p2411*(p1019+p1021)
- p3130: 6.87585e-5; = p2349*p1082
- p1640: 0
- p2220: 3.77795e-5; = p1151/p0818
- p1648: 0
- p1197: 1.806
- p3286: 0
- p2357: 0; = p2225*p2185
- p2245: 6.16001e-5; = p2222*p2190
- p3466: 0; = p3371*p1241
- p1669: 0.523221
- p0998: 0; = if(p0888=0;0;if((p0699*p0698*1000*p0700/100)/p0888>1;1;(p0699*p0698*1000*p0700/100)/p0888))
- p2339: 0.00555443; = p2228*p2207
- p3347: 0; = if(and(p1232=0;p3256<>0);p3275*p3289;0)
- p3902: 0; = p1759*p3478
- p0608: 0; = IF(p0344<0.5;-SQRT(p0007*EXP(p0476^2*p0008)-p0007);SQRT(p0007*EXP(p0476^2*p0008)-p0007))
- p2898: 0; = p2312*(p1129+p1131)
- p3062: 0; = p2281*p1023
- p0784: 0
- p1465: 251
- p2298: 0; = p2227*p2205
- p2278: 0.000203203; = p2223*p2184
- p2963: 0; = p2377*(p1079+p1081)
- p1007: 0; = p1003*p0001*p0004/(p0818*p0002)
- p4222: 0; = p1873*p3479
- p1231: 0.0106924; = IF(p1221=0;0;p1230*(p1228+p1229))
- p4304: 0; = p1955*p3479
- p5214: 1.64141e-5; = p1835*p3484
- p4520: 0; = p1759*p3481
- p3461: 0; = p3366*p1241
- p0883: 4.9284; = p0882*p0001*p0003/(p0818*p0002)
- p2226: 0; = if(p0774*p0778+p0775*p0779+p0776*p0780+p0777*p0781=0;0;p0778*p0774/(p0774*p0778+p0775*p0779+p0776*p0780+p0777*p0781))
- p1975: 0.00049284; = p1970*p0001/(p0818*p0002)
- p2519: 0.000271937; = p2323*p1014
- p2936: 0; = p2350*(p1129+p1131)
- p2253: 2.02147e-6; = p2222*p2199
- p2604: 0; = p2408*p1014
- p2740: 2.77426e-5; = p2349*(p1078+p1080)
- p5338: 0.000216246; = p1963*p3484
- p2533: 0.00177417; = p2337*p1073
- p1629: 0
- p3065: 0; = p2284*p1023
- p1902: 0
- p2251: 5.60172e-7; = p2222*p2197
- p2836: 0.000263238; = p2250*(p1020+p1022)
- p1019: 0.06376; = IF(p1012=0;IF(p1014=1;0;IF(p1014+p1015>1;1-p1014;p1015));0)
- p2287: 0.00582713; = p2223*p2193
- p1709: 0
- p2185: 0.00130057; = p1065-p2184
- p2215: 0.000500322; = p1117-p2214
- p0778: 0
- p0876: 0; = p0866*p0856
- p0993: 0; = p0989*p0001*p0004/(p0818*p0002)
- p3276: 0
- p2810: 0; = p2419*(p1078+p1080)
- p1230: 0.5
- p0796: 94.213; = p0136*(1+p0664*p0268/100)
- p1214: 0; = IF(p1213=0;0;p1213-1)
- p2981: 0; = p2395*(p1020+p1022)
- p2136: 3.47469e-6; = p2015*p2064*p2098/(p0818*1000)
- p0907: 0
- p0717: 0
- p3304: 0; = if(and(p1232=0;p3252<>0);p3260*p3289;0)
- p2423: 0; = p2235*p2213
- p3394: 0; = p3375*p1234
- p1584: 0
- p0849: 0
- p1614: 0
- p2058: 1.24412
- p3227: 0.000149469; = p3223*p1229
- p0802: 1.6e6
- p0653: 0; = IF(p0389<0.5;-SQRT(p0007*EXP(p0521^2*p0008)-p0007);SQRT(p0007*EXP(p0521^2*p0008)-p0007))
- p2178: 0.0445306; = (p0895*p0831/(1-p0831))/(p0818)
- p2944: 0; = p2358*(p1020+p1022)
- p2805: 0; = p2414*(p1078+p1080)
- p0532: 0; = SQRT(2)*(IF((2*p0400-1)<0;-1;IF((2*p0400-1)>0;1;0))*SQRT(SQRT((2/(pi()*0.140012289)+LN(1-(2*p0400-1)^2)/2)^2-LN(1-(2*p0400-1)^2)/0.140012289)-(2/(pi()*0.140012289)+LN(1-(2*p0400-1)^2)/2)))
- p2325: 0.000771755; = p2224*p2192
- p1351: 26
- p2912: 0.000764781; = p2326*(p1020+p1022)
- p0924: 0.317899; = IF(p0918+p0923=1;0;IF(p0918+p0923+p0920>1;1-(p0918+p0923);p0920))
- p2923: 0; = p2337*(p1079+p1081)
- p2500: 0; = p2304*p1073
- p2716: 8.11346e-5; = p2325*(p1019+p1021)
- p1923: 0
- p0724: 0
- p1964: 0.5
- p1372: 11
- p3080: 0; = p2299*p1082
- p2714: 3.98678e-5; = p2323*(p1019+p1021)
- p0942: 0; = if(and(p0683=0;p0948=0);p0936;0)
- p1120: 0.00650476; = IF(p1071=0;p1110/(p1115*p0818);0)
- p5132: 0; = p1963*p3483
- p3242: 3.39115e-8; = p3234*p1188*p3238/p0818
- p2549: 0; = p2353*p1123
- p2256: 3.30193e-5; = p2222*p2202
- p3133: 3.77795e-5; = p2352*p1132
- p1765: 0
- p0056: 6.809
- p2657: 0; = p2266*(p1078+p1080)
- p3294: 0
- p1785: 0
- p3222: 0.224242; = IF(p3216=0;0;p1223*40.078/100.0869)
- p3232: 7.88948e-8; = p1182/p0818
- p3028: 0; = p2247*p1023
- p1099: 0.564594
- p0138: 70.404
- p2575: 0; = p2379*p1073
- p2512: 0.000673825; = p2316*p1014
- p3989: 0; = p1846*p3478
- p2763: 0; = p2372*(p1019+p1021)
- p1771: 0
- p1948: 0
- p3436: 0; = p3379*p1239
- p1125: 0; = if(p1121=0;p0719/100;0)
- p3031: 0; = p2250*p1023
- p4719: 0; = p1962*p3481
- p2878: 2.99685e-6; = p2292*(p1020+p1022)
- p2868: 0.000291081; = p2282*(p1020+p1022)
- p2122: 0.341195
- p2699: 0; = p2308*(p1078+p1080)
- p3013: 0; = p2427*(p1079+p1081)
- p2845: 0; = p2259*(p1079+p1081)
- p0872: 0; = p0864*p0856
- p1598: 0
- p0282: 0.5
- p3385: 0; = p3366*p1234
- p2851: 0; = p2265*(p1079+p1081)
- p2585: 0; = p2389*p1123
- p2621: 0; = p2425*p1073
- p0795: 62.961; = p0135*(1+p0663*p0267/100)
- p2171: 0.0839921; = p2165*p0831
- p1620: 0
- p2989: 0; = p2403*(p1020+p1022)
- p2558: 0; = p2362*p1014
- p2322: 0.000331306; = p2224*p2189
- p1777: 0
- p3368: 0; = if(p1232=0;p3245*p3356/p0818;0)
- p1218: 0
- p1261: 0; = if(p1232>0;0;p0732/100)
- p2345: 5.75796e-5; = p2228*p2213
- p1624: 0
- p0505: 0; = SQRT(2)*(IF((2*p0373-1)<0;-1;IF((2*p0373-1)>0;1;0))*SQRT(SQRT((2/(pi()*0.140012289)+LN(1-(2*p0373-1)^2)/2)^2-LN(1-(2*p0373-1)^2)/0.140012289)-(2/(pi()*0.140012289)+LN(1-(2*p0373-1)^2)/2)))
- p2623: 0; = p2427*p1073
- p1918: 0
- p1947: 0
- p0923: 0.397131; = IF(p0918=1;0;IF(p0918+p0919>1;1-p0918;p0919))
- p3691: 0; = p1754*p3477
- p0776: 24.809; = p0116*(1+p0644*p0248/100)
- p2072: 0.134
- p2508: 0; = p2312*p1123
- p0909: 1.87596e7
- p1323: 0; = IF(((p0745*1000*p0750/100)+(p0754*1000*p0759/100))/p0801<0;0;((p0745*1000*p0750/100)+(p0754*1000*p0759/100))/p0801)
- p0930: 556324; = p0801*p0924
- p3324: 0; = if(and(p1232=0;p3255<>0);p3266*(p3279*(p3284*p1256+p3286*(p1253+p1257)+p1258*p3288+p3299*p3287));0)
- p1684: 0
- p1119: 0.0105734; = IF(p1071=0;p1109/(p1114*p0818);0)
- p3108: 0; = p2327*p1023
- p0125: 10.847
- p1302: 0; = IF(p1297+p1300+p1301=p1262;0;p1262-(p1297+p1300+p1301))
- p0573: 0; = IF(p0309<0.5;-SQRT(p0007*EXP(p0441^2*p0008)-p0007);SQRT(p0007*EXP(p0441^2*p0008)-p0007))
- p2167: 0.242667; = p2166*(p0898)
- p0412: 0; = SQRT(2)*(IF((2*p0280-1)<0;-1;IF((2*p0280-1)>0;1;0))*SQRT(SQRT((2/(pi()*0.140012289)+LN(1-(2*p0280-1)^2)/2)^2-LN(1-(2*p0280-1)^2)/0.140012289)-(2/(pi()*0.140012289)+LN(1-(2*p0280-1)^2)/2)))
- p2948: 0; = p2362*(p1020+p1022)
- p2627: 0; = p2431*p1123
- p0046: 6.376
- p2899: 0; = p2313*(p1129+p1131)
- p1310: 0; = IF(p1307=p1266;0;IF(p1307+p1308>p1266;p1266-p1307;p1308))
- p1997: 3.1947e6; = (if(p1152=0;0;p1150/p1152)+if(p1153=0;0;p1151/p1153))*(1+p1157)
- p2984: 0; = p2398*(p1020+p1022)
- p0707: 4.244; = p0047*(1+p0575*p0179/100)
- p2891: 0; = p2305*(p1079+p1081)
- p2524: 0.00653662; = p2328*p1014
- p0790: 0
- p1319: 0; = IF(((p0745*1000*p0746/100)+(p0754*1000*p0755/100))/p0801<0;0;((p0745*1000*p0746/100)+(p0754*1000*p0755/100))/p0801)
- p2364: 0; = p2225*p2192
- p0177: 8.231
- p0137: 23.836
- p2665: 0; = p2274*(p1128+p1130)
- p0741: 0.713; = p0081*(1+p0609*p0213/100)
- p1632: 0
- p1547: 56
- p2074: 0.025
- p1209: 37.4677; = p1206*p0818*p0822/p0801
- p0103: 1750
- p2180: 6.0499e-8; = p3233*p1188/(p0818)
- p0050: 70.404
- p3288: 0
- p0751: 0
- p3998: 0; = p1855*p3478
- p2962: 0; = p2376*(p1079+p1081)
- p2494: 0; = p2298*p1073
- p0370: 0.5
- p1950: 3.15657e-7; = p1542*1000/p0818
- p2764: 0; = p2373*(p1019+p1021)
- p2840: 9.51359e-5; = p2254*(p1020+p1022)
- p2609: 0; = p2413*p1014
- p3357: 0; = if(p1232=0;p3307+p3318+p3329+p3340+p3351;0)
- p2096: 0.486404
- p2406: 0; = p2234*p2196
- p1573: 0
- p2029: 4.03
- p2314: 0; = p2231*p2221
- p0927: 0.0618354; = IF(p0918+p0923+p0924+p0925+p0926=1;0;1-(p0918+p0923+p0924+p0925+p0926))
- p1783: 0
- p2539: 0.00339736; = p2343*p1073
- p2415: 0; = p2235*p2205
- p0719: 0
- p2054: 0.91
- p0915: 0.0177621; = p0914/p0818
- p3213: 0.112803; = p1222*12.0107/100.0869
- p2750: 0; = p2359*(p1019+p1021)
- p2014: 2.20128e7; = p0833*p2011*p2013
- p2563: 0; = p2367*p1014
- p0820: 0; = if(p0807=480;p0814;0)
- p1999: 6.7755e7; = (p1228+p1229)*p0818+p1164
- p2228: 1; = if(p0774*p0778+p0775*p0779+p0776*p0780+p0777*p0781=0;0;p0780*p0776/(p0774*p0778+p0775*p0779+p0776*p0780+p0777*p0781))
- p3310: 0; = if(and(p1232=0;p3252<>0);IF((p3306+p3307+p3308+p3309)+(p3252*(p3257*(1-p3277))/p3305)>p3252;p3252-(p3306+p3307+p3308+p3309);p3252*(p3257*(1-p3277))/p3305);0)
- p2528: 0.00236238; = p2332*p1014
- p0309: 0.5
- p2676: 1.35805e-5; = p2285*(p1019+p1021)
- p2084: 0.21
- p2194: 0.214362
- p1963: 0.000216246; = p1963a+p1963b+p1963c+p1963d+p1963e+p1963f+p1963g+p1963h+p1963i+p1963j+p1963k
- p3772: 0; = p1835*p3477
- p1841: 3.15657e-7; = p1433*1000/p0818
- p0929: 694980; = p0801*p0923
- p2270: 0; = p2226*p2216
- p2141: 1.04285e-6; = p2015*p2069*p2103/(p0818*1000)
- p1142: 0; = if(p1121=0;p1136*p0001/(p0818*p0002);0)
- p0815: 0
- p3476: 0; = if(p1328+p1330+p1332+p1334+p1336+p1338+p1340+p1342+p1344=0;0;p1328/(p1328+p1330+p1332+p1334+p1336+p1338+p1340+p1342+p1344))
- p2729: 2.71536e-5; = p2338*(p1078+p1080)
- p3181: 0; = p2400*p1023
- p2514: 0.00037053; = p2318*p1014
- p1247: 0; = if(p1232>0;0;p1242*p0001/(p0818*p0002))
- p2686: 2.89473e-5; = p2295*(p1019+p1021)
- p3020: 0; = p2239*p1023
- p2098: 0.856281
- p2212: 5.50641e-6; = p1106/p0818
- p0787: 0
- p4314: 0; = p1759*p3480
- p0650: 0; = IF(p0386<0.5;-SQRT(p0007*EXP(p0518^2*p0008)-p0007);SQRT(p0007*EXP(p0518^2*p0008)-p0007))
- p1919: 0
- p1882: 0
- p2590: 0; = p2394*p1014
- p0343: 0.5
- p2530: 0.000145766; = p2334*p1014
- p0819: 0; = p0808*p0809/p0818
- p1317: 0
- p2838: 1.63457e-7; = p2252*(p1020+p1022)
- p2367: 0; = p2225*p2196
- p0179: 41.987
- p2978: 0; = p2392*(p1129+p1131)
- p2654: 0; = p2263*(p1078+p1080)
- p4309: 0; = p1754*p3480
- p3282: 0
- p4513: 0; = p1962*p3480
- p3136: 0; = p2355*p1023
- p3120: 0.000558776; = p2339*p1082
- p2120: 0.51828
- p3184: 0; = p2403*p1023
- p4363: 0; = p1808*p3480
- p2931: 0; = p2345*(p1079+p1081)
- p2115: 0.856281
- p3339: 0; = if(and(p1232=0;p3254<>0);p3254*(p3269*p3277-p3334)/p3338;0)
- p2271: 0; = p2226*p2217
- p2726: 0.000244992; = p2335*(p1019+p1021)
- p1738: 0
- p3422: 0; = p3365*p1239
- p1574: 0
- p3086: 0; = p2305*p1082
- p2351: 0.000424045; = p2232*p2219
- p0139: 10.847
- p1914: 0
- p1301: 0; = IF(p1297+p1300=p1265;0;IF(p1297+p1300+p1299>p1265;p1265-(p1297+p1300);p1299))
- p3060: 0; = p2279*p1023
- p1634: 0
- p2471: 0; = p2275*p1123
- p2165: 0.613081; = (p0833-p2014)/p0818-p0839
- p0774: 0
- p2018: 0.1978
- p1314: 0; = p1310*p1252/p0818
- p1427: 52
- p0313: 0.5
- p2331: 1.24446e-5; = p2224*p2199
- p4299: 0; = p1950*p3479
- p2285: 0.000129178; = p2223*p2191
- p5028: 0; = p1855*p3483
- p0578: 0; = IF(p0314<0.5;-SQRT(p0007*EXP(p0446^2*p0008)-p0007);SQRT(p0007*EXP(p0446^2*p0008)-p0007))
- p1205: 0
- p2401: 0; = p2234*p2190
- p3148: 0; = p2367*p1023
- p0546: 0; = IF(p0282<0.5;-SQRT(p0007*EXP(p0414^2*p0008)-p0007);SQRT(p0007*EXP(p0414^2*p0008)-p0007))
- p1535: 4
- p0925: 0.165093; = IF(p0918+p0923+p0924=1;0;IF(p0918+p0923+p0924+p0921>1;1-(p0918+p0923+p0924);p0921))
- p1856: 0
- p3199: 0; = p2418*p1082
- p1736: 0
- p3440: 0; = p3364*p1240
- p0045: 71.709
- p0936: 0.000156673; = p0930*p0001/(p0818*p0002)
- p2886: 0; = p2300*(p1079+p1081)
- p2036: 2.18445e-5; = p2015*p2030*(1-p2032)/(p0818*1000)
- p1633: 0
- p0269: 6.024
- p4726: 0; = p1759*p3482
- p0765: 57.177; = p0105*(1+p0633*p0237/100)
- p2418: 0; = p2235*p2208
- p1152: 0.415074
- p1941: 0
- p4515: 0; = p1754*p3481
- p3254: 0; = p1252*(p1287*(1-p3247)+p1290*(1-p3248)+p1291*(1-p3249)+p1292*(1-p3250))
- p0817: 0
- p2504: 0; = p2308*p1073
- p2264: 0; = p2226*p2210
- p2303: 0; = p2227*p2210
- p0878: 0; = p0867*p0856
- p0386: 0.5
- p0711: 85.881; = p0051*(1+p0579*p0183/100)
- p2431: 0; = p2236*p2221
- p2614: 0; = p2418*p1073
- p1915: 0
- p2601: 0; = p2405*p1014
- p1216: 0
- p2880: 0.000340123; = p2294*(p1020+p1022)
- p2361: 0; = p2225*p2189
- p2824: 2.71358e-5; = p2238*(p1020+p1022)
- p2635: 5.65774e-6; = p2244*(p1019+p1021)
- p2715: 1.00257e-5; = p2324*(p1019+p1021)
- p0794: 0
- p3274: 0
- p3244: 0; = p0791/100
- p3364: 0; = if(p1232=0;p3244*p3358/p0818;0)
- p2085: 0.0335294
- p0310: 0.5
- p1697: 0
- p1100: 0.382423
- p2445: 0.000107414; = p2249*p1014
- p3183: 0; = p2402*p1023
- p1969: 0; = p0803
- p1667: 0
- p2028: 0.000141782; = p2015*p2026*p2027/(p0818*1000)
- p2200: 0.008292; = p1056/p0818
- p3106: 0; = p2325*p1023
- p0893: 0; = 1000*(p0890+p0892)*p0001*p0003*p0004/(p0818*p0002)
- p0181: 46.426
- p2206: 0.000668973; = 9*1.00794*p2204/30.973762
- p2979: 0; = p2393*(p1020+p1022)
- p2971: 0; = p2385*(p1079+p1081)
- p1252: 0; = if(p1232>0;0;p0724*2000*p0723*1000*p0725/100)
- p1586: 0
- p1224: 0.44; = IF(p1221=0;0;IF(p1193=0;1-p1223;0))
- p0241: 36.259
- p3071: 0; = p2290*p1023
- p0005: 1.60934
- p3200: 0; = p2419*p1082
- p2744: 0; = p2353*(p1128+p1130)
- p3435: 0; = p3378*p1239
- p1929: 0
- p2452: 2.36778e-5; = p2256*p1014
- p1312: 0; = IF(p1307+p1310+p1311=p1266;0;p1266-(p1307+p1310+p1311))
- p2602: 0; = p2406*p1014
- p1721: 0
- p0729: 0
- p2386: 0; = p2229*p2215
- p2996: 0; = p2410*(p1020+p1022)
- p1850: 0
- p2661: 0; = p2270*(p1078+p1080)
- p0254: 47.928
- p0576: 0; = IF(p0312<0.5;-SQRT(p0007*EXP(p0444^2*p0008)-p0007);SQRT(p0007*EXP(p0444^2*p0008)-p0007))
- p2459: 0; = p2263*p1073
- p0761: 0
- p3090: 0; = p2309*p1082
- p3082: 0; = p2301*p1082
- p0663: 0; = IF(p0399<0.5;-SQRT(p0007*EXP(p0531^2*p0008)-p0007);SQRT(p0007*EXP(p0531^2*p0008)-p0007))
- p0195: 0
- p1447: 351
- p1057: 0.82
- p2608: 0; = p2412*p1014
- p3188: 0; = p2407*p1023
- p0808: 0
- p0638: 0; = IF(p0374<0.5;-SQRT(p0007*EXP(p0506^2*p0008)-p0007);SQRT(p0007*EXP(p0506^2*p0008)-p0007))
- p2852: 0; = p2266*(p1079+p1081)
- p2778: 0; = p2387*(p1078+p1080)
- p0889: 0; = 1000*p0888*p0001*p0003*p0004/(p0818*p0002)
- p1903: 0
- p1611: 0
- p2523: 0.000661264; = p2327*p1014
- p1212: 0.0183528; = if(p1211=0;0;if(p1193>0;0;(p1207+p1208+p1209)*p1210/(2000*p1211)))
- p2202: 0.000511641; = 4*1.00794*p2201/(2*14.0067)
- p0824: 0.863
- p1585: 0
- p1097: 0.0327715
- p2645: 5.62585e-5; = p2254*(p1019+p1021)
- p1109: 7.2362e6; = IF(p1071=0;p1105*p1103*p1095;0)
- p0416: 0; = SQRT(2)*(IF((2*p0284-1)<0;-1;IF((2*p0284-1)>0;1;0))*SQRT(SQRT((2/(pi()*0.140012289)+LN(1-(2*p0284-1)^2)/2)^2-LN(1-(2*p0284-1)^2)/0.140012289)-(2/(pi()*0.140012289)+LN(1-(2*p0284-1)^2)/2)))
- p1889: 0
- p3452: 0; = p3376*p1240
- p0772: 0
- p2531: 0.00167109; = p2335*p1014
- p0750: 0
- p1651: 0.299611
- p1346: 302
- p2265: 0; = p2226*p2211
- p3075: 0; = p2294*p1023
- p0273: 0.5
- p1711: 0
- p1073: 0.85881; = IF(p1071=0;p0711/100;0)
- p0584: 0; = IF(p0320<0.5;-SQRT(p0007*EXP(p0452^2*p0008)-p0007);SQRT(p0007*EXP(p0452^2*p0008)-p0007))
- p2656: 0; = p2265*(p1078+p1080)
- p0016: 556.324
- p3389: 0; = p3370*p1234
- p1177: 0.00049284; = p0801*p0001/(p0818*p0002)
- p1788: 0
- p3361: 0; = if(p1232=0;p3311+p3322+p3333+p3344+p3355;0)
- p2035: 1.29189e-5; = p2015*p2029*(1-p2031)/(p0818*1000)
- p3464: 0; = p3369*p1241
- p3119: 6.72987e-5; = p2338*p1082
- p0811: 0; = if(p0807=480;1-p0810;0)
- p2552: 0; = p2356*p1014
- p1933: 0
- p0211: 7.742
- p0885: 100; = IF(p0689+p0884=100;0;100-(p0689+p0884))
- p2012: 0.0102252
- p3451: 0; = p3375*p1240
- p2464: 0; = p2268*p1073
- p3719: 0; = p1782*p3477
- p1776: 0
- p0399: 0.5
- p3118: 0.000207824; = p2337*p1082
- p3340: 0; = if(and(p1232=0;p3254<>0);p3254*(p3270-p3335)/p3338;0)
- p3131: 0.00030091; = p2350*p1132
- p3323: 0; = if(and(p1232=0;p3255<>0);p3265*p3277*(p3299*p3291+(1-p3299)*p3295);0)
- p2100: 0.705744
- p1078: 0.04059; = IF(p1071=0;IF(p1073=1;0;IF(p1073+p1074>1;1-p1073;p1074));0)
- p2221: 6.5651e-5; = p1155-p2220
- p3095: 0; = p2314*p1132
- p3349: 0; = if(and(p1232=0;p3256<>0);1-(p3345+p3346+p3347+p3348);0)
- p1338: 0; = p1324*p0801
- p1779: 0
- p2707: 9.87871e-5; = p2316*(p1019+p1021)
- p2346: 0.000132582; = p2228*p2214
- p0683: 0
- p2233: 0; = if(p0783*p0787+p0784*p0788+p0785*p0789+p0786*p0790=0;0;p0790*p0786/(p0783*p0787+p0784*p0788+p0785*p0789+p0786*p0790))
- p2522: 0.00308481; = p2326*p1014
- p3371: 0; = if(p1232=0;p3245*p3359/p0818;0)
- p2368: 0; = p2225*p2197
- p1610: 0
- p2154: 7.60309e-7; = p2015*p2082*p2116/(p0818*1000)
- p0934: 2.8605e-5; = p0928*p0001/(p0818*p0002)
- p2150: 6.00762e-7; = p2015*p2078*p2112/(p0818*1000)
- p2628: 7.31018e-5; = p2237*(p1019+p1021)
- p0922: 0; = p0677*1000/p0801
- p1184: 7.88948e-8; = p1182/p0818
- p2792: 0; = p2401*(p1019+p1021)
- p2941: 0; = p2355*(p1020+p1022)
- p2151: 9.9825e-8; = p2015*p2079*p2113/(p0818*1000)
- p2170: 0.00637037; = p2166*(p0913)
- p3354: 0; = IF((p3350+p3351+p3352+p3353)+IF(p3349=0;0;(p3256*(p3273*(1-p3277))/p3349))>p3256;p3256-(p3350+p3351+p3352+p3353);IF(p3349=0;0;p3256*(p3273*(1-p3277))/p3349))
- p5175: 2.52525e-6; = p1796*p3484
- p3468: 0; = p3373*p1241
- p0122: 6.809
- p1265: 0; = if(p1232>0;0;IF(p1259+p1263+p1264=1;0;IF(p1259+p1263+p1264+p1262>1;1-(p1259+p1263+p1264);p1262)))
- p3019: 0; = p2238*p1023
- p1327: 1; = if(p1318=0;if(p1327a=0;1;if(p1327a<0;0;p1327a));0)
- p2827: 1.89588e-5; = p2241*(p1020+p1022)
- p2698: 0; = p2307*(p1078+p1080)
- p2474: 0.000145715; = p2278*p1014
- p2964: 0; = p2378*(p1079+p1081)
- p1035: 0; = IF(p1012=0;p1029*p0001/(p0818*p0002);0)
- p3261: 0
- p2876: 8.3046e-7; = p2290*(p1020+p1022)
- p3059: 0; = p2278*p1023
- p1556: 0
- p1344: 1.75e6; = IF(p1318=0;p1327*p0801;0)
- p1837: 0
- p2874: 0.000222067; = p2288*(p1020+p1022)
- p2387: 0; = p2229*p2216
- p3449: 0; = p3373*p1240
- p1979: 0; = p0973
- p0809: 0
- p3463: 0; = p3368*p1241
- p2972: 0; = p2386*(p1079+p1081)
- p0972: 0; = p0969/p0818
- p2453: 0.000271447; = p2257*p1014
- p0830: 3.17378e9; = p0825*p0821*p0824
- p3225: 0.000173199; = p3221*p1229
- p2732: 2.83984e-5; = p2341*(p1078+p1080)
- p2966: 0; = p2380*(p1079+p1081)
- p3428: 0; = p3371*p1239
- p3291: 0
- p3010: 0; = p2424*(p1079+p1081)
- p1767: 0
- p1555: 0.933291
- p0958: 0; = if(and(p0683>0;or(p0807=480;p0807=32;p0807=1;and(p0807=60;p0901<0.03)));p0934;0)
- p2784: 0; = p2393*(p1019+p1021)
- p2045: 30
- p2790: 0; = p2399*(p1019+p1021)
- p3400: 0; = p3362*p1238
- p0475: 0; = SQRT(2)*(IF((2*p0343-1)<0;-1;IF((2*p0343-1)>0;1;0))*SQRT(SQRT((2/(pi()*0.140012289)+LN(1-(2*p0343-1)^2)/2)^2-LN(1-(2*p0343-1)^2)/0.140012289)-(2/(pi()*0.140012289)+LN(1-(2*p0343-1)^2)/2)))
- p0019: 288.912
- p2468: 0; = p2272*p1123
- p2125: 7.47856e-6; = p2015*p2053*p2087/(p0818*1000)
- p1307: 0
- p3237: 0.854735
- p0948: 0.000156673; = if(and(p0683=0;or(p0807=480;p0807=32;p0807=1;and(p0807=60;p0901<0.03)));p0936;0)
- p1136: 0; = if(p1121=0;p1130*(p0716/100)*p0703*1000;0)
- p3292: 0
- p4969: 0; = p1796*p3483
- p2340: 0.00154715; = p2228*p2208
- p0414: 0; = SQRT(2)*(IF((2*p0282-1)<0;-1;IF((2*p0282-1)>0;1;0))*SQRT(SQRT((2/(pi()*0.140012289)+LN(1-(2*p0282-1)^2)/2)^2-LN(1-(2*p0282-1)^2)/0.140012289)-(2/(pi()*0.140012289)+LN(1-(2*p0282-1)^2)/2)))
- p3187: 0; = p2406*p1023
- p0544: 0; = IF(p0280<0.5;-SQRT(p0007*EXP(p0412^2*p0008)-p0007);SQRT(p0007*EXP(p0412^2*p0008)-p0007))
- p3245: 0; = IF(p3244=1;0;if(p3244+p0792/100>1;1-p3244;p0792/100))
- p3218: 0.00760579; = p3214*p1228
- p2594: 0; = p2398*p1014
- p1615: 0
- p1676: 0
- p0140: 6.809
- p1958: 1183
- p2455: 0; = p2259*p1073
- p0940: 0; = if(and(p0683=0;p0946=0);p0934;0)
- p2444: 0.000501088; = p2248*p1014
- p1274: 0; = p1270*p1252/p0818
- p1789: 0
- p4307: 0; = p1962*p3479
- p2021: 0.00015544; = p2020/p0818
- p1885: 0
- p0894: 0.28
- p2111: 0.856281
- p3336: 0; = IF(or(p3254=0;p1232>0);0;p3271*p3289)
- p3161: 0; = p2380*p1082
- p2216: 7.62608e-5; = p1108/p0818
- p2977: 0; = p2391*(p1129+p1131)
- p2853: 0; = p2267*(p1079+p1081)
- p2466: 0; = p2270*p1073
- p2861: 0; = p2275*(p1129+p1131)
- p2097: 0.40001
- p1020: 0.04244; = IF(p1012=0;IF(p1014+p1019=1;0;IF(p1014+p1019+p1016>1;1-(p1014+p1019);p1016));0)
- p1008: 0; = p1004*p0001*p0004/(p0818*p0002)
- p3459: 0; = p3364*p1241
- p3104: 0; = p2323*p1023
- p2398: 0; = p2234*p2187
- p2565: 0; = p2369*p1014
- p0637: 0; = IF(p0373<0.5;-SQRT(p0007*EXP(p0505^2*p0008)-p0007);SQRT(p0007*EXP(p0505^2*p0008)-p0007))
- p1888: 0
- p1260: 0; = if(p1232>0;0;p0731/100)
- p0633: 0; = IF(p0369<0.5;-SQRT(p0007*EXP(p0501^2*p0008)-p0007);SQRT(p0007*EXP(p0501^2*p0008)-p0007))
- p3129: 7.67183e-6; = p2348*p1082
- p1625: 0
- p2425: 0; = p2235*p2215
- p2777: 0; = p2386*(p1078+p1080)
- p3458: 0; = p3363*p1241
- p1004: 0; = p1000*p0888
- p1295: 0; = p1291*p1252/p0818
- p1090: 1.40839e-5; = IF(p1071=0;p1084*p0001/(p0818*p0002);0)
- p3293: 0
- p2599: 0; = p2403*p1014
- p1251: 0; = if(p1232>0;0;p1246*p0001/(p0818*p0002))
- p0938: 0; = p0932*p0001/(p0818*p0002)
- p1235: 0; = if(p1232>0;0;p0727/100)
- p1169: 0.000945116
- p2342: 0.000302082; = p2228*p2210
- p1917: 0
- p2063: 2.01468
- p3482: 0; = if(p1328+p1330+p1332+p1334+p1336+p1338+p1340+p1342+p1344=0;0;p1340/(p1328+p1330+p1332+p1334+p1336+p1338+p1340+p1342+p1344))
- p1846: 4.73485e-6; = p1438*1000/p0818
- p2179: 0; = p0970+p0971+p0972
- p3256: 0; = p1252*(p1307*(1-p3247)+p1310*(1-p3248)+p1311*(1-p3249)+p1312*(1-p3250))
- p2841: 4.0787e-5; = p2255*(p1020+p1022)
- p1643: 0.801155
- p3374: 0; = if(p1232=0;p3246*p3356/p0818;0)
- p1799: 0
- p3164: 0; = p2383*p1082
- p2321: 0.00120874; = p2224*p2188
- p1000: 0; = IF(p0996+p0999=1;0;IF(p0996+p0999+p0998>1;1-(p0996+p0999);p0998))
- p3299: 0; = if(p1303+p1304+p1305+p1306=0;0;p1303/(p1303+p1304+p1305+p1306))
- p1559: 0
- p1051: 1.19619e6; = IF(p1012=0;p1044*p1036;0)
- p3226: 0.000264253; = p3222*p1229
- p3450: 0; = p3374*p1240
- p2999: 0; = p2413*(p1020+p1022)
- p2667: 0.000609596; = p2276*(p1019+p1021)
- p1866: 0
- p2044: 2.67168e-7; = p2015*p2042*p2043/(p0818*1000)
- p2392: 0; = p2233*p2221
- p1270: 0; = IF(p1267=p1259;0;IF(p1267+p1268>p1259;p1259-p1267;p1268))
- p1070: 0.0182242; = IF(p1012=0;p1056/(p1063*p0818);0)
- p1699: 0
- p0547: 0; = IF(p0283<0.5;-SQRT(p0007*EXP(p0415^2*p0008)-p0007);SQRT(p0007*EXP(p0415^2*p0008)-p0007))
- p2793: 0; = p2402*(p1019+p1021)
- p1245: 0; = if(p1232>0;0;p1240*(p0725/100)*p0723*1000)
- p1199: -0.29
- p1965: 0.000407133; = p1963+p1959*p1964*1000/p0818
- p2631: 8.82393e-6; = p2240*(p1019+p1021)
- p2227: 0; = if(p0774*p0778+p0775*p0779+p0776*p0780+p0777*p0781=0;0;p0779*p0775/(p0774*p0778+p0775*p0779+p0776*p0780+p0777*p0781))
- p1275: 0; = p1271*p1252/p0818
- p0969: 0
- p1331: 0; = p1330*p0001/(p0818*p0002)
- p1762: 0
- p0443: 0; = SQRT(2)*(IF((2*p0311-1)<0;-1;IF((2*p0311-1)>0;1;0))*SQRT(SQRT((2/(pi()*0.140012289)+LN(1-(2*p0311-1)^2)/2)^2-LN(1-(2*p0311-1)^2)/0.140012289)-(2/(pi()*0.140012289)+LN(1-(2*p0311-1)^2)/2)))
- p0890: 0; = p0686*1000*p0687*p0885/100
- p2882: 0.000561189; = p2296*(p1020+p1022)
- p0825: 2.79312e9; = p0818*p0822
- p0673: 0
- p0957: 0; = if(and(p0683>0;or(p0807=56;p0807=100;and(p0807=60;p0901>0.06)));p0939;0)
- p1165: 0.00049284; = p0801*p0001/(p0818*p0002)
- p0052: 4.059
- p1607: 0
- p2527: 8.9239e-6; = p2331*p1014
- p0609: 0; = IF(p0345<0.5;-SQRT(p0007*EXP(p0477^2*p0008)-p0007);SQRT(p0007*EXP(p0477^2*p0008)-p0007))
- p3430: 0; = p3373*p1239
- p1930: 0
- p1324: 0; = IF(((p0745*1000*p0751/100)+(p0754*1000*p0760/100))/p0801<0;0;((p0745*1000*p0751/100)+(p0754*1000*p0760/100))/p0801)
- p2728: 8.38525e-5; = p2337*(p1078+p1080)
- p1594: 0
- p1062: 0.16
- p2789: 0; = p2398*(p1019+p1021)
- p2893: 0; = p2307*(p1079+p1081)
- p2300: 0; = p2227*p2207
- p2751: 0; = p2360*(p1019+p1021)
- p0935: 0.000195722; = p0929*p0001/(p0818*p0002)
- p2465: 0; = p2269*p1073
- p2457: 0; = p2261*p1073
- p2489: 0.0032; = p2293*p1014
- p2375: 0; = p2229*p2204
- p1193: 0; = IF(OR(p1036=0;p1095=0);0.0001*p0857;0)
- p0913: 0.0120403
- p2831: 1.09513e-5; = p2245*(p1020+p1022)
- p0896: 0.458
- p1956: 0
- p2887: 0; = p2301*(p1079+p1081)
- p1842: 0
- p0822: 0.881667
- p2557: 0; = p2361*p1014
- p2301: 0; = p2227*p2208
- p4428: 0; = p1873*p3480
- p3215: 0.450791; = p1222*3*15.9994/100.0869
- p3337: 0; = IF(or(p3254=0;p1232>0);0;p3272*p3289)
- p1058: 0.225
- p1781: 0
- p4802: 0; = p1835*p3482
- p2476: 0.000637699; = p2280*p1014
- p1682: 0
- p2753: 0; = p2362*(p1019+p1021)
- p1893: 0
- p2458: 0; = p2262*p1073
- p2700: 0; = p2309*(p1078+p1080)
- p1602: 0
- p0823: 0
- p0579: 0; = IF(p0315<0.5;-SQRT(p0007*EXP(p0447^2*p0008)-p0007);SQRT(p0007*EXP(p0447^2*p0008)-p0007))
- p3273: 0
- p3018: 0; = p2237*p1023
- p3539: 0; = p1808*p3476
- p1892: 0
- p0007: 14; = p0006-1
- p2210: 0.000302082; = 6*1.00794*p2208/30.973762
- p0174: 0
- p4922: 0; = p1955*p3482
- p2934: 0; = p2348*(p1079+p1081)
- p2451: 0.000164518; = p2255*p1014
- p3367: 0; = if(p1232=0;p3244*p3361/p0818;0)
- p3483: 0; = if(p1328+p1330+p1332+p1334+p1336+p1338+p1340+p1342+p1344=0;0;p1342/(p1328+p1330+p1332+p1334+p1336+p1338+p1340+p1342+p1344))
- p1438: 15
- p1749: 0
- p0953: 0; = if(and(p0683>0;or(p0807=56;p0807=100;and(p0807=60;p0901>0.06)));p0935;0)
- p3092: 0; = p2311*p1132
- p1768: 0
- p0020: 101.572
- p1345: 0.00049284; = IF(p1318=0;p1344*p0001/(p0818*p0002);0)
- p1613: 0
- p3091: 0; = p2310*p1082
- p2775: 0; = p2384*(p1078+p1080)
- p3439: 0; = p3363*p1240
- p1896: 0
- p2954: 0; = p2368*(p1020+p1022)
- p2865: 0.000124432; = p2279*(p1020+p1022)
- p2408: 0; = p2234*p2198
- p2198: 1.42468e-5; = 22.98976928*p2197/14.0067
- p2496: 0; = p2300*p1073
- p1705: 0
- p0805: 0
- p0438: 0; = SQRT(2)*(IF((2*p0306-1)<0;-1;IF((2*p0306-1)>0;1;0))*SQRT(SQRT((2/(pi()*0.140012289)+LN(1-(2*p0306-1)^2)/2)^2-LN(1-(2*p0306-1)^2)/0.140012289)-(2/(pi()*0.140012289)+LN(1-(2*p0306-1)^2)/2)))
- p3511: 0; = p1780*p3476
- p3311: 0; = if(and(p1232=0;p3252<>0);p3252-(p3306+p3307+p3308+p3309+p3310);0)
- p3057: 0; = p2276*p1023
- p0902: 0
- p0690: 0
- p2958: 0; = p2372*(p1020+p1022)
- p2341: 0.000699641; = p2228*p2209
- p2246: 1.54908e-5; = p2222*p2191
- p2607: 0; = p2411*p1014
- p2917: 2.2124e-6; = p2331*(p1020+p1022)
- p1715: 0
- p0782: 6.809; = p0122*(1+p0650*p0254/100)
- p4840: 0; = p1873*p3482
- p2289: 0.0123475; = p2223*p2196
- p1795: 0
- p3156: 0; = p2375*p1082
- p1828: 0
- p2749: 0; = p2358*(p1019+p1021)
- p3202: 0; = p2421*p1082
- p4016: 0; = p1873*p3478
- p1847: 2.2096e-6; = p1439*1000/p0818
- p3257: 0
- p2293: 0.00446248; = p2223*p2200
- p4721: 0; = p1754*p3482
- p2344: 5.50641e-6; = p2228*p2212
- p2997: 0; = p2411*(p1020+p1022)
- p2372: 0; = p2225*p2201
- p3887: 0; = p1950*p3477
- p1077: 0; = IF(p1071=0;p0715/100;0)
- p1826: 0
- p2273: 0; = p2230*p2219
- p4711: 0; = p1950*p3481
- p0116: 24.809
- p1649: 0
- p0252: 7.78
- p0141: 89.3458
- p1222: 0.94
- p3896: 0; = p1963*p3477
- p1984: 30
- p2402: 0; = p2234*p2191
- p0268: 2.73
- p2603: 0; = p2407*p1014
- p2815: 0; = p2424*(p1078+p1080)
- p2711: 9.93338e-6; = p2320*(p1019+p1021)
- p1096: 0.00136107
- p3205: 0; = p2424*p1082
- p3105: 0; = p2324*p1023
- p3170: 0; = p2389*p1132
- p2651: 0; = p2260*(p1078+p1080)
- p0854: 508642; = p0801*((1-p0853)*p0846+p0853*p0852)
- p2142: 1.38179e-6; = p2015*p2070*p2104/(p0818*1000)
- p2503: 0; = p2307*p1073
- p2596: 0; = p2400*p1014
- p2144: 6.88052e-7; = p2015*p2072*p2106/(p0818*1000)
- p0708: 4.137; = p0048*(1+p0576*p0180/100)
- p2532: 0.00196165; = p2336*p1073
- p2067: 0.446471
- p0739: 0.716; = p0079*(1+p0607*p0211/100)
- p3897: 0; = p1754*p3478
- p1236: 0; = if(p1232>0;0;p0728/100)
- p2556: 0; = p2360*p1014
- p2023: 2.12
- p1637: 0.478333
- p0670: 0
- p2006: 0.318179; = ((p1980*p1985+p1986*p1991+p1992*p1997+p2000*p2005)/p0818)*p0005*p0002/1000
- p1753: 0
- p3139: 0; = p2358*p1023
- p1844: 0
- p2254: 0.000535133; = p2222*p2200
- p2119: 0.679049
- p2081: 0.0019
- p1955: 1.76768e-5; = p1547*1000/p0818
- p1022: 0.13534; = IF(p1012=0;IF(p1014+p1019+p1020+p1021=1;0;IF(p1014+p1019+p1020+p1021+p1018>1;1-(p1014+p1019+p1020+p1021);p1018));0)
- p2383: 0; = p2229*p2212
- p1849: 0
- p2913: 0.00016394; = p2327*(p1020+p1022)
- p2076: 0.057
- p2965: 0; = p2379*(p1079+p1081)
- p0839: 0.540831; = p0838/p0818
- p0476: 0; = SQRT(2)*(IF((2*p0344-1)<0;-1;IF((2*p0344-1)>0;1;0))*SQRT(SQRT((2/(pi()*0.140012289)+LN(1-(2*p0344-1)^2)/2)^2-LN(1-(2*p0344-1)^2)/0.140012289)-(2/(pi()*0.140012289)+LN(1-(2*p0344-1)^2)/2)))
- p0970: 0; = p0967/p0818
- p2976: 0; = p2390*(p1129+p1131)
- p0184: 23.393
- p1916: 0
- p2446: 0.00106179; = p2250*p1014
- p0734: 0
- p2022: 0.00103067; = p2018*p2015/p0818-p2021
- p2196: 0.0229437; = p1068-p2193-p2195
- p3407: 0; = p3369*p1238
- p0996: 0; = if(p0888=0;0;if((p0691*p0690*1000*p0692/100)/p0888>1;1;(p0691*p0690*1000*p0692/100)/p0888))
- p2961: 0; = p2375*(p1079+p1081)
- p0926: 0; = IF(p0918+p0923+p0924+p0925=1;0;IF(p0918+p0923+p0924+p0925+p0922>1;1-(p0918+p0923+p0924+p0925);p0922))
- p1322: 0; = IF(((p0745*1000*p0749/100)+(p0754*1000*p0758/100))/p0801<0;0;((p0745*1000*p0749/100)+(p0754*1000*p0758/100))/p0801)
- p1809: 0
- p3604: 0; = p1873*p3476
- p2797: 0; = p2406*(p1019+p1021)
- p1824: 0
- p2355: 0; = p2225*p2183
- p2090: 0.40001
- p0994: 0; = p0990*p0001*p0004/(p0818*p0002)
- p3238: 0.854735; = IF(p3237+p3235+p3236>1;1-(p3235+p3236);p3237)
- p3359: 0; = if(p1232=0;p3309+p3320+p3331+p3342+p3353;0)
- p2969: 0; = p2383*(p1079+p1081)
- p2804: 0; = p2413*(p1019+p1021)
- p2719: 0.00095831; = p2328*(p1019+p1021)
- p3171: 0; = p2390*p1132
- p5138: 8.20707e-6; = p1759*p3484
- p4337: 0; = p1782*p3480
- p2454: 0; = p2258*p1073
- p2705: 0; = p2314*(p1128+p1130)
- p3410: 0; = p3372*p1238
- p4747: 0; = p1780*p3482
- p1340: 0; = p1325*p0801
- p2479: 0.000321813; = p2283*p1014
- p0946: 2.8605e-5; = if(and(p0683=0;or(p0807=480;p0807=32;p0807=1;and(p0807=60;p0901<0.03)));p0934;0)
- p1129: 0; = if(p1121=0;IF(p1123+p1128=1;0;IF(p1123+p1128+p1125>1;1-(p1123+p1128);p1125));0)
- p2208: 0.00154715; = p1110/p0818
- p0767: 24.296; = p0107*(1+p0635*p0239/100)
- p2262: 0; = p2226*p2208
- p3297: 0; = if(p1273+p1274+p1275+p1276=0;0;p1273/(p1273+p1274+p1275+p1276))
- p3140: 0; = p2359*p1023
- p0932: 0; = p0801*p0926
- p1829: 0
- p1907: 0
- p1335: 0; = p1334*p0001/(p0818*p0002)
- p2016: 0.00095194; = (p2014-p2015)/(p0818)
- p0910: 0.0059216; = p0909/p0818
- p1082: 0.1006; = IF(p1071=0;IF(p1073+p1078+p1079+p1080+p1081=1;0;1-(p1073+p1078+p1079+p1080+p1081));0)
- p1943: 1.26263e-6; = p1535*1000/p0818
- p2639: 7.34627e-5; = p2248*(p1019+p1021)
- p3375: 0; = if(p1232=0;p3246*p3357/p0818;0)
- p3460: 0; = p3365*p1241
- p2502: 0; = p2306*p1073
- p2309: 0; = p2227*p2216
- p2302: 0; = p2227*p2209
- p1591: 0
- p1554: 0
- p0525: 0; = SQRT(2)*(IF((2*p0393-1)<0;-1;IF((2*p0393-1)>0;1;0))*SQRT(SQRT((2/(pi()*0.140012289)+LN(1-(2*p0393-1)^2)/2)^2-LN(1-(2*p0393-1)^2)/0.140012289)-(2/(pi()*0.140012289)+LN(1-(2*p0393-1)^2)/2)))
- p0634: 0; = IF(p0370<0.5;-SQRT(p0007*EXP(p0502^2*p0008)-p0007);SQRT(p0007*EXP(p0502^2*p0008)-p0007))
- p2470: 0; = p2274*p1123
- p2492: 0.0022636; = p2296*p1014
- p0939: 3.0475e-5; = p0933*p0001/(p0818*p0002)
- p2437: 7.64718e-5; = p2241*p1014
- p3048: 0; = p2267*p1082
- p3490: 0; = p1759*p3476
- p0954: 0; = if(and(p0683>0;or(p0807=56;p0807=100;and(p0807=60;p0901>0.06)));p0936;0)
- p1250: 0; = if(p1232>0;0;p1245*p0001/(p0818*p0002))
- p1687: 0
- p2584: 0; = p2388*p1073
- p1104: 0.382423; = IF(p1071=0;IF(p1096+p1101+p1102+p1103=1;0;1-(p1096+p1101+p1102+p1103));0)
- p3377: 0; = if(p1232=0;p3246*p3359/p0818;0)
- p1187: 0.000181343
- p1708: 0
- p2605: 0; = p2409*p1014
- p3433: 0; = p3376*p1239
- p1037: 0.328824
- p1704: 0
- p1960: 26.4582; = IF(p1959-p1958<0;0;p1959-p1958)
- p0639: 0; = IF(p0375<0.5;-SQRT(p0007*EXP(p0507^2*p0008)-p0007);SQRT(p0007*EXP(p0507^2*p0008)-p0007))
- p3784: 0; = p1847*p3477
- p0821: 1.31667
- p2717: 0.000452252; = p2326*(p1019+p1021)
- p2374: 0; = p2225*p2203
- p1875: 0
- p2939: 0; = p2353*(p1129+p1131)
- p2240: 8.39335e-5; = p2222*p2185
- p2671: 9.34907e-5; = p2280*(p1019+p1021)
- p2396: 0; = p2234*p2185
- p1630: 0
- p0501: 0; = SQRT(2)*(IF((2*p0369-1)<0;-1;IF((2*p0369-1)>0;1;0))*SQRT(SQRT((2/(pi()*0.140012289)+LN(1-(2*p0369-1)^2)/2)^2-LN(1-(2*p0369-1)^2)/0.140012289)-(2/(pi()*0.140012289)+LN(1-(2*p0369-1)^2)/2)))
- p1213: 0
- p1805: 0
- p1550: 0.783979
- p4704: 0; = p1943*p3481
- p0716: 6.809; = p0056*(1+p0584*p0188/100)
- p0575: 0; = IF(p0311<0.5;-SQRT(p0007*EXP(p0443^2*p0008)-p0007);SQRT(p0007*EXP(p0443^2*p0008)-p0007))
- p3005: 0; = p2419*(p1079+p1081)
- p2735: 2.23505e-7; = p2344*(p1078+p1080)
- p0404: 0.5
- p1642: 0.902
- p2053: 1.45647
- p0722: 0
- p0283: 0.5
- p0879: 0; = p0878*p0001*p0003/(p0818*p0002)
- p0327: 0.5
- p1661: 0
- p4720: 0; = p1963*p3481
- p0945: 0; = if(and(p0683=0;p0951=0);p0939;0)
- p3420: 0; = p3363*p1239
- p1951: 0
- p0314: 0.5
- p1001: 0; = if(p0978>0;0;if(and(p0687=0;p0691=0;p0695=0;p0699=0);0;IF(p0996+p0999+p1000=1;0;1-(p0996+p0999+p1000))))
- p3329: 0; = if(and(p1232=0;p3255<>0);p3255*(p3266-p3324)/p3327;0)
- p0439: 0; = SQRT(2)*(IF((2*p0307-1)<0;-1;IF((2*p0307-1)>0;1;0))*SQRT(SQRT((2/(pi()*0.140012289)+LN(1-(2*p0307-1)^2)/2)^2-LN(1-(2*p0307-1)^2)/0.140012289)-(2/(pi()*0.140012289)+LN(1-(2*p0307-1)^2)/2)))
- p2834: 0.000124229; = p2248*(p1020+p1022)
- p2347: 0.000500322; = p2228*p2215
- p3320: 0; = if(and(p1232=0;p3253<>0);p3253*(p3264-p3315)/p3316;0)
- p0113: 70.404
- p2644: 2.12517e-7; = p2253*(p1019+p1021)
- p0816: 0
- p2174: 0.00362983; = p0895*p0903/p0818
- p3465: 0; = p3370*p1241
- p1194: 1.48
- p2577: 0; = p2381*p1073
- p1747: 0
- p2123: 0.263965
- p3566: 0; = p1835*p3476
- p1899: 0
- p2032: 0.448886
- p3457: 0; = p3362*p1241
- p1895: 0
- p2491: 0.000197449; = p2295*p1014
- p2326: 0.00430184; = p2224*p2193
- p1692: 0
- p2877: 1.36307e-6; = p2291*(p1020+p1022)
- p2432: 0.0211809; = p1158
- p2791: 0; = p2400*(p1019+p1021)
- p2231: 0; = if(p0783*p0787+p0784*p0788+p0785*p0789+p0786*p0790=0;0;p0788*p0784/(p0783*p0787+p0784*p0788+p0785*p0789+p0786*p0790))
- p2663: 0; = p2272*(p1128+p1130)
- p2106: 0.856281
- p0669: 41.3071; = p0009*(1+p0537*p0141/100)
- p2681: 4.91091e-7; = p2290*(p1019+p1021)
- p3051: 0; = p2270*p1082
- p3471: 0; = p3376*p1241
- p3012: 0; = p2426*(p1079+p1081)
- p0502: 0; = SQRT(2)*(IF((2*p0370-1)<0;-1;IF((2*p0370-1)>0;1;0))*SQRT(SQRT((2/(pi()*0.140012289)+LN(1-(2*p0370-1)^2)/2)^2-LN(1-(2*p0370-1)^2)/0.140012289)-(2/(pi()*0.140012289)+LN(1-(2*p0370-1)^2)/2)))
- p0657: 0; = IF(p0393<0.5;-SQRT(p0007*EXP(p0525^2*p0008)-p0007);SQRT(p0007*EXP(p0525^2*p0008)-p0007))
- p2566: 0; = p2370*p1014
- p2059: 1.00168
- p2694: 0; = p2303*(p1078+p1080)
- p0674: 0
- p0574: 0; = IF(p0310<0.5;-SQRT(p0007*EXP(p0442^2*p0008)-p0007);SQRT(p0007*EXP(p0442^2*p0008)-p0007))
- p2435: 1.74739e-5; = p2239*p1014
- p5020: 0; = p1847*p3483
- p1268: 0
- p2779: 0; = p2388*(p1078+p1080)
- p1830: 0
- p2064: 0.676706
- p1238: 0; = if(p1232>0;0;IF(p1234=1;0;IF(p1234+p1235>1;1-p1234;p1235)))
- p0572: 0; = IF(p0308<0.5;-SQRT(p0007*EXP(p0440^2*p0008)-p0007);SQRT(p0007*EXP(p0440^2*p0008)-p0007))
- p1341: 0; = p1340*p0001/(p0818*p0002)
- p1144: 3.35575e-5; = if(p1121=0;p1138*p0001/(p0818*p0002);0)
- p2030: 6.61
- p2642: 5.88909e-8; = p2251*(p1019+p1021)
- p0886: 0; = p0686*1000*p0687*p0689/100
- p2506: 0; = p2310*p1073
- p5046: 0; = p1873*p3483
- p2884: 0; = p2298*(p1079+p1081)
- p2038: 0.304457
- p1968: 0; = if(p0807=480;p0802*p0811;0)
- p3480: 0; = if(p1328+p1330+p1332+p1334+p1336+p1338+p1340+p1342+p1344=0;0;p1336/(p1328+p1330+p1332+p1334+p1336+p1338+p1340+p1342+p1344))
- p2126: 4.35933e-6; = p2015*p2054*p2088/(p0818*1000)
- p2983: 0; = p2397*(p1020+p1022)
- p0715: 0
- p2960: 0; = p2374*(p1020+p1022)
- p2384: 0; = p2229*p2213
- p2814: 0; = p2423*(p1078+p1080)
- p1400: 19
- p3352: 0; = if(and(p1232=0;p3256<>0);p3256*(p3275-p3347)/p3349;0)
- p1130: 0; = if(p1121=0;IF(p1123+p1128+p1129=1;0;IF(p1123+p1128+p1129+p1126>1;1-(p1123+p1128+p1129);p1126));0)
- p2177: 0.144292; = p0895/p0818-(p2173+p2174+p2175+p2176)
- p1204: 0.980791
- p3401: 0; = p3363*p1238
- p1891: 0
- p0723: 1750; = p0063*(1+p0591*p0195/100)
- p2747: 0; = p2356*(p1019+p1021)
- p1112: 0.209482
- p2131: 1.56747e-6; = p2015*p2059*p2093/(p0818*1000)
- p3328: 0; = if(and(p1232=0;p3255<>0);p3255*(p3265*p3277-p3323)/p3327;0)
- p3441: 0; = p3365*p1240
- p3467: 0; = p3372*p1241
- p3160: 0; = p2379*p1082
- p3481: 0; = if(p1328+p1330+p1332+p1334+p1336+p1338+p1340+p1342+p1344=0;0;p1338/(p1328+p1330+p1332+p1334+p1336+p1338+p1340+p1342+p1344))
- p1963j: 7.36215e-7; = p1725*p1929+p1726*p1930+p1727*p1931+p1728*p1932+p1729*p1933+p1730*p1934+p1731*p1935+p1732*p1936+p1733*p1937+p1734*p1938+p1735*p1939+p1736*p1940+p1737*p1941+p1738*p1942+p1739*p1943+p1740*p1944+p1741*p1945+p1742*p1946+p1743*p1947
- p3236: 0.0140975
- p2147: 3.56877e-7; = p2015*p2075*p2109/(p0818*1000)
- p2624: 0; = p2428*p1123
- p0977: 0; = IF(p0687=0;IF(OR(p0686=0;p0688=0);0;p0686*1000*p0688/100);0)
- p1807: 0
- p0891: 0; = IF(p3251=0;0;62.4*6272640/(12*12*12))
- p0721: 0
- p5116: 0; = p1943*p3483
- p2354: 0; = p2225*p2182
- p2041: 2.63847e-6; = p2015*p2040/(p0818*1000)
- p1147: 0.111546
- p2890: 0; = p2304*(p1079+p1081)
- p3069: 0; = p2288*p1023
- p3052: 0; = p2271*p1082
- p1039: 0.0504301
- p3426: 0; = p3369*p1239
- p3016: 0; = p2430*(p1129+p1131)
- p3923: 0; = p1780*p3478
- p2659: 0; = p2268*(p1078+p1080)
- p1898: 0
- p0864: 0; = IF(p0858=1;0;IF(p0858+p0859>1;1-p0858;p0859))
- p0919: 0.397131; = p0678*1000/p0801
- p0840: 0.0740939; = p0839*p0831
- p2921: 0.000414294; = p2335*(p1020+p1022)
- p3035: 0; = p2254*p1023
- p3783: 0; = p1846*p3477
- p2909: 6.74184e-5; = p2323*(p1020+p1022)
- p1017: 0.04137; = IF(p1012=0;p0708/100;0)
- p2427: 0; = p2235*p2217
- p2343: 0.00395589; = p2228*p2211
- p4498: 0; = p1943*p3480
- p1146: 0.888454
- p2397: 0; = p2234*p2186
- p2509: 0; = p2313*p1123
- p1593: 0
- p3387: 0; = p3368*p1234
- p3182: 0; = p2401*p1023
- p1290: 0; = IF(p1287=p1264;0;IF(p1287+p1288>p1264;p1264-p1287;p1288))
- p0401: 0.5
- p0478: 0; = SQRT(2)*(IF((2*p0346-1)<0;-1;IF((2*p0346-1)>0;1;0))*SQRT(SQRT((2/(pi()*0.140012289)+LN(1-(2*p0346-1)^2)/2)^2-LN(1-(2*p0346-1)^2)/0.140012289)-(2/(pi()*0.140012289)+LN(1-(2*p0346-1)^2)/2)))
- p4955: 0; = p1782*p3483
- p2757: 0; = p2366*(p1019+p1021)
- p2037: 1.99
- p1797: 0
- p0695: 0
- p3348: 0; = if(and(p1232=0;p3256<>0);p3276*p3289;0)
- p3027: 0; = p2246*p1023
- p3577: 0; = p1846*p3476
- p1336: 0; = p1323*p0801
- p2009: 0.0081614; = ((p1983*p1985+p1989*p1991+p1995*p1997+p2003*p2005+p1976*p1977+p1978*p1979+p1998*p1999)/p0818)*p0005*p0002/1000
- p2723: 0.00034634; = p2332*(p1019+p1021)
- p4351: 0; = p1796*p3480
- p1327a: 0; = (p0745*1000/p0801)*(1-(p0746+p0747+p0748+p0749+p0750+p0751+p0752+p0753)/100)+(p0754*1000/p0801)*(1-(p0755+p0756+p0757+p0758+p0759+p0760+p0761+p0762)/100)
- p1635: 0
- p2295: 0.000275348; = p2223*p2202
- p3383: 0; = p3364*p1234
- p1036: 1.03806e8; = IF(p1012=0;p0795*p0702*1000*p0796/100;0)
- p0178: 39.607
- p2366: 0; = p2225*p2195
- p3158: 0; = p2377*p1082
- p2447: 4.01694e-7; = p2251*p1014
- p2780: 0; = p2389*(p1128+p1130)
- p1971: 0.000450596; = p1966*p0001/(p0818*p0002)
- p0770: 56.692; = p0110*(1+p0638*p0242/100)
- p0850: 0
- p1304: 0; = p1300*p1252/p0818
- p2835: 2.66299e-5; = p2249*(p1020+p1022)
- p3112: 0; = p2331*p1023
- p1869: 0
- p2561: 0; = p2365*p1014
- p2463: 0; = p2267*p1073
- p2825: 4.33211e-6; = p2239*(p1020+p1022)
- p0577: 0; = IF(p0313<0.5;-SQRT(p0007*EXP(p0445^2*p0008)-p0007);SQRT(p0007*EXP(p0445^2*p0008)-p0007))
- p2870: 9.13227e-5; = p2284*(p1020+p1022)
- p1908: 0
- p2742: 0; = p2351*(p1128+p1130)
- p0858: 0; = p0670*1000/p0856
- p4103: 0; = p1754*p3479
- p1299: 0
- p1040: 0.0254495
- p3431: 0; = p3374*p1239
- p1587: 0
- p1267: 0
- p1289: 0
- p1223: 0.56
- p0107: 24.296
- p2583: 0; = p2387*p1073
- p2867: 2.27538e-5; = p2281*(p1020+p1022)
- p4396: 0; = p1841*p3480
- p1326: 0; = IF(((p0745*1000*p0753/100)+(p0754*1000*p0762/100))/p0801<0;0;((p0745*1000*p0753/100)+(p0754*1000*p0762/100))/p0801)
- p1609: 0
- p1592: 0.579333
- p0384: 0.5
- p2704: 0; = p2313*(p1128+p1130)
- p1921: 0
- p4927: 0; = p1754*p3483
- p2724: 0.000148484; = p2333*(p1019+p1021)
- p3453: 0; = p3377*p1240
- p2915: 6.13081e-7; = p2329*(p1020+p1022)
- p3398: 0; = p3379*p1234
- p1725: 0
- p2872: 0.00018585; = p2286*(p1020+p1022)
- p2031: 0.465411
- p0047: 4.244
- p1691: 0
- p2352: 3.77795e-5; = p2232*p2220
- p2959: 0; = p2373*(p1020+p1022)
- p0956: 0; = if(and(p0683>0;or(p0807=56;p0807=100;and(p0807=60;p0901>0.06)));p0938;0)
- p2982: 0; = p2396*(p1020+p1022)
- p0405: 0; = SQRT(2)*(IF((2*p0273-1)<0;-1;IF((2*p0273-1)>0;1;0))*SQRT(SQRT((2/(pi()*0.140012289)+LN(1-(2*p0273-1)^2)/2)^2-LN(1-(2*p0273-1)^2)/0.140012289)-(2/(pi()*0.140012289)+LN(1-(2*p0273-1)^2)/2)))
- p2132: 1.50673e-6; = p2015*p2060*p2094/(p0818*1000)
- p1735: 0
- p3174: 0; = p2393*p1023
- p0990: 0; = p0986*p0886
- p3717: 0; = p1780*p3477
- p1870: 0
- p1991: 7.14766e7; = (if(p1111=0;0;p1106/p1111)+if(p1112=0;0;p1107/p1112)+if(p1113=0;0;p1108/p1113)+if(p1114=0;0;p1109/p1114)+if(p1115=0;0;p1110/p1115))*(1+p1157)
- p0762: 0
- p0533: 0; = SQRT(2)*(IF((2*p0401-1)<0;-1;IF((2*p0401-1)>0;1;0))*SQRT(SQRT((2/(pi()*0.140012289)+LN(1-(2*p0401-1)^2)/2)^2-LN(1-(2*p0401-1)^2)/0.140012289)-(2/(pi()*0.140012289)+LN(1-(2*p0401-1)^2)/2)))
- p3081: 0; = p2300*p1082
- p3990: 0; = p1847*p3478
- p3248: 0
- p1011: 0; = p1010*p0001*p0004/(p0818*p0002)
- p1626: 0
- p1571: 0
- p2315: 0.0042807; = p2224*p2182
- p0955: 0; = if(and(p0683>0;or(p0807=56;p0807=100;and(p0807=60;p0901>0.06)));p0937;0)
- p0214: 2.043
- p2055: 5.59471
- p3097: 0; = p2316*p1023
- p1746: 0.615605
- p3223: 0.126838; = IF(p3216=0;0;(1-p1223)*24.3050/84.3139)
- p2250: 0.00148069; = p2222*p2196
- p1342: 0; = p1326*p0801
- p3264: 0
- p3455: 0; = p3379*p1240
- p2640: 1.57476e-5; = p2249*(p1019+p1021)
- p0737: 0
- p1674: 0
- p1069: 5.42499e-5; = IF(p1012=0;p1055/(p1062*p0818);0)
- p3230: 5.22081e-7; = p1170/p0818
- p0754: 0
- p2653: 0; = p2262*(p1078+p1080)
- p3396: 0; = p3377*p1234
- p0759: 0
- p3228: 0.000591506; = p3224*p1229
- p3137: 0; = p2356*p1023
- p2773: 0; = p2382*(p1078+p1080)
- p3253: 0; = p1252*(p1277*(1-p3247)+p1280*(1-p3248)+p1281*(1-p3249)+p1282*(1-p3250))
- p2525: 2.47291e-6; = p2329*p1014
- p0507: 0; = SQRT(2)*(IF((2*p0375-1)<0;-1;IF((2*p0375-1)>0;1;0))*SQRT(SQRT((2/(pi()*0.140012289)+LN(1-(2*p0375-1)^2)/2)^2-LN(1-(2*p0375-1)^2)/0.140012289)-(2/(pi()*0.140012289)+LN(1-(2*p0375-1)^2)/2)))
- p0105: 57.177
- p2467: 0; = p2271*p1073
- p3243: 5.18711e-10; = p3234*p1188*p3239/p0818
- p3198: 0; = p2417*p1082
- p3444: 0; = p3368*p1240
- p0180: 39.165
- p0941: 0; = if(and(p0683=0;p0947=0);p0935;0)
- p1249: 0; = if(p1232>0;0;p1244*p0001/(p0818*p0002))
- p0403: 0.5
- p5329: 3.15657e-7; = p1950*p3484
- p0136: 94.213
- p0952: 0; = if(and(p0683>0;or(p0807=56;p0807=100;and(p0807=60;p0901>0.06)));p0934;0)
- p3376: 0; = if(p1232=0;p3246*p3358/p0818;0)
- p1041: 0.330448
- p2304: 0; = p2227*p2211
- p3179: 0; = p2398*p1023
- p0315: 0.5
- p1665: 0
- p2879: 0.000793339; = p2293*(p1020+p1022)
- p2426: 0; = p2235*p2216
- p3792: 0; = p1855*p3477
- p0833: 3.67761e9; = p0830+p0832
- p2199: 3.13231e-5; = p1069-p2197-p2198
- p2164: 0.00215468; = (p2015/p0818)-(p2022)-(p2035+p2036+p2052)-(p2017/p0818)-(p2039+p2041+p2044+p2158+p2159+p2160+p2161+p2162)
- p2991: 0; = p2405*(p1020+p1022)
- p2693: 0; = p2302*(p1078+p1080)
- p0836: 2.50901e8; = p0831*p0835*p0801/(1-p0831)
- p2490: 0.00137191; = p2294*p1014
- p4101: 0; = p1962*p3478
- p3077: 0; = p2296*p1023
- p2973: 0; = p2387*(p1079+p1081)
- p2161: 5.30729e-8; = p2015*p2085*p2123/(p0818*1000)
- p3070: 0; = p2289*p1023
- p3446: 0; = p3370*p1240
- p2113: 0.832356
- p2905: 0.000116714; = p2319*(p1020+p1022)
- p1730: 0
- p2850: 0; = p2264*(p1079+p1081)
- p2903: 2.66694e-5; = p2317*(p1020+p1022)
- p1046: 0.0254495; = IF(p1012=0;IF(p1037+p1044+p1045=1;0;IF(p1037+p1044+p1045+p1040>1;1-(p1037+p1044+p1045);p1040));0)
- p2373: 0; = p2225*p2202
- p2316: 0.000939666; = p2224*p2183
- p2538: 0.000259431; = p2342*p1073
- p0997: 0; = if(p0888=0;0;if((p0695*p0694*1000*p0696/100)/p0888>1;1;(p0695*p0694*1000*p0696/100)/p0888))
- p2307: 0; = p2227*p2214
- p2727: 9.27138e-5; = p2336*(p1078+p1080)
- p3009: 0; = p2423*(p1079+p1081)
- p3475: 0; = p3380*p1241
- p3315: 0; = if(and(p1232=0;p3253<>0);p3264*p3289;0)
- p1123: 0; = if(p1121=0;p0717/100;0)
- p0535: 0; = SQRT(2)*(IF((2*p0403-1)<0;-1;IF((2*p0403-1)>0;1;0))*SQRT(SQRT((2/(pi()*0.140012289)+LN(1-(2*p0403-1)^2)/2)^2-LN(1-(2*p0403-1)^2)/0.140012289)-(2/(pi()*0.140012289)+LN(1-(2*p0403-1)^2)/2)))
- p0006: 15
- p0868: 0; = IF(p0858+p0864+p0865+p0866+p0867=1;0;IF(p0858+p0864+p0865+p0866+p0867+p0863>1;1-(p0858+p0864+p0865+p0866+p0867);p0863))
- p1820: 0
- p2108: 0.826583
- p2666: 0; = p2275*(p1128+p1130)
- p2229: 0; = if(p0774*p0778+p0775*p0779+p0776*p0780+p0777*p0781=0;0;p0781*p0777/(p0774*p0778+p0775*p0779+p0776*p0780+p0777*p0781))
- p0831: 0.137; = 1-p0824
- p2610: 0; = p2414*p1073
- p2049: 25.6942
- p3478: 0; = if(p1328+p1330+p1332+p1334+p1336+p1338+p1340+p1342+p1344=0;0;p1332/(p1328+p1330+p1332+p1334+p1336+p1338+p1340+p1342+p1344))
- p0503: 0; = SQRT(2)*(IF((2*p0371-1)<0;-1;IF((2*p0371-1)>0;1;0))*SQRT(SQRT((2/(pi()*0.140012289)+LN(1-(2*p0371-1)^2)/2)^2-LN(1-(2*p0371-1)^2)/0.140012289)-(2/(pi()*0.140012289)+LN(1-(2*p0371-1)^2)/2)))
- p1315: 0; = p1311*p1252/p0818
- p0148: 0
- p2477: 9.17792e-5; = p2281*p1014
- p3114: 0; = p2333*p1023
- p1696: 0
- p3145: 0; = p2364*p1023
- p2244: 5.38166e-5; = p2222*p2189
- p2801: 0; = p2410*(p1019+p1021)
- p1794: 0
- p2230: 0; = if(p0783*p0787+p0784*p0788+p0785*p0789+p0786*p0790=0;0;p0787*p0783/(p0783*p0787+p0784*p0788+p0785*p0789+p0786*p0790))
- p2774: 0; = p2383*(p1078+p1080)
- p2695: 0; = p2304*(p1078+p1080)
- p1186: 3.94474e-8; = p1182*p1185/p0818
- p1963b: 1.86754e-5; = p1569*p1773+p1570*p1774+p1571*p1775+p1572*p1776+p1573*p1777+p1574*p1778+p1575*p1779+p1576*p1780+p1577*p1781+p1578*p1782+p1579*p1783+p1580*p1784+p1581*p1785+p1582*p1786+p1583*p1787+p1584*p1788+p1585*p1789+p1586*p1790+p1587*p1791
- p1321: 0; = IF(((p0745*1000*p0748/100)+(p0754*1000*p0757/100))/p0801<0;0;((p0745*1000*p0748/100)+(p0754*1000*p0757/100))/p0801)
- p2854: 0; = p2268*(p1079+p1081)
- p1237: 0; = if(p1232>0;0;p0729/100)
- p3278: 0
- p1729: 0
- p3143: 0; = p2362*p1023
- p2516: 6.77554e-5; = p2320*p1014
- p1689: 0
- p1054: 3.43023e7; = IF(p1012=0;p1047*p1036;0)
- p0944: 0; = if(and(p0683=0;p0950=0);p0938;0)
- p1239: 0; = if(p1232>0;0;IF(p1234+p1238=1;0;IF(p1234+p1238+p1236>1;1-(p1234+p1238);p1236)))
- p0109: 7.094
- p1987: 400
- p0908: 0.00197823
- p1700: 0
- p2061: 0.518824
- p2319: 0.00065651; = p2224*p2186
- p2548: 0; = p2352*p1123
- p3370: 0; = if(p1232=0;p3245*p3358/p0818;0)
- p1652: 0
- p3255: 0; = p1252*(p1297*(1-p3247)+p1300*(1-p3248)+p1301*(1-p3249)+p1302*(1-p3250))
- p0826: 0.118333; = 1-p0825/p0818
- p2109: 0.826583
- p0150: 0
- p3404: 0; = p3366*p1238
- p1861: 0
- p0389: 0.5
- p2569: 0; = p2373*p1014
- p2856: 0; = p2270*(p1079+p1081)
- p0733: 0
- p1568: 0
- p2329: 3.44854e-6; = p2224*p2197
- p3513: 0; = p1782*p3476
- p1113: 0.100377
- p2587: 0; = p2391*p1123
- p1055: 27498.2; = IF(p1012=0;p1048*p1036;0)
- p3204: 0; = p2423*p1082
- p1114: 0.216028
- p2600: 0; = p2404*p1014
- p0918: 0.0580411; = p0680*1000/p0801
- p1283: 0; = p1277*p1252/p0818
- p1126: 0; = if(p1121=0;p0720/100;0)
- p0210: 0
- p1881: 0
- p2350: 0.00030091; = p2232*p2218
- p3058: 0; = p2277*p1023
- p1761: 0
- p1678: 0
- p1963e: 1.43991e-5; = p1628*p1832+p1629*p1833+p1630*p1834+p1631*p1835+p1632*p1836+p1633*p1837+p1634*p1838+p1635*p1839+p1636*p1840+p1637*p1841+p1638*p1842+p1639*p1843+p1640*p1844+p1641*p1845+p1642*p1846+p1643*p1847+p1644*p1848+p1645*p1849+p1646*p1850
- p1773: 0
- p1623: 0
- p1034: 6.28409e-5; = IF(p1012=0;p1028*p0001/(p0818*p0002);0)
- p2820: 0; = p2429*(p1128+p1130)
- p1582: 0
- p1179: 0.5
- p0632: 0; = IF(p0368<0.5;-SQRT(p0007*EXP(p0500^2*p0008)-p0007);SQRT(p0007*EXP(p0500^2*p0008)-p0007))
- p1963i: 0; = p1706*p1910+p1707*p1911+p1708*p1912+p1709*p1913+p1710*p1914+p1711*p1915+p1712*p1916+p1713*p1917+p1714*p1918+p1715*p1919+p1716*p1920+p1717*p1921+p1718*p1922+p1719*p1923+p1720*p1924+p1721*p1925+p1722*p1926+p1723*p1927+p1724*p1928
- p3363: 0; = if(p1232=0;p3244*p3357/p0818;0)
- p1653: 0
- p1334: 0; = p1322*p0801
- p3335: 0; = IF(or(p3254=0;p1232>0);0;p3270*(p3280*(p3283*p1256+p3286*(p1253+p1257)+p1258*p3288+p3300*p3287)))
- p3050: 0; = p2269*p1082
- p1744: 0
- p2065: 0.0758824
- p2911: 0.000137203; = p2325*(p1020+p1022)
- p0736: 0
- p0368: 0.5
- p1325: 0; = IF(((p0745*1000*p0752/100)+(p0754*1000*p0761/100))/p0801<0;0;((p0745*1000*p0752/100)+(p0754*1000*p0761/100))/p0801)
- p1864: 0
- p2213: 5.75796e-5; = p1116-p2212
- p1728: 0
- p2894: 0; = p2308*(p1079+p1081)
- p2800: 0; = p2409*(p1019+p1021)
- p1183: 0.00049284; = p0801*p0001/(p0818*p0002)
- p3358: 0; = if(p1232=0;p3308+p3319+p3330+p3341+p3352;0)
- p1278: 0
- p0641: 0; = IF(p0377<0.5;-SQRT(p0007*EXP(p0509^2*p0008)-p0007);SQRT(p0007*EXP(p0509^2*p0008)-p0007))
- p1871: 0
- p2866: 0.000158097; = p2280*(p1020+p1022)
- p2869: 7.97835e-5; = p2283*(p1020+p1022)
- p0966: 0; = if(p0683=0;0;IF(p0684/100+p0965=1;0;1-(p0684/100+p0965)))
- p2389: 0; = p2233*p2218
- p1806: 0
- p0369: 0.5
- p4390: 0; = p1835*p3480
- p2008: 0.0652795; = ((p1982*p1985+p1988*p1991+p1994*p1997+p2002*p2005)/p0818)*p0005*p0002/1000
- p3011: 0; = p2425*(p1079+p1081)
- p2332: 0.00329439; = p2224*p2200
- p2786: 0; = p2395*(p1019+p1021)
- p2904: 9.18613e-5; = p2318*(p1020+p1022)
- p2881: 4.89514e-5; = p2295*(p1020+p1022)
- p2992: 0; = p2406*(p1020+p1022)
- p0771: 102.776; = p0111*(1+p0639*p0243/100)
- p0743: 0
- p2395: 0; = p2234*p2184
- p2369: 0; = p2225*p2198
- p2399: 0; = p2234*p2188
- p0961: 0; = if(and(p0683>0;or(p0807=480;p0807=32;p0807=1;and(p0807=60;p0901<0.03)));p0937;0)
- p1831: 0
- p0267: 6.88
- p2736: 2.33716e-6; = p2345*(p1078+p1080)
- p1860: 0
- p0960: 0; = if(and(p0683>0;or(p0807=480;p0807=32;p0807=1;and(p0807=60;p0901<0.03)));p0936;0)
- p2687: 0.000331858; = p2296*(p1019+p1021)
- p1926: 0
- p3152: 0; = p2371*p1023
- p3474: 0; = p3379*p1241
- p0753: 0
- p2537: 0.000600859; = p2341*p1073
- p3448: 0; = p3372*p1240
- p2908: 5.88997e-5; = p2322*(p1020+p1022)
- p1072: 0; = p1071*p0001/(p0818*p0002)
- p2697: 0; = p2306*(p1078+p1080)
- p3008: 0; = p2422*(p1079+p1081)
- p1727: 0
- p2428: 0; = p2236*p2218
- p1985: 3.01166e8; = (if(p1057=0;0;p1050/p1057)+if(p1058=0;0;p1051/p1058)+if(p1059=0;0;p1052/p1059)+if(p1060=0;0;p1053/p1060)+if(p1061=0;0;p1054/p1061)+if(p1062=0;0;p1055/p1062)+if(p1063=0;0;p1056/p1063))*(1+p1157)
- p1963k: 1.83556e-5; = p1744*p1948+p1745*p1949+p1746*p1950+p1747*p1951+p1748*p1952+p1749*p1953+p1750*p1954+p1751*p1955+p1752*p1956+p1753*p1957+p1961*p1962
- p2320: 9.44866e-5; = p2224*p2187
- p0814: 0; = if(p0807=480;p0810*p0812+p0811*p0813;0)
- p1782: 2.49369e-5; = p1374*1000/p0818
- p1308: 0
- p3067: 0; = p2286*p1023
- p2461: 0; = p2265*p1073
- p2957: 0; = p2371*(p1020+p1022)
- p1959: 1209.46; = if(p0738*p0740*p0739>0;p0738*1000*(p0740/100)*p0739/1000;p1958)
- p3470: 0; = p3375*p1241
- p2543: 0.000429682; = p2347*p1073
- p1617: 0
- p0807: 60
- p2443: 8.98957e-5; = p2247*p1014
- p0106: 59.663
- p2712: 0.000127074; = p2321*(p1019+p1021)
- p1297: 0
- p1989: 50
- p1764: 0
- p2484: 0.000895726; = p2288*p1014
- p0509: 0; = SQRT(2)*(IF((2*p0377-1)<0;-1;IF((2*p0377-1)>0;1;0))*SQRT(SQRT((2/(pi()*0.140012289)+LN(1-(2*p0377-1)^2)/2)^2-LN(1-(2*p0377-1)^2)/0.140012289)-(2/(pi()*0.140012289)+LN(1-(2*p0377-1)^2)/2)))
- p1200: 0.84
- p1863: 0
- p1562: 0
- p0474: 0; = SQRT(2)*(IF((2*p0342-1)<0;-1;IF((2*p0342-1)>0;1;0))*SQRT(SQRT((2/(pi()*0.140012289)+LN(1-(2*p0342-1)^2)/2)^2-LN(1-(2*p0342-1)^2)/0.140012289)-(2/(pi()*0.140012289)+LN(1-(2*p0342-1)^2)/2)))
- p0686: 0
- p1791: 0
- p1219: 0; = if(p1218=0;0;SQRT(2)*(IF((2*p1218-1)<0;-1;IF((2*p1218-1)>0;1;0))*SQRT(SQRT((2/(pi()*0.140012289)+LN(1-(2*p1218-1)^2)/2)^2-LN(1-(2*p1218-1)^2)/0.140012289)-(2/(pi()*0.140012289)+LN(1-(2*p1218-1)^2)/2))))
- p1673: 0
- p0182: 10.273
- p2625: 0; = p2429*p1123
- p1388: 8
- p1240: 0; = if(p1232>0;0;IF(p1234+p1238+p1239=1;0;IF(p1234+p1238+p1239+p1237>1;1-(p1234+p1238+p1239);p1237)))
- p1191: 0.5
- p3135: 0; = p2354*p1023
- p2647: 3.47132e-6; = p2256*(p1019+p1021)
- p0745: 0
- p1666: 0
- p0280: 0.5
- p0921: 0.165093; = p0679*1000/p0801
- p2033: 1.12471e-5; = p2015*p2029*p2031/(p0818*1000)
- p4749: 0; = p1782*p3482
- p1758: 0
- p1588: 0
- p3272: 0
- p1232: 1.75e6; = p0801
- p2391: 0; = p2233*p2220
- p0312: 0.5
- p1293: 0; = p1287*p1252/p0818
- p1868: 0
- p2731: 6.2799e-5; = p2340*(p1078+p1080)
- p0985: 0; = IF(p0982=1;0;IF(p0982+p0983>1;1-p0982;p0983))
- p2730: 0.000225454; = p2339*(p1078+p1080)
- p3346: 0; = if(and(p1232=0;p3256<>0);p3274*(p3281*(p3285*p1256+p3286*(p1253+p1257)+p1258*p3288));0)
- p1333: 0; = p1332*p0001/(p0818*p0002)
- p1835: 1.64141e-5; = p1427*1000/p0818
- p1172: 5.22081e-7; = p1170/p0818
- p3290: 0
- p1065: 0.00167815; = IF(p1012=0;p1051/(p1058*p0818);0)
- p0320: 0.5
- p3281: 0
- p2487: 5.49804e-6; = p2291*p1014
- p2138: 4.63032e-7; = p2015*p2066*p2100/(p0818*1000)
- p2456: 0; = p2260*p1073
- p1243: 0; = if(p1232>0;0;p1238*(p0725/100)*p0723*1000)
- p2612: 0; = p2416*p1073
- p1272: 0; = IF(p1267+p1270+p1271=p1259;0;p1259-(p1267+p1270+p1271))
- p3454: 0; = p3378*p1240
- p2440: 3.85913e-5; = p2244*p1014
- p2734: 0.000160569; = p2343*(p1078+p1080)
- p0903: 0.0129401
- p2580: 0; = p2384*p1073
- p1291: 0; = IF(p1287+p1290=p1264;0;IF(p1287+p1290+p1289>p1264;p1264-(p1287+p1290);p1289))
- p1025: 105123; = IF(p1012=0;p1019*(p0704/100)*p0703*1000;0)
- p0500: 0; = SQRT(2)*(IF((2*p0368-1)<0;-1;IF((2*p0368-1)>0;1;0))*SQRT(SQRT((2/(pi()*0.140012289)+LN(1-(2*p0368-1)^2)/2)^2-LN(1-(2*p0368-1)^2)/0.140012289)-(2/(pi()*0.140012289)+LN(1-(2*p0368-1)^2)/2)))
- p2892: 0; = p2306*(p1079+p1081)
- p2551: 0; = p2355*p1014
- p1560: 0
- p0968: 0
- p4292: 0; = p1943*p3479
- p5131: 0; = p1962*p3483
- p3266: 0
- p2105: 0.888194
- p0648: 0; = IF(p0384<0.5;-SQRT(p0007*EXP(p0516^2*p0008)-p0007);SQRT(p0007*EXP(p0516^2*p0008)-p0007))
- p0667: 0; = IF(p0403<0.5;-SQRT(p0007*EXP(p0535^2*p0008)-p0007);SQRT(p0007*EXP(p0535^2*p0008)-p0007))
- p1284: 0; = p1280*p1252/p0818
- p1005: 0; = p1001*p0888
- p1066: 0.00493265; = IF(p1012=0;p1052/(p1059*p0818);0)
- p1098: 0.01885
- p3527: 0; = p1796*p3476
- p3094: 0; = p2313*p1132
- p1048: 0.000264901; = IF(p1012=0;IF(p1037+p1044+p1045+p1046+p1047=1;0;IF(p1037+p1044+p1045+p1046+p1047+p1042>1;1-(p1037+p1044+p1045+p1046+p1047);p1042));0)
- p1185: 0.5
- p2916: 1.00628e-6; = p2330*(p1020+p1022)
- p3289: 0
- p1890: 0
- p1332: 0; = p1321*p0801
- p2925: 0; = p2339*(p1079+p1081)
- p3030: 0; = p2249*p1023
- p2020: 492435; = p2015*p2018*p2019
- p1906: 0
- p0841: 0.0058038
- p0949: 8.13642e-5; = if(and(p0683=0;or(p0807=480;p0807=32;p0807=1;and(p0807=60;p0901<0.03)));p0937;0)
- p1822: 0
- p3157: 0; = p2376*p1082
- p3163: 0; = p2382*p1082
- p1088: 123946; = IF(p1071=0;p1082*(p0710/100)*p0703*1000;0)
- p1851: 0
- p1780: 3.47222e-6; = p1372*1000/p0818
- p2638: 1.31793e-5; = p2247*(p1019+p1021)
- p2102: 0.922577
- p0459: 0; = SQRT(2)*(IF((2*p0327-1)<0;-1;IF((2*p0327-1)>0;1;0))*SQRT(SQRT((2/(pi()*0.140012289)+LN(1-(2*p0327-1)^2)/2)^2-LN(1-(2*p0327-1)^2)/0.140012289)-(2/(pi()*0.140012289)+LN(1-(2*p0327-1)^2)/2)))
- p1668: 0
- p2748: 0; = p2357*(p1019+p1021)
- p2363: 0; = p2225*p2191
- p0699: 0
- p2436: 6.01879e-5; = p2240*p1014
- p2928: 0; = p2342*(p1079+p1081)
- p3445: 0; = p3369*p1240
- p3098: 0; = p2317*p1023
- p4335: 0; = p1780*p3480
- p0887: 0; = 1000*p0886*p0001*p0003*p0004/(p0818*p0002)
- p1963c: 7.03474e-6; = p1588*p1792+p1589*p1793+p1590*p1794+p1591*p1795+p1592*p1796+p1593*p1797+p1594*p1798+p1595*p1799+p1596*p1800+p1597*p1801+p1598*p1802+p1599*p1803+p1600*p1804+p1601*p1805+p1602*p1806+p1603*p1807+p1604*p1808+p1605*p1809+p1606*p1810+p1607*p1811
- p1159: 0.5
- p1769: 0
- p0048: 4.137
- p1942: 0
- p1071: 0
- p2247: 0.000125362; = p2222*p2192
- p2822: 0; = p2431*(p1128+p1130)
- p2980: 0; = p2394*(p1020+p1022)
- p0749: 0
- p1911: 0
- p2409: 0; = p2234*p2199
- p2798: 0; = p2407*(p1019+p1021)
- p0696: 0
- p2103: 0.912485
- p3022: 0; = p2241*p1023
- p1182: 249.939; = p1181*p0801
- p0049: 13.534
- p0730: 0
- p1079: 0; = IF(p1071=0;IF(p1073+p1078=1;0;IF(p1073+p1078+p1075>1;1-(p1073+p1078);p1075));0)
- p3100: 0; = p2319*p1023
- p3425: 0; = p3368*p1239
- p0080: 96.525
- p0548: 0; = IF(p0284<0.5;-SQRT(p0007*EXP(p0416^2*p0008)-p0007);SQRT(p0007*EXP(p0416^2*p0008)-p0007))
- p1650: 0
- p0607: 0; = IF(p0343<0.5;-SQRT(p0007*EXP(p0475^2*p0008)-p0007);SQRT(p0007*EXP(p0475^2*p0008)-p0007))
- p2299: 0; = p2227*p2206
- p2919: 0.000251094; = p2333*(p1020+p1022)
- p0009: 41.3071
- p2323: 0.000379224; = p2224*p2190
- p4505: 0; = p1950*p3480
- p4608: 0; = p1847*p3481
- p3674: 0; = p1943*p3476
- p2571: 0; = p2375*p1073
- p1811: 0
- p2313: 0; = p2231*p2220
- p0531: 0; = SQRT(2)*(IF((2*p0399-1)<0;-1;IF((2*p0399-1)>0;1;0))*SQRT(SQRT((2/(pi()*0.140012289)+LN(1-(2*p0399-1)^2)/2)^2-LN(1-(2*p0399-1)^2)/0.140012289)-(2/(pi()*0.140012289)+LN(1-(2*p0399-1)^2)/2)))
- p2940: 0; = p2354*(p1020+p1022)
- p3033: 0; = p2252*p1023
- p3044: 0; = p2263*p1082
- p2223: 0.538166; = if(p0765*p0769+p0766*p0770+p0767*p0771+p0768*p0772=0;0;p0770*p0766/(p0765*p0769+p0766*p0770+p0767*p0771+p0768*p0772))
- p0897: 0
- p2849: 0; = p2263*(p1079+p1081)
- p2902: 0.000167054; = p2316*(p1020+p1022)
- p3093: 0; = p2312*p1132
- p0846: 0.290653; = p0841*p0845^3+p0842*p0845^2+p0843*p0845+p0844
- p0257: 2.641
- p1793: 0
- p0081: 0.713
- p2617: 0; = p2421*p1073
- p0979: 0; = IF(p0976=0;0;p0976*p0001/(p0818*p0002))
- p1087: 0; = IF(p1071=0;p1081*(p0710/100)*p0703*1000;0)
- p1279: 0
- p2118: 0.679049
- p2448: 6.59316e-7; = p2252*p1014
- p2873: 0.00103595; = p2287*(p1020+p1022)
- p2047: 1.79896e-13; = p2015*p2045/(p0818*1000000000000)
- p2093: 0.260958
- p3313: 0; = if(and(p1232=0;p3253<>0);p3262*(p3278*(p3282*p1256+p3286*(p1253+p1257)+p1258*p3288+p3298*p3287));0)
- p2130: 4.06807e-6; = p2015*p2058*p2092/(p0818*1000)
- p2570: 0; = p2374*p1014
- p3064: 0; = p2283*p1023
- p2839: 3.59377e-7; = p2253*(p1020+p1022)
- p1901: 0
- p2235: 0; = 1-(p2226+p2227+p2228+p2229)
- p0758: 0
- p3424: 0; = p3367*p1239
- p2554: 0; = p2358*p1014
- p2535: 0.0047702; = p2339*p1073
- p1016: 0.04244; = IF(p1012=0;p0707/100;0)
- p1105: 0.436421
- p5159: 3.47222e-6; = p1780*p3484
- p2101: 0.620397
- p2421: 0; = p2235*p2211
- p0986: 0; = IF(p0982+p0985=1;0;IF(p0982+p0985+p0984>1;1-(p0982+p0985);p0984))
- p2938: 0; = p2352*(p1129+p1131)
- p1840: 0
- p2743: 0; = p2352*(p1128+p1130)
- p1137: 0; = if(p1121=0;p1131*(p0716/100)*p0703*1000;0)
- p0943: 0; = if(and(p0683=0;p0949=0);p0937;0)
- p3149: 0; = p2368*p1023
- p1589: 0
- p3895: 0; = p1962*p3477
- p1273: 0; = p1267*p1252/p0818
- p2691: 0; = p2300*(p1078+p1080)
- p3127: 1.33378e-5; = p2346*p1082
- p2434: 0.000109454; = p2238*p1014
- p2553: 0; = p2357*p1014
- p1645: 0
- p2837: 9.95874e-8; = p2251*(p1020+p1022)
- p2550: 0; = p2354*p1014
- p2652: 0; = p2261*(p1078+p1080)
- p3305: 0; = if(and(p1232=0;p3252<>0);1-(p3301+p3302+p3303+p3304);0)
- p1134: 0; = if(p1121=0;p1128*(p0716/100)*p0703*1000;0)
- p2192: 0.00194251; = p1067-p2189-p2190-p2191
- p3096: 0; = p2315*p1023
- p2412: 0; = p2234*p2202
- p2949: 0; = p2363*(p1020+p1022)
- p0963: 0; = if(and(p0683>0;or(p0807=480;p0807=32;p0807=1;and(p0807=60;p0901<0.03)));p0939;0)
- p2994: 0; = p2408*(p1020+p1022)
- p0008: 0.0739645; = (p0007-1.5)/(p0007-1)^2
- p2268: 0; = p2226*p2214
- p3201: 0; = p2420*p1082
- p2947: 0; = p2361*(p1020+p1022)
- p1993: 400
- p4981: 0; = p1808*p3483
- p2291: 7.66716e-6; = p2223*p2198
- p3260: 0
- p1973: 0; = if(p0807=480;p1968*p0001/(p0818*p0002);0)
- p2089: 0.40001
- p3258: 0
- p0726: 0
- p1567: 0
- p1285: 0; = p1281*p1252/p0818
- p2365: 0; = p2225*p2193
- p2807: 0; = p2416*(p1078+p1080)
- p1167: 0.5
- p1170: 1653.95; = p1169*p0801
- p0151: 0
- p1023: 0; = IF(p1012=0;IF(p1014+p1019+p1020+p1021+p1022=1;0;1-(p1014+p1019+p1020+p1021+p1022));0)
- p2906: 1.67978e-5; = p2320*(p1020+p1022)
- p2310: 0; = p2227*p2217
- p2721: 5.9506e-7; = p2330*(p1019+p1021)
- p1259: 0; = if(p1232>0;0;p0730/100)
- p0991: 0; = p0987*p0886
- p1833: 0
- p2337: 0.00206584; = p2228*p2205
- p1577: 0
- p1688: 0
- p2042: 0.07
- p3123: 3.03895e-5; = p2342*p1082
- p4541: 0; = p1780*p3481
- p2741: 0; = p2350*(p1128+p1130)
- p0744: 0
- p3099: 0; = p2318*p1023
- p2847: 0; = p2261*(p1079+p1081)
- p1655: 0
- p1702: 0
- p1724: 0
- p1818: 0
- p2007: 0.0348158; = ((p1981*p1985+p1987*p1991+p1993*p1997+p2001*p2005)/p0818)*p0005*p0002/1000
- p2669: 2.13628e-5; = p2278*(p1019+p1021)
- p2597: 0; = p2401*p1014
- p3479: 0; = if(p1328+p1330+p1332+p1334+p1336+p1338+p1340+p1342+p1344=0;0;p1334/(p1328+p1330+p1332+p1334+p1336+p1338+p1340+p1342+p1344))
- p3192: 0; = p2411*p1023
- p2039: 3.63311e-6; = p2015*p2037*p2038/(p0818*1000)
- p1720: 0
- p0666: 0; = IF(p0402<0.5;-SQRT(p0007*EXP(p0534^2*p0008)-p0007);SQRT(p0007*EXP(p0534^2*p0008)-p0007))
- p1812: 0
- p3115: 0; = p2334*p1023
- p1042: 0.000264901
- p0987: 0; = if(p0978>0;0;if(and(p0687=0;p0691=0;p0695=0;p0699=0);0;IF(p0982+p0985+p0986=1;0;1-(p0982+p0985+p0986))))
- p2137: 2.823e-7; = p2015*p2065*p2099/(p0818*1000)
- p1693: 0
- p4184: 0; = p1835*p3479
- p0992: 0; = p0988*p0001*p0004/(p0818*p0002)
- p2897: 0; = p2311*(p1129+p1131)
- p2168: 0.00684645; = p2166*(p0903)
- p0906: 0.00423333
- p2272: 0; = p2230*p2218
- p0904: 1.13295e8; = p0825*p0901+(p0830+p0895)*p0824*p0903
- p0534: 0; = SQRT(2)*(IF((2*p0402-1)<0;-1;IF((2*p0402-1)>0;1;0))*SQRT(SQRT((2/(pi()*0.140012289)+LN(1-(2*p0402-1)^2)/2)^2-LN(1-(2*p0402-1)^2)/0.140012289)-(2/(pi()*0.140012289)+LN(1-(2*p0402-1)^2)/2)))
- p3190: 0; = p2409*p1023
- p0689: 0
- p2485: 0.00885428; = p2289*p1014
- p0213: 7.915
- p3153: 0; = p2372*p1023
- p1210: 0.13
- p0803: 0
- p1118: 0.000759745; = IF(p1071=0;p1108/(p1113*p0818);0)
- p2823: 0.000123619; = p2237*(p1020+p1022)
- p5334: 1.76768e-5; = p1955*p3484
- p1949: 0
- p1954: 0
- p0789: 100; = p0129*(1+p0657*p0261/100)
- p2201: 0.00355498; = 12.01*p2200/(2*14.0067)
- p4510: 0; = p1955*p3480
- p1748: 0
- p0063: 1750
- p2932: 0; = p2346*(p1079+p1081)
- p1276: 0; = p1272*p1252/p0818
- p0967: 0
- p0499: 0; = SQRT(2)*(IF((2*p0367-1)<0;-1;IF((2*p0367-1)>0;1;0))*SQRT(SQRT((2/(pi()*0.140012289)+LN(1-(2*p0367-1)^2)/2)^2-LN(1-(2*p0367-1)^2)/0.140012289)-(2/(pi()*0.140012289)+LN(1-(2*p0367-1)^2)/2)))
- p3176: 0; = p2395*p1023
- p1800: 0
- p2330: 5.66023e-6; = p2224*p2198
- p3578: 0; = p1847*p3476
- p2236: 0; = 1-(p2230+p2231+p2232+p2233)
- p3432: 0; = p3375*p1239
- p1068: 0.0360925; = IF(p1012=0;p1054/(p1061*p0818);0)
- p1760: 0
- p2257: 0.00037854; = p2222*p2203
- p2725: 2.13702e-5; = p2334*(p1019+p1021)
- p2232: 1; = if(p0783*p0787+p0784*p0788+p0785*p0789+p0786*p0790=0;0;p0789*p0785/(p0783*p0787+p0784*p0788+p0785*p0789+p0786*p0790))
- p3344: 0; = if(and(p1232=0;p3254<>0);p3254-(p3339+p3340+p3341+p3342+p3343);0)
- p2766: 0; = p2375*(p1078+p1080)
- p0898: 0.45865
- p0983: 0; = if(p0886=0;0;min(1;(p0695*p0694*1000*p0697/100)/p0886))
- p1814: 0
- p0788: 0
- p1981: 400
- p1566: 0
- p3040: 0; = p2259*p1082
- p2430: 0; = p2236*p2220
- p1551: 0
- p2598: 0; = p2402*p1014
- p3211: 0; = p2430*p1132
- p2405: 0; = p2234*p2195
- p2052: 7.38614e-6; = p2015*p2049*(1-p2050)/(p0818*1000)
- p0271: 2.641
- p2995: 0; = p2409*(p1020+p1022)
- p3473: 0; = p3378*p1241
- p2900: 0; = p2314*(p1129+p1131)
- p3023: 0; = p2242*p1023
- p2591: 0; = p2395*p1014
- p0870: 0; = p0858*p0856
- p3392: 0; = p3373*p1234
- p1220: 0; = IF(p1218<0.5;-SQRT(p1214*EXP(p1219^2*p1215)-p1214);SQRT(p1214*EXP(p1219^2*p1215)-p1214))
- p0672: 0
- p3221: 0.146975; = IF(p3216=0;0;p1223*12.0107/100.0869+(1-p1224)*12.0107/84.3139)
- p0847: 0
- p1044: 0.0115234; = IF(p1012=0;IF(p1037=1;0;IF(p1037+p1038>1;1-p1037;p1038));0)
- p3151: 0; = p2370*p1023
- p2812: 0; = p2421*(p1078+p1080)
- p2173: 0.128656; = p0895*p0898/p0818
- p3283: 0
- p3681: 0; = p1950*p3476
- p1876: 0
- p0857: 4.9284; = p0856*p0001*p0003/(p0818*p0002)
- p3686: 0; = p1955*p3476
- p1743: 0
- p0835: 903.139; = -LN(1-p0669/100)/p0834
- p3078: 0; = p2297*p1082
- p0965: 0; = IF(p0684/100=1;0;IF(p0684/100+p0685/100>1;1-p0684/100;p0685/100))
- p0988: 0; = p0982*p0886
- p0307: 0.5
- p1712: 0
- p4557: 0; = p1796*p3481
- p1281: 0; = IF(p1277+p1280=p1263;0;IF(p1277+p1280+p1279>p1263;p1263-(p1277+p1280);p1279))
- p2809: 0; = p2418*(p1078+p1080)
- p2077: 0.043
- p2986: 0; = p2400*(p1020+p1022)
- p3089: 0; = p2308*p1082
- p1937: 0
- p1928: 0
- p3146: 0; = p2365*p1023
- p0004: 0.0254
- p2306: 0; = p2227*p2213
- p2829: 3.4906e-5; = p2243*(p1020+p1022)
- p2505: 0; = p2309*p1073
- p2622: 0; = p2426*p1073
- p5220: 3.15657e-7; = p1841*p3484
- p0446: 0; = SQRT(2)*(IF((2*p0314-1)<0;-1;IF((2*p0314-1)>0;1;0))*SQRT(SQRT((2/(pi()*0.140012289)+LN(1-(2*p0314-1)^2)/2)^2-LN(1-(2*p0314-1)^2)/0.140012289)-(2/(pi()*0.140012289)+LN(1-(2*p0314-1)^2)/2)))
- p2057: 3.28794
- p0441: 0; = SQRT(2)*(IF((2*p0309-1)<0;-1;IF((2*p0309-1)>0;1;0))*SQRT(SQRT((2/(pi()*0.140012289)+LN(1-(2*p0309-1)^2)/2)^2-LN(1-(2*p0309-1)^2)/0.140012289)-(2/(pi()*0.140012289)+LN(1-(2*p0309-1)^2)/2)))
- p3054: 0; = p2273*p1132
- p0812: 0; = if(p0807=480;0.095/0.34;0)
- p2176: 0.00337742; = p0895*p0913/p0818
- p3185: 0; = p2404*p1023
- p3252: 0; = p1252*(p1267*(1-p3247)+p1270*(1-p3248)+p1271*(1-p3249)+p1272*(1-p3250))
- p0757: 0
- p2733: 1.22615e-5; = p2342*(p1078+p1080)
- p2713: 3.48303e-5; = p2322*(p1019+p1021)
- p3262: 0
- p2281: 0.000127988; = p2223*p2187
- p0591: 0; = IF(p0327<0.5;-SQRT(p0007*EXP(p0459^2*p0008)-p0007);SQRT(p0007*EXP(p0459^2*p0008)-p0007))
- p2025: 9.51773e-6; = p2015*p2023*p2024/(p0818*1000)
- p0308: 0.5
- p3116: 0; = p2335*p1023
- p2920: 3.6138e-5; = p2334*(p1020+p1022)
- p2626: 0; = p2430*p1123
- p0917: 1.19318
- p2186: 0.00165244; = p1052/p0818
- p2083: 2.17294
- p3338: 0; = if(and(p1232=0;p3254<>0);1-(p3334+p3335+p3336+p3337);0)
- p1825: 0
- p0760: 0
- p1600: 0
- p1694: 0
- p2953: 0; = p2367*(p1020+p1022)
- p0235: 0
- p1726: 0
- p1244: 0; = if(p1232>0;0;p1239*(p0725/100)*p0723*1000)
- p1337: 0; = p1336*p0001/(p0818*p0002)
- p1163: 0.00462046
- p2296: 0.00315665; = p2223*p2203
- p3411: 0; = p3373*p1238
- p2163: 0.0021885; = (p2017-p2020)/p0818-(p2025+p2028+p2033+p2034+p2051+p2125+p2126+p2127+p2128+p2129+p2130+p2131+p2132+p2133+p2134+p2135+p2136+p2137+p2138+p2139+p2140+p2141+p2142+p2143+p2144+p2145+p2146+p2147+p2148+p2149+p2150+p2151+p2152+p2153+p2154+p2155+p2156+p2157)
- p0742: 96.511; = p0082*(1+p0610*p0214/100)
- p2078: 0.117
- p2990: 0; = p2404*(p1020+p1022)
- p3406: 0; = p3368*p1238
- p0852: 0; = p0847*p0851^3+p0848*p0851^2+p0849*p0851+p0850
- p2811: 0; = p2420*(p1078+p1080)
- p0810: 0
- p0705: 71.709; = p0045*(1+p0573*p0177/100)
- p1181: 0.000142822
- p2066: 0.109412
- p3447: 0; = p3371*p1240
- p1246: 0; = if(p1232>0;0;p1241*(p0725/100)*p0723*1000)
- p2234: 0; = 1-(p2222+p2223+p2224+p2225)
- p2573: 0; = p2377*p1073
- p2145: 1.9965e-6; = p2015*p2073*p2107/(p0818*1000)
- p3689: 0; = p1962*p3476
- p2619: 0; = p2423*p1073
- p3381: 0; = p3362*p1234
- p3312: 0; = if(and(p1232=0;p3253<>0);p3261*p3277*(p3298*p3290+(1-p3298)*p3294);0)
- p0051: 85.881
- p1141: 0; = if(p1121=0;p1135*p0001/(p0818*p0002);0)
- p3107: 0; = p2326*p1023
- p2112: 0.856281
- p0861: 0; = p0673*1000/p0856
- p0748: 0
- p3233: 0.60394
- p0981: 0.00049284; = p0978*p0001/(p0818*p0002)
- p2650: 0; = p2259*(p1078+p1080)
- p2497: 0; = p2301*p1073
- p2371: 0; = p2225*p2200
- p2582: 0; = p2386*p1073
- p2117: 0.585147
- p1647: 0
- p1994: 750
- p3978: 0; = p1835*p3478
- p2526: 4.05889e-6; = p2330*p1014
- p0871: 0; = p0870*p0001*p0003/(p0818*p0002)
- p2149: 2.20793e-7; = p2015*p2077*p2111/(p0818*1000)
- p3399: 0; = p3380*p1234
- p5225: 4.73485e-6; = p1846*p3484
- p2495: 0; = p2299*p1073
- p0920: 0.317899; = p0676*1000/p0801
- p1254: 0; = if(p1232>0;0;p0736/100)
- p1089: 0.000297989; = IF(p1071=0;p1083*p0001/(p0818*p0002);0)
- p0855: 1.43245; = p0854*p0001*p0003/(p0818*p0002)
- p2988: 0; = p2402*(p1020+p1022)
- p3102: 0; = p2321*p1023
- p4093: 0; = p1950*p3478
- p1590: 0
- p2545: 0.000586983; = p2349*p1073
- p0713: 0
- p3298: 0; = if(p1283+p1284+p1285+p1286=0;0;p1283/(p1283+p1284+p1285+p1286))
- p2462: 0; = p2266*p1073
- p1925: 0
- p3208: 0; = p2427*p1082
- p1986: 4200
- p1178: 2.386e-7; = p1176/p0818
- p1904: 0
- p2924: 0; = p2338*(p1079+p1081)
- p0982: 0; = if(p0886=0;0;min(1;(p0691*p0690*1000*p0693/100)/p0886))
- p1575: 0
- p2403: 0; = p2234*p2192
- p3810: 0; = p1873*p3477
- p2099: 0.620397
- p0375: 0.5
- p1215: 0; = IF(p1214=0;0;(p1214-1.5)/(p1214-1)^2)
- p0001: 0.404686
- p2404: 0; = p2234*p2193
- p3066: 0; = p2285*p1023
- p0727: 0
- p0703: 1750; = p0043*(1+p0571*p0175/100)
- p3039: 0; = p2258*p1082
- p3443: 0; = p3367*p1240
- p2826: 1.49217e-5; = p2240*(p1020+p1022)
- p1033: 1.92089e-5; = IF(p1012=0;p1027*p0001/(p0818*p0002);0)
- p2219: 0.000424045; = p1154-p2218
- p2488: 1.2088e-5; = p2292*p1014
- p1292: 0; = IF(p1287+p1290+p1291=p1261;0;p1261-(p1287+p1290+p1291))
- p3416: 0; = p3378*p1238
- p0018: 694.98
- p4926: 0; = p1963*p3482
- p1796: 2.52525e-6; = p1388*1000/p0818
- p2376: 0; = p2229*p2205
- p1115: 0.237849
- p2324: 9.53649e-5; = p2224*p2191
- p1606: 0
- p3413: 0; = p3375*p1238
- p0710: 70.404; = p0050*(1+p0578*p0182/100)
- p1306: 0; = p1302*p1252/p0818
- p2930: 0; = p2344*(p1079+p1081)
- p0984: 0; = if(p0886=0;0;min(1;(p0699*p0698*1000*p0701/100)/p0886))
- p2169: 0.00104666; = p2166*(p0908)
- p3111: 0; = p2330*p1023
- p1328: 0; = p1319*p0801
- p1132: 1; = if(p1121=0;IF(p1123+p1128+p1129+p1130+p1131=1;0;1-(p1123+p1128+p1129+p1130+p1131));0)
- p1280: 0; = IF(p1277=p1263;0;IF(p1277+p1278>p1263;p1263-p1277;p1278))
- p2668: 0.000133814; = p2277*(p1019+p1021)
- p1707: 0
- p0571: 0; = IF(p0307<0.5;-SQRT(p0007*EXP(p0439^2*p0008)-p0007);SQRT(p0007*EXP(p0439^2*p0008)-p0007))
- p2334: 0.000203274; = p2224*p2202
- p0644: 0; = IF(p0380<0.5;-SQRT(p0007*EXP(p0512^2*p0008)-p0007);SQRT(p0007*EXP(p0512^2*p0008)-p0007))
- p2546: 0; = p2350*p1123
- p5187: 5.99747e-6; = p1808*p3484
- p2968: 0; = p2382*(p1079+p1081)
- p2259: 0; = p2226*p2205
- p0806: 5.28e7
- p2675: 5.40036e-5; = p2284*(p1019+p1021)
- p3362: 0; = if(p1232=0;p3244*p3356/p0818;0)
- p3241: 5.59317e-10; = p3234*p1188*p3236/p0818
- p1927: 0
- p1710: 0
- p1961: 0.5
- p2217: 0.000683484; = p1118-p2216
- p2209: 0.000699641; = 14.0067*p2208/30.973762
- p3216: 0.06; = IF(OR(p1226=0;p1228=0);0;1-p3213-p3214-p3215)
- p1874: 0
- p2952: 0; = p2366*(p1020+p1022)
- p1601: 0
- p2238: 0.000152637; = p2222*p2183
- p2498: 0; = p2302*p1073
- p1155: 0.000103431; = if(p1153*p0818=0;0;p1151/(p1153*p0818))
- p1664: 0
- p2225: 0; = if(p0765*p0769+p0766*p0770+p0767*p0771+p0768*p0772=0;0;p0772*p0768/(p0765*p0769+p0766*p0770+p0767*p0771+p0768*p0772))
- p1990: 30
- p2738: 2.03081e-5; = p2347*(p1078+p1080)
- p4145: 0; = p1796*p3479
- p2292: 1.6857e-5; = p2223*p2199
- p2482: 0.000749641; = p2286*p1014
- p1233: 0.00049284; = p1232*p0001/(p0818*p0002)
- p4204: 0; = p1855*p3479
- p2576: 0; = p2380*p1073
- p2407: 0; = p2234*p2197
- p0950: 0; = if(and(p0683=0;or(p0807=480;p0807=32;p0807=1;and(p0807=60;p0901<0.03)));p0938;0)
- p3586: 0; = p1855*p3476
- p1330: 0; = p1320*p0801
- p2370: 0; = p2225*p2199
- p2796: 0; = p2405*(p1019+p1021)
- p1313: 0; = p1307*p1252/p0818
- p1671: 0
- p2360: 0; = p2225*p2188
- p3421: 0; = p3364*p1239
- p1838: 0
- p2359: 0; = p2225*p2187
- p2781: 0; = p2390*(p1128+p1130)
- p0931: 288912; = p0801*p0925
- p1286: 0; = p1282*p1252/p0818
- p1583: 0
- p5008: 0; = p1835*p3483
- p0895: 8.88657e8; = p0894*p0830
- p1701: 0
- p3121: 0.000155644; = p2340*p1082
- p1139: 0; = if(p1121=0;p1133*p0001/(p0818*p0002);0)
- p3326: 0; = if(and(p1232=0;p3255<>0);p3268*p3289;0)
- p1618: 0
- p3132: 0.000424045; = p2351*p1132
- p0183: 7.863
- p2249: 0.000149792; = p2222*p2195
- p0694: 0
- p3438: 0; = p3362*p1240
- p2237: 0.000695346; = p2222*p2182
- p3224: 0.501945; = IF(p3216=0;0;1-p3221-p3222-p3223)
- p1234: 0; = if(p1232>0;0;p0726/100)
- p3939: 0; = p1796*p3478
- p1047: 0.330448; = IF(p1012=0;IF(p1037+p1044+p1045+p1046=1;0;IF(p1037+p1044+p1045+p1046+p1041>1;1-(p1037+p1044+p1045+p1046);p1041));0)
- p2683: 1.77218e-6; = p2292*(p1019+p1021)
- p3134: 6.5651e-5; = p2353*p1132
- p2534: 0.00057452; = p2338*p1073
- p1612: 0
- p2670: 7.35828e-5; = p2279*(p1019+p1021)
- p2429: 0; = p2236*p2219
- p1578: 0.6832
- p3209: 0; = p2428*p1132
- p2172: 0.272159; = p2166-(p2167+p2168+p2169+p2170)
- p2205: 0.00206584; = 2*14.0067*p2204/30.973762
- p2688: 0; = p2297*(p1078+p1080)
- p3207: 0; = p2426*p1082
- p2080: 0.025
- p1827: 0
- p0631: 0; = IF(p0367<0.5;-SQRT(p0007*EXP(p0499^2*p0008)-p0007);SQRT(p0007*EXP(p0499^2*p0008)-p0007))
- p2914: 0.00162055; = p2328*(p1020+p1022)
- p0702: 1750; = p0042*(1+p0570*p0174/100)
- p1714: 0
- p1755: 0
- p0042: 1750
- p3265: 0
- p0829: 0; = if(p0807=480;p0814*(1-p0824);0)
- p0248: 4.91
- p3251: 0; = p1252-(p3252+p3253+p3254+p3255+p3256)
- p1255: 0; = if(p1232>0;0;p0737/100)
- p3003: 0; = p2417*(p1079+p1081)
- p1953: 0
- p0242: 13.81
- p2848: 0; = p2262*(p1079+p1081)
- p2768: 0; = p2377*(p1078+p1080)
- p2070: 0.282
- p1963f: 3.31955e-5; = p1647*p1851+p1648*p1852+p1649*p1853+p1650*p1854+p1651*p1855+p1652*p1856+p1653*p1857+p1654*p1858+p1655*p1859+p1656*p1860+p1657*p1861+p1658*p1862+p1659*p1863+p1660*p1864+p1661*p1865+p1662*p1866+p1663*p1867+p1664*p1868+p1665*p1869+p1666*p1870
- p2648: 3.97959e-5; = p2257*(p1019+p1021)
- p2388: 0; = p2229*p2217
- p1201: 0.65
- p1570: 0
- p1009: 0; = p1005*p0001*p0004/(p0818*p0002)
- p3084: 0; = p2303*p1082
- p1339: 0; = p1338*p0001/(p0818*p0002)
- p3395: 0; = p3376*p1234
- p0728: 0
- p0735: 0
- p1158: 0.0211809; = p1156*p1157
- p3250: 0
- p2152: 1.24781e-7; = p2015*p2080*p2114/(p0818*1000)
- p1716: 0
- p3047: 0; = p2266*p1082
- p3269: 0
- p2907: 0.000214889; = p2321*(p1020+p1022)
- p2333: 0.00141238; = p2224*p2201
- p1656: 0
- p2517: 0.000866772; = p2321*p1014
- p3175: 0; = p2394*p1023
- p1018: 0.13534; = IF(p1012=0;p0709/100;0)
- p1081: 0; = IF(p1071=0;IF(p1073+p1078+p1079+p1080=1;0;IF(p1073+p1078+p1079+p1080+p1077>1;1-(p1073+p1078+p1079+p1080);p1077));0)
- p2469: 0; = p2273*p1123
- p1605: 0
- p3303: 0; = if(and(p1232=0;p3252<>0);p3259*p3289;0)
- p0110: 56.692
- p3456: 0; = p3380*p1240
- p1329: 0; = p1328*p0001/(p0818*p0002)
- p1786: 0
- p1262: 0; = if(p1232>0;0;p0733/100)
- p2760: 0; = p2369*(p1019+p1021)
- p1740: 0
- p4917: 0; = p1950*p3482
- p1759: 8.20707e-6; = p1351*1000/p0818
- p2188: 0.00304239; = p1066-p2186-p2187
- p2637: 1.62855e-6; = p2246*(p1019+p1021)
- p2967: 0; = p2381*(p1079+p1081)
- p2655: 0; = p2264*(p1078+p1080)
- p0377: 0.5
- p4131: 0; = p1782*p3479
- p0078: 1750
- p0043: 1750
- p0393: 0.5
- p2269: 0; = p2226*p2215
- p2218: 0.00030091; = p1150/p0818
- p2559: 0; = p2363*p1014
- p0685: 0
- p3386: 0; = p3367*p1234
- p1886: 0
- p0712: 4.059; = p0052*(1+p0580*p0184/100)
- p1677: 0
- p1766: 0
- p2818: 0; = p2427*(p1078+p1080)
- p2420: 0; = p2235*p2210
- p0892: 0; = if(p0891=0;0;(1-p1240)*p3251/p0891)
- p3141: 0; = p2360*p1023
- p3168: 0; = p2387*p1082
- p0951: 3.0475e-5; = if(and(p0683=0;or(p0807=480;p0807=32;p0807=1;and(p0807=60;p0901<0.03)));p0939;0)
- p2159: 1.07166e-5; = p2015*p2083*p2121/(p0818*1000)
- p0342: 0.5
- p0135: 62.961
- p0837: 0.5
- p0989: 0; = p0985*p0886
- p0732: 0
- p3778: 0; = p1841*p3477
- p3384: 0; = p3365*p1234
- p1853: 0
- p1732: 0
- p3334: 0; = IF(or(p3254=0;p1232>0);0;p3269*p3277*(p3300*p3292+(1-p3300)*p3296))
- p2143: 8.04238e-7; = p2015*p2071*p2105/(p0818*1000)
- p1848: 0
- p2393: 0; = p2234*p2182
- p1719: 0
- p3284: 0
- p2933: 0; = p2347*(p1079+p1081)
- p3074: 0; = p2293*p1023
- p3045: 0; = p2264*p1082
- p2146: 1.23916e-7; = p2015*p2074*p2108/(p0818*1000)
- p2658: 0; = p2267*(p1078+p1080)
- p2771: 0; = p2380*(p1078+p1080)
- p4108: 0; = p1759*p3479
- p0882: 1.75e6; = p0869*p0856
- p2191: 0.000240034; = 8*1.00794*p2189/(2*14.0067)
- p0763: 1750; = p0103*(1+p0631*p0235/100)
- p1542: 1
- p1834: 0
- p0270: 10.273
- p1032: 1.97057e-5; = IF(p1012=0;p1026*p0001/(p0818*p0002);0)
- p2896: 0; = p2310*(p1079+p1081)
- p2305: 0; = p2227*p2212
- p3087: 0; = p2306*p1082
- p0874: 0; = p0865*p0856
- p2255: 0.000229424; = p2222*p2201
- p1027: 68207.9; = IF(p1012=0;p1021*(p0704/100)*p0703*1000;0)
- p3379: 0; = if(p1232=0;p3246*p3361/p0818;0)
- p0311: 0.5
- p1599: 0
- p0804: 0
- p1083: 1.05811e6; = IF(p1071=0;p1073*(p0710/100)*p0703*1000;0)
- p1924: 0
- p1706: 0
- p2086: 0.0617647
- p0914: 5.62704e7; = p0825*p0911+(p0830+p0895)*p0824*p0913
- p3231: 2.386e-7; = p1176/p0818
- p2929: 0; = p2343*(p1079+p1081)
- p1596: 0
- p1320: 0; = IF(((p0745*1000*p0747/100)+(p0754*1000*p0756/100))/p0801<0;0;((p0745*1000*p0747/100)+(p0754*1000*p0756/100))/p0801)
- p1166: 2.55234e-6; = p1164/p0818
- p0911: 0.00503333
- p1862: 0
- p0863: 0; = p0675*1000/p0856
- p2129: 7.39051e-6; = p2015*p2057*p2091/(p0818*1000)
- p1049: 0.25306; = IF(p1012=0;IF(p1037+p1044+p1045+p1046+p1047+p1048=1;0;1-(p1037+p1044+p1045+p1046+p1047+p1048));0)
- p3267: 0
- p1963h: 0; = p1686*p1890+p1687*p1891+p1688*p1892+p1689*p1893+p1690*p1894+p1691*p1895+p1692*p1896+p1693*p1897+p1694*p1898+p1695*p1899+p1696*p1900+p1697*p1901+p1698*p1902+p1699*p1903+p1700*p1904+p1701*p1905+p1702*p1906+p1703*p1907+p1704*p1908+p1705*p1909
- p1067: 0.00397095; = IF(p1012=0;p1053/(p1060*p0818);0)
- p3032: 0; = p2251*p1023
- p2857: 0; = p2271*(p1079+p1081)
- p2336: 0.00228415; = p2228*p2204
- p1014: 0.71709; = IF(p1012=0;p0705/100;0)
- p0912: 0
- p2000: 4000
- p2755: 0; = p2364*(p1019+p1021)
- p1225: 1.088; = IF(p1221=0;0;p1223+1.2*p1224)
- p1912: 0
- p2157: 2.51502e-7; = p2015*p2086*p2119/(p0818*1000)
- p2633: 1.61355e-6; = p2242*(p1019+p1021)
- p2859: 0; = p2273*(p1129+p1131)
- p1910: 0
- p2048: 5.99653e-14; = p2015*p2046/(p0818*1000000000000)
- p3351: 0; = if(and(p1232=0;p3256<>0);p3256*(p3274-p3346)/p3349;0)
- p1266: 0; = if(p1232>0;0;IF(p1259+p1263+p1264+p1265=1;0;1-(p1259+p1263+p1264+p1265)))
- p1221: 0.0583196
- p2501: 0; = p2305*p1073
- p0512: 0; = SQRT(2)*(IF((2*p0380-1)<0;-1;IF((2*p0380-1)>0;1;0))*SQRT(SQRT((2/(pi()*0.140012289)+LN(1-(2*p0380-1)^2)/2)^2-LN(1-(2*p0380-1)^2)/0.140012289)-(2/(pi()*0.140012289)+LN(1-(2*p0380-1)^2)/2)))
- p2817: 0; = p2426*(p1078+p1080)
- p1944: 0
- p1978: 244
- p2692: 0; = p2301*(p1078+p1080)
- p2060: 0.272353
- p5133: 9.53283e-5; = p1754*p3484
- p2094: 0.922577
- p0306: 0.5
- p3402: 0; = p3364*p1238
- p0371: 0.5
- p1226: 1.75e6; = IF(p1221=0;0;IF(p1193=0;p0801;0))
- p1229: 0.00117843; = IF(p1221=0;0;p1228*p1221)
- p3308: 0; = if(and(p1232=0;p3252<>0);p3252*(p3259-p3303)/p3305;0)
- p2922: 0; = p2336*(p1079+p1081)
- p1843: 0
- p2776: 0; = p2385*(p1078+p1080)
- p1316: 0; = p1312*p1252/p0818
- p3343: 0; = if(and(p1232=0;p3254<>0);IF((p3339+p3340+p3341+p3342)+(p3254*(p3269*(1-p3277))/p3338)>p3254;p3254-(p3339+p3340+p3341+p3342);p3254*(p3269*(1-p3277))/p3338);0)
- p2901: 0.000761023; = p2315*(p1020+p1022)
- p1770: 0
- p1802: 0
- p1963d: 0; = p1608*p1812+p1609*p1813+p1610*p1814+p1611*p1815+p1612*p1816+p1613*p1817+p1614*p1818+p1615*p1819+p1616*p1820+p1617*p1821+p1618*p1822+p1619*p1823+p1620*p1824+p1621*p1825+p1622*p1826+p1623*p1827+p1624*p1828+p1625*p1829+p1626*p1830+p1627*p1831
- p2888: 0; = p2302*(p1079+p1081)
- p2056: 2.07882
- p2767: 0; = p2376*(p1078+p1080)
- p1616: 0
- p3318: 0; = if(and(p1232=0;p3253<>0);p3253*(p3262-p3313)/p3316;0)
- p2353: 6.5651e-5; = p2232*p2221
- p2013: 0.85
- p1880: 0
- p2001: 400
- p1343: 0; = p1342*p0001/(p0818*p0002)
- p2358: 0; = p2225*p2186
- p1900: 0
- p0862: 0; = p0674*1000/p0856
- p0212: 2.032
- p4716: 0; = p1955*p3481
- p4086: 0; = p1943*p3478
- p4196: 0; = p1847*p3479
- p0700: 0
- p3259: 0
- p2943: 0; = p2357*(p1020+p1022)
- p3021: 0; = p2240*p1023
- p2955: 0; = p2369*(p1020+p1022)
- p2308: 0; = p2227*p2215
- p1883: 0
- p1171: 0.00049284; = p0801*p0001/(p0818*p0002)
- p2160: 4.29657e-7; = p2015*p2084*p2122/(p0818*1000)
- p3373: 0; = if(p1232=0;p3245*p3361/p0818;0)
- p1076: 0; = IF(p1071=0;p0714/100;0)
- p3126: 5.79251e-6; = p2345*p1082
- p2660: 0; = p2269*(p1078+p1080)
- p2819: 0; = p2428*(p1128+p1130)
- p0176: 2.73
- p1133: 0; = if(p1121=0;p1123*(p0716/100)*p0703*1000;0)
- p2034: 1.77925e-5; = p2015*p2030*p2032/(p0818*1000)
- p0701: 0
- p0692: 0
- p3355: 0; = if(and(p1232=0;p3256<>0);p3256-(p3350+p3351+p3352+p3353+p3354);0)
- p1162: 0.000552399; = p1161/p0818
- p1148: 0.111546; = if(p1121=0;IF(p1146=1;0;1-p1146);0)
- p0697: 0
- p2860: 0; = p2274*(p1129+p1131)
- p0344: 0.5
- p4190: 0; = p1841*p3479
- p0448: 0; = SQRT(2)*(IF((2*p0316-1)<0;-1;IF((2*p0316-1)>0;1;0))*SQRT(SQRT((2/(pi()*0.140012289)+LN(1-(2*p0316-1)^2)/2)^2-LN(1-(2*p0316-1)^2)/0.140012289)-(2/(pi()*0.140012289)+LN(1-(2*p0316-1)^2)/2)))
- p1140: 0; = if(p1121=0;p1134*p0001/(p0818*p0002);0)
- p0813: 0; = if(p0807=480;1.56521739130435;0)
- p3178: 0; = p2397*p1023
- p1282: 0; = IF(p1277+p1280+p1281=p1260;0;p1260-(p1277+p1280+p1281))
- p2127: 1.34199e-5; = p2015*p2055*p2089/(p0818*1000)
- p1976: 0.115222
- p1662: 0
- p1190: 1.00174e-7; = p1188/p0818
- p2114: 0.832356
- p3469: 0; = p3374*p1241
- p1192: 5.00869e-8; = p1188*p1191/p0818
- p0764: 94.213; = p0104*(1+p0632*p0236/100)
- p2581: 0; = p2385*p1073
- p2283: 0.000448777; = p2223*p2189
- p3147: 0; = p2366*p1023
- p1579: 0
- p2629: 1.60467e-5; = p2238*(p1019+p1021)
- p1206: 0.023475
- p0238: 9.679
- p0865: 0; = IF(p0858+p0864=1;0;IF(p0858+p0864+p0860>1;1-(p0858+p0864);p0860))
- p2808: 0; = p2417*(p1078+p1080)
- p2636: 6.47602e-6; = p2245*(p1019+p1021)
- p1010: 0; = p0890
- p2382: 0; = p2229*p2211
- p1561: 0
- p3372: 0; = if(p1232=0;p3245*p3360/p0818;0)
- p1196: 0.59
- p3049: 0; = p2268*p1082
- p0606: 0; = IF(p0342<0.5;-SQRT(p0007*EXP(p0474^2*p0008)-p0007);SQRT(p0007*EXP(p0474^2*p0008)-p0007))
- p1878: 0
- p1030: 0.000332959; = IF(p1012=0;p1024*p0001/(p0818*p0002);0)
- p3434: 0; = p3377*p1239
- p3307: 0; = if(and(p1232=0;p3252<>0);p3252*(p3258-p3302)/p3305;0)
- p1940: 0
- p3206: 0; = p2425*p1082
- p0866: 0; = IF(p0858+p0864+p0865=1;0;IF(p0858+p0864+p0865+p0861>1;1-(p0858+p0864+p0865);p0861))
- p1737: 0
- p2540: 4.72896e-6; = p2344*p1073
- p5128: 0; = p1955*p3483
- p2312: 0; = p2231*p2219
- p1595: 0
- p1294: 0; = p1290*p1252/p0818
- p2019: 0.13105
- p2564: 0; = p2368*p1014
- p2765: 0; = p2374*(p1019+p1021)
- p1631: 0.5
- p1202: 0.7
- p3322: 0; = if(and(p1232=0;p3253<>0);p3253-(p3317+p3318+p3319+p3320+p3321);0)
- p3210: 0; = p2429*p1132
- p2335: 0.00233037; = p2224*p2203
- p0791: 0
- p0002: 0.453592
- p2153: 9.75596e-9; = p2015*p2081*p2115/(p0818*1000)
- p4098: 0; = p1955*p3478
- p2005: 1.89719e6; = p1963*p0818+p1959*1000+p1170+p1176+p1182
- p2830: 9.56751e-6; = p2244*(p1020+p1022)
- p0775: 0
- p1102: 0.01885; = IF(p1071=0;IF(p1096+p1101=1;0;IF(p1096+p1101+p1098>1;1-(p1096+p1101);p1098));0)
- p0698: 0
- p1992: 3900
- p2542: 0.000113863; = p2346*p1073
- p2026: 55.14
- p1203: 3
- p3079: 0; = p2298*p1082
- p2162: 9.77659e-8; = p2015*p2086*p2124/(p0818*1000)
- p2214: 0.000132582; = p1107/p0818
- p1217: 0
- p1996: 30
- p0752: 0
- p2544: 6.54935e-5; = p2348*p1073
- p2166: 0.529089; = p2165*p0824
- p2148: 2.92679e-7; = p2015*p2076*p2110/(p0818*1000)
- p3177: 0; = p2396*p1023
- p2134: 1.09841e-5; = p2015*p2062*p2096/(p0818*1000)
- p2082: 0.285294
- p2562: 0; = p2366*p1014
- p0838: 1.71335e9; = (p0833-p0836)*p0837
- p0881: 0; = p0880*p0001*p0003/(p0818*p0002)
- p4129: 0; = p1780*p3479
- p3165: 0; = p2384*p1082
- p3415: 0; = p3377*p1238
- p3159: 0; = p2378*p1082
- p2680: 0.00129809; = p2289*(p1019+p1021)
- p3142: 0; = p2361*p1023
- p2010: 0.00261118; = ((p1984*p1985+p1990*p1991+p1996*p1997+p2004*p2005)/p0818)*p0005*p0002/1000
- p2993: 0; = p2407*(p1020+p1022)
- p3477: 0; = if(p1328+p1330+p1332+p1334+p1336+p1338+p1340+p1342+p1344=0;0;p1330/(p1328+p1330+p1332+p1334+p1336+p1338+p1340+p1342+p1344))
- p0844: 0.292241
- p1176: 755.886; = p1175*p0801
- p2087: 0.856281
- p1638: 0
- p5123: 0; = p1950*p3483
- p3350: 0; = if(and(p1232=0;p3256<>0);p3256*(p3273*p3277-p3345)/p3349;0)
- p2620: 0; = p2424*p1073
- p1823: 0
- p2795: 0; = p2404*(p1019+p1021)
- p2275: 0; = p2230*p2221
- p2181: 6.0499e-8; = p0887+p0889+p0893+p2180
- p1015: 0.06376; = IF(p1012=0;p0706/100;0)
- p2394: 0; = p2234*p2183
- p2079: 0.02
- p1053: 2.64179e6; = IF(p1012=0;p1046*p1036;0)
- p2124: 0.263965
- p0962: 0; = if(and(p0683>0;or(p0807=480;p0807=32;p0807=1;and(p0807=60;p0901<0.03)));p0938;0)
- p2832: 2.75396e-6; = p2246*(p1020+p1022)
- p1798: 0
- p1608: 0
- p3405: 0; = p3367*p1238
- p3219: 0.00910885; = p3215*p1228
- p1718: 0
- p1750: 0
- p0664: 0; = IF(p0400<0.5;-SQRT(p0007*EXP(p0532^2*p0008)-p0007);SQRT(p0007*EXP(p0532^2*p0008)-p0007))
- p3309: 0; = if(and(p1232=0;p3252<>0);p3252*(p3260-p3304)/p3305;0)
- p5014: 0; = p1841*p3483
- p0570: 0; = IF(p0306<0.5;-SQRT(p0007*EXP(p0438^2*p0008)-p0007);SQRT(p0007*EXP(p0438^2*p0008)-p0007))
- p2529: 0.00101281; = p2333*p1014
- p0773: 70.404; = p0113*(1+p0641*p0245/100)
- p2155: 7.36859e-7; = p2015*p2084*p2117/(p0818*1000)
- p3419: 0; = p3362*p1239
- p3068: 0; = p2287*p1023
- p3280: 0
- p1174: 2.61041e-7; = p1170*p1173/p0818
- p2926: 0; = p2340*(p1079+p1081)
- p1803: 0
- p1122: 0; = p1121*p0001/(p0818*p0002)
- p0873: 0; = p0872*p0001*p0003/(p0818*p0002)
- p2121: 0.822447
- p1905: 0
- p0044: 94.213
- p3418: 0; = p3380*p1238
- p2182: 0.0107745; = p1050/p0818
- p2267: 0; = p2226*p2213
- p2586: 0; = p2390*p1123
- p0999: 0; = IF(p0996=1;0;IF(p0996+p0997>1;1-p0996;p0997))
- p2579: 0; = p2383*p1073
- p3429: 0; = p3372*p1239
- p0800: 6.809; = p0140*(1+p0668*p0272/100)
- p2317: 0.000150013; = p2224*p2184
- p1093: 0; = IF(p1071=0;p1087*p0001/(p0818*p0002);0)
- p1242: 0; = if(p1232>0;0;p1234*(p0725/100)*p0723*1000)
- p2970: 0; = p2384*(p1079+p1081)
- p0665: 0; = IF(p0401<0.5;-SQRT(p0007*EXP(p0533^2*p0008)-p0007);SQRT(p0007*EXP(p0533^2*p0008)-p0007))
- p2073: 0.377647
- p2266: 0; = p2226*p2212
- p2004: 30
- p1074: 0.04059; = IF(p1071=0;p0712/100;0)
- p2706: 0.00045003; = p2315*(p1019+p1021)
- p0828: 0; = if(p0827=0;0;p0819-p0827/p0818)
- p2414: 0; = p2235*p2204
- p2616: 0; = p2420*p1073
- p3249: 0
- p2224: 0.397298; = if(p0765*p0769+p0766*p0770+p0767*p0771+p0768*p0772=0;0;p0771*p0767/(p0765*p0769+p0766*p0770+p0767*p0771+p0768*p0772))
- p1657: 0
- p3029: 0; = p2248*p1023
- p0680: 101.572; = p0020*(1+p0548*p0152/100)
- p3382: 0; = p3363*p1234
- p2846: 0; = p2260*(p1079+p1081)
- p1778: 0
- p2510: 0; = p2314*p1123
- p2400: 0; = p2234*p2189
- p0580: 0; = IF(p0316<0.5;-SQRT(p0007*EXP(p0448^2*p0008)-p0007);SQRT(p0007*EXP(p0448^2*p0008)-p0007))
- p3572: 0; = p1841*p3476
- p2015: 1.8997e7; = p0830*p2011*p2013
- p2493: 0; = p2297*p1073
- p2788: 0; = p2397*(p1019+p1021)
- p1157: 0.217341
- p2701: 0; = p2310*(p1078+p1080)
- p2280: 0.000889287; = p2223*p2186
- p2752: 0; = p2361*(p1019+p1021)
- p2927: 0; = p2341*(p1079+p1081)
- p1621: 0
- p3196: 0; = p2415*p1082
- p2588: 0; = p2392*p1123
- p3403: 0; = p3365*p1238
- p0518: 0; = SQRT(2)*(IF((2*p0386-1)<0;-1;IF((2*p0386-1)>0;1;0))*SQRT(SQRT((2/(pi()*0.140012289)+LN(1-(2*p0386-1)^2)/2)^2-LN(1-(2*p0386-1)^2)/0.140012289)-(2/(pi()*0.140012289)+LN(1-(2*p0386-1)^2)/2)))
- p2349: 0.000683484; = p2228*p2217
- p1931: 0
- p2260: 0; = p2226*p2206
- p0445: 0; = SQRT(2)*(IF((2*p0313-1)<0;-1;IF((2*p0313-1)>0;1;0))*SQRT(SQRT((2/(pi()*0.140012289)+LN(1-(2*p0313-1)^2)/2)^2-LN(1-(2*p0313-1)^2)/0.140012289)-(2/(pi()*0.140012289)+LN(1-(2*p0313-1)^2)/2)))
- p1581: 0
- p0859: 0; = p0671*1000/p0856
- p0747: 0
- p0740: 96.525; = p0080*(1+p0608*p0212/100)
- p1052: 5.23493e6; = IF(p1012=0;p1045*p1036;0)
- p2606: 0; = p2410*p1014
- p3393: 0; = p3374*p1234
- p1816: 0
- p3414: 0; = p3376*p1238
- p1836: 0
- p2769: 0; = p2378*(p1078+p1080)
- p2520: 6.83853e-5; = p2324*p1014
- p1963a: 8.2395e-5; = p1550*p1754+p1551*p1755+p1552*p1756+p1553*p1757+p1554*p1758+p1555*p1759+p1556*p1760+p1557*p1761+p1558*p1762+p1559*p1763+p1560*p1764+p1561*p1765+p1562*p1766+p1563*p1767+p1564*p1768+p1565*p1769+p1566*p1770+p1567*p1771+p1568*p1772
- p3317: 0; = if(and(p1232=0;p3253<>0);p3253*(p3261*p3277-p3312)/p3316;0)
- p2871: 2.29653e-5; = p2285*(p1020+p1022)
- p0792: 0
- p0400: 0.5
- p0793: 0
- p0188: 47.928
- p0284: 0.5
- p4910: 0; = p1943*p3482
- p2862: 0.00103086; = p2276*(p1020+p1022)
- p3271: 0
- p1683: 0
- p3162: 0; = p2381*p1082
- p0635: 0; = IF(p0371<0.5;-SQRT(p0007*EXP(p0503^2*p0008)-p0007);SQRT(p0007*EXP(p0503^2*p0008)-p0007))
- p3380: 0; = p3251/p0818
- p3306: 0; = if(and(p1232=0;p3252<>0);p3252*(p3257*p3277-p3301)/p3305;0)
- p2998: 0; = p2412*(p1020+p1022)
- p1241: 0; = if(p1232>0;0;IF(p1234+p1238+p1239+p1240=1;0;1-(p1234+p1238+p1239+p1240)))
- p1264: 0; = if(p1232>0;0;IF(p1259+p1263=1;0;IF(p1259+p1263+p1261>1;1-(p1259+p1263);p1261)))
- p2017: 8.71298e6; = p2015*p0898
- p1045: 0.0504301; = IF(p1012=0;IF(p1037+p1044=1;0;IF(p1037+p1044+p1039>1;1-(p1037+p1044);p1039));0)
- p3043: 0; = p2262*p1082
- p3144: 0; = p2363*p1023
- p1962: 8.35172e-6; = p1960*1000/p0818
- p1739: 0.583082
- p2175: 0.000554914; = p0895*p0908/p0818
- p3925: 0; = p1782*p3478
- p1946: 0
- p1080: 0; = IF(p1071=0;IF(p1073+p1078+p1079=1;0;IF(p1073+p1078+p1079+p1076>1;1-(p1073+p1078+p1079);p1076));0)
- p2378: 0; = p2229*p2207
- p0905: 0.0357623; = p0904/p0818
- p1101: 0.0327715; = IF(p1071=0;IF(p1096=1;0;IF(p1096+p1097>1;1-p1096;p1097));0)
- p0731: 0
- p1603: 0
- p0848: 0
- p1173: 0.5
- p3180: 0; = p2399*p1023
- p2678: 0.000612606; = p2287*(p1019+p1021)
- p1722: 0
- p3485: 0; = p1754*p3476
- p3325: 0; = if(and(p1232=0;p3255<>0);p3267*p3289;0)
- p4569: 0; = p1808*p3481
- p2197: 8.67999e-6; = p1055/p0818
- p1150: 953282; = if(p1121=0;p1149*p1146*p1145;0)
- p3024: 0; = p2243*p1023
- p1932: 0
- p0786: 0
- p1982: 750
- p3085: 0; = p2304*p1082
- p3462: 0; = p3367*p1241
- p1084: 50009.7; = IF(p1071=0;p1078*(p0710/100)*p0703*1000;0)
- p3390: 0; = p3371*p1234
- p4596: 0; = p1835*p3481
- p1572: 0
- p2241: 0.000106642; = p2222*p2186
- p0851: 0
- p1138: 119158; = if(p1121=0;p1132*(p0716/100)*p0703*1000;0)
- p3391: 0; = p3372*p1234
- p3101: 0; = p2320*p1023
- p0684: 0
- p2937: 0; = p2351*(p1129+p1131)
- p4195: 0; = p1846*p3479
- p2674: 4.71799e-5; = p2283*(p1019+p1021)
- p0768: 0
- p2593: 0; = p2397*p1014
- p3234: 0.39606; = 1-p3233
- p1938: 0
- p3055: 0; = p2274*p1132
- p3109: 0; = p2328*p1023
- p3063: 0; = p2282*p1023
- p2709: 5.43221e-5; = p2318*(p1019+p1021)
- p2276: 0.0057985; = p2223*p2182
- p1156: 0.0974547; = p1064+p1065+p1066+p1067+p1068+p1069+p1070+p1116+p1117+p1118+p1119+p1120+p1154+p1155
- p2211: 0.00395589; = p1120-p2209-p2208-p2210
- p1050: 3.41338e7; = IF(p1012=0;p1037*p1036;0)
- p0964: 0; = 56/90000
- p1772: 0
- p1211: 0.6
- p1675: 0
- p2785: 0; = p2394*(p1019+p1021)
- p2885: 0; = p2299*(p1079+p1081)
- p0675: 0
- p3412: 0; = p3374*p1238
- p1288: 0
- p3285: 0
- p3167: 0; = p2386*p1082
- p1553: 0
- p0688: 0
- p2183: 0.00236514; = p1064-p2182
- p1311: 0; = IF(p1307+p1310=p1266;0;IF(p1307+p1310+p1309>p1266;p1266-(p1307+p1310);p1309))
- p1029: 0; = IF(p1012=0;IF(p0801<p1023*(p0704/100)*p0703*1000;p0801;p1023*(p0704/100)*p0703*1000);0)
- p1872: 0
- p1774: 0
- p3191: 0; = p2410*p1023
- p4514: 0; = p1963*p3480
- p0780: 91.33; = p0120*(1+p0648*p0252/100)
- p2156: 1.3653e-7; = p2015*p2085*p2118/(p0818*1000)
- p3053: 0; = p2272*p1132
- p3484: 1; = IF(p1344=0;0;p1344/(p1328+p1330+p1332+p1334+p1336+p1338+p1340+p1342+p1344))
- p2095: 0.765734
- p2424: 0; = p2235*p2214
- p2589: 0; = p2393*p1014
- p0678: 694.98; = p0018*(1+p0546*p0150/100)
- p1135: 0; = if(p1121=0;p1129*(p0716/100)*p0703*1000;0)
- p2139: 1.66097e-6; = p2015*p2067*p2101/(p0818*1000)
- p1672: 0
- p3246: 1; = IF(p3244+p3245=1;0;1-(p3244+p3245))
- p2985: 0; = p2399*(p1020+p1022)
- p2071: 0.151
- p0980: 0; = IF(p0977=0;0;p0977*p0001/(p0818*p0002))
- p0798: 70.404; = p0138*(1+p0666*p0270/100)
- p3007: 0; = p2421*(p1079+p1081)
- p1858: 0
- p0440: 0; = SQRT(2)*(IF((2*p0308-1)<0;-1;IF((2*p0308-1)>0;1;0))*SQRT(SQRT((2/(pi()*0.140012289)+LN(1-(2*p0308-1)^2)/2)^2-LN(1-(2*p0308-1)^2)/0.140012289)-(2/(pi()*0.140012289)+LN(1-(2*p0308-1)^2)/2)))
- p0976: 0; = IF(p0687=0;IF(OR(p0686=0;p0689=0);0;p0686*1000*p0689/100);0)
- p1813: 0
- p2380: 0; = p2229*p2209
- p2632: 1.12113e-5; = p2241*(p1019+p1021)
- p0937: 8.13642e-5; = p0931*p0001/(p0818*p0002)
- p2282: 0.00163731; = p2223*p2188
- p2518: 0.000237577; = p2322*p1014
- p1256: 0; = if(p1232>0;0;IF(p1253=1;0;IF(p1253+p1254>1;1-p1253;p1254)))
- p2252: 9.19433e-7; = p2222*p2198
- p0415: 0; = SQRT(2)*(IF((2*p0283-1)<0;-1;IF((2*p0283-1)>0;1;0))*SQRT(SQRT((2/(pi()*0.140012289)+LN(1-(2*p0283-1)^2)/2)^2-LN(1-(2*p0283-1)^2)/0.140012289)-(2/(pi()*0.140012289)+LN(1-(2*p0283-1)^2)/2)))
- p2843: 6.72968e-5; = p2257*(p1020+p1022)
- p2844: 0; = p2258*(p1079+p1081)
- p1061: 0.3
- p3240: 4.68532e-9; = p3234*p1188*p3235/p0818
- p3275: 0
- p1913: 0
- p1659: 0
- p2294: 0.00191317; = p2223*p2201
- p1658: 0
- p0079: 0.716
- p0756: 0
- p1977: 317.351; = p1252+p1188
- p1024: 1.18229e6; = IF(p1012=0;p1014*(p0704/100)*p0703*1000;0)
- p1153: 0.365265
- p3193: 0; = p2412*p1023
- p1723: 0
- p0842: 0.076462
- p3235: 0.118093
- p1075: 0; = IF(p1071=0;p0713/100;0)
- p2595: 0; = p2399*p1014
- p0755: 0
- p4543: 0; = p1782*p3481
- p3319: 0; = if(and(p1232=0;p3253<>0);p3253*(p3263-p3314)/p3316;0)
- p0827: 0; = p0818*p0819*p0823
- p1810: 0
- p1801: 0
- p2091: 0.374844
- p0120: 91.33
- p3002: 0; = p2416*(p1079+p1081)
- p1808: 5.99747e-6; = p1400*1000/p0818
- p1248: 0; = if(p1232>0;0;p1243*p0001/(p0818*p0002))
- p4932: 0; = p1759*p3483
- p2746: 0; = p2355*(p1019+p1021)
- p1604: 0.92902
- p3397: 0; = p3378*p1234
- p2883: 0; = p2297*(p1079+p1081)
- p0877: 0; = p0876*p0001*p0003/(p0818*p0002)
- p1763: 0
- p0506: 0; = SQRT(2)*(IF((2*p0374-1)<0;-1;IF((2*p0374-1)>0;1;0))*SQRT(SQRT((2/(pi()*0.140012289)+LN(1-(2*p0374-1)^2)/2)^2-LN(1-(2*p0374-1)^2)/0.140012289)-(2/(pi()*0.140012289)+LN(1-(2*p0374-1)^2)/2)))
- p2568: 0; = p2372*p1014
- p0834: 0.00059
- p3214: 0.376406; = p1222*40.078/100.0869
- p2050: 0.952062
- p3314: 0; = if(and(p1232=0;p3253<>0);p3263*p3289;0)
- p2541: 4.945e-5; = p2345*p1073
- p0687: 0
- p3247: 0
- p2782: 0; = p2391*(p1128+p1130)
- p1983: 50
- p3015: 0; = p2429*(p1129+p1131)
- p0704: 94.213; = p0044*(1+p0572*p0176/100)
- p1619: 0
- p2092: 0.54529
- p0777: 0
- p3172: 0; = p2391*p1132
- p1085: 0; = IF(p1071=0;p1079*(p0710/100)*p0703*1000;0)
- p2895: 0; = p2309*(p1079+p1081)
- p2248: 0.00069878; = p2222*p2193
- p2756: 0; = p2365*(p1019+p1021)
- p3472: 0; = p3377*p1241
- p2572: 0; = p2376*p1073
- p2128: 4.98642e-6; = p2015*p2056*p2090/(p0818*1000)
- p2417: 0; = p2235*p2207
- p2499: 0; = p2303*p1073
- p2385: 0; = p2229*p2214
- p2842: 5.87017e-6; = p2256*(p1020+p1022)
- p1108: 241594; = IF(p1071=0;p1105*p1102*p1095;0)
- p0869: 1; = IF(p0858+p0864+p0865+p0866+p0867+p0868=1;0;1-(p0858+p0864+p0865+p0866+p0867+p0868))
- p0718: 0
- p3365: 0; = if(p1232=0;p3244*p3359/p0818;0)
- p3277: 0

- p3331: 0; = if(and(p1232=0;p3255<>0);p3255*(p3268-p3326)/p3327;0)
- p1980: 3521.6
- p1790: 0
- p1374: 79
- p0783: 0
- p2592: 0; = p2396*p1014
- p2794: 0; = p2403*(p1019+p1021)
- p0261: 0
- p1670: 0
- p1681: 0
- p2003: 50
- p2718: 9.69456e-5; = p2327*(p1019+p1021)
- p2288: 0.00124911; = p2223*p2195
- p0860: 0; = p0672*1000/p0856
- p2910: 1.6954e-5; = p2324*(p1020+p1022)
- p1043: 0.25306
- p1305: 0; = p1301*p1252/p0818
- p3369: 0; = if(p1232=0;p3245*p3357/p0818;0)
- p2783: 0; = p2392*(p1128+p1130)
- p1641: 0
- p2816: 0; = p2425*(p1078+p1080)
- p0677: 0
- p1128: 0; = if(p1121=0;IF(p1123=1;0;IF(p1123+p1124>1;1-p1123;p1124));0)
- p2284: 0.000513684; = p2223*p2190
- p1271: 0; = IF(p1267+p1270=p1259;0;IF(p1267+p1270+p1269>p1259;p1259-(p1267+p1270);p1269))
- p1006: 0; = p1002*p0001*p0004/(p0818*p0002)
- p3360: 0; = if(p1232=0;p3310+p3321+p3332+p3343+p3354;0)
- p1092: 0; = IF(p1071=0;p1086*p0001/(p0818*p0002);0)
- p3279: 0
- p1303: 0; = p1297*p1252/p0818
- p2419: 0; = p2235*p2209
- p0676: 556.324; = p0016*(1+p0544*p0148/100)
- p1131: 0; = if(p1121=0;IF(p1123+p1128+p1129+p1130=1;0;IF(p1123+p1128+p1129+p1130+p1127>1;1-(p1123+p1128+p1129+p1130);p1127));0)
- p2634: 2.06416e-5; = p2243*(p1019+p1021)
- p2140: 8.49365e-7; = p2015*p2068*p2102/(p0818*1000)
- p2277: 0.00127284; = p2223*p2183
- p1988: 750
- p3345: 0; = if(and(p1232=0;p3256<>0);p3273*p3277*p3293;0)
- p2574: 0; = p2378*p1073
- p1663: 0
- p2481: 9.26324e-5; = p2285*p1014
- p2945: 0; = p2359*(p1020+p1022)
- p2110: 0.856281
- p1124: 0; = if(p1121=0;p0718/100;0)
- p1121: 0
- p2133: 2.38231e-6; = p2015*p2061*p2095/(p0818*1000)
- p2685: 0.000201131; = p2294*(p1019+p1021)
- p1013: 0; = p1012*p0001/(p0818*p0002)
- p4607: 0; = p1846*p3481
- p1644: 0
- p3125: 5.53945e-7; = p2344*p1082
- p3000: 0; = p2414*(p1079+p1081)
- p0477: 0; = SQRT(2)*(IF((2*p0345-1)<0;-1;IF((2*p0345-1)>0;1;0))*SQRT(SQRT((2/(pi()*0.140012289)+LN(1-(2*p0345-1)^2)/2)^2-LN(1-(2*p0345-1)^2)/0.140012289)-(2/(pi()*0.140012289)+LN(1-(2*p0345-1)^2)/2)))
- p1028: 223139; = IF(p1012=0;p1022*(p0704/100)*p0703*1000;0)
- p3117: 0.000229786; = p2336*p1082
- p0671: 0
- p1884: 0
- p2722: 1.3083e-6; = p2331*(p1019+p1021)
- p0933: 108212; = p0801*p0927
- p1296: 0; = p1292*p1252/p0818
- p2475: 0.000501907; = p2279*p1014
- p2987: 0; = p2401*(p1020+p1022)
- p1565: 0
- p0916: 0.321902; = p0826+(p0832*(1+p0894))/p0818
- p0345: 0.5
- p3327: 0; = if(and(p1232=0;p3255<>0);1-(p3323+p3324+p3325+p3326);0)
- p3427: 0; = p3370*p1239
- p1180: 1.193e-7; = p1176*p1179/p0818
- p3166: 0; = p2385*p1082
- p1064: 0.0131397; = IF(p1012=0;p1050/(p1057*p0818);0)
- p1175: 0.000431935
- p1263: 0; = if(p1232>0;0;IF(p1259=1;0;IF(p1259+p1260>1;1-p1259;p1260)))
- p2027: 0.428799
- p2641: 0.000155665; = p2250*(p1019+p1021)
- p2441: 4.41728e-5; = p2245*p1014
- p3036: 0; = p2255*p1023
- p0236: 2.73
- p1865: 0
- p3006: 0; = p2420*(p1079+p1081)
- p1031: 2.9605e-5; = IF(p1012=0;p1025*p0001/(p0818*p0002);0)
- p1646: 0
- p3220: 0.00121238; = p3216*p1228
- p2762: 0; = p2371*(p1019+p1021)
- p1107: 420020; = IF(p1071=0;p1105*p1101*p1095;0)
- p1775: 0
- p4410: 0; = p1855*p3480
- p2438: 1.1006e-5; = p2242*p1014
- p2758: 0; = p2367*(p1019+p1021)
- p0537: 0; = IF(p0273<0.5;-SQRT(p0007*EXP(p0405^2*p0008)-p0007);SQRT(p0007*EXP(p0405^2*p0008)-p0007))
- p4953: 0; = p1780*p3483
- p2279: 0.000699922; = p2223*p2185
- p3173: 0; = p2392*p1132
- p0536: 0; = SQRT(2)*(IF((2*p0404-1)<0;-1;IF((2*p0404-1)>0;1;0))*SQRT(SQRT((2/(pi()*0.140012289)+LN(1-(2*p0404-1)^2)/2)^2-LN(1-(2*p0404-1)^2)/0.140012289)-(2/(pi()*0.140012289)+LN(1-(2*p0404-1)^2)/2)))
- p2328: 0.00911547; = p2224*p2196
- p0888: 0; = p0686*1000*p0687*p0884/100
- p0769: 7.094; = p0109*(1+p0637*p0241/100)
- p0175: 0
- p1879: 0
- p1703: 0
- p1564: 0
- p2875: 0.00219514; = p2289*(p1020+p1022)
- p2858: 0; = p2272*(p1129+p1131)
- p2547: 0; = p2351*p1123
- p1253: 0; = if(p1232>0;0;p0735/100)
- p2286: 0.00104539; = p2223*p2192
- p2759: 0; = p2368*(p1019+p1021)
- p0374: 0.5
- p2411: 0; = p2234*p2201
- p2813: 0; = p2422*(p1078+p1080)
- p2745: 0; = p2354*(p1019+p1021)
- p0129: 100
- p1817: 0
- p1695: 0
- p2184: 0.000377585; = p1051/p0818
- p2274: 0; = p2230*p2220
- p0832: 5.03832e8; = p0831*p0830/(1-p0831)
- p1106: 17444.3; = IF(p1071=0;p1105*p1096*p1095;0)
- p3408: 0; = p3370*p1238
- p2702: 0; = p2311*(p1128+p1130)
- p1117: 0.000632904; = IF(p1071=0;p1107/(p1112*p0818);0)
- p1143: 0; = if(p1121=0;p1137*p0001/(p0818*p0002);0)
- p3301: 0; = if(and(p1232=0;p3252<>0);p3257*p3277*(p3297*p3290+(1-p3297)*p3294);0)
- p0797: 23.836; = p0137*(1+p0665*p0269/100)
- p2239: 2.43678e-5; = p2222*p2184
- p1680: 0
- p4763: 0; = p1796*p3482
- p2473: 0.000912741; = p2277*p1014
- p2649: 0; = p2258*(p1078+p1080)
- p5161: 2.49369e-5; = p1782*p3484
- p0111: 102.776
- p0720: 0
- p3378: 0; = if(p1232=0;p3246*p3360/p0818;0)
- p2311: 0; = p2231*p2218
- p2002: 750
- p1894: 0
- p3004: 0; = p2418*(p1079+p1081)
- p0995: 0; = p0991*p0001*p0004/(p0818*p0002)
- p2690: 0; = p2299*(p1078+p1080)
- p2135: 4.83255e-6; = p2015*p2063*p2097/(p0818*1000)
- p0875: 0; = p0874*p0001*p0003/(p0818*p0002)
- p2918: 0.000585677; = p2332*(p1020+p1022)
- p3138: 0; = p2357*p1023
- p1859: 0
- p3892: 0; = p1955*p3477
- p2062: 3.76588
- p1298: 0
- p1909: 0
- p1819: 0
- p2051: 0.00014669; = p2015*p2049*p2050/(p0818*1000)
- p0691: 0
- p3423: 0; = p3366*p1239
- p1972: 0; = if(p0807=480;p1967*p0001/(p0818*p0002);0)
- p1116: 6.3086e-5; = IF(p1071=0;p1106/(p1111*p0818);0)
- p2567: 0; = p2371*p1014
- p1784: 0
- p2761: 0; = p2370*(p1019+p1021)
- p1111: 0.0872841
- p1854: 0
- p2611: 0; = p2415*p1073
- p3072: 0; = p2291*p1023
- p2696: 0; = p2305*(p1078+p1080)
- p2486: 3.34973e-6; = p2290*p1014
- p1957: 0
- p0725: 0
- p3409: 0; = p3371*p1238
- p0709: 13.534; = p0049*(1+p0577*p0181/100)
- p2024: 0.748682
- p0785: 10.847; = p0125*(1+p0653*p0257/100)
- p2362: 0; = p2225*p2190
- p3124: 0.000397962; = p2343*p1082
- p1922: 0
- p3197: 0; = p2416*p1082
- p1195: 0.45
- p1558: 0
- p3332: 0; = if(and(p1232=0;p3255<>0);IF((p3328+p3329+p3330+p3331)+(p3255*(p3265*(1-p3277))/p3327)>p3255;p3255-(p3328+p3329+p3330+p3331);p3255*(p3265*(1-p3277))/p3327);0)
- p2889: 0; = p2303*(p1079+p1081)
- p2677: 0.000109902; = p2286*(p1019+p1021)
- p0900: 0.91137; = p0899/p0818
- p1690: 0
- p1094: 3.49061e-5; = IF(p1071=0;p1088*p0001/(p0818*p0002);0)
- p2787: 0; = p2396*(p1019+p1021)
- p2187: 0.000237823; = 4*1.00794*p2186/(2*14.0067)
- p1995: 50
- p5322: 1.26263e-6; = p1943*p3484
- p1787: 0
- p0867: 0; = IF(p0858+p0864+p0865+p0866=1;0;IF(p0858+p0864+p0865+p0866+p0862>1;1-(p0858+p0864+p0865+p0866);p0862))
- p0738: 1750; = p0078*(1+p0606*p0210/100)
- p3353: 0; = if(and(p1232=0;p3256<>0);p3256*(p3276-p3348)/p3349;0)
- p3316: 0; = if(and(p1232=0;p3253<>0);1-(p3312+p3313+p3314+p3315);0)
- p0272: 47.928
- p0947: 0.000195722; = if(and(p0683=0;or(p0807=480;p0807=32;p0807=1;and(p0807=60;p0901<0.03)));p0935;0)
- p2643: 9.666e-8; = p2252*(p1019+p1021)
- p2618: 0; = p2422*p1073
- p1021: 0.04137; = IF(p1012=0;IF(p1014+p1019+p1020=1;0;IF(p1014+p1019+p1020+p1017>1;1-(p1014+p1019+p1020);p1017));0)
- p1168: 1.27617e-6; = p1164*p1167/p0818
- p1597: 0
- p3037: 0; = p2256*p1023
- p3229: 2.55234e-6; = p1164/p0818
- p2855: 0; = p2269*(p1079+p1081)
- p1815: 0
- p1151: 119686; = if(p1121=0;p1149*p1148*p1145;0)
- p2040: 0.44
- p1628: 0
- p2356: 0; = p2225*p2184
- p2327: 0.000922149; = p2224*p2195
- p1164: 8085.81; = p1163*p0801
- p0447: 0; = SQRT(2)*(IF((2*p0315-1)<0;-1;IF((2*p0315-1)>0;1;0))*SQRT(SQRT((2/(pi()*0.140012289)+LN(1-(2*p0315-1)^2)/2)^2-LN(1-(2*p0315-1)^2)/0.140012289)-(2/(pi()*0.140012289)+LN(1-(2*p0315-1)^2)/2)))
- p3088: 0; = p2307*p1082
- p2507: 0; = p2311*p1123
- p3122: 7.03839e-5; = p2341*p1082
- p2263: 0; = p2226*p2209
- p3733: 0; = p1796*p3477
- p4634: 0; = p1873*p3481
- p0610: 0; = IF(p0346<0.5;-SQRT(p0007*EXP(p0478^2*p0008)-p0007);SQRT(p0007*EXP(p0478^2*p0008)-p0007))
- p3366: 0; = if(p1232=0;p3244*p3360/p0818;0)
- p2104: 0.817136
- p0971: 0; = p0968/p0818
- p2703: 0; = p2312*(p1128+p1130)
- p2737: 5.3815e-6; = p2346*(p1078+p1080)
- p3263: 0
- p2460: 0; = p2264*p1073
- p0367: 0.5
- p0845: 0.5
- p0801: 1.75e6
- p3296: 0
- p0973: 0; = p0967+p0968+p0969
- p1012: 0
- p2975: 0; = p2389*(p1129+p1131)
- p2950: 0; = p2364*(p1020+p1022)
- p3437: 0; = p3380*p1239
- p3189: 0; = p2408*p1023
- p0799: 10.847; = p0139*(1+p0667*p0271/100)
- p1003: 0; = p0999*p0888
- p0316: 0.5
- p1877: 0
- p2439: 0.000140796; = p2243*p1014
- p1258: 0; = if(p1232>0;0;IF(p1253+p1256+p1257=1;0;1-(p1253+p1256+p1257)))
- p0679: 288.912; = p0019*(1+p0547*p0151/100)
- p1731: 0
- p2410: 0; = p2234*p2200
- p1685: 0
- p3880: 0; = p1943*p3477
- p4102: 0; = p1963*p3478
- p0152: 0
- p2803: 0; = p2412*(p1019+p1021)
- p1873: 7.92298e-5; = p1465*1000/p0818
- p1639: 0
- p2679: 0.000131319; = p2288*(p1019+p1021)
- p1963g: 4.14547e-5; = p1667*p1871+p1668*p1872+p1669*p1873+p1670*p1874+p1671*p1875+p1672*p1876+p1673*p1877+p1674*p1878+p1675*p1879+p1676*p1880+p1677*p1881+p1678*p1882+p1679*p1883+p1680*p1884+p1681*p1885+p1682*p1886+p1683*p1887+p1684*p1888+p1685*p1889
- p3038: 0; = p2257*p1023
- p1733: 0
- p1936: 0
- p3110: 0; = p2329*p1023
- p0766: 59.663; = p0106*(1+p0634*p0238/100)
- p0843: -0.0428595
- p0781: 0
- p1757: 0
- p3076: 0; = p2295*p1023
- p1198: 0.44
- p2754: 0; = p2363*(p1019+p1021)
- p3150: 0; = p2369*p1023
- p2379: 0; = p2229*p2208
- p4602: 0; = p1841*p3481
- p2974: 0; = p2388*(p1079+p1081)
- p1952: 0
- p1563: 0
- p2069: 0.190588
- p1821: 0
- p0714: 0
- p3745: 0; = p1808*p3477
- p0706: 6.376; = p0046*(1+p0574*p0178/100)
- p1939: 0
- p2613: 0; = p2417*p1073
- p1970: 1.75e6; = p0801
- p2536: 0.00132871; = p2340*p1073
- p1845: 0
- p0521: 0; = SQRT(2)*(IF((2*p0389-1)<0;-1;IF((2*p0389-1)>0;1;0))*SQRT(SQRT((2/(pi()*0.140012289)+LN(1-(2*p0389-1)^2)/2)^2-LN(1-(2*p0389-1)^2)/0.140012289)-(2/(pi()*0.140012289)+LN(1-(2*p0389-1)^2)/2)))
- p1804: 0
- p2828: 2.7286e-6; = p2242*(p1020+p1022)
- p5234: 0.000110795; = p1855*p3484
- p1149: 0.830148
- p3690: 0; = p1963*p3476
- p1026: 69972; = IF(p1012=0;p1020*(p0704/100)*p0703*1000;0)
- p1557: 0
- p3984: 0; = p1841*p3478
- p2413: 0; = p2234*p2203
- p2472: 0.00415804; = p2276*p1014
- p1752: 0
- p3388: 0; = p3369*p1234
- p2682: 8.06048e-7; = p2291*(p1019+p1021)
- p1228: 0.0202063; = IF(p1221=0;0;p0801*p1212*2000/(p1222+p1221*p1225)/p0818)
- p1063: 0.455
- p2377: 0; = p2229*p2206
- p2833: 2.22868e-5; = p2247*(p1020+p1022)
- p2672: 1.34554e-5; = p2281*(p1019+p1021)
- p3239: 0.013074; = IF(p3238+p3235+p3236=1;0;1-(p3238+p3235+p3236))
- p0003: 10000
- p3046: 0; = p2265*p1082
- p2242: 1.53482e-5; = p2222*p2187
- p1056: 2.62691e7; = IF(p1012=0;p1049*p1036;0)
- p0380: 0.5
- p2770: 0; = p2379*(p1078+p1080)
- p2290: 4.67128e-6; = p2223*p2197
- p1300: 0; = IF(p1297=p1265;0;IF(p1297+p1298>p1265;p1265-p1297;p1298))
- p2942: 0; = p2356*(p1020+p1022)
- p2422: 0; = p2235*p2212
- p1745: 0
- p1966: 1.6e6; = if(p0814=0;p0802;0)
- p1754: 9.53283e-5; = p1346*1000/p0818
- p1887: 0
- p0853: 0; = p0803/(p0802+p0803)
- p0746: 0
- p2615: 0; = p2419*p1073
- p2433: 0.000498626; = p2237*p1014
- p0373: 0.5
- p1091: 0; = IF(p1071=0;p1085*p0001/(p0818*p0002);0)
- p1832: 0
- p3287: 0
- p1161: 1.75e6; = p0801
- p1127: 0; = if(p1121=0;p0721/100;0)
- p2258: 0; = p2226*p2204
- p1935: 0
- p1636: 0
- p0880: 0; = p0868*p0856
- p1287: 0

## Reference product
- durum wheat; at harvest in 2004; at farm; 88%-89% moisture: 1 kg

## Inputs from technosphere
- CUTOFF apply P fertilizer; broadcast with incorporation: 1.40839e-5 ha; = p1090
- CUTOFF nitrogenous fertilizer, ammonium nitrate; at point-of-sale: 0.00493265 kg; = p1066
- CUTOFF pesticide, Tribenuron-methyl; at point-of-sale; kg AI: 3.15657e-7 kg; = p1950
- CUTOFF harvest; durum wheat residue management: 0.00049284 ha; = p1975
- CUTOFF apply N fertilizer; broadcast without incorporation: 1.97057e-5 ha; = p1032
- CUTOFF apply N fertilizer; no broadcast application: 0.000332959 ha; = p1030
- CUTOFF pesticide, MCPA; at point-of-sale; kg AI: 7.92298e-5 kg; = p1873
- CUTOFF nitrogenous fertilizer, sodium nitrate; at point-of-sale: 5.42499e-5 kg; = p1069
- CUTOFF pesticide, Fluroxypyr-meptyl; at point-of-sale; kg AI: 2.2096e-6 kg; = p1847
- CUTOFF apply P fertilizer; no broadcast application: 0.000297989 ha; = p1089
- CUTOFF apply sulfur; unspecified method: 0.00049284 ha; = p1171
- CUTOFF apply zinc compounds; unspecified method: 0.00049284 ha; = p1183
- CUTOFF pesticide, Dicamba; at point-of-sale; kg AI: 5.99747e-6 kg; = p1808
- CUTOFF apply single or mixed K fertilizer; unspec. method: 3.35575e-5 ha; = p1144
- CUTOFF harvest; durum: 0.000450596 ha; = p1971
- CUTOFF limestone, high-grade, pulverized; at point-of-sale: 0.0202063 kg; = p1228
- CUTOFF potassic fertilizer, other single nutrients; at point-of-sale: 0.000103431 kg; = p1155
- CUTOFF prepare soil; for mulch till, wheat: 0.000195722 ha; = p0935
- durum wheat residue; at harvest in 2004; at farm; 83%-90% moisture: 0.540831 kg; = p0839
- CUTOFF potassic fertilizer, potassium chloride; at point-of-sale: 0.000724954 kg; = p1154
- CUTOFF apply pesticide; unspecified application methods: 0.00049284 ha; = p1345
- CUTOFF apply liming materials; unspecified method: 0.00049284 ha; = p1227
- CUTOFF apply gypsum; unspecified method: 0.00049284 ha; = p1165
- CUTOFF sewage sludge; at point-of-sale: 1.00174e-7 kg; = p1190
- CUTOFF apply mixed N fertilizer; without incorporation: 6.28409e-5 ha; = p1034
- CUTOFF pesticide, unspecified type; at point-of-sale; kg AI: 8.35172e-6 kg; = p1962
- CUTOFF liming materials storage: 0.0106924 kg*a; = p1231
- CUTOFF prepare soil; for no-till, wheat: 0.000156673 ha; = p0936
- CUTOFF pesticide, Bromoxynil octanoate; at point-of-sale; kg AI: 2.49369e-5 kg; = p1782
- CUTOFF pesticide, Trifluralin; at point-of-sale; kg AI: 1.76768e-5 kg; = p1955
- CUTOFF pesticide formulation balance; at point-of-sale: 0.000216246 kg; = p1963
- CUTOFF pesticide, Fluroxypyr; at point-of-sale; kg AI: 4.73485e-6 kg; = p1846
- CUTOFF prepare soil; for unspec. till, wheat: 3.0475e-5 ha; = p0939
- CUTOFF phosphatic fertilizer, superphos. grades 22% and under; at point-of-sale: 6.3086e-5 kg; = p1116
- CUTOFF irrig svc; unspec wat source & rate, 2004 durum wheat: 0.00049284 ha; = p0981
- CUTOFF apply sewage sludge; unspecified method: 0.00049284 ha; = p1189
- CUTOFF local area trucking; class 6, average fuel: 0.00261118 metric ton*km; = p2010
- CUTOFF sowing svc; for unspec till, 2004 durum wheat: 3.0475e-5 ha; = p0951
- CUTOFF zinc compounds; at point-of-sale: 7.88948e-8 kg; = p1184
- CUTOFF prepare soil; for conventional till, wheat; <15% residue: 2.8605e-5 ha; = p0934
- CUTOFF prepare soil; for reduced till, wheat; 15-30% residue: 8.13642e-5 ha; = p0937
- CUTOFF regional or national trucking; class 8, average fuel: 0.0081614 metric ton*km; = p2009
- CUTOFF manure appl svc; unspec rate, 2004 durum wheat: 0.00049284 ha; = p1233
- CUTOFF apply mixed N fertilizer; with incorporation: 1.92089e-5 ha; = p1033
- CUTOFF gypsum storage: 1.27617e-6 kg*a; = p1168
- CUTOFF pesticide, Thifensulfuron methyl; at point-of-sale; kg AI: 1.26263e-6 kg; = p1943
- CUTOFF domestic barge transport; average fuel: 0.0348158 metric ton*km; = p2007
- CUTOFF pesticide, Fenoxaprop P; at point-of-sale; kg AI: 1.64141e-5 kg; = p1835
- CUTOFF gypsum; at point-of-sale: 2.55234e-6 kg; = p1166
- CUTOFF sulfuric acid; at point-of-sale: 2.386e-7 kg; = p1178
- CUTOFF phosphatic fertilizer, other single phosphates; at point-of-sale: 0.000759745 kg; = p1118
- CUTOFF pesticide storage: 0.000407133 kg*a; = p1965
- CUTOFF sulfuric acid storage: 1.193e-7 kg*a; = p1180
- CUTOFF phosphatic fertilizer, diammonium phosphate; at point-of-sale: 0.0105734 kg; = p1119
- CUTOFF apply sulfuric acid; unspecified method: 0.00049284 ha; = p1177
- CUTOFF nitrogenous fertilizer, nitrogen solutions; at point-of-sale: 0.0360925 kg; = p1068
- CUTOFF sowing svc; for conventional till, 2004 durum wheat: 2.8605e-5 ha; = p0946
- CUTOFF fertilizer storage: 0.0593178 kg*a; = p1160
- CUTOFF phosphatic fertilizer, superphosphate grades over 22%; at point-of-sale: 0.000632904 kg; = p1117
- CUTOFF sowing svc; for no-till, 2004 durum wheat: 0.000156673 ha; = p0948
- CUTOFF pesticide, Bromoxynil; at point-of-sale; kg AI: 3.47222e-6 kg; = p1780
- CUTOFF apply single or mixed P fertilizer; unspec. method: 3.49061e-5 ha; = p1094
- CUTOFF apply N fertilizer; broadcast with incorporation: 2.9605e-5 ha; = p1031
- CUTOFF pesticide, Flucarbazone-sodium; at point-of-sale; kg AI: 3.15657e-7 kg; = p1841
- CUTOFF sowing svc; for reduced till, 2004 durum wheat: 8.13642e-5 ha; = p0949
- CUTOFF pesticide, Glyphosate; at point-of-sale; kg AI: 0.000110795 kg; = p1855
- CUTOFF sewage sludge storage: 5.00869e-8 kg*a; = p1192
- CUTOFF nitrogenous fertilizer, urea; at point-of-sale: 0.0182242 kg; = p1070
- CUTOFF phosphatic fertilizer, monoammonium phosphate; at point-of-sale: 0.00650476 kg; = p1120
- CUTOFF bulk cargo rail transport; diesel: 0.0652795 metric ton*km; = p2008
- CUTOFF dolomite, pulverized; at point-of-sale: 0.00117843 kg; = p1229
- CUTOFF sowing svc; for mulch till, 2004 durum wheat: 0.000195722 ha; = p0947
- CUTOFF international vessel transport; average fuel: 0.318179 metric ton*km; = p2006
- CUTOFF pesticide, Clodinafop-propargyl; at point-of-sale; kg AI: 2.52525e-6 kg; = p1796
- CUTOFF zinc compounds storage: 3.94474e-8 kg*a; = p1186
- CUTOFF sulfur; at point-of-sale: 5.22081e-7 kg; = p1172
- CUTOFF nitrogenous fertilizer, anhydrous ammonia; at point-of-sale: 0.0131397 kg; = p1064
- CUTOFF nitrogenous fertilizer, ammonium sulfate; at point-of-sale: 0.00397095 kg; = p1067
- CUTOFF nitrogenous fertilizer, aqueous ammonia; at point-of-sale: 0.00167815 kg; = p1065
- CUTOFF sulfur storage: 2.61041e-7 kg*a; = p1174
- CUTOFF pesticide, Dichlorprop-dimethylammonium; at point-of-sale; kg AI: 8.20707e-6 kg; = p1759
- CUTOFF pesticide, 2,4-D; at point-of-sale; kg AI: 9.53283e-5 kg; = p1754
- CUTOFF N inhibitor appl svc; unspec rate & type, 2004 durum wheat: 0.000552399 ha; = p1162
- CUTOFF fertilizer filler materials; at point-of-sale: 0.0211809 kg; = p1158

## Inputs from nature
- Phosphorus: 0.0059216 kg; = p0910
- Nitrogen: 0.0357623 kg; = p0905
- Water, unspecified origin: 0.000321902 m3; = p0916*0.001
- Carbon dioxide: 3.34169 kg; = p0900*3.6666666667
- Occupation, annual crop [natural resource, land]: 1.43245 m2*year; = 1.0 * (p0855)
- Transformation, from annual crop [natural resource, land]: 4.9284 m2; = 1.0 * (p0883)
- Dry matter except CNPK; from plant uptake: 1.19318 kg; = p0917
- Transformation, to annual crop [natural resource, land]: 4.9284 m2; = 1.0 * (p0857)
- Potassium; from plant uptake; biogenic: 0.0177621 kg; = p0915

## Emissions to nature
- Glyphosate [soil, agricultural]: 0.000110795 kg; = 1.0 * (p5234)
- Thifensulfuron methyl; unspec. appl. method: 1.26263e-6 kg; = p5322
- Monoammonium phosphate; unspec. appl. method in fert. at plant.: 0.000578153 kg; = p3122*8.2142857143
- Zinc compounds: 7.88948e-8 kg; = p3232
- Trifluralin [soil, agricultural]: 1.76768e-5 kg; = 1.0 * (p5334)
- Phosphorous; in above-ground residue left on field: 0.00104666 kg; = p2169
- Calcium [soil, agricultural]: 0.00787004 kg; = 1.0 * (p3218+p3226)
- Ethane [air, non-urban air or from high stacks]: 5.44917e-6 kg; = 1.0 * (p2126*1.25)
- Sulfur dioxide [air, non-urban air or from high stacks]: 2.63847e-6 kg; = 1.0 * (p2041)
- I butane; from residue burning: 1.26497e-7 kg; = p2146*1.0208333333
- Anhydrous ammonia; no broadcast in fert. in fall bef. plant.: 0.000605474 kg; = p2433*1.2142857143
- Sulfur [soil, agricultural]: 5.22081e-7 kg; = 1.0 * (p3230)
- Butane [air, non-urban air or from high stacks]: 3.64312e-7 kg; = 1.0 * (p2147*1.0208333333)
- Ammonium nitrate; no broadcast in fert. at plant.: 0.00221938 kg; = p2515*4.7142857143
- Oxygen; applied in limestone: 0.00910885 kg; = p3219
- NMVOC, non-methane volatile organic compounds, unspecified origin [air, non-urban air or from high stacks]: 0.000154076 kg; = 1.0 * (p2051+p2052)
- Fluroxypyr [soil, agricultural]: 4.73485e-6 kg; = 1.0 * (p5225)
- Particulates, < 2.5 um [air, non-urban air or from high stacks]: 2.4166e-5 kg; = 1.0 * (p2033+p2035)
- Aqueous ammonia; broadcast w/o incorp. in fert. at plant.: 3.23843e-5 kg; = p2903*1.2142857143
- Nitrogen solution; no broadcast in fert. in spr. bef. plant.; no broadcast in fert. in spr. bef. plant.; kg N: 0.00417857 kg; = p2483
- Monoammonium phosphate; no broadcast in fert. at plant.: 0.00493563 kg; = p2537*8.2142857143
- Toluene [air, non-urban air or from high stacks]: 1.14217e-6 kg; = 1.0 * (p2141*1.0952380952)
- Anhydrous ammonia; broadcast w/o incorp. in fert. at plant.: 0.0009241 kg; = p2901*1.2142857143
- Anhydrous ammonia; broadcast w/ incorp. in fert. in fall bef. plant.: 8.87664e-5 kg; = p2628*1.2142857143
- Urea; broadcast w/o incorp. in fert. at plant.: 0.00125547 kg; = p2919*5
- Ammonium nitrate; no broadcast in fert. in fall bef. plant.: 0.00036051 kg; = p2437*4.7142857143
- Fenoxaprop P; unspec. appl. method: 1.64141e-5 kg; = p5214
- Gypsum: 2.55234e-6 kg; = p3229
- Anhydrous ammonia; broadcast w/o incorp. in fert. in spr. bef. plant.: 0.00125175 kg; = p2862*1.2142857143
- Ammonium nitrate; no broadcast in fert. in spr. bef. plant.: 0.00300629 kg; = p2476*4.7142857143
- Superphosphate, grades>22%; no broadcast in fert. at plant.; kg P: 0.000113863 kg; = p2542
- Urea; broadcast w/ incorp. in fert. in spr. bef. plant.: 0.00100566 kg; = p2685*5
- Nitrogen solution; broadcast w/o incorp. in fert. at plant.; broadcast w/o incorp. in fert. at plant.; kg N: 0.000764781 kg; = p2912
- Acetol; from residue burning: 2.25784e-5 kg; = p2134*2.0555555556
- Pesticides, unspecified [soil, agricultural]: 8.35172e-6 kg; = 1.0 * (p5337)
- Ammonium nitrate; broadcast w/o incorp. in fert. in spr. bef. plant.: 0.000745316 kg; = p2866*4.7142857143
- Anhydrous ammonia; no broadcast in fert. at plant.: 0.00372743 kg; = p2511*1.2142857143
- Nitrogen; applied in sewage sludge: 4.68532e-9 kg; = p3240
- Monoammonium phosphate; broadcast w/ incorp. in fert. at plant.: 0.000233273 kg; = p2732*8.2142857143
- Benzene [air, non-urban air or from high stacks]: 9.20145e-7 kg; = 1.0 * (p2140*1.0833333333)
- Bromoxynil [soil, agricultural]: 3.47222e-6 kg; = 1.0 * (p5159)
- Starane [soil, agricultural]: 2.2096e-6 kg; = 1.0 * (p5226)
- Ammonium sulfate; broadcast w/o incorp. in fert. at plant.: 0.00027767 kg; = p2908*4.7142857143
- Plant dry matter; in aboveground residue left on field: 0.272159 kg; = p2172
- Nitrogen solution; broadcast w/ incorp. in fert. in fall bef. plant.; broadcast w/ incorp. in fert. in fall bef. plan...: 7.34627e-5 kg; = p2639
- Ammonium sulfate; no broadcast in fert. in spr. bef. plant.: 0.00151712 kg; = p2479*4.7142857143
- Diammonium phosphate; no broadcast in fert. at plant.: 0.00836392 kg; = p2533*4.7142857143
- Ammonium sulfate; no broadcast in fert. at plant.: 0.00112 kg; = p2518*4.7142857143
- Nitrogen solution; broadcast w/ incorp. in fert. in spr. bef. plant.; broadcast w/ incorp. in fert. in spr. bef. plan...: 0.000612606 kg; = p2678
- Anhydrous ammonia; broadcast w/ incorp. in fert. at plant.: 0.000546465 kg; = p2706*1.2142857143
- Acrylonitrile: 2.01002e-7 kg; = p2156*1.4722222222
- Propanenitrile: 3.84239e-7 kg; = p2157*1.5277777778
- Acetonitrile [air, non-urban air or from high stacks]: 1.2588e-6 kg; = 1.0 * (p2155*1.7083333333)
- Propane [air, non-urban air or from high stacks]: 1.68886e-6 kg; = 1.0 * (p2142*1.2222222222)
- Urea; broadcast w/o incorp. in fert. in fall bef. plant.: 0.000203935 kg; = p2841*5
- Ash: 0.00118611 kg; = p2021+p2022
- Potassium chloride; unspec. appl. method in fert. at plant.: 0.000667016 kg; = p3131*2.2166666667
- Other limestone constituents; applied in limestone: 0.00121238 kg; = p3220
- Glycolaldehyde; from residue burning: 1.20814e-5 kg; = p2135*2.5
- Sodium nitrate; no broadcast in fert. in fall bef. plant.: 2.43885e-6 kg; = p2447*6.0714285714
- Sodium nitrate; broadcast w/ incorp. in fert. in spr. bef. plant.: 2.98163e-6 kg; = p2681*6.0714285714
- Formic acid [air, non-urban air or from high stacks]: 6.00865e-6 kg; = 1.0 * (p2131*3.8333333333)
- Nitrogen; in below-ground residue: 0.00362983 kg; = p2174
- Other single phosphates; broadcast w/ incorp. in fert. at plant.; kg P: 3.09542e-6 kg; = p2739
- Nitrogen solution; no broadcast in fert. in fall bef. plant.; no broadcast in fert. in fall bef. plant.; kg N: 0.000501088 kg; = p2444
- Urea; broadcast w/ incorp. in fert. in fall bef. plant.: 0.000120597 kg; = p2646*5
- Particulates, < 10 um: 3.96371e-5 kg; = p2034+p2036
- Nitrogen solution; broadcast w/o incorp. in fert. in spr. bef. plant.; broadcast w/o incorp. in fert. in spr. bef. pl...: 0.00103595 kg; = p2873
- Ammonium nitrate; broadcast w/o incorp. in fert. at plant.: 0.000550225 kg; = p2905*4.7142857143
- Aqueous ammonia; broadcast w/ incorp. in fert. in spr. bef. plant.: 2.59405e-5 kg; = p2669*1.2142857143
- Sulfuric acid [soil, agricultural]: 2.386e-7 kg; = 1.0 * (p3231)
- Water: 0.128523 kg; = p2171+p2181+p2178
- Water [air, non-urban air or from high stacks]: 9.5194e-7 m3; = 0.001 * (p2016)
- Nitrogen solution; no broadcast in fert. at plant.; no broadcast in fert. at plant.; kg N: 0.00308481 kg; = p2522
- Methane: 1.26903e-5 kg; = p2025*1.3333333333
- Ammonium sulfate; broadcast w/ incorp. in fert. in fall bef. plant.: 2.66722e-5 kg; = p2635*4.7142857143
- Ammonium nitrate; broadcast w/o incorp. in fert. in fall bef. plant.: 8.93771e-5 kg; = p2827*4.7142857143
- Dichlorprop-dimethylammonium; unspec. appl. method: 8.20707e-6 kg; = p5138
- Other single K nutrients; unspec. appl. method in fert. at plant.; kg K: 3.77795e-5 kg; = p3133
- Methyl vinyl ether; from residue burning: 4.54816e-7 kg; = p2137*1.6111111111
- Plant dry matter; in below-ground residue: 0.144292 kg; = p2177
- Urea; no broadcast in fert. in spr. bef. plant.: 0.00685957 kg; = p2490*5
- Methanol [air, non-urban air or from high stacks]: 1.9708e-5 kg; = 1.0 * (p2129*2.6666666667)
- Ammonium sulfate; broadcast w/ incorp. in fert. in spr. bef. plant.: 0.00022242 kg; = p2674*4.7142857143
- isopentane: 1.01489e-7 kg; = p2151*1.0166666667
- Ammonium sulfate; no broadcast in fert. in fall bef. plant.: 0.000181931 kg; = p2440*4.7142857143
- Aqueous ammonia; broadcast w/o incorp. in fert. in fall bef. plant.: 5.26042e-6 kg; = p2825*1.2142857143
- Sodium nitrate; broadcast w/ incorp. in fert. at plant.: 2.20117e-6 kg; = p2720*6.0714285714
- Aqueous ammonia; broadcast w/o incorp. in fert. in spr. bef. plant.: 4.38667e-5 kg; = p2864*1.2142857143
- Hydrocyanic acid: 1.71069e-6 kg; = p2154*2.25
- Carbon [soil, agricultural]: 0.373775 kg; = 1.0 * (p3217+p3242+p3225+p2173+p2167)
- Aqueous ammonia; no broadcast in fert. in fall bef. plant.: 2.12183e-5 kg; = p2435*1.2142857143
- Dioxins and furans (PCDD/F); from residue burning: 1.79896e-13 kg TEQ; = p2047
- cyclopentane: 9.91856e-9 kg; = p2153*1.0166666667
- Butadiene [air, non-urban air or from high stacks]: 9.04768e-7 kg; = 1.0 * (p2143*1.125)
- Superphosphate, grades>22%; unspec. appl. method in fert. at plant.; kg P: 1.33378e-5 kg; = p3127
- Phenol [air, non-urban air or from high stacks]: 3.11023e-6 kg; = 1.0 * (p2133*1.3055555556)
- Carbon monoxide, fossil [air, non-urban air or from high stacks]: 0.000330824 kg; = 1.0 * (p2028*2.3333333333)
- Aqueous ammonia; no broadcast in fert. at plant.: 0.000130625 kg; = p2513*1.2142857143
- Isoprene [air, non-urban air or from high stacks]: 2.2627e-6 kg; = 1.0 * (p2145*1.1333333333)
- Superphosphate, grades>22%; broadcast w/ incorp. in fert. at plant.; kg P: 5.3815e-6 kg; = p2737
- Phosphorous; in below-ground residue: 0.000554914 kg; = p2175
- Nitrogen; in above-ground residue left on field: 0.00684645 kg; = p2168
- Sodium nitrate; broadcast w/o incorp. in fert. at plant.: 3.72228e-6 kg; = p2915*6.0714285714
- Ammonium nitrate; broadcast w/ incorp. in fert. in fall bef. plant.: 5.28531e-5 kg; = p2632*4.7142857143
- Formaldehyde [air, non-urban air or from high stacks]: 1.2466e-5 kg; = 1.0 * (p2128*2.5)
- Pesticide formulation balance; unspec. appl. method: 0.000216246 kg; = p5338
- Oxygen; applied in dolomite: 0.000591506 kg; = p3228
- Superphosphate, grades<= 22%; no broadcast in fert. at plant.; kg P: 4.72896e-6 kg; = p2540
- trans-2-Butene: 3.41459e-7 kg; = p2148*1.1666666667
- Ethene [air, non-urban air or from high stacks]: 8.72499e-6 kg; = 1.0 * (p2125*1.1666666667)
- Sodium nitrate; no broadcast in fert. at plant.: 1.50141e-5 kg; = p2525*6.0714285714
- Other single phosphates; unspec. appl. method in fert. at plant.; kg P: 7.67183e-6 kg; = p3129
- Anhydrous ammonia; broadcast w/o incorp. in fert. in fall bef. plant.: 0.000150108 kg; = p2823*1.2142857143
- Superphosphate, grades<= 22%; broadcast w/ incorp. in fert. at plant.; kg P: 2.23505e-7 kg; = p2735
- Flucarbazone sodium salt [soil, agricultural]: 3.15657e-7 kg; = 1.0 * (p5220)
- Ammonium sulfate; broadcast w/o incorp. in fert. in spr. bef. plant.: 0.000376122 kg; = p2869*4.7142857143
- Dicamba [soil, agricultural]: 5.99747e-6 kg; = 1.0 * (p5187)
- Filler materials, applied with synthetic fertilizer: 0.0211809 kg; = p2432
- Sodium nitrate; no broadcast in fert. in spr. bef. plant.: 2.03376e-5 kg; = p2486*6.0714285714
- Sodium nitrate; broadcast w/o incorp. in fert. in spr. bef. plant.: 5.04208e-6 kg; = p2876*6.0714285714
- Sodium nitrate; broadcast w/o incorp. in fert. in fall bef. plant.: 6.04638e-7 kg; = p2837*6.0714285714
- 2,4-D [soil, agricultural]: 9.53283e-5 kg; = 1.0 * (p5133)
- cis-2-Butene: 2.57592e-7 kg; = p2149*1.1666666667
- Aqueous ammonia; broadcast w/ incorp. in fert. in fall bef. plant.: 3.11074e-6 kg; = p2630*1.2142857143
- Sodium nitrate; broadcast w/ incorp. in fert. in fall bef. plant.: 3.57552e-7 kg; = p2642*6.0714285714
- Pentane [air, non-urban air or from high stacks]: 1.26861e-7 kg; = 1.0 * (p2152*1.0166666667)
- Sewage sludge dry matter; applied in sewage sludge: 5.18711e-10 kg; = p3243
- Potassium; in above-ground residue left on field; biogenic: 0.00637037 kg; = p2170
- Nitrogen dioxide: 1.19374e-5 kg; = p2039*3.2857142857
- Propene [air, non-urban air or from high stacks]: 4.05381e-6 kg; = 1.0 * (p2136*1.1666666667)
- Phosphorous; applied in sewage sludge: 5.59317e-10 kg; = p3241
- Tribenuron-methyl [soil, agricultural]: 3.15657e-7 kg; = 1.0 * (p5329)
- Magnesium [soil, agricultural]: 0.000149469 kg; = 1.0 * (p3227)
- Ammonium nitrate; broadcast w/ incorp. in fert. at plant.: 0.000325375 kg; = p2710*4.7142857143
- Ammonia [air, non-urban air or from high stacks]: 1.3013e-5 kg; = 1.0 * (p2159*1.2142857143)
- Acetone [air, non-urban air or from high stacks]: 2.67601e-6 kg; = 1.0 * (p2139*1.6111111111)
- Plant dry matter; from residue burning: 0.00215468 kg; = p2164
- Other single phosphates; no broadcast in fert. at plant.; kg P: 6.54935e-5 kg; = p2544
- Carbon dioxide, in air: 0.00802452 kg; = p2163*3.6666666667
- Nitrogen solution; broadcast w/o incorp. in fert. in fall bef. plant.; broadcast w/o incorp. in fert. in fall bef. pl...: 0.000124229 kg; = p2834
- Superphosphate, grades<= 22%; unspec. appl. method in fert. at plant.; kg P: 5.53945e-7 kg; = p3125
- Diammonium phosphate; unspec. appl. method in fert. at plant.: 0.00097974 kg; = p3118*4.7142857143
- 1-Butene: 8.02727e-7 kg; = p2144*1.1666666667
- Aqueous ammonia; no broadcast in fert. in spr. bef. plant.: 0.00017694 kg; = p2474*1.2142857143
- Acetic acid [air, non-urban air or from high stacks]: 3.35497e-5 kg; = 1.0 * (p2127*2.5)
- Ethyne [air, non-urban air or from high stacks]: 1.63229e-6 kg; = 1.0 * (p2132*1.0833333333)
- Ammonium sulfate; broadcast w/ incorp. in fert. at plant.: 0.0001642 kg; = p2713*4.7142857143
- Urea; no broadcast in fert. at plant.: 0.00506403 kg; = p2529*5
- Clodinafop-propargyl [soil, agricultural]: 2.52525e-6 kg; = 1.0 * (p5175)
- Anhydrous ammonia; no broadcast in fert. in spr. bef. plant.: 0.00504905 kg; = p2472*1.2142857143
- Nitrogen solution; broadcast w/ incorp. in fert. at plant.; broadcast w/ incorp. in fert. at plant.; kg N: 0.000452252 kg; = p2717
- Furan [air, non-urban air or from high stacks]: 6.55962e-7 kg; = 1.0 * (p2138*1.4166666667)
- Urea; broadcast w/o incorp. in fert. in spr. bef. plant.: 0.00170061 kg; = p2880*5
- MCPA [soil, agricultural]: 7.92298e-5 kg; = 1.0 * (p5252)
- Dinitrogen monoxide [air, non-urban air or from high stacks]: 4.19836e-7 kg; = 1.0 * (p2044*1.5714285714)
- Acetaldehyde [air, non-urban air or from high stacks]: 7.45813e-6 kg; = 1.0 * (p2130*1.8333333333)
- Urea; no broadcast in fert. in fall bef. plant.: 0.000822588 kg; = p2451*5
- Bromoxynil octanoate: 2.49369e-5 kg; = p5161
- Anhydrous ammonia; broadcast w/ incorp. in fert. in spr. bef. plant.: 0.000740224 kg; = p2667*1.2142857143
- Ammonium nitrate; broadcast w/ incorp. in fert. in spr. bef. plant.: 0.000440742 kg; = p2671*4.7142857143
- Diammonium phosphate; broadcast w/ incorp. in fert. at plant.: 0.000395305 kg; = p2728*4.7142857143
- Ammonium sulfate; broadcast w/o incorp. in fert. in fall bef. plant.: 4.5104e-5 kg; = p2830*4.7142857143
- isobutene: 7.00889e-7 kg; = p2150*1.1666666667
- Potassium; in below-ground residue; biogenic: 0.00337742 kg; = p2176
- Aqueous ammonia; broadcast w/ incorp. in fert. at plant.: 1.91504e-5 kg; = p2708*1.2142857143
- Urea; broadcast w/ incorp. in fert. at plant.: 0.000742419 kg; = p2724*5

## Sampling procedure
A delete-a-group jackknife is used by the USDA to estimate the ARMS sample means and RSEs, based on a 15 sample delete-a-group jackknife. Because of this relatively small sample size, a Students t distribution is used to represent ARMS data probability density functions. Other representations of uncertainty are described in Cooper, J.S., Kahn, E., Noon, M. (2012). LCA Digital Commons Unit Process Data: field crop production Version 1. Prepared for the US Department of Agriculture National Agricultural Library. Retrieved from https://www.lcacommons.gov/discovery/docs/LCA%20Digital%20Commons%20Unit%20Process%20Data%20final%20updated.pdf

## Extrapolations
Data represent an aggregation of processes applied in North Dakota in 2004. Data development is demonstrated by parameterization (exlicitly presents all raw and uncertainty data and all calculations). Flow data quality according to the LCADC convention is provided for all flows.
