# peanuts; at harvest in 1999; at farm; 90%-95% moisture

Dataset: EcoSpold 2, unit process
Geography: GLO
Time period: 1999-01-02 to 2000-01-01
Scenario: Business-as-Usual
System model: Allocation, ecoinvent default
Generated by: cooperjs@u.washington.edu
isCopyrightProtected: false

## General comment
This unit process/ gate-to-gate dataset represents the production of 1 kg peanuts coproduced with residue. The process technologies are an aggregation of those applied in Texas in 1999. Applicable classifications include ISIC 0111, NAIC 111992, UNSPSC 50405500; this dataset was prepared in ILCD format using the UWDFE Lab Excel to ILCD File Generator (beta version, August 2013)

Exchange "Chlorothalonil-soil agricultural" is the result of combining the following original LCA Commons flows: "Chlorothalonil; foliar or directed spray; kg AI", "Chlorothalonil; in irrigation water; kg AI", "Chlorothalonil; broadcast with incorporation; kg AI", "Chlorothalonil; unspec. appl. method; kg AI", "Chlorothalonil; in seed furrow; kg AI", "Chlorothalonil; banded or side-dressed; kg AI", "Chlorothalonil; broadcast without incorporation; kg AI".
Exchange "Bentazone-soil agricultural" is the result of combining the following original LCA Commons flows: "Bentazon; broadcast without incorporation; kg AI", "Bentazon; banded or side-dressed; kg AI", "Bentazon; in irrigation water; kg AI", "Bentazon; unspec. appl. method; kg AI", "Bentazon; broadcast with incorporation; kg AI", "Bentazon; in seed furrow; kg AI", "Bentazon; foliar or directed spray; kg AI".
Exchange "NMVOC, non-methane volatile organic compounds, unspecified origin-air low population density" is the result of combining the following original LCA Commons flows: "NMVOCs; from residue burning; kg except C, biogenic", "NMVOCs; from residue burning; kg C, biogenic".
Exchange "4-(2,4-Dichlorophenoxy)butyric acid-soil agricultural" is the result of combining the following original LCA Commons flows: "4-(2,4-Dichlorophenoxy)butyric acid; foliar or directed spray; kg AI", "4-(2,4-Dichlorophenoxy)butyric acid; unspec. appl. method; kg AI", "4-(2,4-Dichlorophenoxy)butyric acid; broadcast with incorporation; kg AI", "4-(2,4-Dichlorophenoxy)butyric acid; in seed furrow; kg AI", "4-(2,4-Dichlorophenoxy)butyric acid; banded or side-dressed; kg AI", "4-(2,4-Dichlorophenoxy)butyric acid; in irrigation water; kg AI", "4-(2,4-Dichlorophenoxy)butyric acid; broadcast without incorporation; kg AI".
Exchange "Glyphosate-soil agricultural" is the result of combining the following original LCA Commons flows: "Glyphosate; foliar or directed spray; kg AI", "Glyphosate; in seed furrow; kg AI", "Glyphosate; banded or side-dressed; kg AI", "Glyphosate; in irrigation water; kg AI", "Glyphosate; broadcast without incorporation; kg AI", "Glyphosate; unspec. appl. method; kg AI", "Glyphosate; broadcast with incorporation; kg AI".
Exchange "Imazethapyr-soil agricultural" is the result of combining the following original LCA Commons flows: "Imazethapyr; broadcast without incorporation; kg AI", "Imazethapyr; in seed furrow; kg AI", "Imazethapyr; in irrigation water; kg AI", "Imazethapyr; banded or side-dressed; kg AI", "Imazethapyr; broadcast with incorporation; kg AI", "Imazethapyr; foliar or directed spray; kg AI", "Imazethapyr; unspec. appl. method; kg AI".
Exchange "Carbon-soil agricultural" is the result of combining the following original LCA Commons flows: "Carbon; in above-ground residue left on field; biogenic", "Carbon; applied in limestone", "Carbon; in below-ground residue; biogenic", "Carbon; applied in sewage sludge", "Carbon; applied in dolomite".
Exchange "Particulates, < 2.5 um-air low population density" is the result of combining the following original LCA Commons flows: "PM2.5; from residue burning; kg except C, biogenic", "PM2.5; from residue burning; kg C, biogenic".
Exchange "Pesticides, unspecified-soil agricultural" is the result of combining the following original LCA Commons flows: "Unspecified pesticide; in seed furrow; kg AI", "Unspecified pesticide; broadcast with incorporation; kg AI", "Unspecified pesticide; broadcast without incorporation; kg AI", "Unspecified pesticide; in irrigation water; kg AI", "Unspecified pesticide; foliar or directed spray; kg AI", "Unspecified pesticide; unspec. appl. method; kg AI", "Unspecified pesticide; banded or side-dressed; kg AI".
Exchange "Sethoxydim-soil agricultural" is the result of combining the following original LCA Commons flows: "Sethoxydim; banded or side-dressed; kg AI", "Sethoxydim; broadcast without incorporation; kg AI", "Sethoxydim; in irrigation water; kg AI", "Sethoxydim; foliar or directed spray; kg AI", "Sethoxydim; in seed furrow; kg AI", "Sethoxydim; broadcast with incorporation; kg AI", "Sethoxydim; unspec. appl. method; kg AI".
Exchange "Clethodim-soil agricultural" is the result of combining the following original LCA Commons flows: "Clethodim; banded or side-dressed; kg AI", "Clethodim; in irrigation water; kg AI", "Clethodim; broadcast with incorporation; kg AI", "Clethodim; broadcast without incorporation; kg AI", "Clethodim; in seed furrow; kg AI", "Clethodim; unspec. appl. method; kg AI", "Clethodim; foliar or directed spray; kg AI".
Exchange "Ash-soil agricultural" is the result of combining the following original LCA Commons flows: "Ash; from residue burning; kg except C, biogenic", "Ash; from residue burning; kg C, biogenic".
Exchange "Trifluralin-soil agricultural" is the result of combining the following original LCA Commons flows: "Trifluralin; broadcast without incorporation; kg AI", "Trifluralin; unspec. appl. method; kg AI", "Trifluralin; broadcast with incorporation; kg AI", "Trifluralin; in irrigation water; kg AI", "Trifluralin; foliar or directed spray; kg AI", "Trifluralin; in seed furrow; kg AI", "Trifluralin; banded or side-dressed; kg AI".
Exchange "Water-soil agricultural" is the result of combining the following original LCA Commons flows: "Water; from irrigation and applied with manure and sewage sludge", "Water; in above-ground residue left on field; biogenic", "Water; in below-ground residue; biogenic".
Exchange "Pendimethalin-soil agricultural" is the result of combining the following original LCA Commons flows: "Pendimethalin; foliar or directed spray; kg AI", "Pendimethalin; broadcast without incorporation; kg AI", "Pendimethalin; broadcast with incorporation; kg AI", "Pendimethalin; unspec. appl. method; kg AI", "Pendimethalin; in seed furrow; kg AI", "Pendimethalin; banded or side-dressed; kg AI", "Pendimethalin; in irrigation water; kg AI".
Exchange "Tebuconazole-soil agricultural" is the result of combining the following original LCA Commons flows: "Tebuconazole; broadcast without incorporation; kg AI", "Tebuconazole; unspec. appl. method; kg AI", "Tebuconazole; in irrigation water; kg AI", "Tebuconazole; foliar or directed spray; kg AI", "Tebuconazole; broadcast with incorporation; kg AI", "Tebuconazole; in seed furrow; kg AI", "Tebuconazole; banded or side-dressed; kg AI".
Exchange "Ethalfluralin-soil agricultural" is the result of combining the following original LCA Commons flows: "Ethalfluralin; in seed furrow; kg AI", "Ethalfluralin; banded or side-dressed; kg AI", "Ethalfluralin; unspec. appl. method; kg AI", "Ethalfluralin; broadcast without incorporation; kg AI", "Ethalfluralin; in irrigation water; kg AI", "Ethalfluralin; foliar or directed spray; kg AI", "Ethalfluralin; broadcast with incorporation; kg AI".
Exchange "VERNOLATE-soil unspecified" is the result of combining the following original LCA Commons flows: "Vernolate; in seed furrow; kg AI", "Vernolate; broadcast with incorporation; kg AI", "Vernolate; banded or side-dressed; kg AI", "Vernolate; foliar or directed spray; kg AI", "Vernolate; unspec. appl. method; kg AI", "Vernolate; in irrigation water; kg AI", "Vernolate; broadcast without incorporation; kg AI".
Exchange "Water, unspecified origin-resource in water" is the result of combining the following original LCA Commons flows: "Water; withdrawal from unspec. source, for peanuts, in 1999", "Water; from plant uptake; biogenic".
Exchange "Metolachlor-soil agricultural" is the result of combining the following original LCA Commons flows: "Propazine; banded or side-dressed; kg AI", "Propazine; in irrigation water; kg AI", "Propazine; broadcast with incorporation; kg AI", "Propazine; unspec. appl. method; kg AI", "Propazine; in seed furrow; kg AI", "Propazine; broadcast without incorporation; kg AI", "Propazine; foliar or directed spray; kg AI".
Exchange "Particulates, < 10 um-air low population density" is the result of combining the following original LCA Commons flows: "PM10; from residue burning; kg except C, biogenic", "PM10; from residue burning; kg C, biogenic".
Exchange "Azoxystrobin-soil agricultural" is the result of combining the following original LCA Commons flows: "Azoxystrobin; broadcast with incorporation; kg AI", "Azoxystrobin; foliar or directed spray; kg AI", "Azoxystrobin; unspec. appl. method; kg AI", "Azoxystrobin; in irrigation water; kg AI", "Azoxystrobin; in seed furrow; kg AI", "Azoxystrobin; broadcast without incorporation; kg AI", "Azoxystrobin; banded or side-dressed; kg AI".
Exchange "Transformation, from arable-resource land" is the result of combining the following original LCA Commons flows: "Transformation; from arable, from small grains to peanuts", "Transformation; from arable, from cotton to peanuts", "Transformation; from arable, from unspec. use to peanuts", "Transformation; from arable, from other to peanuts".
Exchange "Calcium-soil agricultural" is the result of combining the following original LCA Commons flows: "Calcium; applied in limestone", "Calcium; applied in dolomite".
Exchange "2,4-D-soil agricultural" is the result of combining the following original LCA Commons flows: "2,4-D; in seed furrow; kg AI", "2,4-D; foliar or directed spray; kg AI", "2,4-D; unspec. appl. method; kg AI", "2,4-D; broadcast with incorporation; kg AI", "2,4-D; broadcast without incorporation; kg AI", "2,4-D; in irrigation water; kg AI", "2,4-D; banded or side-dressed; kg AI".
Exchange "Propiconazole-soil agricultural" is the result of combining the following original LCA Commons flows: "Propiconazole; unspec. appl. method; kg AI", "Propiconazole; banded or side-dressed; kg AI", "Propiconazole; in irrigation water; kg AI", "Propiconazole; in seed furrow; kg AI", "Propiconazole; broadcast with incorporation; kg AI", "Propiconazole; foliar or directed spray; kg AI", "Propiconazole; broadcast without incorporation; kg AI".
Exchange "Aldicarb-soil agricultural" is the result of combining the following original LCA Commons flows: "Aldicarb; broadcast without incorporation; kg AI", "Aldicarb; foliar or directed spray; kg AI", "Aldicarb; in irrigation water; kg AI", "Aldicarb; banded or side-dressed; kg AI", "Aldicarb; unspec. appl. method; kg AI", "Aldicarb; broadcast with incorporation; kg AI", "Aldicarb; in seed furrow; kg AI".
Exchange "Butane-2bdf9967-6dae-4183-88d1-8f612548c51e low population density" was originally named: "N butane; from residue burning; kg C, biogenic" in this dataset.
Exchange "Propane-2bdf9967-6dae-4183-88d1-8f612548c51e low population density" was originally named: "Propane; from residue burning; kg C, biogenic" in this dataset.
Exchange "Nitrogen dioxide-2bdf9967-6dae-4183-88d1-8f612548c51e low population density" was originally named: "Nitrogen dioxide; from residue burning; kg N, biogenic" in this dataset.
Exchange "Water-2bdf9967-6dae-4183-88d1-8f612548c51e low population density" was originally named: "Water; from residue burning; biogenic" in this dataset.
Exchange "Toluene-2bdf9967-6dae-4183-88d1-8f612548c51e low population density" was originally named: "Toluene; from residue burning; kg C, biogenic" in this dataset.
Exchange "Ammonia-2bdf9967-6dae-4183-88d1-8f612548c51e low population density" was originally named: "Ammonia; from residue burning; kg N, biogenic" in this dataset.
Exchange "Occupation, arable-c19fb2d9-98eb-4cd3-8761-81b71d8a9a1b land" was originally named: "Occupation; arable, as peanuts" in this dataset.
Exchange "Carbon dioxide, in air-2bdf9967-6dae-4183-88d1-8f612548c51e low population density" was originally named: "Carbon dioxide; from residue burning; kg C, biogenic" in this dataset.
Exchange "Sulfur-be1c0329-f1a8-4524-8420-a86d2a8dd358 agricultural" was originally named: "Sulfur; as secondary application" in this dataset.
Exchange "Magnesium-be1c0329-f1a8-4524-8420-a86d2a8dd358 agricultural" was originally named: "Magnesium; applied in dolomite" in this dataset.
Exchange "Formaldehyde-2bdf9967-6dae-4183-88d1-8f612548c51e low population density" was originally named: "Formaldehyde; from residue burning; kg C, biogenic" in this dataset.
Exchange "1-Butene-2bdf9967-6dae-4183-88d1-8f612548c51e low population density" was originally named: "1 butene; from residue burning; kg C, biogenic" in this dataset.
Exchange "Phosphorus-c19fb2d9-98eb-4cd3-8761-81b71d8a9a1b unspecified" was originally named: "Phosphorous; from plant uptake; biogenic" in this dataset.
Exchange "trans-2-Butene-2bdf9967-6dae-4183-88d1-8f612548c51e low population density" was originally named: "Trans 2 butene; from residue burning; kg C, biogenic" in this dataset.
Exchange "cis-2-Butene-2bdf9967-6dae-4183-88d1-8f612548c51e low population density" was originally named: "Cis 2 butene; from residue burning; kg C, biogenic" in this dataset.
Exchange "Ethane-2bdf9967-6dae-4183-88d1-8f612548c51e low population density" was originally named: "Ethane; from residue burning; kg C, biogenic" in this dataset.
Exchange "Methane-2bdf9967-6dae-4183-88d1-8f612548c51e low population density" was originally named: "Methane; from residue burning; kg C, biogenic" in this dataset.
Exchange "Ethyne-2bdf9967-6dae-4183-88d1-8f612548c51e low population density" was originally named: "Acetylene; from residue burning; kg C, biogenic" in this dataset.
Exchange "Acetaldehyde-2bdf9967-6dae-4183-88d1-8f612548c51e low population density" was originally named: "Acetaldehyde; from residue burning; kg C, biogenic" in this dataset.
Exchange "Transformation, to arable-c19fb2d9-98eb-4cd3-8761-81b71d8a9a1b land" was originally named: "Transformation; to arable, to peanuts" in this dataset.
Exchange "Acetone-2bdf9967-6dae-4183-88d1-8f612548c51e low population density" was originally named: "Acetone; from residue burning; kg C, biogenic" in this dataset.
Exchange "Acetonitrile-2bdf9967-6dae-4183-88d1-8f612548c51e low population density" was originally named: "Acetonitrile; from residue burning; kg C, biogenic" in this dataset.
Exchange "Carbon monoxide, fossil-2bdf9967-6dae-4183-88d1-8f612548c51e low population density" was originally named: "Carbon monoxide; from residue burning; kg C, biogenic" in this dataset.
Exchange "Acrylonitrile-2bdf9967-6dae-4183-88d1-8f612548c51e low population density" was originally named: "Propenenitrile; from residue burning; kg C, biogenic" in this dataset.
Exchange "Water, surface-c19fb2d9-98eb-4cd3-8761-81b71d8a9a1b in water" was originally named: "Water; withdrawal from surface water, for peanuts, in 1999" in this dataset.
Exchange "Methanol-2bdf9967-6dae-4183-88d1-8f612548c51e low population density" was originally named: "Methanol; from residue burning; kg C, biogenic" in this dataset.
Exchange "Hydrocyanic acid-2bdf9967-6dae-4183-88d1-8f612548c51e low population density" was originally named: "Hydrogen cyanide; from residue burning; kg C, biogenic" in this dataset.
Exchange "Zinc compounds-be1c0329-f1a8-4524-8420-a86d2a8dd358 agricultural" was originally named: "Zinc compounds; as secondary application" in this dataset.
Exchange "Phenol-2bdf9967-6dae-4183-88d1-8f612548c51e low population density" was originally named: "Phenol; from residue burning; kg C, biogenic" in this dataset.
Exchange "Benzene-2bdf9967-6dae-4183-88d1-8f612548c51e low population density" was originally named: "Benzene; from residue burning; kg C, biogenic" in this dataset.
Exchange "Butadiene-2bdf9967-6dae-4183-88d1-8f612548c51e low population density" was originally named: "1,3 butadiene; from residue burning; kg C, biogenic" in this dataset.
Exchange "Pentane-2bdf9967-6dae-4183-88d1-8f612548c51e low population density" was originally named: "N pentane; from residue burning; kg C, biogenic" in this dataset.
Exchange "Acetic acid-2bdf9967-6dae-4183-88d1-8f612548c51e low population density" was originally named: "Acetic acid; from residue burning; kg C, biogenic" in this dataset.
Exchange "isobutene-2bdf9967-6dae-4183-88d1-8f612548c51e low population density" was originally named: "I butene; from residue burning; kg C, biogenic" in this dataset.
Exchange "Sulfuric acid-be1c0329-f1a8-4524-8420-a86d2a8dd358 agricultural" was originally named: "Sulfuric acid; as secondary application" in this dataset.
Exchange "Carbon dioxide-c19fb2d9-98eb-4cd3-8761-81b71d8a9a1b unspecified" was originally named: "Carbon dioxide; from plant uptake; kg C, biogenic" in this dataset.
Exchange "isopentane-2bdf9967-6dae-4183-88d1-8f612548c51e low population density" was originally named: "I pentane; from residue burning; kg C, biogenic" in this dataset.
Exchange "Ethene-2bdf9967-6dae-4183-88d1-8f612548c51e low population density" was originally named: "Ethylene; from residue burning; kg C, biogenic" in this dataset.
Exchange "Propene-2bdf9967-6dae-4183-88d1-8f612548c51e low population density" was originally named: "Propylene; from residue burning; kg C, biogenic" in this dataset.
Exchange "Dinitrogen monoxide-2bdf9967-6dae-4183-88d1-8f612548c51e low population density" was originally named: "Dinitrogen monoxide; from residue burning; kg N, biogenic" in this dataset.
Exchange "Isoprene-2bdf9967-6dae-4183-88d1-8f612548c51e low population density" was originally named: "Isoprene; from residue burning; kg C, biogenic" in this dataset.
Exchange "Water, ground-c19fb2d9-98eb-4cd3-8761-81b71d8a9a1b in water" was originally named: "Water; withdrawal from groundwater, for peanuts, in 1999" in this dataset.
Exchange "Formic acid-2bdf9967-6dae-4183-88d1-8f612548c51e low population density" was originally named: "Formic acid; from residue burning; kg C, biogenic" in this dataset.
Exchange "Furan-2bdf9967-6dae-4183-88d1-8f612548c51e low population density" was originally named: "Furan; from residue burning; kg C, biogenic" in this dataset.

## Geography
The unit process is assumed to represent production in Texas (US State).

## Technology
This process produces peanuts; at harvest in 1999; at farm; 90%-95% moisture. The process is assumed to represent production in Texas (US State). Yields and related inputs and outputs represent a single year of operation, in 1999. This dataset includes consideration of residue burning; soil preparation; planting or sowing; irrigation; application, storage, and transport of fertilizers, manures, liming materials, secondary materials, and pesticides; and harvest. Fate and transport of applications are not included as described in Cooper, J.S., Kahn, E., Noon, M. (2012) LCA Digital Commons Unit Process Data: field crop production Version 1 which is available at https://www.lcacommons.gov/discovery/docs/LCA%20Digital%20Commons%20Unit%20Process%20Data%20final%20updated.pdf

## Time period
Start and end dates match the underlying data obtained from the USDA Agricultural Resource Management Survey (ARMS).
## Parameters
- p2594: 0; = p2398*p1014
- p2589: 0; = p2393*p1014
- p2089: 0.40001
- p1238: 0; = if(p1232>0;0;IF(p1234=1;0;IF(p1234+p1235>1;1-p1234;p1235)))
- p1178: 6.05192e-8; = p1176/p0818
- p2994: 0; = p2408*(p1020+p1022)
- p3387: 0; = p3368*p1234
- p2377: 8.42121e-5; = p2229*p2206
- p1963: 0.000369634; = p1963a+p1963b+p1963c+p1963d+p1963e+p1963f+p1963g+p1963h+p1963i+p1963j+p1963k
- p3334: 0; = IF(or(p3254=0;p1232>0);0;p3269*p3277*(p3300*p3292+(1-p3300)*p3296))
- p1247: 0; = if(p1232>0;0;p1242*p0001/(p0818*p0002))
- p2868: 0.000132302; = p2282*(p1020+p1022)
- p1615: 0
- p3052: 1.20611e-5; = p2271*p1082
- p1743: 0
- p1963j: 2.4707e-5; = p1725*p1929+p1726*p1930+p1727*p1931+p1728*p1932+p1729*p1933+p1730*p1934+p1731*p1935+p1732*p1936+p1733*p1937+p1734*p1938+p1735*p1939+p1736*p1940+p1737*p1941+p1738*p1942+p1739*p1943+p1740*p1944+p1741*p1945+p1742*p1946+p1743*p1947
- p2773: 0.000200917; = p2382*(p1078+p1080)
- p3397: 0; = p3378*p1234
- p0963: 0; = if(and(p0683>0;or(p0807=480;p0807=32;p0807=1;and(p0807=60;p0901<0.03)));p0939;0)
- p1131: 0; = if(p1121=0;IF(p1123+p1128+p1129+p1130=1;0;IF(p1123+p1128+p1129+p1130+p1127>1;1-(p1123+p1128+p1129+p1130);p1127));0)
- p2400: 0; = p2234*p2189
- p2885: 6.80912e-5; = p2299*(p1079+p1081)
- p2211: 0.00483136; = p1120-p2209-p2208-p2210
- p1644: 0
- p2175: 0.000431096; = p0895*p0908/p0818
- p1900: 0
- p1825: 0
- p2520: 1.92317e-6; = p2324*p1014
- p2715: 4.25192e-6; = p2324*(p1019+p1021)
- p5101: 2.06865e-7; = p1928*p3483
- p2294: 0.000585715; = p2223*p2201
- p1135: 28991.2; = if(p1121=0;p1129*(p0716/100)*p0703*1000;0)
- p2331: 2.34126e-6; = p2224*p2199
- p2099: 0.620397
- p2796: 0; = p2405*(p1019+p1021)
- p2727: 0; = p2336*(p1078+p1080)
- p1258: 0; = if(p1232>0;0;IF(p1253+p1256+p1257=1;0;1-(p1253+p1256+p1257)))
- p2539: 0; = p2343*p1073
- p1213: 5
- p2384: 2.8163e-5; = p2229*p2213
- p1789: 0
- p1822: 0
- p0091: 12.578
- p0476: 0; = SQRT(2)*(IF((2*p0344-1)<0;-1;IF((2*p0344-1)>0;1;0))*SQRT(SQRT((2/(pi()*0.140012289)+LN(1-(2*p0344-1)^2)/2)^2-LN(1-(2*p0344-1)^2)/0.140012289)-(2/(pi()*0.140012289)+LN(1-(2*p0344-1)^2)/2)))
- p2011: 0.00094333
- p3185: 0; = p2404*p1023
- p2422: 0; = p2235*p2212
- p2231: 0.666798; = if(p0783*p0787+p0784*p0788+p0785*p0789+p0786*p0790=0;0;p0788*p0784/(p0783*p0787+p0784*p0788+p0785*p0789+p0786*p0790))
- p3362: 0; = if(p1232=0;p3244*p3356/p0818;0)
- p0908: 0.00169306
- p0506: 0; = SQRT(2)*(IF((2*p0374-1)<0;-1;IF((2*p0374-1)>0;1;0))*SQRT(SQRT((2/(pi()*0.140012289)+LN(1-(2*p0374-1)^2)/2)^2-LN(1-(2*p0374-1)^2)/0.140012289)-(2/(pi()*0.140012289)+LN(1-(2*p0374-1)^2)/2)))
- p0810: 0
- p1896: 0
- p1623: 0
- p0795: 72.122; = p0135*(1+p0663*p0267/100)
- p1637: 0
- p3385: 0; = p3366*p1234
- p1563: 0
- p0268: 1.978
- p1971: 0.000269541; = p1966*p0001/(p0818*p0002)
- p0930: 9250; = p0801*p0924
- p0184: 13.5
- p2792: 0; = p2401*(p1019+p1021)
- p1183: 0.000346553; = p0801*p0001/(p0818*p0002)
- p4719: 8.89119e-6; = p1962*p3481
- p1928: 4.31593e-6; = p1520*1000/p0818
- p2232: 0; = if(p0783*p0787+p0784*p0788+p0785*p0789+p0786*p0790=0;0;p0789*p0785/(p0783*p0787+p0784*p0788+p0785*p0789+p0786*p0790))
- p3261: 0
- p0903: 0.0197726
- p3342: 0; = if(and(p1232=0;p3254<>0);p3254*(p3272-p3337)/p3338;0)
- p0911: 0.00561077
- p0813: 0; = if(p0807=480;1.56521739130435;0)
- p1913: 0
- p1349: 13
- p4444: 0; = p1889*p3480
- p2343: 0; = p2228*p2211
- p1763: 0
- p3327: 0; = if(and(p1232=0;p3255<>0);1-(p3323+p3324+p3325+p3326);0)
- p2207: 0.0104208; = p1119-p2205-p2204-p2206
- p1222: 0.94
- p3470: 0; = p3375*p1241
- p3893: 0; = p1956*p3477
- p2859: 0.000294531; = p2273*(p1129+p1131)
- p3483: 0.0479305; = if(p1328+p1330+p1332+p1334+p1336+p1338+p1340+p1342+p1344=0;0;p1342/(p1328+p1330+p1332+p1334+p1336+p1338+p1340+p1342+p1344))
- p2070: 0.282
- p0155: 2.66
- p1122: 0; = p1121*p0001/(p0818*p0002)
- p0820: 0; = if(p0807=480;p0814;0)
- p1905: 0
- p3444: 0; = p3368*p1240
- p0749: 40.098; = p0089*(1+p0617*p0221/100)
- p1199: -0.29
- p1885: 0
- p2289: 0.00428185; = p2223*p2196
- p3033: 0; = p2252*p1023
- p2591: 0; = p2395*p1014
- p2300: 0.00640848; = p2227*p2207
- p3424: 0; = p3367*p1239
- p0828: 0; = if(p0827=0;0;p0819-p0827/p0818)
- p0919: 0.0402111; = p0678*1000/p0801
- p2480: 4.36214e-5; = p2284*p1014
- p0890: 25218.9; = p0686*1000*p0687*p0885/100
- p2509: 0.000132021; = p2313*p1123
- p1027: 51866.1; = IF(p1012=0;p1021*(p0704/100)*p0703*1000;0)
- p3143: 0; = p2362*p1023
- p2564: 1.66077e-6; = p2368*p1014
- p0877: 1.38949; = p0876*p0001*p0003/(p0818*p0002)
- p0706: 40.934; = p0046*(1+p0574*p0178/100)
- p0444: 0; = SQRT(2)*(IF((2*p0312-1)<0;-1;IF((2*p0312-1)>0;1;0))*SQRT(SQRT((2/(pi()*0.140012289)+LN(1-(2*p0312-1)^2)/2)^2-LN(1-(2*p0312-1)^2)/0.140012289)-(2/(pi()*0.140012289)+LN(1-(2*p0312-1)^2)/2)))
- p2281: 5.87649e-5; = p2223*p2187
- p1935: 0
- p1149: 0.830148
- p3305: 0; = if(and(p1232=0;p3252<>0);1-(p3301+p3302+p3303+p3304);0)
- p3296: 0
- p2992: 0; = p2406*(p1020+p1022)
- p3102: 0; = p2321*p1023
- p0310: 0.5
- p2777: 7.38269e-5; = p2386*(p1078+p1080)
- p1564: 0.822
- p0791: 0
- p3002: 0; = p2416*(p1079+p1081)
- p1780: 0
- p2827: 7.14639e-5; = p2241*(p1020+p1022)
- p3180: 0; = p2399*p1023
- p2856: 5.08874e-6; = p2270*(p1079+p1081)
- p2870: 2.99144e-5; = p2284*(p1020+p1022)
- p0688: 3.177; = p0028*(1+p0556*p0160/100)
- p0954: 0; = if(and(p0683>0;or(p0807=56;p0807=100;and(p0807=60;p0901>0.06)));p0936;0)
- p2082: 0.285294
- p3368: 0; = if(p1232=0;p3245*p3356/p0818;0)
- p2547: 0; = p2351*p1123
- p3476: 0.126415; = if(p1328+p1330+p1332+p1334+p1336+p1338+p1340+p1342+p1344=0;0;p1328/(p1328+p1330+p1332+p1334+p1336+p1338+p1340+p1342+p1344))
- p2476: 0.000104784; = p2280*p1014
- p2508: 0.00190454; = p2312*p1123
- p0734: 0
- p2579: 7.23572e-7; = p2383*p1073
- p1776: 9.71083e-6; = p1368*1000/p0818
- p0323: 0.5
- p2883: 0.000232492; = p2297*(p1079+p1081)
- p0859: 0; = p0671*1000/p0856
- p3390: 0; = p3371*p1234
- p1747: 0
- p2191: 0.000167499; = 8*1.00794*p2189/(2*14.0067)
- p1110: 1.75124e6; = IF(p1071=0;p1105*p1104*p1095;0)
- p1297: 0
- p2153: 1.46543e-9; = p2015*p2081*p2115/(p0818*1000)
- p1984: 30
- p4491: 0; = p1936*p3480
- p3139: 0; = p2358*p1023
- p1705: 0
- p2542: 0; = p2346*p1073
- p2178: 0.0275471; = (p0895*p0831/(1-p0831))/(p0818)
- p3634: 1.69135e-5; = p1903*p3476
- p1695: 0
- p3026: 0; = p2245*p1023
- p1959: 552.503; = if(p0738*p0740*p0739>0;p0738*1000*(p0740/100)*p0739/1000;p1958)
- p0920: 0.0256944; = p0676*1000/p0801
- p1059: 0.335
- p1562: 0
- p2615: 0; = p2419*p1073
- p3038: 0; = p2257*p1023
- p2931: 0; = p2345*(p1079+p1081)
- p2093: 0.260958
- p1384: 96
- p0683: 80.357; = p0023*(1+p0551*p0155/100)
- p0752: 1.994; = p0092*(1+p0620*p0224/100)
- p0535: 0; = SQRT(2)*(IF((2*p0403-1)<0;-1;IF((2*p0403-1)>0;1;0))*SQRT(SQRT((2/(pi()*0.140012289)+LN(1-(2*p0403-1)^2)/2)^2-LN(1-(2*p0403-1)^2)/0.140012289)-(2/(pi()*0.140012289)+LN(1-(2*p0403-1)^2)/2)))
- p1558: 0
- p3480: 0; = if(p1328+p1330+p1332+p1334+p1336+p1338+p1340+p1342+p1344=0;0;p1336/(p1328+p1330+p1332+p1334+p1336+p1338+p1340+p1342+p1344))
- p0487: 0; = SQRT(2)*(IF((2*p0355-1)<0;-1;IF((2*p0355-1)>0;1;0))*SQRT(SQRT((2/(pi()*0.140012289)+LN(1-(2*p0355-1)^2)/2)^2-LN(1-(2*p0355-1)^2)/0.140012289)-(2/(pi()*0.140012289)+LN(1-(2*p0355-1)^2)/2)))
- p2710: 4.06152e-5; = p2319*(p1019+p1021)
- p1673: 0
- p1079: 0.08822; = IF(p1071=0;IF(p1073+p1078=1;0;IF(p1073+p1078+p1075>1;1-(p1073+p1078);p1075));0)
- p2695: 0.00184148; = p2304*(p1078+p1080)
- p0732: 0
- p3337: 0; = IF(or(p3254=0;p1232>0);0;p3272*p3289)
- p1897: 0
- p0969: 2.89966e7; = p0966*p0683*p0682*1000
- p1933: 0
- p2636: 9.59126e-5; = p2245*(p1019+p1021)
- p3297: 0; = if(p1273+p1274+p1275+p1276=0;0;p1273/(p1273+p1274+p1275+p1276))
- p2824: 9.67687e-5; = p2238*(p1020+p1022)
- p1715: 0
- p2903: 1.58035e-6; = p2317*(p1020+p1022)
- p2167: 0.310535; = p2166*(p0898)
- p0664: 0; = IF(p0400<0.5;-SQRT(p0007*EXP(p0532^2*p0008)-p0007);SQRT(p0007*EXP(p0532^2*p0008)-p0007))
- p1907: 0
- p2255: 0.000582499; = p2222*p2201
- p3194: 0; = p2413*p1023
- p1267: 0
- p4106: 5.08229e-6; = p1757*p3479
- p3189: 0; = p2408*p1023
- p1794: 0
- p0768: 43.963; = p0108*(1+p0636*p0240/100)
- p1180: 3.02596e-8; = p1176*p1179/p0818
- p3428: 0; = p3371*p1239
- p2361: 0.000259688; = p2225*p2189
- p0591: 0; = IF(p0327<0.5;-SQRT(p0007*EXP(p0459^2*p0008)-p0007);SQRT(p0007*EXP(p0459^2*p0008)-p0007))
- p0347: 0.5
- p3159: 1.63125e-5; = p2378*p1082
- p3473: 0; = p3378*p1241
- p1177: 0.000346553; = p0801*p0001/(p0818*p0002)
- p2913: 1.33649e-5; = p2327*(p1020+p1022)
- p1141: 2.79083e-5; = if(p1121=0;p1135*p0001/(p0818*p0002);0)
- p1693: 0
- p3504: 6.81995e-7; = p1773*p3476
- p2897: 0.000580797; = p2311*(p1129+p1131)
- p3248: 0
- p1638: 0
- p0534: 0; = SQRT(2)*(IF((2*p0402-1)<0;-1;IF((2*p0402-1)>0;1;0))*SQRT(SQRT((2/(pi()*0.140012289)+LN(1-(2*p0402-1)^2)/2)^2-LN(1-(2*p0402-1)^2)/0.140012289)-(2/(pi()*0.140012289)+LN(1-(2*p0402-1)^2)/2)))
- p1034: 3.33395e-5; = IF(p1012=0;p1028*p0001/(p0818*p0002);0)
- p1456: 3
- p2791: 0; = p2400*(p1019+p1021)
- p2221: 0.00135723; = p1155-p2220
- p0057: 25.35
- p0684: 0
- p3184: 0; = p2403*p1023
- p2170: 0.00770848; = p2166*(p0913)
- p3394: 0; = p3375*p1234
- p2941: 0.000170157; = p2355*(p1020+p1022)
- p0736: 0
- p2090: 0.40001
- p1992: 3900
- p2776: 1.95636e-5; = p2385*(p1078+p1080)
- p4682: 1.22632e-7; = p1921*p3481
- p1951: 0
- p2076: 0.057
- p1555: 0
- p0610: 0; = IF(p0346<0.5;-SQRT(p0007*EXP(p0478^2*p0008)-p0007);SQRT(p0007*EXP(p0478^2*p0008)-p0007))
- p1720: 0
- p3399: 0; = p3380*p1234
- p1981: 400
- p2956: 4.10995e-6; = p2370*(p1020+p1022)
- p1706: 0
- p0259: 15.654
- p0806: 9.268e8
- p0243: 48.357
- p3073: 0; = p2292*p1023
- p0864: 0; = IF(p0858=1;0;IF(p0858+p0859>1;1-p0858;p0859))
- p2722: 1.32838e-6; = p2331*(p1019+p1021)
- p0269: 6.491
- p0853: 0; = p0803/(p0802+p0803)
- p2532: 0; = p2336*p1073
- p2808: 0; = p2417*(p1078+p1080)
- p3103: 0; = p2322*p1023
- p2499: 6.09546e-5; = p2303*p1073
- p1882: 0
- p2484: 0.000111163; = p2288*p1014
- p4469: 0; = p1914*p3480
- p2378: 0.000699207; = p2229*p2207
- p1826: 0
- p0513: 0; = SQRT(2)*(IF((2*p0381-1)<0;-1;IF((2*p0381-1)>0;1;0))*SQRT(SQRT((2/(pi()*0.140012289)+LN(1-(2*p0381-1)^2)/2)^2-LN(1-(2*p0381-1)^2)/0.140012289)-(2/(pi()*0.140012289)+LN(1-(2*p0381-1)^2)/2)))
- p3431: 0; = p3374*p1239
- p1658: 0
- p1963b: 4.54056e-6; = p1569*p1773+p1570*p1774+p1571*p1775+p1572*p1776+p1573*p1777+p1574*p1778+p1575*p1779+p1576*p1780+p1577*p1781+p1578*p1782+p1579*p1783+p1580*p1784+p1581*p1785+p1582*p1786+p1583*p1787+p1584*p1788+p1585*p1789+p1586*p1790+p1587*p1791
- p0082: 92.438
- p3258: 0
- p0051: 26.866
- p0385: 0.5
- p2699: 0.00067665; = p2308*(p1078+p1080)
- p2915: 1.1418e-7; = p2329*(p1020+p1022)
- p2836: 0.000749425; = p2250*(p1020+p1022)
- p0714: 0
- p3347: 0; = if(and(p1232=0;p3256<>0);p3275*p3289;0)
- p2441: 4.33819e-5; = p2245*p1014
- p1953: 0
- p0174: 0
- p4122: 1.95473e-6; = p1773*p3479
- p0987: 0.0259778; = if(p0978>0;0;if(and(p0687=0;p0691=0;p0695=0;p0699=0);0;IF(p0982+p0985+p0986=1;0;1-(p0982+p0985+p0986))))
- p3070: 0; = p2289*p1023
- p0140: 73.749
- p1594: 0
- p3234: 0.39606; = 1-p3233
- p2156: 2.0508e-8; = p2015*p2085*p2118/(p0818*1000)
- p1934: 0
- p2122: 0.341195
- p1919: 0
- p2242: 5.84424e-5; = p2222*p2187
- p4724: 2.52733e-7; = p1757*p3482
- p0977: 0; = IF(p0687=0;IF(OR(p0686=0;p0688=0);0;p0686*1000*p0688/100);0)
- p0818: 9.268e8; = p0806*p0807
- p2959: 2.59434e-5; = p2373*(p1020+p1022)
- p0280: 0.5
- p2339: 0; = p2228*p2207
- p4529: 2.69791e-6; = p1768*p3481
- p1225: 1.088; = IF(p1221=0;0;p1223+1.2*p1224)
- p2823: 0.000440835; = p2237*(p1020+p1022)
- p0681: 0
- p1800: 0
- p3367: 0; = if(p1232=0;p3244*p3361/p0818;0)
- p2155: 1.10683e-7; = p2015*p2084*p2117/(p0818*1000)
- p1972: 0; = if(p0807=480;p1967*p0001/(p0818*p0002);0)
- p2091: 0.374844
- p2056: 2.07882
- p3201: 0; = p2420*p1082
- p1967: 0; = if(p0807=480;p0802*p0810;0)
- p1197: 1.806
- p2234: 0; = 1-(p2222+p2223+p2224+p2225)
- p3123: 0; = p2342*p1082
- p3188: 0; = p2407*p1023
- p2439: 0.000191865; = p2243*p1014
- p1998: 262
- p0482: 0; = SQRT(2)*(IF((2*p0350-1)<0;-1;IF((2*p0350-1)>0;1;0))*SQRT(SQRT((2/(pi()*0.140012289)+LN(1-(2*p0350-1)^2)/2)^2-LN(1-(2*p0350-1)^2)/0.140012289)-(2/(pi()*0.140012289)+LN(1-(2*p0350-1)^2)/2)))
- p1447: 15
- p0240: 8.127
- p0638: 0; = IF(p0374<0.5;-SQRT(p0007*EXP(p0506^2*p0008)-p0007);SQRT(p0007*EXP(p0506^2*p0008)-p0007))
- p2586: 0.000266345; = p2390*p1123
- p1048: 0.000567816; = IF(p1012=0;IF(p1037+p1044+p1045+p1046+p1047=1;0;IF(p1037+p1044+p1045+p1046+p1047+p1042>1;1-(p1037+p1044+p1045+p1046+p1047);p1042));0)
- p2128: 7.49005e-7; = p2015*p2056*p2090/(p0818*1000)
- p1081: 0; = IF(p1071=0;IF(p1073+p1078+p1079+p1080=1;0;IF(p1073+p1078+p1079+p1080+p1077>1;1-(p1073+p1078+p1079+p1080);p1077));0)
- p0293: 0.5
- p1950: 0
- p0570: 0; = IF(p0306<0.5;-SQRT(p0007*EXP(p0438^2*p0008)-p0007);SQRT(p0007*EXP(p0438^2*p0008)-p0007))
- p1299: 0
- p2141: 1.56645e-7; = p2015*p2069*p2103/(p0818*1000)
- p0514: 0; = SQRT(2)*(IF((2*p0382-1)<0;-1;IF((2*p0382-1)>0;1;0))*SQRT(SQRT((2/(pi()*0.140012289)+LN(1-(2*p0382-1)^2)/2)^2-LN(1-(2*p0382-1)^2)/0.140012289)-(2/(pi()*0.140012289)+LN(1-(2*p0382-1)^2)/2)))
- p1090: 0.000177341; = IF(p1071=0;p1084*p0001/(p0818*p0002);0)
- p0941: 0; = if(and(p0683=0;p0947=0);p0935;0)
- p2871: 7.5227e-6; = p2285*(p1020+p1022)
- p2111: 0.856281
- p2086: 0.0617647
- p4856: 9.52609e-7; = p1889*p3482
- p3865: 0; = p1928*p3477
- p3331: 0; = if(and(p1232=0;p3255<>0);p3255*(p3268-p3326)/p3327;0)
- p0348: 0.5
- p2562: 0.000194395; = p2366*p1014
- p2186: 0.00159999; = p1052/p0818
- p0946: 0; = if(and(p0683=0;or(p0807=480;p0807=32;p0807=1;and(p0807=60;p0901<0.03)));p0934;0)
- p1598: 0
- p0503: 0; = SQRT(2)*(IF((2*p0371-1)<0;-1;IF((2*p0371-1)>0;1;0))*SQRT(SQRT((2/(pi()*0.140012289)+LN(1-(2*p0371-1)^2)/2)^2-LN(1-(2*p0371-1)^2)/0.140012289)-(2/(pi()*0.140012289)+LN(1-(2*p0371-1)^2)/2)))
- p2982: 0; = p2396*(p1020+p1022)
- p0830: 1.17993e9; = p0825*p0821*p0824
- p2101: 0.620397
- p1813: 0
- p0034: 258.029
- p1721: 0
- p0105: 50.333
- p0606: 0; = IF(p0342<0.5;-SQRT(p0007*EXP(p0474^2*p0008)-p0007);SQRT(p0007*EXP(p0474^2*p0008)-p0007))
- p0846: 0.439985; = p0841*p0845^3+p0842*p0845^2+p0843*p0845+p0844
- p2981: 0; = p2395*(p1020+p1022)
- p0898: 0.482098
- p1614: 0
- p2999: 0; = p2413*(p1020+p1022)
- p0687: 15.567; = p0027*(1+p0555*p0159/100)
- p2118: 0.679049
- p2395: 0; = p2234*p2184
- p2218: 0.00799545; = p1150/p0818
- p0499: 0; = SQRT(2)*(IF((2*p0367-1)<0;-1;IF((2*p0367-1)>0;1;0))*SQRT(SQRT((2/(pi()*0.140012289)+LN(1-(2*p0367-1)^2)/2)^2-LN(1-(2*p0367-1)^2)/0.140012289)-(2/(pi()*0.140012289)+LN(1-(2*p0367-1)^2)/2)))
- p0388: 0.5
- p1254: 0; = if(p1232>0;0;p0736/100)
- p3155: 0; = p2374*p1023
- p2969: 2.376e-7; = p2383*(p1079+p1081)
- p2398: 0; = p2234*p2187
- p0851: 0
- p0300: 0.5
- p2534: 0; = p2338*p1073
- p2247: 0.000344022; = p2222*p2192
- p2894: 9.63133e-5; = p2308*(p1079+p1081)
- p3457: 0; = p3362*p1241
- p3435: 0; = p3378*p1239
- p0994: 0; = p0990*p0001*p0004/(p0818*p0002)
- p0035: 15.492
- p0860: 0.221636; = p0672*1000/p0856
- p4717: 8.58427e-7; = p1956*p3481
- p0014: 125.38
- p0213: 7.092
- p2822: 0; = p2431*(p1128+p1130)
- p2880: 0.00010308; = p2294*(p1020+p1022)
- p2518: 6.68127e-6; = p2322*p1014
- p0937: 2.36676e-5; = p0931*p0001/(p0818*p0002)
- p1107: 436001; = IF(p1071=0;p1105*p1101*p1095;0)
- p0809: 0
- p0844: 0.392862
- p2295: 8.42975e-5; = p2223*p2202
- p0652: 0; = IF(p0388<0.5;-SQRT(p0007*EXP(p0520^2*p0008)-p0007);SQRT(p0007*EXP(p0520^2*p0008)-p0007))
- p1553: 0.127667
- p2023: 2.82
- p1958: 480
- p0188: 7.262
- p0824: 0.902375
- p3437: 0; = p3380*p1239
- p1818: 0
- p2947: 4.57025e-5; = p2361*(p1020+p1022)
- p0287: 0.5
- p1628: 0
- p0801: 360000
- p1330: 0; = p1320*p0801
- p1239: 0; = if(p1232>0;0;IF(p1234+p1238=1;0;IF(p1234+p1238+p1236>1;1-(p1234+p1238);p1236)))
- p2016: 9.74474e-5; = (p2014-p2015)/(p0818)
- p4510: 0; = p1955*p3480
- p0690: 0
- p2177: 0.123358; = p0895/p0818-(p2173+p2174+p2175+p2176)
- p1263: 0; = if(p1232>0;0;IF(p1259=1;0;IF(p1259+p1260>1;1-p1259;p1260)))
- p3020: 0; = p2239*p1023
- p1184: 6.20835e-8; = p1182/p0818
- p1231: 0.059033; = IF(p1221=0;0;p1230*(p1228+p1229))
- p1285: 0; = p1281*p1252/p0818
- p3168: 2.84004e-7; = p2387*p1082
- p0368: 0.5
- p1873: 0
- p1268: 0
- p1948: 0
- p0823: 0
- p3156: 6.7082e-6; = p2375*p1082
- p3436: 0; = p3379*p1239
- p2970: 2.48454e-6; = p2384*(p1079+p1081)
- p1672: 0
- p3151: 0; = p2370*p1023
- p1923: 0
- p2609: 0; = p2413*p1014
- p2245: 0.000169045; = p2222*p2190
- p1245: 0; = if(p1232>0;0;p1240*(p0725/100)*p0723*1000)
- p1150: 7.41018e6; = if(p1121=0;p1149*p1146*p1145;0)
- p0928: 311688; = p0801*p0918
- p3329: 0; = if(and(p1232=0;p3255<>0);p3255*(p3266-p3324)/p3327;0)
- p2943: 5.42964e-5; = p2357*(p1020+p1022)
- p2062: 3.76588
- p2563: 0.0019216; = p2367*p1014
- p2717: 0.000201004; = p2326*(p1019+p1021)
- p4458: 0; = p1903*p3480
- p1879: 0
- p3595: 4.09197e-7; = p1864*p3476
- p1569: 0.819138
- p0036: 3.243
- p2514: 7.93763e-6; = p2318*p1014
- p4180: 1.32921e-5; = p1831*p3479
- p3134: 0; = p2353*p1132
- p3083: 1.22594e-5; = p2302*p1082
- p1230: 0.5
- p3062: 0; = p2281*p1023
- p4514: 0; = p1963*p3480
- p0150: 0
- p2888: 4.63575e-5; = p2302*(p1079+p1081)
- p0933: 0; = p0801*p0927
- p1745: 0
- p2057: 3.28794
- p0235: 0
- p2754: 4.24116e-5; = p2363*(p1019+p1021)
- p2675: 9.6442e-5; = p2284*(p1019+p1021)
- p1133: 67461.7; = if(p1121=0;p1123*(p0716/100)*p0703*1000;0)
- p2811: 0; = p2420*(p1078+p1080)
- p1039: 0.0626496
- p3241: 5.45588e-10; = p3234*p1188*p3236/p0818
- p0453: 0; = SQRT(2)*(IF((2*p0321-1)<0;-1;IF((2*p0321-1)>0;1;0))*SQRT(SQRT((2/(pi()*0.140012289)+LN(1-(2*p0321-1)^2)/2)^2-LN(1-(2*p0321-1)^2)/0.140012289)-(2/(pi()*0.140012289)+LN(1-(2*p0321-1)^2)/2)))
- p3075: 0; = p2294*p1023
- p2614: 0; = p2418*p1073
- p2826: 3.08785e-5; = p2240*(p1020+p1022)
- p2161: 7.97203e-9; = p2015*p2085*p2123/(p0818*1000)
- p0641: 0; = IF(p0377<0.5;-SQRT(p0007*EXP(p0509^2*p0008)-p0007);SQRT(p0007*EXP(p0509^2*p0008)-p0007))
- p1809: 0
- p1886: 0
- p2559: 1.91831e-5; = p2363*p1014
- p1290: 0; = IF(p1287=p1264;0;IF(p1287+p1288>p1264;p1264-p1287;p1288))
- p2633: 3.3159e-5; = p2242*(p1019+p1021)
- p3488: 1.77319e-6; = p1757*p3476
- p1945: 0
- p1113: 0.100377
- p5004: 1.75835e-6; = p1831*p3483
- p3449: 0; = p3373*p1240
- p2787: 0; = p2396*(p1019+p1021)
- p2844: 0.000120197; = p2258*(p1079+p1081)
- p2126: 6.54811e-7; = p2015*p2054*p2088/(p0818*1000)
- p1815: 0
- p1304: 0; = p1300*p1252/p0818
- p2867: 1.0342e-5; = p2281*(p1020+p1022)
- p2185: 0.00069133; = p1065-p2184
- p2946: 0.000231362; = p2360*(p1020+p1022)
- p2522: 9.09156e-5; = p2326*p1014
- p0609: 0; = IF(p0345<0.5;-SQRT(p0007*EXP(p0477^2*p0008)-p0007);SQRT(p0007*EXP(p0477^2*p0008)-p0007))
- p2692: 0.000720205; = p2301*(p1078+p1080)
- p1707: 0
- p0840: 0.0679512; = p0839*p0831
- p4057: 3.74714e-6; = p1914*p3478
- p2274: 0.000187411; = p2230*p2220
- p5155: 6.26452e-7; = p1776*p3484
- p0700: 0
- p1273: 0; = p1267*p1252/p0818
- p2916: 1.87409e-7; = p2330*(p1020+p1022)
- p3165: 6.57043e-7; = p2384*p1082
- p1700: 0
- p1162: 0.000388433; = p1161/p0818
- p2940: 0.000775161; = p2354*(p1020+p1022)
- p3004: 0; = p2418*(p1079+p1081)
- p2914: 0.000132113; = p2328*(p1020+p1022)
- p3089: 2.54703e-5; = p2308*p1082
- p3455: 0; = p3379*p1240
- p1952: 0
- p3343: 0; = if(and(p1232=0;p3254<>0);IF((p3339+p3340+p3341+p3342)+(p3254*(p3269*(1-p3277))/p3338)>p3254;p3254-(p3339+p3340+p3341+p3342);p3254*(p3269*(1-p3277))/p3338);0)
- p2458: 0.000161398; = p2262*p1073
- p2474: 1.31446e-5; = p2278*p1014
- p2731: 0; = p2340*(p1078+p1080)
- p2336: 0; = p2228*p2204
- p2872: 6.08785e-5; = p2286*(p1020+p1022)
- p2418: 0; = p2235*p2208
- p3074: 0; = p2293*p1023
- p0007: 14; = p0006-1
- p1791: 0
- p2652: 0.00205345; = p2261*(p1078+p1080)
- p3586: 2.04599e-6; = p1855*p3476
- p2198: 2.38015e-5; = 22.98976928*p2197/14.0067
- p1827: 0
- p1017: 0.15804; = IF(p1012=0;p0708/100;0)
- p0550: 0; = IF(p0286<0.5;-SQRT(p0007*EXP(p0418^2*p0008)-p0007);SQRT(p0007*EXP(p0418^2*p0008)-p0007))
- p2166: 0.644133; = p2165*p0824
- p1993: 400
- p3146: 0; = p2365*p1023
- p3319: 0; = if(and(p1232=0;p3253<>0);p3253*(p3263-p3314)/p3316;0)
- p1983: 50
- p1322: 0.845075; = IF(((p0745*1000*p0749/100)+(p0754*1000*p0758/100))/p0801<0;0;((p0745*1000*p0749/100)+(p0754*1000*p0758/100))/p0801)
- p2219: 0.0112673; = p1154-p2218
- p3433: 0; = p3376*p1239
- p1329: 0.000102179; = p1328*p0001/(p0818*p0002)
- p2626: 0; = p2430*p1123
- p2251: 3.68034e-6; = p2222*p2197
- p0614: 0; = IF(p0350<0.5;-SQRT(p0007*EXP(p0482^2*p0008)-p0007);SQRT(p0007*EXP(p0482^2*p0008)-p0007))
- p2075: 0.072
- p3381: 0; = p3362*p1234
- p2739: 0; = p2348*(p1078+p1080)
- p2249: 0.000430787; = p2222*p2195
- p1890: 0
- p2406: 0; = p2234*p2196
- p2527: 6.00837e-7; = p2331*p1014
- p2667: 0.00142907; = p2276*(p1019+p1021)
- p1319: 0.294843; = IF(((p0745*1000*p0746/100)+(p0754*1000*p0755/100))/p0801<0;0;((p0745*1000*p0746/100)+(p0754*1000*p0755/100))/p0801)
- p1106: 37201.6; = IF(p1071=0;p1105*p1096*p1095;0)
- p3285: 0
- p0728: 0
- p2286: 0.00034592; = p2223*p2192
- p0765: 50.333; = p0105*(1+p0633*p0237/100)
- p2169: 0.00109056; = p2166*(p0908)
- p2366: 0.000757492; = p2225*p2195
- p0020: 311.688
- p0870: 0; = p0858*p0856
- p2042: 0.07
- p0322: 0.5
- p2081: 0.0019
- p1748: 0
- p3314: 0; = if(and(p1232=0;p3253<>0);p3263*p3289;0)
- p2998: 0; = p2412*(p1020+p1022)
- p1599: 0
- p3181: 0; = p2400*p1023
- p2661: 3.57509e-5; = p2270*(p1078+p1080)
- p2676: 2.42527e-5; = p2285*(p1019+p1021)
- p0940: 0; = if(and(p0683=0;p0946=0);p0934;0)
- p2685: 0.000332323; = p2294*(p1019+p1021)
- p1161: 360000; = p0801
- p0839: 0.696043; = p0838/p0818
- p0424: 0; = SQRT(2)*(IF((2*p0292-1)<0;-1;IF((2*p0292-1)>0;1;0))*SQRT(SQRT((2/(pi()*0.140012289)+LN(1-(2*p0292-1)^2)/2)^2-LN(1-(2*p0292-1)^2)/0.140012289)-(2/(pi()*0.140012289)+LN(1-(2*p0292-1)^2)/2)))
- p1148: 0.0889917; = if(p1121=0;IF(p1146=1;0;1-p1146);0)
- p2136: 5.2193e-7; = p2015*p2064*p2098/(p0818*1000)
- p1269: 0
- p2985: 0; = p2399*(p1020+p1022)
- p2995: 0; = p2409*(p1020+p1022)
- p3196: 0; = p2415*p1082
- p1188: 90.5623; = p1187*p0801
- p3354: 0; = IF((p3350+p3351+p3352+p3353)+IF(p3349=0;0;(p3256*(p3273*(1-p3277))/p3349))>p3256;p3256-(p3350+p3351+p3352+p3353);IF(p3349=0;0;p3256*(p3273*(1-p3277))/p3349))
- p1927: 0
- p1202: 0.7
- p0548: 0; = IF(p0284<0.5;-SQRT(p0007*EXP(p0416^2*p0008)-p0007);SQRT(p0007*EXP(p0416^2*p0008)-p0007))
- p2501: 6.6318e-6; = p2305*p1073
- p3187: 0; = p2406*p1023
- p0350: 0.5
- p1118: 0.00180748; = IF(p1071=0;p1108/(p1113*p0818);0)
- p0849: 0
- p2478: 0.000192924; = p2282*p1014
- p0081: 0.973
- p3383: 0; = p3364*p1234
- p0894: 0.2
- p2954: 1.13891e-6; = p2368*(p1020+p1022)
- p1317: 0
- p2253: 1.32811e-5; = p2222*p2199
- p3029: 0; = p2248*p1023
- p3042: 7.72955e-5; = p2261*p1082
- p2190: 0.000666069; = 32.065*p2189/(2*14.0067)
- p1691: 0
- p1823: 0
- p0782: 73.749; = p0122*(1+p0650*p0254/100)
- p3095: 2.57291e-5; = p2314*p1132
- p2012: 0.441843
- p2164: 0.000300742; = (p2015/p0818)-(p2022)-(p2035+p2036+p2052)-(p2017/p0818)-(p2039+p2041+p2044+p2158+p2159+p2160+p2161+p2162)
- p2035: 2.96618e-6; = p2015*p2029*(1-p2031)/(p0818*1000)
- p0975: 0.0156434; = p0973*p0974/p0818
- p2217: 0.00162605; = p1118-p2216
- p1242: 0; = if(p1232>0;0;p1234*(p0725/100)*p0723*1000)
- p3235: 0.118093
- p1816: 0
- p1311: 0; = IF(p1307+p1310=p1266;0;IF(p1307+p1310+p1309>p1266;p1266-(p1307+p1310);p1309))
- p2000: 4000
- p1670: 0
- p0876: 144341; = p0866*p0856
- p2711: 5.84544e-6; = p2320*(p1019+p1021)
- p1742: 0
- p3360: 0; = if(p1232=0;p3310+p3321+p3332+p3343+p3354;0)
- p0753: 0
- p1940: 0
- p3325: 0; = if(and(p1232=0;p3255<>0);p3267*p3289;0)
- p2490: 0.000150312; = p2294*p1014
- p0713: 8.822; = p0053*(1+p0581*p0185/100)
- p0249: 35.46
- p2258: 0.00136246; = p2226*p2204
- p0308: 0.5
- p3324: 0; = if(and(p1232=0;p3255<>0);p3266*(p3279*(p3284*p1256+p3286*(p1253+p1257)+p1258*p3288+p3299*p3287));0)
- p1007: 3.16974e-6; = p1003*p0001*p0004/(p0818*p0002)
- p1272: 0; = IF(p1267+p1270+p1271=p1259;0;p1259-(p1267+p1270+p1271))
- p1652: 0
- p2049: 25.6942
- p1968: 0; = if(p0807=480;p0802*p0811;0)
- p3230: 2.41522e-7; = p1170/p0818
- p1283: 0; = p1277*p1252/p0818
- p0767: 47.839; = p0107*(1+p0635*p0239/100)
- p2927: 0; = p2341*(p1079+p1081)
- p2975: 8.12229e-5; = p2389*(p1129+p1131)
- p1798: 0
- p0564: 0; = IF(p0300<0.5;-SQRT(p0007*EXP(p0432^2*p0008)-p0007);SQRT(p0007*EXP(p0432^2*p0008)-p0007))
- p4328: 0; = p1773*p3480
- p1028: 34633.2; = IF(p1012=0;p1022*(p0704/100)*p0703*1000;0)
- p5028: 7.75742e-7; = p1855*p3483
- p2951: 0.000621897; = p2365*(p1020+p1022)
- p2151: 1.49946e-8; = p2015*p2079*p2113/(p0818*1000)
- p2933: 0; = p2347*(p1079+p1081)
- p0432: 0; = SQRT(2)*(IF((2*p0300-1)<0;-1;IF((2*p0300-1)>0;1;0))*SQRT(SQRT((2/(pi()*0.140012289)+LN(1-(2*p0300-1)^2)/2)^2-LN(1-(2*p0300-1)^2)/0.140012289)-(2/(pi()*0.140012289)+LN(1-(2*p0300-1)^2)/2)))
- p0712: 61.979; = p0052*(1+p0580*p0184/100)
- p3439: 0; = p3363*p1240
- p2848: 5.29984e-5; = p2262*(p1079+p1081)
- p0178: 16.618
- p3452: 0; = p3376*p1240
- p1754: 6.47389e-6; = p1346*1000/p0818
- p1278: 0
- p4101: 2.08983e-5; = p1962*p3478
- p0650: 0; = IF(p0386<0.5;-SQRT(p0007*EXP(p0518^2*p0008)-p0007);SQRT(p0007*EXP(p0518^2*p0008)-p0007))
- p3100: 0; = p2319*p1023
- p1597: 0
- p0654: 0; = IF(p0390<0.5;-SQRT(p0007*EXP(p0522^2*p0008)-p0007);SQRT(p0007*EXP(p0522^2*p0008)-p0007))
- p1979: 2.89966e7; = p0973
- p1138: 7565.82; = if(p1121=0;p1132*(p0716/100)*p0703*1000;0)
- p2846: 3.52027e-5; = p2260*(p1079+p1081)
- p1982: 750
- p1026: 23123.8; = IF(p1012=0;p1020*(p0704/100)*p0703*1000;0)
- p1744: 0
- p2644: 7.53542e-6; = p2253*(p1019+p1021)
- p1070: 0.0117659; = IF(p1012=0;p1056/(p1063*p0818);0)
- p1600: 0
- p4285: 1.25103e-5; = p1936*p3479
- p1217: 29.3663
- p2581: 8.48023e-6; = p2385*p1073
- p1587: 0
- p2197: 1.45013e-5; = p1055/p0818
- p0904: 6.2007e7; = p0825*p0901+(p0830+p0895)*p0824*p0903
- p2092: 0.54529
- p0273: 0.5
- p3218: 0.0411814; = p3214*p1228
- p2024: 0.748682
- p2209: 0.000854477; = 14.0067*p2208/30.973762
- p2368: 6.47147e-6; = p2225*p2197
- p2030: 8.5
- p3479: 0.362328; = if(p1328+p1330+p1332+p1334+p1336+p1338+p1340+p1342+p1344=0;0;p1334/(p1328+p1330+p1332+p1334+p1336+p1338+p1340+p1342+p1344))
- p1252: 0; = if(p1232>0;0;p0724*2000*p0723*1000*p0725/100)
- p2370: 2.33533e-5; = p2225*p2199
- p1010: 25218.9; = p0890
- p0505: 0; = SQRT(2)*(IF((2*p0373-1)<0;-1;IF((2*p0373-1)>0;1;0))*SQRT(SQRT((2/(pi()*0.140012289)+LN(1-(2*p0373-1)^2)/2)^2-LN(1-(2*p0373-1)^2)/0.140012289)-(2/(pi()*0.140012289)+LN(1-(2*p0373-1)^2)/2)))
- p0921: 0.0706444; = p0679*1000/p0801
- p3138: 0; = p2357*p1023
- p3307: 0; = if(and(p1232=0;p3252<>0);p3252*(p3258-p3302)/p3305;0)
- p2919: 1.80717e-5; = p2333*(p1020+p1022)
- p3008: 0; = p2422*(p1079+p1081)
- p3295: 0
- p0887: 964.633; = 1000*p0886*p0001*p0003*p0004/(p0818*p0002)
- p2502: 6.93476e-5; = p2306*p1073
- p1581: 0
- p2100: 0.705744
- p2687: 0.000548319; = p2296*(p1019+p1021)
- p3021: 0; = p2240*p1023
- p1236: 0; = if(p1232>0;0;p0728/100)
- p0804: 0
- p3286: 0
- p2599: 0; = p2403*p1014
- p2363: 7.47499e-5; = p2225*p2191
- p2236: 0; = 1-(p2230+p2231+p2232+p2233)
- p0028: 3.177
- p1076: 0; = IF(p1071=0;p0714/100;0)
- p2429: 0; = p2236*p2219
- p1667: 0
- p0408: 0; = SQRT(2)*(IF((2*p0276-1)<0;-1;IF((2*p0276-1)>0;1;0))*SQRT(SQRT((2/(pi()*0.140012289)+LN(1-(2*p0276-1)^2)/2)^2-LN(1-(2*p0276-1)^2)/0.140012289)-(2/(pi()*0.140012289)+LN(1-(2*p0276-1)^2)/2)))
- p2751: 0.000745895; = p2360*(p1019+p1021)
- p2320: 1.03025e-5; = p2224*p2187
- p0369: 0.5
- p2516: 2.64394e-6; = p2320*p1014
- p1320: 0; = IF(((p0745*1000*p0747/100)+(p0754*1000*p0756/100))/p0801<0;0;((p0745*1000*p0747/100)+(p0754*1000*p0756/100))/p0801)
- p0878: 125380; = p0867*p0856
- p3104: 0; = p2323*p1023
- p2841: 0.000102514; = p2255*(p1020+p1022)
- p2325: 6.06459e-5; = p2224*p2192
- p0701: 0
- p0722: 0
- p1868: 0
- p1550: 0.783979
- p0374: 0.5
- p1731: 0
- p1365: 5
- p3166: 7.36409e-7; = p2385*p1082
- p3037: 0; = p2256*p1023
- p1294: 0; = p1290*p1252/p0818
- p1227: 0.000346553; = IF(p1221=0;0;p1226*p0001/(p0818*p0002))
- p3429: 0; = p3372*p1239
- p1963d: 1.98672e-5; = p1608*p1812+p1609*p1813+p1610*p1814+p1611*p1815+p1612*p1816+p1613*p1817+p1614*p1818+p1615*p1819+p1616*p1820+p1617*p1821+p1618*p1822+p1619*p1823+p1620*p1824+p1621*p1825+p1622*p1826+p1623*p1827+p1624*p1828+p1625*p1829+p1626*p1830+p1627*p1831
- p3713: 0; = p1776*p3477
- p2297: 0.00263536; = p2227*p2204
- p1040: 0.0227854
- p1224: 0.44; = IF(p1221=0;0;IF(p1193=0;1-p1223;0))
- p2654: 0.000168377; = p2263*(p1078+p1080)
- p0250: 14.651
- p2235: 0; = 1-(p2226+p2227+p2228+p2229)
- p0504: 0; = SQRT(2)*(IF((2*p0372-1)<0;-1;IF((2*p0372-1)>0;1;0))*SQRT(SQRT((2/(pi()*0.140012289)+LN(1-(2*p0372-1)^2)/2)^2-LN(1-(2*p0372-1)^2)/0.140012289)-(2/(pi()*0.140012289)+LN(1-(2*p0372-1)^2)/2)))
- p2152: 1.87433e-8; = p2015*p2080*p2114/(p0818*1000)
- p3085: 6.93165e-5; = p2304*p1082
- p1054: 7.3387e6; = IF(p1012=0;p1047*p1036;0)
- p1875: 0
- p2162: 1.46853e-8; = p2015*p2086*p2124/(p0818*1000)
- p1046: 0.0227854; = IF(p1012=0;IF(p1037+p1044+p1045=1;0;IF(p1037+p1044+p1045+p1040>1;1-(p1037+p1044+p1045);p1040));0)
- p2426: 0; = p2235*p2216
- p0989: 3.84265e6; = p0985*p0886
- p2748: 0.000175048; = p2357*(p1019+p1021)
- p3459: 0; = p3364*p1241
- p2865: 3.10489e-5; = p2279*(p1020+p1022)
- p2780: 0.000454152; = p2389*(p1128+p1130)
- p2552: 2.29864e-5; = p2356*p1014
- p4515: 7.35794e-7; = p1754*p3481
- p1976: 0.0332
- p2890: 0.000262113; = p2304*(p1079+p1081)
- p1083: 79854.7; = IF(p1071=0;p1073*(p0710/100)*p0703*1000;0)
- p2778: 7.5449e-6; = p2387*(p1078+p1080)
- p2203: 0.00378692; = p1070-p2200-p2201-p2202
- p1259: 0; = if(p1232>0;0;p0730/100)
- p1552: 0
- p0783: 31.654; = p0123*(1+p0651*p0255/100)
- p2314: 0.000905; = p2231*p2221
- p3077: 0; = p2296*p1023
- p3136: 0; = p2355*p1023
- p1812: 0
- p0737: 0
- p0779: 58.064; = p0119*(1+p0647*p0251/100)
- p2932: 0; = p2346*(p1079+p1081)
- p0869: 0.0291389; = IF(p0858+p0864+p0865+p0866+p0867+p0868=1;0;1-(p0858+p0864+p0865+p0866+p0867+p0868))
- p0922: 0; = p0677*1000/p0801
- p0929: 14476; = p0801*p0923
- p2673: 0.000426533; = p2282*(p1019+p1021)
- p2206: 0.00125508; = 9*1.00794*p2204/30.973762
- p2034: 3.43677e-6; = p2015*p2030*p2032/(p0818*1000)
- p0663: 0; = IF(p0399<0.5;-SQRT(p0007*EXP(p0531^2*p0008)-p0007);SQRT(p0007*EXP(p0531^2*p0008)-p0007))
- p1767: 0
- p1266: 0; = if(p1232>0;0;IF(p1259+p1263+p1264+p1265=1;0;1-(p1259+p1263+p1264+p1265)))
- p2199: 5.23301e-5; = p1069-p2197-p2198
- p1765: 0
- p2990: 0; = p2404*(p1020+p1022)
- p2712: 7.47788e-5; = p2321*(p1019+p1021)
- p0786: 18.209; = p0126*(1+p0654*p0258/100)
- p0312: 0.5
- p2210: 0.000368936; = 6*1.00794*p2208/30.973762
- p3000: 0; = p2414*(p1079+p1081)
- p0063: 360.847
- p3223: 0.126838; = IF(p3216=0;0;(1-p1223)*24.3050/84.3139)
- p3373: 0; = if(p1232=0;p3245*p3361/p0818;0)
- p1019: 0.40934; = IF(p1012=0;IF(p1014=1;0;IF(p1014+p1015>1;1-p1014;p1015));0)
- p3049: 3.48942e-6; = p2268*p1082
- p0223: 24.673
- p1011: 6.16632e-7; = p1010*p0001*p0004/(p0818*p0002)
- p2724: 5.8262e-5; = p2333*(p1019+p1021)
- p2172: 0.312063; = p2166-(p2167+p2168+p2169+p2170)
- p2839: 2.33734e-6; = p2253*(p1020+p1022)
- p1914: 1.40268e-5; = p1506*1000/p0818
- p2749: 0.000405124; = p2358*(p1019+p1021)
- p2779: 6.76209e-5; = p2388*(p1078+p1080)
- p1997: 2.4254e7; = (if(p1152=0;0;p1150/p1152)+if(p1153=0;0;p1151/p1153))*(1+p1157)
- p0785: 0
- p3402: 0; = p3364*p1238
- p1861: 0
- p2472: 0.000646378; = p2276*p1014
- p2337: 0; = p2228*p2205
- p1050: 9.14728e6; = IF(p1012=0;p1037*p1036;0)
- p3186: 0; = p2405*p1023
- p1590: 0
- p3137: 0; = p2356*p1023
- p2730: 0; = p2339*(p1078+p1080)
- p0832: 1.27653e8; = p0831*p0830/(1-p0831)
- p2115: 0.856281
- p2694: 0.00014062; = p2303*(p1078+p1080)
- p3270: 0
- p2526: 2.73281e-7; = p2330*p1014
- p0730: 0
- p2044: 4.01311e-8; = p2015*p2042*p2043/(p0818*1000)
- p3250: 0
- p3214: 0.376406; = p1222*40.078/100.0869
- p0145: 0
- p2753: 0.000168652; = p2362*(p1019+p1021)
- p0803: 0
- p1842: 0
- p0059: 10.894
- p2725: 8.38521e-6; = p2334*(p1019+p1021)
- p0371: 0.5
- p4410: 0; = p1855*p3480
- p2831: 2.97502e-5; = p2245*(p1020+p1022)
- p1314: 0; = p1310*p1252/p0818
- p0733: 0
- p0884: 3.177; = IF(p0689=100;0;IF(p0689+p0688>100;100-p0689;p0688))
- p0897: 0
- p3162: 5.77522e-7; = p2381*p1082
- p0976: 0; = IF(p0687=0;IF(OR(p0686=0;p0689=0);0;p0686*1000*p0689/100);0)
- p1917: 0
- p2292: 1.33544e-5; = p2223*p2199
- p0181: 28.331
- p4213: 1.17284e-6; = p1864*p3479
- p1668: 0
- p3107: 0; = p2326*p1023
- p3183: 0; = p2402*p1023
- p0501: 0; = SQRT(2)*(IF((2*p0369-1)<0;-1;IF((2*p0369-1)>0;1;0))*SQRT(SQRT((2/(pi()*0.140012289)+LN(1-(2*p0369-1)^2)/2)^2-LN(1-(2*p0369-1)^2)/0.140012289)-(2/(pi()*0.140012289)+LN(1-(2*p0369-1)^2)/2)))
- p0119: 58.064
- p0052: 61.979
- p0938: 0; = p0932*p0001/(p0818*p0002)
- p1936: 3.45274e-5; = p1528*1000/p0818
- p3226: 0.00194174; = p3222*p1229
- p1937: 0
- p2149: 3.31651e-8; = p2015*p2077*p2111/(p0818*1000)
- p2072: 0.134
- p0721: 0
- p2639: 0.00114022; = p2248*(p1019+p1021)
- p1589: 0
- p2307: 0.000289304; = p2227*p2214
- p2330: 1.06488e-6; = p2224*p2198
- p1795: 5.39491e-6; = p1387*1000/p0818
- p1243: 0; = if(p1232>0;0;p1238*(p0725/100)*p0723*1000)
- p3148: 0; = p2367*p1023
- p1094: 6.67543e-6; = IF(p1071=0;p1088*p0001/(p0818*p0002);0)
- p3326: 0; = if(and(p1232=0;p3255<>0);p3268*p3289;0)
- p2949: 1.31552e-5; = p2363*(p1020+p1022)
- p2362: 0.000297247; = p2225*p2190
- p1195: 0.45
- p1082: 0.02333; = IF(p1071=0;IF(p1073+p1078+p1079+p1080+p1081=1;0;1-(p1073+p1078+p1079+p1080+p1081));0)
- p2285: 4.2745e-5; = p2223*p2191
- p1929: 0
- p0382: 0.5
- p1289: 0
- p0983: 0.974022; = if(p0886=0;0;min(1;(p0695*p0694*1000*p0697/100)/p0886))
- p2843: 0.000169144; = p2257*(p1020+p1022)
- p0802: 280000
- p2265: 0.00153605; = p2226*p2211
- p3454: 0; = p3378*p1240
- p0988: 0; = p0982*p0886
- p0117: 24.804
- p2228: 0; = if(p0774*p0778+p0775*p0779+p0776*p0780+p0777*p0781=0;0;p0780*p0776/(p0774*p0778+p0775*p0779+p0776*p0780+p0777*p0781))
- p1930: 0
- p2906: 1.81314e-6; = p2320*(p1020+p1022)
- p3009: 0; = p2423*(p1079+p1081)
- p4759: 1.86634e-6; = p1792*p3482
- p1528: 32
- p1144: 7.28321e-6; = if(p1121=0;p1138*p0001/(p0818*p0002);0)
- p3231: 6.05192e-8; = p1176/p0818
- p1610: 0
- p2924: 0; = p2338*(p1079+p1081)
- p3046: 3.58361e-5; = p2265*p1082
- p1732: 0.715577
- p0982: 0; = if(p0886=0;0;min(1;(p0691*p0690*1000*p0693/100)/p0886))
- p0575: 0; = IF(p0311<0.5;-SQRT(p0007*EXP(p0443^2*p0008)-p0007);SQRT(p0007*EXP(p0443^2*p0008)-p0007))
- p0993: 9.39574e-5; = p0989*p0001*p0004/(p0818*p0002)
- p0634: 0; = IF(p0370<0.5;-SQRT(p0007*EXP(p0502^2*p0008)-p0007);SQRT(p0007*EXP(p0502^2*p0008)-p0007))
- p4870: 2.41068e-6; = p1903*p3482
- p0102: 49.724
- p0502: 0; = SQRT(2)*(IF((2*p0370-1)<0;-1;IF((2*p0370-1)>0;1;0))*SQRT(SQRT((2/(pi()*0.140012289)+LN(1-(2*p0370-1)^2)/2)^2-LN(1-(2*p0370-1)^2)/0.140012289)-(2/(pi()*0.140012289)+LN(1-(2*p0370-1)^2)/2)))
- p0315: 0.5
- p1627: 0.541556
- p2691: 0.00397191; = p2300*(p1078+p1080)
- p0957: 0; = if(and(p0683>0;or(p0807=56;p0807=100;and(p0807=60;p0901>0.06)));p0939;0)
- p2192: 0.00135551; = p1067-p2189-p2190-p2191
- p3145: 0; = p2364*p1023
- p2973: 1.07393e-6; = p2387*(p1079+p1081)
- p1630: 0
- p1209: 94.2095; = p1206*p0818*p0822/p0801
- p2523: 1.94888e-5; = p2327*p1014
- p1214: 4; = IF(p1213=0;0;p1213-1)
- p4968: 2.58581e-7; = p1795*p3483
- p0707: 7.046; = p0047*(1+p0575*p0179/100)
- p2521: 1.55636e-5; = p2325*p1014
- p0159: 4.69
- p2625: 0; = p2429*p1123
- p4144: 1.95473e-6; = p1795*p3479
- p1828: 0
- p2582: 3.20017e-5; = p2386*p1073
- p4926: 6.66003e-6; = p1963*p3482
- p0784: 37.785; = p0124*(1+p0652*p0256/100)
- p2414: 0; = p2235*p2204
- p3344: 0; = if(and(p1232=0;p3254<>0);p3254-(p3339+p3340+p3341+p3342+p3343);0)
- p3645: 1.77319e-6; = p1914*p3476
- p0042: 360.847
- p2797: 0; = p2406*(p1019+p1021)
- p1889: 5.28701e-5; = p1481*1000/p0818
- p4079: 9.22373e-6; = p1936*p3478
- p2130: 6.11061e-7; = p2015*p2058*p2092/(p0818*1000)
- p2945: 1.80855e-5; = p2359*(p1020+p1022)
- p1309: 0
- p2148: 4.3963e-8; = p2015*p2076*p2110/(p0818*1000)
- p1595: 0
- p0449: 0; = SQRT(2)*(IF((2*p0317-1)<0;-1;IF((2*p0317-1)>0;1;0))*SQRT(SQRT((2/(pi()*0.140012289)+LN(1-(2*p0317-1)^2)/2)^2-LN(1-(2*p0317-1)^2)/0.140012289)-(2/(pi()*0.140012289)+LN(1-(2*p0317-1)^2)/2)))
- p1858: 0
- p2942: 1.57635e-5; = p2356*(p1020+p1022)
- p0935: 1.39353e-5; = p0929*p0001/(p0818*p0002)
- p1711: 0
- p0984: 0; = if(p0886=0;0;min(1;(p0699*p0698*1000*p0701/100)/p0886))
- p1229: 0.00865914; = IF(p1221=0;0;p1228*p1221)
- p2987: 0; = p2401*(p1020+p1022)
- p3245: 0; = IF(p3244=1;0;if(p3244+p0792/100>1;1-p3244;p0792/100))
- p2912: 6.23475e-5; = p2326*(p1020+p1022)
- p2838: 1.0631e-6; = p2252*(p1020+p1022)
- p3768: 0; = p1831*p3477
- p2193: 0.00791832; = p1054/p0818
- p1837: 0
- p1871: 0
- p1495: 124
- p1687: 0
- p0612: 0; = IF(p0348<0.5;-SQRT(p0007*EXP(p0480^2*p0008)-p0007);SQRT(p0007*EXP(p0480^2*p0008)-p0007))
- p0106: 30.088
- p0356: 0.5
- p2340: 0; = p2228*p2208
- p0562: 0; = IF(p0298<0.5;-SQRT(p0007*EXP(p0430^2*p0008)-p0007);SQRT(p0007*EXP(p0430^2*p0008)-p0007))
- p5268: 3.41068e-6; = p1889*p3484
- p0247: 10.747
- p2176: 0.00304715; = p0895*p0913/p0818
- p2512: 2.48754e-5; = p2316*p1014
- p2732: 0; = p2341*(p1078+p1080)
- p2183: 0.00216653; = p1064-p2182
- p3084: 5.2932e-6; = p2303*p1082
- p1750: 0
- p0130: 18.53
- p2511: 0.000113321; = p2315*p1014
- p0276: 0.5
- p3471: 0; = p3376*p1241
- p3268: 0
- p0669: 12.5442; = p0009*(1+p0537*p0141/100)
- p0547: 0; = IF(p0283<0.5;-SQRT(p0007*EXP(p0415^2*p0008)-p0007);SQRT(p0007*EXP(p0415^2*p0008)-p0007))
- p2461: 0.000412676; = p2265*p1073
- p1210: 0.46
- p2425: 0; = p2235*p2215
- p0094: 80.936
- p3247: 0
- p3299: 0; = if(p1303+p1304+p1305+p1306=0;0;p1303/(p1303+p1304+p1305+p1306))
- p3916: 1.44121e-6; = p1773*p3478
- p0023: 80.357
- p0858: 0; = p0670*1000/p0856
- p3792: 0; = p1855*p3477
- p1022: 0.10553; = IF(p1012=0;IF(p1014+p1019+p1020+p1021=1;0;IF(p1014+p1019+p1020+p1021+p1018>1;1-(p1014+p1019+p1020+p1021);p1018));0)
- p1793: 0
- p1186: 3.10418e-8; = p1182*p1185/p0818
- p0378: 0.5
- p3097: 0; = p2316*p1023
- p3403: 0; = p3365*p1238
- p3710: 0; = p1773*p3477
- p3667: 4.36477e-6; = p1936*p3476
- p1846: 0
- p1270: 0; = IF(p1267=p1259;0;IF(p1267+p1268>p1259;p1259-p1267;p1268))
- p2182: 0.00986975; = p1050/p0818
- p1676: 0
- p2449: 3.40833e-6; = p2253*p1014
- p2697: 0.000159983; = p2306*(p1078+p1080)
- p2993: 0; = p2407*(p1020+p1022)
- p3229: 1.88835e-6; = p1164/p0818
- p1659: 0
- p1321: 0.623069; = IF(((p0745*1000*p0748/100)+(p0754*1000*p0757/100))/p0801<0;0;((p0745*1000*p0748/100)+(p0754*1000*p0757/100))/p0801)
- p0146: 0
- p0158: 12.067
- p4721: 1.16646e-7; = p1754*p3482
- p1865: 0
- p0587: 0; = IF(p0323<0.5;-SQRT(p0007*EXP(p0455^2*p0008)-p0007);SQRT(p0007*EXP(p0455^2*p0008)-p0007))
- p3153: 0; = p2372*p1023
- p1965: 0.000667704; = p1963+p1959*p1964*1000/p0818
- p1123: 0.2535; = if(p1121=0;p0717/100;0)
- p0787: 27.429; = p0127*(1+p0655*p0259/100)
- p1808: 0
- p3302: 0; = if(and(p1232=0;p3252<>0);p3258*(p3278*(p3282*p1256+p3286*(p1253+p1257)+p1258*p3288+p3297*p3287));0)
- p2904: 5.44341e-6; = p2318*(p1020+p1022)
- p0807: 1
- p1608: 0
- p0780: 0
- p4941: 1.13775e-6; = p1768*p3483
- p0345: 0.5
- p2298: 0.00238349; = p2227*p2205
- p2887: 0.000102513; = p2301*(p1079+p1081)
- p2060: 0.272353
- p1810: 0
- p2806: 0; = p2415*(p1078+p1080)
- p2875: 0.000753562; = p2289*(p1020+p1022)
- p0342: 0.5
- p4925: 1.40953e-6; = p1962*p3482
- p3105: 0; = p2324*p1023
- p1037: 0.386463
- p1075: 0.08822; = IF(p1071=0;p0713/100;0)
- p3388: 0; = p3369*p1234
- p4762: 9.7205e-8; = p1795*p3482
- p1339: 9.18657e-5; = p1338*p0001/(p0818*p0002)
- p1881: 0
- p2758: 0.00424844; = p2367*(p1019+p1021)
- p2752: 0.000147342; = p2361*(p1019+p1021)
- p4098: 1.21061e-5; = p1955*p3478
- p1051: 186017; = IF(p1012=0;p1044*p1036;0)
- p1016: 0.07046; = IF(p1012=0;p0707/100;0)
- p2719: 0.000425922; = p2328*(p1019+p1021)
- p1942: 0
- p2757: 0.000429786; = p2366*(p1019+p1021)
- p3313: 0; = if(and(p1232=0;p3253<>0);p3262*(p3278*(p3282*p1256+p3286*(p1253+p1257)+p1258*p3288+p3298*p3287));0)
- p0892: 0; = if(p0891=0;0;(1-p1240)*p3251/p0891)
- p2036: 4.21946e-6; = p2015*p2030*(1-p2032)/(p0818*1000)
- p0241: 15.196
- p1334: 304227; = p1322*p0801
- p1571: 0
- p1685: 0.491852
- p1908: 0
- p2863: 9.73029e-5; = p2277*(p1020+p1022)
- p1718: 0
- p3034: 0; = p2253*p1023
- p0224: 42.21
- p1560: 0
- p2124: 0.263965
- p2680: 0.00242943; = p2289*(p1019+p1021)
- p0433: 0; = SQRT(2)*(IF((2*p0301-1)<0;-1;IF((2*p0301-1)>0;1;0))*SQRT(SQRT((2/(pi()*0.140012289)+LN(1-(2*p0301-1)^2)/2)^2-LN(1-(2*p0301-1)^2)/0.140012289)-(2/(pi()*0.140012289)+LN(1-(2*p0301-1)^2)/2)))
- p1327: 0.150461; = if(p1318=0;if(p1327a=0;1;if(p1327a<0;0;p1327a));0)
- p0405: 0; = SQRT(2)*(IF((2*p0273-1)<0;-1;IF((2*p0273-1)>0;1;0))*SQRT(SQRT((2/(pi()*0.140012289)+LN(1-(2*p0273-1)^2)/2)^2-LN(1-(2*p0273-1)^2)/0.140012289)-(2/(pi()*0.140012289)+LN(1-(2*p0273-1)^2)/2)))
- p3124: 0; = p2343*p1082
- p1892: 0
- p2369: 1.06219e-5; = p2225*p2198
- p3045: 2.73655e-6; = p2264*p1082
- p0916: 0.233482; = p0826+(p0832*(1+p0894))/p0818
- p1954: 0
- p1190: 9.7715e-8; = p1188/p0818
- p3358: 0; = if(p1232=0;p3308+p3319+p3330+p3341+p3352;0)
- p1030: 8.10757e-5; = IF(p1012=0;p1024*p0001/(p0818*p0002);0)
- p2450: 0.000348679; = p2254*p1014
- p1756: 0
- p2048: 9.00733e-15; = p2015*p2046/(p0818*1000000000000)
- p2174: 0.00503459; = p0895*p0903/p0818
- p2409: 0; = p2234*p2199
- p2814: 0; = p2423*(p1078+p1080)
- p0390: 0.5
- p1694: 0
- p3232: 6.20835e-8; = p1182/p0818
- p2795: 0; = p2404*(p1019+p1021)
- p2974: 9.62506e-6; = p2388*(p1079+p1081)
- p1963h: 0.000102072; = p1686*p1890+p1687*p1891+p1688*p1892+p1689*p1893+p1690*p1894+p1691*p1895+p1692*p1896+p1693*p1897+p1694*p1898+p1695*p1899+p1696*p1900+p1697*p1901+p1698*p1902+p1699*p1903+p1700*p1904+p1701*p1905+p1702*p1906+p1703*p1907+p1704*p1908+p1705*p1909
- p4922: 8.16522e-7; = p1955*p3482
- p3217: 0.0123414; = p3213*p1228
- p3415: 0; = p3377*p1238
- p3453: 0; = p3377*p1240
- p1671: 0
- p3244: 0; = p0791/100
- p4798: 6.60994e-7; = p1831*p3482
- p0841: 0.28778
- p2173: 0.122754; = p0895*p0898/p0818
- p2486: 9.49699e-7; = p2290*p1014
- p2529: 2.63523e-5; = p2333*p1014
- p0027: 15.567
- p0292: 0.5
- p0949: 0; = if(and(p0683=0;or(p0807=480;p0807=32;p0807=1;and(p0807=60;p0901<0.03)));p0937;0)
- p2367: 0.00748783; = p2225*p2196
- p1333: 0.000215926; = p1332*p0001/(p0818*p0002)
- p0245: 4.521
- p3526: 6.81995e-7; = p1795*p3476
- p3392: 0; = p3373*p1234
- p1943: 0
- p2386: 0.000119116; = p2229*p2215
- p2471: 8.25577e-5; = p2275*p1123
- p1963k: 7.97368e-5; = p1744*p1948+p1745*p1949+p1746*p1950+p1747*p1951+p1748*p1952+p1749*p1953+p1750*p1954+p1751*p1955+p1752*p1956+p1753*p1957+p1961*p1962
- p2397: 0; = p2234*p2186
- p3079: 5.56067e-5; = p2298*p1082
- p3199: 0; = p2418*p1082
- p1912: 0
- p2435: 1.30724e-5; = p2239*p1014
- p1360: 22
- p2858: 0.000209004; = p2272*(p1129+p1131)
- p3322: 0; = if(and(p1232=0;p3253<>0);p3253-(p3317+p3318+p3319+p3320+p3321);0)
- p2095: 0.765734
- p2957: 0.000420457; = p2371*(p1020+p1022)
- p2704: 0.00031723; = p2313*(p1128+p1130)
- p2665: 0.000114158; = p2274*(p1128+p1130)
- p0272: 7.262
- p2158: 1.33184e-7; = p2015*p2082*p2120/(p0818*1000)
- p1645: 0
- p3242: 3.30791e-8; = p3234*p1188*p3238/p0818
- p3262: 0
- p1723: 0
- p1686: 0
- p5109: 1.65492e-6; = p1936*p3483
- p1271: 0; = IF(p1267+p1270=p1259;0;IF(p1267+p1270+p1269>p1259;p1259-(p1267+p1270);p1269))
- p0746: 13.99; = p0086*(1+p0614*p0218/100)
- p1004: 0; = p1000*p0888
- p1207: 169.422; = if(p1193>0;0;(p1194*p1050/p1057+p1195*p1051/p1058+p1196*p1052/p1059+p1197*p1053/p1060+p1198*p1054/p1061+p1199*p1055/p1062+p1200*p1056/p1063)/(p0702*1000)+(p1201*p1109/p1114+p1202*p1110/p1115)/(p0702*1000)+p1203*p1170/p0801+p1204*p1176/p0801)
- p2106: 0.856281
- p1719: 0
- p2569: 3.78309e-5; = p2373*p1014
- p3463: 0; = p3368*p1241
- p3694: 0; = p1757*p3477
- p1226: 360000; = IF(p1221=0;0;IF(p1193=0;p0801;0))
- p1999: 1.09425e8; = (p1228+p1229)*p0818+p1164
- p2334: 1.47788e-5; = p2224*p2202
- p1182: 57.539; = p1181*p0801
- p2643: 3.42737e-6; = p2252*(p1019+p1021)
- p0210: 0
- p1899: 0
- p0723: 360.847; = p0063*(1+p0591*p0195/100)
- p2097: 0.40001
- p0805: 0
- p0837: 0.5
- p3048: 3.11335e-6; = p2267*p1082
- p1091: 2.52424e-5; = IF(p1071=0;p1085*p0001/(p0818*p0002);0)
- p2405: 0; = p2234*p2195
- p2015: 834799; = p0830*p2011*p2013
- p1036: 2.36692e7; = IF(p1012=0;p0795*p0702*1000*p0796/100;0)
- p0910: 0.00559751; = p0909/p0818
- p2855: 4.97933e-5; = p2269*(p1079+p1081)
- p0005: 1.60934
- p0404: 0.5
- p1797: 0
- p1699: 0.762907
- p3448: 0; = p3372*p1240
- p3115: 0; = p2334*p1023
- p3225: 0.00127268; = p3221*p1229
- p2022: 0.000154816; = p2018*p2015/p0818-p2021
- p0442: 0; = SQRT(2)*(IF((2*p0310-1)<0;-1;IF((2*p0310-1)>0;1;0))*SQRT(SQRT((2/(pi()*0.140012289)+LN(1-(2*p0310-1)^2)/2)^2-LN(1-(2*p0310-1)^2)/0.140012289)-(2/(pi()*0.140012289)+LN(1-(2*p0310-1)^2)/2)))
- p1856: 0
- p4675: 1.59422e-6; = p1914*p3481
- p0811: 0; = if(p0807=480;1-p0810;0)
- p2037: 2.8
- p0579: 0; = IF(p0315<0.5;-SQRT(p0007*EXP(p0447^2*p0008)-p0007);SQRT(p0007*EXP(p0447^2*p0008)-p0007))
- p1593: 0
- p1678: 0
- p1760: 0
- p0327: 0.5
- p2849: 2.39665e-5; = p2263*(p1079+p1081)
- p2820: 0; = p2429*(p1128+p1130)
- p2964: 6.1684e-5; = p2378*(p1079+p1081)
- p0873: 0; = p0872*p0001*p0003/(p0818*p0002)
- p2466: 1.54969e-5; = p2270*p1073
- p1963i: 1.46162e-5; = p1706*p1910+p1707*p1911+p1708*p1912+p1709*p1913+p1710*p1914+p1711*p1915+p1712*p1916+p1713*p1917+p1714*p1918+p1715*p1919+p1716*p1920+p1717*p1921+p1718*p1922+p1719*p1923+p1720*p1924+p1721*p1925+p1722*p1926+p1723*p1927+p1724*p1928
- p3462: 0; = p3367*p1241
- p3729: 0; = p1792*p3477
- p3464: 0; = p3369*p1241
- p1316: 0; = p1312*p1252/p0818
- p1991: 3.65996e7; = (if(p1111=0;0;p1106/p1111)+if(p1112=0;0;p1107/p1112)+if(p1113=0;0;p1108/p1113)+if(p1114=0;0;p1109/p1114)+if(p1115=0;0;p1110/p1115))*(1+p1157)
- p1068: 0.0263944; = IF(p1012=0;p1054/(p1061*p0818);0)
- p1577: 0
- p2664: 0.00164685; = p2273*(p1128+p1130)
- p1803: 0
- p2140: 1.27582e-7; = p2015*p2068*p2102/(p0818*1000)
- p1757: 1.40268e-5; = p1349*1000/p0818
- p0104: 90.948
- p3411: 0; = p3373*p1238
- p2008: 0.0757932; = ((p1982*p1985+p1988*p1991+p1994*p1997+p2002*p2005)/p0818)*p0005*p0002/1000
- p1260: 0; = if(p1232>0;0;p0731/100)
- p1154: 0.0192627; = if(p1152*p0818=0;0;p1150/(p1152*p0818))
- p3896: 0; = p1963*p3477
- p0833: 1.30759e9; = p0830+p0832
- p2043: 0.636483
- p2371: 0.0023891; = p2225*p2200
- p0838: 6.45092e8; = (p0833-p0836)*p0837
- p2469: 0.000685365; = p2273*p1123
- p2611: 0; = p2415*p1073
- p1751: 0.791173
- p2842: 1.47541e-5; = p2256*(p1020+p1022)
- p2568: 0.000262856; = p2372*p1014
- p0544: 0; = IF(p0280<0.5;-SQRT(p0007*EXP(p0412^2*p0008)-p0007);SQRT(p0007*EXP(p0412^2*p0008)-p0007))
- p2789: 0; = p2398*(p1019+p1021)
- p2306: 0.000258124; = p2227*p2213
- p2799: 0; = p2408*(p1019+p1021)
- p2666: 0.000198376; = p2275*(p1128+p1130)
- p2159: 1.60973e-6; = p2015*p2083*p2121/(p0818*1000)
- p0403: 0.5
- p1005: 641.748; = p1001*p0888
- p2017: 402455; = p2015*p0898
- p0415: 0; = SQRT(2)*(IF((2*p0283-1)<0;-1;IF((2*p0283-1)>0;1;0))*SQRT(SQRT((2/(pi()*0.140012289)+LN(1-(2*p0283-1)^2)/2)^2-LN(1-(2*p0283-1)^2)/0.140012289)-(2/(pi()*0.140012289)+LN(1-(2*p0283-1)^2)/2)))
- p2604: 0; = p2408*p1014
- p1679: 0
- p0080: 95.576
- p2272: 0.00191853; = p2230*p2218
- p1835: 0
- p3380: 0; = p3251/p0818
- p2468: 0.000486347; = p2272*p1123
- p1702: 0
- p2908: 4.58184e-6; = p2322*(p1020+p1022)
- p3147: 0; = p2366*p1023
- p2963: 7.42919e-6; = p2377*(p1079+p1081)
- p5174: 3.48029e-7; = p1795*p3484
- p0696: 3.243; = p0036*(1+p0564*p0168/100)
- p2138: 6.95516e-8; = p2015*p2066*p2100/(p0818*1000)
- p3266: 0
- p2917: 4.12038e-7; = p2331*(p1020+p1022)
- p0169: 1.3
- p0026: 263.418
- p1712: 0
- p2620: 0; = p2424*p1073
- p2750: 5.83065e-5; = p2359*(p1019+p1021)
- p1205: 0.04725
- p2332: 0.000239516; = p2224*p2200
- p3178: 0; = p2397*p1023
- p5335: 4.87241e-7; = p1956*p3484
- p1777: 0
- p4740: 9.7205e-8; = p1773*p3482
- p1020: 0.07046; = IF(p1012=0;IF(p1014+p1019=1;0;IF(p1014+p1019+p1016>1;1-(p1014+p1019);p1016));0)
- p1291: 0; = IF(p1287+p1290=p1264;0;IF(p1287+p1290+p1289>p1264;p1264-(p1287+p1290);p1289))
- p3003: 0; = p2417*(p1079+p1081)
- p2567: 0.000613114; = p2371*p1014
- p2103: 0.912485
- p3409: 0; = p3371*p1238
- p0819: 0; = p0808*p0809/p0818
- p0016: 9.25
- p1368: 9
- p1985: 6.65551e7; = (if(p1057=0;0;p1050/p1057)+if(p1058=0;0;p1051/p1058)+if(p1059=0;0;p1052/p1059)+if(p1060=0;0;p1053/p1060)+if(p1061=0;0;p1054/p1061)+if(p1062=0;0;p1055/p1062)+if(p1063=0;0;p1056/p1063))*(1+p1157)
- p4888: 1.9441e-8; = p1921*p3482
- p1109: 3.97168e6; = IF(p1071=0;p1105*p1103*p1095;0)
- p2537: 0; = p2341*p1073
- p3478: 0.267142; = if(p1328+p1330+p1332+p1334+p1336+p1338+p1340+p1342+p1344=0;0;p1332/(p1328+p1330+p1332+p1334+p1336+p1338+p1340+p1342+p1344))
- p0107: 47.839
- p0349: 0.5
- p2668: 0.000313698; = p2277*(p1019+p1021)
- p0871: 0; = p0870*p0001*p0003/(p0818*p0002)
- p0899: 1.03231e9; = p0825*p0896+(p0830+p0895)*p0824*p0898
- p4537: 1.10369e-6; = p1776*p3481
- p3338: 0; = if(and(p1232=0;p3254<>0);1-(p3334+p3335+p3336+p3337);0)
- p4965: 4.96475e-6; = p1792*p3483
- p1677: 0
- p2825: 8.96471e-6; = p2239*(p1020+p1022)
- p2421: 0; = p2235*p2211
- p0316: 0.5
- p2834: 0.000353674; = p2248*(p1020+p1022)
- p3265: 0
- p2134: 1.64991e-6; = p2015*p2062*p2096/(p0818*1000)
- p2227: 0.614969; = if(p0774*p0778+p0775*p0779+p0776*p0780+p0777*p0781=0;0;p0779*p0775/(p0774*p0778+p0775*p0779+p0776*p0780+p0777*p0781))
- p2146: 1.86133e-8; = p2015*p2074*p2108/(p0818*1000)
- p0874: 79789; = p0865*p0856
- p2765: 0.000958866; = p2374*(p1019+p1021)
- p2154: 1.14205e-7; = p2015*p2082*p2116/(p0818*1000)
- p0400: 0.5
- p1987: 400
- p2027: 0.428799
- p0822: 0.9318
- p2972: 1.05084e-5; = p2386*(p1079+p1081)
- p2958: 0.00018026; = p2372*(p1020+p1022)
- p2740: 0; = p2349*(p1078+p1080)
- p2504: 0.000293307; = p2308*p1073
- p2394: 0; = p2234*p2183
- p1888: 0
- p0796: 90.948; = p0136*(1+p0664*p0268/100)
- p3059: 0; = p2278*p1023
- p0215: 32.713
- p3414: 0; = p3376*p1238
- p1324: 0.265084; = IF(((p0745*1000*p0751/100)+(p0754*1000*p0760/100))/p0801<0;0;((p0745*1000*p0751/100)+(p0754*1000*p0760/100))/p0801)
- p3705: 0; = p1768*p3477
- p0985: 0.974022; = IF(p0982=1;0;IF(p0982+p0983>1;1-p0982;p0983))
- p3120: 0; = p2339*p1082
- p3350: 0; = if(and(p1232=0;p3256<>0);p3256*(p3273*p3277-p3345)/p3349;0)
- p2693: 0.000325685; = p2302*(p1078+p1080)
- p0078: 360.847
- p0321: 0.5
- p1583: 0
- p2222: 0.253795; = if(p0765*p0769+p0766*p0770+p0767*p0771+p0768*p0772=0;0;p0769*p0765/(p0765*p0769+p0766*p0770+p0767*p0771+p0768*p0772))
- p0950: 0; = if(and(p0683=0;or(p0807=480;p0807=32;p0807=1;and(p0807=60;p0901<0.03)));p0938;0)
- p1990: 30
- p1878: 0
- p0180: 30.299
- p3482: 0.0180179; = if(p1328+p1330+p1332+p1334+p1336+p1338+p1340+p1342+p1344=0;0;p1340/(p1328+p1330+p1332+p1334+p1336+p1338+p1340+p1342+p1344))
- p1831: 3.66854e-5; = p1423*1000/p0818
- p0694: 258.029; = p0034*(1+p0562*p0166/100)
- p1300: 0; = IF(p1297=p1265;0;IF(p1297+p1298>p1265;p1265-p1297;p1298))
- p0639: 0; = IF(p0375<0.5;-SQRT(p0007*EXP(p0507^2*p0008)-p0007);SQRT(p0007*EXP(p0507^2*p0008)-p0007))
- p0825: 8.63592e8; = p0818*p0822
- p2226: 0.317934; = if(p0774*p0778+p0775*p0779+p0776*p0780+p0777*p0781=0;0;p0778*p0774/(p0774*p0778+p0775*p0779+p0776*p0780+p0777*p0781))
- p0239: 41.762
- p0763: 360.847; = p0103*(1+p0631*p0235/100)
- p5293: 9.04875e-7; = p1914*p3484
- p2305: 2.46847e-5; = p2227*p2212
- p3465: 0; = p3370*p1241
- p3377: 0; = if(p1232=0;p3246*p3359/p0818;0)
- p3240: 4.57032e-9; = p3234*p1188*p3235/p0818
- p2171: 0.0696867; = p2165*p0831
- p3365: 0; = if(p1232=0;p3244*p3359/p0818;0)
- p2382: 0.00032417; = p2229*p2211
- p0518: 0; = SQRT(2)*(IF((2*p0386-1)<0;-1;IF((2*p0386-1)>0;1;0))*SQRT(SQRT((2/(pi()*0.140012289)+LN(1-(2*p0386-1)^2)/2)^2-LN(1-(2*p0386-1)^2)/0.140012289)-(2/(pi()*0.140012289)+LN(1-(2*p0386-1)^2)/2)))
- p0705: 25.663; = p0045*(1+p0573*p0177/100)
- p0151: 0
- p2928: 0; = p2342*(p1079+p1081)
- p3121: 0; = p2340*p1082
- p2142: 2.07558e-7; = p2015*p2070*p2104/(p0818*1000)
- p0866: 0.400947; = IF(p0858+p0864+p0865=1;0;IF(p0858+p0864+p0865+p0861>1;1-(p0858+p0864+p0865);p0861))
- p0422: 0; = SQRT(2)*(IF((2*p0290-1)<0;-1;IF((2*p0290-1)>0;1;0))*SQRT(SQRT((2/(pi()*0.140012289)+LN(1-(2*p0290-1)^2)/2)^2-LN(1-(2*p0290-1)^2)/0.140012289)-(2/(pi()*0.140012289)+LN(1-(2*p0290-1)^2)/2)))
- p3369: 0; = if(p1232=0;p3245*p3357/p0818;0)
- p1179: 0.5
- p2010: 0.00303173; = ((p1984*p1985+p1990*p1991+p1996*p1997+p2004*p2005)/p0818)*p0005*p0002/1000
- p5338: 2.38453e-5; = p1963*p3484
- p1117: 0.00224571; = IF(p1071=0;p1107/(p1112*p0818);0)
- p2437: 0.000104209; = p2241*p1014
- p2607: 0; = p2411*p1014
- p2886: 0.000565356; = p2300*(p1079+p1081)
- p0114: 45.917
- p1836: 0
- p2133: 3.57844e-7; = p2015*p2061*p2095/(p0818*1000)
- p0901: 0.0425476
- p2929: 0; = p2343*(p1079+p1081)
- p0643: 0; = IF(p0379<0.5;-SQRT(p0007*EXP(p0511^2*p0008)-p0007);SQRT(p0007*EXP(p0511^2*p0008)-p0007))
- p2783: 7.70926e-5; = p2392*(p1128+p1130)
- p3030: 0; = p2249*p1023
- p1783: 0
- p0998: 0; = if(p0888=0;0;if((p0699*p0698*1000*p0700/100)/p0888>1;1;(p0699*p0698*1000*p0700/100)/p0888))
- p3938: 1.44121e-6; = p1795*p3478
- p1201: 0.65
- p1218: 0.5
- p1855: 1.61847e-5; = p1447*1000/p0818
- p1014: 0.25663; = IF(p1012=0;p0705/100;0)
- p2701: 0.00061977; = p2310*(p1078+p1080)
- p1146: 0.911008
- p0372: 0.5
- p2311: 0.00533135; = p2231*p2218
- p3169: 2.54537e-6; = p2388*p1082
- p1132: 0.02843; = if(p1121=0;IF(p1123+p1128+p1129+p1130+p1131=1;0;1-(p1123+p1128+p1129+p1130+p1131));0)
- p2938: 0; = p2352*(p1129+p1131)
- p0526: 0; = SQRT(2)*(IF((2*p0394-1)<0;-1;IF((2*p0394-1)>0;1;0))*SQRT(SQRT((2/(pi()*0.140012289)+LN(1-(2*p0394-1)^2)/2)^2-LN(1-(2*p0394-1)^2)/0.140012289)-(2/(pi()*0.140012289)+LN(1-(2*p0394-1)^2)/2)))
- p0992: 0; = p0988*p0001*p0004/(p0818*p0002)
- p0517: 0; = SQRT(2)*(IF((2*p0385-1)<0;-1;IF((2*p0385-1)>0;1;0))*SQRT(SQRT((2/(pi()*0.140012289)+LN(1-(2*p0385-1)^2)/2)^2-LN(1-(2*p0385-1)^2)/0.140012289)-(2/(pi()*0.140012289)+LN(1-(2*p0385-1)^2)/2)))
- p0973: 2.89966e7; = p0967+p0968+p0969
- p3071: 0; = p2290*p1023
- p3372: 0; = if(p1232=0;p3245*p3360/p0818;0)
- p1924: 0
- p3659: 5.45596e-7; = p1928*p3476
- p3177: 0; = p2396*p1023
- p3441: 0; = p3365*p1240
- p3251: 0; = p1252-(p3252+p3253+p3254+p3255+p3256)
- p1639: 0
- p2216: 0.000181428; = p1108/p0818
- p3363: 0; = if(p1232=0;p3244*p3357/p0818;0)
- p1841: 0
- p2602: 0; = p2406*p1014
- p0282: 0.5
- p2770: 7.8579e-5; = p2379*(p1078+p1080)
- p1103: 0.624059; = IF(p1071=0;IF(p1096+p1101+p1102=1;0;IF(p1096+p1101+p1102+p1099>1;1-(p1096+p1101+p1102);p1099));0)
- p1204: 0.980791
- p0931: 24586; = p0801*p0925
- p2918: 4.21524e-5; = p2332*(p1020+p1022)
- p4117: 8.6008e-6; = p1768*p3479
- p3032: 0; = p2251*p1023
- p0622: 0; = IF(p0358<0.5;-SQRT(p0007*EXP(p0490^2*p0008)-p0007);SQRT(p0007*EXP(p0490^2*p0008)-p0007))
- p3246: 1; = IF(p3244+p3245=1;0;1-(p3244+p3245))
- p2555: 2.63724e-5; = p2359*p1014
- p2312: 0.00751299; = p2231*p2219
- p1643: 0
- p1591: 0.677771
- p3351: 0; = if(and(p1232=0;p3256<>0);p3256*(p3274-p3346)/p3349;0)
- p2347: 0; = p2228*p2215
- p2415: 0; = p2235*p2205
- p4204: 5.86418e-6; = p1855*p3479
- p1640: 0
- p1689: 0
- p0798: 82.371; = p0138*(1+p0666*p0270/100)
- p2696: 1.52993e-5; = p2305*(p1078+p1080)
- p3364: 0; = if(p1232=0;p3244*p3358/p0818;0)
- p1611: 0
- p0900: 1.11384; = p0899/p0818
- p0532: 0; = SQRT(2)*(IF((2*p0400-1)<0;-1;IF((2*p0400-1)>0;1;0))*SQRT(SQRT((2/(pi()*0.140012289)+LN(1-(2*p0400-1)^2)/2)^2-LN(1-(2*p0400-1)^2)/0.140012289)-(2/(pi()*0.140012289)+LN(1-(2*p0400-1)^2)/2)))
- p0764: 90.948; = p0104*(1+p0632*p0236/100)
- p3407: 0; = p3369*p1238
- p3001: 0; = p2415*(p1079+p1081)
- p1303: 0; = p1297*p1252/p0818
- p3352: 0; = if(and(p1232=0;p3256<>0);p3256*(p3275-p3347)/p3349;0)
- p4125: 3.51851e-6; = p1776*p3479
- p2705: 0.000551263; = p2314*(p1128+p1130)
- p0019: 25.432
- p0817: 0
- p1620: 0
- p0966: 1; = if(p0683=0;0;IF(p0684/100+p0965=1;0;1-(p0684/100+p0965)))
- p4664: 1.52064e-5; = p1903*p3481
- p2365: 0.00353371; = p2225*p2193
- p0344: 0.5
- p0301: 0.5
- p2290: 3.70065e-6; = p2223*p2197
- p0586: 0; = IF(p0322<0.5;-SQRT(p0007*EXP(p0454^2*p0008)-p0007);SQRT(p0007*EXP(p0454^2*p0008)-p0007))
- p0290: 0.5
- p1814: 0
- p0220: 22.372
- p4534: 6.13162e-7; = p1773*p3481
- p0191: 33.929
- p1717: 0.5139
- p3031: 0; = p2250*p1023
- p2747: 5.08204e-5; = p2356*(p1019+p1021)
- p3469: 0; = p3374*p1241
- p0136: 90.948
- p2278: 5.12199e-5; = p2223*p2184
- p0058: 60.913
- p2291: 6.07403e-6; = p2223*p2198
- p2828: 1.02853e-5; = p2242*(p1020+p1022)
- p1770: 0
- p2453: 0.000246647; = p2257*p1014
- p0438: 0; = SQRT(2)*(IF((2*p0306-1)<0;-1;IF((2*p0306-1)>0;1;0))*SQRT(SQRT((2/(pi()*0.140012289)+LN(1-(2*p0306-1)^2)/2)^2-LN(1-(2*p0306-1)^2)/0.140012289)-(2/(pi()*0.140012289)+LN(1-(2*p0306-1)^2)/2)))
- p0697: 96.129; = p0037*(1+p0565*p0169/100)
- p2866: 7.18584e-5; = p2280*(p1020+p1022)
- p0961: 2.36676e-5; = if(and(p0683>0;or(p0807=480;p0807=32;p0807=1;and(p0807=60;p0901<0.03)));p0937;0)
- p0906: 0.0035023
- p3127: 0; = p2346*p1082
- p2723: 0.000135896; = p2332*(p1019+p1021)
- p3278: 0
- p2500: 0.000798224; = p2304*p1073
- p2135: 7.25893e-7; = p2015*p2063*p2097/(p0818*1000)
- p1089: 7.68718e-5; = IF(p1071=0;p1083*p0001/(p0818*p0002);0)
- p2107: 0.881623
- p2069: 0.190588
- p2898: 0.000818465; = p2312*(p1129+p1131)
- p0270: 4.521
- p1921: 1.07898e-6; = p1513*1000/p0818
- p0944: 0; = if(and(p0683=0;p0950=0);p0938;0)
- p0260: 7.756
- p0955: 0; = if(and(p0683>0;or(p0807=56;p0807=100;and(p0807=60;p0901>0.06)));p0937;0)
- p3330: 0; = if(and(p1232=0;p3255<>0);p3255*(p3267-p3325)/p3327;0)
- p3974: 9.80022e-6; = p1831*p3478
- p0092: 1.994
- p2417: 0; = p2235*p2207
- p2935: 0; = p2349*(p1079+p1081)
- p0412: 0; = SQRT(2)*(IF((2*p0280-1)<0;-1;IF((2*p0280-1)>0;1;0))*SQRT(SQRT((2/(pi()*0.140012289)+LN(1-(2*p0280-1)^2)/2)^2-LN(1-(2*p0280-1)^2)/0.140012289)-(2/(pi()*0.140012289)+LN(1-(2*p0280-1)^2)/2)))
- p3171: 2.98706e-5; = p2390*p1132
- p1792: 0.000103582; = p1384*1000/p0818
- p0821: 1.51412
- p1857: 0
- p3410: 0; = p3372*p1238
- p2548: 0; = p2352*p1123
- p0676: 9.25; = p0016*(1+p0544*p0148/100)
- p0418: 0; = SQRT(2)*(IF((2*p0286-1)<0;-1;IF((2*p0286-1)>0;1;0))*SQRT(SQRT((2/(pi()*0.140012289)+LN(1-(2*p0286-1)^2)/2)^2-LN(1-(2*p0286-1)^2)/0.140012289)-(2/(pi()*0.140012289)+LN(1-(2*p0286-1)^2)/2)))
- p1764: 0
- p0867: 0.348278; = IF(p0858+p0864+p0865+p0866=1;0;IF(p0858+p0864+p0865+p0866+p0862>1;1-(p0858+p0864+p0865+p0866);p0862))
- p2004: 30
- p1931: 0
- p0317: 0.5
- p2984: 0; = p2398*(p1020+p1022)
- p1847: 0
- p1206: 0.0392725
- p0050: 82.371
- p2830: 2.59911e-5; = p2244*(p1020+p1022)
- p2761: 1.32502e-5; = p2370*(p1019+p1021)
- p2742: 0; = p2351*(p1128+p1130)
- p4238: 1.91563e-5; = p1889*p3479
- p2507: 0.0013515; = p2311*p1123
- p2391: 7.28313e-5; = p2233*p2220
- p1015: 0.40934; = IF(p1012=0;p0706/100;0)
- p0126: 18.209
- p2489: 0.000350603; = p2293*p1014
- p1125: 0.10894; = if(p1121=0;p0719/100;0)
- p1341: 1.45635e-5; = p1340*p0001/(p0818*p0002)
- p1018: 0.10553; = IF(p1012=0;p0709/100;0)
- p2113: 0.832356
- p0049: 10.553
- p2181: 1002.65; = p0887+p0889+p0893+p2180
- p2267: 0.000133448; = p2226*p2213
- p2657: 7.90965e-6; = p2266*(p1078+p1080)
- p1276: 0; = p1272*p1252/p0818
- p0320: 0.5
- p3007: 0; = p2421*(p1079+p1081)
- p0889: 31.8543; = 1000*p0888*p0001*p0003*p0004/(p0818*p0002)
- p1755: 0
- p2262: 0.000600753; = p2226*p2208
- p2986: 0; = p2400*(p1020+p1022)
- p2815: 0; = p2424*(p1078+p1080)
- p1898: 0
- p4308: 0.000133929; = p1963*p3479
- p2239: 5.09388e-5; = p2222*p2184
- p1049: 0.209623; = IF(p1012=0;IF(p1037+p1044+p1045+p1046+p1047+p1048=1;0;1-(p1037+p1044+p1045+p1046+p1047+p1048));0)
- p1782: 0
- p0670: 0
- p2108: 0.826583
- p0401: 0.5
- p0144: 0
- p2851: 0.000135511; = p2265*(p1079+p1081)
- p2663: 0.00116863; = p2272*(p1128+p1130)
- p1101: 0.0685077; = IF(p1071=0;IF(p1096=1;0;IF(p1096+p1097>1;1-p1096;p1097));0)
- p3412: 0; = p3374*p1238
- p1918: 0
- p0843: 0.257182
- p3239: 0.013074; = IF(p3238+p3235+p3236=1;0;1-(p3238+p3235+p3236))
- p4277: 1.56378e-6; = p1928*p3479
- p1187: 0.000251562
- p1168: 9.44175e-7; = p1164*p1167/p0818
- p1000: 0; = IF(p0996+p0999=1;0;IF(p0996+p0999+p0998>1;1-(p0996+p0999);p0998))
- p3222: 0.224242; = IF(p3216=0;0;p1223*40.078/100.0869)
- p1922: 0
- p3851: 0; = p1914*p3477
- p4102: 9.87448e-5; = p1963*p3478
- p2989: 0; = p2403*(p1020+p1022)
- p1961: 0.5
- p2574: 0.000187849; = p2378*p1073
- p1102: 0.0264207; = IF(p1071=0;IF(p1096+p1101=1;0;IF(p1096+p1101+p1098>1;1-(p1096+p1101);p1098));0)
- p0947: 0; = if(and(p0683=0;or(p0807=480;p0807=32;p0807=1;and(p0807=60;p0901<0.03)));p0935;0)
- p1332: 224305; = p1321*p0801
- p3096: 0; = p2315*p1023
- p3161: 1.33758e-6; = p2380*p1082
- p4822: 2.91615e-7; = p1855*p3482
- p1057: 0.82
- p3340: 0; = if(and(p1232=0;p3254<>0);p3254*(p3270-p3335)/p3338;0)
- p2728: 0; = p2337*(p1078+p1080)
- p0048: 15.804
- p3413: 0; = p3375*p1238
- p3125: 0; = p2344*p1082
- p1786: 0
- p2244: 0.000147685; = p2222*p2189
- p2496: 0.0017217; = p2300*p1073
- p0834: 0.0003
- p1078: 0.61979; = IF(p1071=0;IF(p1073=1;0;IF(p1073+p1074>1;1-p1073;p1074));0)
- p1781: 0
- p2348: 0; = p2228*p2216
- p1904: 0
- p0918: 0.8658; = p0680*1000/p0801
- p1603: 0
- p3370: 0; = if(p1232=0;p3245*p3358/p0818;0)
- p2627: 0; = p2431*p1123
- p1938: 0
- p1740: 0
- p1753: 0
- p2233: 0.0932498; = if(p0783*p0787+p0784*p0788+p0785*p0789+p0786*p0790=0;0;p0790*p0786/(p0783*p0787+p0784*p0788+p0785*p0789+p0786*p0790))
- p0695: 15.492; = p0035*(1+p0563*p0167/100)
- p3442: 0; = p3366*p1240
- p0932: 0; = p0801*p0926
- p2204: 0.00428536; = p1109/p0818
- p2184: 0.000200709; = p1051/p0818
- p1087: 0; = IF(p1071=0;p1081*(p0710/100)*p0703*1000;0)
- p2767: 0.000161179; = p2376*(p1078+p1080)
- p1554: 0
- p0698: 0
- p1902: 0
- p2642: 2.08815e-6; = p2251*(p1019+p1021)
- p0692: 0
- p2276: 0.00251871; = p2223*p2182
- p3036: 0; = p2255*p1023
- p1641: 0
- p3215: 0.450791; = p1222*3*15.9994/100.0869
- p1978: 262
- p1343: 3.87413e-5; = p1342*p0001/(p0818*p0002)
- p0182: 4.521
- p0777: 24.804; = p0117*(1+p0645*p0249/100)
- p0758: 0
- p4720: 4.2011e-5; = p1963*p3481
- p4743: 1.74969e-7; = p1776*p3482
- p1130: 0; = if(p1121=0;IF(p1123+p1128+p1129=1;0;IF(p1123+p1128+p1129+p1126>1;1-(p1123+p1128+p1129);p1126));0)
- p3507: 1.22759e-6; = p1776*p3476
- p0909: 5.18777e6
- p2718: 4.30876e-5; = p2327*(p1019+p1021)
- p2637: 2.41195e-5; = p2246*(p1019+p1021)
- p2857: 4.56076e-5; = p2271*(p1079+p1081)
- p0452: 0; = SQRT(2)*(IF((2*p0320-1)<0;-1;IF((2*p0320-1)>0;1;0))*SQRT(SQRT((2/(pi()*0.140012289)+LN(1-(2*p0320-1)^2)/2)^2-LN(1-(2*p0320-1)^2)/0.140012289)-(2/(pi()*0.140012289)+LN(1-(2*p0320-1)^2)/2)))
- p2481: 1.09697e-5; = p2285*p1014
- p3256: 0; = p1252*(p1307*(1-p3247)+p1310*(1-p3248)+p1311*(1-p3249)+p1312*(1-p3250))
- p3050: 1.3168e-5; = p2269*p1082
- p2682: 3.44628e-6; = p2291*(p1019+p1021)
- p0772: 73.211; = p0112*(1+p0640*p0244/100)
- p0835: 446.789; = -LN(1-p0669/100)/p0834
- p0346: 0.5
- p1264: 0; = if(p1232>0;0;IF(p1259+p1263=1;0;IF(p1259+p1263+p1261>1;1-(p1259+p1263);p1261)))
- p3018: 0; = p2237*p1023
- p2250: 0.00425834; = p2222*p2196
- p3264: 0
- p1223: 0.56
- p2110: 0.856281
- p2925: 0; = p2339*(p1079+p1081)
- p2299: 0.000771834; = p2227*p2206
- p2477: 1.50808e-5; = p2281*p1014
- p2341: 0; = p2228*p2209
- p1127: 0; = if(p1121=0;p0721/100;0)
- p1166: 1.88835e-6; = p1164/p0818
- p1172: 2.41522e-7; = p1170/p0818
- p2689: 0.00147726; = p2298*(p1078+p1080)
- p1895: 0
- p1790: 0
- p3259: 0
- p0978: 0
- p3015: 0; = p2429*(p1129+p1131)
- p1038: 0.00785902
- p2165: 0.71382; = (p0833-p2014)/p0818-p0839
- p1287: 0
- p0127: 27.429
- p2530: 3.79269e-6; = p2334*p1014
- p2528: 6.14669e-5; = p2332*p1014
- p2671: 0.000231667; = p2280*(p1019+p1021)
- p3047: 2.97733e-7; = p2266*p1082
- p2485: 0.00109885; = p2289*p1014
- p3255: 0; = p1252*(p1297*(1-p3247)+p1300*(1-p3248)+p1301*(1-p3249)+p1302*(1-p3250))
- p3292: 0
- p0271: 10.956
- p3417: 0; = p3379*p1238
- p3279: 0
- p0018: 14.476
- p3028: 0; = p2247*p1023
- p0827: 0; = p0818*p0819*p0823
- p0410: 0; = SQRT(2)*(IF((2*p0278-1)<0;-1;IF((2*p0278-1)>0;1;0))*SQRT(SQRT((2/(pi()*0.140012289)+LN(1-(2*p0278-1)^2)/2)^2-LN(1-(2*p0278-1)^2)/0.140012289)-(2/(pi()*0.140012289)+LN(1-(2*p0278-1)^2)/2)))
- p1688: 0
- p1279: 0
- p4331: 0; = p1776*p3480
- p1134: 162102; = if(p1121=0;p1128*(p0716/100)*p0703*1000;0)
- p3198: 0; = p2417*p1082
- p1949: 0
- p1520: 4
- p3393: 0; = p3374*p1234
- p0216: 26.988
- p1071: 0
- p0168: 37.817
- p1883: 0
- p0537: 0; = IF(p0273<0.5;-SQRT(p0007*EXP(p0405^2*p0008)-p0007);SQRT(p0007*EXP(p0405^2*p0008)-p0007))
- p2557: 6.66437e-5; = p2361*p1014
- p2375: 0.000287535; = p2229*p2204
- p3332: 0; = if(and(p1232=0;p3255<>0);IF((p3328+p3329+p3330+p3331)+(p3255*(p3265*(1-p3277))/p3327)>p3255;p3255-(p3328+p3329+p3330+p3331);p3255*(p3265*(1-p3277))/p3327);0)
- p1165: 0.000346553; = p0801*p0001/(p0818*p0002)
- p3238: 0.854735; = IF(p3237+p3235+p3236>1;1-(p3235+p3236);p3237)
- p3236: 0.0140975
- p1625: 0
- p3359: 0; = if(p1232=0;p3309+p3320+p3331+p3342+p3353;0)
- p2861: 3.54786e-5; = p2275*(p1129+p1131)
- p2821: 0; = p2430*(p1128+p1130)
- p0655: 0; = IF(p0391<0.5;-SQRT(p0007*EXP(p0523^2*p0008)-p0007);SQRT(p0007*EXP(p0523^2*p0008)-p0007))
- p1956: 7.55287e-6; = p1548*1000/p0818
- p1237: 0; = if(p1232>0;0;p0729/100)
- p0414: 0; = SQRT(2)*(IF((2*p0282-1)<0;-1;IF((2*p0282-1)>0;1;0))*SQRT(SQRT((2/(pi()*0.140012289)+LN(1-(2*p0282-1)^2)/2)^2-LN(1-(2*p0282-1)^2)/0.140012289)-(2/(pi()*0.140012289)+LN(1-(2*p0282-1)^2)/2)))
- p1307: 0
- p0511: 0; = SQRT(2)*(IF((2*p0379-1)<0;-1;IF((2*p0379-1)>0;1;0))*SQRT(SQRT((2/(pi()*0.140012289)+LN(1-(2*p0379-1)^2)/2)^2-LN(1-(2*p0379-1)^2)/0.140012289)-(2/(pi()*0.140012289)+LN(1-(2*p0379-1)^2)/2)))
- p4946: 2.58581e-7; = p1773*p3483
- p3110: 0; = p2329*p1023
- p0166: 12.339
- p0112: 73.211
- p0631: 0; = IF(p0367<0.5;-SQRT(p0007*EXP(p0499^2*p0008)-p0007);SQRT(p0007*EXP(p0499^2*p0008)-p0007))
- p2277: 0.000552889; = p2223*p2183
- p0175: 0
- p3467: 0; = p3372*p1241
- p3263: 0
- p3063: 0; = p2282*p1023
- p0953: 0; = if(and(p0683>0;or(p0807=56;p0807=100;and(p0807=60;p0901>0.06)));p0935;0)
- p2524: 0.000192648; = p2328*p1014
- p2473: 0.000141888; = p2277*p1014
- p2420: 0; = p2235*p2210
- p1605: 0
- p2482: 8.87736e-5; = p2286*p1014
- p0951: 0; = if(and(p0683=0;or(p0807=480;p0807=32;p0807=1;and(p0807=60;p0901<0.03)));p0939;0)
- p2961: 2.53664e-5; = p2375*(p1079+p1081)
- p2067: 0.446471
- p2189: 0.000581907; = p1053/p0818
- p1804: 0
- p2084: 0.21
- p1035: 0; = IF(p1012=0;p1029*p0001/(p0818*p0002);0)
- p2396: 0; = p2234*p2185
- p0044: 90.948
- p0907: 0
- p2896: 8.82171e-5; = p2310*(p1079+p1081)
- p2829: 0.000131576; = p2243*(p1020+p1022)
- p3093: 0.000213594; = p2312*p1132
- p2451: 0.000149487; = p2255*p1014
- p0523: 0; = SQRT(2)*(IF((2*p0391-1)<0;-1;IF((2*p0391-1)>0;1;0))*SQRT(SQRT((2/(pi()*0.140012289)+LN(1-(2*p0391-1)^2)/2)^2-LN(1-(2*p0391-1)^2)/0.140012289)-(2/(pi()*0.140012289)+LN(1-(2*p0391-1)^2)/2)))
- p0509: 0; = SQRT(2)*(IF((2*p0377-1)<0;-1;IF((2*p0377-1)>0;1;0))*SQRT(SQRT((2/(pi()*0.140012289)+LN(1-(2*p0377-1)^2)/2)^2-LN(1-(2*p0377-1)^2)/0.140012289)-(2/(pi()*0.140012289)+LN(1-(2*p0377-1)^2)/2)))
- p0387: 0.5
- p3732: 0; = p1795*p3477
- p1832: 0
- p2408: 0; = p2234*p2198
- p3157: 6.06705e-6; = p2376*p1082
- p3474: 0; = p3379*p1241
- p2498: 0.000141175; = p2302*p1073
- p1733: 0
- p0668: 0; = IF(p0404<0.5;-SQRT(p0007*EXP(p0536^2*p0008)-p0007);SQRT(p0007*EXP(p0536^2*p0008)-p0007))
- p1579: 0
- p3112: 0; = p2331*p1023
- p2168: 0.0127362; = p2166*(p0903)
- p2055: 5.59471
- p3312: 0; = if(and(p1232=0;p3253<>0);p3261*p3277*(p3298*p3290+(1-p3298)*p3294);0)
- p3801: 0; = p1864*p3477
- p1126: 0; = if(p1121=0;p0720/100;0)
- p3892: 0; = p1955*p3477
- p0474: 0; = SQRT(2)*(IF((2*p0342-1)<0;-1;IF((2*p0342-1)>0;1;0))*SQRT(SQRT((2/(pi()*0.140012289)+LN(1-(2*p0342-1)^2)/2)^2-LN(1-(2*p0342-1)^2)/0.140012289)-(2/(pi()*0.140012289)+LN(1-(2*p0342-1)^2)/2)))
- p2117: 0.585147
- p0540: 0; = IF(p0276<0.5;-SQRT(p0007*EXP(p0408^2*p0008)-p0007);SQRT(p0007*EXP(p0408^2*p0008)-p0007))
- p1607: 0
- p1160: 0.0687358; = (p1156+p1158)*p1159
- p2304: 0.00297113; = p2227*p2211
- p1649: 0
- p2349: 0; = p2228*p2217
- p1159: 0.5
- p1713: 0
- p1574: 0
- p4419: 0; = p1864*p3480
- p3386: 0; = p3367*p1234
- p1124: 0.60913; = if(p1121=0;p0718/100;0)
- p1626: 0
- p3237: 0.854735
- p0555: 0; = IF(p0291<0.5;-SQRT(p0007*EXP(p0423^2*p0008)-p0007);SQRT(p0007*EXP(p0423^2*p0008)-p0007))
- p1735: 0
- p4735: 4.27702e-7; = p1768*p3482
- p2390: 0.00105067; = p2233*p2219
- p1636: 0
- p3154: 0; = p2373*p1023
- p1032: 2.226e-5; = IF(p1012=0;p1026*p0001/(p0818*p0002);0)
- p0118: 33.058
- p0565: 0; = IF(p0301<0.5;-SQRT(p0007*EXP(p0433^2*p0008)-p0007);SQRT(p0007*EXP(p0433^2*p0008)-p0007))
- p1741: 0
- p0111: 6.745
- p0022: 360.847
- p0572: 0; = IF(p0308<0.5;-SQRT(p0007*EXP(p0440^2*p0008)-p0007);SQRT(p0007*EXP(p0440^2*p0008)-p0007))
- p2584: 2.93116e-5; = p2388*p1073
- p0376: 0.5
- p2407: 0; = p2234*p2197
- p0402: 0.5
- p0855: 1.52478; = p0854*p0001*p0003/(p0818*p0002)
- p2647: 4.75662e-5; = p2256*(p1019+p1021)
- p2911: 1.06731e-5; = p2325*(p1020+p1022)
- p2873: 0.000355626; = p2287*(p1020+p1022)
- p2545: 0; = p2349*p1073
- p1709: 0
- p2662: 0.000320417; = p2271*(p1078+p1080)
- p1698: 0
- p3170: 2.11967e-5; = p2389*p1132
- p3082: 2.71098e-5; = p2301*p1082
- p0665: 0; = IF(p0401<0.5;-SQRT(p0007*EXP(p0533^2*p0008)-p0007);SQRT(p0007*EXP(p0533^2*p0008)-p0007))
- p2840: 0.000239115; = p2254*(p1020+p1022)
- p1863: 0
- p2327: 7.59413e-5; = p2224*p2195
- p0686: 263.418; = p0026*(1+p0554*p0158/100)
- p2493: 0.000708017; = p2297*p1073
- p0717: 25.35; = p0057*(1+p0585*p0189/100)
- p1567: 0
- p3304: 0; = if(and(p1232=0;p3252<>0);p3260*p3289;0)
- p0720: 0
- p2187: 0.000230274; = 4*1.00794*p2186/(2*14.0067)
- p2313: 0.000520792; = p2231*p2220
- p3691: 0; = p1754*p3477
- p2230: 0.239952; = if(p0783*p0787+p0784*p0788+p0785*p0789+p0786*p0790=0;0;p0787*p0783/(p0783*p0787+p0784*p0788+p0785*p0789+p0786*p0790))
- p1077: 0; = IF(p1071=0;p0715/100;0)
- p3267: 0
- p2837: 6.47703e-7; = p2251*(p1020+p1022)
- p2329: 6.48789e-7; = p2224*p2197
- p0793: 0
- p2950: 0.000106461; = p2364*(p1020+p1022)
- p2678: 0.00114652; = p2287*(p1019+p1021)
- p2020: 21639.4; = p2015*p2018*p2019
- p0416: 0; = SQRT(2)*(IF((2*p0284-1)<0;-1;IF((2*p0284-1)>0;1;0))*SQRT(SQRT((2/(pi()*0.140012289)+LN(1-(2*p0284-1)^2)/2)^2-LN(1-(2*p0284-1)^2)/0.140012289)-(2/(pi()*0.140012289)+LN(1-(2*p0284-1)^2)/2)))
- p1714: 0
- p1296: 0; = p1292*p1252/p0818
- p2321: 0.000131797; = p2224*p2188
- p0161: 1.285
- p2179: 0.0312868; = p0970+p0971+p0972
- p1084: 184222; = IF(p1071=0;p1078*(p0710/100)*p0703*1000;0)
- p3919: 2.59417e-6; = p1776*p3478
- p2617: 0; = p2421*p1073
- p1295: 0; = p1291*p1252/p0818
- p1142: 0; = if(p1121=0;p1136*p0001/(p0818*p0002);0)
- p1062: 0.16
- p3205: 0; = p2424*p1082
- p2220: 0.000781034; = p1151/p0818
- p0542: 0; = IF(p0278<0.5;-SQRT(p0007*EXP(p0410^2*p0008)-p0007);SQRT(p0007*EXP(p0410^2*p0008)-p0007))
- p3122: 0; = p2341*p1082
- p0238: 7.652
- p3252: 0; = p1252*(p1267*(1-p3247)+p1270*(1-p3248)+p1271*(1-p3249)+p1272*(1-p3250))
- p4930: 6.7231e-7; = p1757*p3483
- p4007: 8.64725e-7; = p1864*p3478
- p1211: 0.6
- p3133: 0; = p2352*p1132
- p0108: 43.963
- p2074: 0.025
- p2939: 0; = p2353*(p1129+p1131)
- p2772: 1.53426e-5; = p2381*(p1078+p1080)
- p2651: 0.000247316; = p2260*(p1078+p1080)
- p1769: 0
- p1136: 0; = if(p1121=0;p1130*(p0716/100)*p0703*1000;0)
- p0857: 3.46553; = p0856*p0001*p0003/(p0818*p0002)
- p1192: 4.88575e-8; = p1188*p1191/p0818
- p2379: 0.000126783; = p2229*p2208
- p1884: 0
- p4923: 1.36087e-7; = p1956*p3482
- p2638: 0.000195191; = p2247*(p1019+p1021)
- p2401: 0; = p2234*p2190
- p1996: 30
- p2648: 0.000545309; = p2257*(p1019+p1021)
- p3400: 0; = p3362*p1238
- p2275: 0.000325671; = p2230*p2221
- p1851: 0
- p1619: 0
- p1752: 0.631349
- p0135: 72.122
- p2430: 0; = p2236*p2220
- p0313: 0.5
- p2188: 0.00294582; = p1066-p2186-p2187
- p0124: 37.785
- p2650: 0.000763733; = p2259*(p1078+p1080)
- p2003: 50
- p2104: 0.817136
- p1066: 0.00477608; = IF(p1012=0;p1052/(p1059*p0818);0)
- p0829: 0; = if(p0807=480;p0814*(1-p0824);0)
- p3228: 0.00434642; = p3224*p1229
- p1565: 0
- p0109: 36.366
- p0799: 36.819; = p0139*(1+p0667*p0271/100)
- p3149: 0; = p2368*p1023
- p0856: 360000; = p0801
- p3005: 0; = p2419*(p1079+p1081)
- p0485: 0; = SQRT(2)*(IF((2*p0353-1)<0;-1;IF((2*p0353-1)>0;1;0))*SQRT(SQRT((2/(pi()*0.140012289)+LN(1-(2*p0353-1)^2)/2)^2-LN(1-(2*p0353-1)^2)/0.140012289)-(2/(pi()*0.140012289)+LN(1-(2*p0353-1)^2)/2)))
- p1098: 0.0264207
- p2580: 7.56627e-6; = p2384*p1073
- p2268: 0.000149568; = p2226*p2214
- p0488: 0; = SQRT(2)*(IF((2*p0356-1)<0;-1;IF((2*p0356-1)>0;1;0))*SQRT(SQRT((2/(pi()*0.140012289)+LN(1-(2*p0356-1)^2)/2)^2-LN(1-(2*p0356-1)^2)/0.140012289)-(2/(pi()*0.140012289)+LN(1-(2*p0356-1)^2)/2)))
- p3128: 0; = p2347*p1082
- p2760: 6.02665e-6; = p2369*(p1019+p1021)
- p2380: 5.73329e-5; = p2229*p2209
- p2147: 5.36062e-8; = p2015*p2075*p2109/(p0818*1000)
- p1648: 0
- p0656: 0; = IF(p0392<0.5;-SQRT(p0007*EXP(p0524^2*p0008)-p0007);SQRT(p0007*EXP(p0524^2*p0008)-p0007))
- p1663: 0
- p0577: 0; = IF(p0313<0.5;-SQRT(p0007*EXP(p0445^2*p0008)-p0007);SQRT(p0007*EXP(p0445^2*p0008)-p0007))
- p0679: 25.432; = p0019*(1+p0547*p0151/100)
- p0262: 34.72
- p1634: 0
- p1799: 0
- p1063: 0.455
- p2762: 0.00135553; = p2371*(p1019+p1021)
- p1212: 0.144508; = if(p1211=0;0;if(p1193>0;0;(p1207+p1208+p1209)*p1210/(2000*p1211)))
- p0267: 10.672
- p0085: 758.709
- p1703: 0
- p1003: 129635; = p0999*p0888
- p1775: 0
- p3423: 0; = p3366*p1239
- p3446: 0; = p3370*p1240
- p0743: 0.987; = p0083*(1+p0611*p0215/100)
- p2026: 63.9
- p0484: 0; = SQRT(2)*(IF((2*p0352-1)<0;-1;IF((2*p0352-1)>0;1;0))*SQRT(SQRT((2/(pi()*0.140012289)+LN(1-(2*p0352-1)^2)/2)^2-LN(1-(2*p0352-1)^2)/0.140012289)-(2/(pi()*0.140012289)+LN(1-(2*p0352-1)^2)/2)))
- p0443: 0; = SQRT(2)*(IF((2*p0311-1)<0;-1;IF((2*p0311-1)>0;1;0))*SQRT(SQRT((2/(pi()*0.140012289)+LN(1-(2*p0311-1)^2)/2)^2-LN(1-(2*p0311-1)^2)/0.140012289)-(2/(pi()*0.140012289)+LN(1-(2*p0311-1)^2)/2)))
- p3135: 0; = p2354*p1023
- p2333: 0.000102686; = p2224*p2201
- p1181: 0.000159831
- p2721: 6.04194e-7; = p2330*(p1019+p1021)
- p3072: 0; = p2291*p1023
- p3213: 0.112803; = p1222*12.0107/100.0869
- p2669: 2.90612e-5; = p2278*(p1019+p1021)
- p3140: 0; = p2359*p1023
- p2571: 7.72492e-5; = p2375*p1073
- p2936: 0; = p2350*(p1129+p1131)
- p0138: 82.371
- p0046: 40.934
- p2991: 0; = p2405*(p1020+p1022)
- p1337: 0; = p1336*p0001/(p0818*p0002)
- p0089: 40.098
- p2335: 0.000169428; = p2224*p2203
- p3164: 6.28338e-8; = p2383*p1082
- p1128: 0.60913; = if(p1121=0;IF(p1123=1;0;IF(p1123+p1124>1;1-p1123;p1124));0)
- p2535: 0; = p2339*p1073
- p1189: 0.000346553; = p0801*p0001/(p0818*p0002)
- p1185: 0.5
- p0531: 0; = SQRT(2)*(IF((2*p0399-1)<0;-1;IF((2*p0399-1)>0;1;0))*SQRT(SQRT((2/(pi()*0.140012289)+LN(1-(2*p0399-1)^2)/2)^2-LN(1-(2*p0399-1)^2)/0.140012289)-(2/(pi()*0.140012289)+LN(1-(2*p0399-1)^2)/2)))
- p2388: 0.000109103; = p2229*p2217
- p2284: 0.000169978; = p2223*p2190
- p1310: 0; = IF(p1307=p1266;0;IF(p1307+p1308>p1266;p1266-p1307;p1308))
- p3301: 0; = if(and(p1232=0;p3252<>0);p3257*p3277*(p3297*p3290+(1-p3297)*p3294);0)
- p2212: 4.01398e-5; = p1106/p0818
- p0996: 0; = if(p0888=0;0;if((p0691*p0690*1000*p0692/100)/p0888>1;1;(p0691*p0690*1000*p0692/100)/p0888))
- p1021: 0.15804; = IF(p1012=0;IF(p1014+p1019+p1020=1;0;IF(p1014+p1019+p1020+p1017>1;1-(p1014+p1019+p1020);p1017));0)
- p2488: 3.42714e-6; = p2292*p1014
- p1586: 0
- p2324: 7.49395e-6; = p2224*p2191
- p1762: 0
- p2595: 0; = p2399*p1014
- p1043: 0.209623
- p3562: 4.63757e-6; = p1831*p3476
- p3216: 0.06; = IF(OR(p1226=0;p1228=0);0;1-p3213-p3214-p3215)
- p2805: 0; = p2414*(p1078+p1080)
- p0633: 0; = IF(p0369<0.5;-SQRT(p0007*EXP(p0501^2*p0008)-p0007);SQRT(p0007*EXP(p0501^2*p0008)-p0007))
- p1568: 0
- p1342: 40244.6; = p1326*p0801
- p0490: 0; = SQRT(2)*(IF((2*p0358-1)<0;-1;IF((2*p0358-1)>0;1;0))*SQRT(SQRT((2/(pi()*0.140012289)+LN(1-(2*p0358-1)^2)/2)^2-LN(1-(2*p0358-1)^2)/0.140012289)-(2/(pi()*0.140012289)+LN(1-(2*p0358-1)^2)/2)))
- p1481: 49
- p0580: 0; = IF(p0316<0.5;-SQRT(p0007*EXP(p0448^2*p0008)-p0007);SQRT(p0007*EXP(p0448^2*p0008)-p0007))
- p0037: 96.129
- p2143: 1.20804e-7; = p2015*p2071*p2105/(p0818*1000)
- p1115: 0.237849
- p2125: 1.12335e-6; = p2015*p2053*p2087/(p0818*1000)
- p0254: 7.262
- p1346: 6
- p2283: 0.0001485; = p2223*p2189
- p2021: 2.33485e-5; = p2020/p0818
- p2561: 0.000906855; = p2365*p1014
- p2934: 0; = p2348*(p1079+p1081)
- p3043: 1.40156e-5; = p2262*p1082
- p2157: 3.77779e-8; = p2015*p2086*p2119/(p0818*1000)
- p2280: 0.000408309; = p2223*p2186
- p2672: 3.33421e-5; = p2281*(p1019+p1021)
- p2215: 0.00177528; = p1117-p2214
- p2635: 8.37935e-5; = p2244*(p1019+p1021)
- p0651: 0; = IF(p0387<0.5;-SQRT(p0007*EXP(p0519^2*p0008)-p0007);SQRT(p0007*EXP(p0519^2*p0008)-p0007))
- p2085: 0.0335294
- p0110: 61.171
- p1716: 0
- p2014: 925114; = p0833*p2011*p2013
- p0237: 28.452
- p3420: 0; = p3363*p1239
- p2260: 0.000399033; = p2226*p2206
- p3427: 0; = p3370*p1239
- p0735: 0
- p1045: 0.0626496; = IF(p1012=0;IF(p1037+p1044=1;0;IF(p1037+p1044+p1039>1;1-(p1037+p1044);p1039));0)
- p2303: 0.000226884; = p2227*p2210
- p1734: 0
- p1946: 0
- p1301: 0; = IF(p1297+p1300=p1265;0;IF(p1297+p1300+p1299>p1265;p1265-(p1297+p1300);p1299))
- p2121: 0.822447
- p0902: 0
- p1114: 0.216028
- p3141: 0; = p2360*p1023
- p1704: 0
- p2352: 0; = p2232*p2220
- p2566: 5.99317e-6; = p2370*p1014
- p0455: 0; = SQRT(2)*(IF((2*p0323-1)<0;-1;IF((2*p0323-1)>0;1;0))*SQRT(SQRT((2/(pi()*0.140012289)+LN(1-(2*p0323-1)^2)/2)^2-LN(1-(2*p0323-1)^2)/0.140012289)-(2/(pi()*0.140012289)+LN(1-(2*p0323-1)^2)/2)))
- p0084: 17.469
- p2738: 0; = p2347*(p1078+p1080)
- p1621: 0
- p2505: 2.99752e-5; = p2309*p1073
- p2658: 8.27099e-5; = p2267*(p1078+p1080)
- p0008: 0.0739645; = (p0007-1.5)/(p0007-1)^2
- p1728: 0
- p2346: 0; = p2228*p2214
- p4556: 6.13162e-7; = p1795*p3481
- p3440: 0; = p3364*p1240
- p3118: 0; = p2337*p1082
- p1844: 0
- p1860: 0
- p2094: 0.922577
- p2038: 0.304457
- p2045: 30
- p2353: 0; = p2232*p2221
- p0865: 0.221636; = IF(p0858+p0864=1;0;IF(p0858+p0864+p0860>1;1-(p0858+p0864);p0860))
- p2098: 0.856281
- p2046: 10
- p2681: 2.09968e-6; = p2290*(p1019+p1021)
- p1302: 0; = IF(p1297+p1300+p1301=p1262;0;p1262-(p1297+p1300+p1301))
- p3227: 0.00109831; = p3223*p1229
- p1143: 0; = if(p1121=0;p1137*p0001/(p0818*p0002);0)
- p2358: 0.000714026; = p2225*p2186
- p0447: 0; = SQRT(2)*(IF((2*p0315-1)<0;-1;IF((2*p0315-1)>0;1;0))*SQRT(SQRT((2/(pi()*0.140012289)+LN(1-(2*p0315-1)^2)/2)^2-LN(1-(2*p0315-1)^2)/0.140012289)-(2/(pi()*0.140012289)+LN(1-(2*p0315-1)^2)/2)))
- p0788: 63.854; = p0128*(1+p0656*p0260/100)
- p1838: 0
- p0454: 0; = SQRT(2)*(IF((2*p0322-1)<0;-1;IF((2*p0322-1)>0;1;0))*SQRT(SQRT((2/(pi()*0.140012289)+LN(1-(2*p0322-1)^2)/2)^2-LN(1-(2*p0322-1)^2)/0.140012289)-(2/(pi()*0.140012289)+LN(1-(2*p0322-1)^2)/2)))
- p1612: 0
- p2878: 2.35024e-6; = p2292*(p1020+p1022)
- p1216: 0.0791463
- p1308: 0
- p1684: 0
- p2572: 6.9866e-5; = p2376*p1073
- p1820: 0
- p2881: 1.48355e-5; = p2295*(p1020+p1022)
- p0314: 0.5
- p3472: 0; = p3377*p1241
- p0649: 0; = IF(p0385<0.5;-SQRT(p0007*EXP(p0517^2*p0008)-p0007);SQRT(p0007*EXP(p0517^2*p0008)-p0007))
- p1633: 0
- p2459: 7.29862e-5; = p2263*p1073
- p2674: 8.4256e-5; = p2283*(p1019+p1021)
- p3357: 0; = if(p1232=0;p3307+p3318+p3329+p3340+p3351;0)
- p1099: 0.624059
- p3066: 0; = p2285*p1023
- p2392: 0.000126562; = p2233*p2221
- p0863: 0; = p0675*1000/p0856
- p4716: 5.15056e-6; = p1955*p3481
- p0742: 92.438; = p0082*(1+p0610*p0214/100)
- p3081: 0.00014951; = p2300*p1082
- p2597: 0; = p2401*p1014
- p3044: 6.33801e-6; = p2263*p1082
- p3051: 1.34573e-6; = p2270*p1082
- p2259: 0.00123225; = p2226*p2205
- p1766: 0
- p2706: 0.000250541; = p2315*(p1019+p1021)
- p0047: 7.046
- p1323: 0; = IF(((p0745*1000*p0750/100)+(p0754*1000*p0759/100))/p0801<0;0;((p0745*1000*p0750/100)+(p0754*1000*p0759/100))/p0801)
- p3499: 3.00078e-6; = p1768*p3476
- p2812: 0; = p2421*(p1078+p1080)
- p0195: 0
- p1635: 0
- p1778: 0
- p0520: 0; = SQRT(2)*(IF((2*p0388-1)<0;-1;IF((2*p0388-1)>0;1;0))*SQRT(SQRT((2/(pi()*0.140012289)+LN(1-(2*p0388-1)^2)/2)^2-LN(1-(2*p0388-1)^2)/0.140012289)-(2/(pi()*0.140012289)+LN(1-(2*p0388-1)^2)/2)))
- p3998: 4.32362e-6; = p1855*p3478
- p3419: 0; = p3362*p1239
- p2656: 0.000952031; = p2265*(p1078+p1080)
- p2009: 0.0336179; = ((p1983*p1985+p1989*p1991+p1995*p1997+p2003*p2005+p1976*p1977+p1978*p1979+p1998*p1999)/p0818)*p0005*p0002/1000
- p2039: 7.67857e-7; = p2015*p2037*p2038/(p0818*1000)
- p2784: 0; = p2393*(p1019+p1021)
- p1616: 0
- p2698: 0.000179308; = p2307*(p1078+p1080)
- p2967: 2.18384e-6; = p2381*(p1079+p1081)
- p0381: 0.5
- p0815: 0
- p2102: 0.922577
- p0914: 2.01358e7; = p0825*p0911+(p0830+p0895)*p0824*p0913
- p5282: 8.63112e-6; = p1903*p3484
- p3620: 6.68355e-6; = p1889*p3476
- p1853: 0
- p1613: 0
- p1280: 0; = IF(p1277=p1263;0;IF(p1277+p1278>p1263;p1263-p1277;p1278))
- p3361: 0; = if(p1232=0;p3311+p3322+p3333+p3344+p3355;0)
- p3212: 0; = p2431*p1132
- p3418: 0; = p3380*p1238
- p3271: 0
- p3432: 0; = p3375*p1239
- p3355: 0; = if(and(p1232=0;p3256<>0);p3256-(p3350+p3351+p3352+p3353+p3354);0)
- p0554: 0; = IF(p0290<0.5;-SQRT(p0007*EXP(p0422^2*p0008)-p0007);SQRT(p0007*EXP(p0422^2*p0008)-p0007))
- p1920: 0
- p5171: 6.68216e-6; = p1792*p3484
- p2319: 7.15838e-5; = p2224*p2186
- p0581: 0; = IF(p0317<0.5;-SQRT(p0007*EXP(p0449^2*p0008)-p0007);SQRT(p0007*EXP(p0449^2*p0008)-p0007))
- p2399: 0; = p2234*p2188
- p3174: 0; = p2393*p1023
- p2788: 0; = p2397*(p1019+p1021)
- p0991: 102486; = p0987*p0886
- p2270: 5.76823e-5; = p2226*p2216
- p1056: 4.9616e6; = IF(p1012=0;p1049*p1036;0)
- p2619: 0; = p2423*p1073
- p0522: 0; = SQRT(2)*(IF((2*p0390-1)<0;-1;IF((2*p0390-1)>0;1;0))*SQRT(SQRT((2/(pi()*0.140012289)+LN(1-(2*p0390-1)^2)/2)^2-LN(1-(2*p0390-1)^2)/0.140012289)-(2/(pi()*0.140012289)+LN(1-(2*p0390-1)^2)/2)))
- p2605: 0; = p2409*p1014
- p2202: 0.000330325; = 4*1.00794*p2201/(2*14.0067)
- p2653: 0.000372341; = p2262*(p1078+p1080)
- p2047: 2.7022e-14; = p2015*p2045/(p0818*1000000000000)
- p2264: 0.000117297; = p2226*p2210
- p4831: 5.8323e-8; = p1864*p3482
- p3117: 0; = p2336*p1082
- p1910: 0
- p2660: 0.000349823; = p2269*(p1078+p1080)
- p1060: 0.21
- p0719: 10.894; = p0059*(1+p0587*p0191/100)
- p1557: 0
- p1288: 0
- p2690: 0.000478375; = p2299*(p1078+p1080)
- p1784: 0
- p1849: 0
- p2892: 2.27717e-5; = p2306*(p1079+p1081)
- p2372: 0.00102426; = p2225*p2201
- p4895: 7.7764e-8; = p1928*p3482
- p3058: 0; = p2277*p1023
- p0088: 29.564
- p1249: 0; = if(p1232>0;0;p1244*p0001/(p0818*p0002))
- p2145: 2.99892e-7; = p2015*p2073*p2107/(p0818*1000)
- p1093: 0; = IF(p1071=0;p1087*p0001/(p0818*p0002);0)
- p1108: 168148; = IF(p1071=0;p1105*p1102*p1095;0)
- p2413: 0; = p2234*p2203
- p3384: 0; = p3365*p1234
- p2310: 0.000999968; = p2227*p2217
- p2726: 9.61298e-5; = p2335*(p1019+p1021)
- p1044: 0.00785902; = IF(p1012=0;IF(p1037=1;0;IF(p1037+p1038>1;1-p1037;p1038));0)
- p0959: 1.39353e-5; = if(and(p0683>0;or(p0807=480;p0807=32;p0807=1;and(p0807=60;p0901<0.03)));p0935;0)
- p4513: 0; = p1962*p3480
- p1156: 0.112422; = p1064+p1065+p1066+p1067+p1068+p1069+p1070+p1116+p1117+p1118+p1119+p1120+p1154+p1155
- p4312: 0; = p1757*p3480
- p0176: 1.978
- p0990: 0; = p0986*p0886
- p0251: 9.307
- p3318: 0; = if(and(p1232=0;p3253<>0);p3253*(p3262-p3313)/p3316;0)
- p2068: 0.153529
- p0636: 0; = IF(p0372<0.5;-SQRT(p0007*EXP(p0504^2*p0008)-p0007);SQRT(p0007*EXP(p0504^2*p0008)-p0007))
- p2634: 0.000424192; = p2243*(p1019+p1021)
- p4032: 1.41238e-5; = p1889*p3478
- p0715: 0
- p1774: 0
- p2807: 0; = p2416*(p1078+p1080)
- p0375: 0.5
- p1092: 0; = IF(p1071=0;p1086*p0001/(p0818*p0002);0)
- p1726: 0
- p0291: 0.5
- p3019: 0; = p2238*p1023
- p3035: 0; = p2254*p1023
- p1250: 0; = if(p1232>0;0;p1245*p0001/(p0818*p0002))
- p3425: 0; = p3368*p1239
- p0774: 45.917; = p0114*(1+p0642*p0246/100)
- p2745: 0.00249907; = p2354*(p1019+p1021)
- p4386: 0; = p1831*p3480
- p0747: 0
- p3091: 2.33292e-5; = p2310*p1082
- p5128: 2.17208e-6; = p1955*p3483
- p2032: 0.448886
- p1191: 0.5
- p2889: 2.00157e-5; = p2303*(p1079+p1081)
- p1963g: 2.60042e-5; = p1667*p1871+p1668*p1872+p1669*p1873+p1670*p1874+p1671*p1875+p1672*p1876+p1673*p1877+p1674*p1878+p1675*p1879+p1676*p1880+p1677*p1881+p1678*p1882+p1679*p1883+p1680*p1884+p1681*p1885+p1682*p1886+p1683*p1887+p1684*p1888+p1685*p1889
- p4927: 3.10297e-7; = p1754*p3483
- p2618: 0; = p2422*p1073
- p1669: 0
- p1758: 0
- p2223: 0.255195; = if(p0765*p0769+p0766*p0770+p0767*p0771+p0768*p0772=0;0;p0770*p0766/(p0765*p0769+p0766*p0770+p0767*p0771+p0768*p0772))
- p3277: 0
- p0755: 0
- p3450: 0; = p3374*p1240
- p0943: 0; = if(and(p0683=0;p0949=0);p0937;0)
- p3202: 0; = p2421*p1082
- p1989: 50
- p2389: 0.000745574; = p2233*p2218
- p3023: 0; = p2242*p1023
- p2079: 0.02
- p0519: 0; = SQRT(2)*(IF((2*p0387-1)<0;-1;IF((2*p0387-1)>0;1;0))*SQRT(SQRT((2/(pi()*0.140012289)+LN(1-(2*p0387-1)^2)/2)^2-LN(1-(2*p0387-1)^2)/0.140012289)-(2/(pi()*0.140012289)+LN(1-(2*p0387-1)^2)/2)))
- p1147: 0.0889917
- p2670: 0.0001001; = p2279*(p1019+p1021)
- p0789: 0
- p4903: 6.22112e-7; = p1936*p3482
- p0794: 0
- p4881: 2.52733e-7; = p1914*p3482
- p2063: 2.01468
- p0515: 0; = SQRT(2)*(IF((2*p0383-1)<0;-1;IF((2*p0383-1)>0;1;0))*SQRT(SQRT((2/(pi()*0.140012289)+LN(1-(2*p0383-1)^2)/2)^2-LN(1-(2*p0383-1)^2)/0.140012289)-(2/(pi()*0.140012289)+LN(1-(2*p0383-1)^2)/2)))
- p2180: 5.9014e-8; = p3233*p1188/(p0818)
- p0693: 0
- p1208: 113.346; = p1205*p0818*p0822/p0801
- p0751: 12.578; = p0091*(1+p0619*p0223/100)
- p2785: 0; = p2394*(p1019+p1021)
- p1111: 0.0872841
- p2576: 1.54031e-5; = p2380*p1073
- p3195: 0; = p2414*p1082
- p1331: 0; = p1330*p0001/(p0818*p0002)
- p2059: 1.00168
- p3416: 0; = p3378*p1238
- p0939: 0; = p0933*p0001/(p0818*p0002)
- p3040: 2.87483e-5; = p2259*p1082
- p1086: 0; = IF(p1071=0;p1080*(p0710/100)*p0703*1000;0)
- p2623: 0; = p2427*p1073
- p3686: 5.72876e-6; = p1955*p3476
- p1681: 0
- p2287: 0.00202072; = p2223*p2193
- p3466: 0; = p3371*p1241
- p1582: 0
- p1771: 0
- p1796: 0
- p2238: 0.000549854; = p2222*p2183
- p1609: 0
- p1696: 0
- p3389: 0; = p3370*p1234
- p0725: 0
- p1675: 0
- p3687: 9.54793e-7; = p1956*p3476
- p0045: 25.663
- p1058: 0.225
- p0816: 0
- p2326: 0.000354267; = p2224*p2193
- p2937: 0; = p2351*(p1129+p1131)
- p3126: 0; = p2345*p1082
- p0923: 0.0402111; = IF(p0918=1;0;IF(p0918+p0919>1;1-p0918;p0919))
- p2345: 0; = p2228*p2213
- p3249: 0
- p3203: 0; = p2422*p1082
- p1592: 0
- p2608: 0; = p2412*p1014
- p2624: 0; = p2428*p1123
- p1665: 0
- p1848: 0
- p0762: 49.724; = p0102*(1+p0630*p0234/100)
- p1988: 750
- p3443: 0; = p3367*p1240
- p2818: 0; = p2427*(p1078+p1080)
- p1067: 0.00277099; = IF(p1012=0;p1053/(p1060*p0818);0)
- p2743: 0; = p2352*(p1128+p1130)
- p1167: 0.5
- p2381: 2.47545e-5; = p2229*p2210
- p0500: 0; = SQRT(2)*(IF((2*p0368-1)<0;-1;IF((2*p0368-1)>0;1;0))*SQRT(SQRT((2/(pi()*0.140012289)+LN(1-(2*p0368-1)^2)/2)^2-LN(1-(2*p0368-1)^2)/0.140012289)-(2/(pi()*0.140012289)+LN(1-(2*p0368-1)^2)/2)))
- p2655: 7.26997e-5; = p2264*(p1078+p1080)
- p1088: 6934.45; = IF(p1071=0;p1082*(p0710/100)*p0703*1000;0)
- p0244: 20.764
- p0666: 0; = IF(p0402<0.5;-SQRT(p0007*EXP(p0534^2*p0008)-p0007);SQRT(p0007*EXP(p0534^2*p0008)-p0007))
- p0370: 0.5
- p1722: 0
- p4307: 2.83446e-5; = p1962*p3479
- p0546: 0; = IF(p0282<0.5;-SQRT(p0007*EXP(p0414^2*p0008)-p0007);SQRT(p0007*EXP(p0414^2*p0008)-p0007))
- p2714: 1.6908e-5; = p2323*(p1019+p1021)
- p0637: 0; = IF(p0373<0.5;-SQRT(p0007*EXP(p0505^2*p0008)-p0007);SQRT(p0007*EXP(p0505^2*p0008)-p0007))
- p2596: 0; = p2400*p1014
- p1566: 0
- p2051: 2.20341e-5; = p2015*p2049*p2050/(p0818*1000)
- p2316: 9.6931e-5; = p2224*p2183
- p0886: 3.94513e6; = p0686*1000*p0687*p0689/100
- p2948: 5.23124e-5; = p2362*(p1020+p1022)
- p0741: 0.973; = p0081*(1+p0609*p0213/100)
- p1819: 0
- p2195: 0.00169738; = p2194*p2193
- p1556: 0
- p2241: 0.000406068; = p2222*p2186
- p1338: 95430.4; = p1324*p0801
- p1096: 0.00584539
- p0122: 73.749
- p0883: 0.100982; = p0882*p0001*p0003/(p0818*p0002)
- p2794: 0; = p2403*(p1019+p1021)
- p0917: 1.25148
- p1647: 0
- p2393: 0; = p2234*p2182
- p1995: 50
- p1657: 0
- p3053: 5.45437e-5; = p2272*p1132
- p0083: 0.987
- p1891: 0
- p2862: 0.000443269; = p2276*(p1020+p1022)
- p2686: 4.78287e-5; = p2295*(p1019+p1021)
- p0927: 0; = IF(p0918+p0923+p0924+p0925+p0926=1;0;1-(p0918+p0923+p0924+p0925+p0926))
- p2119: 0.679049
- p2944: 0.000125661; = p2358*(p1020+p1022)
- p2448: 1.55022e-6; = p2252*p1014
- p1874: 0
- p2457: 0.000890108; = p2261*p1073
- p2495: 0.000207361; = p2299*p1073
- p2446: 0.00109282; = p2250*p1014
- p2988: 0; = p2402*(p1020+p1022)
- p0924: 0.0256944; = IF(p0918+p0923=1;0;IF(p0918+p0923+p0920>1;1-(p0918+p0923);p0920))
- p1064: 0.0120363; = IF(p1012=0;p1050/(p1057*p0818);0)
- p2645: 0.00077089; = p2254*(p1019+p1021)
- p1340: 15128.7; = p1325*p0801
- p0299: 0.5
- p2809: 0; = p2418*(p1078+p1080)
- p1061: 0.3
- p2833: 6.05444e-5; = p2247*(p1020+p1022)
- p2905: 1.2598e-5; = p2319*(p1020+p1022)
- p1843: 0
- p3690: 4.67271e-5; = p1963*p3476
- p2755: 0.000343222; = p2364*(p1019+p1021)
- p1029: 0; = IF(p1012=0;IF(p0801<p1023*(p0704/100)*p0703*1000;p0801;p1023*(p0704/100)*p0703*1000);0)
- p3254: 0; = p1252*(p1287*(1-p3247)+p1290*(1-p3248)+p1291*(1-p3249)+p1292*(1-p3250))
- p0925: 0.0682944; = IF(p0918+p0923+p0924=1;0;IF(p0918+p0923+p0924+p0921>1;1-(p0918+p0923+p0924);p0921))
- p5307: 2.78423e-7; = p1928*p3484
- p1573: 0
- p1559: 0
- p2282: 0.00075176; = p2223*p2188
- p2953: 0.00131778; = p2367*(p1020+p1022)
- p3275: 0
- p0430: 0; = SQRT(2)*(IF((2*p0298-1)<0;-1;IF((2*p0298-1)>0;1;0))*SQRT(SQRT((2/(pi()*0.140012289)+LN(1-(2*p0298-1)^2)/2)^2-LN(1-(2*p0298-1)^2)/0.140012289)-(2/(pi()*0.140012289)+LN(1-(2*p0298-1)^2)/2)))
- p2741: 0; = p2350*(p1128+p1130)
- p0771: 6.745; = p0111*(1+p0639*p0243/100)
- p1121: 0
- p0056: 73.749
- p1139: 6.49417e-5; = if(p1121=0;p1133*p0001/(p0818*p0002);0)
- p3289: 0
- p1275: 0; = p1271*p1252/p0818
- p1690: 0
- p1977: 90.5623; = p1252+p1188
- p4350: 0; = p1795*p3480
- p1666: 0
- p3481: 0.113656; = if(p1328+p1330+p1332+p1334+p1336+p1338+p1340+p1342+p1344=0;0;p1338/(p1328+p1330+p1332+p1334+p1336+p1338+p1340+p1342+p1344))
- p2052: 1.10947e-6; = p2015*p2049*(1-p2050)/(p0818*1000)
- p3224: 0.501945; = IF(p3216=0;0;1-p3221-p3222-p3223)
- p5132: 1.77167e-5; = p1963*p3483
- p2387: 1.21733e-5; = p2229*p2216
- p0986: 0; = IF(p0982+p0985=1;0;IF(p0982+p0985+p0984>1;1-(p0982+p0985);p0984))
- p2354: 0.00440457; = p2225*p2182
- p5129: 3.62013e-7; = p1956*p3483
- p5087: 6.7231e-7; = p1914*p3483
- p0727: 0
- p0616: 0; = IF(p0352<0.5;-SQRT(p0007*EXP(p0484^2*p0008)-p0007);SQRT(p0007*EXP(p0484^2*p0008)-p0007))
- p2404: 0; = p2234*p2193
- p1157: 0.222821
- p2763: 0.000581145; = p2372*(p1019+p1021)
- p0541: 0; = IF(p0277<0.5;-SQRT(p0007*EXP(p0409^2*p0008)-p0007);SQRT(p0007*EXP(p0409^2*p0008)-p0007))
- p0895: 2.35987e8; = p0894*p0830
- p2900: 9.85907e-5; = p2314*(p1129+p1131)
- p2432: 0.0250499; = p1158
- p1171: 0.000346553; = p0801*p0001/(p0818*p0002)
- p3041: 9.30943e-6; = p2260*p1082
- p1772: 0
- p3438: 0; = p3362*p1240
- p1932: 0
- p2342: 0; = p2228*p2210
- p1834: 0
- p1155: 0.00213827; = if(p1153*p0818=0;0;p1151/(p1153*p0818))
- p4689: 4.90529e-7; = p1928*p3481
- p2254: 0.00135868; = p2222*p2200
- p0952: 0; = if(and(p0683>0;or(p0807=56;p0807=100;and(p0807=60;p0901>0.06)));p0934;0)
- p2640: 0.00024442; = p2249*(p1019+p1021)
- p3396: 0; = p3377*p1234
- p1009: 1.56915e-8; = p1005*p0001*p0004/(p0818*p0002)
- p0009: 12.5442
- p2007: 0.040423; = ((p1981*p1985+p1987*p1991+p1993*p1997+p2001*p2005)/p0818)*p0005*p0002/1000
- p4304: 1.64197e-5; = p1955*p3479
- p4625: 3.67897e-7; = p1864*p3481
- p0419: 0; = SQRT(2)*(IF((2*p0287-1)<0;-1;IF((2*p0287-1)>0;1;0))*SQRT(SQRT((2/(pi()*0.140012289)+LN(1-(2*p0287-1)^2)/2)^2-LN(1-(2*p0287-1)^2)/0.140012289)-(2/(pi()*0.140012289)+LN(1-(2*p0287-1)^2)/2)))
- p3176: 0; = p2395*p1023
- p2583: 3.27048e-6; = p2387*p1073
- p3024: 0; = p2243*p1023
- p0298: 0.5
- p1876: 0
- p1824: 0
- p3873: 0; = p1936*p3477
- p3022: 0; = p2241*p1023
- p0678: 14.476; = p0018*(1+p0546*p0150/100)
- p1158: 0.0250499; = p1156*p1157
- p3099: 0; = p2318*p1023
- p3374: 0; = if(p1232=0;p3246*p3356/p0818;0)
- p2733: 0; = p2342*(p1078+p1080)
- p1277: 0
- p0905: 0.0669044; = p0904/p0818
- p2570: 0.000433702; = p2374*p1014
- p0236: 1.978
- p2613: 0; = p2417*p1073
- p1074: 0.61979; = IF(p1071=0;p0712/100;0)
- p0258: 33.953
- p2112: 0.856281
- p2201: 0.00229516; = 12.01*p2200/(2*14.0067)
- p1293: 0; = p1287*p1252/p0818
- p2550: 0.00113035; = p2354*p1014
- p5300: 6.96058e-8; = p1921*p3484
- p3366: 0; = if(p1232=0;p3244*p3360/p0818;0)
- p2454: 0.00036604; = p2258*p1073
- p0716: 73.749; = p0056*(1+p0584*p0188/100)
- p3356: 0; = if(p1232=0;p3306+p3317+p3328+p3339+p3350;0)
- p3190: 0; = p2409*p1023
- p1894: 0
- p2598: 0; = p2402*p1014
- p2804: 0; = p2413*(p1019+p1021)
- p0190: 14.913
- p1235: 0; = if(p1232>0;0;p0727/100)
- p2860: 2.04166e-5; = p2274*(p1129+p1131)
- p1163: 0.00486145
- p3132: 0; = p2351*p1132
- p1261: 0; = if(p1232>0;0;p0732/100)
- p2322: 2.60347e-5; = p2224*p2189
- p4099: 2.01769e-6; = p1956*p3478
- p1957: 0
- p2359: 0.000102764; = p2225*p2187
- p2323: 2.98001e-5; = p2224*p2190
- p2966: 5.05791e-6; = p2380*(p1079+p1081)
- p2357: 0.00030852; = p2225*p2185
- p1318: 0; = p1317*p0001/(p0818*p0002)
- p2573: 2.26244e-5; = p2377*p1073
- p2790: 0; = p2399*(p1019+p1021)
- p0842: -0.469763
- p2679: 0.000245769; = p2288*(p1019+p1021)
- p1119: 0.0198371; = IF(p1071=0;p1109/(p1114*p0818);0)
- p0965: 0; = IF(p0684/100=1;0;IF(p0684/100+p0685/100>1;1-p0684/100;p0685/100))
- p3421: 0; = p3364*p1239
- p3067: 0; = p2286*p1023
- p3221: 0.146975; = IF(p3216=0;0;p1223*12.0107/100.0869+(1-p1224)*12.0107/84.3139)
- p3461: 0; = p3366*p1241
- p1642: 0
- p0677: 0
- p2920: 2.60093e-6; = p2334*(p1020+p1022)
- p1845: 0
- p0708: 15.804; = p0048*(1+p0576*p0180/100)
- p0179: 31.912
- p1025: 134338; = IF(p1012=0;p1019*(p0704/100)*p0703*1000;0)
- p2549: 0; = p2353*p1123
- p1325: 0.042024; = IF(((p0745*1000*p0752/100)+(p0754*1000*p0761/100))/p0801<0;0;((p0745*1000*p0752/100)+(p0754*1000*p0761/100))/p0801)
- p0226: 34.337
- p1805: 0
- p2029: 6.16
- p4252: 4.84772e-5; = p1903*p3479
- p0848: 0
- p1651: 0.299611
- p2813: 0; = p2422*(p1078+p1080)
- p3064: 0; = p2283*p1023
- p0729: 0
- p0658: 0; = IF(p0394<0.5;-SQRT(p0007*EXP(p0526^2*p0008)-p0007);SQRT(p0007*EXP(p0526^2*p0008)-p0007))
- p5243: 2.08817e-7; = p1864*p3484
- p0103: 360.847
- p2551: 0.000248125; = p2355*p1014
- p0137: 49.062
- p1955: 4.53172e-5; = p1547*1000/p0818
- p2479: 3.81096e-5; = p2283*p1014
- p0617: 0; = IF(p0353<0.5;-SQRT(p0007*EXP(p0485^2*p0008)-p0007);SQRT(p0007*EXP(p0485^2*p0008)-p0007))
- p1588: 0.587329
- p3401: 0; = p3363*p1238
- p2114: 0.832356
- p3113: 0; = p2332*p1023
- p2058: 1.24412
- p1680: 0
- p1811: 0
- p2351: 0; = p2232*p2219
- p3281: 0
- p3451: 0; = p3375*p1240
- p0739: 1.602; = p0079*(1+p0607*p0211/100)
- p0814: 0; = if(p0807=480;p0810*p0812+p0811*p0813;0)
- p2587: 1.84627e-5; = p2391*p1123
- p2816: 0; = p2425*(p1078+p1080)
- p2252: 6.04069e-6; = p2222*p2198
- p2702: 0.00324748; = p2311*(p1128+p1130)
- p1244: 0; = if(p1232>0;0;p1239*(p0725/100)*p0723*1000)
- p2546: 0; = p2350*p1123
- p5131: 3.74956e-6; = p1962*p3483
- p2127: 2.01579e-6; = p2015*p2055*p2089/(p0818*1000)
- p0006: 15
- p1193: 0; = IF(OR(p1036=0;p1095=0);0.0001*p0857;0)
- p3069: 0; = p2288*p1023
- p2593: 0; = p2397*p1014
- p2080: 0.025
- p1821: 0
- p0079: 1.602
- p0524: 0; = SQRT(2)*(IF((2*p0392-1)<0;-1;IF((2*p0392-1)>0;1;0))*SQRT(SQRT((2/(pi()*0.140012289)+LN(1-(2*p0392-1)^2)/2)^2-LN(1-(2*p0392-1)^2)/0.140012289)-(2/(pi()*0.140012289)+LN(1-(2*p0392-1)^2)/2)))
- p1570: 0
- p2606: 0; = p2410*p1014
- p2328: 0.000750682; = p2224*p2196
- p2677: 0.000196268; = p2286*(p1019+p1021)
- p2899: 5.67351e-5; = p2313*(p1129+p1131)
- p2273: 0.00270361; = p2230*p2219
- p1877: 0
- p3014: 0; = p2428*(p1129+p1131)
- p2360: 0.00131463; = p2225*p2188
- p3485: 8.18394e-7; = p1754*p3476
- p0394: 0.5
- p2622: 0; = p2426*p1073
- p3150: 0; = p2369*p1023
- p0221: 12.734
- p3269: 0
- p1326: 0.111791; = IF(((p0745*1000*p0753/100)+(p0754*1000*p0762/100))/p0801<0;0;((p0745*1000*p0753/100)+(p0754*1000*p0762/100))/p0801)
- p1939: 0
- p0750: 0
- p3193: 0; = p2412*p1023
- p0167: 4.728
- p3378: 0; = if(p1232=0;p3246*p3360/p0818;0)
- p0556: 0; = IF(p0292<0.5;-SQRT(p0007*EXP(p0424^2*p0008)-p0007);SQRT(p0007*EXP(p0424^2*p0008)-p0007))
- p2585: 0.000189003; = p2389*p1123
- p0757: 0
- p0536: 0; = SQRT(2)*(IF((2*p0404-1)<0;-1;IF((2*p0404-1)>0;1;0))*SQRT(SQRT((2/(pi()*0.140012289)+LN(1-(2*p0404-1)^2)/2)^2-LN(1-(2*p0404-1)^2)/0.140012289)-(2/(pi()*0.140012289)+LN(1-(2*p0404-1)^2)/2)))
- p2309: 0.000111573; = p2227*p2216
- p0761: 0
- p2952: 0.000133311; = p2366*(p1020+p1022)
- p2240: 0.000175456; = p2222*p2185
- p0881: 0; = p0880*p0001*p0003/(p0818*p0002)
- p1973: 0; = if(p0807=480;p1968*p0001/(p0818*p0002);0)
- p1725: 0
- p0956: 0; = if(and(p0683>0;or(p0807=56;p0807=100;and(p0807=60;p0901>0.06)));p0938;0)
- p2440: 3.79004e-5; = p2244*p1014
- p3395: 0; = p3376*p1234
- p2901: 7.77127e-5; = p2315*(p1020+p1022)
- p0355: 0.5
- p0640: 0; = IF(p0376<0.5;-SQRT(p0007*EXP(p0508^2*p0008)-p0007);SQRT(p0007*EXP(p0508^2*p0008)-p0007))
- p1153: 0.365265
- p1941: 0
- p1578: 0
- p2852: 1.12585e-6; = p2266*(p1079+p1081)
- p1176: 56.0892; = p1175*p0801
- p0731: 0
- p2965: 1.11848e-5; = p2379*(p1079+p1081)
- p0576: 0; = IF(p0312<0.5;-SQRT(p0007*EXP(p0444^2*p0008)-p0007);SQRT(p0007*EXP(p0444^2*p0008)-p0007))
- p2962: 2.29419e-5; = p2376*(p1079+p1081)
- p1256: 0; = if(p1232>0;0;IF(p1253=1;0;IF(p1253+p1254>1;1-p1253;p1254)))
- p1561: 0
- p2225: 0.44627; = if(p0765*p0769+p0766*p0770+p0767*p0771+p0768*p0772=0;0;p0772*p0768/(p0765*p0769+p0766*p0770+p0767*p0771+p0768*p0772))
- p4592: 4.1695e-6; = p1831*p3481
- p2628: 0.00142122; = p2237*(p1019+p1021)
- p3200: 0; = p2419*p1082
- p2383: 2.69326e-6; = p2229*p2212
- p2744: 0; = p2353*(p1128+p1130)
- p2893: 2.55224e-5; = p2307*(p1079+p1081)
- p1966: 280000; = if(p0814=0;p0802;0)
- p2213: 0.000419735; = p1116-p2212
- p3406: 0; = p3368*p1238
- p1869: 0
- p3484: 0.0645107; = IF(p1344=0;0;p1344/(p1328+p1330+p1332+p1334+p1336+p1338+p1340+p1342+p1344))
- p0277: 0.5
- p2802: 0; = p2411*(p1019+p1021)
- p0850: 0
- p2793: 0; = p2402*(p1019+p1021)
- p2616: 0; = p2420*p1073
- p2018: 0.1978
- p3076: 0; = p2295*p1023
- p0246: 8.655
- p2427: 0; = p2235*p2217
- p2402: 0; = p2234*p2191
- p0177: 30.124
- p1042: 0.000567816
- p1387: 5
- p0353: 0.5
- p3006: 0; = p2420*(p1079+p1081)
- p2621: 0; = p2425*p1073
- p3315: 0; = if(and(p1232=0;p3253<>0);p3264*p3289;0)
- p3220: 0.00656441; = p3216*p1228
- p3012: 0; = p2426*(p1079+p1081)
- p1830: 0
- p0448: 0; = SQRT(2)*(IF((2*p0316-1)<0;-1;IF((2*p0316-1)>0;1;0))*SQRT(SQRT((2/(pi()*0.140012289)+LN(1-(2*p0316-1)^2)/2)^2-LN(1-(2*p0316-1)^2)/0.140012289)-(2/(pi()*0.140012289)+LN(1-(2*p0316-1)^2)/2)))
- p2983: 0; = p2397*(p1020+p1022)
- p2129: 1.11012e-6; = p2015*p2057*p2091/(p0818*1000)
- p1203: 3
- p1506: 13
- p2475: 4.52757e-5; = p2279*p1014
- p2053: 1.45647
- p3320: 0; = if(and(p1232=0;p3253<>0);p3253*(p3264-p3315)/p3316;0)
- p2506: 0.000268651; = p2310*p1073
- p3287: 0
- p5210: 2.3666e-6; = p1831*p3484
- p1980: 3521.6
- p0718: 60.913; = p0058*(1+p0586*p0190/100)
- p0709: 10.553; = p0049*(1+p0577*p0181/100)
- p5315: 2.22739e-6; = p1936*p3484
- p2769: 0.000433362; = p2378*(p1078+p1080)
- p1629: 0
- p1170: 223.843; = p1169*p0801
- p2923: 0; = p2337*(p1079+p1081)
- p0441: 0; = SQRT(2)*(IF((2*p0309-1)<0;-1;IF((2*p0309-1)>0;1;0))*SQRT(SQRT((2/(pi()*0.140012289)+LN(1-(2*p0309-1)^2)/2)^2-LN(1-(2*p0309-1)^2)/0.140012289)-(2/(pi()*0.140012289)+LN(1-(2*p0309-1)^2)/2)))
- p2301: 0.00116201; = p2227*p2208
- p2237: 0.00250489; = p2222*p2182
- p0218: 20.052
- p2266: 1.27618e-5; = p2226*p2212
- p3460: 0; = p3365*p1241
- p2462: 3.42859e-6; = p2266*p1073
- p1960: 72.5028; = IF(p1959-p1958<0;0;p1959-p1958)
- p3288: 0
- p1660: 0.731714
- p1234: 0; = if(p1232>0;0;p0726/100)
- p0759: 0
- p1198: 0.44
- p1116: 0.000459875; = IF(p1071=0;p1106/(p1111*p0818);0)
- p5334: 2.92344e-6; = p1955*p3484
- p1241: 0; = if(p1232>0;0;IF(p1234+p1238+p1239+p1240=1;0;1-(p1234+p1238+p1239+p1240)))
- p0913: 0.0119672
- p0680: 311.688; = p0020*(1+p0548*p0152/100)
- p0255: 12.044
- p0862: 0.348278; = p0674*1000/p0856
- p0620: 0; = IF(p0356<0.5;-SQRT(p0007*EXP(p0488^2*p0008)-p0007);SQRT(p0007*EXP(p0488^2*p0008)-p0007))
- p0995: 2.5059e-6; = p0991*p0001*p0004/(p0818*p0002)
- p1662: 0
- p0967: 0
- p2083: 2.17294
- p2464: 4.01829e-5; = p2268*p1073
- p1065: 0.000892039; = IF(p1012=0;p1051/(p1058*p0818);0)
- p5337: 5.04661e-6; = p1962*p3484
- p1692: 0
- p2774: 1.66926e-6; = p2383*(p1078+p1080)
- p2054: 0.91
- p2494: 0.000640347; = p2298*p1073
- p3291: 0
- p3349: 0; = if(and(p1232=0;p3256<>0);1-(p3345+p3346+p3347+p3348);0)
- p0189: 35.446
- p2801: 0; = p2410*(p1019+p1021)

- p0478: 0; = SQRT(2)*(IF((2*p0346-1)<0;-1;IF((2*p0346-1)>0;1;0))*SQRT(SQRT((2/(pi()*0.140012289)+LN(1-(2*p0346-1)^2)/2)^2-LN(1-(2*p0346-1)^2)/0.140012289)-(2/(pi()*0.140012289)+LN(1-(2*p0346-1)^2)/2)))
- p0115: 50.566
- p0383: 0.5
- p1282: 0; = IF(p1277+p1280+p1281=p1260;0;p1260-(p1277+p1280+p1281))
- p2028: 2.46803e-5; = p2015*p2026*p2027/(p0818*1000)
- p2132: 2.26324e-7; = p2015*p2060*p2094/(p0818*1000)
- p1909: 0
- p2144: 1.03352e-7; = p2015*p2072*p2106/(p0818*1000)
- p3011: 0; = p2425*(p1079+p1081)
- p0942: 0; = if(and(p0683=0;p0948=0);p0936;0)
- p2853: 1.17728e-5; = p2267*(p1079+p1081)
- p0754: 80.936; = p0094*(1+p0622*p0226/100)
- p2123: 0.263965
- p5133: 4.17635e-7; = p1754*p3484
- p2538: 0; = p2342*p1073
- p2960: 0.000297421; = p2374*(p1020+p1022)
- p4270: 3.90945e-7; = p1921*p3479
- p2263: 0.000271668; = p2226*p2209
- p3144: 0; = p2363*p1023
- p5152: 3.48029e-7; = p1773*p3484
- p2891: 2.17769e-6; = p2305*(p1079+p1081)
- p0475: 0; = SQRT(2)*(IF((2*p0343-1)<0;-1;IF((2*p0343-1)>0;1;0))*SQRT(SQRT((2/(pi()*0.140012289)+LN(1-(2*p0343-1)^2)/2)^2-LN(1-(2*p0343-1)^2)/0.140012289)-(2/(pi()*0.140012289)+LN(1-(2*p0343-1)^2)/2)))
- p2224: 0.0447402; = if(p0765*p0769+p0766*p0770+p0767*p0771+p0768*p0772=0;0;p0771*p0767/(p0765*p0769+p0766*p0770+p0767*p0771+p0768*p0772))
- p1576: 0
- p2902: 1.70589e-5; = p2316*(p1020+p1022)
- p0773: 82.371; = p0113*(1+p0641*p0245/100)
- p2907: 2.31949e-5; = p2321*(p1020+p1022)
- p2884: 0.000210271; = p2298*(p1079+p1081)
- p3208: 0; = p2427*p1082
- p3163: 7.56288e-6; = p2382*p1082
- p2519: 7.64759e-6; = p2323*p1014
- p0113: 82.371
- p1655: 0
- p2835: 7.58142e-5; = p2249*(p1020+p1022)
- p1120: 0.00794432; = IF(p1071=0;p1110/(p1115*p0818);0)
- p2536: 0; = p2340*p1073
- p2302: 0.000525477; = p2227*p2209
- p0738: 360.847; = p0078*(1+p0606*p0210/100)
- p1622: 0
- p3382: 0; = p3363*p1234
- p2850: 1.0348e-5; = p2264*(p1079+p1081)
- p1152: 0.415074
- p1708: 0
- p3321: 0; = if(and(p1232=0;p3253<>0);IF((p3317+p3318+p3319+p3320)+(p3253*(p3261*(1-p3277))/p3316)>p3253;p3253-(p3317+p3318+p3319+p3320);p3253*(p3261*(1-p3277))/p3316);0)
- p0797: 49.062; = p0137*(1+p0665*p0269/100)
- p0868: 0; = IF(p0858+p0864+p0865+p0866+p0867=1;0;IF(p0858+p0864+p0865+p0866+p0867+p0863>1;1-(p0858+p0864+p0865+p0866+p0867);p0863))
- p0607: 0; = IF(p0343<0.5;-SQRT(p0007*EXP(p0475^2*p0008)-p0007);SQRT(p0007*EXP(p0475^2*p0008)-p0007))
- p1220: 0; = IF(p1218<0.5;-SQRT(p1214*EXP(p1219^2*p1215)-p1214);SQRT(p1214*EXP(p1219^2*p1215)-p1214))
- p3192: 0; = p2411*p1023
- p0689: 96.208; = p0029*(1+p0557*p0161/100)
- p0800: 73.749; = p0140*(1+p0668*p0272/100)
- p1151: 723863; = if(p1121=0;p1149*p1148*p1145;0)
- p2832: 7.4814e-6; = p2246*(p1020+p1022)
- p5136: 9.04875e-7; = p1757*p3484
- p2033: 2.58234e-6; = p2015*p2029*p2031/(p0818*1000)
- p3129: 0; = p2348*p1082
- p3458: 0; = p3363*p1241
- p1215: 0.277778; = IF(p1214=0;0;(p1214-1.5)/(p1214-1)^2)
- p0880: 0; = p0868*p0856
- p1749: 0
- p1947: 0
- p3468: 0; = p3373*p1241
- p0425: 0; = SQRT(2)*(IF((2*p0293-1)<0;-1;IF((2*p0293-1)>0;1;0))*SQRT(SQRT((2/(pi()*0.140012289)+LN(1-(2*p0293-1)^2)/2)^2-LN(1-(2*p0293-1)^2)/0.140012289)-(2/(pi()*0.140012289)+LN(1-(2*p0293-1)^2)/2)))
- p3013: 0; = p2427*(p1079+p1081)
- p2087: 0.856281
- p1911: 0
- p2433: 0.00064283; = p2237*p1014
- p1551: 0
- p0760: 0
- p3260: 0
- p1864: 3.23694e-6; = p1456*1000/p0818
- p1164: 1750.12; = p1163*p0801
- p1112: 0.209482
- p0002: 0.453592
- p2688: 0.00163337; = p2297*(p1078+p1080)
- p2756: 0.00200496; = p2365*(p1019+p1021)
- p0148: 0
- p3027: 0; = p2246*p1023
- p2196: 0.0167787; = p1068-p2193-p2195
- p2431: 0; = p2236*p2221
- p2977: 7.93424e-6; = p2391*(p1129+p1131)
- p3300: 0; = if(p1293+p1294+p1295+p1296=0;0;p1293/(p1293+p1294+p1295+p1296))
- p1727: 0
- p0508: 0; = SQRT(2)*(IF((2*p0376-1)<0;-1;IF((2*p0376-1)>0;1;0))*SQRT(SQRT((2/(pi()*0.140012289)+LN(1-(2*p0376-1)^2)/2)^2-LN(1-(2*p0376-1)^2)/0.140012289)-(2/(pi()*0.140012289)+LN(1-(2*p0376-1)^2)/2)))
- p0630: 0; = IF(p0366<0.5;-SQRT(p0007*EXP(p0498^2*p0008)-p0007);SQRT(p0007*EXP(p0498^2*p0008)-p0007))
- p3257: 0
- p1284: 0; = p1280*p1252/p0818
- p2163: 0.000344341; = (p2017-p2020)/p0818-(p2025+p2028+p2033+p2034+p2051+p2125+p2126+p2127+p2128+p2129+p2130+p2131+p2132+p2133+p2134+p2135+p2136+p2137+p2138+p2139+p2140+p2141+p2142+p2143+p2144+p2145+p2146+p2147+p2148+p2149+p2150+p2151+p2152+p2153+p2154+p2155+p2156+p2157)
- p3426: 0; = p3369*p1239
- p1683: 0
- p2492: 0.000248008; = p2296*p1014
- p0608: 0; = IF(p0344<0.5;-SQRT(p0007*EXP(p0476^2*p0008)-p0007);SQRT(p0007*EXP(p0476^2*p0008)-p0007))
- p2041: 0; = p2015*p2040/(p0818*1000)
- p0392: 0.5
- p1292: 0; = IF(p1287+p1290+p1291=p1261;0;p1261-(p1287+p1290+p1291))
- p2229: 0.0670971; = if(p0774*p0778+p0775*p0779+p0776*p0780+p0777*p0781=0;0;p0781*p0777/(p0774*p0778+p0775*p0779+p0776*p0780+p0777*p0781))
- p0578: 0; = IF(p0314<0.5;-SQRT(p0007*EXP(p0446^2*p0008)-p0007);SQRT(p0007*EXP(p0446^2*p0008)-p0007))
- p0981: 0; = p0978*p0001/(p0818*p0002)
- p3106: 0; = p2325*p1023
- p2683: 7.57702e-6; = p2292*(p1019+p1021)
- p0440: 0; = SQRT(2)*(IF((2*p0308-1)<0;-1;IF((2*p0308-1)>0;1;0))*SQRT(SQRT((2/(pi()*0.140012289)+LN(1-(2*p0308-1)^2)/2)^2-LN(1-(2*p0308-1)^2)/0.140012289)-(2/(pi()*0.140012289)+LN(1-(2*p0308-1)^2)/2)))
- p0563: 0; = IF(p0299<0.5;-SQRT(p0007*EXP(p0431^2*p0008)-p0007);SQRT(p0007*EXP(p0431^2*p0008)-p0007))
- p3306: 0; = if(and(p1232=0;p3252<>0);p3252*(p3257*p3277-p3301)/p3305;0)
- p2445: 0.000110553; = p2249*p1014
- p1097: 0.0685077
- p3303: 0; = if(and(p1232=0;p3252<>0);p3259*p3289;0)
- p0971: 0; = p0968/p0818
- p1840: 0
- p1901: 0
- p1759: 0
- p3092: 0.00015157; = p2311*p1132
- p0776: 0
- p0926: 0; = IF(p0918+p0923+p0924+p0925=1;0;IF(p0918+p0923+p0924+p0925+p0922>1;1-(p0918+p0923+p0924+p0925);p0922))
- p0934: 0.000300045; = p0928*p0001/(p0818*p0002)
- p0343: 0.5
- p3101: 0; = p2320*p1023
- p2877: 1.06897e-6; = p2291*(p1020+p1022)
- p0646: 0; = IF(p0382<0.5;-SQRT(p0007*EXP(p0514^2*p0008)-p0007);SQRT(p0007*EXP(p0514^2*p0008)-p0007))
- p2709: 1.75492e-5; = p2318*(p1019+p1021)
- p2031: 0.465411
- p0790: 18.53; = p0130*(1+p0658*p0262/100)
- p0367: 0.5
- p1265: 0; = if(p1232>0;0;IF(p1259+p1263+p1264=1;0;IF(p1259+p1263+p1264+p1262>1;1-(p1259+p1263+p1264);p1262)))
- p3088: 6.74946e-6; = p2307*p1082
- p0675: 0
- p2737: 0; = p2346*(p1078+p1080)
- p1872: 0
- p1730: 0
- p2895: 9.84295e-6; = p2309*(p1079+p1081)
- p0645: 0; = IF(p0381<0.5;-SQRT(p0007*EXP(p0513^2*p0008)-p0007);SQRT(p0007*EXP(p0513^2*p0008)-p0007))
- p2065: 0.0758824
- p1327a: 0.150461; = (p0745*1000/p0801)*(1-(p0746+p0747+p0748+p0749+p0750+p0751+p0752+p0753)/100)+(p0754*1000/p0801)*(1-(p0755+p0756+p0757+p0758+p0759+p0760+p0761+p0762)/100)
- p3276: 0
- p0673: 144.341; = p0013*(1+p0541*p0145/100)
- p0936: 8.90448e-6; = p0930*p0001/(p0818*p0002)
- p2403: 0; = p2234*p2192
- p3219: 0.0493196; = p3215*p1228
- p2590: 0; = p2394*p1014
- p0399: 0.5
- p0431: 0; = SQRT(2)*(IF((2*p0299-1)<0;-1;IF((2*p0299-1)>0;1;0))*SQRT(SQRT((2/(pi()*0.140012289)+LN(1-(2*p0299-1)^2)/2)^2-LN(1-(2*p0299-1)^2)/0.140012289)-(2/(pi()*0.140012289)+LN(1-(2*p0299-1)^2)/2)))
- p0366: 0.5
- p2013: 0.75
- p2105: 0.888194
- p1008: 0; = p1004*p0001*p0004/(p0818*p0002)
- p2766: 0.000178212; = p2375*(p1078+p1080)
- p2603: 0; = p2407*p1014
- p2243: 0.000747633; = p2222*p2188
- p1653: 0
- p2248: 0.00200963; = p2222*p2193
- p1729: 0
- p0792: 0
- p2442: 1.09094e-5; = p2246*p1014
- p1710: 0.757148
- p0685: 0
- p1584: 0
- p2208: 0.00188955; = p1110/p0818
- p3197: 0; = p2416*p1082
- p5147: 1.53133e-6; = p1768*p3484
- p1547: 42
- p1854: 0
- p3114: 0; = p2333*p1023
- p3422: 0; = p3365*p1239
- p1257: 0; = if(p1232>0;0;IF(p1253+p1256=1;0;IF(p1253+p1256+p1255>1;1-(p1253+p1256);p1255)))
- p3108: 0; = p2327*p1023
- p1055: 13439.8; = IF(p1012=0;p1048*p1036;0)
- p2729: 0; = p2338*(p1078+p1080)
- p0510: 0; = SQRT(2)*(IF((2*p0378-1)<0;-1;IF((2*p0378-1)>0;1;0))*SQRT(SQRT((2/(pi()*0.140012289)+LN(1-(2*p0378-1)^2)/2)^2-LN(1-(2*p0378-1)^2)/0.140012289)-(2/(pi()*0.140012289)+LN(1-(2*p0378-1)^2)/2)))
- p2541: 0; = p2345*p1073
- p3191: 0; = p2410*p1023
- p1024: 84221.6; = IF(p1012=0;p1014*(p0704/100)*p0703*1000;0)
- p1801: 0
- p1233: 0.000346553; = p1232*p0001/(p0818*p0002)
- p1604: 0
- p2364: 0.000604924; = p2225*p2192
- p0970: 0; = p0967/p0818
- p2503: 7.77243e-5; = p2307*p1073
- p0745: 758.709; = p0085*(1+p0613*p0217/100)
- p1251: 0; = if(p1232>0;0;p1246*p0001/(p0818*p0002))
- p1893: 0
- p1047: 0.310052; = IF(p1012=0;IF(p1037+p1044+p1045+p1046=1;0;IF(p1037+p1044+p1045+p1046+p1041>1;1-(p1037+p1044+p1045+p1046);p1041));0)
- p0704: 90.948; = p0044*(1+p0572*p0176/100)
- p3339: 0; = if(and(p1232=0;p3254<>0);p3254*(p3269*p3277-p3334)/p3338;0)
- p1006: 0; = p1002*p0001*p0004/(p0818*p0002)
- p2921: 2.98176e-5; = p2335*(p1020+p1022)
- p0585: 0; = IF(p0321<0.5;-SQRT(p0007*EXP(p0453^2*p0008)-p0007);SQRT(p0007*EXP(p0453^2*p0008)-p0007))
- p2423: 0; = p2235*p2213
- p1944: 0
- p2610: 0; = p2414*p1073
- p0875: 0.768086; = p0874*p0001*p0003/(p0818*p0002)
- p2019: 0.13105
- p0724: 0
- p2256: 8.38348e-5; = p2222*p2202
- p2246: 4.25104e-5; = p2222*p2191
- p3142: 0; = p2361*p1023
- p2071: 0.151
- p3895: 0; = p1962*p3477
- p2002: 750
- p2556: 0.000337374; = p2360*p1014
- p0391: 0.5
- p2257: 0.0009611; = p2222*p2203
- p1746: 0
- p1031: 0.00012932; = IF(p1012=0;p1025*p0001/(p0818*p0002);0)
- p3290: 0
- p0674: 125.38; = p0014*(1+p0542*p0146/100)
- p1100: 0.275167
- p0896: 0.482098
- p2355: 0.000966857; = p2225*p2183
- p3182: 0; = p2401*p1023
- p3447: 0; = p3371*p1240
- p1829: 0
- p0893: 6.16632; = 1000*(p0890+p0892)*p0001*p0003*p0004/(p0818*p0002)
- p1632: 0
- p4103: 2.34567e-6; = p1754*p3479
- p0053: 8.822
- p5037: 1.55148e-7; = p1864*p3483
- p0477: 0; = SQRT(2)*(IF((2*p0345-1)<0;-1;IF((2*p0345-1)>0;1;0))*SQRT(SQRT((2/(pi()*0.140012289)+LN(1-(2*p0345-1)^2)/2)^2-LN(1-(2*p0345-1)^2)/0.140012289)-(2/(pi()*0.140012289)+LN(1-(2*p0345-1)^2)/2)))
- p2631: 9.95501e-5; = p2240*(p1019+p1021)
- p0013: 144.341
- p2720: 3.6811e-7; = p2329*(p1019+p1021)
- p1880: 0
- p0445: 0; = SQRT(2)*(IF((2*p0313-1)<0;-1;IF((2*p0313-1)>0;1;0))*SQRT(SQRT((2/(pi()*0.140012289)+LN(1-(2*p0313-1)^2)/2)^2-LN(1-(2*p0313-1)^2)/0.140012289)-(2/(pi()*0.140012289)+LN(1-(2*p0313-1)^2)/2)))
- p3173: 3.59815e-6; = p2392*p1132
- p0812: 0; = if(p0807=480;0.095/0.34;0)
- p4046: 3.5742e-5; = p1903*p3478
- p2864: 9.0142e-6; = p2278*(p1020+p1022)
- p0211: 13.615
- p2040: 0
- p3056: 9.25884e-6; = p2275*p1132
- p1788: 0
- p3348: 0; = if(and(p1232=0;p3256<>0);p3276*p3289;0)
- p2460: 3.15131e-5; = p2264*p1073
- p0915: 0.0217262; = p0914/p0818
- p0682: 360.847; = p0022*(1+p0550*p0154/100)
- p2160: 6.45383e-8; = p2015*p2084*p2122/(p0818*1000)
- p0960: 8.90448e-6; = if(and(p0683>0;or(p0807=480;p0807=32;p0807=1;and(p0807=60;p0901<0.03)));p0936;0)
- p3017: 0; = p2431*(p1129+p1131)
- p3090: 2.60299e-6; = p2309*p1082
- p1286: 0; = p1282*p1252/p0818
- p3310: 0; = if(and(p1232=0;p3252<>0);IF((p3306+p3307+p3308+p3309)+(p3252*(p3257*(1-p3277))/p3305)>p3252;p3252-(p3306+p3307+p3308+p3309);p3252*(p3257*(1-p3277))/p3305);0)
- p3111: 0; = p2330*p1023
- p2109: 0.826583
- p0253: 44.376
- p2373: 0.000147414; = p2225*p2202
- p2150: 9.02399e-8; = p2015*p2078*p2112/(p0818*1000)
- p1200: 0.84
- p2470: 4.75087e-5; = p2274*p1123
- p1915: 0
- p3308: 0; = if(and(p1232=0;p3252<>0);p3252*(p3259-p3303)/p3305;0)
- p3016: 0; = p2430*(p1129+p1131)
- p2781: 0.000639995; = p2390*(p1128+p1130)
- p3057: 0; = p2276*p1023
- p1916: 0
- p1650: 0
- p2782: 4.43637e-5; = p2391*(p1128+p1130)
- p0139: 36.819
- p2646: 0.000330498; = p2255*(p1019+p1021)
- p3272: 0
- p3282: 0
- p0311: 0.5
- p2786: 0; = p2395*(p1019+p1021)
- p1779: 0
- p0691: 0
- p1255: 0; = if(p1232>0;0;p0737/100)
- p2980: 0; = p2394*(p1020+p1022)
- p2876: 6.51278e-7; = p2290*(p1020+p1022)
- p2979: 0; = p2393*(p1020+p1022)
- p4949: 4.65445e-7; = p1776*p3483
- p4305: 2.73662e-6; = p1956*p3479
- p2424: 0; = p2235*p2214
- p1986: 4200
- p1739: 0
- p2096: 0.486404
- p0854: 158395; = p0801*((1-p0853)*p0846+p0853*p0852)
- p1335: 0.000292863; = p1334*p0001/(p0818*p0002)
- p1173: 0.5
- p2374: 0.00168999; = p2225*p2203
- p0770: 61.171; = p0110*(1+p0638*p0242/100)
- p2061: 0.518824
- p5076: 6.4128e-6; = p1903*p3483
- p4518: 1.59422e-6; = p1757*p3481
- p2078: 0.117
- p1802: 0
- p3094: 1.48061e-5; = p2313*p1132
- p4071: 1.15297e-6; = p1928*p3478
- p0086: 13.99
- p2315: 0.000441575; = p2224*p2182
- p2467: 0.000138891; = p2271*p1073
- p2120: 0.51828
- p2575: 3.40616e-5; = p2379*p1073
- p3477: 0; = if(p1328+p1330+p1332+p1334+p1336+p1338+p1340+p1342+p1344=0;0;p1330/(p1328+p1330+p1332+p1334+p1336+p1338+p1340+p1342+p1344))
- p0619: 0; = IF(p0355<0.5;-SQRT(p0007*EXP(p0487^2*p0008)-p0007);SQRT(p0007*EXP(p0487^2*p0008)-p0007))
- p2416: 0; = p2235*p2206
- p1724: 0.797375
- p0154: 0
- p1738: 0
- p2845: 0.000108709; = p2259*(p1079+p1081)
- p2976: 0.00011446; = p2390*(p1129+p1131)
- p0766: 30.088; = p0106*(1+p0634*p0238/100)
- p0642: 0; = IF(p0378<0.5;-SQRT(p0007*EXP(p0510^2*p0008)-p0007);SQRT(p0007*EXP(p0510^2*p0008)-p0007))
- p2601: 0; = p2405*p1014
- p2356: 8.95702e-5; = p2225*p2184
- p2064: 0.676706
- p2764: 8.36399e-5; = p2373*(p1019+p1021)
- p2707: 5.49967e-5; = p2316*(p1019+p1021)
- p0997: 0.995074; = if(p0888=0;0;if((p0695*p0694*1000*p0696/100)/p0888>1;1;(p0695*p0694*1000*p0696/100)/p0888))
- p2205: 0.00387578; = 2*14.0067*p2204/30.973762
- p0481: 0; = SQRT(2)*(IF((2*p0349-1)<0;-1;IF((2*p0349-1)>0;1;0))*SQRT(SQRT((2/(pi()*0.140012289)+LN(1-(2*p0349-1)^2)/2)^2-LN(1-(2*p0349-1)^2)/0.140012289)-(2/(pi()*0.140012289)+LN(1-(2*p0349-1)^2)/2)))
- p2271: 0.000516976; = p2226*p2217
- p3210: 0; = p2429*p1132
- p0711: 26.866; = p0051*(1+p0579*p0183/100)
- p1513: 1
- p3280: 0
- p3283: 0
- p2800: 0; = p2409*(p1019+p1021)
- p0377: 0.5
- p1315: 0; = p1311*p1252/p0818
- p2641: 0.0024161; = p2250*(p1019+p1021)
- p0386: 0.5
- p0611: 0; = IF(p0347<0.5;-SQRT(p0007*EXP(p0479^2*p0008)-p0007);SQRT(p0007*EXP(p0479^2*p0008)-p0007))
- p2736: 0; = p2345*(p1078+p1080)
- p0635: 0; = IF(p0371<0.5;-SQRT(p0007*EXP(p0503^2*p0008)-p0007);SQRT(p0007*EXP(p0503^2*p0008)-p0007))
- p0183: 30.031
- p1053: 539312; = IF(p1012=0;p1046*p1036;0)
- p1807: 0
- p2700: 6.91517e-5; = p2309*(p1078+p1080)
- p0507: 0; = SQRT(2)*(IF((2*p0375-1)<0;-1;IF((2*p0375-1)>0;1;0))*SQRT(SQRT((2/(pi()*0.140012289)+LN(1-(2*p0375-1)^2)/2)^2-LN(1-(2*p0375-1)^2)/0.140012289)-(2/(pi()*0.140012289)+LN(1-(2*p0375-1)^2)/2)))
- p2344: 0; = p2228*p2212
- p3335: 0; = IF(or(p3254=0;p1232>0);0;p3270*(p3280*(p3283*p1256+p3286*(p1253+p1257)+p1258*p3288+p3300*p3287)))
- p1618: 0
- p1817: 0
- p1336: 0; = p1323*p0801
- p3068: 0; = p2287*p1023
- p0845: 0.5
- p1013: 0; = p1012*p0001/(p0818*p0002)
- p3243: 5.05979e-10; = p3234*p1188*p3239/p0818
- p2531: 4.34802e-5; = p2335*p1014
- p0847: 0
- p2419: 0; = p2235*p2209
- p1661: 0
- p1925: 0
- p1175: 0.000155803
- p3434: 0; = p3377*p1239
- p3353: 0; = if(and(p1232=0;p3256<>0);p3256*(p3276-p3348)/p3349;0)
- p1023: 0; = IF(p1012=0;IF(p1014+p1019+p1020+p1021+p1022=1;0;1-(p1014+p1019+p1020+p1021+p1022));0)
- p0808: 0
- p5234: 1.04409e-6; = p1855*p3484
- p2487: 1.55878e-6; = p2291*p1014
- p2775: 1.74552e-5; = p2384*(p1078+p1080)
- p0003: 10000
- p2308: 0.00109174; = p2227*p2215
- p2410: 0; = p2234*p2200
- p2296: 0.000966405; = p2223*p2203
- p1737: 0
- p1196: 0.59
- p1072: 0; = p1071*p0001/(p0818*p0002)
- p0744: 17.469; = p0084*(1+p0612*p0216/100)
- p2543: 0; = p2347*p1073
- p3207: 0; = p2426*p1082
- p3109: 0; = p2328*p1023
- p2810: 0; = p2419*(p1078+p1080)
- p0409: 0; = SQRT(2)*(IF((2*p0277-1)<0;-1;IF((2*p0277-1)>0;1;0))*SQRT(SQRT((2/(pi()*0.140012289)+LN(1-(2*p0277-1)^2)/2)^2-LN(1-(2*p0277-1)^2)/0.140012289)-(2/(pi()*0.140012289)+LN(1-(2*p0277-1)^2)/2)))
- p0283: 0.5
- p1423: 34
- p1246: 0; = if(p1232>0;0;p1241*(p0725/100)*p0723*1000)
- p2510: 0.000229417; = p2314*p1123
- p1773: 5.39491e-6; = p1365*1000/p0818
- p3404: 0; = p3366*p1238
- p0882: 10490; = p0869*p0856
- p3061: 0; = p2280*p1023
- p2577: 6.65054e-6; = p2381*p1073
- p1962: 7.82291e-5; = p1960*1000/p0818
- p3375: 0; = if(p1232=0;p3246*p3357/p0818;0)
- p3060: 0; = p2279*p1023
- p1219: 0; = if(p1218=0;0;SQRT(2)*(IF((2*p1218-1)<0;-1;IF((2*p1218-1)>0;1;0))*SQRT(SQRT((2/(pi()*0.140012289)+LN(1-(2*p1218-1)^2)/2)^2-LN(1-(2*p1218-1)^2)/0.140012289)-(2/(pi()*0.140012289)+LN(1-(2*p1218-1)^2)/2))))
- p2073: 0.377647
- p2560: 0.000155242; = p2364*p1014
- p3119: 0; = p2338*p1082
- p0352: 0.5
- p1298: 0
- p1052: 1.48287e6; = IF(p1012=0;p1045*p1036;0)
- p2279: 0.000176424; = p2223*p2185
- p3523: 1.30943e-5; = p1792*p3476
- p2997: 0; = p2411*(p1020+p1022)
- p2385: 3.15649e-5; = p2229*p2214
- p2194: 0.214362
- p2854: 1.31949e-5; = p2268*(p1079+p1081)
- p0632: 0; = IF(p0368<0.5;-SQRT(p0007*EXP(p0500^2*p0008)-p0007);SQRT(p0007*EXP(p0500^2*p0008)-p0007))
- p1963f: 7.21764e-6; = p1647*p1851+p1648*p1852+p1649*p1853+p1650*p1854+p1651*p1855+p1652*p1856+p1653*p1857+p1654*p1858+p1655*p1859+p1656*p1860+p1657*p1861+p1658*p1862+p1659*p1863+p1660*p1864+p1661*p1865+p1662*p1866+p1663*p1867+p1664*p1868+p1665*p1869+p1666*p1870
- p2968: 2.85983e-5; = p2382*(p1079+p1081)
- p1974: 0; = p1969*p0001/(p0818*p0002)
- p0726: 0
- p1646: 0
- p1964: 0.5
- p3935: 2.76712e-5; = p1792*p3478
- p2261: 0.00331314; = p2226*p2207
- p1312: 0; = IF(p1307+p1310+p1311=p1266;0;p1266-(p1307+p1310+p1311))
- p3405: 0; = p3367*p1238
- p0647: 0; = IF(p0383<0.5;-SQRT(p0007*EXP(p0515^2*p0008)-p0007);SQRT(p0007*EXP(p0515^2*p0008)-p0007))
- p2735: 0; = p2344*(p1078+p1080)
- p2926: 0; = p2340*(p1079+p1081)
- p2798: 0; = p2407*(p1019+p1021)
- p0861: 0.400947; = p0673*1000/p0856
- p2200: 0.00535348; = p1056/p0818
- p0573: 0; = IF(p0309<0.5;-SQRT(p0007*EXP(p0441^2*p0008)-p0007);SQRT(p0007*EXP(p0441^2*p0008)-p0007))
- p1852: 0
- p1248: 0; = if(p1232>0;0;p1243*p0001/(p0818*p0002))
- p0307: 0.5
- p0972: 0.0312868; = p0969/p0818
- p0584: 0; = IF(p0320<0.5;-SQRT(p0007*EXP(p0452^2*p0008)-p0007);SQRT(p0007*EXP(p0452^2*p0008)-p0007))
- p0781: 12.915; = p0121*(1+p0649*p0253/100)
- p2578: 8.70915e-5; = p2382*p1073
- p4323: 0; = p1768*p3480
- p2592: 0; = p2396*p1014
- p0613: 0; = IF(p0349<0.5;-SQRT(p0007*EXP(p0481^2*p0008)-p0007);SQRT(p0007*EXP(p0481^2*p0008)-p0007))
- p2517: 3.3823e-5; = p2321*p1014
- p1859: 0
- p1001: 0.00492602; = if(p0978>0;0;if(and(p0687=0;p0691=0;p0695=0;p0699=0);0;IF(p0996+p0999+p1000=1;0;1-(p0996+p0999+p1000))))
- p1787: 0
- p2630: 2.89016e-5; = p2239*(p1019+p1021)
- p2759: 3.67178e-6; = p2368*(p1019+p1021)
- p2874: 7.62327e-5; = p2288*(p1020+p1022)
- p0699: 0
- p3098: 0; = p2317*p1023
- p3652: 1.36399e-7; = p1921*p3476
- p3152: 0; = p2371*p1023
- p2847: 0.000292285; = p2261*(p1079+p1081)
- p1926: 0
- p1228: 0.109407; = IF(p1221=0;0;p0801*p1212*2000/(p1222+p1221*p1225)/p0818)
- p3475: 0; = p3380*p1241
- p2350: 0; = p2232*p2218
- p2612: 0; = p2416*p1073
- p1145: 9.79831e6; = if(p1121=0;p0799*p0702*1000*p0800/100;0)
- p0214: 2.847
- p1867: 0
- p0872: 0; = p0864*p0856
- p1631: 0
- p3116: 0; = p2335*p1023
- p3391: 0; = p3372*p1234
- p0446: 0; = SQRT(2)*(IF((2*p0314-1)<0;-1;IF((2*p0314-1)>0;1;0))*SQRT(SQRT((2/(pi()*0.140012289)+LN(1-(2*p0314-1)^2)/2)^2-LN(1-(2*p0314-1)^2)/0.140012289)-(2/(pi()*0.140012289)+LN(1-(2*p0314-1)^2)/2)))
- p2491: 2.16333e-5; = p2295*p1014
- p1306: 0; = p1302*p1252/p0818
- p0043: 360.847
- p5094: 5.17161e-8; = p1921*p3483
- p2293: 0.00136618; = p2223*p2200
- p0958: 0.000300045; = if(and(p0683>0;or(p0807=480;p0807=32;p0807=1;and(p0807=60;p0901<0.03)));p0934;0)
- p2288: 0.000433165; = p2223*p2195
- p1654: 0
- p0980: 0; = IF(p0977=0;0;p0977*p0001/(p0818*p0002))
- p0879: 1.20697; = p0878*p0001*p0003/(p0818*p0002)
- p0309: 0.5
- p0423: 0; = SQRT(2)*(IF((2*p0291-1)<0;-1;IF((2*p0291-1)>0;1;0))*SQRT(SQRT((2/(pi()*0.140012289)+LN(1-(2*p0291-1)^2)/2)^2-LN(1-(2*p0291-1)^2)/0.140012289)-(2/(pi()*0.140012289)+LN(1-(2*p0291-1)^2)/2)))
- p0212: 2.176
- p0358: 0.5
- p0123: 31.654
- p3204: 0; = p2423*p1082
- p0217: 13.266
- p1975: 0.000346553; = p1970*p0001/(p0818*p0002)
- p0710: 82.371; = p0050*(1+p0578*p0182/100)
- p3273: 0
- p0480: 0; = SQRT(2)*(IF((2*p0348-1)<0;-1;IF((2*p0348-1)>0;1;0))*SQRT(SQRT((2/(pi()*0.140012289)+LN(1-(2*p0348-1)^2)/2)^2-LN(1-(2*p0348-1)^2)/0.140012289)-(2/(pi()*0.140012289)+LN(1-(2*p0348-1)^2)/2)))
- p1585: 0
- p1674: 0
- p2703: 0.00457639; = p2312*(p1128+p1130)
- p1785: 0
- p4064: 2.88242e-7; = p1921*p3478
- p0703: 360.847; = p0043*(1+p0571*p0175/100)
- p3376: 0; = if(p1232=0;p3246*p3358/p0818;0)
- p4141: 3.75308e-5; = p1792*p3479
- p0778: 33.058; = p0118*(1+p0646*p0250/100)
- p0551: 0; = IF(p0287<0.5;-SQRT(p0007*EXP(p0419^2*p0008)-p0007);SQRT(p0007*EXP(p0419^2*p0008)-p0007))
- p0004: 0.0254
- p1969: 0; = p0803
- p2077: 0.043
- p3345: 0; = if(and(p1232=0;p3256<>0);p3273*p3277*p3293;0)
- p3086: 5.75894e-7; = p2305*p1082
- p1572: 0.0125
- p4616: 1.83949e-6; = p1855*p3481
- p2565: 2.7259e-6; = p2369*p1014
- p1596: 0
- p1994: 750
- p2025: 1.9017e-6; = p2015*p2023*p2024/(p0818*1000)
- p1169: 0.000621786
- p0286: 0.5
- p1839: 0
- p1073: 0.26866; = IF(p1071=0;p0711/100;0)
- p2768: 5.21938e-5; = p2377*(p1078+p1080)
- p3840: 0; = p1903*p3477
- p2412: 0; = p2234*p2202
- p1606: 0
- p2428: 0; = p2236*p2218
- p0242: 8.618
- p1806: 0
- p1768: 2.37376e-5; = p1360*1000/p0818
- p1970: 360000; = p0801
- p0756: 0
- p2554: 0.000183241; = p2358*p1014
- p2996: 0; = p2410*(p1020+p1022)
- p3911: 6.34132e-6; = p1768*p3478
- p2746: 0.000548576; = p2355*(p1019+p1021)
- p1328: 106143; = p1319*p0801
- p1656: 0
- p0852: 0; = p0847*p0851^3+p0848*p0851^2+p0849*p0851+p0850
- p0128: 63.854
- p1281: 0; = IF(p1277+p1280=p1263;0;IF(p1277+p1280+p1279>p1263;p1263-(p1277+p1280);p1279))
- p2978: 1.37876e-5; = p2392*(p1129+p1131)
- p1095: 1.45829e7; = IF(p1071=0;p0797*p0702*1000*p0798/100;0)
- p0769: 36.366; = p0109*(1+p0637*p0241/100)
- p2600: 0; = p2404*p1014
- p3078: 6.14831e-5; = p2297*p1082
- p0671: 0
- p1963e: 0; = p1628*p1832+p1629*p1833+p1630*p1834+p1631*p1835+p1632*p1836+p1633*p1837+p1634*p1838+p1635*p1839+p1636*p1840+p1637*p1841+p1638*p1842+p1639*p1843+p1640*p1844+p1641*p1845+p1642*p1846+p1643*p1847+p1644*p1848+p1645*p1849+p1646*p1850
- p4650: 6.00899e-6; = p1889*p3481
- p2879: 0.000240435; = p2293*(p1020+p1022)
- p2434: 0.000141109; = p2238*p1014
- p3206: 0; = p2425*p1082
- p3209: 0; = p2428*p1132
- p0702: 360.847; = p0042*(1+p0570*p0174/100)
- p0571: 0; = IF(p0307<0.5;-SQRT(p0007*EXP(p0439^2*p0008)-p0007);SQRT(p0007*EXP(p0439^2*p0008)-p0007))
- p3131: 0; = p2350*p1132
- p3900: 3.74714e-6; = p1757*p3478
- p2006: 0.383007; = ((p1980*p1985+p1986*p1991+p1992*p1997+p2000*p2005)/p0818)*p0005*p0002/1000
- p0964: 0; = 56/90000
- p1253: 0; = if(p1232>0;0;p0735/100)
- p0962: 0; = if(and(p0683>0;or(p0807=480;p0807=32;p0807=1;and(p0807=60;p0901<0.03)));p0938;0)
- p0001: 0.404686
- p0999: 0.995074; = IF(p0996=1;0;IF(p0996+p0997>1;1-p0996;p0997))
- p2443: 8.82863e-5; = p2247*p1014
- p2716: 3.44093e-5; = p2325*(p1019+p1021)
- p2131: 2.35449e-7; = p2015*p2059*p2093/(p0818*1000)
- p1080: 0; = IF(p1071=0;IF(p1073+p1078+p1079=1;0;IF(p1073+p1078+p1079+p1076>1;1-(p1073+p1078+p1079);p1076));0)
- p3430: 0; = p3373*p1239
- p1240: 0; = if(p1232>0;0;IF(p1234+p1238+p1239=1;0;IF(p1234+p1238+p1239+p1237>1;1-(p1234+p1238+p1239);p1237)))
- p3274: 0
- p1624: 0
- p0533: 0; = SQRT(2)*(IF((2*p0401-1)<0;-1;IF((2*p0401-1)>0;1;0))*SQRT(SQRT((2/(pi()*0.140012289)+LN(1-(2*p0401-1)^2)/2)^2-LN(1-(2*p0401-1)^2)/0.140012289)-(2/(pi()*0.140012289)+LN(1-(2*p0401-1)^2)/2)))
- p0306: 0.5
- p2050: 0.952062
- p2447: 9.44485e-7; = p2251*p1014
- p0945: 0; = if(and(p0683=0;p0951=0);p0939;0)
- p2525: 1.66499e-7; = p2329*p1014
- p3316: 0; = if(and(p1232=0;p3253<>0);1-(p3312+p3313+p3314+p3315);0)
- p2632: 0.000230395; = p2241*(p1019+p1021)
- p3160: 2.95785e-6; = p2379*p1082
- p2930: 0; = p2344*(p1079+p1081)
- p1313: 0; = p1307*p1252/p0818
- p2629: 0.000311976; = p2238*(p1019+p1021)
- p0826: 0.0682; = 1-p0825/p0818
- p2497: 0.000312187; = p2301*p1073
- p2318: 3.09302e-5; = p2224*p2185
- p2882: 0.000170078; = p2296*(p1020+p1022)
- p1033: 4.99287e-5; = IF(p1012=0;p1027*p0001/(p0818*p0002);0)
- p1617: 0
- p2411: 0; = p2234*p2201
- p3456: 0; = p3380*p1240
- p0748: 29.564; = p0088*(1+p0616*p0220/100)
- p3323: 0; = if(and(p1232=0;p3255<>0);p3265*p3277*(p3299*p3291+(1-p3299)*p3295);0)
- p2684: 0.000775145; = p2293*(p1019+p1021)
- p0141: 123.815
- p3039: 3.17863e-5; = p2258*p1082
- p2558: 7.62824e-5; = p2362*p1014
- p2971: 2.78466e-6; = p2385*(p1079+p1081)
- p1345: 5.21428e-5; = IF(p1318=0;p1344*p0001/(p0818*p0002);0)
- p2452: 2.15145e-5; = p2256*p1014
- p1850: 0
- p2137: 4.24039e-8; = p2015*p2065*p2099/(p0818*1000)
- p4347: 0; = p1792*p3480
- p0160: 38.077
- p2269: 0.000564422; = p2226*p2215
- p3293: 0
- p3858: 0; = p1921*p3477
- p3179: 0; = p2398*p1023
- p3025: 0; = p2244*p1023
- p3317: 0; = if(and(p1232=0;p3253<>0);p3253*(p3261*p3277-p3312)/p3316;0)
- p2803: 0; = p2412*(p1019+p1021)
- p2463: 3.58522e-5; = p2267*p1073
- p1963a: 2.63784e-5; = p1550*p1754+p1551*p1755+p1552*p1756+p1553*p1757+p1554*p1758+p1555*p1759+p1556*p1760+p1557*p1761+p1558*p1762+p1559*p1763+p1560*p1764+p1561*p1765+p1562*p1766+p1563*p1767+p1564*p1768+p1565*p1769+p1566*p1770+p1567*p1771+p1568*p1772
- p0974: 0.5
- p1012: 0
- p0029: 96.208
- p3408: 0; = p3370*p1238
- p3055: 5.3281e-6; = p2274*p1132
- p3398: 0; = p3379*p1234
- p1697: 0
- p0912: 0
- p2553: 7.91754e-5; = p2357*p1014
- p1232: 360000; = p0801
- p0557: 0; = IF(p0293<0.5;-SQRT(p0007*EXP(p0425^2*p0008)-p0007);SQRT(p0007*EXP(p0425^2*p0008)-p0007))
- p2817: 0; = p2426*(p1078+p1080)
- p1575: 0
- p2659: 9.27007e-5; = p2268*(p1078+p1080)
- p2005: 895417; = p1963*p0818+p1959*1000+p1170+p1176+p1182
- p0672: 79.789; = p0012*(1+p0540*p0144/100)
- p3172: 2.07059e-6; = p2391*p1132
- p0012: 79.789
- p2513: 2.30447e-6; = p2317*p1014
- p1274: 0; = p1270*p1252/p0818
- p0885: 0.615; = IF(p0689+p0884=100;0;100-(p0689+p0884))
- p3158: 1.96467e-6; = p2377*p1082
- p2456: 0.000107204; = p2260*p1073
- p4483: 0; = p1928*p3480
- p3333: 0; = if(and(p1232=0;p3255<>0);p3255-(p3328+p3329+p3330+p3331+p3332);0)
- p4697: 3.92424e-6; = p1936*p3481
- p2066: 0.109412
- p3371: 0; = if(p1232=0;p3245*p3359/p0818;0)
- p2713: 1.47715e-5; = p2322*(p1019+p1021)
- p1862: 0
- p1105: 0.436421
- p2649: 0.000844442; = p2258*(p1078+p1080)
- p2139: 2.49493e-7; = p2015*p2067*p2101/(p0818*1000)
- p0831: 0.097625; = 1-p0824
- p1002: 0; = p0996*p0888
- p1903: 0.000133794; = p1495*1000/p0818
- p1069: 9.06328e-5; = IF(p1012=0;p1055/(p1062*p0818);0)
- p3346: 0; = if(and(p1232=0;p3256<>0);p3274*(p3281*(p3285*p1256+p3286*(p1253+p1257)+p1258*p3288));0)
- p2708: 5.09493e-6; = p2317*(p1019+p1021)
- p1866: 0
- p0379: 0.5
- p2438: 1.49981e-5; = p2242*p1014
- p0439: 0; = SQRT(2)*(IF((2*p0307-1)<0;-1;IF((2*p0307-1)>0;1;0))*SQRT(SQRT((2/(pi()*0.140012289)+LN(1-(2*p0307-1)^2)/2)^2-LN(1-(2*p0307-1)^2)/0.140012289)-(2/(pi()*0.140012289)+LN(1-(2*p0307-1)^2)/2)))
- p2588: 3.20834e-5; = p2392*p1123
- p3311: 0; = if(and(p1232=0;p3252<>0);p3252-(p3306+p3307+p3308+p3309+p3310);0)
- p1305: 0; = p1301*p1252/p0818
- p2771: 3.55344e-5; = p2380*(p1078+p1080)
- p2819: 0; = p2428*(p1128+p1130)
- p2088: 0.798875
- p3336: 0; = IF(or(p3254=0;p1232>0);0;p3271*p3289)
- p1963c: 6.44934e-5; = p1588*p1792+p1589*p1793+p1590*p1794+p1591*p1795+p1592*p1796+p1593*p1797+p1594*p1798+p1595*p1799+p1596*p1800+p1597*p1801+p1598*p1802+p1599*p1803+p1600*p1804+p1601*p1805+p1602*p1806+p1603*p1807+p1604*p1808+p1605*p1809+p1606*p1810+p1607*p1811
- p4476: 0; = p1921*p3480
- p1664: 0
- p1085: 26221.9; = IF(p1071=0;p1079*(p0710/100)*p0703*1000;0)
- p2116: 0.444424
- p2444: 0.00051573; = p2248*p1014
- p0459: 0; = SQRT(2)*(IF((2*p0327-1)<0;-1;IF((2*p0327-1)>0;1;0))*SQRT(SQRT((2/(pi()*0.140012289)+LN(1-(2*p0327-1)^2)/2)^2-LN(1-(2*p0327-1)^2)/0.140012289)-(2/(pi()*0.140012289)+LN(1-(2*p0327-1)^2)/2)))
- p0775: 50.566; = p0115*(1+p0643*p0247/100)
- p1736: 0
- p2909: 5.24451e-6; = p2323*(p1020+p1022)
- p3087: 6.02203e-6; = p2306*p1082
- p5062: 2.53409e-6; = p1889*p3483
- p1906: 0
- p3080: 1.80069e-5; = p2299*p1082
- p3175: 0; = p2394*p1023
- p2533: 0; = p2337*p1073
- p2317: 8.97975e-6; = p2224*p2184
- p3897: 1.72945e-6; = p1754*p3478
- p2376: 0.000260054; = p2229*p2205
- p2214: 0.000470437; = p1107/p0818
- p1548: 7
- p1580: 0
- p1602: 0
- p0979: 0; = IF(p0976=0;0;p0976*p0001/(p0818*p0002))
- p2922: 0; = p2336*(p1079+p1081)
- p0740: 95.576; = p0080*(1+p0608*p0212/100)
- p2869: 2.61345e-5; = p2283*(p1020+p1022)
- p3294: 0
- p1041: 0.310052
- p1344: 54166.1; = IF(p1318=0;p1327*p0801;0)
- p0185: 29.065
- p4553: 1.17727e-5; = p1792*p3481
- p1221: 0.0791463; = p1216*(1+p1220*p1217/100)
- p0888: 130277; = p0686*1000*p0687*p0884/100
- p2338: 0; = p2228*p2206
- p1104: 0.275167; = IF(p1071=0;IF(p1096+p1101+p1102+p1103=1;0;1-(p1096+p1101+p1102+p1103));0)
- p1174: 1.20761e-7; = p1170*p1173/p0818
- p3341: 0; = if(and(p1232=0;p3254<>0);p3254*(p3271-p3336)/p3338;0)
- p2734: 0; = p2343*(p1078+p1080)
- p3379: 0; = if(p1232=0;p3246*p3361/p0818;0)
- p4309: 0; = p1754*p3480
- p1701: 0
- p4511: 0; = p1956*p3480
- p0667: 0; = IF(p0403<0.5;-SQRT(p0007*EXP(p0535^2*p0008)-p0007);SQRT(p0007*EXP(p0535^2*p0008)-p0007))
- p3130: 0; = p2349*p1082
- p0121: 12.915
- p3826: 0; = p1889*p3477
- p3211: 0; = p2430*p1132
- p3284: 0
- p1137: 0; = if(p1121=0;p1131*(p0716/100)*p0703*1000;0)
- p1601: 0
- p2465: 0.000151638; = p2269*p1073
- p2455: 0.000331055; = p2259*p1073
- p1682: 0
- p1833: 0
- p2544: 0; = p2348*p1073
- p2001: 400
- p0968: 0
- p1761: 0
- p1140: 0.000156047; = if(p1121=0;p1134*p0001/(p0818*p0002);0)
- p0152: 0
- p3309: 0; = if(and(p1232=0;p3252<>0);p3252*(p3260-p3304)/p3305;0)
- p1262: 0; = if(p1232>0;0;p0733/100)
- p0256: 16.996
- p0891: 0; = IF(p3251=0;0;62.4*6272640/(12*12*12))
- p0498: 0; = SQRT(2)*(IF((2*p0366-1)<0;-1;IF((2*p0366-1)>0;1;0))*SQRT(SQRT((2/(pi()*0.140012289)+LN(1-(2*p0366-1)^2)/2)^2-LN(1-(2*p0366-1)^2)/0.140012289)-(2/(pi()*0.140012289)+LN(1-(2*p0366-1)^2)/2)))
- p3167: 2.77897e-6; = p2386*p1082
- p0948: 0; = if(and(p0683=0;or(p0807=480;p0807=32;p0807=1;and(p0807=60;p0901<0.03)));p0936;0)
- p1870: 0
- p1129: 0.10894; = if(p1121=0;IF(p1123+p1128=1;0;IF(p1123+p1128+p1125>1;1-(p1123+p1128);p1125));0)
- p0479: 0; = SQRT(2)*(IF((2*p0347-1)<0;-1;IF((2*p0347-1)>0;1;0))*SQRT(SQRT((2/(pi()*0.140012289)+LN(1-(2*p0347-1)^2)/2)^2-LN(1-(2*p0347-1)^2)/0.140012289)-(2/(pi()*0.140012289)+LN(1-(2*p0347-1)^2)/2)))
- p4263: 5.08229e-6; = p1914*p3479
- p3445: 0; = p3369*p1240
- p3328: 0; = if(and(p1232=0;p3255<>0);p3255*(p3265*p3277-p3323)/p3327;0)
- p3065: 0; = p2284*p1023
- p2515: 1.83705e-5; = p2319*p1014
- p0574: 0; = IF(p0310<0.5;-SQRT(p0007*EXP(p0442^2*p0008)-p0007);SQRT(p0007*EXP(p0442^2*p0008)-p0007))
- p0234: 32.795
- p0836: 1.74012e7; = p0831*p0835*p0801/(1-p0831)
- p3689: 9.88931e-6; = p1962*p3476
- p3233: 0.60394
- p3054: 7.68636e-5; = p2273*p1132
- p3298: 0; = if(p1283+p1284+p1285+p1286=0;0;p1283/(p1283+p1284+p1285+p1286))
- p2540: 0; = p2344*p1073
- p0373: 0.5
- p3253: 0; = p1252*(p1277*(1-p3247)+p1280*(1-p3248)+p1281*(1-p3249)+p1282*(1-p3250))
- p1194: 1.48
- p2436: 4.50272e-5; = p2240*p1014
- p2910: 1.31886e-6; = p2324*(p1020+p1022)
- p0284: 0.5
- p0278: 0.5
- p3010: 0; = p2424*(p1079+p1081)
- p2483: 0.000518577; = p2287*p1014
- p2955: 1.86935e-6; = p2369*(p1020+p1022)
- p1887: 0

## Reference product
- peanuts; at harvest in 1999; at farm; 90%-95% moisture: 1 kg

## Inputs from technosphere
- CUTOFF potassic fertilizer, potassium chloride; at point-of-sale: 0.0192627 kg; = p1154
- CUTOFF pesticide, Clethodim; at point-of-sale; kg AI: 5.39491e-6 kg; = p1795
- CUTOFF pesticide, Tebuconazole; at point-of-sale; kg AI: 3.45274e-5 kg; = p1936
- CUTOFF apply pesticide; unspecified application methods: 5.21428e-5 ha; = p1345
- peanut residue; at harvest in 1999; at farm; 85%-92% moisture: 0.696043 kg; = p0839
- CUTOFF pesticide, Pendimethalin; at point-of-sale; kg AI: 0.000133794 kg; = p1903
- CUTOFF apply N fertilizer; broadcast without incorporation: 2.226e-5 ha; = p1032
- CUTOFF apply N fertilizer; no broadcast application: 8.10757e-5 ha; = p1030
- CUTOFF pesticide, Vernolate; at point-of-sale; kg AI: 7.55287e-6 kg; = p1956
- CUTOFF pesticide, 2,4-D; at point-of-sale; kg AI: 6.47389e-6 kg; = p1754
- CUTOFF pesticide, Glyphosate; at point-of-sale; kg AI: 1.61847e-5 kg; = p1855
- CUTOFF apply sewage sludge; unspecified method: 0.000346553 ha; = p1189
- CUTOFF nitrogenous fertilizer, ammonium nitrate; at point-of-sale: 0.00477608 kg; = p1066
- CUTOFF limestone, high-grade, pulverized; at point-of-sale: 0.109407 kg; = p1228
- CUTOFF irrigate; pressure, groundwater source, in 1999: 9.39574e-5 ha-m; = p0993
- CUTOFF phosphatic fertilizer, superphos. grades 22% and under; at point-of-sale: 0.000459875 kg; = p1116
- CUTOFF phosphatic fertilizer, other single phosphates; at point-of-sale: 0.00180748 kg; = p1118
- CUTOFF irrigate; unspec. irrigation method, unspec. water source, in 1999: 6.16632e-7 ha-m; = p1011
- CUTOFF apply K fertilizer; broadcast with incorporation: 0.000156047 ha; = p1140
- CUTOFF phosphatic fertilizer, diammonium phosphate; at point-of-sale: 0.0198371 kg; = p1119
- CUTOFF local area trucking; class 6, average fuel: 0.00303173 metric ton*km; = p2010
- CUTOFF gypsum storage: 9.44175e-7 kg*a; = p1168
- CUTOFF apply N fertilizer; broadcast with incorporation: 0.00012932 ha; = p1031
- CUTOFF pesticide, Ethalfluralin; at point-of-sale; kg AI: 3.66854e-5 kg; = p1831
- CUTOFF sewage sludge storage: 4.88575e-8 kg*a; = p1192
- CUTOFF sulfuric acid; at point-of-sale: 6.05192e-8 kg; = p1178
- CUTOFF apply K fertilizer; no broadcast application: 6.49417e-5 ha; = p1139
- CUTOFF nitrogenous fertilizer, aqueous ammonia; at point-of-sale: 0.000892039 kg; = p1065
- CUTOFF apply pesticide; broadcast without incorporation: 0.000292863 ha; = p1335
- CUTOFF nitrogenous fertilizer, urea; at point-of-sale: 0.0117659 kg; = p1070
- CUTOFF apply single or mixed K fertilizer; unspec. method: 7.28321e-6 ha; = p1144
- CUTOFF sulfur storage: 1.20761e-7 kg*a; = p1174
- CUTOFF apply P fertilizer; broadcast without incorporation: 2.52424e-5 ha; = p1091
- CUTOFF pesticide, 4-(2,4-Dichlorophenoxy)butyric acid; at point-of-sale; kg AI: 1.40268e-5 kg; = p1757
- CUTOFF sowing; for conventional till, peanuts; <15% residue: 0.000300045 ha; = p0958
- CUTOFF pesticide, Trifluralin; at point-of-sale; kg AI: 4.53172e-5 kg; = p1955
- CUTOFF sulfuric acid storage: 3.02596e-8 kg*a; = p1180
- CUTOFF prepare soil; for no-till, peanuts: 8.90448e-6 ha; = p0936
- CUTOFF pesticide, Azoxystrobin; at point-of-sale; kg AI: 5.39491e-6 kg; = p1773
- CUTOFF international vessel transport; average fuel: 0.383007 metric ton*km; = p2006
- CUTOFF regional or national trucking; class 8, average fuel: 0.0336179 metric ton*km; = p2009
- CUTOFF apply mixed N fertilizer; with incorporation: 4.99287e-5 ha; = p1033
- CUTOFF apply K fertilizer; broadcast without incorporation: 2.79083e-5 ha; = p1141
- CUTOFF harvest; peanuts residue management: 0.000346553 ha; = p1975
- CUTOFF zinc compounds; at point-of-sale: 6.20835e-8 kg; = p1184
- CUTOFF sowing; for no-till, peanuts: 8.90448e-6 ha; = p0960
- CUTOFF apply single or mixed P fertilizer; unspec. method: 6.67543e-6 ha; = p1094
- CUTOFF pesticide, Bentazon; at point-of-sale; kg AI: 9.71083e-6 kg; = p1776
- CUTOFF fertilizer storage: 0.0687358 kg*a; = p1160
- CUTOFF nitrogenous fertilizer, ammonium sulfate; at point-of-sale: 0.00277099 kg; = p1067
- CUTOFF gypsum; at point-of-sale: 1.88835e-6 kg; = p1166
- CUTOFF apply pesticide; banded or side-dressed: 0.000102179 ha; = p1329
- CUTOFF nitrogenous fertilizer, sodium nitrate; at point-of-sale: 9.06328e-5 kg; = p1069
- CUTOFF peanut seeds; unspec. type; at point-of-sale: 0.0312868 kg; = p0972
- CUTOFF pesticide, unspecified type; at point-of-sale; kg AI: 7.82291e-5 kg; = p1962
- CUTOFF dolomite, pulverized; at point-of-sale: 0.00865914 kg; = p1229
- CUTOFF pesticide, Imazethapyr; at point-of-sale; kg AI: 3.23694e-6 kg; = p1864
- CUTOFF pesticide, Propazine; at point-of-sale; kg AI: 5.28701e-5 kg; = p1889
- CUTOFF apply pesticide; broadcast with incorporation: 0.000215926 ha; = p1333
- CUTOFF domestic barge transport; average fuel: 0.040423 metric ton*km; = p2007
- CUTOFF pesticide, Aldicarb; at point-of-sale; kg AI: 2.37376e-5 kg; = p1768
- CUTOFF N inhibitor appl svc; unspec rate & type, 1999 peanuts: 0.000388433 ha; = p1162
- CUTOFF phosphatic fertilizer, monoammonium phosphate; at point-of-sale: 0.00794432 kg; = p1120
- CUTOFF nitrogenous fertilizer, nitrogen solutions; at point-of-sale: 0.0263944 kg; = p1068
- CUTOFF sulfur; at point-of-sale: 2.41522e-7 kg; = p1172
- CUTOFF bulk cargo rail transport; diesel: 0.0757932 metric ton*km; = p2008
- CUTOFF prepare soil; for conventional till, peanuts; <15% residue: 0.000300045 ha; = p0934
- CUTOFF apply zinc compounds; unspecified method: 0.000346553 ha; = p1183
- CUTOFF zinc compounds storage: 3.10418e-8 kg*a; = p1186
- CUTOFF apply pesticide; in irrigation water: 1.45635e-5 ha; = p1341
- CUTOFF apply P fertilizer; broadcast with incorporation: 0.000177341 ha; = p1090
- CUTOFF prepare soil; for mulch till, peanuts: 1.39353e-5 ha; = p0935
- CUTOFF apply mixed N fertilizer; without incorporation: 3.33395e-5 ha; = p1034
- CUTOFF irrigate; unspecified irrigation method, surface water source, in 1999: 1.56915e-8 ha-m; = p1009
- CUTOFF apply sulfuric acid; unspecified method: 0.000346553 ha; = p1177
- CUTOFF sewage sludge; at point-of-sale: 9.7715e-8 kg; = p1190
- CUTOFF seed storage; peanuts: 0.0156434 kg*a; = p0975
- CUTOFF irrigate; unspecified irrigation method, groundwater source, in 1999: 2.5059e-6 ha-m; = p0995
- CUTOFF pesticide storage: 0.000667704 kg*a; = p1965
- CUTOFF pesticide formulation balance; at point-of-sale: 0.000369634 kg; = p1963
- CUTOFF apply P fertilizer; no broadcast application: 7.68718e-5 ha; = p1089
- CUTOFF pesticide, Sethoxydim; at point-of-sale; kg AI: 4.31593e-6 kg; = p1928
- CUTOFF harvest; peanuts: 0.000269541 ha; = p1971
- CUTOFF apply liming materials; unspecified method: 0.000346553 ha; = p1227
- CUTOFF apply gypsum; unspecified method: 0.000346553 ha; = p1165
- CUTOFF phosphatic fertilizer, superphosphate grades over 22%; at point-of-sale: 0.00224571 kg; = p1117
- CUTOFF pesticide, Chlorothalonil; at point-of-sale; kg AI: 0.000103582 kg; = p1792
- CUTOFF apply sulfur; unspecified method: 0.000346553 ha; = p1171
- CUTOFF pesticide, Propiconazole; at point-of-sale; kg AI: 1.40268e-5 kg; = p1914
- CUTOFF prepare soil; for reduced till, peanuts; 15-30% residue: 2.36676e-5 ha; = p0937
- CUTOFF apply pesticide; in seed furrow: 3.87413e-5 ha; = p1343
- CUTOFF irrigate; pressure, surface water source, in 1999: 3.16974e-6 ha-m; = p1007
- CUTOFF manure appl svc; unspec rate, 1999 peanuts: 0.000346553 ha; = p1233
- CUTOFF sowing; for reduced till, peanuts; 15-30% residue: 2.36676e-5 ha; = p0961
- CUTOFF apply pesticide; as foliar or directed spray: 9.18657e-5 ha; = p1339
- CUTOFF fertilizer filler materials; at point-of-sale: 0.0250499 kg; = p1158
- CUTOFF nitrogenous fertilizer, anhydrous ammonia; at point-of-sale: 0.0120363 kg; = p1064
- CUTOFF sowing; for mulch till, peanuts: 1.39353e-5 ha; = p0959
- CUTOFF pesticide, Aminopyralid; at point-of-sale; kg AI: 1.07898e-6 kg; = p1921
- CUTOFF potassic fertilizer, other single nutrients; at point-of-sale: 0.00213827 kg; = p1155
- CUTOFF liming materials storage: 0.059033 kg*a; = p1231

## Inputs from nature
- Transformation, to annual crop [natural resource, land]: 3.46553 m2; = 1.0 * (p0857)
- Water, ground: 964.633 kg; = p0887
- Occupation, annual crop [natural resource, land]: 1.52478 m2*year; = 1.0 * (p0855)
- Transformation, from annual crop [natural resource, land]: 3.46553 m2; = 1.0 * (p0877+p0875+p0883+p0879)
- Potassium; from plant uptake; biogenic: 0.0217262 kg; = p0915
- Nitrogen: 0.0669044 kg; = p0905
- Water, surface: 31.8543 kg; = p0889
- Water, unspecified origin: 0.0063998 m3; = p0893*0.001+p0916*0.001
- Carbon dioxide: 4.08408 kg; = p0900*3.6666666667
- Dry matter except CNPK; from plant uptake: 1.25148 kg; = p0917
- Phosphorus: 0.00559751 kg; = p0910

## Emissions to nature
- Phosphorous; applied in sewage sludge: 5.45588e-10 kg; = p3241
- Superphosphate, grades<= 22%; unspec. appl. method in fert. in spr. bef. plant.; kg P: 5.75894e-7 kg; = p3086
- Nitrogen solution; broadcast w/o incorp. in fert. in spr. bef. plant.; broadcast w/o incorp. in fert. in spr. bef. pl...: 0.000355626 kg; = p2873
- Superphosphate, grades>22%; unspec. appl. method in fert. in spr. bef. plant.; kg P: 6.74946e-6 kg; = p3088
- Pesticide formulation balance; in irrigation water: 6.66003e-6 kg; = p4926
- Diammonium phosphate; broadcast w/o incorp. in fert. in spr. bef. plant.: 0.000991278 kg; = p2884*4.7142857143
- Aminopyralid; in irrigation water: 1.9441e-8 kg; = p4888
- Diammonium phosphate; no broadcast in fert. after plant.: 0.000329368 kg; = p2572*4.7142857143
- Chlorothalonil [soil, agricultural]: 0.000103582 kg; = 1.0 * (p4553+p4759+p3935+p5171+p4965+p3523+p4141)
- Monoammonium phosphate; unspec. appl. method in fert. in fall bef. plant.: 5.20622e-5 kg; = p3044*8.2142857143
- Acetic acid [air, non-urban air or from high stacks]: 5.03947e-6 kg; = 1.0 * (p2127*2.5)
- Nitrogen; applied in sewage sludge: 4.57032e-9 kg; = p3240
- Aqueous ammonia; broadcast w/ incorp. in fert. in spr. bef. plant.: 3.52886e-5 kg; = p2669*1.2142857143
- Other single K nutrients; broadcast w/o incorp. in fert. in spr. bef. plant.; kg K: 5.67351e-5 kg; = p2899
- Diammonium phosphate; unspec. appl. method in fert. in fall bef. plant.: 0.000135528 kg; = p3040*4.7142857143
- trans-2-Butene: 5.12902e-8 kg; = p2148*1.1666666667
- Aqueous ammonia; no broadcast in fert. at plant.: 2.79829e-6 kg; = p2513*1.2142857143
- Aqueous ammonia; broadcast w/ incorp. in fert. at plant.: 6.1867e-6 kg; = p2708*1.2142857143
- Propene [air, non-urban air or from high stacks]: 6.08919e-7 kg; = 1.0 * (p2136*1.1666666667)
- Other single phosphates; broadcast w/o incorp. in fert. after plant.; kg P: 1.07393e-6 kg; = p2973
- Urea; broadcast w/ incorp. in fert. in spr. bef. plant.: 0.00166161 kg; = p2685*5
- Potassium chloride; no broadcast in fert. in spr. bef. plant.: 0.00299582 kg; = p2507*2.2166666667
- Clethodim [soil, agricultural]: 5.39491e-6 kg; = 1.0 * (p3526+p4762+p3938+p4144+p4968+p5174+p4556)
- Aqueous ammonia; broadcast w/o incorp. in fert. at plant.: 1.91899e-6 kg; = p2903*1.2142857143
- Plant dry matter; in aboveground residue left on field: 0.312063 kg; = p2172
- I butane; from residue burning: 1.9001e-8 kg; = p2146*1.0208333333
- Aqueous ammonia; no broadcast in fert. in spr. bef. plant.: 1.59613e-5 kg; = p2474*1.2142857143
- Potassium chloride; no broadcast in fert. in fall bef. plant.: 0.00107807 kg; = p2468*2.2166666667
- Anhydrous ammonia; broadcast w/ incorp. in fert. at plant.: 0.000304228 kg; = p2706*1.2142857143
- Water: 1002.75 kg; = p2181+p2171+p2178
- Dinitrogen monoxide [air, non-urban air or from high stacks]: 6.30631e-8 kg; = 1.0 * (p2044*1.5714285714)
- 4-(2,4-Dichlorophenoxy)butyric acid: 1.40268e-5 kg; = p4518+p5136+p3900+p4930+p3488+p4724+p4106
- Ammonium nitrate; no broadcast in fert. in fall bef. plant.: 0.000491272 kg; = p2437*4.7142857143
- Ethane [air, non-urban air or from high stacks]: 8.18514e-7 kg; = 1.0 * (p2126*1.25)
- Pesticide formulation balance; banded or side-dressed: 4.67271e-5 kg; = p3690
- Dioxins and furans (PCDD/F); from residue burning: 2.7022e-14 kg TEQ; = p2047
- Hydrocyanic acid: 2.56962e-7 kg; = p2154*2.25
- Urea; broadcast w/ incorp. in fert. in fall bef. plant.: 0.00165249 kg; = p2646*5
- Monoammonium phosphate; no broadcast in fert. after plant.: 0.000126525 kg; = p2576*8.2142857143
- Nitrogen solution; broadcast w/o incorp. in fert. after plant.; broadcast w/o incorp. in fert. after plant.; kg N: 0.000621897 kg; = p2951
- Ammonium sulfate; broadcast w/o incorp. in fert. after plant.: 0.000215454 kg; = p2947*4.7142857143
- Superphosphate, grades>22%; broadcast w/o incorp. in fert. in spr. bef. plant.; kg P: 2.55224e-5 kg; = p2893
- Ammonium sulfate; no broadcast in fert. in fall bef. plant.: 0.000178673 kg; = p2440*4.7142857143
- Monoammonium phosphate; broadcast w/o incorp. in fert. after plant.: 4.15471e-5 kg; = p2966*8.2142857143
- Superphosphate, grades<= 22%; no broadcast in fert. after plant.; kg P: 7.23572e-7 kg; = p2579
- Anhydrous ammonia; no broadcast in fert. after plant.: 0.00137256 kg; = p2550*1.2142857143
- Pentane [air, non-urban air or from high stacks]: 1.90557e-8 kg; = 1.0 * (p2152*1.0166666667)
- Other single K nutrients; broadcast w/ incorp. in fert. in fall bef. plant.; kg K: 0.000114158 kg; = p2665
- Urea; broadcast w/o incorp. in fert. at plant.: 9.03585e-5 kg; = p2919*5
- Nitrogen; in above-ground residue left on field: 0.0127362 kg; = p2168
- Water [air, non-urban air or from high stacks]: 9.74474e-8 m3; = 0.001 * (p2016)
- Ammonium nitrate; no broadcast in fert. in spr. bef. plant.: 0.000493984 kg; = p2476*4.7142857143
- Aminopyralid; banded or side-dressed: 1.36399e-7 kg; = p3652
- Superphosphate, grades>22%; unspec. appl. method in fert. in fall bef. plant.; kg P: 3.48942e-6 kg; = p3049
- Superphosphate, grades<= 22%; unspec. appl. method in fert. in fall bef. plant.; kg P: 2.97733e-7 kg; = p3047
- Other single K nutrients; unspec. appl. method in fert. after plant.; kg K: 2.07059e-6 kg; = p3172
- Butane [air, non-urban air or from high stacks]: 5.4723e-8 kg; = 1.0 * (p2147*1.0208333333)
- Pesticide formulation balance; broadcast without incorporation: 0.000133929 kg; = p4308
- Diammonium phosphate; broadcast w/o incorp. in fert. after plant.: 0.000108155 kg; = p2962*4.7142857143
- Sodium nitrate; no broadcast in fert. in spr. bef. plant.: 5.76603e-6 kg; = p2486*6.0714285714
- Other single phosphates; broadcast w/o incorp. in fert. in fall bef. plant.; kg P: 5.08874e-6 kg; = p2856
- Ammonium sulfate; broadcast w/o incorp. in fert. at plant.: 2.16001e-5 kg; = p2908*4.7142857143
- Ammonium nitrate; broadcast w/o incorp. in fert. in fall bef. plant.: 0.000336901 kg; = p2827*4.7142857143
- Diammonium phosphate; unspec. appl. method in fert. after plant.: 2.86018e-5 kg; = p3157*4.7142857143
- Ash: 0.000178165 kg; = p2022+p2021
- Acrylonitrile: 3.01923e-8 kg; = p2156*1.4722222222
- Urea; broadcast w/o incorp. in fert. after plant.: 0.000901299 kg; = p2958*5
- Monoammonium phosphate; broadcast w/ incorp. in fert. after plant.: 0.000291889 kg; = p2771*8.2142857143
- Other single K nutrients; broadcast w/o incorp. in fert. after plant.; kg K: 7.93424e-6 kg; = p2977
- Superphosphate, grades<= 22%; broadcast w/o incorp. in fert. in fall bef. plant.; kg P: 1.12585e-6 kg; = p2852
- Sodium nitrate; broadcast w/o incorp. in fert. at plant.: 6.93238e-7 kg; = p2915*6.0714285714
- Other single K nutrients; broadcast w/o incorp. in fert. in fall bef. plant.; kg K: 2.04166e-5 kg; = p2860
- Monoammonium phosphate; broadcast w/ incorp. in fert. in spr. bef. plant.: 0.00267527 kg; = p2693*8.2142857143
- Ethalfluralin [soil, agricultural]: 3.66854e-5 kg; = 1.0 * (p5004+p3562+p5210+p4180+p4798+p4592+p3974)
- Superphosphate, grades<= 22%; unspec. appl. method in fert. after plant.; kg P: 6.28338e-8 kg; = p3164
- Ammonium nitrate; broadcast w/o incorp. in fert. in spr. bef. plant.: 0.000338761 kg; = p2866*4.7142857143
- Nitrogen; in below-ground residue: 0.00503459 kg; = p2174
- Anhydrous ammonia; broadcast w/ incorp. in fert. in fall bef. plant.: 0.00172577 kg; = p2628*1.2142857143
- Aqueous ammonia; broadcast w/ incorp. in fert. in fall bef. plant.: 3.50948e-5 kg; = p2630*1.2142857143
- Bentazone [soil, agricultural]: 9.71083e-6 kg; = 1.0 * (p4125+p3507+p4743+p5155+p3919+p4949+p4537)
- Nitrogen dioxide: 2.52296e-6 kg; = p2039*3.2857142857
- VERNOLATE: 7.55287e-6 kg; = p5129+p4099+p3687+p4717+p5335+p4923+p4305
- Urea; no broadcast in fert. after plant.: 0.00131428 kg; = p2568*5
- Monoammonium phosphate; broadcast w/o incorp. in fert. in spr. bef. plant.: 0.000380794 kg; = p2888*8.2142857143
- Propanenitrile: 5.77162e-8 kg; = p2157*1.5277777778
- Nitrogen solution; broadcast w/o incorp. in fert. at plant.; broadcast w/o incorp. in fert. at plant.; kg N: 6.23475e-5 kg; = p2912
- Sodium nitrate; broadcast w/ incorp. in fert. at plant.: 2.23495e-6 kg; = p2720*6.0714285714
- Formaldehyde [air, non-urban air or from high stacks]: 1.87251e-6 kg; = 1.0 * (p2128*2.5)
- Aqueous ammonia; broadcast w/ incorp. in fert. after plant.: 6.17104e-5 kg; = p2747*1.2142857143
- Superphosphate, grades<= 22%; broadcast w/ incorp. in fert. in spr. bef. plant.; kg P: 1.52993e-5 kg; = p2696
- Ammonium nitrate; broadcast w/o incorp. in fert. after plant.: 0.000592404 kg; = p2944*4.7142857143
- Methane: 2.5356e-6 kg; = p2025*1.3333333333
- Other single phosphates; unspec. appl. method in fert. in spr. bef. plant.; kg P: 2.60299e-6 kg; = p3090
- Superphosphate, grades>22%; no broadcast in fert. in spr. bef. plant.; kg P: 7.77243e-5 kg; = p2503
- Sodium nitrate; broadcast w/o incorp. in fert. in fall bef. plant.: 3.93248e-6 kg; = p2837*6.0714285714
- Oxygen; applied in dolomite: 0.00434642 kg; = p3228
- Sodium nitrate; broadcast w/ incorp. in fert. in fall bef. plant.: 1.26781e-5 kg; = p2642*6.0714285714
- Butadiene [air, non-urban air or from high stacks]: 1.35904e-7 kg; = 1.0 * (p2143*1.125)
- Anhydrous ammonia; broadcast w/o incorp. in fert. after plant.: 0.000941267 kg; = p2940*1.2142857143
- Ethyne [air, non-urban air or from high stacks]: 2.45184e-7 kg; = 1.0 * (p2132*1.0833333333)
- Aminopyralid; foliar or directed spray: 1.22632e-7 kg; = p4682
- Diammonium phosphate; broadcast w/ incorp. in fert. after plant.: 0.000759843 kg; = p2767*4.7142857143
- Seeds; used in planting and sowing: 0.0312868 kg; = p2179
- Ammonium sulfate; no broadcast in fert. at plant.: 3.14974e-5 kg; = p2518*4.7142857143
- Diammonium phosphate; unspec. appl. method in fert. in spr. bef. plant.: 0.000262146 kg; = p3079*4.7142857143
- Particulates, < 10 um: 7.65623e-6 kg; = p2036+p2034
- Ammonium nitrate; broadcast w/ incorp. in fert. at plant.: 0.000191472 kg; = p2710*4.7142857143
- Superphosphate, grades<= 22%; broadcast w/o incorp. in fert. in spr. bef. plant.; kg P: 2.17769e-6 kg; = p2891
- Anhydrous ammonia; broadcast w/ incorp. in fert. in spr. bef. plant.: 0.0017353 kg; = p2667*1.2142857143
- Nitrogen solution; no broadcast in fert. in fall bef. plant.; no broadcast in fert. in fall bef. plant.; kg N: 0.00051573 kg; = p2444
- Nitrogen solution; broadcast w/ incorp. in fert. after plant.; broadcast w/ incorp. in fert. after plant.; kg N: 0.00200496 kg; = p2756
- Propiconazole [soil, agricultural]: 1.40268e-5 kg; = 1.0 * (p5293+p3645+p4881+p5087+p4057+p4675+p4263)
- Benzene [air, non-urban air or from high stacks]: 1.38214e-7 kg; = 1.0 * (p2140*1.0833333333)
- Nitrogen solution; no broadcast in fert. in spr. bef. plant.; no broadcast in fert. in spr. bef. plant.; kg N: 0.000518577 kg; = p2483
- Urea; broadcast w/o incorp. in fert. in spr. bef. plant.: 0.000515399 kg; = p2880*5
- Monoammonium phosphate; broadcast w/o incorp. in fert. in fall bef. plant.: 0.000196868 kg; = p2849*8.2142857143
- Nitrogen solution; no broadcast in fert. after plant.; no broadcast in fert. after plant.; kg N: 0.000906855 kg; = p2561
- Superphosphate, grades>22%; no broadcast in fert. in fall bef. plant.; kg P: 4.01829e-5 kg; = p2464
- Other single phosphates; unspec. appl. method in fert. after plant.; kg P: 2.84004e-7 kg; = p3168
- isopentane: 1.52445e-8 kg; = p2151*1.0166666667
- Acetaldehyde [air, non-urban air or from high stacks]: 1.12028e-6 kg; = 1.0 * (p2130*1.8333333333)
- Phosphorous; in below-ground residue: 0.000431096 kg; = p2175
- Potassium; in above-ground residue left on field; biogenic: 0.00770848 kg; = p2170
- Metolachlor [soil, agricultural]: 5.28701e-5 kg; = 1.0 * (p3620+p4856+p4032+p5268+p5062+p4238+p4650)
- isobutene: 1.0528e-7 kg; = p2150*1.1666666667
- Diammonium phosphate; no broadcast in fert. in spr. bef. plant.: 0.00301878 kg; = p2494*4.7142857143
- Oxygen; applied in limestone: 0.0493196 kg; = p3219
- Potassium chloride; broadcast w/o incorp. in fert. in fall bef. plant.: 0.000463293 kg; = p2858*2.2166666667
- Acetonitrile [air, non-urban air or from high stacks]: 1.89083e-7 kg; = 1.0 * (p2155*1.7083333333)
- Aminopyralid; broadcast with incorporation: 2.88242e-7 kg; = p4064
- Propane [air, non-urban air or from high stacks]: 2.53682e-7 kg; = 1.0 * (p2142*1.2222222222)
- Other single K nutrients; no broadcast in fert. in fall bef. plant.; kg K: 4.75087e-5 kg; = p2470
- Acetol; from residue burning: 3.39148e-6 kg; = p2134*2.0555555556
- Glycolaldehyde; from residue burning: 1.81473e-6 kg; = p2135*2.5
- Sodium nitrate; broadcast w/ incorp. in fert. in spr. bef. plant.: 1.2748e-5 kg; = p2681*6.0714285714
- Pesticide formulation balance; foliar or directed spray: 4.2011e-5 kg; = p4720
- Monoammonium phosphate; no broadcast in fert. in spr. bef. plant.: 0.00115965 kg; = p2498*8.2142857143
- Other single phosphates; broadcast w/ incorp. in fert. in fall bef. plant.; kg P: 3.57509e-5 kg; = p2661
- Carbon monoxide, fossil [air, non-urban air or from high stacks]: 5.75874e-5 kg; = 1.0 * (p2028*2.3333333333)
- Ammonium sulfate; broadcast w/ incorp. in fert. at plant.: 6.96373e-5 kg; = p2713*4.7142857143
- Potassium; in below-ground residue; biogenic: 0.00304715 kg; = p2176
- Isoprene [air, non-urban air or from high stacks]: 3.39878e-7 kg; = 1.0 * (p2145*1.1333333333)
- cis-2-Butene: 3.86926e-8 kg; = p2149*1.1666666667
- Anhydrous ammonia; broadcast w/ incorp. in fert. after plant.: 0.00303458 kg; = p2745*1.2142857143
- Other single phosphates; no broadcast in fert. in spr. bef. plant.; kg P: 2.99752e-5 kg; = p2505
- Sulfur [soil, agricultural]: 2.41522e-7 kg; = 1.0 * (p3230)
- Diammonium phosphate; broadcast w/o incorp. in fert. in fall bef. plant.: 0.000512484 kg; = p2845*4.7142857143
- Superphosphate, grades<= 22%; broadcast w/ incorp. in fert. in fall bef. plant.; kg P: 7.90965e-6 kg; = p2657
- Nitrogen solution; no broadcast in fert. at plant.; no broadcast in fert. at plant.; kg N: 9.09156e-5 kg; = p2522
- Diammonium phosphate; no broadcast in fert. in fall bef. plant.: 0.00156069 kg; = p2455*4.7142857143
- Nitrogen solution; broadcast w/ incorp. in fert. in fall bef. plant.; broadcast w/ incorp. in fert. in fall bef. plan...: 0.00114022 kg; = p2639
- Phenol [air, non-urban air or from high stacks]: 4.67185e-7 kg; = 1.0 * (p2133*1.3055555556)
- Ammonium nitrate; broadcast w/ incorp. in fert. in spr. bef. plant.: 0.00109214 kg; = p2671*4.7142857143
- Ammonium sulfate; broadcast w/o incorp. in fert. in spr. bef. plant.: 0.000123206 kg; = p2869*4.7142857143
- 2,4-D [soil, agricultural]: 6.47389e-6 kg; = 1.0 * (p4927+p4515+p5133+p3897+p4103+p4721+p3485)
- Superphosphate, grades>22%; unspec. appl. method in fert. after plant.; kg P: 7.36409e-7 kg; = p3166
- Plant dry matter; in below-ground residue: 0.123358 kg; = p2177
- Particulates, < 2.5 um [air, non-urban air or from high stacks]: 5.54852e-6 kg; = 1.0 * (p2035+p2033)
- Anhydrous ammonia; broadcast w/o incorp. in fert. at plant.: 9.43654e-5 kg; = p2901*1.2142857143
- Aqueous ammonia; no broadcast in fert. after plant.: 2.79121e-5 kg; = p2552*1.2142857143
- Filler materials, applied with synthetic fertilizer: 0.0250499 kg; = p2432
- Sethoxydim [soil, agricultural]: 4.31593e-6 kg; = 1.0 * (p3659+p4277+p4895+p4689+p5101+p4071+p5307)
- Monoammonium phosphate; broadcast w/ incorp. in fert. in fall bef. plant.: 0.0013831 kg; = p2654*8.2142857143
- Potassium chloride; broadcast w/o incorp. in fert. after plant.: 0.000180044 kg; = p2975*2.2166666667
- Carbon [soil, agricultural]: 0.446904 kg; = 1.0 * (p2167+p3217+p2173+p3242+p3225)
- Other single phosphates; no broadcast in fert. after plant.; kg P: 3.27048e-6 kg; = p2583
- Superphosphate, grades<= 22%; no broadcast in fert. in fall bef. plant.; kg P: 3.42859e-6 kg; = p2462
- Aminopyralid; broadcast without incorporation: 3.90945e-7 kg; = p4270
- Ammonium nitrate; no broadcast in fert. after plant.: 0.000863848 kg; = p2554*4.7142857143
- Diammonium phosphate; broadcast w/ incorp. in fert. in spr. bef. plant.: 0.00696423 kg; = p2689*4.7142857143
- Potassium chloride; broadcast w/ incorp. in fert. in fall bef. plant.: 0.00259047 kg; = p2663*2.2166666667
- Potassium chloride; unspec. appl. method in fert. in spr. bef. plant.: 0.000335981 kg; = p3092*2.2166666667
- Aminopyralid; unspec. appl. method: 6.96058e-8 kg; = p5300
- Zinc compounds: 6.20835e-8 kg; = p3232
- Aminopyralid; in seed furrow: 5.17161e-8 kg; = p5094
- Sewage sludge dry matter; applied in sewage sludge: 5.05979e-10 kg; = p3243
- Potassium chloride; broadcast w/ incorp. in fert. in spr. bef. plant.: 0.00719859 kg; = p2702*2.2166666667
- Nitrogen solution; broadcast w/o incorp. in fert. in fall bef. plant.; broadcast w/o incorp. in fert. in fall bef. pl...: 0.000353674 kg; = p2834
- Pesticide formulation balance; unspec. appl. method: 2.38453e-5 kg; = p5338
- Aqueous ammonia; no broadcast in fert. in fall bef. plant.: 1.58736e-5 kg; = p2435*1.2142857143
- cyclopentane: 1.48986e-9 kg; = p2153*1.0166666667
- Methyl vinyl ether; from residue burning: 6.83175e-8 kg; = p2137*1.6111111111
- Pesticide formulation balance; broadcast with incorporation: 9.87448e-5 kg; = p4102
- Anhydrous ammonia; no broadcast in fert. in fall bef. plant.: 0.000780579 kg; = p2433*1.2142857143
- Furan [air, non-urban air or from high stacks]: 9.85315e-8 kg; = 1.0 * (p2138*1.4166666667)
- Aldicarb [soil, agricultural]: 2.37376e-5 kg; = 1.0 * (p4117+p4529+p4735+p3499+p5147+p3911+p4941)
- Diammonium phosphate; broadcast w/ incorp. in fert. in fall bef. plant.: 0.00360046 kg; = p2650*4.7142857143
- Other single K nutrients; unspec. appl. method in fert. in spr. bef. plant.; kg K: 1.48061e-5 kg; = p3094
- Pendimethalin [soil, agricultural]: 0.000133794 kg; = 1.0 * (p4664+p4252+p4046+p5282+p5076+p3634+p4870)
- Monoammonium phosphate; unspec. appl. method in fert. in spr. bef. plant.: 0.000100702 kg; = p3083*8.2142857143
- Other single K nutrients; broadcast w/ incorp. in fert. in spr. bef. plant.; kg K: 0.00031723 kg; = p2704
- Anhydrous ammonia; broadcast w/o incorp. in fert. in spr. bef. plant.: 0.000538255 kg; = p2862*1.2142857143
- Sulfuric acid [soil, agricultural]: 6.05192e-8 kg; = 1.0 * (p3231)
- Potassium chloride; broadcast w/ incorp. in fert. after plant.: 0.0010067 kg; = p2780*2.2166666667
- Superphosphate, grades>22%; broadcast w/ incorp. in fert. after plant.; kg P: 1.95636e-5 kg; = p2776
- Monoammonium phosphate; unspec. appl. method in fert. after plant.: 1.09872e-5 kg; = p3161*8.2142857143
- Superphosphate, grades<= 22%; broadcast w/ incorp. in fert. after plant.; kg P: 1.66926e-6 kg; = p2774
- Superphosphate, grades>22%; broadcast w/o incorp. in fert. in fall bef. plant.; kg P: 1.31949e-5 kg; = p2854
- Ammonia [air, non-urban air or from high stacks]: 1.95467e-6 kg; = 1.0 * (p2159*1.2142857143)
- Nitrogen solution; broadcast w/ incorp. in fert. at plant.; broadcast w/ incorp. in fert. at plant.; kg N: 0.000201004 kg; = p2717
- Other single K nutrients; no broadcast in fert. after plant.; kg K: 1.84627e-5 kg; = p2587
- Ammonium nitrate; broadcast w/ incorp. in fert. in fall bef. plant.: 0.00108615 kg; = p2632*4.7142857143
- Superphosphate, grades>22%; broadcast w/ incorp. in fert. in spr. bef. plant.; kg P: 0.000179308 kg; = p2698
- Glyphosate [soil, agricultural]: 1.61847e-5 kg; = 1.0 * (p4616+p5028+p3586+p4822+p4204+p5234+p3998)
- Aqueous ammonia; broadcast w/o incorp. in fert. after plant.: 1.91414e-5 kg; = p2942*1.2142857143
- Other single phosphates; broadcast w/o incorp. in fert. in spr. bef. plant.; kg P: 9.84295e-6 kg; = p2895
- Ammonium sulfate; no broadcast in fert. in spr. bef. plant.: 0.000179659 kg; = p2479*4.7142857143
- Monoammonium phosphate; no broadcast in fert. in fall bef. plant.: 0.00059953 kg; = p2459*8.2142857143
- Sodium nitrate; no broadcast in fert. at plant.: 1.01089e-6 kg; = p2525*6.0714285714
- Superphosphate, grades>22%; broadcast w/o incorp. in fert. after plant.; kg P: 2.78466e-6 kg; = p2971
- Methanol [air, non-urban air or from high stacks]: 2.96033e-6 kg; = 1.0 * (p2129*2.6666666667)
- Anhydrous ammonia; broadcast w/o incorp. in fert. in fall bef. plant.: 0.0005353 kg; = p2823*1.2142857143
- Other single phosphates; broadcast w/ incorp. in fert. after plant.; kg P: 7.5449e-6 kg; = p2778
- Sodium nitrate; broadcast w/o incorp. in fert. after plant.: 6.91484e-6 kg; = p2954*6.0714285714
- Other single phosphates; broadcast w/ incorp. in fert. in spr. bef. plant.; kg P: 6.91517e-5 kg; = p2700
- Potassium chloride; unspec. appl. method in fert. after plant.: 4.6986e-5 kg; = p3170*2.2166666667
- Anhydrous ammonia; no broadcast in fert. in spr. bef. plant.: 0.000784887 kg; = p2472*1.2142857143
- Urea; broadcast w/o incorp. in fert. in fall bef. plant.: 0.00051257 kg; = p2841*5
- Superphosphate, grades<= 22%; no broadcast in fert. in spr. bef. plant.; kg P: 6.6318e-6 kg; = p2501
- Ammonium nitrate; broadcast w/o incorp. in fert. at plant.: 5.93907e-5 kg; = p2905*4.7142857143
- Calcium [soil, agricultural]: 0.0431231 kg; = 1.0 * (p3218+p3226)
- Superphosphate, grades>22%; broadcast w/ incorp. in fert. in fall bef. plant.; kg P: 9.27007e-5 kg; = p2659
- Urea; broadcast w/ incorp. in fert. at plant.: 0.00029131 kg; = p2724*5
- Other single K nutrients; broadcast w/ incorp. in fert. after plant.; kg K: 4.43637e-5 kg; = p2782
- Other single K nutrients; no broadcast in fert. in spr. bef. plant.; kg K: 0.000132021 kg; = p2509
- Anhydrous ammonia; no broadcast in fert. at plant.: 0.000137604 kg; = p2511*1.2142857143
- Carbon dioxide, in air: 0.00126258 kg; = p2163*3.6666666667
- Potassium chloride; unspec. appl. method in fert. in fall bef. plant.: 0.000120905 kg; = p3053*2.2166666667
- Nitrogen solution; broadcast w/ incorp. in fert. in spr. bef. plant.; broadcast w/ incorp. in fert. in spr. bef. plan...: 0.00114652 kg; = p2678
- Urea; broadcast w/ incorp. in fert. after plant.: 0.00290573 kg; = p2763*5
- Phosphorous; in above-ground residue left on field: 0.00109056 kg; = p2169
- Trifluralin [soil, agricultural]: 4.53172e-5 kg; = 1.0 * (p4304+p5334+p4098+p4922+p4716+p5128+p3686)
- Urea; no broadcast in fert. in spr. bef. plant.: 0.00075156 kg; = p2490*5
- Pesticide formulation balance; in seed furrow: 1.77167e-5 kg; = p5132
- Imazethapyr [soil, agricultural]: 3.23694e-6 kg; = 1.0 * (p4213+p5037+p4831+p3595+p4007+p4625+p5243)
- Magnesium [soil, agricultural]: 0.00109831 kg; = 1.0 * (p3227)
- Superphosphate, grades>22%; no broadcast in fert. after plant.; kg P: 8.48023e-6 kg; = p2581
- Sodium nitrate; no broadcast in fert. in fall bef. plant.: 5.73438e-6 kg; = p2447*6.0714285714
- Tebuconazole [soil, agricultural]: 3.45274e-5 kg; = 1.0 * (p4285+p5315+p4903+p4697+p4079+p5109+p3667)
- Ammonium sulfate; broadcast w/o incorp. in fert. in fall bef. plant.: 0.000122529 kg; = p2830*4.7142857143
- Urea; no broadcast in fert. at plant.: 0.000131762 kg; = p2529*5
- Sodium nitrate; broadcast w/ incorp. in fert. after plant.: 2.2293e-5 kg; = p2759*6.0714285714
- Other single K nutrients; unspec. appl. method in fert. in fall bef. plant.; kg K: 5.3281e-6 kg; = p3055
- Toluene [air, non-urban air or from high stacks]: 1.71564e-7 kg; = 1.0 * (p2141*1.0952380952)
- Other single phosphates; no broadcast in fert. in fall bef. plant.; kg P: 1.54969e-5 kg; = p2466
- Acetone [air, non-urban air or from high stacks]: 4.01961e-7 kg; = 1.0 * (p2139*1.6111111111)
- Sodium nitrate; broadcast w/o incorp. in fert. in spr. bef. plant.: 3.95419e-6 kg; = p2876*6.0714285714
- Other single phosphates; unspec. appl. method in fert. in fall bef. plant.; kg P: 1.34573e-6 kg; = p3051
- Ammonium sulfate; broadcast w/ incorp. in fert. in fall bef. plant.: 0.000395026 kg; = p2635*4.7142857143
- Ammonium sulfate; no broadcast in fert. after plant.: 0.000314177 kg; = p2557*4.7142857143
- Ammonium sulfate; broadcast w/ incorp. in fert. in spr. bef. plant.: 0.000397207 kg; = p2674*4.7142857143
- Ammonium nitrate; broadcast w/ incorp. in fert. after plant.: 0.00190987 kg; = p2749*4.7142857143
- Sodium nitrate; no broadcast in fert. after plant.: 1.00833e-5 kg; = p2564*6.0714285714
- Formic acid [air, non-urban air or from high stacks]: 9.02553e-7 kg; = 1.0 * (p2131*3.8333333333)
- Aqueous ammonia; broadcast w/o incorp. in fert. in fall bef. plant.: 1.08857e-5 kg; = p2825*1.2142857143
- Plant dry matter; from residue burning: 0.000300742 kg; = p2164
- Ethene [air, non-urban air or from high stacks]: 1.31057e-6 kg; = 1.0 * (p2125*1.1666666667)
- Potassium chloride; broadcast w/o incorp. in fert. in spr. bef. plant.: 0.00128743 kg; = p2897*2.2166666667
- Superphosphate, grades<= 22%; broadcast w/o incorp. in fert. after plant.; kg P: 2.376e-7 kg; = p2969
- 1-Butene: 1.20577e-7 kg; = p2144*1.1666666667
- Potassium chloride; no broadcast in fert. after plant.: 0.000418957 kg; = p2585*2.2166666667
- Gypsum: 1.88835e-6 kg; = p3229
- Pesticides, unspecified [soil, agricultural]: 7.82291e-5 kg; = 1.0 * (p5131+p4101+p4307+p4925+p4719+p5337+p3689)
- NMVOC, non-methane volatile organic compounds, unspecified origin [air, non-urban air or from high stacks]: 2.31436e-5 kg; = 1.0 * (p2052+p2051)
- Aqueous ammonia; broadcast w/o incorp. in fert. in spr. bef. plant.: 1.09458e-5 kg; = p2864*1.2142857143
- Azoxystrobin [soil, agricultural]: 5.39491e-6 kg; = 1.0 * (p3916+p4534+p5152+p4740+p4946+p4122+p3504)
- Other limestone constituents; applied in limestone: 0.00656441 kg; = p3220
- Ammonium nitrate; no broadcast in fert. at plant.: 8.6604e-5 kg; = p2515*4.7142857143
- Urea; no broadcast in fert. in fall bef. plant.: 0.000747434 kg; = p2451*5
- Ammonium sulfate; broadcast w/ incorp. in fert. after plant.: 0.000694611 kg; = p2752*4.7142857143

## Sampling procedure
A delete-a-group jackknife is used by the USDA to estimate the ARMS sample means and RSEs, based on a 15 sample delete-a-group jackknife. Because of this relatively small sample size, a Students t distribution is used to represent ARMS data probability density functions. Other representations of uncertainty are described in Cooper, J.S., Kahn, E., Noon, M. (2012). LCA Digital Commons Unit Process Data: field crop production Version 1. Prepared for the US Department of Agriculture National Agricultural Library. Retrieved from https://www.lcacommons.gov/discovery/docs/LCA%20Digital%20Commons%20Unit%20Process%20Data%20final%20updated.pdf

## Extrapolations
Data represent an aggregation of processes applied in Texas in 1999. Data development is demonstrated by parameterization (exlicitly presents all raw and uncertainty data and all calculations). Flow data quality according to the LCADC convention is provided for all flows.
