# CUTOFF international vessel transport; average fuel

Dataset: EcoSpold 2, unit process
Geography: GLO
Time period: 1996-01-02 to 2010-01-01
Scenario: Business-as-Usual
System model: Allocation, ecoinvent default
Generated by: cooperjs@u.washington.edu
isCopyrightProtected: false

## General comment
This unit process/ gate-to-gate dataset provides a crosswalk between the exchange "CUTOFF international vessel transport; average fuel" in the USDA LCA Commons to the exchange "transport, transoceanic freight ship" in the ecoinvent 2.2 database. As a result of the crosswalk, the geographic representativeness is reduced, with the ecoinvent 2.2 data representing operations in Oceanic as opposed to operation in South Carolina (US State). The impact on the temporal representativeness is not known. Applicable classifications include ISIC 5012, NAIC 483111, UNSPSC 78101702. This dataset was prepared in ILCD format using the UWDFE Lab Excel to ILCD File Generator (beta version, August 2013).

## Geography
Operations in Oceanic are used as a surrogate for operations in South Carolina (US State).

## Technology
This process represents transport, transoceanic freight ship in South Carolina (US State), measured on a per t*km basis. Included processes are listed in the meta data for the "transport, transoceanic freight ship" dataset in the ecoinvent 2.2 database.

## Time period
Start and end dates match the underlying data obtained from the USDA Agricultural Resource Management Survey (ARMS) for all data contained within the USDA Digital Commons.

## Reference product
- CUTOFF international vessel transport; average fuel: 1 metric ton*km

## Inputs from technosphere
- transport, transoceanic freight ship: 1 metric ton*km

## Sampling procedure
Boundary conditions are described in the meta data for the "transport, transoceanic freight ship" dataset in the ecoinvent 2.2 database. Uncertainty is not estimated.

## Extrapolations
No quantitative transformation has been performed. Flow data quality according to the LCADC convention is provided for all flows.
