# soybeans; at harvest in 2006; at farm; 85%-92% moisture

Dataset: EcoSpold 2, unit process
Geography: GLO
Time period: 2006-01-02 to 2007-01-01
Scenario: Business-as-Usual
System model: Allocation, ecoinvent default
Generated by: cooperjs@u.washington.edu
isCopyrightProtected: false

## General comment
This unit process/ gate-to-gate dataset represents the production of 1 kg soybeans coproduced with residue. The process technologies are an aggregation of those applied in Wisconsin in 2006. Applicable classifications include ISIC 0111, NAIC 111110, UNSPSC 50407053; this dataset was prepared in ILCD format using the UWDFE Lab Excel to ILCD File Generator (beta version, August 2013)

Exchange "Metribuzin-soil agricultural" is the result of combining the following original LCA Commons flows: "Metribuzin; broadcast with incorporation; kg AI", "Metribuzin; foliar or directed spray; kg AI", "Metribuzin; unspec. appl. method; kg AI", "Metribuzin; broadcast without incorporation; kg AI".
Exchange "S-Metolachlor-soil agricultural" is the result of combining the following original LCA Commons flows: "S-Metolachlor; broadcast without incorporation; kg AI", "S-Metolachlor; broadcast with incorporation; kg AI", "S-Metolachlor; unspec. appl. method; kg AI", "S-Metolachlor; foliar or directed spray; kg AI".
Exchange "NMVOC, non-methane volatile organic compounds, unspecified origin-air low population density" is the result of combining the following original LCA Commons flows: "NMVOCs; from residue burning; kg C, biogenic", "NMVOCs; from residue burning; kg except C, biogenic".
Exchange "Glyphosate-soil agricultural" is the result of combining the following original LCA Commons flows: "Glyphosate; unspec. appl. method; kg AI", "Glyphosate; foliar or directed spray; kg AI", "Glyphosate; broadcast with incorporation; kg AI", "Glyphosate; broadcast without incorporation; kg AI".
Exchange "Imazethapyr-soil agricultural" is the result of combining the following original LCA Commons flows: "Imazethapyr; broadcast without incorporation; kg AI", "Imazethapyr; foliar or directed spray; kg AI", "Imazethapyr; unspec. appl. method; kg AI", "Imazethapyr; broadcast with incorporation; kg AI".
Exchange "Carbon-soil agricultural" is the result of combining the following original LCA Commons flows: "Carbon; broadcast w/ incorp. in manure in fall before planting; biogenic", "Carbon; broadcast w/ incorp. in manure in spring before planting; biogenic", "Carbon; applied in dolomite", "Carbon; in below-ground residue; biogenic", "Carbon; in above-ground residue left on field; biogenic", "Carbon; broadcast w/o incorp. in manure in spring before planting; biogenic", "Carbon; using unspec. method in manure in fall before planting; biogenic", "Carbon; using unspec. method in manure in spring before planting; biogenic", "Carbon; broadcast w/o incorp. in manure in fall before planting; biogenic", "Carbon; applied in limestone", "Carbon; applied in sewage sludge".
Exchange "Particulates, < 2.5 um-air low population density" is the result of combining the following original LCA Commons flows: "PM2.5; from residue burning; kg C, biogenic", "PM2.5; from residue burning; kg except C, biogenic".
Exchange "Pesticides, unspecified-soil agricultural" is the result of combining the following original LCA Commons flows: "Unspecified pesticide; broadcast without incorporation; kg AI", "Unspecified pesticide; unspec. appl. method; kg AI", "Unspecified pesticide; broadcast with incorporation; kg AI", "Unspecified pesticide; foliar or directed spray; kg AI".
Exchange "Clethodim-soil agricultural" is the result of combining the following original LCA Commons flows: "Clethodim; broadcast without incorporation; kg AI", "Clethodim; broadcast with incorporation; kg AI", "Clethodim; foliar or directed spray; kg AI", "Clethodim; unspec. appl. method; kg AI".
Exchange "Ash-soil agricultural" is the result of combining the following original LCA Commons flows: "Ash; from residue burning; kg C, biogenic", "Ash; from residue burning; kg except C, biogenic".
Exchange "Water-soil agricultural" is the result of combining the following original LCA Commons flows: "Water; in above-ground residue left on field; biogenic", "Water; broadcast w/ incorp. in manure", "Water; broadcast w/o incorp. in manure", "Water; using unspec. method in manure", "Water; from irrigation and applied with manure and sewage sludge", "Water; in below-ground residue; biogenic".
Exchange "Pendimethalin-soil agricultural" is the result of combining the following original LCA Commons flows: "Pendimethalin; broadcast without incorporation; kg AI", "Pendimethalin; broadcast with incorporation; kg AI", "Pendimethalin; unspec. appl. method; kg AI", "Pendimethalin; foliar or directed spray; kg AI".
Exchange "Chlorimuron-ethyl-soil agricultural" is the result of combining the following original LCA Commons flows: "Chlorimuron-ethyl; broadcast with incorporation; kg AI", "Chlorimuron-ethyl; foliar or directed spray; kg AI", "Chlorimuron-ethyl; broadcast without incorporation; kg AI", "Chlorimuron-ethyl; unspec. appl. method; kg AI".
Exchange "Water, unspecified origin-resource in water" is the result of combining the following original LCA Commons flows: "Water; from plant uptake; biogenic", "Water; withdrawal from unspec. source, for soybeans, in 2006".
Exchange "Cloransulam-methyl-soil agricultural" is the result of combining the following original LCA Commons flows: "Cloransulam-methyl; broadcast without incorporation; kg AI", "Cloransulam-methyl; unspec. appl. method; kg AI", "Cloransulam-methyl; foliar or directed spray; kg AI", "Cloransulam-methyl; broadcast with incorporation; kg AI".
Exchange "Particulates, < 10 um-air low population density" is the result of combining the following original LCA Commons flows: "PM10; from residue burning; kg except C, biogenic", "PM10; from residue burning; kg C, biogenic".
Exchange "Transformation, from arable-resource land" is the result of combining the following original LCA Commons flows: "Transformation; from arable, from other to soybeans", "Transformation; from arable, from unspec. use to soybeans", "Transformation; from arable, from soy to soybeans", "Transformation; from arable, from corn to soybeans", "Transformation; from arable, from small grains to soybeans".
Exchange "Calcium-soil agricultural" is the result of combining the following original LCA Commons flows: "Calcium; applied in limestone", "Calcium; applied in dolomite".
Exchange "Imazamox-soil agricultural" is the result of combining the following original LCA Commons flows: "Imazamox; unspec. appl. method; kg AI", "Imazamox; broadcast without incorporation; kg AI", "Imazamox; foliar or directed spray; kg AI", "Imazamox; broadcast with incorporation; kg AI".
Exchange "2,4-D-soil agricultural" is the result of combining the following original LCA Commons flows: "2,4-D; foliar or directed spray; kg AI", "2,4-D; broadcast with incorporation; kg AI", "2,4-D; broadcast without incorporation; kg AI", "2,4-D; unspec. appl. method; kg AI".
Exchange "Phenol-2bdf9967-6dae-4183-88d1-8f612548c51e low population density" was originally named: "Phenol; from residue burning; kg C, biogenic" in this dataset.
Exchange "1-Butene-2bdf9967-6dae-4183-88d1-8f612548c51e low population density" was originally named: "1 butene; from residue burning; kg C, biogenic" in this dataset.
Exchange "Carbon dioxide-c19fb2d9-98eb-4cd3-8761-81b71d8a9a1b unspecified" was originally named: "Carbon dioxide; from plant uptake; kg C, biogenic" in this dataset.
Exchange "Acetonitrile-2bdf9967-6dae-4183-88d1-8f612548c51e low population density" was originally named: "Acetonitrile; from residue burning; kg C, biogenic" in this dataset.
Exchange "Acetone-2bdf9967-6dae-4183-88d1-8f612548c51e low population density" was originally named: "Acetone; from residue burning; kg C, biogenic" in this dataset.
Exchange "Transformation, to arable-c19fb2d9-98eb-4cd3-8761-81b71d8a9a1b land" was originally named: "Transformation; to arable, to soybeans" in this dataset.
Exchange "Sulfuric acid-be1c0329-f1a8-4524-8420-a86d2a8dd358 agricultural" was originally named: "Sulfuric acid; as secondary application" in this dataset.
Exchange "Methane-2bdf9967-6dae-4183-88d1-8f612548c51e low population density" was originally named: "Methane; from residue burning; kg C, biogenic" in this dataset.
Exchange "Propene-2bdf9967-6dae-4183-88d1-8f612548c51e low population density" was originally named: "Propylene; from residue burning; kg C, biogenic" in this dataset.
Exchange "Ethane-2bdf9967-6dae-4183-88d1-8f612548c51e low population density" was originally named: "Ethane; from residue burning; kg C, biogenic" in this dataset.
Exchange "Ethene-2bdf9967-6dae-4183-88d1-8f612548c51e low population density" was originally named: "Ethylene; from residue burning; kg C, biogenic" in this dataset.
Exchange "cis-2-Butene-2bdf9967-6dae-4183-88d1-8f612548c51e low population density" was originally named: "Cis 2 butene; from residue burning; kg C, biogenic" in this dataset.
Exchange "Ammonia-2bdf9967-6dae-4183-88d1-8f612548c51e low population density" was originally named: "Ammonia; from residue burning; kg N, biogenic" in this dataset.
Exchange "isobutene-2bdf9967-6dae-4183-88d1-8f612548c51e low population density" was originally named: "I butene; from residue burning; kg C, biogenic" in this dataset.
Exchange "Hydrocyanic acid-2bdf9967-6dae-4183-88d1-8f612548c51e low population density" was originally named: "Hydrogen cyanide; from residue burning; kg C, biogenic" in this dataset.
Exchange "Occupation, arable-c19fb2d9-98eb-4cd3-8761-81b71d8a9a1b land" was originally named: "Occupation; arable, as soybeans" in this dataset.
Exchange "Zinc compounds-be1c0329-f1a8-4524-8420-a86d2a8dd358 agricultural" was originally named: "Zinc compounds; as secondary application" in this dataset.
Exchange "Sulfur dioxide-2bdf9967-6dae-4183-88d1-8f612548c51e low population density" was originally named: "Sulfur dioxide; from residue burning; biogenic" in this dataset.
Exchange "Isoprene-2bdf9967-6dae-4183-88d1-8f612548c51e low population density" was originally named: "Isoprene; from residue burning; kg C, biogenic" in this dataset.
Exchange "Acrylonitrile-2bdf9967-6dae-4183-88d1-8f612548c51e low population density" was originally named: "Propenenitrile; from residue burning; kg C, biogenic" in this dataset.
Exchange "Acetaldehyde-2bdf9967-6dae-4183-88d1-8f612548c51e low population density" was originally named: "Acetaldehyde; from residue burning; kg C, biogenic" in this dataset.
Exchange "isopentane-2bdf9967-6dae-4183-88d1-8f612548c51e low population density" was originally named: "I pentane; from residue burning; kg C, biogenic" in this dataset.
Exchange "Magnesium-be1c0329-f1a8-4524-8420-a86d2a8dd358 agricultural" was originally named: "Magnesium; applied in dolomite" in this dataset.
Exchange "Pentane-2bdf9967-6dae-4183-88d1-8f612548c51e low population density" was originally named: "N pentane; from residue burning; kg C, biogenic" in this dataset.
Exchange "Propane-2bdf9967-6dae-4183-88d1-8f612548c51e low population density" was originally named: "Propane; from residue burning; kg C, biogenic" in this dataset.
Exchange "Toluene-2bdf9967-6dae-4183-88d1-8f612548c51e low population density" was originally named: "Toluene; from residue burning; kg C, biogenic" in this dataset.
Exchange "Carbon dioxide, in air-2bdf9967-6dae-4183-88d1-8f612548c51e low population density" was originally named: "Carbon dioxide; from residue burning; kg C, biogenic" in this dataset.
Exchange "Nitrogen dioxide-2bdf9967-6dae-4183-88d1-8f612548c51e low population density" was originally named: "Nitrogen dioxide; from residue burning; kg N, biogenic" in this dataset.
Exchange "Furan-2bdf9967-6dae-4183-88d1-8f612548c51e low population density" was originally named: "Furan; from residue burning; kg C, biogenic" in this dataset.
Exchange "Acetic acid-2bdf9967-6dae-4183-88d1-8f612548c51e low population density" was originally named: "Acetic acid; from residue burning; kg C, biogenic" in this dataset.
Exchange "Butane-2bdf9967-6dae-4183-88d1-8f612548c51e low population density" was originally named: "N butane; from residue burning; kg C, biogenic" in this dataset.
Exchange "Ethyne-2bdf9967-6dae-4183-88d1-8f612548c51e low population density" was originally named: "Acetylene; from residue burning; kg C, biogenic" in this dataset.
Exchange "Methanol-2bdf9967-6dae-4183-88d1-8f612548c51e low population density" was originally named: "Methanol; from residue burning; kg C, biogenic" in this dataset.
Exchange "Water-2bdf9967-6dae-4183-88d1-8f612548c51e low population density" was originally named: "Water; from residue burning; biogenic" in this dataset.
Exchange "Sulfur-be1c0329-f1a8-4524-8420-a86d2a8dd358 agricultural" was originally named: "Sulfur; as secondary application" in this dataset.
Exchange "Benzene-2bdf9967-6dae-4183-88d1-8f612548c51e low population density" was originally named: "Benzene; from residue burning; kg C, biogenic" in this dataset.
Exchange "Formic acid-2bdf9967-6dae-4183-88d1-8f612548c51e low population density" was originally named: "Formic acid; from residue burning; kg C, biogenic" in this dataset.
Exchange "Phosphorus-c19fb2d9-98eb-4cd3-8761-81b71d8a9a1b unspecified" was originally named: "Phosphorous; from plant uptake; biogenic" in this dataset.
Exchange "Carbon monoxide, fossil-2bdf9967-6dae-4183-88d1-8f612548c51e low population density" was originally named: "Carbon monoxide; from residue burning; kg C, biogenic" in this dataset.
Exchange "Formaldehyde-2bdf9967-6dae-4183-88d1-8f612548c51e low population density" was originally named: "Formaldehyde; from residue burning; kg C, biogenic" in this dataset.
Exchange "trans-2-Butene-2bdf9967-6dae-4183-88d1-8f612548c51e low population density" was originally named: "Trans 2 butene; from residue burning; kg C, biogenic" in this dataset.
Exchange "Butadiene-2bdf9967-6dae-4183-88d1-8f612548c51e low population density" was originally named: "1,3 butadiene; from residue burning; kg C, biogenic" in this dataset.
Exchange "Dinitrogen monoxide-2bdf9967-6dae-4183-88d1-8f612548c51e low population density" was originally named: "Dinitrogen monoxide; from residue burning; kg N, biogenic" in this dataset.

## Geography
The unit process is assumed to represent production in Wisconsin (US State).

## Technology
This process produces soybeans; at harvest in 2006; at farm; 85%-92% moisture. The process is assumed to represent production in Wisconsin (US State). Yields and related inputs and outputs represent a single year of operation, in 2006. This dataset includes consideration of residue burning; soil preparation; planting or sowing; irrigation; application, storage, and transport of fertilizers, manures, liming materials, secondary materials, and pesticides; and harvest. Fate and transport of applications are not included as described in Cooper, J.S., Kahn, E., Noon, M. (2012) LCA Digital Commons Unit Process Data: field crop production Version 1 which is available at https://www.lcacommons.gov/discovery/docs/LCA%20Digital%20Commons%20Unit%20Process%20Data%20final%20updated.pdf

## Time period
Start and end dates match the underlying data obtained from the USDA Agricultural Resource Management Survey (ARMS).
## Parameters
- p2238: 0; = p2222*p2183
- p1118: 0.000350214; = IF(p1071=0;p1108/(p1113*p0818);0)
- p1085: 213975; = IF(p1071=0;p1079*(p0710/100)*p0703*1000;0)
- p1755: 0
- p2593: 0; = p2397*p1014
- p2481: 2.56151e-6; = p2285*p1014
- p3138: 0; = p2357*p1023
- p2216: 3.51533e-5; = p1108/p0818
- p2068: 0.153529
- p0966: 0.07005; = if(p0683=0;0;IF(p0684/100+p0965=1;0;1-(p0684/100+p0965)))
- p0271: 10.338
- p2748: 0; = p2357*(p1019+p1021)
- p2722: 1.72113e-7; = p2331*(p1019+p1021)
- p2896: 6.28295e-5; = p2310*(p1079+p1081)
- p4651: 4.33744e-7; = p1890*p3481
- p3184: 0; = p2403*p1023
- p2102: 0.922577
- p3378: 0; = if(p1232=0;p3246*p3360/p0818;0)
- p2608: 0; = p2412*p1014
- p3027: 0; = p2246*p1023
- p3068: 2.55757e-6; = p2287*p1023
- p0370: 0.5
- p2495: 3.39898e-5; = p2299*p1073
- p1724: 0
- p3191: 0; = p2410*p1023
- p2255: 0; = p2222*p2201
- p1253: 0.18061; = if(p1232>0;0;p0735/100)
- p0207: 28.521
- p3272: 0.0398246
- p0831: 0.1036; = 1-p0824
- p3119: 0; = p2338*p1082
- p2797: 0; = p2406*(p1019+p1021)
- p2379: 0; = p2229*p2208
- p0106: 13.051
- p2773: 0; = p2382*(p1078+p1080)
- p0715: 0
- p4354: 0; = p1799*p3480
- p1752: 0
- p2551: 0; = p2355*p1014
- p2367: 0; = p2225*p2196
- p0005: 1.60934
- p2830: 0; = p2244*(p1020+p1022)
- p1826: 0
- p0763: 1649.95; = p0103*(1+p0631*p0235/100)
- p2555: 0; = p2359*p1014
- p2556: 0; = p2360*p1014
- p1604: 0
- p4210: 1.68006e-8; = p1861*p3479
- p2143: 9.80127e-7; = p2015*p2071*p2105/(p0818*1000)
- p1972: 0; = if(p0807=480;p1967*p0001/(p0818*p0002);0)
- p2903: 1.37505e-6; = p2317*(p1020+p1022)
- p2076: 0.057
- p1570: 0
- p1852: 0
- p3186: 0; = p2405*p1023
- p1828: 0
- p2115: 0.856281
- p1988: 750
- p1688: 0
- p1189: 0.000340008; = p0801*p0001/(p0818*p0002)
- p2565: 0; = p2369*p1014
- p1963d: 0; = p1608*p1812+p1609*p1813+p1610*p1814+p1611*p1815+p1612*p1816+p1613*p1817+p1614*p1818+p1615*p1819+p1616*p1820+p1617*p1821+p1618*p1822+p1619*p1823+p1620*p1824+p1621*p1825+p1622*p1826+p1623*p1827+p1624*p1828+p1625*p1829+p1626*p1830+p1627*p1831
- p0971: 0.000669303; = p0968/p0818
- p3154: 0; = p2373*p1023
- p2900: 0.00119534; = p2314*(p1129+p1131)
- p0870: 1.55975e6; = p0858*p0856
- p2208: 0.00086722; = p1110/p0818
- p2161: 6.46801e-8; = p2015*p2085*p2123/(p0818*1000)
- p0996: 0; = if(p0888=0;0;if((p0691*p0690*1000*p0692/100)/p0888>1;1;(p0691*p0690*1000*p0692/100)/p0888))
- p2575: 0; = p2379*p1073
- p2851: 0.000273712; = p2265*(p1079+p1081)
- p2382: 0; = p2229*p2211
- p2116: 0.444424
- p1074: 0.42304; = IF(p1071=0;p0712/100;0)
- p0135: 14.236
- p3445: 0; = p3369*p1240
- p1231: 0.0340809; = IF(p1221=0;0;p1230*(p1228+p1229))
- p3274: 0.0768939
- p2654: 5.57506e-5; = p2263*(p1078+p1080)
- p2051: 0.000178771; = p2015*p2049*p2050/(p0818*1000)
- p1055: 2362.82; = IF(p1012=0;p1048*p1036;0)
- p3223: 0.126838; = IF(p3216=0;0;(1-p1223)*24.3050/84.3139)
- p0804: 0
- p1328: 0; = p1319*p0801
- p3084: 0; = p2303*p1082
- p2497: 9.86952e-5; = p2301*p1073
- p2039: 7.0309e-6; = p2015*p2037*p2038/(p0818*1000)
- p3477: 0; = if(p1328+p1330+p1332+p1334+p1336+p1338+p1340+p1342+p1344=0;0;p1330/(p1328+p1330+p1332+p1334+p1336+p1338+p1340+p1342+p1344))
- p2826: 0; = p2240*(p1020+p1022)
- p1149: 0.830148
- p2179: 0.0272517; = p0970+p0971+p0972
- p2391: 0; = p2233*p2220
- p0024: 90.539
- p0798: 35.305; = p0138*(1+p0666*p0270/100)
- p2623: 0; = p2427*p1073
- p3170: 0; = p2389*p1132
- p1963f: 0.000122419; = p1647*p1851+p1648*p1852+p1649*p1853+p1650*p1854+p1651*p1855+p1652*p1856+p1653*p1857+p1654*p1858+p1655*p1859+p1656*p1860+p1657*p1861+p1658*p1862+p1659*p1863+p1660*p1864+p1661*p1865+p1662*p1866+p1663*p1867+p1664*p1868+p1665*p1869+p1666*p1870
- p3273: 0.753577
- p0729: 0
- p2318: 1.30386e-5; = p2224*p2185
- p3466: 0.000303445; = p3371*p1241
- p1137: 0; = if(p1121=0;p1131*(p0716/100)*p0703*1000;0)
- p1711: 0
- p0609: 0; = IF(p0345<0.5;-SQRT(p0007*EXP(p0477^2*p0008)-p0007);SQRT(p0007*EXP(p0477^2*p0008)-p0007))
- p2622: 0; = p2426*p1073
- p1008: 0; = p1004*p0001*p0004/(p0818*p0002)
- p2119: 0.679049
- p1639: 0
- p0930: 744468; = p0801*p0924
- p3312: 0.0974301; = if(and(p1232=0;p3253<>0);p3261*p3277*(p3298*p3290+(1-p3298)*p3294);0)
- p3052: 0; = p2271*p1082
- p1306: 0; = p1302*p1252/p0818
- p1896: 0
- p0818: 4.3296e9; = p0806*p0807
- p1571: 0
- p2059: 1.00168
- p2358: 0; = p2225*p2186
- p4004: 3.17119e-7; = p1861*p3478
- p3023: 0; = p2242*p1023
- p2867: 2.62613e-6; = p2281*(p1020+p1022)
- p3050: 0; = p2269*p1082
- p2425: 0; = p2235*p2215
- p2476: 1.12188e-5; = p2280*p1014
- p0738: 1650.01; = p0078*(1+p0606*p0210/100)
- p2138: 5.64299e-7; = p2015*p2066*p2100/(p0818*1000)
- p1579: 0
- p1066: 0.000190823; = IF(p1012=0;p1052/(p1059*p0818);0)
- p3381: 0.0055276; = p3362*p1234
- p3353: 6.66898e6; = if(and(p1232=0;p3256<>0);p3256*(p3276-p3348)/p3349;0)
- p2912: 4.66416e-5; = p2326*(p1020+p1022)
- p2601: 0; = p2405*p1014
- p2176: 0.00269353; = p0895*p0913/p0818
- p1003: 0; = p0999*p0888
- p2445: 0; = p2249*p1014
- p0843: 0.0242
- p3634: 0; = p1903*p3476
- p1111: 0.0872841
- p0837: 0.5
- p2918: 3.76495e-5; = p2332*(p1020+p1022)
- p2856: 4.3393e-6; = p2270*(p1079+p1081)
- p2290: 4.28834e-7; = p2223*p2197
- p0885: 100; = IF(p0689+p0884=100;0;100-(p0689+p0884))
- p1607: 0
- p1710: 0
- p0946: 0; = if(and(p0683=0;or(p0807=480;p0807=32;p0807=1;and(p0807=60;p0901<0.03)));p0934;0)
- p2537: 9.95257e-6; = p2341*p1073
- p1035: 6.25101e-7; = IF(p1012=0;p1029*p0001/(p0818*p0002);0)
- p0553: 0; = IF(p0289<0.5;-SQRT(p0007*EXP(p0421^2*p0008)-p0007);SQRT(p0007*EXP(p0421^2*p0008)-p0007))
- p2916: 6.97e-8; = p2330*(p1020+p1022)
- p1993: 400
- p3259: 0.00796296
- p0199: 18.25
- p5174: 1.10701e-7; = p1795*p3484
- p3049: 0; = p2268*p1082
- p2538: 4.2972e-6; = p2342*p1073
- p0826: 0.101167; = 1-p0825/p0818
- p1858: 0
- p3160: 0; = p2379*p1082
- p2352: 8.64032e-5; = p2232*p2220
- p1333: 0.000514327; = p1332*p0001/(p0818*p0002)
- p3003: 0; = p2417*(p1079+p1081)
- p2819: 0; = p2428*(p1128+p1130)
- p2453: 0; = p2257*p1014
- p2990: 0; = p2404*(p1020+p1022)
- p0929: 440291; = p0801*p0923
- p0793: 0
- p1849: 0
- p2434: 0; = p2238*p1014
- p3938: 1.10992e-6; = p1795*p3478
- p2502: 1.46607e-6; = p2306*p1073
- p3897: 1.31605e-5; = p1754*p3478
- p2328: 0.000272078; = p2224*p2196
- p2072: 0.134
- p1178: 1.4076e-7; = p1176/p0818
- p3100: 7.43569e-8; = p2319*p1023
- p2092: 0.54529
- p2853: 1.59016e-6; = p2267*(p1079+p1081)
- p1987: 400
- p0747: 0
- p2910: 1.13573e-6; = p2324*(p1020+p1022)
- p2726: 2.99118e-5; = p2335*(p1019+p1021)
- p3485: 0; = p1754*p3476
- p1723: 0.507159
- p2323: 1.2433e-5; = p2224*p2190
- p2226: 0.336045; = if(p0774*p0778+p0775*p0779+p0776*p0780+p0777*p0781=0;0;p0778*p0774/(p0774*p0778+p0775*p0779+p0776*p0780+p0777*p0781))
- p0603: 0; = IF(p0339<0.5;-SQRT(p0007*EXP(p0471^2*p0008)-p0007);SQRT(p0007*EXP(p0471^2*p0008)-p0007))
- p1916: 0
- p2860: 0.000257077; = p2274*(p1129+p1131)
- p2349: 3.81421e-5; = p2228*p2217
- p1932: 0
- p1700: 0
- p0758: 0
- p4309: 0; = p1754*p3480
- p0690: 0
- p3107: 6.97216e-7; = p2326*p1023
- p1653: 0
- p1325: 0; = IF(((p0745*1000*p0752/100)+(p0754*1000*p0761/100))/p0801<0;0;((p0745*1000*p0752/100)+(p0754*1000*p0761/100))/p0801)
- p0923: 0.266843; = IF(p0918=1;0;IF(p0918+p0919>1;1-p0918;p0919))
- p0892: 18327.8; = if(p0891=0;0;(1-p1240)*p3251/p0891)
- p0610: 0; = IF(p0346<0.5;-SQRT(p0007*EXP(p0478^2*p0008)-p0007);SQRT(p0007*EXP(p0478^2*p0008)-p0007))
- p1615: 0
- p2700: 8.07349e-6; = p2309*(p1078+p1080)
- p1609: 0
- p1280: 0; = IF(p1277=p1263;0;IF(p1277+p1278>p1263;p1263-p1277;p1278))
- p0113: 35.305
- p3343: 0; = if(and(p1232=0;p3254<>0);IF((p3339+p3340+p3341+p3342)+(p3254*(p3269*(1-p3277))/p3338)>p3254;p3254-(p3339+p3340+p3341+p3342);p3254*(p3269*(1-p3277))/p3338);0)
- p2191: 1.45957e-5; = 8*1.00794*p2189/(2*14.0067)
- p2630: 0; = p2239*(p1019+p1021)
- p2492: 6.00663e-5; = p2296*p1014
- p1721: 0
- p4720: 4.23786e-5; = p1963*p3481
- p3592: 0; = p1861*p3476
- p1929: 0
- p0717: 12.597; = p0057*(1+p0585*p0189/100)
- p3335: 0; = IF(or(p3254=0;p1232>0);0;p3270*(p3280*(p3283*p1256+p3286*(p1253+p1257)+p1258*p3288+p3300*p3287)))
- p1757: 0
- p2521: 5.65101e-6; = p2325*p1014
- p1238: 0.53292; = if(p1232>0;0;IF(p1234=1;0;IF(p1234+p1235>1;1-p1234;p1235)))
- p0722: 0
- p1911: 0
- p3110: 6.34787e-10; = p2329*p1023
- p3093: 1.28841e-7; = p2312*p1132
- p3206: 0; = p2425*p1082
- p0647: 0; = IF(p0383<0.5;-SQRT(p0007*EXP(p0515^2*p0008)-p0007);SQRT(p0007*EXP(p0515^2*p0008)-p0007))
- p1663: 0
- p2942: 0; = p2356*(p1020+p1022)
- p0179: 34.857
- p3129: 0; = p2348*p1082
- p3442: 0; = p3366*p1240
- p2036: 3.57242e-5; = p2015*p2030*(1-p2032)/(p0818*1000)
- p2443: 0; = p2247*p1014
- p1089: 2.51632e-5; = IF(p1071=0;p1083*p0001/(p0818*p0002);0)
- p1308: 0.166918
- p2304: 0.0012038; = p2227*p2211
- p2530: 1.42832e-6; = p2334*p1014
- p0888: 0; = p0686*1000*p0687*p0884/100
- p2151: 1.21657e-7; = p2015*p2079*p2113/(p0818*1000)
- p2675: 1.8607e-5; = p2284*(p1019+p1021)
- p3059: 7.54001e-8; = p2278*p1023
- p1340: 0; = p1325*p0801
- p2592: 0; = p2396*p1014
- p4894: 0; = p1927*p3482
- p2642: 0; = p2251*(p1019+p1021)
- p2732: 2.00846e-5; = p2341*(p1078+p1080)
- p1997: 2.00323e8; = (if(p1152=0;0;p1150/p1152)+if(p1153=0;0;p1151/p1153))*(1+p1157)
- p1821: 0
- p2606: 0; = p2410*p1014
- p1327: 0.150873; = if(p1318=0;if(p1327a=0;1;if(p1327a<0;0;p1327a));0)
- p2636: 0; = p2245*(p1019+p1021)
- p2983: 0; = p2397*(p1020+p1022)
- p2227: 0.542892; = if(p0774*p0778+p0775*p0779+p0776*p0780+p0777*p0781=0;0;p0779*p0775/(p0774*p0778+p0775*p0779+p0776*p0780+p0777*p0781))
- p0367: 0.5
- p0079: 1.34
- p0710: 35.305; = p0050*(1+p0578*p0182/100)
- p3061: 2.72761e-7; = p2280*p1023
- p0584: 0; = IF(p0320<0.5;-SQRT(p0007*EXP(p0452^2*p0008)-p0007);SQRT(p0007*EXP(p0452^2*p0008)-p0007))
- p0794: 0.183; = p0134*(1+p0662*p0266/100)
- p0150: 0
- p1029: 3033.51; = IF(p1012=0;IF(p0801<p1023*(p0704/100)*p0703*1000;p0801;p1023*(p0704/100)*p0703*1000);0)
- p0142: 0
- p2562: 0; = p2366*p1014
- p5028: 0; = p1855*p3483
- p3257: 0.849747
- p1229: 0.0124921; = IF(p1221=0;0;p1228*p1221)
- p2221: 0.00340771; = p1155-p2220
- p2999: 0; = p2413*(p1020+p1022)
- p1626: 0
- p1012: 0
- p0634: 0; = IF(p0370<0.5;-SQRT(p0007*EXP(p0502^2*p0008)-p0007);SQRT(p0007*EXP(p0502^2*p0008)-p0007))
- p2296: 0.000268946; = p2223*p2203
- p2199: 1.96938e-6; = p1069-p2197-p2198
- p1294: 0; = p1290*p1252/p0818
- p1989: 50
- p2066: 0.109412
- p3689: 0; = p1962*p3476
- p1945: 0
- p2988: 0; = p2402*(p1020+p1022)
- p0198: 28.193
- p2483: 0.000105195; = p2287*p1014
- p2647: 0; = p2256*(p1019+p1021)
- p0951: 0; = if(and(p0683=0;or(p0807=480;p0807=32;p0807=1;and(p0807=60;p0901<0.03)));p0939;0)
- p1015: 0.40798; = IF(p1012=0;p0706/100;0)
- p0890: 0; = p0686*1000*p0687*p0885/100
- p1922: 0
- p1899: 0
- p0375: 0.5
- p0922: 0; = p0677*1000/p0801
- p0188: 6.774
- p4870: 0; = p1903*p3482
- p1737: 0
- p2402: 0; = p2234*p2191
- p1958: 1896
- p2235: 0; = 1-(p2226+p2227+p2228+p2229)
- p2063: 2.01468
- p1020: 0.36325; = IF(p1012=0;IF(p1014+p1019=1;0;IF(p1014+p1019+p1016>1;1-(p1014+p1019);p1016));0)
- p2380: 0; = p2229*p2209
- p1159: 0.5
- p1923: 0
- p0720: 0
- p0502: 0; = SQRT(2)*(IF((2*p0370-1)<0;-1;IF((2*p0370-1)>0;1;0))*SQRT(SQRT((2/(pi()*0.140012289)+LN(1-(2*p0370-1)^2)/2)^2-LN(1-(2*p0370-1)^2)/0.140012289)-(2/(pi()*0.140012289)+LN(1-(2*p0370-1)^2)/2)))
- p3162: 0; = p2381*p1082
- p0995: 0; = p0991*p0001*p0004/(p0818*p0002)
- p2662: 4.47891e-5; = p2271*(p1078+p1080)
- p1146: 0.870129
- p1011: 0; = p1010*p0001*p0004/(p0818*p0002)
- p2337: 0.000111656; = p2228*p2205
- p0016: 744.468
- p2246: 0; = p2222*p2191
- p0594: 0; = IF(p0330<0.5;-SQRT(p0007*EXP(p0462^2*p0008)-p0007);SQRT(p0007*EXP(p0462^2*p0008)-p0007))
- p3469: 0; = p3374*p1241
- p3225: 0.00183602; = p3221*p1229
- p0500: 0; = SQRT(2)*(IF((2*p0368-1)<0;-1;IF((2*p0368-1)>0;1;0))*SQRT(SQRT((2/(pi()*0.140012289)+LN(1-(2*p0368-1)^2)/2)^2-LN(1-(2*p0368-1)^2)/0.140012289)-(2/(pi()*0.140012289)+LN(1-(2*p0368-1)^2)/2)))
- p2723: 4.22856e-5; = p2332*(p1019+p1021)
- p0239: 50.811
- p0263: 25.156
- p2040: 1.56
- p3141: 0; = p2360*p1023
- p0858: 0.945301; = p0670*1000/p0856
- p2898: 0.00649462; = p2312*(p1129+p1131)
- p1780: 0
- p0740: 98.029; = p0080*(1+p0608*p0212/100)
- p1709: 0
- p3086: 0; = p2305*p1082
- p2834: 0; = p2248*(p1020+p1022)
- p2293: 0.000380202; = p2223*p2200
- p1861: 4.61936e-7; = p1453*1000/p0818
- p2056: 2.07882
- p0374: 0.5
- p0672: 0
- p3009: 0; = p2423*(p1079+p1081)
- p2947: 0; = p2361*(p1020+p1022)
- p1605: 0
- p0932: 0; = p0801*p0926
- p2957: 0; = p2371*(p1020+p1022)
- p3071: 2.32857e-9; = p2290*p1023
- p2940: 0; = p2354*(p1020+p1022)
- p2242: 0; = p2222*p2187
- p3090: 0; = p2309*p1082
- p1274: 0; = p1270*p1252/p0818
- p0382: 0.5
- p1551: 0
- p3247: 0.94
- p2794: 0; = p2403*(p1019+p1021)
- p2689: 0.000211819; = p2298*(p1078+p1080)
- p1889: 0
- p2266: 4.13985e-7; = p2226*p2212
- p2180: 6.18514e-8; = p3233*p1188/(p0818)
- p1952: 0
- p0008: 0.0739645; = (p0007-1.5)/(p0007-1)^2
- p1028: 0; = IF(p1012=0;p1022*(p0704/100)*p0703*1000;0)
- p2394: 0; = p2234*p2183
- p2795: 0; = p2404*(p1019+p1021)
- p3213: 0.112803; = p1222*12.0107/100.0869
- p0617: 0; = IF(p0353<0.5;-SQRT(p0007*EXP(p0485^2*p0008)-p0007);SQRT(p0007*EXP(p0485^2*p0008)-p0007))
- p2709: 5.31948e-6; = p2318*(p1019+p1021)
- p1040: 0.0276045
- p2413: 0; = p2234*p2203
- p2526: 4.28542e-8; = p2330*p1014
- p0789: 13.425; = p0129*(1+p0657*p0261/100)
- p5243: 1.10701e-7; = p1864*p3484
- p3305: 0; = if(and(p1232=0;p3252<>0);1-(p3301+p3302+p3303+p3304);0)
- p0459: 0; = SQRT(2)*(IF((2*p0327-1)<0;-1;IF((2*p0327-1)>0;1;0))*SQRT(SQRT((2/(pi()*0.140012289)+LN(1-(2*p0327-1)^2)/2)^2-LN(1-(2*p0327-1)^2)/0.140012289)-(2/(pi()*0.140012289)+LN(1-(2*p0327-1)^2)/2)))
- p3133: 8.64032e-10; = p2352*p1132
- p1321: 1.51269; = IF(((p0745*1000*p0748/100)+(p0754*1000*p0757/100))/p0801<0;0;((p0745*1000*p0748/100)+(p0754*1000*p0757/100))/p0801)
- p0880: 0; = p0868*p0856
- p2659: 8.17648e-6; = p2268*(p1078+p1080)
- p0834: 0.00059
- p0753: 0
- p3171: 0; = p2390*p1132
- p0862: 0.0147667; = p0674*1000/p0856
- p1974: 0; = p1969*p0001/(p0818*p0002)
- p3127: 0; = p2346*p1082
- p3188: 0; = p2407*p1023
- p1315: 0; = p1311*p1252/p0818
- p2840: 0; = p2254*(p1020+p1022)
- p4616: 7.07003e-5; = p1855*p3481
- p0889: 0; = 1000*p0888*p0001*p0003*p0004/(p0818*p0002)
- p3356: 1.13655e8; = if(p1232=0;p3306+p3317+p3328+p3339+p3350;0)
- p0261: 49.918
- p0282: 0.5
- p2595: 0; = p2399*p1014
- p0741: 1.324; = p0081*(1+p0609*p0213/100)
- p3175: 0; = p2394*p1023
- p3405: 0.000374438; = p3367*p1238
- p3460: 0.000557172; = p3365*p1241
- p0959: 0; = if(and(p0683>0;or(p0807=480;p0807=32;p0807=1;and(p0807=60;p0901<0.03)));p0935;0)
- p0937: 5.31972e-5; = p0931*p0001/(p0818*p0002)
- p1052: 276773; = IF(p1012=0;p1045*p1036;0)
- p1717: 0
- p2599: 0; = p2403*p1014
- p3998: 0.000232607; = p1855*p3478
- p3067: 5.03988e-7; = p2286*p1023
- p2522: 2.8677e-5; = p2326*p1014
- p1245: 0; = if(p1232>0;0;p1240*(p0725/100)*p0723*1000)
- p1689: 0
- p1227: 0.000340008; = IF(p1221=0;0;p1226*p0001/(p0818*p0002))
- p2602: 0; = p2406*p1014
- p2933: 9.65206e-6; = p2347*(p1079+p1081)
- p2911: 9.19106e-6; = p2325*(p1020+p1022)
- p2187: 9.20037e-6; = 4*1.00794*p2186/(2*14.0067)
- p1644: 0
- p1965: 0.000453404; = p1963+p1959*p1964*1000/p0818
- p1783: 0
- p0552: 0; = IF(p0288<0.5;-SQRT(p0007*EXP(p0420^2*p0008)-p0007);SQRT(p0007*EXP(p0420^2*p0008)-p0007))
- p1964: 0.5
- p0835: 498.504; = -LN(1-p0669/100)/p0834
- p2958: 0; = p2372*(p1020+p1022)
- p1882: 0
- p2300: 0.00134625; = p2227*p2207
- p1977: 4.41645e9; = p1252+p1188
- p2558: 0; = p2362*p1014
- p2532: 2.58799e-5; = p2336*p1073
- p0887: 0; = 1000*p0886*p0001*p0003*p0004/(p0818*p0002)
- p0241: 37.176
- p1582: 0
- p1792: 0
- p3134: 1.50146e-9; = p2353*p1132
- p1931: 0
- p2134: 1.33863e-5; = p2015*p2062*p2096/(p0818*1000)
- p2178: 0.0314446; = (p0895*p0831/(1-p0831))/(p0818)
- p2353: 0.000150146; = p2232*p2221
- p2561: 0; = p2365*p1014
- p0806: 7.216e7
- p1293: 0; = p1287*p1252/p0818
- p0572: 0; = IF(p0308<0.5;-SQRT(p0007*EXP(p0440^2*p0008)-p0007);SQRT(p0007*EXP(p0440^2*p0008)-p0007))
- p1633: 0
- p3471: 0; = p3376*p1241
- p2111: 0.856281
- p1875: 0
- p3168: 0; = p2387*p1082
- p2420: 0; = p2235*p2210
- p2004: 30
- p1961: 0.5
- p2302: 0.000212904; = p2227*p2209
- p1659: 0
- p2287: 0.000471008; = p2223*p2193
- p0575: 0; = IF(p0311<0.5;-SQRT(p0007*EXP(p0443^2*p0008)-p0007);SQRT(p0007*EXP(p0443^2*p0008)-p0007))
- p2604: 0; = p2408*p1014
- p0800: 58.791; = p0140*(1+p0668*p0272/100)
- p2105: 0.888194
- p0255: 21.887
- p2383: 0; = p2229*p2212
- p1198: 0.44
- p1563: 0
- p1102: 0.0177463; = IF(p1071=0;IF(p1096+p1101=1;0;IF(p1096+p1101+p1098>1;1-(p1096+p1101);p1098));0)
- p1842: 0
- p0323: 0.5
- p1706: 0
- p0270: 21.426
- p2680: 0.000407185; = p2289*(p1019+p1021)
- p0025: 2.456
- p4033: 1.42704e-6; = p1890*p3478
- p3111: 1.0419e-9; = p2330*p1023
- p0412: 0; = SQRT(2)*(IF((2*p0280-1)<0;-1;IF((2*p0280-1)>0;1;0))*SQRT(SQRT((2/(pi()*0.140012289)+LN(1-(2*p0280-1)^2)/2)^2-LN(1-(2*p0280-1)^2)/0.140012289)-(2/(pi()*0.140012289)+LN(1-(2*p0280-1)^2)/2)))
- p1785: 0
- p0748: 68.65; = p0088*(1+p0616*p0220/100)
- p2133: 2.90332e-6; = p2015*p2061*p2095/(p0818*1000)
- p0124: 87.107
- p1303: 0; = p1297*p1252/p0818
- p0691: 0
- p1784: 0
- p3231: 1.4076e-7; = p1176/p0818
- p2170: 0.0071133; = p2166*(p0913)
- p0760: 0
- p2844: 0.000125879; = p2258*(p1079+p1081)
- p0909: 4.58434e7
- p3481: 0.20866; = if(p1328+p1330+p1332+p1334+p1336+p1338+p1340+p1342+p1344=0;0;p1338/(p1328+p1330+p1332+p1334+p1336+p1338+p1340+p1342+p1344))
- p3179: 0; = p2398*p1023
- p3291: 0.437
- p1335: 2.72485e-5; = p1334*p0001/(p0818*p0002)
- p3108: 1.49456e-7; = p2327*p1023
- p0851: 0
- p2267: 4.32897e-6; = p2226*p2213
- p2584: 0; = p2388*p1073
- p2553: 0; = p2357*p1014
- p3192: 0; = p2411*p1023
- p2902: 1.06037e-5; = p2316*(p1020+p1022)
- p3194: 0; = p2413*p1023
- p2183: 0.000136272; = p1064-p2182
- p3198: 0; = p2417*p1082
- p2806: 0; = p2415*(p1078+p1080)
- p2527: 9.42194e-8; = p2331*p1014
- p1910: 0
- p2006: 0.182204; = ((p1980*p1985+p1986*p1991+p1992*p1997+p2000*p2005)/p0818)*p0005*p0002/1000
- p0507: 0; = SQRT(2)*(IF((2*p0375-1)<0;-1;IF((2*p0375-1)>0;1;0))*SQRT(SQRT((2/(pi()*0.140012289)+LN(1-(2*p0375-1)^2)/2)^2-LN(1-(2*p0375-1)^2)/0.140012289)-(2/(pi()*0.140012289)+LN(1-(2*p0375-1)^2)/2)))
- p3444: 0; = p3368*p1240
- p3142: 0; = p2361*p1023
- p2427: 0; = p2235*p2217
- p1124: 0.36994; = if(p1121=0;p0718/100;0)
- p0371: 0.5
- p0840: 0.0816117; = p0839*p0831
- p0743: 0
- p0315: 0.5
- p0716: 58.791; = p0056*(1+p0584*p0188/100)
- p2212: 1.23193e-6; = p1106/p0818
- p1795: 1.61678e-6; = p1387*1000/p0818
- p2065: 0.0758824
- p2609: 0; = p2413*p1014
- p3195: 0; = p2414*p1082
- p1677: 0
- p3392: 0.000124459; = p3373*p1234
- p5240: 3.16288e-8; = p1861*p3484
- p4831: 0; = p1864*p3482
- p2653: 0.000123284; = p2262*(p1078+p1080)
- p0578: 0; = IF(p0314<0.5;-SQRT(p0007*EXP(p0446^2*p0008)-p0007);SQRT(p0007*EXP(p0446^2*p0008)-p0007))
- p0409: 0; = SQRT(2)*(IF((2*p0277-1)<0;-1;IF((2*p0277-1)>0;1;0))*SQRT(SQRT((2/(pi()*0.140012289)+LN(1-(2*p0277-1)^2)/2)^2-LN(1-(2*p0277-1)^2)/0.140012289)-(2/(pi()*0.140012289)+LN(1-(2*p0277-1)^2)/2)))
- p2716: 1.03228e-5; = p2325*(p1019+p1021)
- p2080: 0.025
- p1095: 1.96517e7; = IF(p1071=0;p0797*p0702*1000*p0798/100;0)
- p2792: 0; = p2401*(p1019+p1021)
- p0662: 0; = IF(p0398<0.5;-SQRT(p0007*EXP(p0530^2*p0008)-p0007);SQRT(p0007*EXP(p0530^2*p0008)-p0007))
- p2677: 3.78669e-5; = p2286*(p1019+p1021)
- p2829: 0; = p2243*(p1020+p1022)
- p1822: 0
- p3156: 0; = p2375*p1082
- p2019: 0.13105
- p3439: 0; = p3363*p1240
- p2687: 0.000109724; = p2296*(p1019+p1021)
- p0535: 0; = SQRT(2)*(IF((2*p0403-1)<0;-1;IF((2*p0403-1)>0;1;0))*SQRT(SQRT((2/(pi()*0.140012289)+LN(1-(2*p0403-1)^2)/2)^2-LN(1-(2*p0403-1)^2)/0.140012289)-(2/(pi()*0.140012289)+LN(1-(2*p0403-1)^2)/2)))
- p3102: 1.36902e-7; = p2321*p1023
- p0964: 0; = 56/90000
- p0022: 1650.01
- p2752: 0; = p2361*(p1019+p1021)
- p0641: 0; = IF(p0377<0.5;-SQRT(p0007*EXP(p0509^2*p0008)-p0007);SQRT(p0007*EXP(p0509^2*p0008)-p0007))
- p1725: 0
- p2480: 1.0186e-5; = p2284*p1014
- p1983: 50
- p3031: 0; = p2250*p1023
- p1577: 0
- p2107: 0.881623
- p2190: 5.80405e-5; = 32.065*p2189/(2*14.0067)
- p0855: 1.32852; = p0854*p0001*p0003/(p0818*p0002)
- p0761: 0
- p0392: 0.5
- p3046: 0; = p2265*p1082
- p2772: 0; = p2381*(p1078+p1080)
- p1823: 0
- p2767: 0; = p2376*(p1078+p1080)
- p2000: 4000
- p2948: 0; = p2362*(p1020+p1022)
- p3352: 1.61288e6; = if(and(p1232=0;p3256<>0);p3256*(p3275-p3347)/p3349;0)
- p0314: 0.5
- p3404: 0.00791276; = p3366*p1238
- p0328: 0.5
- p0724: 14.082; = p0064*(1+p0592*p0196/100)
- p2406: 0; = p2234*p2196
- p2574: 0; = p2378*p1073
- p2409: 0; = p2234*p2199
- p4556: 3.37357e-7; = p1795*p3481
- p3827: 0; = p1890*p3477
- p3479: 0.03637; = if(p1328+p1330+p1332+p1334+p1336+p1338+p1340+p1342+p1344=0;0;p1334/(p1328+p1330+p1332+p1334+p1336+p1338+p1340+p1342+p1344))
- p2613: 0; = p2417*p1073
- p3397: 0; = p3378*p1234
- p3419: 0; = p3362*p1239
- p1652: 0.6885
- p2803: 0; = p2412*(p1019+p1021)
- p2695: 0.000509254; = p2304*(p1078+p1080)
- p2153: 1.18896e-8; = p2015*p2081*p2115/(p0818*1000)
- p2711: 8.04061e-7; = p2320*(p1019+p1021)
- p3379: 0; = if(p1232=0;p3246*p3361/p0818;0)
- p2079: 0.02
- p3248: 0.84
- p0936: 0.000153409; = p0930*p0001/(p0818*p0002)
- p3324: 0; = if(and(p1232=0;p3255<>0);p3266*(p3279*(p3284*p1256+p3286*(p1253+p1257)+p1258*p3288+p3299*p3287));0)
- p1791: 2.30968e-7; = p1383*1000/p0818
- p3394: 0; = p3375*p1234
- p2488: 3.45622e-7; = p2292*p1014
- p1796: 0
- p2422: 0; = p2235*p2212
- p0859: 0.02572; = p0671*1000/p0856
- p3371: 0.0021395; = if(p1232=0;p3245*p3359/p0818;0)
- p1637: 0
- p2512: 6.51955e-6; = p2316*p1014
- p0309: 0.5
- p2640: 0; = p2249*(p1019+p1021)
- p1082: 0; = IF(p1071=0;IF(p1073+p1078+p1079+p1080+p1081=1;0;1-(p1073+p1078+p1079+p1080+p1081));0)
- p1728: 0
- p1344: 248940; = IF(p1318=0;p1327*p0801;0)
- p1007: 0; = p1003*p0001*p0004/(p0818*p0002)
- p0082: 98.597
- p1387: 7
- p1572: 0
- p0868: 0; = IF(p0858+p0864+p0865+p0866+p0867=1;0;IF(p0858+p0864+p0865+p0866+p0867+p0863>1;1-(p0858+p0864+p0865+p0866+p0867);p0863))
- p2084: 0.21
- p2842: 0; = p2256*(p1020+p1022)
- p3298: 1; = if(p1283+p1284+p1285+p1286=0;0;p1283/(p1283+p1284+p1285+p1286))
- p0931: 258157; = p0801*p0925
- p2924: 1.32816e-5; = p2338*(p1079+p1081)
- p2626: 0; = p2430*p1123
- p0828: 0; = if(p0827=0;0;p0819-p0827/p0818)
- p1924: 0
- p1765: 0
- p2395: 0; = p2234*p2184
- p1831: 0
- p0453: 0; = SQRT(2)*(IF((2*p0321-1)<0;-1;IF((2*p0321-1)>0;1;0))*SQRT(SQRT((2/(pi()*0.140012289)+LN(1-(2*p0321-1)^2)/2)^2-LN(1-(2*p0321-1)^2)/0.140012289)-(2/(pi()*0.140012289)+LN(1-(2*p0321-1)^2)/2)))
- p0745: 3635.75; = p0085*(1+p0613*p0217/100)
- p1819: 0
- p2237: 0; = p2222*p2182
- p3028: 0; = p2247*p1023
- p3252: 0; = p1252*(p1267*(1-p3247)+p1270*(1-p3248)+p1271*(1-p3249)+p1272*(1-p3250))
- p1764: 0
- p2882: 9.76945e-5; = p2296*(p1020+p1022)
- p0148: 0
- p3357: 1.47114e7; = if(p1232=0;p3307+p3318+p3329+p3340+p3351;0)
- p1161: 1.65e6; = p0801
- p3113: 5.62799e-7; = p2332*p1023
- p2783: 0; = p2392*(p1128+p1130)
- p1013: 0; = p1012*p0001/(p0818*p0002)
- p1262: 0; = if(p1232>0;0;p0733/100)
- p1632: 0
- p1564: 0
- p0872: 42438; = p0864*p0856
- p3060: 2.59711e-7; = p2279*p1023
- p0833: 6.91641e9; = p0830+p0832
- p0735: 18.061; = p0075*(1+p0603*p0207/100)
- p2751: 0; = p2360*(p1019+p1021)
- p0947: 0; = if(and(p0683=0;or(p0807=480;p0807=32;p0807=1;and(p0807=60;p0901<0.03)));p0935;0)
- p2366: 0; = p2225*p2195
- p3149: 0; = p2368*p1023
- p2142: 1.684e-6; = p2015*p2070*p2104/(p0818*1000)
- p1824: 0
- p3408: 0.000275751; = p3370*p1238
- p1228: 0.0556697; = IF(p1221=0;0;p0801*p1212*2000/(p1222+p1221*p1225)/p0818)
- p3208: 0; = p2427*p1082
- p1794: 0
- p0983: 0; = if(p0886=0;0;min(1;(p0695*p0694*1000*p0697/100)/p0886))
- p1144: 1.99888e-9; = if(p1121=0;p1138*p0001/(p0818*p0002);0)
- p1081: 0; = IF(p1071=0;IF(p1073+p1078+p1079+p1080=1;0;IF(p1073+p1078+p1079+p1080+p1077>1;1-(p1073+p1078+p1079+p1080);p1077));0)
- p2504: 2.47013e-5; = p2308*p1073
- p2959: 0; = p2373*(p1020+p1022)
- p1072: 0; = p1071*p0001/(p0818*p0002)
- p1331: 0; = p1330*p0001/(p0818*p0002)
- p2663: 0.00126406; = p2272*(p1128+p1130)
- p2579: 0; = p2383*p1073
- p2167: 0.327645; = p2166*(p0898)
- p3226: 0.00280125; = p3222*p1229
- p3249: 0
- p3087: 0; = p2306*p1082
- p2344: 1.49141e-7; = p2228*p2212
- p3263: 0.0214527
- p0978: 1.65e6; = p0801
- p2254: 0; = p2222*p2200
- p3334: 0; = IF(or(p3254=0;p1232>0);0;p3269*p3277*(p3300*p3292+(1-p3300)*p3296))
- p3083: 0; = p2302*p1082
- p1845: 0
- p0346: 0.5
- p5269: 1.4233e-7; = p1890*p3484
- p3409: 0.00114018; = p3371*p1238
- p1900: 0
- p1666: 0
- p2822: 0; = p2431*(p1128+p1130)
- p4204: 1.23233e-5; = p1855*p3479
- p1180: 7.03801e-8; = p1176*p1179/p0818
- p1684: 0
- p2148: 3.56689e-7; = p2015*p2076*p2110/(p0818*1000)
- p0587: 0; = IF(p0323<0.5;-SQRT(p0007*EXP(p0455^2*p0008)-p0007);SQRT(p0007*EXP(p0455^2*p0008)-p0007))
- p1213: 30
- p3006: 0; = p2420*(p1079+p1081)
- p1939: 0
- p1793: 0
- p0544: 0; = IF(p0280<0.5;-SQRT(p0007*EXP(p0412^2*p0008)-p0007);SQRT(p0007*EXP(p0412^2*p0008)-p0007))
- p0476: 0; = SQRT(2)*(IF((2*p0344-1)<0;-1;IF((2*p0344-1)>0;1;0))*SQRT(SQRT((2/(pi()*0.140012289)+LN(1-(2*p0344-1)^2)/2)^2-LN(1-(2*p0344-1)^2)/0.140012289)-(2/(pi()*0.140012289)+LN(1-(2*p0344-1)^2)/2)))
- p2685: 6.65013e-5; = p2294*(p1019+p1021)
- p2185: 6.08676e-5; = p1065-p2184
- p0709: 0
- p2347: 2.62763e-5; = p2228*p2215
- p0307: 0.5
- p2652: 0.000352527; = p2261*(p1078+p1080)
- p4617: 5.87965e-6; = p1856*p3481
- p3256: 6.51789e7; = p1252*(p1307*(1-p3247)+p1310*(1-p3248)+p1311*(1-p3249)+p1312*(1-p3250))
- p0817: 0
- p3227: 0.00158447; = p3223*p1229
- p0289: 0.5
- p1576: 0
- p1058: 0.225
- p2145: 2.43314e-6; = p2015*p2073*p2107/(p0818*1000)
- p2590: 0; = p2394*p1014
- p2345: 1.55955e-6; = p2228*p2213
- p1969: 0; = p0803
- p2852: 1.52069e-7; = p2266*(p1079+p1081)
- p2369: 0; = p2225*p2198
- p2467: 2.21945e-5; = p2271*p1073
- p0803: 0
- p2356: 0; = p2225*p2184
- p2489: 8.49143e-5; = p2293*p1014
- p3001: 0; = p2415*(p1079+p1081)
- p2589: 0; = p2393*p1014
- p4346: 0; = p1791*p3480
- p0700: 0
- p3934: 1.5856e-7; = p1791*p3478
- p1887: 0
- p3296: 0.514
- p1953: 0
- p1327a: 0.150873; = (p0745*1000/p0801)*(1-(p0746+p0747+p0748+p0749+p0750+p0751+p0752+p0753)/100)+(p0754*1000/p0801)*(1-(p0755+p0756+p0757+p0758+p0759+p0760+p0761+p0762)/100)
- p0836: 9.50627e7; = p0831*p0835*p0801/(1-p0831)
- p2649: 0.00014497; = p2258*(p1078+p1080)
- p1925: 0
- p2872: 3.37152e-5; = p2286*(p1020+p1022)
- p1704: 0
- p1017: 0; = IF(p1012=0;p0708/100;0)
- p1139: 2.51799e-5; = if(p1121=0;p1133*p0001/(p0818*p0002);0)
- p1060: 0.21
- p3029: 0; = p2248*p1023
- p3205: 0; = p2424*p1082
- p1745: 0
- p1383: 1
- p1636: 0
- p0883: 0.000136003; = p0882*p0001*p0003/(p0818*p0002)
- p3157: 0; = p2376*p1082
- p2951: 0; = p2365*(p1020+p1022)
- p3251: 4.15147e9; = p1252-(p3252+p3253+p3254+p3255+p3256)
- p2348: 4.25576e-6; = p2228*p2216
- p3401: 0.00117232; = p3363*p1238
- p0841: 0.0397217
- p2335: 7.33168e-5; = p2224*p2203
- p3942: 1.5856e-7; = p1799*p3478
- p0933: 0; = p0801*p0927
- p3330: 0; = if(and(p1232=0;p3255<>0);p3255*(p3267-p3325)/p3327;0)
- p2701: 7.23583e-5; = p2310*(p1078+p1080)
- p3017: 0; = p2431*(p1129+p1131)
- p2373: 0; = p2225*p2202
- p2676: 4.67917e-6; = p2285*(p1019+p1021)
- p0599: 0; = IF(p0335<0.5;-SQRT(p0007*EXP(p0467^2*p0008)-p0007);SQRT(p0007*EXP(p0467^2*p0008)-p0007))
- p3025: 0; = p2244*p1023
- p1963k: 3.13468e-5; = p1744*p1948+p1745*p1949+p1746*p1950+p1747*p1951+p1748*p1952+p1749*p1953+p1750*p1954+p1751*p1955+p1752*p1956+p1753*p1957+p1961*p1962
- p3413: 0; = p3375*p1238
- p5037: 0; = p1864*p3483
- p3333: 0; = if(and(p1232=0;p3255<>0);p3255-(p3328+p3329+p3330+p3331+p3332);0)
- p3484: 0.06847; = IF(p1344=0;0;p1344/(p1328+p1330+p1332+p1334+p1336+p1338+p1340+p1342+p1344))
- p1676: 0
- p2573: 0; = p2377*p1073
- p1183: 0.000340008; = p0801*p0001/(p0818*p0002)
- p2164: 0.00261695; = (p2015/p0818)-(p2022)-(p2035+p2036+p2052)-(p2017/p0818)-(p2039+p2041+p2044+p2158+p2159+p2160+p2161+p2162)
- p1708: 0
- p0059: 50.408
- p0551: 0; = IF(p0287<0.5;-SQRT(p0007*EXP(p0419^2*p0008)-p0007);SQRT(p0007*EXP(p0419^2*p0008)-p0007))
- p3292: 0.258
- p2534: 7.5796e-6; = p2338*p1073
- p1343: 0; = p1342*p0001/(p0818*p0002)
- p3801: 0; = p1864*p3477
- p0820: 0; = if(p0807=480;p0814;0)
- p2672: 2.94951e-6; = p2281*(p1019+p1021)
- p4822: 0; = p1855*p3482
- p2376: 0; = p2229*p2205
- p2690: 6.85925e-5; = p2299*(p1078+p1080)
- p2895: 7.01029e-6; = p2309*(p1079+p1081)
- p2800: 0; = p2409*(p1019+p1021)
- p1009: 0; = p1005*p0001*p0004/(p0818*p0002)
- p1220: 0; = IF(p1218<0.5;-SQRT(p1214*EXP(p1219^2*p1215)-p1214);SQRT(p1214*EXP(p1219^2*p1215)-p1214))
- p2841: 0; = p2255*(p1020+p1022)
- p2728: 4.72349e-5; = p2337*(p1078+p1080)
- p3430: 0; = p3373*p1239
- p2118: 0.679049
- p2297: 0.000553621; = p2227*p2204
- p3447: 0; = p3371*p1240
- p0131: 64.741
- p2224: 0.214212; = if(p0765*p0769+p0766*p0770+p0767*p0771+p0768*p0772=0;0;p0771*p0767/(p0765*p0769+p0766*p0770+p0767*p0771+p0768*p0772))
- p3140: 0; = p2359*p1023
- p1004: 0; = p1000*p0888
- p1037: 0.337958
- p0878: 24365; = p0867*p0856
- p0904: 4.25906e8; = p0825*p0901+(p0830+p0895)*p0824*p0903
- p2325: 2.53023e-5; = p2224*p2192
- p1749: 0
- p0706: 40.798; = p0046*(1+p0574*p0178/100)
- p3315: 0.00443516; = if(and(p1232=0;p3253<>0);p3264*p3289;0)
- p5034: 0; = p1861*p3483
- p1886: 0
- p2428: 0; = p2236*p2218
- p1067: 0.000241461; = IF(p1012=0;p1053/(p1060*p0818);0)
- p1201: 0.65
- p1033: 0; = IF(p1012=0;p1027*p0001/(p0818*p0002);0)
- p0791: 64.741; = p0131*(1+p0659*p0263/100)
- p0754: 0
- p1171: 0.000340008; = p0801*p0001/(p0818*p0002)
- p2937: 0.000411222; = p2351*(p1129+p1131)
- p1627: 0
- p1309: 0
- p0373: 0.5
- p3233: 0.60394
- p0352: 0.5
- p0177: 53.474
- p3329: 0; = if(and(p1232=0;p3255<>0);p3255*(p3266-p3324)/p3327;0)
- p0220: 8.159
- p2544: 8.92135e-7; = p2348*p1073
- p0846: 0.390733; = p0841*p0845^3+p0842*p0845^2+p0843*p0845+p0844
- p3230: 2.62438e-7; = p1170/p0818
- p3190: 0; = p2409*p1023
- p1694: 0
- p2168: 0.0185038; = p2166*(p0903)
- p1970: 1.65e6; = p0801
- p1601: 0
- p3037: 0; = p2256*p1023
- p1300: 0; = IF(p1297=p1265;0;IF(p1297+p1298>p1265;p1265-p1297;p1298))
- p2547: 0.000102765; = p2351*p1123
- p2087: 0.856281
- p0342: 0.5
- p2691: 0.000569519; = p2300*(p1078+p1080)
- p2471: 0.000111639; = p2275*p1123
- p1157: 0.249736
- p1030: 2.57109e-5; = IF(p1012=0;p1024*p0001/(p0818*p0002);0)
- p2594: 0; = p2398*p1014
- p1716: 0
- p2984: 0; = p2398*(p1020+p1022)
- p0585: 0; = IF(p0321<0.5;-SQRT(p0007*EXP(p0453^2*p0008)-p0007);SQRT(p0007*EXP(p0453^2*p0008)-p0007))
- p0120: 22.342
- p1172: 2.62438e-7; = p1170/p0818
- p1881: 0
- p3124: 0; = p2343*p1082
- p1482: 9
- p2159: 1.30603e-5; = p2015*p2083*p2121/(p0818*1000)
- p3210: 0; = p2429*p1132
- p0838: 3.41068e9; = (p0833-p0836)*p0837
- p3462: 9.9652e-5; = p3367*p1241
- p2260: 0.000100364; = p2226*p2206
- p2231: 0.695872; = if(p0783*p0787+p0784*p0788+p0785*p0789+p0786*p0790=0;0;p0788*p0784/(p0783*p0787+p0784*p0788+p0785*p0789+p0786*p0790))
- p1047: 0.326315; = IF(p1012=0;IF(p1037+p1044+p1045+p1046=1;0;IF(p1037+p1044+p1045+p1046+p1041>1;1-(p1037+p1044+p1045+p1046);p1041));0)
- p2793: 0; = p2402*(p1019+p1021)
- p0421: 0; = SQRT(2)*(IF((2*p0289-1)<0;-1;IF((2*p0289-1)>0;1;0))*SQRT(SQRT((2/(pi()*0.140012289)+LN(1-(2*p0289-1)^2)/2)^2-LN(1-(2*p0289-1)^2)/0.140012289)-(2/(pi()*0.140012289)+LN(1-(2*p0289-1)^2)/2)))
- p2333: 4.44356e-5; = p2224*p2201
- p0979: 0; = IF(p0976=0;0;p0976*p0001/(p0818*p0002))
- p2440: 0; = p2244*p1014
- p1006: 0; = p1002*p0001*p0004/(p0818*p0002)
- p1001: 0; = if(p0978>0;0;if(and(p0687=0;p0691=0;p0695=0;p0699=0);0;IF(p0996+p0999+p1000=1;0;1-(p0996+p0999+p1000))))
- p0694: 0
- p0499: 0; = SQRT(2)*(IF((2*p0367-1)<0;-1;IF((2*p0367-1)>0;1;0))*SQRT(SQRT((2/(pi()*0.140012289)+LN(1-(2*p0367-1)^2)/2)^2-LN(1-(2*p0367-1)^2)/0.140012289)-(2/(pi()*0.140012289)+LN(1-(2*p0367-1)^2)/2)))
- p1595: 0.418143
- p3473: 0; = p3378*p1241
- p1975: 0.000340008; = p1970*p0001/(p0818*p0002)
- p2661: 4.99741e-6; = p2270*(p1078+p1080)
- p0823: 0
- p1806: 0
- p2897: 0.00460869; = p2311*(p1129+p1131)
- p2241: 0; = p2222*p2186
- p2113: 0.832356
- p0842: -0.0620066
- p2548: 1.08842e-5; = p2352*p1123
- p2054: 0.91
- p2361: 0; = p2225*p2189
- p0509: 0; = SQRT(2)*(IF((2*p0377-1)<0;-1;IF((2*p0377-1)>0;1;0))*SQRT(SQRT((2/(pi()*0.140012289)+LN(1-(2*p0377-1)^2)/2)^2-LN(1-(2*p0377-1)^2)/0.140012289)-(2/(pi()*0.140012289)+LN(1-(2*p0377-1)^2)/2)))
- p0403: 0.5
- p0903: 0.0257527
- p3218: 0.0209544; = p3214*p1228
- p1257: 0; = if(p1232>0;0;IF(p1253+p1256=1;0;IF(p1253+p1256+p1255>1;1-(p1253+p1256);p1255)))
- p2127: 1.63548e-5; = p2015*p2055*p2089/(p0818*1000)
- p0157: 19.261
- p0185: 29.977
- p0065: 9.504
- p0989: 0; = p0985*p0886
- p2418: 0; = p2235*p2208
- p0414: 0; = SQRT(2)*(IF((2*p0282-1)<0;-1;IF((2*p0282-1)>0;1;0))*SQRT(SQRT((2/(pi()*0.140012289)+LN(1-(2*p0282-1)^2)/2)^2-LN(1-(2*p0282-1)^2)/0.140012289)-(2/(pi()*0.140012289)+LN(1-(2*p0282-1)^2)/2)))
- p3144: 0; = p2363*p1023
- p0023: 71.508
- p0897: 0
- p3472: 0; = p3377*p1241
- p1332: 2.49594e6; = p1321*p0801
- p1836: 0
- p0673: 23.385; = p0013*(1+p0541*p0145/100)
- p1654: 0
- p2132: 1.83625e-6; = p2015*p2060*p2094/(p0818*1000)
- p2987: 0; = p2401*(p1020+p1022)
- p3456: 0; = p3380*p1240
- p1447: 1467
- p1802: 0
- p0571: 0; = IF(p0307<0.5;-SQRT(p0007*EXP(p0439^2*p0008)-p0007);SQRT(p0007*EXP(p0439^2*p0008)-p0007))
- p3360: 9.92966e7; = if(p1232=0;p3310+p3321+p3332+p3343+p3354;0)
- p2763: 0; = p2372*(p1019+p1021)
- p0286: 0.5
- p2727: 5.22265e-5; = p2336*(p1078+p1080)
- p3458: 0.000311999; = p3363*p1241
- p1648: 0
- p1090: 5.07801e-5; = IF(p1071=0;p1084*p0001/(p0818*p0002);0)
- p2588: 0; = p2392*p1123
- p2510: 0.000298716; = p2314*p1123
- p2533: 2.34064e-5; = p2337*p1073
- p2874: 3.66759e-5; = p2288*(p1020+p1022)
- p2010: 0.00139372; = ((p1984*p1985+p1990*p1991+p1996*p1997+p2004*p2005)/p0818)*p0005*p0002/1000
- p2519: 2.77679e-6; = p2323*p1014
- p0539: 0; = IF(p0275<0.5;-SQRT(p0007*EXP(p0407^2*p0008)-p0007);SQRT(p0007*EXP(p0407^2*p0008)-p0007))
- p2240: 0; = p2222*p2185
- p1913: 0
- p3383: 0.000309016; = p3364*p1234
- p1807: 0
- p1674: 0
- p2811: 0; = p2420*(p1078+p1080)
- p2217: 0.00031506; = p1118-p2216
- p1978: 392
- p2067: 0.446471
- p1453: 2
- p0731: 75.403; = p0071*(1+p0599*p0203/100)
- p1115: 0.237849
- p2404: 0; = p2234*p2193
- p1678: 0
- p2225: 0; = if(p0765*p0769+p0766*p0770+p0767*p0771+p0768*p0772=0;0;p0772*p0768/(p0765*p0769+p0766*p0770+p0767*p0771+p0768*p0772))
- p0925: 0.156459; = IF(p0918+p0923+p0924=1;0;IF(p0918+p0923+p0924+p0921>1;1-(p0918+p0923+p0924);p0921))
- p1915: 0
- p2880: 5.92103e-5; = p2294*(p1020+p1022)
- p1720: 0
- p0721: 0
- p2186: 6.39259e-5; = p1052/p0818
- p2928: 7.52989e-6; = p2342*(p1079+p1081)
- p3345: 0.160606; = if(and(p1232=0;p3256<>0);p3273*p3277*p3293;0)
- p1268: 0
- p2449: 0; = p2253*p1014
- p0246: 11.827
- p1731: 0
- p0643: 0; = IF(p0379<0.5;-SQRT(p0007*EXP(p0511^2*p0008)-p0007);SQRT(p0007*EXP(p0511^2*p0008)-p0007))
- p2875: 0.000362542; = p2289*(p1020+p1022)
- p1061: 0.3
- p2194: 0.214362
- p3099: 7.07995e-8; = p2318*p1023
- p0345: 0.5
- p2426: 0; = p2235*p2216
- p1261: 0; = if(p1232>0;0;p0732/100)
- p1773: 0
- p2220: 0.001961; = p1151/p0818
- p2546: 7.29237e-5; = p2350*p1123
- p3047: 0; = p2266*p1082
- p2893: 1.14698e-5; = p2307*(p1079+p1081)
- p2633: 0; = p2242*(p1019+p1021)
- p2158: 1.08058e-6; = p2015*p2082*p2120/(p0818*1000)
- p2913: 9.99817e-6; = p2327*(p1020+p1022)
- p0195: 0
- p3258: 0.0491162
- p3212: 0; = p2431*p1132
- p2891: 2.45673e-7; = p2305*(p1079+p1081)
- p3454: 0; = p3378*p1240
- p0895: 1.17798e9; = p0894*p0830
- p0874: 0; = p0865*p0856
- p3341: 0; = if(and(p1232=0;p3254<>0);p3254*(p3271-p3336)/p3338;0)
- p1031: 4.69666e-5; = IF(p1012=0;p1025*p0001/(p0818*p0002);0)
- p2210: 0.000169325; = 6*1.00794*p2208/30.973762
- p0449: 0; = SQRT(2)*(IF((2*p0317-1)<0;-1;IF((2*p0317-1)>0;1;0))*SQRT(SQRT((2/(pi()*0.140012289)+LN(1-(2*p0317-1)^2)/2)^2-LN(1-(2*p0317-1)^2)/0.140012289)-(2/(pi()*0.140012289)+LN(1-(2*p0317-1)^2)/2)))
- p0990: 0; = p0986*p0886
- p2962: 0; = p2376*(p1079+p1081)
- p1984: 30
- p2702: 0.00338228; = p2311*(p1128+p1130)
- p0580: 0; = IF(p0316<0.5;-SQRT(p0007*EXP(p0448^2*p0008)-p0007);SQRT(p0007*EXP(p0448^2*p0008)-p0007))
- p2734: 0.000113562; = p2343*(p1078+p1080)
- p1025: 227921; = IF(p1012=0;p1019*(p0704/100)*p0703*1000;0)
- p2585: 0; = p2389*p1123
- p3150: 0; = p2369*p1023
- p2719: 0.000111002; = p2328*(p1019+p1021)
- p1921: 0
- p0869: 4e-5; = IF(p0858+p0864+p0865+p0866+p0867+p0868=1;0;1-(p0858+p0864+p0865+p0866+p0867+p0868))
- p0677: 0
- p0046: 40.798
- p1880: 0
- p2715: 1.27558e-6; = p2324*(p1019+p1021)
- p3463: 0.00131274; = p3368*p1241
- p0668: 0; = IF(p0404<0.5;-SQRT(p0007*EXP(p0536^2*p0008)-p0007);SQRT(p0007*EXP(p0536^2*p0008)-p0007))
- p0389: 0.5
- p1323: 0; = IF(((p0745*1000*p0750/100)+(p0754*1000*p0759/100))/p0801<0;0;((p0745*1000*p0750/100)+(p0754*1000*p0759/100))/p0801)
- p3453: 0; = p3377*p1240
- p0972: 0.00190898; = p0969/p0818
- p1963i: 5.6226e-6; = p1706*p1910+p1707*p1911+p1708*p1912+p1709*p1913+p1710*p1914+p1711*p1915+p1712*p1916+p1713*p1917+p1714*p1918+p1715*p1919+p1716*p1920+p1717*p1921+p1718*p1922+p1719*p1923+p1720*p1924+p1721*p1925+p1722*p1926+p1723*p1927+p1724*p1928
- p1705: 0
- p1044: 0.00962013; = IF(p1012=0;IF(p1037=1;0;IF(p1037+p1038>1;1-p1037;p1038));0)
- p1669: 0
- p2712: 1.02861e-5; = p2321*(p1019+p1021)
- p5178: 1.58144e-8; = p1799*p3484
- p2375: 0; = p2229*p2204
- p0670: 1559.75; = p0010*(1+p0538*p0142/100)
- p2639: 0; = p2248*(p1019+p1021)
- p2286: 9.28155e-5; = p2223*p2192
- p2972: 0; = p2386*(p1079+p1081)
- p3297: 0; = if(p1273+p1274+p1275+p1276=0;0;p1273/(p1273+p1274+p1275+p1276))
- p2669: 5.66514e-6; = p2278*(p1019+p1021)
- p2887: 0.000172941; = p2301*(p1079+p1081)
- p2808: 0; = p2417*(p1078+p1080)
- p1583: 0
- p1519: 48
- p2810: 0; = p2419*(p1078+p1080)
- p1660: 0.731714
- p2855: 2.67921e-5; = p2269*(p1079+p1081)
- p3219: 0.0250954; = p3215*p1228
- p2126: 5.31273e-6; = p2015*p2054*p2088/(p0818*1000)
- p2050: 0.952062
- p0695: 0
- p2736: 6.5975e-7; = p2345*(p1078+p1080)
- p3365: 0.00392845; = if(p1232=0;p3244*p3359/p0818;0)
- p0824: 0.8964
- p0976: 0; = IF(p0687=0;IF(OR(p0686=0;p0689=0);0;p0686*1000*p0689/100);0)
- p1251: 4.58303e-6; = if(p1232>0;0;p1246*p0001/(p0818*p0002))
- p0952: 4.26728e-5; = if(and(p0683>0;or(p0807=56;p0807=100;and(p0807=60;p0901>0.06)));p0934;0)
- p3275: 0.0214527
- p2581: 0; = p2385*p1073
- p2991: 0; = p2405*(p1020+p1022)
- p1069: 3.41086e-6; = IF(p1012=0;p1055/(p1062*p0818);0)
- p2769: 0; = p2378*(p1078+p1080)
- p1589: 0
- p1110: 3.75471e6; = IF(p1071=0;p1105*p1104*p1095;0)
- p1077: 0; = IF(p1071=0;p0715/100;0)
- p1312: 0; = IF(p1307+p1310+p1311=p1266;0;p1266-(p1307+p1310+p1311))
- p2074: 0.025
- p1022: 0; = IF(p1012=0;IF(p1014+p1019+p1020+p1021=1;0;IF(p1014+p1019+p1020+p1021+p1018>1;1-(p1014+p1019+p1020+p1021);p1018));0)
- p3232: 7.89771e-8; = p1182/p0818
- p1943: 0
- p2206: 0.000298663; = 9*1.00794*p2204/30.973762
- p2926: 3.85653e-5; = p2340*(p1079+p1081)
- p2813: 0; = p2422*(p1078+p1080)
- p2169: 0.00213619; = p2166*(p0908)
- p2315: 0.000132982; = p2224*p2182
- p0902: 0
- p2969: 0; = p2383*(p1079+p1081)
- p1317: 0
- p0680: 207.084; = p0020*(1+p0548*p0152/100)
- p0759: 0
- p0331: 0.5
- p2109: 0.826583
- p1016: 0.36325; = IF(p1012=0;p0707/100;0)
- p1963b: 1.84635e-7; = p1569*p1773+p1570*p1774+p1571*p1775+p1572*p1776+p1573*p1777+p1574*p1778+p1575*p1779+p1576*p1780+p1577*p1781+p1578*p1782+p1579*p1783+p1580*p1784+p1581*p1785+p1582*p1786+p1583*p1787+p1584*p1788+p1585*p1789+p1586*p1790+p1587*p1791
- p0865: 0; = IF(p0858+p0864=1;0;IF(p0858+p0864+p0860>1;1-(p0858+p0864);p0860))
- p2611: 0; = p2415*p1073
- p3431: 0; = p3374*p1239
- p0259: 31.467
- p2289: 0.000998052; = p2223*p2196
- p2303: 9.19252e-5; = p2227*p2210
- p2625: 0; = p2429*p1123
- p2415: 0; = p2235*p2205
- p2472: 0.000108948; = p2276*p1014
- p2250: 0; = p2222*p2196
- p2181: 0.959288; = p0887+p0889+p0893+p2180
- p1734: 0
- p3338: 0; = if(and(p1232=0;p3254<>0);1-(p3334+p3335+p3336+p3337);0)
- p3180: 0; = p2399*p1023
- p1951: 0
- p0920: 0.451193; = p0676*1000/p0801
- p2033: 2.10535e-5; = p2015*p2029*p2031/(p0818*1000)
- p3475: 0.135995; = p3380*p1241
- p0752: 0
- p2374: 0; = p2225*p2203
- p3359: 2.62718e7; = if(p1232=0;p3309+p3320+p3331+p3342+p3353;0)
- p0310: 0.5
- p2791: 0; = p2400*(p1019+p1021)
- p4482: 0; = p1927*p3480
- p2423: 0; = p2235*p2213
- p1128: 0.36994; = if(p1121=0;IF(p1123=1;0;IF(p1123+p1124>1;1-p1123;p1124));0)
- p3165: 0; = p2384*p1082
- p2193: 0.000599409; = p1054/p0818
- p1954: 0
- p0591: 0; = IF(p0327<0.5;-SQRT(p0007*EXP(p0459^2*p0008)-p0007);SQRT(p0007*EXP(p0459^2*p0008)-p0007))
- p2037: 3.16
- p0243: 52.107
- p2638: 0; = p2247*(p1019+p1021)
- p0521: 0; = SQRT(2)*(IF((2*p0389-1)<0;-1;IF((2*p0389-1)>0;1;0))*SQRT(SQRT((2/(pi()*0.140012289)+LN(1-(2*p0389-1)^2)/2)^2-LN(1-(2*p0389-1)^2)/0.140012289)-(2/(pi()*0.140012289)+LN(1-(2*p0389-1)^2)/2)))
- p1214: 29; = IF(p1213=0;0;p1213-1)
- p0530: 0; = SQRT(2)*(IF((2*p0398-1)<0;-1;IF((2*p0398-1)>0;1;0))*SQRT(SQRT((2/(pi()*0.140012289)+LN(1-(2*p0398-1)^2)/2)^2-LN(1-(2*p0398-1)^2)/0.140012289)-(2/(pi()*0.140012289)+LN(1-(2*p0398-1)^2)/2)))
- p2188: 0.000117697; = p1066-p2186-p2187
- p0827: 0; = p0818*p0819*p0823
- p1162: 0.000381098; = p1161/p0818
- p2262: 0.000291425; = p2226*p2208
- p1675: 0
- p2670: 1.95133e-5; = p2279*(p1019+p1021)
- p0712: 42.304; = p0052*(1+p0580*p0184/100)
- p1926: 0
- p1768: 0
- p3072: 3.82197e-9; = p2291*p1023
- p2784: 0; = p2393*(p1019+p1021)
- p0853: 0; = p0803/(p0802+p0803)
- p0867: 0.0147667; = IF(p0858+p0864+p0865+p0866=1;0;IF(p0858+p0864+p0865+p0866+p0862>1;1-(p0858+p0864+p0865+p0866);p0862))
- p1811: 0
- p2496: 0.000282215; = p2300*p1073
- p0675: 0
- p2412: 0; = p2234*p2202
- p0242: 14.596
- p2083: 2.17294
- p2100: 0.705744
- p0067: 53.292
- p1673: 0
- p2681: 1.74955e-7; = p2290*(p1019+p1021)
- p0674: 24.365; = p0014*(1+p0542*p0146/100)
- p0987: 0; = if(p0978>0;0;if(and(p0687=0;p0691=0;p0695=0;p0699=0);0;IF(p0982+p0985+p0986=1;0;1-(p0982+p0985+p0986))))
- p2173: 0.124066; = p0895*p0898/p0818
- p3290: 0.195
- p5063: 0; = p1890*p3483
- p2678: 0.000192162; = p2287*(p1019+p1021)
- p0111: 24.315
- p0006: 15
- p3457: 0.00241039; = p3362*p1241
- p1695: 0
- p0616: 0; = IF(p0352<0.5;-SQRT(p0007*EXP(p0484^2*p0008)-p0007);SQRT(p0007*EXP(p0484^2*p0008)-p0007))
- p1568: 0
- p2351: 0.000815787; = p2232*p2219
- p3207: 0; = p2426*p1082
- p3136: 0; = p2355*p1023
- p1302: 0; = IF(p1297+p1300+p1301=p1262;0;p1262-(p1297+p1300+p1301))
- p0103: 1649.95
- p3363: 0.00219981; = if(p1232=0;p3244*p3357/p0818;0)
- p2461: 0.000156203; = p2265*p1073
- p3658: 0; = p1927*p3476
- p2576: 0; = p2380*p1073
- p1225: 1.088; = IF(p1221=0;0;p1223+1.2*p1224)
- p2618: 0; = p2422*p1073
- p1175: 0.000369355
- p1561: 0
- p2787: 0; = p2396*(p1019+p1021)
- p2177: 0.1375; = p0895/p0818-(p2173+p2174+p2175+p2176)
- p2131: 1.91028e-6; = p2015*p2059*p2093/(p0818*1000)
- p0387: 0.5
- p1647: 0
- p1276: 0; = p1272*p1252/p0818
- p1865: 0
- p2632: 0; = p2241*(p1019+p1021)
- p2392: 0; = p2233*p2221
- p1789: 0
- p1672: 0
- p1735: 0
- p1212: 0.0864883; = if(p1211=0;0;if(p1193>0;0;(p1207+p1208+p1209)*p1210/(2000*p1211)))
- p0042: 1649.95
- p1803: 0
- p1763: 0
- p1662: 0
- p0118: 21.938
- p1286: 0; = p1282*p1252/p0818
- p3310: 0; = if(and(p1232=0;p3252<>0);IF((p3306+p3307+p3308+p3309)+(p3252*(p3257*(1-p3277))/p3305)>p3252;p3252-(p3306+p3307+p3308+p3309);p3252*(p3257*(1-p3277))/p3305);0)
- p2001: 400
- p1223: 0.56
- p1160: 0.0314687; = (p1156+p1158)*p1159
- p0129: 13.425
- p2248: 0; = p2222*p2193
- p0531: 0; = SQRT(2)*(IF((2*p0399-1)<0;-1;IF((2*p0399-1)>0;1;0))*SQRT(SQRT((2/(pi()*0.140012289)+LN(1-(2*p0399-1)^2)/2)^2-LN(1-(2*p0399-1)^2)/0.140012289)-(2/(pi()*0.140012289)+LN(1-(2*p0399-1)^2)/2)))
- p3336: 0; = IF(or(p3254=0;p1232>0);0;p3271*p3289)
- p1045: 0.0348009; = IF(p1012=0;IF(p1037+p1044=1;0;IF(p1037+p1044+p1039>1;1-(p1037+p1044);p1039));0)
- p3238: 0.854735; = IF(p3237+p3235+p3236>1;1-(p3235+p3236);p3237)
- p3375: 0; = if(p1232=0;p3246*p3357/p0818;0)
- p0452: 0; = SQRT(2)*(IF((2*p0320-1)<0;-1;IF((2*p0320-1)>0;1;0))*SQRT(SQRT((2/(pi()*0.140012289)+LN(1-(2*p0320-1)^2)/2)^2-LN(1-(2*p0320-1)^2)/0.140012289)-(2/(pi()*0.140012289)+LN(1-(2*p0320-1)^2)/2)))
- p2018: 0.1978
- p1318: 0; = p1317*p0001/(p0818*p0002)
- p3792: 0; = p1855*p3477
- p3177: 0; = p2396*p1023
- p0245: 21.426
- p1933: 0
- p3311: 0; = if(and(p1232=0;p3252<>0);p3252-(p3306+p3307+p3308+p3309+p3310);0)
- p2866: 1.82468e-5; = p2280*(p1020+p1022)
- p0915: 0.0289793; = p0914/p0818
- p1598: 0
- p3459: 0.000134751; = p3364*p1241
- p4419: 0; = p1864*p3480
- p0917: 1.32164
- p1581: 0
- p1872: 0
- p0283: 0.5
- p3322: 0; = if(and(p1232=0;p3253<>0);p3253-(p3317+p3318+p3319+p3320+p3321);0)
- p0725: 9.504; = p0065*(1+p0593*p0197/100)
- p3200: 0; = p2419*p1082
- p3422: 0; = p3365*p1239
- p2664: 0.00178132; = p2273*(p1128+p1130)
- p2494: 0.000104963; = p2298*p1073
- p2239: 0; = p2222*p2184
- p2631: 0; = p2240*(p1019+p1021)
- p2655: 2.40713e-5; = p2264*(p1078+p1080)
- p2617: 0; = p2421*p1073
- p2721: 7.82827e-8; = p2330*(p1019+p1021)
- p2341: 4.74768e-5; = p2228*p2209
- p2977: 0; = p2391*(p1129+p1131)
- p2770: 0; = p2379*(p1078+p1080)
- p2219: 0.018515; = p1154-p2218
- p0018: 440.291
- p3434: 0; = p3377*p1239
- p0089: 3.637
- p2781: 0; = p2390*(p1128+p1130)
- p1194: 1.48
- p2646: 0; = p2255*(p1019+p1021)
- p1190: 1.02413e-7; = p1188/p0818
- p2629: 0; = p2238*(p1019+p1021)
- p3121: 0; = p2340*p1082
- p2184: 1.76712e-5; = p1051/p0818
- p1668: 0
- p3058: 5.81449e-7; = p2277*p1023
- p1847: 0
- p0981: 0.000340008; = p0978*p0001/(p0818*p0002)
- p2635: 0; = p2244*(p1019+p1021)
- p0737: 0
- p1874: 0
- p3024: 0; = p2243*p1023
- p1767: 0
- p3235: 0.118093
- p1772: 0
- p2668: 4.36868e-5; = p2277*(p1019+p1021)
- p4823: 0; = p1856*p3482
- p3189: 0; = p2408*p1023
- p3104: 6.75112e-8; = p2323*p1023
- p1179: 0.5
- p2788: 0; = p2397*(p1019+p1021)
- p3354: 2.68372e7; = IF((p3350+p3351+p3352+p3353)+IF(p3349=0;0;(p3256*(p3273*(1-p3277))/p3349))>p3256;p3256-(p3350+p3351+p3352+p3353);IF(p3349=0;0;p3256*(p3273*(1-p3277))/p3349))
- p3265: 0.696292
- p2645: 0; = p2254*(p1019+p1021)
- p1210: 0.46
- p2849: 4.84088e-5; = p2263*(p1079+p1081)
- p1649: 0
- p0805: 0
- p2994: 0; = p2408*(p1020+p1022)
- p3173: 0; = p2392*p1132
- p4625: 3.37357e-7; = p1864*p3481
- p0982: 0; = if(p0886=0;0;min(1;(p0691*p0690*1000*p0693/100)/p0886))
- p2283: 3.98447e-5; = p2223*p2189
- p1554: 0
- p2060: 0.272353
- p3266: 0.0545989
- p0402: 0.5
- p1024: 124771; = IF(p1012=0;p1014*(p0704/100)*p0703*1000;0)
- p0532: 0; = SQRT(2)*(IF((2*p0400-1)<0;-1;IF((2*p0400-1)>0;1;0))*SQRT(SQRT((2/(pi()*0.140012289)+LN(1-(2*p0400-1)^2)/2)^2-LN(1-(2*p0400-1)^2)/0.140012289)-(2/(pi()*0.140012289)+LN(1-(2*p0400-1)^2)/2)))
- p1073: 0.20963; = IF(p1071=0;p0711/100;0)
- p3105: 1.69773e-8; = p2324*p1023
- p3114: 2.41285e-7; = p2333*p1023
- p2949: 0; = p2363*(p1020+p1022)
- p3267: 0.0170629
- p1053: 219540; = IF(p1012=0;p1046*p1036;0)
- p2779: 0; = p2388*(p1078+p1080)
- p1760: 0
- p2055: 5.59471
- p0914: 1.25469e8; = p0825*p0911+(p0830+p0895)*p0824*p0913
- p1610: 0
- p1641: 0
- p2162: 1.19148e-7; = p2015*p2086*p2124/(p0818*1000)
- p2205: 0.000922296; = 2*14.0067*p2204/30.973762
- p0860: 0; = p0672*1000/p0856
- p2899: 0.00068787; = p2313*(p1129+p1131)
- p1075: 0.36733; = IF(p1071=0;p0713/100;0)
- p3178: 0; = p2397*p1023
- p1191: 0.5
- p4458: 0; = p1903*p3480
- p1635: 0
- p4102: 0.000139427; = p1963*p3478
- p1164: 8015.92; = p1163*p0801
- p1224: 0.44; = IF(p1221=0;0;IF(p1193=0;1-p1223;0))
- p1766: 0
- p0321: 0.5
- p0808: 0
- p0646: 0; = IF(p0382<0.5;-SQRT(p0007*EXP(p0514^2*p0008)-p0007);SQRT(p0007*EXP(p0514^2*p0008)-p0007))
- p2616: 0; = p2420*p1073
- p2475: 1.06821e-5; = p2279*p1014
- p1903: 3.44143e-5; = p1495*1000/p0818
- p1145: 7.87513e7; = if(p1121=0;p0799*p0702*1000*p0800/100;0)
- p2886: 0.000494519; = p2300*(p1079+p1081)
- p1701: 0
- p1667: 0
- p0901: 0.0656776
- p0004: 0.0254
- p2259: 0.000309933; = p2226*p2205
- p0768: 0
- p1057: 0.82
- p0446: 0; = SQRT(2)*(IF((2*p0314-1)<0;-1;IF((2*p0314-1)>0;1;0))*SQRT(SQRT((2/(pi()*0.140012289)+LN(1-(2*p0314-1)^2)/2)^2-LN(1-(2*p0314-1)^2)/0.140012289)-(2/(pi()*0.140012289)+LN(1-(2*p0314-1)^2)/2)))
- p3064: 2.16357e-7; = p2283*p1023
- p1337: 0; = p1336*p0001/(p0818*p0002)
- p0671: 42.438; = p0011*(1+p0539*p0143/100)
- p3182: 0; = p2401*p1023
- p0856: 1.65e6; = p0801
- p0776: 17.817; = p0116*(1+p0644*p0248/100)
- p0052: 42.304
- p2203: 0.000342262; = p1070-p2200-p2201-p2202
- p1839: 0
- p2057: 3.28794
- p0471: 0; = SQRT(2)*(IF((2*p0339-1)<0;-1;IF((2*p0339-1)>0;1;0))*SQRT(SQRT((2/(pi()*0.140012289)+LN(1-(2*p0339-1)^2)/2)^2-LN(1-(2*p0339-1)^2)/0.140012289)-(2/(pi()*0.140012289)+LN(1-(2*p0339-1)^2)/2)))
- p0704: 33.859; = p0044*(1+p0572*p0176/100)
- p0948: 0; = if(and(p0683=0;or(p0807=480;p0807=32;p0807=1;and(p0807=60;p0901<0.03)));p0936;0)
- p1614: 0
- p2047: 2.1924e-13; = p2015*p2045/(p0818*1000000000000)
- p0821: 1.77727
- p2200: 0.000483848; = p1056/p0818
- p1263: 0.75403; = if(p1232>0;0;IF(p1259=1;0;IF(p1259+p1260>1;1-p1259;p1260)))
- p3044: 0; = p2263*p1082
- p0960: 0; = if(and(p0683>0;or(p0807=480;p0807=32;p0807=1;and(p0807=60;p0901<0.03)));p0936;0)
- p2075: 0.072
- p0751: 20.866; = p0091*(1+p0619*p0223/100)
- p2014: 3.52975e7; = p0833*p2011*p2013
- p2474: 3.10126e-6; = p2278*p1014
- p2064: 0.676706
- p2925: 0.000110276; = p2339*(p1079+p1081)
- p2028: 0.000215752; = p2015*p2026*p2027/(p0818*1000)
- p0844: 0.389169
- p0900: 1.14331; = p0899/p0818
- p0736: 67.861; = p0076*(1+p0604*p0208/100)
- p4560: 4.81938e-8; = p1799*p3481
- p3026: 0; = p2245*p1023
- p2277: 0.000107081; = p2223*p2183
- p0404: 0.5
- p0415: 0; = SQRT(2)*(IF((2*p0283-1)<0;-1;IF((2*p0283-1)>0;1;0))*SQRT(SQRT((2/(pi()*0.140012289)+LN(1-(2*p0283-1)^2)/2)^2-LN(1-(2*p0283-1)^2)/0.140012289)-(2/(pi()*0.140012289)+LN(1-(2*p0283-1)^2)/2)))
- p0921: 0.156466; = p0679*1000/p0801
- p1687: 0
- p1638: 0
- p3092: 9.14278e-8; = p2311*p1132
- p1870: 0
- p1574: 0
- p1569: 0
- p0213: 10.693
- p2122: 0.341195
- p3278: 0.46
- p2847: 0.000306103; = p2261*(p1079+p1081)
- p3732: 0; = p1795*p3477
- p0155: 2.809
- p3033: 0; = p2252*p1023
- p3262: 0.0787162
- p1277: 0.75403
- p3522: 0; = p1791*p3476
- p2400: 0; = p2234*p2189
- p1174: 1.31219e-7; = p1170*p1173/p0818
- p2165: 0.801562; = (p0833-p2014)/p0818-p0839
- p0140: 58.791
- p2359: 0; = p2225*p2187
- p2408: 0; = p2234*p2198
- p3399: 0.311868; = p3380*p1234
- p0767: 8.338; = p0107*(1+p0635*p0239/100)
- p1730: 0
- p0454: 0; = SQRT(2)*(IF((2*p0322-1)<0;-1;IF((2*p0322-1)>0;1;0))*SQRT(SQRT((2/(pi()*0.140012289)+LN(1-(2*p0322-1)^2)/2)^2-LN(1-(2*p0322-1)^2)/0.140012289)-(2/(pi()*0.140012289)+LN(1-(2*p0322-1)^2)/2)))
- p2979: 0; = p2393*(p1020+p1022)
- p2686: 9.57104e-6; = p2295*(p1019+p1021)
- p3038: 0; = p2257*p1023
- p0248: 43.506
- p2706: 5.42539e-5; = p2315*(p1019+p1021)
- p3300: 0; = if(p1293+p1294+p1295+p1296=0;0;p1293/(p1293+p1294+p1295+p1296))
- p3014: 0; = p2428*(p1129+p1131)
- p1848: 0
- p3080: 0; = p2299*p1082
- p1182: 341.939; = p1181*p0801
- p3294: 0.279
- p1167: 0.5
- p2015: 3.16407e7; = p0830*p2011*p2013
- p2447: 0; = p2251*p1014
- p1495: 149
- p3018: 0; = p2237*p1023
- p2995: 0; = p2409*(p1020+p1022)
- p1940: 0
- p0196: 22.637
- p0871: 3.2141; = p0870*p0001*p0003/(p0818*p0002)
- p0730: 0
- p3246: 0; = IF(p3244+p3245=1;0;1-(p3244+p3245))
- p0217: 10.184
- p2967: 0; = p2381*(p1079+p1081)
- p2048: 7.30799e-14; = p2015*p2046/(p0818*1000000000000)
- p0272: 6.774
- p2724: 1.81288e-5; = p2333*(p1019+p1021)
- p1841: 0
- p1714: 0
- p3840: 0; = p1903*p3477
- p0114: 50.367
- p2703: 0.00476634; = p2312*(p1128+p1130)
- p3034: 0; = p2253*p1023
- p2550: 0; = p2354*p1014
- p0410: 0; = SQRT(2)*(IF((2*p0278-1)<0;-1;IF((2*p0278-1)>0;1;0))*SQRT(SQRT((2/(pi()*0.140012289)+LN(1-(2*p0278-1)^2)/2)^2-LN(1-(2*p0278-1)^2)/0.140012289)-(2/(pi()*0.140012289)+LN(1-(2*p0278-1)^2)/2)))
- p2683: 6.31355e-7; = p2292*(p1019+p1021)
- p3398: 0; = p3379*p1234
- p0742: 98.597; = p0082*(1+p0610*p0214/100)
- p2917: 1.53243e-7; = p2331*(p1020+p1022)
- p2439: 0; = p2243*p1014
- p0514: 0; = SQRT(2)*(IF((2*p0382-1)<0;-1;IF((2*p0382-1)>0;1;0))*SQRT(SQRT((2/(pi()*0.140012289)+LN(1-(2*p0382-1)^2)/2)^2-LN(1-(2*p0382-1)^2)/0.140012289)-(2/(pi()*0.140012289)+LN(1-(2*p0382-1)^2)/2)))
- p2500: 0.000252352; = p2304*p1073
- p2641: 0; = p2250*(p1019+p1021)
- p0956: 0; = if(and(p0683>0;or(p0807=56;p0807=100;and(p0807=60;p0901>0.06)));p0938;0)
- p0377: 0.5
- p1867: 0
- p1313: 0.250904; = p1307*p1252/p0818
- p1890: 2.07871e-6; = p1482*1000/p0818
- p2024: 0.748682
- p3215: 0.450791; = p1222*3*15.9994/100.0869
- p2457: 0.000174688; = p2261*p1073
- p0839: 0.787758; = p0838/p0818
- p4758: 0; = p1791*p3482
- p1775: 0
- p4721: 0; = p1754*p3482
- p1272: 0; = IF(p1267+p1270+p1271=p1259;0;p1259-(p1267+p1270+p1271))
- p1798: 0
- p2762: 0; = p2371*(p1019+p1021)
- p2651: 4.24581e-5; = p2260*(p1078+p1080)
- p1629: 0
- p2091: 0.374844
- p2857: 3.88909e-5; = p2271*(p1079+p1081)
- p2934: 1.56327e-6; = p2348*(p1079+p1081)
- p1657: 0.687857
- p1557: 0
- p3217: 0.00627969; = p3213*p1228
- p2421: 0; = p2235*p2211
- p1850: 0
- p0503: 0; = SQRT(2)*(IF((2*p0371-1)<0;-1;IF((2*p0371-1)>0;1;0))*SQRT(SQRT((2/(pi()*0.140012289)+LN(1-(2*p0371-1)^2)/2)^2-LN(1-(2*p0371-1)^2)/0.140012289)-(2/(pi()*0.140012289)+LN(1-(2*p0371-1)^2)/2)))
- p1290: 0; = IF(p1287=p1264;0;IF(p1287+p1288>p1264;p1264-p1287;p1288))
- p5100: 0; = p1927*p3483
- p2682: 2.87162e-7; = p2291*(p1019+p1021)
- p0703: 1649.95; = p0043*(1+p0571*p0175/100)
- p2846: 3.68668e-5; = p2260*(p1079+p1081)
- p3587: 0; = p1856*p3476
- p0940: 0; = if(and(p0683=0;p0946=0);p0934;0)
- p2970: 0; = p2384*(p1079+p1081)
- p1588: 0
- p1912: 0
- p0506: 0; = SQRT(2)*(IF((2*p0374-1)<0;-1;IF((2*p0374-1)>0;1;0))*SQRT(SQRT((2/(pi()*0.140012289)+LN(1-(2*p0374-1)^2)/2)^2-LN(1-(2*p0374-1)^2)/0.140012289)-(2/(pi()*0.140012289)+LN(1-(2*p0374-1)^2)/2)))
- p2106: 0.856281
- p1963e: 0; = p1628*p1832+p1629*p1833+p1630*p1834+p1631*p1835+p1632*p1836+p1633*p1837+p1634*p1838+p1635*p1839+p1636*p1840+p1637*p1841+p1638*p1842+p1639*p1843+p1640*p1844+p1641*p1845+p1642*p1846+p1643*p1847+p1644*p1848+p1645*p1849+p1646*p1850
- p0678: 440.291; = p0018*(1+p0546*p0150/100)
- p2137: 3.44039e-7; = p2015*p2065*p2099/(p0818*1000)
- p0619: 0; = IF(p0355<0.5;-SQRT(p0007*EXP(p0487^2*p0008)-p0007);SQRT(p0007*EXP(p0487^2*p0008)-p0007))
- p3282: 0.3
- p2042: 0.07
- p1804: 0
- p0962: 0; = if(and(p0683>0;or(p0807=480;p0807=32;p0807=1;and(p0807=60;p0901<0.03)));p0938;0)
- p3446: 0; = p3370*p1240
- p0950: 0; = if(and(p0683=0;or(p0807=480;p0807=32;p0807=1;and(p0807=60;p0901<0.03)));p0938;0)
- p2656: 0.000315223; = p2265*(p1078+p1080)
- p3269: 0.851786
- p3303: 0; = if(and(p1232=0;p3252<>0);p3259*p3289;0)
- p0339: 0.5
- p2032: 0.448886
- p2935: 1.40107e-5; = p2349*(p1079+p1081)
- p2529: 9.92424e-6; = p2333*p1014
- p1202: 0.7
- p0010: 1559.75
- p2070: 0.282
- p2747: 0; = p2356*(p1019+p1021)
- p2029: 6.19
- p2280: 5.02321e-5; = p2223*p2186
- p2271: 0.000105874; = p2226*p2217
- p3137: 0; = p2356*p1023
- p2505: 4.00067e-6; = p2309*p1073
- p1671: 0
- p3328: 0; = if(and(p1232=0;p3255<>0);p3255*(p3265*p3277-p3323)/p3327;0)
- p2666: 0.000327853; = p2275*(p1128+p1130)
- p2196: 0.00127013; = p1068-p2193-p2195
- p2914: 9.88322e-5; = p2328*(p1020+p1022)
- p0746: 0
- p1592: 0
- p0866: 0.0141727; = IF(p0858+p0864+p0865=1;0;IF(p0858+p0864+p0865+p0861>1;1-(p0858+p0864+p0865);p0861))
- p1996: 30
- p1177: 0.000340008; = p0801*p0001/(p0818*p0002)
- p3020: 0; = p2239*p1023
- p3172: 0; = p2391*p1132
- p2140: 1.03512e-6; = p2015*p2068*p2102/(p0818*1000)
- p1866: 0
- p2209: 0.000392167; = 14.0067*p2208/30.973762
- p1992: 3900
- p2697: 2.95857e-6; = p2306*(p1078+p1080)
- p1942: 0
- p0650: 0; = IF(p0386<0.5;-SQRT(p0007*EXP(p0518^2*p0008)-p0007);SQRT(p0007*EXP(p0518^2*p0008)-p0007))
- p2920: 2.32309e-6; = p2334*(p1020+p1022)
- p2463: 9.07482e-7; = p2267*p1073
- p1830: 0
- p1249: 0; = if(p1232>0;0;p1244*p0001/(p0818*p0002))
- p1707: 0
- p1297: 0
- p0974: 0.5
- p1593: 0
- p3271: 0.0195489
- p0973: 1.17989e8; = p0967+p0968+p0969
- p3342: 0; = if(and(p1232=0;p3254<>0);p3254*(p3272-p3337)/p3338;0)
- p0708: 0
- p1713: 0
- p2624: 0; = p2428*p1123
- p2292: 1.54751e-6; = p2223*p2199
- p4070: 7.61086e-6; = p1927*p3478
- p2020: 820179; = p2015*p2018*p2019
- p3270: 0.0747083
- p2778: 0; = p2387*(p1078+p1080)
- p0043: 1649.95
- p3122: 0; = p2341*p1082
- p2954: 0; = p2368*(p1020+p1022)
- p3373: 0.000382656; = if(p1232=0;p3245*p3361/p0818;0)
- p2499: 1.92703e-5; = p2303*p1073
- p1906: 0
- p2155: 8.98012e-7; = p2015*p2084*p2117/(p0818*1000)
- p2273: 0.00481516; = p2230*p2219
- p3320: 1.96028e7; = if(and(p1232=0;p3253<>0);p3253*(p3264-p3315)/p3316;0)
- p2615: 0; = p2419*p1073
- p1611: 0
- p2013: 0.75
- p3483: 0; = if(p1328+p1330+p1332+p1334+p1336+p1338+p1340+p1342+p1344=0;0;p1342/(p1328+p1330+p1332+p1334+p1336+p1338+p1340+p1342+p1344))
- p3347: 0.00107264; = if(and(p1232=0;p3256<>0);p3275*p3289;0)
- p0197: 20.444
- p2234: 0; = 1-(p2222+p2223+p2224+p2225)
- p0191: 15.634
- p1038: 0.00962013
- p2388: 0; = p2229*p2217
- p0644: 0; = IF(p0380<0.5;-SQRT(p0007*EXP(p0512^2*p0008)-p0007);SQRT(p0007*EXP(p0512^2*p0008)-p0007))
- p2864: 5.04403e-6; = p2278*(p1020+p1022)
- p0316: 0.5
- p2493: 0.000116055; = p2297*p1073
- p2997: 0; = p2411*(p1020+p1022)
- p2244: 0; = p2222*p2189
- p2089: 0.40001
- p0593: 0; = IF(p0329<0.5;-SQRT(p0007*EXP(p0461^2*p0008)-p0007);SQRT(p0007*EXP(p0461^2*p0008)-p0007))
- p0986: 0; = IF(p0982+p0985=1;0;IF(p0982+p0985+p0984>1;1-(p0982+p0985);p0984))
- p1260: 0.75403; = if(p1232>0;0;p0731/100)
- p1097: 0.0290355
- p2482: 2.07294e-5; = p2286*p1014
- p0863: 0; = p0675*1000/p0856
- p3174: 0; = p2393*p1023
- p2768: 0; = p2377*(p1078+p1080)
- p1065: 7.85388e-5; = IF(p1012=0;p1051/(p1058*p0818);0)
- p0045: 22.334
- p2821: 0; = p2430*(p1128+p1130)
- p0182: 21.426
- p0463: 0; = SQRT(2)*(IF((2*p0331-1)<0;-1;IF((2*p0331-1)>0;1;0))*SQRT(SQRT((2/(pi()*0.140012289)+LN(1-(2*p0331-1)^2)/2)^2-LN(1-(2*p0331-1)^2)/0.140012289)-(2/(pi()*0.140012289)+LN(1-(2*p0331-1)^2)/2)))
- p1834: 0
- p1117: 0.000274562; = IF(p1071=0;p1107/(p1112*p0818);0)
- p2804: 0; = p2413*(p1019+p1021)
- p0816: 0
- p2944: 0; = p2358*(p1020+p1022)
- p0642: 0; = IF(p0378<0.5;-SQRT(p0007*EXP(p0510^2*p0008)-p0007);SQRT(p0007*EXP(p0510^2*p0008)-p0007))
- p1076: 0; = IF(p1071=0;p0714/100;0)
- p0664: 0; = IF(p0400<0.5;-SQRT(p0007*EXP(p0532^2*p0008)-p0007);SQRT(p0007*EXP(p0532^2*p0008)-p0007))
- p1640: 0
- p2814: 0; = p2423*(p1078+p1080)
- p1258: 0.14078; = if(p1232>0;0;IF(p1253+p1256+p1257=1;0;1-(p1253+p1256+p1257)))
- p1199: -0.29
- p2859: 0.00242723; = p2273*(p1129+p1131)
- p0277: 0.5
- p1908: 0
- p0442: 0; = SQRT(2)*(IF((2*p0310-1)<0;-1;IF((2*p0310-1)>0;1;0))*SQRT(SQRT((2/(pi()*0.140012289)+LN(1-(2*p0310-1)^2)/2)^2-LN(1-(2*p0310-1)^2)/0.140012289)-(2/(pi()*0.140012289)+LN(1-(2*p0310-1)^2)/2)))
- p5234: 2.31997e-5; = p1855*p3484
- p1742: 0
- p1957: 0
- p1797: 0
- p2946: 0; = p2360*(p1020+p1022)
- p0908: 0.00297304
- p0726: 32.525; = p0066*(1+p0594*p0198/100)
- p1693: 0
- p2291: 7.03862e-7; = p2223*p2198
- p2805: 0; = p2414*(p1078+p1080)
- p4276: 4.03215e-7; = p1927*p3479
- p0994: 0; = p0990*p0001*p0004/(p0818*p0002)
- p3281: 0.46
- p0772: 0
- p2477: 1.61465e-6; = p2281*p1014
- p0384: 0.5
- p3078: 0; = p2297*p1082
- p2868: 3.35952e-5; = p2282*(p1020+p1022)
- p0057: 12.597
- p0538: 0; = IF(p0274<0.5;-SQRT(p0007*EXP(p0406^2*p0008)-p0007);SQRT(p0007*EXP(p0406^2*p0008)-p0007))
- p1818: 0
- p0910: 0.0105884; = p0909/p0818
- p1715: 0
- p0655: 0; = IF(p0391<0.5;-SQRT(p0007*EXP(p0523^2*p0008)-p0007);SQRT(p0007*EXP(p0523^2*p0008)-p0007))
- p1769: 0
- p1774: 0
- p1762: 0
- p1307: 0.24597
- p0861: 0.0141727; = p0673*1000/p0856
- p2012: 0.0126189
- p0795: 14.236; = p0135*(1+p0663*p0267/100)
- p3016: 0; = p2430*(p1129+p1131)
- p2782: 0; = p2391*(p1128+p1130)
- p0689: 0
- p2294: 0.000163001; = p2223*p2201
- p1862: 0
- p2195: 0.00012849; = p2194*p2193
- p1664: 0
- p3461: 0.00210588; = p3366*p1241
- p1827: 0
- p2761: 0; = p2370*(p1019+p1021)
- p2816: 0; = p2425*(p1078+p1080)
- p2129: 9.00684e-6; = p2015*p2057*p2091/(p0818*1000)
- p2692: 0.00019917; = p2301*(p1078+p1080)
- p2247: 0; = p2222*p2192
- p1141: 0.00010076; = if(p1121=0;p1135*p0001/(p0818*p0002);0)
- p0815: 0
- p0380: 0.5
- p1853: 0
- p1698: 0
- p3384: 0.00127773; = p3365*p1234
- p0984: 0; = if(p0886=0;0;min(1;(p0699*p0698*1000*p0701/100)/p0886))
- p0958: 0; = if(and(p0683>0;or(p0807=480;p0807=32;p0807=1;and(p0807=60;p0901<0.03)));p0934;0)
- p3169: 0; = p2388*p1082
- p4213: 5.88022e-8; = p1864*p3479
- p1741: 0
- p0667: 0; = IF(p0403<0.5;-SQRT(p0007*EXP(p0535^2*p0008)-p0007);SQRT(p0007*EXP(p0535^2*p0008)-p0007))
- p2637: 0; = p2246*(p1019+p1021)
- p2052: 9.00151e-6; = p2015*p2049*(1-p2050)/(p0818*1000)
- p2086: 0.0617647
- p0355: 0.5
- p2796: 0; = p2405*(p1019+p1021)
- p2354: 0; = p2225*p2182
- p1590: 0
- p2775: 0; = p2384*(p1078+p1080)
- p5029: 0; = p1856*p3483
- p1096: 0.000621911
- p0407: 0; = SQRT(2)*(IF((2*p0275-1)<0;-1;IF((2*p0275-1)>0;1;0))*SQRT(SQRT((2/(pi()*0.140012289)+LN(1-(2*p0275-1)^2)/2)^2-LN(1-(2*p0275-1)^2)/0.140012289)-(2/(pi()*0.140012289)+LN(1-(2*p0275-1)^2)/2)))
- p3216: 0.06; = IF(OR(p1226=0;p1228=0);0;1-p3213-p3214-p3215)
- p1920: 0
- p1083: 122113; = IF(p1071=0;p1073*(p0710/100)*p0703*1000;0)
- p2017: 1.44281e7; = p2015*p0898
- p0894: 0.19
- p0178: 22.536
- p1341: 0; = p1340*p0001/(p0818*p0002)
- p3380: 0.958857; = p3251/p0818
- p1650: 0
- p2371: 0; = p2225*p2200
- p0935: 9.07287e-5; = p0929*p0001/(p0818*p0002)
- p5170: 1.58144e-8; = p1791*p3484
- p2377: 0; = p2229*p2206
- p3015: 0; = p2429*(p1129+p1131)
- p0684: 90.539; = p0024*(1+p0552*p0156/100)
- p3455: 0; = p3379*p1240
- p3464: 0.00016992; = p3369*p1241
- p2536: 2.20087e-5; = p2340*p1073
- p3586: 0; = p1855*p3476
- p3040: 0; = p2259*p1082
- p0050: 35.305
- p4688: 2.3133e-6; = p1927*p3481
- p3391: 0.00263011; = p3372*p1234
- p2688: 0.000234204; = p2297*(p1078+p1080)
- p0975: 0.0136259; = p0973*p0974/p0818
- p0899: 4.95005e9; = p0825*p0896+(p0830+p0895)*p0824*p0898
- p0085: 3635.75
- p3254: 0; = p1252*(p1287*(1-p3247)+p1290*(1-p3248)+p1291*(1-p3249)+p1292*(1-p3250))
- p0190: 22.195
- p1230: 0.5
- p2564: 0; = p2368*p1014
- p3283: 0.3
- p2989: 0; = p2403*(p1020+p1022)
- p4719: 1.30816e-5; = p1962*p3481
- p3120: 0; = p2339*p1082
- p0534: 0; = SQRT(2)*(IF((2*p0402-1)<0;-1;IF((2*p0402-1)>0;1;0))*SQRT(SQRT((2/(pi()*0.140012289)+LN(1-(2*p0402-1)^2)/2)^2-LN(1-(2*p0402-1)^2)/0.140012289)-(2/(pi()*0.140012289)+LN(1-(2*p0402-1)^2)/2)))
- p1301: 0; = IF(p1297+p1300=p1265;0;IF(p1297+p1300+p1299>p1265;p1265-(p1297+p1300);p1299))
- p0766: 13.051; = p0106*(1+p0634*p0238/100)
- p2253: 0; = p2222*p2199
- p0462: 0; = SQRT(2)*(IF((2*p0330-1)<0;-1;IF((2*p0330-1)>0;1;0))*SQRT(SQRT((2/(pi()*0.140012289)+LN(1-(2*p0330-1)^2)/2)^2-LN(1-(2*p0330-1)^2)/0.140012289)-(2/(pi()*0.140012289)+LN(1-(2*p0330-1)^2)/2)))
- p2739: 1.80036e-6; = p2348*(p1078+p1080)
- p2327: 2.75242e-5; = p2224*p2195
- p0419: 0; = SQRT(2)*(IF((2*p0287-1)<0;-1;IF((2*p0287-1)>0;1;0))*SQRT(SQRT((2/(pi()*0.140012289)+LN(1-(2*p0287-1)^2)/2)^2-LN(1-(2*p0287-1)^2)/0.140012289)-(2/(pi()*0.140012289)+LN(1-(2*p0287-1)^2)/2)))
- p1619: 0
- p2308: 0.000117833; = p2227*p2215
- p0813: 0; = if(p0807=480;1.56521739130435;0)
- p1222: 0.94
- p1148: 0.129871; = if(p1121=0;IF(p1146=1;0;1-p1146);0)
- p0146: 0
- p0977: 0; = IF(p0687=0;IF(OR(p0686=0;p0688=0);0;p0686*1000*p0688/100);0)
- p2207: 0.00247978; = p1119-p2205-p2204-p2206
- p1010: 0; = p0890
- p1681: 0
- p2016: 0.000844609; = (p2014-p2015)/(p0818)
- p0785: 26.441; = p0125*(1+p0653*p0257/100)
- p3167: 0; = p2386*p1082
- p2329: 1.16904e-7; = p2224*p2197
- p0723: 1649.96; = p0063*(1+p0591*p0195/100)
- p1909: 0
- p0692: 0
- p0574: 0; = IF(p0310<0.5;-SQRT(p0007*EXP(p0442^2*p0008)-p0007);SQRT(p0007*EXP(p0442^2*p0008)-p0007))
- p2192: 0.000118118; = p1067-p2189-p2190-p2191
- p1999: 2.95121e8; = (p1228+p1229)*p0818+p1164
- p2749: 0; = p2358*(p1019+p1021)
- p2583: 0; = p2387*p1073
- p1963j: 0; = p1725*p1929+p1726*p1930+p1727*p1931+p1728*p1932+p1729*p1933+p1730*p1934+p1731*p1935+p1732*p1936+p1733*p1937+p1734*p1938+p1735*p1939+p1736*p1940+p1737*p1941+p1738*p1942+p1739*p1943+p1740*p1944+p1741*p1945+p1742*p1946+p1743*p1947
- p3063: 5.02194e-7; = p2282*p1023
- p2943: 0; = p2357*(p1020+p1022)
- p2915: 4.24653e-8; = p2329*(p1020+p1022)
- p0848: 0
- p0945: 0; = if(and(p0683=0;p0951=0);p0939;0)
- p0003: 10000
- p1895: 0
- p1950: 0
- p2501: 1.40202e-7; = p2305*p1073
- p1591: 0.677771
- p3306: 0; = if(and(p1232=0;p3252<>0);p3252*(p3257*p3277-p3301)/p3305;0)
- p1946: 0
- p1205: 0.04725
- p3451: 0; = p3375*p1240
- p1559: 0
- p1739: 0
- p1930: 0
- p2559: 0; = p2363*p1014
- p1594: 0
- p3402: 0.000506321; = p3364*p1238
- p1032: 4.18173e-5; = IF(p1012=0;p1026*p0001/(p0818*p0002);0)
- p0882: 66; = p0869*p0856
- p0955: 5.31972e-5; = if(and(p0683>0;or(p0807=56;p0807=100;and(p0807=60;p0901>0.06)));p0937;0)
- p3148: 0; = p2367*p1023
- p1305: 0; = p1301*p1252/p0818
- p1963c: 1.19238e-6; = p1588*p1792+p1589*p1793+p1590*p1794+p1591*p1795+p1592*p1796+p1593*p1797+p1594*p1798+p1595*p1799+p1596*p1800+p1597*p1801+p1598*p1802+p1599*p1803+p1600*p1804+p1601*p1805+p1602*p1806+p1603*p1807+p1604*p1808+p1605*p1809+p1606*p1810+p1607*p1811
- p1173: 0.5
- p0790: 0
- p1947: 0
- p3319: 4.7409e6; = if(and(p1232=0;p3253<>0);p3253*(p3263-p3314)/p3316;0)
- p0732: 0
- p2831: 0; = p2245*(p1020+p1022)
- p1319: 0; = IF(((p0745*1000*p0746/100)+(p0754*1000*p0755/100))/p0801<0;0;((p0745*1000*p0746/100)+(p0754*1000*p0755/100))/p0801)
- p1550: 0.783979
- p1857: 0
- p1878: 0
- p2605: 0; = p2409*p1014
- p0718: 36.994; = p0058*(1+p0586*p0190/100)
- p1109: 4.41516e6; = IF(p1071=0;p1105*p1103*p1095;0)
- p0579: 0; = IF(p0315<0.5;-SQRT(p0007*EXP(p0447^2*p0008)-p0007);SQRT(p0007*EXP(p0447^2*p0008)-p0007))
- p3161: 0; = p2380*p1082
- p1448: 122
- p2314: 0.00237133; = p2231*p2221
- p0728: 0
- p1801: 0
- p0136: 33.859
- p2932: 2.55773e-6; = p2346*(p1079+p1081)
- p3021: 0; = p2240*p1023
- p2545: 7.99573e-6; = p2349*p1073
- p2923: 4.10145e-5; = p2337*(p1079+p1081)
- p3326: 0; = if(and(p1232=0;p3255<>0);p3268*p3289;0)
- p1107: 249021; = IF(p1071=0;p1105*p1101*p1095;0)
- p2275: 0.000886234; = p2230*p2221
- p2397: 0; = p2234*p2186
- p0405: 0; = SQRT(2)*(IF((2*p0273-1)<0;-1;IF((2*p0273-1)>0;1;0))*SQRT(SQRT((2/(pi()*0.140012289)+LN(1-(2*p0273-1)^2)/2)^2-LN(1-(2*p0273-1)^2)/0.140012289)-(2/(pi()*0.140012289)+LN(1-(2*p0273-1)^2)/2)))
- p0744: 0
- p1776: 0
- p2058: 1.24412
- p1206: 0.03829
- p1746: 0
- p3130: 0; = p2349*p1082
- p2484: 2.25498e-5; = p2288*p1014
- p1885: 0
- p3245: 0.35259; = IF(p3244=1;0;if(p3244+p0792/100>1;1-p3244;p0792/100))
- p1234: 0.32525; = if(p1232>0;0;p0726/100)
- p3070: 5.41942e-6; = p2289*p1023
- p0391: 0.5
- p2007: 0.018583; = ((p1981*p1985+p1987*p1991+p1993*p1997+p2001*p2005)/p0818)*p0005*p0002/1000
- p3076: 1.27385e-7; = p2295*p1023
- p2582: 0; = p2386*p1073
- p1270: 0; = IF(p1267=p1259;0;IF(p1267+p1268>p1259;p1259-p1267;p1268))
- p3314: 0.00107264; = if(and(p1232=0;p3253<>0);p3263*p3289;0)
- p1195: 0.45
- p1646: 0
- p1971: 0.000337947; = p1966*p0001/(p0818*p0002)
- p1670: 0
- p1655: 0
- p1613: 0
- p2707: 1.19094e-5; = p2316*(p1019+p1021)
- p2298: 0.000500707; = p2227*p2205
- p5337: 4.29263e-6; = p1962*p3484
- p2232: 0.0440608; = if(p0783*p0787+p0784*p0788+p0785*p0789+p0786*p0790=0;0;p0789*p0785/(p0783*p0787+p0784*p0788+p0785*p0789+p0786*p0790))
- p0335: 0.5
- p0685: 2.456; = p0025*(1+p0553*p0157/100)
- p3002: 0; = p2416*(p1079+p1081)
- p0852: 0; = p0847*p0851^3+p0848*p0851^2+p0849*p0851+p0850
- p2620: 0; = p2424*p1073
- p3376: 0; = if(p1232=0;p3246*p3358/p0818;0)
- p2385: 0; = p2229*p2214
- p3053: 3.41693e-8; = p2272*p1132
- p2737: 2.94564e-6; = p2346*(p1078+p1080)
- p2411: 0; = p2234*p2201
- p2470: 6.42438e-5; = p2274*p1123
- p2077: 0.043
- p1963: 0.000203099; = p1963a+p1963b+p1963c+p1963d+p1963e+p1963f+p1963g+p1963h+p1963i+p1963j+p1963k
- p2708: 1.54437e-6; = p2317*(p1019+p1021)
- p2740: 1.61356e-5; = p2349*(p1078+p1080)
- p2156: 1.66389e-7; = p2015*p2085*p2118/(p0818*1000)
- p2921: 2.66323e-5; = p2335*(p1020+p1022)
- p0383: 0.5
- p0873: 0.08745; = p0872*p0001*p0003/(p0818*p0002)
- p1699: 0.762907
- p1193: 0; = IF(OR(p1036=0;p1095=0);0.0001*p0857;0)
- p0898: 0.456
- p2466: 2.47638e-6; = p2270*p1073
- p2049: 25.6942
- p1813: 0
- p0985: 0; = IF(p0982=1;0;IF(p0982+p0983>1;1-p0982;p0983))
- p0287: 0.5
- p2894: 4.32835e-5; = p2308*(p1079+p1081)
- p1456: 7
- p2756: 0; = p2365*(p1019+p1021)
- p0542: 0; = IF(p0278<0.5;-SQRT(p0007*EXP(p0410^2*p0008)-p0007);SQRT(p0007*EXP(p0410^2*p0008)-p0007))
- p3395: 0; = p3376*p1234
- p0487: 0; = SQRT(2)*(IF((2*p0355-1)<0;-1;IF((2*p0355-1)>0;1;0))*SQRT(SQRT((2/(pi()*0.140012289)+LN(1-(2*p0355-1)^2)/2)^2-LN(1-(2*p0355-1)^2)/0.140012289)-(2/(pi()*0.140012289)+LN(1-(2*p0355-1)^2)/2)))
- p0783: 99.634; = p0123*(1+p0651*p0255/100)
- p2436: 0; = p2240*p1014
- p2123: 0.263965
- p1778: 0
- p1585: 0
- p3147: 0; = p2366*p1023
- p3323: 0; = if(and(p1232=0;p3255<>0);p3265*p3277*(p3299*p3291+(1-p3299)*p3295);0)
- p3004: 0; = p2418*(p1079+p1081)
- p1956: 0
- p1868: 0
- p3478: 0.6865; = if(p1328+p1330+p1332+p1334+p1336+p1338+p1340+p1342+p1344=0;0;p1332/(p1328+p1330+p1332+p1334+p1336+p1338+p1340+p1342+p1344))
- p2694: 3.8888e-5; = p2303*(p1078+p1080)
- p0927: 0; = IF(p0918+p0923+p0924+p0925+p0926=1;0;1-(p0918+p0923+p0924+p0925+p0926))
- p0779: 53.745; = p0119*(1+p0647*p0251/100)
- p2673: 3.7732e-5; = p2282*(p1019+p1021)
- p3337: 0; = IF(or(p3254=0;p1232>0);0;p3272*p3289)
- p2389: 0; = p2233*p2218
- p1106: 5333.78; = IF(p1071=0;p1105*p1096*p1095;0)
- p0395: 0.5
- p0440: 0; = SQRT(2)*(IF((2*p0308-1)<0;-1;IF((2*p0308-1)>0;1;0))*SQRT(SQRT((2/(pi()*0.140012289)+LN(1-(2*p0308-1)^2)/2)^2-LN(1-(2*p0308-1)^2)/0.140012289)-(2/(pi()*0.140012289)+LN(1-(2*p0308-1)^2)/2)))
- p2717: 5.23849e-5; = p2326*(p1019+p1021)
- p2469: 0.000606566; = p2273*p1123
- p1132: 1e-5; = if(p1121=0;IF(p1123+p1128+p1129+p1130+p1131=1;0;1-(p1123+p1128+p1129+p1130+p1131));0)
- p2139: 2.02423e-6; = p2015*p2067*p2101/(p0818*1000)
- p0145: 0
- p2850: 2.09014e-5; = p2264*(p1079+p1081)
- p2798: 0; = p2407*(p1019+p1021)
- p1050: 2.68779e6; = IF(p1012=0;p1037*p1036;0)
- p1927: 1.10865e-5; = p1519*1000/p0818
- p2869: 1.44736e-5; = p2283*(p1020+p1022)
- p1949: 0
- p3425: 0; = p3368*p1239
- p2572: 0; = p2376*p1073
- p1812: 0
- p0076: 67.861
- p0505: 0; = SQRT(2)*(IF((2*p0373-1)<0;-1;IF((2*p0373-1)>0;1;0))*SQRT(SQRT((2/(pi()*0.140012289)+LN(1-(2*p0373-1)^2)/2)^2-LN(1-(2*p0373-1)^2)/0.140012289)-(2/(pi()*0.140012289)+LN(1-(2*p0373-1)^2)/2)))
- p2735: 6.30927e-8; = p2344*(p1078+p1080)
- p0516: 0; = SQRT(2)*(IF((2*p0384-1)<0;-1;IF((2*p0384-1)>0;1;0))*SQRT(SQRT((2/(pi()*0.140012289)+LN(1-(2*p0384-1)^2)/2)^2-LN(1-(2*p0384-1)^2)/0.140012289)-(2/(pi()*0.140012289)+LN(1-(2*p0384-1)^2)/2)))
- p2407: 0; = p2234*p2197
- p4664: 7.18088e-6; = p1903*p3481
- p1628: 0
- p1204: 0.980791
- p1936: 0
- p0477: 0; = SQRT(2)*(IF((2*p0345-1)<0;-1;IF((2*p0345-1)>0;1;0))*SQRT(SQRT((2/(pi()*0.140012289)+LN(1-(2*p0345-1)^2)/2)^2-LN(1-(2*p0345-1)^2)/0.140012289)-(2/(pi()*0.140012289)+LN(1-(2*p0345-1)^2)/2)))
- p0235: 0
- p2446: 0; = p2250*p1014
- p4140: 8.40031e-9; = p1791*p3479
- p2578: 0; = p2382*p1073
- p1877: 0
- p1829: 0
- p2684: 0.000155115; = p2293*(p1019+p1021)
- p3073: 8.403e-9; = p2292*p1023
- p2603: 0; = p2407*p1014
- p0512: 0; = SQRT(2)*(IF((2*p0380-1)<0;-1;IF((2*p0380-1)>0;1;0))*SQRT(SQRT((2/(pi()*0.140012289)+LN(1-(2*p0380-1)^2)/2)^2-LN(1-(2*p0380-1)^2)/0.140012289)-(2/(pi()*0.140012289)+LN(1-(2*p0380-1)^2)/2)))
- p2892: 2.56896e-6; = p2306*(p1079+p1081)
- p2524: 6.07658e-5; = p2328*p1014
- p2760: 0; = p2369*(p1019+p1021)
- p3526: 0; = p1795*p3476
- p0797: 33.736; = p0137*(1+p0665*p0269/100)
- p2976: 0; = p2390*(p1129+p1131)
- p0537: 0; = IF(p0273<0.5;-SQRT(p0007*EXP(p0405^2*p0008)-p0007);SQRT(p0007*EXP(p0405^2*p0008)-p0007))
- p0968: 2.89781e6; = p0965*p0683*p0682*1000
- p3214: 0.376406; = p1222*40.078/100.0869
- p1168: 9.25711e-7; = p1164*p1167/p0818
- p2309: 1.90845e-5; = p2227*p2216
- p2802: 0; = p2411*(p1019+p1021)
- p0091: 20.866
- p2166: 0.71852; = p2165*p0824
- p2614: 0; = p2418*p1073
- p0123: 99.634
- p2061: 0.518824
- p1995: 50
- p3062: 3.92564e-8; = p2281*p1023
- p2464: 4.05171e-6; = p2268*p1073
- p0269: 12.976
- p2598: 0; = p2402*p1014
- p2833: 0; = p2247*(p1020+p1022)
- p2114: 0.832356
- p3097: 1.58508e-7; = p2316*p1023
- p1851: 0
- p2650: 0.000131114; = p2259*(p1078+p1080)
- p1748: 0
- p2410: 0; = p2234*p2200
- p2249: 0; = p2222*p2195
- p3429: 0; = p3372*p1239
- p1176: 609.435; = p1175*p0801
- p1855: 0.00033883; = p1447*1000/p0818
- p3166: 0; = p2385*p1082
- p2338: 3.6157e-5; = p2228*p2206
- p2230: 0.260068; = if(p0783*p0787+p0784*p0788+p0785*p0789+p0786*p0790=0;0;p0787*p0783/(p0783*p0787+p0784*p0788+p0785*p0789+p0786*p0790))
- p1299: 0
- p0635: 0; = IF(p0371<0.5;-SQRT(p0007*EXP(p0503^2*p0008)-p0007);SQRT(p0007*EXP(p0503^2*p0008)-p0007))
- p3441: 0; = p3365*p1240
- p3317: 9.35643e7; = if(and(p1232=0;p3253<>0);p3253*(p3261*p3277-p3312)/p3316;0)
- p1817: 0
- p3280: 0.375
- p0134: 0.183
- p4416: 0; = p1861*p3480
- p1894: 0
- p2941: 0; = p2355*(p1020+p1022)
- p2431: 0; = p2236*p2221
- p3048: 0; = p2267*p1082
- p0481: 0; = SQRT(2)*(IF((2*p0349-1)<0;-1;IF((2*p0349-1)>0;1;0))*SQRT(SQRT((2/(pi()*0.140012289)+LN(1-(2*p0349-1)^2)/2)^2-LN(1-(2*p0349-1)^2)/0.140012289)-(2/(pi()*0.140012289)+LN(1-(2*p0349-1)^2)/2)))
- p2612: 0; = p2416*p1073
- p0857: 3.40008; = p0856*p0001*p0003/(p0818*p0002)
- p0128: 64.36
- p1131: 0; = if(p1121=0;IF(p1123+p1128+p1129+p1130=1;0;IF(p1123+p1128+p1129+p1130+p1127>1;1-(p1123+p1128+p1129+p1130);p1127));0)
- p1046: 0.0276045; = IF(p1012=0;IF(p1037+p1044+p1045=1;0;IF(p1037+p1044+p1045+p1040>1;1-(p1037+p1044+p1045);p1040));0)
- p3158: 0; = p2377*p1082
- p2774: 0; = p2383*(p1078+p1080)
- p2508: 0.00162301; = p2312*p1123
- p1116: 1.41141e-5; = IF(p1071=0;p1106/(p1111*p0818);0)
- p2053: 1.45647
- p3349: 0.823589; = if(and(p1232=0;p3256<>0);1-(p3345+p3346+p3347+p3348);0)
- p2301: 0.000470807; = p2227*p2208
- p4308: 7.38671e-6; = p1963*p3479
- p1825: 0
- p0681: 0
- p2144: 8.38531e-7; = p2015*p2072*p2106/(p0818*1000)
- p0139: 81.185
- p2610: 0; = p2414*p1073
- p0676: 744.468; = p0016*(1+p0544*p0148/100)
- p3151: 0; = p2370*p1023
- p2817: 0; = p2426*(p1078+p1080)
- p3094: 1.3646e-8; = p2313*p1132
- p2597: 0; = p2401*p1014
- p3414: 0; = p3376*p1238
- p1153: 0.365265
- p0707: 36.325; = p0047*(1+p0575*p0179/100)
- p1005: 0; = p1001*p0888
- p3377: 0; = if(p1232=0;p3246*p3359/p0818;0)
- p0648: 0; = IF(p0384<0.5;-SQRT(p0007*EXP(p0516^2*p0008)-p0007);SQRT(p0007*EXP(p0516^2*p0008)-p0007))
- p2968: 0; = p2382*(p1079+p1081)
- p2945: 0; = p2359*(p1020+p1022)
- p0251: 12.436
- p2332: 0.000103646; = p2224*p2200
- p0954: 0.000153409; = if(and(p0683>0;or(p0807=56;p0807=100;and(p0807=60;p0901>0.06)));p0936;0)
- p2202: 2.98549e-5; = 4*1.00794*p2201/(2*14.0067)
- p1986: 4200
- p0825: 3.89159e9; = p0818*p0822
- p1642: 0
- p3302: 0; = if(and(p1232=0;p3252<>0);p3258*(p3278*(p3282*p1256+p3286*(p1253+p1257)+p1258*p3288+p3297*p3287));0)
- p0912: 0
- p3057: 2.64882e-6; = p2276*p1023
- p3268: 0.0232481
- p2953: 0; = p2367*(p1020+p1022)
- p0811: 0; = if(p0807=480;1-p0810;0)
- p2881: 8.52169e-6; = p2295*(p1020+p1022)
- p1556: 0
- p0439: 0; = SQRT(2)*(IF((2*p0307-1)<0;-1;IF((2*p0307-1)>0;1;0))*SQRT(SQRT((2/(pi()*0.140012289)+LN(1-(2*p0307-1)^2)/2)^2-LN(1-(2*p0307-1)^2)/0.140012289)-(2/(pi()*0.140012289)+LN(1-(2*p0307-1)^2)/2)))
- p1122: 0; = p1121*p0001/(p0818*p0002)
- p1255: 0; = if(p1232>0;0;p0737/100)
- p1100: 0.437795
- p1905: 0
- p0322: 0.5
- p4515: 4.00009e-6; = p1754*p3481
- p4148: 8.40031e-9; = p1799*p3479
- p2222: 0; = if(p0765*p0769+p0766*p0770+p0767*p0771+p0768*p0772=0;0;p0769*p0765/(p0765*p0769+p0766*p0770+p0767*p0771+p0768*p0772))
- p2906: 7.15905e-7; = p2320*(p1020+p1022)
- p2336: 0.000123455; = p2228*p2204
- p0547: 0; = IF(p0283<0.5;-SQRT(p0007*EXP(p0415^2*p0008)-p0007);SQRT(p0007*EXP(p0415^2*p0008)-p0007))
- p1843: 0
- p3339: 0; = if(and(p1232=0;p3254<>0);p3254*(p3269*p3277-p3334)/p3338;0)
- p1691: 0
- p2364: 0; = p2225*p2192
- p3412: 0; = p3374*p1238
- p0941: 0; = if(and(p0683=0;p0947=0);p0935;0)
- p3253: 1.99808e8; = p1252*(p1277*(1-p3247)+p1280*(1-p3248)+p1281*(1-p3249)+p1282*(1-p3250))
- p0266: 18.158
- p2799: 0; = p2408*(p1019+p1021)
- p5076: 0; = p1903*p3483
- p4857: 0; = p1890*p3482
- p0714: 0
- p1599: 0
- p0893: 0.959288; = 1000*(p0890+p0892)*p0001*p0003*p0004/(p0818*p0002)
- p2845: 0.000113848; = p2259*(p1079+p1081)
- p3443: 0; = p3367*p1240
- p0796: 33.859; = p0136*(1+p0664*p0268/100)
- p1334: 132232; = p1322*p0801
- p2098: 0.856281
- p1242: 51003.1; = if(p1232>0;0;p1234*(p0725/100)*p0723*1000)
- p1108: 152200; = IF(p1071=0;p1105*p1102*p1095;0)
- p2009: 0.0297627; = ((p1983*p1985+p1989*p1991+p1995*p1997+p2003*p2005+p1976*p1977+p1978*p1979+p1998*p1999)/p0818)*p0005*p0002/1000
- p2268: 1.93279e-5; = p2226*p2214
- p0110: 56.984
- p1239: 0; = if(p1232>0;0;IF(p1234+p1238=1;0;IF(p1234+p1238+p1236>1;1-(p1234+p1238);p1236)))
- p2978: 0; = p2392*(p1129+p1131)
- p1553: 0
- p0519: 0; = SQRT(2)*(IF((2*p0387-1)<0;-1;IF((2*p0387-1)>0;1;0))*SQRT(SQRT((2/(pi()*0.140012289)+LN(1-(2*p0387-1)^2)/2)^2-LN(1-(2*p0387-1)^2)/0.140012289)-(2/(pi()*0.140012289)+LN(1-(2*p0387-1)^2)/2)))
- p1854: 0
- p1898: 0
- p2081: 0.0019
- p0847: 0
- p0734: 0
- p1779: 0
- p1702: 0
- p0104: 33.859
- p0822: 0.898833
- p1088: 0; = IF(p1071=0;p1082*(p0710/100)*p0703*1000;0)
- p1244: 0; = if(p1232>0;0;p1239*(p0725/100)*p0723*1000)
- p2023: 3.15
- p0656: 0; = IF(p0392<0.5;-SQRT(p0007*EXP(p0524^2*p0008)-p0007);SQRT(p0007*EXP(p0524^2*p0008)-p0007))
- p2095: 0.765734
- p2045: 30
- p0203: 17.205
- p2542: 1.45966e-6; = p2346*p1073
- p3054: 4.81516e-8; = p2273*p1132
- p0474: 0; = SQRT(2)*(IF((2*p0342-1)<0;-1;IF((2*p0342-1)>0;1;0))*SQRT(SQRT((2/(pi()*0.140012289)+LN(1-(2*p0342-1)^2)/2)^2-LN(1-(2*p0342-1)^2)/0.140012289)-(2/(pi()*0.140012289)+LN(1-(2*p0342-1)^2)/2)))
- p0638: 0; = IF(p0374<0.5;-SQRT(p0007*EXP(p0506^2*p0008)-p0007);SQRT(p0007*EXP(p0506^2*p0008)-p0007))
- p1304: 0; = p1300*p1252/p0818
- p1928: 0
- p1837: 0
- p0013: 23.385
- p2557: 0; = p2361*p1014
- p2966: 0; = p2380*(p1079+p1081)
- p0176: 18.058
- p3139: 0; = p2358*p1023
- p2399: 0; = p2234*p2188
- p3299: 0; = if(p1303+p1304+p1305+p1306=0;0;p1303/(p1303+p1304+p1305+p1306))
- p3211: 0; = p2430*p1132
- p2285: 1.14691e-5; = p2223*p2191
- p2451: 0; = p2255*p1014
- p1790: 0
- p0306: 0.5
- p0236: 18.058
- p0788: 64.36; = p0128*(1+p0656*p0260/100)
- p1241: 0.14183; = if(p1232>0;0;IF(p1234+p1238+p1239+p1240=1;0;1-(p1234+p1238+p1239+p1240)))
- p0944: 0; = if(and(p0683=0;p0950=0);p0938;0)
- p2334: 6.39528e-6; = p2224*p2202
- p0807: 60
- p2154: 9.2659e-7; = p2015*p2082*p2116/(p0818*1000)
- p1273: 0; = p1267*p1252/p0818
- p3351: 5.27046e6; = if(and(p1232=0;p3256<>0);p3256*(p3274-p3346)/p3349;0)
- p3437: 0; = p3380*p1239
- p1080: 0; = IF(p1071=0;IF(p1073+p1078+p1079=1;0;IF(p1073+p1078+p1079+p1076>1;1-(p1073+p1078+p1079);p1076));0)
- p0250: 43.57
- p1071: 0
- p3143: 0; = p2362*p1023
- p3118: 0; = p2337*p1082
- p1876: 0
- p3331: 0; = if(and(p1232=0;p3255<>0);p3255*(p3268-p3326)/p3327;0)
- p0702: 1649.95; = p0042*(1+p0570*p0174/100)
- p1938: 0
- p4007: 1.10992e-6; = p1864*p3478
- p2452: 0; = p2256*p1014
- p3362: 0.0169949; = if(p1232=0;p3244*p3356/p0818;0)
- p4101: 4.30392e-5; = p1962*p3478
- p2157: 3.06506e-7; = p2015*p2086*p2119/(p0818*1000)
- p2506: 3.58559e-5; = p2310*p1073
- p1336: 0; = p1323*p0801
- p1316: 0; = p1312*p1252/p0818
- p1279: 0
- p3389: 0.000168295; = p3370*p1234
- p3039: 0; = p2258*p1082
- p2718: 1.12293e-5; = p2327*(p1019+p1021)
- p2479: 8.89892e-6; = p2283*p1014
- p3106: 1.37391e-7; = p2325*p1023
- p1120: 0.00364609; = IF(p1071=0;p1110/(p1115*p0818);0)
- p1051: 76509.4; = IF(p1012=0;p1044*p1036;0)
- p3895: 0; = p1962*p3477
- p3476: 0; = if(p1328+p1330+p1332+p1334+p1336+p1338+p1340+p1342+p1344=0;0;p1328/(p1328+p1330+p1332+p1334+p1336+p1338+p1340+p1342+p1344))
- p2907: 9.15833e-6; = p2321*(p1020+p1022)
- p2350: 0.000578897; = p2232*p2218
- p0284: 0.5
- p2738: 1.11159e-5; = p2347*(p1078+p1080)
- p1560: 0
- p2818: 0; = p2427*(p1078+p1080)
- p1250: 0; = if(p1232>0;0;p1245*p0001/(p0818*p0002))
- p1596: 0
- p2699: 4.9848e-5; = p2308*(p1078+p1080)
- p3691: 0; = p1754*p3477
- p0774: 50.367; = p0114*(1+p0642*p0246/100)
- p1562: 0
- p1169: 0.000688638
- p3690: 0; = p1963*p3476
- p3125: 0; = p2344*p1082
- p3313: 0.0381318; = if(and(p1232=0;p3253<>0);p3262*(p3278*(p3282*p1256+p3286*(p1253+p1257)+p1258*p3288+p3298*p3287));0)
- p1125: 0.50408; = if(p1121=0;p0719/100;0)
- p1192: 5.12066e-8; = p1188*p1191/p0818
- p2274: 0.000509993; = p2230*p2220
- p2870: 1.65669e-5; = p2284*(p1020+p1022)
- p4239: 7.56028e-8; = p1890*p3479
- p2175: 0.00080889; = p0895*p0908/p0818
- p2890: 0.000442191; = p2304*(p1079+p1081)
- p2750: 0; = p2359*(p1019+p1021)
- p2919: 1.61412e-5; = p2333*(p1020+p1022)
- p2381: 0; = p2229*p2210
- p0770: 56.984; = p0110*(1+p0638*p0242/100)
- p2223: 0.785788; = if(p0765*p0769+p0766*p0770+p0767*p0771+p0768*p0772=0;0;p0770*p0766/(p0765*p0769+p0766*p0770+p0767*p0771+p0768*p0772))
- p2228: 0.121063; = if(p0774*p0778+p0775*p0779+p0776*p0780+p0777*p0781=0;0;p0780*p0776/(p0774*p0778+p0775*p0779+p0776*p0780+p0777*p0781))
- p3055: 5.09993e-9; = p2274*p1132
- p1291: 0; = IF(p1287+p1290=p1264;0;IF(p1287+p1290+p1289>p1264;p1264-(p1287+p1290);p1289))
- p1620: 0
- p1236: 0; = if(p1232>0;0;p0728/100)
- p2531: 1.63746e-5; = p2335*p1014
- p2201: 0.000207437; = 12.01*p2200/(2*14.0067)
- p2149: 2.69081e-7; = p2015*p2077*p2111/(p0818*1000)
- p1679: 0
- p2938: 4.35541e-5; = p2352*(p1129+p1131)
- p3095: 2.37133e-8; = p2314*p1132
- p2487: 1.57201e-7; = p2291*p1014
- p1617: 0
- p1967: 0; = if(p0807=480;p0802*p0810;0)
- p2634: 0; = p2243*(p1019+p1021)
- p0999: 0; = IF(p0996=1;0;IF(p0996+p0997>1;1-p0996;p0997))
- p3241: 5.71821e-10; = p3234*p1188*p3236/p0818
- p0953: 9.07287e-5; = if(and(p0683>0;or(p0807=56;p0807=100;and(p0807=60;p0901>0.06)));p0935;0)
- p2442: 0; = p2246*p1014
- p0379: 0.5
- p1087: 0; = IF(p1071=0;p1081*(p0710/100)*p0703*1000;0)
- p2486: 9.57757e-8; = p2290*p1014
- p5306: 7.59091e-7; = p1927*p3484
- p1685: 0
- p0221: 42.283
- p5131: 0; = p1962*p3483
- p1147: 0.129871
- p2299: 0.000162142; = p2227*p2206
- p3187: 0; = p2406*p1023
- p2384: 0; = p2229*p2213
- p2251: 0; = p2222*p2197
- p0132: 35.259
- p2093: 0.260958
- p0056: 58.791
- p2022: 0.00125608; = p2018*p2015/p0818-p2021
- p0653: 0; = IF(p0389<0.5;-SQRT(p0007*EXP(p0521^2*p0008)-p0007);SQRT(p0007*EXP(p0521^2*p0008)-p0007))
- p0957: 0; = if(and(p0683>0;or(p0807=56;p0807=100;and(p0807=60;p0901>0.06)));p0939;0)
- p2243: 0; = p2222*p2188
- p3066: 6.22773e-8; = p2285*p1023
- p0406: 0; = SQRT(2)*(IF((2*p0274-1)<0;-1;IF((2*p0274-1)>0;1;0))*SQRT(SQRT((2/(pi()*0.140012289)+LN(1-(2*p0274-1)^2)/2)^2-LN(1-(2*p0274-1)^2)/0.140012289)-(2/(pi()*0.140012289)+LN(1-(2*p0274-1)^2)/2)))
- p2930: 5.47841e-8; = p2344*(p1079+p1081)
- p3123: 0; = p2342*p1082
- p2865: 1.73739e-5; = p2279*(p1020+p1022)
- p1624: 0
- p2591: 0; = p2395*p1014
- p3117: 0; = p2336*p1082
- p1054: 2.5952e6; = IF(p1012=0;p1047*p1036;0)
- p0801: 1.65e6
- p0520: 0; = SQRT(2)*(IF((2*p0388-1)<0;-1;IF((2*p0388-1)>0;1;0))*SQRT(SQRT((2/(pi()*0.140012289)+LN(1-(2*p0388-1)^2)/2)^2-LN(1-(2*p0388-1)^2)/0.140012289)-(2/(pi()*0.140012289)+LN(1-(2*p0388-1)^2)/2)))
- p3242: 3.46696e-8; = p3234*p1188*p3238/p0818
- p2909: 4.51629e-6; = p2323*(p1020+p1022)
- p3358: 6.35379e6; = if(p1232=0;p3308+p3319+p3330+p3341+p3352;0)
- p1063: 0.455
- p2490: 3.64047e-5; = p2294*p1014
- p1962: 6.26936e-5; = p1960*1000/p0818
- p1062: 0.16
- p1941: 0
- p2764: 0; = p2373*(p1019+p1021)
- p3448: 0; = p3372*p1240
- p0378: 0.5
- p2284: 4.56075e-5; = p2223*p2190
- p1959: 2167.44; = if(p0738*p0740*p0739>0;p0738*1000*(p0740/100)*p0739/1000;p1958)
- p1982: 750
- p0666: 0; = IF(p0402<0.5;-SQRT(p0007*EXP(p0534^2*p0008)-p0007);SQRT(p0007*EXP(p0534^2*p0008)-p0007))
- p2908: 3.94563e-6; = p2322*(p1020+p1022)
- p1991: 4.87274e7; = (if(p1111=0;0;p1106/p1111)+if(p1112=0;0;p1107/p1112)+if(p1113=0;0;p1108/p1113)+if(p1114=0;0;p1109/p1114)+if(p1115=0;0;p1110/p1115))*(1+p1157)
- p2387: 0; = p2229*p2216
- p0107: 8.338
- p0701: 0
- p2619: 0; = p2423*p1073
- p0905: 0.0983707; = p0904/p0818
- p1897: 0
- p3287: 0.745
- p2704: 0.000504822; = p2313*(p1128+p1130)
- p2071: 0.151
- p1078: 0.42304; = IF(p1071=0;IF(p1073=1;0;IF(p1073+p1074>1;1-p1073;p1074));0)
- p3237: 0.854735
- p2346: 6.96303e-6; = p2228*p2214
- p0393: 0.5
- p2982: 0; = p2396*(p1020+p1022)
- p2097: 0.40001
- p3239: 0.013074; = IF(p3238+p3235+p3236=1;0;1-(p3238+p3235+p3236))
- p1252: 4.41645e9; = if(p1232>0;0;p0724*2000*p0723*1000*p0725/100)
- p2108: 0.826583
- p3798: 0; = p1861*p3477
- p2839: 0; = p2253*(p1020+p1022)
- p2785: 0; = p2394*(p1019+p1021)
- p2305: 6.68807e-7; = p2227*p2212
- p1869: 0
- p3203: 0; = p2422*p1082
- p2936: 0.00029181; = p2350*(p1129+p1131)
- p3332: 0; = if(and(p1232=0;p3255<>0);IF((p3328+p3329+p3330+p3331)+(p3255*(p3265*(1-p3277))/p3327)>p3255;p3255-(p3328+p3329+p3330+p3331);p3255*(p3265*(1-p3277))/p3327);0)
- p2877: 2.55678e-7; = p2291*(p1020+p1022)
- p1587: 0.799395
- p0257: 61.649
- p1771: 0
- p3427: 0; = p3370*p1239
- p0879: 0.0502078; = p0878*p0001*p0003/(p0818*p0002)
- p1879: 0
- p0524: 0; = SQRT(2)*(IF((2*p0392-1)<0;-1;IF((2*p0392-1)>0;1;0))*SQRT(SQRT((2/(pi()*0.140012289)+LN(1-(2*p0392-1)^2)/2)^2-LN(1-(2*p0392-1)^2)/0.140012289)-(2/(pi()*0.140012289)+LN(1-(2*p0392-1)^2)/2)))
- p3467: 0.0011469; = p3372*p1241
- p2580: 0; = p2384*p1073
- p1703: 0
- p2879: 0.000138108; = p2293*(p1020+p1022)
- p0548: 0; = IF(p0284<0.5;-SQRT(p0007*EXP(p0416^2*p0008)-p0007);SQRT(p0007*EXP(p0416^2*p0008)-p0007))
- p1782: 0
- p1919: 0
- p2419: 0; = p2235*p2209
- p0268: 18.058
- p3128: 0; = p2347*p1082
- p0592: 0; = IF(p0328<0.5;-SQRT(p0007*EXP(p0460^2*p0008)-p0007);SQRT(p0007*EXP(p0460^2*p0008)-p0007))
- p1019: 0.40798; = IF(p1012=0;IF(p1014=1;0;IF(p1014+p1015>1;1-p1014;p1015));0)
- p1184: 7.89771e-8; = p1182/p0818
- p2082: 0.285294
- p0877: 0.0481884; = p0876*p0001*p0003/(p0818*p0002)
- p4968: 0; = p1795*p3483
- p0942: 0; = if(and(p0683=0;p0948=0);p0936;0)
- p1217: 16.7773
- p1722: 0
- p3418: 0.510994; = p3380*p1238
- p0311: 0.5
- p1112: 0.209482
- p3350: 2.00906e7; = if(and(p1232=0;p3256<>0);p3256*(p3273*p3277-p3345)/p3349;0)
- p1246: 22240.6; = if(p1232>0;0;p1241*(p0725/100)*p0723*1000)
- p0812: 0; = if(p0807=480;0.095/0.34;0)
- p1733: 0
- p3008: 0; = p2422*(p1079+p1081)
- p2518: 2.42592e-6; = p2322*p1014
- p3228: 0.00627035; = p3224*p1229
- p1901: 0
- p1820: 0
- p1781: 0
- p1265: 0; = if(p1232>0;0;IF(p1259+p1263+p1264=1;0;IF(p1259+p1263+p1264+p1262>1;1-(p1259+p1263+p1264);p1262)))
- p2507: 0.00115172; = p2311*p1123
- p0416: 0; = SQRT(2)*(IF((2*p0284-1)<0;-1;IF((2*p0284-1)>0;1;0))*SQRT(SQRT((2/(pi()*0.140012289)+LN(1-(2*p0284-1)^2)/2)^2-LN(1-(2*p0284-1)^2)/0.140012289)-(2/(pi()*0.140012289)+LN(1-(2*p0284-1)^2)/2)))
- p0750: 0
- p1163: 0.00485813
- p0850: 0
- p2517: 5.63089e-6; = p2321*p1014
- p2485: 0.000222905; = p2289*p1014
- p2204: 0.00101976; = p1109/p0818
- p3420: 0; = p3363*p1239
- p3400: 0.00905694; = p3362*p1238
- p2416: 0; = p2235*p2206
- p2214: 5.75158e-5; = p1107/p0818
- p1216: 0.224397
- p0934: 4.26728e-5; = p0928*p0001/(p0818*p0002)
- p2316: 2.91911e-5; = p2224*p2183
- p0274: 0.5
- p3126: 0; = p2345*p1082
- p2088: 0.798875
- p2324: 3.12658e-6; = p2224*p2191
- p3075: 8.85098e-7; = p2294*p1023
- p4410: 0; = p1855*p3480
- p0141: 219.552
- p1758: 0
- p3155: 0; = p2374*p1023
- p2372: 0; = p2225*p2201
- p0174: 0
- p0455: 0; = SQRT(2)*(IF((2*p0323-1)<0;-1;IF((2*p0323-1)>0;1;0))*SQRT(SQRT((2/(pi()*0.140012289)+LN(1-(2*p0323-1)^2)/2)^2-LN(1-(2*p0323-1)^2)/0.140012289)-(2/(pi()*0.140012289)+LN(1-(2*p0323-1)^2)/2)))
- p1243: 83568.3; = if(p1232>0;0;p1238*(p0725/100)*p0723*1000)
- p0749: 3.637; = p0089*(1+p0617*p0221/100)
- p2929: 9.86068e-5; = p2343*(p1079+p1081)
- p3085: 0; = p2304*p1082
- p2326: 0.000128401; = p2224*p2193
- p2973: 0; = p2387*(p1079+p1081)
- p2215: 0.000217046; = p1117-p2214
- p2233: 0; = if(p0783*p0787+p0784*p0788+p0785*p0789+p0786*p0790=0;0;p0790*p0786/(p0783*p0787+p0784*p0788+p0785*p0789+p0786*p0790))
- p1756: 0
- p3348: 0.00443516; = if(and(p1232=0;p3256<>0);p3276*p3289;0)
- p1256: 0.67861; = if(p1232>0;0;IF(p1253=1;0;IF(p1253+p1254>1;1-p1253;p1254)))
- p0780: 22.342; = p0120*(1+p0648*p0252/100)
- p2245: 0; = p2222*p2190
- p3999: 1.93443e-5; = p1856*p3478
- p2069: 0.190588
- p0802: 1.64e6
- p0631: 0; = IF(p0367<0.5;-SQRT(p0007*EXP(p0499^2*p0008)-p0007);SQRT(p0007*EXP(p0499^2*p0008)-p0007))
- p1712: 0
- p2981: 0; = p2395*(p1020+p1022)
- p0784: 87.107; = p0124*(1+p0652*p0256/100)
- p2405: 0; = p2234*p2195
- p3387: 0.00301042; = p3368*p1234
- p1200: 0.84
- p1892: 0
- p2099: 0.620397
- p3236: 0.0140975
- p2985: 0; = p2399*(p1020+p1022)
- p0705: 22.334; = p0045*(1+p0573*p0177/100)
- p0688: 0
- p1310: 0; = IF(p1307=p1266;0;IF(p1307+p1308>p1266;p1266-p1307;p1308))
- p1056: 2.09487e6; = IF(p1012=0;p1049*p1036;0)
- p2491: 5.23946e-6; = p2295*p1014
- p1339: 0.000156328; = p1338*p0001/(p0818*p0002)
- p2343: 0.000268442; = p2228*p2211
- p0913: 0.00989994
- p2401: 0; = p2234*p2190
- p0256: 10.576
- p0280: 0.5
- p3301: 0; = if(and(p1232=0;p3252<>0);p3257*p3277*(p3297*p3290+(1-p3297)*p3294);0)
- p0682: 1650.01; = p0022*(1+p0550*p0154/100)
- p3424: 0; = p3367*p1239
- p0660: 0; = IF(p0396<0.5;-SQRT(p0007*EXP(p0528^2*p0008)-p0007);SQRT(p0007*EXP(p0528^2*p0008)-p0007))
- p2885: 5.95596e-5; = p2299*(p1079+p1081)
- p2311: 0.00914278; = p2231*p2218
- p0214: 0.955
- p1980: 3521.6
- p2698: 1.32094e-5; = p2307*(p1078+p1080)
- p3183: 0; = p2402*p1023
- p2432: 0.0125768; = p1158
- p2965: 0; = p2379*(p1079+p1081)
- p1555: 0
- p2252: 0; = p2222*p2198
- p1787: 0
- p2674: 1.62559e-5; = p2283*(p1019+p1021)
- p2766: 0; = p2375*(p1078+p1080)
- p2815: 0; = p2424*(p1078+p1080)
- p0864: 0.02572; = IF(p0858=1;0;IF(p0858+p0859>1;1-p0858;p0859))
- p2743: 3.1964e-5; = p2352*(p1128+p1130)
- p3220: 0.00334018; = p3216*p1228
- p0949: 0; = if(and(p0683=0;or(p0807=480;p0807=32;p0807=1;and(p0807=60;p0901<0.03)));p0937;0)
- p2424: 0; = p2235*p2214
- p2757: 0; = p2366*(p1019+p1021)
- p2827: 0; = p2241*(p1020+p1022)
- p1039: 0.0348009
- p1606: 0
- p4972: 0; = p1799*p3483
- p2644: 0; = p2253*(p1019+p1021)
- p1816: 0
- p0896: 0.497045
- p2236: 0; = 1-(p2230+p2231+p2232+p2233)
- p3355: 4.69879e6; = if(and(p1232=0;p3256<>0);p3256-(p3350+p3351+p3352+p3353+p3354);0)
- p2714: 5.07241e-6; = p2323*(p1019+p1021)
- p2705: 0.000877248; = p2314*(p1128+p1130)
- p2543: 5.50829e-6; = p2347*p1073
- p2878: 5.62134e-7; = p2292*(p1020+p1022)
- p0340: 0.5
- p5235: 1.92936e-6; = p1856*p3484
- p1188: 443.408; = p1187*p0801
- p1600: 0
- p3030: 0; = p2249*p1023
- p1645: 0
- p1603: 0
- p2843: 0; = p2257*(p1020+p1022)
- p2996: 0; = p2410*(p1020+p1022)
- p2261: 0.000833318; = p2226*p2207
- p1133: 122194; = if(p1121=0;p1123*(p0716/100)*p0703*1000;0)
- p2330: 1.91879e-7; = p2224*p2198
- p1994: 750
- p0260: 5.409
- p0665: 0; = IF(p0401<0.5;-SQRT(p0007*EXP(p0533^2*p0008)-p0007);SQRT(p0007*EXP(p0533^2*p0008)-p0007))
- p0696: 0
- p3316: 0.85893; = if(and(p1232=0;p3253<>0);1-(p3312+p3313+p3314+p3315);0)
- p2041: 1.14005e-5; = p2015*p2040/(p0818*1000)
- p3222: 0.224242; = IF(p3216=0;0;p1223*40.078/100.0869)
- p3081: 0; = p2300*p1082
- p2571: 0; = p2375*p1073
- p1805: 0
- p3250: 0.875
- p2281: 7.22954e-6; = p2223*p2187
- p2011: 0.00680458
- p1761: 0
- p4205: 1.02484e-6; = p1856*p3479
- p1086: 0; = IF(p1071=0;p1080*(p0710/100)*p0703*1000;0)
- p2390: 0; = p2233*p2219
- p2824: 0; = p2238*(p1020+p1022)
- p1026: 202932; = IF(p1012=0;p1020*(p0704/100)*p0703*1000;0)
- p2960: 0; = p2374*(p1020+p1022)
- p0997: 0; = if(p0888=0;0;if((p0695*p0694*1000*p0696/100)/p0888>1;1;(p0695*p0694*1000*p0696/100)/p0888))
- p1338: 758635; = p1324*p0801
- p1092: 0; = IF(p1071=0;p1086*p0001/(p0818*p0002);0)
- p2121: 0.822447
- p3288: 0.505
- p2319: 1.36937e-5; = p2224*p2186
- p1113: 0.100377
- p2568: 0; = p2372*p1014
- p2414: 0; = p2235*p2204
- p3321: 7.24594e7; = if(and(p1232=0;p3253<>0);IF((p3317+p3318+p3319+p3320)+(p3253*(p3261*(1-p3277))/p3316)>p3253;p3253-(p3317+p3318+p3319+p3320);p3253*(p3261*(1-p3277))/p3316);0)
- p2790: 0; = p2399*(p1019+p1021)
- p1968: 0; = if(p0807=480;p0802*p0811;0)
- p2523: 6.14726e-6; = p2327*p1014
- p3069: 5.48246e-7; = p2288*p1023
- p2667: 0.000199018; = p2276*(p1019+p1021)
- p0570: 0; = IF(p0306<0.5;-SQRT(p0007*EXP(p0438^2*p0008)-p0007);SQRT(p0007*EXP(p0438^2*p0008)-p0007))
- p0308: 0.5
- p1651: 0.299611
- p2922: 4.53488e-5; = p2336*(p1079+p1081)
- p1860: 0
- p0475: 0; = SQRT(2)*(IF((2*p0343-1)<0;-1;IF((2*p0343-1)>0;1;0))*SQRT(SQRT((2/(pi()*0.140012289)+LN(1-(2*p0343-1)^2)/2)^2-LN(1-(2*p0343-1)^2)/0.140012289)-(2/(pi()*0.140012289)+LN(1-(2*p0343-1)^2)/2)))
- p2939: 7.56857e-5; = p2353*(p1129+p1131)
- p1041: 0.326315
- p1859: 0
- p0420: 0; = SQRT(2)*(IF((2*p0288-1)<0;-1;IF((2*p0288-1)>0;1;0))*SQRT(SQRT((2/(pi()*0.140012289)+LN(1-(2*p0288-1)^2)/2)^2-LN(1-(2*p0288-1)^2)/0.140012289)-(2/(pi()*0.140012289)+LN(1-(2*p0288-1)^2)/2)))
- p1979: 1.17989e8; = p0973
- p1944: 0
- p2956: 0; = p2370*(p1020+p1022)
- p2468: 0.00043043; = p2272*p1123
- p0066: 32.525
- p3410: 0.00430942; = p3372*p1238
- p3366: 0.0148479; = if(p1232=0;p3244*p3360/p0818;0)
- p1904: 0
- p2777: 0; = p2386*(p1078+p1080)
- p2437: 0; = p2241*p1014
- p3372: 0.00808642; = if(p1232=0;p3245*p3360/p0818;0)
- p2765: 0; = p2374*(p1019+p1021)
- p0330: 0.5
- p0581: 0; = IF(p0317<0.5;-SQRT(p0007*EXP(p0449^2*p0008)-p0007);SQRT(p0007*EXP(p0449^2*p0008)-p0007))
- p2163: 0.00258441; = (p2017-p2020)/p0818-(p2025+p2028+p2033+p2034+p2051+p2125+p2126+p2127+p2128+p2129+p2130+p2131+p2132+p2133+p2134+p2135+p2136+p2137+p2138+p2139+p2140+p2141+p2142+p2143+p2144+p2145+p2146+p2147+p2148+p2149+p2150+p2151+p2152+p2153+p2154+p2155+p2156+p2157)
- p0275: 0.5
- p2955: 0; = p2369*(p1020+p1022)
- p0792: 35.259; = p0132*(1+p0660*p0264/100)
- p0608: 0; = IF(p0344<0.5;-SQRT(p0007*EXP(p0476^2*p0008)-p0007);SQRT(p0007*EXP(p0476^2*p0008)-p0007))
- p3221: 0.146975; = IF(p3216=0;0;p1223*12.0107/100.0869+(1-p1224)*12.0107/84.3139)
- p2993: 0; = p2407*(p1020+p1022)
- p1084: 246427; = IF(p1071=0;p1078*(p0710/100)*p0703*1000;0)
- p1042: 0.000297097
- p2745: 0; = p2354*(p1019+p1021)
- p2444: 0; = p2248*p1014
- p2398: 0; = p2234*p2187
- p0156: 4.245
- p2182: 0.000620794; = p1050/p0818
- p2873: 0.000171094; = p2287*(p1020+p1022)
- p1185: 0.5
- p2871: 4.16616e-6; = p2285*(p1020+p1022)
- p3264: 0.0887032
- p0711: 20.963; = p0051*(1+p0579*p0183/100)
- p0881: 0; = p0880*p0001*p0003/(p0818*p0002)
- p4622: 9.63877e-8; = p1861*p3481
- p1833: 0
- p3340: 0; = if(and(p1232=0;p3254<>0);p3254*(p3270-p3335)/p3338;0)
- p3470: 0; = p3375*p1241
- p0058: 36.994
- p2627: 0; = p2431*p1123
- p1215: 0.0350765; = IF(p1214=0;0;(p1214-1.5)/(p1214-1)^2)
- p2430: 0; = p2236*p2220
- p1998: 392
- p2758: 0; = p2367*(p1019+p1021)
- p0441: 0; = SQRT(2)*(IF((2*p0309-1)<0;-1;IF((2*p0309-1)>0;1;0))*SQRT(SQRT((2/(pi()*0.140012289)+LN(1-(2*p0309-1)^2)/2)^2-LN(1-(2*p0309-1)^2)/0.140012289)-(2/(pi()*0.140012289)+LN(1-(2*p0309-1)^2)/2)))
- p1114: 0.216028
- p3041: 0; = p2260*p1082
- p1738: 0
- p3035: 0; = p2254*p1023
- p1846: 0
- p1643: 0
- p2901: 4.83057e-5; = p2315*(p1020+p1022)
- p2104: 0.817136
- p1197: 1.806
- p3204: 0; = p2423*p1082
- p0151: 0
- p1247: 1.051e-5; = if(p1232>0;0;p1242*p0001/(p0818*p0002))
- p2101: 0.620397
- p0595: 0; = IF(p0331<0.5;-SQRT(p0007*EXP(p0463^2*p0008)-p0007);SQRT(p0007*EXP(p0463^2*p0008)-p0007))
- p2258: 0.000342686; = p2226*p2204
- p1165: 0.000340008; = p0801*p0001/(p0818*p0002)
- p0884: 0; = IF(p0689=100;0;IF(p0689+p0688>100;100-p0689;p0688))
- p3295: 0.58
- p1298: 0
- p3361: 4.69879e6; = if(p1232=0;p3311+p3322+p3333+p3344+p3355;0)
- p4350: 0; = p1795*p3480
- p0211: 11.054
- p0327: 0.5
- p1000: 0; = IF(p0996+p0999=1;0;IF(p0996+p0999+p0998>1;1-(p0996+p0999);p0998))
- p0926: 0; = IF(p0918+p0923+p0924+p0925=1;0;IF(p0918+p0923+p0924+p0925+p0922>1;1-(p0918+p0923+p0924+p0925);p0922))
- p3440: 0; = p3364*p1240
- p0418: 0; = SQRT(2)*(IF((2*p0286-1)<0;-1;IF((2*p0286-1)>0;1;0))*SQRT(SQRT((2/(pi()*0.140012289)+LN(1-(2*p0286-1)^2)/2)^2-LN(1-(2*p0286-1)^2)/0.140012289)-(2/(pi()*0.140012289)+LN(1-(2*p0286-1)^2)/2)))
- p1810: 0
- p1226: 1.65e6; = IF(p1221=0;0;IF(p1193=0;p0801;0))
- p0020: 207.084
- p2746: 0; = p2355*(p1019+p1021)
- p2279: 4.7829e-5; = p2223*p2185
- p2837: 0; = p2251*(p1020+p1022)
- p3074: 2.0645e-6; = p2293*p1023
- p0247: 7.57
- p1973: 0; = if(p0807=480;p1968*p0001/(p0818*p0002);0)
- p2535: 6.29329e-5; = p2339*p1073
- p1985: 2.34438e7; = (if(p1057=0;0;p1050/p1057)+if(p1058=0;0;p1051/p1058)+if(p1059=0;0;p1052/p1059)+if(p1060=0;0;p1053/p1060)+if(p1061=0;0;p1054/p1061)+if(p1062=0;0;p1055/p1062)+if(p1063=0;0;p1056/p1063))*(1+p1157)
- p1788: 0
- p1068: 0.00199803; = IF(p1012=0;p1054/(p1061*p0818);0)
- p1696: 0
- p2540: 3.12645e-8; = p2344*p1073
- p2569: 0; = p2373*p1014
- p0125: 26.441
- p1815: 0
- p3240: 4.79006e-9; = p3234*p1188*p3235/p0818
- p0943: 0; = if(and(p0683=0;p0949=0);p0937;0)
- p0154: 0
- p3159: 0; = p2378*p1082
- p2515: 3.05835e-6; = p2319*p1014
- p2478: 2.06556e-5; = p2282*p1014
- p0541: 0; = IF(p0277<0.5;-SQRT(p0007*EXP(p0409^2*p0008)-p0007);SQRT(p0007*EXP(p0409^2*p0008)-p0007))
- p4766: 0; = p1799*p3482
- p0773: 35.305; = p0113*(1+p0641*p0245/100)
- p1976: 0.183
- p2317: 3.7854e-6; = p2224*p2184
- p3115: 3.47264e-8; = p2334*p1023
- p0778: 21.938; = p0118*(1+p0646*p0250/100)
- p3201: 0; = p2420*p1082
- p3193: 0; = p2412*p1023
- p0755: 0
- p2110: 0.856281
- p2008: 0.0348431; = ((p1982*p1985+p1988*p1991+p1994*p1997+p2002*p2005)/p0818)*p0005*p0002/1000
- p1105: 0.436421
- p1736: 0
- p0713: 36.733; = p0053*(1+p0581*p0185/100)
- p3284: 0.275
- p3051: 0; = p2270*p1082
- p2278: 1.38858e-5; = p2223*p2184
- p1271: 0; = IF(p1267+p1270=p1259;0;IF(p1267+p1270+p1269>p1259;p1259-(p1267+p1270);p1269))
- p2511: 2.97002e-5; = p2315*p1014
- p2883: 0.000203361; = p2297*(p1079+p1081)
- p1136: 0; = if(p1121=0;p1130*(p0716/100)*p0703*1000;0)
- p2458: 6.10914e-5; = p2262*p1073
- p2282: 9.2485e-5; = p2223*p2188
- p2950: 0; = p2364*(p1020+p1022)
- p1832: 0
- p3065: 2.47649e-7; = p2284*p1023
- p1809: 0
- p2046: 10
- p0693: 0
- p0510: 0; = SQRT(2)*(IF((2*p0378-1)<0;-1;IF((2*p0378-1)>0;1;0))*SQRT(SQRT((2/(pi()*0.140012289)+LN(1-(2*p0378-1)^2)/2)^2-LN(1-(2*p0378-1)^2)/0.140012289)-(2/(pi()*0.140012289)+LN(1-(2*p0378-1)^2)/2)))
- p1296: 0; = p1292*p1252/p0818
- p1616: 0
- p3289: 0.05
- p3181: 0; = p2400*p1023
- p1727: 0
- p1094: 0; = IF(p1071=0;p1088*p0001/(p0818*p0002);0)
- p2386: 0; = p2229*p2215
- p1269: 0
- p1155: 0.00536871; = if(p1153*p0818=0;0;p1151/(p1153*p0818))
- p3309: 0; = if(and(p1232=0;p3252<>0);p3252*(p3260-p3304)/p3305;0)
- p1566: 0
- p3474: 0; = p3379*p1241
- p2331: 4.21866e-7; = p2224*p2199
- p3403: 0.00209355; = p3365*p1238
- p2952: 0; = p2366*(p1020+p1022)
- p0993: 0; = p0989*p0001*p0004/(p0818*p0002)
- p1166: 1.85142e-6; = p1164/p0818
- p0613: 0; = IF(p0349<0.5;-SQRT(p0007*EXP(p0481^2*p0008)-p0007);SQRT(p0007*EXP(p0481^2*p0008)-p0007))
- p2503: 6.54567e-6; = p2307*p1073
- p3243: 5.30307e-10; = p3234*p1188*p3239/p0818
- p1267: 0
- p3423: 0; = p3366*p1239
- p2780: 0; = p2389*(p1128+p1130)
- p1237: 0; = if(p1232>0;0;p0729/100)
- p0388: 0.5
- p0007: 14; = p0006-1
- p2112: 0.856281
- p0278: 0.5
- p0970: 0.0246735; = p0967/p0818
- p5132: 0; = p1963*p3483
- p0961: 0; = if(and(p0683>0;or(p0807=480;p0807=32;p0807=1;and(p0807=60;p0901<0.03)));p0937;0)
- p0651: 0; = IF(p0387<0.5;-SQRT(p0007*EXP(p0519^2*p0008)-p0007);SQRT(p0007*EXP(p0519^2*p0008)-p0007))
- p2904: 4.73627e-6; = p2318*(p1020+p1022)
- p2103: 0.912485
- p3088: 0; = p2307*p1082
- p1759: 0
- p1142: 0; = if(p1121=0;p1136*p0001/(p0818*p0002);0)
- p0184: 19.627
- p1093: 0; = IF(p1071=0;p1087*p0001/(p0818*p0002);0)
- p2313: 0.0013646; = p2231*p2220
- p4964: 0; = p1791*p3483
- p2295: 2.34596e-5; = p2223*p2202
- p2027: 0.428799
- p3019: 0; = p2238*p1023
- p1346: 83
- p2429: 0; = p2236*p2219
- p0014: 24.365
- p2197: 5.45737e-7; = p1055/p0818
- p0875: 0; = p0874*p0001*p0003/(p0818*p0002)
- p1240: 0; = if(p1232>0;0;IF(p1234+p1238+p1239=1;0;IF(p1234+p1238+p1239+p1237>1;1-(p1234+p1238+p1239);p1237)))
- p3307: 0; = if(and(p1232=0;p3252<>0);p3252*(p3258-p3302)/p3305;0)
- p1034: 0; = IF(p1012=0;p1028*p0001/(p0818*p0002);0)
- p1800: 0
- p2587: 0; = p2391*p1123
- p0189: 49.457
- p3096: 7.22092e-7; = p2315*p1023
- p1686: 0.505026
- p2002: 750
- p2339: 0.000300209; = p2228*p2207
- p1203: 3
- p1656: 0
- p2905: 4.97424e-6; = p2319*(p1020+p1022)
- p0659: 0; = IF(p0395<0.5;-SQRT(p0007*EXP(p0527^2*p0008)-p0007);SQRT(p0007*EXP(p0527^2*p0008)-p0007))
- p1907: 0
- p3344: 0; = if(and(p1232=0;p3254<>0);p3254-(p3339+p3340+p3341+p3342+p3343);0)
- p1154: 0.0316537; = if(p1152*p0818=0;0;p1150/(p1152*p0818))
- p4411: 0; = p1856*p3480
- p2450: 0; = p2254*p1014
- p0697: 0
- p1264: 0; = if(p1232>0;0;IF(p1259+p1263=1;0;IF(p1259+p1263+p1261>1;1-(p1259+p1263);p1261)))
- p3386: 0.000228526; = p3367*p1234

- p2025: 1.72348e-5; = p2015*p2023*p2024/(p0818*1000)
- p0143: 0
- p0223: 19.884
- p3318: 9.44093e6; = if(and(p1232=0;p3253<>0);p3253*(p3262-p3313)/p3316;0)
- p3428: 0; = p3371*p1239
- p1719: 0
- p2725: 2.60915e-6; = p2334*(p1019+p1021)
- p0009: 25.4811
- p3393: 0; = p3374*p1234
- p2218: 0.0131386; = p1150/p0818
- p1143: 0; = if(p1121=0;p1137*p0001/(p0818*p0002);0)
- p2820: 0; = p2429*(p1128+p1130)
- p0886: 0; = p0686*1000*p0687*p0689/100
- p2525: 2.61093e-8; = p2329*p1014
- p0398: 0.5
- p2858: 0.0017224; = p2272*(p1129+p1131)
- p1254: 0.67861; = if(p1232>0;0;p0736/100)
- p1753: 0
- p0924: 0.451193; = IF(p0918+p0923=1;0;IF(p0918+p0923+p0920>1;1-(p0918+p0923);p0920))
- p1322: 0.0801407; = IF(((p0745*1000*p0749/100)+(p0754*1000*p0758/100))/p0801<0;0;((p0745*1000*p0749/100)+(p0754*1000*p0758/100))/p0801)
- p3390: 0.000695872; = p3371*p1234
- p3370: 0.000517434; = if(p1232=0;p3245*p3358/p0818;0)
- p0081: 1.324
- p2825: 0; = p2239*(p1020+p1022)
- p2454: 7.18372e-5; = p2258*p1073
- p3325: 0; = if(and(p1232=0;p3255<>0);p3267*p3289;0)
- p0254: 6.774
- p2513: 8.4543e-7; = p2317*p1014
- p2120: 0.51828
- p3202: 0; = p2421*p1082
- p3480: 0; = if(p1328+p1330+p1332+p1334+p1336+p1338+p1340+p1342+p1344=0;0;p1336/(p1328+p1330+p1332+p1334+p1336+p1338+p1340+p1342+p1344))
- p0573: 0; = IF(p0309<0.5;-SQRT(p0007*EXP(p0441^2*p0008)-p0007);SQRT(p0007*EXP(p0441^2*p0008)-p0007))
- p0992: 0; = p0988*p0001*p0004/(p0818*p0002)
- p0001: 0.404686
- p0063: 1649.96
- p3042: 0; = p2261*p1082
- p2730: 0.000127001; = p2339*(p1078+p1080)
- p0607: 0; = IF(p0343<0.5;-SQRT(p0007*EXP(p0475^2*p0008)-p0007);SQRT(p0007*EXP(p0475^2*p0008)-p0007))
- p1121: 0
- p2621: 0; = p2425*p1073
- p2465: 1.52899e-5; = p2269*p1073
- p2078: 0.117
- p3432: 0; = p3375*p1239
- p3261: 0.908439
- p1284: 0; = p1280*p1252/p0818
- p1618: 0
- p3101: 1.07016e-8; = p2320*p1023
- p2648: 0; = p2257*(p1019+p1021)
- p2577: 0; = p2381*p1073
- p1740: 0
- p2539: 5.62735e-5; = p2343*p1073
- p2342: 2.0499e-5; = p2228*p2210
- p2963: 0; = p2377*(p1079+p1081)
- p1314: 0; = p1310*p1252/p0818
- p1883: 0
- p1275: 0; = p1271*p1252/p0818
- p1565: 0
- p0109: 17.185
- p0698: 0
- p1918: 0
- p2473: 2.39154e-5; = p2277*p1014
- p0849: 0
- p0116: 17.817
- p2567: 0; = p2371*p1014
- p2276: 0.000487813; = p2223*p2182
- p3229: 1.85142e-6; = p1164/p0818
- p2759: 0; = p2368*(p1019+p1021)
- p0002: 0.453592
- p2971: 0; = p2385*(p1079+p1081)
- p1266: 0.24597; = if(p1232>0;0;IF(p1259+p1263+p1264+p1265=1;0;1-(p1259+p1263+p1264+p1265)))
- p3468: 5.42721e-5; = p3373*p1241
- p1170: 1136.25; = p1169*p0801
- p2135: 5.88944e-6; = p2015*p2063*p2097/(p0818*1000)
- p3153: 0; = p2372*p1023
- p2563: 0; = p2367*p1014
- p0980: 0; = IF(p0977=0;0;p0977*p0001/(p0818*p0002))
- p3209: 0; = p2428*p1132
- p1218: 0.5
- p0051: 20.963
- p1156: 0.0503606; = p1064+p1065+p1066+p1067+p1068+p1069+p1070+p1116+p1117+p1118+p1119+p1120+p1154+p1155
- p1064: 0.000757066; = IF(p1012=0;p1050/(p1057*p0818);0)
- p3131: 5.78897e-9; = p2350*p1132
- p2509: 0.000171899; = p2313*p1123
- p1960: 271.438; = IF(p1959-p1958<0;0;p1959-p1958)
- p2062: 3.76588
- p1391: 1
- p1134: 358850; = if(p1121=0;p1128*(p0716/100)*p0703*1000;0)
- p3109: 1.47738e-6; = p2328*p1023
- p3896: 0; = p1963*p3477
- p0511: 0; = SQRT(2)*(IF((2*p0379-1)<0;-1;IF((2*p0379-1)>0;1;0))*SQRT(SQRT((2/(pi()*0.140012289)+LN(1-(2*p0379-1)^2)/2)^2-LN(1-(2*p0379-1)^2)/0.140012289)-(2/(pi()*0.140012289)+LN(1-(2*p0379-1)^2)/2)))
- p0525: 0; = SQRT(2)*(IF((2*p0393-1)<0;-1;IF((2*p0393-1)>0;1;0))*SQRT(SQRT((2/(pi()*0.140012289)+LN(1-(2*p0393-1)^2)/2)^2-LN(1-(2*p0393-1)^2)/0.140012289)-(2/(pi()*0.140012289)+LN(1-(2*p0393-1)^2)/2)))
- p3163: 0; = p2382*p1082
- p0765: 0
- p1726: 0
- p0845: 0.5
- p1580: 0
- p1864: 1.61678e-6; = p1456*1000/p0818
- p1152: 0.415074
- p3145: 0; = p2364*p1023
- p1955: 0
- p1584: 0
- p2854: 7.09972e-6; = p2268*(p1079+p1081)
- p2229: 0; = if(p0774*p0778+p0775*p0779+p0776*p0780+p0777*p0781=0;0;p0781*p0777/(p0774*p0778+p0775*p0779+p0776*p0780+p0777*p0781))
- p0078: 1650.01
- p1278: 0.67861
- p1914: 0
- p2823: 0; = p2237*(p1020+p1022)
- p1893: 0
- p3011: 0; = p2425*(p1079+p1081)
- p3346: 0.0102974; = if(and(p1232=0;p3256<>0);p3274*(p3281*(p3285*p1256+p3286*(p1253+p1257)+p1258*p3288));0)
- p3007: 0; = p2421*(p1079+p1081)
- p2150: 7.3215e-7; = p2015*p2078*p2112/(p0818*1000)
- p0663: 0; = IF(p0399<0.5;-SQRT(p0007*EXP(p0531^2*p0008)-p0007);SQRT(p0007*EXP(p0531^2*p0008)-p0007))
- p2455: 6.49713e-5; = p2259*p1073
- p1578: 0
- p4144: 5.88022e-8; = p1795*p3479
- p5338: 1.39062e-5; = p1963*p3484
- p1770: 0
- p3415: 0; = p3377*p1238
- p2030: 8.87
- p1221: 0.224397; = p1216*(1+p1220*p1217/100)
- p0349: 0.5
- p1233: 0; = p1232*p0001/(p0818*p0002)
- p0891: 226512; = IF(p3251=0;0;62.4*6272640/(12*12*12))
- p1631: 0
- p1329: 0; = p1328*p0001/(p0818*p0002)
- p2141: 1.27092e-6; = p2015*p2069*p2103/(p0818*1000)
- p1126: 0; = if(p1121=0;p0720/100;0)
- p0344: 0.5
- p0939: 0; = p0933*p0001/(p0818*p0002)
- p1840: 0
- p1981: 400
- p1963h: 2.73047e-5; = p1686*p1890+p1687*p1891+p1688*p1892+p1689*p1893+p1690*p1894+p1691*p1895+p1692*p1896+p1693*p1897+p1694*p1898+p1695*p1899+p1696*p1900+p1697*p1901+p1698*p1902+p1699*p1903+p1700*p1904+p1701*p1905+p1702*p1906+p1703*p1907+p1704*p1908+p1705*p1909
- p3056: 8.86234e-9; = p2275*p1132
- p2570: 0; = p2374*p1014
- p1608: 0
- p1101: 0.0290355; = IF(p1071=0;IF(p1096=1;0;IF(p1096+p1097>1;1-p1096;p1097));0)
- p1682: 0
- p0756: 0
- p0208: 15.118
- p0919: 0.266843; = p0678*1000/p0801
- p2733: 8.67188e-6; = p2342*(p1078+p1080)
- p1123: 0.12597; = if(p1121=0;p0717/100;0)
- p1634: 0
- p3199: 0; = p2418*p1082
- p2263: 0.000131786; = p2226*p2209
- p1211: 0.6
- p3793: 0; = p1856*p3477
- p3043: 0; = p2262*p1082
- p3091: 0; = p2310*p1082
- p3244: 0.64741; = p0791/100
- p2433: 0; = p2237*p1014
- p0485: 0; = SQRT(2)*(IF((2*p0353-1)<0;-1;IF((2*p0353-1)>0;1;0))*SQRT(SQRT((2/(pi()*0.140012289)+LN(1-(2*p0353-1)^2)/2)^2-LN(1-(2*p0353-1)^2)/0.140012289)-(2/(pi()*0.140012289)+LN(1-(2*p0353-1)^2)/2)))
- p1330: 0; = p1320*p0801
- p3098: 2.05547e-8; = p2317*p1023
- p2003: 50
- p2320: 1.97083e-6; = p2224*p2187
- p1623: 0
- p0911: 0.0154167
- p1630: 0
- p3449: 0; = p3373*p1240
- p1130: 0; = if(p1121=0;IF(p1123+p1128+p1129=1;0;IF(p1123+p1128+p1129+p1126>1;1-(p1123+p1128+p1129);p1126));0)
- p0916: 0.298109; = p0826+(p0832*(1+p0894))/p0818
- p1289: 0
- p0396: 0.5
- p1288: 0
- p1567: 0
- p0777: 0
- p1625: 0
- p1208: 111.441; = p1205*p0818*p0822/p0801
- p3435: 0; = p3378*p1239
- p2754: 0; = p2363*(p1019+p1021)
- p1049: 0.263405; = IF(p1012=0;IF(p1037+p1044+p1045+p1046+p1047+p1048=1;0;1-(p1037+p1044+p1045+p1046+p1047+p1048));0)
- p1209: 90.3084; = p1206*p0818*p0822/p0801
- p2516: 4.40166e-7; = p2320*p1014
- p3185: 0; = p2404*p1023
- p1750: 0
- p2269: 7.29374e-5; = p2226*p2215
- p2124: 0.263965
- p2146: 1.51016e-7; = p2015*p2074*p2108/(p0818*1000)
- p1043: 0.263405
- p0652: 0; = IF(p0388<0.5;-SQRT(p0007*EXP(p0520^2*p0008)-p0007);SQRT(p0007*EXP(p0520^2*p0008)-p0007))
- p2460: 1.19281e-5; = p2264*p1073
- p1948: 0
- p2838: 0; = p2252*(p1020+p1022)
- p2679: 4.11921e-5; = p2288*(p1019+p1021)
- p0998: 0; = if(p0888=0;0;if((p0699*p0698*1000*p0700/100)/p0888>1;1;(p0699*p0698*1000*p0700/100)/p0888))
- p2771: 0; = p2380*(p1078+p1080)
- p2986: 0; = p2400*(p1020+p1022)
- p1287: 0
- p1612: 0
- p2094: 0.922577
- p2998: 0; = p2412*(p1020+p1022)
- p2961: 0; = p2375*(p1079+p1081)
- p0586: 0; = IF(p0322<0.5;-SQRT(p0007*EXP(p0454^2*p0008)-p0007);SQRT(p0007*EXP(p0454^2*p0008)-p0007))
- p3176: 0; = p2395*p1023
- p2566: 0; = p2370*p1014
- p0907: 0
- p2671: 2.04937e-5; = p2280*(p1019+p1021)
- p2189: 5.07068e-5; = p1053/p0818
- p4252: 1.25165e-6; = p1903*p3479
- p0969: 8.26514e6; = p0966*p0683*p0682*1000
- p1808: 0
- p3032: 0; = p2251*p1023
- p2435: 0; = p2239*p1014
- p1027: 0; = IF(p1012=0;p1021*(p0704/100)*p0703*1000;0)
- p2658: 1.83133e-6; = p2267*(p1078+p1080)
- p2256: 0; = p2222*p2202
- p1751: 0
- p1888: 0
- p3433: 0; = p3376*p1239
- p1621: 0
- p0781: 0
- p1665: 0
- p2862: 0.000177198; = p2276*(p1020+p1022)
- p1575: 0
- p3164: 0; = p2383*p1082
- p4103: 6.97226e-7; = p1754*p3479
- p3421: 0; = p3364*p1239
- p3103: 5.89807e-8; = p2322*p1023
- p0019: 258.169
- p0386: 0.5
- p3022: 0; = p2241*p1023
- p1683: 0
- p1342: 0; = p1326*p0801
- p2742: 0.000301792; = p2351*(p1128+p1130)
- p0527: 0; = SQRT(2)*(IF((2*p0395-1)<0;-1;IF((2*p0395-1)>0;1;0))*SQRT(SQRT((2/(pi()*0.140012289)+LN(1-(2*p0395-1)^2)/2)^2-LN(1-(2*p0395-1)^2)/0.140012289)-(2/(pi()*0.140012289)+LN(1-(2*p0395-1)^2)/2)))
- p2198: 8.95741e-7; = 22.98976928*p2197/14.0067
- p3279: 0.37
- p2130: 4.95777e-6; = p2015*p2058*p2092/(p0818*1000)
- p2744: 5.55451e-5; = p2353*(p1128+p1130)
- p0080: 98.029
- p2462: 8.67836e-8; = p2266*p1073
- p1835: 0
- p2755: 0; = p2364*(p1019+p1021)
- p1754: 1.91704e-5; = p1346*1000/p0818
- p1697: 0
- p1747: 0
- p2370: 0; = p2225*p2199
- p0699: 0
- p0460: 0; = SQRT(2)*(IF((2*p0328-1)<0;-1;IF((2*p0328-1)>0;1;0))*SQRT(SQRT((2/(pi()*0.140012289)+LN(1-(2*p0328-1)^2)/2)^2-LN(1-(2*p0328-1)^2)/0.140012289)-(2/(pi()*0.140012289)+LN(1-(2*p0328-1)^2)/2)))
- p1966: 1.64e6; = if(p0814=0;p0802;0)
- p1207: 23.8722; = if(p1193>0;0;(p1194*p1050/p1057+p1195*p1051/p1058+p1196*p1052/p1059+p1197*p1053/p1060+p1198*p1054/p1061+p1199*p1055/p1062+p1200*p1056/p1063)/(p0702*1000)+(p1201*p1109/p1114+p1202*p1110/p1115)/(p0702*1000)+p1203*p1170/p0801+p1204*p1176/p0801)
- p3116: 3.9811e-7; = p2335*p1023
- p0988: 0; = p0982*p0886
- p2368: 0; = p2225*p2197
- p3132: 8.15787e-9; = p2351*p1132
- p0991: 0; = p0987*p0886
- p3197: 0; = p2416*p1082
- p2160: 5.23624e-7; = p2015*p2084*p2122/(p0818*1000)
- p3482: 0; = if(p1328+p1330+p1332+p1334+p1336+p1338+p1340+p1342+p1344=0;0;p1340/(p1328+p1330+p1332+p1334+p1336+p1338+p1340+p1342+p1344))
- p1799: 2.30968e-7; = p1391*1000/p0818
- p0119: 53.745
- p0876: 23385; = p0866*p0856
- p0854: 644709; = p0801*((1-p0853)*p0846+p0853*p0852)
- p3327: 0; = if(and(p1232=0;p3255<>0);1-(p3323+p3324+p3325+p3326);0)
- p1777: 0
- p0606: 0; = IF(p0342<0.5;-SQRT(p0007*EXP(p0474^2*p0008)-p0007);SQRT(p0007*EXP(p0474^2*p0008)-p0007))
- p1099: 0.514802
- p0814: 0; = if(p0807=480;p0810*p0812+p0811*p0813;0)
- p2789: 0; = p2398*(p1019+p1021)
- p4046: 2.36254e-5; = p1903*p3478
- p3728: 0; = p1791*p3477
- p1658: 0
- p0719: 50.408; = p0059*(1+p0587*p0191/100)
- p3595: 0; = p1864*p3476
- p2211: 0.00221738; = p1120-p2209-p2208-p2210
- p0088: 68.65
- p3012: 0; = p2426*(p1079+p1081)
- p2552: 0; = p2356*p1014
- p0368: 0.5
- p1345: 5.12979e-5; = IF(p1318=0;p1344*p0001/(p0818*p0002);0)
- p1690: 0
- p2378: 0; = p2229*p2207
- p3436: 0; = p3379*p1239
- p0472: 0; = SQRT(2)*(IF((2*p0340-1)<0;-1;IF((2*p0340-1)>0;1;0))*SQRT(SQRT((2/(pi()*0.140012289)+LN(1-(2*p0340-1)^2)/2)^2-LN(1-(2*p0340-1)^2)/0.140012289)-(2/(pi()*0.140012289)+LN(1-(2*p0340-1)^2)/2)))
- p1232: 0
- p3374: 0; = if(p1232=0;p3246*p3356/p0818;0)
- p2549: 1.89139e-5; = p2353*p1123
- p4762: 0; = p1795*p3482
- p3396: 0; = p3377*p1234
- p1597: 0
- p2776: 0; = p2385*(p1078+p1080)
- p2021: 0.000189435; = p2020/p0818
- p2660: 3.08554e-5; = p2269*(p1078+p1080)
- p0782: 58.791; = p0122*(1+p0650*p0254/100)
- p0938: 0; = p0932*p0001/(p0818*p0002)
- p0484: 0; = SQRT(2)*(IF((2*p0352-1)<0;-1;IF((2*p0352-1)>0;1;0))*SQRT(SQRT((2/(pi()*0.140012289)+LN(1-(2*p0352-1)^2)/2)^2-LN(1-(2*p0352-1)^2)/0.140012289)-(2/(pi()*0.140012289)+LN(1-(2*p0352-1)^2)/2)))
- p2459: 2.76262e-5; = p2263*p1073
- p2520: 6.9829e-7; = p2324*p1014
- p0212: 1.535
- p3364: 0.000950089; = if(p1232=0;p3244*p3358/p0818;0)
- p1692: 0
- p2710: 5.58676e-6; = p2319*(p1019+p1021)
- p0238: 7.446
- p3036: 0; = p2255*p1023
- p0264: 46.19
- p2696: 2.82932e-7; = p2305*(p1078+p1080)
- p2835: 0; = p2249*(p1020+p1022)
- p2828: 0; = p2242*(p1020+p1022)
- p2713: 4.43149e-6; = p2322*(p1019+p1021)
- p2128: 6.07696e-6; = p2015*p2056*p2090/(p0818*1000)
- p2836: 0; = p2250*(p1020+p1022)
- p1018: 0; = IF(p1012=0;p0709/100;0)
- p3152: 0; = p2371*p1023
- p0687: 0
- p0769: 17.185; = p0109*(1+p0637*p0241/100)
- p0137: 33.736
- p0175: 0
- p2365: 0; = p2225*p2193
- p0138: 35.305
- p2322: 1.0862e-5; = p2224*p2189
- p0965: 0.02456; = IF(p0684/100=1;0;IF(p0684/100+p0685/100>1;1-p0684/100;p0685/100))
- p3304: 0; = if(and(p1232=0;p3252<>0);p3260*p3289;0)
- p3010: 0; = p2424*(p1079+p1081)
- p3465: 7.33876e-5; = p3370*p1241
- p2848: 0.000107049; = p2262*(p1079+p1081)
- p2357: 0; = p2225*p2185
- p2600: 0; = p2404*p1014
- p0546: 0; = IF(p0282<0.5;-SQRT(p0007*EXP(p0414^2*p0008)-p0007);SQRT(p0007*EXP(p0414^2*p0008)-p0007))
- p2321: 2.52122e-5; = p2224*p2188
- p0467: 0; = SQRT(2)*(IF((2*p0335-1)<0;-1;IF((2*p0335-1)>0;1;0))*SQRT(SQRT((2/(pi()*0.140012289)+LN(1-(2*p0335-1)^2)/2)^2-LN(1-(2*p0335-1)^2)/0.140012289)-(2/(pi()*0.140012289)+LN(1-(2*p0335-1)^2)/2)))
- p0657: 0; = IF(p0393<0.5;-SQRT(p0007*EXP(p0525^2*p0008)-p0007);SQRT(p0007*EXP(p0525^2*p0008)-p0007))
- p2038: 0.304457
- p0183: 53.484
- p1281: 0; = IF(p1277+p1280=p1263;0;IF(p1277+p1280+p1279>p1263;p1263-(p1277+p1280);p1279))
- p0053: 36.733
- p2136: 4.23462e-6; = p2015*p2064*p2098/(p0818*1000)
- p0810: 0
- p3621: 0; = p1890*p3476
- p3196: 0; = p2415*p1082
- p0011: 42.438
- p2456: 2.10394e-5; = p2260*p1073
- p2362: 0; = p2225*p2190
- p1151: 8.49035e6; = if(p1121=0;p1149*p1148*p1145;0)
- p0637: 0; = IF(p0373<0.5;-SQRT(p0007*EXP(p0505^2*p0008)-p0007);SQRT(p0007*EXP(p0505^2*p0008)-p0007))
- p2807: 0; = p2416*(p1078+p1080)
- p2861: 0.000446733; = p2275*(p1129+p1131)
- p1283: 0.769156; = p1277*p1252/p0818
- p1934: 0
- p0320: 0.5
- p2363: 0; = p2225*p2191
- p3407: 0.000638466; = p3369*p1238
- p2876: 1.55774e-7; = p2290*(p1020+p1022)
- p0528: 0; = SQRT(2)*(IF((2*p0396-1)<0;-1;IF((2*p0396-1)>0;1;0))*SQRT(SQRT((2/(pi()*0.140012289)+LN(1-(2*p0396-1)^2)/2)^2-LN(1-(2*p0396-1)^2)/0.140012289)-(2/(pi()*0.140012289)+LN(1-(2*p0396-1)^2)/2)))
- p1091: 4.40929e-5; = IF(p1071=0;p1085*p0001/(p0818*p0002);0)
- p2213: 1.28821e-5; = p1116-p2212
- p3000: 0; = p2414*(p1079+p1081)
- p1622: 0
- p2560: 0; = p2364*p1014
- p0906: 0.00672763
- p1036: 7.95304e6; = IF(p1012=0;p0795*p0702*1000*p0796/100;0)
- p3452: 0; = p3376*p1240
- p0152: 0
- p1680: 0
- p2270: 1.18131e-5; = p2226*p2216
- p0515: 0; = SQRT(2)*(IF((2*p0383-1)<0;-1;IF((2*p0383-1)>0;1;0))*SQRT(SQRT((2/(pi()*0.140012289)+LN(1-(2*p0383-1)^2)/2)^2-LN(1-(2*p0383-1)^2)/0.140012289)-(2/(pi()*0.140012289)+LN(1-(2*p0383-1)^2)/2)))
- p2044: 3.25599e-7; = p2015*p2042*p2043/(p0818*1000)
- p1285: 0; = p1281*p1252/p0818
- p2927: 1.74397e-5; = p2341*(p1079+p1081)
- p2043: 0.636483
- p1181: 0.000207236
- p3369: 0.00119805; = if(p1232=0;p3245*p3357/p0818;0)
- p0523: 0; = SQRT(2)*(IF((2*p0391-1)<0;-1;IF((2*p0391-1)>0;1;0))*SQRT(SQRT((2/(pi()*0.140012289)+LN(1-(2*p0391-1)^2)/2)^2-LN(1-(2*p0391-1)^2)/0.140012289)-(2/(pi()*0.140012289)+LN(1-(2*p0391-1)^2)/2)))
- p0210: 0
- p3293: 0.3875
- p2541: 3.26928e-7; = p2345*p1073
- p0127: 21.029
- p0533: 0; = SQRT(2)*(IF((2*p0401-1)<0;-1;IF((2*p0401-1)>0;1;0))*SQRT(SQRT((2/(pi()*0.140012289)+LN(1-(2*p0401-1)^2)/2)^2-LN(1-(2*p0401-1)^2)/0.140012289)-(2/(pi()*0.140012289)+LN(1-(2*p0401-1)^2)/2)))
- p0819: 0; = p0808*p0809/p0818
- p1187: 0.000268732
- p2786: 0; = p2395*(p1019+p1021)
- p3135: 0; = p2354*p1023
- p2090: 0.40001
- p1786: 0
- p2172: 0.363121; = p2166-(p2167+p2168+p2169+p2170)
- p0967: 1.06826e8; = (p0684/100)*p0683*p0682*1000
- p3224: 0.501945; = IF(p3216=0;0;1-p3221-p3222-p3223)
- p2992: 0; = p2406*(p1020+p1022)
- p3255: 0; = p1252*(p1297*(1-p3247)+p1300*(1-p3248)+p1301*(1-p3249)+p1302*(1-p3250))
- p2264: 5.69008e-5; = p2226*p2210
- p1021: 0; = IF(p1012=0;IF(p1014+p1019+p1020=1;0;IF(p1014+p1019+p1020+p1017>1;1-(p1014+p1019+p1020);p1017));0)
- p0918: 0.125505; = p0680*1000/p0801
- p0757: 0
- p2528: 2.31484e-5; = p2332*p1014
- p3285: 0.275
- p0683: 71.508; = p0023*(1+p0551*p0155/100)
- p1552: 0
- p1838: 0
- p3077: 1.46037e-6; = p2296*p1023
- p3388: 0.000389667; = p3369*p1234
- p2031: 0.465411
- p3045: 0; = p2264*p1082
- p0273: 0.5
- p3286: 0.185
- p3411: 0.000203925; = p3373*p1238
- p3079: 0; = p2298*p1082
- p1990: 30
- p1743: 0
- p1140: 7.39466e-5; = if(p1121=0;p1134*p0001/(p0818*p0002);0)
- p3146: 0; = p2365*p1023
- p2628: 0; = p2237*(p1019+p1021)
- p1292: 0; = IF(p1287+p1290+p1291=p1261;0;p1261-(p1287+p1290+p1291))
- p1856: 2.81781e-5; = p1448*1000/p0818
- p0775: 33.214; = p0115*(1+p0643*p0247/100)
- p1917: 0
- p1235: 0.53292; = if(p1232>0;0;p0727/100)
- p3082: 0; = p2301*p1082
- p0550: 0; = IF(p0286<0.5;-SQRT(p0007*EXP(p0418^2*p0008)-p0007);SQRT(p0007*EXP(p0418^2*p0008)-p0007))
- p2307: 3.12249e-5; = p2227*p2214
- p4307: 2.28017e-6; = p1962*p3479
- p2272: 0.00341693; = p2230*p2218
- p2171: 0.0830418; = p2165*p0831
- p3089: 0; = p2308*p1082
- p1295: 0; = p1291*p1252/p0818
- p3277: 0.55
- p2355: 0; = p2225*p2183
- p2174: 0.00700667; = p0895*p0903/p0818
- p0122: 58.791
- p4445: 0; = p1890*p3480
- p3426: 0; = p3369*p1239
- p0963: 0; = if(and(p0683>0;or(p0807=480;p0807=32;p0807=1;and(p0807=60;p0901<0.03)));p0939;0)
- p3234: 0.39606; = 1-p3233
- p0727: 53.292; = p0067*(1+p0595*p0199/100)
- p1573: 0
- p1320: 0; = IF(((p0745*1000*p0747/100)+(p0754*1000*p0756/100))/p0801<0;0;((p0745*1000*p0747/100)+(p0754*1000*p0756/100))/p0801)
- p2096: 0.486404
- p1729: 0
- p2312: 0.0128841; = p2231*p2219
- p0536: 0; = SQRT(2)*(IF((2*p0404-1)<0;-1;IF((2*p0404-1)>0;1;0))*SQRT(SQRT((2/(pi()*0.140012289)+LN(1-(2*p0404-1)^2)/2)^2-LN(1-(2*p0404-1)^2)/0.140012289)-(2/(pi()*0.140012289)+LN(1-(2*p0404-1)^2)/2)))
- p1902: 0
- p3382: 0.000715488; = p3363*p1234
- p1098: 0.0177463
- p0399: 0.5
- p2975: 0; = p2389*(p1129+p1131)
- p2889: 3.37669e-5; = p2303*(p1079+p1081)
- p2980: 0; = p2394*(p1020+p1022)
- p1138: 9.70023; = if(p1121=0;p1132*(p0716/100)*p0703*1000;0)
- p1014: 0.22334; = IF(p1012=0;p0705/100;0)
- p2288: 0.000100966; = p2223*p2195
- p2657: 1.75132e-7; = p2266*(p1078+p1080)
- p2035: 2.41829e-5; = p2015*p2029*(1-p2031)/(p0818*1000)
- p1873: 0
- p2005: 3.04886e6; = p1963*p0818+p1959*1000+p1170+p1176+p1182
- p3005: 0; = p2419*(p1079+p1081)
- p2884: 0.000183925; = p2298*(p1079+p1081)
- p2964: 0; = p2378*(p1079+p1081)
- p0771: 24.315; = p0111*(1+p0639*p0243/100)
- p0604: 0; = IF(p0340<0.5;-SQRT(p0007*EXP(p0472^2*p0008)-p0007);SQRT(p0007*EXP(p0472^2*p0008)-p0007))
- p0267: 20.917
- p3368: 0.00925572; = if(p1232=0;p3245*p3356/p0818;0)
- p0478: 0; = SQRT(2)*(IF((2*p0346-1)<0;-1;IF((2*p0346-1)>0;1;0))*SQRT(SQRT((2/(pi()*0.140012289)+LN(1-(2*p0346-1)^2)/2)^2-LN(1-(2*p0346-1)^2)/0.140012289)-(2/(pi()*0.140012289)+LN(1-(2*p0346-1)^2)/2)))
- p1135: 488969; = if(p1121=0;p1129*(p0716/100)*p0703*1000;0)
- p2607: 0; = p2411*p1014
- p2257: 0; = p2222*p2203
- p2888: 7.82061e-5; = p2302*(p1079+p1081)
- p2643: 0; = p2252*(p1019+p1021)
- p2741: 0.000214157; = p2350*(p1128+p1130)
- p0443: 0; = SQRT(2)*(IF((2*p0311-1)<0;-1;IF((2*p0311-1)>0;1;0))*SQRT(SQRT((2/(pi()*0.140012289)+LN(1-(2*p0311-1)^2)/2)^2-LN(1-(2*p0311-1)^2)/0.140012289)-(2/(pi()*0.140012289)+LN(1-(2*p0311-1)^2)/2)))
- p3417: 0; = p3379*p1238
- p5282: 2.35634e-6; = p1903*p3484
- p0075: 18.061
- p0317: 0.5
- p2396: 0; = p2234*p2185
- p1732: 0
- p2265: 0.000745139; = p2226*p2211
- p0739: 1.34; = p0079*(1+p0607*p0211/100)
- p1586: 0
- p0832: 7.16541e8; = p0831*p0830/(1-p0831)
- p1963g: 0; = p1667*p1871+p1668*p1872+p1669*p1873+p1670*p1874+p1671*p1875+p1672*p1876+p1673*p1877+p1674*p1878+p1675*p1879+p1676*p1880+p1677*p1881+p1678*p1882+p1679*p1883+p1680*p1884+p1681*p1885+p1682*p1886+p1683*p1887+p1684*p1888+p1685*p1889
- p1602: 0
- p3438: 0; = p3362*p1240
- p2931: 5.72868e-7; = p2345*(p1079+p1081)
- p2974: 0; = p2388*(p1079+p1081)
- p2809: 0; = p2418*(p1078+p1080)
- p2306: 6.9936e-6; = p2227*p2213
- p0438: 0; = SQRT(2)*(IF((2*p0306-1)<0;-1;IF((2*p0306-1)>0;1;0))*SQRT(SQRT((2/(pi()*0.140012289)+LN(1-(2*p0306-1)^2)/2)^2-LN(1-(2*p0306-1)^2)/0.140012289)-(2/(pi()*0.140012289)+LN(1-(2*p0306-1)^2)/2)))
- p1150: 5.68849e7; = if(p1121=0;p1149*p1146*p1145;0)
- p2034: 2.90976e-5; = p2015*p2030*p2032/(p0818*1000)
- p1844: 0
- p0809: 0
- p1079: 0.36733; = IF(p1071=0;IF(p1073+p1078=1;0;IF(p1073+p1078+p1075>1;1-(p1073+p1078);p1075));0)
- p1326: 0; = IF(((p0745*1000*p0753/100)+(p0754*1000*p0762/100))/p0801<0;0;((p0745*1000*p0753/100)+(p0754*1000*p0762/100))/p0801)
- p2393: 0; = p2234*p2182
- p0762: 0
- p4925: 0; = p1962*p3482
- p0461: 0; = SQRT(2)*(IF((2*p0329-1)<0;-1;IF((2*p0329-1)>0;1;0))*SQRT(SQRT((2/(pi()*0.140012289)+LN(1-(2*p0329-1)^2)/2)^2-LN(1-(2*p0329-1)^2)/0.140012289)-(2/(pi()*0.140012289)+LN(1-(2*p0329-1)^2)/2)))
- p3406: 0.00493256; = p3368*p1238
- p2801: 0; = p2410*(p1019+p1021)
- p1282: 0; = IF(p1277+p1280+p1281=p1260;0;p1260-(p1277+p1280+p1281))
- p2498: 4.46311e-5; = p2302*p1073
- p4514: 0; = p1963*p3480
- p1863: 0
- p0353: 0.5
- p1259: 0; = if(p1232>0;0;p0730/100)
- p1103: 0.514802; = IF(p1071=0;IF(p1096+p1101+p1102=1;0;IF(p1096+p1101+p1102+p1099>1;1-(p1096+p1101+p1102);p1099));0)
- p1248: 1.72205e-5; = if(p1232>0;0;p1243*p0001/(p0818*p0002))
- p2665: 0.000188667; = p2274*(p1128+p1130)
- p0830: 6.19987e9; = p0825*p0821*p0824
- p2596: 0; = p2400*p1014
- p2731: 4.44142e-5; = p2340*(p1078+p1080)
- p1119: 0.0047205; = IF(p1071=0;p1109/(p1114*p0818);0)
- p3013: 0; = p2427*(p1079+p1081)
- p0787: 21.029; = p0127*(1+p0655*p0259/100)
- p4927: 0; = p1754*p3483
- p0115: 33.214
- p3276: 0.0887032
- p2448: 0; = p2252*p1014
- p2812: 0; = p2421*(p1078+p1080)
- p3736: 0; = p1799*p3477
- p0733: 0
- p2147: 4.34927e-7; = p2015*p2075*p2109/(p0818*1000)
- p0799: 81.185; = p0139*(1+p0667*p0271/100)
- p1871: 0
- p2340: 0.000104988; = p2228*p2208
- p1718: 0
- p1129: 0.50408; = if(p1121=0;IF(p1123+p1128=1;0;IF(p1123+p1128+p1125>1;1-(p1123+p1128);p1125));0)
- p1070: 0.0010634; = IF(p1012=0;p1056/(p1063*p0818);0)
- p1059: 0.335
- p2832: 0; = p2246*(p1020+p1022)
- p0669: 25.4811; = p0009*(1+p0537*p0141/100)
- p1219: 0; = if(p1218=0;0;SQRT(2)*(IF((2*p1218-1)<0;-1;IF((2*p1218-1)>0;1;0))*SQRT(SQRT((2/(pi()*0.140012289)+LN(1-(2*p1218-1)^2)/2)^2-LN(1-(2*p1218-1)^2)/0.140012289)-(2/(pi()*0.140012289)+LN(1-(2*p1218-1)^2)/2))))
- p0044: 33.859
- p1104: 0.437795; = IF(p1071=0;IF(p1096+p1101+p1102+p1103=1;0;1-(p1096+p1101+p1102+p1103));0)
- p1891: 0
- p3385: 0.00482929; = p3366*p1234
- p0928: 207084; = p0801*p0918
- p3450: 0; = p3374*p1240
- p2403: 0; = p2234*p2192
- p2514: 2.91204e-6; = p2318*p1014
- p3864: 0; = p1927*p3477
- p0401: 0.5
- p1661: 0
- p3308: 0; = if(and(p1232=0;p3252<>0);p3252*(p3259-p3303)/p3305;0)
- p0786: 0
- p0064: 14.082
- p2310: 0.000171044; = p2227*p2217
- p1324: 0.459779; = IF(((p0745*1000*p0751/100)+(p0754*1000*p0760/100))/p0801<0;0;((p0745*1000*p0751/100)+(p0754*1000*p0760/100))/p0801)
- p1311: 0; = IF(p1307+p1310=p1266;0;IF(p1307+p1310+p1309>p1266;p1266-(p1307+p1310);p1309))
- p2125: 9.11415e-6; = p2015*p2053*p2087/(p0818*1000)
- p3416: 0; = p3378*p1238
- p2729: 1.52959e-5; = p2338*(p1078+p1080)
- p0447: 0; = SQRT(2)*(IF((2*p0315-1)<0;-1;IF((2*p0315-1)>0;1;0))*SQRT(SQRT((2/(pi()*0.140012289)+LN(1-(2*p0315-1)^2)/2)^2-LN(1-(2*p0315-1)^2)/0.140012289)-(2/(pi()*0.140012289)+LN(1-(2*p0315-1)^2)/2)))
- p1744: 0
- p1127: 0; = if(p1121=0;p0721/100;0)
- p1002: 0; = p0996*p0888
- p0518: 0; = SQRT(2)*(IF((2*p0386-1)<0;-1;IF((2*p0386-1)>0;1;0))*SQRT(SQRT((2/(pi()*0.140012289)+LN(1-(2*p0386-1)^2)/2)^2-LN(1-(2*p0386-1)^2)/0.140012289)-(2/(pi()*0.140012289)+LN(1-(2*p0386-1)^2)/2)))
- p0252: 52.978
- p5133: 1.31259e-6; = p1754*p3484
- p1186: 3.94886e-8; = p1182*p1185/p0818
- p0679: 258.169; = p0019*(1+p0547*p0151/100)
- p0829: 0; = if(p0807=480;p0814*(1-p0824);0)
- p1935: 0
- p0288: 0.5
- p0343: 0.5
- p1158: 0.0125768; = p1156*p1157
- p4926: 0; = p1963*p3482
- p2085: 0.0335294
- p2693: 9.0067e-5; = p2302*(p1078+p1080)
- p1884: 0
- p3260: 0.0343561
- p4513: 0; = p1962*p3480
- p0639: 0; = IF(p0375<0.5;-SQRT(p0007*EXP(p0507^2*p0008)-p0007);SQRT(p0007*EXP(p0507^2*p0008)-p0007))
- p4828: 0; = p1861*p3482
- p3112: 2.29073e-9; = p2331*p1023
- p2586: 0; = p2390*p1123
- p2073: 0.377647
- p1937: 0
- p1814: 0
- p2417: 0; = p2235*p2207
- p2720: 4.76944e-8; = p2329*(p1019+p1021)
- p0448: 0; = SQRT(2)*(IF((2*p0316-1)<0;-1;IF((2*p0316-1)>0;1;0))*SQRT(SQRT((2/(pi()*0.140012289)+LN(1-(2*p0316-1)^2)/2)^2-LN(1-(2*p0316-1)^2)/0.140012289)-(2/(pi()*0.140012289)+LN(1-(2*p0316-1)^2)/2)))
- p2152: 1.52071e-7; = p2015*p2080*p2114/(p0818*1000)
- p0400: 0.5
- p0686: 0
- p2863: 3.88971e-5; = p2277*(p1020+p1022)
- p1963a: 1.50292e-5; = p1550*p1754+p1551*p1755+p1552*p1756+p1553*p1757+p1554*p1758+p1555*p1759+p1556*p1760+p1557*p1761+p1558*p1762+p1559*p1763+p1560*p1764+p1561*p1765+p1562*p1766+p1563*p1767+p1564*p1768+p1565*p1769+p1566*p1770+p1567*p1771+p1568*p1772
- p2441: 0; = p2245*p1014
- p0764: 33.859; = p0104*(1+p0632*p0236/100)
- p1558: 0
- p2753: 0; = p2362*(p1019+p1021)
- p0329: 0.5
- p3530: 0; = p1799*p3476
- p1196: 0.59
- p0071: 75.403
- p1023: 0.00543; = IF(p1012=0;IF(p1014+p1019+p1020+p1021+p1022=1;0;1-(p1014+p1019+p1020+p1021+p1022));0)
- p0047: 36.325
- p2026: 68.85
- p4552: 4.81938e-8; = p1791*p3481
- p2554: 0; = p2358*p1014
- p2117: 0.585147
- p3367: 0.000702616; = if(p1232=0;p3244*p3361/p0818;0)
- p1048: 0.000297097; = IF(p1012=0;IF(p1037+p1044+p1045+p1046+p1047=1;0;IF(p1037+p1044+p1045+p1046+p1047+p1042>1;1-(p1037+p1044+p1045+p1046+p1047);p1042));0)
- p0632: 0; = IF(p0368<0.5;-SQRT(p0007*EXP(p0500^2*p0008)-p0007);SQRT(p0007*EXP(p0500^2*p0008)-p0007))
- p2360: 0; = p2225*p2188
- p2438: 0; = p2242*p1014

## Reference product
- soybeans; at harvest in 2006; at farm; 85%-92% moisture: 1 kg

## Inputs from technosphere
- CUTOFF prepare soil; for mulch till, soybeans: 9.07287e-5 ha; = p0935
- CUTOFF apply sewage sludge; unspecified method: 0.000340008 ha; = p1189
- CUTOFF dolomite, pulverized; at point-of-sale: 0.0124921 kg; = p1229
- CUTOFF apply N fertilizer; broadcast with incorporation: 4.69666e-5 ha; = p1031
- CUTOFF sewage sludge; at point-of-sale: 1.02413e-7 kg; = p1190
- CUTOFF nitrogenous fertilizer, urea; at point-of-sale: 0.0010634 kg; = p1070
- CUTOFF limestone, high-grade, pulverized; at point-of-sale: 0.0556697 kg; = p1228
- CUTOFF irrig svc; unspec wat source & rate, 2006 soybeans: 0.000340008 ha; = p0981
- CUTOFF domestic barge transport; average fuel: 0.018583 metric ton*km; = p2007
- CUTOFF zinc compounds storage: 3.94886e-8 kg*a; = p1186
- CUTOFF liming materials storage: 0.0340809 kg*a; = p1231
- CUTOFF phosphatic fertilizer, superphosphate grades over 22%; at point-of-sale: 0.000274562 kg; = p1117
- CUTOFF phosphatic fertilizer, other single phosphates; at point-of-sale: 0.000350214 kg; = p1118
- CUTOFF apply pesticide; broadcast with incorporation: 0.000514327 ha; = p1333
- CUTOFF apply N fertilizer; broadcast without incorporation: 4.18173e-5 ha; = p1032
- CUTOFF soya seeds; unspec. type; at point-of-sale: 0.00190898 kg; = p0972
- CUTOFF prepare soil; for no-till, soybeans: 0.000153409 ha; = p0936
- CUTOFF gypsum storage: 9.25711e-7 kg*a; = p1168
- CUTOFF pesticide, Glyphosate diammonium salt; at point-of-sale; kg AI: 2.81781e-5 kg; = p1856
- CUTOFF nitrogenous fertilizer, sodium nitrate; at point-of-sale: 3.41086e-6 kg; = p1069
- CUTOFF apply sulfur; unspecified method: 0.000340008 ha; = p1171
- CUTOFF apply P fertilizer; no broadcast application: 2.51632e-5 ha; = p1089
- CUTOFF apply P fertilizer; broadcast without incorporation: 4.40929e-5 ha; = p1091
- CUTOFF apply zinc compounds; unspecified method: 0.000340008 ha; = p1183
- CUTOFF harvest; soybeans residue management: 0.000340008 ha; = p1975
- CUTOFF sulfuric acid; at point-of-sale: 1.4076e-7 kg; = p1178
- CUTOFF sulfur; at point-of-sale: 2.62438e-7 kg; = p1172
- CUTOFF regional or national trucking; class 8, average fuel: 0.0297627 metric ton*km; = p2009
- CUTOFF pesticide, S-Metolachlor; at point-of-sale; kg AI: 1.10865e-5 kg; = p1927
- CUTOFF nitrogenous fertilizer, anhydrous ammonia; at point-of-sale: 0.000757066 kg; = p1064
- CUTOFF phosphatic fertilizer, superphos. grades 22% and under; at point-of-sale: 1.41141e-5 kg; = p1116
- CUTOFF apply K fertilizer; broadcast without incorporation: 0.00010076 ha; = p1141
- CUTOFF apply gypsum; unspecified method: 0.000340008 ha; = p1165
- CUTOFF bulk cargo rail transport; diesel: 0.0348431 metric ton*km; = p2008
- CUTOFF apply manure; broadcast or spray with incorporation: 1.051e-5 ha; = p1247
- CUTOFF apply single or mixed N fertilizer; unspec. method: 6.25101e-7 ha; = p1035
- CUTOFF pesticide, Clethodim; at point-of-sale; kg AI: 1.61678e-6 kg; = p1795
- CUTOFF dairy manure; from lagoon storage; at point-of-sale: 0.769156 kg; = p1283
- CUTOFF apply liming materials; unspecified method: 0.000340008 ha; = p1227
- CUTOFF sulfur storage: 1.31219e-7 kg*a; = p1174
- CUTOFF pesticide, Imazethapyr; at point-of-sale; kg AI: 1.61678e-6 kg; = p1864
- CUTOFF nitrogenous fertilizer, aqueous ammonia; at point-of-sale: 7.85388e-5 kg; = p1065
- CUTOFF sewage sludge storage: 5.12066e-8 kg*a; = p1192
- CUTOFF planting; for reduced till, soybeans; 15-30% residue: 5.31972e-5 ha; = p0955
- CUTOFF fertilizer filler materials; at point-of-sale: 0.0125768 kg; = p1158
- CUTOFF harvest; soybeans: 0.000337947 ha; = p1971
- CUTOFF unspecified animal manure; from lagoon storage; at point-of-sale: 0.250904 kg; = p1313
- CUTOFF local area trucking; class 6, average fuel: 0.00139372 metric ton*km; = p2010
- CUTOFF apply sulfuric acid; unspecified method: 0.000340008 ha; = p1177
- CUTOFF pesticide, unspecified type; at point-of-sale; kg AI: 6.26936e-5 kg; = p1962
- CUTOFF potassic fertilizer, potassium chloride; at point-of-sale: 0.0316537 kg; = p1154
- CUTOFF planting; for no-till, soybeans: 0.000153409 ha; = p0954
- CUTOFF potassic fertilizer, other single nutrients; at point-of-sale: 0.00536871 kg; = p1155
- CUTOFF nitrogenous fertilizer, ammonium sulfate; at point-of-sale: 0.000241461 kg; = p1067
- CUTOFF apply pesticide; as foliar or directed spray: 0.000156328 ha; = p1339
- CUTOFF pesticide, Pendimethalin; at point-of-sale; kg AI: 3.44143e-5 kg; = p1903
- CUTOFF sulfuric acid storage: 7.03801e-8 kg*a; = p1180
- CUTOFF apply N fertilizer; no broadcast application: 2.57109e-5 ha; = p1030
- CUTOFF apply K fertilizer; no broadcast application: 2.51799e-5 ha; = p1139
- CUTOFF pesticide, Glyphosate; at point-of-sale; kg AI: 0.00033883 kg; = p1855
- CUTOFF seed storage; soybeans: 0.0136259 kg*a; = p0975
- CUTOFF apply manure; broadcast without incorporation: 1.72205e-5 ha; = p1248
- CUTOFF pesticide, Cloransulam-methyl; at point-of-sale; kg AI: 2.30968e-7 kg; = p1799
- CUTOFF pesticide, Imazamox; at point-of-sale; kg AI: 4.61936e-7 kg; = p1861
- CUTOFF soya seeds; nonGMO herbicide resistant seed; at point-of-sale: 0.000669303 kg; = p0971
- CUTOFF phosphatic fertilizer, diammonium phosphate; at point-of-sale: 0.0047205 kg; = p1119
- CUTOFF nitrogenous fertilizer, ammonium nitrate; at point-of-sale: 0.000190823 kg; = p1066
- CUTOFF zinc compounds; at point-of-sale: 7.89771e-8 kg; = p1184
- CUTOFF pesticide storage: 0.000453404 kg*a; = p1965
- CUTOFF apply manure; unspec. method: 4.58303e-6 ha; = p1251
- CUTOFF pesticide, Chlorimuron-ethyl; at point-of-sale; kg AI: 2.30968e-7 kg; = p1791
- CUTOFF N inhibitor appl svc; unspec rate & type, 2006 soybeans: 0.000381098 ha; = p1162
- CUTOFF soya seeds; GMO herbicide resistant seed; at point-of-sale: 0.0246735 kg; = p0970
- CUTOFF prepare soil; for reduced till, soybeans; 15-30% residue: 5.31972e-5 ha; = p0937
- CUTOFF phosphatic fertilizer, monoammonium phosphate; at point-of-sale: 0.00364609 kg; = p1120
- CUTOFF apply P fertilizer; broadcast with incorporation: 5.07801e-5 ha; = p1090
- CUTOFF fertilizer storage: 0.0314687 kg*a; = p1160
- CUTOFF pesticide formulation balance; at point-of-sale: 0.000203099 kg; = p1963
- CUTOFF apply K fertilizer; broadcast with incorporation: 7.39466e-5 ha; = p1140
- CUTOFF prepare soil; for conventional till, soybeans; <15% residue: 4.26728e-5 ha; = p0934
- CUTOFF apply single or mixed K fertilizer; unspec. method: 1.99888e-9 ha; = p1144
- CUTOFF planting; for conventional till, soybeans; <15% residue: 4.26728e-5 ha; = p0952
- CUTOFF pesticide, 2,4-D; at point-of-sale; kg AI: 1.91704e-5 kg; = p1754
- CUTOFF international vessel transport; average fuel: 0.182204 metric ton*km; = p2006
- soybean residue; at harvest in 2006; at farm; 88%-94% moisture: 0.787758 kg; = p0839
- CUTOFF nitrogenous fertilizer, nitrogen solutions; at point-of-sale: 0.00199803 kg; = p1068
- CUTOFF gypsum; at point-of-sale: 1.85142e-6 kg; = p1166
- CUTOFF planting; for mulch till, soybeans: 9.07287e-5 ha; = p0953
- CUTOFF pesticide, Metribuzin; at point-of-sale; kg AI: 2.07871e-6 kg; = p1890
- CUTOFF apply pesticide; unspecified application methods: 5.12979e-5 ha; = p1345
- CUTOFF apply pesticide; broadcast without incorporation: 2.72485e-5 ha; = p1335

## Inputs from nature
- Potassium; from plant uptake; biogenic: 0.0289793 kg; = p0915
- Carbon dioxide: 4.19212 kg; = p0900*3.6666666667
- Water, unspecified origin: 0.0012574 m3; = p0916*0.001+p0893*0.001
- Transformation, from annual crop [natural resource, land]: 3.40008 m2; = 1.0 * (p0879+p0883+p0873+p0871+p0877)
- Nitrogen: 0.0983707 kg; = p0905
- Occupation, annual crop [natural resource, land]: 1.32852 m2*year; = 1.0 * (p0855)
- Phosphorus: 0.0105884 kg; = p0910
- Transformation, to annual crop [natural resource, land]: 3.40008 m2; = 1.0 * (p0857)
- Dry matter except CNPK; from plant uptake: 1.32164 kg; = p0917

## Emissions to nature
- Volatile constituents; broadcast w/ incorp. in man. in spr.bef.plant.: 0.00263011 kg; = p3391
- Nitrogen solution; broadcast w/ incorp. in fert. at plant.; broadcast w/ incorp. in fert. at plant.; kg N: 5.23849e-5 kg; = p2717
- Phosphorous; applied in sewage sludge: 5.71821e-10 kg; = p3241
- Other single phosphates; broadcast w/o incorp. in fert. in spr. bef. plant.; kg P: 7.01029e-6 kg; = p2895
- Potassium; broadcast w/o incorp. in manure in fall before planting; biogenic: 0.00209355 kg; = p3403
- Ammonium nitrate; broadcast w/ incorp. in fert. at plant.: 2.63376e-5 kg; = p2710*4.7142857143
- Ethene [air, non-urban air or from high stacks]: 1.06332e-5 kg; = 1.0 * (p2125*1.1666666667)
- Pentane [air, non-urban air or from high stacks]: 1.54606e-7 kg; = 1.0 * (p2152*1.0166666667)
- Potassium; broadcast w/ incorp. in manure in fall before planting; biogenic: 0.00127773 kg; = p3384
- Glyphosate diammonium salt; broadcast with incorporation: 1.93443e-5 kg; = p3999
- Pesticide formulation balance; unspec. appl. method: 1.39062e-5 kg; = p5338
- Ammonium sulfate; unspec. appl. method in fert. in spr. bef. plant.: 1.01997e-6 kg; = p3064*4.7142857143
- Other limestone constituents; applied in limestone: 0.00334018 kg; = p3220
- Other single phosphates; broadcast w/ incorp. in fert. at plant.; kg P: 1.80036e-6 kg; = p2739
- Acetol; from residue burning: 2.75164e-5 kg; = p2134*2.0555555556
- Potassium; broadcast w/o incorp. in manure in spring before planting; biogenic: 0.00114018 kg; = p3409
- Sulfur [soil, agricultural]: 2.62438e-7 kg; = 1.0 * (p3230)
- Potassium; using unspec. method in manure in fall before planting; biogenic: 0.000557172 kg; = p3460
- Potassium chloride; no broadcast in fert. at plant.: 0.000161647 kg; = p2546*2.2166666667
- Carbon [soil, agricultural]: 0.486078 kg; = 1.0 * (p3381+p3387+p3225+p2173+p2167+p3406+p3457+p3463+p3400+p3217+p3242)
- Phosphorous; broadcast w/o incorp. in manure in fall before planting: 0.000506321 kg; = p3402
- Superphosphate, grades<= 22%; no broadcast in fert. at plant.; kg P: 3.12645e-8 kg; = p2540
- Nitrogen; in above-ground residue left on field: 0.0185038 kg; = p2168
- Other single phosphates; broadcast w/ incorp. in fert. in spr. bef. plant.; kg P: 8.07349e-6 kg; = p2700
- Sodium nitrate; broadcast w/o incorp. in fert. in spr. bef. plant.: 9.45769e-7 kg; = p2876*6.0714285714
- Ammonium sulfate; broadcast w/ incorp. in fert. at plant.: 2.08913e-5 kg; = p2713*4.7142857143
- Anhydrous ammonia; unspec. appl. method in fert. at plant.: 8.76825e-7 kg; = p3096*1.2142857143
- Other single K nutrients; no broadcast in fert. in fall bef. plant.; kg K: 6.42438e-5 kg; = p2470
- Nitrogen solution; broadcast w/o incorp. in fert. at plant.; broadcast w/o incorp. in fert. at plant.; kg N: 4.66416e-5 kg; = p2912
- Other single K nutrients; no broadcast in fert. in spr. bef. plant.; kg K: 0.000171899 kg; = p2509
- Butane [air, non-urban air or from high stacks]: 4.43988e-7 kg; = 1.0 * (p2147*1.0208333333)
- Monoammonium phosphate; broadcast w/o incorp. in fert. in spr. bef. plant.: 0.000642408 kg; = p2888*8.2142857143
- Clethodim [soil, agricultural]: 1.61678e-6 kg; = 1.0 * (p4144+p3938+p4556+p5174)
- Cloransulam-methyl [soil, agricultural]: 2.30968e-7 kg; = 1.0 * (p4148+p5178+p4560+p3942)
- Ammonium nitrate; broadcast w/o incorp. in fert. in spr. bef. plant.: 8.60208e-5 kg; = p2866*4.7142857143
- Dioxins and furans (PCDD/F); from residue burning: 2.1924e-13 kg TEQ; = p2047
- Volatile constituents; broadcast w/o incorp. in man. in fal.bef.plant: 0.00791276 kg; = p3404
- Nitrogen; applied in sewage sludge: 4.79006e-9 kg; = p3240
- Volatile constituents; broadcast w/ incorp. in man. in fal.bef.plant: 0.00482929 kg; = p3385
- Pendimethalin [soil, agricultural]: 3.44143e-5 kg; = 1.0 * (p4252+p4046+p5282+p4664)
- Sulfuric acid [soil, agricultural]: 1.4076e-7 kg; = 1.0 * (p3231)
- Superphosphate, grades<= 22%; no broadcast in fert. in spr. bef. plant.; kg P: 1.40202e-7 kg; = p2501
- Potassium; broadcast w/ incorp. in manure in spring before planting; biogenic: 0.000695872 kg; = p3390
- Urea; broadcast w/o incorp. in fert. at plant.: 8.07061e-5 kg; = p2919*5
- Anhydrous ammonia; no broadcast in fert. at plant.: 3.60645e-5 kg; = p2511*1.2142857143
- Nitrogen; broadcast w/ incorp. in manure in fall before planting: 0.000715488 kg; = p3382
- Nonvolatile constituents;broadcast w/o incorp. in man. in fal.bef.plant; exc.CNPK,biogenic: 0.000374438 kg; = p3405
- Phosphorous; in above-ground residue left on field: 0.00213619 kg; = p2169
- Superphosphate, grades<= 22%; no broadcast in fert. in fall bef. plant.; kg P: 8.67836e-8 kg; = p2462
- Other single phosphates; no broadcast in fert. in spr. bef. plant.; kg P: 4.00067e-6 kg; = p2505
- Potassium chloride; broadcast w/ incorp. in fert. in fall bef. plant.: 0.00280199 kg; = p2663*2.2166666667
- Other single phosphates; no broadcast in fert. at plant.; kg P: 8.92135e-7 kg; = p2544
- Formaldehyde [air, non-urban air or from high stacks]: 1.51924e-5 kg; = 1.0 * (p2128*2.5)
- Aqueous ammonia; broadcast w/o incorp. in fert. at plant.: 1.6697e-6 kg; = p2903*1.2142857143
- Methanol [air, non-urban air or from high stacks]: 2.40182e-5 kg; = 1.0 * (p2129*2.6666666667)
- Monoammonium phosphate; broadcast w/ incorp. in fert. in fall bef. plant.: 0.000457952 kg; = p2654*8.2142857143
- Phosphorous; broadcast w/ incorp. in manure in fall before planting: 0.000309016 kg; = p3383
- Nitrogen solution; broadcast w/o incorp. in fert. in spr. bef. plant.; broadcast w/o incorp. in fert. in spr. bef. pl...: 0.000171094 kg; = p2873
- Potassium; using unspec. method in manure in spring before planting; biogenic: 0.000303445 kg; = p3466
- Superphosphate, grades>22%; broadcast w/ incorp. in fert. in spr. bef. plant.; kg P: 1.32094e-5 kg; = p2698
- Gypsum: 1.85142e-6 kg; = p3229
- Methyl vinyl ether; from residue burning: 5.54285e-7 kg; = p2137*1.6111111111
- Ammonium sulfate; broadcast w/o incorp. in fert. in spr. bef. plant.: 6.82327e-5 kg; = p2869*4.7142857143
- Sodium nitrate; broadcast w/o incorp. in fert. at plant.: 2.57825e-7 kg; = p2915*6.0714285714
- Superphosphate, grades<= 22%; broadcast w/o incorp. in fert. at plant.; kg P: 5.47841e-8 kg; = p2930
- Other single K nutrients; unspec. appl. method in fert. at plant.; kg K: 8.64032e-10 kg; = p3133
- Superphosphate, grades>22%; broadcast w/o incorp. in fert. at plant.; kg P: 2.55773e-6 kg; = p2932
- Glyphosate diammonium salt; unspec. appl. method: 1.92936e-6 kg; = p5235
- Nonvolatile constituents;broadcast w/o incorp. in man. in spr.bef.plant; exc.CNPK,biogenic: 0.000203925 kg; = p3411
- Aqueous ammonia; unspec. appl. method in fert. at plant.: 2.49593e-8 kg; = p3098*1.2142857143
- Ammonium sulfate; no broadcast in fert. at plant.: 1.14365e-5 kg; = p2518*4.7142857143
- Other single K nutrients; broadcast w/o incorp. in fert. in fall bef. plant.; kg K: 0.000257077 kg; = p2860
- Diammonium phosphate; broadcast w/ incorp. in fert. at plant.: 0.000222679 kg; = p2728*4.7142857143
- Other single K nutrients; no broadcast in fert. at plant.; kg K: 1.08842e-5 kg; = p2548
- Aqueous ammonia; unspec. appl. method in fert. in spr. bef. plant.: 9.15572e-8 kg; = p3059*1.2142857143
- Other single K nutrients; unspec. appl. method in fert. in fall bef. plant.; kg K: 5.09993e-9 kg; = p3055
- Diammonium phosphate; broadcast w/o incorp. in fert. in spr. bef. plant.: 0.000867074 kg; = p2884*4.7142857143
- Other single K nutrients; broadcast w/o incorp. in fert. at plant.; kg K: 4.35541e-5 kg; = p2938
- Superphosphate, grades>22%; broadcast w/ incorp. in fert. in fall bef. plant.; kg P: 8.17648e-6 kg; = p2659
- Pesticide formulation balance; foliar or directed spray: 4.23786e-5 kg; = p4720
- Nitrogen solution; no broadcast in fert. in spr. bef. plant.; no broadcast in fert. in spr. bef. plant.; kg N: 0.000105195 kg; = p2483
- Ammonia [air, non-urban air or from high stacks]: 1.5859e-5 kg; = 1.0 * (p2159*1.2142857143)
- Anhydrous ammonia; no broadcast in fert. in spr. bef. plant.: 0.000132294 kg; = p2472*1.2142857143
- Superphosphate, grades<= 22%; broadcast w/o incorp. in fert. in spr. bef. plant.; kg P: 2.45673e-7 kg; = p2891
- Propene [air, non-urban air or from high stacks]: 4.94039e-6 kg; = 1.0 * (p2136*1.1666666667)
- Other single phosphates; no broadcast in fert. in fall bef. plant.; kg P: 2.47638e-6 kg; = p2466
- Plant dry matter; from residue burning: 0.00261695 kg; = p2164
- Nonvolatile constituents; broadcast w/incorp. in man. in fal.bef.plant; exc.CNPK,biogenic: 0.000228526 kg; = p3386
- Nitrogen; broadcast w/o incorp. in manure in fall before planting: 0.00117232 kg; = p3401
- Magnesium [soil, agricultural]: 0.00158447 kg; = 1.0 * (p3227)
- Nitrogen; using unspec. method in manure in fall before planting: 0.000311999 kg; = p3458
- Superphosphate, grades<= 22%; broadcast w/ incorp. in fert. at plant.; kg P: 6.30927e-8 kg; = p2735
- Ethyne [air, non-urban air or from high stacks]: 1.98927e-6 kg; = 1.0 * (p2132*1.0833333333)
- Monoammonium phosphate; no broadcast in fert. in fall bef. plant.: 0.00022693 kg; = p2459*8.2142857143
- trans-2-Butene: 4.16137e-7 kg; = p2148*1.1666666667
- Phosphorous; using unspec. method in manure in fall before planting: 0.000134751 kg; = p3459
- Nitrogen; broadcast w/ incorp. in manure in spring before planting: 0.000389667 kg; = p3388
- Diammonium phosphate; broadcast w/o incorp. in fert. in fall bef. plant.: 0.000536711 kg; = p2845*4.7142857143
- Nonvolatile constituents; broadcast w/incorp. in man. in spr.bef.plant; exc.CNPK,biogenic: 0.000124459 kg; = p3392
- Urea; no broadcast in fert. at plant.: 4.96212e-5 kg; = p2529*5
- Other single K nutrients; broadcast w/ incorp. in fert. at plant.; kg K: 3.1964e-5 kg; = p2743
- Other single phosphates; broadcast w/o incorp. in fert. in fall bef. plant.; kg P: 4.3393e-6 kg; = p2856
- Potassium chloride; no broadcast in fert. in spr. bef. plant.: 0.00255297 kg; = p2507*2.2166666667
- Plant dry matter; in below-ground residue: 0.1375 kg; = p2177
- Diammonium phosphate; no broadcast in fert. in fall bef. plant.: 0.000306293 kg; = p2455*4.7142857143
- Diammonium phosphate; broadcast w/o incorp. in fert. at plant.: 0.000193354 kg; = p2923*4.7142857143
- Furan [air, non-urban air or from high stacks]: 7.99423e-7 kg; = 1.0 * (p2138*1.4166666667)
- Aqueous ammonia; broadcast w/ incorp. in fert. at plant.: 1.8753e-6 kg; = p2708*1.2142857143
- Nitrogen; in below-ground residue: 0.00700667 kg; = p2174
- Aqueous ammonia; broadcast w/o incorp. in fert. in spr. bef. plant.: 6.12489e-6 kg; = p2864*1.2142857143
- Ammonium nitrate; no broadcast in fert. in spr. bef. plant.: 5.28889e-5 kg; = p2476*4.7142857143
- Superphosphate, grades>22%; broadcast w/o incorp. in fert. in spr. bef. plant.; kg P: 1.14698e-5 kg; = p2893
- Calcium [soil, agricultural]: 0.0237557 kg; = 1.0 * (p3218+p3226)
- Seeds; used in planting and sowing: 0.0272517 kg; = p2179
- Glyphosate [soil, agricultural]: 0.00033883 kg; = 1.0 * (p5234+p4616+p3998+p4204)
- Acetone [air, non-urban air or from high stacks]: 3.26126e-6 kg; = 1.0 * (p2139*1.6111111111)
- Potassium chloride; no broadcast in fert. in fall bef. plant.: 0.00095412 kg; = p2468*2.2166666667
- Oxygen; applied in limestone: 0.0250954 kg; = p3219
- Superphosphate, grades>22%; no broadcast in fert. in spr. bef. plant.; kg P: 6.54567e-6 kg; = p2503
- Urea; broadcast w/ incorp. in fert. in spr. bef. plant.: 0.000332507 kg; = p2685*5
- Ammonium sulfate; no broadcast in fert. in spr. bef. plant.: 4.19521e-5 kg; = p2479*4.7142857143
- Potassium chloride; broadcast w/o incorp. in fert. in spr. bef. plant.: 0.0102159 kg; = p2897*2.2166666667
- Volatile constituents; using unspec. method in man. in spr.bef.plant.: 0.0011469 kg; = p3467
- Phosphorous; in below-ground residue: 0.00080889 kg; = p2175
- Propane [air, non-urban air or from high stacks]: 2.05822e-6 kg; = 1.0 * (p2142*1.2222222222)
- cis-2-Butene: 3.13928e-7 kg; = p2149*1.1666666667
- Anhydrous ammonia; broadcast w/ incorp. in fert. at plant.: 6.58798e-5 kg; = p2706*1.2142857143
- Acetonitrile [air, non-urban air or from high stacks]: 1.5341e-6 kg; = 1.0 * (p2155*1.7083333333)
- Propanenitrile: 4.68273e-7 kg; = p2157*1.5277777778
- Superphosphate, grades>22%; no broadcast in fert. in fall bef. plant.; kg P: 4.05171e-6 kg; = p2464
- Glyphosate diammonium salt; broadcast without incorporation: 1.02484e-6 kg; = p4205
- Potassium chloride; unspec. appl. method in fert. in spr. bef. plant.: 2.02665e-7 kg; = p3092*2.2166666667
- Toluene [air, non-urban air or from high stacks]: 1.39196e-6 kg; = 1.0 * (p2141*1.0952380952)
- Other single phosphates; broadcast w/ incorp. in fert. in fall bef. plant.; kg P: 4.99741e-6 kg; = p2661
- Other single K nutrients; broadcast w/o incorp. in fert. in spr. bef. plant.; kg K: 0.00068787 kg; = p2899
- Nitrogen solution; no broadcast in fert. at plant.; no broadcast in fert. at plant.; kg N: 2.8677e-5 kg; = p2522
- Phosphorous; using unspec. method in manure in spring before planting: 7.33876e-5 kg; = p3465
- isobutene: 8.54175e-7 kg; = p2150*1.1666666667
- S-Metolachlor: 1.10865e-5 kg; = p4276+p4070+p5306+p4688
- Pesticide formulation balance; broadcast without incorporation: 7.38671e-6 kg; = p4308
- Carbon dioxide, in air: 0.00947618 kg; = p2163*3.6666666667
- 2,4-D [soil, agricultural]: 1.91704e-5 kg; = 1.0 * (p4515+p3897+p4103+p5133)
- Other single K nutrients; broadcast w/ incorp. in fert. in spr. bef. plant.; kg K: 0.000504822 kg; = p2704
- Carbon monoxide, fossil [air, non-urban air or from high stacks]: 0.000503422 kg; = 1.0 * (p2028*2.3333333333)
- Sewage sludge dry matter; applied in sewage sludge: 5.30307e-10 kg; = p3243
- Nitrogen solution; broadcast w/ incorp. in fert. in spr. bef. plant.; broadcast w/ incorp. in fert. in spr. bef. plan...: 0.000192162 kg; = p2678
- Potassium chloride; broadcast w/ incorp. in fert. in spr. bef. plant.: 0.00749739 kg; = p2702*2.2166666667
- Ash: 0.00144552 kg; = p2021+p2022
- Superphosphate, grades<= 22%; broadcast w/ incorp. in fert. in fall bef. plant.; kg P: 1.75132e-7 kg; = p2657
- Superphosphate, grades>22%; broadcast w/o incorp. in fert. in fall bef. plant.; kg P: 7.09972e-6 kg; = p2854
- Ammonium sulfate; unspec. appl. method in fert. at plant.: 2.78052e-7 kg; = p3103*4.7142857143
- Nitrogen; broadcast w/o incorp. in manure in spring before planting: 0.000638466 kg; = p3407
- NMVOC, non-methane volatile organic compounds, unspecified origin [air, non-urban air or from high stacks]: 0.000187773 kg; = 1.0 * (p2051+p2052)
- Diammonium phosphate; no broadcast in fert. at plant.: 0.000110345 kg; = p2533*4.7142857143
- Ammonium nitrate; broadcast w/o incorp. in fert. at plant.: 2.345e-5 kg; = p2905*4.7142857143
- Phosphorous; broadcast w/o incorp. in manure in spring before planting: 0.000275751 kg; = p3408
- Sodium nitrate; unspec. appl. method in fert. at plant.: 3.85406e-9 kg; = p3110*6.0714285714
- Diammonium phosphate; broadcast w/ incorp. in fert. in spr. bef. plant.: 0.000998577 kg; = p2689*4.7142857143
- Diammonium phosphate; broadcast w/ incorp. in fert. in fall bef. plant.: 0.000618109 kg; = p2650*4.7142857143
- Phenol [air, non-urban air or from high stacks]: 3.79045e-6 kg; = 1.0 * (p2133*1.3055555556)
- Sodium nitrate; broadcast w/ incorp. in fert. in spr. bef. plant.: 1.06223e-6 kg; = p2681*6.0714285714
- Acrylonitrile: 2.44962e-7 kg; = p2156*1.4722222222
- Monoammonium phosphate; broadcast w/o incorp. in fert. at plant.: 0.000143254 kg; = p2927*8.2142857143
- Sodium nitrate; broadcast w/ incorp. in fert. at plant.: 2.89573e-7 kg; = p2720*6.0714285714
- Ammonium nitrate; unspec. appl. method in fert. in spr. bef. plant.: 1.28587e-6 kg; = p3061*4.7142857143
- Nitrogen solution; unspec. appl. method in fert. in spr. bef. plant.; unspec. appl. method in fert. in spr. bef. plan...: 2.55757e-6 kg; = p3068
- Ethane [air, non-urban air or from high stacks]: 6.64092e-6 kg; = 1.0 * (p2126*1.25)
- Superphosphate, grades>22%; broadcast w/ incorp. in fert. at plant.; kg P: 2.94564e-6 kg; = p2737
- Monoammonium phosphate; no broadcast in fert. in spr. bef. plant.: 0.000366613 kg; = p2498*8.2142857143
- Volatile constituents; broadcast w/o incorp. in man. in spr.bef.plant.: 0.00430942 kg; = p3410
- Potassium chloride; broadcast w/o incorp. in fert. at plant.: 0.000646847 kg; = p2936*2.2166666667
- Monoammonium phosphate; no broadcast in fert. at plant.: 8.17533e-5 kg; = p2537*8.2142857143
- I butane; from residue burning: 1.54163e-7 kg; = p2146*1.0208333333
- Particulates, < 2.5 um [air, non-urban air or from high stacks]: 4.52364e-5 kg; = 1.0 * (p2033+p2035)
- Anhydrous ammonia; unspec. appl. method in fert. in spr. bef. plant.: 3.21643e-6 kg; = p3057*1.2142857143
- Potassium chloride; unspec. appl. method in fert. in fall bef. plant.: 7.57418e-8 kg; = p3053*2.2166666667
- Potassium chloride; broadcast w/o incorp. in fert. in fall bef. plant.: 0.00381799 kg; = p2858*2.2166666667
- Benzene [air, non-urban air or from high stacks]: 1.12138e-6 kg; = 1.0 * (p2140*1.0833333333)
- Anhydrous ammonia; broadcast w/o incorp. in fert. in spr. bef. plant.: 0.000215169 kg; = p2862*1.2142857143
- Volatile constituents; using unspec. method in man. in fal.bef.plant: 0.00210588 kg; = p3461
- Filler materials, applied with synthetic fertilizer: 0.0125768 kg; = p2432
- Potassium chloride; broadcast w/ incorp. in fert. at plant.: 0.000474715 kg; = p2741*2.2166666667
- Plant dry matter; in aboveground residue left on field: 0.363121 kg; = p2172
- Other single phosphates; broadcast w/o incorp. in fert. at plant.; kg P: 1.56327e-6 kg; = p2934
- Metribuzin [soil, agricultural]: 2.07871e-6 kg; = 1.0 * (p4033+p4651+p5269+p4239)
- Superphosphate, grades<= 22%; broadcast w/ incorp. in fert. in spr. bef. plant.; kg P: 2.82932e-7 kg; = p2696
- Sodium nitrate; no broadcast in fert. in spr. bef. plant.: 5.81495e-7 kg; = p2486*6.0714285714
- Particulates, < 10 um: 6.48218e-5 kg; = p2036+p2034
- Urea; broadcast w/o incorp. in fert. in spr. bef. plant.: 0.000296051 kg; = p2880*5
- Nitrogen; using unspec. method in manure in spring before planting: 0.00016992 kg; = p3464
- Dinitrogen monoxide [air, non-urban air or from high stacks]: 5.11655e-7 kg; = 1.0 * (p2044*1.5714285714)
- Urea; unspec. appl. method in fert. at plant.: 1.20643e-6 kg; = p3114*5
- Oxygen; applied in dolomite: 0.00627035 kg; = p3228
- Formic acid [air, non-urban air or from high stacks]: 7.32276e-6 kg; = 1.0 * (p2131*3.8333333333)
- Pesticides, unspecified [soil, agricultural]: 6.26936e-5 kg; = 1.0 * (p4307+p5337+p4101+p4719)
- Urea; broadcast w/ incorp. in fert. at plant.: 9.06441e-5 kg; = p2724*5
- Methane: 2.29797e-5 kg; = p2025*1.3333333333
- Water: 2.03263 kg; = p2171+p3399+p3418+p3475+p2181+p2178
- Potassium; in below-ground residue; biogenic: 0.00269353 kg; = p2176
- Acetic acid [air, non-urban air or from high stacks]: 4.08871e-5 kg; = 1.0 * (p2127*2.5)
- Water [air, non-urban air or from high stacks]: 8.44609e-7 m3; = 0.001 * (p2016)
- Ammonium nitrate; unspec. appl. method in fert. at plant.: 3.50539e-7 kg; = p3100*4.7142857143
- Imazamox [soil, agricultural]: 4.61936e-7 kg; = 1.0 * (p5240+p4210+p4622+p4004)
- Pesticide formulation balance; broadcast with incorporation: 0.000139427 kg; = p4102
- Superphosphate, grades>22%; no broadcast in fert. at plant.; kg P: 1.45966e-6 kg; = p2542
- Sodium nitrate; unspec. appl. method in fert. in spr. bef. plant.: 1.41377e-8 kg; = p3071*6.0714285714
- Monoammonium phosphate; broadcast w/ incorp. in fert. in spr. bef. plant.: 0.000739836 kg; = p2693*8.2142857143
- Aqueous ammonia; broadcast w/ incorp. in fert. in spr. bef. plant.: 6.8791e-6 kg; = p2669*1.2142857143
- Anhydrous ammonia; broadcast w/ incorp. in fert. in spr. bef. plant.: 0.000241664 kg; = p2667*1.2142857143
- Acetaldehyde [air, non-urban air or from high stacks]: 9.08925e-6 kg; = 1.0 * (p2130*1.8333333333)
- Superphosphate, grades<= 22%; broadcast w/o incorp. in fert. in fall bef. plant.; kg P: 1.52069e-7 kg; = p2852
- Chlorimuron-ethyl [soil, agricultural]: 2.30968e-7 kg; = 1.0 * (p3934+p4552+p4140+p5170)
- Ammonium nitrate; no broadcast in fert. at plant.: 1.4418e-5 kg; = p2515*4.7142857143
- Potassium chloride; unspec. appl. method in fert. at plant.: 1.28322e-8 kg; = p3131*2.2166666667
- Glycolaldehyde; from residue burning: 1.47236e-5 kg; = p2135*2.5
- Nitrogen solution; unspec. appl. method in fert. at plant.; unspec. appl. method in fert. at plant.; kg N: 6.97216e-7 kg; = p3107
- Imazethapyr [soil, agricultural]: 1.61678e-6 kg; = 1.0 * (p4213+p4625+p5243+p4007)
- Other single K nutrients; broadcast w/ incorp. in fert. in fall bef. plant.; kg K: 0.000188667 kg; = p2665
- Aqueous ammonia; no broadcast in fert. at plant.: 1.02659e-6 kg; = p2513*1.2142857143
- Diammonium phosphate; no broadcast in fert. in spr. bef. plant.: 0.000494827 kg; = p2494*4.7142857143
- Anhydrous ammonia; broadcast w/o incorp. in fert. at plant.: 5.86569e-5 kg; = p2901*1.2142857143
- Isoprene [air, non-urban air or from high stacks]: 2.75756e-6 kg; = 1.0 * (p2145*1.1333333333)
- Other single K nutrients; unspec. appl. method in fert. in spr. bef. plant.; kg K: 1.3646e-8 kg; = p3094
- Monoammonium phosphate; broadcast w/o incorp. in fert. in fall bef. plant.: 0.000397644 kg; = p2849*8.2142857143
- Aqueous ammonia; no broadcast in fert. in spr. bef. plant.: 3.76582e-6 kg; = p2474*1.2142857143
- Butadiene [air, non-urban air or from high stacks]: 1.10264e-6 kg; = 1.0 * (p2143*1.125)
- Ammonium nitrate; broadcast w/ incorp. in fert. in spr. bef. plant.: 9.66132e-5 kg; = p2671*4.7142857143
- Glyphosate diammonium salt; foliar or directed spray: 5.87965e-6 kg; = p4617
- Ammonium sulfate; broadcast w/ incorp. in fert. in spr. bef. plant.: 7.66348e-5 kg; = p2674*4.7142857143
- Sulfur dioxide [air, non-urban air or from high stacks]: 1.14005e-5 kg; = 1.0 * (p2041)
- 1-Butene: 9.78286e-7 kg; = p2144*1.1666666667
- isopentane: 1.23685e-7 kg; = p2151*1.0166666667
- Phosphorous; broadcast w/ incorp. in manure in spring before planting: 0.000168295 kg; = p3389
- Monoammonium phosphate; broadcast w/ incorp. in fert. at plant.: 0.000164981 kg; = p2732*8.2142857143
- Urea; unspec. appl. method in fert. in spr. bef. plant.: 4.42549e-6 kg; = p3075*5
- Zinc compounds: 7.89771e-8 kg; = p3232
- Ammonium sulfate; broadcast w/o incorp. in fert. at plant.: 1.86008e-5 kg; = p2908*4.7142857143
- Sodium nitrate; no broadcast in fert. at plant.: 1.58521e-7 kg; = p2525*6.0714285714
- Nitrogen dioxide: 2.31015e-5 kg; = p2039*3.2857142857
- Urea; no broadcast in fert. in spr. bef. plant.: 0.000182024 kg; = p2490*5
- Hydrocyanic acid: 2.08483e-6 kg; = p2154*2.25
- Potassium; in above-ground residue left on field; biogenic: 0.0071133 kg; = p2170
- cyclopentane: 1.20878e-8 kg; = p2153*1.0166666667

## Sampling procedure
A delete-a-group jackknife is used by the USDA to estimate the ARMS sample means and RSEs, based on a 15 sample delete-a-group jackknife. Because of this relatively small sample size, a Students t distribution is used to represent ARMS data probability density functions. Other representations of uncertainty are described in Cooper, J.S., Kahn, E., Noon, M. (2012). LCA Digital Commons Unit Process Data: field crop production Version 1. Prepared for the US Department of Agriculture National Agricultural Library. Retrieved from https://www.lcacommons.gov/discovery/docs/LCA%20Digital%20Commons%20Unit%20Process%20Data%20final%20updated.pdf

## Extrapolations
Data represent an aggregation of processes applied in Wisconsin in 2006. Data development is demonstrated by parameterization (exlicitly presents all raw and uncertainty data and all calculations). Flow data quality according to the LCADC convention is provided for all flows.
