# soybeans; at harvest in 1998; at farm; 85%-92% moisture

Dataset: EcoSpold 2, unit process
Geography: GLO
Time period: 1998-01-02 to 1999-01-01
Scenario: Business-as-Usual
System model: Allocation, ecoinvent default
Generated by: cooperjs@u.washington.edu
isCopyrightProtected: false

## General comment
This unit process/ gate-to-gate dataset represents the production of 1 kg soybeans coproduced with residue. The process technologies are an aggregation of those applied in Nebraska in 1998. Applicable classifications include ISIC 0111, NAIC 111110, UNSPSC 50407053; this dataset was prepared in ILCD format using the UWDFE Lab Excel to ILCD File Generator (beta version, August 2013)

Exchange "Metribuzin-soil agricultural" is the result of combining the following original LCA Commons flows: "Metribuzin; banded or side-dressed; kg AI", "Metribuzin; unspec. appl. method; kg AI", "Metribuzin; foliar or directed spray; kg AI", "Metribuzin; broadcast without incorporation; kg AI", "Metribuzin; broadcast with incorporation; kg AI".
Exchange "NMVOC, non-methane volatile organic compounds, unspecified origin-air low population density" is the result of combining the following original LCA Commons flows: "NMVOCs; from residue burning; kg except C, biogenic", "NMVOCs; from residue burning; kg C, biogenic".
Exchange "Glyphosate-soil agricultural" is the result of combining the following original LCA Commons flows: "Glyphosate; banded or side-dressed; kg AI", "Glyphosate; broadcast without incorporation; kg AI", "Glyphosate; foliar or directed spray; kg AI", "Glyphosate; unspec. appl. method; kg AI", "Glyphosate; broadcast with incorporation; kg AI".
Exchange "Imazethapyr-soil agricultural" is the result of combining the following original LCA Commons flows: "Imazethapyr; banded or side-dressed; kg AI", "Imazethapyr; foliar or directed spray; kg AI", "Imazethapyr; unspec. appl. method; kg AI", "Imazethapyr; broadcast without incorporation; kg AI", "Imazethapyr; broadcast with incorporation; kg AI".
Exchange "Carbon-soil agricultural" is the result of combining the following original LCA Commons flows: "Carbon; applied in limestone", "Carbon; in above-ground residue left on field; biogenic", "Carbon; using unspec. method in manure at an unknown time", "Carbon; applied in sewage sludge", "Carbon; applied in dolomite", "Carbon; broadcast w/o incorp. in manure at an unknown time", "Carbon; broadcast w/ incorp. in manure at an unknown time", "Carbon; in below-ground residue; biogenic".
Exchange "Particulates, < 2.5 um-air low population density" is the result of combining the following original LCA Commons flows: "PM2.5; from residue burning; kg C, biogenic", "PM2.5; from residue burning; kg except C, biogenic".
Exchange "Clomazone-soil agricultural" is the result of combining the following original LCA Commons flows: "Clomazone; unspec. appl. method; kg AI", "Clomazone; broadcast without incorporation; kg AI", "Clomazone; broadcast with incorporation; kg AI", "Clomazone; foliar or directed spray; kg AI", "Clomazone; banded or side-dressed; kg AI".
Exchange "Pesticides, unspecified-soil agricultural" is the result of combining the following original LCA Commons flows: "Unspecified pesticide; unspec. appl. method; kg AI", "Unspecified pesticide; broadcast without incorporation; kg AI", "Unspecified pesticide; broadcast with incorporation; kg AI", "Unspecified pesticide; foliar or directed spray; kg AI", "Unspecified pesticide; banded or side-dressed; kg AI".
Exchange "Sulfentrazone-soil agricultural" is the result of combining the following original LCA Commons flows: "Sulfentrazone; foliar or directed spray; kg AI", "Sulfentrazone; broadcast without incorporation; kg AI", "Sulfentrazone; unspec. appl. method; kg AI", "Sulfentrazone; broadcast with incorporation; kg AI", "Sulfentrazone; banded or side-dressed; kg AI".
Exchange "Ash-soil agricultural" is the result of combining the following original LCA Commons flows: "Ash; from residue burning; kg except C, biogenic", "Ash; from residue burning; kg C, biogenic".
Exchange "Trifluralin-soil agricultural" is the result of combining the following original LCA Commons flows: "Trifluralin; broadcast without incorporation; kg AI", "Trifluralin; banded or side-dressed; kg AI", "Trifluralin; unspec. appl. method; kg AI", "Trifluralin; foliar or directed spray; kg AI", "Trifluralin; broadcast with incorporation; kg AI".
Exchange "Water-soil agricultural" is the result of combining the following original LCA Commons flows: "Water; broadcast w/o incorp. in manure", "Water; broadcast w/ incorp. in manure", "Water; using unspec. method in manure", "Water; from irrigation and applied with manure and sewage sludge", "Water; in above-ground residue left on field; biogenic", "Water; in below-ground residue; biogenic".
Exchange "Pendimethalin-soil agricultural" is the result of combining the following original LCA Commons flows: "Pendimethalin; unspec. appl. method; kg AI", "Pendimethalin; broadcast without incorporation; kg AI", "Pendimethalin; banded or side-dressed; kg AI", "Pendimethalin; broadcast with incorporation; kg AI", "Pendimethalin; foliar or directed spray; kg AI".
Exchange "Chlorimuron-ethyl-soil agricultural" is the result of combining the following original LCA Commons flows: "Chlorimuron-ethyl; broadcast with incorporation; kg AI", "Chlorimuron-ethyl; foliar or directed spray; kg AI", "Chlorimuron-ethyl; unspec. appl. method; kg AI", "Chlorimuron-ethyl; banded or side-dressed; kg AI", "Chlorimuron-ethyl; broadcast without incorporation; kg AI".
Exchange "Water, unspecified origin-resource in water" is the result of combining the following original LCA Commons flows: "Water; from plant uptake; biogenic", "Water; withdrawal from unspec. source, for soybeans, in 1998".
Exchange "Metolachlor-soil agricultural" is the result of combining the following original LCA Commons flows: "Propazine; unspec. appl. method; kg AI", "Propazine; broadcast with incorporation; kg AI", "Propazine; broadcast without incorporation; kg AI", "Propazine; foliar or directed spray; kg AI", "Propazine; banded or side-dressed; kg AI".
Exchange "Particulates, < 10 um-air low population density" is the result of combining the following original LCA Commons flows: "PM10; from residue burning; kg except C, biogenic", "PM10; from residue burning; kg C, biogenic".
Exchange "Flumetsulam-soil agricultural" is the result of combining the following original LCA Commons flows: "Flumetsulam; unspec. appl. method; kg AI", "Flumetsulam; broadcast without incorporation; kg AI", "Flumetsulam; banded or side-dressed; kg AI", "Flumetsulam; foliar or directed spray; kg AI", "Flumetsulam; broadcast with incorporation; kg AI".
Exchange "Transformation, from arable-resource land" is the result of combining the following original LCA Commons flows: "Transformation; from arable, from soy to soybeans", "Transformation; from arable, from unspec. use to soybeans", "Transformation; from arable, from corn to soybeans", "Transformation; from arable, from other to soybeans".
Exchange "Calcium-soil agricultural" is the result of combining the following original LCA Commons flows: "Calcium; applied in dolomite", "Calcium; applied in limestone".
Exchange "Imazamox-soil agricultural" is the result of combining the following original LCA Commons flows: "Imazamox; foliar or directed spray; kg AI", "Imazamox; unspec. appl. method; kg AI", "Imazamox; broadcast without incorporation; kg AI", "Imazamox; banded or side-dressed; kg AI", "Imazamox; broadcast with incorporation; kg AI".
Exchange "2,4-D-soil agricultural" is the result of combining the following original LCA Commons flows: "2,4-D; unspec. appl. method; kg AI", "2,4-D; foliar or directed spray; kg AI", "2,4-D; banded or side-dressed; kg AI", "2,4-D; broadcast with incorporation; kg AI", "2,4-D; broadcast without incorporation; kg AI".
Exchange "Alachlor-soil agricultural" is the result of combining the following original LCA Commons flows: "Alachlor; unspec. appl. method; kg AI", "Alachlor; banded or side-dressed; kg AI", "Alachlor; broadcast with incorporation; kg AI", "Alachlor; broadcast without incorporation; kg AI", "Alachlor; foliar or directed spray; kg AI".
Exchange "Quizalofop ethyl ester-soil agricultural" is the result of combining the following original LCA Commons flows: "Quizalofop, ethyl ; banded or side-dressed; kg AI", "Quizalofop, ethyl ; broadcast without incorporation; kg AI", "Quizalofop, ethyl ; broadcast with incorporation; kg AI", "Quizalofop, ethyl ; foliar or directed spray; kg AI", "Quizalofop, ethyl ; unspec. appl. method; kg AI".
Exchange "Pentane-2bdf9967-6dae-4183-88d1-8f612548c51e low population density" was originally named: "N pentane; from residue burning; kg C, biogenic" in this dataset.
Exchange "Propane-2bdf9967-6dae-4183-88d1-8f612548c51e low population density" was originally named: "Propane; from residue burning; kg C, biogenic" in this dataset.
Exchange "Water, ground-c19fb2d9-98eb-4cd3-8761-81b71d8a9a1b in water" was originally named: "Water; withdrawal from groundwater, for soybeans, in 1998" in this dataset.
Exchange "Acetone-2bdf9967-6dae-4183-88d1-8f612548c51e low population density" was originally named: "Acetone; from residue burning; kg C, biogenic" in this dataset.
Exchange "Ethane-2bdf9967-6dae-4183-88d1-8f612548c51e low population density" was originally named: "Ethane; from residue burning; kg C, biogenic" in this dataset.
Exchange "Ethene-2bdf9967-6dae-4183-88d1-8f612548c51e low population density" was originally named: "Ethylene; from residue burning; kg C, biogenic" in this dataset.
Exchange "Acetic acid-2bdf9967-6dae-4183-88d1-8f612548c51e low population density" was originally named: "Acetic acid; from residue burning; kg C, biogenic" in this dataset.
Exchange "Formic acid-2bdf9967-6dae-4183-88d1-8f612548c51e low population density" was originally named: "Formic acid; from residue burning; kg C, biogenic" in this dataset.
Exchange "Methane-2bdf9967-6dae-4183-88d1-8f612548c51e low population density" was originally named: "Methane; from residue burning; kg C, biogenic" in this dataset.
Exchange "Acetonitrile-2bdf9967-6dae-4183-88d1-8f612548c51e low population density" was originally named: "Acetonitrile; from residue burning; kg C, biogenic" in this dataset.
Exchange "Furan-2bdf9967-6dae-4183-88d1-8f612548c51e low population density" was originally named: "Furan; from residue burning; kg C, biogenic" in this dataset.
Exchange "Acetaldehyde-2bdf9967-6dae-4183-88d1-8f612548c51e low population density" was originally named: "Acetaldehyde; from residue burning; kg C, biogenic" in this dataset.
Exchange "Ammonia-2bdf9967-6dae-4183-88d1-8f612548c51e low population density" was originally named: "Ammonia; from residue burning; kg N, biogenic" in this dataset.
Exchange "Phenol-2bdf9967-6dae-4183-88d1-8f612548c51e low population density" was originally named: "Phenol; from residue burning; kg C, biogenic" in this dataset.
Exchange "Nitrogen dioxide-2bdf9967-6dae-4183-88d1-8f612548c51e low population density" was originally named: "Nitrogen dioxide; from residue burning; kg N, biogenic" in this dataset.
Exchange "Propene-2bdf9967-6dae-4183-88d1-8f612548c51e low population density" was originally named: "Propylene; from residue burning; kg C, biogenic" in this dataset.
Exchange "Formaldehyde-2bdf9967-6dae-4183-88d1-8f612548c51e low population density" was originally named: "Formaldehyde; from residue burning; kg C, biogenic" in this dataset.
Exchange "Butadiene-2bdf9967-6dae-4183-88d1-8f612548c51e low population density" was originally named: "1,3 butadiene; from residue burning; kg C, biogenic" in this dataset.
Exchange "trans-2-Butene-2bdf9967-6dae-4183-88d1-8f612548c51e low population density" was originally named: "Trans 2 butene; from residue burning; kg C, biogenic" in this dataset.
Exchange "isopentane-2bdf9967-6dae-4183-88d1-8f612548c51e low population density" was originally named: "I pentane; from residue burning; kg C, biogenic" in this dataset.
Exchange "Occupation, arable-c19fb2d9-98eb-4cd3-8761-81b71d8a9a1b land" was originally named: "Occupation; arable, as soybeans" in this dataset.
Exchange "Carbon dioxide-c19fb2d9-98eb-4cd3-8761-81b71d8a9a1b unspecified" was originally named: "Carbon dioxide; from plant uptake; kg C, biogenic" in this dataset.
Exchange "Zinc compounds-be1c0329-f1a8-4524-8420-a86d2a8dd358 agricultural" was originally named: "Zinc compounds; as secondary application" in this dataset.
Exchange "Butane-2bdf9967-6dae-4183-88d1-8f612548c51e low population density" was originally named: "N butane; from residue burning; kg C, biogenic" in this dataset.
Exchange "Sulfuric acid-be1c0329-f1a8-4524-8420-a86d2a8dd358 agricultural" was originally named: "Sulfuric acid; as secondary application" in this dataset.
Exchange "Sulfur-be1c0329-f1a8-4524-8420-a86d2a8dd358 agricultural" was originally named: "Sulfur; as secondary application" in this dataset.
Exchange "cis-2-Butene-2bdf9967-6dae-4183-88d1-8f612548c51e low population density" was originally named: "Cis 2 butene; from residue burning; kg C, biogenic" in this dataset.
Exchange "Sulfur dioxide-2bdf9967-6dae-4183-88d1-8f612548c51e low population density" was originally named: "Sulfur dioxide; from residue burning; biogenic" in this dataset.
Exchange "Hydrocyanic acid-2bdf9967-6dae-4183-88d1-8f612548c51e low population density" was originally named: "Hydrogen cyanide; from residue burning; kg C, biogenic" in this dataset.
Exchange "Acrylonitrile-2bdf9967-6dae-4183-88d1-8f612548c51e low population density" was originally named: "Propenenitrile; from residue burning; kg C, biogenic" in this dataset.
Exchange "Phosphorus-c19fb2d9-98eb-4cd3-8761-81b71d8a9a1b unspecified" was originally named: "Phosphorous; from plant uptake; biogenic" in this dataset.
Exchange "Benzene-2bdf9967-6dae-4183-88d1-8f612548c51e low population density" was originally named: "Benzene; from residue burning; kg C, biogenic" in this dataset.
Exchange "isobutene-2bdf9967-6dae-4183-88d1-8f612548c51e low population density" was originally named: "I butene; from residue burning; kg C, biogenic" in this dataset.
Exchange "Transformation, to arable-c19fb2d9-98eb-4cd3-8761-81b71d8a9a1b land" was originally named: "Transformation; to arable, to soybeans" in this dataset.
Exchange "Carbon monoxide, fossil-2bdf9967-6dae-4183-88d1-8f612548c51e low population density" was originally named: "Carbon monoxide; from residue burning; kg C, biogenic" in this dataset.
Exchange "Carbon dioxide, in air-2bdf9967-6dae-4183-88d1-8f612548c51e low population density" was originally named: "Carbon dioxide; from residue burning; kg C, biogenic" in this dataset.
Exchange "Isoprene-2bdf9967-6dae-4183-88d1-8f612548c51e low population density" was originally named: "Isoprene; from residue burning; kg C, biogenic" in this dataset.
Exchange "Ethyne-2bdf9967-6dae-4183-88d1-8f612548c51e low population density" was originally named: "Acetylene; from residue burning; kg C, biogenic" in this dataset.
Exchange "Toluene-2bdf9967-6dae-4183-88d1-8f612548c51e low population density" was originally named: "Toluene; from residue burning; kg C, biogenic" in this dataset.
Exchange "Methanol-2bdf9967-6dae-4183-88d1-8f612548c51e low population density" was originally named: "Methanol; from residue burning; kg C, biogenic" in this dataset.
Exchange "1-Butene-2bdf9967-6dae-4183-88d1-8f612548c51e low population density" was originally named: "1 butene; from residue burning; kg C, biogenic" in this dataset.
Exchange "Dinitrogen monoxide-2bdf9967-6dae-4183-88d1-8f612548c51e low population density" was originally named: "Dinitrogen monoxide; from residue burning; kg N, biogenic" in this dataset.
Exchange "Water-2bdf9967-6dae-4183-88d1-8f612548c51e low population density" was originally named: "Water; from residue burning; biogenic" in this dataset.
Exchange "Magnesium-be1c0329-f1a8-4524-8420-a86d2a8dd358 agricultural" was originally named: "Magnesium; applied in dolomite" in this dataset.

## Geography
The unit process is assumed to represent production in Nebraska (US State).

## Technology
This process produces soybeans; at harvest in 1998; at farm; 85%-92% moisture. The process is assumed to represent production in Nebraska (US State). Yields and related inputs and outputs represent a single year of operation, in 1998. This dataset includes consideration of residue burning; soil preparation; planting or sowing; irrigation; application, storage, and transport of fertilizers, manures, liming materials, secondary materials, and pesticides; and harvest. Fate and transport of applications are not included as described in Cooper, J.S., Kahn, E., Noon, M. (2012) LCA Digital Commons Unit Process Data: field crop production Version 1 which is available at https://www.lcacommons.gov/discovery/docs/LCA%20Digital%20Commons%20Unit%20Process%20Data%20final%20updated.pdf

## Time period
Start and end dates match the underlying data obtained from the USDA Agricultural Resource Management Survey (ARMS).
## Parameters
- p0581: 0; = IF(p0317<0.5;-SQRT(p0007*EXP(p0449^2*p0008)-p0007);SQRT(p0007*EXP(p0449^2*p0008)-p0007))
- p0784: 30.43; = p0124*(1+p0652*p0256/100)
- p2228: 0.384766; = if(p0774*p0778+p0775*p0779+p0776*p0780+p0777*p0781=0;0;p0780*p0776/(p0774*p0778+p0775*p0779+p0776*p0780+p0777*p0781))
- p0668: 0; = IF(p0404<0.5;-SQRT(p0007*EXP(p0536^2*p0008)-p0007);SQRT(p0007*EXP(p0536^2*p0008)-p0007))
- p2624: 0; = p2428*p1123
- p0983: 0.756597; = if(p0886=0;0;min(1;(p0695*p0694*1000*p0697/100)/p0886))
- p1697: 0
- p2362: 0; = p2225*p2190
- p3168: 0; = p2387*p1082
- p5062: 0; = p1889*p3483
- p2216: 2.4547e-5; = p1108/p0818
- p3415: 0.000569079; = p3377*p1238
- p3326: 0; = if(and(p1232=0;p3255<>0);p3268*p3289;0)
- p0829: 0; = if(p0807=480;p0814*(1-p0824);0)
- p0663: 0; = IF(p0399<0.5;-SQRT(p0007*EXP(p0531^2*p0008)-p0007);SQRT(p0007*EXP(p0531^2*p0008)-p0007))
- p1602: 0
- p3064: 1.60817e-7; = p2283*p1023
- p1198: 0.44
- p0270: 18.146
- p2299: 0.000140161; = p2227*p2206
- p2853: 0; = p2267*(p1079+p1081)
- p2248: 0; = p2222*p2193
- p2079: 0.02
- p0067: 64.454
- p0648: 0; = IF(p0384<0.5;-SQRT(p0007*EXP(p0516^2*p0008)-p0007);SQRT(p0007*EXP(p0516^2*p0008)-p0007))
- p2096: 0.486404
- p1088: 6880.75; = IF(p1071=0;p1082*(p0710/100)*p0703*1000;0)
- p0867: 0.0574661; = IF(p0858+p0864+p0865+p0866=1;0;IF(p0858+p0864+p0865+p0866+p0862>1;1-(p0858+p0864+p0865+p0866);p0862))
- p2028: 5.29755e-5; = p2015*p2026*p2027/(p0818*1000)
- p2381: 0; = p2229*p2210
- p1808: 0
- p1843: 0
- p0777: 0
- p2716: 7.05389e-6; = p2325*(p1019+p1021)
- p0921: 0.172646; = p0679*1000/p0801
- p1735: 0
- p0894: 0.19
- p1195: 0.45
- p1266: 0.7983; = if(p1232>0;0;IF(p1259+p1263+p1264+p1265=1;0;1-(p1259+p1263+p1264+p1265)))
- p0920: 0.126076; = p0676*1000/p0801
- p3420: 0; = p3363*p1239
- p1845: 0
- p2840: 0; = p2254*(p1020+p1022)
- p2270: 0; = p2226*p2216
- p1320: 0; = IF(((p0745*1000*p0747/100)+(p0754*1000*p0756/100))/p0801<0;0;((p0745*1000*p0747/100)+(p0754*1000*p0756/100))/p0801)
- p3469: 3.56455e-19; = p3374*p1241
- p0970: 0.015546; = p0967/p0818
- p3115: 4.50693e-8; = p2334*p1023
- p2035: 5.93784e-6; = p2015*p2029*(1-p2031)/(p0818*1000)
- p1931: 0
- p2584: 0; = p2388*p1073
- p1891: 0
- p2366: 0; = p2225*p2195
- p2559: 0; = p2363*p1014
- p3422: 0; = p3365*p1239
- p1345: 9.64733e-6; = IF(p1318=0;p1344*p0001/(p0818*p0002);0)
- p1524: 10
- p2812: 0; = p2421*(p1078+p1080)
- p1677: 0
- p1571: 0
- p1779: 0
- p2081: 0.0019
- p1154: 0.00136491; = if(p1152*p0818=0;0;p1150/(p1152*p0818))
- p2032: 0.448886
- p2059: 1.00168
- p3102: 4.33607e-7; = p2321*p1023
- p0742: 85.579; = p0082*(1+p0610*p0214/100)
- p2067: 0.446471
- p0705: 55.47; = p0045*(1+p0573*p0177/100)
- p3285: 0.275
- p3691: 0; = p1754*p3477
- p1682: 0
- p3339: 0; = if(and(p1232=0;p3254<>0);p3254*(p3269*p3277-p3334)/p3338;0)
- p0684: 61.17; = p0024*(1+p0552*p0156/100)
- p3240: 4.5137e-9; = p3234*p1188*p3235/p0818
- p2808: 0; = p2417*(p1078+p1080)
- p3437: 0; = p3380*p1239
- p0672: 0
- p0202: 69.545
- p1686: 0.505026
- p2925: 0.000149193; = p2339*(p1079+p1081)
- p0634: 0; = IF(p0370<0.5;-SQRT(p0007*EXP(p0502^2*p0008)-p0007);SQRT(p0007*EXP(p0502^2*p0008)-p0007))
- p3089: 1.65023e-6; = p2308*p1082
- p2576: 0; = p2380*p1073
- p0297: 0.5
- p3083: 8.25626e-7; = p2302*p1082
- p4622: 2.29051e-8; = p1861*p3481
- p1149: 0.830148
- p1275: 0; = p1271*p1252/p0818
- p2131: 4.69048e-7; = p2015*p2059*p2093/(p0818*1000)
- p0280: 0.5
- p1294: 0; = p1290*p1252/p0818
- p2539: 0.000149685; = p2343*p1073
- p3354: 3.21739e7; = IF((p3350+p3351+p3352+p3353)+IF(p3349=0;0;(p3256*(p3273*(1-p3277))/p3349))>p3256;p3256-(p3350+p3351+p3352+p3353);IF(p3349=0;0;p3256*(p3273*(1-p3277))/p3349))
- p2138: 1.38557e-7; = p2015*p2066*p2100/(p0818*1000)
- p2690: 4.16097e-5; = p2299*(p1078+p1080)
- p3869: 0; = p1932*p3477
- p2773: 0; = p2382*(p1078+p1080)
- p0715: 0
- p0271: 34.151
- p2242: 0; = p2222*p2187
- p2269: 0; = p2226*p2215
- p0892: 2997.14; = if(p0891=0;0;(1-p1240)*p3251/p0891)
- p2336: 0.000299296; = p2228*p2204
- p5269: 3.67677e-8; = p1890*p3484
- p0905: 0.0983707; = p0904/p0818
- p3130: 8.06708e-7; = p2349*p1082
- p3161: 0; = p2380*p1082
- p0035: 5.293
- p1339: 7.51246e-5; = p1338*p0001/(p0818*p0002)
- p1732: 0
- p1782: 0
- p1836: 0
- p2639: 0; = p2248*(p1019+p1021)
- p1647: 0
- p2207: 0.00189155; = p1119-p2205-p2204-p2206
- p2485: 0.000301413; = p2289*p1014
- p2425: 0; = p2235*p2215
- p1992: 3900
- p0753: 0
- p1814: 0
- p1177: 0.000342453; = p0801*p0001/(p0818*p0002)
- p0129: 30.56
- p2311: 0.000566537; = p2231*p2218
- p2185: 2.63042e-5; = p1065-p2184
- p0500: 0; = SQRT(2)*(IF((2*p0368-1)<0;-1;IF((2*p0368-1)>0;1;0))*SQRT(SQRT((2/(pi()*0.140012289)+LN(1-(2*p0368-1)^2)/2)^2-LN(1-(2*p0368-1)^2)/0.140012289)-(2/(pi()*0.140012289)+LN(1-(2*p0368-1)^2)/2)))
- p4007: 1.38237e-6; = p1864*p3478
- p2732: 1.60847e-5; = p2341*(p1078+p1080)
- p0708: 0
- p1310: 0; = IF(p1307=p1266;0;IF(p1307+p1308>p1266;p1266-p1307;p1308))
- p4140: 5.15e-8; = p1791*p3479
- p2613: 0; = p2417*p1073
- p2497: 9.36076e-5; = p2301*p1073
- p2927: 1.11066e-5; = p2341*(p1079+p1081)
- p0218: 34.819
- p0245: 18.146
- p2719: 8.55376e-5; = p2328*(p1019+p1021)
- p0415: 0; = SQRT(2)*(IF((2*p0283-1)<0;-1;IF((2*p0283-1)>0;1;0))*SQRT(SQRT((2/(pi()*0.140012289)+LN(1-(2*p0283-1)^2)/2)^2-LN(1-(2*p0283-1)^2)/0.140012289)-(2/(pi()*0.140012289)+LN(1-(2*p0283-1)^2)/2)))
- p0942: 0; = if(and(p0683=0;p0948=0);p0936;0)
- p2087: 0.856281
- p1155: 0.000139682; = if(p1153*p0818=0;0;p1151/(p1153*p0818))
- p2525: 1.49613e-7; = p2329*p1014
- p2276: 0.000302647; = p2223*p2182
- p1993: 400
- p2284: 2.20187e-5; = p2223*p2190
- p0710: 19.005; = p0050*(1+p0578*p0182/100)
- p2869: 2.5598e-6; = p2283*(p1020+p1022)
- p0722: 0
- p2250: 0; = p2222*p2196
- p2132: 4.50871e-7; = p2015*p2060*p2094/(p0818*1000)
- p3106: 1.94065e-7; = p2325*p1023
- p4809: 0; = p1842*p3482
- p0765: 0
- p0846: 0.373043; = p0841*p0845^3+p0842*p0845^2+p0843*p0845+p0844
- p4004: 1.1059e-7; = p1861*p3478
- p3382: 0; = p3363*p1234
- p0368: 0.5
- p1227: 0.000342453; = IF(p1221=0;0;p1226*p0001/(p0818*p0002))
- p0831: 0.1036; = 1-p0824
- p0242: 15.594
- p1661: 0
- p1178: 3.74998e-8; = p1176/p0818
- p3421: 0; = p3364*p1239
- p1028: 0; = IF(p1012=0;p1022*(p0704/100)*p0703*1000;0)
- p2070: 0.282
- p1077: 0; = IF(p1071=0;p0715/100;0)
- p1076: 0; = IF(p1071=0;p0714/100;0)
- p4480: 0; = p1925*p3480
- p1009: 0; = p1005*p0001*p0004/(p0818*p0002)
- p1963c: 4.66704e-6; = p1588*p1792+p1589*p1793+p1590*p1794+p1591*p1795+p1592*p1796+p1593*p1797+p1594*p1798+p1595*p1799+p1596*p1800+p1597*p1801+p1598*p1802+p1599*p1803+p1600*p1804+p1601*p1805+p1602*p1806+p1603*p1807+p1604*p1808+p1605*p1809+p1606*p1810+p1607*p1811
- p2977: 0; = p2391*(p1129+p1131)
- p4308: 3.84473e-5; = p1963*p3479
- p3084: 3.56479e-7; = p2303*p1082
- p2020: 460485; = p2015*p2018*p2019
- p1721: 0.5
- p3259: 0.00796296
- p1288: 0
- p1980: 3521.6
- p1755: 0
- p1815: 0
- p3178: 0; = p2397*p1023
- p0689: 98.713; = p0029*(1+p0557*p0161/100)
- p1215: 0; = IF(p1214=0;0;(p1214-1.5)/(p1214-1)^2)
- p1598: 0
- p1335: 0.000112607; = p1334*p0001/(p0818*p0002)
- p3019: 0; = p2238*p1023
- p2596: 0; = p2400*p1014
- p2034: 7.14458e-6; = p2015*p2030*p2032/(p0818*1000)
- p2014: 1.98176e7; = p0833*p2011*p2013
- p2887: 3.92718e-5; = p2301*(p1079+p1081)
- p1606: 0
- p1145: 7.36474e6; = if(p1121=0;p0799*p0702*1000*p0800/100;0)
- p2420: 0; = p2235*p2210
- p0795: 14.737; = p0135*(1+p0663*p0267/100)
- p0287: 0.5
- p3476: 0.15469; = if(p1328+p1330+p1332+p1334+p1336+p1338+p1340+p1342+p1344=0;0;p1328/(p1328+p1330+p1332+p1334+p1336+p1338+p1340+p1342+p1344))
- p0924: 0.126076; = IF(p0918+p0923=1;0;IF(p0918+p0923+p0920>1;1-(p0918+p0923);p0920))
- p3359: 8.74094e6; = if(p1232=0;p3309+p3320+p3331+p3342+p3353;0)
- p2594: 0; = p2398*p1014
- p0959: 0; = if(and(p0683>0;or(p0807=480;p0807=32;p0807=1;and(p0807=60;p0901<0.03)));p0935;0)
- p0080: 85.562
- p0791: 0
- p1023: 0.00836; = IF(p1012=0;IF(p1014+p1019+p1020+p1021+p1022=1;0;1-(p1014+p1019+p1020+p1021+p1022));0)
- p1025: 250047; = IF(p1012=0;p1019*(p0704/100)*p0703*1000;0)
- p3383: 0; = p3364*p1234
- p2426: 0; = p2235*p2216
- p2082: 0.285294
- p0115: 45.011
- p0043: 3799.05
- p2585: 0; = p2389*p1123
- p1960: 72.6996; = IF(p1959-p1958<0;0;p1959-p1958)
- p0729: 0
- p1232: 0
- p1623: 0
- p1311: 0; = IF(p1307+p1310=p1266;0;IF(p1307+p1310+p1309>p1266;p1266-(p1307+p1310);p1309))
- p0852: 0; = p0847*p0851^3+p0848*p0851^2+p0849*p0851+p0850
- p1694: 0
- p1781: 0
- p0584: 0; = IF(p0320<0.5;-SQRT(p0007*EXP(p0452^2*p0008)-p0007);SQRT(p0007*EXP(p0452^2*p0008)-p0007))
- p1132: 0.2812; = if(p1121=0;IF(p1123+p1128+p1129+p1130+p1131=1;0;1-(p1123+p1128+p1129+p1130+p1131));0)
- p1575: 0
- p3355: 5.63317e6; = if(and(p1232=0;p3256<>0);p3256-(p3350+p3351+p3352+p3353+p3354);0)
- p4410: 0; = p1855*p3480
- p2332: 8.73712e-5; = p2224*p2200
- p0950: 0; = if(and(p0683=0;or(p0807=480;p0807=32;p0807=1;and(p0807=60;p0901<0.03)));p0938;0)
- p2842: 0; = p2256*(p1020+p1022)
- p2820: 0; = p2429*(p1128+p1130)
- p0535: 0; = SQRT(2)*(IF((2*p0403-1)<0;-1;IF((2*p0403-1)>0;1;0))*SQRT(SQRT((2/(pi()*0.140012289)+LN(1-(2*p0403-1)^2)/2)^2-LN(1-(2*p0403-1)^2)/0.140012289)-(2/(pi()*0.140012289)+LN(1-(2*p0403-1)^2)/2)))
- p0686: 1132.82; = p0026*(1+p0554*p0158/100)
- p2349: 8.46493e-5; = p2228*p2217
- p1787: 0
- p1689: 0
- p1603: 0
- p1614: 0
- p2871: 7.36827e-7; = p2285*(p1020+p1022)
- p1770: 0
- p2224: 0.341257; = if(p0765*p0769+p0766*p0770+p0767*p0771+p0768*p0772=0;0;p0771*p0767/(p0765*p0769+p0766*p0770+p0767*p0771+p0768*p0772))
- p4304: 1.74585e-5; = p1955*p3479
- p3212: 0; = p2431*p1132
- p2279: 1.73277e-5; = p2223*p2185
- p1284: 0; = p1280*p1252/p0818
- p0951: 0; = if(and(p0683=0;or(p0807=480;p0807=32;p0807=1;and(p0807=60;p0901<0.03)));p0939;0)
- p2189: 2.92018e-5; = p1053/p0818
- p0148: 0
- p1820: 0
- p2859: 0; = p2273*(p1129+p1131)
- p1292: 0; = IF(p1287+p1290+p1291=p1261;0;p1261-(p1287+p1290+p1291))
- p2659: 0; = p2268*(p1078+p1080)
- p1636: 0
- p0110: 46.941
- p0820: 0; = if(p0807=480;p0814;0)
- p3001: 0; = p2415*(p1079+p1081)
- p2222: 0; = if(p0765*p0769+p0766*p0770+p0767*p0771+p0768*p0772=0;0;p0769*p0765/(p0765*p0769+p0766*p0770+p0767*p0771+p0768*p0772))
- p0440: 0; = SQRT(2)*(IF((2*p0308-1)<0;-1;IF((2*p0308-1)>0;1;0))*SQRT(SQRT((2/(pi()*0.140012289)+LN(1-(2*p0308-1)^2)/2)^2-LN(1-(2*p0308-1)^2)/0.140012289)-(2/(pi()*0.140012289)+LN(1-(2*p0308-1)^2)/2)))
- p0559: 0; = IF(p0295<0.5;-SQRT(p0007*EXP(p0427^2*p0008)-p0007);SQRT(p0007*EXP(p0427^2*p0008)-p0007))
- p3620: 4.46882e-6; = p1889*p3476
- p1628: 0
- p3449: 0; = p3373*p1240
- p3239: 0.013074; = IF(p3238+p3235+p3236=1;0;1-(p3238+p3235+p3236))
- p1839: 0
- p1121: 0
- p3035: 0; = p2254*p1023
- p2582: 0; = p2386*p1073
- p0402: 0.5
- p1701: 0
- p1304: 0; = p1300*p1252/p0818
- p3134: 0; = p2353*p1132
- p1341: 0; = p1340*p0001/(p0818*p0002)
- p1046: 0.0238398; = IF(p1012=0;IF(p1037+p1044+p1045=1;0;IF(p1037+p1044+p1045+p1040>1;1-(p1037+p1044+p1045);p1040));0)
- p2056: 2.07882
- p3998: 0.000102406; = p1855*p3478
- p0674: 218.371; = p0014*(1+p0542*p0146/100)
- p2115: 0.856281
- p4239: 4.29167e-7; = p1890*p3479
- p0299: 0.5
- p1804: 0
- p3217: 0.00710404; = p3213*p1228
- p0714: 0
- p1593: 0.689607
- p2383: 0; = p2229*p2212
- p3241: 5.3883e-10; = p3234*p1188*p3236/p0818
- p0808: 0
- p2577: 0; = p2381*p1073
- p3374: 0.00321066; = if(p1232=0;p3246*p3356/p0818;0)
- p3412: 0.0020694; = p3374*p1238
- p0845: 0.5
- p0888: 0; = p0686*1000*p0687*p0884/100
- p0902: 0
- p2389: 0; = p2233*p2218
- p1605: 0
- p0572: 0; = IF(p0308<0.5;-SQRT(p0007*EXP(p0440^2*p0008)-p0007);SQRT(p0007*EXP(p0440^2*p0008)-p0007))
- p2221: 8.86608e-5; = p1155-p2220
- p1995: 50
- p1123: 0.43763; = if(p1121=0;p0717/100;0)
- p1325: 0; = IF(((p0745*1000*p0752/100)+(p0754*1000*p0761/100))/p0801<0;0;((p0745*1000*p0752/100)+(p0754*1000*p0761/100))/p0801)
- p1012: 0
- p2302: 8.66344e-5; = p2227*p2209
- p4828: 0; = p1861*p3482
- p3159: 0; = p2378*p1082
- p2496: 0.000568619; = p2300*p1073
- p1956: 0
- p0239: 17.043
- p3332: 0; = if(and(p1232=0;p3255<>0);IF((p3328+p3329+p3330+p3331)+(p3255*(p3265*(1-p3277))/p3327)>p3255;p3255-(p3328+p3329+p3330+p3331);p3255*(p3265*(1-p3277))/p3327);0)
- p1221: 0.0583196
- p4686: 2.29051e-8; = p1925*p3481
- p1346: 111
- p2664: 0; = p2273*(p1128+p1130)
- p4651: 2.86313e-7; = p1890*p3481
- p0644: 0; = IF(p0380<0.5;-SQRT(p0007*EXP(p0512^2*p0008)-p0007);SQRT(p0007*EXP(p0512^2*p0008)-p0007))
- p1904: 0
- p1879: 0
- p1630: 0
- p1896: 0
- p1252: 7.75872e8; = if(p1232>0;0;p0724*2000*p0723*1000*p0725/100)
- p1948: 0
- p1952: 0
- p0534: 0; = SQRT(2)*(IF((2*p0402-1)<0;-1;IF((2*p0402-1)>0;1;0))*SQRT(SQRT((2/(pi()*0.140012289)+LN(1-(2*p0402-1)^2)/2)^2-LN(1-(2*p0402-1)^2)/0.140012289)-(2/(pi()*0.140012289)+LN(1-(2*p0402-1)^2)/2)))
- p2861: 0; = p2275*(p1129+p1131)
- p3142: 0; = p2361*p1023
- p0311: 0.5
- p2498: 4.23304e-5; = p2302*p1073
- p2091: 0.374844
- p0665: 0; = IF(p0401<0.5;-SQRT(p0007*EXP(p0533^2*p0008)-p0007);SQRT(p0007*EXP(p0533^2*p0008)-p0007))
- p3483: 0; = if(p1328+p1330+p1332+p1334+p1336+p1338+p1340+p1342+p1344=0;0;p1342/(p1328+p1330+p1332+p1334+p1336+p1338+p1340+p1342+p1344))
- p0934: 3.13289e-5; = p0928*p0001/(p0818*p0002)
- p1639: 0
- p2298: 0.000432829; = p2227*p2205
- p4098: 5.6235e-5; = p1955*p3478
- p2192: 6.80236e-5; = p1067-p2189-p2190-p2191
- p3390: 0; = p3371*p1234
- p0166: 20.193
- p2484: 3.04919e-5; = p2288*p1014
- p0188: 28.438
- p2580: 0; = p2384*p1073
- p1861: 2.0202e-7; = p1453*1000/p0818
- p1762: 0
- p0290: 0.5
- p0195: 0
- p1209: 89.6636; = p1206*p0818*p0822/p0801
- p3198: 0; = p2417*p1082
- p1937: 0
- p1645: 0
- p3380: 0.0685746; = p3251/p0818
- p0089: 16.995
- p3333: 0; = if(and(p1232=0;p3255<>0);p3255-(p3328+p3329+p3330+p3331+p3332);0)
- p2612: 0; = p2416*p1073
- p5128: 0; = p1955*p3483
- p5133: 1.63248e-7; = p1754*p3484
- p2163: 0.000634572; = (p2017-p2020)/p0818-(p2025+p2028+p2033+p2034+p2051+p2125+p2126+p2127+p2128+p2129+p2130+p2131+p2132+p2133+p2134+p2135+p2136+p2137+p2138+p2139+p2140+p2141+p2142+p2143+p2144+p2145+p2146+p2147+p2148+p2149+p2150+p2151+p2152+p2153+p2154+p2155+p2156+p2157)
- p2695: 0.00014542; = p2304*(p1078+p1080)
- p1194: 1.48
- p1063: 0.455
- p2170: 0.00720834; = p2166*(p0913)
- p2968: 0; = p2382*(p1079+p1081)
- p2442: 0; = p2246*p1014
- p0926: 0.0614366; = IF(p0918+p0923+p0924+p0925=1;0;IF(p0918+p0923+p0924+p0925+p0922>1;1-(p0918+p0923+p0924+p0925);p0922))
- p2886: 0.000238557; = p2300*(p1079+p1081)
- p2120: 0.51828
- p1161: 3.8e6; = p0801
- p2817: 0; = p2426*(p1078+p1080)
- p2660: 0; = p2269*(p1078+p1080)
- p2418: 0; = p2235*p2208
- p2464: 0; = p2268*p1073
- p2656: 0; = p2265*(p1078+p1080)
- p1293: 0; = p1287*p1252/p0818
- p3826: 0; = p1889*p3477
- p3262: 0.0787162
- p1217: 0
- p1137: 0; = if(p1121=0;p1131*(p0716/100)*p0703*1000;0)
- p2456: 0; = p2260*p1073
- p0557: 0; = IF(p0293<0.5;-SQRT(p0007*EXP(p0425^2*p0008)-p0007);SQRT(p0007*EXP(p0425^2*p0008)-p0007))
- p2168: 0.0187511; = p2166*(p0903)
- p3328: 0; = if(and(p1232=0;p3255<>0);p3255*(p3265*p3277-p3323)/p3327;0)
- p2172: 0.367973; = p2166-(p2167+p2168+p2169+p2170)
- p3398: 0.000250516; = p3379*p1234
- p1236: 0; = if(p1232>0;0;p0728/100)
- p3406: 0; = p3368*p1238
- p3473: 4.58797e-19; = p3378*p1241
- p0741: 1.28; = p0081*(1+p0609*p0213/100)
- p0585: 0; = IF(p0321<0.5;-SQRT(p0007*EXP(p0453^2*p0008)-p0007);SQRT(p0007*EXP(p0453^2*p0008)-p0007))
- p2570: 0; = p2374*p1014
- p0790: 0
- p1627: 0
- p0977: 0; = IF(p0687=0;IF(OR(p0686=0;p0688=0);0;p0686*1000*p0688/100);0)
- p3363: 0; = if(p1232=0;p3244*p3357/p0818;0)
- p2911: 3.08902e-6; = p2325*(p1020+p1022)
- p0149: 0
- p0809: 0
- p0537: 0; = IF(p0273<0.5;-SQRT(p0007*EXP(p0405^2*p0008)-p0007);SQRT(p0007*EXP(p0405^2*p0008)-p0007))
- p3299: 0; = if(p1303+p1304+p1305+p1306=0;0;p1303/(p1303+p1304+p1305+p1306))
- p0868: 0; = IF(p0858+p0864+p0865+p0866+p0867=1;0;IF(p0858+p0864+p0865+p0866+p0867+p0863>1;1-(p0858+p0864+p0865+p0866+p0867);p0863))
- p2995: 0; = p2409*(p1020+p1022)
- p2961: 0; = p2375*(p1079+p1081)
- p0236: 15.279
- p1971: 0.000337947; = p1966*p0001/(p0818*p0002)
- p0828: 0; = if(p0827=0;0;p0819-p0827/p0818)
- p3400: 0; = p3362*p1238
- p2663: 0; = p2272*(p1128+p1130)
- p2468: 0; = p2272*p1123
- p0454: 0; = SQRT(2)*(IF((2*p0322-1)<0;-1;IF((2*p0322-1)>0;1;0))*SQRT(SQRT((2/(pi()*0.140012289)+LN(1-(2*p0322-1)^2)/2)^2-LN(1-(2*p0322-1)^2)/0.140012289)-(2/(pi()*0.140012289)+LN(1-(2*p0322-1)^2)/2)))
- p2286: 4.48101e-5; = p2223*p2192
- p0998: 0; = if(p0888=0;0;if((p0699*p0698*1000*p0700/100)/p0888>1;1;(p0699*p0698*1000*p0700/100)/p0888))
- p2749: 0; = p2358*(p1019+p1021)
- p3147: 0; = p2366*p1023
- p0848: 0
- p0163: 31.922
- p0551: 0; = IF(p0287<0.5;-SQRT(p0007*EXP(p0419^2*p0008)-p0007);SQRT(p0007*EXP(p0419^2*p0008)-p0007))
- p1999: 6.59873e8; = (p1228+p1229)*p0818+p1164
- p3465: 0; = p3370*p1241
- p2304: 0.000489846; = p2227*p2211
- p1295: 0; = p1291*p1252/p0818
- p1878: 0
- p2554: 0; = p2358*p1014
- p3460: 0; = p3365*p1241
- p3156: 0; = p2375*p1082
- p0796: 21.66; = p0136*(1+p0664*p0268/100)
- p1821: 0
- p0826: 0.101167; = 1-p0825/p0818
- p2031: 0.465411
- p0452: 0; = SQRT(2)*(IF((2*p0320-1)<0;-1;IF((2*p0320-1)>0;1;0))*SQRT(SQRT((2/(pi()*0.140012289)+LN(1-(2*p0320-1)^2)/2)^2-LN(1-(2*p0320-1)^2)/0.140012289)-(2/(pi()*0.140012289)+LN(1-(2*p0320-1)^2)/2)))
- p1201: 0.65
- p1326: 0; = IF(((p0745*1000*p0753/100)+(p0754*1000*p0762/100))/p0801<0;0;((p0745*1000*p0753/100)+(p0754*1000*p0762/100))/p0801)
- p2757: 0; = p2366*(p1019+p1021)
- p2188: 0.000151988; = p1066-p2186-p2187
- p0010: 3448.79
- p0922: 0.0614366; = p0677*1000/p0801
- p1582: 0
- p2921: 8.2243e-6; = p2335*(p1020+p1022)
- p1938: 0
- p1315: 0; = p1311*p1252/p0818
- p2544: 4.61486e-6; = p2348*p1073
- p0594: 0; = IF(p0330<0.5;-SQRT(p0007*EXP(p0462^2*p0008)-p0007);SQRT(p0007*EXP(p0462^2*p0008)-p0007))
- p3104: 9.53593e-8; = p2323*p1023
- p0306: 0.5
- p2919: 4.98455e-6; = p2333*(p1020+p1022)
- p1610: 0
- p1950: 0
- p2550: 0; = p2354*p1014
- p2012: 0.00327758
- p2036: 8.77167e-6; = p2015*p2030*(1-p2032)/(p0818*1000)
- p2152: 3.73393e-8; = p2015*p2080*p2114/(p0818*1000)
- p1257: 0; = if(p1232>0;0;IF(p1253+p1256=1;0;IF(p1253+p1256+p1255>1;1-(p1253+p1256);p1255)))
- p0916: 0.298109; = p0826+(p0832*(1+p0894))/p0818
- p0388: 0.5
- p3202: 0; = p2421*p1082
- p1734: 0
- p3157: 0; = p2376*p1082
- p2811: 0; = p2420*(p1078+p1080)
- p0666: 0; = IF(p0402<0.5;-SQRT(p0007*EXP(p0534^2*p0008)-p0007);SQRT(p0007*EXP(p0534^2*p0008)-p0007))
- p0941: 0; = if(and(p0683=0;p0947=0);p0935;0)
- p2547: 0; = p2351*p1123
- p0070: 20.17
- p3308: 172858; = if(and(p1232=0;p3252<>0);p3252*(p3259-p3303)/p3305;0)
- p2642: 0; = p2251*(p1019+p1021)
- p0107: 10.414
- p1552: 0
- p3148: 0; = p2367*p1023
- p1064: 0.000560282; = IF(p1012=0;p1050/(p1057*p0818);0)
- p1337: 0; = p1336*p0001/(p0818*p0002)
- p0933: 950; = p0801*p0927
- p0185: 28.492
- p1827: 0
- p2011: 0.00167079
- p1963k: 8.49468e-5; = p1744*p1948+p1745*p1949+p1746*p1950+p1747*p1951+p1748*p1952+p1749*p1953+p1750*p1954+p1751*p1955+p1752*p1956+p1753*p1957+p1961*p1962
- p0007: 14; = p0006-1
- p0199: 30.457
- p2975: 0; = p2389*(p1129+p1131)
- p3065: 1.84076e-7; = p2284*p1023
- p2711: 1.23202e-6; = p2320*(p1019+p1021)
- p1622: 0
- p0691: 6.975; = p0031*(1+p0559*p0163/100)
- p3441: 0; = p3365*p1240
- p1753: 0
- p3251: 6.78888e8; = p1252-(p3252+p3253+p3254+p3255+p3256)
- p1152: 0.415074
- p2979: 0; = p2393*(p1020+p1022)
- p3203: 0; = p2422*p1082
- p2557: 0; = p2361*p1014
- p1977: 7.75873e8; = p1252+p1188
- p0044: 21.66
- p2481: 3.07145e-6; = p2285*p1014
- p0273: 0.5
- p2368: 0; = p2225*p2197
- p2195: 8.34469e-5; = p2194*p2193
- p0610: 0; = IF(p0346<0.5;-SQRT(p0007*EXP(p0478^2*p0008)-p0007);SQRT(p0007*EXP(p0478^2*p0008)-p0007))
- p2041: 2.79925e-6; = p2015*p2040/(p0818*1000)
- p0851: 0
- p2268: 0; = p2226*p2214
- p2010: 0.000287579; = ((p1984*p1985+p1990*p1991+p1996*p1997+p2004*p2005)/p0818)*p0005*p0002/1000
- p2824: 0; = p2238*(p1020+p1022)
- p2390: 0; = p2233*p2219
- p1867: 0
- p1207: 14.4387; = if(p1193>0;0;(p1194*p1050/p1057+p1195*p1051/p1058+p1196*p1052/p1059+p1197*p1053/p1060+p1198*p1054/p1061+p1199*p1055/p1062+p1200*p1056/p1063)/(p0702*1000)+(p1201*p1109/p1114+p1202*p1110/p1115)/(p0702*1000)+p1203*p1170/p0801+p1204*p1176/p0801)
- p1096: 0.00337596
- p4719: 8.32594e-7; = p1962*p3481
- p3340: 0; = if(and(p1232=0;p3254<>0);p3254*(p3270-p3335)/p3338;0)
- p2984: 0; = p2398*(p1020+p1022)
- p2896: 2.7746e-5; = p2310*(p1079+p1081)
- p1826: 0
- p2009: 0.0215879; = ((p1983*p1985+p1989*p1991+p1995*p1997+p2003*p2005+p1976*p1977+p1978*p1979+p1998*p1999)/p0818)*p0005*p0002/1000
- p2897: 0; = p2311*(p1129+p1131)
- p3258: 0.0491162
- p2722: 2.95764e-7; = p2331*(p1019+p1021)
- p2800: 0; = p2409*(p1019+p1021)
- p3358: 2.10647e6; = if(p1232=0;p3308+p3319+p3330+p3341+p3352;0)
- p0783: 0
- p3485: 1.7344e-6; = p1754*p3476
- p1776: 0
- p3136: 0; = p2355*p1023
- p0923: 0.548108; = IF(p0918=1;0;IF(p0918+p0919>1;1-p0918;p0919))
- p3183: 0; = p2402*p1023
- p0677: 233.459; = p0017*(1+p0545*p0149/100)
- p2110: 0.856281
- p1057: 0.82
- p2401: 0; = p2234*p2190
- p1112: 0.209482
- p1718: 0
- p2462: 0; = p2266*p1073
- p1741: 0
- p0447: 0; = SQRT(2)*(IF((2*p0315-1)<0;-1;IF((2*p0315-1)>0;1;0))*SQRT(SQRT((2/(pi()*0.140012289)+LN(1-(2*p0315-1)^2)/2)^2-LN(1-(2*p0315-1)^2)/0.140012289)-(2/(pi()*0.140012289)+LN(1-(2*p0315-1)^2)/2)))
- p0664: 0; = IF(p0400<0.5;-SQRT(p0007*EXP(p0532^2*p0008)-p0007);SQRT(p0007*EXP(p0532^2*p0008)-p0007))
- p1683: 0
- p1963h: 3.50282e-5; = p1686*p1890+p1687*p1891+p1688*p1892+p1689*p1893+p1690*p1894+p1691*p1895+p1692*p1896+p1693*p1897+p1694*p1898+p1695*p1899+p1696*p1900+p1697*p1901+p1698*p1902+p1699*p1903+p1700*p1904+p1701*p1905+p1702*p1906+p1703*p1907+p1704*p1908+p1705*p1909
- p0746: 15.469; = p0086*(1+p0614*p0218/100)
- p2021: 4.65136e-5; = p2020/p0818
- p3307: 861604; = if(and(p1232=0;p3252<>0);p3252*(p3258-p3302)/p3305;0)
- p2013: 0.75
- p1074: 0.29687; = IF(p1071=0;p0712/100;0)
- p2375: 0; = p2229*p2204
- p2693: 2.57192e-5; = p2302*(p1078+p1080)
- p2587: 0; = p2391*p1123
- p2966: 0; = p2380*(p1079+p1081)
- p2770: 0; = p2379*(p1078+p1080)
- p1847: 0
- p1759: 0
- p0159: 11.252
- p2993: 0; = p2407*(p1020+p1022)
- p3028: 0; = p2247*p1023
- p2779: 0; = p2388*(p1078+p1080)
- p2039: 1.72636e-6; = p2015*p2037*p2038/(p0818*1000)
- p3260: 0.0343561
- p0929: 2.08281e6; = p0801*p0923
- p2553: 0; = p2357*p1014
- p1269: 0
- p1229: 0.00367283; = IF(p1221=0;0;p1228*p1221)
- p2809: 0; = p2418*(p1078+p1080)
- p2734: 9.09456e-5; = p2343*(p1078+p1080)
- p3118: 2.57968e-6; = p2337*p1082
- p1875: 0
- p3338: 0; = if(and(p1232=0;p3254<>0);1-(p3334+p3335+p3336+p3337);0)
- p0747: 0
- p1619: 0
- p3187: 0; = p2406*p1023
- p2387: 0; = p2229*p2216
- p1560: 0
- p0151: 0
- p0696: 0
- p1946: 0
- p0124: 30.43
- p1648: 0
- p3071: 4.35264e-9; = p2290*p1023
- p3305: 0.856081; = if(and(p1232=0;p3252<>0);1-(p3301+p3302+p3303+p3304);0)
- p2730: 0.000216064; = p2339*(p1078+p1080)
- p1572: 0
- p0555: 0; = IF(p0291<0.5;-SQRT(p0007*EXP(p0423^2*p0008)-p0007);SQRT(p0007*EXP(p0423^2*p0008)-p0007))
- p0886: 6.30354e6; = p0686*1000*p0687*p0689/100
- p0834: 0.00059
- p1897: 0
- p2255: 0; = p2222*p2201
- p0433: 0; = SQRT(2)*(IF((2*p0301-1)<0;-1;IF((2*p0301-1)>0;1;0))*SQRT(SQRT((2/(pi()*0.140012289)+LN(1-(2*p0301-1)^2)/2)^2-LN(1-(2*p0301-1)^2)/0.140012289)-(2/(pi()*0.140012289)+LN(1-(2*p0301-1)^2)/2)))
- p1958: 4114
- p1841: 0
- p2900: 0; = p2314*(p1129+p1131)
- p1747: 0
- p3220: 0.00377866; = p3216*p1228
- p0532: 0; = SQRT(2)*(IF((2*p0400-1)<0;-1;IF((2*p0400-1)>0;1;0))*SQRT(SQRT((2/(pi()*0.140012289)+LN(1-(2*p0400-1)^2)/2)^2-LN(1-(2*p0400-1)^2)/0.140012289)-(2/(pi()*0.140012289)+LN(1-(2*p0400-1)^2)/2)))
- p3127: 2.73486e-7; = p2346*p1082
- p0420: 0; = SQRT(2)*(IF((2*p0288-1)<0;-1;IF((2*p0288-1)>0;1;0))*SQRT(SQRT((2/(pi()*0.140012289)+LN(1-(2*p0288-1)^2)/2)^2-LN(1-(2*p0288-1)^2)/0.140012289)-(2/(pi()*0.140012289)+LN(1-(2*p0288-1)^2)/2)))
- p2970: 0; = p2384*(p1079+p1081)
- p1775: 0
- p0940: 0; = if(and(p0683=0;p0946=0);p0934;0)
- p0462: 0; = SQRT(2)*(IF((2*p0330-1)<0;-1;IF((2*p0330-1)>0;1;0))*SQRT(SQRT((2/(pi()*0.140012289)+LN(1-(2*p0330-1)^2)/2)^2-LN(1-(2*p0330-1)^2)/0.140012289)-(2/(pi()*0.140012289)+LN(1-(2*p0330-1)^2)/2)))
- p3479: 0.16995; = if(p1328+p1330+p1332+p1334+p1336+p1338+p1340+p1342+p1344=0;0;p1334/(p1328+p1330+p1332+p1334+p1336+p1338+p1340+p1342+p1344))
- p2665: 0; = p2274*(p1128+p1130)
- p0679: 656.053; = p0019*(1+p0547*p0151/100)
- p1656: 0
- p4734: 0; = p1767*p3482
- p3386: 0; = p3367*p1234
- p0895: 2.69354e9; = p0894*p0830
- p1166: 3.30734e-6; = p1164/p0818
- p2410: 0; = p2234*p2200
- p0856: 3.8e6; = p0801
- p2916: 5.89102e-8; = p2330*(p1020+p1022)
- p1786: 0
- p1550: 0.783979
- p2314: 8.86608e-5; = p2231*p2221
- p2992: 0; = p2406*(p1020+p1022)
- p1577: 0
- p0901: 0.0656776
- p3002: 0; = p2416*(p1079+p1081)
- p0822: 0.898833
- p1085: 148005; = IF(p1071=0;p1079*(p0710/100)*p0703*1000;0)
- p3092: 0.00015931; = p2311*p1132
- p2692: 5.68741e-5; = p2301*(p1078+p1080)
- p1247: 2.67249e-6; = if(p1232>0;0;p1242*p0001/(p0818*p0002))
- p2868: 1.33231e-5; = p2282*(p1020+p1022)
- p4309: 0; = p1754*p3480
- p2446: 0; = p2250*p1014
- p2057: 3.28794
- p2145: 5.97428e-7; = p2015*p2073*p2107/(p0818*1000)
- p3309: 745793; = if(and(p1232=0;p3252<>0);p3252*(p3260-p3304)/p3305;0)
- p2278: 5.03063e-6; = p2223*p2184
- p3475: 7.61331e-18; = p3380*p1241
- p3377: 0.000882923; = if(p1232=0;p3246*p3359/p0818;0)
- p0697: 100; = p0037*(1+p0565*p0169/100)
- p1059: 0.335
- p1641: 0
- p0801: 3.8e6
- p1659: 0
- p2508: 0.00034939; = p2312*p1123
- p3365: 0; = if(p1232=0;p3244*p3359/p0818;0)
- p1714: 0
- p1144: 7.30236e-6; = if(p1121=0;p1138*p0001/(p0818*p0002);0)
- p1038: 0.00623446
- p0945: 0; = if(and(p0683=0;p0951=0);p0939;0)
- p0571: 0; = IF(p0307<0.5;-SQRT(p0007*EXP(p0439^2*p0008)-p0007);SQRT(p0007*EXP(p0439^2*p0008)-p0007))
- p2567: 0; = p2371*p1014
- p2573: 0; = p2377*p1073
- p2273: 0; = p2230*p2219
- p2017: 8.1006e6; = p2015*p0898
- p1091: 1.33381e-5; = IF(p1071=0;p1085*p0001/(p0818*p0002);0)
- p2352: 0; = p2232*p2220
- p2574: 0; = p2378*p1073
- p3205: 0; = p2424*p1082
- p3329: 0; = if(and(p1232=0;p3255<>0);p3255*(p3266-p3324)/p3327;0)
- p1147: 0.082617
- p2874: 7.31487e-6; = p2288*(p1020+p1022)
- p1013: 0; = p1012*p0001/(p0818*p0002)
- p0925: 0.172646; = IF(p0918+p0923+p0924=1;0;IF(p0918+p0923+p0924+p0921>1;1-(p0918+p0923+p0924);p0921))
- p5131: 0; = p1962*p3483
- p1558: 0
- p2437: 0; = p2241*p1014
- p0175: 0
- p3427: 0; = p3370*p1239
- p2856: 0; = p2270*(p1079+p1081)
- p2986: 0; = p2400*(p1020+p1022)
- p3440: 0; = p3364*p1240
- p0869: 0.00322395; = IF(p0858+p0864+p0865+p0866+p0867+p0868=1;0;1-(p0858+p0864+p0865+p0866+p0867+p0868))
- p2038: 0.304457
- p2500: 0.000239343; = p2304*p1073
- p2227: 0.615234; = if(p0774*p0778+p0775*p0779+p0776*p0780+p0777*p0781=0;0;p0779*p0775/(p0774*p0778+p0775*p0779+p0776*p0780+p0777*p0781))
- p2114: 0.832356
- p3110: 2.25485e-9; = p2329*p1023
- p0910: 0.0105884; = p0909/p0818
- p0891: 226512; = IF(p3251=0;0;62.4*6272640/(12*12*12))
- p4515: 1.27123e-6; = p1754*p3481
- p1750: 0
- p0066: 35.546
- p0014: 218.371
- p4603: 1.03073e-7; = p1842*p3481
- p0057: 43.763
- p2985: 0; = p2399*(p1020+p1022)
- p0291: 0.5
- p2713: 3.02816e-6; = p2322*(p1019+p1021)
- p2348: 9.44487e-6; = p2228*p2216
- p3152: 0; = p2371*p1023
- p1004: 0; = p1000*p0888
- p3068: 2.14381e-6; = p2287*p1023
- p0281: 0.5
- p1998: 314
- p0190: 44.512
- p0295: 0.5
- p0138: 19.005
- p1190: 9.65046e-8; = p1188/p0818
- p3013: 0; = p2427*(p1079+p1081)
- p3224: 0.501945; = IF(p3216=0;0;1-p3221-p3222-p3223)
- p2674: 5.8454e-6; = p2283*(p1019+p1021)
- p1171: 0.000342453; = p0801*p0001/(p0818*p0002)
- p1862: 0
- p3351: 5.60077e6; = if(and(p1232=0;p3256<>0);p3256*(p3274-p3346)/p3349;0)
- p3270: 0.0747083
- p1833: 0
- p2123: 0.263965
- p3023: 0; = p2242*p1023
- p0804: 0
- p3274: 0.0768939
- p2727: 8.8852e-5; = p2336*(p1078+p1080)
- p2179: 0.0254145; = p0970+p0971+p0972
- p2501: 1.21012e-6; = p2305*p1073
- p1939: 0
- p2150: 1.79771e-7; = p2015*p2078*p2112/(p0818*1000)
- p2167: 0.332023; = p2166*(p0898)
- p1699: 0.762907
- p3195: 0; = p2414*p1082
- p0913: 0.00989994
- p2264: 0; = p2226*p2210
- p2709: 2.72768e-6; = p2318*(p1019+p1021)
- p2827: 0; = p2241*(p1020+p1022)
- p1799: 0
- p2954: 0; = p2368*(p1020+p1022)
- p2042: 0.07
- p2994: 0; = p2408*(p1020+p1022)
- p0371: 0.5
- p1568: 0
- p2093: 0.260958
- p3237: 0.854735
- p0671: 120.59; = p0011*(1+p0539*p0143/100)
- p0699: 0
- p1678: 0
- p0329: 0.5
- p3209: 0; = p2428*p1132
- p1052: 817248; = IF(p1012=0;p1045*p1036;0)
- p3445: 0; = p3369*p1240
- p2834: 0; = p2248*(p1020+p1022)
- p3048: 0; = p2267*p1082
- p2146: 3.70803e-8; = p2015*p2074*p2108/(p0818*1000)
- p0573: 0; = IF(p0309<0.5;-SQRT(p0007*EXP(p0441^2*p0008)-p0007);SQRT(p0007*EXP(p0441^2*p0008)-p0007))
- p0860: 0; = p0672*1000/p0856
- p3910: 1.47638e-5; = p1767*p3478
- p0182: 18.146
- p3325: 0; = if(and(p1232=0;p3255<>0);p3267*p3289;0)
- p0838: 7.75367e9; = (p0833-p0836)*p0837
- p0544: 0; = IF(p0280<0.5;-SQRT(p0007*EXP(p0412^2*p0008)-p0007);SQRT(p0007*EXP(p0412^2*p0008)-p0007))
- p2463: 0; = p2267*p1073
- p0425: 0; = SQRT(2)*(IF((2*p0293-1)<0;-1;IF((2*p0293-1)>0;1;0))*SQRT(SQRT((2/(pi()*0.140012289)+LN(1-(2*p0293-1)^2)/2)^2-LN(1-(2*p0293-1)^2)/0.140012289)-(2/(pi()*0.140012289)+LN(1-(2*p0293-1)^2)/2)))
- p1613: 0
- p0704: 21.66; = p0044*(1+p0572*p0176/100)
- p3185: 0; = p2404*p1023
- p0410: 0; = SQRT(2)*(IF((2*p0278-1)<0;-1;IF((2*p0278-1)>0;1;0))*SQRT(SQRT((2/(pi()*0.140012289)+LN(1-(2*p0278-1)^2)/2)^2-LN(1-(2*p0278-1)^2)/0.140012289)-(2/(pi()*0.140012289)+LN(1-(2*p0278-1)^2)/2)))
- p4857: 0; = p1890*p3482
- p2528: 4.84648e-5; = p2332*p1014
- p1722: 0
- p0169: 0
- p1073: 0.48861; = IF(p1071=0;p0711/100;0)
- p0116: 30.44
- p1281: 0; = IF(p1277+p1280=p1263;0;IF(p1277+p1280+p1279>p1263;p1263-(p1277+p1280);p1279))
- p4487: 0; = p1932*p3480
- p2430: 0; = p2236*p2220
- p0235: 0
- p0695: 5.293; = p0035*(1+p0563*p0167/100)
- p2244: 0; = p2222*p2189
- p3026: 0; = p2245*p1023
- p1963d: 0; = p1608*p1812+p1609*p1813+p1610*p1814+p1611*p1815+p1612*p1816+p1613*p1817+p1614*p1818+p1615*p1819+p1616*p1820+p1617*p1821+p1618*p1822+p1619*p1823+p1620*p1824+p1621*p1825+p1622*p1826+p1623*p1827+p1624*p1828+p1625*p1829+p1626*p1830+p1627*p1831
- p0252: 16.947
- p0756: 0
- p2330: 4.42701e-7; = p2224*p2198
- p4116: 4.5835e-6; = p1767*p3479
- p2930: 3.17507e-7; = p2344*(p1079+p1081)
- p3204: 0; = p2423*p1082
- p1973: 0; = if(p0807=480;p1968*p0001/(p0818*p0002);0)
- p2293: 0.000168657; = p2223*p2200
- p0515: 0; = SQRT(2)*(IF((2*p0383-1)<0;-1;IF((2*p0383-1)>0;1;0))*SQRT(SQRT((2/(pi()*0.140012289)+LN(1-(2*p0383-1)^2)/2)^2-LN(1-(2*p0383-1)^2)/0.140012289)-(2/(pi()*0.140012289)+LN(1-(2*p0383-1)^2)/2)))
- p2054: 0.91
- p1111: 0.0872841
- p2237: 0; = p2222*p2182
- p1840: 0
- p0863: 0; = p0675*1000/p0856
- p2626: 0; = p2430*p1123
- p2449: 0; = p2253*p1014
- p0542: 0; = IF(p0278<0.5;-SQRT(p0007*EXP(p0410^2*p0008)-p0007);SQRT(p0007*EXP(p0410^2*p0008)-p0007))
- p1142: 0; = if(p1121=0;p1136*p0001/(p0818*p0002);0)
- p1653: 0
- p2652: 0; = p2261*(p1078+p1080)
- p1298: 0
- p1104: 0.261145; = IF(p1071=0;IF(p1096+p1101+p1102+p1103=1;0;1-(p1096+p1101+p1102+p1103));0)
- p1612: 0
- p1244: 0; = if(p1232>0;0;p1239*(p0725/100)*p0723*1000)
- p2669: 1.52866e-6; = p2278*(p1019+p1021)
- p3182: 0; = p2401*p1023
- p0963: 0; = if(and(p0683>0;or(p0807=480;p0807=32;p0807=1;and(p0807=60;p0901<0.03)));p0939;0)
- p0367: 0.5
- p1967: 0; = if(p0807=480;p0802*p0810;0)
- p1746: 0
- p2333: 3.74581e-5; = p2224*p2201
- p3042: 0; = p2261*p1082
- p1754: 1.12121e-5; = p1346*1000/p0818
- p1660: 0.731714
- p2676: 1.68257e-6; = p2285*(p1019+p1021)
- p2878: 2.50019e-7; = p2292*(p1020+p1022)
- p3256: 7.74224e7; = p1252*(p1307*(1-p3247)+p1310*(1-p3248)+p1311*(1-p3249)+p1312*(1-p3250))
- p5146: 3.92679e-7; = p1767*p3484
- p2493: 0.000233834; = p2297*p1073
- p1772: 0
- p1927: 0
- p1303: 0; = p1297*p1252/p0818
- p1343: 0; = p1342*p0001/(p0818*p0002)
- p3253: 0; = p1252*(p1277*(1-p3247)+p1280*(1-p3248)+p1281*(1-p3249)+p1282*(1-p3250))
- p1049: 0.209016; = IF(p1012=0;IF(p1037+p1044+p1045+p1046+p1047+p1048=1;0;1-(p1037+p1044+p1045+p1046+p1047+p1048));0)
- p3131: 0; = p2350*p1132
- p1185: 0.5
- p0749: 16.995; = p0089*(1+p0617*p0221/100)
- p0993: 1.09169e-5; = p0989*p0001*p0004/(p0818*p0002)
- p1893: 0
- p0267: 11.952
- p3135: 0; = p2354*p1023
- p1667: 0
- p2867: 1.04146e-6; = p2281*(p1020+p1022)
- p4664: 5.01621e-6; = p1903*p3481
- p5105: 0; = p1932*p3483
- p2265: 0; = p2226*p2211
- p1026: 109500; = IF(p1012=0;p1020*(p0704/100)*p0703*1000;0)
- p3196: 0; = p2415*p1082
- p2245: 0; = p2222*p2190
- p2090: 0.40001
- p2590: 0; = p2394*p1014
- p0980: 0; = IF(p0977=0;0;p0977*p0001/(p0818*p0002))
- p2461: 0; = p2265*p1073
- p2988: 0; = p2402*(p1020+p1022)
- p3327: 0; = if(and(p1232=0;p3255<>0);1-(p3323+p3324+p3325+p3326);0)
- p2476: 3.01643e-5; = p2280*p1014
- p0744: 0
- p0875: 0; = p0874*p0001*p0003/(p0818*p0002)
- p0683: 66.228; = p0023*(1+p0551*p0155/100)
- p2648: 0; = p2257*(p1019+p1021)
- p2397: 0; = p2234*p2186
- p2556: 0; = p2360*p1014
- p4033: 1.38237e-6; = p1890*p3478
- p0761: 0
- p3432: 0; = p3375*p1239
- p2232: 0; = if(p0783*p0787+p0784*p0788+p0785*p0789+p0786*p0790=0;0;p0789*p0785/(p0783*p0787+p0784*p0788+p0785*p0789+p0786*p0790))
- p1324: 0.219372; = IF(((p0745*1000*p0751/100)+(p0754*1000*p0760/100))/p0801<0;0;((p0745*1000*p0751/100)+(p0754*1000*p0760/100))/p0801)
- p3098: 2.17868e-8; = p2317*p1023
- p1285: 0; = p1281*p1252/p0818
- p0595: 0; = IF(p0331<0.5;-SQRT(p0007*EXP(p0463^2*p0008)-p0007);SQRT(p0007*EXP(p0463^2*p0008)-p0007))
- p3186: 0; = p2405*p1023
- p5034: 0; = p1861*p3483
- p2137: 8.44748e-8; = p2015*p2065*p2099/(p0818*1000)
- p3252: 1.95617e7; = p1252*(p1267*(1-p3247)+p1270*(1-p3248)+p1271*(1-p3249)+p1272*(1-p3250))
- p3366: 0; = if(p1232=0;p3244*p3360/p0818;0)
- p2196: 0.000824875; = p1068-p2193-p2195
- p2760: 0; = p2369*(p1019+p1021)
- p3349: 0.816024; = if(and(p1232=0;p3256<>0);1-(p3345+p3346+p3347+p3348);0)
- p2126: 1.30448e-6; = p2015*p2054*p2088/(p0818*1000)
- p1271: 0; = IF(p1267+p1270=p1259;0;IF(p1267+p1270+p1269>p1259;p1259-(p1267+p1270);p1269))
- p0955: 5.9123e-5; = if(and(p0683>0;or(p0807=56;p0807=100;and(p0807=60;p0901>0.06)));p0937;0)
- p3053: 0; = p2272*p1132
- p1706: 0
- p3261: 0.908439
- p1586: 0
- p2555: 0; = p2359*p1014
- p2765: 0; = p2374*(p1019+p1021)
- p3458: 0; = p3363*p1241
- p3087: 2.46807e-7; = p2306*p1082
- p3050: 0; = p2269*p1082
- p4419: 0; = p1864*p3480
- p0162: 28.219
- p1885: 0
- p3249: 0
- p2972: 0; = p2386*(p1079+p1081)
- p2365: 0; = p2225*p2193
- p1914: 0
- p1703: 0
- p2753: 0; = p2362*(p1019+p1021)
- p1888: 0
- p0308: 0.5
- p2104: 0.817136
- p0899: 1.13187e10; = p0825*p0896+(p0830+p0895)*p0824*p0898
- p3093: 0.000224502; = p2312*p1132
- p1174: 9.75451e-8; = p1170*p1173/p0818
- p1273: 0; = p1267*p1252/p0818
- p4925: 0; = p1962*p3482
- p2166: 0.72812; = p2165*p0824
- p2633: 0; = p2242*(p1019+p1021)
- p0733: 0
- p2720: 8.19595e-8; = p2329*(p1019+p1021)
- p1685: 0.491852
- p0962: 0; = if(and(p0683>0;or(p0807=480;p0807=32;p0807=1;and(p0807=60;p0901<0.03)));p0938;0)
- p1982: 750
- p2839: 0; = p2253*(p1020+p1022)
- p1979: 2.51603e8; = p0973
- p1715: 0
- p1573: 0
- p3335: 0; = IF(or(p3254=0;p1232>0);0;p3270*(p3280*(p3283*p1256+p3286*(p1253+p1257)+p1258*p3288+p3300*p3287)))
- p0429: 0; = SQRT(2)*(IF((2*p0297-1)<0;-1;IF((2*p0297-1)>0;1;0))*SQRT(SQRT((2/(pi()*0.140012289)+LN(1-(2*p0297-1)^2)/2)^2-LN(1-(2*p0297-1)^2)/0.140012289)-(2/(pi()*0.140012289)+LN(1-(2*p0297-1)^2)/2)))
- p1883: 0
- p2519: 6.32725e-6; = p2323*p1014
- p1282: 0; = IF(p1277+p1280+p1281=p1260;0;p1260-(p1277+p1280+p1281))
- p1797: 6.76768e-6; = p1389*1000/p0818
- p4831: 0; = p1864*p3482
- p2819: 0; = p2428*(p1128+p1130)
- p2905: 3.74869e-6; = p2319*(p1020+p1022)
- p2457: 0; = p2261*p1073
- p2564: 0; = p2368*p1014
- p1637: 0
- p1802: 0
- p2283: 1.92365e-5; = p2223*p2189
- p3080: 1.33574e-6; = p2299*p1082
- p1806: 0
- p1239: 0; = if(p1232>0;0;IF(p1234+p1238=1;0;IF(p1234+p1238+p1236>1;1-(p1234+p1238);p1236)))
- p2470: 0; = p2274*p1123
- p1011: 1.88122e-7; = p1010*p0001*p0004/(p0818*p0002)
- p0979: 0; = IF(p0976=0;0;p0976*p0001/(p0818*p0002))
- p0716: 7.585; = p0056*(1+p0584*p0188/100)
- p1635: 0
- p3313: 0; = if(and(p1232=0;p3253<>0);p3262*(p3278*(p3282*p1256+p3286*(p1253+p1257)+p1258*p3288+p3298*p3287));0)
- p5304: 2.94141e-9; = p1925*p3484
- p3293: 0.3875
- p2351: 0; = p2232*p2219
- p0034: 901.047
- p3109: 2.35329e-6; = p2328*p1023
- p1029: 6879.23; = IF(p1012=0;IF(p0801<p1023*(p0704/100)*p0703*1000;p0801;p1023*(p0704/100)*p0703*1000);0)
- p3450: 0; = p3374*p1240
- p0785: 0
- p3247: 0
- p0743: 0
- p2458: 0; = p2262*p1073
- p2551: 0; = p2355*p1014
- p3233: 0.60394
- p2260: 0; = p2226*p2206
- p5176: 9.85374e-8; = p1797*p3484
- p0349: 0.5
- p3426: 0; = p3369*p1239
- p2914: 3.74584e-5; = p2328*(p1020+p1022)
- p1969: 0; = p0803
- p5076: 0; = p1903*p3483
- p1037: 0.375071
- p2600: 0; = p2404*p1014
- p0550: 0; = IF(p0286<0.5;-SQRT(p0007*EXP(p0418^2*p0008)-p0007);SQRT(p0007*EXP(p0418^2*p0008)-p0007))
- p1005: 0; = p1001*p0888
- p1892: 0
- p1051: 75603.4; = IF(p1012=0;p1044*p1036;0)
- p0872: 120590; = p0864*p0856
- p2926: 2.45605e-5; = p2340*(p1079+p1081)
- p1963b: 2.42241e-7; = p1569*p1773+p1570*p1774+p1571*p1775+p1572*p1776+p1573*p1777+p1574*p1778+p1575*p1779+p1576*p1780+p1577*p1781+p1578*p1782+p1579*p1783+p1580*p1784+p1581*p1785+p1582*p1786+p1583*p1787+p1584*p1788+p1585*p1789+p1586*p1790+p1587*p1791
- p2956: 0; = p2370*(p1020+p1022)
- p1250: 0; = if(p1232>0;0;p1245*p0001/(p0818*p0002))
- p0261: 60.009
- p1822: 0
- p2075: 0.072
- p2098: 0.856281
- p2530: 2.99042e-6; = p2334*p1014
- p2156: 4.08549e-8; = p2015*p2085*p2118/(p0818*1000)
- p3190: 0; = p2409*p1023
- p2935: 1.73523e-5; = p2349*(p1079+p1081)
- p3160: 0; = p2379*p1082
- p2755: 0; = p2364*(p1019+p1021)
- p3324: 0; = if(and(p1232=0;p3255<>0);p3266*(p3279*(p3284*p1256+p3286*(p1253+p1257)+p1258*p3288+p3299*p3287));0)
- p2411: 0; = p2234*p2201
- p0334: 0.5
- p0307: 0.5
- p1962: 7.34339e-6; = p1960*1000/p0818
- p2176: 0.00269353; = p0895*p0913/p0818
- p2259: 0; = p2226*p2205
- p3454: 0; = p3378*p1240
- p0773: 19.005; = p0113*(1+p0641*p0245/100)
- p1688: 0
- p0638: 0; = IF(p0374<0.5;-SQRT(p0007*EXP(p0506^2*p0008)-p0007);SQRT(p0007*EXP(p0506^2*p0008)-p0007))
- p1709: 0
- p3304: 0.0017178; = if(and(p1232=0;p3252<>0);p3260*p3289;0)
- p3070: 4.54266e-6; = p2289*p1023
- p3006: 0; = p2420*(p1079+p1081)
- p0841: 0.0788022
- p1870: 0
- p2619: 0; = p2423*p1073
- p0827: 0; = p0818*p0819*p0823
- p3177: 0; = p2396*p1023
- p2127: 4.01574e-6; = p2015*p2055*p2089/(p0818*1000)
- p4458: 0; = p1903*p3480
- p1726: 0
- p3481: 0.11338; = if(p1328+p1330+p1332+p1334+p1336+p1338+p1340+p1342+p1344=0;0;p1338/(p1328+p1330+p1332+p1334+p1336+p1338+p1340+p1342+p1344))
- p3234: 0.39606; = 1-p3233
- p0152: 0
- p1642: 0
- p1771: 0
- p1099: 0.652345
- p2858: 0; = p2272*(p1129+p1131)
- p1328: 1.13734e6; = p1319*p0801
- p3352: 1.93361e6; = if(and(p1232=0;p3256<>0);p3256*(p3275-p3347)/p3349;0)
- p1268: 0
- p2499: 1.82769e-5; = p2303*p1073
- p0052: 29.687
- p2814: 0; = p2423*(p1078+p1080)
- p2379: 0; = p2229*p2208
- p3690: 3.49951e-5; = p1963*p3476
- p1934: 0
- p2609: 0; = p2413*p1014
- p1698: 0
- p2679: 1.67038e-5; = p2288*(p1019+p1021)
- p2838: 0; = p2252*(p1020+p1022)
- p2226: 0; = if(p0774*p0778+p0775*p0779+p0776*p0780+p0777*p0781=0;0;p0778*p0774/(p0774*p0778+p0775*p0779+p0776*p0780+p0777*p0781))
- p0988: 1.51497e6; = p0982*p0886
- p2923: 5.54888e-5; = p2337*(p1079+p1081)
- p0987: 0.00306741; = if(p0978>0;0;if(and(p0687=0;p0691=0;p0695=0;p0699=0);0;IF(p0982+p0985+p0986=1;0;1-(p0982+p0985+p0986))))
- p3206: 0; = p2425*p1082
- p1277: 0
- p2823: 0; = p2237*(p1020+p1022)
- p0196: 52.95
- p1824: 0
- p2416: 0; = p2235*p2206
- p2636: 0; = p2245*(p1019+p1021)
- p0717: 43.763; = p0057*(1+p0585*p0189/100)
- p0078: 3799.05
- p1296: 0; = p1292*p1252/p0818
- p2589: 0; = p2393*p1014
- p2271: 0; = p2226*p2217
- p0928: 347638; = p0801*p0918
- p3242: 3.26694e-8; = p3234*p1188*p3238/p0818
- p1264: 0; = if(p1232>0;0;IF(p1259+p1263=1;0;IF(p1259+p1263+p1261>1;1-(p1259+p1263);p1261)))
- p1923: 0
- p2092: 0.54529
- p2412: 0; = p2234*p2202
- p0009: 33.8523
- p0879: 0.196794; = p0878*p0001*p0003/(p0818*p0002)
- p1625: 0
- p0518: 0; = SQRT(2)*(IF((2*p0386-1)<0;-1;IF((2*p0386-1)>0;1;0))*SQRT(SQRT((2/(pi()*0.140012289)+LN(1-(2*p0386-1)^2)/2)^2-LN(1-(2*p0386-1)^2)/0.140012289)-(2/(pi()*0.140012289)+LN(1-(2*p0386-1)^2)/2)))
- p1876: 0
- p1644: 0
- p2030: 8.87
- p2575: 0; = p2379*p1073
- p2889: 7.66784e-6; = p2303*(p1079+p1081)
- p1963e: 6.66278e-7; = p1628*p1832+p1629*p1833+p1630*p1834+p1631*p1835+p1632*p1836+p1633*p1837+p1634*p1838+p1635*p1839+p1636*p1840+p1637*p1841+p1638*p1842+p1639*p1843+p1640*p1844+p1641*p1845+p1642*p1846+p1643*p1847+p1644*p1848+p1645*p1849+p1646*p1850
- p1830: 0
- p3468: 0; = p3373*p1241
- p2301: 0.000191579; = p2227*p2208
- p1237: 0; = if(p1232>0;0;p0729/100)
- p0706: 30.387; = p0046*(1+p0574*p0178/100)
- p3371: 0; = if(p1232=0;p3245*p3359/p0818;0)
- p5132: 0; = p1963*p3483
- p2386: 0; = p2229*p2215
- p4213: 4.29167e-7; = p1864*p3479
- p1576: 0
- p2331: 9.73324e-7; = p2224*p2199
- p0903: 0.0257527
- p2822: 0; = p2431*(p1128+p1130)
- p2473: 3.68514e-5; = p2277*p1014
- p3141: 0; = p2360*p1023
- p2249: 0; = p2222*p2195
- p2759: 0; = p2368*(p1019+p1021)
- p3410: 0; = p3372*p1238
- p0723: 3799.05; = p0063*(1+p0591*p0195/100)
- p4444: 0; = p1889*p3480
- p3443: 0; = p3367*p1240
- p3266: 0.0545989
- p3895: 0; = p1962*p3477
- p3272: 0.0398246
- p2996: 0; = p2410*(p1020+p1022)
- p3408: 0; = p3370*p1238
- p0053: 20.499
- p4558: 7.67319e-7; = p1797*p3481
- p1246: 9.26227e-12; = if(p1232>0;0;p1241*(p0725/100)*p0723*1000)
- p1321: 1.05917; = IF(((p0745*1000*p0748/100)+(p0754*1000*p0757/100))/p0801<0;0;((p0745*1000*p0748/100)+(p0754*1000*p0757/100))/p0801)
- p3014: 0; = p2428*(p1129+p1131)
- p0547: 0; = IF(p0283<0.5;-SQRT(p0007*EXP(p0415^2*p0008)-p0007);SQRT(p0007*EXP(p0415^2*p0008)-p0007))
- p2431: 0; = p2236*p2221
- p0310: 0.5
- p1090: 1.93164e-5; = IF(p1071=0;p1084*p0001/(p0818*p0002);0)
- p0641: 0; = IF(p0377<0.5;-SQRT(p0007*EXP(p0509^2*p0008)-p0007);SQRT(p0007*EXP(p0509^2*p0008)-p0007))
- p2828: 0; = p2242*(p1020+p1022)
- p1748: 0
- p2164: 0.000642561; = (p2015/p0818)-(p2022)-(p2035+p2036+p2052)-(p2017/p0818)-(p2039+p2041+p2044+p2158+p2159+p2160+p2161+p2162)
- p3003: 0; = p2417*(p1079+p1081)
- p1143: 0; = if(p1121=0;p1137*p0001/(p0818*p0002);0)
- p0994: 0; = p0990*p0001*p0004/(p0818*p0002)
- p0139: 25.558
- p2483: 0.000142245; = p2287*p1014
- p1267: 0
- p0750: 0
- p0805: 0
- p3128: 1.03205e-6; = p2347*p1082
- p2785: 0; = p2394*(p1019+p1021)
- p2037: 3.16
- p3166: 0; = p2385*p1082
- p2918: 1.16265e-5; = p2332*(p1020+p1022)
- p0727: 64.454; = p0067*(1+p0595*p0199/100)
- p1280: 0; = IF(p1277=p1263;0;IF(p1277+p1278>p1263;p1263-p1277;p1278))
- p3396: 0.000313844; = p3377*p1234
- p0730: 20.17; = p0070*(1+p0598*p0202/100)
- p1880: 0
- p2181: 146.24; = p0887+p0889+p0893+p2180
- p1056: 2.53468e6; = IF(p1012=0;p1049*p1036;0)
- p2598: 0; = p2402*p1014
- p1805: 0
- p2969: 0; = p2383*(p1079+p1081)
- p4899: 0; = p1932*p3482
- p2240: 0; = p2222*p2185
- p1130: 0; = if(p1121=0;IF(p1123+p1128+p1129=1;0;IF(p1123+p1128+p1129+p1126>1;1-(p1123+p1128+p1129);p1126));0)
- p0904: 9.7387e8; = p0825*p0901+(p0830+p0895)*p0824*p0903
- p1780: 0
- p0254: 28.438
- p2113: 0.832356
- p5170: 4.41212e-9; = p1791*p3484
- p3347: 0.00107264; = if(and(p1232=0;p3256<>0);p3275*p3289;0)
- p0737: 0
- p0079: 1.288
- p3296: 0.514
- p0019: 656.053
- p2316: 3.4416e-5; = p2224*p2183
- p0690: 231.776; = p0030*(1+p0558*p0162/100)
- p1249: 0; = if(p1232>0;0;p1244*p0001/(p0818*p0002))
- p2055: 5.59471
- p2947: 0; = p2361*(p1020+p1022)
- p2154: 2.27513e-7; = p2015*p2082*p2116/(p0818*1000)
- p1854: 0
- p0771: 43.946; = p0111*(1+p0639*p0243/100)
- p2883: 9.81019e-5; = p2297*(p1079+p1081)
- p2198: 1.29727e-6; = 22.98976928*p2197/14.0067
- p3181: 0; = p2400*p1023
- p1098: 0.020586
- p1559: 0
- p1133: 126107; = if(p1121=0;p1123*(p0716/100)*p0703*1000;0)
- p2049: 25.6942
- p2888: 1.77592e-5; = p2302*(p1079+p1081)
- p1752: 0
- p0401: 0.5
- p2162: 2.92553e-8; = p2015*p2086*p2124/(p0818*1000)
- p3482: 0; = if(p1328+p1330+p1332+p1334+p1336+p1338+p1340+p1342+p1344=0;0;p1340/(p1328+p1330+p1332+p1334+p1336+p1338+p1340+p1342+p1344))
- p3101: 3.3895e-8; = p2320*p1023
- p1881: 0
- p0917: 1.32164
- p2173: 0.124066; = p0895*p0898/p0818
- p1868: 0
- p2027: 0.428799
- p3043: 0; = p2262*p1082
- p3090: 1.43924e-7; = p2309*p1082
- p0482: 0; = SQRT(2)*(IF((2*p0350-1)<0;-1;IF((2*p0350-1)>0;1;0))*SQRT(SQRT((2/(pi()*0.140012289)+LN(1-(2*p0350-1)^2)/2)^2-LN(1-(2*p0350-1)^2)/0.140012289)-(2/(pi()*0.140012289)+LN(1-(2*p0350-1)^2)/2)))
- p1758: 0
- p2778: 0; = p2387*(p1078+p1080)
- p2882: 1.58757e-5; = p2296*(p1020+p1022)
- p3345: 0.160606; = if(and(p1232=0;p3256<>0);p3273*p3277*p3293;0)
- p2810: 0; = p2419*(p1078+p1080)
- p1611: 0
- p0317: 0.5
- p0807: 60
- p2155: 2.20496e-7; = p2015*p2084*p2117/(p0818*1000)
- p1812: 0
- p2786: 0; = p2395*(p1019+p1021)
- p3020: 0; = p2239*p1023
- p3038: 0; = p2257*p1023
- p2128: 1.49213e-6; = p2015*p2056*p2090/(p0818*1000)
- p1191: 0.5
- p1186: 2.68322e-8; = p1182*p1185/p0818
- p1226: 3.8e6; = IF(p1221=0;0;IF(p1193=0;p0801;0))
- p1763: 0
- p3041: 0; = p2260*p1082
- p1291: 0; = IF(p1287+p1290=p1264;0;IF(p1287+p1290+p1289>p1264;p1264-(p1287+p1290);p1289))
- p3059: 4.2056e-8; = p2278*p1023
- p3072: 7.14416e-9; = p2291*p1023
- p3175: 0; = p2394*p1023
- p3273: 0.753577
- p0135: 14.737
- p2987: 0; = p2401*(p1020+p1022)
- p1929: 0
- p0912: 0
- p3474: 7.82446e-20; = p3379*p1241
- p2725: 1.63818e-6; = p2334*(p1019+p1021)
- p1884: 0
- p0272: 28.438
- p0825: 8.89845e9; = p0818*p0822
- p0880: 0; = p0868*p0856
- p1607: 0
- p2782: 0; = p2391*(p1128+p1130)
- p3464: 0; = p3369*p1241
- p0772: 0
- p3451: 0; = p3375*p1240
- p1222: 0.94
- p2708: 7.91908e-7; = p2317*(p1019+p1021)
- p0487: 0; = SQRT(2)*(IF((2*p0355-1)<0;-1;IF((2*p0355-1)>0;1;0))*SQRT(SQRT((2/(pi()*0.140012289)+LN(1-(2*p0355-1)^2)/2)^2-LN(1-(2*p0355-1)^2)/0.140012289)-(2/(pi()*0.140012289)+LN(1-(2*p0355-1)^2)/2)))
- p1434: 9
- p2903: 3.46791e-7; = p2317*(p1020+p1022)
- p0736: 0
- p2526: 2.45566e-7; = p2330*p1014
- p0957: 8.56133e-8; = if(and(p0683>0;or(p0807=56;p0807=100;and(p0807=60;p0901>0.06)));p0939;0)
- p1251: 8.34709e-22; = if(p1232>0;0;p1246*p0001/(p0818*p0002))
- p1150: 5.60872e6; = if(p1121=0;p1149*p1146*p1145;0)
- p3216: 0.06; = IF(OR(p1226=0;p1228=0);0;1-p3213-p3214-p3215)
- p2628: 0; = p2237*(p1019+p1021)
- p4856: 0; = p1889*p3482
- p2414: 0; = p2235*p2204
- p1730: 0
- p1334: 1.24954e6; = p1322*p0801
- p2924: 1.79687e-5; = p2338*(p1079+p1081)
- p1331: 0; = p1330*p0001/(p0818*p0002)
- p0176: 15.279
- p2884: 8.87256e-5; = p2298*(p1079+p1081)
- p2841: 0; = p2255*(p1020+p1022)
- p3331: 0; = if(and(p1232=0;p3255<>0);p3255*(p3268-p3326)/p3327;0)
- p0873: 0.108675; = p0872*p0001*p0003/(p0818*p0002)
- p3165: 0; = p2384*p1082
- p2361: 0; = p2225*p2189
- p3369: 0; = if(p1232=0;p3245*p3357/p0818;0)
- p1617: 0
- p0960: 0; = if(and(p0683>0;or(p0807=480;p0807=32;p0807=1;and(p0807=60;p0901<0.03)));p0936;0)
- p1081: 0; = IF(p1071=0;IF(p1073+p1078+p1079+p1080=1;0;IF(p1073+p1078+p1079+p1080+p1077>1;1-(p1073+p1078+p1079+p1080);p1077));0)
- p2621: 0; = p2425*p1073
- p2066: 0.109412
- p1017: 0; = IF(p1012=0;p0708/100;0)
- p0607: 0; = IF(p0343<0.5;-SQRT(p0007*EXP(p0475^2*p0008)-p0007);SQRT(p0007*EXP(p0475^2*p0008)-p0007))
- p2358: 0; = p2225*p2186
- p4146: 1.15017e-6; = p1797*p3479
- p0575: 0; = IF(p0311<0.5;-SQRT(p0007*EXP(p0443^2*p0008)-p0007);SQRT(p0007*EXP(p0443^2*p0008)-p0007))
- p0407: 0; = SQRT(2)*(IF((2*p0275-1)<0;-1;IF((2*p0275-1)>0;1;0))*SQRT(SQRT((2/(pi()*0.140012289)+LN(1-(2*p0275-1)^2)/2)^2-LN(1-(2*p0275-1)^2)/0.140012289)-(2/(pi()*0.140012289)+LN(1-(2*p0275-1)^2)/2)))
- p2806: 0; = p2415*(p1078+p1080)
- p2482: 2.48562e-5; = p2286*p1014
- p2837: 0; = p2251*(p1020+p1022)
- p0005: 1.60934
- p2432: 0.00257612; = p1158
- p2552: 0; = p2356*p1014
- p0731: 0
- p3423: 0; = p3366*p1239
- p2489: 9.35538e-5; = p2293*p1014
- p0260: 53.798
- p3171: 0; = p2390*p1132
- p1069: 4.93981e-6; = IF(p1012=0;p1055/(p1062*p0818);0)
- p2369: 0; = p2225*p2198
- p1940: 0
- p2109: 0.826583
- p2658: 0; = p2267*(p1078+p1080)
- p3267: 0.0170629
- p1265: 0; = if(p1232>0;0;IF(p1259+p1263+p1264=1;0;IF(p1259+p1263+p1264+p1262>1;1-(p1259+p1263+p1264);p1262)))
- p0984: 0; = if(p0886=0;0;min(1;(p0699*p0698*1000*p0701/100)/p0886))
- p1235: 0.64454; = if(p1232>0;0;p0727/100)
- p1932: 1.0101e-6; = p1524*1000/p0818
- p2022: 0.000308417; = p2018*p2015/p0818-p2021
- p2007: 0.00383439; = ((p1981*p1985+p1987*p1991+p1993*p1997+p2001*p2005)/p0818)*p0005*p0002/1000
- p1482: 25
- p3230: 1.9509e-7; = p1170/p0818
- p1124: 0.28117; = if(p1121=0;p0718/100;0)
- p0503: 0; = SQRT(2)*(IF((2*p0371-1)<0;-1;IF((2*p0371-1)>0;1;0))*SQRT(SQRT((2/(pi()*0.140012289)+LN(1-(2*p0371-1)^2)/2)^2-LN(1-(2*p0371-1)^2)/0.140012289)-(2/(pi()*0.140012289)+LN(1-(2*p0371-1)^2)/2)))
- p2144: 2.05892e-7; = p2015*p2072*p2106/(p0818*1000)
- p1629: 0
- p2542: 1.40218e-5; = p2346*p1073
- p2388: 0; = p2229*p2217
- p0975: 0.0127072; = p0973*p0974/p0818
- p1279: 0
- p1055: 7824.66; = IF(p1012=0;p1048*p1036;0)
- p2650: 0; = p2259*(p1078+p1080)
- p2309: 1.51022e-5; = p2227*p2216
- p0673: 0
- p0047: 13.307
- p0453: 0; = SQRT(2)*(IF((2*p0321-1)<0;-1;IF((2*p0321-1)>0;1;0))*SQRT(SQRT((2/(pi()*0.140012289)+LN(1-(2*p0321-1)^2)/2)^2-LN(1-(2*p0321-1)^2)/0.140012289)-(2/(pi()*0.140012289)+LN(1-(2*p0321-1)^2)/2)))
- p2741: 0; = p2350*(p1128+p1130)
- p0578: 0; = IF(p0314<0.5;-SQRT(p0007*EXP(p0446^2*p0008)-p0007);SQRT(p0007*EXP(p0446^2*p0008)-p0007))
- p0177: 11.343
- p2805: 0; = p2414*(p1078+p1080)
- p1306: 0; = p1302*p1252/p0818
- p0137: 37.464
- p2723: 2.65495e-5; = p2332*(p1019+p1021)
- p2771: 0; = p2380*(p1078+p1080)
- p3143: 0; = p2362*p1023
- p2480: 1.22138e-5; = p2284*p1014
- p3337: 0; = IF(or(p3254=0;p1232>0);0;p3272*p3289)
- p1764: 0
- p2121: 0.822447
- p1936: 0
- p2595: 0; = p2399*p1014
- p2892: 5.30881e-6; = p2306*(p1079+p1081)
- p2860: 0; = p2274*(p1129+p1131)
- p3163: 0; = p2382*p1082
- p1290: 0; = IF(p1287=p1264;0;IF(p1287+p1288>p1264;p1264-p1287;p1288))
- p0545: 0; = IF(p0281<0.5;-SQRT(p0007*EXP(p0413^2*p0008)-p0007);SQRT(p0007*EXP(p0413^2*p0008)-p0007))
- p0320: 0.5
- p2230: 0; = if(p0783*p0787+p0784*p0788+p0785*p0789+p0786*p0790=0;0;p0787*p0783/(p0783*p0787+p0784*p0788+p0785*p0789+p0786*p0790))
- p3393: 0.00114126; = p3374*p1234
- p2706: 4.7642e-5; = p2315*(p1019+p1021)
- p3439: 0; = p3363*p1240
- p0939: 8.56133e-8; = p0933*p0001/(p0818*p0002)
- p0352: 0.5
- p0128: 69.157
- p3478: 0.54742; = if(p1328+p1330+p1332+p1334+p1336+p1338+p1340+p1342+p1344=0;0;p1332/(p1328+p1330+p1332+p1334+p1336+p1338+p1340+p1342+p1344))
- p2405: 0; = p2234*p2195
- p2252: 0; = p2222*p2198
- p0999: 0; = IF(p0996=1;0;IF(p0996+p0997>1;1-p0996;p0997))
- p1633: 0
- p2074: 0.025
- p1045: 0.0673925; = IF(p1012=0;IF(p1037+p1044=1;0;IF(p1037+p1044+p1039>1;1-(p1037+p1044);p1039));0)
- p2543: 5.2914e-5; = p2347*p1073
- p3123: 2.22941e-7; = p2342*p1082
- p3150: 0; = p2369*p1023
- p2989: 0; = p2403*(p1020+p1022)
- p1662: 0
- p3391: 0; = p3372*p1234
- p0426: 0; = SQRT(2)*(IF((2*p0294-1)<0;-1;IF((2*p0294-1)>0;1;0))*SQRT(SQRT((2/(pi()*0.140012289)+LN(1-(2*p0294-1)^2)/2)^2-LN(1-(2*p0294-1)^2)/0.140012289)-(2/(pi()*0.140012289)+LN(1-(2*p0294-1)^2)/2)))
- p0811: 0; = if(p0807=480;1-p0810;0)
- p1651: 0.299611
- p0591: 0; = IF(p0327<0.5;-SQRT(p0007*EXP(p0459^2*p0008)-p0007);SQRT(p0007*EXP(p0459^2*p0008)-p0007))
- p0931: 656053; = p0801*p0925
- p4397: 0; = p1842*p3480
- p3049: 0; = p2268*p1082
- p1626: 0
- p2653: 0; = p2262*(p1078+p1080)
- p1447: 1852
- p1016: 0.13307; = IF(p1012=0;p0707/100;0)
- p2906: 5.39522e-7; = p2320*(p1020+p1022)
- p2844: 0; = p2258*(p1079+p1081)
- p1220: 0; = IF(p1218<0.5;-SQRT(p1214*EXP(p1219^2*p1215)-p1214);SQRT(p1214*EXP(p1219^2*p1215)-p1214))
- p1616: 0
- p1690: 0
- p2360: 0; = p2225*p2188
- p1957: 0
- p2071: 0.151
- p2290: 5.20651e-7; = p2223*p2197
- p0438: 0; = SQRT(2)*(IF((2*p0306-1)<0;-1;IF((2*p0306-1)>0;1;0))*SQRT(SQRT((2/(pi()*0.140012289)+LN(1-(2*p0306-1)^2)/2)^2-LN(1-(2*p0306-1)^2)/0.140012289)-(2/(pi()*0.140012289)+LN(1-(2*p0306-1)^2)/2)))
- p0214: 11.544
- p0056: 7.585
- p1097: 0.0625488
- p2742: 0; = p2351*(p1128+p1130)
- p2053: 1.45647
- p2319: 2.81708e-5; = p2224*p2186
- p1829: 0
- p3418: 0.0441991; = p3380*p1238
- p3315: 0; = if(and(p1232=0;p3253<>0);p3264*p3289;0)
- p0613: 0; = IF(p0349<0.5;-SQRT(p0007*EXP(p0481^2*p0008)-p0007);SQRT(p0007*EXP(p0481^2*p0008)-p0007))
- p2644: 0; = p2253*(p1019+p1021)
- p0643: 0; = IF(p0379<0.5;-SQRT(p0007*EXP(p0511^2*p0008)-p0007);SQRT(p0007*EXP(p0511^2*p0008)-p0007))
- p1608: 0
- p2511: 8.69681e-5; = p2315*p1014
- p2507: 0.000247934; = p2311*p1123
- p1106: 39852.8; = IF(p1071=0;p1105*p1096*p1095;0)
- p1151: 505106; = if(p1121=0;p1149*p1148*p1145;0)
- p3235: 0.118093
- p2124: 0.263965
- p2190: 3.34253e-5; = 32.065*p2189/(2*14.0067)
- p1565: 0
- p3158: 0; = p2377*p1082
- p2622: 0; = p2426*p1073
- p2197: 7.9037e-7; = p1055/p0818
- p1963g: 1.4209e-5; = p1667*p1871+p1668*p1872+p1669*p1873+p1670*p1874+p1671*p1875+p1672*p1876+p1673*p1877+p1674*p1878+p1675*p1879+p1676*p1880+p1677*p1881+p1678*p1882+p1679*p1883+p1680*p1884+p1681*p1885+p1682*p1886+p1683*p1887+p1684*p1888+p1685*p1889
- p3169: 0; = p2388*p1082
- p1389: 67
- p1692: 0
- p1933: 0
- p2540: 7.56803e-7; = p2344*p1073
- p2922: 6.13527e-5; = p2336*(p1079+p1081)
- p2982: 0; = p2396*(p1020+p1022)
- p3463: 0; = p3368*p1241
- p1773: 0
- p0507: 0; = SQRT(2)*(IF((2*p0375-1)<0;-1;IF((2*p0375-1)>0;1;0))*SQRT(SQRT((2/(pi()*0.140012289)+LN(1-(2*p0375-1)^2)/2)^2-LN(1-(2*p0375-1)^2)/0.140012289)-(2/(pi()*0.140012289)+LN(1-(2*p0375-1)^2)/2)))
- p1917: 0
- p3290: 0.195
- p3076: 8.69993e-8; = p2295*p1023
- p0799: 25.558; = p0139*(1+p0667*p0271/100)
- p2591: 0; = p2395*p1014
- p2033: 5.16945e-6; = p2015*p2029*p2031/(p0818*1000)
- p1908: 0
- p1071: 0
- p0406: 0; = SQRT(2)*(IF((2*p0274-1)<0;-1;IF((2*p0274-1)>0;1;0))*SQRT(SQRT((2/(pi()*0.140012289)+LN(1-(2*p0274-1)^2)/2)^2-LN(1-(2*p0274-1)^2)/0.140012289)-(2/(pi()*0.140012289)+LN(1-(2*p0274-1)^2)/2)))
- p1672: 0
- p0833: 1.5815e10; = p0830+p0832
- p1007: 0; = p1003*p0001*p0004/(p0818*p0002)
- p1214: 0; = IF(p1213=0;0;p1213-1)
- p1253: 0; = if(p1232>0;0;p0735/100)
- p1383: 3
- p2171: 0.0841513; = p2165*p0831
- p1707: 0
- p5243: 3.67677e-8; = p1864*p3484
- p2419: 0; = p2235*p2209
- p2752: 0; = p2361*(p1019+p1021)
- p1089: 3.17924e-5; = IF(p1071=0;p1083*p0001/(p0818*p0002);0)
- p3111: 3.70098e-9; = p2330*p1023
- p2409: 0; = p2234*p2199
- p2261: 0; = p2226*p2207
- p3113: 7.30423e-7; = p2332*p1023
- p1105: 0.436421
- p1169: 0.000508261
- p0840: 0.0811394; = p0839*p0831
- p0439: 0; = SQRT(2)*(IF((2*p0307-1)<0;-1;IF((2*p0307-1)>0;1;0))*SQRT(SQRT((2/(pi()*0.140012289)+LN(1-(2*p0307-1)^2)/2)^2-LN(1-(2*p0307-1)^2)/0.140012289)-(2/(pi()*0.140012289)+LN(1-(2*p0307-1)^2)/2)))
- p2756: 0; = p2365*(p1019+p1021)
- p2243: 0; = p2222*p2188
- p4307: 1.24801e-6; = p1962*p3479
- p0449: 0; = SQRT(2)*(IF((2*p0317-1)<0;-1;IF((2*p0317-1)>0;1;0))*SQRT(SQRT((2/(pi()*0.140012289)+LN(1-(2*p0317-1)^2)/2)^2-LN(1-(2*p0317-1)^2)/0.140012289)-(2/(pi()*0.140012289)+LN(1-(2*p0317-1)^2)/2)))
- p3207: 0; = p2426*p1082
- p1842: 9.09091e-7; = p1434*1000/p0818
- p0554: 0; = IF(p0290<0.5;-SQRT(p0007*EXP(p0422^2*p0008)-p0007);SQRT(p0007*EXP(p0422^2*p0008)-p0007))
- p3381: 0; = p3362*p1234
- p2303: 3.74059e-5; = p2227*p2210
- p0178: 21.609
- p0400: 0.5
- p2088: 0.798875
- p1297: 0
- p2357: 0; = p2225*p2185
- p2948: 0; = p2362*(p1020+p1022)
- p3401: 0; = p3363*p1238
- p2263: 0; = p2226*p2209
- p1014: 0.5547; = IF(p1012=0;p0705/100;0)
- p0315: 0.5
- p1317: 0
- p1621: 0
- p2202: 1.57977e-5; = 4*1.00794*p2201/(2*14.0067)
- p0725: 2.196; = p0065*(1+p0593*p0197/100)
- p5063: 0; = p1890*p3483
- p2210: 6.07995e-5; = 6*1.00794*p2208/30.973762
- p0459: 0; = SQRT(2)*(IF((2*p0327-1)<0;-1;IF((2*p0327-1)>0;1;0))*SQRT(SQRT((2/(pi()*0.140012289)+LN(1-(2*p0327-1)^2)/2)^2-LN(1-(2*p0327-1)^2)/0.140012289)-(2/(pi()*0.140012289)+LN(1-(2*p0327-1)^2)/2)))
- p2649: 0; = p2258*(p1078+p1080)
- p3229: 3.30734e-6; = p1164/p0818
- p3472: 9.80242e-20; = p3377*p1241
- p1816: 0
- p3407: 0; = p3369*p1238
- p1021: 0; = IF(p1012=0;IF(p1014+p1019+p1020=1;0;IF(p1014+p1019+p1020+p1017>1;1-(p1014+p1019+p1020);p1017));0)
- p3317: 0; = if(and(p1232=0;p3253<>0);p3253*(p3261*p3277-p3312)/p3316;0)
- p3428: 0; = p3371*p1239
- p1905: 0
- p2208: 0.000311393; = p1110/p0818
- p0652: 0; = IF(p0388<0.5;-SQRT(p0007*EXP(p0520^2*p0008)-p0007);SQRT(p0007*EXP(p0520^2*p0008)-p0007))
- p0475: 0; = SQRT(2)*(IF((2*p0343-1)<0;-1;IF((2*p0343-1)>0;1;0))*SQRT(SQRT((2/(pi()*0.140012289)+LN(1-(2*p0343-1)^2)/2)^2-LN(1-(2*p0343-1)^2)/0.140012289)-(2/(pi()*0.140012289)+LN(1-(2*p0343-1)^2)/2)))
- p2218: 0.000566537; = p1150/p0818
- p2683: 5.70926e-7; = p2292*(p1019+p1021)
- p3896: 0; = p1963*p3477
- p3170: 0; = p2389*p1132
- p1736: 0
- p0608: 0; = IF(p0344<0.5;-SQRT(p0007*EXP(p0476^2*p0008)-p0007);SQRT(p0007*EXP(p0476^2*p0008)-p0007))
- p1578: 0
- p2008: 0.00718948; = ((p1982*p1985+p1988*p1991+p1994*p1997+p2002*p2005)/p0818)*p0005*p0002/1000
- p3373: 0; = if(p1232=0;p3245*p3361/p0818;0)
- p3419: 0; = p3362*p1239
- p2206: 0.000227818; = 9*1.00794*p2204/30.973762
- p0619: 0; = IF(p0355<0.5;-SQRT(p0007*EXP(p0487^2*p0008)-p0007);SQRT(p0007*EXP(p0487^2*p0008)-p0007))
- p3634: 6.84386e-6; = p1903*p3476
- p2490: 4.01087e-5; = p2294*p1014
- p1769: 0
- p3197: 0; = p2416*p1082
- p2026: 68.85
- p1053: 289098; = IF(p1012=0;p1046*p1036;0)
- p2315: 0.000156784; = p2224*p2182
- p2406: 0; = p2234*p2196
- p1778: 0
- p0511: 0; = SQRT(2)*(IF((2*p0379-1)<0;-1;IF((2*p0379-1)>0;1;0))*SQRT(SQRT((2/(pi()*0.140012289)+LN(1-(2*p0379-1)^2)/2)^2-LN(1-(2*p0379-1)^2)/0.140012289)-(2/(pi()*0.140012289)+LN(1-(2*p0379-1)^2)/2)))
- p2764: 0; = p2373*(p1019+p1021)
- p1791: 3.0303e-7; = p1383*1000/p0818
- p0223: 25.923
- p0379: 0.5
- p2052: 2.21022e-6; = p2015*p2049*(1-p2050)/(p0818*1000)
- p3367: 0; = if(p1232=0;p3244*p3361/p0818;0)
- p1164: 32742.7; = p1163*p0801
- p2611: 0; = p2415*p1073
- p0516: 0; = SQRT(2)*(IF((2*p0384-1)<0;-1;IF((2*p0384-1)>0;1;0))*SQRT(SQRT((2/(pi()*0.140012289)+LN(1-(2*p0384-1)^2)/2)^2-LN(1-(2*p0384-1)^2)/0.140012289)-(2/(pi()*0.140012289)+LN(1-(2*p0384-1)^2)/2)))
- p1159: 0.5
- p1286: 0; = p1282*p1252/p0818
- p5282: 6.4417e-7; = p1903*p3484
- p1887: 0
- p0448: 0; = SQRT(2)*(IF((2*p0316-1)<0;-1;IF((2*p0316-1)>0;1;0))*SQRT(SQRT((2/(pi()*0.140012289)+LN(1-(2*p0316-1)^2)/2)^2-LN(1-(2*p0316-1)^2)/0.140012289)-(2/(pi()*0.140012289)+LN(1-(2*p0316-1)^2)/2)))
- p2069: 0.190588
- p1959: 4186.7; = if(p0738*p0740*p0739>0;p0738*1000*(p0740/100)*p0739/1000;p1958)
- p1570: 0
- p0927: 0.00025; = IF(p0918+p0923+p0924+p0925+p0926=1;0;1-(p0918+p0923+p0924+p0925+p0926))
- p2816: 0; = p2425*(p1078+p1080)
- p2736: 4.80825e-6; = p2345*(p1078+p1080)
- p1658: 0
- p2763: 0; = p2372*(p1019+p1021)
- p0081: 1.28
- p3455: 0; = p3379*p1240
- p2019: 0.13105
- p3892: 0; = p1955*p3477
- p0818: 9.9e9; = p0806*p0807
- p2586: 0; = p2390*p1123
- p2186: 8.25503e-5; = p1052/p0818
- p1604: 0
- p2826: 0; = p2240*(p1020+p1022)
- p0859: 0.0317342; = p0671*1000/p0856
- p0688: 0
- p0045: 55.47
- p1108: 243016; = IF(p1071=0;p1105*p1102*p1095;0)
- p3364: 0; = if(p1232=0;p3244*p3358/p0818;0)
- p2962: 0; = p2376*(p1079+p1081)
- p1918: 0
- p1835: 0
- p1192: 4.82523e-8; = p1188*p1191/p0818
- p0745: 7352.38; = p0085*(1+p0613*p0217/100)
- p2934: 1.9361e-6; = p2348*(p1079+p1081)
- p4352: 0; = p1797*p3480
- p2135: 1.44608e-6; = p2015*p2063*p2097/(p0818*1000)
- p1322: 0.328826; = IF(((p0745*1000*p0749/100)+(p0754*1000*p0758/100))/p0801<0;0;((p0745*1000*p0749/100)+(p0754*1000*p0758/100))/p0801)
- p2829: 0; = p2243*(p1020+p1022)
- p0738: 3799.05; = p0078*(1+p0606*p0210/100)
- p1855: 0.000187071; = p1447*1000/p0818
- p2931: 3.32012e-6; = p2345*(p1079+p1081)
- p3139: 0; = p2358*p1023
- p2686: 3.16226e-6; = p2295*(p1019+p1021)
- p1696: 0
- p2705: 2.49287e-5; = p2314*(p1128+p1130)
- p1225: 1.088; = IF(p1221=0;0;p1223+1.2*p1224)
- p0574: 0; = IF(p0310<0.5;-SQRT(p0007*EXP(p0442^2*p0008)-p0007);SQRT(p0007*EXP(p0442^2*p0008)-p0007))
- p0331: 0.5
- p1566: 0
- p2342: 2.33936e-5; = p2228*p2210
- p0657: 0; = IF(p0393<0.5;-SQRT(p0007*EXP(p0525^2*p0008)-p0007);SQRT(p0007*EXP(p0525^2*p0008)-p0007))
- p0823: 0
- p2862: 4.02733e-5; = p2276*(p1020+p1022)
- p2504: 8.46085e-5; = p2308*p1073
- p3036: 0; = p2255*p1023
- p3399: 0.0243755; = p3380*p1234
- p1800: 0
- p2804: 0; = p2413*(p1019+p1021)
- p1224: 0.44; = IF(p1221=0;0;IF(p1193=0;1-p1223;0))
- p1136: 0; = if(p1121=0;p1130*(p0716/100)*p0703*1000;0)
- p1309: 0
- p0685: 0
- p1173: 0.5
- p1900: 0
- p1278: 0
- p0890: 82184.3; = p0686*1000*p0687*p0885/100
- p1202: 0.7
- p0413: 0; = SQRT(2)*(IF((2*p0281-1)<0;-1;IF((2*p0281-1)>0;1;0))*SQRT(SQRT((2/(pi()*0.140012289)+LN(1-(2*p0281-1)^2)/2)^2-LN(1-(2*p0281-1)^2)/0.140012289)-(2/(pi()*0.140012289)+LN(1-(2*p0281-1)^2)/2)))
- p1745: 0
- p1157: 0.260052
- p2998: 0; = p2412*(p1020+p1022)
- p0991: 19335.5; = p0987*p0886
- p0770: 46.941; = p0110*(1+p0638*p0242/100)
- p1963j: 8.44783e-7; = p1725*p1929+p1726*p1930+p1727*p1931+p1728*p1932+p1729*p1933+p1730*p1934+p1731*p1935+p1732*p1936+p1733*p1937+p1734*p1938+p1735*p1939+p1736*p1940+p1737*p1941+p1738*p1942+p1739*p1943+p1740*p1944+p1741*p1945+p1742*p1946+p1743*p1947
- p3265: 0.696292
- p2848: 0; = p2262*(p1079+p1081)
- p1167: 0.5
- p2118: 0.679049
- p2748: 0; = p2357*(p1019+p1021)
- p4528: 3.05782e-6; = p1767*p3481
- p3116: 5.16684e-7; = p2335*p1023
- p2444: 0; = p2248*p1014
- p0768: 0
- p1333: 0.000362716; = p1332*p0001/(p0818*p0002)
- p4552: 3.43576e-8; = p1791*p3481
- p0932: 233459; = p0801*p0926
- p2370: 0; = p2225*p2199
- p2321: 5.18668e-5; = p2224*p2188
- p1206: 0.03829
- p0989: 4.76924e6; = p0985*p0886
- p0632: 0; = IF(p0368<0.5;-SQRT(p0007*EXP(p0500^2*p0008)-p0007);SQRT(p0007*EXP(p0500^2*p0008)-p0007))
- p2100: 0.705744
- p0767: 10.414; = p0107*(1+p0635*p0239/100)
- p2937: 0; = p2351*(p1129+p1131)
- p3312: 0; = if(and(p1232=0;p3253<>0);p3261*p3277*(p3298*p3290+(1-p3298)*p3294);0)
- p0802: 3.75e6
- p1838: 0
- p0158: 19.598
- p3319: 0; = if(and(p1232=0;p3253<>0);p3253*(p3263-p3314)/p3316;0)
- p1996: 30
- p0893: 1.94983; = 1000*(p0890+p0892)*p0001*p0003*p0004/(p0818*p0002)
- p0986: 0; = IF(p0982+p0985=1;0;IF(p0982+p0985+p0984>1;1-(p0982+p0985);p0984))
- p2277: 6.64348e-5; = p2223*p2183
- p0524: 0; = SQRT(2)*(IF((2*p0392-1)<0;-1;IF((2*p0392-1)>0;1;0))*SQRT(SQRT((2/(pi()*0.140012289)+LN(1-(2*p0392-1)^2)/2)^2-LN(1-(2*p0392-1)^2)/0.140012289)-(2/(pi()*0.140012289)+LN(1-(2*p0392-1)^2)/2)))
- p2175: 0.00080889; = p0895*p0908/p0818
- p0091: 11.338
- p1727: 0
- p4346: 0; = p1791*p3480
- p3047: 0; = p2266*p1082
- p0709: 0
- p1674: 0
- p5221: 1.32364e-8; = p1842*p3484
- p3384: 0; = p3365*p1234
- p1865: 0
- p4445: 0; = p1890*p3480
- p0806: 1.65e8
- p2080: 0.025
- p3388: 0; = p3369*p1234
- p1949: 0
- p2534: 4.28298e-5; = p2338*p1073
- p1965: 0.000437677; = p1963+p1959*p1964*1000/p0818
- p2101: 0.620397
- p1276: 0.0158074; = p1272*p1252/p0818
- p1300: 0; = IF(p1297=p1265;0;IF(p1297+p1298>p1265;p1265-p1297;p1298))
- p5334: 1.49571e-6; = p1955*p3484
- p2417: 0; = p2235*p2207
- p2890: 0.000100413; = p2304*(p1079+p1081)
- p0593: 0; = IF(p0329<0.5;-SQRT(p0007*EXP(p0461^2*p0008)-p0007);SQRT(p0007*EXP(p0461^2*p0008)-p0007))
- p0981: 0; = p0978*p0001/(p0818*p0002)
- p1181: 0.00013981
- p3037: 0; = p2256*p1023
- p3215: 0.450791; = p1222*3*15.9994/100.0869
- p3378: 0.00413248; = if(p1232=0;p3246*p3360/p0818;0)
- p2187: 1.18809e-5; = 4*1.00794*p2186/(2*14.0067)
- p3105: 2.39804e-8; = p2324*p1023
- p2707: 1.0458e-5; = p2316*(p1019+p1021)
- p3448: 0; = p3372*p1240
- p2471: 0; = p2275*p1123
- p2106: 0.856281
- p1153: 0.365265
- p4764: 0; = p1797*p3482
- p1212: 0.0823199; = if(p1211=0;0;if(p1193>0;0;(p1207+p1208+p1209)*p1210/(2000*p1211)))
- p2780: 0; = p2389*(p1128+p1130)
- p0520: 0; = SQRT(2)*(IF((2*p0388-1)<0;-1;IF((2*p0388-1)>0;1;0))*SQRT(SQRT((2/(pi()*0.140012289)+LN(1-(2*p0388-1)^2)/2)^2-LN(1-(2*p0388-1)^2)/0.140012289)-(2/(pi()*0.140012289)+LN(1-(2*p0388-1)^2)/2)))
- p0947: 0; = if(and(p0683=0;or(p0807=480;p0807=32;p0807=1;and(p0807=60;p0901<0.03)));p0935;0)
- p3402: 0; = p3364*p1238
- p4970: 0; = p1797*p3483
- p2448: 0; = p2252*p1014
- p2740: 2.51298e-5; = p2349*(p1078+p1080)
- p2235: 0; = 1-(p2226+p2227+p2228+p2229)
- p1768: 0
- p0466: 0; = SQRT(2)*(IF((2*p0334-1)<0;-1;IF((2*p0334-1)>0;1;0))*SQRT(SQRT((2/(pi()*0.140012289)+LN(1-(2*p0334-1)^2)/2)^2-LN(1-(2*p0334-1)^2)/0.140012289)-(2/(pi()*0.140012289)+LN(1-(2*p0334-1)^2)/2)))
- p3446: 0; = p3370*p1240
- p3430: 0; = p3373*p1239
- p3062: 6.5429e-8; = p2281*p1023
- p3686: 1.58909e-5; = p1955*p3476
- p2870: 2.93003e-6; = p2284*(p1020+p1022)
- p2422: 0; = p2235*p2212
- p0830: 1.41765e10; = p0825*p0821*p0824
- p0982: 0.240336; = if(p0886=0;0;min(1;(p0691*p0690*1000*p0693/100)/p0886))
- p0120: 45.871
- p1039: 0.0673925
- p1197: 1.806
- p0760: 0
- p2337: 0.00027069; = p2228*p2205
- p3413: 0.000420733; = p3375*p1238
- p0141: 79.2972
- p0911: 0.0154167
- p0850: 0
- p3153: 0; = p2372*p1023
- p0430: 0; = SQRT(2)*(IF((2*p0298-1)<0;-1;IF((2*p0298-1)>0;1;0))*SQRT(SQRT((2/(pi()*0.140012289)+LN(1-(2*p0298-1)^2)/2)^2-LN(1-(2*p0298-1)^2)/0.140012289)-(2/(pi()*0.140012289)+LN(1-(2*p0298-1)^2)/2)))
- p3218: 0.0237052; = p3214*p1228
- p1589: 0
- p0751: 11.338; = p0091*(1+p0619*p0223/100)
- p1928: 0
- p1156: 0.00990619; = p1064+p1065+p1066+p1067+p1068+p1069+p1070+p1116+p1117+p1118+p1119+p1120+p1154+p1155
- p3015: 0; = p2429*(p1129+p1131)
- p2111: 0.856281
- p3342: 0; = if(and(p1232=0;p3254<>0);p3254*(p3272-p3337)/p3338;0)
- p2610: 0; = p2414*p1073
- p2787: 0; = p2396*(p1019+p1021)
- p2338: 8.76565e-5; = p2228*p2206
- p3298: 0; = if(p1283+p1284+p1285+p1286=0;0;p1283/(p1283+p1284+p1285+p1286))
- p1921: 0
- p0789: 30.56; = p0129*(1+p0657*p0261/100)
- p1042: 0.000645242
- p3728: 0; = p1791*p3477
- p2538: 1.14303e-5; = p2342*p1073
- p3405: 0; = p3367*p1238
- p1581: 0
- p1963: 0.000226227; = p1963a+p1963b+p1963c+p1963d+p1963e+p1963f+p1963g+p1963h+p1963i+p1963j+p1963k
- p2912: 1.76776e-5; = p2326*(p1020+p1022)
- p3376: 0.000212775; = if(p1232=0;p3246*p3358/p0818;0)
- p0857: 3.42453; = p0856*p0001*p0003/(p0818*p0002)
- p1562: 0
- p0676: 479.09; = p0016*(1+p0544*p0148/100)
- p1100: 0.261145
- p1856: 0
- p2064: 0.676706
- p2246: 0; = p2222*p2191
- p2915: 3.58915e-8; = p2329*(p1020+p1022)
- p3044: 0; = p2263*p1082
- p3370: 0; = if(p1232=0;p3245*p3358/p0818;0)
- p1860: 0
- p0392: 0.5
- p1327a: 0.0281712; = (p0745*1000/p0801)*(1-(p0746+p0747+p0748+p0749+p0750+p0751+p0752+p0753)/100)+(p0754*1000/p0801)*(1-(p0755+p0756+p0757+p0758+p0759+p0760+p0761+p0762)/100)
- p2942: 0; = p2356*(p1020+p1022)
- p1857: 0
- p2792: 0; = p2401*(p1019+p1021)
- p1609: 0
- p1909: 0
- p0150: 0
- p1964: 0.5
- p3031: 0; = p2250*p1023
- p1767: 2.69697e-5; = p1359*1000/p0818
- p2662: 0; = p2271*(p1078+p1080)
- p2220: 5.10208e-5; = p1151/p0818
- p1314: 0; = p1310*p1252/p0818
- p1849: 0
- p2620: 0; = p2424*p1073
- p2058: 1.24412
- p2350: 0; = p2232*p2218
- p4758: 0; = p1791*p3482
- p2200: 0.000256028; = p1056/p0818
- p1584: 0
- p5098: 0; = p1925*p3483
- p2045: 30
- p0298: 0.5
- p2169: 0.00216473; = p2166*(p0908)
- p2655: 0; = p2264*(p1078+p1080)
- p1601: 0
- p0800: 7.585; = p0140*(1+p0668*p0272/100)
- p1564: 0
- p2178: 0.0314446; = (p0895*p0831/(1-p0831))/(p0818)
- p2960: 0; = p2374*(p1020+p1022)
- p3246: 1; = IF(p3244+p3245=1;0;1-(p3244+p3245))
- p2796: 0; = p2405*(p1019+p1021)
- p2051: 4.38952e-5; = p2015*p2049*p2050/(p0818*1000)
- p2182: 0.000459431; = p1050/p0818
- p2863: 8.84047e-6; = p2277*(p1020+p1022)
- p3030: 0; = p2249*p1023
- p3360: 4.09116e7; = if(p1232=0;p3310+p3321+p3332+p3343+p3354;0)
- p3213: 0.112803; = p1222*12.0107/100.0869
- p2850: 0; = p2264*(p1079+p1081)
- p1890: 2.52525e-6; = p1482*1000/p0818
- p0183: 16.31
- p1034: 0; = IF(p1012=0;p1028*p0001/(p0818*p0002);0)
- p0862: 0.0574661; = p0674*1000/p0856
- p0866: 0; = IF(p0858+p0864+p0865=1;0;IF(p0858+p0864+p0865+p0861>1;1-(p0858+p0864+p0865);p0861))
- p2241: 0; = p2222*p2186
- p2078: 0.117
- p0274: 0.5
- p2047: 5.38317e-14; = p2015*p2045/(p0818*1000000000000)
- p0812: 0; = if(p0807=480;0.095/0.34;0)
- p2335: 6.18043e-5; = p2224*p2203
- p1301: 0; = IF(p1297+p1300=p1265;0;IF(p1297+p1300+p1299>p1265;p1265-(p1297+p1300);p1299))
- p1713: 0
- p3179: 0; = p2398*p1023
- p2211: 0.000796194; = p1120-p2209-p2208-p2210
- p1019: 0.30387; = IF(p1012=0;IF(p1014=1;0;IF(p1014+p1015>1;1-p1014;p1015));0)
- p0735: 0
- p2292: 1.87885e-6; = p2223*p2199
- p1068: 0.0012976; = IF(p1012=0;p1054/(p1061*p0818);0)
- p2324: 2.86847e-6; = p2224*p2191
- p2428: 0; = p2236*p2218
- p2294: 7.2307e-5; = p2223*p2201
- p3306: 7.6998e6; = if(and(p1232=0;p3252<>0);p3252*(p3257*p3277-p3301)/p3305;0)
- p0275: 0.5
- p0431: 0; = SQRT(2)*(IF((2*p0299-1)<0;-1;IF((2*p0299-1)>0;1;0))*SQRT(SQRT((2/(pi()*0.140012289)+LN(1-(2*p0299-1)^2)/2)^2-LN(1-(2*p0299-1)^2)/0.140012289)-(2/(pi()*0.140012289)+LN(1-(2*p0299-1)^2)/2)))
- p0943: 0; = if(and(p0683=0;p0949=0);p0937;0)
- p2724: 1.13824e-5; = p2333*(p1019+p1021)
- p3404: 0; = p3366*p1238
- p1199: -0.29
- p3022: 0; = p2241*p1023
- p2865: 2.3058e-6; = p2279*(p1020+p1022)
- p2474: 2.79049e-6; = p2278*p1014
- p2325: 2.32135e-5; = p2224*p2192
- p3522: 4.68758e-8; = p1791*p3476
- p0016: 479.09
- p1047: 0.317801; = IF(p1012=0;IF(p1037+p1044+p1045+p1046=1;0;IF(p1037+p1044+p1045+p1046+p1041>1;1-(p1037+p1044+p1045+p1046);p1041));0)
- p2322: 9.96533e-6; = p2224*p2189
- p1135: 0; = if(p1121=0;p1129*(p0716/100)*p0703*1000;0)
- p2479: 1.06705e-5; = p2283*p1014
- p3208: 0; = p2427*p1082
- p2044: 7.9947e-8; = p2015*p2042*p2043/(p0818*1000)
- p1126: 0; = if(p1121=0;p0720/100;0)
- p2518: 5.52777e-6; = p2322*p1014
- p0937: 5.9123e-5; = p0931*p0001/(p0818*p0002)
- p0085: 7352.38
- p3271: 0.0195489
- p2399: 0; = p2234*p2188
- p1915: 0
- p0781: 0
- p5338: 3.29387e-6; = p1963*p3484
- p1200: 0.84
- p1035: 6.19951e-7; = IF(p1012=0;p1029*p0001/(p0818*p0002);0)
- p2341: 5.4181e-5; = p2228*p2209
- p0919: 0.548108; = p0678*1000/p0801
- p0024: 61.17
- p3379: 0.000704764; = if(p1232=0;p3246*p3361/p0818;0)
- p3779: 0; = p1842*p3477
- p0667: 0; = IF(p0403<0.5;-SQRT(p0007*EXP(p0535^2*p0008)-p0007);SQRT(p0007*EXP(p0535^2*p0008)-p0007))
- p1189: 0.000342453; = p0801*p0001/(p0818*p0002)
- p0018: 2082.81
- p1242: 29655; = if(p1232>0;0;p1234*(p0725/100)*p0723*1000)
- p1848: 0
- p2086: 0.0617647
- p3112: 8.13698e-9; = p2331*p1023
- p0221: 22.058
- p1094: 6.20088e-7; = IF(p1071=0;p1088*p0001/(p0818*p0002);0)
- p2522: 7.36889e-5; = p2326*p1014
- p2364: 0; = p2225*p2192
- p2685: 2.19719e-5; = p2294*(p1019+p1021)
- p3704: 0; = p1767*p3477
- p2647: 0; = p2256*(p1019+p1021)
- p2565: 0; = p2369*p1014
- p3227: 0.000465855; = p3223*p1229
- p1184: 5.36643e-8; = p1182/p0818
- p2345: 1.61965e-5; = p2228*p2213
- p3012: 0; = p2426*(p1079+p1081)
- p1359: 267
- p1716: 0
- p1024: 456448; = IF(p1012=0;p1014*(p0704/100)*p0703*1000;0)
- p3279: 0.37
- p1027: 0; = IF(p1012=0;p1021*(p0704/100)*p0703*1000;0)
- p2050: 0.952062
- p4721: 0; = p1754*p3482
- p3075: 6.04487e-7; = p2294*p1023
- p1318: 0; = p1317*p0001/(p0818*p0002)
- p2718: 8.65324e-6; = p2327*(p1019+p1021)
- p2605: 0; = p2409*p1014
- p2506: 6.61347e-5; = p2310*p1073
- p2588: 0; = p2392*p1123
- p2678: 7.79232e-5; = p2287*(p1019+p1021)
- p2581: 0; = p2385*p1073
- p3433: 0; = p3376*p1239
- p2957: 0; = p2371*(p1020+p1022)
- p2745: 0; = p2354*(p1019+p1021)
- p0269: 17.575
- p2790: 0; = p2399*(p1019+p1021)
- p2184: 7.6367e-6; = p1051/p0818
- p1983: 50
- p3016: 0; = p2430*(p1129+p1131)
- p2454: 0; = p2258*p1073
- p2495: 6.84842e-5; = p2299*p1073
- p1978: 314
- p2715: 8.71642e-7; = p2324*(p1019+p1021)
- p2687: 3.62528e-5; = p2296*(p1019+p1021)
- p1208: 110.645; = p1205*p0818*p0822/p0801
- p1062: 0.16
- p3103: 8.33101e-8; = p2322*p1023
- p3117: 2.85229e-6; = p2336*p1082
- p1556: 0
- p0954: 4.31752e-5; = if(and(p0683>0;or(p0807=56;p0807=100;and(p0807=60;p0901>0.06)));p0936;0)
- p2794: 0; = p2403*(p1019+p1021)
- p2901: 2.08632e-5; = p2315*(p1020+p1022)
- p1807: 0
- p1241: 1.11022e-16; = if(p1232>0;0;IF(p1234+p1238+p1239+p1240=1;0;1-(p1234+p1238+p1239+p1240)))
- p1196: 0.59
- p0423: 0; = SQRT(2)*(IF((2*p0291-1)<0;-1;IF((2*p0291-1)>0;1;0))*SQRT(SQRT((2/(pi()*0.140012289)+LN(1-(2*p0291-1)^2)/2)^2-LN(1-(2*p0291-1)^2)/0.140012289)-(2/(pi()*0.140012289)+LN(1-(2*p0291-1)^2)/2)))
- p0046: 30.387
- p1087: 0; = IF(p1071=0;p1081*(p0710/100)*p0703*1000;0)
- p3011: 0; = p2425*(p1079+p1081)
- p0509: 0; = SQRT(2)*(IF((2*p0377-1)<0;-1;IF((2*p0377-1)>0;1;0))*SQRT(SQRT((2/(pi()*0.140012289)+LN(1-(2*p0377-1)^2)/2)^2-LN(1-(2*p0377-1)^2)/0.140012289)-(2/(pi()*0.140012289)+LN(1-(2*p0377-1)^2)/2)))
- p2854: 0; = p2268*(p1079+p1081)
- p2932: 5.88268e-6; = p2346*(p1079+p1081)
- p0907: 0
- p3172: 0; = p2391*p1132
- p2688: 0.000142073; = p2297*(p1078+p1080)
- p3341: 0; = if(and(p1232=0;p3254<>0);p3254*(p3271-p3336)/p3338;0)
- p3228: 0.00184356; = p3224*p1229
- p1646: 0
- p2959: 0; = p2373*(p1020+p1022)
- p1141: 0; = if(p1121=0;p1135*p0001/(p0818*p0002);0)
- p0853: 0; = p0803/(p0802+p0803)
- p0898: 0.456
- p1751: 0.791173
- p1283: 0; = p1277*p1252/p0818
- p2372: 0; = p2225*p2201
- p2569: 0; = p2373*p1014
- p2254: 0; = p2222*p2200
- p1065: 3.39409e-5; = IF(p1012=0;p1051/(p1058*p0818);0)
- p0967: 1.53906e8; = (p0684/100)*p0683*p0682*1000
- p1030: 4.11348e-5; = IF(p1012=0;p1024*p0001/(p0818*p0002);0)
- p2568: 0; = p2372*p1014
- p1670: 0
- p2274: 0; = p2230*p2220
- p0757: 0
- p0813: 0; = if(p0807=480;1.56521739130435;0)
- p3392: 0; = p3373*p1234
- p4252: 7.519e-6; = p1903*p3479
- p3368: 0; = if(p1232=0;p3245*p3356/p0818;0)
- p3126: 1.54353e-7; = p2345*p1082
- p2545: 4.13605e-5; = p2349*p1073
- p3137: 0; = p2356*p1023
- p3095: 2.49314e-5; = p2314*p1132
- p2015: 1.77645e7; = p0830*p2011*p2013
- p2141: 3.1206e-7; = p2015*p2069*p2103/(p0818*1000)
- p0752: 0
- p0788: 69.157; = p0128*(1+p0656*p0260/100)
- p3792: 0; = p1855*p3477
- p2788: 0; = p2397*(p1019+p1021)
- p1122: 0; = p1121*p0001/(p0818*p0002)
- p1972: 0; = if(p0807=480;p1967*p0001/(p0818*p0002);0)
- p1761: 0
- p2002: 750
- p2043: 0.636483
- p3462: 0; = p3367*p1241
- p0552: 0; = IF(p0288<0.5;-SQRT(p0007*EXP(p0420^2*p0008)-p0007);SQRT(p0007*EXP(p0420^2*p0008)-p0007))
- p0113: 19.005
- p2991: 0; = p2405*(p1020+p1022)
- p1691: 0
- p2910: 3.81707e-7; = p2324*(p1020+p1022)
- p0154: 0
- p2712: 1.57608e-5; = p2321*(p1019+p1021)
- p3009: 0; = p2423*(p1079+p1081)
- p3056: 0; = p2275*p1132
- p0328: 0.5
- p1774: 0
- p3322: 0; = if(and(p1232=0;p3253<>0);p3253-(p3317+p3318+p3319+p3320+p3321);0)
- p2320: 4.05442e-6; = p2224*p2187
- p2491: 5.77255e-6; = p2295*p1014
- p3051: 0; = p2270*p1082
- p2251: 0; = p2222*p2197
- p1163: 0.0086165
- p0042: 3799.05
- p2355: 0; = p2225*p2183
- p1110: 3.08279e6; = IF(p1071=0;p1105*p1104*p1095;0)
- p1984: 30
- p1319: 0.2993; = IF(((p0745*1000*p0746/100)+(p0754*1000*p0755/100))/p0801<0;0;((p0745*1000*p0746/100)+(p0754*1000*p0755/100))/p0801)
- p2065: 0.0758824
- p1595: 0
- p0561: 0; = IF(p0297<0.5;-SQRT(p0007*EXP(p0429^2*p0008)-p0007);SQRT(p0007*EXP(p0429^2*p0008)-p0007))
- p1942: 0
- p1134: 81021.4; = if(p1121=0;p1128*(p0716/100)*p0703*1000;0)
- p1245: 0; = if(p1232>0;0;p1240*(p0725/100)*p0723*1000)
- p2060: 0.272353
- p3236: 0.0140975
- p1585: 0
- p0525: 0; = SQRT(2)*(IF((2*p0393-1)<0;-1;IF((2*p0393-1)>0;1;0))*SQRT(SQRT((2/(pi()*0.140012289)+LN(1-(2*p0393-1)^2)/2)^2-LN(1-(2*p0393-1)^2)/0.140012289)-(2/(pi()*0.140012289)+LN(1-(2*p0393-1)^2)/2)))
- p3069: 4.5955e-7; = p2288*p1023
- p2775: 0; = p2384*(p1078+p1080)
- p3444: 0; = p3368*p1240
- p3210: 0; = p2429*p1132
- p1818: 0
- p4822: 0; = p1855*p3482
- p3200: 0; = p2419*p1082
- p0140: 7.585
- p2492: 6.61777e-5; = p2296*p1014
- p2516: 2.24899e-6; = p2320*p1014
- p3140: 0; = p2359*p1023
- p2546: 0; = p2350*p1123
- p2761: 0; = p2370*(p1019+p1021)
- p1342: 0; = p1326*p0801
- p2423: 0; = p2235*p2213
- p1070: 0.000562699; = IF(p1012=0;p1056/(p1063*p0818);0)
- p3248: 0
- p2654: 0; = p2263*(p1078+p1080)
- p1210: 0.46
- p0029: 98.713
- p2855: 0; = p2269*(p1079+p1081)
- p1693: 0
- p2415: 0; = p2235*p2205
- p1717: 0
- p1720: 0
- p1230: 0.5
- p4416: 0; = p1861*p3480
- p3302: 0.0114097; = if(and(p1232=0;p3252<>0);p3258*(p3278*(p3282*p1256+p3286*(p1253+p1257)+p1258*p3288+p3297*p3287));0)
- p0740: 85.562; = p0080*(1+p0608*p0212/100)
- p0377: 0.5
- p4940: 0; = p1767*p3483
- p2107: 0.881623
- p2077: 0.043
- p0393: 0.5
- p2597: 0; = p2401*p1014
- p2515: 1.56264e-5; = p2319*p1014
- p0669: 33.8523; = p0009*(1+p0537*p0141/100)
- p1894: 0
- p0616: 0; = IF(p0352<0.5;-SQRT(p0007*EXP(p0484^2*p0008)-p0007);SQRT(p0007*EXP(p0484^2*p0008)-p0007))
- p1663: 0
- p2784: 0; = p2393*(p1019+p1021)
- p0350: 0.5
- p2797: 0; = p2406*(p1019+p1021)
- p0726: 35.546; = p0066*(1+p0594*p0198/100)
- p2297: 0.000478569; = p2227*p2204
- p2976: 0; = p2390*(p1129+p1131)
- p1336: 0; = p1323*p0801
- p0422: 0; = SQRT(2)*(IF((2*p0290-1)<0;-1;IF((2*p0290-1)>0;1;0))*SQRT(SQRT((2/(pi()*0.140012289)+LN(1-(2*p0290-1)^2)/2)^2-LN(1-(2*p0290-1)^2)/0.140012289)-(2/(pi()*0.140012289)+LN(1-(2*p0290-1)^2)/2)))
- p2747: 0; = p2356*(p1019+p1021)
- p3330: 0; = if(and(p1232=0;p3255<>0);p3255*(p3267-p3325)/p3327;0)
- p2509: 2.23282e-5; = p2313*p1123
- p1158: 0.00257612; = p1156*p1157
- p2438: 0; = p2242*p1014
- p2214: 7.45841e-5; = p1107/p0818
- p2825: 0; = p2239*(p1020+p1022)
- p0946: 0; = if(and(p0683=0;or(p0807=480;p0807=32;p0807=1;and(p0807=60;p0901<0.03)));p0934;0)
- p2908: 1.32609e-6; = p2322*(p1020+p1022)
- p2524: 0.000156145; = p2328*p1014
- p0327: 0.5
- p0419: 0; = SQRT(2)*(IF((2*p0287-1)<0;-1;IF((2*p0287-1)>0;1;0))*SQRT(SQRT((2/(pi()*0.140012289)+LN(1-(2*p0287-1)^2)/2)^2-LN(1-(2*p0287-1)^2)/0.140012289)-(2/(pi()*0.140012289)+LN(1-(2*p0287-1)^2)/2)))
- p1008: 0; = p1004*p0001*p0004/(p0818*p0002)
- p1817: 0
- p0156: 17.813
- p2895: 3.0958e-6; = p2309*(p1079+p1081)
- p1041: 0.317801
- p2326: 0.000132845; = p2224*p2193
- p3300: 0; = if(p1293+p1294+p1295+p1296=0;0;p1293/(p1293+p1294+p1295+p1296))
- p3074: 1.40997e-6; = p2293*p1023
- p1211: 0.6
- p0427: 0; = SQRT(2)*(IF((2*p0295-1)<0;-1;IF((2*p0295-1)>0;1;0))*SQRT(SQRT((2/(pi()*0.140012289)+LN(1-(2*p0295-1)^2)/2)^2-LN(1-(2*p0295-1)^2)/0.140012289)-(2/(pi()*0.140012289)+LN(1-(2*p0295-1)^2)/2)))
- p0675: 0
- p3269: 0.851786
- p1054: 3.85388e6; = IF(p1012=0;p1047*p1036;0)
- p2618: 0; = p2422*p1073
- p0058: 28.117
- p1079: 0.20499; = IF(p1071=0;IF(p1073+p1078=1;0;IF(p1073+p1078+p1075>1;1-(p1073+p1078);p1075));0)
- p2571: 0; = p2375*p1073
- p0002: 0.453592
- p1256: 0; = if(p1232>0;0;IF(p1253=1;0;IF(p1253+p1254>1;1-p1253;p1254)))
- p3032: 0; = p2251*p1023
- p3199: 0; = p2418*p1082
- p0832: 1.63843e9; = p0831*p0830/(1-p0831)
- p2531: 3.42828e-5; = p2335*p1014
- p3498: 4.17194e-6; = p1767*p3476
- p2684: 5.12497e-5; = p2293*(p1019+p1021)
- p2721: 1.34523e-7; = p2330*(p1019+p1021)
- p2213: 4.20944e-5; = p1116-p2212
- p3025: 0; = p2244*p1023
- p1258: 1; = if(p1232>0;0;IF(p1253+p1256+p1257=1;0;1-(p1253+p1256+p1257)))
- p2599: 0; = p2403*p1014
- p1650: 0
- p1040: 0.0238398
- p1176: 371.248; = p1175*p0801
- p2798: 0; = p2407*(p1019+p1021)
- p2102: 0.922577
- p0343: 0.5
- p2643: 0; = p2252*(p1019+p1021)
- p1015: 0.30387; = IF(p1012=0;p0706/100;0)
- p3082: 1.82575e-6; = p2301*p1082
- p0546: 0; = IF(p0282<0.5;-SQRT(p0007*EXP(p0414^2*p0008)-p0007);SQRT(p0007*EXP(p0414^2*p0008)-p0007))
- p0821: 1.77727
- p1963f: 5.80351e-5; = p1647*p1851+p1648*p1852+p1649*p1853+p1650*p1854+p1651*p1855+p1652*p1856+p1653*p1857+p1654*p1858+p1655*p1859+p1656*p1860+p1657*p1861+p1658*p1862+p1659*p1863+p1660*p1864+p1661*p1865+p1662*p1866+p1663*p1867+p1664*p1868+p1665*p1869+p1666*p1870
- p1912: 0
- p3414: 0.000137142; = p3376*p1238
- p3734: 0; = p1797*p3477
- p0063: 3799.05
- p2459: 0; = p2263*p1073
- p4716: 1.16472e-5; = p1955*p3481
- p0565: 0; = IF(p0301<0.5;-SQRT(p0007*EXP(p0433^2*p0008)-p0007);SQRT(p0007*EXP(p0433^2*p0008)-p0007))
- p4075: 5.52949e-7; = p1932*p3478
- p4068: 1.1059e-7; = p1925*p3478
- p0441: 0; = SQRT(2)*(IF((2*p0309-1)<0;-1;IF((2*p0309-1)>0;1;0))*SQRT(SQRT((2/(pi()*0.140012289)+LN(1-(2*p0309-1)^2)/2)^2-LN(1-(2*p0309-1)^2)/0.140012289)-(2/(pi()*0.140012289)+LN(1-(2*p0309-1)^2)/2)))
- p2973: 0; = p2387*(p1079+p1081)
- p0142: 0
- p1864: 2.52525e-6; = p1456*1000/p0818
- p1872: 0
- p0798: 19.005; = p0138*(1+p0666*p0270/100)
- p1710: 0
- p1262: 0; = if(p1232>0;0;p0733/100)
- p1941: 0
- p2657: 0; = p2266*(p1078+p1080)
- p1654: 0
- p1043: 0.209016
- p1955: 0.000102727; = p1547*1000/p0818
- p0562: 0; = IF(p0298<0.5;-SQRT(p0007*EXP(p0430^2*p0008)-p0007);SQRT(p0007*EXP(p0430^2*p0008)-p0007))
- p0782: 7.585; = p0122*(1+p0650*p0254/100)
- p1837: 0
- p3245: 0; = IF(p3244=1;0;if(p3244+p0792/100>1;1-p3244;p0792/100))
- p2165: 0.812271; = (p0833-p2014)/p0818-p0839
- p0283: 0.5
- p0355: 0.5
- p2789: 0; = p2398*(p1019+p1021)
- p1975: 0.000342453; = p1970*p0001/(p0818*p0002)
- p0835: 700.476; = -LN(1-p0669/100)/p0834
- p1859: 0
- p0403: 0.5
- p0330: 0.5
- p3058: 5.55395e-7; = p2277*p1023
- p2380: 0; = p2229*p2209
- p1947: 0
- p0136: 21.66
- p1700: 0
- p1985: 3.54892e7; = (if(p1057=0;0;p1050/p1057)+if(p1058=0;0;p1051/p1058)+if(p1059=0;0;p1052/p1059)+if(p1060=0;0;p1053/p1060)+if(p1061=0;0;p1054/p1061)+if(p1062=0;0;p1055/p1062)+if(p1063=0;0;p1056/p1063))*(1+p1157)
- p2445: 0; = p2249*p1014
- p2704: 1.43455e-5; = p2313*(p1128+p1130)
- p0017: 233.459
- p0001: 0.404686
- p0243: 23.581
- p1790: 0
- p2646: 0; = p2255*(p1019+p1021)
- p2343: 0.000306348; = p2228*p2211
- p0288: 0.5
- p0592: 0; = IF(p0328<0.5;-SQRT(p0007*EXP(p0460^2*p0008)-p0007);SQRT(p0007*EXP(p0460^2*p0008)-p0007))
- p2616: 0; = p2420*p1073
- p1798: 0
- p1910: 0
- p1970: 3.8e6; = p0801
- p2385: 0; = p2229*p2214
- p0210: 0
- p2791: 0; = p2400*(p1019+p1021)
- p1634: 0
- p2103: 0.912485
- p0961: 0; = if(and(p0683>0;or(p0807=480;p0807=32;p0807=1;and(p0807=60;p0901<0.03)));p0937;0)
- p3145: 0; = p2364*p1023
- p1060: 0.21
- p2247: 0; = p2222*p2192
- p1825: 0
- p1702: 0
- p0443: 0; = SQRT(2)*(IF((2*p0311-1)<0;-1;IF((2*p0311-1)>0;1;0))*SQRT(SQRT((2/(pi()*0.140012289)+LN(1-(2*p0311-1)^2)/2)^2-LN(1-(2*p0311-1)^2)/0.140012289)-(2/(pi()*0.140012289)+LN(1-(2*p0311-1)^2)/2)))
- p2424: 0; = p2235*p2214
- p2523: 1.57961e-5; = p2327*p1014
- p3480: 0; = if(p1328+p1330+p1332+p1334+p1336+p1338+p1340+p1342+p1344=0;0;p1336/(p1328+p1330+p1332+p1334+p1336+p1338+p1340+p1342+p1344))
- p2258: 0; = p2226*p2204
- p3017: 0; = p2431*(p1129+p1131)
- p3144: 0; = p2363*p1023
- p0103: 3799.05
- p0165: 3.827
- p1119: 0.00360076; = IF(p1071=0;p1109/(p1114*p0818);0)
- p2266: 0; = p2226*p2212
- p0748: 54.742; = p0088*(1+p0616*p0220/100)
- p0739: 1.288; = p0079*(1+p0607*p0211/100)
- p2441: 0; = p2245*p1014
- p2548: 0; = p2352*p1123
- p1850: 0
- p2000: 4000
- p2408: 0; = p2234*p2198
- p4927: 0; = p1754*p3483
- p4616: 2.12101e-5; = p1855*p3481
- p3201: 0; = p2420*p1082
- p2147: 1.06791e-7; = p2015*p2075*p2109/(p0818*1000)
- p1204: 0.980791
- p0030: 231.776
- p1590: 0
- p3411: 0; = p3373*p1238
- p3470: 7.24714e-20; = p3375*p1241
- p0003: 10000
- p1129: 0; = if(p1121=0;IF(p1123+p1128=1;0;IF(p1123+p1128+p1125>1;1-(p1123+p1128);p1125));0)
- p2450: 0; = p2254*p1014
- p1951: 0
- p0375: 0.5
- p2160: 1.2857e-7; = p2015*p2084*p2122/(p0818*1000)
- p3301: 0.130394; = if(and(p1232=0;p3252<>0);p3257*p3277*(p3297*p3290+(1-p3297)*p3294);0)
- p0819: 0; = p0808*p0809/p0818
- p3348: 0.00443516; = if(and(p1232=0;p3256<>0);p3276*p3289;0)
- p4870: 0; = p1903*p3482
- p2864: 6.69426e-7; = p2278*(p1020+p1022)
- p3321: 0; = if(and(p1232=0;p3253<>0);IF((p3317+p3318+p3319+p3320)+(p3253*(p3261*(1-p3277))/p3316)>p3253;p3253-(p3317+p3318+p3319+p3320);p3253*(p3261*(1-p3277))/p3316);0)
- p3151: 0; = p2370*p1023
- p2558: 0; = p2362*p1014
- p1649: 0
- p2593: 0; = p2397*p1014
- p2818: 0; = p2427*(p1078+p1080)
- p5015: 0; = p1842*p3483
- p0609: 0; = IF(p0345<0.5;-SQRT(p0007*EXP(p0477^2*p0008)-p0007);SQRT(p0007*EXP(p0477^2*p0008)-p0007))
- p4720: 2.56497e-5; = p1963*p3481
- p1010: 82184.3; = p0890
- p2851: 0; = p2265*(p1079+p1081)
- p1338: 833613; = p1324*p0801
- p1344: 107051; = IF(p1318=0;p1327*p0801;0)
- p3164: 0; = p2383*p1082
- p3840: 0; = p1903*p3477
- p0314: 0.5
- p2958: 0; = p2372*(p1020+p1022)
- p4514: 0; = p1963*p3480
- p0764: 21.66; = p0104*(1+p0632*p0236/100)
- p2300: 0.00116375; = p2227*p2207
- p1640: 0
- p3221: 0.146975; = IF(p3216=0;0;p1223*12.0107/100.0869+(1-p1224)*12.0107/84.3139)
- p2893: 9.40631e-6; = p2307*(p1079+p1081)
- p1926: 0
- p3289: 0.05
- p2373: 0; = p2225*p2202
- p2535: 0.000355613; = p2339*p1073
- p2541: 7.91377e-6; = p2345*p1073
- p2606: 0; = p2410*p1014
- p2852: 0; = p2266*(p1079+p1081)
- p1044: 0.00623446; = IF(p1012=0;IF(p1037=1;0;IF(p1037+p1038>1;1-p1037;p1038));0)
- p3277: 0.55
- p1032: 9.86805e-6; = IF(p1012=0;p1026*p0001/(p0818*p0002);0)
- p1080: 0; = IF(p1071=0;IF(p1073+p1078+p1079=1;0;IF(p1073+p1078+p1079+p1076>1;1-(p1073+p1078+p1079);p1076));0)
- p1853: 0
- p2672: 2.37822e-6; = p2281*(p1019+p1021)
- p0031: 6.975
- p0278: 0.5
- p2475: 9.61169e-6; = p2279*p1014
- p0724: 4.65; = p0064*(1+p0592*p0196/100)
- p2151: 2.98715e-8; = p2015*p2079*p2113/(p0818*1000)
- p1673: 0
- p0883: 0.0110405; = p0882*p0001*p0003/(p0818*p0002)
- p1001: 1; = if(p0978>0;0;if(and(p0687=0;p0691=0;p0695=0;p0699=0);0;IF(p0996+p0999+p1000=1;0;1-(p0996+p0999+p1000))))
- p3007: 0; = p2421*(p1079+p1081)
- p3193: 0; = p2412*p1023
- p3387: 0; = p3368*p1234
- p3263: 0.0214527
- p2105: 0.888194
- p1323: 0; = IF(((p0745*1000*p0750/100)+(p0754*1000*p0759/100))/p0801<0;0;((p0745*1000*p0750/100)+(p0754*1000*p0759/100))/p0801)
- p2698: 1.36224e-5; = p2307*(p1078+p1080)
- p2537: 2.64734e-5; = p2341*p1073
- p2946: 0; = p2360*(p1020+p1022)
- p0914: 2.86895e8; = p0825*p0911+(p0830+p0895)*p0824*p0913
- p0990: 0; = p0986*p0886
- p3096: 1.31071e-6; = p2315*p1023
- p4926: 0; = p1963*p3482
- p2117: 0.585147
- p2398: 0; = p2234*p2187
- p1075: 0.20499; = IF(p1071=0;p0713/100;0)
- p0167: 12.062
- p0531: 0; = SQRT(2)*(IF((2*p0399-1)<0;-1;IF((2*p0399-1)>0;1;0))*SQRT(SQRT((2/(pi()*0.140012289)+LN(1-(2*p0399-1)^2)/2)^2-LN(1-(2*p0399-1)^2)/0.140012289)-(2/(pi()*0.140012289)+LN(1-(2*p0399-1)^2)/2)))
- p0678: 2082.81; = p0018*(1+p0546*p0150/100)
- p0707: 13.307; = p0047*(1+p0575*p0179/100)
- p2122: 0.341195
- p2920: 7.17389e-7; = p2334*(p1020+p1022)
- p1131: 0; = if(p1121=0;IF(p1123+p1128+p1129+p1130=1;0;IF(p1123+p1128+p1129+p1130+p1127>1;1-(p1123+p1128+p1129+p1130);p1127));0)
- p2872: 5.96288e-6; = p2286*(p1020+p1022)
- p1118: 0.000244549; = IF(p1071=0;p1108/(p1113*p0818);0)
- p1712: 0
- p2714: 3.46613e-6; = p2323*(p1019+p1021)
- p3316: 0; = if(and(p1232=0;p3253<>0);1-(p3312+p3313+p3314+p3315);0)
- p2447: 0; = p2251*p1014
- p3278: 0.46
- p0536: 0; = SQRT(2)*(IF((2*p0404-1)<0;-1;IF((2*p0404-1)>0;1;0))*SQRT(SQRT((2/(pi()*0.140012289)+LN(1-(2*p0404-1)^2)/2)^2-LN(1-(2*p0404-1)^2)/0.140012289)-(2/(pi()*0.140012289)+LN(1-(2*p0404-1)^2)/2)))
- p1994: 750
- p0484: 0; = SQRT(2)*(IF((2*p0352-1)<0;-1;IF((2*p0352-1)>0;1;0))*SQRT(SQRT((2/(pi()*0.140012289)+LN(1-(2*p0352-1)^2)/2)^2-LN(1-(2*p0352-1)^2)/0.140012289)-(2/(pi()*0.140012289)+LN(1-(2*p0352-1)^2)/2)))
- p0104: 21.66
- p1877: 0
- p2614: 0; = p2418*p1073
- p1594: 0
- p3286: 0.185
- p0316: 0.5
- p1920: 0
- p3097: 2.87718e-7; = p2316*p1023
- p1115: 0.237849
- p2236: 0; = 1-(p2230+p2231+p2232+p2233)
- p2772: 0; = p2381*(p1078+p1080)
- p2536: 5.8542e-5; = p2340*p1073
- p1739: 0
- p1000: 0; = IF(p0996+p0999=1;0;IF(p0996+p0999+p0998>1;1-(p0996+p0999);p0998))
- p2291: 8.54565e-7; = p2223*p2198
- p0712: 29.687; = p0052*(1+p0580*p0184/100)
- p2191: 8.40561e-6; = 8*1.00794*p2189/(2*14.0067)
- p2563: 0; = p2367*p1014
- p1270: 0; = IF(p1267=p1259;0;IF(p1267+p1268>p1259;p1259-p1267;p1268))
- p1846: 0
- p2510: 3.88006e-5; = p2314*p1123
- p3099: 7.50434e-8; = p2318*p1023
- p3361: 6.97717e6; = if(p1232=0;p3311+p3322+p3333+p3344+p3355;0)
- p2403: 0; = p2234*p2192
- p0953: 0.000187701; = if(and(p0683>0;or(p0807=56;p0807=100;and(p0807=60;p0901>0.06)));p0935;0)
- p2514: 4.97926e-6; = p2318*p1014
- p3189: 0; = p2408*p1023
- p3077: 9.97378e-7; = p2296*p1023
- p1831: 0
- p3004: 0; = p2418*(p1079+p1081)
- p1114: 0.216028
- p1981: 400
- p3586: 2.8938e-5; = p1855*p3476
- p1668: 0
- p3173: 0; = p2392*p1132
- p0878: 218371; = p0867*p0856
- p1243: 53772.1; = if(p1232>0;0;p1238*(p0725/100)*p0723*1000)
- p3417: 0.000454249; = p3379*p1238
- p0539: 0; = IF(p0275<0.5;-SQRT(p0007*EXP(p0407^2*p0008)-p0007);SQRT(p0007*EXP(p0407^2*p0008)-p0007))
- p1803: 0
- p2148: 8.75807e-8; = p2015*p2076*p2110/(p0818*1000)
- p1567: 0
- p2940: 0; = p2354*(p1020+p1022)
- p3107: 1.11058e-6; = p2326*p1023
- p2630: 0; = p2239*(p1019+p1021)
- p3801: 0; = p1864*p3477
- p2472: 0.000167878; = p2276*p1014
- p2108: 0.826583
- p0754: 0
- p2634: 0; = p2243*(p1019+p1021)
- p3132: 0; = p2351*p1132
- p3336: 0; = IF(or(p3254=0;p1232>0);0;p3271*p3289)
- p1050: 4.54837e6; = IF(p1012=0;p1037*p1036;0)
- p1162: 0.000383838; = p1161/p0818
- p2978: 0; = p2392*(p1129+p1131)
- p2980: 0; = p2394*(p1020+p1022)
- p2762: 0; = p2371*(p1019+p1021)
- p1219: 0; = if(p1218=0;0;SQRT(2)*(IF((2*p1218-1)<0;-1;IF((2*p1218-1)>0;1;0))*SQRT(SQRT((2/(pi()*0.140012289)+LN(1-(2*p1218-1)^2)/2)^2-LN(1-(2*p1218-1)^2)/0.140012289)-(2/(pi()*0.140012289)+LN(1-(2*p1218-1)^2)/2))))
- p2640: 0; = p2249*(p1019+p1021)
- p1719: 0
- p3343: 0; = if(and(p1232=0;p3254<>0);IF((p3339+p3340+p3341+p3342)+(p3254*(p3269*(1-p3277))/p3338)>p3254;p3254-(p3339+p3340+p3341+p3342);p3254*(p3269*(1-p3277))/p3338);0)
- p2503: 2.24207e-5; = p2307*p1073
- p3471: 2.36227e-20; = p3376*p1241
- p1737: 0
- p2323: 1.14066e-5; = p2224*p2190
- p1858: 0
- p2877: 1.13717e-7; = p2291*(p1020+p1022)
- p2728: 8.03598e-5; = p2337*(p1078+p1080)
- p0787: 0
- p2205: 0.000703519; = 2*14.0067*p2204/30.973762
- p2802: 0; = p2411*(p1019+p1021)
- p1233: 0; = p1232*p0001/(p0818*p0002)
- p2209: 0.000140815; = 14.0067*p2208/30.973762
- p2095: 0.765734
- p0759: 0
- p2521: 1.28765e-5; = p2325*p1014
- p2076: 0.057
- p4204: 3.17927e-5; = p1855*p3479
- p3288: 0.505
- p2703: 0.000224478; = p2312*(p1128+p1130)
- p3079: 4.12486e-6; = p2298*p1082
- p2601: 0; = p2405*p1014
- p2119: 0.679049
- p0476: 0; = SQRT(2)*(IF((2*p0344-1)<0;-1;IF((2*p0344-1)>0;1;0))*SQRT(SQRT((2/(pi()*0.140012289)+LN(1-(2*p0344-1)^2)/2)^2-LN(1-(2*p0344-1)^2)/0.140012289)-(2/(pi()*0.140012289)+LN(1-(2*p0344-1)^2)/2)))
- p3350: 2.40858e7; = if(and(p1232=0;p3256<>0);p3256*(p3273*p3277-p3345)/p3349;0)
- p2177: 0.1375; = p0895/p0818-(p2173+p2174+p2175+p2176)
- p2486: 2.88805e-7; = p2290*p1014
- p2560: 0; = p2364*p1014
- p1866: 0
- p0286: 0.5
- p2344: 1.54889e-6; = p2228*p2212
- p1990: 30
- p0858: 0.907576; = p0670*1000/p0856
- p0965: 0; = IF(p0684/100=1;0;IF(p0684/100+p0685/100>1;1-p0684/100;p0685/100))
- p1305: 0; = p1301*p1252/p0818
- p2025: 4.2318e-6; = p2015*p2023*p2024/(p0818*1000)
- p2097: 0.40001
- p2421: 0; = p2235*p2211
- p0964: 0; = 56/90000
- p0720: 0
- p2981: 0; = p2395*(p1020+p1022)
- p2532: 0.000146239; = p2336*p1073
- p1146: 0.917383
- p2433: 0; = p2237*p1014
- p1974: 0; = p1969*p0001/(p0818*p0002)
- p0698: 0
- p2130: 1.21732e-6; = p2015*p2058*p2092/(p0818*1000)
- p2068: 0.153529
- p3257: 0.849747
- p1657: 0.687857
- p1749: 0
- p0997: 0; = if(p0888=0;0;if((p0695*p0694*1000*p0696/100)/p0888>1;1;(p0695*p0694*1000*p0696/100)/p0888))
- p2003: 50
- p2238: 0; = p2222*p2183
- p0353: 0.5
- p2307: 4.58867e-5; = p2227*p2214
- p3162: 0; = p2381*p1082
- p2847: 0; = p2261*(p1079+p1081)
- p1228: 0.0629777; = IF(p1221=0;0;p0801*p1212*2000/(p1222+p1221*p1225)/p0818)
- p3264: 0.0887032
- p2308: 0.000173162; = p2227*p2215
- p1669: 0
- p4625: 2.86313e-7; = p1864*p3481
- p2739: 2.8039e-6; = p2348*(p1078+p1080)
- p0978: 0
- p0842: -0.073175
- p3066: 4.62905e-8; = p2285*p1023
- p0887: 144.29; = 1000*p0886*p0001*p0003*p0004/(p0818*p0002)
- p1299: 0
- p2617: 0; = p2421*p1073
- p0146: 0
- p1093: 0; = IF(p1071=0;p1087*p0001/(p0818*p0002);0)
- p2061: 0.518824
- p1289: 0
- p1708: 0
- p1248: 4.8459e-6; = if(p1232>0;0;p1243*p0001/(p0818*p0002))
- p3214: 0.376406; = p1222*40.078/100.0869
- p2281: 7.82643e-6; = p2223*p2187
- p2143: 2.40659e-7; = p2015*p2071*p2105/(p0818*1000)
- p2907: 6.90192e-6; = p2321*(p1020+p1022)
- p0119: 49.603
- p3254: 0; = p1252*(p1287*(1-p3247)+p1290*(1-p3248)+p1291*(1-p3249)+p1292*(1-p3250))
- p2952: 0; = p2366*(p1020+p1022)
- p0639: 0; = IF(p0375<0.5;-SQRT(p0007*EXP(p0507^2*p0008)-p0007);SQRT(p0007*EXP(p0507^2*p0008)-p0007))
- p2395: 0; = p2234*p2184
- p1175: 9.76968e-5
- p3436: 0; = p3379*p1239
- p1031: 2.2534e-5; = IF(p1012=0;p1025*p0001/(p0818*p0002);0)
- p3434: 0; = p3377*p1239
- p1988: 750
- p2928: 4.79545e-6; = p2342*(p1079+p1081)
- p0816: 0
- p2857: 0; = p2271*(p1079+p1081)
- p0143: 0
- p3085: 4.66823e-6; = p2304*p1082
- p0949: 0; = if(and(p0683=0;or(p0807=480;p0807=32;p0807=1;and(p0807=60;p0901<0.03)));p0937;0)
- p2215: 0.000281457; = p1117-p2214
- p0050: 19.005
- p0650: 0; = IF(p0386<0.5;-SQRT(p0007*EXP(p0518^2*p0008)-p0007);SQRT(p0007*EXP(p0518^2*p0008)-p0007))
- p3268: 0.0232481
- p2803: 0; = p2412*(p1019+p1021)
- p1963i: 1.0101e-7; = p1706*p1910+p1707*p1911+p1708*p1912+p1709*p1913+p1710*p1914+p1711*p1915+p1712*p1916+p1713*p1917+p1714*p1918+p1715*p1919+p1716*p1920+p1717*p1921+p1718*p1922+p1719*p1923+p1720*p1924+p1721*p1925+p1722*p1926+p1723*p1927+p1724*p1928
- p3174: 0; = p2393*p1023
- p0026: 1132.82
- p0952: 3.13289e-5; = if(and(p0683>0;or(p0807=56;p0807=100;and(p0807=60;p0901>0.06)));p0934;0)
- p3934: 1.65885e-7; = p1791*p3478
- p3067: 3.74612e-7; = p2286*p1023
- p0631: 0; = IF(p0367<0.5;-SQRT(p0007*EXP(p0499^2*p0008)-p0007);SQRT(p0007*EXP(p0499^2*p0008)-p0007))
- p1695: 0
- p3356: 3.17855e7; = if(p1232=0;p3306+p3317+p3328+p3339+p3350;0)
- p0301: 0.5
- p2876: 6.9283e-8; = p2290*(p1020+p1022)
- p0506: 0; = SQRT(2)*(IF((2*p0374-1)<0;-1;IF((2*p0374-1)>0;1;0))*SQRT(SQRT((2/(pi()*0.140012289)+LN(1-(2*p0374-1)^2)/2)^2-LN(1-(2*p0374-1)^2)/0.140012289)-(2/(pi()*0.140012289)+LN(1-(2*p0374-1)^2)/2)))
- p1968: 0; = if(p0807=480;p0802*p0811;0)
- p1889: 2.88889e-5; = p1481*1000/p0818
- p1743: 0
- p0776: 30.44; = p0116*(1+p0644*p0248/100)
- p0617: 0; = IF(p0353<0.5;-SQRT(p0007*EXP(p0485^2*p0008)-p0007);SQRT(p0007*EXP(p0485^2*p0008)-p0007))
- p2899: 0; = p2313*(p1129+p1131)
- p1801: 0
- p0011: 120.59
- p3438: 0; = p3362*p1240
- p1851: 0
- p0763: 3799.05; = p0103*(1+p0631*p0235/100)
- p2400: 0; = p2234*p2189
- p0973: 2.51603e8; = p0967+p0968+p0969
- p3100: 2.35508e-7; = p2319*p1023
- p0956: 2.10392e-5; = if(and(p0683>0;or(p0807=56;p0807=100;and(p0807=60;p0901>0.06)));p0938;0)
- p2376: 0; = p2229*p2205
- p2378: 0; = p2229*p2207
- p2234: 0; = 1-(p2222+p2223+p2224+p2225)
- p3138: 0; = p2357*p1023
- p1744: 0
- p4191: 1.545e-7; = p1842*p3479
- p1666: 0
- p2347: 0.000108295; = p2228*p2215
- p3243: 4.99711e-10; = p3234*p1188*p3239/p0818
- p1597: 0
- p1728: 0.836335
- p2836: 0; = p2250*(p1020+p1022)
- p1002: 0; = p0996*p0888
- p3081: 1.10905e-5; = p2300*p1082
- p1020: 0.13307; = IF(p1012=0;IF(p1014+p1019=1;0;IF(p1014+p1019+p1016>1;1-(p1014+p1019);p1016));0)
- p0321: 0.5
- p1916: 0
- p2964: 0; = p2378*(p1079+p1081)
- p1729: 0
- p1676: 0
- p1765: 0
- p0882: 12251; = p0869*p0856
- p0976: 0; = IF(p0687=0;IF(OR(p0686=0;p0689=0);0;p0686*1000*p0689/100);0)
- p2583: 0; = p2387*p1073
- p2289: 0.000543381; = p2223*p2196
- p0220: 6.526
- p2327: 2.84768e-5; = p2224*p2195
- p2513: 1.44559e-6; = p2317*p1014
- p0897: 0
- p2990: 0; = p2404*(p1020+p1022)
- p2774: 0; = p2383*(p1078+p1080)
- p1340: 0; = p1325*p0801
- p2795: 0; = p2404*(p1019+p1021)
- p1160: 0.00624116; = (p1156+p1158)*p1159
- p2443: 0; = p2247*p1014
- p2641: 0; = p2250*(p1019+p1021)
- p0995: 4.42596e-8; = p0991*p0001*p0004/(p0818*p0002)
- p1103: 0.652345; = IF(p1071=0;IF(p1096+p1101+p1102=1;0;IF(p1096+p1101+p1102+p1099>1;1-(p1096+p1101+p1102);p1099));0)
- p3656: 3.12505e-8; = p1925*p3476
- p1203: 3
- p3073: 1.57072e-8; = p2292*p1023
- p0533: 0; = SQRT(2)*(IF((2*p0401-1)<0;-1;IF((2*p0401-1)>0;1;0))*SQRT(SQRT((2/(pi()*0.140012289)+LN(1-(2*p0401-1)^2)/2)^2-LN(1-(2*p0401-1)^2)/0.140012289)-(2/(pi()*0.140012289)+LN(1-(2*p0401-1)^2)/2)))
- p1903: 4.42424e-5; = p1495*1000/p0818
- p1997: 1.8769e7; = (if(p1152=0;0;p1150/p1152)+if(p1153=0;0;p1151/p1153))*(1+p1157)
- p0155: 2.721
- p2637: 0; = p2246*(p1019+p1021)
- p2572: 0; = p2376*p1073
- p3385: 0; = p3366*p1234
- p3176: 0; = p2395*p1023
- p0463: 0; = SQRT(2)*(IF((2*p0331-1)<0;-1;IF((2*p0331-1)>0;1;0))*SQRT(SQRT((2/(pi()*0.140012289)+LN(1-(2*p0331-1)^2)/2)^2-LN(1-(2*p0331-1)^2)/0.140012289)-(2/(pi()*0.140012289)+LN(1-(2*p0331-1)^2)/2)))
- p0004: 0.0254
- p0836: 3.07634e8; = p0831*p0835*p0801/(1-p0831)
- p0033: 93.711
- p0839: 0.783199; = p0838/p0818
- p0769: 0
- p2116: 0.444424
- p1919: 0
- p2451: 0; = p2255*p1014
- p1832: 0
- p2223: 0.658743; = if(p0765*p0769+p0766*p0770+p0767*p0771+p0768*p0772=0;0;p0770*p0766/(p0765*p0769+p0766*p0770+p0767*p0771+p0768*p0772))
- p0538: 0; = IF(p0274<0.5;-SQRT(p0007*EXP(p0406^2*p0008)-p0007);SQRT(p0007*EXP(p0406^2*p0008)-p0007))
- p1086: 0; = IF(p1071=0;p1080*(p0710/100)*p0703*1000;0)
- p3124: 2.9195e-6; = p2343*p1082
- p0174: 0
- p4964: 0; = p1791*p3483
- p2005: 6.42918e6; = p1963*p0818+p1959*1000+p1170+p1176+p1182
- p2735: 4.59819e-7; = p2344*(p1078+p1080)
- p2435: 0; = p2239*p1014
- p1495: 438
- p0064: 4.65
- p3194: 0; = p2413*p1023
- p2477: 4.34132e-6; = p2281*p1014
- p4693: 1.14525e-7; = p1932*p3481
- p0681: 0
- p5268: 4.20622e-7; = p1889*p3484
- p0694: 901.047; = p0034*(1+p0562*p0166/100)
- p2339: 0.000727806; = p2228*p2207
- p2902: 4.57974e-6; = p2316*(p1020+p1022)
- p2334: 5.39106e-6; = p2224*p2202
- p4510: 0; = p1955*p3480
- p1899: 0
- p3244: 0; = p0791/100
- p3129: 9.00096e-8; = p2348*p1082
- p0844: 0.375898
- p1652: 0
- p3394: 0.000232032; = p3375*p1234
- p1555: 0
- p3362: 0; = if(p1232=0;p3244*p3356/p0818;0)
- p1102: 0.020586; = IF(p1071=0;IF(p1096+p1101=1;0;IF(p1096+p1101+p1098>1;1-(p1096+p1101);p1098));0)
- p1596: 0
- p0854: 1.41756e6; = p0801*((1-p0853)*p0846+p0853*p0852)
- p2180: 5.8283e-8; = p3233*p1188/(p0818)
- p4046: 2.42192e-5; = p1903*p3478
- p3039: 0; = p2258*p1082
- p1757: 0
- p3027: 0; = p2246*p1023
- p0122: 7.585
- p2943: 0; = p2357*(p1020+p1022)
- p2469: 0; = p2273*p1123
- p1120: 0.0013092; = IF(p1071=0;p1110/(p1115*p0818);0)
- p0885: 1.287; = IF(p0689+p0884=100;0;100-(p0689+p0884))
- p3033: 0; = p2252*p1023
- p2239: 0; = p2222*p2184
- p0478: 0; = SQRT(2)*(IF((2*p0346-1)<0;-1;IF((2*p0346-1)>0;1;0))*SQRT(SQRT((2/(pi()*0.140012289)+LN(1-(2*p0346-1)^2)/2)^2-LN(1-(2*p0346-1)^2)/0.140012289)-(2/(pi()*0.140012289)+LN(1-(2*p0346-1)^2)/2)))
- p1216: 0
- p2371: 0; = p2225*p2200
- p0972: 0.00986845; = p0969/p0818
- p2404: 0; = p2234*p2193
- p1723: 0
- p2696: 7.35243e-7; = p2305*(p1078+p1080)
- p1517: 2
- p4102: 0.000123841; = p1963*p3478
- p3231: 3.74998e-8; = p1176/p0818
- p1871: 0
- p2212: 4.02554e-6; = p1106/p0818
- p3862: 0; = p1925*p3477
- p2359: 0; = p2225*p2187
- p1898: 0
- p2689: 0.000128494; = p2298*(p1078+p1080)
- p1092: 0; = IF(p1071=0;p1086*p0001/(p0818*p0002);0)
- p2217: 0.000220002; = p1118-p2216
- p3595: 3.90631e-7; = p1864*p3476
- p2396: 0; = p2234*p2185
- p0086: 15.469
- p2512: 1.90906e-5; = p2316*p1014
- p1095: 2.70494e7; = IF(p1071=0;p0797*p0702*1000*p0798/100;0)
- p0817: 0
- p2766: 0; = p2375*(p1078+p1080)
- p0775: 45.011; = p0115*(1+p0643*p0247/100)
- p5311: 1.47071e-8; = p1932*p3484
- p0985: 0.756597; = IF(p0982=1;0;IF(p0982+p0983>1;1-p0982;p0983))
- p1165: 0.000342453; = p0801*p0001/(p0818*p0002)
- p2951: 0; = p2365*(p1020+p1022)
- p3010: 0; = p2424*(p1079+p1081)
- p0906: 0.00672763
- p1913: 0
- p0499: 0; = SQRT(2)*(IF((2*p0367-1)<0;-1;IF((2*p0367-1)>0;1;0))*SQRT(SQRT((2/(pi()*0.140012289)+LN(1-(2*p0367-1)^2)/2)^2-LN(1-(2*p0367-1)^2)/0.140012289)-(2/(pi()*0.140012289)+LN(1-(2*p0367-1)^2)/2)))
- p1139: 1.13646e-5; = if(p1121=0;p1133*p0001/(p0818*p0002);0)
- p2832: 0; = p2246*(p1020+p1022)
- p3284: 0.275
- p3024: 0; = p2243*p1023
- p1048: 0.000645242; = IF(p1012=0;IF(p1037+p1044+p1045+p1046+p1047=1;0;IF(p1037+p1044+p1045+p1046+p1047+p1042>1;1-(p1037+p1044+p1045+p1046+p1047);p1042));0)
- p2781: 0; = p2390*(p1128+p1130)
- p0992: 3.4678e-6; = p0988*p0001*p0004/(p0818*p0002)
- p0558: 0; = IF(p0294<0.5;-SQRT(p0007*EXP(p0426^2*p0008)-p0007);SQRT(p0007*EXP(p0426^2*p0008)-p0007))
- p1084: 214343; = IF(p1071=0;p1078*(p0710/100)*p0703*1000;0)
- p2467: 0; = p2271*p1073
- p2133: 7.12877e-7; = p2015*p2061*p2095/(p0818*1000)
- p2282: 0.000100121; = p2223*p2188
- p2136: 1.03976e-6; = p2015*p2064*p2098/(p0818*1000)
- p2638: 0; = p2247*(p1019+p1021)
- p0197: 29.385
- p3447: 0; = p3371*p1240
- p1307: 0
- p3219: 0.0283898; = p3215*p1228
- p0803: 0
- p3060: 1.4486e-7; = p2279*p1023
- p2317: 2.60608e-6; = p2224*p2184
- p2159: 3.20681e-6; = p2015*p2083*p2121/(p0818*1000)
- p2875: 7.23077e-5; = p2289*(p1020+p1022)
- p1792: 0
- p0008: 0.0739645; = (p0007-1.5)/(p0007-1)^2
- p1453: 2
- p0020: 347.638
- p1675: 0
- p2627: 0; = p2431*p1123
- p2673: 3.04237e-5; = p2282*(p1019+p1021)
- p4103: 1.9055e-6; = p1754*p3479
- p3353: 7.99515e6; = if(and(p1232=0;p3256<>0);p3256*(p3276-p3348)/p3349;0)

- p0481: 0; = SQRT(2)*(IF((2*p0349-1)<0;-1;IF((2*p0349-1)>0;1;0))*SQRT(SQRT((2/(pi()*0.140012289)+LN(1-(2*p0349-1)^2)/2)^2-LN(1-(2*p0349-1)^2)/0.140012289)-(2/(pi()*0.140012289)+LN(1-(2*p0349-1)^2)/2)))
- p3985: 4.97655e-7; = p1842*p3478
- p0938: 2.10392e-5; = p0932*p0001/(p0818*p0002)
- p2305: 2.47665e-6; = p2227*p2212
- p2225: 0; = if(p0765*p0769+p0766*p0770+p0767*p0771+p0768*p0772=0;0;p0772*p0768/(p0765*p0769+p0766*p0770+p0767*p0771+p0768*p0772))
- p0399: 0.5
- p3287: 0.745
- p2460: 0; = p2264*p1073
- p2768: 0; = p2377*(p1078+p1080)
- p2691: 0.000345482; = p2300*(p1078+p1080)
- p1579: 0
- p1557: 0
- p2112: 0.856281
- p2287: 0.000256436; = p2223*p2193
- p2833: 0; = p2247*(p1020+p1022)
- p1330: 0; = p1320*p0801
- p3827: 0; = p1890*p3477
- p2149: 6.60697e-8; = p2015*p2077*p2111/(p0818*1000)
- p3040: 0; = p2259*p1082
- p0701: 0
- p0780: 45.871; = p0120*(1+p0648*p0252/100)
- p2807: 0; = p2416*(p1078+p1080)
- p1187: 0.00025142
- p1681: 0
- p2193: 0.000389281; = p1054/p0818
- p0855: 1.2775; = p0854*p0001*p0003/(p0818*p0002)
- p1179: 0.5
- p2737: 8.5194e-6; = p2346*(p1078+p1080)
- p2929: 6.27983e-5; = p2343*(p1079+p1081)
- p3034: 0; = p2253*p1023
- p1125: 0; = if(p1121=0;p0719/100;0)
- p2391: 0; = p2233*p2220
- p0774: 0
- p2777: 0; = p2386*(p1078+p1080)
- p1954: 0
- p2881: 1.38481e-6; = p2295*(p1020+p1022)
- p0586: 0; = IF(p0322<0.5;-SQRT(p0007*EXP(p0454^2*p0008)-p0007);SQRT(p0007*EXP(p0454^2*p0008)-p0007))
- p2645: 0; = p2254*(p1019+p1021)
- p0548: 0; = IF(p0284<0.5;-SQRT(p0007*EXP(p0416^2*p0008)-p0007);SQRT(p0007*EXP(p0416^2*p0008)-p0007))
- p1583: 0
- p2024: 0.748682
- p2983: 0; = p2397*(p1020+p1022)
- p2527: 5.39903e-7; = p2331*p1014
- p3275: 0.0214527
- p3357: 6.46237e6; = if(p1232=0;p3307+p3318+p3329+p3340+p3351;0)
- p2700: 4.48338e-6; = p2309*(p1078+p1080)
- p1795: 0
- p1128: 0.28117; = if(p1121=0;IF(p1123=1;0;IF(p1123+p1124>1;1-p1123;p1124));0)
- p1205: 0.04725
- p0815: 0
- p0217: 10.813
- p0692: 0
- p1456: 25
- p2697: 7.68831e-6; = p2306*(p1078+p1080)
- p0037: 100
- p1930: 0
- p1618: 0
- p2295: 1.04066e-5; = p2223*p2202
- p1882: 0
- p2831: 0; = p2245*(p1020+p1022)
- p2561: 0; = p2365*p1014
- p2668: 2.01875e-5; = p2277*(p1019+p1021)
- p0792: 0
- p2174: 0.00700667; = p0895*p0903/p0818
- p2750: 0; = p2359*(p1019+p1021)
- p3063: 8.37011e-7; = p2282*p1023
- p3467: 0; = p3372*p1241
- p4513: 0; = p1962*p3480
- p2374: 0; = p2225*p2203
- p1316: 0.0625635; = p1312*p1252/p0818
- p1733: 0
- p0374: 0.5
- p3250: 0.875
- p4322: 0; = p1767*p3480
- p2733: 6.94485e-6; = p2342*(p1078+p1080)
- p1869: 0
- p0412: 0; = SQRT(2)*(IF((2*p0280-1)<0;-1;IF((2*p0280-1)>0;1;0))*SQRT(SQRT((2/(pi()*0.140012289)+LN(1-(2*p0280-1)^2)/2)^2-LN(1-(2*p0280-1)^2)/0.140012289)-(2/(pi()*0.140012289)+LN(1-(2*p0280-1)^2)/2)))
- p3940: 3.70476e-6; = p1797*p3478
- p1687: 0
- p0293: 0.5
- p3435: 0; = p3378*p1239
- p2909: 1.51788e-6; = p2323*(p1020+p1022)
- p3403: 0; = p3365*p1238
- p2939: 0; = p2353*(p1129+p1131)
- p2699: 5.14065e-5; = p2308*(p1078+p1080)
- p2680: 0.000165117; = p2289*(p1019+p1021)
- p2502: 1.2654e-5; = p2306*p1073
- p0884: 0; = IF(p0689=100;0;IF(p0689+p0688>100;100-p0689;p0688))
- p1127: 0; = if(p1121=0;p0721/100;0)
- p0693: 93.711; = p0033*(1+p0561*p0165/100)
- p0184: 30.532
- p1261: 0; = if(p1232>0;0;p0732/100)
- p3046: 0; = p2265*p1082
- p2813: 0; = p2422*(p1078+p1080)
- p2272: 0; = p2230*p2218
- p2407: 0; = p2234*p2197
- p2183: 0.000100851; = p1064-p2182
- p1813: 0
- p4032: 1.58144e-5; = p1889*p3478
- p0606: 0; = IF(p0342<0.5;-SQRT(p0007*EXP(p0474^2*p0008)-p0007);SQRT(p0007*EXP(p0474^2*p0008)-p0007))
- p1886: 0
- p3897: 6.13774e-6; = p1754*p3478
- p2413: 0; = p2234*p2203
- p0386: 0.5
- p2006: 0.0379758; = ((p1980*p1985+p1986*p1991+p1992*p1997+p2000*p2005)/p0818)*p0005*p0002/1000
- p1329: 0.000102496; = p1328*p0001/(p0818*p0002)
- p5037: 0; = p1864*p3483
- p3592: 3.12505e-8; = p1861*p3476
- p2434: 0; = p2238*p1014
- p2933: 2.21994e-5; = p2347*(p1079+p1081)
- p1638: 0.732906
- p0793: 0
- p0022: 3799.05
- p1078: 0.29687; = IF(p1071=0;IF(p1073=1;0;IF(p1073+p1074>1;1-p1073;p1074));0)
- p1766: 0
- p1788: 0
- p0268: 15.279
- p2427: 0; = p2235*p2217
- p3346: 0.0178625; = if(and(p1232=0;p3256<>0);p3274*(p3281*(p3285*p1256+p3286*(p1253+p1257)+p1258*p3288));0)
- p2731: 3.5569e-5; = p2340*(p1078+p1080)
- p3375: 0.000652765; = if(p1232=0;p3246*p3357/p0818;0)
- p0682: 3799.05; = p0022*(1+p0550*p0154/100)
- p2949: 0; = p2363*(p1020+p1022)
- p0908: 0.00297304
- p3180: 0; = p2399*p1023
- p1740: 0
- p4101: 4.01992e-6; = p1962*p3478
- p3457: 0; = p3362*p1241
- p3125: 1.47609e-8; = p2344*p1082
- p1193: 0; = IF(OR(p1036=0;p1095=0);0.0001*p0857;0)
- p0824: 0.8964
- p1680: 0
- p1684: 0
- p1705: 0
- p2063: 2.01468
- p0870: 3.44879e6; = p0858*p0856
- p0485: 0; = SQRT(2)*(IF((2*p0353-1)<0;-1;IF((2*p0353-1)>0;1;0))*SQRT(SQRT((2/(pi()*0.140012289)+LN(1-(2*p0353-1)^2)/2)^2-LN(1-(2*p0353-1)^2)/0.140012289)-(2/(pi()*0.140012289)+LN(1-(2*p0353-1)^2)/2)))
- p5337: 1.0692e-7; = p1962*p3484
- p1922: 0
- p1632: 0
- p1574: 0
- p2945: 0; = p2359*(p1020+p1022)
- p5240: 2.94141e-9; = p1861*p3484
- p0948: 0; = if(and(p0683=0;or(p0807=480;p0807=32;p0807=1;and(p0807=60;p0901<0.03)));p0936;0)
- p1943: 0
- p3018: 0; = p2237*p1023
- p3344: 0; = if(and(p1232=0;p3254<>0);p3254-(p3339+p3340+p3341+p3342+p3343);0)
- p0635: 0; = IF(p0371<0.5;-SQRT(p0007*EXP(p0503^2*p0008)-p0007);SQRT(p0007*EXP(p0503^2*p0008)-p0007))
- p3477: 0; = if(p1328+p1330+p1332+p1334+p1336+p1338+p1340+p1342+p1344=0;0;p1330/(p1328+p1330+p1332+p1334+p1336+p1338+p1340+p1342+p1344))
- p0179: 40.205
- p1182: 531.277; = p1181*p0801
- p1138: 81030; = if(p1121=0;p1132*(p0716/100)*p0703*1000;0)
- p2046: 10
- p3149: 0; = p2368*p1023
- p1066: 0.000246419; = IF(p1012=0;p1052/(p1059*p0818);0)
- p3663: 1.56253e-7; = p1932*p3476
- p0442: 0; = SQRT(2)*(IF((2*p0310-1)<0;-1;IF((2*p0310-1)>0;1;0))*SQRT(SQRT((2/(pi()*0.140012289)+LN(1-(2*p0310-1)^2)/2)^2-LN(1-(2*p0310-1)^2)/0.140012289)-(2/(pi()*0.140012289)+LN(1-(2*p0310-1)^2)/2)))
- p2898: 0; = p2312*(p1129+p1131)
- p1679: 0
- p3061: 4.54612e-7; = p2280*p1023
- p2625: 0; = p2429*p1123
- p1263: 0; = if(p1232>0;0;IF(p1259=1;0;IF(p1259+p1260>1;1-p1259;p1260)))
- p1327: 0.0281712; = if(p1318=0;if(p1327a=0;1;if(p1327a<0;0;p1327a));0)
- p4922: 0; = p1955*p3482
- p2125: 2.23787e-6; = p2015*p2053*p2087/(p0818*1000)
- p2253: 0; = p2222*p2199
- p2377: 0; = p2229*p2206
- p2754: 0; = p2363*(p1019+p1021)
- p3466: 0; = p3371*p1241
- p0380: 0.5
- p3429: 0; = p3372*p1239
- p2702: 0.000159293; = p2311*(p1128+p1130)
- p3054: 0; = p2273*p1132
- p2346: 2.86974e-5; = p2228*p2214
- p0294: 0.5
- p1231: 0.0333253; = IF(p1221=0;0;p1230*(p1228+p1229))
- p3452: 0; = p3376*p1240
- p0849: 0
- p2153: 2.91936e-9; = p2015*p2081*p2115/(p0818*1000)
- p0212: 11.534
- p1655: 0
- p2328: 0.000281494; = p2224*p2196
- p2891: 5.07688e-7; = p2305*(p1079+p1081)
- p0728: 0
- p1724: 0
- p2084: 0.21
- p2439: 0; = p2243*p1014
- p3431: 0; = p3374*p1239
- p1631: 0
- p1624: 0
- p2285: 5.53714e-6; = p2223*p2191
- p0778: 0
- p0309: 0.5
- p0935: 0.000187701; = p0929*p0001/(p0818*p0002)
- p2267: 0; = p2226*p2213
- p1148: 0.082617; = if(p1121=0;IF(p1146=1;0;1-p1146);0)
- p0404: 0.5
- p2233: 0; = if(p0783*p0787+p0784*p0788+p0785*p0789+p0786*p0790=0;0;p0790*p0786/(p0783*p0787+p0784*p0788+p0785*p0789+p0786*p0790))
- p0345: 0.5
- p3334: 0; = IF(or(p3254=0;p1232>0);0;p3269*p3277*(p3300*p3292+(1-p3300)*p3296))
- p0580: 0; = IF(p0316<0.5;-SQRT(p0007*EXP(p0448^2*p0008)-p0007);SQRT(p0007*EXP(p0448^2*p0008)-p0007))
- p2717: 4.03675e-5; = p2326*(p1019+p1021)
- p1067: 0.000139056; = IF(p1012=0;p1053/(p1060*p0818);0)
- p3052: 0; = p2271*p1082
- p1944: 0
- p0198: 47.089
- p0106: 18.82
- p2466: 0; = p2270*p1073
- p1332: 4.02484e6; = p1321*p0801
- p0861: 0; = p0673*1000/p0856
- p0502: 0; = SQRT(2)*(IF((2*p0370-1)<0;-1;IF((2*p0370-1)>0;1;0))*SQRT(SQRT((2/(pi()*0.140012289)+LN(1-(2*p0370-1)^2)/2)^2-LN(1-(2*p0370-1)^2)/0.140012289)-(2/(pi()*0.140012289)+LN(1-(2*p0370-1)^2)/2)))
- p1907: 0
- p0703: 3799.05; = p0043*(1+p0571*p0175/100)
- p2843: 0; = p2257*(p1020+p1022)
- p2353: 0; = p2232*p2221
- p0414: 0; = SQRT(2)*(IF((2*p0282-1)<0;-1;IF((2*p0282-1)>0;1;0))*SQRT(SQRT((2/(pi()*0.140012289)+LN(1-(2*p0282-1)^2)/2)^2-LN(1-(2*p0282-1)^2)/0.140012289)-(2/(pi()*0.140012289)+LN(1-(2*p0282-1)^2)/2)))
- p2632: 0; = p2241*(p1019+p1021)
- p2793: 0; = p2402*(p1019+p1021)
- p0344: 0.5
- p2769: 0; = p2378*(p1078+p1080)
- p1287: 0
- p1003: 0; = p0999*p0888
- p1665: 0
- p3282: 0.3
- p2821: 0; = p2430*(p1128+p1130)
- p0944: 0; = if(and(p0683=0;p0950=0);p0938;0)
- p2085: 0.0335294
- p2635: 0; = p2244*(p1019+p1021)
- p0909: 1.04825e8
- p2262: 0; = p2226*p2208
- p1793: 0
- p3459: 0; = p3364*p1241
- p1172: 1.9509e-7; = p1170/p0818
- p2917: 1.2952e-7; = p2331*(p1020+p1022)
- p3389: 0; = p3370*p1234
- p0006: 15
- p2436: 0; = p2240*p1014
- p2677: 1.36164e-5; = p2286*(p1019+p1021)
- p3088: 4.373e-7; = p2307*p1082
- p0755: 0
- p3320: 0; = if(and(p1232=0;p3253<>0);p3253*(p3264-p3315)/p3316;0)
- p2505: 7.37908e-6; = p2309*p1073
- p1554: 0
- p2578: 0; = p2382*p1073
- p2094: 0.922577
- p0282: 0.5
- p0734: 0
- p3395: 7.56329e-5; = p3376*p1234
- p1810: 0
- p1599: 0
- p2579: 0; = p2383*p1073
- p3442: 0; = p3366*p1240
- p1991: 6.93167e7; = (if(p1111=0;0;p1106/p1111)+if(p1112=0;0;p1107/p1112)+if(p1113=0;0;p1108/p1113)+if(p1114=0;0;p1109/p1114)+if(p1115=0;0;p1110/p1115))*(1+p1157)
- p1783: 0
- p3094: 1.4347e-5; = p2313*p1132
- p3154: 0; = p2373*p1023
- p0702: 3799.05; = p0042*(1+p0570*p0174/100)
- p2001: 400
- p2607: 0; = p2411*p1014
- p2158: 2.65323e-7; = p2015*p2082*p2120/(p0818*1000)
- p0719: 0
- p1863: 0
- p0847: 0
- p0974: 0.5
- p2681: 1.5821e-7; = p2290*(p1019+p1021)
- p2936: 0; = p2350*(p1129+p1131)
- p3424: 0; = p3367*p1239
- p2029: 6.19
- p3297: 0; = if(p1273+p1274+p1275+p1276=0;0;p1273/(p1273+p1274+p1275+p1276))
- p1911: 0
- p0843: 0.0111763
- p0687: 5.637; = p0027*(1+p0555*p0159/100)
- p2452: 0; = p2256*p1014
- p2229: 0; = if(p0774*p0778+p0775*p0779+p0776*p0780+p0777*p0781=0;0;p0781*p0777/(p0774*p0778+p0775*p0779+p0776*p0780+p0777*p0781))
- p3255: 0; = p1252*(p1297*(1-p3247)+p1300*(1-p3248)+p1301*(1-p3249)+p1302*(1-p3250))
- p2615: 0; = p2419*p1073
- p2157: 7.5259e-8; = p2015*p2086*p2119/(p0818*1000)
- p2623: 0; = p2427*p1073
- p1664: 0
- p1895: 0
- p0023: 66.228
- p0416: 0; = SQRT(2)*(IF((2*p0284-1)<0;-1;IF((2*p0284-1)>0;1;0))*SQRT(SQRT((2/(pi()*0.140012289)+LN(1-(2*p0284-1)^2)/2)^2-LN(1-(2*p0284-1)^2)/0.140012289)-(2/(pi()*0.140012289)+LN(1-(2*p0284-1)^2)/2)))
- p1588: 0
- p5028: 0; = p1855*p3483
- p0711: 48.861; = p0051*(1+p0579*p0183/100)
- p2533: 0.000132262; = p2337*p1073
- p1302: 0; = IF(p1297+p1300+p1301=p1262;0;p1262-(p1297+p1300+p1301))
- p2440: 0; = p2244*p1014
- p1819: 0
- p1966: 3.75e6; = if(p0814=0;p0802;0)
- p3689: 1.13595e-6; = p1962*p3476
- p3314: 0; = if(and(p1232=0;p3253<>0);p3263*p3289;0)
- p3291: 0.437
- p0213: 7.223
- p3461: 0; = p3366*p1241
- p1580: 0
- p2997: 0; = p2411*(p1020+p1022)
- p2139: 4.97026e-7; = p2015*p2067*p2101/(p0818*1000)
- p1308: 0
- p1481: 286
- p0461: 0; = SQRT(2)*(IF((2*p0329-1)<0;-1;IF((2*p0329-1)>0;1;0))*SQRT(SQRT((2/(pi()*0.140012289)+LN(1-(2*p0329-1)^2)/2)^2-LN(1-(2*p0329-1)^2)/0.140012289)-(2/(pi()*0.140012289)+LN(1-(2*p0329-1)^2)/2)))
- p0874: 0; = p0865*p0856
- p2529: 2.0778e-5; = p2333*p1014
- p2140: 2.54162e-7; = p2015*p2068*p2102/(p0818*1000)
- p1082: 0.00953; = IF(p1071=0;IF(p1073+p1078+p1079+p1080+p1081=1;0;1-(p1073+p1078+p1079+p1080+p1081));0)
- p3184: 0; = p2403*p1023
- p2072: 0.134
- p3425: 0; = p3368*p1239
- p0238: 14.288
- p3281: 0.46
- p2866: 7.23628e-6; = p2280*(p1020+p1022)
- p3120: 6.93599e-6; = p2339*p1082
- p3528: 1.04689e-6; = p1797*p3476
- p3323: 0; = if(and(p1232=0;p3255<>0);p3265*p3277*(p3299*p3291+(1-p3299)*p3295);0)
- p3283: 0.3
- p2849: 0; = p2263*(p1079+p1081)
- p3409: 0; = p3371*p1238
- p1873: 0
- p2306: 2.58979e-5; = p2227*p2213
- p1811: 0
- p0027: 5.637
- p2310: 0.000135353; = p2227*p2217
- p1738: 0
- p2746: 0; = p2355*(p1019+p1021)
- p2776: 0; = p2385*(p1078+p1080)
- p1794: 0
- p2312: 0.00079837; = p2231*p2219
- p1183: 0.000342453; = p0801*p0001/(p0818*p0002)
- p3318: 0; = if(and(p1232=0;p3253<>0);p3253*(p3262-p3313)/p3316;0)
- p1272: 0.2017; = IF(p1267+p1270+p1271=p1259;0;p1259-(p1267+p1270+p1271))
- p1823: 0
- p0779: 49.603; = p0119*(1+p0647*p0251/100)
- p2873: 3.41239e-5; = p2287*(p1020+p1022)
- p2367: 0; = p2225*p2196
- p2520: 1.59114e-6; = p2324*p1014
- p0570: 0; = IF(p0306<0.5;-SQRT(p0007*EXP(p0438^2*p0008)-p0007);SQRT(p0007*EXP(p0438^2*p0008)-p0007))
- p1785: 0
- p1553: 0
- p0837: 0.5
- p1844: 0
- p2835: 0; = p2249*(p1020+p1022)
- p2231: 1; = if(p0783*p0787+p0784*p0788+p0785*p0789+p0786*p0790=0;0;p0788*p0784/(p0783*p0787+p0784*p0788+p0785*p0789+p0786*p0790))
- p2667: 9.19654e-5; = p2276*(p1019+p1021)
- p0721: 0
- p0322: 0.5
- p0088: 54.742
- p2318: 8.97649e-6; = p2224*p2185
- p2758: 0; = p2367*(p1019+p1021)
- p0111: 43.946
- p2608: 0; = p2412*p1014
- p3280: 0.375
- p2453: 0; = p2257*p1014
- p2048: 1.79439e-14; = p2015*p2046/(p0818*1000000000000)
- p1756: 0
- p0670: 3448.79; = p0010*(1+p0538*p0142/100)
- p1615: 0
- p2661: 0; = p2270*(p1078+p1080)
- p2726: 1.87805e-5; = p2335*(p1019+p1021)
- p0161: 0.781
- p1140: 7.30159e-6; = if(p1121=0;p1134*p0001/(p0818*p0002);0)
- p0460: 0; = SQRT(2)*(IF((2*p0328-1)<0;-1;IF((2*p0328-1)>0;1;0))*SQRT(SQRT((2/(pi()*0.140012289)+LN(1-(2*p0328-1)^2)/2)^2-LN(1-(2*p0328-1)^2)/0.140012289)-(2/(pi()*0.140012289)+LN(1-(2*p0328-1)^2)/2)))
- p3416: 0.00266355; = p3378*p1238
- p4892: 0; = p1925*p3482
- p0889: 0; = 1000*p0888*p0001*p0003*p0004/(p0818*p0002)
- p2099: 0.620397
- p2744: 0; = p2353*(p1128+p1130)
- p2592: 0; = p2396*p1014
- p1592: 0
- p0794: 0
- p2384: 0; = p2229*p2213
- p2944: 0; = p2358*(p1020+p1022)
- p3294: 0.279
- p3121: 1.14182e-6; = p2340*p1082
- p1006: 0; = p1002*p0001*p0004/(p0818*p0002)
- p2392: 0; = p2233*p2221
- p3226: 0.000823603; = p3222*p1229
- p2134: 3.28686e-6; = p2015*p2062*p2096/(p0818*1000)
- p3311: 1.34399e6; = if(and(p1232=0;p3252<>0);p3252-(p3306+p3307+p3308+p3309+p3310);0)
- p3057: 2.53013e-6; = p2276*p1023
- p2799: 0; = p2408*(p1019+p1021)
- p0477: 0; = SQRT(2)*(IF((2*p0345-1)<0;-1;IF((2*p0345-1)>0;1;0))*SQRT(SQRT((2/(pi()*0.140012289)+LN(1-(2*p0345-1)^2)/2)^2-LN(1-(2*p0345-1)^2)/0.140012289)-(2/(pi()*0.140012289)+LN(1-(2*p0345-1)^2)/2)))
- p3191: 0; = p2410*p1023
- p1218: 0
- p2953: 0; = p2367*(p1020+p1022)
- p2710: 8.56028e-6; = p2319*(p1019+p1021)
- p0647: 0; = IF(p0383<0.5;-SQRT(p0007*EXP(p0515^2*p0008)-p0007);SQRT(p0007*EXP(p0515^2*p0008)-p0007))
- p1188: 955.395; = p1187*p0801
- p2729: 2.60226e-5; = p2338*(p1078+p1080)
- p2023: 3.15
- p0876: 0; = p0866*p0856
- p3122: 5.16345e-7; = p2341*p1082
- p1170: 1931.39; = p1169*p0801
- p2974: 0; = p2388*(p1079+p1081)
- p1083: 352781; = IF(p1071=0;p1073*(p0710/100)*p0703*1000;0)
- p2682: 2.59677e-7; = p2291*(p1019+p1021)
- p2694: 1.11047e-5; = p2303*(p1078+p1080)
- p0247: 23.214
- p0896: 0.497045
- p0915: 0.0289793; = p0914/p0818
- p2194: 0.214362
- p0579: 0; = IF(p0315<0.5;-SQRT(p0007*EXP(p0447^2*p0008)-p0007);SQRT(p0007*EXP(p0447^2*p0008)-p0007))
- p3167: 0; = p2386*p1082
- p3021: 0; = p2240*p1023
- p0370: 0.5
- p1223: 0.56
- p3055: 0; = p2274*p1132
- p1072: 0; = p1071*p0001/(p0818*p0002)
- p1704: 0
- p2429: 0; = p2236*p2219
- p3484: 0.01456; = IF(p1344=0;0;p1344/(p1328+p1330+p1332+p1334+p1336+p1338+p1340+p1342+p1344))
- p1643: 0
- p1569: 0
- p3573: 1.40627e-7; = p1842*p3476
- p0474: 0; = SQRT(2)*(IF((2*p0342-1)<0;-1;IF((2*p0342-1)>0;1;0))*SQRT(SQRT((2/(pi()*0.140012289)+LN(1-(2*p0342-1)^2)/2)^2-LN(1-(2*p0342-1)^2)/0.140012289)-(2/(pi()*0.140012289)+LN(1-(2*p0342-1)^2)/2)))
- p0966: 0.3883; = if(p0683=0;0;IF(p0684/100+p0965=1;0;1-(p0684/100+p0965)))
- p0446: 0; = SQRT(2)*(IF((2*p0314-1)<0;-1;IF((2*p0314-1)>0;1;0))*SQRT(SQRT((2/(pi()*0.140012289)+LN(1-(2*p0314-1)^2)/2)^2-LN(1-(2*p0314-1)^2)/0.140012289)-(2/(pi()*0.140012289)+LN(1-(2*p0314-1)^2)/2)))
- p1234: 0.35546; = if(p1232>0;0;p0726/100)
- p0284: 0.5
- p1742: 0
- p1033: 0; = IF(p1012=0;p1027*p0001/(p0818*p0002);0)
- p0082: 85.579
- p2340: 0.000119813; = p2228*p2208
- p0051: 48.861
- p1901: 0
- p3192: 0; = p2411*p1023
- p3155: 0; = p2374*p1023
- p3303: 0.000398148; = if(and(p1232=0;p3252<>0);p3259*p3289;0)
- p3045: 0; = p2264*p1082
- p1168: 1.65367e-6; = p1164*p1167/p0818
- p0405: 0; = SQRT(2)*(IF((2*p0273-1)<0;-1;IF((2*p0273-1)>0;1;0))*SQRT(SQRT((2/(pi()*0.140012289)+LN(1-(2*p0273-1)^2)/2)^2-LN(1-(2*p0273-1)^2)/0.140012289)-(2/(pi()*0.140012289)+LN(1-(2*p0273-1)^2)/2)))
- p2999: 0; = p2413*(p1020+p1022)
- p1255: 0; = if(p1232>0;0;p0737/100)
- p2904: 1.1945e-6; = p2318*(p1020+p1022)
- p2203: 0.000181108; = p1070-p2200-p2201-p2202
- p0814: 0; = if(p0807=480;p0810*p0812+p0811*p0813;0)
- p3005: 0; = p2419*(p1079+p1081)
- p1725: 0
- p0248: 22.224
- p2631: 0; = p2240*(p1019+p1021)
- p3091: 1.28991e-6; = p2310*p1082
- p1777: 0
- p1117: 0.000356041; = IF(p1071=0;p1107/(p1112*p0818);0)
- p2801: 0; = p2410*(p1019+p1021)
- p3211: 0; = p2430*p1132
- p1828: 0
- p2313: 5.10208e-5; = p2231*p2220
- p1109: 7.70086e6; = IF(p1071=0;p1105*p1103*p1095;0)
- p3078: 4.56076e-6; = p2297*p1082
- p2566: 0; = p2370*p1014
- p0342: 0.5
- p1963a: 2.74869e-5; = p1550*p1754+p1551*p1755+p1552*p1756+p1553*p1757+p1554*p1758+p1555*p1759+p1556*p1760+p1557*p1761+p1558*p1762+p1559*p1763+p1560*p1764+p1561*p1765+p1562*p1766+p1563*p1767+p1564*p1768+p1565*p1769+p1566*p1770+p1567*p1771+p1568*p1772
- p2356: 0; = p2225*p2184
- p2280: 5.43795e-5; = p2223*p2186
- p2018: 0.1978
- p0418: 0; = SQRT(2)*(IF((2*p0286-1)<0;-1;IF((2*p0286-1)>0;1;0))*SQRT(SQRT((2/(pi()*0.140012289)+LN(1-(2*p0286-1)^2)/2)^2-LN(1-(2*p0286-1)^2)/0.140012289)-(2/(pi()*0.140012289)+LN(1-(2*p0286-1)^2)/2)))
- p1563: 0.693253
- p2971: 0; = p2385*(p1079+p1081)
- p2296: 0.000119304; = p2223*p2203
- p1180: 1.87499e-8; = p1176*p1179/p0818
- p1238: 0.64454; = if(p1232>0;0;IF(p1234=1;0;IF(p1234+p1235>1;1-p1234;p1235)))
- p0766: 18.82; = p0106*(1+p0634*p0238/100)
- p2675: 6.69083e-6; = p2284*(p1019+p1021)
- p0996: 0; = if(p0888=0;0;if((p0691*p0690*1000*p0692/100)/p0888>1;1;(p0691*p0690*1000*p0692/100)/p0888))
- p0871: 3.10802; = p0870*p0001*p0003/(p0818*p0002)
- p2701: 4.01822e-5; = p2310*(p1078+p1080)
- p2885: 2.87316e-5; = p2299*(p1079+p1081)
- p1259: 0.2017; = if(p1232>0;0;p0730/100)
- p2129: 2.21152e-6; = p2015*p2057*p2091/(p0818*1000)
- p0865: 0; = IF(p0858+p0864=1;0;IF(p0858+p0864+p0860>1;1-(p0858+p0864);p0860))
- p2666: 0; = p2275*(p1128+p1130)
- p0700: 0
- p2329: 2.69719e-7; = p2224*p2197
- p0958: 0; = if(and(p0683>0;or(p0807=480;p0807=32;p0807=1;and(p0807=60;p0901<0.03)));p0934;0)
- p0211: 7.112
- p2199: 2.85217e-6; = p1069-p2197-p2198
- p2950: 0; = p2364*(p1020+p1022)
- p4281: 1.71667e-7; = p1932*p3479
- p4238: 4.90967e-6; = p1889*p3479
- p2604: 0; = p2408*p1014
- p0563: 0; = IF(p0299<0.5;-SQRT(p0007*EXP(p0431^2*p0008)-p0007);SQRT(p0007*EXP(p0431^2*p0008)-p0007))
- p3133: 0; = p2352*p1132
- p1902: 0
- p3146: 0; = p2365*p1023
- p1976: 0.089
- p2275: 0; = p2230*p2221
- p3310: 8.73764e6; = if(and(p1232=0;p3252<>0);IF((p3306+p3307+p3308+p3309)+(p3252*(p3257*(1-p3277))/p3305)>p3252;p3252-(p3306+p3307+p3308+p3309);p3252*(p3257*(1-p3277))/p3305);0)
- p0065: 2.196
- p1961: 0.5
- p1113: 0.100377
- p0346: 0.5
- p1561: 0
- p2846: 0; = p2260*(p1079+p1081)
- p2393: 0; = p2234*p2182
- p2967: 0; = p2381*(p1079+p1081)
- p1260: 0; = if(p1232>0;0;p0731/100)
- p0797: 37.464; = p0137*(1+p0665*p0269/100)
- p2494: 0.000211485; = p2298*p1073
- p2354: 0; = p2225*p2182
- p1789: 0
- p3222: 0.224242; = IF(p3216=0;0;p1223*40.078/100.0869)
- p0969: 9.76976e7; = p0966*p0683*p0682*1000
- p4210: 3.43333e-8; = p1861*p3479
- p2941: 0; = p2355*(p1020+p1022)
- p2963: 0; = p2377*(p1079+p1081)
- p0930: 479090; = p0801*p0924
- p0786: 0
- p2955: 0; = p2369*(p1020+p1022)
- p2670: 5.26537e-6; = p2279*(p1019+p1021)
- p1061: 0.3
- p1213: 0
- p0900: 1.14331; = p0899/p0818
- p0384: 0.5
- p2517: 2.87705e-5; = p2321*p1014
- p3114: 3.1315e-7; = p2333*p1023
- p1925: 2.0202e-7; = p1517*1000/p0818
- p1784: 0
- p2204: 0.000777865; = p1109/p0818
- p2651: 0; = p2260*(p1078+p1080)
- p3108: 2.38066e-7; = p2327*p1023
- p3456: 0; = p3380*p1240
- p0810: 0
- p2751: 0; = p2360*(p1019+p1021)
- p2894: 3.54964e-5; = p2308*(p1079+p1081)
- p1935: 0
- p3292: 0.258
- p3232: 5.36643e-8; = p1182/p0818
- p2767: 0; = p2376*(p1078+p1080)
- p3621: 3.90631e-7; = p1890*p3476
- p0189: 17.182
- p2062: 3.76588
- p1274: 0; = p1270*p1252/p0818
- p0512: 0; = SQRT(2)*(IF((2*p0380-1)<0;-1;IF((2*p0380-1)>0;1;0))*SQRT(SQRT((2/(pi()*0.140012289)+LN(1-(2*p0380-1)^2)/2)^2-LN(1-(2*p0380-1)^2)/0.140012289)-(2/(pi()*0.140012289)+LN(1-(2*p0380-1)^2)/2)))
- p1987: 400
- p1022: 0; = IF(p1012=0;IF(p1014+p1019+p1020+p1021=1;0;IF(p1014+p1019+p1020+p1021+p1018>1;1-(p1014+p1019+p1020+p1021);p1018));0)
- p1600: 0
- p1116: 4.61199e-5; = IF(p1071=0;p1106/(p1111*p0818);0)
- p3225: 0.000539814; = p3221*p1229
- p2161: 1.58815e-8; = p2015*p2085*p2123/(p0818*1000)
- p0918: 0.0914837; = p0680*1000/p0801
- p1312: 0.7983; = IF(p1307+p1310+p1311=p1266;0;p1266-(p1307+p1310+p1311))
- p1671: 0
- p3295: 0.58
- p3086: 2.36025e-8; = p2305*p1082
- p2083: 2.17294
- p2465: 0; = p2269*p1073
- p0383: 0.5
- p2016: 0.000207384; = (p2014-p2015)/(p0818)
- p2603: 0; = p2407*p1014
- p2382: 0; = p2229*p2211
- p1551: 0
- p1906: 0
- p2549: 0; = p2353*p1123
- p1587: 0.799395
- p2880: 9.6219e-6; = p2294*(p1020+p1022)
- p1924: 0
- p1760: 0
- p0718: 28.117; = p0058*(1+p0586*p0190/100)
- p1711: 0
- p3276: 0.0887032
- p2783: 0; = p2392*(p1128+p1130)
- p2142: 4.13486e-7; = p2015*p2070*p2104/(p0818*1000)
- p2073: 0.377647
- p2562: 0; = p2366*p1014
- p0732: 0
- p2487: 4.74027e-7; = p2291*p1014
- p1953: 0
- p1036: 1.21267e7; = IF(p1012=0;p0795*p0702*1000*p0796/100;0)
- p2089: 0.40001
- p0971: 0; = p0968/p0818
- p0251: 15.636
- p2219: 0.00079837; = p1154-p2218
- p3798: 0; = p1861*p3477
- p2004: 30
- p3119: 8.35366e-7; = p2338*p1082
- p2402: 0; = p2234*p2191
- p5234: 2.72375e-6; = p1855*p3484
- p2394: 0; = p2234*p2183
- p3397: 0.00146893; = p3378*p1234
- p1547: 1017
- p1731: 0
- p3238: 0.854735; = IF(p3237+p3235+p3236>1;1-(p3235+p3236);p3237)
- p1834: 0
- p2488: 1.0422e-6; = p2292*p1014
- p0877: 0; = p0876*p0001*p0003/(p0818*p0002)
- p1101: 0.0625488; = IF(p1071=0;IF(p1096=1;0;IF(p1096+p1097>1;1-p1096;p1097));0)
- p3008: 0; = p2422*(p1079+p1081)
- p0598: 0; = IF(p0334<0.5;-SQRT(p0007*EXP(p0466^2*p0008)-p0007);SQRT(p0007*EXP(p0466^2*p0008)-p0007))
- p0614: 0; = IF(p0350<0.5;-SQRT(p0007*EXP(p0482^2*p0008)-p0007);SQRT(p0007*EXP(p0482^2*p0008)-p0007))
- p1313: 0; = p1307*p1252/p0818
- p3188: 0; = p2407*p1023
- p1874: 0
- p4650: 3.27542e-6; = p1889*p3481
- p2040: 1.56
- p0936: 4.31752e-5; = p0930*p0001/(p0818*p0002)
- p1945: 0
- p3453: 0; = p3377*p1240
- p2938: 0; = p2352*(p1129+p1131)
- p1107: 738382; = IF(p1071=0;p1105*p1101*p1095;0)
- p1620: 0
- p1852: 0
- p2455: 0; = p2259*p1073
- p2201: 0.000109765; = 12.01*p2200/(2*14.0067)
- p1018: 0; = IF(p1012=0;p0709/100;0)
- p2257: 0; = p2222*p2203
- p2879: 2.24431e-5; = p2293*(p1020+p1022)
- p1809: 0
- p0713: 20.499; = p0053*(1+p0581*p0185/100)
- p3223: 0.126838; = IF(p3216=0;0;(1-p1223)*24.3050/84.3139)
- p1986: 4200
- p1240: 0; = if(p1232>0;0;IF(p1234+p1238+p1239=1;0;IF(p1234+p1238+p1239+p1237>1;1-(p1234+p1238+p1239);p1237)))
- p2965: 0; = p2379*(p1079+p1081)
- p2602: 0; = p2406*p1014
- p0758: 0
- p1796: 0
- p2913: 3.78941e-6; = p2327*(p1020+p1022)
- p2743: 0; = p2352*(p1128+p1130)
- p3029: 0; = p2248*p1023
- p2629: 0; = p2238*(p1019+p1021)
- p2256: 0; = p2222*p2202
- p1989: 50
- p3372: 0; = if(p1232=0;p3245*p3360/p0818;0)
- p1254: 0; = if(p1232>0;0;p0736/100)
- p0762: 0
- p0680: 347.638; = p0020*(1+p0548*p0152/100)
- p0656: 0; = IF(p0392<0.5;-SQRT(p0007*EXP(p0524^2*p0008)-p0007);SQRT(p0007*EXP(p0524^2*p0008)-p0007))
- p1058: 0.225
- p1591: 0
- p2738: 3.21495e-5; = p2347*(p1078+p1080)
- p2363: 0; = p2225*p2191
- p0256: 25.013
- p2478: 5.5537e-5; = p2282*p1014
- p2671: 1.65243e-5; = p2280*(p1019+p1021)
- p0968: 0
- p4274: 3.43333e-8; = p1925*p3479
- p2845: 0; = p2259*(p1079+p1081)
- p2288: 5.49701e-5; = p2223*p2195
- p2815: 0; = p2424*(p1078+p1080)
- p0881: 0; = p0880*p0001*p0003/(p0818*p0002)
- p2830: 0; = p2244*(p1020+p1022)
- p0864: 0.0317342; = IF(p0858=1;0;IF(p0858+p0859>1;1-p0858;p0859))
- p3000: 0; = p2414*(p1079+p1081)

## Reference product
- soybeans; at harvest in 1998; at farm; 85%-92% moisture: 1 kg

## Inputs from technosphere
- CUTOFF apply manure; broadcast without incorporation: 4.8459e-6 ha; = p1248
- CUTOFF sulfuric acid; at point-of-sale: 3.74998e-8 kg; = p1178
- CUTOFF planting; for reduced till, soybeans; 15-30% residue: 5.9123e-5 ha; = p0955
- CUTOFF soya seeds; GMO herbicide resistant seed; at point-of-sale: 0.015546 kg; = p0970
- CUTOFF pesticide, Chlorimuron-ethyl; at point-of-sale; kg AI: 3.0303e-7 kg; = p1791
- CUTOFF pesticide, Imazamox; at point-of-sale; kg AI: 2.0202e-7 kg; = p1861
- CUTOFF pesticide, Pendimethalin; at point-of-sale; kg AI: 4.42424e-5 kg; = p1903
- CUTOFF nitrogenous fertilizer, urea; at point-of-sale: 0.000562699 kg; = p1070
- CUTOFF prepare soil; for conventional till, soybeans; <15% residue: 3.13289e-5 ha; = p0934
- CUTOFF prepare soil; for reduced till, soybeans; 15-30% residue: 5.9123e-5 ha; = p0937
- CUTOFF harvest; soybeans: 0.000337947 ha; = p1971
- CUTOFF irrigate; unspec. irrigation method, unspec. water source, in 1998: 1.88122e-7 ha-m; = p1011
- CUTOFF seed storage; soybeans: 0.0127072 kg*a; = p0975
- CUTOFF apply pesticide; banded or side-dressed: 0.000102496 ha; = p1329
- CUTOFF pesticide, Propazine; at point-of-sale; kg AI: 2.88889e-5 kg; = p1889
- CUTOFF sewage sludge storage: 4.82523e-8 kg*a; = p1192
- soybean residue; at harvest in 1998; at farm; 88%-94% moisture: 0.783199 kg; = p0839
- CUTOFF pesticide, Alachlor; at point-of-sale; kg AI: 2.69697e-5 kg; = p1767
- CUTOFF phosphatic fertilizer, other single phosphates; at point-of-sale: 0.000244549 kg; = p1118
- CUTOFF prepare soil; for no-till, soybeans: 4.31752e-5 ha; = p0936
- CUTOFF limestone, high-grade, pulverized; at point-of-sale: 0.0629777 kg; = p1228
- CUTOFF international vessel transport; average fuel: 0.0379758 metric ton*km; = p2006
- CUTOFF pesticide, Glyphosate; at point-of-sale; kg AI: 0.000187071 kg; = p1855
- CUTOFF apply N fertilizer; broadcast without incorporation: 9.86805e-6 ha; = p1032
- CUTOFF irrigate; pressure, groundwater source, in 1998: 1.09169e-5 ha-m; = p0993
- CUTOFF nitrogenous fertilizer, anhydrous ammonia; at point-of-sale: 0.000560282 kg; = p1064
- CUTOFF apply manure; broadcast or spray with incorporation: 2.67249e-6 ha; = p1247
- CUTOFF apply pesticide; broadcast without incorporation: 0.000112607 ha; = p1335
- CUTOFF beef manure; from unspecified storage; at point-of-sale: 0.0158074 kg; = p1276
- CUTOFF planting; for ridge till, soybeans: 2.10392e-5 ha; = p0956
- CUTOFF pesticide, Imazethapyr; at point-of-sale; kg AI: 2.52525e-6 kg; = p1864
- CUTOFF pesticide, Flumetsulam; at point-of-sale; kg AI: 9.09091e-7 kg; = p1842
- CUTOFF apply pesticide; as foliar or directed spray: 7.51246e-5 ha; = p1339
- CUTOFF prepare soil; for ridge till, soybeans: 2.10392e-5 ha; = p0938
- CUTOFF harvest; soybeans residue management: 0.000342453 ha; = p1975
- CUTOFF apply P fertilizer; no broadcast application: 3.17924e-5 ha; = p1089
- CUTOFF irrigate; unspecified irrigation method, groundwater source, in 1998: 4.42596e-8 ha-m; = p0995
- CUTOFF apply pesticide; unspecified application methods: 9.64733e-6 ha; = p1345
- CUTOFF irrigate; gravity, groundwater source, in 1998: 3.4678e-6 ha-m; = p0992
- CUTOFF soya seeds; unspec. type; at point-of-sale: 0.00986845 kg; = p0972
- CUTOFF nitrogenous fertilizer, ammonium nitrate; at point-of-sale: 0.000246419 kg; = p1066
- CUTOFF nitrogenous fertilizer, nitrogen solutions; at point-of-sale: 0.0012976 kg; = p1068
- CUTOFF fertilizer filler materials; at point-of-sale: 0.00257612 kg; = p1158
- CUTOFF apply N fertilizer; broadcast with incorporation: 2.2534e-5 ha; = p1031
- CUTOFF apply P fertilizer; broadcast without incorporation: 1.33381e-5 ha; = p1091
- CUTOFF pesticide, unspecified type; at point-of-sale; kg AI: 7.34339e-6 kg; = p1962
- CUTOFF apply single or mixed N fertilizer; unspec. method: 6.19951e-7 ha; = p1035
- CUTOFF pesticide formulation balance; at point-of-sale: 0.000226227 kg; = p1963
- CUTOFF pesticide, Quizalofop, ethyl ; at point-of-sale; kg AI: 2.0202e-7 kg; = p1925
- CUTOFF local area trucking; class 6, average fuel: 0.000287579 metric ton*km; = p2010
- CUTOFF pesticide storage: 0.000437677 kg*a; = p1965
- CUTOFF apply K fertilizer; no broadcast application: 1.13646e-5 ha; = p1139
- CUTOFF gypsum storage: 1.65367e-6 kg*a; = p1168
- CUTOFF apply liming materials; unspecified method: 0.000342453 ha; = p1227
- CUTOFF apply gypsum; unspecified method: 0.000342453 ha; = p1165
- CUTOFF apply sulfur; unspecified method: 0.000342453 ha; = p1171
- CUTOFF regional or national trucking; class 8, average fuel: 0.0215879 metric ton*km; = p2009
- CUTOFF sulfur; at point-of-sale: 1.9509e-7 kg; = p1172
- CUTOFF gypsum; at point-of-sale: 3.30734e-6 kg; = p1166
- CUTOFF apply pesticide; broadcast with incorporation: 0.000362716 ha; = p1333
- CUTOFF nitrogenous fertilizer, sodium nitrate; at point-of-sale: 4.93981e-6 kg; = p1069
- CUTOFF apply single or mixed K fertilizer; unspec. method: 7.30236e-6 ha; = p1144
- CUTOFF apply sewage sludge; unspecified method: 0.000342453 ha; = p1189
- CUTOFF fertilizer storage: 0.00624116 kg*a; = p1160
- CUTOFF potassic fertilizer, potassium chloride; at point-of-sale: 0.00136491 kg; = p1154
- CUTOFF planting; for mulch till, soybeans: 0.000187701 ha; = p0953
- CUTOFF apply manure; unspec. method: 8.34709e-22 ha; = p1251
- CUTOFF potassic fertilizer, other single nutrients; at point-of-sale: 0.000139682 kg; = p1155
- CUTOFF apply P fertilizer; broadcast with incorporation: 1.93164e-5 ha; = p1090
- CUTOFF phosphatic fertilizer, diammonium phosphate; at point-of-sale: 0.00360076 kg; = p1119
- CUTOFF prepare soil; for unspec. till, soybeans: 8.56133e-8 ha; = p0939
- CUTOFF dolomite, pulverized; at point-of-sale: 0.00367283 kg; = p1229
- CUTOFF apply zinc compounds; unspecified method: 0.000342453 ha; = p1183
- CUTOFF zinc compounds storage: 2.68322e-8 kg*a; = p1186
- CUTOFF sulfur storage: 9.75451e-8 kg*a; = p1174
- CUTOFF pesticide, 2,4-D; at point-of-sale; kg AI: 1.12121e-5 kg; = p1754
- CUTOFF sulfuric acid storage: 1.87499e-8 kg*a; = p1180
- CUTOFF nitrogenous fertilizer, aqueous ammonia; at point-of-sale: 3.39409e-5 kg; = p1065
- CUTOFF planting; for no-till, soybeans: 4.31752e-5 ha; = p0954
- CUTOFF bulk cargo rail transport; diesel: 0.00718948 metric ton*km; = p2008
- CUTOFF apply single or mixed P fertilizer; unspec. method: 6.20088e-7 ha; = p1094
- CUTOFF prepare soil; for mulch till, soybeans: 0.000187701 ha; = p0935
- CUTOFF phosphatic fertilizer, superphosphate grades over 22%; at point-of-sale: 0.000356041 kg; = p1117
- CUTOFF planting; for conventional till, soybeans; <15% residue: 3.13289e-5 ha; = p0952
- CUTOFF apply N fertilizer; no broadcast application: 4.11348e-5 ha; = p1030
- CUTOFF pesticide, Sulfentrazone; at point-of-sale; kg AI: 1.0101e-6 kg; = p1932
- CUTOFF pesticide, Metribuzin; at point-of-sale; kg AI: 2.52525e-6 kg; = p1890
- CUTOFF planting; for unspec. till, soybeans: 8.56133e-8 ha; = p0957
- CUTOFF sewage sludge; at point-of-sale: 9.65046e-8 kg; = p1190
- CUTOFF nitrogenous fertilizer, ammonium sulfate; at point-of-sale: 0.000139056 kg; = p1067
- CUTOFF pesticide, Trifluralin; at point-of-sale; kg AI: 0.000102727 kg; = p1955
- CUTOFF apply K fertilizer; broadcast with incorporation: 7.30159e-6 ha; = p1140
- CUTOFF pesticide, Clomazone; at point-of-sale; kg AI: 6.76768e-6 kg; = p1797
- CUTOFF phosphatic fertilizer, superphos. grades 22% and under; at point-of-sale: 4.61199e-5 kg; = p1116
- CUTOFF domestic barge transport; average fuel: 0.00383439 metric ton*km; = p2007
- CUTOFF phosphatic fertilizer, monoammonium phosphate; at point-of-sale: 0.0013092 kg; = p1120
- CUTOFF unspecified animal manure; from unspecified storage; at point-of-sale: 0.0625635 kg; = p1316
- CUTOFF liming materials storage: 0.0333253 kg*a; = p1231
- CUTOFF apply sulfuric acid; unspecified method: 0.000342453 ha; = p1177
- CUTOFF zinc compounds; at point-of-sale: 5.36643e-8 kg; = p1184
- CUTOFF N inhibitor appl svc; unspec rate & type, 1998 soybeans: 0.000383838 ha; = p1162

## Inputs from nature
- Transformation, from annual crop [natural resource, land]: 3.42453 m2; = 1.0 * (p0873+p0883+p0871+p0879)
- Transformation, to annual crop [natural resource, land]: 3.42453 m2; = 1.0 * (p0857)
- Water, unspecified origin: 0.00224794 m3; = p0916*0.001+p0893*0.001
- Dry matter except CNPK; from plant uptake: 1.32164 kg; = p0917
- Nitrogen: 0.0983707 kg; = p0905
- Phosphorus: 0.0105884 kg; = p0910
- Occupation, annual crop [natural resource, land]: 1.2775 m2*year; = 1.0 * (p0855)
- Water, ground: 144.29 kg; = p0887
- Carbon dioxide: 4.19212 kg; = p0900*3.6666666667
- Potassium; from plant uptake; biogenic: 0.0289793 kg; = p0915

## Emissions to nature
- Magnesium [soil, agricultural]: 0.000465855 kg; = 1.0 * (p3227)
- Nitrogen dioxide: 5.67231e-6 kg; = p2039*3.2857142857
- Metolachlor [soil, agricultural]: 2.88889e-5 kg; = 1.0 * (p5268+p4032+p4238+p4650+p3620)
- Urea; broadcast w/o incorp. in fert. in spr. bef. plant.: 4.81095e-5 kg; = p2880*5
- Other single phosphates; no broadcast in fert. in spr. bef. plant.; kg P: 7.37908e-6 kg; = p2505
- Sodium nitrate; no broadcast in fert. at plant.: 9.08365e-7 kg; = p2525*6.0714285714
- Ammonia [air, non-urban air or from high stacks]: 3.89398e-6 kg; = 1.0 * (p2159*1.2142857143)
- Acrylonitrile: 6.01475e-8 kg; = p2156*1.4722222222
- Trifluralin [soil, agricultural]: 0.000102727 kg; = 1.0 * (p4304+p3686+p5334+p4716+p4098)
- Anhydrous ammonia; no broadcast in fert. at plant.: 0.000105604 kg; = p2511*1.2142857143
- Superphosphate, grades>22%; unspec. appl. method in fert. in spr. bef. plant.; kg P: 4.373e-7 kg; = p3088
- Other single phosphates; no broadcast in fert. at plant.; kg P: 4.61486e-6 kg; = p2544
- Filler materials, applied with synthetic fertilizer: 0.00257612 kg; = p2432
- Diammonium phosphate; no broadcast in fert. at plant.: 0.000623521 kg; = p2533*4.7142857143
- Aqueous ammonia; broadcast w/o incorp. in fert. in spr. bef. plant.: 8.12874e-7 kg; = p2864*1.2142857143
- Potassium; in above-ground residue left on field; biogenic: 0.00720834 kg; = p2170
- Nitrogen; broadcast w/o incorp. in manure at an unknown time: 0.000420733 kg; = p3413
- Volatile constituents; broadcast w/ incorp. in man. at unknown time: 0.00146893 kg; = p3397
- Water [air, non-urban air or from high stacks]: 2.07384e-7 m3; = 0.001 * (p2016)
- Potassium; broadcast w/o incorp. in manure at an unknown time: 0.000569079 kg; = p3415
- Diammonium phosphate; broadcast w/ incorp. in fert. in spr. bef. plant.: 0.000605757 kg; = p2689*4.7142857143
- Butadiene [air, non-urban air or from high stacks]: 2.70741e-7 kg; = 1.0 * (p2143*1.125)
- Phosphorous; in above-ground residue left on field: 0.00216473 kg; = p2169
- Sodium nitrate; broadcast w/ incorp. in fert. at plant.: 4.97611e-7 kg; = p2720*6.0714285714
- Chlorimuron-ethyl [soil, agricultural]: 3.0303e-7 kg; = 1.0 * (p3934+p4552+p5170+p3522+p4140)
- Nitrogen solution; unspec. appl. method in fert. in spr. bef. plant.; unspec. appl. method in fert. in spr. bef. plan...: 2.14381e-6 kg; = p3068
- Diammonium phosphate; broadcast w/o incorp. in fert. in spr. bef. plant.: 0.000418278 kg; = p2884*4.7142857143
- Nonvolatile constituents; using unspec. method in man. at unknown time; exc.CNPK,biogenic: 7.82446e-20 kg; = p3474
- Potassium chloride; no broadcast in fert. in spr. bef. plant.: 0.000549586 kg; = p2507*2.2166666667
- Anhydrous ammonia; no broadcast in fert. in spr. bef. plant.: 0.000203852 kg; = p2472*1.2142857143
- Phosphorous; in below-ground residue: 0.00080889 kg; = p2175
- Pesticide formulation balance; broadcast with incorporation: 0.000123841 kg; = p4102
- Hydrocyanic acid: 5.11905e-7 kg; = p2154*2.25
- Ammonium nitrate; broadcast w/o incorp. in fert. at plant.: 1.76724e-5 kg; = p2905*4.7142857143
- Nitrogen; using unspec. method in manure at an unknown time: 7.24714e-20 kg; = p3470
- Ethene [air, non-urban air or from high stacks]: 2.61085e-6 kg; = 1.0 * (p2125*1.1666666667)
- Monoammonium phosphate; unspec. appl. method in fert. in spr. bef. plant.: 6.78193e-6 kg; = p3083*8.2142857143
- Plant dry matter; in below-ground residue: 0.1375 kg; = p2177
- Other single phosphates; broadcast w/o incorp. in fert. at plant.; kg P: 1.9361e-6 kg; = p2934
- Superphosphate, grades>22%; broadcast w/o incorp. in fert. in spr. bef. plant.; kg P: 9.40631e-6 kg; = p2893
- Nitrogen; in below-ground residue: 0.00700667 kg; = p2174
- Dioxins and furans (PCDD/F); from residue burning: 5.38317e-14 kg TEQ; = p2047
- Phosphorous; broadcast w/o incorp. in manure at an unknown time: 0.000137142 kg; = p3414
- Potassium chloride; broadcast w/ incorp. in fert. in spr. bef. plant.: 0.0003531 kg; = p2702*2.2166666667
- Furan [air, non-urban air or from high stacks]: 1.96289e-7 kg; = 1.0 * (p2138*1.4166666667)
- Pesticide formulation balance; broadcast without incorporation: 3.84473e-5 kg; = p4308
- Aqueous ammonia; no broadcast in fert. at plant.: 1.75536e-6 kg; = p2513*1.2142857143
- Formic acid [air, non-urban air or from high stacks]: 1.79802e-6 kg; = 1.0 * (p2131*3.8333333333)
- Superphosphate, grades<= 22%; unspec. appl. method in fert. at plant.; kg P: 1.47609e-8 kg; = p3125
- Other single K nutrients; no broadcast in fert. in spr. bef. plant.; kg K: 2.23282e-5 kg; = p2509
- Ammonium nitrate; no broadcast in fert. in spr. bef. plant.: 0.000142203 kg; = p2476*4.7142857143
- Nitrogen solution; broadcast w/ incorp. in fert. at plant.; broadcast w/ incorp. in fert. at plant.; kg N: 4.03675e-5 kg; = p2717
- Aqueous ammonia; broadcast w/ incorp. in fert. in spr. bef. plant.: 1.85623e-6 kg; = p2669*1.2142857143
- Phosphorous; applied in sewage sludge: 5.3883e-10 kg; = p3241
- Other single phosphates; unspec. appl. method in fert. at plant.; kg P: 9.00096e-8 kg; = p3129
- Other single phosphates; unspec. appl. method in fert. in spr. bef. plant.; kg P: 1.43924e-7 kg; = p3090
- Phosphorous; broadcast w/ incorp. in manure at an unknown time: 7.56329e-5 kg; = p3395
- Superphosphate, grades<= 22%; no broadcast in fert. in spr. bef. plant.; kg P: 1.21012e-6 kg; = p2501
- Pendimethalin [soil, agricultural]: 4.42424e-5 kg; = 1.0 * (p5282+p4252+p3634+p4046+p4664)
- Ammonium nitrate; unspec. appl. method in fert. in spr. bef. plant.: 2.14317e-6 kg; = p3061*4.7142857143
- Superphosphate, grades>22%; no broadcast in fert. in spr. bef. plant.; kg P: 2.24207e-5 kg; = p2503
- Superphosphate, grades>22%; broadcast w/o incorp. in fert. at plant.; kg P: 5.88268e-6 kg; = p2932
- Seeds; used in planting and sowing: 0.0254145 kg; = p2179
- Oxygen; applied in limestone: 0.0283898 kg; = p3219
- Gypsum: 3.30734e-6 kg; = p3229
- Pesticides, unspecified [soil, agricultural]: 7.34339e-6 kg; = 1.0 * (p5337+p4307+p4101+p4719+p3689)
- Ammonium nitrate; broadcast w/ incorp. in fert. at plant.: 4.03556e-5 kg; = p2710*4.7142857143
- Pesticide formulation balance; banded or side-dressed: 3.49951e-5 kg; = p3690
- Nitrogen solution; unspec. appl. method in fert. at plant.; unspec. appl. method in fert. at plant.; kg N: 1.11058e-6 kg; = p3107
- Superphosphate, grades<= 22%; unspec. appl. method in fert. in spr. bef. plant.; kg P: 2.36025e-8 kg; = p3086
- Butane [air, non-urban air or from high stacks]: 1.09016e-7 kg; = 1.0 * (p2147*1.0208333333)
- Diammonium phosphate; unspec. appl. method in fert. at plant.: 1.21613e-5 kg; = p3118*4.7142857143
- Potassium; broadcast w/ incorp. in manure at an unknown time: 0.000313844 kg; = p3396
- Particulates, < 2.5 um [air, non-urban air or from high stacks]: 1.11073e-5 kg; = 1.0 * (p2033+p2035)
- Nitrogen solution; no broadcast in fert. at plant.; no broadcast in fert. at plant.; kg N: 7.36889e-5 kg; = p2522
- Nitrogen solution; broadcast w/ incorp. in fert. in spr. bef. plant.; broadcast w/ incorp. in fert. in spr. bef. plan...: 7.79232e-5 kg; = p2678
- Ammonium sulfate; no broadcast in fert. at plant.: 2.60595e-5 kg; = p2518*4.7142857143
- trans-2-Butene: 1.02177e-7 kg; = p2148*1.1666666667
- Urea; no broadcast in fert. at plant.: 0.00010389 kg; = p2529*5
- Aqueous ammonia; broadcast w/ incorp. in fert. at plant.: 9.61603e-7 kg; = p2708*1.2142857143
- Anhydrous ammonia; broadcast w/ incorp. in fert. in spr. bef. plant.: 0.000111672 kg; = p2667*1.2142857143
- Urea; unspec. appl. method in fert. in spr. bef. plant.: 3.02243e-6 kg; = p3075*5
- Monoammonium phosphate; broadcast w/ incorp. in fert. in spr. bef. plant.: 0.000211265 kg; = p2693*8.2142857143
- Sulfentrazone [soil, agricultural]: 1.0101e-6 kg; = 1.0 * (p4693+p4281+p5311+p4075+p3663)
- Diammonium phosphate; broadcast w/o incorp. in fert. at plant.: 0.00026159 kg; = p2923*4.7142857143
- Ammonium nitrate; no broadcast in fert. at plant.: 7.36672e-5 kg; = p2515*4.7142857143
- Nitrogen solution; broadcast w/o incorp. in fert. at plant.; broadcast w/o incorp. in fert. at plant.; kg N: 1.76776e-5 kg; = p2912
- Acetol; from residue burning: 6.75632e-6 kg; = p2134*2.0555555556
- Sulfur [soil, agricultural]: 1.9509e-7 kg; = 1.0 * (p3230)
- isobutene: 2.09733e-7 kg; = p2150*1.1666666667
- Diammonium phosphate; no broadcast in fert. in spr. bef. plant.: 0.000996999 kg; = p2494*4.7142857143
- Superphosphate, grades>22%; broadcast w/ incorp. in fert. in spr. bef. plant.; kg P: 1.36224e-5 kg; = p2698
- Benzene [air, non-urban air or from high stacks]: 2.75343e-7 kg; = 1.0 * (p2140*1.0833333333)
- Carbon [soil, agricultural]: 0.466943 kg; = 1.0 * (p3217+p2167+p3469+p3242+p3225+p3412+p3393+p2173)
- Potassium chloride; unspec. appl. method in fert. in spr. bef. plant.: 0.000353138 kg; = p3092*2.2166666667
- Dinitrogen monoxide [air, non-urban air or from high stacks]: 1.25631e-7 kg; = 1.0 * (p2044*1.5714285714)
- Anhydrous ammonia; broadcast w/o incorp. in fert. in spr. bef. plant.: 4.89033e-5 kg; = p2862*1.2142857143
- Phenol [air, non-urban air or from high stacks]: 9.30701e-7 kg; = 1.0 * (p2133*1.3055555556)
- cis-2-Butene: 7.70813e-8 kg; = p2149*1.1666666667
- Potassium; using unspec. method in manure at an unknown time: 9.80242e-20 kg; = p3472
- Plant dry matter; from residue burning: 0.000642561 kg; = p2164
- Ammonium sulfate; broadcast w/ incorp. in fert. at plant.: 1.42756e-5 kg; = p2713*4.7142857143
- Superphosphate, grades<= 22%; no broadcast in fert. at plant.; kg P: 7.56803e-7 kg; = p2540
- Aqueous ammonia; unspec. appl. method in fert. in spr. bef. plant.: 5.10681e-8 kg; = p3059*1.2142857143
- Zinc compounds: 5.36643e-8 kg; = p3232
- Urea; broadcast w/o incorp. in fert. at plant.: 2.49227e-5 kg; = p2919*5
- Ethane [air, non-urban air or from high stacks]: 1.6306e-6 kg; = 1.0 * (p2126*1.25)
- Water: 146.424 kg; = p3418+p3399+p3475+p2181+p2171+p2178
- Diammonium phosphate; broadcast w/ incorp. in fert. at plant.: 0.000378839 kg; = p2728*4.7142857143
- Monoammonium phosphate; unspec. appl. method in fert. at plant.: 4.2414e-6 kg; = p3122*8.2142857143
- Formaldehyde [air, non-urban air or from high stacks]: 3.73032e-6 kg; = 1.0 * (p2128*2.5)
- Acetonitrile [air, non-urban air or from high stacks]: 3.76681e-7 kg; = 1.0 * (p2155*1.7083333333)
- Monoammonium phosphate; broadcast w/ incorp. in fert. at plant.: 0.000132124 kg; = p2732*8.2142857143
- Superphosphate, grades>22%; unspec. appl. method in fert. at plant.; kg P: 2.73486e-7 kg; = p3127
- Pentane [air, non-urban air or from high stacks]: 3.79616e-8 kg; = 1.0 * (p2152*1.0166666667)
- cyclopentane: 2.96801e-9 kg; = p2153*1.0166666667
- Isoprene [air, non-urban air or from high stacks]: 6.77086e-7 kg; = 1.0 * (p2145*1.1333333333)
- Aqueous ammonia; no broadcast in fert. in spr. bef. plant.: 3.38845e-6 kg; = p2474*1.2142857143
- Nitrogen solution; no broadcast in fert. in spr. bef. plant.; no broadcast in fert. in spr. bef. plant.; kg N: 0.000142245 kg; = p2483
- Phosphorous; using unspec. method in manure at an unknown time: 2.36227e-20 kg; = p3471
- Potassium; in below-ground residue; biogenic: 0.00269353 kg; = p2176
- Sulfuric acid [soil, agricultural]: 3.74998e-8 kg; = 1.0 * (p3231)
- Sodium nitrate; broadcast w/ incorp. in fert. in spr. bef. plant.: 9.60561e-7 kg; = p2681*6.0714285714
- Other limestone constituents; applied in limestone: 0.00377866 kg; = p3220
- Sulfur dioxide [air, non-urban air or from high stacks]: 2.79925e-6 kg; = 1.0 * (p2041)
- Superphosphate, grades>22%; broadcast w/ incorp. in fert. at plant.; kg P: 8.5194e-6 kg; = p2737
- Monoammonium phosphate; no broadcast in fert. at plant.: 0.00021746 kg; = p2537*8.2142857143
- Plant dry matter; in aboveground residue left on field: 0.367973 kg; = p2172
- Other single phosphates; broadcast w/o incorp. in fert. in spr. bef. plant.; kg P: 3.0958e-6 kg; = p2895
- Nitrogen; applied in sewage sludge: 4.5137e-9 kg; = p3240
- Nonvolatile constituents; broadcast w/ incorp. in man. at unknown time; exc.CNPK,biogenic: 0.000250516 kg; = p3398
- Aqueous ammonia; unspec. appl. method in fert. at plant.: 2.64554e-8 kg; = p3098*1.2142857143
- Sewage sludge dry matter; applied in sewage sludge: 4.99711e-10 kg; = p3243
- isopentane: 3.03693e-8 kg; = p2151*1.0166666667
- Quizalofop ethyl ester [soil, agricultural]: 2.0202e-7 kg; = 1.0 * (p3656+p4274+p4068+p4686+p5304)
- Superphosphate, grades>22%; no broadcast in fert. at plant.; kg P: 1.40218e-5 kg; = p2542
- Nitrogen; broadcast w/ incorp. in manure at an unknown time: 0.000232032 kg; = p3394
- Ammonium sulfate; broadcast w/o incorp. in fert. at plant.: 6.25155e-6 kg; = p2908*4.7142857143
- Superphosphate, grades<= 22%; broadcast w/o incorp. in fert. in spr. bef. plant.; kg P: 5.07688e-7 kg; = p2891
- Acetic acid [air, non-urban air or from high stacks]: 1.00393e-5 kg; = 1.0 * (p2127*2.5)
- Nonvolatile constituents; broadcast w/o incorp. in man. at unknown time; exc.CNPK,biogenic: 0.000454249 kg; = p3417
- Monoammonium phosphate; broadcast w/o incorp. in fert. at plant.: 9.12324e-5 kg; = p2927*8.2142857143
- Glycolaldehyde; from residue burning: 3.61521e-6 kg; = p2135*2.5
- Ethyne [air, non-urban air or from high stacks]: 4.88443e-7 kg; = 1.0 * (p2132*1.0833333333)
- Superphosphate, grades<= 22%; broadcast w/o incorp. in fert. at plant.; kg P: 3.17507e-7 kg; = p2930
- Nitrogen solution; broadcast w/o incorp. in fert. in spr. bef. plant.; broadcast w/o incorp. in fert. in spr. bef. pl...: 3.41239e-5 kg; = p2873
- Anhydrous ammonia; unspec. appl. method in fert. in spr. bef. plant.: 3.0723e-6 kg; = p3057*1.2142857143
- Ammonium nitrate; broadcast w/o incorp. in fert. in spr. bef. plant.: 3.41139e-5 kg; = p2866*4.7142857143
- Ash: 0.000354931 kg; = p2022+p2021
- Urea; no broadcast in fert. in spr. bef. plant.: 0.000200544 kg; = p2490*5
- Methyl vinyl ether; from residue burning: 1.36098e-7 kg; = p2137*1.6111111111
- Alachlor [soil, agricultural]: 2.69697e-5 kg; = 1.0 * (p5146+p3498+p3910+p4116+p4528)
- Sodium nitrate; unspec. appl. method in fert. in spr. bef. plant.: 2.64267e-8 kg; = p3071*6.0714285714
- Other single K nutrients; unspec. appl. method in fert. in spr. bef. plant.; kg K: 1.4347e-5 kg; = p3094
- Propene [air, non-urban air or from high stacks]: 1.21305e-6 kg; = 1.0 * (p2136*1.1666666667)
- Imazethapyr [soil, agricultural]: 2.52525e-6 kg; = 1.0 * (p3595+p4625+p5243+p4213+p4007)
- Other single phosphates; broadcast w/ incorp. in fert. in spr. bef. plant.; kg P: 4.48338e-6 kg; = p2700
- Nitrogen; in above-ground residue left on field: 0.0187511 kg; = p2168
- Monoammonium phosphate; broadcast w/o incorp. in fert. in spr. bef. plant.: 0.000145879 kg; = p2888*8.2142857143
- Monoammonium phosphate; no broadcast in fert. in spr. bef. plant.: 0.000347714 kg; = p2498*8.2142857143
- Flumetsulam [soil, agricultural]: 9.09091e-7 kg; = 1.0 * (p5221+p4191+p3573+p4603+p3985)
- Urea; unspec. appl. method in fert. at plant.: 1.56575e-6 kg; = p3114*5
- Acetaldehyde [air, non-urban air or from high stacks]: 2.23176e-6 kg; = 1.0 * (p2130*1.8333333333)
- NMVOC, non-methane volatile organic compounds, unspecified origin [air, non-urban air or from high stacks]: 4.61054e-5 kg; = 1.0 * (p2052+p2051)
- Diammonium phosphate; unspec. appl. method in fert. in spr. bef. plant.: 1.94458e-5 kg; = p3079*4.7142857143
- Propanenitrile: 1.14979e-7 kg; = p2157*1.5277777778
- Sodium nitrate; no broadcast in fert. in spr. bef. plant.: 1.75346e-6 kg; = p2486*6.0714285714
- Propane [air, non-urban air or from high stacks]: 5.05371e-7 kg; = 1.0 * (p2142*1.2222222222)
- 1-Butene: 2.40207e-7 kg; = p2144*1.1666666667
- Oxygen; applied in dolomite: 0.00184356 kg; = p3228
- Clomazone [soil, agricultural]: 6.76768e-6 kg; = 1.0 * (p5176+p4146+p3940+p4558+p3528)
- Urea; broadcast w/ incorp. in fert. in spr. bef. plant.: 0.00010986 kg; = p2685*5
- Ammonium nitrate; broadcast w/ incorp. in fert. in spr. bef. plant.: 7.79002e-5 kg; = p2671*4.7142857143
- Imazamox [soil, agricultural]: 2.0202e-7 kg; = 1.0 * (p4622+p5240+p4210+p3592+p4004)
- Calcium [soil, agricultural]: 0.0245288 kg; = 1.0 * (p3226+p3218)
- Methane: 5.6424e-6 kg; = p2025*1.3333333333
- Ammonium sulfate; broadcast w/ incorp. in fert. in spr. bef. plant.: 2.75569e-5 kg; = p2674*4.7142857143
- Volatile constituents; broadcast w/o incorp. in man. at unknown time: 0.00266355 kg; = p3416
- Aqueous ammonia; broadcast w/o incorp. in fert. at plant.: 4.21103e-7 kg; = p2903*1.2142857143
- Ammonium nitrate; unspec. appl. method in fert. at plant.: 1.11025e-6 kg; = p3100*4.7142857143
- Volatile constituents; using unspec. method in man. at unknown time: 4.58797e-19 kg; = p3473
- Toluene [air, non-urban air or from high stacks]: 3.41781e-7 kg; = 1.0 * (p2141*1.0952380952)
- Superphosphate, grades<= 22%; broadcast w/ incorp. in fert. at plant.; kg P: 4.59819e-7 kg; = p2735
- Pesticide formulation balance; unspec. appl. method: 3.29387e-6 kg; = p5338
- Ammonium sulfate; no broadcast in fert. in spr. bef. plant.: 5.03038e-5 kg; = p2479*4.7142857143
- Anhydrous ammonia; broadcast w/o incorp. in fert. at plant.: 2.53339e-5 kg; = p2901*1.2142857143
- Methanol [air, non-urban air or from high stacks]: 5.8974e-6 kg; = 1.0 * (p2129*2.6666666667)
- Anhydrous ammonia; broadcast w/ incorp. in fert. at plant.: 5.78509e-5 kg; = p2706*1.2142857143
- Ammonium sulfate; unspec. appl. method in fert. in spr. bef. plant.: 7.58139e-7 kg; = p3064*4.7142857143
- Ammonium sulfate; broadcast w/o incorp. in fert. in spr. bef. plant.: 1.20676e-5 kg; = p2869*4.7142857143
- Urea; broadcast w/ incorp. in fert. at plant.: 5.69119e-5 kg; = p2724*5
- Anhydrous ammonia; unspec. appl. method in fert. at plant.: 1.59158e-6 kg; = p3096*1.2142857143
- Glyphosate [soil, agricultural]: 0.000187071 kg; = 1.0 * (p3586+p4204+p4616+p5234+p3998)
- Other single phosphates; broadcast w/ incorp. in fert. at plant.; kg P: 2.8039e-6 kg; = p2739
- Sodium nitrate; unspec. appl. method in fert. at plant.: 1.36902e-8 kg; = p3110*6.0714285714
- Sodium nitrate; broadcast w/o incorp. in fert. in spr. bef. plant.: 4.20647e-7 kg; = p2876*6.0714285714
- Carbon monoxide, fossil [air, non-urban air or from high stacks]: 0.000123609 kg; = 1.0 * (p2028*2.3333333333)
- Particulates, < 10 um: 1.59162e-5 kg; = p2036+p2034
- Other single K nutrients; broadcast w/ incorp. in fert. in spr. bef. plant.; kg K: 1.43455e-5 kg; = p2704
- Pesticide formulation balance; foliar or directed spray: 2.56497e-5 kg; = p4720
- I butane; from residue burning: 3.78528e-8 kg; = p2146*1.0208333333
- Metribuzin [soil, agricultural]: 2.52525e-6 kg; = 1.0 * (p3621+p5269+p4651+p4239+p4033)
- Superphosphate, grades<= 22%; broadcast w/ incorp. in fert. in spr. bef. plant.; kg P: 7.35243e-7 kg; = p2696
- Ammonium sulfate; unspec. appl. method in fert. at plant.: 3.92748e-7 kg; = p3103*4.7142857143
- Carbon dioxide, in air: 0.00232677 kg; = p2163*3.6666666667
- Sodium nitrate; broadcast w/o incorp. in fert. at plant.: 2.17913e-7 kg; = p2915*6.0714285714
- Acetone [air, non-urban air or from high stacks]: 8.00765e-7 kg; = 1.0 * (p2139*1.6111111111)
- 2,4-D [soil, agricultural]: 1.12121e-5 kg; = 1.0 * (p5133+p4515+p3485+p3897+p4103)

## Sampling procedure
A delete-a-group jackknife is used by the USDA to estimate the ARMS sample means and RSEs, based on a 15 sample delete-a-group jackknife. Because of this relatively small sample size, a Students t distribution is used to represent ARMS data probability density functions. Other representations of uncertainty are described in Cooper, J.S., Kahn, E., Noon, M. (2012). LCA Digital Commons Unit Process Data: field crop production Version 1. Prepared for the US Department of Agriculture National Agricultural Library. Retrieved from https://www.lcacommons.gov/discovery/docs/LCA%20Digital%20Commons%20Unit%20Process%20Data%20final%20updated.pdf

## Extrapolations
Data represent an aggregation of processes applied in Nebraska in 1998. Data development is demonstrated by parameterization (exlicitly presents all raw and uncertainty data and all calculations). Flow data quality according to the LCADC convention is provided for all flows.
