# cotton lint; at harvest in 1997; at farm; 90%-93% moisture

Dataset: EcoSpold 2, unit process
Geography: GLO
Time period: 1997-01-02 to 1998-01-01
Scenario: Business-as-Usual
System model: Allocation, ecoinvent default
Generated by: cooperjs@u.washington.edu
isCopyrightProtected: false

## General comment
This unit process/ gate-to-gate dataset represents the production of 1 kg cotton coproduced with cottonseed and residue. The process technologies are an aggregation of those applied in Texas in 1997. Applicable classifications include ISIC 0116, NAIC 111920, UNSPSC 11121802; this dataset was prepared in ILCD format using the UWDFE Lab Excel to ILCD File Generator (beta version, August 2013)

Exchange "S,S,S-tributyl phosphorotrithioate-soil agricultural" is the result of combining the following original LCA Commons flows: "Tribufos; chiseled or injected/knifed in; kg AI", "Tribufos; unspec. appl. method; kg AI", "Tribufos; foliar or directed spray; kg AI", "Tribufos; broadcast with incorporation; kg AI", "Tribufos; broadcast without incorporation; kg AI", "Tribufos; banded or side-dressed; kg AI", "Tribufos; in seed furrow; kg AI".
Exchange "Ethephon-soil agricultural" is the result of combining the following original LCA Commons flows: "Ethephon; in seed furrow; kg AI", "Ethephon; unspec. appl. method; kg AI", "Ethephon; banded or side-dressed; kg AI", "Ethephon; broadcast without incorporation; kg AI", "Ethephon; chiseled or injected/knifed in; kg AI", "Ethephon; broadcast with incorporation; kg AI", "Ethephon; foliar or directed spray; kg AI".
Exchange "Parathion-methyl-soil agricultural" is the result of combining the following original LCA Commons flows: "Methyl parathion; unspec. appl. method; kg AI", "Methyl parathion; broadcast without incorporation; kg AI", "Methyl parathion; in seed furrow; kg AI", "Methyl parathion; banded or side-dressed; kg AI", "Methyl parathion; chiseled or injected/knifed in; kg AI", "Methyl parathion; broadcast with incorporation; kg AI", "Methyl parathion; foliar or directed spray; kg AI".
Exchange "Sodium chlorate-soil agricultural" is the result of combining the following original LCA Commons flows: "Sodium chlorate; unspec. appl. method; kg AI", "Sodium chlorate; broadcast with incorporation; kg AI", "Sodium chlorate; broadcast without incorporation; kg AI", "Sodium chlorate; in seed furrow; kg AI", "Sodium chlorate; foliar or directed spray; kg AI", "Sodium chlorate; banded or side-dressed; kg AI", "Sodium chlorate; chiseled or injected/knifed in; kg AI".
Exchange "Phorate-soil agricultural" is the result of combining the following original LCA Commons flows: "Phorate; broadcast without incorporation; kg AI", "Phorate; broadcast with incorporation; kg AI", "Phorate; chiseled or injected/knifed in; kg AI", "Phorate; banded or side-dressed; kg AI", "Phorate; in seed furrow; kg AI", "Phorate; foliar or directed spray; kg AI", "Phorate; unspec. appl. method; kg AI".
Exchange "Dimethoate-soil agricultural" is the result of combining the following original LCA Commons flows: "Dimethoate; foliar or directed spray; kg AI", "Dimethoate; banded or side-dressed; kg AI", "Dimethoate; chiseled or injected/knifed in; kg AI", "Dimethoate; broadcast without incorporation; kg AI", "Dimethoate; broadcast with incorporation; kg AI", "Dimethoate; unspec. appl. method; kg AI", "Dimethoate; in seed furrow; kg AI".
Exchange "NMVOC, non-methane volatile organic compounds, unspecified origin-air low population density" is the result of combining the following original LCA Commons flows: "NMVOCs; from residue burning; kg except C, biogenic", "NMVOCs; from residue burning; kg C, biogenic".
Exchange "Glyphosate-soil agricultural" is the result of combining the following original LCA Commons flows: "Glyphosate; chiseled or injected/knifed in; kg AI", "Glyphosate; in seed furrow; kg AI", "Glyphosate; foliar or directed spray; kg AI", "Glyphosate; broadcast without incorporation; kg AI", "Glyphosate; banded or side-dressed; kg AI", "Glyphosate; unspec. appl. method; kg AI", "Glyphosate; broadcast with incorporation; kg AI".
Exchange "Carbofuran-soil agricultural" is the result of combining the following original LCA Commons flows: "Carbofuran; broadcast with incorporation; kg AI", "Carbofuran; in seed furrow; kg AI", "Carbofuran; chiseled or injected/knifed in; kg AI", "Carbofuran; foliar or directed spray; kg AI", "Carbofuran; broadcast without incorporation; kg AI", "Carbofuran; unspec. appl. method; kg AI", "Carbofuran; banded or side-dressed; kg AI".
Exchange "Norflurazon-soil agricultural" is the result of combining the following original LCA Commons flows: "Norflurazon; chiseled or injected/knifed in; kg AI", "Norflurazon; in seed furrow; kg AI", "Norflurazon; banded or side-dressed; kg AI", "Norflurazon; broadcast without incorporation; kg AI", "Norflurazon; unspec. appl. method; kg AI", "Norflurazon; foliar or directed spray; kg AI", "Norflurazon; broadcast with incorporation; kg AI".
Exchange "Mepiquat chloride-soil agricultural" is the result of combining the following original LCA Commons flows: "1,1-Dimethylpiperidinium chloride; chiseled or injected/knifed in; kg AI", "1,1-Dimethylpiperidinium chloride; in seed furrow; kg AI", "1,1-Dimethylpiperidinium chloride; broadcast without incorporation; kg AI", "1,1-Dimethylpiperidinium chloride; foliar or directed spray; kg AI", "1,1-Dimethylpiperidinium chloride; unspec. appl. method; kg AI", "1,1-Dimethylpiperidinium chloride; banded or side-dressed; kg AI", "1,1-Dimethylpiperidinium chloride; broadcast with incorporation; kg AI".
Exchange "Carbon-soil agricultural" is the result of combining the following original LCA Commons flows: "Carbon; in above-ground residue left on field; biogenic", "Carbon; in below-ground residue; biogenic", "Carbon; applied in sewage sludge", "Carbon; applied in limestone", "Carbon; applied in dolomite".
Exchange "Particulates, < 2.5 um-air low population density" is the result of combining the following original LCA Commons flows: "PM2.5; from residue burning; kg C, biogenic", "PM2.5; from residue burning; kg except C, biogenic".
Exchange "Thidiazuron-soil agricultural" is the result of combining the following original LCA Commons flows: "Thidiazuron; broadcast without incorporation; kg AI", "Thidiazuron; broadcast with incorporation; kg AI", "Thidiazuron; foliar or directed spray; kg AI", "Thidiazuron; chiseled or injected/knifed in; kg AI", "Thidiazuron; unspec. appl. method; kg AI", "Thidiazuron; in seed furrow; kg AI", "Thidiazuron; banded or side-dressed; kg AI".
Exchange "Endosulfan-soil agricultural" is the result of combining the following original LCA Commons flows: "Endosulfan; chiseled or injected/knifed in; kg AI", "Endosulfan; broadcast with incorporation; kg AI", "Endosulfan; in seed furrow; kg AI", "Endosulfan; unspec. appl. method; kg AI", "Endosulfan; banded or side-dressed; kg AI", "Endosulfan; broadcast without incorporation; kg AI", "Endosulfan; foliar or directed spray; kg AI".
Exchange "Prometryn-soil agricultural" is the result of combining the following original LCA Commons flows: "Prometryn; foliar or directed spray; kg AI", "Prometryn; banded or side-dressed; kg AI", "Prometryn; chiseled or injected/knifed in; kg AI", "Prometryn; broadcast with incorporation; kg AI", "Prometryn; broadcast without incorporation; kg AI", "Prometryn; in seed furrow; kg AI", "Prometryn; unspec. appl. method; kg AI".
Exchange "Pesticides, unspecified-soil agricultural" is the result of combining the following original LCA Commons flows: "Unspecified pesticide; unspec. appl. method; kg AI", "Unspecified pesticide; broadcast without incorporation; kg AI", "Unspecified pesticide; broadcast with incorporation; kg AI", "Unspecified pesticide; banded or side-dressed; kg AI", "Unspecified pesticide; in seed furrow; kg AI", "Unspecified pesticide; foliar or directed spray; kg AI", "Unspecified pesticide; chiseled or injected/knifed in; kg AI".
Exchange "Zeta-cypermethrin-soil agricultural" is the result of combining the following original LCA Commons flows: "Zeta-Cypermethrin; in seed furrow; kg AI", "Zeta-Cypermethrin; unspec. appl. method; kg AI", "Zeta-Cypermethrin; broadcast without incorporation; kg AI", "Zeta-Cypermethrin; chiseled or injected/knifed in; kg AI", "Zeta-Cypermethrin; broadcast with incorporation; kg AI", "Zeta-Cypermethrin; banded or side-dressed; kg AI", "Zeta-Cypermethrin; foliar or directed spray; kg AI".
Exchange "Fluazifop-P-butyl-soil agricultural" is the result of combining the following original LCA Commons flows: "Fluazifop-p-butyl; foliar or directed spray; kg AI", "Fluazifop-p-butyl; in seed furrow; kg AI", "Fluazifop-p-butyl; unspec. appl. method; kg AI", "Fluazifop-p-butyl; broadcast without incorporation; kg AI", "Fluazifop-p-butyl; banded or side-dressed; kg AI", "Fluazifop-p-butyl; chiseled or injected/knifed in; kg AI", "Fluazifop-p-butyl; broadcast with incorporation; kg AI".
Exchange "Clethodim-soil agricultural" is the result of combining the following original LCA Commons flows: "Clethodim; broadcast with incorporation; kg AI", "Clethodim; banded or side-dressed; kg AI", "Clethodim; chiseled or injected/knifed in; kg AI", "Clethodim; foliar or directed spray; kg AI", "Clethodim; in seed furrow; kg AI", "Clethodim; unspec. appl. method; kg AI", "Clethodim; broadcast without incorporation; kg AI".
Exchange "Ash-soil agricultural" is the result of combining the following original LCA Commons flows: "Ash; from residue burning; kg C, biogenic", "Ash; from residue burning; kg except C, biogenic".
Exchange "Trifluralin-soil agricultural" is the result of combining the following original LCA Commons flows: "Trifluralin; in seed furrow; kg AI", "Trifluralin; unspec. appl. method; kg AI", "Trifluralin; broadcast without incorporation; kg AI", "Trifluralin; banded or side-dressed; kg AI", "Trifluralin; foliar or directed spray; kg AI", "Trifluralin; chiseled or injected/knifed in; kg AI", "Trifluralin; broadcast with incorporation; kg AI".
Exchange "Diuron-soil agricultural" is the result of combining the following original LCA Commons flows: "Diuron; broadcast with incorporation; kg AI", "Diuron; banded or side-dressed; kg AI", "Diuron; foliar or directed spray; kg AI", "Diuron; broadcast without incorporation; kg AI", "Diuron; chiseled or injected/knifed in; kg AI", "Diuron; unspec. appl. method; kg AI", "Diuron; in seed furrow; kg AI".
Exchange "Water-soil agricultural" is the result of combining the following original LCA Commons flows: "Water; from irrigation and applied with manure and sewage sludge", "Water; in below-ground residue; biogenic", "Water; in above-ground residue left on field; biogenic".
Exchange "Endothall-soil agricultural" is the result of combining the following original LCA Commons flows: "Endothall; unspec. appl. method; kg AI", "Endothall; broadcast with incorporation; kg AI", "Endothall; foliar or directed spray; kg AI", "Endothall; banded or side-dressed; kg AI", "Endothall; broadcast without incorporation; kg AI", "Endothall; chiseled or injected/knifed in; kg AI", "Endothall; in seed furrow; kg AI".
Exchange "Dicrotophos-soil agricultural" is the result of combining the following original LCA Commons flows: "Dicrotophos; in seed furrow; kg AI", "Dicrotophos; broadcast without incorporation; kg AI", "Dicrotophos; unspec. appl. method; kg AI", "Dicrotophos; banded or side-dressed; kg AI", "Dicrotophos; foliar or directed spray; kg AI", "Dicrotophos; broadcast with incorporation; kg AI", "Dicrotophos; chiseled or injected/knifed in; kg AI".
Exchange "Pendimethalin-soil agricultural" is the result of combining the following original LCA Commons flows: "Pendimethalin; banded or side-dressed; kg AI", "Pendimethalin; in seed furrow; kg AI", "Pendimethalin; unspec. appl. method; kg AI", "Pendimethalin; chiseled or injected/knifed in; kg AI", "Pendimethalin; broadcast with incorporation; kg AI", "Pendimethalin; foliar or directed spray; kg AI", "Pendimethalin; broadcast without incorporation; kg AI".
Exchange "Oxamyl-soil agricultural" is the result of combining the following original LCA Commons flows: "Oxamyl; foliar or directed spray; kg AI", "Oxamyl; broadcast without incorporation; kg AI", "Oxamyl; chiseled or injected/knifed in; kg AI", "Oxamyl; banded or side-dressed; kg AI", "Oxamyl; in seed furrow; kg AI", "Oxamyl; broadcast with incorporation; kg AI", "Oxamyl; unspec. appl. method; kg AI".
Exchange "Azinphos-methyl-soil agricultural" is the result of combining the following original LCA Commons flows: "Azinphos-Methyl; foliar or directed spray; kg AI", "Azinphos-Methyl; banded or side-dressed; kg AI", "Azinphos-Methyl; broadcast with incorporation; kg AI", "Azinphos-Methyl; unspec. appl. method; kg AI", "Azinphos-Methyl; broadcast without incorporation; kg AI", "Azinphos-Methyl; in seed furrow; kg AI", "Azinphos-Methyl; chiseled or injected/knifed in; kg AI".
Exchange "Pyrithiobac sodium salt-soil agricultural" is the result of combining the following original LCA Commons flows: "Pyrithiobac-sodium; broadcast without incorporation; kg AI", "Pyrithiobac-sodium; in seed furrow; kg AI", "Pyrithiobac-sodium; unspec. appl. method; kg AI", "Pyrithiobac-sodium; chiseled or injected/knifed in; kg AI", "Pyrithiobac-sodium; broadcast with incorporation; kg AI", "Pyrithiobac-sodium; foliar or directed spray; kg AI", "Pyrithiobac-sodium; banded or side-dressed; kg AI".
Exchange "Acephate-soil agricultural" is the result of combining the following original LCA Commons flows: "Acephate; broadcast without incorporation; kg AI", "Acephate; broadcast with incorporation; kg AI", "Acephate; banded or side-dressed; kg AI", "Acephate; unspec. appl. method; kg AI", "Acephate; chiseled or injected/knifed in; kg AI", "Acephate; in seed furrow; kg AI", "Acephate; foliar or directed spray; kg AI".
Exchange "Metolachlor-soil agricultural" is the result of combining the following original LCA Commons flows: "Propazine; broadcast with incorporation; kg AI", "Propazine; broadcast without incorporation; kg AI", "Propazine; in seed furrow; kg AI", "Propazine; chiseled or injected/knifed in; kg AI", "Propazine; unspec. appl. method; kg AI", "Propazine; foliar or directed spray; kg AI", "Propazine; banded or side-dressed; kg AI".
Exchange "Particulates, < 10 um-air low population density" is the result of combining the following original LCA Commons flows: "PM10; from residue burning; kg C, biogenic", "PM10; from residue burning; kg except C, biogenic".
Exchange "Malathion-soil agricultural" is the result of combining the following original LCA Commons flows: "Malathion ; in seed furrow; kg AI", "Malathion ; unspec. appl. method; kg AI", "Malathion ; broadcast with incorporation; kg AI", "Malathion ; broadcast without incorporation; kg AI", "Malathion ; foliar or directed spray; kg AI", "Malathion ; banded or side-dressed; kg AI", "Malathion ; chiseled or injected/knifed in; kg AI".
Exchange "Cyfluthrin-soil agricultural" is the result of combining the following original LCA Commons flows: "Beta-Cyfluthrin; broadcast with incorporation; kg AI", "Beta-Cyfluthrin; banded or side-dressed; kg AI", "Beta-Cyfluthrin; in seed furrow; kg AI", "Beta-Cyfluthrin; broadcast without incorporation; kg AI", "Beta-Cyfluthrin; chiseled or injected/knifed in; kg AI", "Beta-Cyfluthrin; unspec. appl. method; kg AI", "Beta-Cyfluthrin; foliar or directed spray; kg AI".
Exchange "Cypermethrin-soil agricultural" is the result of combining the following original LCA Commons flows: "Cypermethrin; banded or side-dressed; kg AI", "Cypermethrin; chiseled or injected/knifed in; kg AI", "Cypermethrin; broadcast with incorporation; kg AI", "Cypermethrin; unspec. appl. method; kg AI", "Cypermethrin; in seed furrow; kg AI", "Cypermethrin; broadcast without incorporation; kg AI", "Cypermethrin; foliar or directed spray; kg AI".
Exchange "MSMA-soil agricultural" is the result of combining the following original LCA Commons flows: "MSMA; foliar or directed spray; kg AI", "MSMA; chiseled or injected/knifed in; kg AI", "MSMA; unspec. appl. method; kg AI", "MSMA; broadcast without incorporation; kg AI", "MSMA; broadcast with incorporation; kg AI", "MSMA; in seed furrow; kg AI", "MSMA; banded or side-dressed; kg AI".
Exchange "Transformation, from arable-resource land" is the result of combining the following original LCA Commons flows: "Transformation; from arable, from unspec. use to cotton", "Transformation; from arable, from other to cotton", "Transformation; from arable, from small grains to cotton", "Transformation; from arable, from cotton to cotton", "Transformation; from arable, from corn to cotton".
Exchange "Calcium-soil agricultural" is the result of combining the following original LCA Commons flows: "Calcium; applied in limestone", "Calcium; applied in dolomite".
Exchange "Lambda-cyhalothrin-soil agricultural" is the result of combining the following original LCA Commons flows: "Lambda-cyhalothrin; broadcast without incorporation; kg AI", "Lambda-cyhalothrin; broadcast with incorporation; kg AI", "Lambda-cyhalothrin; foliar or directed spray; kg AI", "Lambda-cyhalothrin; in seed furrow; kg AI", "Lambda-cyhalothrin; unspec. appl. method; kg AI", "Lambda-cyhalothrin; banded or side-dressed; kg AI", "Lambda-cyhalothrin; chiseled or injected/knifed in; kg AI".
Exchange "Paraquat dichloride-soil unspecified" is the result of combining the following original LCA Commons flows: "Paraquat dichloride; foliar or directed spray; kg AI", "Paraquat dichloride; unspec. appl. method; kg AI", "Paraquat dichloride; banded or side-dressed; kg AI", "Paraquat dichloride; in seed furrow; kg AI", "Paraquat dichloride; broadcast without incorporation; kg AI", "Paraquat dichloride; chiseled or injected/knifed in; kg AI", "Paraquat dichloride; broadcast with incorporation; kg AI".
Exchange "Aldicarb-soil agricultural" is the result of combining the following original LCA Commons flows: "Aldicarb; broadcast with incorporation; kg AI", "Aldicarb; banded or side-dressed; kg AI", "Aldicarb; broadcast without incorporation; kg AI", "Aldicarb; foliar or directed spray; kg AI", "Aldicarb; chiseled or injected/knifed in; kg AI", "Aldicarb; in seed furrow; kg AI", "Aldicarb; unspec. appl. method; kg AI".
Exchange "Fluometuron-soil agricultural" is the result of combining the following original LCA Commons flows: "Fluometuron; broadcast without incorporation; kg AI", "Fluometuron; in seed furrow; kg AI", "Fluometuron; unspec. appl. method; kg AI", "Fluometuron; broadcast with incorporation; kg AI", "Fluometuron; chiseled or injected/knifed in; kg AI", "Fluometuron; banded or side-dressed; kg AI", "Fluometuron; foliar or directed spray; kg AI".
Exchange "Acetic acid-2bdf9967-6dae-4183-88d1-8f612548c51e low population density" was originally named: "Acetic acid; from residue burning; kg C, biogenic" in this dataset.
Exchange "isopentane-2bdf9967-6dae-4183-88d1-8f612548c51e low population density" was originally named: "I pentane; from residue burning; kg C, biogenic" in this dataset.
Exchange "Diuron-2bdf9967-6dae-4183-88d1-8f612548c51e low population density" was originally named: "Diuron; broadcast by air; kg AI" in this dataset.
Exchange "cis-2-Butene-2bdf9967-6dae-4183-88d1-8f612548c51e low population density" was originally named: "Cis 2 butene; from residue burning; kg C, biogenic" in this dataset.
Exchange "Prometryn-2bdf9967-6dae-4183-88d1-8f612548c51e low population density" was originally named: "Prometryn; broadcast by air; kg AI" in this dataset.
Exchange "isobutene-2bdf9967-6dae-4183-88d1-8f612548c51e low population density" was originally named: "I butene; from residue burning; kg C, biogenic" in this dataset.
Exchange "Methane-2bdf9967-6dae-4183-88d1-8f612548c51e low population density" was originally named: "Methane; from residue burning; kg C, biogenic" in this dataset.
Exchange "Malathion-2bdf9967-6dae-4183-88d1-8f612548c51e low population density" was originally named: "Malathion ; broadcast by air; kg AI" in this dataset.
Exchange "Fluazifop-p-butyl-2bdf9967-6dae-4183-88d1-8f612548c51e low population density" was originally named: "Fluazifop-p-butyl; broadcast by air; kg AI" in this dataset.
Exchange "Ethene-2bdf9967-6dae-4183-88d1-8f612548c51e low population density" was originally named: "Ethylene; from residue burning; kg C, biogenic" in this dataset.
Exchange "Endothall-2bdf9967-6dae-4183-88d1-8f612548c51e low population density" was originally named: "Endothall; broadcast by air; kg AI" in this dataset.
Exchange "Acephate-2bdf9967-6dae-4183-88d1-8f612548c51e low population density" was originally named: "Acephate; broadcast by air; kg AI" in this dataset.
Exchange "Ammonia-2bdf9967-6dae-4183-88d1-8f612548c51e low population density" was originally named: "Ammonia; from residue burning; kg N, biogenic" in this dataset.
Exchange "Dicrotophos-2bdf9967-6dae-4183-88d1-8f612548c51e low population density" was originally named: "Dicrotophos; broadcast by air; kg AI" in this dataset.
Exchange "MSMA-2bdf9967-6dae-4183-88d1-8f612548c51e low population density" was originally named: "MSMA; broadcast by air; kg AI" in this dataset.
Exchange "Glyphosate-2bdf9967-6dae-4183-88d1-8f612548c51e low population density" was originally named: "Glyphosate; broadcast by air; kg AI" in this dataset.
Exchange "Occupation, arable-c19fb2d9-98eb-4cd3-8761-81b71d8a9a1b land" was originally named: "Occupation; arable, as cotton" in this dataset.
Exchange "trans-2-Butene-2bdf9967-6dae-4183-88d1-8f612548c51e low population density" was originally named: "Trans 2 butene; from residue burning; kg C, biogenic" in this dataset.
Exchange "Metolachlor-2bdf9967-6dae-4183-88d1-8f612548c51e low population density" was originally named: "Propazine; broadcast by air; kg AI" in this dataset.
Exchange "Sodium chlorate-2bdf9967-6dae-4183-88d1-8f612548c51e low population density" was originally named: "Sodium chlorate; broadcast by air; kg AI" in this dataset.
Exchange "Cyfluthrin-2bdf9967-6dae-4183-88d1-8f612548c51e low population density" was originally named: "Beta-Cyfluthrin; broadcast by air; kg AI" in this dataset.
Exchange "Butane-2bdf9967-6dae-4183-88d1-8f612548c51e low population density" was originally named: "N butane; from residue burning; kg C, biogenic" in this dataset.
Exchange "Carbon dioxide-c19fb2d9-98eb-4cd3-8761-81b71d8a9a1b unspecified" was originally named: "Carbon dioxide; from plant uptake; kg C, biogenic" in this dataset.
Exchange "Furan-2bdf9967-6dae-4183-88d1-8f612548c51e low population density" was originally named: "Furan; from residue burning; kg C, biogenic" in this dataset.
Exchange "Benzene-2bdf9967-6dae-4183-88d1-8f612548c51e low population density" was originally named: "Benzene; from residue burning; kg C, biogenic" in this dataset.
Exchange "Sulfuric acid-be1c0329-f1a8-4524-8420-a86d2a8dd358 agricultural" was originally named: "Sulfuric acid; as secondary application" in this dataset.
Exchange "Isoprene-2bdf9967-6dae-4183-88d1-8f612548c51e low population density" was originally named: "Isoprene; from residue burning; kg C, biogenic" in this dataset.
Exchange "Sulfur-be1c0329-f1a8-4524-8420-a86d2a8dd358 agricultural" was originally named: "Sulfur; as secondary application" in this dataset.
Exchange "Formaldehyde-2bdf9967-6dae-4183-88d1-8f612548c51e low population density" was originally named: "Formaldehyde; from residue burning; kg C, biogenic" in this dataset.
Exchange "Acrylonitrile-2bdf9967-6dae-4183-88d1-8f612548c51e low population density" was originally named: "Propenenitrile; from residue burning; kg C, biogenic" in this dataset.
Exchange "Azinphos-methyl-2bdf9967-6dae-4183-88d1-8f612548c51e low population density" was originally named: "Azinphos-Methyl; broadcast by air; kg AI" in this dataset.
Exchange "Water, surface-c19fb2d9-98eb-4cd3-8761-81b71d8a9a1b in water" was originally named: "Water; withdrawal from surface water, for cotton, in 1997" in this dataset.
Exchange "Trifluralin-2bdf9967-6dae-4183-88d1-8f612548c51e low population density" was originally named: "Trifluralin; broadcast by air; kg AI" in this dataset.
Exchange "Ethane-2bdf9967-6dae-4183-88d1-8f612548c51e low population density" was originally named: "Ethane; from residue burning; kg C, biogenic" in this dataset.
Exchange "Propane-2bdf9967-6dae-4183-88d1-8f612548c51e low population density" was originally named: "Propane; from residue burning; kg C, biogenic" in this dataset.
Exchange "Propene-2bdf9967-6dae-4183-88d1-8f612548c51e low population density" was originally named: "Propylene; from residue burning; kg C, biogenic" in this dataset.
Exchange "Thidiazuron-2bdf9967-6dae-4183-88d1-8f612548c51e low population density" was originally named: "Thidiazuron; broadcast by air; kg AI" in this dataset.
Exchange "Cypermethrin-2bdf9967-6dae-4183-88d1-8f612548c51e low population density" was originally named: "Cypermethrin; broadcast by air; kg AI" in this dataset.
Exchange "Carbon dioxide, in air-2bdf9967-6dae-4183-88d1-8f612548c51e low population density" was originally named: "Carbon dioxide; from residue burning; kg C, biogenic" in this dataset.
Exchange "Methanol-2bdf9967-6dae-4183-88d1-8f612548c51e low population density" was originally named: "Methanol; from residue burning; kg C, biogenic" in this dataset.
Exchange "Toluene-2bdf9967-6dae-4183-88d1-8f612548c51e low population density" was originally named: "Toluene; from residue burning; kg C, biogenic" in this dataset.
Exchange "1-Butene-2bdf9967-6dae-4183-88d1-8f612548c51e low population density" was originally named: "1 butene; from residue burning; kg C, biogenic" in this dataset.
Exchange "Water, unspecified origin-c19fb2d9-98eb-4cd3-8761-81b71d8a9a1b in water" was originally named: "Water; from plant uptake; biogenic" in this dataset.
Exchange "Carbofuran-2bdf9967-6dae-4183-88d1-8f612548c51e low population density" was originally named: "Carbofuran; broadcast by air; kg AI" in this dataset.
Exchange "Transformation, to arable-c19fb2d9-98eb-4cd3-8761-81b71d8a9a1b land" was originally named: "Transformation; to arable, to cotton" in this dataset.
Exchange "Zinc compounds-be1c0329-f1a8-4524-8420-a86d2a8dd358 agricultural" was originally named: "Zinc compounds; as secondary application" in this dataset.
Exchange "Water-2bdf9967-6dae-4183-88d1-8f612548c51e low population density" was originally named: "Water; from residue burning; biogenic" in this dataset.
Exchange "Acetonitrile-2bdf9967-6dae-4183-88d1-8f612548c51e low population density" was originally named: "Acetonitrile; from residue burning; kg C, biogenic" in this dataset.
Exchange "Acetone-2bdf9967-6dae-4183-88d1-8f612548c51e low population density" was originally named: "Acetone; from residue burning; kg C, biogenic" in this dataset.
Exchange "Parathion-methyl-2bdf9967-6dae-4183-88d1-8f612548c51e low population density" was originally named: "Methyl parathion; broadcast by air; kg AI" in this dataset.
Exchange "Mepiquat chloride-2bdf9967-6dae-4183-88d1-8f612548c51e low population density" was originally named: "1,1-Dimethylpiperidinium chloride; broadcast by air; kg AI" in this dataset.
Exchange "Aldicarb-2bdf9967-6dae-4183-88d1-8f612548c51e low population density" was originally named: "Aldicarb; broadcast by air; kg AI" in this dataset.
Exchange "Nitrogen dioxide-2bdf9967-6dae-4183-88d1-8f612548c51e low population density" was originally named: "Nitrogen dioxide; from residue burning; kg N, biogenic" in this dataset.
Exchange "Norflurazon-2bdf9967-6dae-4183-88d1-8f612548c51e low population density" was originally named: "Norflurazon; broadcast by air; kg AI" in this dataset.
Exchange "Hydrocyanic acid-2bdf9967-6dae-4183-88d1-8f612548c51e low population density" was originally named: "Hydrogen cyanide; from residue burning; kg C, biogenic" in this dataset.
Exchange "Magnesium-be1c0329-f1a8-4524-8420-a86d2a8dd358 agricultural" was originally named: "Magnesium; applied in dolomite" in this dataset.
Exchange "Pyrithiobac sodium salt-2bdf9967-6dae-4183-88d1-8f612548c51e low population density" was originally named: "Pyrithiobac-sodium; broadcast by air; kg AI" in this dataset.
Exchange "Ethephon-2bdf9967-6dae-4183-88d1-8f612548c51e low population density" was originally named: "Ethephon; broadcast by air; kg AI" in this dataset.
Exchange "Zeta-cypermethrin-2bdf9967-6dae-4183-88d1-8f612548c51e low population density" was originally named: "Zeta-Cypermethrin; broadcast by air; kg AI" in this dataset.
Exchange "Ethyne-2bdf9967-6dae-4183-88d1-8f612548c51e low population density" was originally named: "Acetylene; from residue burning; kg C, biogenic" in this dataset.
Exchange "Dinitrogen monoxide-2bdf9967-6dae-4183-88d1-8f612548c51e low population density" was originally named: "Dinitrogen monoxide; from residue burning; kg N, biogenic" in this dataset.
Exchange "Fluometuron-2bdf9967-6dae-4183-88d1-8f612548c51e low population density" was originally named: "Fluometuron; broadcast by air; kg AI" in this dataset.
Exchange "Lambda-cyhalothrin-2bdf9967-6dae-4183-88d1-8f612548c51e low population density" was originally named: "Lambda-cyhalothrin; broadcast by air; kg AI" in this dataset.
Exchange "Phorate-2bdf9967-6dae-4183-88d1-8f612548c51e low population density" was originally named: "Phorate; broadcast by air; kg AI" in this dataset.
Exchange "Pendimethalin-2bdf9967-6dae-4183-88d1-8f612548c51e low population density" was originally named: "Pendimethalin; broadcast by air; kg AI" in this dataset.
Exchange "Tribufos-2bdf9967-6dae-4183-88d1-8f612548c51e low population density" was originally named: "Tribufos; broadcast by air; kg AI" in this dataset.
Exchange "Butadiene-2bdf9967-6dae-4183-88d1-8f612548c51e low population density" was originally named: "1,3 butadiene; from residue burning; kg C, biogenic" in this dataset.
Exchange "Dimethoate-2bdf9967-6dae-4183-88d1-8f612548c51e low population density" was originally named: "Dimethoate; broadcast by air; kg AI" in this dataset.
Exchange "Oxamyl-2bdf9967-6dae-4183-88d1-8f612548c51e low population density" was originally named: "Oxamyl; broadcast by air; kg AI" in this dataset.
Exchange "Endosulfan-2bdf9967-6dae-4183-88d1-8f612548c51e low population density" was originally named: "Endosulfan; broadcast by air; kg AI" in this dataset.
Exchange "Clethodim-2bdf9967-6dae-4183-88d1-8f612548c51e low population density" was originally named: "Clethodim; broadcast by air; kg AI" in this dataset.
Exchange "Phenol-2bdf9967-6dae-4183-88d1-8f612548c51e low population density" was originally named: "Phenol; from residue burning; kg C, biogenic" in this dataset.
Exchange "Carbon monoxide, fossil-2bdf9967-6dae-4183-88d1-8f612548c51e low population density" was originally named: "Carbon monoxide; from residue burning; kg C, biogenic" in this dataset.
Exchange "Phosphorus-c19fb2d9-98eb-4cd3-8761-81b71d8a9a1b unspecified" was originally named: "Phosphorous; from plant uptake; biogenic" in this dataset.
Exchange "Acetaldehyde-2bdf9967-6dae-4183-88d1-8f612548c51e low population density" was originally named: "Acetaldehyde; from residue burning; kg C, biogenic" in this dataset.
Exchange "Water, ground-c19fb2d9-98eb-4cd3-8761-81b71d8a9a1b in water" was originally named: "Water; withdrawal from groundwater, for cotton, in 1997" in this dataset.
Exchange "Pentane-2bdf9967-6dae-4183-88d1-8f612548c51e low population density" was originally named: "N pentane; from residue burning; kg C, biogenic" in this dataset.
Exchange "Formic acid-2bdf9967-6dae-4183-88d1-8f612548c51e low population density" was originally named: "Formic acid; from residue burning; kg C, biogenic" in this dataset.

## Geography
The unit process is assumed to represent production in Texas (US State).

## Technology
This process produces cotton lint; at harvest in 1997; at farm; 90%-93% moisture. The process is assumed to represent production in Texas (US State). Yields and related inputs and outputs represent a single year of operation, in 1997. This dataset includes consideration of residue burning; soil preparation; planting or sowing; irrigation; application, storage, and transport of fertilizers, manures, liming materials, secondary materials, and pesticides; and harvest. Fate and transport of applications are not included as described in Cooper, J.S., Kahn, E., Noon, M. (2012) LCA Digital Commons Unit Process Data: field crop production Version 1 which is available at https://www.lcacommons.gov/discovery/docs/LCA%20Digital%20Commons%20Unit%20Process%20Data%20final%20updated.pdf

## Time period
Start and end dates match the underlying data obtained from the USDA Agricultural Resource Management Survey (ARMS).
## Parameters
- p4588: 3.32742e-6; = p1827*p3481
- p0893: 0; = 1000*(p0890+p0892)*p0001*p0003*p0004/(p0818*p0002)
- p0846: 0.502142; = p0841*p0845^3+p0842*p0845^2+p0843*p0845+p0844
- p2952: 0.00046328; = p2366*(p1020+p1022)
- p3970: 6.27423e-6; = p1827*p3478
- p0735: 0
- p2929: 3.85358e-5; = p2343*(p1079+p1081)
- p0762: 5.664; = p0102*(1+p0630*p0234/100)
- p1945: 0
- p0486: 0; = SQRT(2)*(IF((2*p0354-1)<0;-1;IF((2*p0354-1)>0;1;0))*SQRT(SQRT((2/(pi()*0.140012289)+LN(1-(2*p0354-1)^2)/2)^2-LN(1-(2*p0354-1)^2)/0.140012289)-(2/(pi()*0.140012289)+LN(1-(2*p0354-1)^2)/2)))
- p2434: 0.0013341; = p2238*p1014
- p0345: 0.5
- p2326: 0.000954435; = p2224*p2193
- p2946: 0.000845462; = p2360*(p1020+p1022)
- p2583: 1.33099e-5; = p2387*p1073
- p3143: 0; = p2362*p1023
- p0765: 46.705; = p0105*(1+p0633*p0237/100)
- p1660: 0
- p1216: 0.0791463
- p2117: 0.585147
- p1158: 0.0901903; = p1156*p1157
- p1789: 0
- p0330: 0.5
- p0253: 42.333
- p0821: 3.91667
- p3019: 0; = p2238*p1023
- p0834: 22
- p4291: 9.08293e-6; = p1942*p3479
- p2252: 3.59841e-5; = p2222*p2198
- p0086: 26.105
- p4789: 0; = p1822*p3482
- p0580: 0; = IF(p0316<0.5;-SQRT(p0007*EXP(p0448^2*p0008)-p0007);SQRT(p0007*EXP(p0448^2*p0008)-p0007))
- p1856: 0
- p2443: 0.000915826; = p2247*p1014
- p2033: 3.47875e-5; = p2015*p2029*p2031/(p0818*1000)
- p1251: 0; = if(p1232>0;0;p1246*p0001/(p0818*p0002))
- p2057: 3.28794
- p3190: 0; = p2409*p1023
- p2889: 7.38858e-5; = p2303*(p1079+p1081)
- p1493: 424
- p2576: 7.36176e-5; = p2380*p1073
- p0743: 1.886; = p0083*(1+p0611*p0215/100)
- p1259: 0; = if(p1232>0;0;p0730/100)
- p2160: 8.65203e-7; = p2015*p2084*p2122/(p0818*1000)
- p2720: 7.18738e-7; = p2329*(p1019+p1021)
- p0082: 95.695
- p0685: 0
- p0306: 0.5
- p5290: 9.39543e-7; = p1911*p3484
- p3389: 0; = p3370*p1234
- p3374: 0; = if(p1232=0;p3246*p3356/p0818;0)
- p2419: 0; = p2235*p2209
- p2450: 0.00266579; = p2254*p1014
- p1287: 0
- p2861: 6.48346e-5; = p2275*(p1129+p1131)
- p1163: 0.00742611
- p1110: 1.40772e7; = IF(p1071=0;p1105*p1104*p1095;0)
- p3411: 0; = p3373*p1238
- p1248: 0; = if(p1232>0;0;p1243*p0001/(p0818*p0002))
- p1030: 0.00059783; = IF(p1012=0;p1024*p0001/(p0818*p0002);0)
- p2682: 1.34533e-5; = p2291*(p1019+p1021)
- p2796: 0; = p2405*(p1019+p1021)
- p2678: 0.00470686; = p2287*(p1019+p1021)
- p2146: 2.4953e-7; = p2015*p2074*p2108/(p0818*1000)
- p1199: -0.29
- p2281: 0.000332845; = p2223*p2187
- p3348: 0; = if(and(p1232=0;p3256<>0);p3276*p3289;0)
- p0334: 0.5
- p3239: 0.013074; = IF(p3238+p3235+p3236=1;0;1-(p3238+p3235+p3236))
- p3046: 8.76955e-5; = p2265*p1082
- p1958: 14827
- p2358: 0.00234383; = p2225*p2186
- p2198: 0.000101352; = 22.98976928*p2197/14.0067
- p1870: 4.81297e-6; = p1462*1000/p0818
- p0819: 1.59069; = p0808*p0809/p0818
- p1662: 0
- p1994: 750
- p3295: 0
- p1703: 0
- p2447: 8.14768e-6; = p2251*p1014
- p2243: 0.00492505; = p2222*p2188
- p3630: 2.09011e-5; = p1899*p3476
- p2863: 0.000608047; = p2277*(p1020+p1022)
- p1687: 0
- p2807: 0; = p2416*(p1078+p1080)
- p1659: 0
- p2217: 0.00413723; = p1118-p2216
- p0928: 0; = p0801*p0918
- p2628: 0.00707184; = p2237*(p1019+p1021)
- p3177: 0; = p2396*p1023
- p2813: 0; = p2422*(p1078+p1080)
- p1823: 0
- p0066: 87.251
- p4812: 0; = p1845*p3482
- p4237: 9.83984e-6; = p1888*p3479
- p3054: 0.000105136; = p2273*p1132
- p2056: 2.07882
- p5166: 1.53032e-7; = p1787*p3484
- p2295: 0.000382651; = p2223*p2202
- p2897: 0.000661997; = p2311*(p1129+p1131)
- p1689: 0
- p0673: 273.066; = p0013*(1+p0541*p0145/100)
- p2253: 7.91147e-5; = p2222*p2199
- p2690: 0.000851506; = p2299*(p1078+p1080)
- p4855: 0; = p1888*p3482
- p5336: 1.06766e-8; = p1957*p3484
- p3130: 1.11652e-6; = p2349*p1082
- p2477: 0.000123699; = p2281*p1014
- p0083: 1.886
- p2482: 0.000791782; = p2286*p1014
- p2531: 0.000142958; = p2335*p1014
- p0359: 0.5
- p0514: 0; = SQRT(2)*(IF((2*p0382-1)<0;-1;IF((2*p0382-1)>0;1;0))*SQRT(SQRT((2/(pi()*0.140012289)+LN(1-(2*p0382-1)^2)/2)^2-LN(1-(2*p0382-1)^2)/0.140012289)-(2/(pi()*0.140012289)+LN(1-(2*p0382-1)^2)/2)))
- p1099: 0.655189
- p3394: 0; = p3375*p1234
- p5000: 1.81797e-6; = p1827*p3483
- p3092: 0.000135248; = p2311*p1132
- p4155: 1.3762e-6; = p1806*p3479
- p2456: 0.000792973; = p2260*p1073
- p3975: 4.98283e-5; = p1832*p3478
- p1275: 0; = p1271*p1252/p0818
- p0210: 0
- p3368: 0; = if(p1232=0;p3245*p3356/p0818;0)
- p0892: 0; = if(p0891=0;0;(1-p1240)*p3251/p0891)
- p3304: 0; = if(and(p1232=0;p3252<>0);p3260*p3289;0)
- p1302: 0; = IF(p1297+p1300+p1301=p1262;0;p1262-(p1297+p1300+p1301))
- p2186: 0.00753427; = p1052/p0818
- p0184: 12.184
- p5268: 5.53405e-7; = p1889*p3484
- p2288: 0.0023332; = p2223*p2195
- p2919: 4.56765e-5; = p2333*(p1020+p1022)
- p0684: 5.444; = p0024*(1+p0552*p0156/100)
- p2713: 3.46817e-5; = p2322*(p1019+p1021)
- p3237: 0.854735
- p2149: 4.44612e-7; = p2015*p2077*p2111/(p0818*1000)
- p3273: 0
- p2483: 0.00404509; = p2287*p1014
- p4410: 1.10503e-6; = p1855*p3480
- p2371: 0.00628504; = p2225*p2200
- p1982: 750
- p2301: 0.00272104; = p2227*p2208
- p3179: 0; = p2398*p1023
- p0950: 0; = if(and(p0683=0;or(p0807=480;p0807=32;p0807=1;and(p0807=60;p0901<0.03)));p0938;0)
- p2756: 0.00477027; = p2365*(p1019+p1021)
- p0784: 18.304; = p0124*(1+p0652*p0256/100)
- p1591: 0.677771
- p2203: 0.0142914; = p1070-p2200-p2201-p2202
- p3215: 0.450791; = p1222*3*15.9994/100.0869
- p0939: 0.00197955; = p0933*p0001/(p0818*p0002)
- p0889: 20.0586; = 1000*p0888*p0001*p0003*p0004/(p0818*p0002)
- p3366: 0; = if(p1232=0;p3244*p3360/p0818;0)
- p1279: 0
- p1174: 5.35e-7; = p1170*p1173/p0818
- p2191: 0.00085767; = 8*1.00794*p2189/(2*14.0067)
- p0552: 0; = IF(p0288<0.5;-SQRT(p0007*EXP(p0420^2*p0008)-p0007);SQRT(p0007*EXP(p0420^2*p0008)-p0007))
- p3372: 0; = if(p1232=0;p3245*p3360/p0818;0)
- p2464: 0.000272421; = p2268*p1073
- p2761: 2.9977e-5; = p2370*(p1019+p1021)
- p2835: 0.000528736; = p2249*(p1020+p1022)
- p0477: 0; = SQRT(2)*(IF((2*p0345-1)<0;-1;IF((2*p0345-1)>0;1;0))*SQRT(SQRT((2/(pi()*0.140012289)+LN(1-(2*p0345-1)^2)/2)^2-LN(1-(2*p0345-1)^2)/0.140012289)-(2/(pi()*0.140012289)+LN(1-(2*p0345-1)^2)/2)))
- p3217: 0.00932787; = p3213*p1228
- p2266: 3.21438e-5; = p2226*p2212
- p0122: 29.408
- p1210: 0.18
- p0408: 0; = SQRT(2)*(IF((2*p0276-1)<0;-1;IF((2*p0276-1)>0;1;0))*SQRT(SQRT((2/(pi()*0.140012289)+LN(1-(2*p0276-1)^2)/2)^2-LN(1-(2*p0276-1)^2)/0.140012289)-(2/(pi()*0.140012289)+LN(1-(2*p0276-1)^2)/2)))
- p3345: 0; = if(and(p1232=0;p3256<>0);p3273*p3277*p3293;0)
- p2144: 1.38554e-6; = p2015*p2072*p2106/(p0818*1000)
- p0793: 0
- p1175: 0.000132435
- p2127: 2.70237e-5; = p2015*p2055*p2089/(p0818*1000)
- p4260: 3.63317e-5; = p1911*p3479
- p3905: 5.60417e-6; = p1762*p3478
- p2125: 1.50596e-5; = p2015*p2053*p2087/(p0818*1000)
- p1941: 0
- p2820: 0; = p2429*(p1128+p1130)
- p0709: 9.538; = p0049*(1+p0577*p0181/100)
- p0135: 62.614
- p3546: 3.80021e-6; = p1815*p3476
- p0689: 98.525; = p0029*(1+p0557*p0161/100)
- p2754: 0.00011538; = p2363*(p1019+p1021)
- p3356: 0; = if(p1232=0;p3306+p3317+p3328+p3339+p3350;0)
- p1319: 0.833496; = IF(((p0745*1000*p0746/100)+(p0754*1000*p0755/100))/p0801<0;0;((p0745*1000*p0746/100)+(p0754*1000*p0755/100))/p0801)
- p1288: 0
- p2426: 0; = p2235*p2216
- p0562: 0; = IF(p0298<0.5;-SQRT(p0007*EXP(p0430^2*p0008)-p0007);SQRT(p0007*EXP(p0430^2*p0008)-p0007))
- p0823: 0.91625
- p2806: 0; = p2415*(p1078+p1080)
- p0232: 33.77
- p2687: 0.00189702; = p2296*(p1019+p1021)
- p1327: 0.0210752; = if(p1318=0;if(p1327a=0;1;if(p1327a<0;0;p1327a));0)
- p5302: 2.66915e-8; = p1923*p3484
- p2645: 0.00310191; = p2254*(p1019+p1021)
- p4425: 4.3053e-8; = p1870*p3480
- p2271: 0.00178749; = p2226*p2217
- p2819: 0; = p2428*(p1128+p1130)
- p2344: 1.42802e-6; = p2228*p2212
- p0109: 47.598
- p2589: 0; = p2393*p1014
- p2705: 0.00038066; = p2314*(p1128+p1130)
- p2268: 0.00063135; = p2226*p2214
- p0503: 0; = SQRT(2)*(IF((2*p0371-1)<0;-1;IF((2*p0371-1)>0;1;0))*SQRT(SQRT((2/(pi()*0.140012289)+LN(1-(2*p0371-1)^2)/2)^2-LN(1-(2*p0371-1)^2)/0.140012289)-(2/(pi()*0.140012289)+LN(1-(2*p0371-1)^2)/2)))
- p1182: 751.789; = p1181*p0801
- p1312: 0; = IF(p1307+p1310+p1311=p1266;0;p1266-(p1307+p1310+p1311))
- p2698: 0.00029253; = p2307*(p1078+p1080)
- p1807: 0
- p1625: 0
- p4144: 1.30739e-6; = p1795*p3479
- p1677: 0
- p4171: 7.56911e-7; = p1822*p3479
- p0357: 0.5
- p0578: 0; = IF(p0314<0.5;-SQRT(p0007*EXP(p0446^2*p0008)-p0007);SQRT(p0007*EXP(p0446^2*p0008)-p0007))
- p0729: 0
- p0462: 0; = SQRT(2)*(IF((2*p0330-1)<0;-1;IF((2*p0330-1)>0;1;0))*SQRT(SQRT((2/(pi()*0.140012289)+LN(1-(2*p0330-1)^2)/2)^2-LN(1-(2*p0330-1)^2)/0.140012289)-(2/(pi()*0.140012289)+LN(1-(2*p0330-1)^2)/2)))
- p1858: 0
- p2154: 1.53104e-6; = p2015*p2082*p2116/(p0818*1000)
- p1990: 30
- p2341: 4.90074e-5; = p2228*p2209
- p4250: 2.91755e-5; = p1901*p3479
- p2014: 3.49469e7; = p0833*p2011*p2013
- p4361: 7.17551e-8; = p1806*p3480
- p1812: 0
- p3469: 0; = p3374*p1241
- p5280: 7.54481e-7; = p1901*p3484
- p2652: 0.00633818; = p2261*(p1078+p1080)
- p0775: 38.731; = p0115*(1+p0643*p0247/100)
- p1503: 528
- p1750: 0
- p2523: 7.60354e-5; = p2327*p1014
- p2063: 2.01468
- p0825: 2.28383e9; = p0818*p0822
- p2967: 1.02446e-5; = p2381*(p1079+p1081)
- p4443: 5.13049e-7; = p1888*p3480
- p0896: 0.516338
- p2911: 3.66018e-5; = p2325*(p1020+p1022)
- p0643: 0; = IF(p0379<0.5;-SQRT(p0007*EXP(p0511^2*p0008)-p0007);SQRT(p0007*EXP(p0511^2*p0008)-p0007))
- p1893: 0
- p0863: 0; = p0675*1000/p0856
- p2809: 0; = p2418*(p1078+p1080)
- p2503: 0.000303875; = p2307*p1073
- p4228: 7.56911e-7; = p1879*p3479
- p2559: 9.91578e-5; = p2363*p1014
- p0323: 0.5
- p1150: 1.95192e7; = if(p1121=0;p1149*p1146*p1145;0)
- p1954: 0
- p2825: 4.14451e-5; = p2239*(p1020+p1022)
- p2642: 9.48063e-6; = p2251*(p1019+p1021)
- p2182: 0.0460603; = p1050/p0818
- p4799: 0; = p1832*p3482
- p3473: 0; = p3378*p1241
- p4512: 2.15265e-8; = p1957*p3480
- p2579: 2.14514e-6; = p2383*p1073
- p1005: 34819.4; = p1001*p0888
- p1088: 47664.2; = IF(p1071=0;p1082*(p0710/100)*p0703*1000;0)
- p3284: 0
- p2890: 0.000967563; = p2304*(p1079+p1081)
- p2067: 0.446471
- p3292: 0
- p1876: 0
- p3131: 0; = p2350*p1132
- p4548: 2.77824e-6; = p1787*p3481
- p0845: 0.5
- p1825: 0
- p1975: 0.00197955; = p1970*p0001/(p0818*p0002)
- p4794: 0; = p1827*p3482
- p2474: 6.79688e-5; = p2278*p1014
- p2090: 0.40001
- p0537: 0; = IF(p0273<0.5;-SQRT(p0007*EXP(p0405^2*p0008)-p0007);SQRT(p0007*EXP(p0405^2*p0008)-p0007))
- p1632: 0
- p2137: 5.68469e-7; = p2015*p2065*p2099/(p0818*1000)
- p3443: 0; = p3367*p1240
- p1973: 0.00046805; = if(p0807=480;p1968*p0001/(p0818*p0002);0)
- p4497: 4.73583e-7; = p1942*p3480
- p1849: 0
- p3235: 0.118093
- p0342: 0.5
- p1957: 2.40648e-6; = p1549*1000/p0818
- p3376: 0; = if(p1232=0;p3246*p3358/p0818;0)
- p3153: 0; = p2372*p1023
- p2429: 0; = p2236*p2219
- p3056: 1.32459e-5; = p2275*p1132
- p2359: 0.00033733; = p2225*p2187
- p0652: 0; = IF(p0388<0.5;-SQRT(p0007*EXP(p0520^2*p0008)-p0007);SQRT(p0007*EXP(p0520^2*p0008)-p0007))
- p2717: 0.000412736; = p2326*(p1019+p1021)
- p2535: 0.000292502; = p2339*p1073
- p0721: 0
- p3172: 2.10722e-6; = p2391*p1132
- p2818: 0; = p2427*(p1078+p1080)
- p0491: 0; = SQRT(2)*(IF((2*p0359-1)<0;-1;IF((2*p0359-1)>0;1;0))*SQRT(SQRT((2/(pi()*0.140012289)+LN(1-(2*p0359-1)^2)/2)^2-LN(1-(2*p0359-1)^2)/0.140012289)-(2/(pi()*0.140012289)+LN(1-(2*p0359-1)^2)/2)))
- p0551: 0; = IF(p0287<0.5;-SQRT(p0007*EXP(p0419^2*p0008)-p0007);SQRT(p0007*EXP(p0419^2*p0008)-p0007))
- p2487: 1.15618e-5; = p2291*p1014
- p4565: 5.81491e-7; = p1804*p3481
- p2575: 0.000162795; = p2379*p1073
- p2184: 0.00059582; = p1051/p0818
- p1638: 0
- p0045: 37.164
- p1629: 0
- p0706: 28.991; = p0046*(1+p0574*p0178/100)
- p3456: 0; = p3380*p1240
- p1324: 0.382614; = IF(((p0745*1000*p0751/100)+(p0754*1000*p0760/100))/p0801<0;0;((p0745*1000*p0751/100)+(p0754*1000*p0760/100))/p0801)
- p0668: 0; = IF(p0404<0.5;-SQRT(p0007*EXP(p0536^2*p0008)-p0007);SQRT(p0007*EXP(p0536^2*p0008)-p0007))
- p3625: 1.98455e-5; = p1894*p3476
- p2373: 0.000387806; = p2225*p2202
- p2655: 0.000197842; = p2264*(p1078+p1080)
- p1132: 0.02944; = if(p1121=0;IF(p1123+p1128+p1129+p1130+p1131=1;0;1-(p1123+p1128+p1129+p1130+p1131));0)
- p0522: 0; = SQRT(2)*(IF((2*p0390-1)<0;-1;IF((2*p0390-1)>0;1;0))*SQRT(SQRT((2/(pi()*0.140012289)+LN(1-(2*p0390-1)^2)/2)^2-LN(1-(2*p0390-1)^2)/0.140012289)-(2/(pi()*0.140012289)+LN(1-(2*p0390-1)^2)/2)))
- p3276: 0
- p2303: 0.000531285; = p2227*p2210
- p1004: 0; = p1000*p0888
- p1196: 0.59
- p3332: 0; = if(and(p1232=0;p3255<>0);IF((p3328+p3329+p3330+p3331)+(p3255*(p3265*(1-p3277))/p3327)>p3255;p3255-(p3328+p3329+p3330+p3331);p3255*(p3265*(1-p3277))/p3327);0)
- p2122: 0.341195
- p2333: 0.000233139; = p2224*p2201
- p2731: 4.50159e-5; = p2340*(p1078+p1080)
- p4941: 4.85382e-6; = p1768*p3483
- p0394: 0.5
- p3484: 0.00443661; = IF(p1344=0;0;p1344/(p1328+p1330+p1332+p1334+p1336+p1338+p1340+p1342+p1344))
- p0518: 0; = SQRT(2)*(IF((2*p0386-1)<0;-1;IF((2*p0386-1)>0;1;0))*SQRT(SQRT((2/(pi()*0.140012289)+LN(1-(2*p0386-1)^2)/2)^2-LN(1-(2*p0386-1)^2)/0.140012289)-(2/(pi()*0.140012289)+LN(1-(2*p0386-1)^2)/2)))
- p0606: 0; = IF(p0342<0.5;-SQRT(p0007*EXP(p0474^2*p0008)-p0007);SQRT(p0007*EXP(p0474^2*p0008)-p0007))
- p4306: 4.1286e-7; = p1957*p3479
- p2802: 0; = p2411*(p1019+p1021)
- p2842: 8.67138e-5; = p2256*(p1020+p1022)
- p0111: 8.236
- p0713: 13.907; = p0053*(1+p0581*p0185/100)
- p3069: 0; = p2288*p1023
- p1963: 0.0040388; = p1963a+p1963b+p1963c+p1963d+p1963e+p1963f+p1963g+p1963h+p1963i+p1963j+p1963k
- p1639: 0
- p1650: 0
- p3317: 0; = if(and(p1232=0;p3253<>0);p3253*(p3261*p3277-p3312)/p3316;0)
- p0587: 0; = IF(p0323<0.5;-SQRT(p0007*EXP(p0455^2*p0008)-p0007);SQRT(p0007*EXP(p0455^2*p0008)-p0007))
- p2928: 2.9427e-6; = p2342*(p1079+p1081)
- p1491: 297
- p0664: 0; = IF(p0400<0.5;-SQRT(p0007*EXP(p0532^2*p0008)-p0007);SQRT(p0007*EXP(p0532^2*p0008)-p0007))
- p0951: 0; = if(and(p0683=0;or(p0807=480;p0807=32;p0807=1;and(p0807=60;p0901<0.03)));p0939;0)
- p1223: 0.56
- p3826: 4.53e-5; = p1889*p3477
- p2699: 0.00110391; = p2308*(p1078+p1080)
- p1437: 384
- p1722: 0
- p2306: 0.000374931; = p2227*p2213
- p3321: 0; = if(and(p1232=0;p3253<>0);IF((p3317+p3318+p3319+p3320)+(p3253*(p3261*(1-p3277))/p3316)>p3253;p3253-(p3317+p3318+p3319+p3320);p3253*(p3261*(1-p3277))/p3316);0)
- p1283: 0; = p1277*p1252/p0818
- p2378: 0.00235997; = p2229*p2207
- p5062: 5.48923e-6; = p1889*p3483
- p2019: 0.13105
- p1809: 0
- p2788: 0; = p2397*(p1019+p1021)
- p0405: 0; = SQRT(2)*(IF((2*p0273-1)<0;-1;IF((2*p0273-1)>0;1;0))*SQRT(SQRT((2/(pi()*0.140012289)+LN(1-(2*p0273-1)^2)/2)^2-LN(1-(2*p0273-1)^2)/0.140012289)-(2/(pi()*0.140012289)+LN(1-(2*p0273-1)^2)/2)))
- p1156: 0.382931; = p1064+p1065+p1066+p1067+p1068+p1069+p1070+p1116+p1117+p1118+p1119+p1120+p1154+p1155
- p1885: 0
- p0354: 0.5
- p1760: 0
- p2611: 0; = p2415*p1073
- p0908: 0.0022
- p3475: 0; = p3380*p1241
- p1015: 0.28991; = IF(p1012=0;p0706/100;0)
- p3169: 3.88702e-6; = p2388*p1082
- p2950: 0.000423033; = p2364*(p1020+p1022)
- p0840: 0.210331; = p0839*p0831
- p0403: 0.5
- p3015: 0; = p2429*(p1129+p1131)
- p0009: 11.6125
- p0227: 27.764
- p1026: 451970; = IF(p1012=0;p1020*(p0704/100)*p0703*1000;0)
- p2961: 0.000134966; = p2375*(p1079+p1081)
- p0441: 0; = SQRT(2)*(IF((2*p0309-1)<0;-1;IF((2*p0309-1)>0;1;0))*SQRT(SQRT((2/(pi()*0.140012289)+LN(1-(2*p0309-1)^2)/2)^2-LN(1-(2*p0309-1)^2)/0.140012289)-(2/(pi()*0.140012289)+LN(1-(2*p0309-1)^2)/2)))
- p0058: 46.67
- p3998: 1.87618e-5; = p1855*p3478
- p2053: 1.45647
- p0697: 99.979; = p0037*(1+p0565*p0169/100)
- p1072: 0; = p1071*p0001/(p0818*p0002)
- p0442: 0; = SQRT(2)*(IF((2*p0310-1)<0;-1;IF((2*p0310-1)>0;1;0))*SQRT(SQRT((2/(pi()*0.140012289)+LN(1-(2*p0310-1)^2)/2)^2-LN(1-(2*p0310-1)^2)/0.140012289)-(2/(pi()*0.140012289)+LN(1-(2*p0310-1)^2)/2)))
- p2987: 0; = p2401*(p1020+p1022)
- p1682: 0
- p2695: 0.00288996; = p2304*(p1078+p1080)
- p2537: 2.11462e-5; = p2341*p1073
- p1886: 0
- p5072: 5.24212e-6; = p1899*p3483
- p1640: 0
- p0914: 6.53648e7; = p0825*p0911+p0827*p0912+(p0830+p0895)*p0824*p0913
- p3354: 0; = IF((p3350+p3351+p3352+p3353)+IF(p3349=0;0;(p3256*(p3273*(1-p3277))/p3349))>p3256;p3256-(p3350+p3351+p3352+p3353);IF(p3349=0;0;p3256*(p3273*(1-p3277))/p3349))
- p3838: 6.17594e-5; = p1901*p3477
- p2641: 0.0115362; = p2250*(p1019+p1021)
- p0916: 0.80881; = p0826+p0828+p0829+(p0832*(1+p0894))/p0818
- p1749: 0
- p0614: 0; = IF(p0350<0.5;-SQRT(p0007*EXP(p0482^2*p0008)-p0007);SQRT(p0007*EXP(p0482^2*p0008)-p0007))
- p3084: 7.46986e-6; = p2303*p1082
- p2232: 0; = if(p0783*p0787+p0784*p0788+p0785*p0789+p0786*p0790=0;0;p0789*p0785/(p0783*p0787+p0784*p0788+p0785*p0789+p0786*p0790))
- p0930: 0; = p0801*p0924
- p3323: 0; = if(and(p1232=0;p3255<>0);p3265*p3277*(p3299*p3291+(1-p3299)*p3295);0)
- p2957: 0.00123137; = p2371*(p1020+p1022)
- p0571: 0; = IF(p0307<0.5;-SQRT(p0007*EXP(p0439^2*p0008)-p0007);SQRT(p0007*EXP(p0439^2*p0008)-p0007))
- p3353: 0; = if(and(p1232=0;p3256<>0);p3256*(p3276-p3348)/p3349;0)
- p3449: 0; = p3373*p1240
- p2284: 0.00104689; = p2223*p2190
- p2389: 0.000700568; = p2233*p2218
- p1647: 0
- p1679: 0
- p1778: 0
- p1999: 2.22532e8; = (p1228+p1229)*p0818+p1164
- p4359: 6.45795e-8; = p1804*p3480
- p3270: 0
- p1925: 0
- p3004: 0; = p2418*(p1079+p1081)
- p1782: 0
- p0502: 0; = SQRT(2)*(IF((2*p0370-1)<0;-1;IF((2*p0370-1)>0;1;0))*SQRT(SQRT((2/(pi()*0.140012289)+LN(1-(2*p0370-1)^2)/2)^2-LN(1-(2*p0370-1)^2)/0.140012289)-(2/(pi()*0.140012289)+LN(1-(2*p0370-1)^2)/2)))
- p2844: 0.000872646; = p2258*(p1079+p1081)
- p1860: 0
- p4510: 1.10288e-5; = p1955*p3480
- p1706: 0
- p2171: 0.20839; = p2165*p0831
- p1829: 0
- p2298: 0.00633039; = p2227*p2205
- p1634: 0
- p1771: 0
- p4101: 1.44722e-5; = p1962*p3478
- p3269: 0
- p1736: 0
- p3088: 9.9017e-6; = p2307*p1082
- p1211: 0.6
- p0118: 40.527
- p1343: 0.000413816; = p1342*p0001/(p0818*p0002)
- p3278: 0
- p0029: 98.525
- p4044: 2.58279e-5; = p1901*p3478
- p2278: 0.000182889; = p2223*p2184
- p2729: 3.39135e-5; = p2338*(p1078+p1080)
- p3026: 0; = p2245*p1023
- p1229: 0.00654477; = IF(p1221=0;0;p1228*p1221)
- p1928: 0
- p1212: 0.0191212; = if(p1211=0;0;if(p1193>0;0;(p1207+p1208+p1209)*p1210/(2000*p1211)))
- p0180: 31.038
- p0426: 0; = SQRT(2)*(IF((2*p0294-1)<0;-1;IF((2*p0294-1)>0;1;0))*SQRT(SQRT((2/(pi()*0.140012289)+LN(1-(2*p0294-1)^2)/2)^2-LN(1-(2*p0294-1)^2)/0.140012289)-(2/(pi()*0.140012289)+LN(1-(2*p0294-1)^2)/2)))
- p0309: 0.5
- p0190: 17.481
- p0738: 5504.24; = p0078*(1+p0606*p0210/100)
- p3586: 2.16753e-5; = p1855*p3476
- p0379: 0.5
- p5096: 2.64754e-7; = p1923*p3483
- p3082: 3.82579e-5; = p2301*p1082
- p2422: 0; = p2235*p2212
- p0051: 43.149
- p0182: 6.775
- p4866: 0; = p1899*p3482
- p2436: 0.000270792; = p2240*p1014
- p4022: 6.70063e-7; = p1879*p3478
- p1083: 1.46278e6; = IF(p1071=0;p1073*(p0710/100)*p0703*1000;0)
- p1887: 0
- p0992: 3.74712e-5; = p0988*p0001*p0004/(p0818*p0002)
- p0667: 0; = IF(p0403<0.5;-SQRT(p0007*EXP(p0535^2*p0008)-p0007);SQRT(p0007*EXP(p0535^2*p0008)-p0007))
- p2867: 6.52111e-5; = p2281*(p1020+p1022)
- p2633: 0.000166485; = p2242*(p1019+p1021)
- p3271: 0
- p1668: 0.723486
- p3288: 0
- p1680: 0
- p2760: 1.36345e-5; = p2369*(p1019+p1021)
- p2917: 1.17509e-6; = p2331*(p1020+p1022)
- p2441: 0.000450017; = p2245*p1014
- p0130: 9.904
- p3175: 0; = p2394*p1023
- p2998: 0; = p2412*(p1020+p1022)
- p3398: 0; = p3379*p1234
- p2676: 0.000113846; = p2285*(p1019+p1021)
- p0386: 0.5
- p2711: 1.26214e-5; = p2320*(p1019+p1021)
- p2782: 3.3405e-5; = p2391*(p1128+p1130)
- p2050: 0.952062
- p3112: 0; = p2331*p1023
- p0005: 1.60934
- p0714: 0
- p5012: 2.47103e-7; = p1839*p3483
- p2285: 0.000263265; = p2223*p2191
- p1267: 0
- p3077: 0; = p2296*p1023
- p3467: 0; = p3372*p1241
- p0392: 0.5
- p4400: 1.3777e-6; = p1845*p3480
- p3002: 0; = p2416*(p1079+p1081)
- p0453: 0; = SQRT(2)*(IF((2*p0321-1)<0;-1;IF((2*p0321-1)>0;1;0))*SQRT(SQRT((2/(pi()*0.140012289)+LN(1-(2*p0321-1)^2)/2)^2-LN(1-(2*p0321-1)^2)/0.140012289)-(2/(pi()*0.140012289)+LN(1-(2*p0321-1)^2)/2)))
- p1657: 0
- p3682: 3.63835e-5; = p1951*p3476
- p0912: 0.0117914
- p2841: 0.000602503; = p2255*(p1020+p1022)
- p2368: 1.92095e-5; = p2225*p2197
- p2250: 0.026677; = p2222*p2196
- p2824: 0.000703305; = p2238*(p1020+p1022)
- p0401: 0.5
- p0621: 0; = IF(p0357<0.5;-SQRT(p0007*EXP(p0489^2*p0008)-p0007);SQRT(p0007*EXP(p0489^2*p0008)-p0007))
- p2241: 0.00267498; = p2222*p2186
- p4382: 3.69539e-7; = p1827*p3480
- p1140: 0.000270324; = if(p1121=0;p1134*p0001/(p0818*p0002);0)
- p1775: 0
- p2550: 0.00532517; = p2354*p1014
- p2338: 8.16444e-5; = p2228*p2206
- p4173: 1.72713e-5; = p1824*p3479
- p2582: 0.000158999; = p2386*p1073
- p2521: 6.94299e-5; = p2325*p1014
- p2580: 2.24314e-5; = p2384*p1073
- p1590: 0
- p1998: 182
- p1285: 0; = p1281*p1252/p0818
- p4691: 1.5571e-5; = p1930*p3481
- p1121: 0
- p0500: 0; = SQRT(2)*(IF((2*p0368-1)<0;-1;IF((2*p0368-1)>0;1;0))*SQRT(SQRT((2/(pi()*0.140012289)+LN(1-(2*p0368-1)^2)/2)^2-LN(1-(2*p0368-1)^2)/0.140012289)-(2/(pi()*0.140012289)+LN(1-(2*p0368-1)^2)/2)))
- p3298: 0; = if(p1283+p1284+p1285+p1286=0;0;p1283/(p1283+p1284+p1285+p1286))
- p1284: 0; = p1280*p1252/p0818
- p2377: 0.000284234; = p2229*p2206
- p2800: 0; = p2409*(p1019+p1021)
- p1901: 0.000170058; = p1493*1000/p0818
- p2318: 5.52392e-5; = p2224*p2185
- p2473: 0.0011534; = p2277*p1014
- p3068: 0; = p2287*p1023
- p2993: 0; = p2407*(p1020+p1022)
- p0272: 9.91
- p1578: 0
- p2365: 0.0110311; = p2225*p2193
- p4031: 8.71082e-6; = p1888*p3478
- p2334: 3.35539e-5; = p2224*p2202
- p3158: 3.99633e-6; = p2377*p1082
- p1007: 0; = p1003*p0001*p0004/(p0818*p0002)
- p2815: 0; = p2424*(p1078+p1080)
- p3378: 0; = if(p1232=0;p3246*p3360/p0818;0)
- p2539: 0.000119564; = p2343*p1073
- p3314: 0; = if(and(p1232=0;p3253<>0);p3263*p3289;0)
- p2742: 0; = p2351*(p1128+p1130)
- p0459: 0; = SQRT(2)*(IF((2*p0327-1)<0;-1;IF((2*p0327-1)>0;1;0))*SQRT(SQRT((2/(pi()*0.140012289)+LN(1-(2*p0327-1)^2)/2)^2-LN(1-(2*p0327-1)^2)/0.140012289)-(2/(pi()*0.140012289)+LN(1-(2*p0327-1)^2)/2)))
- p2878: 1.34007e-5; = p2292*(p1020+p1022)
- p4085: 8.04076e-6; = p1942*p3478
- p3464: 0; = p3369*p1241
- p0487: 0; = SQRT(2)*(IF((2*p0355-1)<0;-1;IF((2*p0355-1)>0;1;0))*SQRT(SQRT((2/(pi()*0.140012289)+LN(1-(2*p0355-1)^2)/2)^2-LN(1-(2*p0355-1)^2)/0.140012289)-(2/(pi()*0.140012289)+LN(1-(2*p0355-1)^2)/2)))
- p2400: 0; = p2234*p2189
- p2593: 0; = p2397*p1014
- p2661: 8.2844e-5; = p2270*(p1078+p1080)
- p3160: 5.30462e-6; = p2379*p1082
- p0198: 17.176
- p0786: 14.216; = p0126*(1+p0654*p0258/100)
- p2727: 0.000115795; = p2336*(p1078+p1080)
- p4444: 1.11579e-6; = p1889*p3480
- p1181: 0.000135898
- p2302: 0.00123049; = p2227*p2209
- p3322: 0; = if(and(p1232=0;p3253<>0);p3253-(p3317+p3318+p3319+p3320+p3321);0)
- p1157: 0.235526
- p2188: 0.0138717; = p1066-p2186-p2187
- p2211: 0.0144364; = p1120-p2209-p2208-p2210
- p0598: 0; = IF(p0334<0.5;-SQRT(p0007*EXP(p0466^2*p0008)-p0007);SQRT(p0007*EXP(p0466^2*p0008)-p0007))
- p0761: 0
- p4248: 2.04366e-5; = p1899*p3479
- p2399: 0; = p2234*p2188
- p3205: 0; = p2424*p1082
- p2183: 0.0101108; = p1064-p2182
- p2584: 0.000119289; = p2388*p1073
- p1797: 0
- p0559: 0; = IF(p0295<0.5;-SQRT(p0007*EXP(p0427^2*p0008)-p0007);SQRT(p0007*EXP(p0427^2*p0008)-p0007))
- p3764: 1.50029e-5; = p1827*p3477
- p2543: 4.56715e-5; = p2347*p1073
- p0901: 0.01746
- p3008: 0; = p2422*(p1079+p1081)
- p1608: 0
- p5045: 8.48447e-5; = p1872*p3483
- p0795: 62.614; = p0135*(1+p0663*p0267/100)
- p0526: 0; = SQRT(2)*(IF((2*p0394-1)<0;-1;IF((2*p0394-1)>0;1;0))*SQRT(SQRT((2/(pi()*0.140012289)+LN(1-(2*p0394-1)^2)/2)^2-LN(1-(2*p0394-1)^2)/0.140012289)-(2/(pi()*0.140012289)+LN(1-(2*p0394-1)^2)/2)))
- p3138: 0; = p2357*p1023
- p0760: 8.444; = p0100*(1+p0628*p0232/100)
- p1684: 0.698317
- p2340: 0.000108373; = p2228*p2208
- p3428: 0; = p3371*p1239
- p2935: 1.10437e-5; = p2349*(p1079+p1081)
- p2923: 3.5063e-5; = p2337*(p1079+p1081)
- p2121: 0.822447
- p2049: 25.6942
- p1678: 0
- p3275: 0
- p3126: 2.09953e-7; = p2345*p1082
- p1176: 732.631; = p1175*p0801
- p0178: 14.464
- p0969: 8.96438e7; = p0966*p0683*p0682*1000
- p1768: 0.000110297; = p1360*1000/p0818
- p1983: 50
- p0483: 0; = SQRT(2)*(IF((2*p0351-1)<0;-1;IF((2*p0351-1)>0;1;0))*SQRT(SQRT((2/(pi()*0.140012289)+LN(1-(2*p0351-1)^2)/2)^2-LN(1-(2*p0351-1)^2)/0.140012289)-(2/(pi()*0.140012289)+LN(1-(2*p0351-1)^2)/2)))
- p1292: 0; = IF(p1287+p1290+p1291=p1261;0;p1261-(p1287+p1290+p1291))
- p0314: 0.5
- p0898: 0.45335
- p3743: 2.91318e-6; = p1806*p3477
- p2356: 0.000185353; = p2225*p2184
- p3435: 0; = p3378*p1239
- p0906: 0.0041
- p0938: 0; = p0932*p0001/(p0818*p0002)
- p0404: 0.5
- p0927: 1; = IF(p0918+p0923+p0924+p0925+p0926=1;0;1-(p0918+p0923+p0924+p0925+p0926))
- p1683: 0
- p1041: 0.314094
- p0744: 60.996; = p0084*(1+p0612*p0216/100)
- p1139: 0.000208382; = if(p1121=0;p1133*p0001/(p0818*p0002);0)
- p2440: 0.000393155; = p2244*p1014
- p4219: 8.25721e-7; = p1870*p3479
- p0874: 3.36193e6; = p0865*p0856
- p1048: 0.000546963; = IF(p1012=0;IF(p1037+p1044+p1045+p1046+p1047=1;0;IF(p1037+p1044+p1045+p1046+p1047+p1042>1;1-(p1037+p1044+p1045+p1046+p1047);p1042));0)
- p0804: 5.14e6
- p3601: 8.44491e-7; = p1870*p3476
- p2151: 2.01018e-7; = p2015*p2079*p2113/(p0818*1000)
- p1331: 0.00341503; = p1330*p0001/(p0818*p0002)
- p1963h: 0.000620624; = p1686*p1890+p1687*p1891+p1688*p1892+p1689*p1893+p1690*p1894+p1691*p1895+p1692*p1896+p1693*p1897+p1694*p1898+p1695*p1899+p1696*p1900+p1697*p1901+p1698*p1902+p1699*p1903+p1700*p1904+p1701*p1905+p1702*p1906+p1703*p1907+p1704*p1908+p1705*p1909
- p2379: 0.000377285; = p2229*p2208
- p0670: 463.297; = p0010*(1+p0538*p0142/100)
- p3062: 0; = p2281*p1023
- p0688: 1.475; = p0028*(1+p0556*p0160/100)
- p1222: 0.94
- p2008: 0.264549; = ((p1982*p1985+p1988*p1991+p1994*p1997+p2002*p2005)/p0818)*p0005*p0002/1000
- p2259: 0.00567514; = p2226*p2205
- p1943: 0
- p0636: 0; = IF(p0372<0.5;-SQRT(p0007*EXP(p0504^2*p0008)-p0007);SQRT(p0007*EXP(p0504^2*p0008)-p0007))
- p3159: 3.31812e-5; = p2378*p1082
- p3223: 0.126838; = IF(p3216=0;0;(1-p1223)*24.3050/84.3139)
- p0722: 0
- p1623: 0.831766
- p4589: 1.2922e-7; = p1828*p3481
- p2028: 0.000378294; = p2015*p2026*p2027/(p0818*1000)
- p3911: 1.67516e-5; = p1768*p3478
- p0078: 5504.24
- p3433: 0; = p3376*p1239
- p2264: 0.000476292; = p2226*p2210
- p2148: 5.89369e-7; = p2015*p2076*p2110/(p0818*1000)
- p0119: 46.482
- p1969: 0; = p0803
- p4846: 0; = p1879*p3482
- p1592: 0
- p0933: 5.532e6; = p0801*p0927
- p1059: 0.335
- p0234: 16.423
- p0622: 0; = IF(p0358<0.5;-SQRT(p0007*EXP(p0490^2*p0008)-p0007);SQRT(p0007*EXP(p0490^2*p0008)-p0007))
- p1900: 0
- p1289: 0
- p1068: 0.118198; = IF(p1012=0;p1054/(p1061*p0818);0)
- p3113: 0; = p2332*p1023
- p2082: 0.285294
- p2881: 7.49689e-5; = p2295*(p1020+p1022)
- p1616: 0
- p2260: 0.00183776; = p2226*p2206
- p0747: 10.87; = p0087*(1+p0615*p0219/100)
- p1562: 0
- p0710: 61.59; = p0050*(1+p0578*p0182/100)
- p1113: 0.100377
- p1295: 0; = p1291*p1252/p0818
- p2965: 5.2469e-5; = p2379*(p1079+p1081)
- p0941: 0; = if(and(p0683=0;p0947=0);p0935;0)
- p0644: 0; = IF(p0380<0.5;-SQRT(p0007*EXP(p0512^2*p0008)-p0007);SQRT(p0007*EXP(p0512^2*p0008)-p0007))
- p1189: 0.00197955; = p0801*p0001/(p0818*p0002)
- p1661: 0
- p2308: 0.0026576; = p2227*p2215
- p3287: 0
- p0732: 0
- p3154: 0; = p2373*p1023
- p2578: 0.000416246; = p2382*p1073
- p0915: 0.0262166; = p0914/p0818
- p3316: 0; = if(and(p1232=0;p3253<>0);1-(p3312+p3313+p3314+p3315);0)
- p0366: 0.5
- p1568: 0.813836
- p1700: 0
- p1116: 0.00085237; = IF(p1071=0;p1106/(p1111*p0818);0)
- p1240: 0; = if(p1232>0;0;IF(p1234+p1238+p1239=1;0;IF(p1234+p1238+p1239+p1237>1;1-(p1234+p1238+p1239);p1237)))
- p1155: 0.00218981; = if(p1153*p0818=0;0;p1151/(p1153*p0818))
- p4795: 0; = p1828*p3482
- p1766: 0
- p1751: 0.791173
- p0372: 0.5
- p1843: 0
- p2021: 0.000313011; = p2020/p0818
- p2732: 2.03567e-5; = p2341*(p1078+p1080)
- p2444: 0.00467881; = p2248*p1014
- p2591: 0; = p2395*p1014
- p2903: 3.142e-6; = p2317*(p1020+p1022)
- p1669: 0
- p1254: 0; = if(p1232>0;0;p0736/100)
- p2976: 0.000142262; = p2390*(p1129+p1131)
- p1043: 0.178958
- p2715: 9.98295e-6; = p2324*(p1019+p1021)
- p2529: 8.66436e-5; = p2333*p1014
- p3628: 1.44267e-5; = p1897*p3476
- p3030: 0; = p2249*p1023
- p2290: 1.89542e-5; = p2223*p2197
- p1878: 0
- p0311: 0.5
- p1228: 0.082692; = IF(p1221=0;0;p0801*p1212*2000/(p1222+p1221*p1225)/p0818)
- p2999: 0; = p2413*(p1020+p1022)
- p0563: 0; = IF(p0299<0.5;-SQRT(p0007*EXP(p0431^2*p0008)-p0007);SQRT(p0007*EXP(p0431^2*p0008)-p0007))
- p1697: 0.705252
- p1770: 0
- p3098: 0; = p2317*p1023
- p2402: 0; = p2234*p2191
- p0103: 5504.24
- p3441: 0; = p3365*p1240
- p3052: 2.51321e-5; = p2271*p1082
- p0349: 0.5
- p2768: 0.000118065; = p2377*(p1078+p1080)
- p2269: 0.00238251; = p2226*p2215
- p3197: 0; = p2416*p1082
- p0607: 0; = IF(p0343<0.5;-SQRT(p0007*EXP(p0475^2*p0008)-p0007);SQRT(p0007*EXP(p0475^2*p0008)-p0007))
- p0245: 6.775
- p2350: 0; = p2232*p2218
- p3355: 0; = if(and(p1232=0;p3256<>0);p3256-(p3350+p3351+p3352+p3353+p3354);0)
- p2159: 2.158e-5; = p2015*p2083*p2121/(p0818*1000)
- p0774: 39.824; = p0114*(1+p0642*p0246/100)
- p1842: 0
- p2668: 0.0013421; = p2277*(p1019+p1021)
- p0183: 12.486
- p0864: 0; = IF(p0858=1;0;IF(p0858+p0859>1;1-p0858;p0859))
- p2025: 2.98337e-5; = p2015*p2023*p2024/(p0818*1000)
- p0327: 0.5
- p1779: 0
- p2599: 0; = p2403*p1014
- p0964: 0; = 56/90000
- p1742: 0
- p2968: 0.000134157; = p2382*(p1079+p1081)
- p2428: 0; = p2236*p2218
- p2445: 0.00100296; = p2249*p1014
- p0955: 0; = if(and(p0683>0;or(p0807=56;p0807=100;and(p0807=60;p0901>0.06)));p0937;0)
- p1747: 0.217583
- p4054: 3.2163e-5; = p1911*p3478
- p0803: 0
- p3064: 0; = p2283*p1023
- p3228: 0.00328512; = p3224*p1229
- p0773: 61.59; = p0113*(1+p0641*p0245/100)
- p3888: 7.53057e-5; = p1951*p3477
- p1557: 0
- p1183: 0.00197955; = p0801*p0001/(p0818*p0002)
- p1896: 0
- p2275: 0.000449928; = p2230*p2221
- p2664: 0.00166667; = p2273*(p1128+p1130)
- p1160: 0.236561; = (p1156+p1158)*p1159
- p1667: 0
- p2857: 0.000248586; = p2271*(p1079+p1081)
- p3391: 0; = p3372*p1234
- p2899: 6.76361e-5; = p2313*(p1129+p1131)
- p4773: 0; = p1806*p3482
- p1304: 0; = p1300*p1252/p0818
- p1033: 0.000229277; = IF(p1012=0;p1027*p0001/(p0818*p0002);0)
- p1547: 3074
- p1987: 400
- p1054: 8.841e7; = IF(p1012=0;p1047*p1036;0)
- p0236: 3.857
- p0839: 1.51864; = p0838/p0818
- p1963e: 0.000256259; = p1628*p1832+p1629*p1833+p1630*p1834+p1631*p1835+p1632*p1836+p1633*p1837+p1634*p1838+p1635*p1839+p1636*p1840+p1637*p1841+p1638*p1842+p1639*p1843+p1640*p1844+p1641*p1845+p1642*p1846+p1643*p1847+p1644*p1848+p1645*p1849+p1646*p1850
- p1597: 0
- p0268: 3.857
- p3327: 0; = if(and(p1232=0;p3255<>0);1-(p3323+p3324+p3325+p3326);0)
- p0979: 0; = IF(p0976=0;0;p0976*p0001/(p0818*p0002))
- p0805: 54300
- p1200: 0.84
- p3632: 2.98387e-5; = p1901*p3476
- p0855: 9.94016; = p0854*p0001*p0003/(p0818*p0002)
- p0052: 41.538
- p2570: 0.00165227; = p2374*p1014
- p0240: 15.161
- p3123: 2.97507e-7; = p2342*p1082
- p0315: 0.5
- p1637: 0
- p3079: 8.90053e-5; = p2298*p1082
- p1280: 0; = IF(p1277=p1263;0;IF(p1277+p1278>p1263;p1263-p1277;p1278))
- p0244: 17.845
- p2073: 0.377647
- p0112: 50.826
- p2691: 0.00706999; = p2300*(p1078+p1080)
- p0095: 8.831
- p2132: 3.03411e-6; = p2015*p2060*p2094/(p0818*1000)
- p0832: 1.04882e9; = p0831*p0830/(1-p0831)
- p3006: 0; = p2420*(p1079+p1081)
- p1780: 0
- p0985: 0.720333; = IF(p0982=1;0;IF(p0982+p0983>1;1-p0982;p0983))
- p2667: 0.006114; = p2276*(p1019+p1021)
- p3152: 0; = p2371*p1023
- p1119: 0.0672296; = IF(p1071=0;p1109/(p1114*p0818);0)
- p1728: 0
- p3401: 0; = p3363*p1238
- p1626: 0
- p2423: 0; = p2235*p2213
- p3460: 0; = p3365*p1241
- p3867: 7.02077e-5; = p1930*p3477
- p1109: 3.62109e7; = IF(p1071=0;p1105*p1103*p1095;0)
- p1724: 0
- p0276: 0.5
- p5103: 8.50742e-6; = p1930*p3483
- p3442: 0; = p3366*p1240
- p4771: 0; = p1804*p3482
- p1025: 1.30327e6; = IF(p1012=0;p1019*(p0704/100)*p0703*1000;0)
- p3031: 0; = p2250*p1023
- p2376: 0.000877737; = p2229*p2205
- p3009: 0; = p2423*(p1079+p1081)
- p4935: 1.62382e-6; = p1762*p3483
- p0002: 0.453592
- p2277: 0.00310355; = p2223*p2183
- p3202: 0; = p2421*p1082
- p5203: 4.46639e-7; = p1824*p3484
- p0676: 0
- p1146: 0.907301
- p2002: 750
- p1656: 0
- p2349: 7.94112e-5; = p2228*p2217
- p4873: 0; = p1906*p3482
- p0865: 0.607723; = IF(p0858+p0864=1;0;IF(p0858+p0864+p0860>1;1-(p0858+p0864);p0860))
- p2721: 1.17969e-6; = p2330*(p1019+p1021)
- p2635: 0.000457474; = p2244*(p1019+p1021)
- p1589: 0
- p3212: 0; = p2431*p1132
- p0065: 1.298
- p1963g: 0.00149917; = p1667*p1871+p1668*p1872+p1669*p1873+p1670*p1874+p1671*p1875+p1672*p1876+p1673*p1877+p1674*p1878+p1675*p1879+p1676*p1880+p1677*p1881+p1678*p1882+p1679*p1883+p1680*p1884+p1681*p1885+p1682*p1886+p1683*p1887+p1684*p1888+p1685*p1889
- p0484: 0; = SQRT(2)*(IF((2*p0352-1)<0;-1;IF((2*p0352-1)>0;1;0))*SQRT(SQRT((2/(pi()*0.140012289)+LN(1-(2*p0352-1)^2)/2)^2-LN(1-(2*p0352-1)^2)/0.140012289)-(2/(pi()*0.140012289)+LN(1-(2*p0352-1)^2)/2)))
- p1714: 0
- p2363: 0.000266811; = p2225*p2191
- p3091: 2.80338e-5; = p2310*p1082
- p1565: 0
- p0860: 0.607723; = p0672*1000/p0856
- p0953: 0; = if(and(p0683>0;or(p0807=56;p0807=100;and(p0807=60;p0901>0.06)));p0935;0)
- p1013: 0; = p1012*p0001/(p0818*p0002)
- p2774: 2.06505e-6; = p2383*(p1078+p1080)
- p0778: 40.527; = p0118*(1+p0646*p0250/100)
- p2106: 0.856281
- p2986: 0; = p2400*(p1020+p1022)
- p0490: 0; = SQRT(2)*(IF((2*p0358-1)<0;-1;IF((2*p0358-1)>0;1;0))*SQRT(SQRT((2/(pi()*0.140012289)+LN(1-(2*p0358-1)^2)/2)^2-LN(1-(2*p0358-1)^2)/0.140012289)-(2/(pi()*0.140012289)+LN(1-(2*p0358-1)^2)/2)))
- p0499: 0; = SQRT(2)*(IF((2*p0367-1)<0;-1;IF((2*p0367-1)>0;1;0))*SQRT(SQRT((2/(pi()*0.140012289)+LN(1-(2*p0367-1)^2)/2)^2-LN(1-(2*p0367-1)^2)/0.140012289)-(2/(pi()*0.140012289)+LN(1-(2*p0367-1)^2)/2)))
- p0576: 0; = IF(p0312<0.5;-SQRT(p0007*EXP(p0444^2*p0008)-p0007);SQRT(p0007*EXP(p0444^2*p0008)-p0007))
- p3192: 0; = p2411*p1023
- p3482: 0; = if(p1328+p1330+p1332+p1334+p1336+p1338+p1340+p1342+p1344=0;0;p1340/(p1328+p1330+p1332+p1334+p1336+p1338+p1340+p1342+p1344))
- p1704: 0
- p4979: 3.53005e-7; = p1806*p3483
- p2369: 3.15293e-5; = p2225*p2198
- p0771: 8.236; = p0111*(1+p0639*p0243/100)
- p3429: 0; = p3372*p1239
- p2120: 0.51828
- p3306: 0; = if(and(p1232=0;p3252<>0);p3252*(p3257*p3277-p3301)/p3305;0)
- p5061: 2.52398e-6; = p1888*p3483
- p2781: 0.000460749; = p2390*(p1128+p1130)
- p2230: 0.323701; = if(p0783*p0787+p0784*p0788+p0785*p0789+p0786*p0790=0;0;p0787*p0783/(p0783*p0787+p0784*p0788+p0785*p0789+p0786*p0790))
- p2017: 1.36489e7; = p2015*p0898
- p3461: 0; = p3366*p1241
- p0763: 5504.24; = p0103*(1+p0631*p0235/100)
- p2892: 5.21416e-5; = p2306*(p1079+p1081)
- p2700: 9.24093e-5; = p2309*(p1078+p1080)
- p2886: 0.00236705; = p2300*(p1079+p1081)
- p1220: 0; = IF(p1218<0.5;-SQRT(p1214*EXP(p1219^2*p1215)-p1214);SQRT(p1214*EXP(p1219^2*p1215)-p1214))
- p0126: 14.216
- p2405: 0; = p2234*p2195
- p2041: 0; = p2015*p2040/(p0818*1000)
- p2653: 0.00101327; = p2262*(p1078+p1080)
- p4013: 7.30978e-7; = p1870*p3478
- p3261: 0
- p3965: 6.70063e-7; = p1822*p3478
- p2224: 0.0269162; = if(p0765*p0769+p0766*p0770+p0767*p0771+p0768*p0772=0;0;p0771*p0767/(p0765*p0769+p0766*p0770+p0767*p0771+p0768*p0772))
- p2077: 0.043
- p1857: 0
- p1035: 0; = IF(p1012=0;p1029*p0001/(p0818*p0002);0)
- p3094: 1.38182e-5; = p2313*p1132
- p2554: 0.00087106; = p2358*p1014
- p2023: 3.3
- p2084: 0.21
- p0532: 0; = SQRT(2)*(IF((2*p0400-1)<0;-1;IF((2*p0400-1)>0;1;0))*SQRT(SQRT((2/(pi()*0.140012289)+LN(1-(2*p0400-1)^2)/2)^2-LN(1-(2*p0400-1)^2)/0.140012289)-(2/(pi()*0.140012289)+LN(1-(2*p0400-1)^2)/2)))
- p0638: 0; = IF(p0374<0.5;-SQRT(p0007*EXP(p0506^2*p0008)-p0007);SQRT(p0007*EXP(p0506^2*p0008)-p0007))
- p3014: 0; = p2428*(p1129+p1131)
- p0230: 43.403
- p0693: 95.686; = p0033*(1+p0561*p0165/100)
- p1873: 0
- p3447: 0; = p3371*p1240
- p3338: 0; = if(and(p1232=0;p3254<>0);1-(p3334+p3335+p3336+p3337);0)
- p1569: 0
- p1754: 0
- p3634: 5.67216e-5; = p1903*p3476
- p0493: 0; = SQRT(2)*(IF((2*p0361-1)<0;-1;IF((2*p0361-1)>0;1;0))*SQRT(SQRT((2/(pi()*0.140012289)+LN(1-(2*p0361-1)^2)/2)^2-LN(1-(2*p0361-1)^2)/0.140012289)-(2/(pi()*0.140012289)+LN(1-(2*p0361-1)^2)/2)))
- p0271: 11.12
- p3603: 0.000338289; = p1872*p3476
- p2479: 0.000339904; = p2283*p1014
- p1309: 0
- p1888: 5.73545e-5; = p1480*1000/p0818
- p2476: 0.000859481; = p2280*p1014
- p0110: 51.483
- p1171: 0.00197955; = p0801*p0001/(p0818*p0002)
- p2092: 0.54529
- p2425: 0; = p2235*p2215
- p1977: 946.866; = p1252+p1188
- p3183: 0; = p2402*p1023
- p3302: 0; = if(and(p1232=0;p3252<>0);p3258*(p3278*(p3282*p1256+p3286*(p1253+p1257)+p1258*p3288+p3297*p3287));0)
- p1835: 0
- p3480: 0.00894521; = if(p1328+p1330+p1332+p1334+p1336+p1338+p1340+p1342+p1344=0;0;p1336/(p1328+p1330+p1332+p1334+p1336+p1338+p1340+p1342+p1344))
- p3238: 0.854735; = IF(p3237+p3235+p3236>1;1-(p3235+p3236);p3237)
- p2193: 0.0354595; = p1054/p0818
- p1052: 1.87849e7; = IF(p1012=0;p1045*p1036;0)
- p1861: 0
- p0285: 0.5
- p2791: 0; = p2400*(p1019+p1021)
- p3836: 4.32607e-5; = p1899*p3477
- p1966: 0; = if(p0814=0;p0802;0)
- p0833: 7.57273e9; = p0830+p0832
- p0188: 9.91
- p0913: 0.0016675
- p4739: 0; = p1772*p3482
- p3060: 0; = p2279*p1023
- p2128: 1.00412e-5; = p2015*p2056*p2090/(p0818*1000)
- p1765: 0
- p0817: 0
- p0136: 81.672
- p3444: 0; = p3368*p1240
- p1019: 0.28991; = IF(p1012=0;IF(p1014=1;0;IF(p1014+p1015>1;1-p1014;p1015));0)
- p2685: 0.00114974; = p2294*(p1019+p1021)
- p1070: 0.044403; = IF(p1012=0;p1056/(p1063*p0818);0)
- p2245: 0.00121089; = p2222*p2190
- p0295: 0.5
- p1022: 0.09538; = IF(p1012=0;IF(p1014+p1019+p1020+p1021=1;0;IF(p1014+p1019+p1020+p1021+p1018>1;1-(p1014+p1019+p1020+p1021);p1018));0)
- p1184: 3.01528e-7; = p1182/p0818
- p3222: 0.224242; = IF(p3216=0;0;p1223*40.078/100.0869)
- p2104: 0.817136
- p2247: 0.00246428; = p2222*p2192
- p0797: 37.356; = p0137*(1+p0665*p0269/100)
- p3039: 8.82246e-5; = p2258*p1082
- p0707: 10.054; = p0047*(1+p0575*p0179/100)
- p2098: 0.856281
- p2675: 0.000452715; = p2284*(p1019+p1021)
- p4094: 3.1493e-5; = p1951*p3478
- p0177: 10.516
- p1784: 0
- p0683: 17.224; = p0023*(1+p0551*p0155/100)
- p2048: 1.20753e-13; = p2015*p2046/(p0818*1000000000000)
- p1935: 0
- p2329: 1.66205e-6; = p2224*p2197
- p3309: 0; = if(and(p1232=0;p3252<>0);p3252*(p3260-p3304)/p3305;0)
- p2872: 0.000417409; = p2286*(p1020+p1022)
- p3277: 0
- p2545: 3.42652e-5; = p2349*p1073
- p0705: 37.164; = p0045*(1+p0573*p0177/100)
- p0715: 0
- p0872: 0; = p0864*p0856
- p0557: 0; = IF(p0293<0.5;-SQRT(p0007*EXP(p0425^2*p0008)-p0007);SQRT(p0007*EXP(p0425^2*p0008)-p0007))
- p1243: 0; = if(p1232>0;0;p1238*(p0725/100)*p0723*1000)
- p3466: 0; = p3371*p1241
- p2553: 0.000237269; = p2357*p1014
- p2823: 0.00320395; = p2237*(p1020+p1022)
- p4655: 9.11003e-6; = p1894*p3481
- p2168: 0.0226841; = p2166*(p0903)
- p0360: 0.5
- p0794: 0
- p3218: 0.0311258; = p3214*p1228
- p0900: 2.4349; = p0899/p0818
- p0665: 0; = IF(p0401<0.5;-SQRT(p0007*EXP(p0533^2*p0008)-p0007);SQRT(p0007*EXP(p0533^2*p0008)-p0007))
- p2830: 0.000207262; = p2244*(p1020+p1022)
- p3807: 1.74791e-6; = p1870*p3477
- p2408: 0; = p2234*p2198
- p0409: 0; = SQRT(2)*(IF((2*p0277-1)<0;-1;IF((2*p0277-1)>0;1;0))*SQRT(SQRT((2/(pi()*0.140012289)+LN(1-(2*p0277-1)^2)/2)^2-LN(1-(2*p0277-1)^2)/0.140012289)-(2/(pi()*0.140012289)+LN(1-(2*p0277-1)^2)/2)))
- p1310: 0; = IF(p1307=p1266;0;IF(p1307+p1308>p1266;p1266-p1307;p1308))
- p0751: 7.672; = p0091*(1+p0619*p0223/100)
- p0258: 36.905
- p3402: 0; = p3364*p1238
- p1963k: 0.00107044; = p1744*p1948+p1745*p1949+p1746*p1950+p1747*p1951+p1748*p1952+p1749*p1953+p1750*p1954+p1751*p1955+p1752*p1956+p1753*p1957+p1961*p1962
- p1675: 0.655218
- p3414: 0; = p3376*p1238
- p4922: 0; = p1955*p3482
- p0624: 0; = IF(p0360<0.5;-SQRT(p0007*EXP(p0492^2*p0008)-p0007);SQRT(p0007*EXP(p0492^2*p0008)-p0007))
- p1078: 0.41538; = IF(p1071=0;IF(p1073=1;0;IF(p1073+p1074>1;1-p1073;p1074));0)
- p4177: 2.7524e-7; = p1828*p3479
- p4461: 5.88391e-7; = p1906*p3480
- p2934: 1.23222e-6; = p2348*(p1079+p1081)
- p1805: 0
- p4243: 1.94044e-5; = p1894*p3479
- p1884: 0
- p2855: 0.000331336; = p2269*(p1079+p1081)
- p3176: 0; = p2395*p1023
- p2741: 0; = p2350*(p1128+p1130)
- p0988: 4.12268e6; = p0982*p0886
- p1701: 0
- p0212: 1.02
- p0609: 0; = IF(p0345<0.5;-SQRT(p0007*EXP(p0477^2*p0008)-p0007);SQRT(p0007*EXP(p0477^2*p0008)-p0007))
- p1826: 0
- p0049: 9.538
- p3055: 7.62249e-6; = p2274*p1132
- p0165: 2.004
- p1297: 0
- p2951: 0.00216121; = p2365*(p1020+p1022)
- p3303: 0; = if(and(p1232=0;p3252<>0);p3259*p3289;0)
- p3018: 0; = p2237*p1023
- p4513: 8.52381e-7; = p1962*p3480
- p0932: 0; = p0801*p0926
- p0014: 1405.95
- p2689: 0.00262952; = p2298*(p1078+p1080)
- p1847: 0
- p1037: 0.407994
- p1320: 1.72515; = IF(((p0745*1000*p0747/100)+(p0754*1000*p0756/100))/p0801<0;0;((p0745*1000*p0747/100)+(p0754*1000*p0756/100))/p0801)
- p0769: 47.598; = p0109*(1+p0637*p0241/100)
- p1892: 0
- p2123: 0.263965
- p2007: 0.141093; = ((p1981*p1985+p1987*p1991+p1993*p1997+p2001*p2005)/p0818)*p0005*p0002/1000
- p2430: 0; = p2236*p2220
- p3265: 0
- p1261: 0; = if(p1232>0;0;p0732/100)
- p1611: 0.377871
- p3001: 0; = p2415*(p1079+p1081)
- p0754: 13020.5; = p0094*(1+p0622*p0226/100)
- p2560: 0.000802449; = p2364*p1014
- p1693: 0.384846
- p4370: 1.93739e-7; = p1815*p3480
- p1564: 0.822
- p4926: 0; = p1963*p3482
- p3110: 0; = p2329*p1023
- p1772: 6.17664e-5; = p1364*1000/p0818
- p1237: 0; = if(p1232>0;0;p0729/100)
- p1126: 0; = if(p1121=0;p0720/100;0)
- p3782: 5.59331e-5; = p1845*p3477
- p2111: 0.856281
- p3422: 0; = p3365*p1239
- p3809: 0.000700183; = p1872*p3477
- p1832: 0.000328084; = p1424*1000/p0818
- p1707: 0.356204
- p0541: 0; = IF(p0277<0.5;-SQRT(p0007*EXP(p0409^2*p0008)-p0007);SQRT(p0007*EXP(p0409^2*p0008)-p0007))
- p2181: 1359.91; = p0887+p0889+p0893+p2180
- p2692: 0.00113027; = p2301*(p1078+p1080)
- p4672: 1.70571e-5; = p1911*p3481
- p2666: 0.000209981; = p2275*(p1128+p1130)
- p1339: 0.000757403; = p1338*p0001/(p0818*p0002)
- p0222: 41.354
- p1138: 47654.1; = if(p1121=0;p1132*(p0716/100)*p0703*1000;0)
- p0724: 0
- p1009: 3.16475e-7; = p1005*p0001*p0004/(p0818*p0002)
- p2489: 0.00230472; = p2293*p1014
- p1481: 311
- p2315: 0.00123977; = p2224*p2182
- p0575: 0; = IF(p0311<0.5;-SQRT(p0007*EXP(p0443^2*p0008)-p0007);SQRT(p0007*EXP(p0443^2*p0008)-p0007))
- p3453: 0; = p3377*p1240
- p0485: 0; = SQRT(2)*(IF((2*p0353-1)<0;-1;IF((2*p0353-1)>0;1;0))*SQRT(SQRT((2/(pi()*0.140012289)+LN(1-(2*p0353-1)^2)/2)^2-LN(1-(2*p0353-1)^2)/0.140012289)-(2/(pi()*0.140012289)+LN(1-(2*p0353-1)^2)/2)))
- p1263: 0; = if(p1232>0;0;IF(p1259=1;0;IF(p1259+p1260>1;1-p1259;p1260)))
- p2481: 9.78397e-5; = p2285*p1014
- p0917: 3.53631; = ((p0825+p0827+((p0830+p0895)+p0814*p0818))/p0818)-(p0900+p0905+p0910+p0915)
- p2716: 8.07885e-5; = p2325*(p1019+p1021)
- p1252: 0; = if(p1232>0;0;p0724*2000*p0723*1000*p0725/100)
- p0909: 5.09977e7; = p0825*p0906+p0827*p0907+(p0830+p0895)*p0824*p0908
- p1854: 0
- p0106: 37.332
- p0944: 0; = if(and(p0683=0;p0950=0);p0938;0)
- p2164: 0.00437388; = (p2015/p0818)-(p2022)-(p2035+p2036+p2052)-(p2017/p0818)-(p2039+p2041+p2044+p2158+p2159+p2160+p2161+p2162)
- p2080: 0.025
- p2975: 0.000100952; = p2389*(p1129+p1131)
- p0367: 0.5
- p1017: 0.14253; = IF(p1012=0;p0708/100;0)
- p0980: 0; = IF(p0977=0;0;p0977*p0001/(p0818*p0002))
- p1581: 0
- p2201: 0.00866166; = 12.01*p2200/(2*14.0067)
- p3253: 0; = p1252*(p1277*(1-p3247)+p1280*(1-p3248)+p1281*(1-p3249)+p1282*(1-p3250))
- p3437: 0; = p3380*p1239
- p0479: 0; = SQRT(2)*(IF((2*p0347-1)<0;-1;IF((2*p0347-1)>0;1;0))*SQRT(SQRT((2/(pi()*0.140012289)+LN(1-(2*p0347-1)^2)/2)^2-LN(1-(2*p0347-1)^2)/0.140012289)-(2/(pi()*0.140012289)+LN(1-(2*p0347-1)^2)/2)))
- p0998: 0; = if(p0888=0;0;if((p0699*p0698*1000*p0700/100)/p0888>1;1;(p0699*p0698*1000*p0700/100)/p0888))
- p0533: 0; = SQRT(2)*(IF((2*p0401-1)<0;-1;IF((2*p0401-1)>0;1;0))*SQRT(SQRT((2/(pi()*0.140012289)+LN(1-(2*p0401-1)^2)/2)^2-LN(1-(2*p0401-1)^2)/0.140012289)-(2/(pi()*0.140012289)+LN(1-(2*p0401-1)^2)/2)))
- p2568: 0.0010014; = p2372*p1014
- p1344: 116588; = IF(p1318=0;p1327*p0801;0)
- p2492: 0.00163031; = p2296*p1014
- p3289: 0
- p3089: 3.73659e-5; = p2308*p1082
- p4631: 3.87661e-7; = p1870*p3481
- p0623: 0; = IF(p0359<0.5;-SQRT(p0007*EXP(p0491^2*p0008)-p0007);SQRT(p0007*EXP(p0491^2*p0008)-p0007))
- p1635: 0.921542
- p2566: 2.57623e-5; = p2370*p1014
- p1740: 0
- p3115: 0; = p2334*p1023
- p3078: 9.84111e-5; = p2297*p1082
- p0975: 0.0190122; = p0973*p0974/p0818
- p3076: 0; = p2295*p1023
- p1323: 0.0424925; = IF(((p0745*1000*p0750/100)+(p0754*1000*p0759/100))/p0801<0;0;((p0745*1000*p0750/100)+(p0754*1000*p0759/100))/p0801)
- p0856: 5.532e6; = p0801
- p3036: 0; = p2255*p1023
- p1498: 164
- p0250: 15.236
- p0550: 0; = IF(p0286<0.5;-SQRT(p0007*EXP(p0418^2*p0008)-p0007);SQRT(p0007*EXP(p0418^2*p0008)-p0007))
- p1624: 0.752571
- p1314: 0; = p1310*p1252/p0818
- p1615: 0
- p2983: 0; = p2397*(p1020+p1022)
- p0672: 3361.93; = p0012*(1+p0540*p0144/100)
- p1097: 0.0659222
- p2865: 0.00012342; = p2279*(p1020+p1022)
- p0160: 40.643
- p0946: 0; = if(and(p0683=0;or(p0807=480;p0807=32;p0807=1;and(p0807=60;p0901<0.03)));p0934;0)
- p2157: 5.06451e-7; = p2015*p2086*p2119/(p0818*1000)
- p4878: 0; = p1911*p3482
- p3570: 9.85239e-7; = p1839*p3476
- p2417: 0; = p2235*p2207
- p2187: 0.00108435; = 4*1.00794*p2186/(2*14.0067)
- p0475: 0; = SQRT(2)*(IF((2*p0343-1)<0;-1;IF((2*p0343-1)>0;1;0))*SQRT(SQRT((2/(pi()*0.140012289)+LN(1-(2*p0343-1)^2)/2)^2-LN(1-(2*p0343-1)^2)/0.140012289)-(2/(pi()*0.140012289)+LN(1-(2*p0343-1)^2)/2)))
- p2725: 1.451e-5; = p2334*(p1019+p1021)
- p2518: 2.98055e-5; = p2322*p1014
- p2991: 0; = p2405*(p1020+p1022)
- p1744: 0
- p2651: 0.000763367; = p2260*(p1078+p1080)
- p5084: 9.31933e-6; = p1911*p3483
- p3333: 0; = if(and(p1232=0;p3255<>0);p3255-(p3328+p3329+p3330+p3331+p3332);0)
- p1699: 0.762907
- p2327: 0.000204594; = p2224*p2195
- p2601: 0; = p2405*p1014
- p1748: 0
- p3478: 0.151877; = if(p1328+p1330+p1332+p1334+p1336+p1338+p1340+p1342+p1344=0;0;p1332/(p1328+p1330+p1332+p1334+p1336+p1338+p1340+p1342+p1344))
- p3459: 0; = p3364*p1241
- p1902: 0
- p3267: 0
- p2648: 0.00219422; = p2257*(p1019+p1021)
- p0625: 0; = IF(p0361<0.5;-SQRT(p0007*EXP(p0493^2*p0008)-p0007);SQRT(p0007*EXP(p0493^2*p0008)-p0007))
- p1103: 0.655189; = IF(p1071=0;IF(p1096+p1101+p1102=1;0;IF(p1096+p1101+p1102+p1099>1;1-(p1096+p1101+p1102);p1099));0)
- p3087: 5.27153e-6; = p2306*p1082
- p0542: 0; = IF(p0278<0.5;-SQRT(p0007*EXP(p0410^2*p0008)-p0007);SQRT(p0007*EXP(p0410^2*p0008)-p0007))
- p3619: 1.00635e-5; = p1888*p3476
- p2227: 0.481934; = if(p0774*p0778+p0775*p0779+p0776*p0780+p0777*p0781=0;0;p0779*p0775/(p0774*p0778+p0775*p0779+p0776*p0780+p0777*p0781))
- p0301: 0.5
- p3241: 2.12043e-9; = p3234*p1188*p3236/p0818
- p1011: 0; = p1010*p0001*p0004/(p0818*p0002)
- p2424: 0; = p2235*p2214
- p0383: 0.5
- p1815: 2.16584e-5; = p1407*1000/p0818
- p2520: 8.57938e-6; = p2324*p1014
- p0890: 0; = p0686*1000*p0687*p0885/100
- p0419: 0; = SQRT(2)*(IF((2*p0287-1)<0;-1;IF((2*p0287-1)>0;1;0))*SQRT(SQRT((2/(pi()*0.140012289)+LN(1-(2*p0287-1)^2)/2)^2-LN(1-(2*p0287-1)^2)/0.140012289)-(2/(pi()*0.140012289)+LN(1-(2*p0287-1)^2)/2)))
- p1732: 0
- p0308: 0.5
- p4098: 0.000187252; = p1955*p3478
- p1102: 0.0208246; = IF(p1071=0;IF(p1096+p1101=1;0;IF(p1096+p1101+p1098>1;1-(p1096+p1101);p1098));0)
- p1186: 1.50764e-7; = p1182*p1185/p0818
- p2020: 780419; = p2015*p2018*p2019
- p1118: 0.00459885; = IF(p1071=0;p1108/(p1113*p0818);0)
- p3291: 0
- p2801: 0; = p2410*(p1019+p1021)
- p0531: 0; = SQRT(2)*(IF((2*p0399-1)<0;-1;IF((2*p0399-1)>0;1;0))*SQRT(SQRT((2/(pi()*0.140012289)+LN(1-(2*p0399-1)^2)/2)^2-LN(1-(2*p0399-1)^2)/0.140012289)-(2/(pi()*0.140012289)+LN(1-(2*p0399-1)^2)/2)))
- p2462: 1.38697e-5; = p2266*p1073
- p1879: 4.41189e-6; = p1471*1000/p0818
- p3264: 0
- p0050: 61.59
- p0920: 0; = p0676*1000/p0801
- p3155: 0; = p2374*p1023
- p2175: 0.00120024; = p0895*p0908/p0818
- p2948: 0.000207869; = p2362*(p1020+p1022)
- p2534: 3.52288e-5; = p2338*p1073
- p0393: 0.5
- p2115: 0.856281
- p2870: 0.000205106; = p2284*(p1020+p1022)
- p2851: 0.000867412; = p2265*(p1079+p1081)
- p0008: 0.0739645; = (p0007-1.5)/(p0007-1)^2
- p1258: 0; = if(p1232>0;0;IF(p1253+p1256+p1257=1;0;1-(p1253+p1256+p1257)))
- p1226: 5.532e6; = IF(p1221=0;0;IF(p1193=0;p0801;0))
- p1946: 0
- p3483: 0.0440067; = if(p1328+p1330+p1332+p1334+p1336+p1338+p1340+p1342+p1344=0;0;p1342/(p1328+p1330+p1332+p1334+p1336+p1338+p1340+p1342+p1344))
- p4997: 4.43021e-6; = p1824*p3483
- p2209: 0.00255323; = 14.0067*p2208/30.973762
- p0899: 6.07085e9; = p0825*p0896+p0827*p0897+(p0830+p0895)*p0824*p0898
- p3186: 0; = p2405*p1023
- p1764: 0
- p2702: 0.00214403; = p2311*(p1128+p1130)
- p0645: 0; = IF(p0381<0.5;-SQRT(p0007*EXP(p0513^2*p0008)-p0007);SQRT(p0007*EXP(p0513^2*p0008)-p0007))
- p0613: 0; = IF(p0349<0.5;-SQRT(p0007*EXP(p0481^2*p0008)-p0007);SQRT(p0007*EXP(p0481^2*p0008)-p0007))
- p0878: 1.40595e6; = p0867*p0856
- p3455: 0; = p3379*p1240
- p2027: 0.428799
- p1833: 0
- p2032: 0.448886
- p2488: 2.54198e-5; = p2292*p1014
- p3988: 2.33913e-5; = p1845*p3478
- p4308: 0.000692903; = p1963*p3479
- p2103: 0.912485
- p0663: 0; = IF(p0399<0.5;-SQRT(p0007*EXP(p0531^2*p0008)-p0007);SQRT(p0007*EXP(p0531^2*p0008)-p0007))
- p1641: 0.347885
- p2527: 2.22902e-6; = p2331*p1014
- p0631: 0; = IF(p0367<0.5;-SQRT(p0007*EXP(p0499^2*p0008)-p0007);SQRT(p0007*EXP(p0499^2*p0008)-p0007))
- p0053: 13.907
- p0003: 10000
- p2314: 0.000815641; = p2231*p2221
- p2276: 0.0141384; = p2223*p2182
- p3436: 0; = p3379*p1239
- p1715: 0
- p2536: 4.67617e-5; = p2340*p1073
- p3075: 0; = p2294*p1023
- p1798: 0
- p3185: 0; = p2404*p1023
- p2172: 0.680888; = p2166-(p2167+p2168+p2169+p2170)
- p1836: 0
- p1396: 18
- p2573: 0.000122644; = p2377*p1073
- p2654: 0.000458214; = p2263*(p1078+p1080)
- p1205: 0
- p0719: 14.41; = p0059*(1+p0587*p0191/100)
- p0156: 34.476
- p2343: 0.000277096; = p2228*p2211
- p1705: 0
- p1560: 0
- p3135: 0; = p2354*p1023
- p5278: 5.28493e-7; = p1899*p3484
- p0496: 0; = SQRT(2)*(IF((2*p0364-1)<0;-1;IF((2*p0364-1)>0;1;0))*SQRT(SQRT((2/(pi()*0.140012289)+LN(1-(2*p0364-1)^2)/2)^2-LN(1-(2*p0364-1)^2)/0.140012289)-(2/(pi()*0.140012289)+LN(1-(2*p0364-1)^2)/2)))
- p0299: 0.5
- p0854: 2.77785e6; = p0801*((1-p0853)*p0846+p0853*p0852)
- p3420: 0; = p3363*p1239
- p0105: 46.705
- p0124: 18.304
- p0759: 0
- p0876: 273066; = p0866*p0856
- p3210: 0; = p2429*p1132
- p0444: 0; = SQRT(2)*(IF((2*p0312-1)<0;-1;IF((2*p0312-1)>0;1;0))*SQRT(SQRT((2/(pi()*0.140012289)+LN(1-(2*p0312-1)^2)/2)^2-LN(1-(2*p0312-1)^2)/0.140012289)-(2/(pi()*0.140012289)+LN(1-(2*p0312-1)^2)/2)))
- p3412: 0; = p3374*p1238
- p3381: 0; = p3362*p1234
- p0431: 0; = SQRT(2)*(IF((2*p0299-1)<0;-1;IF((2*p0299-1)>0;1;0))*SQRT(SQRT((2/(pi()*0.140012289)+LN(1-(2*p0299-1)^2)/2)^2-LN(1-(2*p0299-1)^2)/0.140012289)-(2/(pi()*0.140012289)+LN(1-(2*p0299-1)^2)/2)))
- p2016: 0.00194129; = (p2014-p2015)/(p0818)
- p0241: 18.199
- p3000: 0; = p2414*(p1079+p1081)
- p0768: 38.324; = p0108*(1+p0636*p0240/100)
- p5273: 5.01801e-7; = p1894*p3484
- p1816: 0
- p3053: 7.46061e-5; = p2272*p1132
- p0986: 0; = IF(p0982+p0985=1;0;IF(p0982+p0985+p0984>1;1-(p0982+p0985);p0984))
- p3107: 0; = p2326*p1023
- p1282: 0; = IF(p1277+p1280+p1281=p1260;0;p1260-(p1277+p1280+p1281))
- p3879: 1.9227e-5; = p1942*p3477
- p0770: 51.483; = p0110*(1+p0638*p0242/100)
- p3146: 0; = p2365*p1023
- p0516: 0; = SQRT(2)*(IF((2*p0384-1)<0;-1;IF((2*p0384-1)>0;1;0))*SQRT(SQRT((2/(pi()*0.140012289)+LN(1-(2*p0384-1)^2)/2)^2-LN(1-(2*p0384-1)^2)/0.140012289)-(2/(pi()*0.140012289)+LN(1-(2*p0384-1)^2)/2)))
- p0273: 0.5
- p0742: 95.695; = p0082*(1+p0610*p0214/100)
- p4015: 0.000292818; = p1872*p3478
- p1752: 0
- p2681: 8.19653e-6; = p2290*(p1019+p1021)
- p3166: 1.37291e-6; = p2385*p1082
- p0102: 5.664
- p0139: 16.01
- p1981: 400
- p2199: 0.000222832; = p1069-p2197-p2198
- p1554: 0
- p0978: 0
- p2095: 0.765734
- p2552: 6.88845e-5; = p2356*p1014
- p2467: 0.000771283; = p2271*p1073
- p1107: 3.64339e6; = IF(p1071=0;p1105*p1101*p1095;0)
- p1197: 1.806
- p2060: 0.272353
- p0851: 0
- p4194: 2.64231e-5; = p1845*p3479
- p0115: 38.731
- p1300: 0; = IF(p1297=p1265;0;IF(p1297+p1298>p1265;p1265-p1297;p1298))
- p2108: 0.826583
- p0561: 0; = IF(p0297<0.5;-SQRT(p0007*EXP(p0429^2*p0008)-p0007);SQRT(p0007*EXP(p0429^2*p0008)-p0007))
- p0691: 7.138; = p0031*(1+p0559*p0163/100)
- p4478: 5.38163e-8; = p1923*p3480
- p0608: 0; = IF(p0344<0.5;-SQRT(p0007*EXP(p0476^2*p0008)-p0007);SQRT(p0007*EXP(p0476^2*p0008)-p0007))
- p1951: 0.000207359; = p1543*1000/p0818
- p1364: 154
- p1335: 0.00161328; = p1334*p0001/(p0818*p0002)
- p3279: 0
- p1489: 205
- p4567: 6.46101e-7; = p1806*p3481
- p2081: 0.0019
- p1761: 0
- p5321: 2.34886e-7; = p1942*p3484
- p1604: 0
- p5174: 3.38093e-8; = p1795*p3484
- p1773: 0
- p1168: 8.23845e-6; = p1164*p1167/p0818
- p1596: 0
- p1552: 0
- p1756: 0
- p0249: 80.849
- p1602: 0.730108
- p1777: 0
- p2030: 8.87
- p2586: 0.000355172; = p2390*p1123
- p2875: 0.00451866; = p2289*(p1020+p1022)
- p0107: 20.463
- p0159: 7.492
- p1671: 0
- p4716: 9.93058e-5; = p1955*p3481
- p0088: 16.905
- p2904: 1.08225e-5; = p2318*(p1020+p1022)
- p0084: 60.996
- p1967: 3.924e6; = if(p0807=480;p0802*p0810;0)
- p0097: 13.439
- p4856: 0; = p1889*p3482
- p3367: 0; = if(p1232=0;p3244*p3361/p0818;0)
- p2013: 0.65
- p2414: 0; = p2235*p2204
- p2502: 0.000161779; = p2306*p1073
- p0736: 0
- p1889: 0.000124736; = p1481*1000/p0818
- p1332: 3.99112e6; = p1321*p0801
- p0967: 5.16118e6; = (p0684/100)*p0683*p0682*1000
- p1100: 0.254708
- p2908: 1.57128e-5; = p2322*(p1020+p1022)
- p4616: 9.94996e-6; = p1855*p3481
- p0862: 0.254149; = p0674*1000/p0856
- p2767: 0.000364594; = p2376*(p1078+p1080)
- p0512: 0; = SQRT(2)*(IF((2*p0380-1)<0;-1;IF((2*p0380-1)>0;1;0))*SQRT(SQRT((2/(pi()*0.140012289)+LN(1-(2*p0380-1)^2)/2)^2-LN(1-(2*p0380-1)^2)/0.140012289)-(2/(pi()*0.140012289)+LN(1-(2*p0380-1)^2)/2)))
- p0021: 5504.24
- p2859: 0.000514607; = p2273*(p1129+p1131)
- p0211: 7.064
- p1032: 0.000161731; = IF(p1012=0;p1026*p0001/(p0818*p0002);0)
- p2364: 0.00215921; = p2225*p2192
- p1791: 0
- p0100: 8.444
- p1002: 185871; = p0996*p0888
- p1294: 0; = p1290*p1252/p0818
- p3503: 1.08376e-5; = p1772*p3476
- p2565: 1.17176e-5; = p2369*p1014
- p1420: 4
- p2701: 0.000828215; = p2310*(p1078+p1080)
- p1098: 0.0208246
- p2299: 0.00204994; = p2227*p2206
- p2258: 0.00627487; = p2226*p2204
- p3426: 0; = p3369*p1239
- p1695: 0.8025
- p2542: 1.21026e-5; = p2346*p1073
- p2623: 0; = p2427*p1073
- p1963j: 0.00016148; = p1725*p1929+p1726*p1930+p1727*p1931+p1728*p1932+p1729*p1933+p1730*p1934+p1731*p1935+p1732*p1936+p1733*p1937+p1734*p1938+p1735*p1939+p1736*p1940+p1737*p1941+p1738*p1942+p1739*p1943+p1740*p1944+p1741*p1945+p1742*p1946+p1743*p1947
- p3834: 2.98601e-5; = p1897*p3477
- p2637: 0.000131682; = p2246*(p1019+p1021)
- p2407: 0; = p2234*p2197
- p0570: 0; = IF(p0306<0.5;-SQRT(p0007*EXP(p0438^2*p0008)-p0007);SQRT(p0007*EXP(p0438^2*p0008)-p0007))
- p0313: 0.5
- p2332: 0.000543797; = p2224*p2200
- p0612: 0; = IF(p0348<0.5;-SQRT(p0007*EXP(p0480^2*p0008)-p0007);SQRT(p0007*EXP(p0480^2*p0008)-p0007))
- p0243: 38.633
- p2480: 0.000389065; = p2284*p1014
- p1092: 0; = IF(p1071=0;p1086*p0001/(p0818*p0002);0)
- p1875: 0
- p0350: 0.5
- p0004: 0.0254
- p2712: 0.000161462; = p2321*(p1019+p1021)
- p2996: 0; = p2410*(p1020+p1022)
- p3661: 3.39204e-5; = p1930*p3476
- p2730: 0.000281581; = p2339*(p1078+p1080)
- p1112: 0.209482
- p2564: 7.13902e-6; = p2368*p1014
- p0535: 0; = SQRT(2)*(IF((2*p0403-1)<0;-1;IF((2*p0403-1)>0;1;0))*SQRT(SQRT((2/(pi()*0.140012289)+LN(1-(2*p0403-1)^2)/2)^2-LN(1-(2*p0403-1)^2)/0.140012289)-(2/(pi()*0.140012289)+LN(1-(2*p0403-1)^2)/2)))
- p1095: 1.26639e8; = IF(p1071=0;p0797*p0702*1000*p0798/100;0)
- p1571: 0
- p0057: 35.976
- p3425: 0; = p3368*p1239
- p2485: 0.00857143; = p2289*p1014
- p0162: 19.658
- p2936: 0; = p2350*(p1129+p1131)
- p0741: 1.382; = p0081*(1+p0609*p0213/100)
- p3249: 0
- p3427: 0; = p3370*p1239
- p5028: 5.43627e-6; = p1855*p3483
- p0844: 0.359892
- p2096: 0.486404
- p2394: 0; = p2234*p2183
- p0446: 0; = SQRT(2)*(IF((2*p0314-1)<0;-1;IF((2*p0314-1)>0;1;0))*SQRT(SQRT((2/(pi()*0.140012289)+LN(1-(2*p0314-1)^2)/2)^2-LN(1-(2*p0314-1)^2)/0.140012289)-(2/(pi()*0.140012289)+LN(1-(2*p0314-1)^2)/2)))
- p2226: 0.432049; = if(p0774*p0778+p0775*p0779+p0776*p0780+p0777*p0781=0;0;p0778*p0774/(p0774*p0778+p0775*p0779+p0776*p0780+p0777*p0781))
- p4304: 0.000211522; = p1955*p3479
- p0417: 0; = SQRT(2)*(IF((2*p0285-1)<0;-1;IF((2*p0285-1)>0;1;0))*SQRT(SQRT((2/(pi()*0.140012289)+LN(1-(2*p0285-1)^2)/2)^2-LN(1-(2*p0285-1)^2)/0.140012289)-(2/(pi()*0.140012289)+LN(1-(2*p0285-1)^2)/2)))
- p0364: 0.5
- p2200: 0.0202034; = p1056/p0818
- p2029: 6.19
- p1850: 0
- p3315: 0; = if(and(p1232=0;p3253<>0);p3264*p3289;0)
- p2491: 0.000142208; = p2295*p1014
- p2733: 8.78937e-6; = p2342*(p1078+p1080)
- p4117: 1.89228e-5; = p1768*p3479
- p3207: 0; = p2426*p1082
- p2463: 0.000145033; = p2267*p1073
- p1862: 0
- p2409: 0; = p2234*p2199
- p0843: 0.606692
- p1620: 0.633063
- p1253: 0; = if(p1232>0;0;p0735/100)
- p1923: 6.01621e-6; = p1515*1000/p0818
- p1127: 0; = if(p1121=0;p0721/100;0)
- p1996: 30
- p3477: 0.363166; = if(p1328+p1330+p1332+p1334+p1336+p1338+p1340+p1342+p1344=0;0;p1330/(p1328+p1330+p1332+p1334+p1336+p1338+p1340+p1342+p1344))
- p3256: 0; = p1252*(p1307*(1-p3247)+p1310*(1-p3248)+p1311*(1-p3249)+p1312*(1-p3250))
- p3450: 0; = p3374*p1240
- p1055: 153957; = IF(p1012=0;p1048*p1036;0)
- p3259: 0
- p0022: 5504.24
- p0166: 19.612
- p2828: 7.54273e-5; = p2242*(p1020+p1022)
- p2871: 5.15788e-5; = p2285*(p1020+p1022)
- p2114: 0.832356
- p0626: 0; = IF(p0362<0.5;-SQRT(p0007*EXP(p0494^2*p0008)-p0007);SQRT(p0007*EXP(p0494^2*p0008)-p0007))
- p3254: 0; = p1252*(p1287*(1-p3247)+p1290*(1-p3248)+p1291*(1-p3249)+p1292*(1-p3250))
- p2411: 0; = p2234*p2201
- p3474: 0; = p3379*p1241
- p0701: 0
- p3395: 0; = p3376*p1234
- p2615: 0; = p2419*p1073
- p3406: 0; = p3368*p1238
- p0799: 16.01; = p0139*(1+p0667*p0271/100)
- p4864: 0; = p1897*p3482
- p2736: 6.20271e-6; = p2345*(p1078+p1080)
- p2393: 0; = p2234*p2182
- p0098: 1.024
- p2046: 10
- p2129: 1.48823e-5; = p2015*p2057*p2091/(p0818*1000)
- p4791: 0; = p1824*p3482
- p3163: 1.35633e-5; = p2382*p1082
- p0897: 0.49875
- p2882: 0.000859459; = p2296*(p1020+p1022)
- p1910: 0
- p3320: 0; = if(and(p1232=0;p3253<>0);p3253*(p3264-p3315)/p3316;0)
- p1093: 0; = IF(p1071=0;p1087*p0001/(p0818*p0002);0)
- p1930: 0.000193321; = p1522*1000/p0818
- p1165: 0.00197955; = p0801*p0001/(p0818*p0002)
- p3209: 0; = p2428*p1132
- p1135: 233253; = if(p1121=0;p1129*(p0716/100)*p0703*1000;0)
- p1178: 2.93844e-7; = p1176/p0818
- p3049: 8.87678e-6; = p2268*p1082
- p3350: 0; = if(and(p1232=0;p3256<>0);p3256*(p3273*p3277-p3345)/p3349;0)
- p2662: 0.000742487; = p2271*(p1078+p1080)
- p2156: 2.74931e-7; = p2015*p2085*p2118/(p0818*1000)
- p2943: 0.000125083; = p2357*(p1020+p1022)
- p0007: 14; = p0006-1
- p1794: 0
- p2970: 7.22967e-6; = p2384*(p1079+p1081)
- p3213: 0.112803; = p1222*12.0107/100.0869
- p1006: 1.68939e-6; = p1002*p0001*p0004/(p0818*p0002)
- p0255: 19.566
- p0013: 273.066
- p0085: 13258.2
- p0237: 17.9
- p0987: 0; = if(p0978>0;0;if(and(p0687=0;p0691=0;p0695=0;p0699=0);0;IF(p0982+p0985+p0986=1;0;1-(p0982+p0985+p0986))))
- p0167: 8.113
- p0447: 0; = SQRT(2)*(IF((2*p0315-1)<0;-1;IF((2*p0315-1)>0;1;0))*SQRT(SQRT((2/(pi()*0.140012289)+LN(1-(2*p0315-1)^2)/2)^2-LN(1-(2*p0315-1)^2)/0.140012289)-(2/(pi()*0.140012289)+LN(1-(2*p0315-1)^2)/2)))
- p0984: 0; = if(p0886=0;0;min(1;(p0699*p0698*1000*p0701/100)/p0886))
- p2757: 0.00102256; = p2366*(p1019+p1021)
- p2124: 0.263965
- p2688: 0.0029074; = p2297*(p1078+p1080)
- p1561: 0
- p4703: 4.26427e-6; = p1942*p3481
- p2893: 9.79395e-5; = p2307*(p1079+p1081)
- p2355: 0.00314536; = p2225*p2183
- p3182: 0; = p2401*p1023
- p0191: 40.446
- p2433: 0.00607755; = p2237*p1014
- p2410: 0; = p2234*p2200
- p2135: 9.73134e-6; = p2015*p2063*p2097/(p0818*1000)
- p2190: 0.00341057; = 32.065*p2189/(2*14.0067)
- p2366: 0.00236464; = p2225*p2195
- p3090: 3.12792e-6; = p2309*p1082
- p3792: 4.4863e-5; = p1855*p3477
- p2977: 1.03142e-5; = p2391*(p1129+p1131)
- p1034: 0.000153431; = IF(p1012=0;p1028*p0001/(p0818*p0002);0)
- p5185: 3.55887e-8; = p1806*p3484
- p3203: 0; = p2422*p1082
- p3434: 0; = p3377*p1239
- p2179: 0.0380245; = p0970+p0971+p0972
- p2342: 2.11598e-5; = p2228*p2210
- p0270: 6.775
- p0995: 0; = p0991*p0001*p0004/(p0818*p0002)
- p1269: 0
- p2784: 0; = p2393*(p1019+p1021)
- p0812: 0.279412; = if(p0807=480;0.095/0.34;0)
- p3407: 0; = p3369*p1238
- p4837: 0; = p1870*p3482
- p3344: 0; = if(and(p1232=0;p3254<>0);p3254-(p3339+p3340+p3341+p3342+p3343);0)
- p1963d: 0.000110396; = p1608*p1812+p1609*p1813+p1610*p1814+p1611*p1815+p1612*p1816+p1613*p1817+p1614*p1818+p1615*p1819+p1616*p1820+p1617*p1821+p1618*p1822+p1619*p1823+p1620*p1824+p1621*p1825+p1622*p1826+p1623*p1827+p1624*p1828+p1625*p1829+p1626*p1830+p1627*p1831
- p4995: 1.94153e-7; = p1822*p3483
- p3214: 0.376406; = p1222*40.078/100.0869
- p1612: 0
- p3537: 1.40748e-6; = p1806*p3476
- p0658: 0; = IF(p0394<0.5;-SQRT(p0007*EXP(p0526^2*p0008)-p0007);SQRT(p0007*EXP(p0526^2*p0008)-p0007))
- p3776: 2.03923e-6; = p1839*p3477
- p1881: 0
- p3454: 0; = p3378*p1240
- p1600: 0.895638
- p0400: 0.5
- p2251: 2.19236e-5; = p2222*p2197
- p0824: 0.8615
- p0418: 0; = SQRT(2)*(IF((2*p0286-1)<0;-1;IF((2*p0286-1)>0;1;0))*SQRT(SQRT((2/(pi()*0.140012289)+LN(1-(2*p0286-1)^2)/2)^2-LN(1-(2*p0286-1)^2)/0.140012289)-(2/(pi()*0.140012289)+LN(1-(2*p0286-1)^2)/2)))
- p0776: 22.178; = p0116*(1+p0644*p0248/100)
- p0214: 1.277
- p0935: 0; = p0929*p0001/(p0818*p0002)
- p0640: 0; = IF(p0376<0.5;-SQRT(p0007*EXP(p0508^2*p0008)-p0007);SQRT(p0007*EXP(p0508^2*p0008)-p0007))
- p0480: 0; = SQRT(2)*(IF((2*p0348-1)<0;-1;IF((2*p0348-1)>0;1;0))*SQRT(SQRT((2/(pi()*0.140012289)+LN(1-(2*p0348-1)^2)/2)^2-LN(1-(2*p0348-1)^2)/0.140012289)-(2/(pi()*0.140012289)+LN(1-(2*p0348-1)^2)/2)))
- p5207: 7.11775e-9; = p1828*p3484
- p1154: 0.0188611; = if(p1152*p0818=0;0;p1150/(p1152*p0818))
- p2412: 0; = p2234*p2202
- p3375: 0; = if(p1232=0;p3246*p3357/p0818;0)
- p1609: 0
- p0586: 0; = IF(p0322<0.5;-SQRT(p0007*EXP(p0454^2*p0008)-p0007);SQRT(p0007*EXP(p0454^2*p0008)-p0007))
- p4533: 4.97498e-6; = p1772*p3481
- p1989: 50
- p0344: 0.5
- p5201: 1.95738e-8; = p1822*p3484
- p0993: 9.65136e-5; = p0989*p0001*p0004/(p0818*p0002)
- p4037: 1.7178e-5; = p1894*p3478
- p1877: 0
- p1327a: 0.0210752; = (p0745*1000/p0801)*(1-(p0746+p0747+p0748+p0749+p0750+p0751+p0752+p0753)/100)+(p0754*1000/p0801)*(1-(p0755+p0756+p0757+p0758+p0759+p0760+p0761+p0762)/100)
- p0753: 3.16; = p0093*(1+p0621*p0225/100)
- p2126: 8.77842e-6; = p2015*p2054*p2088/(p0818*1000)
- p0081: 1.382
- p3388: 0; = p3369*p1234
- p2773: 0.000400705; = p2382*(p1078+p1080)
- p2858: 0.000365174; = p2272*(p1129+p1131)
- p3452: 0; = p3376*p1240
- p2650: 0.00235734; = p2259*(p1078+p1080)
- p4977: 3.17704e-7; = p1804*p3483
- p1086: 0; = IF(p1071=0;p1080*(p0710/100)*p0703*1000;0)
- p1929: 0
- p1333: 0.00142817; = p1332*p0001/(p0818*p0002)
- p2572: 0.000378735; = p2376*p1073
- p1963i: 7.81866e-5; = p1706*p1910+p1707*p1911+p1708*p1912+p1709*p1913+p1710*p1914+p1711*p1915+p1712*p1916+p1713*p1917+p1714*p1918+p1715*p1919+p1716*p1920+p1717*p1921+p1718*p1922+p1719*p1923+p1720*p1924+p1721*p1925+p1722*p1926+p1723*p1927+p1724*p1928
- p2174: 0.00954737; = p0895*p0903/p0818
- p2814: 0; = p2423*(p1078+p1080)
- p2990: 0; = p2404*(p1020+p1022)
- p0820: 0.600863; = if(p0807=480;p0814;0)
- p0369: 0.5
- p2468: 0.000911694; = p2272*p1123
- p2852: 4.47023e-6; = p2266*(p1079+p1081)
- p2331: 5.99778e-6; = p2224*p2199
- p3196: 0; = p2415*p1082
- p5206: 1.83282e-7; = p1827*p3484
- p2831: 0.000237238; = p2245*(p1020+p1022)
- p2737: 1.16508e-5; = p2346*(p1078+p1080)
- p2421: 0; = p2235*p2211
- p2643: 1.55609e-5; = p2252*(p1019+p1021)
- p2234: 0; = 1-(p2222+p2223+p2224+p2225)
- p3553: 7.74116e-7; = p1822*p3476
- p2821: 0; = p2430*(p1128+p1130)
- p2353: 0; = p2232*p2221
- p2078: 0.117
- p0121: 17.821
- p2738: 4.39663e-5; = p2347*(p1078+p1080)
- p2372: 0.00269454; = p2225*p2201
- p3342: 0; = if(and(p1232=0;p3254<>0);p3254*(p3272-p3337)/p3338;0)
- p0181: 40.428
- p0402: 0.5
- p2161: 1.06873e-7; = p2015*p2085*p2123/(p0818*1000)
- p1137: 0; = if(p1121=0;p1131*(p0716/100)*p0703*1000;0)
- p5132: 0.000177734; = p1963*p3483
- p0921: 0; = p0679*1000/p0801
- p1801: 0
- p1087: 0; = IF(p1071=0;p1081*(p0710/100)*p0703*1000;0)
- p2244: 0.00105789; = p2222*p2189
- p1162: 0.00221878; = p1161/p0818
- p3761: 3.65604e-5; = p1824*p3477
- p1718: 0
- p3257: 0
- p2765: 0.00192258; = p2374*(p1019+p1021)
- p2798: 0; = p2407*(p1019+p1021)
- p3141: 0; = p2360*p1023
- p1594: 0
- p3162: 1.03573e-6; = p2381*p1082
- p2047: 3.62258e-13; = p2015*p2045/(p0818*1000000000000)
- p2769: 0.000980285; = p2378*(p1078+p1080)
- p0940: 0; = if(and(p0683=0;p0946=0);p0934;0)
- p2501: 1.54711e-5; = p2305*p1073
- p3947: 1.09647e-6; = p1804*p3478
- p3362: 0; = if(p1232=0;p3244*p3356/p0818;0)
- p3226: 0.00146761; = p3222*p1229
- p1031: 0.000466357; = IF(p1012=0;p1025*p0001/(p0818*p0002);0)
- p3555: 1.76639e-5; = p1824*p3476
- p0936: 0; = p0930*p0001/(p0818*p0002)
- p1207: 123.54; = if(p1193>0;0;(p1194*p1050/p1057+p1195*p1051/p1058+p1196*p1052/p1059+p1197*p1053/p1060+p1198*p1054/p1061+p1199*p1055/p1062+p1200*p1056/p1063)/(p0702*1000)+(p1201*p1109/p1114+p1202*p1110/p1115)/(p0702*1000)+p1203*p1170/p0801+p1204*p1176/p0801)
- p1321: 0.721461; = IF(((p0745*1000*p0748/100)+(p0754*1000*p0757/100))/p0801<0;0;((p0745*1000*p0748/100)+(p0754*1000*p0757/100))/p0801)
- p4434: 3.94653e-8; = p1879*p3480
- p0630: 0; = IF(p0366<0.5;-SQRT(p0007*EXP(p0498^2*p0008)-p0007);SQRT(p0007*EXP(p0498^2*p0008)-p0007))
- p0035: 9.036
- p4576: 1.74447e-6; = p1815*p3481
- p2313: 0.000469369; = p2231*p2220
- p4868: 0; = p1901*p3482
- p0579: 0; = IF(p0315<0.5;-SQRT(p0007*EXP(p0447^2*p0008)-p0007);SQRT(p0007*EXP(p0447^2*p0008)-p0007))
- p3331: 0; = if(and(p1232=0;p3255<>0);p3255*(p3268-p3326)/p3327;0)
- p4529: 8.88389e-6; = p1768*p3481
- p0611: 0; = IF(p0347<0.5;-SQRT(p0007*EXP(p0479^2*p0008)-p0007);SQRT(p0007*EXP(p0479^2*p0008)-p0007))
- p2059: 1.00168
- p2588: 4.47477e-5; = p2392*p1123
- p4204: 2.11935e-5; = p1855*p3479
- p3831: 4.10759e-5; = p1894*p3477
- p2626: 0; = p2430*p1123
- p3457: 0; = p3362*p1241
- p2432: 0.0901903; = p1158
- p2704: 0.000219055; = p2313*(p1128+p1130)
- p2581: 4.21336e-5; = p2385*p1073
- p0903: 0.0175
- p0956: 0; = if(and(p0683>0;or(p0807=56;p0807=100;and(p0807=60;p0901>0.06)));p0938;0)
- p3432: 0; = p3375*p1239
- p1232: 71445; = (p0725/100)*p0723*1000
- p2404: 0; = p2234*p2193
- p0674: 1405.95; = p0014*(1+p0542*p0146/100)
- p1646: 0
- p3468: 0; = p3373*p1241
- p3752: 7.86559e-6; = p1815*p3477
- p3308: 0; = if(and(p1232=0;p3252<>0);p3252*(p3259-p3303)/p3305;0)
- p2735: 5.93173e-7; = p2344*(p1078+p1080)
- p2532: 0.000120286; = p2336*p1073
- p0001: 0.404686
- p2336: 0.000278768; = p2228*p2204
- p2212: 7.43984e-5; = p1106/p0818
- p4042: 1.80917e-5; = p1899*p3478
- p2506: 0.000860336; = p2310*p1073
- p0877: 0.97713; = p0876*p0001*p0003/(p0818*p0002)
- p0887: 1339.85; = 1000*p0886*p0001*p0003*p0004/(p0818*p0002)
- p3896: 0.00146676; = p1963*p3477
- p2052: 1.48735e-5; = p2015*p2049*(1-p2050)/(p0818*1000)
- p1133: 582339; = if(p1121=0;p1123*(p0716/100)*p0703*1000;0)
- p1971: 0; = p1966*p0001/(p0818*p0002)
- p1924: 0
- p3300: 0; = if(p1293+p1294+p1295+p1296=0;0;p1293/(p1293+p1294+p1295+p1296))
- p3334: 0; = IF(or(p3254=0;p1232>0);0;p3269*p3277*(p3300*p3292+(1-p3300)*p3296))
- p1419: 103
- p0449: 0; = SQRT(2)*(IF((2*p0317-1)<0;-1;IF((2*p0317-1)>0;1;0))*SQRT(SQRT((2/(pi()*0.140012289)+LN(1-(2*p0317-1)^2)/2)^2-LN(1-(2*p0317-1)^2)/0.140012289)-(2/(pi()*0.140012289)+LN(1-(2*p0317-1)^2)/2)))
- p1341: 0; = p1340*p0001/(p0818*p0002)
- p3465: 0; = p3370*p1241
- p3384: 0; = p3365*p1234
- p1230: 0.5
- p0128: 50.441
- p0320: 0.5
- p2962: 0.000122067; = p2376*(p1079+p1081)
- p0080: 96.336
- p3245: 0; = IF(p3244=1;0;if(p3244+p0792/100>1;1-p3244;p0792/100))
- p0680: 0
- p0217: 8.911
- p0678: 0
- p2213: 0.000777971; = p1116-p2212
- p0618: 0; = IF(p0354<0.5;-SQRT(p0007*EXP(p0486^2*p0008)-p0007);SQRT(p0007*EXP(p0486^2*p0008)-p0007))
- p3393: 0; = p3374*p1234
- p1464: 4807
- p2709: 2.38876e-5; = p2318*(p1019+p1021)
- p3499: 1.93529e-5; = p1768*p3476
- p0375: 0.5
- p0197: 43.33
- p1559: 0
- p5267: 2.54459e-7; = p1888*p3484
- p3040: 7.97924e-5; = p2259*p1082
- p3247: 0
- p0089: 32.999
- p1145: 2.59152e7; = if(p1121=0;p0799*p0702*1000*p0800/100;0)
- p2328: 0.00202242; = p2224*p2196
- p3010: 0; = p2424*(p1079+p1081)
- p2036: 5.90284e-5; = p2015*p2030*(1-p2032)/(p0818*1000)
- p3370: 0; = if(p1232=0;p3245*p3358/p0818;0)
- p0034: 1179.07
- p2840: 0.00140534; = p2254*(p1020+p1022)
- p0504: 0; = SQRT(2)*(IF((2*p0372-1)<0;-1;IF((2*p0372-1)>0;1;0))*SQRT(SQRT((2/(pi()*0.140012289)+LN(1-(2*p0372-1)^2)/2)^2-LN(1-(2*p0372-1)^2)/0.140012289)-(2/(pi()*0.140012289)+LN(1-(2*p0372-1)^2)/2)))
- p0347: 0.5
- p2283: 0.000914606; = p2223*p2189
- p2438: 0.000143078; = p2242*p1014
- p1652: 0
- p0788: 50.441; = p0128*(1+p0656*p0260/100)
- p1201: 0.65
- p1903: 0.000323271; = p1495*1000/p0818
- p0783: 13.129; = p0123*(1+p0651*p0255/100)
- p0137: 37.356
- p2627: 0; = p2431*p1123
- p0777: 14.007; = p0117*(1+p0645*p0249/100)
- p3120: 9.5311e-6; = p2339*p1082
- p2837: 4.29527e-6; = p2251*(p1020+p1022)
- p0321: 0.5
- p2307: 0.000704246; = p2227*p2214
- p0291: 0.5
- p0387: 0.5
- p1845: 0.000154015; = p1437*1000/p0818
- p2938: 0; = p2352*(p1129+p1131)
- p0154: 0
- p2994: 0; = p2408*(p1020+p1022)
- p2659: 0.00026225; = p2268*(p1078+p1080)
- p1416: 251
- p2321: 0.000373374; = p2224*p2188
- p2794: 0; = p2403*(p1019+p1021)
- p2254: 0.00717304; = p2222*p2200
- p2669: 7.90885e-5; = p2278*(p1019+p1021)
- p1598: 0
- p2883: 0.000973402; = p2297*(p1079+p1081)
- p3892: 0.000447756; = p1955*p3477
- p1277: 0
- p3328: 0; = if(and(p1232=0;p3255<>0);p3255*(p3265*p3277-p3323)/p3327;0)
- p1613: 0
- p3369: 0; = if(p1232=0;p3245*p3357/p0818;0)
- p3149: 0; = p2368*p1023
- p0026: 1782.68
- p2304: 0.00695738; = p2227*p2211
- p1045: 0.0667372; = IF(p1012=0;IF(p1037+p1044=1;0;IF(p1037+p1044+p1039>1;1-(p1037+p1044);p1039));0)
- p0155: 2.407
- p5005: 1.44379e-5; = p1832*p3483
- p2632: 0.00115677; = p2241*(p1019+p1021)
- p0740: 96.336; = p0080*(1+p0608*p0212/100)
- p1834: 0
- p0343: 0.5
- p2866: 0.000453098; = p2280*(p1020+p1022)
- p1246: 0; = if(p1232>0;0;p1241*(p0725/100)*p0723*1000)
- p2519: 3.41163e-5; = p2323*p1014
- p3063: 0; = p2282*p1023
- p1208: 0; = p1205*p0818*p0822/p0801
- p1130: 0; = if(p1121=0;IF(p1123+p1128+p1129=1;0;IF(p1123+p1128+p1129+p1126>1;1-(p1123+p1128+p1129);p1126));0)
- p1963a: 0.000155675; = p1550*p1754+p1551*p1755+p1552*p1756+p1553*p1757+p1554*p1758+p1555*p1759+p1556*p1760+p1557*p1761+p1558*p1762+p1559*p1763+p1560*p1764+p1561*p1765+p1562*p1766+p1563*p1767+p1564*p1768+p1565*p1769+p1566*p1770+p1567*p1771+p1568*p1772
- p0390: 0.5
- p2997: 0; = p2411*(p1020+p1022)
- p2879: 0.001215; = p2293*(p1020+p1022)
- p2009: 0.0345464; = ((p1983*p1985+p1989*p1991+p1995*p1997+p2003*p2005+p1976*p1977+p1978*p1979+p1998*p1999)/p0818)*p0005*p0002/1000
- p0087: 10.87
- p0959: 0; = if(and(p0683>0;or(p0807=480;p0807=32;p0807=1;and(p0807=60;p0901<0.03)));p0935;0)
- p4238: 2.13999e-5; = p1889*p3479
- p0656: 0; = IF(p0392<0.5;-SQRT(p0007*EXP(p0524^2*p0008)-p0007);SQRT(p0007*EXP(p0524^2*p0008)-p0007))
- p1334: 4.50842e6; = p1322*p0801
- p1299: 0
- p2638: 0.00106565; = p2247*(p1019+p1021)
- p1790: 0
- p2752: 0.00040084; = p2361*(p1019+p1021)
- p3330: 0; = if(and(p1232=0;p3255<>0);p3255*(p3267-p3325)/p3327;0)
- p2848: 0.000339246; = p2262*(p1079+p1081)
- p1010: 0; = p0890
- p0943: 0; = if(and(p0683=0;p0949=0);p0937;0)
- p0536: 0; = SQRT(2)*(IF((2*p0404-1)<0;-1;IF((2*p0404-1)>0;1;0))*SQRT(SQRT((2/(pi()*0.140012289)+LN(1-(2*p0404-1)^2)/2)^2-LN(1-(2*p0404-1)^2)/0.140012289)-(2/(pi()*0.140012289)+LN(1-(2*p0404-1)^2)/2)))
- p1655: 0
- p2514: 2.05291e-5; = p2318*p1014
- p1266: 0; = if(p1232>0;0;IF(p1259+p1263+p1264+p1265=1;0;1-(p1259+p1263+p1264+p1265)))
- p2647: 0.000191397; = p2256*(p1019+p1021)
- p3011: 0; = p2425*(p1079+p1081)
- p1820: 0
- p2856: 2.77363e-5; = p2270*(p1079+p1081)
- p2522: 0.000354706; = p2326*p1014
- p2683: 2.95785e-5; = p2292*(p1019+p1021)
- p2658: 0.000139618; = p2267*(p1078+p1080)
- p1256: 0; = if(p1232>0;0;IF(p1253=1;0;IF(p1253+p1254>1;1-p1253;p1254)))
- p0982: 0.279667; = if(p0886=0;0;min(1;(p0691*p0690*1000*p0693/100)/p0886))
- p0584: 0; = IF(p0320<0.5;-SQRT(p0007*EXP(p0452^2*p0008)-p0007);SQRT(p0007*EXP(p0452^2*p0008)-p0007))
- p1725: 0
- p0382: 0.5
- p4317: 3.30073e-7; = p1762*p3480
- p2556: 0.00160375; = p2360*p1014
- p2454: 0.00270754; = p2258*p1073
- p3023: 0; = p2242*p1023
- p1028: 428773; = IF(p1012=0;p1022*(p0704/100)*p0703*1000;0)
- p3346: 0; = if(and(p1232=0;p3256<>0);p3274*(p3281*(p3285*p1256+p3286*(p1253+p1257)+p1258*p3288));0)
- p5076: 1.42261e-5; = p1903*p3483
- p0720: 0
- p0637: 0; = IF(p0373<0.5;-SQRT(p0007*EXP(p0505^2*p0008)-p0007);SQRT(p0007*EXP(p0505^2*p0008)-p0007))
- p1217: 29.3663
- p2984: 0; = p2398*(p1020+p1022)
- p3125: 2.0078e-8; = p2344*p1082
- p3340: 0; = if(and(p1232=0;p3254<>0);p3254*(p3270-p3335)/p3338;0)
- p2040: 0
- p1124: 0.4667; = if(p1121=0;p0718/100;0)
- p1301: 0; = IF(p1297+p1300=p1265;0;IF(p1297+p1300+p1299>p1265;p1265-(p1297+p1300);p1299))
- p2113: 0.832356
- p0355: 0.5
- p0466: 0; = SQRT(2)*(IF((2*p0334-1)<0;-1;IF((2*p0334-1)>0;1;0))*SQRT(SQRT((2/(pi()*0.140012289)+LN(1-(2*p0334-1)^2)/2)^2-LN(1-(2*p0334-1)^2)/0.140012289)-(2/(pi()*0.140012289)+LN(1-(2*p0334-1)^2)/2)))
- p3208: 0; = p2427*p1082
- p1202: 0.7
- p4649: 4.61963e-6; = p1888*p3481
- p4909: 0; = p1942*p3482
- p2249: 0.00269873; = p2222*p2195
- p0696: 0
- p1848: 0
- p0221: 9.269
- p2319: 0.000202794; = p2224*p2186
- p1354: 92
- p2112: 0.856281
- p1939: 0
- p4662: 1.36974e-5; = p1901*p3481
- p2953: 0.00457953; = p2367*(p1020+p1022)
- p2177: 0.286575; = p0895/p0818-(p2173+p2174+p2175+p2176)
- p2471: 0.000161866; = p2275*p1123
- p1142: 0; = if(p1121=0;p1136*p0001/(p0818*p0002);0)
- p0886: 1.47414e7; = p0686*1000*p0687*p0689/100
- p2383: 4.97147e-6; = p2229*p2212
- p3061: 0; = p2280*p1023
- p1906: 6.57772e-5; = p1498*1000/p0818
- p0028: 1.475
- p1273: 0; = p1267*p1252/p0818
- p0286: 0.5
- p1676: 0
- p3066: 0; = p2285*p1023
- p2937: 0; = p2351*(p1129+p1131)
- p0032: 4.314
- p1143: 0; = if(p1121=0;p1137*p0001/(p0818*p0002);0)
- p2413: 0; = p2234*p2203
- p4712: 1.67017e-5; = p1951*p3481
- p3843: 2.38881e-5; = p1906*p3477
- p0489: 0; = SQRT(2)*(IF((2*p0357-1)<0;-1;IF((2*p0357-1)>0;1;0))*SQRT(SQRT((2/(pi()*0.140012289)+LN(1-(2*p0357-1)^2)/2)^2-LN(1-(2*p0357-1)^2)/0.140012289)-(2/(pi()*0.140012289)+LN(1-(2*p0357-1)^2)/2)))
- p0766: 37.332; = p0106*(1+p0634*p0238/100)
- p4650: 1.00469e-5; = p1889*p3481
- p4452: 7.35489e-7; = p1897*p3480
- p1866: 0
- p0809: 2000
- p2792: 0; = p2401*(p1019+p1021)
- p0749: 32.999; = p0089*(1+p0617*p0221/100)
- p0517: 0; = SQRT(2)*(IF((2*p0385-1)<0;-1;IF((2*p0385-1)>0;1;0))*SQRT(SQRT((2/(pi()*0.140012289)+LN(1-(2*p0385-1)^2)/2)^2-LN(1-(2*p0385-1)^2)/0.140012289)-(2/(pi()*0.140012289)+LN(1-(2*p0385-1)^2)/2)))
- p3642: 3.71576e-5; = p1911*p3476
- p2267: 0.000336122; = p2226*p2213
- p2155: 1.48382e-6; = p2015*p2084*p2117/(p0818*1000)
- p3101: 0; = p2320*p1023
- p3915: 9.38089e-6; = p1772*p3478
- p2924: 1.13543e-5; = p2338*(p1079+p1081)
- p3065: 0; = p2284*p1023
- p1566: 0
- p1204: 0.980791
- p2723: 0.00023516; = p2332*(p1019+p1021)
- p2672: 0.000143936; = p2281*(p1019+p1021)
- p1934: 0
- p0888: 220690; = p0686*1000*p0687*p0884/100
- p3074: 0; = p2293*p1023
- p5151: 2.74033e-7; = p1772*p3484
- p3021: 0; = p2240*p1023
- p2397: 0; = p2234*p2186
- p0030: 603.607
- p1947: 0
- p2109: 0.826583
- p2388: 0.000276459; = p2229*p2217
- p1926: 0
- p1691: 0
- p2239: 0.000211541; = p2222*p2184
- p3535: 1.26674e-6; = p1804*p3476
- p2609: 0; = p2413*p1014
- p2475: 0.000234115; = p2279*p1014
- p0970: 0.00207005; = p0967/p0818
- p0117: 14.007
- p3034: 0; = p2253*p1023
- p0290: 0.5
- p2292: 6.83991e-5; = p2223*p2199
- p0929: 0; = p0801*p0923
- p1291: 0; = IF(p1287+p1290=p1264;0;IF(p1287+p1290+p1289>p1264;p1264-(p1287+p1290);p1289))
- p1978: 182
- p2770: 0.000156716; = p2379*(p1078+p1080)
- p0841: 0.502962
- p3445: 0; = p3369*p1240
- p2888: 0.000171124; = p2302*(p1079+p1081)
- p3038: 0; = p2257*p1023
- p1588: 0
- p0509: 0; = SQRT(2)*(IF((2*p0377-1)<0;-1;IF((2*p0377-1)>0;1;0))*SQRT(SQRT((2/(pi()*0.140012289)+LN(1-(2*p0377-1)^2)/2)^2-LN(1-(2*p0377-1)^2)/0.140012289)-(2/(pi()*0.140012289)+LN(1-(2*p0377-1)^2)/2)))
- p2289: 0.0230638; = p2223*p2196
- p0461: 0; = SQRT(2)*(IF((2*p0329-1)<0;-1;IF((2*p0329-1)>0;1;0))*SQRT(SQRT((2/(pi()*0.140012289)+LN(1-(2*p0329-1)^2)/2)^2-LN(1-(2*p0329-1)^2)/0.140012289)-(2/(pi()*0.140012289)+LN(1-(2*p0329-1)^2)/2)))
- p3165: 7.30921e-7; = p2384*p1082
- p0725: 1.298; = p0065*(1+p0593*p0197/100)
- p2484: 0.000867112; = p2288*p1014
- p3958: 3.2894e-6; = p1815*p3478
- p1180: 1.46922e-7; = p1176*p1179/p0818
- p4040: 1.24875e-5; = p1897*p3478
- p2932: 3.9007e-6; = p2346*(p1079+p1081)
- p2547: 0; = p2351*p1123
- p1922: 0
- p2808: 0; = p2417*(p1078+p1080)
- p0577: 0; = IF(p0313<0.5;-SQRT(p0007*EXP(p0445^2*p0008)-p0007);SQRT(p0007*EXP(p0445^2*p0008)-p0007))
- p0079: 2.841
- p1769: 0
- p2039: 1.26468e-5; = p2015*p2037*p2038/(p0818*1000)
- p2959: 7.59789e-5; = p2373*(p1020+p1022)
- p5334: 5.46999e-6; = p1955*p3484
- p2748: 0.000276086; = p2357*(p1019+p1021)
- p4449: 1.01175e-6; = p1894*p3480
- p0772: 50.826; = p0112*(1+p0640*p0244/100)
- p3438: 0; = p3362*p1240
- p5079: 2.89464e-6; = p1906*p3483
- p1642: 0
- p1709: 0
- p2493: 0.00302016; = p2297*p1073
- p1574: 0
- p1607: 0
- p2207: 0.0353172; = p1119-p2205-p2204-p2206
- p2594: 0; = p2398*p1014
- p2555: 0.000125365; = p2359*p1014
- p1534: 132
- p1796: 0
- p2316: 0.000272144; = p2224*p2183
- p3231: 2.93844e-7; = p1176/p0818
- p2895: 3.09388e-5; = p2309*(p1079+p1081)
- p3280: 0
- p1606: 0
- p1203: 3
- p1360: 275
- p3324: 0; = if(and(p1232=0;p3255<>0);p3266*(p3279*(p3284*p1256+p3286*(p1253+p1257)+p1258*p3288+p3299*p3287));0)
- p3699: 1.34006e-5; = p1762*p3477
- p2530: 1.247e-5; = p2334*p1014
- p3472: 0; = p3377*p1241
- p0094: 13020.5
- p2563: 0.0086869; = p2367*p1014
- p1904: 0
- p3471: 0; = p3376*p1241
- p2880: 0.000520898; = p2294*(p1020+p1022)
- p2995: 0; = p2409*(p1020+p1022)
- p2762: 0.0027179; = p2371*(p1019+p1021)
- p3410: 0; = p3372*p1238
- p2325: 0.00018682; = p2224*p2192
- p4350: 6.81673e-8; = p1795*p3480
- p0648: 0; = IF(p0384<0.5;-SQRT(p0007*EXP(p0516^2*p0008)-p0007);SQRT(p0007*EXP(p0516^2*p0008)-p0007))
- p0703: 5504.24; = p0043*(1+p0571*p0175/100)
- p1803: 0
- p3189: 0; = p2408*p1023
- p2197: 6.17493e-5; = p1055/p0818
- p2265: 0.00623723; = p2226*p2211
- p1649: 0
- p1177: 0.00197955; = p0801*p0001/(p0818*p0002)
- p2086: 0.0617647
- p3266: 0
- p0310: 0.5
- p1272: 0; = IF(p1267+p1270+p1271=p1259;0;p1259-(p1267+p1270+p1271))
- p2000: 4000
- p0764: 81.672; = p0104*(1+p0632*p0236/100)
- p2620: 0; = p2424*p1073
- p2396: 0; = p2234*p2185
- p4523: 2.97207e-6; = p1762*p3481
- p2803: 0; = p2412*(p1019+p1021)
- p2958: 0.000527915; = p2372*(p1020+p1022)
- p2612: 0; = p2416*p1073
- p0248: 31.133
- p3151: 0; = p2370*p1023
- p2877: 6.09512e-6; = p2291*(p1020+p1022)
- p0610: 0; = IF(p0346<0.5;-SQRT(p0007*EXP(p0478^2*p0008)-p0007);SQRT(p0007*EXP(p0478^2*p0008)-p0007))
- p0202: 12.897
- p2896: 0.000277288; = p2310*(p1079+p1081)
- p0884: 1.475; = IF(p0689=100;0;IF(p0689+p0688>100;100-p0689;p0688))
- p0996: 0.842225; = if(p0888=0;0;if((p0691*p0690*1000*p0692/100)/p0888>1;1;(p0691*p0690*1000*p0692/100)/p0888))
- p2235: 0; = 1-(p2226+p2227+p2228+p2229)
- p3124: 3.89597e-6; = p2343*p1082
- p3343: 0; = if(and(p1232=0;p3254<>0);IF((p3339+p3340+p3341+p3342)+(p3254*(p3269*(1-p3277))/p3338)>p3254;p3254-(p3339+p3340+p3341+p3342);p3254*(p3269*(1-p3277))/p3338);0)
- p2069: 0.190588
- p4342: 3.08547e-7; = p1787*p3480
- p2972: 5.12456e-5; = p2386*(p1079+p1081)
- p1648: 0
- p3446: 0; = p3370*p1240
- p3132: 0; = p2351*p1132
- p2337: 0.000252125; = p2228*p2205
- p3825: 2.08292e-5; = p1888*p3477
- p0849: 0
- p2548: 0; = p2352*p1123
- p1328: 4.6109e6; = p1319*p0801
- p3297: 0; = if(p1273+p1274+p1275+p1276=0;0;p1273/(p1273+p1274+p1275+p1276))
- p0362: 0.5
- p1759: 0
- p0926: 0; = IF(p0918+p0923+p0924+p0925=1;0;IF(p0918+p0923+p0924+p0925+p0922>1;1-(p0918+p0923+p0924+p0925);p0922))
- p2330: 2.728e-6; = p2224*p2198
- p0096: 62.228
- p1242: 0; = if(p1232>0;0;p1234*(p0725/100)*p0723*1000)
- p2068: 0.153529
- p1101: 0.0659222; = IF(p1071=0;IF(p1096=1;0;IF(p1096+p1097>1;1-p1096;p1097));0)
- p2869: 0.00017919; = p2283*(p1020+p1022)
- p0634: 0; = IF(p0370<0.5;-SQRT(p0007*EXP(p0502^2*p0008)-p0007);SQRT(p0007*EXP(p0502^2*p0008)-p0007))
- p2370: 6.93205e-5; = p2225*p2199
- p2509: 0.00016886; = p2313*p1123
- p2603: 0; = p2407*p1014
- p3417: 0; = p3379*p1238
- p1844: 0
- p2210: 0.0011024; = 6*1.00794*p2208/30.973762
- p3095: 2.40125e-5; = p2314*p1132
- p4387: 2.93478e-6; = p1832*p3480
- p2790: 0; = p2399*(p1019+p1021)
- p2656: 0.00259082; = p2265*(p1078+p1080)
- p4782: 0; = p1815*p3482
- p2293: 0.0062015; = p2223*p2200
- p0510: 0; = SQRT(2)*(IF((2*p0378-1)<0;-1;IF((2*p0378-1)>0;1;0))*SQRT(SQRT((2/(pi()*0.140012289)+LN(1-(2*p0378-1)^2)/2)^2-LN(1-(2*p0378-1)^2)/0.140012289)-(2/(pi()*0.140012289)+LN(1-(2*p0378-1)^2)/2)))
- p3759: 1.60225e-6; = p1822*p3477
- p0108: 38.324
- p0779: 46.482; = p0119*(1+p0647*p0251/100)
- p0657: 0; = IF(p0393<0.5;-SQRT(p0007*EXP(p0525^2*p0008)-p0007);SQRT(p0007*EXP(p0525^2*p0008)-p0007))
- p1021: 0.14253; = IF(p1012=0;IF(p1014+p1019+p1020=1;0;IF(p1014+p1019+p1020+p1017>1;1-(p1014+p1019+p1020);p1017));0)
- p2064: 0.676706
- p0428: 0; = SQRT(2)*(IF((2*p0296-1)<0;-1;IF((2*p0296-1)>0;1;0))*SQRT(SQRT((2/(pi()*0.140012289)+LN(1-(2*p0296-1)^2)/2)^2-LN(1-(2*p0296-1)^2)/0.140012289)-(2/(pi()*0.140012289)+LN(1-(2*p0296-1)^2)/2)))
- p0298: 0.5
- p2561: 0.00409958; = p2365*p1014
- p2238: 0.00358976; = p2222*p2183
- p2557: 0.000344483; = p2361*p1014
- p2517: 0.000138761; = p2321*p1014
- p1932: 0
- p2460: 0.000205515; = p2264*p1073
- p0716: 29.408; = p0056*(1+p0584*p0188/100)
- p0260: 16.153
- p0235: 0
- p2006: 1.31615; = ((p1980*p1985+p1986*p1991+p1992*p1997+p2000*p2005)/p0818)*p0005*p0002/1000
- p1763: 0
- p3262: 0
- p2004: 30
- p4718: 1.9383e-7; = p1957*p3481
- p1471: 11
- p3352: 0; = if(and(p1232=0;p3256<>0);p3256*(p3275-p3347)/p3349;0)
- p2739: 3.68044e-6; = p2348*(p1078+p1080)
- p1937: 0
- p4456: 1.52121e-6; = p1901*p3480
- p1447: 308
- p0679: 0
- p1654: 0
- p1270: 0; = IF(p1267=p1259;0;IF(p1267+p1268>p1259;p1259-p1267;p1268))
- p3274: 0
- p0911: 0.0049
- p0534: 0; = SQRT(2)*(IF((2*p0402-1)<0;-1;IF((2*p0402-1)>0;1;0))*SQRT(SQRT((2/(pi()*0.140012289)+LN(1-(2*p0402-1)^2)/2)^2-LN(1-(2*p0402-1)^2)/0.140012289)-(2/(pi()*0.140012289)+LN(1-(2*p0402-1)^2)/2)))
- p1149: 0.830148
- p2065: 0.0758824
- p1909: 0
- p0827: 3.63385e9; = p0818*p0819*p0823
- p3313: 0; = if(and(p1232=0;p3253<>0);p3262*(p3278*(p3282*p1256+p3286*(p1253+p1257)+p1258*p3288+p3298*p3287));0)
- p2457: 0.006584; = p2261*p1073
- p2176: 0.000909728; = p0895*p0913/p0818
- p2640: 0.00116704; = p2249*(p1019+p1021)
- p3211: 0; = p2430*p1132
- p2486: 7.04412e-6; = p2290*p1014
- p0554: 0; = IF(p0290<0.5;-SQRT(p0007*EXP(p0422^2*p0008)-p0007);SQRT(p0007*EXP(p0422^2*p0008)-p0007))
- p1317: 0
- p3022: 0; = p2241*p1023
- p2142: 2.78253e-6; = p2015*p2070*p2104/(p0818*1000)
- p1387: 19
- p3479: 0.171562; = if(p1328+p1330+p1332+p1334+p1336+p1338+p1340+p1342+p1344=0;0;p1334/(p1328+p1330+p1332+p1334+p1336+p1338+p1340+p1342+p1344))
- p2270: 0.000199442; = p2226*p2216
- p1553: 0
- p1221: 0.0791463; = p1216*(1+p1220*p1217/100)
- p1424: 818
- p3140: 0; = p2359*p1023
- p0164: 44.442
- p3028: 0; = p2247*p1023
- p4427: 1.72463e-5; = p1872*p3480
- p1020: 0.10054; = IF(p1012=0;IF(p1014+p1019=1;0;IF(p1014+p1019+p1016>1;1-(p1014+p1019);p1016));0)
- p0737: 0
- p4839: 0; = p1872*p3482
- p2660: 0.000989649; = p2269*(p1078+p1080)
- p1664: 0
- p1551: 0
- p1120: 0.0237381; = IF(p1071=0;p1110/(p1115*p0818);0)
- p1480: 143
- p0731: 0
- p4719: 7.67506e-6; = p1962*p3481
- p2839: 1.55002e-5; = p2253*(p1020+p1022)
- p0960: 0; = if(and(p0683>0;or(p0807=480;p0807=32;p0807=1;and(p0807=60;p0901<0.03)));p0936;0)
- p3173: 3.66181e-6; = p2392*p1132
- p3294: 0
- p0717: 35.976; = p0057*(1+p0585*p0189/100)
- p1576: 0
- p3431: 0; = p3374*p1239
- p3360: 0; = if(p1232=0;p3310+p3321+p3332+p3343+p3354;0)
- p2170: 0.00216147; = p2166*(p0913)
- p2922: 3.87683e-5; = p2336*(p1079+p1081)
- p1255: 0; = if(p1232>0;0;p0737/100)
- p2622: 0; = p2426*p1073
- p3423: 0; = p3366*p1239
- p3493: 6.47443e-6; = p1762*p3476
- p2533: 0.000108789; = p2337*p1073
- p2246: 0.000304509; = p2222*p2191
- p5251: 8.55375e-6; = p1872*p3484
- p0981: 0; = p0978*p0001/(p0818*p0002)
- p5052: 1.94153e-7; = p1879*p3483
- p2679: 0.00100897; = p2288*(p1019+p1021)
- p3386: 0; = p3367*p1234
- p0380: 0.5
- p2395: 0; = p2234*p2184
- p4640: 3.55356e-7; = p1879*p3481
- p1111: 0.0872841
- p1753: 0.92568
- p1077: 0; = IF(p1071=0;p0715/100;0)
- p1027: 640732; = IF(p1012=0;p1021*(p0704/100)*p0703*1000;0)
- p2884: 0.000880368; = p2298*(p1079+p1081)
- p2189: 0.00297962; = p1053/p0818
- p3122: 6.89044e-7; = p2341*p1082
- p1692: 0
- p4246: 1.41061e-5; = p1897*p3479
- p1325: 0; = IF(((p0745*1000*p0752/100)+(p0754*1000*p0761/100))/p0801<0;0;((p0745*1000*p0752/100)+(p0754*1000*p0761/100))/p0801)
- p2406: 0; = p2234*p2196
- p2390: 0.000987248; = p2233*p2219
- p3620: 2.18864e-5; = p1889*p3476
- p1767: 0
- p2055: 5.59471
- p0847: 0
- p0954: 0; = if(and(p0683>0;or(p0807=56;p0807=100;and(p0807=60;p0901>0.06)));p0936;0)
- p0288: 0.5
- p0388: 0.5
- p5234: 5.48066e-7; = p1855*p3484
- p3012: 0; = p2426*(p1079+p1081)
- p0880: 0; = p0868*p0856
- p0031: 7.138
- p2415: 0; = p2235*p2205
- p1555: 0
- p1960: 237.581; = IF(p1959-p1958<0;0;p1959-p1958)
- p4556: 6.13796e-7; = p1795*p3481
- p3148: 0; = p2367*p1023
- p0733: 0
- p0443: 0; = SQRT(2)*(IF((2*p0311-1)<0;-1;IF((2*p0311-1)>0;1;0))*SQRT(SQRT((2/(pi()*0.140012289)+LN(1-(2*p0311-1)^2)/2)^2-LN(1-(2*p0311-1)^2)/0.140012289)-(2/(pi()*0.140012289)+LN(1-(2*p0311-1)^2)/2)))
- p3142: 0; = p2361*p1023
- p1723: 0
- p3037: 0; = p2256*p1023
- p3246: 1; = IF(p3244+p3245=1;0;1-(p3244+p3245))
- p4897: 0; = p1930*p3482
- p1051: 1.48554e6; = IF(p1012=0;p1044*p1036;0)
- p1863: 0
- p3187: 0; = p2406*p1023
- p3272: 0
- p1821: 0
- p0646: 0; = IF(p0382<0.5;-SQRT(p0007*EXP(p0514^2*p0008)-p0007);SQRT(p0007*EXP(p0514^2*p0008)-p0007))
- p1318: 0; = p1317*p0001/(p0818*p0002)
- p0317: 0.5
- p1336: 235069; = p1323*p0801
- p5337: 4.2276e-7; = p1962*p3484
- p0755: 8.831; = p0095*(1+p0623*p0227/100)
- p1992: 3900
- p0781: 17.821; = p0121*(1+p0649*p0253/100)
- p0368: 0.5
- p5115: 2.32983e-6; = p1942*p3483
- p1587: 0
- p3033: 0; = p2252*p1023
- p2562: 0.000878794; = p2366*p1014
- p2173: 0.247331; = p0895*p0898/p0818
- p2136: 6.99701e-6; = p2015*p2064*p2098/(p0818*1000)
- p3224: 0.501945; = IF(p3216=0;0;1-p3221-p3222-p3223)
- p2853: 4.67445e-5; = p2267*(p1079+p1081)
- p3035: 0; = p2254*p1023
- p0063: 5504.24
- p3230: 1.07e-6; = p1170/p0818
- p2634: 0.00212979; = p2243*(p1019+p1021)
- p0883: 0.099339; = p0882*p0001*p0003/(p0818*p0002)
- p2431: 0; = p2236*p2221
- p2401: 0; = p2234*p2190
- p0374: 0.5
- p1064: 0.0561711; = IF(p1012=0;p1050/(p1057*p0818);0)
- p2309: 0.000222469; = p2227*p2216
- p1867: 0
- p2322: 8.02e-5; = p2224*p2189
- p1995: 50
- p2512: 0.00010114; = p2316*p1014
- p2352: 0; = p2232*p2220
- p2219: 0.0110324; = p1154-p2218
- p5276: 3.64785e-7; = p1897*p3484
- p5141: 1.63708e-7; = p1762*p3484
- p4221: 0.00033077; = p1872*p3479
- p0885: 0; = IF(p0689+p0884=100;0;100-(p0689+p0884))
- p3085: 9.78208e-5; = p2304*p1082
- p2920: 6.57388e-6; = p2334*(p1020+p1022)
- p0655: 0; = IF(p0391<0.5;-SQRT(p0007*EXP(p0523^2*p0008)-p0007);SQRT(p0007*EXP(p0523^2*p0008)-p0007))
- p1244: 0; = if(p1232>0;0;p1239*(p0725/100)*p0723*1000)
- p1414: 11
- p2776: 4.05605e-5; = p2385*(p1078+p1080)
- p1918: 0
- p1916: 0
- p0140: 29.408
- p0410: 0; = SQRT(2)*(IF((2*p0278-1)<0;-1;IF((2*p0278-1)>0;1;0))*SQRT(SQRT((2/(pi()*0.140012289)+LN(1-(2*p0278-1)^2)/2)^2-LN(1-(2*p0278-1)^2)/0.140012289)-(2/(pi()*0.140012289)+LN(1-(2*p0278-1)^2)/2)))
- p0346: 0.5
- p1096: 0.00335628
- p3339: 0; = if(and(p1232=0;p3254<>0);p3254*(p3269*p3277-p3334)/p3338;0)
- p3347: 0; = if(and(p1232=0;p3256<>0);p3275*p3289;0)
- p0838: 3.78636e9; = (p0833-p0836)*p0837
- p1141: 8.34663e-5; = if(p1121=0;p1135*p0001/(p0818*p0002);0)
- p3219: 0.0372769; = p3215*p1228
- p0129: 4.729
- p3097: 0; = p2316*p1023
- p2665: 0.000120836; = p2274*(p1128+p1130)
- p1106: 185495; = IF(p1071=0;p1105*p1096*p1095;0)
- p5211: 1.45558e-6; = p1832*p3484
- p2499: 0.000229244; = p2303*p1073
- p5147: 4.89345e-7; = p1768*p3484
- p1672: 0
- p0226: 10.975
- p3168: 4.33699e-7; = p2387*p1082
- p1708: 0
- p2354: 0.0143288; = p2225*p2182
- p2169: 0.00285171; = p2166*(p0908)
- p2478: 0.00158244; = p2282*p1014
- p1711: 0
- p2569: 0.000144124; = p2373*p1014
- p1762: 3.68994e-5; = p1354*1000/p0818
- p2153: 1.96456e-8; = p2015*p2081*p2115/(p0818*1000)
- p1298: 0
- p2105: 0.888194
- p0492: 0; = SQRT(2)*(IF((2*p0360-1)<0;-1;IF((2*p0360-1)>0;1;0))*SQRT(SQRT((2/(pi()*0.140012289)+LN(1-(2*p0360-1)^2)/2)^2-LN(1-(2*p0360-1)^2)/0.140012289)-(2/(pi()*0.140012289)+LN(1-(2*p0360-1)^2)/2)))
- p1057: 0.82
- p2038: 0.304457
- p3361: 0; = if(p1232=0;p3311+p3322+p3333+p3344+p3355;0)
- p2075: 0.072
- p2745: 0.00619636; = p2354*(p1019+p1021)
- p1572: 0
- p0831: 0.1385; = 1-p0824
- p1717: 0
- p1880: 0
- p1912: 0
- p2494: 0.0027315; = p2298*p1073
- p0875: 12.0302; = p0874*p0001*p0003/(p0818*p0002)
- p2418: 0; = p2235*p2208
- p3637: 1.15414e-5; = p1906*p3476
- p2868: 0.000834223; = p2282*(p1020+p1022)
- p1153: 0.365265
- p0687: 8.393; = p0027*(1+p0555*p0159/100)
- p3051: 2.80415e-6; = p2270*p1082
- p4272: 1.03215e-6; = p1923*p3479
- p4255: 1.12848e-5; = p1906*p3479
- p4485: 1.7293e-6; = p1930*p3480
- p0278: 0.5
- p2680: 0.00997371; = p2289*(p1019+p1021)
- p2001: 400
- p3358: 0; = if(p1232=0;p3308+p3319+p3330+p3341+p3352;0)
- p3204: 0; = p2423*p1082
- p4066: 9.13723e-7; = p1923*p3478
- p1018: 0.09538; = IF(p1012=0;p0709/100;0)
- p2100: 0.705744
- p1265: 0; = if(p1232>0;0;IF(p1259+p1263+p1264=1;0;IF(p1259+p1263+p1264+p1262>1;1-(p1259+p1263+p1264);p1262)))
- p2012: 0.0160616
- p1710: 0
- p0560: 0; = IF(p0296<0.5;-SQRT(p0007*EXP(p0428^2*p0008)-p0007);SQRT(p0007*EXP(p0428^2*p0008)-p0007))
- p1802: 0
- p2011: 0.00709975
- p1645: 0
- p2101: 0.620397
- p1090: 0.000503892; = IF(p1071=0;p1084*p0001/(p0818*p0002);0)
- p2089: 0.40001
- p2613: 0; = p2417*p1073
- p1583: 0.806008
- p4032: 1.89445e-5; = p1889*p3478
- p1895: 0
- p3072: 0; = p2291*p1023
- p2980: 0; = p2394*(p1020+p1022)
- p2751: 0.00186613; = p2360*(p1019+p1021)
- p2902: 5.33184e-5; = p2316*(p1020+p1022)
- p0949: 0; = if(and(p0683=0;or(p0807=480;p0807=32;p0807=1;and(p0807=60;p0901<0.03)));p0937;0)
- p0254: 9.91
- p2843: 0.000994105; = p2257*(p1020+p1022)
- p1245: 0; = if(p1232>0;0;p1240*(p0725/100)*p0723*1000)
- p1713: 0
- p2297: 0.00699937; = p2227*p2204
- p1215: 0.277778; = IF(p1214=0;0;(p1214-1.5)/(p1214-1)^2)
- p0213: 6.556
- p0297: 0.5
- p2133: 4.79727e-6; = p2015*p2061*p2095/(p0818*1000)
- p2272: 0.00253417; = p2230*p2218
- p2587: 2.57505e-5; = p2391*p1123
- p2734: 0.0001151; = p2343*(p1078+p1080)
- p2789: 0; = p2398*(p1019+p1021)
- p2072: 0.134
- p0145: 0
- p2083: 2.17294
- p2255: 0.00307525; = p2222*p2201
- p2969: 6.91382e-7; = p2383*(p1079+p1081)
- p1741: 0
- p1558: 0.399536
- p2495: 0.00088453; = p2299*p1073
- p1322: 0.81497; = IF(((p0745*1000*p0749/100)+(p0754*1000*p0758/100))/p0801<0;0;((p0745*1000*p0749/100)+(p0754*1000*p0758/100))/p0801)
- p4073: 2.9361e-5; = p1930*p3478
- p1586: 0
- p0692: 4.314; = p0032*(1+p0560*p0164/100)
- p2225: 0.311089; = if(p0765*p0769+p0766*p0770+p0767*p0771+p0768*p0772=0;0;p0772*p0768/(p0765*p0769+p0766*p0770+p0767*p0771+p0768*p0772))
- p3654: 1.05561e-6; = p1923*p3476
- p2273: 0.00357118; = p2230*p2219
- p1495: 806
- p0989: 1.06187e7; = p0985*p0886
- p0048: 14.253
- p1218: 0.5
- p1337: 8.41161e-5; = p1336*p0001/(p0818*p0002)
- p1062: 0.16
- p0377: 0.5
- p3150: 0; = p2369*p1023
- p4454: 1.06556e-6; = p1899*p3480
- p0739: 2.841; = p0079*(1+p0607*p0211/100)
- p1986: 4200
- p0010: 463.297
- p2141: 2.09999e-6; = p2015*p2069*p2103/(p0818*1000)
- p3073: 0; = p2292*p1023
- p0384: 0.5
- p0857: 19.7955; = p0856*p0001*p0003/(p0818*p0002)
- p1712: 0
- p0615: 0; = IF(p0351<0.5;-SQRT(p0007*EXP(p0483^2*p0008)-p0007);SQRT(p0007*EXP(p0483^2*p0008)-p0007))
- p2618: 0; = p2422*p1073
- p3363: 0; = if(p1232=0;p3244*p3357/p0818;0)
- p1305: 0; = p1301*p1252/p0818
- p2674: 0.000395512; = p2283*(p1019+p1021)
- p1330: 9.54354e6; = p1320*p0801
- p1814: 0
- p0922: 0; = p0677*1000/p0801
- p2382: 0.000964672; = p2229*p2211
- p0312: 0.5
- p4870: 0; = p1903*p3482
- p3104: 0; = p2323*p1023
- p1621: 0
- p2300: 0.0170205; = p2227*p2207
- p3357: 0; = if(p1232=0;p3307+p3318+p3329+p3340+p3351;0)
- p0220: 16.452
- p3673: 9.2894e-6; = p1942*p3476
- p3268: 0
- p3938: 1.15738e-6; = p1795*p3478
- p1846: 0
- p3114: 0; = p2333*p1023
- p0478: 0; = SQRT(2)*(IF((2*p0346-1)<0;-1;IF((2*p0346-1)>0;1;0))*SQRT(SQRT((2/(pi()*0.140012289)+LN(1-(2*p0346-1)^2)/2)^2-LN(1-(2*p0346-1)^2)/0.140012289)-(2/(pi()*0.140012289)+LN(1-(2*p0346-1)^2)/2)))
- p3930: 5.23868e-6; = p1787*p3478
- p2912: 0.000186993; = p2326*(p1020+p1022)
- p1281: 0; = IF(p1277+p1280=p1263;0;IF(p1277+p1280+p1279>p1263;p1263-(p1277+p1280);p1279))
- p0690: 603.607; = p0030*(1+p0558*p0162/100)
- p3233: 0.60394
- p0247: 8.236
- p0507: 0; = SQRT(2)*(IF((2*p0375-1)<0;-1;IF((2*p0375-1)>0;1;0))*SQRT(SQRT((2/(pi()*0.140012289)+LN(1-(2*p0375-1)^2)/2)^2-LN(1-(2*p0375-1)^2)/0.140012289)-(2/(pi()*0.140012289)+LN(1-(2*p0375-1)^2)/2)))
- p3081: 0.000239309; = p2300*p1082
- p2621: 0; = p2425*p1073
- p4100: 3.65489e-7; = p1957*p3478
- p3134: 0; = p2353*p1132
- p2525: 6.17685e-7; = p2329*p1014
- p1808: 0
- p0361: 0.5
- p2805: 0; = p2414*(p1078+p1080)
- p0639: 0; = IF(p0375<0.5;-SQRT(p0007*EXP(p0507^2*p0008)-p0007);SQRT(p0007*EXP(p0507^2*p0008)-p0007))
- p0153: 0
- p2361: 0.000926927; = p2225*p2189
- p1622: 0
- p2231: 0.586813; = if(p0783*p0787+p0784*p0788+p0785*p0789+p0786*p0790=0;0;p0788*p0784/(p0783*p0787+p0784*p0788+p0785*p0789+p0786*p0790))
- p1603: 0
- p1785: 0
- p2087: 0.856281
- p2116: 0.444424
- p2850: 6.62379e-5; = p2264*(p1079+p1081)
- p0540: 0; = IF(p0276<0.5;-SQRT(p0007*EXP(p0408^2*p0008)-p0007);SQRT(p0007*EXP(p0408^2*p0008)-p0007))
- p1069: 0.000385933; = IF(p1012=0;p1055/(p1062*p0818);0)
- p0565: 0; = IF(p0301<0.5;-SQRT(p0007*EXP(p0433^2*p0008)-p0007);SQRT(p0007*EXP(p0433^2*p0008)-p0007))
- p3689: 1.67196e-5; = p1962*p3476
- p2257: 0.00507404; = p2222*p2203
- p2775: 2.15939e-5; = p2384*(p1078+p1080)
- p1948: 0
- p3206: 0; = p2425*p1082
- p2973: 4.2898e-6; = p2387*(p1079+p1081)
- p5018: 6.77769e-6; = p1845*p3483
- p1166: 1.64769e-5; = p1164/p0818
- p3017: 0; = p2431*(p1129+p1131)
- p0894: 0.2085
- p1193: 0; = IF(OR(p1036=0;p1095=0);0.0001*p0857;0)
- p1050: 1.14841e8; = IF(p1012=0;p1037*p1036;0)
- p2134: 2.21187e-5; = p2015*p2062*p2096/(p0818*1000)
- p1231: 0.0446184; = IF(p1221=0;0;p1230*(p1228+p1229))
- p0353: 0.5
- p2816: 0; = p2425*(p1078+p1080)
- p1890: 0
- p3413: 0; = p3375*p1238
- p5309: 8.57688e-7; = p1930*p3484
- p2686: 0.000165473; = p2295*(p1019+p1021)
- p1164: 41081.3; = p1163*p0801
- p3117: 3.91948e-6; = p2336*p1082
- p2381: 7.3665e-5; = p2229*p2210
- p1268: 0
- p1431: 14
- p1082: 0.01406; = IF(p1071=0;IF(p1073+p1078+p1079+p1080+p1081=1;0;1-(p1073+p1078+p1079+p1080+p1081));0)
- p1159: 0.5
- p2910: 4.52285e-6; = p2324*(p1020+p1022)
- p2719: 0.000874575; = p2328*(p1019+p1021)
- p1891: 0
- p0228: 6.695
- p0871: 1.65785; = p0870*p0001*p0003/(p0818*p0002)
- p2988: 0; = p2402*(p1020+p1022)
- p2860: 3.73098e-5; = p2274*(p1129+p1131)
- p2907: 7.31514e-5; = p2321*(p1020+p1022)
- p5218: 2.49121e-8; = p1839*p3484
- p1968: 1.308e6; = if(p0807=480;p0802*p0811;0)
- p2496: 0.00734419; = p2300*p1073
- p2982: 0; = p2396*(p1020+p1022)
- p3409: 0; = p3371*p1238
- p1601: 0
- p0850: 0
- p3416: 0; = p3378*p1238
- p0219: 29.112
- p0835: 0.00561089; = -LN(1-p0669/100)/p0834
- p1206: 0.00953
- p1738: 0.54188
- p2167: 0.587647; = p2166*(p0898)
- p1868: 0
- p1739: 0
- p2524: 0.000751612; = p2328*p1014
- p0373: 0.5
- p3133: 0; = p2352*p1132
- p0127: 38.792
- p2346: 2.80485e-5; = p2228*p2214
- p3301: 0; = if(and(p1232=0;p3252<>0);p3257*p3277*(p3297*p3290+(1-p3297)*p3294);0)
- p3364: 0; = if(p1232=0;p3244*p3358/p0818;0)
- p1167: 0.5
- p3319: 0; = if(and(p1232=0;p3253<>0);p3253*(p3263-p3314)/p3316;0)
- p1838: 0
- p2324: 2.30852e-5; = p2224*p2191
- p2930: 1.98595e-7; = p2344*(p1079+p1081)
- p1257: 0; = if(p1232>0;0;IF(p1253+p1256=1;0;IF(p1253+p1256+p1255>1;1-(p1253+p1256);p1255)))
- p3399: 0; = p3380*p1234
- p4720: 0.000325305; = p1963*p3481
- p0632: 0; = IF(p0368<0.5;-SQRT(p0007*EXP(p0500^2*p0008)-p0007);SQRT(p0007*EXP(p0500^2*p0008)-p0007))
- p2500: 0.00300204; = p2304*p1073
- p2194: 0.214362
- p1830: 0
- p2898: 0.000932893; = p2312*(p1129+p1131)
- p0176: 3.857
- p0616: 0; = IF(p0352<0.5;-SQRT(p0007*EXP(p0484^2*p0008)-p0007);SQRT(p0007*EXP(p0484^2*p0008)-p0007))
- p0918: 0; = p0680*1000/p0801
- p2214: 0.00146129; = p1107/p0818
- p3242: 1.28562e-7; = p3234*p1188*p3238/p0818
- p4729: 0; = p1762*p3482
- p2945: 6.60896e-5; = p2359*(p1020+p1022)
- p2163: 0.00421516; = (p2017-p2020)/p0818-(p2025+p2028+p2033+p2034+p2051+p2125+p2126+p2127+p2128+p2129+p2130+p2131+p2132+p2133+p2134+p2135+p2136+p2137+p2138+p2139+p2140+p2141+p2142+p2143+p2144+p2145+p2146+p2147+p2148+p2149+p2150+p2151+p2152+p2153+p2154+p2155+p2156+p2157)
- p1042: 0.000546963
- p3285: 0
- p4606: 1.24051e-5; = p1845*p3481
- p3240: 1.77626e-8; = p3234*p1188*p3235/p0818
- p2147: 7.18646e-7; = p2015*p2075*p2109/(p0818*1000)
- p2759: 8.30696e-6; = p2368*(p1019+p1021)
- p4102: 0.0006134; = p1963*p3478
- p1247: 0; = if(p1232>0;0;p1242*p0001/(p0818*p0002))
- p2220: 0.000799862; = p1151/p0818
- p1306: 0; = p1302*p1252/p0818
- p2829: 0.000964915; = p2243*(p1020+p1022)
- p0891: 0; = IF(p3251=0;0;62.4*6272640/(12*12*12))
- p3067: 0; = p2286*p1023
- p0828: 0.13322; = if(p0827=0;0;p0819-p0827/p0818)
- p1745: 0
- p1824: 0.000100671; = p1416*1000/p0818
- p5128: 5.42568e-5; = p1955*p3483
- p0501: 0; = SQRT(2)*(IF((2*p0369-1)<0;-1;IF((2*p0369-1)>0;1;0))*SQRT(SQRT((2/(pi()*0.140012289)+LN(1-(2*p0369-1)^2)/2)^2-LN(1-(2*p0369-1)^2)/0.140012289)-(2/(pi()*0.140012289)+LN(1-(2*p0369-1)^2)/2)))
- p3400: 0; = p3362*p1238
- p1783: 0
- p0391: 0.5
- p2810: 0; = p2419*(p1078+p1080)
- p5001: 7.0601e-8; = p1828*p3483
- p2597: 0; = p2401*p1014
- p3405: 0; = p3367*p1238
- p1198: 0.44
- p1326: 0.209045; = IF(((p0745*1000*p0753/100)+(p0754*1000*p0762/100))/p0801<0;0;((p0745*1000*p0753/100)+(p0754*1000*p0762/100))/p0801)
- p1195: 0.45
- p0882: 27761; = p0869*p0856
- p0239: 36.633
- p3387: 0; = p3368*p1234
- p0861: 0.0493612; = p0673*1000/p0856
- p1340: 0; = p1325*p0801
- p3325: 0; = if(and(p1232=0;p3255<>0);p3267*p3289;0)
- p1577: 0
- p1047: 0.314094; = IF(p1012=0;IF(p1037+p1044+p1045+p1046=1;0;IF(p1037+p1044+p1045+p1046+p1041>1;1-(p1037+p1044+p1045+p1046);p1041));0)
- p1915: 0
- p2360: 0.00431534; = p2225*p2188
- p1874: 0
- p0650: 0; = IF(p0386<0.5;-SQRT(p0007*EXP(p0518^2*p0008)-p0007);SQRT(p0007*EXP(p0518^2*p0008)-p0007))
- p1730: 0
- p1238: 0; = if(p1232>0;0;IF(p1234=1;0;IF(p1234+p1235>1;1-p1234;p1235)))
- p4762: 0; = p1795*p3482
- p1940: 0
- p0179: 20.639
- p0215: 10.495
- p2387: 3.08463e-5; = p2229*p2216
- p1001: 0.157775; = if(p0978>0;0;if(and(p0687=0;p0691=0;p0695=0;p0699=0);0;IF(p0996+p0999+p1000=1;0;1-(p0996+p0999+p1000))))
- p2513: 5.96006e-6; = p2317*p1014
- p0750: 1.773; = p0090*(1+p0618*p0222/100)
- p4379: 9.00526e-7; = p1824*p3480
- p1462: 12
- p3286: 0
- p0371: 0.5
- p3318: 0; = if(and(p1232=0;p3253<>0);p3253*(p3262-p3313)/p3316;0)
- p2248: 0.0125896; = p2222*p2193
- p0867: 0.254149; = IF(p0858+p0864+p0865+p0866=1;0;IF(p0858+p0864+p0865+p0866+p0862>1;1-(p0858+p0864+p0865+p0866);p0862))
- p1869: 0
- p2718: 8.84747e-5; = p2327*(p1019+p1021)
- p3221: 0.146975; = IF(p3216=0;0;p1223*12.0107/100.0869+(1-p1224)*12.0107/84.3139)
- p0138: 61.59
- p2610: 0; = p2414*p1073
- p0633: 0; = IF(p0369<0.5;-SQRT(p0007*EXP(p0501^2*p0008)-p0007);SQRT(p0007*EXP(p0501^2*p0008)-p0007))
- p1060: 0.21
- p1131: 0; = if(p1121=0;IF(p1123+p1128+p1129+p1130=1;0;IF(p1123+p1128+p1129+p1130+p1127>1;1-(p1123+p1128+p1129+p1130);p1127));0)
- p3470: 0; = p3375*p1241
- p0549: 0; = IF(p0285<0.5;-SQRT(p0007*EXP(p0417^2*p0008)-p0007);SQRT(p0007*EXP(p0417^2*p0008)-p0007))
- p3690: 0.000708654; = p1963*p3476
- p5338: 1.79186e-5; = p1963*p3484
- p2416: 0; = p2235*p2206
- p3382: 0; = p3363*p1234
- p1795: 7.62053e-6; = p1387*1000/p0818
- p1627: 0
- p1899: 0.000119121; = p1491*1000/p0818
- p1543: 517
- p1029: 0; = IF(p1012=0;IF(p0801<p1023*(p0704/100)*p0703*1000;p0801;p1023*(p0704/100)*p0703*1000);0)
- p0931: 0; = p0801*p0925
- p2034: 4.80791e-5; = p2015*p2030*p2032/(p0818*1000)
- p2779: 0.000114836; = p2388*(p1078+p1080)
- p2099: 0.620397
- p3106: 0; = p2325*p1023
- p1716: 0
- p2546: 0; = p2350*p1123
- p2854: 8.78019e-5; = p2268*(p1079+p1081)
- p2703: 0.00302138; = p2312*(p1128+p1130)
- p0445: 0; = SQRT(2)*(IF((2*p0313-1)<0;-1;IF((2*p0313-1)>0;1;0))*SQRT(SQRT((2/(pi()*0.140012289)+LN(1-(2*p0313-1)^2)/2)^2-LN(1-(2*p0313-1)^2)/0.140012289)-(2/(pi()*0.140012289)+LN(1-(2*p0313-1)^2)/2)))

- p0666: 0; = IF(p0402<0.5;-SQRT(p0007*EXP(p0534^2*p0008)-p0007);SQRT(p0007*EXP(p0534^2*p0008)-p0007))
- p3029: 0; = p2248*p1023
- p3025: 0; = p2244*p1023
- p3243: 1.96649e-9; = p3234*p1188*p3239/p0818
- p2385: 9.76468e-5; = p2229*p2214
- p2915: 3.25629e-7; = p2329*(p1020+p1022)
- p3180: 0; = p2399*p1023
- p1014: 0.37164; = IF(p1012=0;p0705/100;0)
- p1151: 1.99427e6; = if(p1121=0;p1149*p1148*p1145;0)
- p2931: 2.07668e-6; = p2345*(p1079+p1081)
- p2629: 0.00155235; = p2238*(p1019+p1021)
- p1817: 0
- p4323: 9.86632e-7; = p1768*p3480
- p1781: 0
- p0189: 21.793
- p0836: 4990.09; = p0831*p0835*p0801/(1-p0831)
- p2351: 0; = p2232*p2219
- p1831: 0
- p3199: 0; = p2418*p1082
- p0965: 0; = IF(p0684/100=1;0;IF(p0684/100+p0685/100>1;1-p0684/100;p0685/100))
- p2515: 7.53662e-5; = p2319*p1014
- p2708: 6.93512e-6; = p2317*(p1019+p1021)
- p3181: 0; = p2400*p1023
- p3016: 0; = p2430*(p1129+p1131)
- p2206: 0.00425358; = 9*1.00794*p2204/30.973762
- p0895: 1.36023e9; = p0894*p0830
- p2348: 8.86042e-6; = p2228*p2216
- p2722: 2.59368e-6; = p2331*(p1019+p1021)
- p0195: 0
- p0476: 0; = SQRT(2)*(IF((2*p0344-1)<0;-1;IF((2*p0344-1)>0;1;0))*SQRT(SQRT((2/(pi()*0.140012289)+LN(1-(2*p0344-1)^2)/2)^2-LN(1-(2*p0344-1)^2)/0.140012289)-(2/(pi()*0.140012289)+LN(1-(2*p0344-1)^2)/2)))
- p2595: 0; = p2399*p1014
- p0905: 0.118626; = p0904/p0818
- p3312: 0; = if(and(p1232=0;p3253<>0);p3261*p3277*(p3298*p3290+(1-p3298)*p3294);0)
- p2549: 0; = p2353*p1123
- p1819: 0
- p2544: 3.82318e-6; = p2348*p1073
- p1345: 4.17195e-5; = IF(p1318=0;p1344*p0001/(p0818*p0002);0)
- p3200: 0; = p2419*p1082
- p0424: 0; = SQRT(2)*(IF((2*p0292-1)<0;-1;IF((2*p0292-1)>0;1;0))*SQRT(SQRT((2/(pi()*0.140012289)+LN(1-(2*p0292-1)^2)/2)^2-LN(1-(2*p0292-1)^2)/0.140012289)-(2/(pi()*0.140012289)+LN(1-(2*p0292-1)^2)/2)))
- p2286: 0.00213051; = p2223*p2192
- p3418: 0; = p3380*p1238
- p2631: 0.000315093; = p2240*(p1019+p1021)
- p0994: 0; = p0990*p0001*p0004/(p0818*p0002)
- p2242: 0.00038499; = p2222*p2187
- p1727: 0
- p1190: 3.7977e-7; = p1188/p0818
- p2223: 0.306953; = if(p0765*p0769+p0766*p0770+p0767*p0771+p0768*p0772=0;0;p0770*p0766/(p0765*p0769+p0766*p0770+p0767*p0771+p0768*p0772))
- p5330: 9.19969e-7; = p1951*p3484
- p0229: 22.994
- p3732: 2.76752e-6; = p1795*p3477
- p0675: 0
- p2949: 5.22737e-5; = p2363*(p1020+p1022)
- p3188: 0; = p2407*p1023
- p0963: 0.00197955; = if(and(p0683>0;or(p0807=480;p0807=32;p0807=1;and(p0807=60;p0901<0.03)));p0939;0)
- p3705: 4.00562e-5; = p1768*p3477
- p1810: 0
- p1136: 0; = if(p1121=0;p1130*(p0716/100)*p0703*1000;0)
- p0070: 90.112
- p2894: 0.000369592; = p2308*(p1079+p1081)
- p0455: 0; = SQRT(2)*(IF((2*p0323-1)<0;-1;IF((2*p0323-1)>0;1;0))*SQRT(SQRT((2/(pi()*0.140012289)+LN(1-(2*p0323-1)^2)/2)^2-LN(1-(2*p0323-1)^2)/0.140012289)-(2/(pi()*0.140012289)+LN(1-(2*p0323-1)^2)/2)))
- p0142: 0
- p0091: 7.672
- p1058: 0.225
- p2684: 0.00268177; = p2293*(p1019+p1021)
- p2783: 5.80491e-5; = p2392*(p1128+p1130)
- p0641: 0; = IF(p0377<0.5;-SQRT(p0007*EXP(p0509^2*p0008)-p0007);SQRT(p0007*EXP(p0509^2*p0008)-p0007))
- p0104: 81.672
- p1260: 0; = if(p1232>0;0;p0731/100)
- p0287: 0.5
- p1148: 0.0926988; = if(p1121=0;IF(p1146=1;0;1-p1146);0)
- p2138: 9.32411e-7; = p2015*p2066*p2100/(p0818*1000)
- p2262: 0.00243939; = p2226*p2208
- p1681: 0
- p0520: 0; = SQRT(2)*(IF((2*p0388-1)<0;-1;IF((2*p0388-1)>0;1;0))*SQRT(SQRT((2/(pi()*0.140012289)+LN(1-(2*p0388-1)^2)/2)^2-LN(1-(2*p0388-1)^2)/0.140012289)-(2/(pi()*0.140012289)+LN(1-(2*p0388-1)^2)/2)))
- p0822: 0.916
- p1970: 5.532e6; = p0801
- p0163: 17.76
- p2391: 7.15769e-5; = p2233*p2220
- p1296: 0; = p1292*p1252/p0818
- p4377: 3.94653e-8; = p1822*p3480
- p2446: 0.00991426; = p2250*p1014
- p1658: 0
- p3156: 1.36451e-5; = p2375*p1082
- p3419: 0; = p3362*p1239
- p3383: 0; = p3364*p1234
- p4925: 0; = p1962*p3482
- p1733: 0
- p1303: 0; = p1297*p1252/p0818
- p0704: 81.672; = p0044*(1+p0572*p0176/100)
- p1575: 0
- p2836: 0.00522657; = p2250*(p1020+p1022)
- p2022: 0.00207547; = p2018*p2015/p0818-p2021
- p3310: 0; = if(and(p1232=0;p3252<>0);IF((p3306+p3307+p3308+p3309)+(p3252*(p3257*(1-p3277))/p3305)>p3252;p3252-(p3306+p3307+p3308+p3309);p3252*(p3257*(1-p3277))/p3305);0)
- p2822: 0; = p2431*(p1128+p1130)
- p5183: 3.20299e-8; = p1804*p3484
- p4506: 1.85487e-6; = p1951*p3480
- p0924: 0; = IF(p0918+p0923=1;0;IF(p0918+p0923+p0920>1;1-(p0918+p0923);p0920))
- p0430: 0; = SQRT(2)*(IF((2*p0298-1)<0;-1;IF((2*p0298-1)>0;1;0))*SQRT(SQRT((2/(pi()*0.140012289)+LN(1-(2*p0298-1)^2)/2)^2-LN(1-(2*p0298-1)^2)/0.140012289)-(2/(pi()*0.140012289)+LN(1-(2*p0298-1)^2)/2)))
- p0700: 0
- p1104: 0.254708; = IF(p1071=0;IF(p1096+p1101+p1102+p1103=1;0;1-(p1096+p1101+p1102+p1103));0)
- p0968: 0
- p0758: 1.024; = p0098*(1+p0626*p0230/100)
- p0406: 0; = SQRT(2)*(IF((2*p0274-1)<0;-1;IF((2*p0274-1)>0;1;0))*SQRT(SQRT((2/(pi()*0.140012289)+LN(1-(2*p0274-1)^2)/2)^2-LN(1-(2*p0274-1)^2)/0.140012289)-(2/(pi()*0.140012289)+LN(1-(2*p0274-1)^2)/2)))
- p1685: 0.491852
- p3003: 0; = p2417*(p1079+p1081)
- p0251: 14.631
- p0780: 3.233; = p0120*(1+p0648*p0252/100)
- p0293: 0.5
- p2989: 0; = p2403*(p1020+p1022)
- p2140: 1.71037e-6; = p2015*p2068*p2102/(p0818*1000)
- p3086: 5.04123e-7; = p2305*p1082
- p5194: 9.60896e-8; = p1815*p3484
- p2846: 0.000255577; = p2260*(p1079+p1081)
- p0294: 0.5
- p0810: 0.75
- p2799: 0; = p2408*(p1019+p1021)
- p3895: 3.46058e-5; = p1962*p3477
- p4822: 0; = p1855*p3482
- p0997: 0; = if(p0888=0;0;if((p0695*p0694*1000*p0696/100)/p0888>1;1;(p0695*p0694*1000*p0696/100)/p0888))
- p3058: 0; = p2277*p1023
- p4394: 5.02285e-8; = p1839*p3480
- p0942: 0; = if(and(p0683=0;p0948=0);p0936;0)
- p2954: 3.76353e-6; = p2368*(p1020+p1022)
- p0671: 0
- p3108: 0; = p2327*p1023
- p2639: 0.00544426; = p2248*(p1019+p1021)
- p2942: 3.63143e-5; = p2356*(p1020+p1022)
- p2066: 0.109412
- p1074: 0.41538; = IF(p1071=0;p0712/100;0)
- p3848: 7.6908e-5; = p1911*p3477
- p1666: 0.885279
- p4890: 0; = p1923*p3482
- p2335: 0.000384669; = p2224*p2203
- p1593: 0
- p2744: 0; = p2353*(p1128+p1130)
- p1115: 0.237849
- p2043: 0.636483
- p1249: 0; = if(p1232>0;0;p1244*p0001/(p0818*p0002))
- p2010: 0.010582; = ((p1984*p1985+p1990*p1991+p1996*p1997+p2004*p2005)/p0818)*p0005*p0002/1000
- p1864: 0
- p3139: 0; = p2358*p1023
- p3255: 0; = p1252*(p1297*(1-p3247)+p1300*(1-p3248)+p1301*(1-p3249)+p1302*(1-p3250))
- p2420: 0; = p2235*p2210
- p2592: 0; = p2396*p1014
- p2571: 0.000418758; = p2375*p1073
- p0329: 0.5
- p0976: 0; = IF(p0687=0;IF(OR(p0686=0;p0689=0);0;p0686*1000*p0689/100);0)
- p4458: 2.89173e-6; = p1903*p3480
- p0144: 0
- p0420: 0; = SQRT(2)*(IF((2*p0288-1)<0;-1;IF((2*p0288-1)>0;1;0))*SQRT(SQRT((2/(pi()*0.140012289)+LN(1-(2*p0288-1)^2)/2)^2-LN(1-(2*p0288-1)^2)/0.140012289)-(2/(pi()*0.140012289)+LN(1-(2*p0288-1)^2)/2)))
- p3167: 5.18094e-6; = p2386*p1082
- p0158: 13.405
- p1599: 0
- p3260: 0
- p2192: 0.00694082; = p1067-p2189-p2190-p2191
- p4307: 1.63479e-5; = p1962*p3479
- p1950: 0
- p1293: 0; = p1287*p1252/p0818
- p2697: 0.000155739; = p2306*(p1078+p1080)
- p0848: 0
- p2598: 0; = p2402*p1014
- p3048: 4.72588e-6; = p2267*p1082
- p3290: 0
- p3724: 1.25267e-5; = p1787*p3477
- p1919: 0
- p1993: 400
- p1085: 471456; = IF(p1071=0;p1079*(p0710/100)*p0703*1000;0)
- p3178: 0; = p2397*p1023
- p3234: 0.39606; = 1-p3233
- p1241: 0; = if(p1232>0;0;IF(p1234+p1238+p1239+p1240=1;0;1-(p1234+p1238+p1239+p1240)))
- p0829: 0.0832195; = if(p0807=480;p0814*(1-p0824);0)
- p0225: 42.529
- p2130: 8.1919e-6; = p2015*p2058*p2092/(p0818*1000)
- p1735: 0
- p2205: 0.0131354; = 2*14.0067*p2204/30.973762
- p1897: 8.22215e-5; = p1489*1000/p0818
- p2263: 0.00110312; = p2226*p2209
- p1786: 0
- p3765: 5.82636e-7; = p1828*p3477
- p0256: 12.773
- p2596: 0; = p2400*p1014
- p0292: 0.5
- p2753: 0.000458814; = p2362*(p1019+p1021)
- p2472: 0.00525438; = p2276*p1014
- p0757: 13.439; = p0097*(1+p0625*p0229/100)
- p0269: 11.533
- p1073: 0.43149; = IF(p1071=0;p0711/100;0)
- p1636: 0
- p1398: 20
- p1129: 0.1441; = if(p1121=0;IF(p1123+p1128=1;0;IF(p1123+p1128+p1125>1;1-(p1123+p1128);p1125));0)
- p2671: 0.00100009; = p2280*(p1019+p1021)
- p0818: 2.49326e9; = p0806*p0807
- p3044: 1.55099e-5; = p2263*p1082
- p0651: 0; = IF(p0387<0.5;-SQRT(p0007*EXP(p0519^2*p0008)-p0007);SQRT(p0007*EXP(p0519^2*p0008)-p0007))
- p1000: 0; = IF(p0996+p0999=1;0;IF(p0996+p0999+p0998>1;1-(p0996+p0999);p0998))
- p1837: 0
- p2202: 0.00124661; = 4*1.00794*p2201/(2*14.0067)
- p2380: 0.000170613; = p2229*p2209
- p2826: 0.000142755; = p2240*(p1020+p1022)
- p2386: 0.000368488; = p2229*p2215
- p2195: 0.00760117; = p2194*p2193
- p3111: 0; = p2330*p1023
- p0952: 0; = if(and(p0683>0;or(p0807=56;p0807=100;and(p0807=60;p0901>0.06)));p0934;0)
- p0712: 41.538; = p0052*(1+p0580*p0184/100)
- p3518: 6.05218e-6; = p1787*p3476
- p3258: 0
- p3392: 0; = p3373*p1234
- p3686: 0.00021633; = p1955*p3476
- p1917: 0
- p2005: 2.51385e7; = p1963*p0818+p1959*1000+p1170+p1176+p1182
- p0027: 8.393
- p1614: 0
- p2018: 0.1978
- p4121: 1.05967e-5; = p1772*p3479
- p4861: 0; = p1894*p3482
- p2940: 0.00280731; = p2354*(p1020+p1022)
- p0352: 0.5
- p3007: 0; = p2421*(p1079+p1081)
- p0934: 0; = p0928*p0001/(p0818*p0002)
- p2797: 0; = p2406*(p1019+p1021)
- p1023: 0; = IF(p1012=0;IF(p1014+p1019+p1020+p1021+p1022=1;0;1-(p1014+p1019+p1020+p1021+p1022));0)
- p2058: 1.24412
- p2939: 0; = p2353*(p1129+p1131)
- p0791: 0
- p2577: 3.17857e-5; = p2381*p1073
- p1839: 5.61513e-6; = p1431*1000/p0818
- p3250: 0
- p0694: 1179.07; = p0034*(1+p0562*p0166/100)
- p3481: 0.0805451; = if(p1328+p1330+p1332+p1334+p1336+p1338+p1340+p1342+p1344=0;0;p1338/(p1328+p1330+p1332+p1334+p1336+p1338+p1340+p1342+p1344))
- p3093: 0.000190592; = p2312*p1132
- p1972: 0.00140415; = if(p0807=480;p1967*p0001/(p0818*p0002);0)
- p2874: 0.000457121; = p2288*(p1020+p1022)
- p1865: 0
- p0695: 9.036; = p0035*(1+p0563*p0167/100)
- p2777: 0.000153063; = p2386*(p1078+p1080)
- p2795: 0; = p2404*(p1019+p1021)
- p0748: 16.905; = p0088*(1+p0616*p0220/100)
- p2941: 0.000616238; = p2355*(p1020+p1022)
- p2677: 0.000921317; = p2286*(p1019+p1021)
- p0619: 0; = IF(p0355<0.5;-SQRT(p0007*EXP(p0487^2*p0008)-p0007);SQRT(p0007*EXP(p0487^2*p0008)-p0007))
- p3263: 0
- p2926: 1.50714e-5; = p2340*(p1079+p1081)
- p2261: 0.0152588; = p2226*p2207
- p2102: 0.922577
- p2706: 0.000536125; = p2315*(p1019+p1021)
- p2026: 73.06
- p0801: 5.532e6
- p0594: 0; = IF(p0330<0.5;-SQRT(p0007*EXP(p0462^2*p0008)-p0007);SQRT(p0007*EXP(p0462^2*p0008)-p0007))
- p1065: 0.00264809; = IF(p1012=0;p1051/(p1058*p0818);0)
- p3136: 0; = p2355*p1023
- p2323: 9.17994e-5; = p2224*p2190
- p0866: 0.0493612; = IF(p0858+p0864+p0865=1;0;IF(p0858+p0864+p0865+p0861>1;1-(p0858+p0864+p0865);p0861))
- p2900: 0.000117534; = p2314*(p1129+p1131)
- p3119: 1.14792e-6; = p2338*p1082
- p2466: 8.6057e-5; = p2270*p1073
- p0796: 81.672; = p0136*(1+p0664*p0268/100)
- p2619: 0; = p2423*p1073
- p2427: 0; = p2235*p2217
- p0511: 0; = SQRT(2)*(IF((2*p0379-1)<0;-1;IF((2*p0379-1)>0;1;0))*SQRT(SQRT((2/(pi()*0.140012289)+LN(1-(2*p0379-1)^2)/2)^2-LN(1-(2*p0379-1)^2)/0.140012289)-(2/(pi()*0.140012289)+LN(1-(2*p0379-1)^2)/2)))
- p0730: 90.112; = p0070*(1+p0598*p0202/100)
- p0429: 0; = SQRT(2)*(IF((2*p0297-1)<0;-1;IF((2*p0297-1)>0;1;0))*SQRT(SQRT((2/(pi()*0.140012289)+LN(1-(2*p0297-1)^2)/2)^2-LN(1-(2*p0297-1)^2)/0.140012289)-(2/(pi()*0.140012289)+LN(1-(2*p0297-1)^2)/2)))
- p2451: 0.00114289; = p2255*p1014
- p2312: 0.00647393; = p2231*p2219
- p2437: 0.00099413; = p2241*p1014
- p1187: 0.000171162
- p1776: 0
- p2461: 0.0026913; = p2265*p1073
- p1618: 0.660002
- p0617: 0; = IF(p0353<0.5;-SQRT(p0007*EXP(p0485^2*p0008)-p0007);SQRT(p0007*EXP(p0485^2*p0008)-p0007))
- p3116: 0; = p2335*p1023
- p0826: 0.084; = 1-p0825/p0818
- p2435: 7.8617e-5; = p2239*p1014
- p2616: 0; = p2420*p1073
- p3282: 0
- p3769: 0.000119149; = p1832*p3477
- p2758: 0.0101081; = p2367*(p1019+p1021)
- p2608: 0; = p2412*p1014
- p1338: 2.11662e6; = p1324*p0801
- p1980: 3521.6
- p2459: 0.000475986; = p2263*p1073
- p1117: 0.00697574; = IF(p1071=0;p1107/(p1112*p0818);0)
- p0811: 0.25; = if(p0807=480;1-p0810;0)
- p3967: 1.52896e-5; = p1824*p3478
- p2110: 0.856281
- p2749: 0.00101356; = p2358*(p1019+p1021)
- p3526: 1.33711e-6; = p1795*p3476
- p0573: 0; = IF(p0309<0.5;-SQRT(p0007*EXP(p0441^2*p0008)-p0007);SQRT(p0007*EXP(p0441^2*p0008)-p0007))
- p2287: 0.0108844; = p2223*p2193
- p2927: 6.81546e-6; = p2341*(p1079+p1081)
- p4111: 6.33052e-6; = p1762*p3479
- p2367: 0.0233745; = p2225*p2196
- p3225: 0.000961916; = p3221*p1229
- p3860: 2.18489e-6; = p1923*p3477
- p2469: 0.00128477; = p2273*p1123
- p2707: 0.000117686; = p2316*(p1019+p1021)
- p1852: 0
- p0925: 0; = IF(p0918+p0923+p0924=1;0;IF(p0918+p0923+p0924+p0921>1;1-(p0918+p0923+p0924);p0921))
- p2119: 0.679049
- p2657: 1.33519e-5; = p2266*(p1078+p1080)
- p1114: 0.216028
- p0524: 0; = SQRT(2)*(IF((2*p0392-1)<0;-1;IF((2*p0392-1)>0;1;0))*SQRT(SQRT((2/(pi()*0.140012289)+LN(1-(2*p0392-1)^2)/2)^2-LN(1-(2*p0392-1)^2)/0.140012289)-(2/(pi()*0.140012289)+LN(1-(2*p0392-1)^2)/2)))
- p0728: 0
- p1170: 2667.79; = p1169*p0801
- p1694: 0
- p3080: 2.88222e-5; = p2299*p1082
- p5067: 4.97737e-6; = p1894*p3483
- p3359: 0; = if(p1232=0;p3309+p3320+p3331+p3342+p3353;0)
- p2044: 5.37999e-7; = p2015*p2042*p2043/(p0818*1000)
- p2091: 0.374844
- p2015: 3.01068e7; = p0830*p2011*p2013
- p0591: 0; = IF(p0327<0.5;-SQRT(p0007*EXP(p0459^2*p0008)-p0007);SQRT(p0007*EXP(p0459^2*p0008)-p0007))
- p2296: 0.00438679; = p2223*p2203
- p3201: 0; = p2420*p1082
- p2694: 0.000220685; = p2303*(p1078+p1080)
- p2947: 0.000181604; = p2361*(p1020+p1022)
- p2602: 0; = p2406*p1014
- p0572: 0; = IF(p0308<0.5;-SQRT(p0007*EXP(p0440^2*p0008)-p0007);SQRT(p0007*EXP(p0440^2*p0008)-p0007))
- p1827: 4.13113e-5; = p1419*1000/p0818
- p1278: 0
- p3451: 0; = p3375*p1240
- p2305: 3.58551e-5; = p2227*p2212
- p0175: 0
- p0902: 0.0377084
- p1307: 0
- p0506: 0; = SQRT(2)*(IF((2*p0374-1)<0;-1;IF((2*p0374-1)>0;1;0))*SQRT(SQRT((2/(pi()*0.140012289)+LN(1-(2*p0374-1)^2)/2)^2-LN(1-(2*p0374-1)^2)/0.140012289)-(2/(pi()*0.140012289)+LN(1-(2*p0374-1)^2)/2)))
- p1822: 4.41189e-6; = p1414*1000/p0818
- p2600: 0; = p2404*p1014
- p2540: 6.16178e-7; = p2344*p1073
- p2714: 3.96977e-5; = p2323*(p1019+p1021)
- p0515: 0; = SQRT(2)*(IF((2*p0383-1)<0;-1;IF((2*p0383-1)>0;1;0))*SQRT(SQRT((2/(pi()*0.140012289)+LN(1-(2*p0383-1)^2)/2)^2-LN(1-(2*p0383-1)^2)/0.140012289)-(2/(pi()*0.140012289)+LN(1-(2*p0383-1)^2)/2)))
- p1061: 0.3
- p2240: 0.000728641; = p2222*p2185
- p2490: 0.000988089; = p2294*p1014
- p1737: 0
- p3293: 0
- p0242: 13.291
- p1239: 0; = if(p1232>0;0;IF(p1234+p1238=1;0;IF(p1234+p1238+p1236>1;1-(p1234+p1238);p1236)))
- p3380: 0; = p3251/p0818
- p1743: 0
- p3251: 0; = p1252-(p3252+p3253+p3254+p3255+p3256)
- p2925: 9.42739e-5; = p2339*(p1079+p1081)
- p1407: 54
- p0024: 5.444
- p1224: 0.44; = IF(p1221=0;0;IF(p1193=0;1-p1223;0))
- p1044: 0.00527766; = IF(p1012=0;IF(p1037=1;0;IF(p1037+p1038>1;1-p1037;p1038));0)
- p2003: 50
- p2876: 3.7135e-6; = p2290*(p1020+p1022)
- p3397: 0; = p3378*p1234
- p1997: 6.48472e7; = (if(p1152=0;0;p1150/p1152)+if(p1153=0;0;p1151/p1153))*(1+p1157)
- p4968: 3.35355e-7; = p1795*p3483
- p3198: 0; = p2417*p1082
- p0681: 5504.24; = p0021*(1+p0549*p0153/100)
- p2780: 0.000326955; = p2389*(p1128+p1130)
- p2670: 0.000272416; = p2279*(p1019+p1021)
- p3371: 0; = if(p1232=0;p3245*p3359/p0818;0)
- p3050: 3.34981e-5; = p2269*p1082
- p2317: 1.60372e-5; = p2224*p2184
- p0937: 0; = p0931*p0001/(p0818*p0002)
- p4945: 2.71814e-6; = p1772*p3483
- p1628: 0.601994
- p4383: 1.4351e-8; = p1828*p3480
- p3741: 2.62186e-6; = p1804*p3477
- p1840: 0
- p2614: 0; = p2418*p1073
- p2778: 1.28129e-5; = p2387*(p1078+p1080)
- p0726: 87.251; = p0066*(1+p0594*p0198/100)
- p0907: 0.00734516
- p1076: 0; = IF(p1071=0;p0714/100;0)
- p0649: 0; = IF(p0385<0.5;-SQRT(p0007*EXP(p0517^2*p0008)-p0007);SQRT(p0007*EXP(p0517^2*p0008)-p0007))
- p3476: 0.175462; = if(p1328+p1330+p1332+p1334+p1336+p1338+p1340+p1342+p1344=0;0;p1328/(p1328+p1330+p1332+p1334+p1336+p1338+p1340+p1342+p1344))
- p2862: 0.00276999; = p2276*(p1020+p1022)
- p2442: 0.000113168; = p2246*p1014
- p3227: 0.000830125; = p3223*p1229
- p2606: 0; = p2410*p1014
- p0858: 0.0837486; = p0670*1000/p0856
- p0452: 0; = SQRT(2)*(IF((2*p0320-1)<0;-1;IF((2*p0320-1)>0;1;0))*SQRT(SQRT((2/(pi()*0.140012289)+LN(1-(2*p0320-1)^2)/2)^2-LN(1-(2*p0320-1)^2)/0.140012289)-(2/(pi()*0.140012289)+LN(1-(2*p0320-1)^2)/2)))
- p0972: 0.0359544; = p0969/p0818
- p1673: 0
- p2785: 0; = p2394*(p1019+p1021)
- p3099: 0; = p2318*p1023
- p3326: 0; = if(and(p1232=0;p3255<>0);p3268*p3289;0)
- p2256: 0.000442598; = p2222*p2202
- p1046: 0.0263929; = IF(p1012=0;IF(p1037+p1044+p1045=1;0;IF(p1037+p1044+p1045+p1040>1;1-(p1037+p1044+p1045);p1040));0)
- p2909: 1.79853e-5; = p2323*(p1020+p1022)
- p0120: 3.233
- p0677: 0
- p2024: 0.748682
- p2045: 30
- p2567: 0.00233577; = p2371*p1014
- p1556: 0
- p2673: 0.00184132; = p2282*(p1019+p1021)
- p1071: 0
- p2448: 1.33731e-5; = p2252*p1014
- p0814: 0.600863; = if(p0807=480;p0810*p0812+p0811*p0813;0)
- p2071: 0.151
- p0983: 0.722585; = if(p0886=0;0;min(1;(p0695*p0694*1000*p0697/100)/p0886))
- p0642: 0; = IF(p0378<0.5;-SQRT(p0007*EXP(p0510^2*p0008)-p0007);SQRT(p0007*EXP(p0510^2*p0008)-p0007))
- p3709: 2.24315e-5; = p1772*p3477
- p2750: 0.000145875; = p2359*(p1019+p1021)
- p0977: 0; = IF(p0687=0;IF(OR(p0686=0;p0688=0);0;p0686*1000*p0688/100);0)
- p1651: 0.299611
- p2094: 0.922577
- p1105: 0.436421
- p3463: 0; = p3368*p1241
- p3424: 0; = p3367*p1239
- p0800: 29.408; = p0140*(1+p0668*p0272/100)
- p2956: 1.35813e-5; = p2370*(p1020+p1022)
- p2906: 5.71823e-6; = p2320*(p1020+p1022)
- p1173: 0.5
- p1582: 0
- p1933: 0
- p1012: 0
- p3144: 0; = p2363*p1023
- p0962: 0; = if(and(p0683>0;or(p0807=480;p0807=32;p0807=1;and(p0807=60;p0901<0.03)));p0938;0)
- p2724: 0.000100818; = p2333*(p1019+p1021)
- p1964: 0.5
- p0378: 0.5
- p2093: 0.260958
- p2357: 0.000638437; = p2225*p2185
- p1290: 0; = IF(p1287=p1264;0;IF(p1287+p1288>p1264;p1264-p1287;p1288))
- p3184: 0; = p2403*p1023
- p2833: 0.000482802; = p2247*(p1020+p1022)
- p3894: 8.73954e-7; = p1957*p3477
- p1063: 0.455
- p2921: 7.53643e-5; = p2335*(p1020+p1022)
- p0525: 0; = SQRT(2)*(IF((2*p0393-1)<0;-1;IF((2*p0393-1)>0;1;0))*SQRT(SQRT((2/(pi()*0.140012289)+LN(1-(2*p0393-1)^2)/2)^2-LN(1-(2*p0393-1)^2)/0.140012289)-(2/(pi()*0.140012289)+LN(1-(2*p0393-1)^2)/2)))
- p3102: 0; = p2321*p1023
- p2901: 0.000242895; = p2315*(p1020+p1022)
- p4181: 5.62866e-5; = p1832*p3479
- p1974: 0; = p1969*p0001/(p0818*p0002)
- p0146: 0
- p5074: 7.4837e-6; = p1901*p3483
- p2916: 5.34469e-7; = p2330*(p1020+p1022)
- p2294: 0.00265873; = p2223*p2201
- p2740: 3.29858e-5; = p2349*(p1078+p1080)
- p2233: 0.0894866; = if(p0783*p0787+p0784*p0788+p0785*p0789+p0786*p0790=0;0;p0790*p0786/(p0783*p0787+p0784*p0788+p0785*p0789+p0786*p0790))
- p1959: 15064.6; = if(p0738*p0740*p0739>0;p0738*1000*(p0740/100)*p0739/1000;p1958)
- p3610: 7.74116e-7; = p1879*p3476
- p1630: 0
- p2131: 3.15643e-6; = p2015*p2059*p2093/(p0818*1000)
- p3109: 0; = p2328*p1023
- p4593: 2.64255e-5; = p1832*p3481
- p1952: 0
- p1235: 0; = if(p1232>0;0;p0727/100)
- p2339: 0.000677888; = p2228*p2207
- p0923: 0; = IF(p0918=1;0;IF(p0918+p0919>1;1-p0918;p0919))
- p3105: 0; = p2324*p1023
- p3430: 0; = p3373*p1239
- p3236: 0.0140975
- p0869: 0.00501826; = IF(p0858+p0864+p0865+p0866+p0867+p0868=1;0;1-(p0858+p0864+p0865+p0866+p0867+p0868))
- p3042: 0.000214538; = p2261*p1082
- p3349: 0; = if(and(p1232=0;p3256<>0);1-(p3345+p3346+p3347+p3348);0)
- p2971: 1.35797e-5; = p2385*(p1079+p1081)
- p3971: 2.43659e-7; = p1828*p3478
- p2964: 0.000328201; = p2378*(p1079+p1081)
- p0422: 0; = SQRT(2)*(IF((2*p0290-1)<0;-1;IF((2*p0290-1)>0;1;0))*SQRT(SQRT((2/(pi()*0.140012289)+LN(1-(2*p0290-1)^2)/2)^2-LN(1-(2*p0290-1)^2)/0.140012289)-(2/(pi()*0.140012289)+LN(1-(2*p0290-1)^2)/2)))
- p0727: 0
- p1056: 5.03723e7; = IF(p1012=0;p1049*p1036;0)
- p2178: 0.0877082; = (p0895*p0831/(1-p0831))/(p0818)
- p2392: 0.000124382; = p2233*p2221
- p1185: 0.5
- p1079: 0.13907; = IF(p1071=0;IF(p1073+p1078=1;0;IF(p1073+p1078+p1075>1;1-(p1073+p1078);p1075));0)
- p0815: 0
- p0958: 0; = if(and(p0683>0;or(p0807=480;p0807=32;p0807=1;and(p0807=60;p0901<0.03)));p0934;0)
- p2558: 0.000394306; = p2362*p1014
- p2918: 0.000106541; = p2332*(p1020+p1022)
- p2162: 1.96872e-7; = p2015*p2086*p2124/(p0818*1000)
- p3164: 6.98988e-8; = p2383*p1082
- p3229: 1.64769e-5; = p1164/p0818
- p0093: 3.16
- p0558: 0; = IF(p0294<0.5;-SQRT(p0007*EXP(p0426^2*p0008)-p0007);SQRT(p0007*EXP(p0426^2*p0008)-p0007))
- p0113: 61.59
- p2605: 0; = p2409*p1014
- p1486: 282
- p3688: 4.22245e-7; = p1957*p3476
- p1758: 0
- p1091: 0.000168704; = IF(p1071=0;p1085*p0001/(p0818*p0002);0)
- p0585: 0; = IF(p0321<0.5;-SQRT(p0007*EXP(p0453^2*p0008)-p0007);SQRT(p0007*EXP(p0453^2*p0008)-p0007))
- p3216: 0.06; = IF(OR(p1226=0;p1228=0);0;1-p3213-p3214-p3215)
- p1563: 0
- p0037: 99.979
- p1108: 1.15093e6; = IF(p1071=0;p1105*p1102*p1095;0)
- p1573: 0
- p0296: 0.5
- p1841: 0
- p0790: 9.904; = p0130*(1+p0658*p0262/100)
- p1871: 0
- p2541: 6.44327e-6; = p2345*p1073
- p1188: 946.866; = p1187*p0801
- p2229: 0.0668223; = if(p0774*p0778+p0775*p0779+p0776*p0780+p0777*p0781=0;0;p0781*p0777/(p0774*p0778+p0775*p0779+p0776*p0780+p0777*p0781))
- p0123: 13.129
- p3439: 0; = p3363*p1240
- p0316: 0.5
- p1584: 0
- p1329: 0.00164995; = p1328*p0001/(p0818*p0002)
- p1976: 0.0332
- p1719: 0.4576
- p1152: 0.415074
- p1233: 2.55656e-5; = p1232*p0001/(p0818*p0002)
- p0494: 0; = SQRT(2)*(IF((2*p0362-1)<0;-1;IF((2*p0362-1)>0;1;0))*SQRT(SQRT((2/(pi()*0.140012289)+LN(1-(2*p0362-1)^2)/2)^2-LN(1-(2*p0362-1)^2)/0.140012289)-(2/(pi()*0.140012289)+LN(1-(2*p0362-1)^2)/2)))
- p0767: 20.463; = p0107*(1+p0635*p0239/100)
- p2992: 0; = p2406*(p1020+p1022)
- p0043: 5504.24
- p2827: 0.000524082; = p2241*(p1020+p1022)
- p2693: 0.00051112; = p2302*(p1078+p1080)
- p2085: 0.0335294
- p4924: 0; = p1957*p3482
- p0798: 61.59; = p0138*(1+p0666*p0270/100)
- p0262: 39.98
- p3252: 0; = p1252*(p1267*(1-p3247)+p1270*(1-p3248)+p1271*(1-p3249)+p1272*(1-p3250))
- p3170: 2.06247e-5; = p2389*p1132
- p0682: 5504.24; = p0022*(1+p0550*p0154/100)
- p0448: 0; = SQRT(2)*(IF((2*p0316-1)<0;-1;IF((2*p0316-1)>0;1;0))*SQRT(SQRT((2/(pi()*0.140012289)+LN(1-(2*p0316-1)^2)/2)^2-LN(1-(2*p0316-1)^2)/0.140012289)-(2/(pi()*0.140012289)+LN(1-(2*p0316-1)^2)/2)))
- p1920: 0
- p3096: 0; = p2315*p1023
- p2644: 3.42124e-5; = p2253*(p1019+p1021)
- p1811: 0
- p1734: 0
- p3157: 1.2341e-5; = p2376*p1082
- p2452: 0.000164487; = p2256*p1014
- p0971: 0; = p0968/p0818
- p2185: 0.00205227; = p1065-p2184
- p2228: 0.0191943; = if(p0774*p0778+p0775*p0779+p0776*p0780+p0777*p0781=0;0;p0780*p0776/(p0774*p0778+p0775*p0779+p0776*p0780+p0777*p0781))
- p1644: 0
- p1804: 7.21945e-6; = p1396*1000/p0818
- p1080: 0; = IF(p1071=0;IF(p1073+p1078+p1079=1;0;IF(p1073+p1078+p1079+p1076>1;1-(p1073+p1078+p1079);p1076));0)
- p0556: 0; = IF(p0292<0.5;-SQRT(p0007*EXP(p0424^2*p0008)-p0007);SQRT(p0007*EXP(p0424^2*p0008)-p0007))
- p1316: 0; = p1312*p1252/p0818
- p3145: 0; = p2364*p1023
- p2511: 0.000460747; = p2315*p1014
- p3559: 2.81497e-7; = p1828*p3476
- p1094: 1.7056e-5; = IF(p1071=0;p1088*p0001/(p0818*p0002);0)
- p1702: 0.853515
- p0830: 6.52391e9; = p0825*(p0821-p0814)*p0824
- p3047: 4.51941e-7; = p2266*p1082
- p4188: 9.63341e-7; = p1839*p3479
- p4664: 2.60379e-5; = p1903*p3481
- p0654: 0; = IF(p0390<0.5;-SQRT(p0007*EXP(p0522^2*p0008)-p0007);SQRT(p0007*EXP(p0522^2*p0008)-p0007))
- p0423: 0; = SQRT(2)*(IF((2*p0291-1)<0;-1;IF((2*p0291-1)>0;1;0))*SQRT(SQRT((2/(pi()*0.140012289)+LN(1-(2*p0291-1)^2)/2)^2-LN(1-(2*p0291-1)^2)/0.140012289)-(2/(pi()*0.140012289)+LN(1-(2*p0291-1)^2)/2)))
- p1595: 0
- p0454: 0; = SQRT(2)*(IF((2*p0322-1)<0;-1;IF((2*p0322-1)>0;1;0))*SQRT(SQRT((2/(pi()*0.140012289)+LN(1-(2*p0322-1)^2)/2)^2-LN(1-(2*p0322-1)^2)/0.140012289)-(2/(pi()*0.140012289)+LN(1-(2*p0322-1)^2)/2)))
- p2152: 2.51273e-7; = p2015*p2080*p2114/(p0818*1000)
- p0842: -0.895865
- p2508: 0.00232906; = p2312*p1123
- p2439: 0.00183034; = p2243*p1014
- p2453: 0.00188571; = p2257*p1014
- p1931: 0
- p2079: 0.02
- p4514: 3.61279e-5; = p1963*p3480
- p0174: 0
- p0252: 46.818
- p3118: 3.54487e-6; = p2337*p1082
- p4660: 9.59461e-6; = p1899*p3481
- p2630: 9.14787e-5; = p2239*(p1019+p1021)
- p4300: 3.55748e-5; = p1951*p3479
- p0746: 26.105; = p0086*(1+p0614*p0218/100)
- p0307: 0.5
- p2310: 0.00199387; = p2227*p2217
- p0957: 0; = if(and(p0683>0;or(p0807=56;p0807=100;and(p0807=60;p0901>0.06)));p0939;0)
- p3194: 0; = p2413*p1023
- p2832: 5.96593e-5; = p2246*(p1020+p1022)
- p3296: 0
- p2847: 0.00212204; = p2261*(p1079+p1081)
- p3071: 0; = p2290*p1023
- p2786: 0; = p2395*(p1019+p1021)
- p2118: 0.679049
- p0555: 0; = IF(p0291<0.5;-SQRT(p0007*EXP(p0423^2*p0008)-p0007);SQRT(p0007*EXP(p0423^2*p0008)-p0007))
- p0999: 0; = IF(p0996=1;0;IF(p0996+p0997>1;1-p0996;p0997))
- p2215: 0.00551445; = p1117-p2214
- p3137: 0; = p2356*p1023
- p4049: 9.99004e-6; = p1906*p3478
- p0023: 17.224
- p0702: 5504.24; = p0042*(1+p0570*p0174/100)
- p1936: 0
- p2726: 0.000166346; = p2335*(p1019+p1021)
- p2470: 9.31476e-5; = p2274*p1123
- p1787: 3.44929e-5; = p1379*1000/p0818
- p0745: 13258.2; = p0085*(1+p0613*p0217/100)
- p1147: 0.0926988
- p0752: 0
- p2347: 0.000105846; = p2228*p2215
- p1688: 0
- p2590: 0; = p2394*p1014
- p3337: 0; = IF(or(p3254=0;p1232>0);0;p3272*p3289)
- p0990: 0; = p0986*p0886
- p2817: 0; = p2426*(p1078+p1080)
- p0259: 19.98
- p2617: 0; = p2421*p1073
- p1851: 0
- p1016: 0.10054; = IF(p1012=0;p0707/100;0)
- p2944: 0.000459203; = p2358*(p1020+p1022)
- p0647: 0; = IF(p0383<0.5;-SQRT(p0007*EXP(p0515^2*p0008)-p0007);SQRT(p0007*EXP(p0515^2*p0008)-p0007))
- p0881: 0; = p0880*p0001*p0003/(p0818*p0002)
- p3840: 0.000117401; = p1903*p3477
- p2345: 1.49326e-5; = p2228*p2213
- p3377: 0; = if(p1232=0;p3246*p3359/p0818;0)
- p1049: 0.178958; = IF(p1012=0;IF(p1037+p1044+p1045+p1046+p1047+p1048=1;0;1-(p1037+p1044+p1045+p1046+p1047+p1048));0)
- p0718: 46.67; = p0058*(1+p0586*p0190/100)
- p1859: 0
- p0519: 0; = SQRT(2)*(IF((2*p0387-1)<0;-1;IF((2*p0387-1)>0;1;0))*SQRT(SQRT((2/(pi()*0.140012289)+LN(1-(2*p0387-1)^2)/2)^2-LN(1-(2*p0387-1)^2)/0.140012289)-(2/(pi()*0.140012289)+LN(1-(2*p0387-1)^2)/2)))
- p3379: 0; = if(p1232=0;p3246*p3361/p0818;0)
- p0708: 14.253; = p0048*(1+p0576*p0180/100)
- p2978: 1.79234e-5; = p2392*(p1129+p1131)
- p3373: 0; = if(p1232=0;p3245*p3361/p0818;0)
- p0399: 0.5
- p0513: 0; = SQRT(2)*(IF((2*p0381-1)<0;-1;IF((2*p0381-1)>0;1;0))*SQRT(SQRT((2/(pi()*0.140012289)+LN(1-(2*p0381-1)^2)/2)^2-LN(1-(2*p0381-1)^2)/0.140012289)-(2/(pi()*0.140012289)+LN(1-(2*p0381-1)^2)/2)))
- p1942: 5.29426e-5; = p1534*1000/p0818
- p1721: 0
- p1040: 0.0263929
- p2216: 0.000461618; = p1108/p0818
- p3563: 5.75661e-5; = p1832*p3476
- p3083: 1.73007e-5; = p2302*p1082
- p1134: 755441; = if(p1121=0;p1128*(p0716/100)*p0703*1000;0)
- p0852: 0; = p0847*p0851^3+p0848*p0851^2+p0849*p0851+p0850
- p0538: 0; = IF(p0274<0.5;-SQRT(p0007*EXP(p0406^2*p0008)-p0007);SQRT(p0007*EXP(p0406^2*p0008)-p0007))
- p2498: 0.000530943; = p2302*p1073
- p0042: 5504.24
- p1236: 0; = if(p1232>0;0;p0728/100)
- p4046: 4.90974e-5; = p1903*p3478
- p5258: 1.95738e-8; = p1879*p3484
- p1894: 0.000113105; = p1486*1000/p0818
- p0945: 0; = if(and(p0683=0;p0951=0);p0939;0)
- p1984: 30
- p1883: 0
- p0961: 0; = if(and(p0683>0;or(p0807=480;p0807=32;p0807=1;and(p0807=60;p0901<0.03)));p0937;0)
- p1169: 0.000482248
- p1313: 0; = p1307*p1252/p0818
- p0006: 15
- p3043: 3.42978e-5; = p2262*p1082
- p1227: 0.00197955; = IF(p1221=0;0;p1226*p0001/(p0818*p0002))
- p1075: 0.13907; = IF(p1071=0;p0713/100;0)
- p3390: 0; = p3371*p1234
- p1800: 0
- p4633: 0.00015529; = p1872*p3481
- p3013: 0; = p2427*(p1079+p1081)
- p3057: 0; = p2276*p1023
- p1550: 0
- p3032: 0; = p2251*p1023
- p3408: 0; = p3370*p1238
- p5070: 3.6183e-6; = p1897*p3483
- p2625: 0; = p2429*p1123
- p0044: 81.672
- p2208: 0.00564609; = p1110/p0818
- p0376: 0.5
- p0870: 463297; = p0858*p0856
- p1813: 0
- p2455: 0.00244877; = p2259*p1073
- p1008: 0; = p1004*p0001*p0004/(p0818*p0002)
- p2516: 1.08469e-5; = p2320*p1014
- p3161: 2.39881e-6; = p2380*p1082
- p0481: 0; = SQRT(2)*(IF((2*p0349-1)<0;-1;IF((2*p0349-1)>0;1;0))*SQRT(SQRT((2/(pi()*0.140012289)+LN(1-(2*p0349-1)^2)/2)^2-LN(1-(2*p0349-1)^2)/0.140012289)-(2/(pi()*0.140012289)+LN(1-(2*p0349-1)^2)/2)))
- p4988: 9.53113e-7; = p1815*p3483
- p3558: 7.24854e-6; = p1827*p3476
- p0808: 1.983e6
- p2528: 0.000202097; = p2332*p1014
- p1125: 0.1441; = if(p1121=0;p0719/100;0)
- p3458: 0; = p3363*p1241
- p3195: 0; = p2414*p1082
- p1793: 0
- p2291: 3.11102e-5; = p2223*p2198
- p0919: 0; = p0678*1000/p0801
- p1907: 0
- p1585: 0
- p1726: 0.686898
- p1219: 0; = if(p1218=0;0;SQRT(2)*(IF((2*p1218-1)<0;-1;IF((2*p1218-1)>0;1;0))*SQRT(SQRT((2/(pi()*0.140012289)+LN(1-(2*p1218-1)^2)/2)^2-LN(1-(2*p1218-1)^2)/0.140012289)-(2/(pi()*0.140012289)+LN(1-(2*p1218-1)^2)/2))))
- p0169: 0.022
- p1991: 3.18507e8; = (if(p1111=0;0;p1106/p1111)+if(p1112=0;0;p1107/p1112)+if(p1113=0;0;p1108/p1113)+if(p1114=0;0;p1109/p1114)+if(p1115=0;0;p1110/p1115))*(1+p1157)
- p2311: 0.00459401; = p2231*p2218
- p5131: 4.19336e-6; = p1962*p3483
- p0047: 10.054
- p0358: 0.5
- p2037: 3.44
- p3191: 0; = p2410*p1023
- p3305: 0; = if(and(p1232=0;p3252<>0);1-(p3301+p3302+p3303+p3304);0)
- p4735: 0; = p1768*p3482
- p5124: 9.12518e-6; = p1951*p3483
- p2913: 4.00841e-5; = p2327*(p1020+p1022)
- p1853: 0
- p0056: 29.408
- p1209: 3.93436; = p1206*p0818*p0822/p0801
- p1144: 1.70524e-5; = if(p1121=0;p1138*p0001/(p0818*p0002);0)
- p1234: 0; = if(p1232>0;0;p0726/100)
- p1066: 0.0224904; = IF(p1012=0;p1052/(p1059*p0818);0)
- p2465: 0.00102803; = p2269*p1073
- p1665: 0
- p3103: 0; = p2322*p1023
- p0012: 3361.93
- p0974: 0.5
- p2933: 1.472e-5; = p2347*(p1079+p1081)
- p1720: 0
- p2088: 0.798875
- p1610: 0
- p1605: 0
- p0910: 0.0204542; = p0909/p0818
- p0440: 0; = SQRT(2)*(IF((2*p0308-1)<0;-1;IF((2*p0308-1)>0;1;0))*SQRT(SQRT((2/(pi()*0.140012289)+LN(1-(2*p0308-1)^2)/2)^2-LN(1-(2*p0308-1)^2)/0.140012289)-(2/(pi()*0.140012289)+LN(1-(2*p0308-1)^2)/2)))
- p0723: 5504.24; = p0063*(1+p0591*p0195/100)
- p2845: 0.000789241; = p2259*(p1079+p1081)
- p0734: 0
- p4600: 4.52271e-7; = p1839*p3481
- p1949: 0
- p1172: 1.07e-6; = p1170/p0818
- p1579: 0
- p2755: 0.000933729; = p2364*(p1019+p1021)
- p0792: 0
- p0966: 0.94556; = if(p0683=0;0;IF(p0684/100+p0965=1;0;1-(p0684/100+p0965)))
- p1631: 0
- p1921: 0
- p5130: 1.05901e-7; = p1957*p3483
- p2974: 3.84472e-5; = p2388*(p1079+p1081)
- p0438: 0; = SQRT(2)*(IF((2*p0306-1)<0;-1;IF((2*p0306-1)>0;1;0))*SQRT(SQRT((2/(pi()*0.140012289)+LN(1-(2*p0306-1)^2)/2)^2-LN(1-(2*p0306-1)^2)/0.140012289)-(2/(pi()*0.140012289)+LN(1-(2*p0306-1)^2)/2)))
- p3220: 0.00496152; = p3216*p1228
- p1192: 1.89885e-7; = p1188*p1191/p0818
- p0370: 0.5
- p4667: 5.29803e-6; = p1906*p3481
- p1271: 0; = IF(p1267+p1270=p1259;0;IF(p1267+p1270+p1269>p1259;p1259-(p1267+p1270);p1269))
- p1696: 0
- p0505: 0; = SQRT(2)*(IF((2*p0373-1)<0;-1;IF((2*p0373-1)>0;1;0))*SQRT(SQRT((2/(pi()*0.140012289)+LN(1-(2*p0373-1)^2)/2)^2-LN(1-(2*p0373-1)^2)/0.140012289)-(2/(pi()*0.140012289)+LN(1-(2*p0373-1)^2)/2)))
- p3171: 2.90646e-5; = p2390*p1132
- p3121: 1.52372e-6; = p2340*p1082
- p1089: 0.000523435; = IF(p1071=0;p1083*p0001/(p0818*p0002);0)
- p3351: 0; = if(and(p1232=0;p3256<>0);p3256*(p3274-p3346)/p3349;0)
- p1053: 7.42899e6; = IF(p1012=0;p1046*p1036;0)
- p3403: 0; = p3365*p1238
- p2042: 0.07
- p0348: 0.5
- p3027: 0; = p2246*p1023
- p1580: 0
- p1882: 0
- p0686: 1782.68; = p0026*(1+p0554*p0158/100)
- p1549: 6
- p2139: 3.34471e-6; = p2015*p2067*p2101/(p0818*1000)
- p1961: 0.5
- p1024: 1.67068e6; = IF(p1012=0;p1014*(p0704/100)*p0703*1000;0)
- p1122: 0; = p1121*p0001/(p0818*p0002)
- p2873: 0.00213248; = p2287*(p1020+p1022)
- p1128: 0.4667; = if(p1121=0;IF(p1123=1;0;IF(p1123+p1124>1;1-p1123;p1124));0)
- p1084: 1.40816e6; = IF(p1071=0;p1078*(p0710/100)*p0703*1000;0)
- p2746: 0.00136018; = p2355*(p1019+p1021)
- p3299: 0; = if(p1303+p1304+p1305+p1306=0;0;p1303/(p1303+p1304+p1305+p1306))
- p2061: 0.518824
- p1522: 482
- p3127: 3.94361e-7; = p2346*p1082
- p0947: 0; = if(and(p0683=0;or(p0807=480;p0807=32;p0807=1;and(p0807=60;p0901<0.03)));p0935;0)
- p0806: 5.1943e6; = p0804+p0805
- p1963b: 2.78016e-5; = p1569*p1773+p1570*p1774+p1571*p1775+p1572*p1776+p1573*p1777+p1574*p1778+p1575*p1779+p1576*p1780+p1577*p1781+p1578*p1782+p1579*p1783+p1580*p1784+p1581*p1785+p1582*p1786+p1583*p1787+p1584*p1788+p1585*p1789+p1586*p1790+p1587*p1791
- p3024: 0; = p2243*p1023
- p0238: 5.635
- p2221: 0.00138995; = p1155-p2220
- p2165: 1.50462; = (p0833-p2014)/p0818-p0839
- p1979: 9.4805e7; = p0973
- p3396: 0; = p3377*p1234
- p2885: 0.000285086; = p2299*(p1079+p1081)
- p1670: 0
- p2838: 7.05e-6; = p2252*(p1020+p1022)
- p0498: 0; = SQRT(2)*(IF((2*p0366-1)<0;-1;IF((2*p0366-1)>0;1;0))*SQRT(SQRT((2/(pi()*0.140012289)+LN(1-(2*p0366-1)^2)/2)^2-LN(1-(2*p0366-1)^2)/0.140012289)-(2/(pi()*0.140012289)+LN(1-(2*p0366-1)^2)/2)))
- p1828: 1.60432e-6; = p1420*1000/p0818
- p2158: 1.78547e-6; = p2015*p2082*p2120/(p0818*1000)
- p1792: 0
- p2362: 0.00106099; = p2225*p2190
- p0859: 0; = p0671*1000/p0856
- p2204: 0.0145235; = p1109/p0818
- p2771: 7.0869e-5; = p2380*(p1078+p1080)
- p2966: 2.37271e-5; = p2380*(p1079+p1081)
- p0873: 0; = p0872*p0001*p0003/(p0818*p0002)
- p2604: 0; = p2408*p1014
- p2793: 0; = p2402*(p1019+p1021)
- p0904: 2.95766e8; = p0825*p0901+(p0830+p0895)*p0824*p0903
- p3341: 0; = if(and(p1232=0;p3254<>0);p3254*(p3271-p3336)/p3338;0)
- p1690: 0.624955
- p1311: 0; = IF(p1307+p1310=p1266;0;IF(p1307+p1310+p1309>p1266;p1266-(p1307+p1310);p1309))
- p2166: 1.29623; = p2165*p0824
- p2804: 0; = p2413*(p1019+p1021)
- p0223: 17.842
- p1855: 0.000123533; = p1447*1000/p0818
- p4918: 0; = p1951*p3482
- p1081: 0; = IF(p1071=0;IF(p1073+p1078+p1079+p1080=1;0;IF(p1073+p1078+p1079+p1080+p1077>1;1-(p1073+p1078+p1079+p1080);p1077));0)
- p2764: 0.000167703; = p2373*(p1019+p1021)
- p1191: 0.5
- p2538: 9.13025e-6; = p2342*p1073
- p0482: 0; = SQRT(2)*(IF((2*p0350-1)<0;-1;IF((2*p0350-1)>0;1;0))*SQRT(SQRT((2/(pi()*0.140012289)+LN(1-(2*p0350-1)^2)/2)^2-LN(1-(2*p0350-1)^2)/0.140012289)-(2/(pi()*0.140012289)+LN(1-(2*p0350-1)^2)/2)))
- p0385: 0.5
- p0711: 43.149; = p0051*(1+p0579*p0183/100)
- p4585: 8.10857e-6; = p1824*p3481
- p2787: 0; = p2396*(p1019+p1021)
- p1039: 0.0667372
- p3193: 0; = p2412*p1023
- p5224: 6.83304e-7; = p1845*p3484
- p0218: 8.269
- p2763: 0.00116523; = p2372*(p1019+p1021)
- p3128: 1.48819e-6; = p2347*p1082
- p0277: 0.5
- p3404: 0; = p3366*p1238
- p0116: 22.178
- p1908: 0
- p1913: 0
- p0853: 0; = p0803/(p0802+p0803)
- p4176: 7.08744e-6; = p1827*p3479
- p2031: 0.465411
- p4327: 5.52514e-7; = p1772*p3480
- p2054: 0.91
- p0837: 0.5
- p1731: 0
- p0813: 1.56522; = if(p0807=480;1.56521739130435;0)
- p2891: 4.98637e-6; = p2305*(p1079+p1081)
- p0433: 0; = SQRT(2)*(IF((2*p0301-1)<0;-1;IF((2*p0301-1)>0;1;0))*SQRT(SQRT((2/(pi()*0.140012289)+LN(1-(2*p0301-1)^2)/2)^2-LN(1-(2*p0301-1)^2)/0.140012289)-(2/(pi()*0.140012289)+LN(1-(2*p0301-1)^2)/2)))
- p1898: 0
- p2864: 3.58316e-5; = p2278*(p1020+p1022)
- p2887: 0.000378415; = p2301*(p1079+p1081)
- p2963: 3.95284e-5; = p2377*(p1079+p1081)
- p1515: 15
- p2624: 0; = p2428*p1123
- p1262: 0; = if(p1232>0;0;p0733/100)
- p1213: 5
- p2279: 0.000629951; = p2223*p2185
- p2979: 0; = p2393*(p1020+p1022)
- p0033: 95.686
- p1276: 0; = p1272*p1252/p0818
- p0635: 0; = IF(p0371<0.5;-SQRT(p0007*EXP(p0503^2*p0008)-p0007);SQRT(p0007*EXP(p0503^2*p0008)-p0007))
- p0816: 0
- p0868: 0; = IF(p0858+p0864+p0865+p0866+p0867=1;0;IF(p0858+p0864+p0865+p0866+p0867+p0863>1;1-(p0858+p0864+p0865+p0866+p0867);p0863))
- p1264: 0; = if(p1232>0;0;IF(p1259+p1263=1;0;IF(p1259+p1263+p1261>1;1-(p1259+p1263);p1261)))
- p0879: 5.031; = p0878*p0001*p0003/(p0818*p0002)
- p0807: 480
- p4754: 0; = p1787*p3482
- p0381: 0.5
- p0669: 11.6125; = p0009*(1+p0537*p0141/100)
- p3336: 0; = IF(or(p3254=0;p1232>0);0;p3271*p3289)
- p2504: 0.00114673; = p2308*p1073
- p1653: 0
- p1379: 86
- p3244: 0; = p0791/100
- p1774: 0
- p3281: 0
- p1806: 8.02161e-6; = p1398*1000/p0818
- p0246: 21.718
- p2218: 0.00782875; = p1150/p0818
- p0948: 0; = if(and(p0683=0;or(p0807=480;p0807=32;p0807=1;and(p0807=60;p0901<0.03)));p0936;0)
- p5043: 2.11803e-7; = p1870*p3483
- p0141: 40.7491
- p2070: 0.282
- p0581: 0; = IF(p0317<0.5;-SQRT(p0007*EXP(p0449^2*p0008)-p0007);SQRT(p0007*EXP(p0449^2*p0008)-p0007))
- p1567: 0
- p1965: 0.00705985; = p1963+p1959*p1964*1000/p0818
- p4136: 5.91766e-6; = p1787*p3479
- p3982: 8.52808e-7; = p1839*p3478
- p0508: 0; = SQRT(2)*(IF((2*p0376-1)<0;-1;IF((2*p0376-1)>0;1;0))*SQRT(SQRT((2/(pi()*0.140012289)+LN(1-(2*p0376-1)^2)/2)^2-LN(1-(2*p0376-1)^2)/0.140012289)-(2/(pi()*0.140012289)+LN(1-(2*p0376-1)^2)/2)))
- p0802: 5.232e6
- p2955: 6.17723e-6; = p2369*(p1020+p1022)
- p1286: 0; = p1282*p1252/p0818
- p4252: 5.54609e-5; = p1903*p3479
- p2663: 0.0011827; = p2272*(p1128+p1130)
- p0427: 0; = SQRT(2)*(IF((2*p0295-1)<0;-1;IF((2*p0295-1)>0;1;0))*SQRT(SQRT((2/(pi()*0.140012289)+LN(1-(2*p0295-1)^2)/2)^2-LN(1-(2*p0295-1)^2)/0.140012289)-(2/(pi()*0.140012289)+LN(1-(2*p0295-1)^2)/2)))
- p1911: 0.000211771; = p1503*1000/p0818
- p0785: 0
- p1617: 0
- p2607: 0; = p2411*p1014
- p1633: 0
- p2076: 0.057
- p3576: 2.70237e-5; = p1845*p3476
- p0699: 0
- p3248: 0
- p1698: 0
- p0439: 0; = SQRT(2)*(IF((2*p0307-1)<0;-1;IF((2*p0307-1)>0;1;0))*SQRT(SQRT((2/(pi()*0.140012289)+LN(1-(2*p0307-1)^2)/2)^2-LN(1-(2*p0307-1)^2)/0.140012289)-(2/(pi()*0.140012289)+LN(1-(2*p0307-1)^2)/2)))
- p0161: 0.608
- p2981: 0; = p2395*(p1020+p1022)
- p1818: 0
- p2374: 0.00444589; = p2225*p2203
- p1161: 5.532e6; = p0801
- p0261: 27.915
- p2236: 0; = 1-(p2230+p2231+p2232+p2233)
- p3415: 0; = p3377*p1238
- p3100: 0; = p2319*p1023
- p2282: 0.00425798; = p2223*p2188
- p1038: 0.00527766
- p3059: 0; = p2278*p1023
- p2636: 0.000523639; = p2245*(p1019+p1021)
- p0593: 0; = IF(p0329<0.5;-SQRT(p0007*EXP(p0461^2*p0008)-p0007);SQRT(p0007*EXP(p0461^2*p0008)-p0007))
- p1570: 0
- p0046: 28.991
- p2237: 0.0163533; = p2222*p2182
- p5249: 2.13532e-8; = p1870*p3484
- p3147: 0; = p2366*p1023
- p2811: 0; = p2420*(p1078+p1080)
- p1315: 0; = p1311*p1252/p0818
- p2062: 3.76588
- p2107: 0.881623
- p1123: 0.35976; = if(p1121=0;p0717/100;0)
- p1003: 0; = p0999*p0888
- p0114: 39.824
- p3045: 6.69666e-6; = p2264*p1082
- p2743: 0; = p2352*(p1128+p1130)
- p2772: 3.0599e-5; = p2381*(p1078+p1080)
- p0059: 14.41
- p0274: 0.5
- p2551: 0.00116894; = p2355*p1014
- p1342: 1.15644e6; = p1326*p0801
- p3174: 0; = p2393*p1023
- p2320: 2.91866e-5; = p2224*p2187
- p1036: 2.81476e8; = IF(p1012=0;p0795*p0702*1000*p0796/100;0)
- p1944: 0
- p1905: 0
- p1962: 9.5289e-5; = p1960*1000/p0818
- p1963c: 1.74876e-5; = p1588*p1792+p1589*p1793+p1590*p1794+p1591*p1795+p1592*p1796+p1593*p1797+p1594*p1798+p1595*p1799+p1596*p1800+p1597*p1801+p1598*p1802+p1599*p1803+p1600*p1804+p1601*p1805+p1602*p1806+p1603*p1807+p1604*p1808+p1605*p1809+p1606*p1810+p1607*p1811
- p1067: 0.0141887; = IF(p1012=0;p1053/(p1060*p0818);0)
- p1988: 750
- p5285: 2.91828e-7; = p1906*p3484
- p1729: 0
- p2574: 0.0010183; = p2378*p1073
- p1674: 0
- p1938: 0
- p2585: 0.000252036; = p2389*p1123
- p2375: 0.000970493; = p2229*p2204
- p2384: 5.19858e-5; = p2229*p2213
- p5282: 1.43423e-6; = p1903*p3484
- p1757: 0
- p2766: 0.000403123; = p2375*(p1078+p1080)
- p2180: 2.29358e-7; = p3233*p1188/(p0818)
- p2398: 0; = p2234*p2187
- p1225: 1.088; = IF(p1221=0;0;p1223+1.2*p1224)
- p0782: 29.408; = p0122*(1+p0650*p0254/100)
- p0322: 0.5
- p2051: 0.00029539; = p2015*p2049*p2050/(p0818*1000)
- p4164: 3.71574e-6; = p1815*p3479
- p2646: 0.00132986; = p2255*(p1019+p1021)
- p1643: 0
- p4279: 3.31664e-5; = p1930*p3479
- p2914: 0.000396233; = p2328*(p1020+p1022)
- p3421: 0; = p3364*p1239
- p3385: 0; = p3366*p1234
- p1194: 1.48
- p1686: 0
- p2649: 0.00260645; = p2258*(p1078+p1080)
- p4153: 1.23858e-6; = p1804*p3479
- p1956: 0
- p4960: 1.51792e-6; = p1787*p3483
- p0523: 0; = SQRT(2)*(IF((2*p0391-1)<0;-1;IF((2*p0391-1)>0;1;0))*SQRT(SQRT((2/(pi()*0.140012289)+LN(1-(2*p0391-1)^2)/2)^2-LN(1-(2*p0391-1)^2)/0.140012289)-(2/(pi()*0.140012289)+LN(1-(2*p0391-1)^2)/2)))
- p2812: 0; = p2421*(p1078+p1080)
- p2150: 1.20976e-6; = p2015*p2078*p2112/(p0818*1000)
- p2960: 0.000871038; = p2374*(p1020+p1022)
- p1955: 0.00123292; = p1547*1000/p0818
- p2834: 0.00246656; = p2248*(p1020+p1022)
- p1799: 0
- p3462: 0; = p3367*p1241
- p3311: 0; = if(and(p1232=0;p3252<>0);p3252-(p3306+p3307+p3308+p3309+p3310);0)
- p3005: 0; = p2419*(p1079+p1081)
- p1953: 0
- p2985: 0; = p2399*(p1020+p1022)
- p2274: 0.000258916; = p2230*p2220
- p1214: 4; = IF(p1213=0;0;p1213-1)
- p1663: 0
- p3020: 0; = p2239*p1023
- p1914: 0
- p2728: 0.000104728; = p2337*(p1078+p1080)
- p1788: 0
- p3232: 3.01528e-7; = p1182/p0818
- p3440: 0; = p3364*p1240
- p3129: 1.24578e-7; = p2348*p1082
- p2497: 0.0011741; = p2301*p1073
- p0090: 1.773
- p2849: 0.000153411; = p2263*(p1079+p1081)
- p4466: 1.89433e-6; = p1911*p3480
- p2097: 0.40001
- p0216: 6.909
- p2507: 0.00165274; = p2311*p1123
- p2145: 4.02036e-6; = p2015*p2073*p2107/(p0818*1000)
- p0787: 38.792; = p0127*(1+p0655*p0259/100)
- p0185: 25.944
- p4583: 3.55356e-7; = p1822*p3481
- p2143: 1.6195e-6; = p2015*p2071*p2105/(p0818*1000)
- p2510: 0.000293435; = p2314*p1123
- p1250: 0; = if(p1232>0;0;p1245*p0001/(p0818*p0002))
- p0698: 0
- p3365: 0; = if(p1232=0;p3244*p3359/p0818;0)
- p1927: 0
- p0973: 9.4805e7; = p0967+p0968+p0969
- p1746: 0
- p2403: 0; = p2234*p2192
- p2280: 0.00231267; = p2223*p2186
- p1985: 7.96263e8; = (if(p1057=0;0;p1050/p1057)+if(p1058=0;0;p1051/p1058)+if(p1059=0;0;p1052/p1059)+if(p1060=0;0;p1053/p1060)+if(p1061=0;0;p1054/p1061)+if(p1062=0;0;p1055/p1062)+if(p1063=0;0;p1056/p1063))*(1+p1157)
- p4658: 6.62254e-6; = p1897*p3481
- p1619: 0
- p0474: 0; = SQRT(2)*(IF((2*p0342-1)<0;-1;IF((2*p0342-1)>0;1;0))*SQRT(SQRT((2/(pi()*0.140012289)+LN(1-(2*p0342-1)^2)/2)^2-LN(1-(2*p0342-1)^2)/0.140012289)-(2/(pi()*0.140012289)+LN(1-(2*p0342-1)^2)/2)))
- p1872: 0.00192799; = p1464*1000/p0818
- p2222: 0.355042; = if(p0765*p0769+p0766*p0770+p0767*p0771+p0768*p0772=0;0;p0769*p0765/(p0765*p0769+p0766*p0770+p0767*p0771+p0768*p0772))
- p2505: 9.59932e-5; = p2309*p1073
- p0574: 0; = IF(p0310<0.5;-SQRT(p0007*EXP(p0442^2*p0008)-p0007);SQRT(p0007*EXP(p0442^2*p0008)-p0007))
- p3329: 0; = if(and(p1232=0;p3255<>0);p3255*(p3266-p3324)/p3327;0)
- p1308: 0
- p2035: 3.99583e-5; = p2015*p2029*(1-p2031)/(p0818*1000)
- p3307: 0; = if(and(p1232=0;p3252<>0);p3252*(p3258-p3302)/p3305;0)
- p0789: 4.729; = p0129*(1+p0657*p0261/100)
- p3949: 1.2183e-6; = p1806*p3478
- p2696: 1.48935e-5; = p2305*(p1078+p1080)
- p4684: 4.84576e-7; = p1923*p3481
- p3283: 0
- p2747: 8.01539e-5; = p2356*(p1019+p1021)
- p0267: 10.385
- p1963f: 4.12726e-5; = p1647*p1851+p1648*p1852+p1649*p1853+p1650*p1854+p1651*p1855+p1652*p1856+p1653*p1857+p1654*p1858+p1655*p1859+p1656*p1860+p1657*p1861+p1658*p1862+p1659*p1863+p1660*p1864+p1661*p1865+p1662*p1866+p1663*p1867+p1664*p1868+p1665*p1869+p1666*p1870
- p0628: 0; = IF(p0364<0.5;-SQRT(p0007*EXP(p0496^2*p0008)-p0007);SQRT(p0007*EXP(p0496^2*p0008)-p0007))
- p0991: 0; = p0987*p0886
- p1274: 0; = p1270*p1252/p0818
- p2526: 1.01383e-6; = p2330*p1014
- p2905: 3.97313e-5; = p2319*(p1020+p1022)
- p3070: 0; = p2289*p1023
- p2458: 0.00105257; = p2262*p1073
- p3448: 0; = p3372*p1240
- p0351: 0.5
- p1179: 0.5
- p0425: 0; = SQRT(2)*(IF((2*p0293-1)<0;-1;IF((2*p0293-1)>0;1;0))*SQRT(SQRT((2/(pi()*0.140012289)+LN(1-(2*p0293-1)^2)/2)^2-LN(1-(2*p0293-1)^2)/0.140012289)-(2/(pi()*0.140012289)+LN(1-(2*p0293-1)^2)/2)))
- p1755: 0
- p3335: 0; = IF(or(p3254=0;p1232>0);0;p3270*(p3280*(p3283*p1256+p3286*(p1253+p1257)+p1258*p3288+p3300*p3287)))
- p2449: 2.94022e-5; = p2253*p1014
- p2710: 8.76961e-5; = p2319*(p1019+p1021)
- p3816: 1.60225e-6; = p1879*p3477
- p2074: 0.025
- p3041: 2.58388e-5; = p2260*p1082
- p0756: 62.228; = p0096*(1+p0624*p0228/100)
- p4806: 0; = p1839*p3482
- p2196: 0.0751378; = p1068-p2193-p2195

## Reference product
- cotton lint; at harvest in 1997; at farm; 90%-93% moisture: 1 kg

## Inputs from technosphere
- CUTOFF N inhibitor appl svc; unspec rate & type, 1997 cotton: 0.00221878 ha; = p1162
- CUTOFF sewage sludge storage: 1.89885e-7 kg*a; = p1192
- CUTOFF pesticide, Cypermethrin; at point-of-sale; kg AI: 8.02161e-6 kg; = p1806
- CUTOFF apply pesticide; as foliar or directed spray: 0.000757403 ha; = p1339
- CUTOFF apply K fertilizer; broadcast without incorporation: 8.34663e-5 ha; = p1141
- CUTOFF apply P fertilizer; no broadcast application: 0.000523435 ha; = p1089
- CUTOFF irrigate; unspecified irrigation method, surface water source, in 1997: 3.16475e-7 ha-m; = p1009
- CUTOFF phosphatic fertilizer, diammonium phosphate; at point-of-sale: 0.0672296 kg; = p1119
- CUTOFF apply N fertilizer; broadcast without incorporation: 0.000161731 ha; = p1032
- CUTOFF gypsum; at point-of-sale: 1.64769e-5 kg; = p1166
- CUTOFF phosphatic fertilizer, monoammonium phosphate; at point-of-sale: 0.0237381 kg; = p1120
- CUTOFF pesticide, Fluometuron; at point-of-sale; kg AI: 0.000154015 kg; = p1845
- CUTOFF domestic barge transport; average fuel: 0.141093 metric ton*km; = p2007
- CUTOFF pesticide, unspecified type; at point-of-sale; kg AI: 9.5289e-5 kg; = p1962
- CUTOFF pesticide, Pyrithiobac-sodium; at point-of-sale; kg AI: 6.01621e-6 kg; = p1923
- CUTOFF pesticide, Glyphosate; at point-of-sale; kg AI: 0.000123533 kg; = p1855
- CUTOFF pesticide, beta-Cyfluthrin; at point-of-sale; kg AI: 7.21945e-6 kg; = p1804
- CUTOFF pesticide formulation balance; at point-of-sale: 0.0040388 kg; = p1963
- CUTOFF pesticide, Lambda-cyhalothrin; at point-of-sale; kg AI: 4.81297e-6 kg; = p1870
- CUTOFF zinc compounds storage: 1.50764e-7 kg*a; = p1186
- CUTOFF apply gypsum; unspecified method: 0.00197955 ha; = p1165
- CUTOFF pesticide, Trifluralin; at point-of-sale; kg AI: 0.00123292 kg; = p1955
- CUTOFF pesticide, 1,1-Dimethylpiperidinium chloride; at point-of-sale; kg AI: 4.41189e-6 kg; = p1879
- CUTOFF pesticide, Clethodim; at point-of-sale; kg AI: 7.62053e-6 kg; = p1795
- CUTOFF pesticide, Endosulfan; at point-of-sale; kg AI: 4.13113e-5 kg; = p1827
- CUTOFF local area trucking; class 6, average fuel: 0.010582 metric ton*km; = p2010
- CUTOFF limestone, high-grade, pulverized; at point-of-sale: 0.082692 kg; = p1228
- CUTOFF pesticide, Carbofuran; at point-of-sale; kg AI: 3.44929e-5 kg; = p1787
- CUTOFF apply sewage sludge; unspecified method: 0.00197955 ha; = p1189
- CUTOFF pesticide, Endothall; at point-of-sale; kg AI: 1.60432e-6 kg; = p1828
- CUTOFF sulfur; at point-of-sale: 1.07e-6 kg; = p1172
- CUTOFF pesticide, Oxamyl; at point-of-sale; kg AI: 0.000119121 kg; = p1899
- CUTOFF apply mixed N fertilizer; with incorporation: 0.000229277 ha; = p1033
- CUTOFF pesticide, Prometryn; at point-of-sale; kg AI: 0.000211771 kg; = p1911
- CUTOFF nitrogenous fertilizer, ammonium nitrate; at point-of-sale: 0.0224904 kg; = p1066
- CUTOFF harvest; cotton, stripper harvested: 0.00046805 ha; = p1973
- CUTOFF apply N fertilizer; no broadcast application: 0.00059783 ha; = p1030
- CUTOFF apply sulfuric acid; unspecified method: 0.00197955 ha; = p1177
- CUTOFF phosphatic fertilizer, other single phosphates; at point-of-sale: 0.00459885 kg; = p1118
- CUTOFF pesticide, Ethephon; at point-of-sale; kg AI: 0.000328084 kg; = p1832
- CUTOFF prepare soil; for unspec. till, cotton: 0.00197955 ha; = p0939
- CUTOFF pesticide, Paraquat dichloride; at point-of-sale; kg AI: 0.000170058 kg; = p1901
- CUTOFF pesticide, Dimethoate; at point-of-sale; kg AI: 4.41189e-6 kg; = p1822
- CUTOFF apply pesticide; in seed furrow: 0.000413816 ha; = p1343
- CUTOFF pesticide storage: 0.00705985 kg*a; = p1965
- CUTOFF pesticide, Malathion ; at point-of-sale; kg AI: 0.00192799 kg; = p1872
- CUTOFF pesticide, Aldicarb; at point-of-sale; kg AI: 0.000110297 kg; = p1768
- CUTOFF sowing; for unspec. till, cotton: 0.00197955 ha; = p0963
- CUTOFF sulfuric acid; at point-of-sale: 2.93844e-7 kg; = p1178
- CUTOFF fertilizer storage: 0.236561 kg*a; = p1160
- CUTOFF pesticide, Dicrotophos; at point-of-sale; kg AI: 2.16584e-5 kg; = p1815
- cotton residue; at harvest in 1997; at farm; 80%-92% moisture: 1.51864 kg; = p0839
- CUTOFF pesticide, Sodium chlorate; at point-of-sale; kg AI: 0.000193321 kg; = p1930
- cottonseed; at harvest in 1997; at farm; 90%-93% moisture: 1.59069 kg; = p0819
- CUTOFF pesticide, Azinphos-Methyl; at point-of-sale; kg AI: 6.17664e-5 kg; = p1772
- CUTOFF apply K fertilizer; broadcast with incorporation: 0.000270324 ha; = p1140
- CUTOFF apply pesticide; broadcast with incorporation: 0.00142817 ha; = p1333
- CUTOFF pesticide, Pendimethalin; at point-of-sale; kg AI: 0.000323271 kg; = p1903
- CUTOFF apply pesticide; chiseled or injected/knifed in: 8.41161e-5 ha; = p1337
- CUTOFF apply pesticide; banded or side-dressed: 0.00164995 ha; = p1329
- CUTOFF pesticide, Zeta-Cypermethrin; at point-of-sale; kg AI: 2.40648e-6 kg; = p1957
- CUTOFF manure appl svc; unspec rate, 1997 cotton: 2.55656e-5 ha; = p1233
- CUTOFF pesticide, Propazine; at point-of-sale; kg AI: 0.000124736 kg; = p1889
- CUTOFF apply K fertilizer; no broadcast application: 0.000208382 ha; = p1139
- CUTOFF nitrogenous fertilizer, sodium nitrate; at point-of-sale: 0.000385933 kg; = p1069
- CUTOFF sulfur storage: 5.35e-7 kg*a; = p1174
- CUTOFF phosphatic fertilizer, superphos. grades 22% and under; at point-of-sale: 0.00085237 kg; = p1116
- CUTOFF nitrogenous fertilizer, aqueous ammonia; at point-of-sale: 0.00264809 kg; = p1065
- CUTOFF apply N fertilizer; broadcast with incorporation: 0.000466357 ha; = p1031
- CUTOFF potassic fertilizer, potassium chloride; at point-of-sale: 0.0188611 kg; = p1154
- CUTOFF nitrogenous fertilizer, urea; at point-of-sale: 0.044403 kg; = p1070
- CUTOFF apply zinc compounds; unspecified method: 0.00197955 ha; = p1183
- CUTOFF irrigate; pressure, groundwater source, in 1997: 9.65136e-5 ha-m; = p0993
- CUTOFF apply pesticide; unspecified application methods: 4.17195e-5 ha; = p1345
- CUTOFF pesticide, Acephate; at point-of-sale; kg AI: 3.68994e-5 kg; = p1762
- CUTOFF international vessel transport; average fuel: 1.31615 metric ton*km; = p2006
- CUTOFF fertilizer filler materials; at point-of-sale: 0.0901903 kg; = p1158
- CUTOFF harvest; cotton, spindle picked: 0.00140415 ha; = p1972
- CUTOFF apply single or mixed K fertilizer; unspec. method: 1.70524e-5 ha; = p1144
- CUTOFF zinc compounds; at point-of-sale: 3.01528e-7 kg; = p1184
- CUTOFF apply mixed N fertilizer; without incorporation: 0.000153431 ha; = p1034
- CUTOFF sulfuric acid storage: 1.46922e-7 kg*a; = p1180
- CUTOFF pesticide, Thidiazuron; at point-of-sale; kg AI: 5.29426e-5 kg; = p1942
- CUTOFF apply liming materials; unspecified method: 0.00197955 ha; = p1227
- CUTOFF pesticide, Diuron; at point-of-sale; kg AI: 0.000100671 kg; = p1824
- CUTOFF pesticide, Tribufos; at point-of-sale; kg AI: 0.000207359 kg; = p1951
- CUTOFF apply single or mixed P fertilizer; unspec. method: 1.7056e-5 ha; = p1094
- CUTOFF regional or national trucking; class 8, average fuel: 0.0345464 metric ton*km; = p2009
- CUTOFF apply sulfur; unspecified method: 0.00197955 ha; = p1171
- CUTOFF dolomite, pulverized; at point-of-sale: 0.00654477 kg; = p1229
- CUTOFF cotton seeds; seed, unspec. type; at point-of-sale: 0.0359544 kg; = p0972
- CUTOFF gypsum storage: 8.23845e-6 kg*a; = p1168
- CUTOFF nitrogenous fertilizer, anhydrous ammonia; at point-of-sale: 0.0561711 kg; = p1064
- CUTOFF nitrogenous fertilizer, ammonium sulfate; at point-of-sale: 0.0141887 kg; = p1067
- CUTOFF pesticide, Fluazifop-p-butyl; at point-of-sale; kg AI: 5.61513e-6 kg; = p1839
- CUTOFF cotton seeds; GMO herbicide resistant seed; at point-of-sale: 0.00207005 kg; = p0970
- CUTOFF irrigate; gravity, surface water source, in 1997: 1.68939e-6 ha-m; = p1006
- CUTOFF phosphatic fertilizer, superphosphate grades over 22%; at point-of-sale: 0.00697574 kg; = p1117
- CUTOFF irrigate; gravity, groundwater source, in 1997: 3.74712e-5 ha-m; = p0992
- CUTOFF nitrogenous fertilizer, nitrogen solutions; at point-of-sale: 0.118198 kg; = p1068
- CUTOFF seed storage; cotton: 0.0190122 kg*a; = p0975
- CUTOFF apply pesticide; broadcast by air: 0.00341503 ha; = p1331
- CUTOFF pesticide, Methyl parathion; at point-of-sale; kg AI: 5.73545e-5 kg; = p1888
- CUTOFF harvest; cotton residue management: 0.00197955 ha; = p1975
- CUTOFF liming materials storage: 0.0446184 kg*a; = p1231
- CUTOFF pesticide, MSMA; at point-of-sale; kg AI: 0.000113105 kg; = p1894
- CUTOFF sewage sludge; at point-of-sale: 3.7977e-7 kg; = p1190
- CUTOFF apply pesticide; broadcast without incorporation: 0.00161328 ha; = p1335
- CUTOFF apply P fertilizer; broadcast with incorporation: 0.000503892 ha; = p1090
- CUTOFF apply P fertilizer; broadcast without incorporation: 0.000168704 ha; = p1091
- CUTOFF pesticide, Norflurazon; at point-of-sale; kg AI: 8.22215e-5 kg; = p1897
- CUTOFF pesticide, Phorate; at point-of-sale; kg AI: 6.57772e-5 kg; = p1906
- CUTOFF bulk cargo rail transport; diesel: 0.264549 metric ton*km; = p2008
- CUTOFF potassic fertilizer, other single nutrients; at point-of-sale: 0.00218981 kg; = p1155

## Inputs from nature
- Potassium; from plant uptake; biogenic: 0.0262166 kg; = p0915
- Transformation, from annual crop [natural resource, land]: 19.7955 m2; = 1.0 * (p0883+p0879+p0877+p0875+p0871)
- Water, surface: 20.0586 kg; = p0889
- Occupation, annual crop [natural resource, land]: 9.94016 m2*year; = 1.0 * (p0855)
- Transformation, to annual crop [natural resource, land]: 19.7955 m2; = 1.0 * (p0857)
- Water, unspecified origin: 0.00080881 m3; = p0916*0.001
- Nitrogen: 0.118626 kg; = p0905
- Phosphorus: 0.0204542 kg; = p0910
- Carbon dioxide: 8.92796 kg; = p0900*3.6666666667
- Dry matter except CNPK; from plant uptake: 3.53631 kg; = p0917
- Water, ground: 1339.85 kg; = p0887

## Emissions to nature
- Cypermethrin [soil, agricultural]: 5.10843e-6 kg; = 1.0 * (p3537+p4361+p3949+p5185+p4979+p4155+p4567)
- Pendimethalin [air, non-urban air or from high stacks]: 0.000117401 kg; = 1.0 * (p3840)
- Phosphorous; applied in sewage sludge: 2.12043e-9 kg; = p3241
- Sodium chlorate [air, non-urban air or from high stacks]: 7.02077e-5 kg; = 1.0 * (p3867)
- Superphosphate, grades>22%; no broadcast in fert. in fall bef. plant.; kg P: 0.000272421 kg; = p2464
- Pesticide formulation balance; chiseled or injected/knifed in: 3.61279e-5 kg; = p4514
- Superphosphate, grades>22%; broadcast w/o incorp. in fert. in spr. bef. plant.; kg P: 9.79395e-5 kg; = p2893
- Carbon [soil, agricultural]: 0.845268 kg; = 1.0 * (p2167+p2173+p3242+p3217+p3225)
- Paraquat dichloride: 6.17594e-5 kg; = p3838
- Propanenitrile: 7.73745e-7 kg; = p2157*1.5277777778
- Monoammonium phosphate; unspec. appl. method in fert. in fall bef. plant.: 0.000127403 kg; = p3044*8.2142857143
- Other single phosphates; broadcast w/o incorp. in fert. at plant.; kg P: 1.23222e-6 kg; = p2934
- Methanol [air, non-urban air or from high stacks]: 3.96862e-5 kg; = 1.0 * (p2129*2.6666666667)
- Ethane [air, non-urban air or from high stacks]: 1.0973e-5 kg; = 1.0 * (p2126*1.25)
- Other single K nutrients; unspec. appl. method in fert. in spr. bef. plant.; kg K: 1.38182e-5 kg; = p3094
- Anhydrous ammonia; no broadcast in fert. at plant.: 0.000559478 kg; = p2511*1.2142857143
- Anhydrous ammonia; broadcast w/ incorp. in fert. in fall bef. plant.: 0.00858723 kg; = p2628*1.2142857143
- trans-2-Butene: 6.87598e-7 kg; = p2148*1.1666666667
- Anhydrous ammonia; broadcast w/o incorp. in fert. at plant.: 0.000294944 kg; = p2901*1.2142857143
- Diammonium phosphate; no broadcast in fert. after plant.: 0.00178546 kg; = p2572*4.7142857143
- Sodium nitrate; no broadcast in fert. in spr. bef. plant.: 4.27679e-5 kg; = p2486*6.0714285714
- Methyl parathion [air, non-urban air or from high stacks]: 2.08292e-5 kg; = 1.0 * (p3825)
- Glyphosate [air, non-urban air or from high stacks]: 4.4863e-5 kg; = 1.0 * (p3792)
- Carbon dioxide, in air: 0.0154556 kg; = p2163*3.6666666667
- Particulates, < 2.5 um [air, non-urban air or from high stacks]: 7.47458e-5 kg; = 1.0 * (p2033+p2035)
- Ammonium nitrate; no broadcast in fert. after plant.: 0.00410642 kg; = p2554*4.7142857143
- Nitrogen solution; no broadcast in fert. after plant.; no broadcast in fert. after plant.; kg N: 0.00409958 kg; = p2561
- Propane [air, non-urban air or from high stacks]: 3.40087e-6 kg; = 1.0 * (p2142*1.2222222222)
- Carbofuran: 1.25267e-5 kg; = p3724
- Acetaldehyde [air, non-urban air or from high stacks]: 1.50185e-5 kg; = 1.0 * (p2130*1.8333333333)
- Nitrogen solution; broadcast w/o incorp. in fert. in fall bef. plant.; broadcast w/o incorp. in fert. in fall bef. pl...: 0.00246656 kg; = p2834
- Superphosphate, grades>22%; broadcast w/ incorp. in fert. after plant.; kg P: 4.05605e-5 kg; = p2776
- Monoammonium phosphate; no broadcast in fert. in spr. bef. plant.: 0.00436132 kg; = p2498*8.2142857143
- Anhydrous ammonia; broadcast w/o incorp. in fert. after plant.: 0.00340887 kg; = p2940*1.2142857143
- Other single K nutrients; no broadcast in fert. in fall bef. plant.; kg K: 9.31476e-5 kg; = p2470
- Metolachlor [air, non-urban air or from high stacks]: 4.53e-5 kg; = 1.0 * (p3826)
- Magnesium [soil, agricultural]: 0.000830125 kg; = 1.0 * (p3227)
- Methyl vinyl ether; from residue burning: 9.15866e-7 kg; = p2137*1.6111111111
- Superphosphate, grades<= 22%; unspec. appl. method in fert. at plant.; kg P: 2.0078e-8 kg; = p3125
- Oxamyl [soil, agricultural]: 7.58602e-5 kg; = 1.0 * (p4660+p4248+p4454+p3630+p5072+p4042+p5278)
- Pesticide formulation balance; banded or side-dressed: 0.000708654 kg; = p3690
- Ammonium sulfate; broadcast w/o incorp. in fert. in spr. bef. plant.: 0.000844751 kg; = p2869*4.7142857143
- Oxamyl: 4.32607e-5 kg; = p3836
- Potassium; in above-ground residue left on field; biogenic: 0.00216147 kg; = p2170
- Cyfluthrin [soil, agricultural]: 4.59759e-6 kg; = 1.0 * (p3947+p3535+p4977+p4153+p4359+p5183+p4565)
- Other single K nutrients; no broadcast in fert. after plant.; kg K: 2.57505e-5 kg; = p2587
- Ammonium nitrate; broadcast w/o incorp. in fert. after plant.: 0.00216481 kg; = p2944*4.7142857143
- Phosphorous; in above-ground residue left on field: 0.00285171 kg; = p2169
- Superphosphate, grades>22%; no broadcast in fert. in spr. bef. plant.; kg P: 0.000303875 kg; = p2503
- Superphosphate, grades>22%; broadcast w/o incorp. in fert. after plant.; kg P: 1.35797e-5 kg; = p2971
- Other single phosphates; no broadcast in fert. at plant.; kg P: 3.82318e-6 kg; = p2544
- Ammonium sulfate; broadcast w/ incorp. in fert. in fall bef. plant.: 0.00215666 kg; = p2635*4.7142857143
- Calcium [soil, agricultural]: 0.0325934 kg; = 1.0 * (p3218+p3226)
- Potassium chloride; no broadcast in fert. in fall bef. plant.: 0.00202092 kg; = p2468*2.2166666667
- Water [air, non-urban air or from high stacks]: 1.94129e-6 m3; = 0.001 * (p2016)
- Furan [air, non-urban air or from high stacks]: 1.32092e-6 kg; = 1.0 * (p2138*1.4166666667)
- Potassium chloride; broadcast w/o incorp. in fert. after plant.: 0.000223777 kg; = p2975*2.2166666667
- Aqueous ammonia; broadcast w/o incorp. in fert. in fall bef. plant.: 5.03262e-5 kg; = p2825*1.2142857143
- Trifluralin [soil, agricultural]: 0.000785166 kg; = 1.0 * (p5128+p5334+p4304+p3686+p4716+p4510+p4098)
- Dioxins and furans (PCDD/F); from residue burning: 3.62258e-13 kg TEQ; = p2047
- Phenol [air, non-urban air or from high stacks]: 6.2631e-6 kg; = 1.0 * (p2133*1.3055555556)
- Urea; no broadcast in fert. after plant.: 0.005007 kg; = p2568*5
- Sodium nitrate; no broadcast in fert. at plant.: 3.75023e-6 kg; = p2525*6.0714285714
- Pyrithiobac sodium salt: 2.18489e-6 kg; = p3860
- Pyrithiobac sodium salt [soil, agricultural]: 3.83132e-6 kg; = 1.0 * (p4272+p5096+p5302+p4478+p4066+p4684+p3654)
- Potassium chloride; broadcast w/ incorp. in fert. after plant.: 0.000724751 kg; = p2780*2.2166666667
- Superphosphate, grades>22%; broadcast w/ incorp. in fert. in spr. bef. plant.; kg P: 0.00029253 kg; = p2698
- Diammonium phosphate; broadcast w/o incorp. in fert. in spr. bef. plant.: 0.0041503 kg; = p2884*4.7142857143
- Superphosphate, grades<= 22%; broadcast w/o incorp. in fert. in fall bef. plant.; kg P: 4.47023e-6 kg; = p2852
- Endosulfan [soil, agricultural]: 2.63084e-5 kg; = 1.0 * (p4382+p3970+p5000+p5206+p3558+p4176+p4588)
- Sodium chlorate: 0.000123113 kg; = p5309+p4073+p4279+p5103+p4691+p3661+p4485
- Nitrogen; applied in sewage sludge: 1.77626e-8 kg; = p3240
- Nitrogen solution; broadcast w/ incorp. in fert. at plant.; broadcast w/ incorp. in fert. at plant.; kg N: 0.000412736 kg; = p2717
- Norflurazon [soil, agricultural]: 5.23614e-5 kg; = 1.0 * (p4452+p5070+p3628+p4246+p5276+p4658+p4040)
- Superphosphate, grades<= 22%; broadcast w/ incorp. in fert. in fall bef. plant.; kg P: 1.33519e-5 kg; = p2657
- Fluazifop-P-butyl [soil, agricultural]: 3.5759e-6 kg; = 1.0 * (p4600+p5012+p5218+p4188+p3570+p4394+p3982)
- Diammonium phosphate; broadcast w/o incorp. in fert. in fall bef. plant.: 0.00372071 kg; = p2845*4.7142857143
- Nitrogen solution; broadcast w/ incorp. in fert. in spr. bef. plant.; broadcast w/ incorp. in fert. in spr. bef. plan...: 0.00470686 kg; = p2678
- Ammonium sulfate; no broadcast in fert. in spr. bef. plant.: 0.0016024 kg; = p2479*4.7142857143
- Anhydrous ammonia; broadcast w/ incorp. in fert. after plant.: 0.00752416 kg; = p2745*1.2142857143
- Superphosphate, grades>22%; broadcast w/ incorp. in fert. at plant.; kg P: 1.16508e-5 kg; = p2737
- Tribufos: 7.53057e-5 kg; = p3888
- Methane: 3.97783e-5 kg; = p2025*1.3333333333
- Azinphos-methyl [soil, agricultural]: 3.93349e-5 kg; = 1.0 * (p4533+p3503+p3915+p5151+p4121+p4945+p4327)
- Zinc compounds: 3.01528e-7 kg; = p3232
- Benzene [air, non-urban air or from high stacks]: 1.8529e-6 kg; = 1.0 * (p2140*1.0833333333)
- Pesticide formulation balance; broadcast by air: 0.00146676 kg; = p3896
- Potassium chloride; broadcast w/o incorp. in fert. in fall bef. plant.: 0.00080947 kg; = p2858*2.2166666667
- Other single phosphates; broadcast w/ incorp. in fert. in spr. bef. plant.; kg P: 9.24093e-5 kg; = p2700
- Other single phosphates; unspec. appl. method in fert. in fall bef. plant.; kg P: 2.80415e-6 kg; = p3051
- Superphosphate, grades>22%; no broadcast in fert. at plant.; kg P: 1.21026e-5 kg; = p2542
- Diammonium phosphate; no broadcast in fert. at plant.: 0.000512864 kg; = p2533*4.7142857143
- Aqueous ammonia; broadcast w/o incorp. in fert. at plant.: 3.81529e-6 kg; = p2903*1.2142857143
- Mepiquat chloride: 1.60225e-6 kg; = p3816
- Pesticide formulation balance; foliar or directed spray: 0.000325305 kg; = p4720
- Diammonium phosphate; no broadcast in fert. in fall bef. plant.: 0.0115442 kg; = p2455*4.7142857143
- Superphosphate, grades>22%; broadcast w/o incorp. in fert. at plant.; kg P: 3.9007e-6 kg; = p2932
- Nitrogen solution; no broadcast in fert. in spr. bef. plant.; no broadcast in fert. in spr. bef. plant.; kg N: 0.00404509 kg; = p2483
- Ammonium sulfate; no broadcast in fert. at plant.: 0.000140512 kg; = p2518*4.7142857143
- Monoammonium phosphate; broadcast w/ incorp. in fert. after plant.: 0.000582139 kg; = p2771*8.2142857143
- Ethephon: 0.000119149 kg; = p3769
- Norflurazon: 2.98601e-5 kg; = p3834
- Monoammonium phosphate; broadcast w/o incorp. in fert. at plant.: 5.59842e-5 kg; = p2927*8.2142857143
- Superphosphate, grades<= 22%; broadcast w/o incorp. in fert. in spr. bef. plant.; kg P: 4.98637e-6 kg; = p2891
- Sodium nitrate; broadcast w/ incorp. in fert. in spr. bef. plant.: 4.97647e-5 kg; = p2681*6.0714285714
- Urea; broadcast w/ incorp. in fert. at plant.: 0.000504092 kg; = p2724*5
- Nitrogen solution; broadcast w/o incorp. in fert. in spr. bef. plant.; broadcast w/o incorp. in fert. in spr. bef. pl...: 0.00213248 kg; = p2873
- Sewage sludge dry matter; applied in sewage sludge: 1.96649e-9 kg; = p3243
- Isoprene [air, non-urban air or from high stacks]: 4.55641e-6 kg; = 1.0 * (p2145*1.1333333333)
- Sodium nitrate; broadcast w/ incorp. in fert. at plant.: 4.36377e-6 kg; = p2720*6.0714285714
- Other single phosphates; unspec. appl. method in fert. at plant.; kg P: 1.24578e-7 kg; = p3129
- Endosulfan: 1.50029e-5 kg; = p3764
- Nitrogen solution; broadcast w/ incorp. in fert. after plant.; broadcast w/ incorp. in fert. after plant.; kg N: 0.00477027 kg; = p2756
- Monoammonium phosphate; no broadcast in fert. in fall bef. plant.: 0.00390988 kg; = p2459*8.2142857143
- Superphosphate, grades<= 22%; no broadcast in fert. in spr. bef. plant.; kg P: 1.54711e-5 kg; = p2501
- Urea; broadcast w/o incorp. in fert. after plant.: 0.00263958 kg; = p2958*5
- Potassium chloride; unspec. appl. method in fert. in fall bef. plant.: 0.000165377 kg; = p3053*2.2166666667
- Urea; broadcast w/ incorp. in fert. in fall bef. plant.: 0.00664931 kg; = p2646*5
- isopentane: 2.04369e-7 kg; = p2151*1.0166666667
- Ethephon [soil, agricultural]: 0.000208935 kg; = 1.0 * (p5005+p5211+p3563+p4181+p4387+p3975+p4593)
- Endothall [soil, agricultural]: 1.02169e-6 kg; = 1.0 * (p5207+p3971+p4589+p3559+p4177+p4383+p5001)
- Nitrogen solution; broadcast w/o incorp. in fert. at plant.; broadcast w/o incorp. in fert. at plant.; kg N: 0.000186993 kg; = p2912
- Anhydrous ammonia; broadcast w/ incorp. in fert. in spr. bef. plant.: 0.00742414 kg; = p2667*1.2142857143
- Nitrogen solution; no broadcast in fert. at plant.; no broadcast in fert. at plant.; kg N: 0.000354706 kg; = p2522
- Plant dry matter; in aboveground residue left on field: 0.680888 kg; = p2172
- Zeta-cypermethrin [air, non-urban air or from high stacks]: 8.73954e-7 kg; = 1.0 * (p3894)
- Other single phosphates; no broadcast in fert. in fall bef. plant.; kg P: 8.6057e-5 kg; = p2466
- Other single K nutrients; no broadcast in fert. in spr. bef. plant.; kg K: 0.00016886 kg; = p2509
- Aqueous ammonia; no broadcast in fert. in fall bef. plant.: 9.54636e-5 kg; = p2435*1.2142857143
- Superphosphate, grades<= 22%; no broadcast in fert. at plant.; kg P: 6.16178e-7 kg; = p2540
- Ethene [air, non-urban air or from high stacks]: 1.75696e-5 kg; = 1.0 * (p2125*1.1666666667)
- Dinitrogen monoxide [air, non-urban air or from high stacks]: 8.45426e-7 kg; = 1.0 * (p2044*1.5714285714)
- Ammonium sulfate; broadcast w/ incorp. in fert. in spr. bef. plant.: 0.00186456 kg; = p2674*4.7142857143
- Pesticide formulation balance; broadcast with incorporation: 0.0006134 kg; = p4102
- Superphosphate, grades<= 22%; unspec. appl. method in fert. after plant.; kg P: 6.98988e-8 kg; = p3164
- Acetol; from residue burning: 4.54663e-5 kg; = p2134*2.0555555556
- Diammonium phosphate; unspec. appl. method in fert. after plant.: 5.81789e-5 kg; = p3157*4.7142857143
- Sodium nitrate; broadcast w/o incorp. in fert. at plant.: 1.97704e-6 kg; = p2915*6.0714285714
- Ammonium nitrate; no broadcast in fert. at plant.: 0.000355298 kg; = p2515*4.7142857143
- Particulates, < 10 um: 0.000107107 kg; = p2034+p2036
- Thidiazuron: 1.9227e-5 kg; = p3879
- Other single phosphates; broadcast w/o incorp. in fert. in fall bef. plant.; kg P: 2.77363e-5 kg; = p2856
- Toluene [air, non-urban air or from high stacks]: 2.29999e-6 kg; = 1.0 * (p2141*1.0952380952)
- Carbon monoxide, fossil [air, non-urban air or from high stacks]: 0.000882686 kg; = 1.0 * (p2028*2.3333333333)
- Superphosphate, grades<= 22%; unspec. appl. method in fert. in fall bef. plant.; kg P: 4.51941e-7 kg; = p3047
- Sodium nitrate; no broadcast in fert. after plant.: 4.3344e-5 kg; = p2564*6.0714285714
- Monoammonium phosphate; broadcast w/o incorp. in fert. after plant.: 0.000194901 kg; = p2966*8.2142857143
- Ammonium nitrate; broadcast w/ incorp. in fert. at plant.: 0.000413424 kg; = p2710*4.7142857143
- Ammonium sulfate; broadcast w/o incorp. in fert. at plant.: 7.40746e-5 kg; = p2908*4.7142857143
- Superphosphate, grades<= 22%; unspec. appl. method in fert. in spr. bef. plant.; kg P: 5.04123e-7 kg; = p3086
- Nitrogen dioxide: 4.15538e-5 kg; = p2039*3.2857142857
- Ammonium sulfate; broadcast w/ incorp. in fert. at plant.: 0.000163499 kg; = p2713*4.7142857143
- Urea; broadcast w/o incorp. in fert. in spr. bef. plant.: 0.00260449 kg; = p2880*5
- Sulfur [soil, agricultural]: 1.07e-6 kg; = 1.0 * (p3230)
- Superphosphate, grades<= 22%; broadcast w/ incorp. in fert. after plant.; kg P: 2.06505e-6 kg; = p2774
- Anhydrous ammonia; no broadcast in fert. in fall bef. plant.: 0.00737989 kg; = p2433*1.2142857143
- Sodium nitrate; broadcast w/o incorp. in fert. in fall bef. plant.: 2.60784e-5 kg; = p2837*6.0714285714
- Acetonitrile [air, non-urban air or from high stacks]: 2.53485e-6 kg; = 1.0 * (p2155*1.7083333333)
- Endothall: 5.82636e-7 kg; = p3765
- Acephate [air, non-urban air or from high stacks]: 1.34006e-5 kg; = 1.0 * (p3699)
- Potassium chloride; unspec. appl. method in fert. in spr. bef. plant.: 0.000299799 kg; = p3092*2.2166666667
- Pesticides, unspecified: 3.46058e-5 kg; = p3895
- Cyfluthrin [air, non-urban air or from high stacks]: 2.62186e-6 kg; = 1.0 * (p3741)
- cyclopentane: 1.99731e-8 kg; = p2153*1.0166666667
- Lambda-cyhalothrin [soil, agricultural]: 3.06506e-6 kg; = 1.0 * (p4219+p4013+p4631+p5043+p5249+p3601+p4425)
- Plant dry matter; in below-ground residue: 0.286575 kg; = p2177
- Diammonium phosphate; broadcast w/ incorp. in fert. after plant.: 0.0017188 kg; = p2767*4.7142857143
- Ammonium nitrate; broadcast w/ incorp. in fert. after plant.: 0.00477823 kg; = p2749*4.7142857143
- Acephate [soil, agricultural]: 2.34988e-5 kg; = 1.0 * (p4111+p3905+p3493+p5141+p4317+p4935+p4523)
- Urea; broadcast w/o incorp. in fert. in fall bef. plant.: 0.00301252 kg; = p2841*5
- Urea; no broadcast in fert. in fall bef. plant.: 0.00571443 kg; = p2451*5
- Superphosphate, grades>22%; broadcast w/ incorp. in fert. in fall bef. plant.; kg P: 0.00026225 kg; = p2659
- NMVOC, non-methane volatile organic compounds, unspecified origin [air, non-urban air or from high stacks]: 0.000310264 kg; = 1.0 * (p2052+p2051)
- Acetic acid [air, non-urban air or from high stacks]: 6.75592e-5 kg; = 1.0 * (p2127*2.5)
- Other single phosphates; no broadcast in fert. after plant.; kg P: 1.33099e-5 kg; = p2583
- Ammonium nitrate; broadcast w/o incorp. in fert. in spr. bef. plant.: 0.00213604 kg; = p2866*4.7142857143
- Urea; broadcast w/o incorp. in fert. at plant.: 0.000228383 kg; = p2919*5
- Superphosphate, grades>22%; unspec. appl. method in fert. after plant.; kg P: 1.37291e-6 kg; = p3166
- Monoammonium phosphate; no broadcast in fert. at plant.: 0.000173701 kg; = p2537*8.2142857143
- Other single K nutrients; broadcast w/ incorp. in fert. in spr. bef. plant.; kg K: 0.000219055 kg; = p2704
- Dicrotophos [soil, agricultural]: 1.37928e-5 kg; = 1.0 * (p4988+p4164+p5194+p3546+p4576+p3958+p4370)
- Nitrogen solution; broadcast w/ incorp. in fert. in fall bef. plant.; broadcast w/ incorp. in fert. in fall bef. plan...: 0.00544426 kg; = p2639
- Azinphos-methyl: 2.24315e-5 kg; = p3709
- Diammonium phosphate; unspec. appl. method in fert. in fall bef. plant.: 0.000376164 kg; = p3040*4.7142857143
- Formic acid [air, non-urban air or from high stacks]: 1.20997e-5 kg; = 1.0 * (p2131*3.8333333333)
- Ammonium nitrate; broadcast w/ incorp. in fert. in fall bef. plant.: 0.00545334 kg; = p2632*4.7142857143
- Sodium nitrate; no broadcast in fert. in fall bef. plant.: 4.9468e-5 kg; = p2447*6.0714285714
- Diammonium phosphate; broadcast w/ incorp. in fert. in spr. bef. plant.: 0.0123963 kg; = p2689*4.7142857143
- Diammonium phosphate; unspec. appl. method in fert. at plant.: 1.67115e-5 kg; = p3118*4.7142857143
- Potassium chloride; unspec. appl. method in fert. after plant.: 4.57182e-5 kg; = p3170*2.2166666667
- Filler materials, applied with synthetic fertilizer: 0.0901903 kg; = p2432
- Dicrotophos: 7.86559e-6 kg; = p3752
- Water: 1360.2 kg; = p2181+p2178+p2171
- Superphosphate, grades>22%; broadcast w/o incorp. in fert. in fall bef. plant.; kg P: 8.78019e-5 kg; = p2854
- Lambda-cyhalothrin: 1.74791e-6 kg; = p3807
- Diammonium phosphate; broadcast w/ incorp. in fert. in fall bef. plant.: 0.0111132 kg; = p2650*4.7142857143
- Sodium nitrate; broadcast w/ incorp. in fert. in fall bef. plant.: 5.7561e-5 kg; = p2642*6.0714285714
- I butane; from residue burning: 2.54728e-7 kg; = p2146*1.0208333333
- Monoammonium phosphate; no broadcast in fert. after plant.: 0.000604716 kg; = p2576*8.2142857143
- Ammonium nitrate; broadcast w/o incorp. in fert. in fall bef. plant.: 0.00247067 kg; = p2827*4.7142857143
- Potassium chloride; no broadcast in fert. after plant.: 0.000558681 kg; = p2585*2.2166666667
- Dimethoate: 1.60225e-6 kg; = p3759
- Pendimethalin [soil, agricultural]: 0.00020587 kg; = 1.0 * (p3634+p5076+p5282+p4458+p4046+p4664+p4252)
- Butane [air, non-urban air or from high stacks]: 7.33618e-7 kg; = 1.0 * (p2147*1.0208333333)
- Clethodim [soil, agricultural]: 4.85301e-6 kg; = 1.0 * (p3938+p3526+p4350+p4556+p4968+p5174+p4144)
- Sulfuric acid [soil, agricultural]: 2.93844e-7 kg; = 1.0 * (p3231)
- Trifluralin [air, non-urban air or from high stacks]: 0.000447756 kg; = 1.0 * (p3892)
- Superphosphate, grades<= 22%; no broadcast in fert. after plant.; kg P: 2.14514e-6 kg; = p2579
- Superphosphate, grades>22%; unspec. appl. method in fert. at plant.; kg P: 3.94361e-7 kg; = p3127
- Ammonium sulfate; broadcast w/ incorp. in fert. after plant.: 0.00188968 kg; = p2752*4.7142857143
- Ethyne [air, non-urban air or from high stacks]: 3.28695e-6 kg; = 1.0 * (p2132*1.0833333333)
- Zeta-cypermethrin [soil, agricultural]: 1.53253e-6 kg; = 1.0 * (p5130+p5336+p4306+p4512+p4100+p3688+p4718)
- Superphosphate, grades<= 22%; broadcast w/ incorp. in fert. at plant.; kg P: 5.93173e-7 kg; = p2735
- Oxygen; applied in dolomite: 0.00328512 kg; = p3228
- Butadiene [air, non-urban air or from high stacks]: 1.82194e-6 kg; = 1.0 * (p2143*1.125)
- Prometryn: 7.6908e-5 kg; = p3848
- Superphosphate, grades<= 22%; broadcast w/o incorp. in fert. at plant.; kg P: 1.98595e-7 kg; = p2930
- Other single K nutrients; unspec. appl. method in fert. in fall bef. plant.; kg K: 7.62249e-6 kg; = p3055
- Potassium; in below-ground residue; biogenic: 0.000909728 kg; = p2176
- Aqueous ammonia; no broadcast in fert. in spr. bef. plant.: 8.25336e-5 kg; = p2474*1.2142857143
- Ammonium nitrate; no broadcast in fert. in spr. bef. plant.: 0.00405184 kg; = p2476*4.7142857143
- Potassium chloride; broadcast w/ incorp. in fert. in fall bef. plant.: 0.00262165 kg; = p2663*2.2166666667
- Aqueous ammonia; broadcast w/o incorp. in fert. after plant.: 4.40959e-5 kg; = p2942*1.2142857143
- Plant dry matter; from residue burning: 0.00437388 kg; = p2164
- Fluometuron: 5.59331e-5 kg; = p3782
- Potassium chloride; broadcast w/o incorp. in fert. in spr. bef. plant.: 0.00146743 kg; = p2897*2.2166666667
- Other single phosphates; unspec. appl. method in fert. after plant.; kg P: 4.33699e-7 kg; = p3168
- Thidiazuron [soil, agricultural]: 3.37157e-5 kg; = 1.0 * (p4291+p4085+p4703+p4497+p5321+p5115+p3673)
- Glyphosate [soil, agricultural]: 7.86699e-5 kg; = 1.0 * (p4410+p5028+p4616+p4204+p3586+p5234+p3998)
- Paraquat dichloride: 0.000108299 kg; = p4662+p5280+p3632+p5074+p4250+p4456+p4044
- MSMA [soil, agricultural]: 7.20289e-5 kg; = 1.0 * (p4655+p4449+p5273+p4243+p4037+p5067+p3625)
- Anhydrous ammonia; no broadcast in fert. after plant.: 0.00646628 kg; = p2550*1.2142857143
- Oxygen; applied in limestone: 0.0372769 kg; = p3219
- Mepiquat chloride [soil, agricultural]: 2.80964e-6 kg; = 1.0 * (p4434+p5052+p4228+p4640+p5258+p3610+p4022)
- Urea; broadcast w/ incorp. in fert. after plant.: 0.00582614 kg; = p2763*5
- Methyl parathion [soil, agricultural]: 3.65253e-5 kg; = 1.0 * (p5267+p4237+p5061+p3619+p4443+p4031+p4649)
- Aqueous ammonia; no broadcast in fert. at plant.: 7.23721e-6 kg; = p2513*1.2142857143
- Ammonium nitrate; broadcast w/ incorp. in fert. in spr. bef. plant.: 0.00471472 kg; = p2671*4.7142857143
- Superphosphate, grades<= 22%; broadcast w/o incorp. in fert. after plant.; kg P: 6.91382e-7 kg; = p2969
- Monoammonium phosphate; unspec. appl. method in fert. after plant.: 1.97045e-5 kg; = p3161*8.2142857143
- Monoammonium phosphate; broadcast w/ incorp. in fert. in spr. bef. plant.: 0.00419849 kg; = p2693*8.2142857143
- Superphosphate, grades<= 22%; no broadcast in fert. in fall bef. plant.; kg P: 1.38697e-5 kg; = p2462
- Other single phosphates; broadcast w/o incorp. in fert. after plant.; kg P: 4.2898e-6 kg; = p2973
- Nitrogen solution; no broadcast in fert. in fall bef. plant.; no broadcast in fert. in fall bef. plant.; kg N: 0.00467881 kg; = p2444
- Aqueous ammonia; broadcast w/ incorp. in fert. after plant.: 9.73298e-5 kg; = p2747*1.2142857143
- Anhydrous ammonia; broadcast w/o incorp. in fert. in spr. bef. plant.: 0.00336356 kg; = p2862*1.2142857143
- Pesticides, unspecified [soil, agricultural]: 6.06832e-5 kg; = 1.0 * (p5337+p4307+p4101+p3689+p5131+p4719+p4513)
- Glycolaldehyde; from residue burning: 2.43284e-5 kg; = p2135*2.5
- Superphosphate, grades>22%; no broadcast in fert. after plant.; kg P: 4.21336e-5 kg; = p2581
- Pesticide formulation balance; broadcast without incorporation: 0.000692903 kg; = p4308
- Acetone [air, non-urban air or from high stacks]: 5.3887e-6 kg; = 1.0 * (p2139*1.6111111111)
- Metolachlor [soil, agricultural]: 7.94361e-5 kg; = 1.0 * (p4032+p4238+p5062+p4444+p5268+p4650+p3620)
- Ammonia [air, non-urban air or from high stacks]: 2.62043e-5 kg; = 1.0 * (p2159*1.2142857143)
- Seeds; used in planting and sowing: 0.0380245 kg; = p2179
- cis-2-Butene: 5.18714e-7 kg; = p2149*1.1666666667
- Urea; no broadcast in fert. in spr. bef. plant.: 0.00494044 kg; = p2490*5
- Other single K nutrients; broadcast w/ incorp. in fert. after plant.; kg K: 3.3405e-5 kg; = p2782
- Sodium nitrate; broadcast w/ incorp. in fert. after plant.: 5.04351e-5 kg; = p2759*6.0714285714
- Other single phosphates; broadcast w/ incorp. in fert. at plant.; kg P: 3.68044e-6 kg; = p2739
- Monoammonium phosphate; broadcast w/o incorp. in fert. in fall bef. plant.: 0.00126016 kg; = p2849*8.2142857143
- Superphosphate, grades>22%; unspec. appl. method in fert. in spr. bef. plant.; kg P: 9.9017e-6 kg; = p3088
- Nitrogen solution; broadcast w/o incorp. in fert. after plant.; broadcast w/o incorp. in fert. after plant.; kg N: 0.00216121 kg; = p2951
- Monoammonium phosphate; unspec. appl. method in fert. at plant.: 5.66001e-6 kg; = p3122*8.2142857143
- Aqueous ammonia; broadcast w/o incorp. in fert. in spr. bef. plant.: 4.35098e-5 kg; = p2864*1.2142857143
- Acrylonitrile: 4.04759e-7 kg; = p2156*1.4722222222
- Urea; no broadcast in fert. at plant.: 0.000433218 kg; = p2529*5
- Other single phosphates; no broadcast in fert. in spr. bef. plant.; kg P: 9.59932e-5 kg; = p2505
- Diuron: 3.65604e-5 kg; = p3761
- Diammonium phosphate; broadcast w/o incorp. in fert. at plant.: 0.000165297 kg; = p2923*4.7142857143
- Aqueous ammonia; broadcast w/ incorp. in fert. in fall bef. plant.: 0.000111081 kg; = p2630*1.2142857143
- Ash: 0.00238849 kg; = p2021+p2022
- Ammonium sulfate; broadcast w/o incorp. in fert. in fall bef. plant.: 0.000977092 kg; = p2830*4.7142857143
- Potassium chloride; broadcast w/ incorp. in fert. in spr. bef. plant.: 0.00475259 kg; = p2702*2.2166666667
- Ammonium sulfate; no broadcast in fert. after plant.: 0.00162399 kg; = p2557*4.7142857143
- Potassium chloride; no broadcast in fert. in spr. bef. plant.: 0.00366358 kg; = p2507*2.2166666667
- Diammonium phosphate; broadcast w/o incorp. in fert. after plant.: 0.000575458 kg; = p2962*4.7142857143
- Other single K nutrients; broadcast w/o incorp. in fert. after plant.; kg K: 1.03142e-5 kg; = p2977
- Ammonium sulfate; no broadcast in fert. in fall bef. plant.: 0.00185344 kg; = p2440*4.7142857143
- Other single phosphates; broadcast w/o incorp. in fert. in spr. bef. plant.; kg P: 3.09388e-5 kg; = p2895
- Fluazifop-p-butyl [air, non-urban air or from high stacks]: 2.03923e-6 kg; = 1.0 * (p3776)
- Aqueous ammonia; broadcast w/ incorp. in fert. in spr. bef. plant.: 9.6036e-5 kg; = p2669*1.2142857143
- MSMA: 4.10759e-5 kg; = p3831
- Malathion: 0.000700183 kg; = p3809
- Cypermethrin: 2.91318e-6 kg; = p3743
- Urea; broadcast w/ incorp. in fert. in spr. bef. plant.: 0.0057487 kg; = p2685*5
- Other single phosphates; unspec. appl. method in fert. in spr. bef. plant.; kg P: 3.12792e-6 kg; = p3090
- Sodium nitrate; broadcast w/o incorp. in fert. after plant.: 2.285e-5 kg; = p2954*6.0714285714
- Aqueous ammonia; broadcast w/ incorp. in fert. at plant.: 8.42121e-6 kg; = p2708*1.2142857143
- Superphosphate, grades<= 22%; broadcast w/ incorp. in fert. in spr. bef. plant.; kg P: 1.48935e-5 kg; = p2696
- Phosphorous; in below-ground residue: 0.00120024 kg; = p2175
- Monoammonium phosphate; broadcast w/o incorp. in fert. in spr. bef. plant.: 0.00140566 kg; = p2888*8.2142857143
- Clethodim [air, non-urban air or from high stacks]: 2.76752e-6 kg; = 1.0 * (p3732)
- Aqueous ammonia; no broadcast in fert. after plant.: 8.36454e-5 kg; = p2552*1.2142857143
- Nitrogen; in below-ground residue: 0.00954737 kg; = p2174
- Ammonium nitrate; no broadcast in fert. in fall bef. plant.: 0.00468661 kg; = p2437*4.7142857143
- Sodium nitrate; broadcast w/o incorp. in fert. in spr. bef. plant.: 2.25462e-5 kg; = p2876*6.0714285714
- Malathion [soil, agricultural]: 0.00122781 kg; = 1.0 * (p5045+p5251+p4015+p4221+p4633+p3603+p4427)
- 1-Butene: 1.61646e-6 kg; = p2144*1.1666666667
- Prometryn [soil, agricultural]: 0.000134863 kg; = 1.0 * (p4672+p3642+p4466+p4054+p4260+p5084+p5290)
- Anhydrous ammonia; broadcast w/ incorp. in fert. at plant.: 0.000651009 kg; = p2706*1.2142857143
- isobutene: 1.41138e-6 kg; = p2150*1.1666666667
- Monoammonium phosphate; broadcast w/ incorp. in fert. at plant.: 0.000167216 kg; = p2732*8.2142857143
- Monoammonium phosphate; broadcast w/ incorp. in fert. in fall bef. plant.: 0.0037639 kg; = p2654*8.2142857143
- Other single K nutrients; broadcast w/ incorp. in fert. in fall bef. plant.; kg K: 0.000120836 kg; = p2665
- Aldicarb: 4.00562e-5 kg; = p3705
- Ammonium sulfate; broadcast w/o incorp. in fert. after plant.: 0.000856131 kg; = p2947*4.7142857143
- Ammonium nitrate; broadcast w/o incorp. in fert. at plant.: 0.000187305 kg; = p2905*4.7142857143
- Gypsum: 1.64769e-5 kg; = p3229
- Other single K nutrients; broadcast w/o incorp. in fert. in spr. bef. plant.; kg K: 6.76361e-5 kg; = p2899
- Anhydrous ammonia; no broadcast in fert. in spr. bef. plant.: 0.00638032 kg; = p2472*1.2142857143
- Other single phosphates; broadcast w/ incorp. in fert. after plant.; kg P: 1.28129e-5 kg; = p2778
- Formaldehyde [air, non-urban air or from high stacks]: 2.5103e-5 kg; = 1.0 * (p2128*2.5)
- S,S,S-tributyl phosphorotrithioate: 0.000132053 kg; = p4506+p5330+p4712+p4094+p4300+p3682+p5124
- Other single K nutrients; broadcast w/o incorp. in fert. in fall bef. plant.; kg K: 3.73098e-5 kg; = p2860
- Diammonium phosphate; no broadcast in fert. in spr. bef. plant.: 0.0128771 kg; = p2494*4.7142857143
- Dimethoate [soil, agricultural]: 2.80964e-6 kg; = 1.0 * (p4583+p3553+p4377+p4171+p3965+p5201+p4995)
- Anhydrous ammonia; broadcast w/o incorp. in fert. in fall bef. plant.: 0.00389051 kg; = p2823*1.2142857143
- Nitrogen; in above-ground residue left on field: 0.0226841 kg; = p2168
- Phorate: 2.38881e-5 kg; = p3843
- Carbofuran [soil, agricultural]: 2.19663e-5 kg; = 1.0 * (p3930+p4960+p4342+p4548+p4136+p5166+p3518)
- Other single phosphates; broadcast w/ incorp. in fert. in fall bef. plant.; kg P: 8.2844e-5 kg; = p2661
- Pesticide formulation balance; in seed furrow: 0.000177734 kg; = p5132
- Hydrocyanic acid: 3.44484e-6 kg; = p2154*2.25
- Propene [air, non-urban air or from high stacks]: 8.16318e-6 kg; = 1.0 * (p2136*1.1666666667)
- Pesticide formulation balance; unspec. appl. method: 1.79186e-5 kg; = p5338
- Diuron [soil, agricultural]: 6.41108e-5 kg; = 1.0 * (p3967+p3555+p4585+p4173+p4379+p5203+p4997)
- Other single K nutrients; unspec. appl. method in fert. after plant.; kg K: 2.10722e-6 kg; = p3172
- Fluometuron [soil, agricultural]: 9.80819e-5 kg; = 1.0 * (p4194+p5018+p5224+p3988+p4400+p3576+p4606)
- Pentane [air, non-urban air or from high stacks]: 2.55461e-7 kg; = 1.0 * (p2152*1.0166666667)
- Monoammonium phosphate; unspec. appl. method in fert. in spr. bef. plant.: 0.000142113 kg; = p3083*8.2142857143
- Other limestone constituents; applied in limestone: 0.00496152 kg; = p3220
- Diammonium phosphate; broadcast w/ incorp. in fert. at plant.: 0.000493715 kg; = p2728*4.7142857143
- Diammonium phosphate; unspec. appl. method in fert. in spr. bef. plant.: 0.000419596 kg; = p3079*4.7142857143
- Aldicarb [soil, agricultural]: 7.02409e-5 kg; = 1.0 * (p3911+p3499+p4117+p4529+p4323+p4941+p5147)
- Superphosphate, grades>22%; unspec. appl. method in fert. in fall bef. plant.; kg P: 8.87678e-6 kg; = p3049
- Phorate [soil, agricultural]: 4.18891e-5 kg; = 1.0 * (p4255+p4049+p4461+p3637+p5079+p4667+p5285)

## Sampling procedure
A delete-a-group jackknife is used by the USDA to estimate the ARMS sample means and RSEs, based on a 15 sample delete-a-group jackknife. Because of this relatively small sample size, a Students t distribution is used to represent ARMS data probability density functions. Other representations of uncertainty are described in Cooper, J.S., Kahn, E., Noon, M. (2012). LCA Digital Commons Unit Process Data: field crop production Version 1. Prepared for the US Department of Agriculture National Agricultural Library. Retrieved from https://www.lcacommons.gov/discovery/docs/LCA%20Digital%20Commons%20Unit%20Process%20Data%20final%20updated.pdf

## Extrapolations
Data represent an aggregation of processes applied in Texas in 1997. Data development is demonstrated by parameterization (exlicitly presents all raw and uncertainty data and all calculations). Flow data quality according to the LCADC convention is provided for all flows.
