# cotton lint; at harvest in 2000; at farm; 90%-93% moisture

Dataset: EcoSpold 2, unit process
Geography: GLO
Time period: 2000-01-02 to 2001-01-01
Scenario: Business-as-Usual
System model: Allocation, ecoinvent default
Generated by: cooperjs@u.washington.edu
isCopyrightProtected: false

## General comment
This unit process/ gate-to-gate dataset represents the production of 1 kg cotton coproduced with cottonseed and residue. The process technologies are an aggregation of those applied in North Carolina in 2000. Applicable classifications include ISIC 0116, NAIC 111920, UNSPSC 11121802; this dataset was prepared in ILCD format using the UWDFE Lab Excel to ILCD File Generator (beta version, August 2013)

Exchange "S,S,S-tributyl phosphorotrithioate-soil agricultural" is the result of combining the following original LCA Commons flows: "Tribufos; broadcast without incorporation; kg AI", "Tribufos; banded or side-dressed; kg AI", "Tribufos; in seed furrow; kg AI", "Tribufos; broadcast with incorporation; kg AI", "Tribufos; unspec. appl. method; kg AI", "Tribufos; foliar or directed spray; kg AI".
Exchange "Cyanazine-soil agricultural" is the result of combining the following original LCA Commons flows: "Cyanazine; in seed furrow; kg AI", "Cyanazine; banded or side-dressed; kg AI", "Cyanazine; broadcast with incorporation; kg AI", "Cyanazine; broadcast without incorporation; kg AI", "Cyanazine; foliar or directed spray; kg AI", "Cyanazine; unspec. appl. method; kg AI".
Exchange "Dimethipin-soil agricultural" is the result of combining the following original LCA Commons flows: "Dimethipin; banded or side-dressed; kg AI", "Dimethipin; unspec. appl. method; kg AI", "Dimethipin; broadcast with incorporation; kg AI", "Dimethipin; in seed furrow; kg AI", "Dimethipin; foliar or directed spray; kg AI", "Dimethipin; broadcast without incorporation; kg AI".
Exchange "Ethephon-soil agricultural" is the result of combining the following original LCA Commons flows: "Ethephon; unspec. appl. method; kg AI", "Ethephon; banded or side-dressed; kg AI", "Ethephon; broadcast without incorporation; kg AI", "Ethephon; broadcast with incorporation; kg AI", "Ethephon; in seed furrow; kg AI", "Ethephon; foliar or directed spray; kg AI".
Exchange "Sodium chlorate-soil agricultural" is the result of combining the following original LCA Commons flows: "Sodium chlorate; unspec. appl. method; kg AI", "Sodium chlorate; in seed furrow; kg AI", "Sodium chlorate; broadcast without incorporation; kg AI", "Sodium chlorate; broadcast with incorporation; kg AI", "Sodium chlorate; foliar or directed spray; kg AI", "Sodium chlorate; banded or side-dressed; kg AI".
Exchange "Phorate-soil agricultural" is the result of combining the following original LCA Commons flows: "Phorate; in seed furrow; kg AI", "Phorate; foliar or directed spray; kg AI", "Phorate; broadcast with incorporation; kg AI", "Phorate; banded or side-dressed; kg AI", "Phorate; broadcast without incorporation; kg AI", "Phorate; unspec. appl. method; kg AI".
Exchange "Deltamethrin-soil agricultural" is the result of combining the following original LCA Commons flows: "Deltamethrin; unspec. appl. method; kg AI", "Deltamethrin; in seed furrow; kg AI", "Deltamethrin; foliar or directed spray; kg AI", "Deltamethrin; banded or side-dressed; kg AI", "Deltamethrin; broadcast with incorporation; kg AI", "Deltamethrin; broadcast without incorporation; kg AI".
Exchange "Dimethoate-soil agricultural" is the result of combining the following original LCA Commons flows: "Dimethoate; foliar or directed spray; kg AI", "Dimethoate; unspec. appl. method; kg AI", "Dimethoate; broadcast without incorporation; kg AI", "Dimethoate; broadcast with incorporation; kg AI", "Dimethoate; in seed furrow; kg AI", "Dimethoate; banded or side-dressed; kg AI".
Exchange "NMVOC, non-methane volatile organic compounds, unspecified origin-air low population density" is the result of combining the following original LCA Commons flows: "NMVOCs; from residue burning; kg except C, biogenic", "NMVOCs; from residue burning; kg C, biogenic".
Exchange "Cyclanilide-soil agricultural" is the result of combining the following original LCA Commons flows: "Cyclanilide; in seed furrow; kg AI", "Cyclanilide; foliar or directed spray; kg AI", "Cyclanilide; unspec. appl. method; kg AI", "Cyclanilide; broadcast with incorporation; kg AI", "Cyclanilide; broadcast without incorporation; kg AI", "Cyclanilide; banded or side-dressed; kg AI".
Exchange "Glyphosate-soil agricultural" is the result of combining the following original LCA Commons flows: "Glyphosate; foliar or directed spray; kg AI", "Glyphosate; banded or side-dressed; kg AI", "Glyphosate; unspec. appl. method; kg AI", "Glyphosate; broadcast with incorporation; kg AI", "Glyphosate; in seed furrow; kg AI", "Glyphosate; broadcast without incorporation; kg AI".
Exchange "Metalaxyl-M-soil agricultural" is the result of combining the following original LCA Commons flows: "Metalaxyl-M; in seed furrow; kg AI", "Metalaxyl-M; broadcast without incorporation; kg AI", "Metalaxyl-M; unspec. appl. method; kg AI", "Metalaxyl-M; banded or side-dressed; kg AI", "Metalaxyl-M; broadcast with incorporation; kg AI", "Metalaxyl-M; foliar or directed spray; kg AI".
Exchange "Norflurazon-soil agricultural" is the result of combining the following original LCA Commons flows: "Norflurazon; banded or side-dressed; kg AI", "Norflurazon; unspec. appl. method; kg AI", "Norflurazon; in seed furrow; kg AI", "Norflurazon; broadcast with incorporation; kg AI", "Norflurazon; broadcast without incorporation; kg AI", "Norflurazon; foliar or directed spray; kg AI".
Exchange "Mepiquat chloride-soil agricultural" is the result of combining the following original LCA Commons flows: "1,1-Dimethylpiperidinium chloride; in seed furrow; kg AI", "1,1-Dimethylpiperidinium chloride; banded or side-dressed; kg AI", "1,1-Dimethylpiperidinium chloride; unspec. appl. method; kg AI", "1,1-Dimethylpiperidinium chloride; broadcast without incorporation; kg AI", "1,1-Dimethylpiperidinium chloride; broadcast with incorporation; kg AI", "1,1-Dimethylpiperidinium chloride; foliar or directed spray; kg AI".
Exchange "Carbon-soil agricultural" is the result of combining the following original LCA Commons flows: "Carbon; broadcast w/ incorp. in manure in spring before planting; biogenic", "Carbon; applied in limestone", "Carbon; broadcast w/o incorp. in manure in spring before planting; biogenic", "Carbon; broadcast w/o incorp. in manure at an unknown time", "Carbon; broadcast w/ incorp. in manure at an unknown time", "Carbon; in below-ground residue; biogenic", "Carbon; applied in dolomite", "Carbon; applied in sewage sludge", "Carbon; in above-ground residue left on field; biogenic".
Exchange "Particulates, < 2.5 um-air low population density" is the result of combining the following original LCA Commons flows: "PM2.5; from residue burning; kg except C, biogenic", "PM2.5; from residue burning; kg C, biogenic".
Exchange "Thidiazuron-soil agricultural" is the result of combining the following original LCA Commons flows: "Thidiazuron; broadcast without incorporation; kg AI", "Thidiazuron; banded or side-dressed; kg AI", "Thidiazuron; foliar or directed spray; kg AI", "Thidiazuron; broadcast with incorporation; kg AI", "Thidiazuron; unspec. appl. method; kg AI", "Thidiazuron; in seed furrow; kg AI".
Exchange "Prometryn-soil agricultural" is the result of combining the following original LCA Commons flows: "Prometryn; banded or side-dressed; kg AI", "Prometryn; unspec. appl. method; kg AI", "Prometryn; in seed furrow; kg AI", "Prometryn; broadcast with incorporation; kg AI", "Prometryn; broadcast without incorporation; kg AI", "Prometryn; foliar or directed spray; kg AI".
Exchange "Zeta-cypermethrin-soil agricultural" is the result of combining the following original LCA Commons flows: "Zeta-Cypermethrin; banded or side-dressed; kg AI", "Zeta-Cypermethrin; broadcast without incorporation; kg AI", "Zeta-Cypermethrin; broadcast with incorporation; kg AI", "Zeta-Cypermethrin; unspec. appl. method; kg AI", "Zeta-Cypermethrin; in seed furrow; kg AI", "Zeta-Cypermethrin; foliar or directed spray; kg AI".
Exchange "Clethodim-soil agricultural" is the result of combining the following original LCA Commons flows: "Clethodim; unspec. appl. method; kg AI", "Clethodim; in seed furrow; kg AI", "Clethodim; broadcast without incorporation; kg AI", "Clethodim; broadcast with incorporation; kg AI", "Clethodim; foliar or directed spray; kg AI", "Clethodim; banded or side-dressed; kg AI".
Exchange "Ash-soil agricultural" is the result of combining the following original LCA Commons flows: "Ash; from residue burning; kg C, biogenic", "Ash; from residue burning; kg except C, biogenic".
Exchange "Trifluralin-soil agricultural" is the result of combining the following original LCA Commons flows: "Trifluralin; broadcast without incorporation; kg AI", "Trifluralin; unspec. appl. method; kg AI", "Trifluralin; broadcast with incorporation; kg AI", "Trifluralin; banded or side-dressed; kg AI", "Trifluralin; in seed furrow; kg AI", "Trifluralin; foliar or directed spray; kg AI".
Exchange "Water-soil agricultural" is the result of combining the following original LCA Commons flows: "Water; broadcast w/ incorp. in manure", "Water; in above-ground residue left on field; biogenic", "Water; from irrigation and applied with manure and sewage sludge", "Water; broadcast w/o incorp. in manure", "Water; in below-ground residue; biogenic".
Exchange "Quintozene-soil agricultural" is the result of combining the following original LCA Commons flows: "Quintozene; broadcast without incorporation; kg AI", "Quintozene; in seed furrow; kg AI", "Quintozene; banded or side-dressed; kg AI", "Quintozene; foliar or directed spray; kg AI", "Quintozene; unspec. appl. method; kg AI", "Quintozene; broadcast with incorporation; kg AI".
Exchange "Pendimethalin-soil agricultural" is the result of combining the following original LCA Commons flows: "Pendimethalin; broadcast without incorporation; kg AI", "Pendimethalin; in seed furrow; kg AI", "Pendimethalin; banded or side-dressed; kg AI", "Pendimethalin; foliar or directed spray; kg AI", "Pendimethalin; broadcast with incorporation; kg AI", "Pendimethalin; unspec. appl. method; kg AI".
Exchange "Water, unspecified origin-resource in water" is the result of combining the following original LCA Commons flows: "Water; from plant uptake; biogenic", "Water; withdrawal from unspec. source, for cotton, in 2000".
Exchange "Pyrithiobac sodium salt-soil agricultural" is the result of combining the following original LCA Commons flows: "Pyrithiobac-sodium; in seed furrow; kg AI", "Pyrithiobac-sodium; unspec. appl. method; kg AI", "Pyrithiobac-sodium; foliar or directed spray; kg AI", "Pyrithiobac-sodium; broadcast without incorporation; kg AI", "Pyrithiobac-sodium; broadcast with incorporation; kg AI", "Pyrithiobac-sodium; banded or side-dressed; kg AI".
Exchange "Acephate-soil agricultural" is the result of combining the following original LCA Commons flows: "Acephate; unspec. appl. method; kg AI", "Acephate; broadcast with incorporation; kg AI", "Acephate; in seed furrow; kg AI", "Acephate; banded or side-dressed; kg AI", "Acephate; foliar or directed spray; kg AI", "Acephate; broadcast without incorporation; kg AI".
Exchange "Particulates, < 10 um-air low population density" is the result of combining the following original LCA Commons flows: "PM10; from residue burning; kg C, biogenic", "PM10; from residue burning; kg except C, biogenic".
Exchange "Cyfluthrin-soil agricultural" is the result of combining the following original LCA Commons flows: "Beta-Cyfluthrin; foliar or directed spray; kg AI", "Beta-Cyfluthrin; broadcast without incorporation; kg AI", "Beta-Cyfluthrin; banded or side-dressed; kg AI", "Beta-Cyfluthrin; broadcast with incorporation; kg AI", "Beta-Cyfluthrin; unspec. appl. method; kg AI", "Beta-Cyfluthrin; in seed furrow; kg AI".
Exchange "Bromoxynil-soil agricultural" is the result of combining the following original LCA Commons flows: "Bromoxynil; broadcast without incorporation; kg AI", "Bromoxynil; broadcast with incorporation; kg AI", "Bromoxynil; foliar or directed spray; kg AI", "Bromoxynil; unspec. appl. method; kg AI", "Bromoxynil; in seed furrow; kg AI", "Bromoxynil; banded or side-dressed; kg AI".
Exchange "Cypermethrin-soil agricultural" is the result of combining the following original LCA Commons flows: "Cypermethrin; unspec. appl. method; kg AI", "Cypermethrin; banded or side-dressed; kg AI", "Cypermethrin; in seed furrow; kg AI", "Cypermethrin; broadcast without incorporation; kg AI", "Cypermethrin; broadcast with incorporation; kg AI", "Cypermethrin; foliar or directed spray; kg AI".
Exchange "MSMA-soil agricultural" is the result of combining the following original LCA Commons flows: "MSMA; unspec. appl. method; kg AI", "MSMA; broadcast without incorporation; kg AI", "MSMA; broadcast with incorporation; kg AI", "MSMA; banded or side-dressed; kg AI", "MSMA; foliar or directed spray; kg AI", "MSMA; in seed furrow; kg AI".
Exchange "Transformation, from arable-resource land" is the result of combining the following original LCA Commons flows: "Transformation; from arable, from soy to cotton", "Transformation; from arable, from small grains to cotton", "Transformation; from arable, from cotton to cotton", "Transformation; from arable, from unspec. use to cotton", "Transformation; from arable, from other to cotton", "Transformation; from arable, from corn to cotton".
Exchange "Calcium-soil agricultural" is the result of combining the following original LCA Commons flows: "Calcium; applied in limestone", "Calcium; applied in dolomite".
Exchange "Lambda-cyhalothrin-soil agricultural" is the result of combining the following original LCA Commons flows: "Lambda-cyhalothrin; broadcast without incorporation; kg AI", "Lambda-cyhalothrin; in seed furrow; kg AI", "Lambda-cyhalothrin; broadcast with incorporation; kg AI", "Lambda-cyhalothrin; banded or side-dressed; kg AI", "Lambda-cyhalothrin; unspec. appl. method; kg AI", "Lambda-cyhalothrin; foliar or directed spray; kg AI".
Exchange "2,4-D-soil agricultural" is the result of combining the following original LCA Commons flows: "2,4-D; banded or side-dressed; kg AI", "2,4-D; broadcast with incorporation; kg AI", "2,4-D; unspec. appl. method; kg AI", "2,4-D; foliar or directed spray; kg AI", "2,4-D; broadcast without incorporation; kg AI", "2,4-D; in seed furrow; kg AI".
Exchange "Paraquat dichloride-soil unspecified" is the result of combining the following original LCA Commons flows: "Paraquat dichloride; in seed furrow; kg AI", "Paraquat dichloride; unspec. appl. method; kg AI", "Paraquat dichloride; broadcast without incorporation; kg AI", "Paraquat dichloride; foliar or directed spray; kg AI", "Paraquat dichloride; broadcast with incorporation; kg AI", "Paraquat dichloride; banded or side-dressed; kg AI".
Exchange "Aldicarb-soil agricultural" is the result of combining the following original LCA Commons flows: "Aldicarb; broadcast with incorporation; kg AI", "Aldicarb; foliar or directed spray; kg AI", "Aldicarb; broadcast without incorporation; kg AI", "Aldicarb; banded or side-dressed; kg AI", "Aldicarb; unspec. appl. method; kg AI", "Aldicarb; in seed furrow; kg AI".
Exchange "Fluometuron-soil agricultural" is the result of combining the following original LCA Commons flows: "Fluometuron; unspec. appl. method; kg AI", "Fluometuron; foliar or directed spray; kg AI", "Fluometuron; banded or side-dressed; kg AI", "Fluometuron; in seed furrow; kg AI", "Fluometuron; broadcast without incorporation; kg AI", "Fluometuron; broadcast with incorporation; kg AI".
Exchange "Zeta-cypermethrin-2bdf9967-6dae-4183-88d1-8f612548c51e low population density" was originally named: "Zeta-Cypermethrin; broadcast by air; kg AI" in this dataset.
Exchange "Magnesium-be1c0329-f1a8-4524-8420-a86d2a8dd358 agricultural" was originally named: "Magnesium; applied in dolomite" in this dataset.
Exchange "Clethodim-2bdf9967-6dae-4183-88d1-8f612548c51e low population density" was originally named: "Clethodim; broadcast by air; kg AI" in this dataset.
Exchange "Metalaxyl-M-2bdf9967-6dae-4183-88d1-8f612548c51e low population density" was originally named: "Metalaxyl-M; broadcast by air; kg AI" in this dataset.
Exchange "Acetaldehyde-2bdf9967-6dae-4183-88d1-8f612548c51e low population density" was originally named: "Acetaldehyde; from residue burning; kg C, biogenic" in this dataset.
Exchange "Hydrocyanic acid-2bdf9967-6dae-4183-88d1-8f612548c51e low population density" was originally named: "Hydrogen cyanide; from residue burning; kg C, biogenic" in this dataset.
Exchange "Sulfur-be1c0329-f1a8-4524-8420-a86d2a8dd358 agricultural" was originally named: "Sulfur; as secondary application" in this dataset.
Exchange "Quintozene-2bdf9967-6dae-4183-88d1-8f612548c51e low population density" was originally named: "Quintozene; broadcast by air; kg AI" in this dataset.
Exchange "Phorate-2bdf9967-6dae-4183-88d1-8f612548c51e low population density" was originally named: "Phorate; broadcast by air; kg AI" in this dataset.
Exchange "Dimethipin-2bdf9967-6dae-4183-88d1-8f612548c51e low population density" was originally named: "Dimethipin; broadcast by air; kg AI" in this dataset.
Exchange "Formic acid-2bdf9967-6dae-4183-88d1-8f612548c51e low population density" was originally named: "Formic acid; from residue burning; kg C, biogenic" in this dataset.
Exchange "Methanol-2bdf9967-6dae-4183-88d1-8f612548c51e low population density" was originally named: "Methanol; from residue burning; kg C, biogenic" in this dataset.
Exchange "Butane-2bdf9967-6dae-4183-88d1-8f612548c51e low population density" was originally named: "N butane; from residue burning; kg C, biogenic" in this dataset.
Exchange "Ethyne-2bdf9967-6dae-4183-88d1-8f612548c51e low population density" was originally named: "Acetylene; from residue burning; kg C, biogenic" in this dataset.
Exchange "Trifluralin-2bdf9967-6dae-4183-88d1-8f612548c51e low population density" was originally named: "Trifluralin; broadcast by air; kg AI" in this dataset.
Exchange "MSMA-2bdf9967-6dae-4183-88d1-8f612548c51e low population density" was originally named: "MSMA; broadcast by air; kg AI" in this dataset.
Exchange "Sodium chlorate-2bdf9967-6dae-4183-88d1-8f612548c51e low population density" was originally named: "Sodium chlorate; broadcast by air; kg AI" in this dataset.
Exchange "Acetone-2bdf9967-6dae-4183-88d1-8f612548c51e low population density" was originally named: "Acetone; from residue burning; kg C, biogenic" in this dataset.
Exchange "cis-2-Butene-2bdf9967-6dae-4183-88d1-8f612548c51e low population density" was originally named: "Cis 2 butene; from residue burning; kg C, biogenic" in this dataset.
Exchange "Methane-2bdf9967-6dae-4183-88d1-8f612548c51e low population density" was originally named: "Methane; from residue burning; kg C, biogenic" in this dataset.
Exchange "Acephate-2bdf9967-6dae-4183-88d1-8f612548c51e low population density" was originally named: "Acephate; broadcast by air; kg AI" in this dataset.
Exchange "Formaldehyde-2bdf9967-6dae-4183-88d1-8f612548c51e low population density" was originally named: "Formaldehyde; from residue burning; kg C, biogenic" in this dataset.
Exchange "isopentane-2bdf9967-6dae-4183-88d1-8f612548c51e low population density" was originally named: "I pentane; from residue burning; kg C, biogenic" in this dataset.
Exchange "Acrylonitrile-2bdf9967-6dae-4183-88d1-8f612548c51e low population density" was originally named: "Propenenitrile; from residue burning; kg C, biogenic" in this dataset.
Exchange "trans-2-Butene-2bdf9967-6dae-4183-88d1-8f612548c51e low population density" was originally named: "Trans 2 butene; from residue burning; kg C, biogenic" in this dataset.
Exchange "Aldicarb-2bdf9967-6dae-4183-88d1-8f612548c51e low population density" was originally named: "Aldicarb; broadcast by air; kg AI" in this dataset.
Exchange "Tribufos-2bdf9967-6dae-4183-88d1-8f612548c51e low population density" was originally named: "Tribufos; broadcast by air; kg AI" in this dataset.
Exchange "isobutene-2bdf9967-6dae-4183-88d1-8f612548c51e low population density" was originally named: "I butene; from residue burning; kg C, biogenic" in this dataset.
Exchange "Zinc compounds-be1c0329-f1a8-4524-8420-a86d2a8dd358 agricultural" was originally named: "Zinc compounds; as secondary application" in this dataset.
Exchange "Acetonitrile-2bdf9967-6dae-4183-88d1-8f612548c51e low population density" was originally named: "Acetonitrile; from residue burning; kg C, biogenic" in this dataset.
Exchange "Phosphorus-c19fb2d9-98eb-4cd3-8761-81b71d8a9a1b unspecified" was originally named: "Phosphorous; from plant uptake; biogenic" in this dataset.
Exchange "Deltamethrin-2bdf9967-6dae-4183-88d1-8f612548c51e low population density" was originally named: "Deltamethrin; broadcast by air; kg AI" in this dataset.
Exchange "Transformation, to arable-c19fb2d9-98eb-4cd3-8761-81b71d8a9a1b land" was originally named: "Transformation; to arable, to cotton" in this dataset.
Exchange "Cyfluthrin-2bdf9967-6dae-4183-88d1-8f612548c51e low population density" was originally named: "Beta-Cyfluthrin; broadcast by air; kg AI" in this dataset.
Exchange "Propane-2bdf9967-6dae-4183-88d1-8f612548c51e low population density" was originally named: "Propane; from residue burning; kg C, biogenic" in this dataset.
Exchange "Prometryn-2bdf9967-6dae-4183-88d1-8f612548c51e low population density" was originally named: "Prometryn; broadcast by air; kg AI" in this dataset.
Exchange "Cyanazine-2bdf9967-6dae-4183-88d1-8f612548c51e low population density" was originally named: "Cyanazine; broadcast by air; kg AI" in this dataset.
Exchange "Pentane-2bdf9967-6dae-4183-88d1-8f612548c51e low population density" was originally named: "N pentane; from residue burning; kg C, biogenic" in this dataset.
Exchange "Pyrithiobac sodium salt-2bdf9967-6dae-4183-88d1-8f612548c51e low population density" was originally named: "Pyrithiobac-sodium; broadcast by air; kg AI" in this dataset.
Exchange "Mepiquat chloride-2bdf9967-6dae-4183-88d1-8f612548c51e low population density" was originally named: "1,1-Dimethylpiperidinium chloride; broadcast by air; kg AI" in this dataset.
Exchange "Cypermethrin-2bdf9967-6dae-4183-88d1-8f612548c51e low population density" was originally named: "Cypermethrin; broadcast by air; kg AI" in this dataset.
Exchange "Occupation, arable-c19fb2d9-98eb-4cd3-8761-81b71d8a9a1b land" was originally named: "Occupation; arable, as cotton" in this dataset.
Exchange "Benzene-2bdf9967-6dae-4183-88d1-8f612548c51e low population density" was originally named: "Benzene; from residue burning; kg C, biogenic" in this dataset.
Exchange "Norflurazon-2bdf9967-6dae-4183-88d1-8f612548c51e low population density" was originally named: "Norflurazon; broadcast by air; kg AI" in this dataset.
Exchange "Water-2bdf9967-6dae-4183-88d1-8f612548c51e low population density" was originally named: "Water; from residue burning; biogenic" in this dataset.
Exchange "1-Butene-2bdf9967-6dae-4183-88d1-8f612548c51e low population density" was originally named: "1 butene; from residue burning; kg C, biogenic" in this dataset.
Exchange "Isoprene-2bdf9967-6dae-4183-88d1-8f612548c51e low population density" was originally named: "Isoprene; from residue burning; kg C, biogenic" in this dataset.
Exchange "2,4-D-2bdf9967-6dae-4183-88d1-8f612548c51e low population density" was originally named: "2,4-D; broadcast by air; kg AI" in this dataset.
Exchange "Carbon dioxide, in air-2bdf9967-6dae-4183-88d1-8f612548c51e low population density" was originally named: "Carbon dioxide; from residue burning; kg C, biogenic" in this dataset.
Exchange "Glyphosate-2bdf9967-6dae-4183-88d1-8f612548c51e low population density" was originally named: "Glyphosate; broadcast by air; kg AI" in this dataset.
Exchange "Thidiazuron-2bdf9967-6dae-4183-88d1-8f612548c51e low population density" was originally named: "Thidiazuron; broadcast by air; kg AI" in this dataset.
Exchange "Dimethoate-2bdf9967-6dae-4183-88d1-8f612548c51e low population density" was originally named: "Dimethoate; broadcast by air; kg AI" in this dataset.
Exchange "Pendimethalin-2bdf9967-6dae-4183-88d1-8f612548c51e low population density" was originally named: "Pendimethalin; broadcast by air; kg AI" in this dataset.
Exchange "Ethane-2bdf9967-6dae-4183-88d1-8f612548c51e low population density" was originally named: "Ethane; from residue burning; kg C, biogenic" in this dataset.
Exchange "Butadiene-2bdf9967-6dae-4183-88d1-8f612548c51e low population density" was originally named: "1,3 butadiene; from residue burning; kg C, biogenic" in this dataset.
Exchange "Sulfuric acid-be1c0329-f1a8-4524-8420-a86d2a8dd358 agricultural" was originally named: "Sulfuric acid; as secondary application" in this dataset.
Exchange "Ethephon-2bdf9967-6dae-4183-88d1-8f612548c51e low population density" was originally named: "Ethephon; broadcast by air; kg AI" in this dataset.
Exchange "Carbon dioxide-c19fb2d9-98eb-4cd3-8761-81b71d8a9a1b unspecified" was originally named: "Carbon dioxide; from plant uptake; kg C, biogenic" in this dataset.
Exchange "Propene-2bdf9967-6dae-4183-88d1-8f612548c51e low population density" was originally named: "Propylene; from residue burning; kg C, biogenic" in this dataset.
Exchange "Dinitrogen monoxide-2bdf9967-6dae-4183-88d1-8f612548c51e low population density" was originally named: "Dinitrogen monoxide; from residue burning; kg N, biogenic" in this dataset.
Exchange "Fluometuron-2bdf9967-6dae-4183-88d1-8f612548c51e low population density" was originally named: "Fluometuron; broadcast by air; kg AI" in this dataset.
Exchange "Bromoxynil-2bdf9967-6dae-4183-88d1-8f612548c51e low population density" was originally named: "Bromoxynil; broadcast by air; kg AI" in this dataset.
Exchange "Ammonia-2bdf9967-6dae-4183-88d1-8f612548c51e low population density" was originally named: "Ammonia; from residue burning; kg N, biogenic" in this dataset.
Exchange "Ethene-2bdf9967-6dae-4183-88d1-8f612548c51e low population density" was originally named: "Ethylene; from residue burning; kg C, biogenic" in this dataset.
Exchange "Toluene-2bdf9967-6dae-4183-88d1-8f612548c51e low population density" was originally named: "Toluene; from residue burning; kg C, biogenic" in this dataset.
Exchange "Lambda-cyhalothrin-2bdf9967-6dae-4183-88d1-8f612548c51e low population density" was originally named: "Lambda-cyhalothrin; broadcast by air; kg AI" in this dataset.
Exchange "Furan-2bdf9967-6dae-4183-88d1-8f612548c51e low population density" was originally named: "Furan; from residue burning; kg C, biogenic" in this dataset.
Exchange "Nitrogen dioxide-2bdf9967-6dae-4183-88d1-8f612548c51e low population density" was originally named: "Nitrogen dioxide; from residue burning; kg N, biogenic" in this dataset.
Exchange "Cyclanilide-2bdf9967-6dae-4183-88d1-8f612548c51e low population density" was originally named: "Cyclanilide; broadcast by air; kg AI" in this dataset.
Exchange "Carbon monoxide, fossil-2bdf9967-6dae-4183-88d1-8f612548c51e low population density" was originally named: "Carbon monoxide; from residue burning; kg C, biogenic" in this dataset.
Exchange "Acetic acid-2bdf9967-6dae-4183-88d1-8f612548c51e low population density" was originally named: "Acetic acid; from residue burning; kg C, biogenic" in this dataset.
Exchange "Phenol-2bdf9967-6dae-4183-88d1-8f612548c51e low population density" was originally named: "Phenol; from residue burning; kg C, biogenic" in this dataset.

## Geography
The unit process is assumed to represent production in North Carolina (US State).

## Technology
This process produces cotton lint; at harvest in 2000; at farm; 90%-93% moisture. The process is assumed to represent production in North Carolina (US State). Yields and related inputs and outputs represent a single year of operation, in 2000. This dataset includes consideration of residue burning; soil preparation; planting or sowing; irrigation; application, storage, and transport of fertilizers, manures, liming materials, secondary materials, and pesticides; and harvest. Fate and transport of applications are not included as described in Cooper, J.S., Kahn, E., Noon, M. (2012) LCA Digital Commons Unit Process Data: field crop production Version 1 which is available at https://www.lcacommons.gov/discovery/docs/LCA%20Digital%20Commons%20Unit%20Process%20Data%20final%20updated.pdf

## Time period
Start and end dates match the underlying data obtained from the USDA Agricultural Resource Management Survey (ARMS).
## Parameters
- p3291: 0.437
- p3905: 3.26109e-5; = p1762*p3478
- p0885: 100; = IF(p0689+p0884=100;0;100-(p0689+p0884))
- p0021: 929.695
- p1879: 3.93632e-5; = p1471*1000/p0818
- p2343: 0.00411041; = p2228*p2211
- p2382: 0.0015975; = p2229*p2211
- p3295: 0.58
- p4729: 0; = p1762*p3482
- p5336: 1.84818e-7; = p1957*p3484
- p2425: 0; = p2235*p2215
- p0314: 0.5
- p2244: 0.000123938; = p2222*p2189
- p2131: 1.49937e-6; = p2015*p2059*p2093/(p0818*1000)
- p0509: 0; = SQRT(2)*(IF((2*p0377-1)<0;-1;IF((2*p0377-1)>0;1;0))*SQRT(SQRT((2/(pi()*0.140012289)+LN(1-(2*p0377-1)^2)/2)^2-LN(1-(2*p0377-1)^2)/0.140012289)-(2/(pi()*0.140012289)+LN(1-(2*p0377-1)^2)/2)))
- p3473: 0; = p3378*p1241
- p0238: 10.125
- p3408: 0.000191924; = p3370*p1238
- p3314: 0; = if(and(p1232=0;p3253<>0);p3263*p3289;0)
- p0628: 0; = IF(p0364<0.5;-SQRT(p0007*EXP(p0496^2*p0008)-p0007);SQRT(p0007*EXP(p0496^2*p0008)-p0007))
- p1266: 0.2695; = if(p1232>0;0;IF(p1259+p1263+p1264+p1265=1;0;1-(p1259+p1263+p1264+p1265)))
- p0824: 0.8615
- p2458: 0.000220211; = p2262*p1073
- p3194: 0; = p2413*p1023
- p2825: 2.00604e-5; = p2239*(p1020+p1022)
- p2551: 0.00164613; = p2355*p1014
- p3210: 0; = p2429*p1132
- p2970: 7.37757e-6; = p2384*(p1079+p1081)
- p3333: 4.32993e6; = if(and(p1232=0;p3255<>0);p3255-(p3328+p3329+p3330+p3331+p3332);0)
- p3467: 0; = p3372*p1241
- p3046: 0; = p2265*p1082
- p3290: 0.195
- p0454: 0; = SQRT(2)*(IF((2*p0322-1)<0;-1;IF((2*p0322-1)>0;1;0))*SQRT(SQRT((2/(pi()*0.140012289)+LN(1-(2*p0322-1)^2)/2)^2-LN(1-(2*p0322-1)^2)/0.140012289)-(2/(pi()*0.140012289)+LN(1-(2*p0322-1)^2)/2)))
- p2862: 0.00381104; = p2276*(p1020+p1022)
- p3382: 0; = p3363*p1234
- p1866: 0
- p2074: 0.025
- p2831: 7.12934e-5; = p2245*(p1020+p1022)
- p4250: 3.91323e-6; = p1901*p3479
- p2774: 5.62478e-7; = p2383*(p1078+p1080)
- p1246: 0; = if(p1232>0;0;p1241*(p0725/100)*p0723*1000)
- p2313: 0.00627477; = p2231*p2220
- p1769: 0
- p2144: 6.58159e-7; = p2015*p2072*p2106/(p0818*1000)
- p3143: 1.84456e-8; = p2362*p1023
- p1279: 0
- p1253: 0; = if(p1232>0;0;p0735/100)
- p3425: 0; = p3368*p1239
- p0577: 0; = IF(p0313<0.5;-SQRT(p0007*EXP(p0445^2*p0008)-p0007);SQRT(p0007*EXP(p0445^2*p0008)-p0007))
- p2529: 0.000511582; = p2333*p1014
- p2919: 0.000855332; = p2333*(p1020+p1022)
- p3246: 0.22621; = IF(p3244+p3245=1;0;1-(p3244+p3245))
- p3367: 0; = if(p1232=0;p3244*p3361/p0818;0)
- p0438: 0; = SQRT(2)*(IF((2*p0306-1)<0;-1;IF((2*p0306-1)>0;1;0))*SQRT(SQRT((2/(pi()*0.140012289)+LN(1-(2*p0306-1)^2)/2)^2-LN(1-(2*p0306-1)^2)/0.140012289)-(2/(pi()*0.140012289)+LN(1-(2*p0306-1)^2)/2)))
- p2537: 0.000207972; = p2341*p1073
- p5309: 7.76235e-7; = p1930*p3484
- p1786: 0
- p2583: 1.94991e-5; = p2387*p1073
- p0738: 929.695; = p0078*(1+p0606*p0210/100)
- p0695: 0
- p5330: 6.17292e-6; = p1951*p3484
- p1161: 930000; = p0801
- p1025: 43139.5; = IF(p1012=0;p1019*(p0704/100)*p0703*1000;0)
- p0804: 1.429e6
- p2739: 5.554e-5; = p2348*(p1078+p1080)
- p1065: 0.00381156; = IF(p1012=0;p1051/(p1058*p0818);0)
- p1616: 0
- p0772: 90.215; = p0112*(1+p0640*p0244/100)
- p2434: 0.000126602; = p2238*p1014
- p1729: 0
- p1314: 0; = p1310*p1252/p0818
- p1632: 0
- p2471: 0.000170887; = p2275*p1123
- p2643: 7.25208e-7; = p2252*(p1019+p1021)
- p2655: 4.75967e-5; = p2264*(p1078+p1080)
- p3682: 2.66433e-5; = p1951*p3476
- p4054: 0.00013452; = p1911*p3478
- p1699: 0.762907
- p3312: 0; = if(and(p1232=0;p3253<>0);p3261*p3277*(p3298*p3290+(1-p3298)*p3294);0)
- p2992: 0; = p2406*(p1020+p1022)
- p5257: 3.69636e-8; = p1878*p3484
- p0581: 0; = IF(p0317<0.5;-SQRT(p0007*EXP(p0449^2*p0008)-p0007);SQRT(p0007*EXP(p0449^2*p0008)-p0007))
- p3310: 0; = if(and(p1232=0;p3252<>0);IF((p3306+p3307+p3308+p3309)+(p3252*(p3257*(1-p3277))/p3305)>p3252;p3252-(p3306+p3307+p3308+p3309);p3252*(p3257*(1-p3277))/p3305);0)
- p1686: 0
- p0822: 0.916
- p3923: 3.17957e-5; = p1780*p3478
- p4037: 0.000335893; = p1894*p3478
- p2349: 0.00157181; = p2228*p2217
- p1229: 0.0106051; = IF(p1221=0;0;p1228*p1221)
- p3381: 0; = p3362*p1234
- p3453: 0; = p3377*p1240
- p3084: 0; = p2303*p1082
- p1241: 0; = if(p1232>0;0;IF(p1234+p1238+p1239+p1240=1;0;1-(p1234+p1238+p1239+p1240)))
- p4170: 2.74984e-6; = p1821*p3479
- p1984: 30
- p3402: 0; = p3364*p1238
- p0319: 0.5
- p0699: 0
- p3949: 4.07637e-6; = p1806*p3478
- p2830: 6.22851e-5; = p2244*(p1020+p1022)
- p3256: 5.85775e6; = p1252*(p1307*(1-p3247)+p1310*(1-p3248)+p1311*(1-p3249)+p1312*(1-p3250))
- p2192: 0.00620267; = p1067-p2189-p2190-p2191
- p3255: 1.58779e7; = p1252*(p1297*(1-p3247)+p1300*(1-p3248)+p1301*(1-p3249)+p1302*(1-p3250))
- p1180: 9.24033e-8; = p1176*p1179/p0818
- p1781: 0
- p2161: 5.07671e-8; = p2015*p2085*p2123/(p0818*1000)
- p1079: 0.32176; = IF(p1071=0;IF(p1073+p1078=1;0;IF(p1073+p1078+p1075>1;1-(p1073+p1078);p1075));0)
- p2997: 0; = p2411*(p1020+p1022)
- p1242: 36078.9; = if(p1232>0;0;p1234*(p0725/100)*p0723*1000)
- p3377: 0.000350538; = if(p1232=0;p3246*p3359/p0818;0)
- p2915: 3.98141e-6; = p2329*(p1020+p1022)
- p2754: 9.13155e-5; = p2363*(p1019+p1021)
- p2618: 0; = p2422*p1073
- p3034: 8.09939e-11; = p2253*p1023
- p3947: 1.22291e-5; = p1804*p3478
- p2859: 0.0133084; = p2273*(p1129+p1131)
- p1414: 3
- p3468: 0; = p3373*p1241
- p0888: 0; = p0686*1000*p0687*p0884/100
- p1964: 0.5
- p1700: 0
- p1072: 0; = p1071*p0001/(p0818*p0002)
- p1931: 0
- p2634: 0.000108496; = p2243*(p1019+p1021)
- p3117: 0; = p2336*p1082
- p0727: 35.264; = p0067*(1+p0595*p0199/100)
- p1682: 0
- p0766: 28.085; = p0106*(1+p0634*p0238/100)
- p2102: 0.922577
- p2199: 0.000174011; = p1069-p2197-p2198
- p2631: 2.70669e-5; = p2240*(p1019+p1021)
- p1387: 3
- p3154: 9.02311e-9; = p2373*p1023
- p1820: 0
- p4252: 2.66523e-5; = p1903*p3479
- p2336: 0.00319368; = p2228*p2204
- p5321: 3.32672e-7; = p1942*p3484
- p1708: 0
- p2284: 0.000560677; = p2223*p2190
- p3021: 1.37493e-9; = p2240*p1023
- p2104: 0.817136
- p5128: 8.85761e-6; = p1955*p3483
- p1963: 0.00332682; = p1963a+p1963b+p1963c+p1963d+p1963e+p1963f+p1963g+p1963h+p1963i+p1963j+p1963k
- p0377: 0.5
- p3278: 0.46
- p2094: 0.922577
- p2266: 2.18822e-6; = p2226*p2212
- p1024: 267193; = IF(p1012=0;p1014*(p0704/100)*p0703*1000;0)
- p0124: 103.057
- p1999: 5.91882e7; = (p1228+p1229)*p0818+p1164
- p3469: 0; = p3374*p1241
- p2072: 0.134
- p2989: 0; = p2403*(p1020+p1022)
- p1675: 0.655218
- p3239: 0.013074; = IF(p3238+p3235+p3236=1;0;1-(p3238+p3235+p3236))
- p2447: 6.74631e-7; = p2251*p1014
- p4716: 1.62776e-5; = p1955*p3481
- p0746: 15.283; = p0086*(1+p0614*p0218/100)
- p2876: 4.45788e-6; = p2290*(p1020+p1022)
- p2560: 0.00112833; = p2364*p1014
- p1118: 0.00731725; = IF(p1071=0;p1108/(p1113*p0818);0)
- p2921: 0.00141126; = p2335*(p1020+p1022)
- p1217: 14.999
- p2939: 0.000562483; = p2353*(p1129+p1131)
- p2852: 8.69225e-7; = p2266*(p1079+p1081)
- p1885: 0
- p0705: 30.058; = p0045*(1+p0573*p0177/100)
- p1251: 0; = if(p1232>0;0;p1246*p0001/(p0818*p0002))
- p3058: 1.66465e-8; = p2277*p1023
- p3120: 0; = p2339*p1082
- p3470: 0; = p3375*p1241
- p2611: 0; = p2415*p1073
- p1953: 0
- p0751: 16.628; = p0091*(1+p0619*p0223/100)
- p3227: 0.00134513; = p3223*p1229
- p0052: 26.669
- p1264: 0; = if(p1232>0;0;IF(p1259+p1263=1;0;IF(p1259+p1263+p1261>1;1-(p1259+p1263);p1261)))
- p1983: 50
- p5258: 9.98017e-7; = p1879*p3484
- p4869: 0; = p1902*p3482
- p2356: 0.000519021; = p2225*p2184
- p3445: 0; = p3369*p1240
- p2027: 0.428799
- p0091: 16.628
- p0499: 0; = SQRT(2)*(IF((2*p0367-1)<0;-1;IF((2*p0367-1)>0;1;0))*SQRT(SQRT((2/(pi()*0.140012289)+LN(1-(2*p0367-1)^2)/2)^2-LN(1-(2*p0367-1)^2)/0.140012289)-(2/(pi()*0.140012289)+LN(1-(2*p0367-1)^2)/2)))
- p3424: 0; = p3367*p1239
- p1798: 0
- p1076: 0.05; = IF(p1071=0;p0714/100;0)
- p0644: 0; = IF(p0380<0.5;-SQRT(p0007*EXP(p0512^2*p0008)-p0007);SQRT(p0007*EXP(p0512^2*p0008)-p0007))
- p2462: 6.26005e-7; = p2266*p1073
- p0311: 0.5
- p1832: 0.00114591; = p1424*1000/p0818
- p3172: 2.01612e-5; = p2391*p1132
- p3088: 0; = p2307*p1082
- p1151: 6.55502e6; = if(p1121=0;p1149*p1148*p1145;0)
- p0768: 57.053; = p0108*(1+p0636*p0240/100)
- p2610: 0; = p2414*p1073
- p1263: 0; = if(p1232>0;0;IF(p1259=1;0;IF(p1259+p1260>1;1-p1259;p1260)))
- p4788: 0; = p1821*p3482
- p4512: 0; = p1957*p3480
- p2182: 0.0412236; = p1050/p0818
- p1762: 5.83158e-5; = p1354*1000/p0818
- p0784: 103.057; = p0124*(1+p0652*p0256/100)
- p1224: 0.44; = IF(p1221=0;0;IF(p1193=0;1-p1223;0))
- p0487: 0; = SQRT(2)*(IF((2*p0355-1)<0;-1;IF((2*p0355-1)>0;1;0))*SQRT(SQRT((2/(pi()*0.140012289)+LN(1-(2*p0355-1)^2)/2)^2-LN(1-(2*p0355-1)^2)/0.140012289)-(2/(pi()*0.140012289)+LN(1-(2*p0355-1)^2)/2)))
- p0580: 0; = IF(p0316<0.5;-SQRT(p0007*EXP(p0448^2*p0008)-p0007);SQRT(p0007*EXP(p0448^2*p0008)-p0007))
- p0761: 0
- p0049: 33.382
- p1975: 0.00120966; = p1970*p0001/(p0818*p0002)
- p2566: 3.16545e-5; = p2370*p1014
- p4153: 1.58644e-6; = p1804*p3479
- p0775: 45.289; = p0115*(1+p0643*p0247/100)
- p1174: 3.48536e-7; = p1170*p1173/p0818
- p3499: 5.95088e-5; = p1768*p3476
- p0729: 0
- p1706: 0
- p1626: 0
- p0517: 0; = SQRT(2)*(IF((2*p0385-1)<0;-1;IF((2*p0385-1)>0;1;0))*SQRT(SQRT((2/(pi()*0.140012289)+LN(1-(2*p0385-1)^2)/2)^2-LN(1-(2*p0385-1)^2)/0.140012289)-(2/(pi()*0.140012289)+LN(1-(2*p0385-1)^2)/2)))
- p3091: 0; = p2310*p1082
- p0491: 0; = SQRT(2)*(IF((2*p0359-1)<0;-1;IF((2*p0359-1)>0;1;0))*SQRT(SQRT((2/(pi()*0.140012289)+LN(1-(2*p0359-1)^2)/2)^2-LN(1-(2*p0359-1)^2)/0.140012289)-(2/(pi()*0.140012289)+LN(1-(2*p0359-1)^2)/2)))
- p2085: 0.0335294
- p0058: 29.219
- p3217: 0.00853681; = p3213*p1228
- p1234: 0.64736; = if(p1232>0;0;p0726/100)
- p3238: 0.854735; = IF(p3237+p3235+p3236>1;1-(p3235+p3236);p3237)
- p3586: 0.000137365; = p1855*p3476
- p2294: 0.00190566; = p2223*p2201
- p2351: 0.00844332; = p2232*p2219
- p1227: 0.00120966; = IF(p1221=0;0;p1226*p0001/(p0818*p0002))
- p1792: 0
- p0742: 98.395; = p0082*(1+p0610*p0214/100)
- p5103: 2.48013e-6; = p1930*p3483
- p4799: 0; = p1832*p3482
- p2162: 9.35184e-8; = p2015*p2086*p2124/(p0818*1000)
- p0963: 0.00120966; = if(and(p0683>0;or(p0807=480;p0807=32;p0807=1;and(p0807=60;p0901<0.03)));p0939;0)
- p1841: 0
- p0935: 0; = p0929*p0001/(p0818*p0002)
- p0417: 0; = SQRT(2)*(IF((2*p0285-1)<0;-1;IF((2*p0285-1)>0;1;0))*SQRT(SQRT((2/(pi()*0.140012289)+LN(1-(2*p0285-1)^2)/2)^2-LN(1-(2*p0285-1)^2)/0.140012289)-(2/(pi()*0.140012289)+LN(1-(2*p0285-1)^2)/2)))
- p2015: 3.93444e6; = p0830*p2011*p2013
- p0226: 7.705
- p1845: 0.000482564; = p1437*1000/p0818
- p0741: 2.634; = p0081*(1+p0609*p0213/100)
- p2070: 0.282
- p1914: 0
- p4718: 1.08517e-6; = p1957*p3481
- p2108: 0.826583
- p0881: 0; = p0880*p0001*p0003/(p0818*p0002)
- p3339: 0; = if(and(p1232=0;p3254<>0);p3254*(p3269*p3277-p3334)/p3338;0)
- p2091: 0.374844
- p0686: 0
- p0452: 0; = SQRT(2)*(IF((2*p0320-1)<0;-1;IF((2*p0320-1)>0;1;0))*SQRT(SQRT((2/(pi()*0.140012289)+LN(1-(2*p0320-1)^2)/2)^2-LN(1-(2*p0320-1)^2)/0.140012289)-(2/(pi()*0.140012289)+LN(1-(2*p0320-1)^2)/2)))
- p2442: 1.07232e-5; = p2246*p1014
- p1022: 0.33382; = IF(p1012=0;IF(p1014+p1019+p1020+p1021=1;0;IF(p1014+p1019+p1020+p1021+p1018>1;1-(p1014+p1019+p1020+p1021);p1018));0)
- p3061: 1.18306e-8; = p2280*p1023
- p0245: 3.263
- p1303: 0; = p1297*p1252/p0818
- p2670: 0.000106975; = p2279*(p1019+p1021)
- p1117: 0.00642634; = IF(p1071=0;p1107/(p1112*p0818);0)
- p3374: 0.00170099; = if(p1232=0;p3246*p3356/p0818;0)
- p0322: 0.5
- p1037: 0.372426
- p1557: 0
- p3346: 0.0178625; = if(and(p1232=0;p3256<>0);p3274*(p3281*(p3285*p1256+p3286*(p1253+p1257)+p1258*p3288));0)
- p2692: 0.00118141; = p2301*(p1078+p1080)
- p0854: 407621; = p0801*((1-p0853)*p0846+p0853*p0852)
- p3415: 0.000123614; = p3377*p1238
- p1590: 0
- p2652: 0.00117765; = p2261*(p1078+p1080)
- p2847: 0.00147715; = p2261*(p1079+p1081)
- p3318: 0; = if(and(p1232=0;p3253<>0);p3253*(p3262-p3313)/p3316;0)
- p0108: 57.053
- p2949: 0.000233113; = p2363*(p1020+p1022)
- p1959: 4755.34; = if(p0738*p0740*p0739>0;p0738*1000*(p0740/100)*p0739/1000;p1958)
- p2587: 0.000105914; = p2391*p1123
- p1996: 30
- p1080: 0.05; = IF(p1071=0;IF(p1073+p1078+p1079=1;0;IF(p1073+p1078+p1079+p1076>1;1-(p1073+p1078+p1079);p1076));0)
- p1981: 400
- p2345: 4.77876e-5; = p2228*p2213
- p2414: 0; = p2235*p2204
- p1062: 0.16
- p1515: 6
- p0191: 10.883
- p0933: 930000; = p0801*p0927
- p1818: 0
- p1034: 0.000385973; = IF(p1012=0;p1028*p0001/(p0818*p0002);0)
- p2155: 7.04845e-7; = p2015*p2084*p2117/(p0818*1000)
- p2089: 0.40001
- p2880: 0.000957692; = p2294*(p1020+p1022)
- p2223: 0.183958; = if(p0765*p0769+p0766*p0770+p0767*p0771+p0768*p0772=0;0;p0770*p0766/(p0765*p0769+p0766*p0770+p0767*p0771+p0768*p0772))
- p2497: 0.00106722; = p2301*p1073
- p1775: 0
- p0957: 0; = if(and(p0683>0;or(p0807=56;p0807=100;and(p0807=60;p0901>0.06)));p0939;0)
- p0195: 0
- p3493: 6.38164e-6; = p1762*p3476
- p3287: 0.745
- p1986: 4200
- p1218: 0.5
- p3057: 7.5834e-8; = p2276*p1023
- p2725: 4.82216e-5; = p2334*(p1019+p1021)
- p1120: 0.0283063; = IF(p1071=0;p1110/(p1115*p0818);0)
- p1296: 0; = p1292*p1252/p0818
- p2807: 0; = p2416*(p1078+p1080)
- p1826: 0
- p2274: 0.00132854; = p2230*p2220
- p1665: 0
- p2008: 0.441112; = ((p1982*p1985+p1988*p1991+p1994*p1997+p2002*p2005)/p0818)*p0005*p0002/1000
- p0901: 0.01746
- p2032: 0.448886
- p1610: 0
- p1009: 0; = p1005*p0001*p0004/(p0818*p0002)
- p2720: 1.55961e-6; = p2329*(p1019+p1021)
- p0145: 0
- p1308: 0
- p2046: 10
- p0535: 0; = SQRT(2)*(IF((2*p0403-1)<0;-1;IF((2*p0403-1)>0;1;0))*SQRT(SQRT((2/(pi()*0.140012289)+LN(1-(2*p0403-1)^2)/2)^2-LN(1-(2*p0403-1)^2)/0.140012289)-(2/(pi()*0.140012289)+LN(1-(2*p0403-1)^2)/2)))
- p1579: 0
- p0750: 0
- p3289: 0.05
- p1771: 0
- p1054: 2.4215e7; = IF(p1012=0;p1047*p1036;0)
- p0714: 5; = p0054*(1+p0582*p0186/100)
- p1811: 0
- p2947: 0.000809855; = p2361*(p1020+p1022)
- p3127: 0; = p2346*p1082
- p3443: 0; = p3367*p1240
- p2943: 0.000898428; = p2357*(p1020+p1022)
- p2961: 0.000493049; = p2375*(p1079+p1081)
- p0897: 0.49875
- p0951: 0; = if(and(p0683=0;or(p0807=480;p0807=32;p0807=1;and(p0807=60;p0901<0.03)));p0939;0)
- p2700: 0.000128884; = p2309*(p1078+p1080)
- p1193: 0; = IF(OR(p1036=0;p1095=0);0.0001*p0857;0)
- p3418: 0.0782219; = p3380*p1238
- p3226: 0.00237812; = p3222*p1229
- p2562: 0.00137663; = p2366*p1014
- p2699: 0.000891441; = p2308*(p1078+p1080)
- p2053: 1.45647
- p2837: 1.12794e-6; = p2251*(p1020+p1022)
- p1564: 0.822
- p1235: 0.35264; = if(p1232>0;0;p0727/100)
- p1074: 0.26669; = IF(p1071=0;p0712/100;0)
- p1029: 8.88925; = IF(p1012=0;IF(p0801<p1023*(p0704/100)*p0703*1000;p0801;p1023*(p0704/100)*p0703*1000);0)
- p2822: 0; = p2431*(p1128+p1130)
- p0657: 0; = IF(p0393<0.5;-SQRT(p0007*EXP(p0525^2*p0008)-p0007);SQRT(p0007*EXP(p0525^2*p0008)-p0007))
- p1592: 0
- p2269: 0.000580819; = p2226*p2215
- p1075: 0.32176; = IF(p1071=0;p0713/100;0)
- p0156: 7.637
- p0869: 0.00037957; = IF(p0858+p0864+p0865+p0866+p0867+p0868=1;0;1-(p0858+p0864+p0865+p0866+p0867+p0868))
- p0865: 0.404769; = IF(p0858+p0864=1;0;IF(p0858+p0864+p0860>1;1-(p0858+p0864);p0860))
- p3299: 0; = if(p1303+p1304+p1305+p1306=0;0;p1303/(p1303+p1304+p1305+p1306))
- p2759: 5.74497e-6; = p2368*(p1019+p1021)
- p3159: 0; = p2378*p1082
- p2339: 0.00776616; = p2228*p2207
- p1621: 0
- p4861: 0; = p1894*p3482
- p5272: 2.92382e-5; = p1893*p3484
- p2683: 6.30162e-6; = p2292*(p1019+p1021)
- p2517: 0.000584745; = p2321*p1014
- p1623: 0
- p2581: 3.57391e-5; = p2385*p1073
- p1566: 0
- p0796: 95.639; = p0136*(1+p0664*p0268/100)
- p0188: 3.105
- p1951: 0.000243469; = p1543*1000/p0818
- p3181: 0; = p2400*p1023
- p3330: 336148; = if(and(p1232=0;p3255<>0);p3255*(p3267-p3325)/p3327;0)
- p3477: 0.00357996; = if(p1328+p1330+p1332+p1334+p1336+p1338+p1340+p1342+p1344=0;0;p1330/(p1328+p1330+p1332+p1334+p1336+p1338+p1340+p1342+p1344))
- p2826: 6.90971e-5; = p2240*(p1020+p1022)
- p1339: 0.00118113; = p1338*p0001/(p0818*p0002)
- p1843: 0
- p0783: 105.245; = p0123*(1+p0651*p0255/100)
- p1274: 0; = p1270*p1252/p0818
- p0859: 0.0967903; = p0671*1000/p0856
- p0051: 28.608
- p2769: 0.000955866; = p2378*(p1078+p1080)
- p1088: 0; = IF(p1071=0;p1082*(p0710/100)*p0703*1000;0)
- p1196: 0.59
- p2444: 0.00049391; = p2248*p1014
- p0575: 0; = IF(p0311<0.5;-SQRT(p0007*EXP(p0443^2*p0008)-p0007);SQRT(p0007*EXP(p0443^2*p0008)-p0007))
- p1598: 0.392863
- p2362: 0.00184456; = p2225*p2190
- p2141: 9.97542e-7; = p2015*p2069*p2103/(p0818*1000)
- p0647: 0; = IF(p0383<0.5;-SQRT(p0007*EXP(p0515^2*p0008)-p0007);SQRT(p0007*EXP(p0515^2*p0008)-p0007))
- p1547: 75
- p3235: 0.118093
- p4046: 0.000205449; = p1903*p3478
- p0393: 0.5
- p1618: 0.660002
- p0579: 0; = IF(p0315<0.5;-SQRT(p0007*EXP(p0447^2*p0008)-p0007);SQRT(p0007*EXP(p0447^2*p0008)-p0007))
- p1739: 0
- p3099: 4.85324e-9; = p2318*p1023
- p2124: 0.263965
- p2845: 0.00054939; = p2259*(p1079+p1081)
- p1808: 0
- p1262: 0.7305; = if(p1232>0;0;p0733/100)
- p3686: 1.19656e-5; = p1955*p3476
- p2578: 0.000457014; = p2382*p1073
- p0813: 1.56522; = if(p0807=480;1.56521739130435;0)
- p1061: 0.3
- p1315: 0; = p1311*p1252/p0818
- p3145: 3.75386e-8; = p2364*p1023
- p2110: 0.856281
- p2945: 0.000281512; = p2359*(p1020+p1022)
- p0669: 22.5515; = p0009*(1+p0537*p0141/100)
- p1658: 0
- p3101: 1.52071e-9; = p2320*p1023
- p1485: 791
- p0817: 0
- p0573: 0; = IF(p0309<0.5;-SQRT(p0007*EXP(p0441^2*p0008)-p0007);SQRT(p0007*EXP(p0441^2*p0008)-p0007))
- p1828: 0
- p3112: 2.85893e-10; = p2331*p1023
- p3349: 0.816024; = if(and(p1232=0;p3256<>0);1-(p3345+p3346+p3347+p3348);0)
- p2649: 0.000484286; = p2258*(p1078+p1080)
- p2728: 0.00091474; = p2337*(p1078+p1080)
- p3379: 0.00156853; = if(p1232=0;p3246*p3361/p0818;0)
- p1834: 0
- p2694: 0.000230672; = p2303*(p1078+p1080)
- p1155: 0.0261633; = if(p1153*p0818=0;0;p1151/(p1153*p0818))
- p2927: 0.000288775; = p2341*(p1079+p1081)
- p1969: 0; = p0803
- p0382: 0.5
- p1570: 0
- p2978: 0.00154089; = p2392*(p1129+p1131)
- p2012: 0.0061076
- p1980: 3521.6
- p2556: 0.00215396; = p2360*p1014
- p0255: 8.35
- p2000: 4000
- p4593: 0.000170589; = p1832*p3481
- p5337: 0; = p1962*p3484
- p1691: 0
- p2463: 6.54603e-6; = p2267*p1073
- p0753: 0
- p2325: 0.00101907; = p2224*p2192
- p3241: 3.51792e-9; = p3234*p1188*p3236/p0818
- p3073: 3.20107e-10; = p2292*p1023
- p3169: 0; = p2388*p1082
- p0530: 0; = SQRT(2)*(IF((2*p0398-1)<0;-1;IF((2*p0398-1)>0;1;0))*SQRT(SQRT((2/(pi()*0.140012289)+LN(1-(2*p0398-1)^2)/2)^2-LN(1-(2*p0398-1)^2)/0.140012289)-(2/(pi()*0.140012289)+LN(1-(2*p0398-1)^2)/2)))
- p1168: 2.92033e-6; = p1164*p1167/p0818
- p3633: 2.7122e-6; = p1902*p3476
- p2483: 0.00195205; = p2287*p1014
- p1271: 0; = IF(p1267+p1270=p1259;0;IF(p1267+p1270+p1269>p1259;p1259-(p1267+p1270);p1269))
- p3950: 2.44582e-6; = p1807*p3478
- p2489: 0.00133607; = p2293*p1014
- p0503: 0; = SQRT(2)*(IF((2*p0371-1)<0;-1;IF((2*p0371-1)>0;1;0))*SQRT(SQRT((2/(pi()*0.140012289)+LN(1-(2*p0371-1)^2)/2)^2-LN(1-(2*p0371-1)^2)/0.140012289)-(2/(pi()*0.140012289)+LN(1-(2*p0371-1)^2)/2)))
- p0246: 18.061
- p0474: 0; = SQRT(2)*(IF((2*p0342-1)<0;-1;IF((2*p0342-1)>0;1;0))*SQRT(SQRT((2/(pi()*0.140012289)+LN(1-(2*p0342-1)^2)/2)^2-LN(1-(2*p0342-1)^2)/0.140012289)-(2/(pi()*0.140012289)+LN(1-(2*p0342-1)^2)/2)))
- p0385: 0.5
- p1744: 0
- p0968: 0
- p1669: 0
- p2659: 4.87427e-5; = p2268*(p1078+p1080)
- p2693: 0.000534249; = p2302*(p1078+p1080)
- p1963i: 8.96887e-5; = p1706*p1910+p1707*p1911+p1708*p1912+p1709*p1913+p1710*p1914+p1711*p1915+p1712*p1916+p1713*p1917+p1714*p1918+p1715*p1919+p1716*p1920+p1717*p1921+p1718*p1922+p1719*p1923+p1720*p1924+p1721*p1925+p1722*p1926+p1723*p1927+p1724*p1928
- p3348: 0.00443516; = if(and(p1232=0;p3256<>0);p3276*p3289;0)
- p2364: 0.00375386; = p2225*p2192
- p2874: 0.000699611; = p2288*(p1020+p1022)
- p3192: 0; = p2411*p1023
- p3365: 0; = if(p1232=0;p3244*p3359/p0818;0)
- p3457: 0; = p3362*p1241
- p1328: 667516; = p1319*p0801
- p2877: 7.3169e-6; = p2291*(p1020+p1022)
- p3357: 1.34443e6; = if(p1232=0;p3307+p3318+p3329+p3340+p3351;0)
- p3248: 0
- p2201: 0.0103592; = 12.01*p2200/(2*14.0067)
- p0571: 0; = IF(p0307<0.5;-SQRT(p0007*EXP(p0439^2*p0008)-p0007);SQRT(p0007*EXP(p0439^2*p0008)-p0007))
- p2639: 0.000323478; = p2248*(p1019+p1021)
- p1164: 4006.23; = p1163*p0801
- p2286: 0.00114103; = p2223*p2192
- p0321: 0.5
- p1985: 2.15268e8; = (if(p1057=0;0;p1050/p1057)+if(p1058=0;0;p1051/p1058)+if(p1059=0;0;p1052/p1059)+if(p1060=0;0;p1053/p1060)+if(p1061=0;0;p1054/p1061)+if(p1062=0;0;p1055/p1062)+if(p1063=0;0;p1056/p1063))*(1+p1157)
- p3294: 0.279
- p5074: 4.36975e-6; = p1901*p3483
- p1815: 0
- p2518: 0.000131497; = p2322*p1014
- p1340: 0; = p1325*p0801
- p4703: 1.95331e-6; = p1942*p3481
- p2187: 0.000925589; = 4*1.00794*p2186/(2*14.0067)
- p2420: 0; = p2235*p2210
- p3414: 5.61071e-5; = p3376*p1238
- p2751: 0.0014107; = p2360*(p1019+p1021)
- p0646: 0; = IF(p0382<0.5;-SQRT(p0007*EXP(p0514^2*p0008)-p0007);SQRT(p0007*EXP(p0514^2*p0008)-p0007))
- p2040: 0
- p0174: 0
- p2697: 3.5119e-5; = p2306*(p1078+p1080)
- p1704: 0
- p2185: 0.00295396; = p1065-p2184
- p0185: 18.541
- p2174: 0.00954737; = p0895*p0903/p0818
- p3369: 0.00151666; = if(p1232=0;p3245*p3357/p0818;0)
- p0637: 0; = IF(p0373<0.5;-SQRT(p0007*EXP(p0505^2*p0008)-p0007);SQRT(p0007*EXP(p0505^2*p0008)-p0007))
- p1307: 0
- p2043: 0.636483
- p0689: 0
- p3243: 3.26252e-9; = p3234*p1188*p3239/p0818
- p2542: 9.19576e-5; = p2346*p1073
- p2169: 0.00286566; = p2166*(p0908)
- p2154: 7.27276e-7; = p2015*p2082*p2116/(p0818*1000)
- p2063: 2.01468
- p3106: 1.01907e-8; = p2325*p1023
- p2028: 0.000179698; = p2015*p2026*p2027/(p0818*1000)
- p1212: 0.0304891; = if(p1211=0;0;if(p1193>0;0;(p1207+p1208+p1209)*p1210/(2000*p1211)))
- p3315: 0; = if(and(p1232=0;p3253<>0);p3264*p3289;0)
- p0285: 0.5
- p0926: 0; = IF(p0918+p0923+p0924+p0925=1;0;IF(p0918+p0923+p0924+p0925+p0922>1;1-(p0918+p0923+p0924+p0925);p0922))
- p1317: 0
- p0958: 0; = if(and(p0683>0;or(p0807=480;p0807=32;p0807=1;and(p0807=60;p0901<0.03)));p0934;0)
- p1620: 0
- p0981: 0.00120966; = p0978*p0001/(p0818*p0002)
- p3353: 604911; = if(and(p1232=0;p3256<>0);p3256*(p3276-p3348)/p3349;0)
- p3375: 0.000443381; = if(p1232=0;p3246*p3357/p0818;0)
- p2959: 0.000453456; = p2373*(p1020+p1022)
- p2143: 7.69297e-7; = p2015*p2071*p2105/(p0818*1000)
- p2510: 0.000807108; = p2314*p1123
- p3282: 0.3
- p0240: 8.164
- p2190: 0.00304786; = 32.065*p2189/(2*14.0067)
- p0943: 0; = if(and(p0683=0;p0949=0);p0937;0)
- p0606: 0; = IF(p0342<0.5;-SQRT(p0007*EXP(p0474^2*p0008)-p0007);SQRT(p0007*EXP(p0474^2*p0008)-p0007))
- p3975: 0.000640805; = p1832*p3478
- p0262: 22.014
- p2982: 0; = p2396*(p1020+p1022)
- p0832: 2.88541e8; = p0831*p0830/(1-p0831)
- p1221: 0.140133; = p1216*(1+p1220*p1217/100)
- p1881: 0
- p5159: 1.44158e-6; = p1780*p3484
- p0459: 0; = SQRT(2)*(IF((2*p0327-1)<0;-1;IF((2*p0327-1)>0;1;0))*SQRT(SQRT((2/(pi()*0.140012289)+LN(1-(2*p0327-1)^2)/2)^2-LN(1-(2*p0327-1)^2)/0.140012289)-(2/(pi()*0.140012289)+LN(1-(2*p0327-1)^2)/2)))
- p3380: 0.221818; = p3251/p0818
- p3142: 1.61149e-8; = p2361*p1023
- p4979: 5.90507e-7; = p1806*p3483
- p0773: 79.745; = p0113*(1+p0641*p0245/100)
- p2319: 0.00105662; = p2224*p2186
- p1796: 0
- p1830: 0
- p1848: 0
- p3146: 2.13654e-7; = p2365*p1023
- p1831: 0
- p2342: 0.000313882; = p2228*p2210
- p2536: 0.000459899; = p2340*p1073
- p3436: 0; = p3379*p1239
- p2474: 4.74203e-5; = p2278*p1014
- p2464: 4.40315e-5; = p2268*p1073
- p0125: 59.36
- p2848: 0.000305768; = p2262*(p1079+p1081)
- p5043: 1.29912e-6; = p1870*p3483
- p2658: 7.24644e-6; = p2267*(p1078+p1080)
- p1038: 0.00774783
- p0678: 0
- p3455: 0; = p3379*p1240
- p1740: 0
- p3042: 0; = p2261*p1082
- p1922: 0
- p1732: 0
- p0702: 929.459; = p0042*(1+p0570*p0174/100)
- p0755: 4.882; = p0095*(1+p0623*p0227/100)
- p1654: 0
- p5290: 6.09899e-6; = p1911*p3484
- p1047: 0.318938; = IF(p1012=0;IF(p1037+p1044+p1045+p1046=1;0;IF(p1037+p1044+p1045+p1046+p1041>1;1-(p1037+p1044+p1045+p1046);p1041));0)
- p1258: 1; = if(p1232>0;0;IF(p1253+p1256+p1257=1;0;1-(p1253+p1256+p1257)))
- p2039: 6.0075e-6; = p2015*p2037*p2038/(p0818*1000)
- p1175: 0.000136304
- p2317: 0.000140901; = p2224*p2184
- p3039: 0; = p2258*p1082
- p0842: -0.26859
- p0709: 33.382; = p0049*(1+p0577*p0181/100)
- p3202: 0; = p2421*p1082
- p4304: 7.93222e-6; = p1955*p3479
- p1470: 1
- p1723: 0
- p1003: 0; = p0999*p0888
- p3449: 0; = p3373*p1240
- p1681: 0
- p2706: 0.00133331; = p2315*(p1019+p1021)
- p5132: 0.0002695; = p1963*p3483
- p1692: 0
- p2916: 6.53486e-6; = p2330*(p1020+p1022)
- p2687: 0.000618981; = p2296*(p1019+p1021)
- p3201: 0; = p2420*p1082
- p3897: 7.33746e-6; = p1754*p3478
- p1337: 0; = p1336*p0001/(p0818*p0002)
- p1948: 0
- p1318: 0; = p1317*p0001/(p0818*p0002)
- p0536: 0; = SQRT(2)*(IF((2*p0404-1)<0;-1;IF((2*p0404-1)>0;1;0))*SQRT(SQRT((2/(pi()*0.140012289)+LN(1-(2*p0404-1)^2)/2)^2-LN(1-(2*p0404-1)^2)/0.140012289)-(2/(pi()*0.140012289)+LN(1-(2*p0404-1)^2)/2)))
- p1203: 3
- p2614: 0; = p2418*p1073
- p2215: 0.00508013; = p1117-p2214
- p0212: 0.258
- p0479: 0; = SQRT(2)*(IF((2*p0347-1)<0;-1;IF((2*p0347-1)>0;1;0))*SQRT(SQRT((2/(pi()*0.140012289)+LN(1-(2*p0347-1)^2)/2)^2-LN(1-(2*p0347-1)^2)/0.140012289)-(2/(pi()*0.140012289)+LN(1-(2*p0347-1)^2)/2)))
- p3031: 3.48187e-8; = p2250*p1023
- p0287: 0.5
- p1154: 0.2641; = if(p1152*p0818=0;0;p1150/(p1152*p0818))
- p2981: 0; = p2395*(p1020+p1022)
- p2098: 0.856281
- p1134: 245594; = if(p1121=0;p1128*(p0716/100)*p0703*1000;0)
- p0799: 117.155; = p0139*(1+p0667*p0271/100)
- p2042: 0.07
- p3079: 0; = p2298*p1082
- p1806: 7.28948e-6; = p1398*1000/p0818
- p0955: 0; = if(and(p0683>0;or(p0807=56;p0807=100;and(p0807=60;p0901>0.06)));p0937;0)
- p3534: 8.13659e-6; = p1803*p3476
- p0685: 0
- p1970: 930000; = p0801
- p4434: 0; = p1879*p3480
- p0457: 0; = SQRT(2)*(IF((2*p0325-1)<0;-1;IF((2*p0325-1)>0;1;0))*SQRT(SQRT((2/(pi()*0.140012289)+LN(1-(2*p0325-1)^2)/2)^2-LN(1-(2*p0325-1)^2)/0.140012289)-(2/(pi()*0.140012289)+LN(1-(2*p0325-1)^2)/2)))
- p2066: 0.109412
- p4377: 0; = p1822*p3480
- p0329: 0.5
- p1925: 0
- p3092: 0.00101415; = p2311*p1132
- p1023: 1e-5; = IF(p1012=0;IF(p1014+p1019+p1020+p1021+p1022=1;0;1-(p1014+p1019+p1020+p1021+p1022));0)
- p2983: 0; = p2397*(p1020+p1022)
- p1144: 1.54043e-5; = if(p1121=0;p1138*p0001/(p0818*p0002);0)
- p1027: 131854; = IF(p1012=0;p1021*(p0704/100)*p0703*1000;0)
- p2193: 0.035303; = p1054/p0818
- p0550: 0; = IF(p0286<0.5;-SQRT(p0007*EXP(p0418^2*p0008)-p0007);SQRT(p0007*EXP(p0418^2*p0008)-p0007))
- p3197: 0; = p2416*p1082
- p3378: 0.00294567; = if(p1232=0;p3246*p3360/p0818;0)
- p1014: 0.30058; = IF(p1012=0;p0705/100;0)
- p3343: 0; = if(and(p1232=0;p3254<>0);IF((p3339+p3340+p3341+p3342)+(p3254*(p3269*(1-p3277))/p3338)>p3254;p3254-(p3339+p3340+p3341+p3342);p3254*(p3269*(1-p3277))/p3338);0)
- p2648: 0.000156615; = p2257*(p1019+p1021)
- p2245: 0.000141863; = p2222*p2190
- p2604: 0; = p2408*p1014
- p2099: 0.620397
- p5051: 1.18101e-7; = p1878*p3483
- p1498: 35
- p2924: 0.00037155; = p2338*(p1079+p1081)
- p3230: 6.97072e-7; = p1170/p0818
- p0223: 20.93
- p2146: 1.18532e-7; = p2015*p2074*p2108/(p0818*1000)
- p1667: 0
- p2508: 0.00750787; = p2312*p1123
- p0910: 0.0197175; = p0909/p0818
- p0723: 929.648; = p0063*(1+p0591*p0195/100)
- p0767: 33.211; = p0107*(1+p0635*p0239/100)
- p2758: 0.00891238; = p2367*(p1019+p1021)
- p0860: 0.404769; = p0672*1000/p0856
- p3141: 7.16603e-8; = p2360*p1023
- p0267: 8.946
- p1689: 0.2666
- p2211: 0.0172145; = p1120-p2209-p2208-p2210
- p0409: 0; = SQRT(2)*(IF((2*p0277-1)<0;-1;IF((2*p0277-1)>0;1;0))*SQRT(SQRT((2/(pi()*0.140012289)+LN(1-(2*p0277-1)^2)/2)^2-LN(1-(2*p0277-1)^2)/0.140012289)-(2/(pi()*0.140012289)+LN(1-(2*p0277-1)^2)/2)))
- p0918: 0; = p0680*1000/p0801
- p1599: 0.806571
- p0462: 0; = SQRT(2)*(IF((2*p0330-1)<0;-1;IF((2*p0330-1)>0;1;0))*SQRT(SQRT((2/(pi()*0.140012289)+LN(1-(2*p0330-1)^2)/2)^2-LN(1-(2*p0330-1)^2)/0.140012289)-(2/(pi()*0.140012289)+LN(1-(2*p0330-1)^2)/2)))
- p0925: 0; = IF(p0918+p0923+p0924=1;0;IF(p0918+p0923+p0924+p0921>1;1-(p0918+p0923+p0924);p0921))
- p1344: 154655; = IF(p1318=0;p1327*p0801;0)
- p1652: 0
- p3484: 0.0253541; = IF(p1344=0;0;p1344/(p1328+p1330+p1332+p1334+p1336+p1338+p1340+p1342+p1344))
- p3076: 2.74268e-9; = p2295*p1023
- p3251: 1.52149e8; = p1252-(p3252+p3253+p3254+p3255+p3256)
- p2057: 3.28794
- p2538: 8.97955e-5; = p2342*p1073
- p2878: 1.6087e-5; = p2292*(p1020+p1022)
- p2785: 0; = p2394*(p1019+p1021)
- p1608: 0
- p0934: 0; = p0928*p0001/(p0818*p0002)
- p0592: 0; = IF(p0328<0.5;-SQRT(p0007*EXP(p0460^2*p0008)-p0007);SQRT(p0007*EXP(p0460^2*p0008)-p0007))
- p3137: 5.19021e-9; = p2356*p1023
- p1160: 0.39772; = (p1156+p1158)*p1159
- p1742: 0
- p3041: 0; = p2260*p1082
- p5174: 1.10891e-7; = p1795*p3484
- p3332: 6.49766e6; = if(and(p1232=0;p3255<>0);IF((p3328+p3329+p3330+p3331)+(p3255*(p3265*(1-p3277))/p3327)>p3255;p3255-(p3328+p3329+p3330+p3331);p3255*(p3265*(1-p3277))/p3327);0)
- p2229: 0.0927997; = if(p0774*p0778+p0775*p0779+p0776*p0780+p0777*p0781=0;0;p0781*p0777/(p0774*p0778+p0775*p0779+p0776*p0780+p0777*p0781))
- p2624: 0; = p2428*p1123
- p2421: 0; = p2235*p2211
- p1149: 0.830148
- p0445: 0; = SQRT(2)*(IF((2*p0313-1)<0;-1;IF((2*p0313-1)>0;1;0))*SQRT(SQRT((2/(pi()*0.140012289)+LN(1-(2*p0313-1)^2)/2)^2-LN(1-(2*p0313-1)^2)/0.140012289)-(2/(pi()*0.140012289)+LN(1-(2*p0313-1)^2)/2)))
- p2795: 0; = p2404*(p1019+p1021)
- p3069: 1.39212e-8; = p2288*p1023
- p1166: 5.84066e-6; = p1164/p0818
- p2675: 0.000110375; = p2284*(p1019+p1021)
- p2246: 3.5675e-5; = p2222*p2191
- p2975: 0.0101714; = p2389*(p1129+p1131)
- p2967: 4.8458e-5; = p2381*(p1079+p1081)
- p0142: 0
- p3370: 0.000544248; = if(p1232=0;p3245*p3358/p0818;0)
- p0791: 0
- p0845: 0.5
- p2197: 4.82204e-5; = p1055/p0818
- p2596: 0; = p2400*p1014
- p1581: 0
- p3028: 2.88705e-9; = p2247*p1023
- p0337: 0.5
- p1674: 0.83768
- p4582: 5.6429e-6; = p1821*p3481
- p1648: 0
- p3334: 0; = IF(or(p3254=0;p1232>0);0;p3269*p3277*(p3300*p3292+(1-p3300)*p3296))
- p2504: 0.000805278; = p2308*p1073
- p1247: 4.69281e-5; = if(p1232>0;0;p1242*p0001/(p0818*p0002))
- p3102: 1.94539e-8; = p2321*p1023
- p2973: 2.70751e-5; = p2387*(p1079+p1081)
- p0734: 0
- p0372: 0.5
- p1615: 0
- p5067: 4.86578e-5; = p1894*p3483
- p0278: 0.5
- p2018: 0.1978
- p2006: 2.2357; = ((p1980*p1985+p1986*p1991+p1992*p1997+p2000*p2005)/p0818)*p0005*p0002/1000
- p0608: 0; = IF(p0344<0.5;-SQRT(p0007*EXP(p0476^2*p0008)-p0007);SQRT(p0007*EXP(p0476^2*p0008)-p0007))
- p2355: 0.0054765; = p2225*p2183
- p1990: 30
- p4922: 0; = p1955*p3482
- p0980: 0; = IF(p0977=0;0;p0977*p0001/(p0818*p0002))
- p1972: 0.000902365; = if(p0807=480;p1967*p0001/(p0818*p0002);0)
- p1589: 0
- p1718: 0
- p1977: 1.73886e8; = p1252+p1188
- p3347: 0.00107264; = if(and(p1232=0;p3256<>0);p3275*p3289;0)
- p2802: 0; = p2411*(p1019+p1021)
- p2818: 0; = p2427*(p1078+p1080)
- p2378: 0.0030183; = p2229*p2207
- p0774: 45.554; = p0114*(1+p0642*p0246/100)
- p2106: 0.856281
- p0937: 0; = p0931*p0001/(p0818*p0002)
- p0625: 0; = IF(p0361<0.5;-SQRT(p0007*EXP(p0493^2*p0008)-p0007);SQRT(p0007*EXP(p0493^2*p0008)-p0007))
- p4909: 0; = p1942*p3482
- p3839: 8.87266e-8; = p1902*p3477
- p1395: 51
- p1726: 0.686898
- p2385: 0.000124927; = p2229*p2214
- p1774: 0
- p3033: 3.68388e-11; = p2252*p1023
- p2388: 0.000610879; = p2229*p2217
- p2755: 0.000738984; = p2364*(p1019+p1021)
- p2239: 3.99173e-5; = p2222*p2184
- p1634: 0
- p0719: 46.469; = p0059*(1+p0587*p0191/100)
- p1005: 0; = p1001*p0888
- p2335: 0.0028082; = p2224*p2203
- p2157: 2.40575e-7; = p2015*p2086*p2119/(p0818*1000)
- p3421: 0; = p3364*p1239
- p2227: 0.554093; = if(p0774*p0778+p0775*p0779+p0776*p0780+p0777*p0781=0;0;p0779*p0775/(p0774*p0778+p0775*p0779+p0776*p0780+p0777*p0781))
- p2860: 0.000823298; = p2274*(p1129+p1131)
- p2456: 0.000128126; = p2260*p1073
- p3450: 0; = p3374*p1240
- p2515: 0.000317597; = p2319*p1014
- p0820: 0.600863; = if(p0807=480;p0814;0)
- p3322: 0; = if(and(p1232=0;p3253<>0);p3253-(p3317+p3318+p3319+p3320+p3321);0)
- p2777: 0.000149299; = p2386*(p1078+p1080)
- p0042: 929.459
- p0007: 14; = p0006-1
- p3328: 3.33547e6; = if(and(p1232=0;p3255<>0);p3255*(p3265*p3277-p3323)/p3327;0)
- p2824: 0.00021167; = p2238*(p1020+p1022)
- p2895: 0.000161661; = p2309*(p1079+p1081)
- p0769: 10.605; = p0109*(1+p0637*p0241/100)
- p0447: 0; = SQRT(2)*(IF((2*p0315-1)<0;-1;IF((2*p0315-1)>0;1;0))*SQRT(SQRT((2/(pi()*0.140012289)+LN(1-(2*p0315-1)^2)/2)^2-LN(1-(2*p0315-1)^2)/0.140012289)-(2/(pi()*0.140012289)+LN(1-(2*p0315-1)^2)/2)))
- p0960: 0; = if(and(p0683>0;or(p0807=480;p0807=32;p0807=1;and(p0807=60;p0901<0.03)));p0936;0)
- p4448: 0; = p1893*p3480
- p3096: 6.77287e-8; = p2315*p1023
- p0623: 0; = IF(p0359<0.5;-SQRT(p0007*EXP(p0491^2*p0008)-p0007);SQRT(p0007*EXP(p0491^2*p0008)-p0007))
- p1963h: 0.00109388; = p1686*p1890+p1687*p1891+p1688*p1892+p1689*p1893+p1690*p1894+p1691*p1895+p1692*p1896+p1693*p1897+p1694*p1898+p1695*p1899+p1696*p1900+p1697*p1901+p1698*p1902+p1699*p1903+p1700*p1904+p1701*p1905+p1702*p1906+p1703*p1907+p1704*p1908+p1705*p1909
- p0641: 0; = IF(p0377<0.5;-SQRT(p0007*EXP(p0509^2*p0008)-p0007);SQRT(p0007*EXP(p0509^2*p0008)-p0007))
- p0648: 0; = IF(p0384<0.5;-SQRT(p0007*EXP(p0516^2*p0008)-p0007);SQRT(p0007*EXP(p0516^2*p0008)-p0007))
- p3442: 0; = p3366*p1240
- p1309: 0
- p2052: 7.06525e-6; = p2015*p2049*(1-p2050)/(p0818*1000)
- p1662: 0
- p2236: 0; = 1-(p2230+p2231+p2232+p2233)
- p0220: 5.104
- p0460: 0; = SQRT(2)*(IF((2*p0328-1)<0;-1;IF((2*p0328-1)>0;1;0))*SQRT(SQRT((2/(pi()*0.140012289)+LN(1-(2*p0328-1)^2)/2)^2-LN(1-(2*p0328-1)^2)/0.140012289)-(2/(pi()*0.140012289)+LN(1-(2*p0328-1)^2)/2)))
- p2519: 0.000150516; = p2323*p1014
- p2801: 0; = p2410*(p1019+p1021)
- p3400: 0; = p3362*p1238
- p0141: 13.2394
- p2095: 0.765734
- p0821: 3.91667
- p0611: 0; = IF(p0347<0.5;-SQRT(p0007*EXP(p0479^2*p0008)-p0007);SQRT(p0007*EXP(p0479^2*p0008)-p0007))
- p4735: 0; = p1768*p3482
- p3130: 0; = p2349*p1082
- p0197: 31.319
- p3430: 0; = p3373*p1239
- p0243: 9.789
- p0478: 0; = SQRT(2)*(IF((2*p0346-1)<0;-1;IF((2*p0346-1)>0;1;0))*SQRT(SQRT((2/(pi()*0.140012289)+LN(1-(2*p0346-1)^2)/2)^2-LN(1-(2*p0346-1)^2)/0.140012289)-(2/(pi()*0.140012289)+LN(1-(2*p0346-1)^2)/2)))
- p0668: 0; = IF(p0404<0.5;-SQRT(p0007*EXP(p0536^2*p0008)-p0007);SQRT(p0007*EXP(p0536^2*p0008)-p0007))
- p3268: 0.0232481
- p2993: 0; = p2407*(p1020+p1022)
- p0619: 0; = IF(p0355<0.5;-SQRT(p0007*EXP(p0487^2*p0008)-p0007);SQRT(p0007*EXP(p0487^2*p0008)-p0007))
- p3048: 0; = p2267*p1082
- p0673: 228.444; = p0013*(1+p0541*p0145/100)
- p0690: 0
- p3233: 0.60394
- p2935: 0.000624368; = p2349*(p1079+p1081)
- p1678: 0
- p3264: 0.0887032
- p2087: 0.856281
- p2127: 1.28368e-5; = p2015*p2055*p2089/(p0818*1000)
- p2404: 0; = p2234*p2193
- p0475: 0; = SQRT(2)*(IF((2*p0343-1)<0;-1;IF((2*p0343-1)>0;1;0))*SQRT(SQRT((2/(pi()*0.140012289)+LN(1-(2*p0343-1)^2)/2)^2-LN(1-(2*p0343-1)^2)/0.140012289)-(2/(pi()*0.140012289)+LN(1-(2*p0343-1)^2)/2)))
- p1341: 0; = p1340*p0001/(p0818*p0002)
- p1625: 0
- p2480: 0.000168528; = p2284*p1014
- p3087: 0; = p2306*p1082
- p0790: 24.221; = p0130*(1+p0658*p0262/100)
- p3609: 1.59541e-7; = p1878*p3476
- p1883: 0
- p2358: 0.00389214; = p2225*p2186
- p0744: 95.203; = p0084*(1+p0612*p0216/100)
- p2723: 0.000781512; = p2332*(p1019+p1021)
- p4094: 0.000136151; = p1951*p3478
- p0672: 376.435; = p0012*(1+p0540*p0144/100)
- p2948: 0.000926986; = p2362*(p1020+p1022)
- p0241: 27.099
- p3848: 8.6117e-7; = p1911*p3477
- p2233: 0.149729; = if(p0783*p0787+p0784*p0788+p0785*p0789+p0786*p0790=0;0;p0790*p0786/(p0783*p0787+p0784*p0788+p0785*p0789+p0786*p0790))
- p2126: 4.16994e-6; = p2015*p2054*p2088/(p0818*1000)
- p2540: 1.30738e-6; = p2344*p1073
- p2333: 0.00170198; = p2224*p2201
- p2359: 0.000560167; = p2225*p2187
- p1968: 231250; = if(p0807=480;p0802*p0811;0)
- p0524: 0; = SQRT(2)*(IF((2*p0392-1)<0;-1;IF((2*p0392-1)>0;1;0))*SQRT(SQRT((2/(pi()*0.140012289)+LN(1-(2*p0392-1)^2)/2)^2-LN(1-(2*p0392-1)^2)/0.140012289)-(2/(pi()*0.140012289)+LN(1-(2*p0392-1)^2)/2)))
- p5182: 1.88514e-6; = p1803*p3484
- p3095: 0.000153636; = p2314*p1132
- p2717: 0.00114182; = p2326*(p1019+p1021)
- p0927: 1; = IF(p0918+p0923+p0924+p0925+p0926=1;0;1-(p0918+p0923+p0924+p0925+p0926))
- p2805: 0; = p2414*(p1078+p1080)
- p1185: 0.5
- p1597: 0
- p3390: 0.000776232; = p3371*p1234
- p2291: 1.45595e-5; = p2223*p2198
- p2437: 8.99757e-5; = p2241*p1014
- p2798: 0; = p2407*(p1019+p1021)
- p0128: 74.038
- p1880: 0
- p2784: 0; = p2393*(p1019+p1021)
- p0806: 1.429e6; = p0804+p0805
- p0872: 90015; = p0864*p0856
- p4400: 0; = p1845*p3480
- p1851: 0
- p2115: 0.856281
- p2963: 0.000144402; = p2377*(p1079+p1081)
- p2383: 1.77611e-6; = p2229*p2212
- p2417: 0; = p2235*p2207
- p2940: 0.0125379; = p2354*(p1020+p1022)
- p1717: 0
- p0798: 79.745; = p0138*(1+p0666*p0270/100)
- p0126: 71.837
- p2142: 1.32176e-6; = p2015*p2070*p2104/(p0818*1000)
- p1601: 0
- p3060: 5.43404e-9; = p2279*p1023
- p0046: 4.853
- p1641: 0.347885
- p0812: 0.279412; = if(p0807=480;0.095/0.34;0)
- p2764: 0.000177629; = p2373*(p1019+p1021)
- p0384: 0.5
- p0708: 14.833; = p0048*(1+p0576*p0180/100)
- p0649: 0; = IF(p0385<0.5;-SQRT(p0007*EXP(p0517^2*p0008)-p0007);SQRT(p0007*EXP(p0517^2*p0008)-p0007))
- p1791: 0
- p2858: 0.0094439; = p2272*(p1129+p1131)
- p0179: 20.782
- p0373: 0.5
- p1252: 1.73885e8; = if(p1232>0;0;p0724*2000*p0723*1000*p0725/100)
- p0898: 0.45335
- p3485: 1.43587e-6; = p1754*p3476
- p0469: 0; = SQRT(2)*(IF((2*p0337-1)<0;-1;IF((2*p0337-1)>0;1;0))*SQRT(SQRT((2/(pi()*0.140012289)+LN(1-(2*p0337-1)^2)/2)^2-LN(1-(2*p0337-1)^2)/0.140012289)-(2/(pi()*0.140012289)+LN(1-(2*p0337-1)^2)/2)))
- p0048: 14.833
- p3223: 0.126838; = IF(p3216=0;0;(1-p1223)*24.3050/84.3139)
- p3305: 0; = if(and(p1232=0;p3252<>0);1-(p3301+p3302+p3303+p3304);0)
- p0261: 26.236
- p3661: 3.35036e-6; = p1930*p3476
- p2423: 0; = p2235*p2213
- p4515: 1.95331e-6; = p1754*p3481
- p0911: 0.0049
- p2337: 0.00288844; = p2228*p2205
- p2025: 1.41717e-5; = p2015*p2023*p2024/(p0818*1000)
- p1856: 0
- p1630: 0
- p1813: 0
- p2695: 0.00302074; = p2304*(p1078+p1080)
- p2886: 0.00715881; = p2300*(p1079+p1081)
- p5084: 1.94867e-5; = p1911*p3483
- p2821: 0; = p2430*(p1128+p1130)
- p3717: 2.03549e-7; = p1780*p3477
- p0643: 0; = IF(p0379<0.5;-SQRT(p0007*EXP(p0511^2*p0008)-p0007);SQRT(p0007*EXP(p0511^2*p0008)-p0007))
- p1982: 750
- p0693: 0
- p1228: 0.0756792; = IF(p1221=0;0;p0801*p1212*2000/(p1222+p1221*p1225)/p0818)
- p3456: 0; = p3380*p1240
- p2563: 0.0136081; = p2367*p1014
- p0218: 15.958
- p2598: 0; = p2402*p1014
- p1776: 0
- p0270: 3.263
- p2271: 0.000752617; = p2226*p2217
- p2181: 0.221918; = p0887+p0889+p0893+p2180
- p2894: 0.00111815; = p2308*(p1079+p1081)
- p2020: 101987; = p2015*p2018*p2019
- p0609: 0; = IF(p0345<0.5;-SQRT(p0007*EXP(p0477^2*p0008)-p0007);SQRT(p0007*EXP(p0477^2*p0008)-p0007))
- p1594: 0
- p2884: 0.00266255; = p2298*(p1079+p1081)
- p1192: 3.1503e-7; = p1188*p1191/p0818
- p3419: 0; = p3362*p1239
- p2179: 0.0161333; = p0970+p0971+p0972
- p3834: 2.76618e-7; = p1897*p3477
- p2796: 0; = p2405*(p1019+p1021)
- p3030: 3.52237e-9; = p2249*p1023
- p1090: 0.00025711; = IF(p1071=0;p1084*p0001/(p0818*p0002);0)
- p0758: 2.04; = p0098*(1+p0626*p0230/100)
- p2036: 2.80398e-5; = p2015*p2030*(1-p2032)/(p0818*1000)
- p1644: 0
- p2606: 0; = p2410*p1014
- p4291: 9.51866e-7; = p1942*p3479
- p4980: 3.54304e-7; = p1807*p3483
- p2640: 6.93413e-5; = p2249*(p1019+p1021)
- p1338: 908068; = p1324*p0801
- p1437: 331
- p2783: 0.000726534; = p2392*(p1128+p1130)
- p2897: 0.044604; = p2311*(p1129+p1131)
- p2445: 0.000105875; = p2249*p1014
- p0370: 0.5
- p1777: 0
- p1709: 0
- p3759: 1.56576e-8; = p1822*p3477
- p2321: 0.00194539; = p2224*p2188
- p3213: 0.112803; = p1222*12.0107/100.0869
- p0617: 0; = IF(p0353<0.5;-SQRT(p0007*EXP(p0485^2*p0008)-p0007);SQRT(p0007*EXP(p0485^2*p0008)-p0007))
- p1712: 0
- p2283: 0.000489832; = p2223*p2189
- p1944: 0
- p2439: 0.000165659; = p2243*p1014
- p2009: 0.0451927; = ((p1983*p1985+p1989*p1991+p1995*p1997+p2003*p2005+p1976*p1977+p1978*p1979+p1998*p1999)/p0818)*p0005*p0002/1000
- p2403: 0; = p2234*p2192
- p2448: 1.1073e-6; = p2252*p1014
- p4350: 0; = p1795*p3480
- p3323: 0.222117; = if(and(p1232=0;p3255<>0);p3265*p3277*(p3299*p3291+(1-p3299)*p3295);0)
- p2134: 1.05069e-5; = p2015*p2062*p2096/(p0818*1000)
- p2231: 0.656595; = if(p0783*p0787+p0784*p0788+p0785*p0789+p0786*p0790=0;0;p0788*p0784/(p0783*p0787+p0784*p0788+p0785*p0789+p0786*p0790))
- p2911: 0.000512136; = p2325*(p1020+p1022)
- p1586: 0
- p2863: 0.000836569; = p2277*(p1020+p1022)
- p2389: 0.0164135; = p2233*p2218
- p2416: 0; = p2235*p2206
- p2401: 0; = p2234*p2190
- p0081: 2.634
- p0946: 0; = if(and(p0683=0;or(p0807=480;p0807=32;p0807=1;and(p0807=60;p0901<0.03)));p0934;0)
- p3064: 4.89832e-9; = p2283*p1023
- p3401: 0; = p3363*p1238
- p2603: 0; = p2407*p1014
- p2511: 0.00203579; = p2315*p1014
- p3189: 0; = p2408*p1023
- p2280: 0.00118306; = p2223*p2186
- p0747: 0
- p3740: 2.6618e-7; = p1803*p3477
- p4073: 1.71207e-5; = p1930*p3478
- p1650: 0
- p0914: 1.71713e7; = p0825*p0911+p0827*p0912+(p0830+p0895)*p0824*p0913
- p3259: 0.00796296
- p2520: 3.78508e-5; = p2324*p1014
- p2303: 0.000728383; = p2227*p2210
- p1761: 0
- p2460: 4.29962e-5; = p2264*p1073
- p2454: 0.000437476; = p2258*p1073
- p3100: 1.05662e-8; = p2319*p1023
- p1053: 1.82643e6; = IF(p1012=0;p1046*p1036;0)
- p0703: 929.459; = p0043*(1+p0571*p0175/100)
- p1113: 0.100377
- p4307: 0; = p1962*p3479
- p2323: 0.000500751; = p2224*p2190
- p3358: 482445; = if(p1232=0;p3308+p3319+p3330+p3341+p3352;0)
- p1345: 0.00020116; = IF(p1318=0;p1344*p0001/(p0818*p0002);0)
- p3065: 5.60677e-9; = p2284*p1023
- p1628: 0.601994
- p1248: 2.55634e-5; = if(p1232>0;0;p1243*p0001/(p0818*p0002))
- p2803: 0; = p2412*(p1019+p1021)
- p3391: 0.0065229; = p3372*p1234
- p2219: 0.154479; = p1154-p2218
- p0318: 0.5
- p0137: 47.091
- p1191: 0.5
- p0891: 226512; = IF(p3251=0;0;62.4*6272640/(12*12*12))
- p2990: 0; = p2404*(p1020+p1022)
- p0066: 64.736
- p0585: 0; = IF(p0321<0.5;-SQRT(p0007*EXP(p0453^2*p0008)-p0007);SQRT(p0007*EXP(p0453^2*p0008)-p0007))
- p2267: 2.28818e-5; = p2226*p2213
- p4994: 3.07064e-6; = p1821*p3483
- p3173: 3.5035e-5; = p2392*p1132
- p3463: 0; = p3368*p1241
- p1188: 432.171; = p1187*p0801
- p0970: 0.0114756; = p0967/p0818
- p3010: 0; = p2424*(p1079+p1081)
- p3214: 0.376406; = p1222*40.078/100.0869
- p2671: 0.000232898; = p2280*(p1019+p1021)
- p3340: 0; = if(and(p1232=0;p3254<>0);p3254*(p3270-p3335)/p3338;0)
- p3240: 2.94691e-8; = p3234*p1188*p3235/p0818
- p4654: 0.000171674; = p1893*p3481
- p1424: 786
- p2817: 0; = p2426*(p1078+p1080)
- p2350: 0.00599153; = p2232*p2218
- p3045: 0; = p2264*p1082
- p1210: 0.18
- p2077: 0.043
- p4204: 9.10619e-5; = p1855*p3479
- p0836: 1736.77; = p0831*p0835*p0801/(1-p0831)
- p1238: 0.35264; = if(p1232>0;0;IF(p1234=1;0;IF(p1234+p1235>1;1-p1234;p1235)))
- p1966: 0; = if(p0814=0;p0802;0)
- p2002: 750
- p2738: 0.000384149; = p2347*(p1078+p1080)
- p1070: 0.0531055; = IF(p1012=0;p1056/(p1063*p0818);0)
- p4773: 0; = p1806*p3482
- p1582: 0
- p0977: 0; = IF(p0687=0;IF(OR(p0686=0;p0688=0);0;p0686*1000*p0688/100);0)
- p0972: 0.00465769; = p0969/p0818
- p2771: 8.94762e-5; = p2380*(p1078+p1080)
- p4242: 8.36585e-5; = p1893*p3479
- p2544: 5.01717e-5; = p2348*p1073
- p2088: 0.798875
- p0724: 1.56; = p0064*(1+p0592*p0196/100)
- p3331: 457999; = if(and(p1232=0;p3255<>0);p3255*(p3268-p3326)/p3327;0)
- p1864: 0
- p3320: 0; = if(and(p1232=0;p3253<>0);p3253*(p3264-p3315)/p3316;0)
- p1731: 0
- p1847: 0
- p2096: 0.486404
- p1971: 0; = p1966*p0001/(p0818*p0002)
- p4013: 8.96801e-6; = p1870*p3478
- p1760: 0
- p3063: 2.1782e-8; = p2282*p1023
- p0909: 1.35246e7; = p0825*p0906+p0827*p0907+(p0830+p0895)*p0824*p0908
- p5281: 6.28381e-7; = p1902*p3484
- p3109: 1.22904e-7; = p2328*p1023
- p3426: 0; = p3369*p1239
- p2595: 0; = p2399*p1014
- p0890: 0; = p0686*1000*p0687*p0885/100
- p1907: 0
- p1979: 1.10662e7; = p0973
- p0242: 9.169
- p0183: 11.717
- p3447: 0; = p3371*p1240
- p4049: 2.85346e-5; = p1906*p3478
- p0572: 0; = IF(p0308<0.5;-SQRT(p0007*EXP(p0440^2*p0008)-p0007);SQRT(p0007*EXP(p0440^2*p0008)-p0007))
- p1031: 5.61119e-5; = IF(p1012=0;p1025*p0001/(p0818*p0002);0)
- p2676: 2.77564e-5; = p2285*(p1019+p1021)
- p0389: 0.5
- p1749: 0
- p0023: 11.903
- p3082: 0; = p2301*p1082
- p0601: 0; = IF(p0337<0.5;-SQRT(p0007*EXP(p0469^2*p0008)-p0007);SQRT(p0007*EXP(p0469^2*p0008)-p0007))
- p3416: 0.00103876; = p3378*p1238
- p0078: 929.695
- p3191: 0; = p2410*p1023
- p4251: 1.79797e-6; = p1902*p3479
- p3009: 0; = p2423*(p1079+p1081)
- p3040: 0; = p2259*p1082
- p0594: 0; = IF(p0330<0.5;-SQRT(p0007*EXP(p0462^2*p0008)-p0007);SQRT(p0007*EXP(p0462^2*p0008)-p0007))
- p2196: 0.0748061; = p1068-p2193-p2195
- p1051: 588246; = IF(p1012=0;p1044*p1036;0)
- p2440: 3.72533e-5; = p2244*p1014
- p1103: 0.602279; = IF(p1071=0;IF(p1096+p1101+p1102=1;0;IF(p1096+p1101+p1102+p1099>1;1-(p1096+p1101+p1102);p1099));0)
- p0272: 3.105
- p1289: 0
- p2034: 2.28386e-5; = p2015*p2030*p2032/(p0818*1000)
- p2789: 0; = p2398*(p1019+p1021)
- p3247: 0
- p0541: 0; = IF(p0277<0.5;-SQRT(p0007*EXP(p0409^2*p0008)-p0007);SQRT(p0007*EXP(p0409^2*p0008)-p0007))
- p1838: 0
- p2007: 0.23526; = ((p1981*p1985+p1987*p1991+p1993*p1997+p2001*p2005)/p0818)*p0005*p0002/1000
- p2793: 0; = p2402*(p1019+p1021)
- p1869: 0
- p0492: 0; = SQRT(2)*(IF((2*p0360-1)<0;-1;IF((2*p0360-1)>0;1;0))*SQRT(SQRT((2/(pi()*0.140012289)+LN(1-(2*p0360-1)^2)/2)^2-LN(1-(2*p0360-1)^2)/0.140012289)-(2/(pi()*0.140012289)+LN(1-(2*p0360-1)^2)/2)))
- p3151: 1.05312e-9; = p2370*p1023
- p0505: 0; = SQRT(2)*(IF((2*p0373-1)<0;-1;IF((2*p0373-1)>0;1;0))*SQRT(SQRT((2/(pi()*0.140012289)+LN(1-(2*p0373-1)^2)/2)^2-LN(1-(2*p0373-1)^2)/0.140012289)-(2/(pi()*0.140012289)+LN(1-(2*p0373-1)^2)/2)))
- p2369: 4.78993e-5; = p2225*p2198
- p0664: 0; = IF(p0400<0.5;-SQRT(p0007*EXP(p0532^2*p0008)-p0007);SQRT(p0007*EXP(p0532^2*p0008)-p0007))
- p2770: 0.000197863; = p2379*(p1078+p1080)
- p5131: 0; = p1962*p3483
- p0211: 3.216
- p2180: 3.80519e-7; = p3233*p1188/(p0818)
- p2741: 0.00175066; = p2350*(p1128+p1130)
- p0906: 0.0041
- p3301: 0; = if(and(p1232=0;p3252<>0);p3257*p3277*(p3297*p3290+(1-p3297)*p3294);0)
- p0732: 0
- p1685: 0
- p0254: 3.105
- p2966: 0.000112232; = p2380*(p1079+p1081)
- p1696: 0
- p2523: 0.00037372; = p2327*p1014
- p2487: 4.37631e-6; = p2291*p1014
- p0789: 10.7; = p0129*(1+p0657*p0261/100)
- p1173: 0.5
- p2685: 0.000375149; = p2294*(p1019+p1021)
- p4181: 8.31297e-5; = p1832*p3479
- p0867: 0.212041; = IF(p0858+p0864+p0865+p0866=1;0;IF(p0858+p0864+p0865+p0866+p0862>1;1-(p0858+p0864+p0865+p0866);p0862))
- p3186: 0; = p2405*p1023
- p0735: 0
- p1332: 3.41108e6; = p1321*p0801
- p2576: 8.08278e-5; = p2380*p1073
- p1035: 1.15623e-8; = IF(p1012=0;p1029*p0001/(p0818*p0002);0)
- p3361: 4.75613e6; = if(p1232=0;p3311+p3322+p3333+p3344+p3355;0)
- p2459: 9.95818e-5; = p2263*p1073
- p0364: 0.5
- p2756: 0.00420599; = p2365*(p1019+p1021)
- p1157: 0.22095
- p0511: 0; = SQRT(2)*(IF((2*p0379-1)<0;-1;IF((2*p0379-1)>0;1;0))*SQRT(SQRT((2/(pi()*0.140012289)+LN(1-(2*p0379-1)^2)/2)^2-LN(1-(2*p0379-1)^2)/0.140012289)-(2/(pi()*0.140012289)+LN(1-(2*p0379-1)^2)/2)))
- p5185: 1.84818e-7; = p1806*p3484
- p2918: 0.00199507; = p2332*(p1020+p1022)
- p0061: 15.501
- p3270: 0.0747083
- p3344: 0; = if(and(p1232=0;p3254<>0);p3254-(p3339+p3340+p3341+p3342+p3343);0)
- p3055: 1.87192e-5; = p2274*p1132
- p0633: 0; = IF(p0369<0.5;-SQRT(p0007*EXP(p0501^2*p0008)-p0007);SQRT(p0007*EXP(p0501^2*p0008)-p0007))
- p3133: 7.35961e-6; = p2352*p1132
- p3012: 0; = p2426*(p1079+p1081)
- p1313: 0; = p1307*p1252/p0818
- p3185: 0; = p2404*p1023
- p4606: 7.18384e-5; = p1845*p3481
- p0811: 0.25; = if(p0807=480;1-p0810;0)
- p1833: 0
- p1559: 0
- p1670: 0
- p3153: 6.26942e-8; = p2372*p1023
- p2653: 0.000243773; = p2262*(p1078+p1080)
- p2214: 0.0013462; = p1107/p0818
- p1595: 0
- p1933: 0
- p3306: 0; = if(and(p1232=0;p3252<>0);p3252*(p3257*p3277-p3301)/p3305;0)
- p2736: 1.51338e-5; = p2345*(p1078+p1080)
- p1897: 7.72685e-5; = p1489*1000/p0818
- p3110: 7.92243e-11; = p2329*p1023
- p1899: 0
- p2651: 0.000141835; = p2260*(p1078+p1080)
- p3321: 0; = if(and(p1232=0;p3253<>0);IF((p3317+p3318+p3319+p3320)+(p3253*(p3261*(1-p3277))/p3316)>p3253;p3253-(p3317+p3318+p3319+p3320);p3253*(p3261*(1-p3277))/p3316);0)
- p2864: 7.92836e-5; = p2278*(p1020+p1022)
- p1963g: 2.70127e-5; = p1667*p1871+p1668*p1872+p1669*p1873+p1670*p1874+p1671*p1875+p1672*p1876+p1673*p1877+p1674*p1878+p1675*p1879+p1676*p1880+p1677*p1881+p1678*p1882+p1679*p1883+p1680*p1884+p1681*p1885+p1682*p1886+p1683*p1887+p1684*p1888+p1685*p1889
- p0655: 0; = IF(p0391<0.5;-SQRT(p0007*EXP(p0523^2*p0008)-p0007);SQRT(p0007*EXP(p0523^2*p0008)-p0007))
- p2386: 0.000471435; = p2229*p2215
- p3097: 1.48673e-8; = p2316*p1023
- p1656: 0
- p1757: 0
- p2251: 2.24443e-6; = p2222*p2197
- p0258: 29.914
- p4044: 3.01651e-5; = p1901*p3478
- p3016: 0; = p2430*(p1129+p1131)
- p2478: 0.000654723; = p2282*p1014
- p2090: 0.40001
- p0418: 0; = SQRT(2)*(IF((2*p0286-1)<0;-1;IF((2*p0286-1)>0;1;0))*SQRT(SQRT((2/(pi()*0.140012289)+LN(1-(2*p0286-1)^2)/2)^2-LN(1-(2*p0286-1)^2)/0.140012289)-(2/(pi()*0.140012289)+LN(1-(2*p0286-1)^2)/2)))
- p2936: 0.00371295; = p2350*(p1129+p1131)
- p4762: 0; = p1795*p3482
- p0838: 1.04166e9; = (p0833-p0836)*p0837
- p1603: 0.948955
- p4663: 3.68959e-6; = p1902*p3481
- p0368: 0.5
- p4098: 6.11455e-5; = p1955*p3478
- p1156: 0.651492; = p1064+p1065+p1066+p1067+p1068+p1069+p1070+p1116+p1117+p1118+p1119+p1120+p1154+p1155
- p1215: 0.0688776; = IF(p1214=0;0;(p1214-1.5)/(p1214-1)^2)
- p1091: 0.000310202; = IF(p1071=0;p1085*p0001/(p0818*p0002);0)
- p2285: 0.000140996; = p2223*p2191
- p2177: 0.286575; = p0895/p0818-(p2173+p2174+p2175+p2176)
- p3005: 0; = p2419*(p1079+p1081)
- p2730: 0.00245946; = p2339*(p1078+p1080)
- p0814: 0.600863; = if(p0807=480;p0810*p0812+p0811*p0813;0)
- p1932: 0
- p1372: 39
- p2525: 2.38132e-6; = p2329*p1014
- p2792: 0; = p2401*(p1019+p1021)
- p1927: 0
- p0044: 95.639
- p0666: 0; = IF(p0402<0.5;-SQRT(p0007*EXP(p0534^2*p0008)-p0007);SQRT(p0007*EXP(p0534^2*p0008)-p0007))
- p2541: 1.36711e-5; = p2345*p1073
- p2772: 3.86329e-5; = p2381*(p1078+p1080)
- p3081: 0; = p2300*p1082
- p2213: 0.000200136; = p1116-p2212
- p1233: 0; = p1232*p0001/(p0818*p0002)
- p4156: 3.17289e-7; = p1807*p3479
- p4452: 0; = p1897*p3480
- p2663: 0.00445282; = p2272*(p1128+p1130)
- p1827: 0
- p0251: 8.827
- p2202: 0.00149093; = 4*1.00794*p2201/(2*14.0067)
- p2638: 5.68345e-5; = p2247*(p1019+p1021)
- p3017: 0; = p2431*(p1129+p1131)
- p2133: 2.27881e-6; = p2015*p2061*p2095/(p0818*1000)
- p4317: 0; = p1762*p3480
- p3224: 0.501945; = IF(p3216=0;0;1-p3221-p3222-p3223)
- p4583: 6.51104e-7; = p1822*p3481
- p1722: 0
- p1676: 0
- p1956: 0
- p1486: 412
- p0234: 8.379
- p1965: 0.00679322; = p1963+p1959*p1964*1000/p0818
- p1768: 0.000543795; = p1360*1000/p0818
- p0578: 0; = IF(p0314<0.5;-SQRT(p0007*EXP(p0446^2*p0008)-p0007);SQRT(p0007*EXP(p0446^2*p0008)-p0007))
- p0063: 929.648
- p1737: 0
- p0244: 2.899
- p0248: 10.522
- p1795: 4.37369e-6; = p1387*1000/p0818
- p4720: 0.000495259; = p1963*p3481
- p3162: 0; = p2381*p1082
- p0135: 85.411
- p3150: 4.78993e-10; = p2369*p1023
- p3177: 0; = p2396*p1023
- p0715: 7.547; = p0055*(1+p0583*p0187/100)
- p1633: 0
- p0182: 3.263
- p3165: 0; = p2384*p1082
- p0453: 0; = SQRT(2)*(IF((2*p0321-1)<0;-1;IF((2*p0321-1)>0;1;0))*SQRT(SQRT((2/(pi()*0.140012289)+LN(1-(2*p0321-1)^2)/2)^2-LN(1-(2*p0321-1)^2)/0.140012289)-(2/(pi()*0.140012289)+LN(1-(2*p0321-1)^2)/2)))
- p2608: 0; = p2412*p1014
- p1671: 0
- p2605: 0; = p2409*p1014
- p0180: 23.837
- p0538: 0; = IF(p0274<0.5;-SQRT(p0007*EXP(p0406^2*p0008)-p0007);SQRT(p0007*EXP(p0406^2*p0008)-p0007))
- p1493: 37
- p2075: 0.072
- p4924: 0; = p1957*p3482
- p3352: 146297; = if(and(p1232=0;p3256<>0);p3256*(p3275-p3347)/p3349;0)
- p3356: 5.15779e6; = if(p1232=0;p3306+p3317+p3328+p3339+p3350;0)
- p2545: 0.000449662; = p2349*p1073
- p2570: 0.00310928; = p2374*p1014
- p2586: 0.00171208; = p2390*p1123
- p0848: 0
- p1862: 0
- p4361: 0; = p1806*p3480
- p1890: 0
- p1190: 6.30061e-7; = p1188/p0818
- p1050: 2.82761e7; = IF(p1012=0;p1037*p1036;0)
- p3448: 0; = p3372*p1240
- p3625: 6.57309e-5; = p1894*p3476
- p1893: 0.0011532; = p1485*1000/p0818
- p0793: 0
- p1084: 197670; = IF(p1071=0;p1078*(p0710/100)*p0703*1000;0)
- p0833: 2.08333e9; = p0830+p0832
- p0979: 0; = IF(p0976=0;0;p0976*p0001/(p0818*p0002))
- p0989: 0; = p0985*p0886
- p1129: 0.46469; = if(p1121=0;IF(p1123+p1128=1;0;IF(p1123+p1128+p1125>1;1-(p1123+p1128);p1125));0)
- p5141: 1.47854e-6; = p1762*p3484
- p0381: 0.5
- p1680: 0
- p1110: 4.61805e6; = IF(p1071=0;p1105*p1104*p1095;0)
- p0111: 42.073
- p1793: 0
- p0510: 0; = SQRT(2)*(IF((2*p0378-1)<0;-1;IF((2*p0378-1)>0;1;0))*SQRT(SQRT((2/(pi()*0.140012289)+LN(1-(2*p0378-1)^2)/2)^2-LN(1-(2*p0378-1)^2)/0.140012289)-(2/(pi()*0.140012289)+LN(1-(2*p0378-1)^2)/2)))
- p2839: 4.07035e-6; = p2253*(p1020+p1022)
- p0196: 26.983
- p2208: 0.00673263; = p1110/p0818
- p1976: 0.05
- p2902: 0.000747155; = p2316*(p1020+p1022)
- p2629: 8.29158e-5; = p2238*(p1019+p1021)
- p0638: 0; = IF(p0374<0.5;-SQRT(p0007*EXP(p0506^2*p0008)-p0007);SQRT(p0007*EXP(p0506^2*p0008)-p0007))
- p3149: 2.9183e-10; = p2368*p1023
- p2833: 0.000145089; = p2247*(p1020+p1022)
- p2531: 0.00084409; = p2335*p1014
- p3293: 0.3875
- p3689: 0; = p1962*p3476
- p2065: 0.0758824
- p0658: 0; = IF(p0394<0.5;-SQRT(p0007*EXP(p0526^2*p0008)-p0007);SQRT(p0007*EXP(p0526^2*p0008)-p0007))
- p4941: 4.40518e-5; = p1768*p3483
- p1282: 0; = IF(p1277+p1280+p1281=p1260;0;p1260-(p1277+p1280+p1281))
- p2387: 6.81597e-5; = p2229*p2216
- p0718: 29.219; = p0058*(1+p0586*p0190/100)
- p0679: 0
- p1923: 8.74738e-6; = p1515*1000/p0818
- p2526: 3.90856e-6; = p2330*p1014
- p1288: 0
- p1133: 62215.9; = if(p1121=0;p1123*(p0716/100)*p0703*1000;0)
- p2591: 0; = p2395*p1014
- p1304: 0; = p1300*p1252/p0818
- p2565: 1.43976e-5; = p2369*p1014
- p2203: 0.0170923; = p1070-p2200-p2201-p2202
- p2209: 0.00304458; = 14.0067*p2208/30.973762
- p2690: 0.000687388; = p2299*(p1078+p1080)
- p3166: 0; = p2385*p1082
- p0874: 376435; = p0865*p0856
- p3895: 0; = p1962*p3477
- p0837: 0.5
- p0140: 90.432
- p0841: 0.287505
- p1809: 0
- p0253: 45.606
- p2422: 0; = p2235*p2212
- p2384: 1.85725e-5; = p2229*p2213
- p1974: 0; = p1969*p0001/(p0818*p0002)
- p0269: 8.561
- p1202: 0.7
- p2572: 0.00032115; = p2376*p1073
- p3176: 0; = p2395*p1023
- p5124: 1.97229e-5; = p1951*p3483
- p1292: 0; = IF(p1287+p1290+p1291=p1261;0;p1261-(p1287+p1290+p1291))
- p0921: 0; = p0679*1000/p0801
- p1891: 0
- p0778: 11.783; = p0118*(1+p0646*p0250/100)
- p2365: 0.0213654; = p2225*p2193
- p3632: 5.90302e-6; = p1901*p3476
- p3190: 0; = p2409*p1023
- p0268: 1.677
- p2602: 0; = p2406*p1014
- p2188: 0.0118407; = p1066-p2186-p2187
- p4568: 6.51104e-7; = p1807*p3481
- p0779: 57.439; = p0119*(1+p0647*p0251/100)
- p1148: 0.0801873; = if(p1121=0;IF(p1146=1;0;1-p1146);0)
- p3938: 2.44582e-6; = p1795*p3478
- p2766: 0.000393081; = p2375*(p1078+p1080)
- p1800: 0
- p0645: 0; = IF(p0381<0.5;-SQRT(p0007*EXP(p0513^2*p0008)-p0007);SQRT(p0007*EXP(p0513^2*p0008)-p0007))
- p4968: 3.54304e-7; = p1795*p3483
- p0441: 0; = SQRT(2)*(IF((2*p0309-1)<0;-1;IF((2*p0309-1)>0;1;0))*SQRT(SQRT((2/(pi()*0.140012289)+LN(1-(2*p0309-1)^2)/2)^2-LN(1-(2*p0309-1)^2)/0.140012289)-(2/(pi()*0.140012289)+LN(1-(2*p0309-1)^2)/2)))
- p1788: 0
- p0109: 10.605
- p0991: 0; = p0987*p0886
- p2257: 0.000795567; = p2222*p2203
- p1125: 0.46469; = if(p1121=0;p0719/100;0)
- p0013: 228.444
- p3075: 1.90566e-8; = p2294*p1023
- p1199: -0.29
- p0342: 0.5
- p0404: 0.5
- p2312: 0.10143; = p2231*p2219
- p2428: 0; = p2236*p2218
- p1629: 0
- p2554: 0.0011699; = p2358*p1014
- p0730: 0
- p2712: 0.000382969; = p2321*(p1019+p1021)
- p2030: 8.87
- p2305: 1.06049e-5; = p2227*p2212
- p1067: 0.0126797; = IF(p1012=0;p1053/(p1060*p0818);0)
- p3171: 0.000325902; = p2390*p1132
- p3107: 5.80015e-8; = p2326*p1023
- p2295: 0.000274268; = p2223*p2202
- p0704: 95.639; = p0044*(1+p0572*p0176/100)
- p2045: 30
- p0520: 0; = SQRT(2)*(IF((2*p0388-1)<0;-1;IF((2*p0388-1)>0;1;0))*SQRT(SQRT((2/(pi()*0.140012289)+LN(1-(2*p0388-1)^2)/2)^2-LN(1-(2*p0388-1)^2)/0.140012289)-(2/(pi()*0.140012289)+LN(1-(2*p0388-1)^2)/2)))
- p1666: 0.885279
- p3326: 0.0011624; = if(and(p1232=0;p3255<>0);p3268*p3289;0)
- p4860: 0; = p1893*p3482
- p1222: 0.94
- p1030: 0.00034754; = IF(p1012=0;p1024*p0001/(p0818*p0002);0)
- p3018: 1.91876e-8; = p2237*p1023
- p4868: 0; = p1901*p3482
- p4846: 0; = p1879*p3482
- p2062: 3.76588
- p2469: 0.00158962; = p2273*p1123
- p2800: 0; = p2409*(p1019+p1021)
- p4837: 0; = p1870*p3482
- p3208: 0; = p2427*p1082
- p2228: 0.238776; = if(p0774*p0778+p0775*p0779+p0776*p0780+p0777*p0781=0;0;p0780*p0776/(p0774*p0778+p0775*p0779+p0776*p0780+p0777*p0781))
- p2682: 2.86619e-6; = p2291*(p1019+p1021)
- p1994: 750
- p2426: 0; = p2235*p2216
- p3105: 1.25926e-9; = p2324*p1023
- p0974: 0.5
- p0054: 5
- p2667: 0.00149287; = p2276*(p1019+p1021)
- p1132: 0.01409; = if(p1121=0;IF(p1123+p1128+p1129+p1130+p1131=1;0;1-(p1123+p1128+p1129+p1130+p1131));0)
- p5133: 3.32672e-7; = p1754*p3484
- p3281: 0.46
- p4975: 1.49989e-5; = p1802*p3483
- p1911: 0.000240553; = p1503*1000/p0818
- p3945: 0.00010354; = p1802*p3478
- p3266: 0.0545989
- p2715: 2.47898e-5; = p2324*(p1019+p1021)
- p2879: 0.00223382; = p2293*(p1020+p1022)
- p4513: 0; = p1962*p3480
- p2163: 0.00200229; = (p2017-p2020)/p0818-(p2025+p2028+p2033+p2034+p2051+p2125+p2126+p2127+p2128+p2129+p2130+p2131+p2132+p2133+p2134+p2135+p2136+p2137+p2138+p2139+p2140+p2141+p2142+p2143+p2144+p2145+p2146+p2147+p2148+p2149+p2150+p2151+p2152+p2153+p2154+p2155+p2156+p2157)
- p2290: 8.87052e-6; = p2223*p2197
- p3758: 1.357e-7; = p1821*p3477
- p3284: 0.275
- p0613: 0; = IF(p0349<0.5;-SQRT(p0007*EXP(p0481^2*p0008)-p0007);SQRT(p0007*EXP(p0481^2*p0008)-p0007))
- p3200: 0; = p2419*p1082
- p0905: 0.114844; = p0904/p0818
- p3220: 0.00454075; = p3216*p1228
- p2689: 0.00212271; = p2298*(p1078+p1080)
- p1471: 27
- p1991: 8.72509e7; = (if(p1111=0;0;p1106/p1111)+if(p1112=0;0;p1107/p1112)+if(p1113=0;0;p1108/p1113)+if(p1114=0;0;p1109/p1114)+if(p1115=0;0;p1110/p1115))*(1+p1157)
- p2485: 0.00413633; = p2289*p1014
- p2078: 0.117
- p0264: 26.982
- p1010: 0; = p0890
- p2254: 0.00112467; = p2222*p2200
- p4376: 0; = p1821*p3480
- p3180: 0; = p2399*p1023
- p1220: 0; = IF(p1218<0.5;-SQRT(p1214*EXP(p1219^2*p1215)-p1214);SQRT(p1214*EXP(p1219^2*p1215)-p1214))
- p3386: 0; = p3367*p1234
- p0257: 26.385
- p2647: 1.36612e-5; = p2256*(p1019+p1021)
- p2838: 1.85133e-6; = p2252*(p1020+p1022)
- p3324: 0.0102018; = if(and(p1232=0;p3255<>0);p3266*(p3279*(p3284*p1256+p3286*(p1253+p1257)+p1258*p3288+p3299*p3287));0)
- p2885: 0.000862203; = p2299*(p1079+p1081)
- p2765: 0.00203638; = p2374*(p1019+p1021)
- p1785: 0
- p4036: 0.000644881; = p1893*p3478
- p1177: 0.00120966; = p0801*p0001/(p0818*p0002)
- p2888: 0.000670119; = p2302*(p1079+p1081)
- p0102: 19.415
- p0277: 0.5
- p0247: 6.985
- p0683: 11.903; = p0023*(1+p0551*p0155/100)
- p0097: 57.321
- p1622: 0
- p1170: 478.136; = p1169*p0801
- p0684: 71.13; = p0024*(1+p0552*p0156/100)
- p1888: 0
- p0759: 0
- p3911: 0.000304097; = p1768*p3478
- p0187: 48.435
- p0343: 0.5
- p3116: 2.8082e-8; = p2335*p1023
- p5181: 4.69438e-6; = p1802*p3484
- p2977: 0.000886722; = p2391*(p1129+p1131)
- p0818: 6.8592e8; = p0806*p0807
- p1114: 0.216028
- p2708: 2.77377e-5; = p2317*(p1019+p1021)
- p3481: 0.148868; = if(p1328+p1330+p1332+p1334+p1336+p1338+p1340+p1342+p1344=0;0;p1338/(p1328+p1330+p1332+p1334+p1336+p1338+p1340+p1342+p1344))
- p1287: 0
- p2405: 0; = p2234*p2195
- p2410: 0; = p2234*p2200
- p1728: 0
- p0394: 0.5
- p2172: 0.684218; = p2166-(p2167+p2168+p2169+p2170)
- p4953: 4.60596e-6; = p1780*p3483
- p1555: 0
- p3113: 3.96989e-8; = p2332*p1023
- p2415: 0; = p2235*p2205
- p1920: 0
- p2968: 0.000634576; = p2382*(p1079+p1081)
- p1568: 0
- p0399: 0.5
- p1298: 0
- p1997: 2.43088e8; = (if(p1152=0;0;p1150/p1152)+if(p1153=0;0;p1151/p1153))*(1+p1157)
- p4935: 4.72406e-6; = p1762*p3483
- p0494: 0; = SQRT(2)*(IF((2*p0362-1)<0;-1;IF((2*p0362-1)>0;1;0))*SQRT(SQRT((2/(pi()*0.140012289)+LN(1-(2*p0362-1)^2)/2)^2-LN(1-(2*p0362-1)^2)/0.140012289)-(2/(pi()*0.140012289)+LN(1-(2*p0362-1)^2)/2)))
- p3093: 0.00142915; = p2312*p1132
- p0754: 2545.11; = p0094*(1+p0622*p0226/100)
- p2854: 6.11389e-5; = p2268*(p1079+p1081)
- p4672: 3.58107e-5; = p1911*p3481
- p1789: 0
- p1048: 0.000435637; = IF(p1012=0;IF(p1037+p1044+p1045+p1046+p1047=1;0;IF(p1037+p1044+p1045+p1046+p1047+p1042>1;1-(p1037+p1044+p1045+p1046+p1047);p1042));0)
- p3690: 0.000364062; = p1963*p3476
- p1614: 0
- p2747: 0.000102174; = p2356*(p1019+p1021)
- p2674: 9.64284e-5; = p2283*(p1019+p1021)
- p0481: 0; = SQRT(2)*(IF((2*p0349-1)<0;-1;IF((2*p0349-1)>0;1;0))*SQRT(SQRT((2/(pi()*0.140012289)+LN(1-(2*p0349-1)^2)/2)^2-LN(1-(2*p0349-1)^2)/0.140012289)-(2/(pi()*0.140012289)+LN(1-(2*p0349-1)^2)/2)))
- p2953: 0.0227518; = p2367*(p1020+p1022)
- p3211: 0; = p2430*p1132
- p4102: 0.0018604; = p1963*p3478
- p0053: 32.176
- p2055: 5.59471
- p2270: 8.39744e-5; = p2226*p2216
- p3431: 0; = p3374*p1239
- p0009: 22.5515
- p4977: 1.77152e-6; = p1804*p3483
- p0667: 0; = IF(p0403<0.5;-SQRT(p0007*EXP(p0535^2*p0008)-p0007);SQRT(p0007*EXP(p0535^2*p0008)-p0007))
- p3464: 0; = p3369*p1241
- p1810: 0
- p0307: 0.5
- p3458: 0; = p3363*p1241
- p2472: 0.00227942; = p2276*p1014
- p3385: 0; = p3366*p1234
- p2092: 0.54529
- p2217: 0.00658277; = p1118-p2216
- p2900: 0.00675716; = p2314*(p1129+p1131)
- p2176: 0.000909728; = p0895*p0913/p0818
- p0419: 0; = SQRT(2)*(IF((2*p0287-1)<0;-1;IF((2*p0287-1)>0;1;0))*SQRT(SQRT((2/(pi()*0.140012289)+LN(1-(2*p0287-1)^2)/2)^2-LN(1-(2*p0287-1)^2)/0.140012289)-(2/(pi()*0.140012289)+LN(1-(2*p0287-1)^2)/2)))
- p1119: 0.0619143; = IF(p1071=0;p1109/(p1114*p0818);0)
- p0834: 22
- p1021: 0.14833; = IF(p1012=0;IF(p1014+p1019+p1020=1;0;IF(p1014+p1019+p1020+p1017>1;1-(p1014+p1019+p1020);p1017));0)
- p3147: 4.57992e-8; = p2366*p1023
- p3136: 5.4765e-8; = p2355*p1023
- p1926: 0
- p0401: 0.5
- p4308: 0.000241344; = p1963*p3479
- p0175: 0
- p1825: 0
- p3368: 0.00581853; = if(p1232=0;p3245*p3356/p0818;0)
- p5249: 4.06599e-7; = p1870*p3484
- p4040: 4.32095e-5; = p1897*p3478
- p0089: 10.988
- p0325: 0.5
- p4101: 0; = p1962*p3478
- p0677: 0
- p0635: 0; = IF(p0371<0.5;-SQRT(p0007*EXP(p0503^2*p0008)-p0007);SQRT(p0007*EXP(p0503^2*p0008)-p0007))
- p0144: 0
- p3052: 0; = p2271*p1082
- p2574: 0.000863475; = p2378*p1073
- p0674: 197.198; = p0014*(1+p0542*p0146/100)
- p0100: 12.455
- p3303: 0; = if(and(p1232=0;p3252<>0);p3259*p3289;0)
- p3023: 4.30818e-10; = p2242*p1023
- p1543: 167
- p1673: 0
- p2781: 0.00675836; = p2390*(p1128+p1130)
- p0439: 0; = SQRT(2)*(IF((2*p0307-1)<0;-1;IF((2*p0307-1)>0;1;0))*SQRT(SQRT((2/(pi()*0.140012289)+LN(1-(2*p0307-1)^2)/2)^2-LN(1-(2*p0307-1)^2)/0.140012289)-(2/(pi()*0.140012289)+LN(1-(2*p0307-1)^2)/2)))
- p0654: 0; = IF(p0390<0.5;-SQRT(p0007*EXP(p0522^2*p0008)-p0007);SQRT(p0007*EXP(p0522^2*p0008)-p0007))
- p0484: 0; = SQRT(2)*(IF((2*p0352-1)<0;-1;IF((2*p0352-1)>0;1;0))*SQRT(SQRT((2/(pi()*0.140012289)+LN(1-(2*p0352-1)^2)/2)^2-LN(1-(2*p0352-1)^2)/0.140012289)-(2/(pi()*0.140012289)+LN(1-(2*p0352-1)^2)/2)))
- p0308: 0.5
- p2721: 2.55985e-6; = p2330*(p1019+p1021)
- p3206: 0; = p2425*p1082
- p2411: 0; = p2234*p2201
- p3412: 0.000599837; = p3374*p1238
- p3576: 5.28081e-5; = p1845*p3476
- p3123: 0; = p2342*p1082
- p3118: 0; = p2337*p1082
- p3074: 4.44498e-8; = p2293*p1023
- p1310: 0; = IF(p1307=p1266;0;IF(p1307+p1308>p1266;p1266-p1307;p1308))
- p1745: 0
- p5115: 1.06291e-6; = p1942*p3483
- p3196: 0; = p2415*p1082
- p3047: 0; = p2266*p1082
- p1992: 3900
- p0139: 117.155
- p1316: 0.06832; = p1312*p1252/p0818
- p0275: 0.5
- p1028: 296741; = IF(p1012=0;p1022*(p0704/100)*p0703*1000;0)
- p3225: 0.00155869; = p3221*p1229
- p1580: 0
- p2599: 0; = p2403*p1014
- p1963j: 2.814e-5; = p1725*p1929+p1726*p1930+p1727*p1931+p1728*p1932+p1729*p1933+p1730*p1934+p1731*p1935+p1732*p1936+p1733*p1937+p1734*p1938+p1735*p1939+p1736*p1940+p1737*p1941+p1738*p1942+p1739*p1943+p1740*p1944+p1741*p1945+p1742*p1946+p1743*p1947
- p2482: 0.000342971; = p2286*p1014
- p2971: 4.96248e-5; = p2385*(p1079+p1081)
- p4658: 1.15028e-5; = p1897*p3481
- p0986: 0; = IF(p0982+p0985=1;0;IF(p0982+p0985+p0984>1;1-(p0982+p0985);p0984))
- p0451: 0; = SQRT(2)*(IF((2*p0319-1)<0;-1;IF((2*p0319-1)>0;1;0))*SQRT(SQRT((2/(pi()*0.140012289)+LN(1-(2*p0319-1)^2)/2)^2-LN(1-(2*p0319-1)^2)/0.140012289)-(2/(pi()*0.140012289)+LN(1-(2*p0319-1)^2)/2)))
- p3245: 0.77379; = IF(p3244=1;0;if(p3244+p0792/100>1;1-p3244;p0792/100))
- p4556: 6.51104e-7; = p1795*p3481
- p1735: 0
- p4747: 0; = p1780*p3482
- p1747: 0.217583
- p1764: 0
- p2813: 0; = p2422*(p1078+p1080)
- p3411: 0.00189206; = p3373*p1238
- p3184: 0; = p2403*p1023
- p4335: 0; = p1780*p3480
- p2393: 0; = p2234*p2182
- p1126: 0; = if(p1121=0;p0720/100;0)
- p2111: 0.856281
- p1687: 0
- p0916: 0.799643; = p0826+p0828+p0829+(p0832*(1+p0894))/p0818
- p2452: 2.0859e-5; = p2256*p1014
- p1734: 0
- p2038: 0.304457
- p3140: 5.60167e-9; = p2359*p1023
- p0266: 33.421
- p4664: 5.46927e-5; = p1903*p3481
- p3350: 1.82232e6; = if(and(p1232=0;p3256<>0);p3256*(p3273*p3277-p3345)/p3349;0)
- p3406: 0.00205185; = p3368*p1238
- p1122: 0; = p1121*p0001/(p0818*p0002)
- p0681: 929.695; = p0021*(1+p0549*p0153/100)
- p1602: 0.730108
- p2100: 0.705744
- p3080: 0; = p2299*p1082
- p0143: 0
- p2262: 0.000769752; = p2226*p2208
- p0919: 0; = p0678*1000/p0801
- p1863: 0
- p0711: 28.608; = p0051*(1+p0579*p0183/100)
- p0315: 0.5
- p1272: 0; = IF(p1267+p1270+p1271=p1259;0;p1259-(p1267+p1270+p1271))
- p1850: 0
- p1963b: 2.68318e-5; = p1569*p1773+p1570*p1774+p1571*p1775+p1572*p1776+p1573*p1777+p1574*p1778+p1575*p1779+p1576*p1780+p1577*p1781+p1578*p1782+p1579*p1783+p1580*p1784+p1581*p1785+p1582*p1786+p1583*p1787+p1584*p1788+p1585*p1789+p1586*p1790+p1587*p1791
- p0003: 10000
- p2056: 2.07882
- p0930: 0; = p0801*p0924
- p1226: 930000; = IF(p1221=0;0;IF(p1193=0;p0801;0))
- p2882: 0.00158015; = p2296*(p1020+p1022)
- p0731: 0
- p2664: 0.00627496; = p2273*(p1128+p1130)
- p3452: 0; = p3376*p1240
- p0130: 24.221
- p2004: 30
- p1017: 0.14833; = IF(p1012=0;p0708/100;0)
- p0892: 671.706; = if(p0891=0;0;(1-p1240)*p3251/p0891)
- p2476: 0.000355605; = p2280*p1014
- p2430: 0; = p2236*p2220
- p2297: 0.00741113; = p2227*p2204
- p2249: 0.000352237; = p2222*p2195
- p1109: 9.17434e6; = IF(p1071=0;p1105*p1103*p1095;0)
- p0214: 0.794
- p2580: 5.31323e-6; = p2384*p1073
- p2691: 0.00570733; = p2300*(p1078+p1080)
- p3036: 4.82174e-9; = p2255*p1023
- p1710: 0
- p4129: 4.12475e-6; = p1780*p3479
- p1576: 0.47191
- p2247: 0.000288705; = p2222*p2192
- p4925: 0; = p1962*p3482
- p0178: 33.441
- p0915: 0.0250339; = p0914/p0818
- p1008: 0; = p1004*p0001*p0004/(p0818*p0002)
- p0983: 0; = if(p0886=0;0;min(1;(p0695*p0694*1000*p0697/100)/p0886))
- p3297: 0; = if(p1273+p1274+p1275+p1276=0;0;p1273/(p1273+p1274+p1275+p1276))
- p2908: 0.000219855; = p2322*(p1020+p1022)
- p2147: 3.41372e-7; = p2015*p2075*p2109/(p0818*1000)
- p3253: 0; = p1252*(p1277*(1-p3247)+p1280*(1-p3248)+p1281*(1-p3249)+p1282*(1-p3250))
- p3563: 0.000125399; = p1832*p3476
- p0862: 0.212041; = p0674*1000/p0856
- p1230: 0.5
- p3403: 0; = p3365*p1238
- p0653: 0; = IF(p0389<0.5;-SQRT(p0007*EXP(p0521^2*p0008)-p0007);SQRT(p0007*EXP(p0521^2*p0008)-p0007))
- p0506: 0; = SQRT(2)*(IF((2*p0374-1)<0;-1;IF((2*p0374-1)>0;1;0))*SQRT(SQRT((2/(pi()*0.140012289)+LN(1-(2*p0374-1)^2)/2)^2-LN(1-(2*p0374-1)^2)/0.140012289)-(2/(pi()*0.140012289)+LN(1-(2*p0374-1)^2)/2)))
- p2568: 0.00188446; = p2372*p1014
- p1889: 0
- p3179: 0; = p2398*p1023
- p0929: 0; = p0801*p0923
- p0501: 0; = SQRT(2)*(IF((2*p0369-1)<0;-1;IF((2*p0369-1)>0;1;0))*SQRT(SQRT((2/(pi()*0.140012289)+LN(1-(2*p0369-1)^2)/2)^2-LN(1-(2*p0369-1)^2)/0.140012289)-(2/(pi()*0.140012289)+LN(1-(2*p0369-1)^2)/2)))
- p1989: 50
- p1783: 0
- p2979: 0; = p2393*(p1020+p1022)
- p2340: 0.00160759; = p2228*p2208
- p2329: 7.92243e-6; = p2224*p2197
- p4362: 0; = p1807*p3480
- p1162: 0.00135584; = p1161/p0818
- p2093: 0.260958
- p2969: 7.05526e-7; = p2383*(p1079+p1081)
- p1081: 0.07547; = IF(p1071=0;IF(p1073+p1078+p1079+p1080=1;0;IF(p1073+p1078+p1079+p1080+p1077>1;1-(p1073+p1078+p1079+p1080);p1077));0)
- p2666: 0.000674568; = p2275*(p1128+p1130)
- p0924: 0; = IF(p0918+p0923=1;0;IF(p0918+p0923+p0920>1;1-(p0918+p0923);p0920))
- p1865: 0
- p2823: 0.000964274; = p2237*(p1020+p1022)
- p3122: 0; = p2341*p1082
- p2714: 9.85779e-5; = p2323*(p1019+p1021)
- p3642: 2.63243e-5; = p1911*p3476
- p4691: 4.55773e-6; = p1930*p3481
- p3345: 0.160606; = if(and(p1232=0;p3256<>0);p3273*p3277*p3293;0)
- p1036: 7.5924e7; = IF(p1012=0;p0795*p0702*1000*p0796/100;0)
- p3007: 0; = p2421*(p1079+p1081)
- p1342: 494133; = p1326*p0801
- p0942: 0; = if(and(p0683=0;p0948=0);p0936;0)
- p1995: 50
- p4541: 8.46435e-6; = p1780*p3481
- p3000: 0; = p2414*(p1079+p1081)
- p0614: 0; = IF(p0350<0.5;-SQRT(p0007*EXP(p0482^2*p0008)-p0007);SQRT(p0007*EXP(p0482^2*p0008)-p0007))
- p1904: 0
- p1655: 0
- p1334: 442510; = p1322*p0801
- p2620: 0; = p2424*p1073
- p1901: 5.39422e-5; = p1493*1000/p0818
- p2630: 7.85812e-6; = p2239*(p1019+p1021)
- p3044: 0; = p2263*p1082
- p2857: 0.000298962; = p2271*(p1079+p1081)
- p1071: 0
- p0877: 2.97139; = p0876*p0001*p0003/(p0818*p0002)
- p3056: 3.2529e-5; = p2275*p1132
- p2395: 0; = p2234*p2184
- p1553: 0
- p4873: 0; = p1906*p3482
- p1554: 0
- p0776: 31.051; = p0116*(1+p0644*p0248/100)
- p3438: 0; = p3362*p1240
- p2832: 1.79285e-5; = p2246*(p1020+p1022)
- p1231: 0.0431422; = IF(p1221=0;0;p1230*(p1228+p1229))
- p0640: 0; = IF(p0376<0.5;-SQRT(p0007*EXP(p0508^2*p0008)-p0007);SQRT(p0007*EXP(p0508^2*p0008)-p0007))
- p0259: 31.588
- p2341: 0.000726971; = p2228*p2209
- p2776: 3.95631e-5; = p2385*(p1078+p1080)
- p1086: 37059.9; = IF(p1071=0;p1080*(p0710/100)*p0703*1000;0)
- p5186: 1.10891e-7; = p1807*p3484
- p1101: 0.0606187; = IF(p1071=0;IF(p1096=1;0;IF(p1096+p1097>1;1-p1096;p1097));0)
- p3373: 0.00536542; = if(p1232=0;p3245*p3361/p0818;0)
- p2905: 0.000531002; = p2319*(p1020+p1022)
- p3216: 0.06; = IF(OR(p1226=0;p1228=0);0;1-p3213-p3214-p3215)
- p4100: 4.07637e-6; = p1957*p3478
- p2920: 0.000123102; = p2334*(p1020+p1022)
- p0057: 7.402
- p2946: 0.00360129; = p2360*(p1020+p1022)
- p2397: 0; = p2234*p2186
- p2681: 1.74625e-6; = p2290*(p1019+p1021)
- p1868: 0
- p2684: 0.000875038; = p2293*(p1019+p1021)
- p1878: 1.4579e-6; = p1470*1000/p0818
- p2705: 0.00318602; = p2314*(p1128+p1130)
- p2130: 3.89133e-6; = p2015*p2058*p2092/(p0818*1000)
- p1204: 0.980791
- p0286: 0.5
- p3341: 0; = if(and(p1232=0;p3254<>0);p3254*(p3271-p3336)/p3338;0)
- p0998: 0; = if(p0888=0;0;if((p0699*p0698*1000*p0700/100)/p0888>1;1;(p0699*p0698*1000*p0700/100)/p0888))
- p1158: 0.143947; = p1156*p1157
- p0947: 0; = if(and(p0683=0;or(p0807=480;p0807=32;p0807=1;and(p0807=60;p0901<0.03)));p0935;0)
- p2005: 7.03802e6; = p1963*p0818+p1959*1000+p1170+p1176+p1182
- p0823: 0.91625
- p3160: 0; = p2379*p1082
- p1963e: 0.000857705; = p1628*p1832+p1629*p1833+p1630*p1834+p1631*p1835+p1632*p1836+p1633*p1837+p1634*p1838+p1635*p1839+p1636*p1840+p1637*p1841+p1638*p1842+p1639*p1843+p1640*p1844+p1641*p1845+p1642*p1846+p1643*p1847+p1644*p1848+p1645*p1849+p1646*p1850
- p0239: 30.64
- p1278: 0
- p1867: 0
- p1836: 0
- p0355: 0.5
- p0990: 0; = p0986*p0886
- p3336: 0; = IF(or(p3254=0;p1232>0);0;p3271*p3289)
- p2709: 9.5541e-5; = p2318*(p1019+p1021)
- p0123: 105.245
- p4458: 0; = p1903*p3480
- p1290: 0; = IF(p1287=p1264;0;IF(p1287+p1288>p1264;p1264-p1287;p1288))
- p1399: 3
- p0345: 0.5
- p2241: 0.00029934; = p2222*p2186
- p2412: 0; = p2234*p2202
- p3838: 1.93111e-7; = p1901*p3477
- p0642: 0; = IF(p0378<0.5;-SQRT(p0007*EXP(p0510^2*p0008)-p0007);SQRT(p0007*EXP(p0510^2*p0008)-p0007))
- p0252: 12.004
- p2346: 0.00032144; = p2228*p2214
- p1018: 0.33382; = IF(p1012=0;p0709/100;0)
- p3161: 0; = p2380*p1082
- p3131: 8.44206e-5; = p2350*p1132
- p1935: 0
- p4789: 0; = p1822*p3482
- p0795: 85.411; = p0135*(1+p0663*p0267/100)
- p2662: 0.000238346; = p2271*(p1078+p1080)
- p1756: 0
- p2757: 0.000901604; = p2366*(p1019+p1021)
- p0369: 0.5
- p1906: 5.10264e-5; = p1498*1000/p0818
- p2842: 3.48748e-5; = p2256*(p1020+p1022)
- p1875: 0
- p0120: 36.102
- p2432: 0.143947; = p1158
- p2206: 0.00391728; = 9*1.00794*p2204/30.973762
- p1816: 0
- p3209: 0; = p2428*p1132
- p2883: 0.00294392; = p2297*(p1079+p1081)
- p4485: 0; = p1930*p3480
- p1627: 0
- p2048: 5.736e-14; = p2015*p2046/(p0818*1000000000000)
- p2555: 0.000168375; = p2359*p1014
- p1924: 0
- p5200: 9.61053e-7; = p1821*p3484
- p3427: 0; = p3370*p1239
- p0868: 0; = IF(p0858+p0864+p0865+p0866+p0867=1;0;IF(p0858+p0864+p0865+p0866+p0867+p0863>1;1-(p0858+p0864+p0865+p0866+p0867);p0863))
- p2494: 0.00191754; = p2298*p1073
- p1268: 0
- p1100: 0.303167
- p1286: 0; = p1282*p1252/p0818
- p2307: 0.000745921; = p2227*p2214
- p1147: 0.0801873
- p2232: 0.0546567; = if(p0783*p0787+p0784*p0788+p0785*p0789+p0786*p0790=0;0;p0789*p0785/(p0783*p0787+p0784*p0788+p0785*p0789+p0786*p0790))
- p1585: 0
- p2597: 0; = p2401*p1014
- p5066: 9.34182e-5; = p1893*p3483
- p2064: 0.676706
- p2607: 0; = p2411*p1014
- p1973: 0.000300788; = if(p0807=480;p1968*p0001/(p0818*p0002);0)
- p2516: 4.57094e-5; = p2320*p1014
- p1987: 400
- p1829: 0
- p2615: 0; = p2419*p1073
- p2058: 1.24412
- p3139: 3.89214e-8; = p2358*p1023
- p0198: 21.328
- p3472: 0; = p3377*p1241
- p3327: 0.765666; = if(and(p1232=0;p3255<>0);1-(p3323+p3324+p3325+p3326);0)
- p2446: 0.00104658; = p2250*p1014
- p0386: 0.5
- p2625: 0; = p2429*p1123
- p1327a: 0.166295; = (p0745*1000/p0801)*(1-(p0746+p0747+p0748+p0749+p0750+p0751+p0752+p0753)/100)+(p0754*1000/p0801)*(1-(p0755+p0756+p0757+p0758+p0759+p0760+p0761+p0762)/100)
- p1323: 0; = IF(((p0745*1000*p0750/100)+(p0754*1000*p0759/100))/p0801<0;0;((p0745*1000*p0750/100)+(p0754*1000*p0759/100))/p0801)
- p3460: 0; = p3365*p1241
- p2815: 0; = p2424*(p1078+p1080)
- p0858: 0.0403817; = p0670*1000/p0856
- p4300: 1.76624e-5; = p1951*p3479
- p0844: 0.425667
- p3011: 0; = p2425*(p1079+p1081)
- p0626: 0; = IF(p0362<0.5;-SQRT(p0007*EXP(p0494^2*p0008)-p0007);SQRT(p0007*EXP(p0494^2*p0008)-p0007))
- p2461: 0.000563052; = p2265*p1073
- p2377: 0.000363522; = p2229*p2206
- p3432: 0; = p3375*p1239
- p1642: 0
- p3637: 5.58393e-6; = p1906*p3476
- p2677: 0.000224623; = p2286*(p1019+p1021)
- p4845: 0; = p1878*p3482
- p3066: 1.40996e-9; = p2285*p1023
- p1794: 0
- p2391: 0.00143089; = p2233*p2220
- p3384: 0; = p3365*p1234
- p2850: 5.97014e-5; = p2264*(p1079+p1081)
- p3366: 0; = if(p1232=0;p3244*p3360/p0818;0)
- p0444: 0; = SQRT(2)*(IF((2*p0312-1)<0;-1;IF((2*p0312-1)>0;1;0))*SQRT(SQRT((2/(pi()*0.140012289)+LN(1-(2*p0312-1)^2)/2)^2-LN(1-(2*p0312-1)^2)/0.140012289)-(2/(pi()*0.140012289)+LN(1-(2*p0312-1)^2)/2)))
- p2252: 3.68388e-6; = p2222*p2198
- p3465: 0; = p3370*p1241
- p2980: 0; = p2394*(p1020+p1022)
- p3398: 0.0010154; = p3379*p1234
- p1573: 0
- p1844: 0
- p2716: 0.000200615; = p2325*(p1019+p1021)
- p2914: 0.00617652; = p2328*(p1020+p1022)
- p0899: 1.63583e9; = p0825*p0896+p0827*p0897+(p0830+p0895)*p0824*p0898
- p4918: 0; = p1951*p3482
- p2044: 2.55561e-7; = p2015*p2042*p2043/(p0818*1000)
- p2673: 0.0004288; = p2282*(p1019+p1021)
- p2168: 0.022795; = p2166*(p0903)
- p2216: 0.000734482; = p1108/p0818
- p1934: 0
- p0624: 0; = IF(p0360<0.5;-SQRT(p0007*EXP(p0492^2*p0008)-p0007);SQRT(p0007*EXP(p0492^2*p0008)-p0007))
- p2867: 8.55689e-5; = p2281*(p1020+p1022)
- p3439: 0; = p3363*p1240
- p2991: 0; = p2405*(p1020+p1022)
- p0996: 0; = if(p0888=0;0;if((p0691*p0690*1000*p0692/100)/p0888>1;1;(p0691*p0690*1000*p0692/100)/p0888))
- p1659: 0
- p2060: 0.272353
- p0829: 0.0832195; = if(p0807=480;p0814*(1-p0824);0)
- p2788: 0; = p2397*(p1019+p1021)
- p1189: 0.00120966; = p0801*p0001/(p0818*p0002)
- p2601: 0; = p2405*p1014
- p1283: 0; = p1277*p1252/p0818
- p0502: 0; = SQRT(2)*(IF((2*p0370-1)<0;-1;IF((2*p0370-1)>0;1;0))*SQRT(SQRT((2/(pi()*0.140012289)+LN(1-(2*p0370-1)^2)/2)^2-LN(1-(2*p0370-1)^2)/0.140012289)-(2/(pi()*0.140012289)+LN(1-(2*p0370-1)^2)/2)))
- p1639: 0
- p2205: 0.0120969; = 2*14.0067*p2204/30.973762
- p2433: 0.000576742; = p2237*p1014
- p0763: 929.459; = p0103*(1+p0631*p0235/100)
- p4045: 1.38596e-5; = p1902*p3478
- p2449: 2.43451e-6; = p2253*p1014
- p2584: 0.00017476; = p2388*p1073
- p3480: 0; = if(p1328+p1330+p1332+p1334+p1336+p1338+p1340+p1342+p1344=0;0;p1336/(p1328+p1330+p1332+p1334+p1336+p1338+p1340+p1342+p1344))
- p0713: 32.176; = p0053*(1+p0581*p0185/100)
- p3478: 0.559212; = if(p1328+p1330+p1332+p1334+p1336+p1338+p1340+p1342+p1344=0;0;p1332/(p1328+p1330+p1332+p1334+p1336+p1338+p1340+p1342+p1344))
- p1026: 149988; = IF(p1012=0;p1020*(p0704/100)*p0703*1000;0)
- p1647: 0
- p1261: 0; = if(p1232>0;0;p0732/100)
- p1124: 0.29219; = if(p1121=0;p0718/100;0)
- p1285: 0; = p1281*p1252/p0818
- p2550: 0.00749903; = p2354*p1014
- p2727: 0.00101141; = p2336*(p1078+p1080)
- p1299: 0
- p0861: 0.245639; = p0673*1000/p0856
- p1950: 0
- p2870: 0.000281768; = p2284*(p1020+p1022)
- p3175: 0; = p2394*p1023
- p1873: 0
- p2293: 0.00444498; = p2223*p2200
- p3094: 8.84116e-5; = p2313*p1132
- p1817: 0
- p2767: 0.000355512; = p2376*(p1078+p1080)
- p4822: 0; = p1855*p3482
- p1237: 0; = if(p1232>0;0;p0729/100)
- p3156: 0; = p2375*p1082
- p3115: 2.44954e-9; = p2334*p1023
- p2729: 0.000296216; = p2338*(p1078+p1080)
- p1269: 0
- p1961: 0
- p1917: 0
- p2309: 0.000406971; = p2227*p2216
- p1055: 33075.3; = IF(p1012=0;p1048*p1036;0)
- p0073: 73.05
- p4260: 1.74509e-5; = p1911*p3479
- p0374: 0.5
- p2623: 0; = p2427*p1073
- p1201: 0.65
- p0084: 95.203
- p0229: 9.648
- p1108: 503796; = IF(p1071=0;p1105*p1102*p1095;0)
- p0997: 0; = if(p0888=0;0;if((p0695*p0694*1000*p0696/100)/p0888>1;1;(p0695*p0694*1000*p0696/100)/p0888))
- p2528: 0.00119327; = p2332*p1014
- p0586: 0; = IF(p0322<0.5;-SQRT(p0007*EXP(p0454^2*p0008)-p0007);SQRT(p0007*EXP(p0454^2*p0008)-p0007))
- p1872: 0
- p2158: 8.48139e-7; = p2015*p2082*p2120/(p0818*1000)
- p0118: 11.783
- p0516: 0; = SQRT(2)*(IF((2*p0384-1)<0;-1;IF((2*p0384-1)>0;1;0))*SQRT(SQRT((2/(pi()*0.140012289)+LN(1-(2*p0384-1)^2)/2)^2-LN(1-(2*p0384-1)^2)/0.140012289)-(2/(pi()*0.140012289)+LN(1-(2*p0384-1)^2)/2)))
- p2535: 0.00222174; = p2339*p1073
- p3198: 0; = p2417*p1082
- p0956: 0; = if(and(p0683>0;or(p0807=56;p0807=100;and(p0807=60;p0901>0.06)));p0938;0)
- p4387: 0; = p1832*p3480
- p2198: 7.91461e-5; = 22.98976928*p2197/14.0067
- p2084: 0.21
- p2255: 0.000482174; = p2222*p2201
- p2033: 1.65248e-5; = p2015*p2029*p2031/(p0818*1000)
- p1111: 0.0872841
- p1213: 16
- p1750: 0
- p3148: 4.52727e-7; = p2367*p1023
- p2357: 0.00178774; = p2225*p2185
- p2933: 0.000481845; = p2347*(p1079+p1081)
- p3187: 0; = p2406*p1023
- p2931: 1.89827e-5; = p2345*(p1079+p1081)
- p2637: 7.02297e-6; = p2246*(p1019+p1021)
- p2503: 0.000213393; = p2307*p1073
- p2791: 0; = p2400*(p1019+p1021)
- p1131: 0.15501; = if(p1121=0;IF(p1123+p1128+p1129+p1130=1;0;IF(p1123+p1128+p1129+p1130+p1127>1;1-(p1123+p1128+p1129+p1130);p1127));0)
- p0650: 0; = IF(p0386<0.5;-SQRT(p0007*EXP(p0518^2*p0008)-p0007);SQRT(p0007*EXP(p0518^2*p0008)-p0007))
- p1963c: 0.000164734; = p1588*p1792+p1589*p1793+p1590*p1794+p1591*p1795+p1592*p1796+p1593*p1797+p1594*p1798+p1595*p1799+p1596*p1800+p1597*p1801+p1598*p1802+p1599*p1803+p1600*p1804+p1601*p1805+p1602*p1806+p1603*p1807+p1604*p1808+p1605*p1809+p1606*p1810+p1607*p1811
- p0542: 0; = IF(p0278<0.5;-SQRT(p0007*EXP(p0410^2*p0008)-p0007);SQRT(p0007*EXP(p0410^2*p0008)-p0007))
- p2398: 0; = p2234*p2187
- p3404: 0; = p3366*p1238
- p0987: 0; = if(p0978>0;0;if(and(p0687=0;p0691=0;p0695=0;p0699=0);0;IF(p0982+p0985+p0986=1;0;1-(p0982+p0985+p0986))))
- p2235: 0; = 1-(p2226+p2227+p2228+p2229)
- p1015: 0.04853; = IF(p1012=0;p0706/100;0)
- p1042: 0.000435637
- p5079: 4.13355e-6; = p1906*p3483
- p2204: 0.0133752; = p1109/p0818
- p0410: 0; = SQRT(2)*(IF((2*p0278-1)<0;-1;IF((2*p0278-1)>0;1;0))*SQRT(SQRT((2/(pi()*0.140012289)+LN(1-(2*p0278-1)^2)/2)^2-LN(1-(2*p0278-1)^2)/0.140012289)-(2/(pi()*0.140012289)+LN(1-(2*p0278-1)^2)/2)))
- p0864: 0.0967903; = IF(p0858=1;0;IF(p0858+p0859>1;1-p0858;p0859))
- p2760: 9.42945e-6; = p2369*(p1019+p1021)
- p2514: 0.000145879; = p2318*p1014
- p2513: 4.23519e-5; = p2317*p1014
- p2744: 0.000265212; = p2353*(p1128+p1130)
- p2569: 0.000271217; = p2373*p1014
- p2288: 0.00139212; = p2223*p2195
- p0362: 0.5
- p1495: 252
- p1301: 0; = IF(p1297+p1300=p1265;0;IF(p1297+p1300+p1299>p1265;p1265-(p1297+p1300);p1299))
- p0584: 0; = IF(p0320<0.5;-SQRT(p0007*EXP(p0452^2*p0008)-p0007);SQRT(p0007*EXP(p0452^2*p0008)-p0007))
- p2408: 0; = p2234*p2198
- p1115: 0.237849
- p1013: 0; = p1012*p0001/(p0818*p0002)
- p2348: 0.000175376; = p2228*p2216
- p4514: 0; = p1963*p3480
- p1661: 0
- p3371: 0.00119907; = if(p1232=0;p3245*p3359/p0818;0)
- p3158: 0; = p2377*p1082
- p0129: 10.7
- p0177: 17.187
- p0391: 0.5
- p0895: 3.74213e8; = p0894*p0830
- p3395: 0.000102999; = p3376*p1234
- p1243: 19653.5; = if(p1232>0;0;p1238*(p0725/100)*p0723*1000)
- p2806: 0; = p2415*(p1078+p1080)
- p1609: 0
- p1295: 0; = p1291*p1252/p0818
- p2558: 0.000554439; = p2362*p1014
- p1565: 0
- p1900: 0
- p3242: 2.13292e-7; = p3234*p1188*p3238/p0818
- p3050: 0; = p2269*p1082
- p0940: 0; = if(and(p0683=0;p0946=0);p0934;0)
- p1560: 0
- p4228: 2.8556e-6; = p1879*p3479
- p2749: 0.000766207; = p2358*(p1019+p1021)
- p0819: 1.48122; = p0808*p0809/p0818
- p0616: 0; = IF(p0352<0.5;-SQRT(p0007*EXP(p0484^2*p0008)-p0007);SQRT(p0007*EXP(p0484^2*p0008)-p0007))
- p1245: 0; = if(p1232>0;0;p1240*(p0725/100)*p0723*1000)
- p2873: 0.00326369; = p2287*(p1020+p1022)
- p3267: 0.0170629
- p2853: 9.08935e-6; = p2267*(p1079+p1081)
- p2107: 0.881623
- p2320: 0.000152071; = p2224*p2187
- p3413: 0.000156354; = p3375*p1238
- p2713: 8.6122e-5; = p2322*(p1019+p1021)
- p3288: 0.505
- p3399: 0.143596; = p3380*p1234
- p2097: 0.40001
- p2814: 0; = p2423*(p1078+p1080)
- p0894: 0.2085
- p2260: 0.000447868; = p2226*p2206
- p1066: 0.0191975; = IF(p1012=0;p1052/(p1059*p0818);0)
- p4151: 1.34319e-5; = p1802*p3479
- p1929: 0
- p2282: 0.0021782; = p2223*p2188
- p1679: 0
- p2804: 0; = p2413*(p1019+p1021)
- p2626: 0; = p2430*p1123
- p0706: 4.853; = p0046*(1+p0574*p0178/100)
- p2310: 0.00364747; = p2227*p2217
- p1606: 0
- p2552: 0.000156007; = p2356*p1014
- p5075: 2.00772e-6; = p1902*p3483
- p3089: 0; = p2308*p1082
- p3126: 0; = p2345*p1082
- p0353: 0.5
- p3168: 0; = p2387*p1082
- p3103: 4.37478e-9; = p2322*p1023
- p1394: 127
- p2984: 0; = p2398*(p1020+p1022)
- p4323: 0; = p1768*p3480
- p2373: 0.000902311; = p2225*p2202
- p2103: 0.912485
- p4279: 2.22102e-6; = p1930*p3479
- p2402: 0; = p2234*p2191
- p0443: 0; = SQRT(2)*(IF((2*p0311-1)<0;-1;IF((2*p0311-1)>0;1;0))*SQRT(SQRT((2/(pi()*0.140012289)+LN(1-(2*p0311-1)^2)/2)^2-LN(1-(2*p0311-1)^2)/0.140012289)-(2/(pi()*0.140012289)+LN(1-(2*p0311-1)^2)/2)))
- p2938: 0.000323687; = p2352*(p1129+p1131)
- p0792: 77.379; = p0132*(1+p0660*p0264/100)
- p3317: 0; = if(and(p1232=0;p3253<>0);p3253*(p3261*p3277-p3312)/p3316;0)
- p2954: 1.46659e-5; = p2368*(p1020+p1022)
- p2696: 3.35847e-6; = p2305*(p1078+p1080)
- p1335: 0.000575575; = p1334*p0001/(p0818*p0002)
- p2240: 0.000137493; = p2222*p2185
- p2585: 0.00121492; = p2389*p1123
- p0088: 54.919
- p1790: 0
- p2521: 0.000306313; = p2325*p1014
- p0004: 0.0254
- p1001: 0; = if(p0978>0;0;if(and(p0687=0;p0691=0;p0695=0;p0699=0);0;IF(p0996+p0999+p1000=1;0;1-(p0996+p0999+p1000))))
- p0105: 37.327
- p2899: 0.00388848; = p2313*(p1129+p1131)
- p2486: 2.6663e-6; = p2290*p1014
- p0721: 15.501; = p0061*(1+p0589*p0193/100)
- p3280: 0.375
- p2567: 0.00439552; = p2371*p1014
- p2306: 0.000110894; = p2227*p2213
- p3533: 2.02617e-5; = p1802*p3476
- p1563: 0
- p3134: 1.27891e-5; = p2353*p1132
- p2913: 0.000624836; = p2327*(p1020+p1022)
- p1892: 0
- p1249: 0; = if(p1232>0;0;p1244*p0001/(p0818*p0002))
- p2222: 0.0465453; = if(p0765*p0769+p0766*p0770+p0767*p0771+p0768*p0772=0;0;p0769*p0765/(p0765*p0769+p0766*p0770+p0767*p0771+p0768*p0772))
- p5076: 2.97616e-5; = p1903*p3483
- p2768: 0.000115124; = p2377*(p1078+p1080)
- p0402: 0.5
- p0712: 26.669; = p0052*(1+p0580*p0184/100)
- p0327: 0.5
- p3132: 0.000118966; = p2351*p1132
- p4567: 1.08517e-6; = p1806*p3481
- p2218: 0.109621; = p1150/p0818
- p0737: 0
- p2820: 0; = p2429*(p1128+p1130)
- p1711: 0
- p2140: 8.12463e-7; = p2015*p2068*p2102/(p0818*1000)
- p3537: 7.97705e-7; = p1806*p3476
- p2861: 0.00143068; = p2275*(p1129+p1131)
- p1909: 0
- p3174: 0; = p2393*p1023
- p2952: 0.00230164; = p2366*(p1020+p1022)
- p3071: 8.87052e-11; = p2290*p1023
- p0917: 3.49174; = ((p0825+p0827+((p0830+p0895)+p0814*p0818))/p0818)-(p0900+p0905+p0910+p0915)
- p1171: 0.00120966; = p0801*p0001/(p0818*p0002)
- p1275: 0; = p1271*p1252/p0818
- p3444: 0; = p3368*p1240
- p0232: 25.959
- p1178: 1.84807e-7; = p1176/p0818
- p0110: 55.706
- p2889: 0.000289336; = p2303*(p1079+p1081)
- p3459: 0; = p3364*p1241
- p1759: 0
- p3422: 0; = p3365*p1239
- p2752: 0.000317238; = p2361*(p1019+p1021)
- p0717: 7.402; = p0057*(1+p0585*p0189/100)
- p2353: 0.00090767; = p2232*p2221
- p1861: 0
- p1896: 0
- p1195: 0.45
- p1360: 373
- p2929: 0.00163278; = p2343*(p1079+p1081)
- p1716: 0
- p1284: 0; = p1280*p1252/p0818
- p2473: 0.00050036; = p2277*p1014
- p2170: 0.00217204; = p2166*(p0913)
- p2718: 0.000244762; = p2327*(p1019+p1021)
- p2646: 9.49208e-5; = p2255*(p1019+p1021)
- p1823: 0
- p2224: 0.164296; = if(p0765*p0769+p0766*p0770+p0767*p0771+p0768*p0772=0;0;p0771*p0767/(p0765*p0769+p0766*p0770+p0767*p0771+p0768*p0772))
- p2370: 0.000105312; = p2225*p2199
- p0863: 0; = p0675*1000/p0856
- p3396: 0.000226924; = p3377*p1234
- p0526: 0; = SQRT(2)*(IF((2*p0394-1)<0;-1;IF((2*p0394-1)>0;1;0))*SQRT(SQRT((2/(pi()*0.140012289)+LN(1-(2*p0394-1)^2)/2)^2-LN(1-(2*p0394-1)^2)/0.140012289)-(2/(pi()*0.140012289)+LN(1-(2*p0394-1)^2)/2)))
- p0323: 0.5
- p0249: 32.906
- p3285: 0.275
- p1194: 1.48
- p3304: 0; = if(and(p1232=0;p3252<>0);p3260*p3289;0)
- p2642: 4.41839e-7; = p2251*(p1019+p1021)
- p1753: 0.92568
- p2904: 0.0002439; = p2318*(p1020+p1022)
- p0498: 0; = SQRT(2)*(IF((2*p0366-1)<0;-1;IF((2*p0366-1)>0;1;0))*SQRT(SQRT((2/(pi()*0.140012289)+LN(1-(2*p0366-1)^2)/2)^2-LN(1-(2*p0366-1)^2)/0.140012289)-(2/(pi()*0.140012289)+LN(1-(2*p0366-1)^2)/2)))
- p1069: 0.000301377; = IF(p1012=0;p1055/(p1062*p0818);0)
- p0908: 0.0022
- p1112: 0.209482
- p0999: 0; = IF(p0996=1;0;IF(p0996+p0997>1;1-p0996;p0997))
- p2505: 0.000116426; = p2309*p1073
- p2808: 0; = p2417*(p1078+p1080)
- p2849: 0.000138272; = p2263*(p1079+p1081)
- p0213: 4.656
- p1187: 0.0004647
- p1181: 0.000149271
- p1683: 0
- p1105: 0.436421
- p2668: 0.000327703; = p2277*(p1019+p1021)
- p2613: 0; = p2417*p1073
- p0985: 0; = IF(p0982=1;0;IF(p0982+p0983>1;1-p0982;p0983))
- p1549: 5
- p1695: 0
- p1329: 0.000868242; = p1328*p0001/(p0818*p0002)
- p1016: 0.16873; = IF(p1012=0;p0707/100;0)
- p4410: 0; = p1855*p3480
- p2841: 0.000242317; = p2255*(p1020+p1022)
- p1946: 0
- p0446: 0; = SQRT(2)*(IF((2*p0314-1)<0;-1;IF((2*p0314-1)>0;1;0))*SQRT(SQRT((2/(pi()*0.140012289)+LN(1-(2*p0314-1)^2)/2)^2-LN(1-(2*p0314-1)^2)/0.140012289)-(2/(pi()*0.140012289)+LN(1-(2*p0314-1)^2)/2)))
- p2589: 0; = p2393*p1014
- p2539: 0.00117591; = p2343*p1073
- p2829: 0.000276971; = p2243*(p1020+p1022)
- p2263: 0.000348091; = p2226*p2209
- p2292: 3.20107e-5; = p2223*p2199
- p5201: 1.10891e-7; = p1822*p3484
- p0932: 0; = p0801*p0926
- p2501: 3.03386e-6; = p2305*p1073
- p0770: 55.706; = p0110*(1+p0638*p0242/100)
- p2650: 0.000437999; = p2259*(p1078+p1080)
- p0726: 64.736; = p0066*(1+p0594*p0198/100)
- p0463: 0; = SQRT(2)*(IF((2*p0331-1)<0;-1;IF((2*p0331-1)>0;1;0))*SQRT(SQRT((2/(pi()*0.140012289)+LN(1-(2*p0331-1)^2)/2)^2-LN(1-(2*p0331-1)^2)/0.140012289)-(2/(pi()*0.140012289)+LN(1-(2*p0331-1)^2)/2)))
- p0396: 0.5
- p1624: 0
- p0840: 0.210331; = p0839*p0831
- p3038: 7.95567e-9; = p2257*p1023
- p0760: 12.455; = p0100*(1+p0628*p0232/100)
- p1657: 0
- p5302: 2.21782e-7; = p1923*p3484
- p2502: 3.17245e-5; = p2306*p1073
- p0938: 0; = p0932*p0001/(p0818*p0002)
- p1102: 0.0330733; = IF(p1071=0;IF(p1096+p1101=1;0;IF(p1096+p1101+p1098>1;1-(p1096+p1101);p1098));0)
- p0827: 9.3091e8; = p0818*p0819*p0823
- p3441: 0; = p3365*p1240
- p0764: 95.639; = p0104*(1+p0632*p0236/100)
- p1821: 3.79053e-5; = p1413*1000/p0818
- p2001: 400
- p0184: 22.503
- p2498: 0.000482611; = p2302*p1073
- p2031: 0.465411
- p0826: 0.084; = 1-p0825/p0818
- p2138: 4.42915e-7; = p2015*p2066*p2100/(p0818*1000)
- p0055: 7.547
- p3098: 1.40901e-9; = p2317*p1023
- p0104: 95.639
- p2600: 0; = p2404*p1014
- p2484: 0.000418444; = p2288*p1014
- p1876: 0
- p1765: 0
- p1503: 165
- p2451: 0.000144932; = p2255*p1014
- p2672: 3.35192e-5; = p2281*(p1019+p1021)
- p1270: 0; = IF(p1267=p1259;0;IF(p1267+p1268>p1259;p1259-p1267;p1268))
- p2590: 0; = p2394*p1014
- p0896: 0.516338
- p4631: 2.38738e-6; = p1870*p3481
- p0376: 0.5
- p1044: 0.00774783; = IF(p1012=0;IF(p1037=1;0;IF(p1037+p1038>1;1-p1037;p1038));0)
- p1643: 0
- p0889: 0; = 1000*p0888*p0001*p0003*p0004/(p0818*p0002)
- p2735: 1.44727e-6; = p2344*(p1078+p1080)
- p1186: 1.01194e-7; = p1182*p1185/p0818
- p1413: 26
- p3964: 2.11971e-5; = p1821*p3478
- p1694: 0
- p0903: 0.0175
- p4117: 3.94496e-5; = p1768*p3479
- p2479: 0.000147234; = p2283*p1014
- p0971: 0; = p0968/p0818
- p2278: 0.000157763; = p2223*p2184
- p1593: 0
- p2344: 4.56998e-6; = p2228*p2212
- p2379: 0.000624786; = p2229*p2208
- p2557: 0.000484382; = p2361*p1014
- p0904: 7.87737e7; = p0825*p0901+(p0830+p0895)*p0824*p0903
- p4461: 0; = p1906*p3480
- p1320: 0.0234807; = IF(((p0745*1000*p0747/100)+(p0754*1000*p0756/100))/p0801<0;0;((p0745*1000*p0747/100)+(p0754*1000*p0756/100))/p0801)
- p0330: 0.5
- p1797: 0
- p1319: 0.717759; = IF(((p0745*1000*p0746/100)+(p0754*1000*p0755/100))/p0801<0;0;((p0745*1000*p0746/100)+(p0754*1000*p0755/100))/p0801)
- p0375: 0.5
- p4456: 0; = p1901*p3480
- p3277: 0.55
- p0012: 376.435
- p2493: 0.00212018; = p2297*p1073
- p2059: 1.00168
- p4878: 0; = p1911*p3482
- p3205: 0; = p2424*p1082
- p1684: 0
- p2299: 0.00217054; = p2227*p2206
- p0780: 36.102; = p0120*(1+p0648*p0252/100)
- p0387: 0.5
- p1733: 0
- p0507: 0; = SQRT(2)*(IF((2*p0375-1)<0;-1;IF((2*p0375-1)>0;1;0))*SQRT(SQRT((2/(pi()*0.140012289)+LN(1-(2*p0375-1)^2)/2)^2-LN(1-(2*p0375-1)^2)/0.140012289)-(2/(pi()*0.140012289)+LN(1-(2*p0375-1)^2)/2)))
- p1954: 0
- p4640: 5.85993e-6; = p1879*p3481
- p2957: 0.00734902; = p2371*(p1020+p1022)
- p2994: 0; = p2408*(p1020+p1022)
- p1578: 0
- p0800: 90.432; = p0140*(1+p0668*p0272/100)
- p2974: 0.000242659; = p2388*(p1079+p1081)
- p1045: 0.058101; = IF(p1012=0;IF(p1037+p1044=1;0;IF(p1037+p1044+p1039>1;1-(p1037+p1044);p1039));0)
- p1046: 0.024056; = IF(p1012=0;IF(p1037+p1044+p1045=1;0;IF(p1037+p1044+p1045+p1040>1;1-(p1037+p1044+p1045);p1040));0)
- p0698: 0
- p2273: 0.0214756; = p2230*p2219
- p2258: 0.00152921; = p2226*p2204
- p2171: 0.209409; = p2165*p0831
- p2958: 0.0031507; = p2372*(p1020+p1022)
- p1780: 5.68579e-5; = p1372*1000/p0818
- p1214: 15; = IF(p1213=0;0;p1213-1)
- p0024: 71.13
- p1955: 0.000109342; = p1547*1000/p0818
- p2843: 0.000399812; = p2257*(p1020+p1022)
- p5211: 2.90534e-5; = p1832*p3484
- p2455: 0.000395664; = p2259*p1073
- p1928: 0
- p1011: 0; = p1010*p0001*p0004/(p0818*p0002)
- p1206: 0.00953
- p0850: 0
- p2465: 0.000166161; = p2269*p1073
- p4684: 1.30221e-6; = p1923*p3481
- p1184: 2.02388e-7; = p1182/p0818
- p0815: 0
- p2875: 0.00691568; = p2289*(p1020+p1022)
- p0390: 0.5
- p0273: 0.5
- p4655: 8.94183e-5; = p1894*p3481
- p2011: 0.00337254
- p1779: 0
- p3037: 6.93957e-10; = p2256*p1023
- p2612: 0; = p2416*p1073
- p1963f: 0.000390283; = p1647*p1851+p1648*p1852+p1649*p1853+p1650*p1854+p1651*p1855+p1652*p1856+p1653*p1857+p1654*p1858+p1655*p1859+p1656*p1860+p1657*p1861+p1658*p1862+p1659*p1863+p1660*p1864+p1661*p1865+p1662*p1866+p1663*p1867+p1664*p1868+p1665*p1869+p1666*p1870
- p2327: 0.00124333; = p2224*p2195
- p2492: 0.000945104; = p2296*p1014
- p3526: 4.78623e-7; = p1795*p3476
- p0237: 33.961
- p3634: 4.02043e-5; = p1903*p3476
- p0067: 35.264
- p1855: 0.00125525; = p1447*1000/p0818
- p0988: 0; = p0982*p0886
- p4926: 0; = p1963*p3482
- p2509: 0.000464459; = p2313*p1123
- p0595: 0; = IF(p0331<0.5;-SQRT(p0007*EXP(p0463^2*p0008)-p0007);SQRT(p0007*EXP(p0463^2*p0008)-p0007))
- p1291: 0; = IF(p1287+p1290=p1264;0;IF(p1287+p1290+p1289>p1264;p1264-(p1287+p1290);p1289))
- p3274: 0.0768939
- p2816: 0; = p2425*(p1078+p1080)
- p2594: 0; = p2398*p1014
- p3673: 1.43587e-6; = p1942*p3476
- p3059: 1.57763e-9; = p2278*p1023
- p2331: 2.85893e-5; = p2224*p2199
- p2026: 73.06
- p1489: 53
- p1232: 0
- p4243: 4.35743e-5; = p1894*p3479
- p0379: 0.5
- p2609: 0; = p2413*p1014
- p0525: 0; = SQRT(2)*(IF((2*p0393-1)<0;-1;IF((2*p0393-1)>0;1;0))*SQRT(SQRT((2/(pi()*0.140012289)+LN(1-(2*p0393-1)^2)/2)^2-LN(1-(2*p0393-1)^2)/0.140012289)-(2/(pi()*0.140012289)+LN(1-(2*p0393-1)^2)/2)))
- p2698: 0.000236226; = p2307*(p1078+p1080)
- p2256: 6.93957e-5; = p2222*p2202
- p3364: 0; = if(p1232=0;p3244*p3358/p0818;0)
- p2051: 0.000140317; = p2015*p2049*p2050/(p0818*1000)
- p0230: 36.039
- p3479: 0.0725449; = if(p1328+p1330+p1332+p1334+p1336+p1338+p1340+p1342+p1344=0;0;p1334/(p1328+p1330+p1332+p1334+p1336+p1338+p1340+p1342+p1344))
- p1822: 4.37369e-6; = p1414*1000/p0818
- p2212: 1.91392e-5; = p1106/p0818
- p1142: 0; = if(p1121=0;p1136*p0001/(p0818*p0002);0)
- p2926: 0.000638583; = p2340*(p1079+p1081)
- p0485: 0; = SQRT(2)*(IF((2*p0353-1)<0;-1;IF((2*p0353-1)>0;1;0))*SQRT(SQRT((2/(pi()*0.140012289)+LN(1-(2*p0353-1)^2)/2)^2-LN(1-(2*p0353-1)^2)/0.140012289)-(2/(pi()*0.140012289)+LN(1-(2*p0353-1)^2)/2)))
- p1056: 1.65739e7; = IF(p1012=0;p1049*p1036;0)
- p3428: 0; = p3371*p1239
- p0670: 37.555; = p0010*(1+p0538*p0142/100)
- p2238: 0.000421192; = p2222*p2183
- p2490: 0.000572805; = p2294*p1014
- p3260: 0.0343561
- p1916: 0
- p3553: 4.78623e-7; = p1822*p3476
- p4667: 7.59621e-6; = p1906*p3481
- p0522: 0; = SQRT(2)*(IF((2*p0390-1)<0;-1;IF((2*p0390-1)>0;1;0))*SQRT(SQRT((2/(pi()*0.140012289)+LN(1-(2*p0390-1)^2)/2)^2-LN(1-(2*p0390-1)^2)/0.140012289)-(2/(pi()*0.140012289)+LN(1-(2*p0390-1)^2)/2)))
- p0797: 47.091; = p0137*(1+p0665*p0269/100)
- p2619: 0; = p2423*p1073
- p2495: 0.000620948; = p2299*p1073
- p0121: 10.181
- p0098: 2.04
- p0587: 0; = IF(p0323<0.5;-SQRT(p0007*EXP(p0455^2*p0008)-p0007);SQRT(p0007*EXP(p0455^2*p0008)-p0007))
- p2424: 0; = p2235*p2214
- p1267: 0
- p2786: 0; = p2395*(p1019+p1021)
- p0313: 0.5
- p2194: 0.214362
- p2253: 8.09939e-6; = p2222*p2199
- p1000: 0; = IF(p0996+p0999=1;0;IF(p0996+p0999+p0998>1;1-(p0996+p0999);p0998))
- p0482: 0; = SQRT(2)*(IF((2*p0350-1)<0;-1;IF((2*p0350-1)>0;1;0))*SQRT(SQRT((2/(pi()*0.140012289)+LN(1-(2*p0350-1)^2)/2)^2-LN(1-(2*p0350-1)^2)/0.140012289)-(2/(pi()*0.140012289)+LN(1-(2*p0350-1)^2)/2)))
- p1854: 0
- p3535: 2.39311e-6; = p1804*p3476
- p1346: 9
- p2152: 1.1936e-7; = p2015*p2080*p2114/(p0818*1000)
- p1870: 1.60369e-5; = p1462*1000/p0818
- p5130: 5.90507e-7; = p1957*p3483
- p1259: 0; = if(p1232>0;0;p0730/100)
- p1163: 0.00430777
- p0660: 0; = IF(p0396<0.5;-SQRT(p0007*EXP(p0528^2*p0008)-p0007);SQRT(p0007*EXP(p0528^2*p0008)-p0007))
- p3741: 7.82882e-8; = p1804*p3477
- p3077: 3.14427e-8; = p2296*p1023
- p1963d: 2.1735e-5; = p1608*p1812+p1609*p1813+p1610*p1814+p1611*p1815+p1612*p1816+p1613*p1817+p1614*p1818+p1615*p1819+p1616*p1820+p1617*p1821+p1618*p1822+p1619*p1823+p1620*p1824+p1621*p1825+p1622*p1826+p1623*p1827+p1624*p1828+p1625*p1829+p1626*p1830+p1627*p1831
- p0500: 0; = SQRT(2)*(IF((2*p0368-1)<0;-1;IF((2*p0368-1)>0;1;0))*SQRT(SQRT((2/(pi()*0.140012289)+LN(1-(2*p0368-1)^2)/2)^2-LN(1-(2*p0368-1)^2)/0.140012289)-(2/(pi()*0.140012289)+LN(1-(2*p0368-1)^2)/2)))
- p2073: 0.377647
- p3022: 2.9934e-9; = p2241*p1023
- p4103: 9.51866e-7; = p1754*p3479
- p0939: 0.00120966; = p0933*p0001/(p0818*p0002)
- p0743: 0.562; = p0083*(1+p0611*p0215/100)
- p1591: 0.677771
- p1773: 0
- p3393: 0.00110115; = p3374*p1234
- p5096: 7.08608e-7; = p1923*p3483
- p2627: 0; = p2431*p1123
- p1607: 0
- p3792: 4.49374e-6; = p1855*p3477
- p1169: 0.000514124
- p0236: 1.677
- p2932: 0.000127686; = p2346*(p1079+p1081)
- p4246: 5.60544e-6; = p1897*p3479
- p2704: 0.00183343; = p2313*(p1128+p1130)
- p2644: 1.59445e-6; = p2253*(p1019+p1021)
- p0154: 0
- p3410: 0.00355326; = p3372*p1238
- p1058: 0.225
- p0082: 98.395
- p1040: 0.024056
- p2160: 4.1099e-7; = p2015*p2084*p2122/(p0818*1000)
- p1398: 5
- p2443: 8.67789e-5; = p2247*p1014
- p1635: 0
- p2930: 1.81534e-6; = p2344*(p1079+p1081)
- p2910: 6.32841e-5; = p2324*(p1020+p1022)
- p2828: 2.16508e-5; = p2242*(p1020+p1022)
- p0785: 59.36; = p0125*(1+p0653*p0257/100)
- p4255: 3.7017e-6; = p1906*p3479
- p1963a: 0.000480586; = p1550*p1754+p1551*p1755+p1552*p1756+p1553*p1757+p1554*p1758+p1555*p1759+p1556*p1760+p1557*p1761+p1558*p1762+p1559*p1763+p1560*p1764+p1561*p1765+p1562*p1766+p1563*p1767+p1564*p1768+p1565*p1769+p1566*p1770+p1567*p1771+p1568*p1772
- p3744: 1.56576e-8; = p1807*p3477
- p1859: 0
- p4897: 0; = p1930*p3482
- p3244: 0; = p0791/100
- p3483: 0.0810081; = if(p1328+p1330+p1332+p1334+p1336+p1338+p1340+p1342+p1344=0;0;p1342/(p1328+p1330+p1332+p1334+p1336+p1338+p1340+p1342+p1344))
- p5005: 9.28277e-5; = p1832*p3483
- p4309: 0; = p1754*p3480
- p2903: 7.08096e-5; = p2317*(p1020+p1022)
- p2367: 0.0452727; = p2225*p2196
- p0802: 925000
- p0725: 5.995; = p0065*(1+p0593*p0197/100)
- p1322: 0.475817; = IF(((p0745*1000*p0749/100)+(p0754*1000*p0758/100))/p0801<0;0;((p0745*1000*p0749/100)+(p0754*1000*p0758/100))/p0801)
- p2071: 0.151
- p2661: 2.65938e-5; = p2270*(p1078+p1080)
- p4152: 5.39391e-6; = p1803*p3479
- p0519: 0; = SQRT(2)*(IF((2*p0387-1)<0;-1;IF((2*p0387-1)>0;1;0))*SQRT(SQRT((2/(pi()*0.140012289)+LN(1-(2*p0387-1)^2)/2)^2-LN(1-(2*p0387-1)^2)/0.140012289)-(2/(pi()*0.140012289)+LN(1-(2*p0387-1)^2)/2)))
- p2869: 0.000246165; = p2283*(p1020+p1022)
- p2972: 0.000187268; = p2386*(p1079+p1081)
- p2868: 0.00109465; = p2282*(p1020+p1022)
- p2186: 0.00643116; = p1052/p0818
- p5183: 5.54454e-7; = p1804*p3484
- p1007: 0; = p1003*p0001*p0004/(p0818*p0002)
- p2790: 0; = p2399*(p1019+p1021)
- p3482: 0; = if(p1328+p1330+p1332+p1334+p1336+p1338+p1340+p1342+p1344=0;0;p1340/(p1328+p1330+p1332+p1334+p1336+p1338+p1340+p1342+p1344))
- p0656: 0; = IF(p0392<0.5;-SQRT(p0007*EXP(p0524^2*p0008)-p0007);SQRT(p0007*EXP(p0524^2*p0008)-p0007))
- p2418: 0; = p2235*p2208
- p1636: 0
- p1145: 9.84721e7; = if(p1121=0;p0799*p0702*1000*p0800/100;0)
- p3078: 0; = p2297*p1082
- p0808: 508000
- p3237: 0.854735
- p4272: 6.34578e-7; = p1923*p3479
- p2641: 0.000685441; = p2250*(p1019+p1021)
- p0855: 5.30195; = p0854*p0001*p0003/(p0818*p0002)
- p2149: 2.112e-7; = p2015*p2077*p2111/(p0818*1000)
- p2159: 1.0251e-5; = p2015*p2083*p2121/(p0818*1000)
- p0745: 3554.69; = p0085*(1+p0613*p0217/100)
- p1447: 861
- p1135: 390585; = if(p1121=0;p1129*(p0716/100)*p0703*1000;0)
- p0388: 0.5
- p1567: 0
- p0831: 0.1385; = 1-p0824
- p0851: 0
- p1913: 0
- p1939: 0
- p3207: 0; = p2426*p1082
- p2264: 0.000150294; = p2226*p2210
- p0992: 0; = p0988*p0001*p0004/(p0818*p0002)
- p0398: 0.5
- p0716: 90.432; = p0056*(1+p0584*p0188/100)
- p1688: 0
- p4022: 2.20124e-5; = p1879*p3478
- p2035: 1.89811e-5; = p2015*p2029*(1-p2031)/(p0818*1000)
- p1724: 0
- p1143: 0.000169469; = if(p1121=0;p1137*p0001/(p0818*p0002);0)
- p2678: 0.00127846; = p2287*(p1019+p1021)
- p0186: 59.456
- p1919: 0
- p2277: 0.00166465; = p2223*p2183
- p1755: 0
- p1572: 0
- p2148: 2.79963e-7; = p2015*p2076*p2110/(p0818*1000)
- p1802: 0.000185153; = p1394*1000/p0818
- p1812: 0
- p1280: 0; = IF(p1277=p1263;0;IF(p1277+p1278>p1263;p1263-p1277;p1278))
- p3446: 0; = p3370*p1240
- p2105: 0.888194
- p1839: 0
- p2549: 6.71857e-5; = p2353*p1123
- p1052: 4.41126e6; = IF(p1012=0;p1045*p1036;0)
- p1002: 0; = p0996*p0888
- p0320: 0.5
- p2016: 0.000922155; = (p2014-p2015)/(p0818)
- p1063: 0.455
- p3476: 0.109432; = if(p1328+p1330+p1332+p1334+p1336+p1338+p1340+p1342+p1344=0;0;p1328/(p1328+p1330+p1332+p1334+p1336+p1338+p1340+p1342+p1344))
- p3070: 1.37612e-7; = p2289*p1023
- p2191: 0.000766457; = 8*1.00794*p2189/(2*14.0067)
- p2657: 6.92986e-7; = p2266*(p1078+p1080)
- p2656: 0.000623298; = p2265*(p1078+p1080)
- p1020: 0.16873; = IF(p1012=0;IF(p1014+p1019=1;0;IF(p1014+p1019+p1016>1;1-(p1014+p1019);p1016));0)
- p0593: 0; = IF(p0329<0.5;-SQRT(p0007*EXP(p0461^2*p0008)-p0007);SQRT(p0007*EXP(p0461^2*p0008)-p0007))
- p2588: 0.000184052; = p2392*p1123
- p3272: 0.0398246
- p2296: 0.00314427; = p2223*p2203
- p0477: 0; = SQRT(2)*(IF((2*p0345-1)<0;-1;IF((2*p0345-1)>0;1;0))*SQRT(SQRT((2/(pi()*0.140012289)+LN(1-(2*p0345-1)^2)/2)^2-LN(1-(2*p0345-1)^2)/0.140012289)-(2/(pi()*0.140012289)+LN(1-(2*p0345-1)^2)/2)))
- p3329: 920679; = if(and(p1232=0;p3255<>0);p3255*(p3266-p3324)/p3327;0)
- p3816: 1.40919e-7; = p1879*p3477
- p3454: 0; = p3378*p1240
- p0756: 0.858; = p0096*(1+p0624*p0228/100)
- p1672: 0
- p3351: 423752; = if(and(p1232=0;p3256<>0);p3256*(p3274-p3346)/p3349;0)
- p1255: 0; = if(p1232>0;0;p0737/100)
- p2220: 0.00955654; = p1151/p0818
- p2080: 0.025
- p1306: 0.185186; = p1302*p1252/p0818
- p1947: 0
- p1569: 0
- p3234: 0.39606; = 1-p3233
- p3111: 1.30034e-10; = p2330*p1023
- p2564: 8.77183e-6; = p2368*p1014
- p1343: 0.000642723; = p1342*p0001/(p0818*p0002)
- p2132: 1.44127e-6; = p2015*p2060*p2094/(p0818*1000)
- p1137: 130290; = if(p1121=0;p1131*(p0716/100)*p0703*1000;0)
- p1840: 0
- p2763: 0.0012342; = p2372*(p1019+p1021)
- p1330: 21837.1; = p1320*p0801
- p2435: 1.19983e-5; = p2239*p1014
- p0260: 6.336
- p3309: 0; = if(and(p1232=0;p3252<>0);p3252*(p3260-p3304)/p3305;0)
- p3029: 1.64319e-8; = p2248*p1023
- p1705: 0
- p0883: 0.00459149; = p0882*p0001*p0003/(p0818*p0002)
- p4506: 0; = p1951*p3480
- p0636: 0; = IF(p0372<0.5;-SQRT(p0007*EXP(p0504^2*p0008)-p0007);SQRT(p0007*EXP(p0504^2*p0008)-p0007))

- p2226: 0.114331; = if(p0774*p0778+p0775*p0779+p0776*p0780+p0777*p0781=0;0;p0778*p0774/(p0774*p0778+p0775*p0779+p0776*p0780+p0777*p0781))
- p3090: 0; = p2309*p1082
- p2366: 0.00457992; = p2225*p2195
- p0857: 12.0966; = p0856*p0001*p0003/(p0818*p0002)
- p0589: 0; = IF(p0325<0.5;-SQRT(p0007*EXP(p0457^2*p0008)-p0007);SQRT(p0007*EXP(p0457^2*p0008)-p0007))
- p0652: 0; = IF(p0388<0.5;-SQRT(p0007*EXP(p0520^2*p0008)-p0007);SQRT(p0007*EXP(p0520^2*p0008)-p0007))
- p4770: 0; = p1803*p3482
- p1107: 923386; = IF(p1071=0;p1105*p1101*p1095;0)
- p3275: 0.0214527
- p4155: 5.28815e-7; = p1806*p3479
- p1784: 0
- p2221: 0.0166068; = p1155-p2220
- p1128: 0.29219; = if(p1121=0;IF(p1123=1;0;IF(p1123+p1124>1;1-p1123;p1124));0)
- p0405: 0; = SQRT(2)*(IF((2*p0273-1)<0;-1;IF((2*p0273-1)>0;1;0))*SQRT(SQRT((2/(pi()*0.140012289)+LN(1-(2*p0273-1)^2)/2)^2-LN(1-(2*p0273-1)^2)/0.140012289)-(2/(pi()*0.140012289)+LN(1-(2*p0273-1)^2)/2)))
- p3892: 3.91441e-7; = p1955*p3477
- p3894: 2.60961e-8; = p1957*p3477
- p2457: 0.00106382; = p2261*p1073
- p3360: 8.93193e6; = if(p1232=0;p3310+p3321+p3332+p3343+p3354;0)
- p1663: 0
- p0687: 0
- p0119: 57.439
- p3035: 1.12467e-8; = p2254*p1023
- p1596: 0
- p1668: 0
- p3296: 0.514
- p3221: 0.146975; = IF(p3216=0;0;p1223*12.0107/100.0869+(1-p1224)*12.0107/84.3139)
- p2332: 0.00396989; = p2224*p2200
- p2654: 0.000110237; = p2263*(p1078+p1080)
- p0875: 4.89631; = p0874*p0001*p0003/(p0818*p0002)
- p3085: 0; = p2304*p1082
- p2559: 0.000139427; = p2363*p1014
- p0136: 95.639
- p5070: 6.25937e-6; = p1897*p3483
- p1043: 0.218296
- p3325: 0.000853147; = if(and(p1232=0;p3255<>0);p3267*p3289;0)
- p3043: 0; = p2262*p1082
- p1041: 0.318938
- p1085: 238488; = IF(p1071=0;p1079*(p0710/100)*p0703*1000;0)
- p2726: 0.000552823; = p2335*(p1019+p1021)
- p1960: 0; = IF(p1959-p1958<0;0;p1959-p1958)
- p2374: 0.0103443; = p2225*p2203
- p0634: 0; = IF(p0370<0.5;-SQRT(p0007*EXP(p0502^2*p0008)-p0007);SQRT(p0007*EXP(p0502^2*p0008)-p0007))
- p4478: 0; = p1923*p3480
- p2436: 4.13276e-5; = p2240*p1014
- p0739: 5.148; = p0079*(1+p0607*p0211/100)
- p0849: 0
- p4449: 0; = p1894*p3480
- p2881: 0.000137833; = p2295*(p1020+p1022)
- p3013: 0; = p2427*(p1079+p1081)
- p0515: 0; = SQRT(2)*(IF((2*p0383-1)<0;-1;IF((2*p0383-1)>0;1;0))*SQRT(SQRT((2/(pi()*0.140012289)+LN(1-(2*p0383-1)^2)/2)^2-LN(1-(2*p0383-1)^2)/0.140012289)-(2/(pi()*0.140012289)+LN(1-(2*p0383-1)^2)/2)))
- p3062: 1.70269e-9; = p2281*p1023
- p3433: 0; = p3376*p1239
- p2316: 0.00148673; = p2224*p2183
- p2527: 8.59338e-6; = p2331*p1014
- p1660: 0
- p2248: 0.00164319; = p2222*p2193
- p1962: 0; = p1960*1000/p0818
- p0922: 0; = p0677*1000/p0801
- p2778: 2.15855e-5; = p2387*(p1078+p1080)
- p3998: 0.00070195; = p1855*p3478
- p2506: 0.00104347; = p2310*p1073
- p0107: 33.211
- p3538: 4.78623e-7; = p1807*p3476
- p1325: 0; = IF(((p0745*1000*p0752/100)+(p0754*1000*p0761/100))/p0801<0;0;((p0745*1000*p0752/100)+(p0754*1000*p0761/100))/p0801)
- p0733: 73.05; = p0073*(1+p0601*p0205/100)
- p3231: 1.84807e-7; = p1176/p0818
- p0893: 0.221918; = 1000*(p0890+p0892)*p0001*p0003*p0004/(p0818*p0002)
- p0967: 7.87136e6; = (p0684/100)*p0683*p0682*1000
- p0288: 0.5
- p2710: 0.000208005; = p2319*(p1019+p1021)
- p1223: 0.56
- p1849: 0
- p1059: 0.335
- p2892: 4.40504e-5; = p2306*(p1079+p1081)
- p0132: 77.379
- p0710: 79.745; = p0050*(1+p0578*p0182/100)
- p3362: 0; = if(p1232=0;p3244*p3356/p0818;0)
- p3276: 0.0887032
- p3342: 0; = if(and(p1232=0;p3254<>0);p3254*(p3272-p3337)/p3338;0)
- p4433: 0; = p1878*p3480
- p3387: 0.00376668; = p3368*p1234
- p3313: 0; = if(and(p1232=0;p3253<>0);p3262*(p3278*(p3282*p1256+p3286*(p1253+p1257)+p1258*p3288+p3298*p3287));0)
- p2230: 0.139019; = if(p0783*p0787+p0784*p0788+p0785*p0789+p0786*p0790=0;0;p0787*p0783/(p0783*p0787+p0784*p0788+p0785*p0789+p0786*p0790))
- p3831: 2.15032e-6; = p1894*p3477
- p3372: 0.0100762; = if(p1232=0;p3245*p3360/p0818;0)
- p3024: 5.51131e-9; = p2243*p1023
- p2956: 5.29243e-5; = p2370*(p1020+p1022)
- p3114: 1.70198e-8; = p2333*p1023
- p2237: 0.00191876; = p2222*p2182
- p1998: 211
- p2773: 0.000505913; = p2382*(p1078+p1080)
- p1146: 0.919813
- p3354: 2.43427e6; = IF((p3350+p3351+p3352+p3353)+IF(p3349=0;0;(p3256*(p3273*(1-p3277))/p3349))>p3256;p3256-(p3350+p3351+p3352+p3353);IF(p3349=0;0;p3256*(p3273*(1-p3277))/p3349))
- p2812: 0; = p2421*(p1078+p1080)
- p2129: 7.06943e-6; = p2015*p2057*p2091/(p0818*1000)
- p1179: 0.5
- p0691: 0
- p3429: 0; = p3372*p1239
- p0801: 930000
- p0043: 929.459
- p0086: 15.283
- p0083: 0.562
- p1584: 0
- p1804: 2.18684e-5; = p1396*1000/p0818
- p2243: 0.000551131; = p2222*p2188
- p4712: 3.62448e-5; = p1951*p3481
- p0400: 0.5
- p0794: 0.05; = p0134*(1+p0662*p0266/100)
- p2762: 0.00287877; = p2371*(p1019+p1021)
- p0366: 0.5
- p0317: 0.5
- p0552: 0; = IF(p0288<0.5;-SQRT(p0007*EXP(p0420^2*p0008)-p0007);SQRT(p0007*EXP(p0420^2*p0008)-p0007))
- p0540: 0; = IF(p0276<0.5;-SQRT(p0007*EXP(p0408^2*p0008)-p0007);SQRT(p0007*EXP(p0408^2*p0008)-p0007))
- p0533: 0; = SQRT(2)*(IF((2*p0401-1)<0;-1;IF((2*p0401-1)>0;1;0))*SQRT(SQRT((2/(pi()*0.140012289)+LN(1-(2*p0401-1)^2)/2)^2-LN(1-(2*p0401-1)^2)/0.140012289)-(2/(pi()*0.140012289)+LN(1-(2*p0401-1)^2)/2)))
- p2500: 0.00272876; = p2304*p1073
- p2616: 0; = p2420*p1073
- p0954: 0; = if(and(p0683>0;or(p0807=56;p0807=100;and(p0807=60;p0901>0.06)));p0936;0)
- p4771: 0; = p1804*p3482
- p2633: 8.48109e-6; = p2242*(p1019+p1021)
- p2116: 0.444424
- p3152: 1.46235e-7; = p2371*p1023
- p2702: 0.0210309; = p2311*(p1128+p1130)
- p1588: 0
- p2621: 0; = p2425*p1073
- p1936: 0
- p0736: 0
- p2429: 0; = p2236*p2219
- p1898: 0
- p3319: 0; = if(and(p1232=0;p3253<>0);p3253*(p3263-p3314)/p3316;0)
- p3128: 0; = p2347*p1082
- p2173: 0.247331; = p0895*p0898/p0818
- p5334: 2.77227e-6; = p1955*p3484
- p2298: 0.0067028; = p2227*p2205
- p0235: 0
- p2184: 0.000857601; = p1051/p0818
- p0014: 197.198
- p3125: 0; = p2344*p1082
- p0941: 0; = if(and(p0683=0;p0947=0);p0935;0)
- p2375: 0.00124122; = p2229*p2204
- p0853: 0; = p0803/(p0802+p0803)
- p2836: 0.00174981; = p2250*(p1020+p1022)
- p1225: 1.088; = IF(p1221=0;0;p1223+1.2*p1224)
- p0116: 31.051
- p0352: 0.5
- p0965: 0; = IF(p0684/100=1;0;IF(p0684/100+p0685/100>1;1-p0684/100;p0685/100))
- p2178: 0.0877082; = (p0895*p0831/(1-p0831))/(p0818)
- p2466: 2.40234e-5; = p2270*p1073
- p2021: 0.000148687; = p2020/p0818
- p0476: 0; = SQRT(2)*(IF((2*p0344-1)<0;-1;IF((2*p0344-1)>0;1;0))*SQRT(SQRT((2/(pi()*0.140012289)+LN(1-(2*p0344-1)^2)/2)^2-LN(1-(2*p0344-1)^2)/0.140012289)-(2/(pi()*0.140012289)+LN(1-(2*p0344-1)^2)/2)))
- p0534: 0; = SQRT(2)*(IF((2*p0402-1)<0;-1;IF((2*p0402-1)>0;1;0))*SQRT(SQRT((2/(pi()*0.140012289)+LN(1-(2*p0402-1)^2)/2)^2-LN(1-(2*p0402-1)^2)/0.140012289)-(2/(pi()*0.140012289)+LN(1-(2*p0402-1)^2)/2)))
- p0866: 0.245639; = IF(p0858+p0864+p0865=1;0;IF(p0858+p0864+p0865+p0861>1;1-(p0858+p0864+p0865);p0861))
- p0380: 0.5
- p0047: 16.873
- p0825: 6.28303e8; = p0818*p0822
- p2944: 0.001956; = p2358*(p1020+p1022)
- p3004: 0; = p2418*(p1079+p1081)
- p2392: 0.00248651; = p2233*p2221
- p3830: 4.1284e-6; = p1893*p3477
- p3026: 1.41863e-9; = p2245*p1023
- p1093: 7.27591e-5; = IF(p1071=0;p1087*p0001/(p0818*p0002);0)
- p3610: 4.30761e-6; = p1879*p3476
- p1649: 0
- p2872: 0.000573424; = p2286*(p1020+p1022)
- p1743: 0
- p4358: 0; = p1803*p3480
- p0551: 0; = IF(p0287<0.5;-SQRT(p0007*EXP(p0419^2*p0008)-p0007);SQRT(p0007*EXP(p0419^2*p0008)-p0007))
- p2302: 0.00168698; = p2227*p2209
- p0692: 0
- p1942: 1.31211e-5; = p1534*1000/p0818
- p0001: 0.404686
- p1060: 0.21
- p1814: 0
- p2951: 0.0107372; = p2365*(p1020+p1022)
- p2922: 0.00126863; = p2336*(p1079+p1081)
- p5224: 1.22349e-5; = p1845*p3484
- p1646: 0
- p0583: 0; = IF(p0319<0.5;-SQRT(p0007*EXP(p0451^2*p0008)-p0007);SQRT(p0007*EXP(p0451^2*p0008)-p0007))
- p3265: 0.696292
- p0189: 22.143
- p4510: 0; = p1955*p3480
- p0923: 0; = IF(p0918=1;0;IF(p0918+p0919>1;1-p0918;p0919))
- p0803: 0
- p2573: 0.000103996; = p2377*p1073
- p3218: 0.0284861; = p3214*p1228
- p2261: 0.00371862; = p2226*p2207
- p1336: 0; = p1323*p0801
- p1562: 0
- p2390: 0.02313; = p2233*p2219
- p2324: 0.000125926; = p2224*p2191
- p2304: 0.00953846; = p2227*p2211
- p3262: 0.0787162
- p2050: 0.952062
- p2368: 2.9183e-5; = p2225*p2197
- p0945: 0; = if(and(p0683=0;p0951=0);p0939;0)
- p2347: 0.00121301; = p2228*p2215
- p1006: 0; = p1002*p0001*p0004/(p0818*p0002)
- p2622: 0; = p2426*p1073
- p2225: 0.605201; = if(p0765*p0769+p0766*p0770+p0767*p0771+p0768*p0772=0;0;p0772*p0768/(p0765*p0769+p0766*p0770+p0767*p0771+p0768*p0772))
- p0256: 6.393
- p3389: 0.000352325; = p3370*p1234
- p0816: 0
- p1664: 0
- p0928: 0; = p0801*p0918
- p4111: 4.23052e-6; = p1762*p3479
- p2109: 0.826583
- p0847: 0
- p3335: 0; = IF(or(p3254=0;p1232>0);0;p3270*(p3280*(p3283*p1256+p3286*(p1253+p1257)+p1258*p3288+p3300*p3287)))
- p3215: 0.450791; = p1222*3*15.9994/100.0869
- p2819: 0; = p2428*(p1128+p1130)
- p1138: 11843; = if(p1121=0;p1132*(p0716/100)*p0703*1000;0)
- p0582: 0; = IF(p0318<0.5;-SQRT(p0007*EXP(p0450^2*p0008)-p0007);SQRT(p0007*EXP(p0450^2*p0008)-p0007))
- p0787: 15.35; = p0127*(1+p0655*p0259/100)
- p0096: 0.858
- p2376: 0.00112259; = p2229*p2205
- p0449: 0; = SQRT(2)*(IF((2*p0317-1)<0;-1;IF((2*p0317-1)>0;1;0))*SQRT(SQRT((2/(pi()*0.140012289)+LN(1-(2*p0317-1)^2)/2)^2-LN(1-(2*p0317-1)^2)/0.140012289)-(2/(pi()*0.140012289)+LN(1-(2*p0317-1)^2)/2)))
- p2942: 0.000260834; = p2356*(p1020+p1022)
- p0050: 79.745
- p1921: 0
- p0316: 0.5
- p1754: 1.31211e-5; = p1346*1000/p0818
- p3407: 0.000534835; = p3369*p1238
- p2076: 0.057
- p3475: 0; = p3380*p1241
- p0873: 1.17083; = p0872*p0001*p0003/(p0818*p0002)
- p1197: 1.806
- p3471: 0; = p3376*p1241
- p1326: 0.531326; = IF(((p0745*1000*p0753/100)+(p0754*1000*p0762/100))/p0801<0;0;((p0745*1000*p0753/100)+(p0754*1000*p0762/100))/p0801)
- p2742: 0.00246705; = p2351*(p1128+p1130)
- p2069: 0.190588
- p0856: 930000; = p0801
- p0348: 0.5
- p3178: 0; = p2397*p1023
- p2067: 0.446471
- p0344: 0.5
- p1902: 2.47842e-5; = p1494*1000/p0818
- p0969: 3.1948e6; = p0966*p0683*p0682*1000
- p2054: 0.91
- p1945: 0
- p1182: 138.822; = p1181*p0801
- p0871: 0.48848; = p0870*p0001*p0003/(p0818*p0002)
- p2925: 0.00308495; = p2339*(p1079+p1081)
- p1140: 0.000319446; = if(p1121=0;p1134*p0001/(p0818*p0002);0)
- p3338: 0; = if(and(p1232=0;p3254<>0);1-(p3334+p3335+p3336+p3337);0)
- p3257: 0.849747
- p1882: 0
- p2787: 0; = p2396*(p1019+p1021)
- p2851: 0.000781813; = p2265*(p1079+p1081)
- p3815: 5.21921e-9; = p1878*p3477
- p2711: 2.99367e-5; = p2320*(p1019+p1021)
- p1895: 0
- p2101: 0.620397
- p1556: 0
- p5276: 1.95907e-6; = p1897*p3484
- p4357: 0; = p1802*p3480
- p3988: 0.000269855; = p1845*p3478
- p0271: 7.332
- p1858: 0
- p3462: 0; = p3367*p1241
- p3691: 4.69729e-8; = p1754*p3477
- p3269: 0.851786
- p1871: 0
- p0122: 90.432
- p2582: 0.000134868; = p2386*p1073
- p2189: 0.00266274; = p1053/p0818
- p0392: 0.5
- p0346: 0.5
- p0539: 0; = IF(p0275<0.5;-SQRT(p0007*EXP(p0407^2*p0008)-p0007);SQRT(p0007*EXP(p0407^2*p0008)-p0007))
- p2488: 9.62177e-6; = p2292*p1014
- p3879: 4.69729e-8; = p1942*p3477
- p3258: 0.0491162
- p3121: 0; = p2340*p1082
- p0518: 0; = SQRT(2)*(IF((2*p0386-1)<0;-1;IF((2*p0386-1)>0;1;0))*SQRT(SQRT((2/(pi()*0.140012289)+LN(1-(2*p0386-1)^2)/2)^2-LN(1-(2*p0386-1)^2)/0.140012289)-(2/(pi()*0.140012289)+LN(1-(2*p0386-1)^2)/2)))
- p0663: 0; = IF(p0399<0.5;-SQRT(p0007*EXP(p0531^2*p0008)-p0007);SQRT(p0007*EXP(p0531^2*p0008)-p0007))
- p2119: 0.679049
- p1937: 0
- p1600: 0.895638
- p3124: 0; = p2343*p1082
- p1205: 0
- p2394: 0; = p2234*p2183
- p2907: 0.000977655; = p2321*(p1020+p1022)
- p0576: 0; = IF(p0312<0.5;-SQRT(p0007*EXP(p0444^2*p0008)-p0007);SQRT(p0007*EXP(p0444^2*p0008)-p0007))
- p2136: 3.32373e-6; = p2015*p2064*p2098/(p0818*1000)
- p0127: 15.35
- p1988: 750
- p0523: 0; = SQRT(2)*(IF((2*p0391-1)<0;-1;IF((2*p0391-1)>0;1;0))*SQRT(SQRT((2/(pi()*0.140012289)+LN(1-(2*p0391-1)^2)/2)^2-LN(1-(2*p0391-1)^2)/0.140012289)-(2/(pi()*0.140012289)+LN(1-(2*p0391-1)^2)/2)))
- p0371: 0.5
- p2976: 0.0143337; = p2390*(p1129+p1131)
- p0011: 90.015
- p1534: 9
- p4227: 1.05763e-7; = p1878*p3479
- p2380: 0.000282536; = p2229*p2209
- p0350: 0.5
- p0975: 0.00806665; = p0973*p0974/p0818
- p2732: 0.000230224; = p2341*(p1078+p1080)
- p2399: 0; = p2234*p2188
- p1057: 0.82
- p0748: 54.919; = p0088*(1+p0616*p0220/100)
- p1305: 0; = p1301*p1252/p0818
- p1127: 0.15501; = if(p1121=0;p0721/100;0)
- p3782: 1.72756e-6; = p1845*p3477
- p3298: 0; = if(p1283+p1284+p1285+p1286=0;0;p1283/(p1283+p1284+p1285+p1286))
- p2906: 7.64232e-5; = p2320*(p1020+p1022)
- p3003: 0; = p2417*(p1079+p1081)
- p2475: 0.000163336; = p2279*p1014
- p3199: 0; = p2418*p1082
- p2234: 0; = 1-(p2222+p2223+p2224+p2225)
- p2164: 0.00207769; = (p2015/p0818)-(p2022)-(p2035+p2036+p2052)-(p2017/p0818)-(p2039+p2041+p2044+p2158+p2159+p2160+p2161+p2162)
- p0835: 0.0116162; = -LN(1-p0669/100)/p0834
- p0367: 0.5
- p0059: 46.469
- p0276: 0.5
- p2534: 0.000267585; = p2338*p1073
- p2724: 0.000335053; = p2333*(p1019+p1021)
- p1141: 0.000508037; = if(p1121=0;p1135*p0001/(p0818*p0002);0)
- p2750: 0.000110274; = p2359*(p1019+p1021)
- p3188: 0; = p2407*p1023
- p2962: 0.000445925; = p2376*(p1079+p1081)
- p4066: 4.89164e-6; = p1923*p3478
- p2453: 0.000239132; = p2257*p1014
- p2937: 0.00523233; = p2351*(p1129+p1131)
- p2840: 0.000565205; = p2254*(p1020+p1022)
- p1561: 0
- p3014: 0; = p2428*(p1129+p1131)
- p0504: 0; = SQRT(2)*(IF((2*p0372-1)<0;-1;IF((2*p0372-1)>0;1;0))*SQRT(SQRT((2/(pi()*0.140012289)+LN(1-(2*p0372-1)^2)/2)^2-LN(1-(2*p0372-1)^2)/0.140012289)-(2/(pi()*0.140012289)+LN(1-(2*p0372-1)^2)/2)))
- p1159: 0.5
- p0651: 0; = IF(p0387<0.5;-SQRT(p0007*EXP(p0519^2*p0008)-p0007);SQRT(p0007*EXP(p0519^2*p0008)-p0007))
- p5028: 0.000101685; = p1855*p3483
- p1250: 0; = if(p1232>0;0;p1245*p0001/(p0818*p0002))
- p0591: 0; = IF(p0327<0.5;-SQRT(p0007*EXP(p0459^2*p0008)-p0007);SQRT(p0007*EXP(p0459^2*p0008)-p0007))
- p2579: 5.08111e-7; = p2383*p1073
- p1746: 0
- p1019: 0.04853; = IF(p1012=0;IF(p1014=1;0;IF(p1014+p1015>1;1-p1014;p1015));0)
- p0570: 0; = IF(p0306<0.5;-SQRT(p0007*EXP(p0438^2*p0008)-p0007);SQRT(p0007*EXP(p0438^2*p0008)-p0007))
- p0022: 929.695
- p2301: 0.00373051; = p2227*p2208
- p2561: 0.00642201; = p2365*p1014
- p1748: 0
- p2543: 0.000347019; = p2347*p1073
- p0950: 0; = if(and(p0683=0;or(p0807=480;p0807=32;p0807=1;and(p0807=60;p0901<0.03)));p0938;0)
- p0740: 99.358; = p0080*(1+p0608*p0212/100)
- p1219: 0; = if(p1218=0;0;SQRT(2)*(IF((2*p1218-1)<0;-1;IF((2*p1218-1)>0;1;0))*SQRT(SQRT((2/(pi()*0.140012289)+LN(1-(2*p1218-1)^2)/2)^2-LN(1-(2*p1218-1)^2)/0.140012289)-(2/(pi()*0.140012289)+LN(1-(2*p1218-1)^2)/2))))
- p2121: 0.822447
- p4927: 1.06291e-6; = p1754*p3483
- p2512: 0.000446881; = p2316*p1014
- p2450: 0.000338055; = p2254*p1014
- p3108: 1.24333e-8; = p2327*p1023
- p4769: 0; = p1802*p3482
- p3195: 0; = p2414*p1082
- p0493: 0; = SQRT(2)*(IF((2*p0361-1)<0;-1;IF((2*p0361-1)>0;1;0))*SQRT(SQRT((2/(pi()*0.140012289)+LN(1-(2*p0361-1)^2)/2)^2-LN(1-(2*p0361-1)^2)/0.140012289)-(2/(pi()*0.140012289)+LN(1-(2*p0361-1)^2)/2)))
- p1324: 0.976417; = IF(((p0745*1000*p0751/100)+(p0754*1000*p0760/100))/p0801<0;0;((p0745*1000*p0751/100)+(p0754*1000*p0760/100))/p0801)
- p2068: 0.153529
- p1912: 0
- p0607: 0; = IF(p0343<0.5;-SQRT(p0007*EXP(p0475^2*p0008)-p0007);SQRT(p0007*EXP(p0475^2*p0008)-p0007))
- p0153: 0
- p1938: 0
- p1884: 0
- p2799: 0; = p2408*(p1019+p1021)
- p1293: 0; = p1287*p1252/p0818
- p0155: 10.673
- p3688: 7.97705e-7; = p1957*p3476
- p1098: 0.0330733
- p1049: 0.218296; = IF(p1012=0;IF(p1037+p1044+p1045+p1046+p1047+p1048=1;0;1-(p1037+p1044+p1045+p1046+p1047+p1048));0)
- p1198: 0.44
- p1617: 0.49725
- p1004: 0; = p1000*p0888
- p1302: 0.7305; = IF(p1297+p1300+p1301=p1262;0;p1262-(p1297+p1300+p1301))
- p3193: 0; = p2412*p1023
- p1978: 211
- p4563: 2.75634e-5; = p1802*p3481
- p2441: 4.26413e-5; = p2245*p1014
- p2844: 0.000607448; = p2258*(p1079+p1081)
- p0612: 0; = IF(p0348<0.5;-SQRT(p0007*EXP(p0480^2*p0008)-p0007);SQRT(p0007*EXP(p0480^2*p0008)-p0007))
- p1082: 0; = IF(p1071=0;IF(p1073+p1078+p1079+p1080+p1081=1;0;1-(p1073+p1078+p1079+p1080+p1081));0)
- p0902: 0.0377084
- p3250: 0.875
- p2617: 0; = p2421*p1073
- p2496: 0.00515569; = p2300*p1073
- p3019: 4.21192e-9; = p2238*p1023
- p2167: 0.590521; = p2166*(p0898)
- p1853: 0
- p1116: 0.000219275; = IF(p1071=0;p1106/(p1111*p0818);0)
- p3049: 0; = p2268*p1082
- p3423: 0; = p3366*p1239
- p2499: 0.000208376; = p2303*p1073
- p3203: 0; = p2422*p1082
- p1835: 0
- p1139: 8.09246e-5; = if(p1121=0;p1133*p0001/(p0818*p0002);0)
- p0973: 1.10662e7; = p0967+p0968+p0969
- p5018: 3.90916e-5; = p1845*p3483
- p1104: 0.303167; = IF(p1071=0;IF(p1096+p1101+p1102+p1103=1;0;1-(p1096+p1101+p1102+p1103));0)
- p1702: 0.853515
- p1787: 0
- p3015: 0; = p2429*(p1129+p1131)
- p3946: 4.15789e-5; = p1803*p3478
- p0694: 0
- p0134: 0.05
- p0514: 0; = SQRT(2)*(IF((2*p0382-1)<0;-1;IF((2*p0382-1)>0;1;0))*SQRT(SQRT((2/(pi()*0.140012289)+LN(1-(2*p0382-1)^2)/2)^2-LN(1-(2*p0382-1)^2)/0.140012289)-(2/(pi()*0.140012289)+LN(1-(2*p0382-1)^2)/2)))
- p0765: 37.327; = p0105*(1+p0633*p0237/100)
- p1094: 0; = IF(p1071=0;p1088*p0001/(p0818*p0002);0)
- p0720: 0
- p0676: 0
- p2955: 2.40718e-5; = p2369*(p1020+p1022)
- p2923: 0.00114738; = p2337*(p1079+p1081)
- p1631: 0
- p0786: 71.837; = p0126*(1+p0654*p0258/100)
- p0176: 1.677
- p4144: 3.17289e-7; = p1795*p3479
- p3355: 426204; = if(and(p1232=0;p3256<>0);p3256-(p3350+p3351+p3352+p3353+p3354);0)
- p1645: 0
- p1096: 0.000861829
- p1240: 0; = if(p1232>0;0;IF(p1234+p1238+p1239=1;0;IF(p1234+p1238+p1239+p1237>1;1-(p1234+p1238+p1239);p1237)))
- p1725: 0
- p0900: 2.38488; = p0899/p0818
- p3359: 1.06291e6; = if(p1232=0;p3309+p3320+p3331+p3342+p3353;0)
- p1068: 0.117677; = IF(p1012=0;p1054/(p1061*p0818);0)
- p2318: 0.000485324; = p2224*p2185
- p0045: 30.058
- p0442: 0; = SQRT(2)*(IF((2*p0310-1)<0;-1;IF((2*p0310-1)>0;1;0))*SQRT(SQRT((2/(pi()*0.140012289)+LN(1-(2*p0310-1)^2)/2)^2-LN(1-(2*p0310-1)^2)/0.140012289)-(2/(pi()*0.140012289)+LN(1-(2*p0310-1)^2)/2)))
- p2352: 0.000522328; = p2232*p2220
- p2195: 0.00756761; = p2194*p2193
- p1874: 0
- p0630: 0; = IF(p0366<0.5;-SQRT(p0007*EXP(p0498^2*p0008)-p0007);SQRT(p0007*EXP(p0498^2*p0008)-p0007))
- p2491: 8.24395e-5; = p2295*p1014
- p0688: 0
- p2782: 0.000418092; = p2391*(p1128+p1130)
- p2734: 0.00130173; = p2343*(p1078+p1080)
- p2909: 0.000251652; = p2323*(p1020+p1022)
- p2546: 0.000443493; = p2350*p1123
- p3705: 1.94677e-6; = p1768*p3477
- p4194: 3.50075e-5; = p1845*p3479
- p0347: 0.5
- p3392: 0.00347336; = p3373*p1234
- p1653: 0
- p2887: 0.00148187; = p2301*(p1079+p1081)
- p3083: 0; = p2302*p1082
- p1494: 17
- p1824: 0
- p1703: 0
- p3135: 2.49485e-7; = p2354*p1023
- p4616: 0.000186867; = p1855*p3481
- p0886: 0; = p0686*1000*p0687*p0689/100
- p3807: 5.74113e-8; = p1870*p3477
- p2665: 0.000388187; = p2274*(p1128+p1130)
- p2311: 0.0719767; = p2231*p2218
- p0574: 0; = IF(p0310<0.5;-SQRT(p0007*EXP(p0442^2*p0008)-p0007);SQRT(p0007*EXP(p0442^2*p0008)-p0007))
- p3204: 0; = p2423*p1082
- p1176: 126.762; = p1175*p0801
- p0961: 0; = if(and(p0683>0;or(p0807=480;p0807=32;p0807=1;and(p0807=60;p0901<0.03)));p0937;0)
- p3307: 0; = if(and(p1232=0;p3252<>0);p3252*(p3258-p3302)/p3305;0)
- p1713: 0
- p3302: 0; = if(and(p1232=0;p3252<>0);p3258*(p3278*(p3282*p1256+p3286*(p1253+p1257)+p1258*p3288+p3297*p3287));0)
- p3896: 1.19099e-5; = p1963*p3477
- p1097: 0.0606187
- p0349: 0.5
- p2746: 0.0010781; = p2355*(p1019+p1021)
- p2427: 0; = p2235*p2217
- p3337: 0; = IF(or(p3254=0;p1232>0);0;p3272*p3289)
- p0117: 42.793
- p1612: 0
- p1327: 0.166295; = if(p1318=0;if(p1327a=0;1;if(p1327a<0;0;p1327a));0)
- p3440: 0; = p3364*p1240
- p0610: 0; = IF(p0346<0.5;-SQRT(p0007*EXP(p0478^2*p0008)-p0007);SQRT(p0007*EXP(p0478^2*p0008)-p0007))
- p1852: 0
- p3474: 0; = p3379*p1241
- p2917: 1.43676e-5; = p2331*(p1020+p1022)
- p0138: 79.745
- p0549: 0; = IF(p0285<0.5;-SQRT(p0007*EXP(p0417^2*p0008)-p0007);SQRT(p0007*EXP(p0417^2*p0008)-p0007))
- p2242: 4.30818e-5; = p2222*p2187
- p2112: 0.856281
- p1462: 11
- p3628: 8.45567e-6; = p1897*p3476
- p0005: 1.60934
- p0331: 0.5
- p3466: 0; = p3371*p1241
- p3316: 0; = if(and(p1232=0;p3253<>0);1-(p3312+p3313+p3314+p3315);0)
- p3228: 0.0053232; = p3224*p1229
- p3376: 0.000159106; = if(p1232=0;p3246*p3358/p0818;0)
- p1801: 0
- p2281: 0.000170269; = p2223*p2187
- p0490: 0; = SQRT(2)*(IF((2*p0358-1)<0;-1;IF((2*p0358-1)>0;1;0))*SQRT(SQRT((2/(pi()*0.140012289)+LN(1-(2*p0358-1)^2)/2)^2-LN(1-(2*p0358-1)^2)/0.140012289)-(2/(pi()*0.140012289)+LN(1-(2*p0358-1)^2)/2)))
- p2082: 0.285294
- p2328: 0.0122904; = p2224*p2196
- p0632: 0; = IF(p0368<0.5;-SQRT(p0007*EXP(p0500^2*p0008)-p0007);SQRT(p0007*EXP(p0500^2*p0008)-p0007))
- p0406: 0; = SQRT(2)*(IF((2*p0274-1)<0;-1;IF((2*p0274-1)>0;1;0))*SQRT(SQRT((2/(pi()*0.140012289)+LN(1-(2*p0274-1)^2)/2)^2-LN(1-(2*p0274-1)^2)/0.140012289)-(2/(pi()*0.140012289)+LN(1-(2*p0274-1)^2)/2)))
- p1758: 0
- p0962: 0; = if(and(p0683>0;or(p0807=480;p0807=32;p0807=1;and(p0807=60;p0901<0.03)));p0938;0)
- p2999: 0; = p2413*(p1020+p1022)
- p2431: 0; = p2236*p2221
- p2175: 0.00120024; = p0895*p0908/p0818
- p2719: 0.00241948; = p2328*(p1019+p1021)
- p0448: 0; = SQRT(2)*(IF((2*p0316-1)<0;-1;IF((2*p0316-1)>0;1;0))*SQRT(SQRT((2/(pi()*0.140012289)+LN(1-(2*p0316-1)^2)/2)^2-LN(1-(2*p0316-1)^2)/0.140012289)-(2/(pi()*0.140012289)+LN(1-(2*p0316-1)^2)/2)))
- p2438: 1.29495e-5; = p2242*p1014
- p0513: 0; = SQRT(2)*(IF((2*p0381-1)<0;-1;IF((2*p0381-1)>0;1;0))*SQRT(SQRT((2/(pi()*0.140012289)+LN(1-(2*p0381-1)^2)/2)^2-LN(1-(2*p0381-1)^2)/0.140012289)-(2/(pi()*0.140012289)+LN(1-(2*p0381-1)^2)/2)))
- p1257: 0; = if(p1232>0;0;IF(p1253+p1256=1;0;IF(p1253+p1256+p1255>1;1-(p1253+p1256);p1255)))
- p2407: 0; = p2234*p2197
- p2079: 0.02
- p0420: 0; = SQRT(2)*(IF((2*p0288-1)<0;-1;IF((2*p0288-1)>0;1;0))*SQRT(SQRT((2/(pi()*0.140012289)+LN(1-(2*p0288-1)^2)/2)^2-LN(1-(2*p0288-1)^2)/0.140012289)-(2/(pi()*0.140012289)+LN(1-(2*p0288-1)^2)/2)))
- p0328: 0.5
- p1294: 0; = p1290*p1252/p0818
- p0884: 0; = IF(p0689=100;0;IF(p0689+p0688>100;100-p0689;p0688))
- p1698: 0.784351
- p2532: 0.000913648; = p2336*p1073
- p2022: 0.000985895; = p2018*p2015/p0818-p2021
- p3027: 3.5675e-10; = p2246*p1023
- p2081: 0.0019
- p3053: 0.000214724; = p2272*p1132
- p1727: 0
- p2354: 0.0249485; = p2225*p2182
- p0697: 0
- p1941: 0
- p0190: 17.023
- p2049: 25.6942
- p0749: 10.988; = p0089*(1+p0617*p0221/100)
- p3867: 1.09603e-7; = p1930*p3477
- p1032: 0.000195091; = IF(p1012=0;p1026*p0001/(p0818*p0002);0)
- p3388: 0.000981825; = p3369*p1234
- p0193: 32.604
- p0274: 0.5
- p0879: 2.56497; = p0878*p0001*p0003/(p0818*p0002)
- p0378: 0.5
- p0227: 26.365
- p2183: 0.00904907; = p1064-p2182
- p2998: 0; = p2412*(p1020+p1022)
- p0978: 930000; = p0801
- p4359: 0; = p1804*p3480
- p3129: 0; = p2348*p1082
- p0952: 0; = if(and(p0683>0;or(p0807=56;p0807=100;and(p0807=60;p0901>0.06)));p0934;0)
- p0532: 0; = SQRT(2)*(IF((2*p0400-1)<0;-1;IF((2*p0400-1)>0;1;0))*SQRT(SQRT((2/(pi()*0.140012289)+LN(1-(2*p0400-1)^2)/2)^2-LN(1-(2*p0400-1)^2)/0.140012289)-(2/(pi()*0.140012289)+LN(1-(2*p0400-1)^2)/2)))
- p2315: 0.00677287; = p2224*p2182
- p1254: 0; = if(p1232>0;0;p0736/100)
- p3461: 0; = p3366*p1241
- p1751: 0.791173
- p2467: 0.000215309; = p2271*p1073
- p2901: 0.00340371; = p2315*(p1020+p1022)
- p0722: 0
- p2137: 2.70035e-7; = p2015*p2065*p2099/(p0818*1000)
- p0682: 929.695; = p0022*(1+p0550*p0154/100)
- p2761: 2.07316e-5; = p2370*(p1019+p1021)
- p1611: 0
- p2891: 4.21259e-6; = p2305*(p1079+p1081)
- p1877: 0
- p0913: 0.0016675
- p2934: 6.96648e-5; = p2348*(p1079+p1081)
- p3183: 0; = p2402*p1023
- p0788: 74.038; = p0128*(1+p0656*p0260/100)
- p2548: 3.86627e-5; = p2352*p1123
- p3417: 0.000553126; = p3379*p1238
- p0106: 28.085
- p3068: 6.49427e-8; = p2287*p1023
- p1095: 3.49037e7; = IF(p1071=0;p0797*p0702*1000*p0798/100;0)
- p1552: 0
- p5234: 3.18257e-5; = p1855*p3484
- p2165: 1.51198; = (p0833-p2014)/p0818-p0839
- p2468: 0.00112803; = p2272*p1123
- p1640: 0
- p4995: 3.54304e-7; = p1822*p3483
- p1805: 0
- p0309: 0.5
- p2797: 0; = p2406*(p1019+p1021)
- p0115: 45.289
- p2827: 0.000150433; = p2241*(p1020+p1022)
- p3397: 0.00190691; = p3378*p1234
- p1311: 0; = IF(p1307+p1310=p1266;0;IF(p1307+p1310+p1309>p1266;p1266-(p1307+p1310);p1309))
- p0828: 0.124052; = if(p0827=0;0;p0819-p0827/p0818)
- p0537: 0; = IF(p0273<0.5;-SQRT(p0007*EXP(p0405^2*p0008)-p0007);SQRT(p0007*EXP(p0405^2*p0008)-p0007))
- p1577: 0
- p0215: 6.427
- p0907: 0.00734516
- p1715: 0
- p4171: 3.17289e-7; = p1822*p3479
- p2866: 0.000594548; = p2280*(p1020+p1022)
- p1574: 0
- p1915: 0
- p2145: 1.90976e-6; = p2015*p2073*p2107/(p0818*1000)
- p2118: 0.679049
- p2731: 0.000509107; = p2340*(p1078+p1080)
- p2268: 0.000153913; = p2226*p2214
- p2686: 5.39924e-5; = p2295*(p1019+p1021)
- p3182: 0; = p2401*p1023
- p3261: 0.908439
- p3769: 4.1023e-6; = p1832*p3477
- p2300: 0.0180218; = p2227*p2207
- p4864: 0; = p1897*p3482
- p2406: 0; = p2234*p2196
- p2117: 0.585147
- p0528: 0; = SQRT(2)*(IF((2*p0396-1)<0;-1;IF((2*p0396-1)>0;1;0))*SQRT(SQRT((2/(pi()*0.140012289)+LN(1-(2*p0396-1)^2)/2)^2-LN(1-(2*p0396-1)^2)/0.140012289)-(2/(pi()*0.140012289)+LN(1-(2*p0396-1)^2)/2)))
- p2120: 0.51828
- p1736: 0
- p3170: 0.000231266; = p2389*p1132
- p2740: 0.000497775; = p2349*(p1078+p1080)
- p2047: 1.7208e-13; = p2015*p2045/(p0818*1000000000000)
- p1701: 0
- p2912: 0.00291487; = p2326*(p1020+p1022)
- p2635: 2.43985e-5; = p2244*(p1019+p1021)
- p2259: 0.00138305; = p2226*p2205
- p4466: 0; = p1911*p3480
- p1297: 0
- p1571: 0
- p2396: 0; = p2234*p2185
- p2779: 0.000193459; = p2388*(p1078+p1080)
- p0310: 0.5
- p1136: 0; = if(p1121=0;p1130*(p0716/100)*p0703*1000;0)
- p3286: 0.185
- p5282: 9.31482e-6; = p1903*p3484
- p3843: 1.82672e-7; = p1906*p3477
- p2780: 0.00479585; = p2389*(p1128+p1130)
- p0880: 0; = p0868*p0856
- p3511: 6.2221e-6; = p1780*p3476
- p1087: 55938.1; = IF(p1071=0;p1081*(p0710/100)*p0703*1000;0)
- p1331: 2.84036e-5; = p1330*p0001/(p0818*p0002)
- p1092: 4.8204e-5; = IF(p1071=0;p1086*p0001/(p0818*p0002);0)
- p0993: 0; = p0989*p0001*p0004/(p0818*p0002)
- p0782: 90.432; = p0122*(1+p0650*p0254/100)
- p4890: 0; = p1923*p3482
- p1707: 0.356204
- p1083: 212042; = IF(p1071=0;p1073*(p0710/100)*p0703*1000;0)
- p2996: 0; = p2410*(p1020+p1022)
- p3164: 0; = p2383*p1082
- p2326: 0.00580015; = p2224*p2193
- p0359: 0.5
- p2413: 0; = p2234*p2203
- p1277: 0
- p0622: 0; = IF(p0358<0.5;-SQRT(p0007*EXP(p0490^2*p0008)-p0007);SQRT(p0007*EXP(p0490^2*p0008)-p0007))
- p2985: 0; = p2399*(p1020+p1022)
- p3292: 0.258
- p0876: 228444; = p0866*p0856
- p0777: 42.793; = p0117*(1+p0645*p0249/100)
- p1638: 0
- p1604: 0
- p2041: 0; = p2015*p2040/(p0818*1000)
- p0953: 0; = if(and(p0683>0;or(p0807=56;p0807=100;and(p0807=60;p0901>0.06)));p0935;0)
- p1651: 0.299611
- p0408: 0; = SQRT(2)*(IF((2*p0276-1)<0;-1;IF((2*p0276-1)>0;1;0))*SQRT(SQRT((2/(pi()*0.140012289)+LN(1-(2*p0276-1)^2)/2)^2-LN(1-(2*p0276-1)^2)/0.140012289)-(2/(pi()*0.140012289)+LN(1-(2*p0276-1)^2)/2)))
- p1077: 0.07547; = IF(p1071=0;p0715/100;0)
- p1033: 0.000171504; = IF(p1012=0;p1027*p0001/(p0818*p0002);0)
- p2794: 0; = p2403*(p1019+p1021)
- p2372: 0.00626942; = p2225*p2201
- p4425: 0; = p1870*p3480
- p4639: 2.17035e-7; = p1878*p3481
- p1121: 0
- p2632: 5.89281e-5; = p2241*(p1019+p1021)
- p1396: 15
- p1200: 0.84
- p1211: 0.6
- p1276: 0; = p1272*p1252/p0818
- p0887: 0; = 1000*p0886*p0001*p0003*p0004/(p0818*p0002)
- p3273: 0.753577
- p0114: 45.554
- p3236: 0.0140975
- p0675: 0
- p1605: 0
- p0383: 0.5
- p3067: 1.14103e-8; = p2286*p1023
- p0781: 10.181; = p0121*(1+p0649*p0253/100)
- p2363: 0.00046386; = p2225*p2191
- p2890: 0.00378896; = p2304*(p1079+p1081)
- p1730: 0
- p0079: 5.148
- p3263: 0.0214527
- p1930: 3.06158e-5; = p1522*1000/p0818
- p5052: 3.18874e-6; = p1879*p3483
- p3420: 0; = p3363*p1239
- p0312: 0.5
- p2083: 2.17294
- p1150: 7.51914e7; = if(p1121=0;p1149*p1146*p1145;0)
- p2010: 0.0176445; = ((p1984*p1985+p1990*p1991+p1996*p1997+p2004*p2005)/p0818)*p0005*p0002/1000
- p2024: 0.748682
- p3104: 5.00751e-9; = p2323*p1023
- p1183: 0.00120966; = p0801*p0001/(p0818*p0002)
- p0994: 0; = p0990*p0001*p0004/(p0818*p0002)
- p4719: 0; = p1962*p3481
- p0455: 0; = SQRT(2)*(IF((2*p0323-1)<0;-1;IF((2*p0323-1)>0;1;0))*SQRT(SQRT((2/(pi()*0.140012289)+LN(1-(2*p0323-1)^2)/2)^2-LN(1-(2*p0323-1)^2)/0.140012289)-(2/(pi()*0.140012289)+LN(1-(2*p0323-1)^2)/2)))
- p1772: 0
- p1943: 0
- p2987: 0; = p2401*(p1020+p1022)
- p3054: 0.000302591; = p2273*p1132
- p0103: 929.459
- p0008: 0.0739645; = (p0007-1.5)/(p0007-1)^2
- p1803: 7.43527e-5; = p1395*1000/p0818
- p2287: 0.00649427; = p2223*p2193
- p2575: 0.000178739; = p2379*p1073
- p1587: 0
- p3601: 1.75495e-6; = p1870*p3476
- p2701: 0.00115512; = p2310*(p1078+p1080)
- p2477: 5.11796e-5; = p2281*p1014
- p3405: 0; = p3367*p1238
- p0250: 29.348
- p2123: 0.263965
- p1963k: 0.000146231; = p1744*p1948+p1745*p1949+p1746*p1950+p1747*p1951+p1748*p1952+p1749*p1953+p1750*p1954+p1751*p1955+p1752*p1956+p1753*p1957+p1961*p1962
- p4812: 0; = p1845*p3482
- p2898: 0.0628564; = p2312*(p1129+p1131)
- p0662: 0; = IF(p0398<0.5;-SQRT(p0007*EXP(p0530^2*p0008)-p0007);SQRT(p0007*EXP(p0530^2*p0008)-p0007))
- p4529: 8.09539e-5; = p1768*p3481
- p0358: 0.5
- p2156: 1.30598e-7; = p2015*p2085*p2118/(p0818*1000)
- p3072: 1.45595e-10; = p2291*p1023
- p1522: 21
- p0843: 0.0876881
- p0080: 99.358
- p0944: 0; = if(and(p0683=0;p0950=0);p0938;0)
- p0461: 0; = SQRT(2)*(IF((2*p0329-1)<0;-1;IF((2*p0329-1)>0;1;0))*SQRT(SQRT((2/(pi()*0.140012289)+LN(1-(2*p0329-1)^2)/2)^2-LN(1-(2*p0329-1)^2)/0.140012289)-(2/(pi()*0.140012289)+LN(1-(2*p0329-1)^2)/2)))
- p1967: 693750; = if(p0807=480;p0802*p0810;0)
- p2122: 0.341195
- p3119: 0; = p2338*p1082
- p2745: 0.00491137; = p2354*(p1019+p1021)
- p0665: 0; = IF(p0401<0.5;-SQRT(p0007*EXP(p0533^2*p0008)-p0007);SQRT(p0007*EXP(p0533^2*p0008)-p0007))
- p3363: 0; = if(p1232=0;p3244*p3357/p0818;0)
- p2896: 0.00144888; = p2310*(p1079+p1081)
- p2151: 9.5488e-8; = p2015*p2079*p2113/(p0818*1000)
- p4457: 0; = p1902*p3480
- p0631: 0; = IF(p0367<0.5;-SQRT(p0007*EXP(p0499^2*p0008)-p0007);SQRT(p0007*EXP(p0499^2*p0008)-p0007))
- p0639: 0; = IF(p0375<0.5;-SQRT(p0007*EXP(p0507^2*p0008)-p0007);SQRT(p0007*EXP(p0507^2*p0008)-p0007))
- p1697: 0.705252
- p3254: 0; = p1252*(p1287*(1-p3247)+p1290*(1-p3248)+p1291*(1-p3249)+p1292*(1-p3250))
- p0217: 6.124
- p0701: 0
- p0700: 0
- p1123: 0.07402; = if(p1121=0;p0717/100;0)
- p3006: 0; = p2420*(p1079+p1081)
- p2250: 0.00348187; = p2222*p2196
- p2153: 9.3321e-9; = p2015*p2081*p2115/(p0818*1000)
- p3279: 0.37
- p0805: 0
- p3138: 1.78774e-8; = p2357*p1023
- p1551: 0
- p2553: 0.000537358; = p2357*p1014
- p3434: 0; = p3377*p1239
- p1842: 0
- p2733: 9.94034e-5; = p2342*(p1078+p1080)
- p1837: 0
- p3271: 0.0195489
- p3032: 2.24443e-11; = p2251*p1023
- p1886: 0
- p2210: 0.00131455; = 6*1.00794*p2208/30.973762
- p3383: 0; = p3364*p1234
- p2679: 0.000274053; = p2288*(p1019+p1021)
- p2743: 0.000152619; = p2352*(p1128+p1130)
- p3232: 2.02388e-7; = p1182/p0818
- p5273: 1.5229e-5; = p1894*p3484
- p2965: 0.000248184; = p2379*(p1079+p1081)
- p2893: 0.000296302; = p2307*(p1079+p1081)
- p0830: 1.79479e9; = p0825*(p0821-p0814)*p0824
- p1799: 0
- p1575: 0
- p2753: 0.000363121; = p2362*(p1019+p1021)
- p0403: 0.5
- p1256: 0; = if(p1232>0;0;IF(p1253=1;0;IF(p1253+p1254>1;1-p1253;p1254)))
- p2522: 0.00174341; = p2326*p1014
- p3840: 1.31524e-6; = p1903*p3477
- p3229: 5.84066e-6; = p1164/p0818
- p0976: 0; = IF(p0687=0;IF(OR(p0686=0;p0689=0);0;p0686*1000*p0689/100);0)
- p2139: 1.58881e-6; = p2015*p2067*p2101/(p0818*1000)
- p1099: 0.602279
- p1908: 0
- p1778: 0
- p3435: 0; = p3378*p1239
- p3300: 0; = if(p1293+p1294+p1295+p1296=0;0;p1293/(p1293+p1294+p1295+p1296))
- p2409: 0; = p2234*p2199
- p2669: 3.10571e-5; = p2278*(p1019+p1021)
- p5147: 1.37874e-5; = p1768*p3484
- p0771: 42.073; = p0111*(1+p0639*p0243/100)
- p2964: 0.00119896; = p2378*(p1079+p1081)
- p1300: 0; = IF(p1297=p1265;0;IF(p1297+p1298>p1265;p1265-p1297;p1298))
- p4721: 0; = p1754*p3482
- p0964: 0; = 56/90000
- p0508: 0; = SQRT(2)*(IF((2*p0376-1)<0;-1;IF((2*p0376-1)>0;1;0))*SQRT(SQRT((2/(pi()*0.140012289)+LN(1-(2*p0376-1)^2)/2)^2-LN(1-(2*p0376-1)^2)/0.140012289)-(2/(pi()*0.140012289)+LN(1-(2*p0376-1)^2)/2)))
- p0407: 0; = SQRT(2)*(IF((2*p0275-1)<0;-1;IF((2*p0275-1)>0;1;0))*SQRT(SQRT((2/(pi()*0.140012289)+LN(1-(2*p0275-1)^2)/2)^2-LN(1-(2*p0275-1)^2)/0.140012289)-(2/(pi()*0.140012289)+LN(1-(2*p0275-1)^2)/2)))
- p1767: 0
- p0085: 3554.69
- p4976: 6.02317e-6; = p1803*p3483
- p0949: 0; = if(and(p0683=0;or(p0807=480;p0807=32;p0807=1;and(p0807=60;p0901<0.03)));p0937;0)
- p1039: 0.058101
- p2871: 7.08575e-5; = p2285*(p1020+p1022)
- p0480: 0; = SQRT(2)*(IF((2*p0348-1)<0;-1;IF((2*p0348-1)>0;1;0))*SQRT(SQRT((2/(pi()*0.140012289)+LN(1-(2*p0348-1)^2)/2)^2-LN(1-(2*p0348-1)^2)/0.140012289)-(2/(pi()*0.140012289)+LN(1-(2*p0348-1)^2)/2)))
- p2265: 0.00196816; = p2226*p2211
- p1940: 0
- p5285: 1.29373e-6; = p1906*p3484
- p0757: 57.321; = p0097*(1+p0625*p0229/100)
- p0065: 5.995
- p3732: 1.56576e-8; = p1795*p3477
- p0839: 1.51864; = p0838/p0818
- p2811: 0; = p2420*(p1078+p1080)
- p0762: 19.415; = p0102*(1+p0630*p0234/100)
- p2330: 1.30034e-5; = p2224*p2198
- p1216: 0.140133
- p3308: 0; = if(and(p1232=0;p3252<>0);p3252*(p3259-p3303)/p3305;0)
- p2722: 5.6281e-6; = p2331*(p1019+p1021)
- p1690: 0.624955
- p1857: 0
- p2960: 0.00519852; = p2374*(p1020+p1022)
- p1819: 0
- p2636: 2.79272e-5; = p2245*(p1019+p1021)
- p1321: 3.66783; = IF(((p0745*1000*p0748/100)+(p0754*1000*p0757/100))/p0801<0;0;((p0745*1000*p0748/100)+(p0754*1000*p0757/100))/p0801)
- p2645: 0.000221403; = p2254*(p1019+p1021)
- p2128: 4.76978e-6; = p2015*p2056*p2090/(p0818*1000)
- p4523: 8.68138e-6; = p1762*p3481
- p2941: 0.00275222; = p2355*(p1020+p1022)
- p2275: 0.00230866; = p2230*p2221
- p1265: 0.7305; = if(p1232>0;0;IF(p1259+p1263+p1264=1;0;IF(p1259+p1263+p1264+p1262>1;1-(p1259+p1263+p1264);p1262)))
- p2086: 0.0617647
- p2809: 0; = p2418*(p1078+p1080)
- p2371: 0.0146235; = p2225*p2200
- p0531: 0; = SQRT(2)*(IF((2*p0399-1)<0;-1;IF((2*p0399-1)>0;1;0))*SQRT(SQRT((2/(pi()*0.140012289)+LN(1-(2*p0399-1)^2)/2)^2-LN(1-(2*p0399-1)^2)/0.140012289)-(2/(pi()*0.140012289)+LN(1-(2*p0399-1)^2)/2)))
- p3001: 0; = p2415*(p1079+p1081)
- p1244: 0; = if(p1232>0;0;p1239*(p0725/100)*p0723*1000)
- p0870: 37555; = p0858*p0856
- p0959: 0; = if(and(p0683>0;or(p0807=480;p0807=32;p0807=1;and(p0807=60;p0901<0.03)));p0935;0)
- p2272: 0.0152395; = p2230*p2218
- p3437: 0; = p3380*p1239
- p1208: 0; = p1205*p0818*p0822/p0801
- p0210: 0
- p2988: 0; = p2402*(p1020+p1022)
- p0807: 480
- p2150: 5.74661e-7; = p2015*p2078*p2112/(p0818*1000)
- p2865: 0.000273088; = p2279*(p1020+p1022)
- p3051: 0; = p2270*p1082
- p2029: 6.19
- p0006: 15
- p0199: 35.176
- p0882: 353; = p0869*p0856
- p0496: 0; = SQRT(2)*(IF((2*p0364-1)<0;-1;IF((2*p0364-1)>0;1;0))*SQRT(SQRT((2/(pi()*0.140012289)+LN(1-(2*p0364-1)^2)/2)^2-LN(1-(2*p0364-1)^2)/0.140012289)-(2/(pi()*0.140012289)+LN(1-(2*p0364-1)^2)/2)))
- p2113: 0.832356
- p1207: 196.822; = if(p1193>0;0;(p1194*p1050/p1057+p1195*p1051/p1058+p1196*p1052/p1059+p1197*p1053/p1060+p1198*p1054/p1061+p1199*p1055/p1062+p1200*p1056/p1063)/(p0702*1000)+(p1201*p1109/p1114+p1202*p1110/p1115)/(p0702*1000)+p1203*p1170/p0801+p1204*p1176/p0801)
- p0064: 1.56
- p2308: 0.00281487; = p2227*p2215
- p1738: 0.54188
- p0809: 2000
- p0878: 197198; = p0867*p0856
- p3965: 2.44582e-6; = p1822*p3478
- p0216: 1.965
- p3699: 2.08769e-7; = p1762*p3477
- p2533: 0.000826325; = p2337*p1073
- p1130: 0; = if(p1121=0;IF(p1123+p1128+p1129=1;0;IF(p1123+p1128+p1129+p1126>1;1-(p1123+p1128+p1129);p1126));0)
- p2135: 4.6226e-6; = p2015*p2063*p2097/(p0818*1000)
- p1952: 0
- p1354: 40
- p5280: 1.36765e-6; = p1901*p3484
- p3086: 0; = p2305*p1082
- p3860: 3.13153e-8; = p1923*p3477
- p0521: 0; = SQRT(2)*(IF((2*p0389-1)<0;-1;IF((2*p0389-1)>0;1;0))*SQRT(SQRT((2/(pi()*0.140012289)+LN(1-(2*p0389-1)^2)/2)^2-LN(1-(2*p0389-1)^2)/0.140012289)-(2/(pi()*0.140012289)+LN(1-(2*p0389-1)^2)/2)))
- p2400: 0; = p2234*p2189
- p3020: 3.99173e-10; = p2239*p1023
- p2338: 0.000935352; = p2228*p2206
- p0931: 0; = p0801*p0925
- p2019: 0.13105
- p1957: 7.28948e-6; = p1549*1000/p0818
- p2114: 0.832356
- p1720: 0
- p3252: 0; = p1252*(p1267*(1-p3247)+p1270*(1-p3248)+p1271*(1-p3249)+p1272*(1-p3250))
- p0680: 0
- p1918: 0
- p0810: 0.75
- p2707: 0.000292677; = p2316*(p1019+p1021)
- p1752: 0
- p1558: 0.399536
- p1719: 0.4576
- p1894: 0.000600653; = p1486*1000/p0818
- p0846: 0.438302; = p0841*p0845^3+p0842*p0845^2+p0843*p0845+p0844
- p0450: 0; = SQRT(2)*(IF((2*p0318-1)<0;-1;IF((2*p0318-1)>0;1;0))*SQRT(SQRT((2/(pi()*0.140012289)+LN(1-(2*p0318-1)^2)/2)^2-LN(1-(2*p0318-1)^2)/0.140012289)-(2/(pi()*0.140012289)+LN(1-(2*p0318-1)^2)/2)))
- p1172: 6.97072e-7; = p1170/p0818
- p2334: 0.000244954; = p2224*p2202
- p2322: 0.000437478; = p2224*p2189
- p2855: 0.000230719; = p2269*(p1079+p1081)
- p0707: 16.873; = p0047*(1+p0575*p0179/100)
- p1846: 0
- p0095: 4.882
- p1619: 0
- p2660: 0.00018394; = p2269*(p1078+p1080)
- p1993: 400
- p1887: 0
- p2846: 0.000177907; = p2260*(p1079+p1081)
- p0002: 0.453592
- p2835: 0.000177017; = p2249*(p1020+p1022)
- p0440: 0; = SQRT(2)*(IF((2*p0308-1)<0;-1;IF((2*p0308-1)>0;1;0))*SQRT(SQRT((2/(pi()*0.140012289)+LN(1-(2*p0308-1)^2)/2)^2-LN(1-(2*p0308-1)^2)/0.140012289)-(2/(pi()*0.140012289)+LN(1-(2*p0308-1)^2)/2)))
- p2703: 0.0296369; = p2312*(p1128+p1130)
- p1312: 0.2695; = IF(p1307+p1310+p1311=p1266;0;p1266-(p1307+p1310+p1311))
- p0360: 0.5
- p3155: 1.03443e-7; = p2374*p1023
- p3739: 6.6284e-7; = p1802*p3477
- p2017: 1.78368e6; = p2015*p0898
- p1613: 0
- p1239: 0; = if(p1232>0;0;IF(p1234+p1238=1;0;IF(p1234+p1238+p1236>1;1-(p1234+p1238);p1236)))
- p0361: 0.5
- p2061: 0.518824
- p2995: 0; = p2409*(p1020+p1022)
- p3624: 0.000126197; = p1893*p3476
- p0912: 0.0117914
- p1903: 0.00036739; = p1495*1000/p0818
- p1949: 0
- p1012: 0
- p0228: 46.985
- p1741: 0
- p0852: 0; = p0847*p0851^3+p0848*p0851^2+p0849*p0851+p0850
- p0205: 23.069
- p2166: 1.30257; = p2165*p0824
- p2013: 0.65
- p1106: 13128; = IF(p1071=0;p1105*p1096*p1095;0)
- p1333: 0.00443682; = p1332*p0001/(p0818*p0002)
- p1209: 6.43841; = p1206*p0818*p0822/p0801
- p0113: 79.745
- p0221: 15.037
- p2530: 7.36283e-5; = p2334*p1014
- p4662: 8.03028e-6; = p1901*p3481
- p2856: 3.33571e-5; = p2270*(p1079+p1081)
- p0146: 0
- p2810: 0; = p2419*(p1078+p1080)
- p0010: 37.555
- p2775: 5.88174e-6; = p2384*(p1078+p1080)
- p3451: 0; = p3375*p1240
- p2737: 0.000101797; = p2346*(p1078+p1080)
- p4565: 3.25552e-6; = p1804*p3481
- p2748: 0.000351934; = p2357*(p1019+p1021)
- p3219: 0.0341155; = p3215*p1228
- p0512: 0; = SQRT(2)*(IF((2*p0380-1)<0;-1;IF((2*p0380-1)>0;1;0))*SQRT(SQRT((2/(pi()*0.140012289)+LN(1-(2*p0380-1)^2)/2)^2-LN(1-(2*p0380-1)^2)/0.140012289)-(2/(pi()*0.140012289)+LN(1-(2*p0380-1)^2)/2)))
- p2577: 3.48988e-5; = p2381*p1073
- p1236: 0; = if(p1232>0;0;p0728/100)
- p0982: 0; = if(p0886=0;0;min(1;(p0691*p0690*1000*p0693/100)/p0886))
- p2419: 0; = p2235*p2209
- p1958: 4756
- p1807: 4.37369e-6; = p1399*1000/p0818
- p1721: 0
- p2289: 0.0137612; = p2223*p2196
- p0728: 0
- p2470: 9.83388e-5; = p2274*p1123
- p1860: 0
- p0094: 2545.11
- p1260: 0; = if(p1232>0;0;p0731/100)
- p3222: 0.224242; = IF(p3216=0;0;p1223*40.078/100.0869)
- p2023: 3.3
- p3002: 0; = p2416*(p1079+p1081)
- p0056: 90.432
- p3008: 0; = p2422*(p1079+p1081)
- p2507: 0.00532772; = p2311*p1123
- p2125: 7.15365e-6; = p2015*p2053*p2087/(p0818*1000)
- p2314: 0.0109039; = p2231*p2221
- p4870: 0; = p1903*p3482
- p2003: 50
- p1905: 0
- p2276: 0.0075834; = p2223*p2182
- p2834: 0.000825785; = p2248*(p1020+p1022)
- p2360: 0.00716603; = p2225*p2188
- p0966: 0.2887; = if(p0683=0;0;IF(p0684/100+p0965=1;0;1-(p0684/100+p0965)))
- p3163: 0; = p2382*p1082
- p4497: 0; = p1942*p3480
- p1165: 0.00120966; = p0801*p0001/(p0818*p0002)
- p1637: 0
- p0995: 0; = p0991*p0001*p0004/(p0818*p0002)
- p3888: 8.71608e-7; = p1951*p3477
- p0752: 0
- p2688: 0.00234703; = p2297*(p1078+p1080)
- p3144: 4.6386e-9; = p2363*p1023
- p1167: 0.5
- p3394: 0.000287027; = p3375*p1234
- p0112: 90.215
- p3167: 0; = p2386*p1082
- p3212: 0; = p2431*p1132
- p1677: 0
- p0696: 0
- p3552: 4.14807e-6; = p1821*p3476
- p3283: 0.3
- p2593: 0; = p2397*p1014
- p2200: 0.024163; = p1056/p0818
- p2547: 0.000624975; = p2351*p1123
- p1714: 0
- p1273: 0; = p1267*p1252/p0818
- p4085: 7.33746e-6; = p1942*p3478
- p4306: 5.28815e-7; = p1957*p3479
- p2037: 3.44
- p1782: 0
- p3157: 0; = p2376*p1082
- p1583: 0
- p2571: 0.000355088; = p2375*p1073
- p4774: 0; = p1807*p3482
- p4219: 1.16339e-6; = p1870*p3479
- p0920: 0; = p0676*1000/p0801
- p2207: 0.0325249; = p1119-p2205-p2204-p2206
- p0984: 0; = if(p0886=0;0;min(1;(p0699*p0698*1000*p0701/100)/p0886))
- p0936: 0; = p0930*p0001/(p0818*p0002)
- p2928: 0.000124684; = p2342*(p1079+p1081)
- p0306: 0.5
- p1693: 0.384846
- p2279: 0.000543404; = p2223*p2185
- p2680: 0.00270902; = p2289*(p1019+p1021)
- p2481: 4.23805e-5; = p2285*p1014
- p3409: 0.000422841; = p3371*p1238
- p5338: 8.43485e-5; = p1963*p3484
- p1910: 0
- p2381: 0.00012199; = p2229*p2210
- p1770: 0
- p4021: 8.15273e-7; = p1878*p3478
- p4564: 1.10688e-5; = p1803*p3481
- p0181: 14.735
- p3654: 9.57246e-7; = p1923*p3476
- p2361: 0.00161149; = p2225*p2189
- p2986: 0; = p2400*(p1020+p1022)
- p2592: 0; = p2396*p1014
- p1152: 0.415074
- p1281: 0; = IF(p1277+p1280=p1263;0;IF(p1277+p1280+p1279>p1263;p1263-(p1277+p1280);p1279))
- p3743: 2.60961e-8; = p1806*p3477
- p3249: 0
- p3025: 1.23938e-9; = p2244*p1023
- p0948: 0; = if(and(p0683=0;or(p0807=480;p0807=32;p0807=1;and(p0807=60;p0901<0.03)));p0936;0)
- p1763: 0
- p1766: 0
- p0671: 90.015; = p0011*(1+p0539*p0143/100)
- p3311: 0; = if(and(p1232=0;p3252<>0);p3252-(p3306+p3307+p3308+p3309+p3310);0)
- p1078: 0.26669; = IF(p1071=0;IF(p1073=1;0;IF(p1073+p1074>1;1-p1073;p1074));0)
- p1073: 0.28608; = IF(p1071=0;p0711/100;0)
- p1550: 0.783979
- p1153: 0.365265
- p2524: 0.00369423; = p2328*p1014
- p1064: 0.0502726; = IF(p1012=0;p1050/(p1057*p0818);0)
- p2628: 0.000377728; = p2237*(p1019+p1021)
- p1089: 0.000275804; = IF(p1071=0;p1083*p0001/(p0818*p0002);0)
- p2950: 0.0018865; = p2364*(p1020+p1022)
- p2014: 4.56696e6; = p0833*p2011*p2013

## Reference product
- cotton lint; at harvest in 2000; at farm; 90%-93% moisture: 1 kg

## Inputs from technosphere
- CUTOFF pesticide, Urea, sulfate; at point-of-sale; kg AI: 0.0011532 kg; = p1893
- CUTOFF pesticide, Acephate; at point-of-sale; kg AI: 5.83158e-5 kg; = p1762
- CUTOFF sulfur storage: 3.48536e-7 kg*a; = p1174
- CUTOFF apply liming materials; unspecified method: 0.00120966 ha; = p1227
- CUTOFF pesticide, Norflurazon; at point-of-sale; kg AI: 7.72685e-5 kg; = p1897
- CUTOFF pesticide, Metalaxyl-M; at point-of-sale; kg AI: 1.4579e-6 kg; = p1878
- CUTOFF gypsum storage: 2.92033e-6 kg*a; = p1168
- CUTOFF limestone, high-grade, pulverized; at point-of-sale: 0.0756792 kg; = p1228
- CUTOFF zinc compounds; at point-of-sale: 2.02388e-7 kg; = p1184
- CUTOFF harvest; cotton, stripper harvested: 0.000300788 ha; = p1973
- CUTOFF irrig svc; unspec wat source & rate, 2000 cotton: 0.00120966 ha; = p0981
- CUTOFF apply gypsum; unspecified method: 0.00120966 ha; = p1165
- CUTOFF nitrogenous fertilizer, urea; at point-of-sale: 0.0531055 kg; = p1070
- CUTOFF pesticide, Zeta-Cypermethrin; at point-of-sale; kg AI: 7.28948e-6 kg; = p1957
- CUTOFF pesticide, Cypermethrin; at point-of-sale; kg AI: 7.28948e-6 kg; = p1806
- CUTOFF phosphatic fertilizer, superphosphate grades over 22%; at point-of-sale: 0.00642634 kg; = p1117
- CUTOFF potassic fertilizer, potassium chloride; at point-of-sale: 0.2641 kg; = p1154
- CUTOFF pesticide, Trifluralin; at point-of-sale; kg AI: 0.000109342 kg; = p1955
- CUTOFF nitrogenous fertilizer, ammonium sulfate; at point-of-sale: 0.0126797 kg; = p1067
- CUTOFF apply sewage sludge; unspecified method: 0.00120966 ha; = p1189
- CUTOFF pesticide, Bromoxynil; at point-of-sale; kg AI: 5.68579e-5 kg; = p1780
- CUTOFF apply sulfur; unspecified method: 0.00120966 ha; = p1171
- CUTOFF nitrogenous fertilizer, anhydrous ammonia; at point-of-sale: 0.0502726 kg; = p1064
- CUTOFF apply K fertilizer; broadcast with incorporation: 0.000319446 ha; = p1140
- CUTOFF pesticide, Phorate; at point-of-sale; kg AI: 5.10264e-5 kg; = p1906
- CUTOFF nitrogenous fertilizer, aqueous ammonia; at point-of-sale: 0.00381156 kg; = p1065
- CUTOFF harvest; cotton, spindle picked: 0.000902365 ha; = p1972
- CUTOFF phosphatic fertilizer, other single phosphates; at point-of-sale: 0.00731725 kg; = p1118
- CUTOFF pesticide, Dimethipin; at point-of-sale; kg AI: 3.79053e-5 kg; = p1821
- CUTOFF pesticide, Clethodim; at point-of-sale; kg AI: 4.37369e-6 kg; = p1795
- CUTOFF apply pesticide; unspecified application methods: 0.00020116 ha; = p1345
- CUTOFF pesticide, Sodium chlorate; at point-of-sale; kg AI: 3.06158e-5 kg; = p1930
- CUTOFF sewage sludge; at point-of-sale: 6.30061e-7 kg; = p1190
- CUTOFF pesticide, 2,4-D; at point-of-sale; kg AI: 1.31211e-5 kg; = p1754
- cotton residue; at harvest in 2000; at farm; 80%-92% moisture: 1.51864 kg; = p0839
- CUTOFF phosphatic fertilizer, monoammonium phosphate; at point-of-sale: 0.0283063 kg; = p1120
- CUTOFF apply K fertilizer; no broadcast application: 8.09246e-5 ha; = p1139
- CUTOFF pesticide, Glyphosate; at point-of-sale; kg AI: 0.00125525 kg; = p1855
- CUTOFF nitrogenous fertilizer, nitrogen solutions; at point-of-sale: 0.117677 kg; = p1068
- CUTOFF potassic fertilizer, other single nutrients; at point-of-sale: 0.0261633 kg; = p1155
- CUTOFF cotton seeds; seed, unspec. type; at point-of-sale: 0.00465769 kg; = p0972
- CUTOFF apply mixed N fertilizer; with incorporation: 0.000171504 ha; = p1033
- CUTOFF sowing; for unspec. till, cotton: 0.00120966 ha; = p0963
- CUTOFF pesticide, Thidiazuron; at point-of-sale; kg AI: 1.31211e-5 kg; = p1942
- CUTOFF pesticide, Fluometuron; at point-of-sale; kg AI: 0.000482564 kg; = p1845
- CUTOFF pesticide, Pendimethalin; at point-of-sale; kg AI: 0.00036739 kg; = p1903
- CUTOFF apply pesticide; broadcast with incorporation: 0.00443682 ha; = p1333
- CUTOFF zinc compounds storage: 1.01194e-7 kg*a; = p1186
- CUTOFF apply P fertilizer; no broadcast application: 0.000275804 ha; = p1089
- CUTOFF sewage sludge storage: 3.1503e-7 kg*a; = p1192
- CUTOFF apply pesticide; as foliar or directed spray: 0.00118113 ha; = p1339
- CUTOFF apply pesticide; in seed furrow: 0.000642723 ha; = p1343
- CUTOFF apply manure; broadcast or spray with incorporation: 4.69281e-5 ha; = p1247
- CUTOFF pesticide formulation balance; at point-of-sale: 0.00332682 kg; = p1963
- CUTOFF apply pesticide; broadcast without incorporation: 0.000575575 ha; = p1335
- cottonseed; at harvest in 2000; at farm; 90%-93% moisture: 1.48122 kg; = p0819
- CUTOFF nitrogenous fertilizer, ammonium nitrate; at point-of-sale: 0.0191975 kg; = p1066
- CUTOFF apply mixed P fertilizer; without incorporation: 7.27591e-5 ha; = p1093
- CUTOFF apply single or mixed K fertilizer; unspec. method: 1.54043e-5 ha; = p1144
- CUTOFF sulfur; at point-of-sale: 6.97072e-7 kg; = p1172
- CUTOFF liming materials storage: 0.0431422 kg*a; = p1231
- CUTOFF apply single or mixed N fertilizer; unspec. method: 1.15623e-8 ha; = p1035
- CUTOFF fertilizer storage: 0.39772 kg*a; = p1160
- CUTOFF regional or national trucking; class 8, average fuel: 0.0451927 metric ton*km; = p2009
- CUTOFF apply K fertilizer; broadcast without incorporation: 0.000508037 ha; = p1141
- CUTOFF pesticide, Lambda-cyhalothrin; at point-of-sale; kg AI: 1.60369e-5 kg; = p1870
- CUTOFF apply N fertilizer; broadcast without incorporation: 0.000195091 ha; = p1032
- CUTOFF pesticide, Tribufos; at point-of-sale; kg AI: 0.000243469 kg; = p1951
- CUTOFF dolomite, pulverized; at point-of-sale: 0.0106051 kg; = p1229
- CUTOFF pesticide, MSMA; at point-of-sale; kg AI: 0.000600653 kg; = p1894
- CUTOFF cotton seeds; GMO herbicide resistant seed; at point-of-sale: 0.0114756 kg; = p0970
- CUTOFF seed storage; cotton: 0.00806665 kg*a; = p0975
- CUTOFF gypsum; at point-of-sale: 5.84066e-6 kg; = p1166
- CUTOFF apply pesticide; broadcast by air: 2.84036e-5 ha; = p1331
- CUTOFF apply mixed K fertilizer; without incorporation: 0.000169469 ha; = p1143
- CUTOFF N inhibitor appl svc; unspec rate & type, 2000 cotton: 0.00135584 ha; = p1162
- CUTOFF bulk cargo rail transport; diesel: 0.441112 metric ton*km; = p2008
- CUTOFF apply N fertilizer; no broadcast application: 0.00034754 ha; = p1030
- CUTOFF apply mixed N fertilizer; without incorporation: 0.000385973 ha; = p1034
- CUTOFF apply zinc compounds; unspecified method: 0.00120966 ha; = p1183
- CUTOFF sulfuric acid storage: 9.24033e-8 kg*a; = p1180
- CUTOFF apply mixed P fertilizer; with incorporation: 4.8204e-5 ha; = p1092
- CUTOFF pesticide, Cyanazine; at point-of-sale; kg AI: 0.000185153 kg; = p1802
- CUTOFF apply sulfuric acid; unspecified method: 0.00120966 ha; = p1177
- CUTOFF domestic barge transport; average fuel: 0.23526 metric ton*km; = p2007
- CUTOFF apply P fertilizer; broadcast with incorporation: 0.00025711 ha; = p1090
- CUTOFF poultry manure; from unspecified storage; at point-of-sale: 0.185186 kg; = p1306
- CUTOFF fertilizer filler materials; at point-of-sale: 0.143947 kg; = p1158
- CUTOFF pesticide, Dimethoate; at point-of-sale; kg AI: 4.37369e-6 kg; = p1822
- CUTOFF prepare soil; for unspec. till, cotton: 0.00120966 ha; = p0939
- CUTOFF nitrogenous fertilizer, sodium nitrate; at point-of-sale: 0.000301377 kg; = p1069
- CUTOFF pesticide, Aldicarb; at point-of-sale; kg AI: 0.000543795 kg; = p1768
- CUTOFF pesticide, Paraquat dichloride; at point-of-sale; kg AI: 5.39422e-5 kg; = p1901
- CUTOFF pesticide, Cyclanilide; at point-of-sale; kg AI: 7.43527e-5 kg; = p1803
- CUTOFF sulfuric acid; at point-of-sale: 1.84807e-7 kg; = p1178
- CUTOFF apply manure; broadcast without incorporation: 2.55634e-5 ha; = p1248
- CUTOFF international vessel transport; average fuel: 2.2357 metric ton*km; = p2006
- CUTOFF apply N fertilizer; broadcast with incorporation: 5.61119e-5 ha; = p1031
- CUTOFF pesticide, beta-Cyfluthrin; at point-of-sale; kg AI: 2.18684e-5 kg; = p1804
- CUTOFF phosphatic fertilizer, diammonium phosphate; at point-of-sale: 0.0619143 kg; = p1119
- CUTOFF apply pesticide; banded or side-dressed: 0.000868242 ha; = p1329
- CUTOFF local area trucking; class 6, average fuel: 0.0176445 metric ton*km; = p2010
- CUTOFF apply P fertilizer; broadcast without incorporation: 0.000310202 ha; = p1091
- CUTOFF pesticide, Deltamethrin; at point-of-sale; kg AI: 4.37369e-6 kg; = p1807
- CUTOFF pesticide, Prometryn; at point-of-sale; kg AI: 0.000240553 kg; = p1911
- CUTOFF pesticide, Ethephon; at point-of-sale; kg AI: 0.00114591 kg; = p1832
- CUTOFF pesticide, 1,1-Dimethylpiperidinium chloride; at point-of-sale; kg AI: 3.93632e-5 kg; = p1879
- CUTOFF phosphatic fertilizer, superphos. grades 22% and under; at point-of-sale: 0.000219275 kg; = p1116
- CUTOFF unspecified animal manure; from unspecified storage; at point-of-sale: 0.06832 kg; = p1316
- CUTOFF pesticide, Pyrithiobac-sodium; at point-of-sale; kg AI: 8.74738e-6 kg; = p1923
- CUTOFF pesticide, Quintozene; at point-of-sale; kg AI: 2.47842e-5 kg; = p1902
- CUTOFF harvest; cotton residue management: 0.00120966 ha; = p1975
- CUTOFF pesticide storage: 0.00679322 kg*a; = p1965

## Inputs from nature
- Dry matter except CNPK; from plant uptake: 3.49174 kg; = p0917
- Potassium; from plant uptake; biogenic: 0.0250339 kg; = p0915
- Transformation, to annual crop [natural resource, land]: 12.0966 m2; = 1.0 * (p0857)
- Occupation, annual crop [natural resource, land]: 5.30195 m2*year; = 1.0 * (p0855)
- Transformation, from annual crop [natural resource, land]: 12.0966 m2; = 1.0 * (p0873+p0877+p0875+p0883+p0879+p0871)
- Carbon dioxide: 8.74455 kg; = p0900*3.6666666667
- Nitrogen: 0.114844 kg; = p0905
- Phosphorus: 0.0197175 kg; = p0910
- Water, unspecified origin: 0.00102156 m3; = p0916*0.001+p0893*0.001

## Emissions to nature
- Ammonium nitrate; broadcast w/ incorp. in fert. in spr. bef. plant.: 0.00109795 kg; = p2671*4.7142857143
- Acrylonitrile: 1.92269e-7 kg; = p2156*1.4722222222
- Dimethipin [soil, agricultural]: 3.77696e-5 kg; = 1.0 * (p3552+p5200+p3964+p4994+p4582+p4170)
- Nonvolatile constituents; broadcast w/ incorp. in man. at unknown time; exc.CNPK,biogenic: 0.0010154 kg; = p3398
- Propanenitrile: 3.67545e-7 kg; = p2157*1.5277777778
- Sodium nitrate; unspec. appl. method in fert. in spr. bef. plant.: 5.38567e-10 kg; = p3071*6.0714285714
- Phenol [air, non-urban air or from high stacks]: 2.97511e-6 kg; = 1.0 * (p2133*1.3055555556)
- Urea; no broadcast in fert. after plant.: 0.00942231 kg; = p2568*5
- Water [air, non-urban air or from high stacks]: 9.22155e-7 m3; = 0.001 * (p2016)
- Ammonium nitrate; broadcast w/o incorp. in fert. at plant.: 0.0025033 kg; = p2905*4.7142857143
- Superphosphate, grades>22%; broadcast w/ incorp. in fert. in spr. bef. plant.; kg P: 0.000236226 kg; = p2698
- Aqueous ammonia; broadcast w/o incorp. in fert. at plant.: 8.59831e-5 kg; = p2903*1.2142857143
- Monoammonium phosphate; broadcast w/ incorp. in fert. in fall bef. plant.: 0.000905517 kg; = p2654*8.2142857143
- 1-Butene: 7.67852e-7 kg; = p2144*1.1666666667
- Zeta-cypermethrin [soil, agricultural]: 7.26338e-6 kg; = 1.0 * (p3688+p4306+p4100+p5336+p5130+p4718)
- Anhydrous ammonia; broadcast w/ incorp. in fert. in fall bef. plant.: 0.000458669 kg; = p2628*1.2142857143
- Volatile constituents; broadcast w/ incorp. in man. in spr.bef.plant.: 0.0065229 kg; = p3391
- Other limestone constituents; applied in limestone: 0.00454075 kg; = p3220
- Aldicarb [soil, agricultural]: 0.000541848 kg; = 1.0 * (p3911+p4529+p4117+p3499+p5147+p4941)
- Ammonium nitrate; no broadcast in fert. in fall bef. plant.: 0.000424171 kg; = p2437*4.7142857143
- Nitrogen; applied in sewage sludge: 2.94691e-8 kg; = p3240
- Potassium chloride; no broadcast in fert. in fall bef. plant.: 0.00250046 kg; = p2468*2.2166666667
- Propane [air, non-urban air or from high stacks]: 1.61548e-6 kg; = 1.0 * (p2142*1.2222222222)
- Ammonium nitrate; broadcast w/o incorp. in fert. in spr. bef. plant.: 0.00280287 kg; = p2866*4.7142857143
- Urea; broadcast w/ incorp. in fert. at plant.: 0.00167526 kg; = p2724*5
- Thidiazuron [soil, agricultural]: 1.30741e-5 kg; = 1.0 * (p4291+p3673+p4703+p4085+p5321+p5115)
- Volatile constituents; broadcast w/o incorp. in man. at unknown time: 0.00103876 kg; = p3416
- Other single phosphates; broadcast w/ incorp. in fert. in fall bef. plant.; kg P: 2.65938e-5 kg; = p2661
- Potassium; broadcast w/ incorp. in manure in spring before planting; biogenic: 0.000776232 kg; = p3390
- Other single phosphates; no broadcast in fert. in fall bef. plant.; kg P: 2.40234e-5 kg; = p2466
- Ethyne [air, non-urban air or from high stacks]: 1.56137e-6 kg; = 1.0 * (p2132*1.0833333333)
- Tribufos: 8.71608e-7 kg; = p3888
- Other single phosphates; broadcast w/ incorp. in fert. in spr. bef. plant.; kg P: 0.000128884 kg; = p2700
- Acetonitrile [air, non-urban air or from high stacks]: 1.20411e-6 kg; = 1.0 * (p2155*1.7083333333)
- Nitrogen solution; broadcast w/ incorp. in fert. in fall bef. plant.; broadcast w/ incorp. in fert. in fall bef. plan...: 0.000323478 kg; = p2639
- Urea; broadcast w/ incorp. in fert. in spr. bef. plant.: 0.00187575 kg; = p2685*5
- Ammonium sulfate; broadcast w/o incorp. in fert. in spr. bef. plant.: 0.00116049 kg; = p2869*4.7142857143
- Acetic acid [air, non-urban air or from high stacks]: 3.20921e-5 kg; = 1.0 * (p2127*2.5)
- Potassium; in below-ground residue; biogenic: 0.000909728 kg; = p2176
- Pyrithiobac sodium salt: 3.13153e-8 kg; = p3860
- trans-2-Butene: 3.26624e-7 kg; = p2148*1.1666666667
- Sodium nitrate; broadcast w/ incorp. in fert. in spr. bef. plant.: 1.06022e-5 kg; = p2681*6.0714285714
- Anhydrous ammonia; unspec. appl. method in fert. in fall bef. plant.: 2.32993e-8 kg; = p3018*1.2142857143
- Ammonium sulfate; no broadcast in fert. after plant.: 0.00228352 kg; = p2557*4.7142857143
- Aqueous ammonia; unspec. appl. method in fert. after plant.: 6.3024e-9 kg; = p3137*1.2142857143
- Ammonium nitrate; broadcast w/ incorp. in fert. in fall bef. plant.: 0.000277804 kg; = p2632*4.7142857143
- Aqueous ammonia; unspec. appl. method in fert. at plant.: 1.71094e-9 kg; = p3098*1.2142857143
- Acephate [soil, agricultural]: 5.81071e-5 kg; = 1.0 * (p5141+p3905+p4935+p3493+p4523+p4111)
- Pentane [air, non-urban air or from high stacks]: 1.21349e-7 kg; = 1.0 * (p2152*1.0166666667)
- Nonvolatile constituents; broadcast w/incorp. in man. in spr.bef.plant; exc.CNPK,biogenic: 0.00347336 kg; = p3392
- Other single K nutrients; no broadcast in fert. in spr. bef. plant.; kg K: 0.000464459 kg; = p2509
- Cyclanilide: 2.6618e-7 kg; = p3740
- Other single K nutrients; no broadcast in fert. at plant.; kg K: 3.86627e-5 kg; = p2548
- Other single phosphates; broadcast w/o incorp. in fert. in fall bef. plant.; kg P: 3.33571e-5 kg; = p2856
- Diammonium phosphate; no broadcast in fert. in spr. bef. plant.: 0.00903982 kg; = p2494*4.7142857143
- Nitrogen; in below-ground residue: 0.00954737 kg; = p2174
- Other single K nutrients; unspec. appl. method in fert. in spr. bef. plant.; kg K: 8.84116e-5 kg; = p3094
- Nitrogen; broadcast w/o incorp. in manure at an unknown time: 0.000156354 kg; = p3413
- Ammonium sulfate; unspec. appl. method in fert. in fall bef. plant.: 5.8428e-9 kg; = p3025*4.7142857143
- Monoammonium phosphate; no broadcast in fert. at plant.: 0.00170834 kg; = p2537*8.2142857143
- Diammonium phosphate; broadcast w/ incorp. in fert. at plant.: 0.00431235 kg; = p2728*4.7142857143
- Nitrogen solution; no broadcast in fert. in spr. bef. plant.; no broadcast in fert. in spr. bef. plant.; kg N: 0.00195205 kg; = p2483
- Anhydrous ammonia; unspec. appl. method in fert. after plant.: 3.02946e-7 kg; = p3135*1.2142857143
- Urea; broadcast w/o incorp. in fert. at plant.: 0.00427666 kg; = p2919*5
- Plant dry matter; in below-ground residue: 0.286575 kg; = p2177
- Dinitrogen monoxide [air, non-urban air or from high stacks]: 4.01596e-7 kg; = 1.0 * (p2044*1.5714285714)
- Superphosphate, grades>22%; no broadcast in fert. in spr. bef. plant.; kg P: 0.000213393 kg; = p2503
- Urea; unspec. appl. method in fert. in fall bef. plant.: 2.41087e-8 kg; = p3036*5
- Anhydrous ammonia; broadcast w/o incorp. in fert. in spr. bef. plant.: 0.00462769 kg; = p2862*1.2142857143
- Urea, sulfate; broadcast by air; kg AI: 4.1284e-6 kg; = p3830
- Urea; broadcast w/ incorp. in fert. after plant.: 0.00617099 kg; = p2763*5
- Superphosphate, grades>22%; broadcast w/ incorp. in fert. in fall bef. plant.; kg P: 4.87427e-5 kg; = p2659
- Anhydrous ammonia; broadcast w/o incorp. in fert. after plant.: 0.0152246 kg; = p2940*1.2142857143
- Other single K nutrients; broadcast w/ incorp. in fert. after plant.; kg K: 0.000418092 kg; = p2782
- Clethodim [soil, agricultural]: 4.35803e-6 kg; = 1.0 * (p5174+p4968+p4144+p3938+p4556+p3526)
- Other single phosphates; broadcast w/o incorp. in fert. at plant.; kg P: 6.96648e-5 kg; = p2934
- Nitrogen solution; unspec. appl. method in fert. in spr. bef. plant.; unspec. appl. method in fert. in spr. bef. plan...: 6.49427e-8 kg; = p3068
- Other single K nutrients; no broadcast in fert. after plant.; kg K: 0.000105914 kg; = p2587
- Anhydrous ammonia; unspec. appl. method in fert. in spr. bef. plant.: 9.20841e-8 kg; = p3057*1.2142857143
- Ammonium sulfate; broadcast w/ incorp. in fert. in fall bef. plant.: 0.000115021 kg; = p2635*4.7142857143
- Aqueous ammonia; broadcast w/ incorp. in fert. in fall bef. plant.: 9.54201e-6 kg; = p2630*1.2142857143
- Phosphorous; broadcast w/ incorp. in manure at an unknown time: 0.000102999 kg; = p3395
- Nitrogen solution; broadcast w/o incorp. in fert. in spr. bef. plant.; broadcast w/o incorp. in fert. in spr. bef. pl...: 0.00326369 kg; = p2873
- Urea; broadcast w/o incorp. in fert. after plant.: 0.0157535 kg; = p2958*5
- Superphosphate, grades<= 22%; broadcast w/ incorp. in fert. after plant.; kg P: 5.62478e-7 kg; = p2774
- Metalaxyl-M [soil, agricultural]: 1.45268e-6 kg; = 1.0 * (p5051+p4227+p5257+p3609+p4021+p4639)
- Ammonium nitrate; broadcast w/o incorp. in fert. after plant.: 0.00922112 kg; = p2944*4.7142857143
- Sodium nitrate; broadcast w/ incorp. in fert. in fall bef. plant.: 2.68259e-6 kg; = p2642*6.0714285714
- Urea; broadcast w/o incorp. in fert. in fall bef. plant.: 0.00121158 kg; = p2841*5
- Ethane [air, non-urban air or from high stacks]: 5.21242e-6 kg; = 1.0 * (p2126*1.25)
- Pesticide formulation balance; in seed furrow: 0.0002695 kg; = p5132
- Nonvolatile constituents; broadcast w/o incorp. in man. at unknown time; exc.CNPK,biogenic: 0.000553126 kg; = p3417
- Ammonium nitrate; unspec. appl. method in fert. at plant.: 4.98119e-8 kg; = p3100*4.7142857143
- Other single phosphates; broadcast w/o incorp. in fert. in spr. bef. plant.; kg P: 0.000161661 kg; = p2895
- Glyphosate [air, non-urban air or from high stacks]: 4.49374e-6 kg; = 1.0 * (p3792)
- Butadiene [air, non-urban air or from high stacks]: 8.6546e-7 kg; = 1.0 * (p2143*1.125)
- Superphosphate, grades<= 22%; broadcast w/o incorp. in fert. in fall bef. plant.; kg P: 8.69225e-7 kg; = p2852
- Acetol; from residue burning: 2.15975e-5 kg; = p2134*2.0555555556
- Plant dry matter; in aboveground residue left on field: 0.684218 kg; = p2172
- Pendimethalin [air, non-urban air or from high stacks]: 1.31524e-6 kg; = 1.0 * (p3840)
- Ammonia [air, non-urban air or from high stacks]: 1.24476e-5 kg; = 1.0 * (p2159*1.2142857143)
- Thidiazuron: 4.69729e-8 kg; = p3879
- Ethephon [soil, agricultural]: 0.0011418 kg; = 1.0 * (p5211+p3563+p4181+p3975+p5005+p4593)
- MSMA [soil, agricultural]: 0.000598503 kg; = 1.0 * (p5273+p4243+p4037+p3625+p4655+p5067)
- Methane: 1.88955e-5 kg; = p2025*1.3333333333
- Aldicarb: 1.94677e-6 kg; = p3705
- Superphosphate, grades>22%; no broadcast in fert. in fall bef. plant.; kg P: 4.40315e-5 kg; = p2464
- Nitrogen; broadcast w/ incorp. in manure in spring before planting: 0.000981825 kg; = p3388
- Nitrogen; broadcast w/ incorp. in manure at an unknown time: 0.000287027 kg; = p3394
- Hydrocyanic acid: 1.63637e-6 kg; = p2154*2.25
- Gypsum: 5.84066e-6 kg; = p3229
- Nitrogen solution; unspec. appl. method in fert. at plant.; unspec. appl. method in fert. at plant.; kg N: 5.80015e-8 kg; = p3107
- Bromoxynil [soil, agricultural]: 5.66544e-5 kg; = 1.0 * (p4129+p3923+p4541+p5159+p4953+p3511)
- Potassium; broadcast w/o incorp. in manure in spring before planting; biogenic: 0.000422841 kg; = p3409
- Particulates, < 10 um: 5.08784e-5 kg; = p2034+p2036
- Anhydrous ammonia; no broadcast in fert. after plant.: 0.00910596 kg; = p2550*1.2142857143
- Other single K nutrients; broadcast w/o incorp. in fert. in spr. bef. plant.; kg K: 0.00388848 kg; = p2899
- Sodium nitrate; no broadcast in fert. at plant.: 1.4458e-5 kg; = p2525*6.0714285714
- Aqueous ammonia; broadcast w/o incorp. in fert. in spr. bef. plant.: 9.62729e-5 kg; = p2864*1.2142857143
- Other single K nutrients; broadcast w/ incorp. in fert. at plant.; kg K: 0.000152619 kg; = p2743
- Superphosphate, grades<= 22%; no broadcast in fert. at plant.; kg P: 1.30738e-6 kg; = p2540
- Aqueous ammonia; broadcast w/ incorp. in fert. in spr. bef. plant.: 3.77122e-5 kg; = p2669*1.2142857143
- Phorate: 1.82672e-7 kg; = p3843
- Carbon monoxide, fossil [air, non-urban air or from high stacks]: 0.000419295 kg; = 1.0 * (p2028*2.3333333333)
- Sodium nitrate; unspec. appl. method in fert. at plant.: 4.81004e-10 kg; = p3110*6.0714285714
- Monoammonium phosphate; broadcast w/o incorp. in fert. in spr. bef. plant.: 0.00550455 kg; = p2888*8.2142857143
- Urea, sulfate; in seed furrow; kg AI: 9.34182e-5 kg; = p5066
- Nitrogen solution; unspec. appl. method in fert. after plant.; unspec. appl. method in fert. after plant.; kg N: 2.13654e-7 kg; = p3146
- Magnesium [soil, agricultural]: 0.00134513 kg; = 1.0 * (p3227)
- Acetone [air, non-urban air or from high stacks]: 2.55975e-6 kg; = 1.0 * (p2139*1.6111111111)
- Sulfur [soil, agricultural]: 6.97072e-7 kg; = 1.0 * (p3230)
- Butane [air, non-urban air or from high stacks]: 3.48484e-7 kg; = 1.0 * (p2147*1.0208333333)
- Methanol [air, non-urban air or from high stacks]: 1.88518e-5 kg; = 1.0 * (p2129*2.6666666667)
- Deltamethrin: 1.56576e-8 kg; = p3744
- Anhydrous ammonia; broadcast w/o incorp. in fert. in fall bef. plant.: 0.0011709 kg; = p2823*1.2142857143
- Aqueous ammonia; unspec. appl. method in fert. in fall bef. plant.: 4.8471e-10 kg; = p3020*1.2142857143
- Potassium chloride; no broadcast in fert. in spr. bef. plant.: 0.0118098 kg; = p2507*2.2166666667
- Pyrithiobac sodium salt [soil, agricultural]: 8.71606e-6 kg; = 1.0 * (p5096+p5302+p4684+p4272+p4066+p3654)
- Superphosphate, grades>22%; no broadcast in fert. after plant.; kg P: 3.57391e-5 kg; = p2581
- Cyfluthrin [air, non-urban air or from high stacks]: 7.82882e-8 kg; = 1.0 * (p3741)
- Filler materials, applied with synthetic fertilizer: 0.143947 kg; = p2432
- Urea; no broadcast in fert. at plant.: 0.00255791 kg; = p2529*5
- Other single K nutrients; unspec. appl. method in fert. at plant.; kg K: 7.35961e-6 kg; = p3133
- Sewage sludge dry matter; applied in sewage sludge: 3.26252e-9 kg; = p3243
- Isoprene [air, non-urban air or from high stacks]: 2.16439e-6 kg; = 1.0 * (p2145*1.1333333333)
- Nitrogen solution; unspec. appl. method in fert. in fall bef. plant.; unspec. appl. method in fert. in fall bef. plan...: 1.64319e-8 kg; = p3029
- Phosphorous; broadcast w/ incorp. in manure in spring before planting: 0.000352325 kg; = p3389
- Clethodim [air, non-urban air or from high stacks]: 1.56576e-8 kg; = 1.0 * (p3732)
- Ammonium nitrate; unspec. appl. method in fert. after plant.: 1.83487e-7 kg; = p3139*4.7142857143
- Sodium nitrate; broadcast w/o incorp. in fert. in fall bef. plant.: 6.8482e-6 kg; = p2837*6.0714285714
- Nitrogen solution; broadcast w/o incorp. in fert. in fall bef. plant.; broadcast w/o incorp. in fert. in fall bef. pl...: 0.000825785 kg; = p2834
- Formic acid [air, non-urban air or from high stacks]: 5.7476e-6 kg; = 1.0 * (p2131*3.8333333333)
- Diammonium phosphate; broadcast w/ incorp. in fert. in fall bef. plant.: 0.00206485 kg; = p2650*4.7142857143
- isobutene: 6.70438e-7 kg; = p2150*1.1666666667
- Monoammonium phosphate; broadcast w/o incorp. in fert. at plant.: 0.00237208 kg; = p2927*8.2142857143
- Deltamethrin [soil, agricultural]: 4.35803e-6 kg; = 1.0 * (p5186+p4980+p4568+p3538+p3950+p4156)
- Acetaldehyde [air, non-urban air or from high stacks]: 7.13411e-6 kg; = 1.0 * (p2130*1.8333333333)
- Other single K nutrients; unspec. appl. method in fert. after plant.; kg K: 2.01612e-5 kg; = p3172
- Potassium chloride; unspec. appl. method in fert. in fall bef. plant.: 0.000475972 kg; = p3053*2.2166666667
- Ammonium sulfate; unspec. appl. method in fert. after plant.: 7.59704e-8 kg; = p3142*4.7142857143
- Potassium; broadcast w/ incorp. in manure at an unknown time: 0.000226924 kg; = p3396
- Benzene [air, non-urban air or from high stacks]: 8.80169e-7 kg; = 1.0 * (p2140*1.0833333333)
- Lambda-cyhalothrin: 5.74113e-8 kg; = p3807
- Superphosphate, grades<= 22%; broadcast w/o incorp. in fert. at plant.; kg P: 1.81534e-6 kg; = p2930
- Potassium chloride; unspec. appl. method in fert. in spr. bef. plant.: 0.00224804 kg; = p3092*2.2166666667
- Quintozene [soil, agricultural]: 2.46955e-5 kg; = 1.0 * (p4251+p5075+p3633+p4663+p5281+p4045)
- Ammonium sulfate; broadcast w/ incorp. in fert. at plant.: 0.000406004 kg; = p2713*4.7142857143
- Urea; unspec. appl. method in fert. after plant.: 3.13471e-7 kg; = p3153*5
- Superphosphate, grades<= 22%; broadcast w/ incorp. in fert. at plant.; kg P: 1.44727e-6 kg; = p2735
- Urea; unspec. appl. method in fert. in spr. bef. plant.: 9.52832e-8 kg; = p3075*5
- Nitrogen solution; broadcast w/o incorp. in fert. after plant.; broadcast w/o incorp. in fert. after plant.; kg N: 0.0107372 kg; = p2951
- Urea; broadcast w/o incorp. in fert. in spr. bef. plant.: 0.00478846 kg; = p2880*5
- Seeds; used in planting and sowing: 0.0161333 kg; = p2179
- Diammonium phosphate; broadcast w/o incorp. in fert. in fall bef. plant.: 0.00258998 kg; = p2845*4.7142857143
- Aqueous ammonia; no broadcast in fert. after plant.: 0.000189437 kg; = p2552*1.2142857143
- Superphosphate, grades<= 22%; no broadcast in fert. after plant.; kg P: 5.08111e-7 kg; = p2579
- Pesticide formulation balance; broadcast with incorporation: 0.0018604 kg; = p4102
- Monoammonium phosphate; broadcast w/ incorp. in fert. in spr. bef. plant.: 0.00438848 kg; = p2693*8.2142857143
- Cyanazine: 6.6284e-7 kg; = p3739
- Sodium nitrate; no broadcast in fert. in fall bef. plant.: 4.09598e-6 kg; = p2447*6.0714285714
- Sodium nitrate; broadcast w/o incorp. in fert. at plant.: 2.41729e-5 kg; = p2915*6.0714285714
- Diammonium phosphate; broadcast w/o incorp. in fert. after plant.: 0.00210222 kg; = p2962*4.7142857143
- Aqueous ammonia; unspec. appl. method in fert. in spr. bef. plant.: 1.91569e-9 kg; = p3059*1.2142857143
- Diammonium phosphate; no broadcast in fert. in fall bef. plant.: 0.00186527 kg; = p2455*4.7142857143
- Superphosphate, grades>22%; broadcast w/o incorp. in fert. at plant.; kg P: 0.000127686 kg; = p2932
- Mepiquat chloride [soil, agricultural]: 3.92223e-5 kg; = 1.0 * (p5052+p3610+p5258+p4228+p4022+p4640)
- Nitrogen solution; broadcast w/ incorp. in fert. at plant.; broadcast w/ incorp. in fert. at plant.; kg N: 0.00114182 kg; = p2717
- Paraquat dichloride: 5.3749e-5 kg; = p5074+p5280+p4250+p4662+p4044+p3632
- Sodium nitrate; unspec. appl. method in fert. in fall bef. plant.: 1.36269e-10 kg; = p3032*6.0714285714
- Acephate [air, non-urban air or from high stacks]: 2.08769e-7 kg; = 1.0 * (p3699)
- Urea; no broadcast in fert. in fall bef. plant.: 0.000724659 kg; = p2451*5
- Sodium nitrate; no broadcast in fert. after plant.: 5.32575e-5 kg; = p2564*6.0714285714
- Urea; unspec. appl. method in fert. at plant.: 8.50992e-8 kg; = p3114*5
- Phosphorous; applied in sewage sludge: 3.51792e-9 kg; = p3241
- Mepiquat chloride: 1.40919e-7 kg; = p3816
- Monoammonium phosphate; broadcast w/o incorp. in fert. after plant.: 0.000921903 kg; = p2966*8.2142857143
- Ammonium sulfate; broadcast w/o incorp. in fert. after plant.: 0.00381789 kg; = p2947*4.7142857143
- Nonvolatile constituents;broadcast w/o incorp. in man. in spr.bef.plant; exc.CNPK,biogenic: 0.00189206 kg; = p3411
- Ammonium nitrate; no broadcast in fert. after plant.: 0.00551524 kg; = p2554*4.7142857143
- Ammonium sulfate; broadcast w/ incorp. in fert. in spr. bef. plant.: 0.000454591 kg; = p2674*4.7142857143
- Nitrogen solution; no broadcast in fert. at plant.; no broadcast in fert. at plant.; kg N: 0.00174341 kg; = p2522
- Particulates, < 2.5 um [air, non-urban air or from high stacks]: 3.55059e-5 kg; = 1.0 * (p2035+p2033)
- Anhydrous ammonia; no broadcast in fert. at plant.: 0.00247203 kg; = p2511*1.2142857143
- Sodium nitrate; unspec. appl. method in fert. after plant.: 1.77183e-9 kg; = p3149*6.0714285714
- Other single phosphates; no broadcast in fert. in spr. bef. plant.; kg P: 0.000116426 kg; = p2505
- Other single phosphates; no broadcast in fert. at plant.; kg P: 5.01717e-5 kg; = p2544
- cis-2-Butene: 2.464e-7 kg; = p2149*1.1666666667
- Monoammonium phosphate; no broadcast in fert. in spr. bef. plant.: 0.0039643 kg; = p2498*8.2142857143
- Dimethoate [soil, agricultural]: 4.35803e-6 kg; = 1.0 * (p4583+p5201+p4171+p3965+p4995+p3553)
- Quintozene: 8.87266e-8 kg; = p3839
- Anhydrous ammonia; broadcast w/o incorp. in fert. at plant.: 0.00413307 kg; = p2901*1.2142857143
- Cypermethrin: 2.60961e-8 kg; = p3743
- Nitrogen solution; broadcast w/ incorp. in fert. after plant.; broadcast w/ incorp. in fert. after plant.; kg N: 0.00420599 kg; = p2756
- Trifluralin [soil, agricultural]: 0.000108951 kg; = 1.0 * (p4304+p5334+p4098+p3686+p5128+p4716)
- Dimethoate: 1.56576e-8 kg; = p3759
- Cypermethrin [soil, agricultural]: 7.26338e-6 kg; = 1.0 * (p5185+p3537+p4979+p4155+p3949+p4567)
- Aqueous ammonia; no broadcast in fert. in fall bef. plant.: 1.45694e-5 kg; = p2435*1.2142857143
- Prometryn [soil, agricultural]: 0.000239692 kg; = 1.0 * (p3642+p5290+p5084+p4054+p4260+p4672)
- Volatile constituents; broadcast w/o incorp. in man. in spr.bef.plant.: 0.00355326 kg; = p3410
- Nitrogen dioxide: 1.97389e-5 kg; = p2039*3.2857142857
- Other single K nutrients; broadcast w/o incorp. in fert. in fall bef. plant.; kg K: 0.000823298 kg; = p2860
- Potassium chloride; unspec. appl. method in fert. at plant.: 0.000187132 kg; = p3131*2.2166666667
- Diammonium phosphate; broadcast w/o incorp. in fert. in spr. bef. plant.: 0.012552 kg; = p2884*4.7142857143
- Potassium; broadcast w/o incorp. in manure at an unknown time: 0.000123614 kg; = p3415
- Water: 0.740854 kg; = p3399+p2171+p2181+p3418+p2178
- Ammonium sulfate; broadcast w/ incorp. in fert. after plant.: 0.00149555 kg; = p2752*4.7142857143
- Ammonium nitrate; broadcast w/o incorp. in fert. in fall bef. plant.: 0.000709186 kg; = p2827*4.7142857143
- Anhydrous ammonia; no broadcast in fert. in fall bef. plant.: 0.000700329 kg; = p2433*1.2142857143
- Urea, sulfate; banded or side-dressed; kg AI: 0.000126197 kg; = p3624
- Volatile constituents; broadcast w/ incorp. in man. at unknown time: 0.00190691 kg; = p3397
- Metalaxyl-M: 5.21921e-9 kg; = p3815
- Diammonium phosphate; no broadcast in fert. at plant.: 0.00389553 kg; = p2533*4.7142857143
- Phosphorous; in below-ground residue: 0.00120024 kg; = p2175
- Cyanazine [soil, agricultural]: 0.00018449 kg; = 1.0 * (p4975+p3533+p3945+p4151+p4563+p5181)
- Sodium nitrate; broadcast w/o incorp. in fert. in spr. bef. plant.: 2.70657e-5 kg; = p2876*6.0714285714
- Ammonium sulfate; broadcast w/o incorp. in fert. at plant.: 0.00103646 kg; = p2908*4.7142857143
- Bromoxynil: 2.03549e-7 kg; = p3717
- Propene [air, non-urban air or from high stacks]: 3.87769e-6 kg; = 1.0 * (p2136*1.1666666667)
- Potassium chloride; broadcast w/ incorp. in fert. after plant.: 0.0106308 kg; = p2780*2.2166666667
- Diammonium phosphate; no broadcast in fert. after plant.: 0.00151399 kg; = p2572*4.7142857143
- Monoammonium phosphate; no broadcast in fert. after plant.: 0.000663943 kg; = p2576*8.2142857143
- Calcium [soil, agricultural]: 0.0308642 kg; = 1.0 * (p3218+p3226)
- Superphosphate, grades>22%; broadcast w/o incorp. in fert. in fall bef. plant.; kg P: 6.11389e-5 kg; = p2854
- Superphosphate, grades<= 22%; no broadcast in fert. in spr. bef. plant.; kg P: 3.03386e-6 kg; = p2501
- Ash: 0.00113458 kg; = p2021+p2022
- Ammonium nitrate; broadcast w/ incorp. in fert. after plant.: 0.00361212 kg; = p2749*4.7142857143
- Diammonium phosphate; broadcast w/o incorp. in fert. at plant.: 0.00540906 kg; = p2923*4.7142857143
- Potassium chloride; no broadcast in fert. at plant.: 0.000983076 kg; = p2546*2.2166666667
- S,S,S-tributyl phosphorotrithioate: 0.000242597 kg; = p4300+p3682+p5124+p4094+p5330+p4712
- Dioxins and furans (PCDD/F); from residue burning: 1.7208e-13 kg TEQ; = p2047
- Oxygen; applied in limestone: 0.0341155 kg; = p3219
- Pesticide formulation balance; banded or side-dressed: 0.000364062 kg; = p3690
- Sulfuric acid [soil, agricultural]: 1.84807e-7 kg; = 1.0 * (p3231)
- Diammonium phosphate; broadcast w/ incorp. in fert. after plant.: 0.00167598 kg; = p2767*4.7142857143
- Ammonium nitrate; unspec. appl. method in fert. in fall bef. plant.: 1.41118e-8 kg; = p3022*4.7142857143
- Dimethipin: 1.357e-7 kg; = p3758
- Urea, sulfate; broadcast with incorporation; kg AI: 0.000644881 kg; = p4036
- Ammonium sulfate; no broadcast in fert. in spr. bef. plant.: 0.000694102 kg; = p2479*4.7142857143
- Ethephon: 4.1023e-6 kg; = p3769
- Nitrogen solution; broadcast w/ incorp. in fert. in spr. bef. plant.; broadcast w/ incorp. in fert. in spr. bef. plan...: 0.00127846 kg; = p2678
- Aqueous ammonia; no broadcast in fert. in spr. bef. plant.: 5.75818e-5 kg; = p2474*1.2142857143
- Pesticide formulation balance; foliar or directed spray: 0.000495259 kg; = p4720
- Paraquat dichloride: 1.93111e-7 kg; = p3838
- Anhydrous ammonia; broadcast w/ incorp. in fert. at plant.: 0.00161902 kg; = p2706*1.2142857143
- Aqueous ammonia; no broadcast in fert. at plant.: 5.14273e-5 kg; = p2513*1.2142857143
- Anhydrous ammonia; broadcast w/ incorp. in fert. after plant.: 0.0059638 kg; = p2745*1.2142857143
- Potassium chloride; no broadcast in fert. after plant.: 0.00269308 kg; = p2585*2.2166666667
- Potassium chloride; broadcast w/o incorp. in fert. at plant.: 0.00823037 kg; = p2936*2.2166666667
- Pesticide formulation balance; unspec. appl. method: 8.43485e-5 kg; = p5338
- cyclopentane: 9.48764e-9 kg; = p2153*1.0166666667
- I butane; from residue burning: 1.21001e-7 kg; = p2146*1.0208333333
- Ammonium sulfate; unspec. appl. method in fert. at plant.: 2.0624e-8 kg; = p3103*4.7142857143
- Pesticide formulation balance; broadcast without incorporation: 0.000241344 kg; = p4308
- 2,4-D [air, non-urban air or from high stacks]: 4.69729e-8 kg; = 1.0 * (p3691)
- Sodium nitrate; broadcast w/ incorp. in fert. at plant.: 9.46905e-6 kg; = p2720*6.0714285714
- Sodium nitrate; broadcast w/o incorp. in fert. after plant.: 8.90431e-5 kg; = p2954*6.0714285714
- MSMA: 2.15032e-6 kg; = p3831
- Other single phosphates; broadcast w/o incorp. in fert. after plant.; kg P: 2.70751e-5 kg; = p2973
- Monoammonium phosphate; broadcast w/ incorp. in fert. at plant.: 0.00189113 kg; = p2732*8.2142857143
- Potassium chloride; broadcast w/o incorp. in fert. in fall bef. plant.: 0.020934 kg; = p2858*2.2166666667
- Other single K nutrients; broadcast w/ incorp. in fert. in spr. bef. plant.; kg K: 0.00183343 kg; = p2704
- Other single phosphates; no broadcast in fert. after plant.; kg P: 1.94991e-5 kg; = p2583
- Fluometuron [soil, agricultural]: 0.000480836 kg; = 1.0 * (p5224+p4606+p3576+p5018+p4194+p3988)
- Nitrogen; broadcast w/o incorp. in manure in spring before planting: 0.000534835 kg; = p3407
- Glyphosate [soil, agricultural]: 0.00125075 kg; = 1.0 * (p4616+p3586+p5234+p3998+p5028+p4204)
- Ammonium sulfate; unspec. appl. method in fert. in spr. bef. plant.: 2.30921e-8 kg; = p3064*4.7142857143
- Aqueous ammonia; broadcast w/ incorp. in fert. at plant.: 3.36815e-5 kg; = p2708*1.2142857143
- Pendimethalin [soil, agricultural]: 0.000366075 kg; = 1.0 * (p4252+p5076+p3634+p4664+p4046+p5282)
- Cyclanilide [soil, agricultural]: 7.40865e-5 kg; = 1.0 * (p4976+p4564+p5182+p3946+p4152+p3534)
- Anhydrous ammonia; broadcast w/ incorp. in fert. in spr. bef. plant.: 0.00181277 kg; = p2667*1.2142857143
- 2,4-D [soil, agricultural]: 1.30741e-5 kg; = 1.0 * (p3485+p3897+p5133+p4515+p4103+p4927)
- Fluometuron: 1.72756e-6 kg; = p3782
- Potassium chloride; broadcast w/o incorp. in fert. after plant.: 0.0225467 kg; = p2975*2.2166666667
- Potassium; in above-ground residue left on field; biogenic: 0.00217204 kg; = p2170
- Urea; broadcast w/ incorp. in fert. in fall bef. plant.: 0.000474604 kg; = p2646*5
- Lambda-cyhalothrin [soil, agricultural]: 1.59794e-5 kg; = 1.0 * (p4219+p5043+p4013+p3601+p5249+p4631)
- Other single phosphates; broadcast w/ incorp. in fert. at plant.; kg P: 5.554e-5 kg; = p2739
- Urea, sulfate; broadcast without incorporation; kg AI: 8.36585e-5 kg; = p4242
- Urea; no broadcast in fert. in spr. bef. plant.: 0.00286402 kg; = p2490*5
- Potassium chloride; broadcast w/ incorp. in fert. in fall bef. plant.: 0.00987042 kg; = p2663*2.2166666667
- Ammonium nitrate; broadcast w/ incorp. in fert. at plant.: 0.000980596 kg; = p2710*4.7142857143
- Nitrogen solution; broadcast w/o incorp. in fert. at plant.; broadcast w/o incorp. in fert. at plant.; kg N: 0.00291487 kg; = p2912
- Superphosphate, grades<= 22%; broadcast w/o incorp. in fert. after plant.; kg P: 7.05526e-7 kg; = p2969
- Furan [air, non-urban air or from high stacks]: 6.27464e-7 kg; = 1.0 * (p2138*1.4166666667)
- Superphosphate, grades<= 22%; broadcast w/ incorp. in fert. in spr. bef. plant.; kg P: 3.35847e-6 kg; = p2696
- Urea, sulfate; unspec. appl. method; kg AI: 2.92382e-5 kg; = p5272
- Ammonium nitrate; no broadcast in fert. at plant.: 0.00149724 kg; = p2515*4.7142857143
- Norflurazon: 2.76618e-7 kg; = p3834
- Phosphorous; broadcast w/o incorp. in manure in spring before planting: 0.000191924 kg; = p3408
- Trifluralin [air, non-urban air or from high stacks]: 3.91441e-7 kg; = 1.0 * (p3892)
- Other single phosphates; broadcast w/ incorp. in fert. after plant.; kg P: 2.15855e-5 kg; = p2778
- Sodium nitrate; broadcast w/ incorp. in fert. after plant.: 3.48801e-5 kg; = p2759*6.0714285714
- Sodium nitrate; no broadcast in fert. in spr. bef. plant.: 1.61883e-5 kg; = p2486*6.0714285714
- Nitrogen solution; no broadcast in fert. in fall bef. plant.; no broadcast in fert. in fall bef. plant.; kg N: 0.00049391 kg; = p2444
- Other single K nutrients; unspec. appl. method in fert. in fall bef. plant.; kg K: 1.87192e-5 kg; = p3055
- Potassium chloride; broadcast w/ incorp. in fert. in spr. bef. plant.: 0.0466185 kg; = p2702*2.2166666667
- Superphosphate, grades<= 22%; no broadcast in fert. in fall bef. plant.; kg P: 6.26005e-7 kg; = p2462
- Superphosphate, grades>22%; broadcast w/ incorp. in fert. after plant.; kg P: 3.95631e-5 kg; = p2776
- Plant dry matter; from residue burning: 0.00207769 kg; = p2164
- Toluene [air, non-urban air or from high stacks]: 1.09255e-6 kg; = 1.0 * (p2141*1.0952380952)
- Phosphorous; broadcast w/o incorp. in manure at an unknown time: 5.61071e-5 kg; = p3414
- Superphosphate, grades>22%; no broadcast in fert. at plant.; kg P: 9.19576e-5 kg; = p2542
- isopentane: 9.70795e-8 kg; = p2151*1.0166666667
- Phosphorous; in above-ground residue left on field: 0.00286566 kg; = p2169
- Pesticide formulation balance; broadcast by air: 1.19099e-5 kg; = p3896
- Formaldehyde [air, non-urban air or from high stacks]: 1.19244e-5 kg; = 1.0 * (p2128*2.5)
- Monoammonium phosphate; broadcast w/ incorp. in fert. after plant.: 0.000734983 kg; = p2771*8.2142857143
- Other single K nutrients; broadcast w/o incorp. in fert. after plant.; kg K: 0.000886722 kg; = p2977
- Norflurazon [soil, agricultural]: 7.69919e-5 kg; = 1.0 * (p3628+p5276+p5070+p4040+p4246+p4658)
- Monoammonium phosphate; no broadcast in fert. in fall bef. plant.: 0.000817993 kg; = p2459*8.2142857143
- Potassium chloride; broadcast w/o incorp. in fert. in spr. bef. plant.: 0.0988722 kg; = p2897*2.2166666667
- Glycolaldehyde; from residue burning: 1.15565e-5 kg; = p2135*2.5
- Anhydrous ammonia; no broadcast in fert. in spr. bef. plant.: 0.00276787 kg; = p2472*1.2142857143
- Carbon [soil, agricultural]: 0.855467 kg; = 1.0 * (p3387+p3217+p3406+p3412+p3393+p2173+p3225+p3242+p2167)
- Phorate [soil, agricultural]: 5.08437e-5 kg; = 1.0 * (p5079+p4667+p4049+p3637+p4255+p5285)
- Potassium chloride; unspec. appl. method in fert. after plant.: 0.000512639 kg; = p3170*2.2166666667
- Other single K nutrients; broadcast w/o incorp. in fert. at plant.; kg K: 0.000323687 kg; = p2938
- Other single K nutrients; broadcast w/ incorp. in fert. in fall bef. plant.; kg K: 0.000388187 kg; = p2665
- Ammonium sulfate; no broadcast in fert. in fall bef. plant.: 0.000175623 kg; = p2440*4.7142857143
- Superphosphate, grades>22%; broadcast w/o incorp. in fert. after plant.; kg P: 4.96248e-5 kg; = p2971
- Superphosphate, grades<= 22%; broadcast w/o incorp. in fert. in spr. bef. plant.; kg P: 4.21259e-6 kg; = p2891
- Ethene [air, non-urban air or from high stacks]: 8.34593e-6 kg; = 1.0 * (p2125*1.1666666667)
- Ammonium nitrate; no broadcast in fert. in spr. bef. plant.: 0.00167642 kg; = p2476*4.7142857143
- Superphosphate, grades>22%; broadcast w/o incorp. in fert. in spr. bef. plant.; kg P: 0.000296302 kg; = p2893
- Nitrogen solution; no broadcast in fert. after plant.; no broadcast in fert. after plant.; kg N: 0.00642201 kg; = p2561
- Methyl vinyl ether; from residue burning: 4.35056e-7 kg; = p2137*1.6111111111
- Ammonium nitrate; unspec. appl. method in fert. in spr. bef. plant.: 5.5773e-8 kg; = p3061*4.7142857143
- Anhydrous ammonia; unspec. appl. method in fert. at plant.: 8.2242e-8 kg; = p3096*1.2142857143
- Nitrogen; in above-ground residue left on field: 0.022795 kg; = p2168
- Prometryn: 8.6117e-7 kg; = p3848
- Aqueous ammonia; broadcast w/o incorp. in fert. after plant.: 0.000316727 kg; = p2942*1.2142857143
- Other single K nutrients; no broadcast in fert. in fall bef. plant.; kg K: 9.83388e-5 kg; = p2470
- Potassium chloride; broadcast w/ incorp. in fert. at plant.: 0.00388064 kg; = p2741*2.2166666667
- Zeta-cypermethrin [air, non-urban air or from high stacks]: 2.60961e-8 kg; = 1.0 * (p3894)
- Monoammonium phosphate; broadcast w/o incorp. in fert. in fall bef. plant.: 0.00113581 kg; = p2849*8.2142857143
- Ammonium sulfate; no broadcast in fert. at plant.: 0.000619915 kg; = p2518*4.7142857143
- Superphosphate, grades<= 22%; broadcast w/ incorp. in fert. in fall bef. plant.; kg P: 6.92986e-7 kg; = p2657
- NMVOC, non-methane volatile organic compounds, unspecified origin [air, non-urban air or from high stacks]: 0.000147382 kg; = 1.0 * (p2052+p2051)
- Carbon dioxide, in air: 0.00734174 kg; = p2163*3.6666666667
- Ammonium sulfate; broadcast w/o incorp. in fert. in fall bef. plant.: 0.00029363 kg; = p2830*4.7142857143
- Urea, sulfate; foliar or directed spray; kg AI: 0.000171674 kg; = p4654
- Sodium chlorate [air, non-urban air or from high stacks]: 1.09603e-7 kg; = 1.0 * (p3867)
- Superphosphate, grades>22%; broadcast w/ incorp. in fert. at plant.; kg P: 0.000101797 kg; = p2737
- Oxygen; applied in dolomite: 0.0053232 kg; = p3228
- Zinc compounds: 2.02388e-7 kg; = p3232
- Aqueous ammonia; broadcast w/o incorp. in fert. in fall bef. plant.: 2.43591e-5 kg; = p2825*1.2142857143
- Aqueous ammonia; broadcast w/ incorp. in fert. after plant.: 0.000124069 kg; = p2747*1.2142857143
- Cyfluthrin [soil, agricultural]: 2.17902e-5 kg; = 1.0 * (p4565+p4153+p3535+p3947+p5183+p4977)
- Sodium chlorate: 3.05062e-5 kg; = p5309+p5103+p4279+p4073+p4691+p3661
- Diammonium phosphate; broadcast w/ incorp. in fert. in spr. bef. plant.: 0.0100071 kg; = p2689*4.7142857143

## Sampling procedure
A delete-a-group jackknife is used by the USDA to estimate the ARMS sample means and RSEs, based on a 15 sample delete-a-group jackknife. Because of this relatively small sample size, a Students t distribution is used to represent ARMS data probability density functions. Other representations of uncertainty are described in Cooper, J.S., Kahn, E., Noon, M. (2012). LCA Digital Commons Unit Process Data: field crop production Version 1. Prepared for the US Department of Agriculture National Agricultural Library. Retrieved from https://www.lcacommons.gov/discovery/docs/LCA%20Digital%20Commons%20Unit%20Process%20Data%20final%20updated.pdf

## Extrapolations
Data represent an aggregation of processes applied in North Carolina in 2000. Data development is demonstrated by parameterization (exlicitly presents all raw and uncertainty data and all calculations). Flow data quality according to the LCADC convention is provided for all flows.
