# durum wheat; at harvest in 2009; at farm; 88%-89% moisture

Dataset: EcoSpold 2, unit process
Geography: GLO
Time period: 2009-01-02 to 2010-01-01
Scenario: Business-as-Usual
System model: Allocation, ecoinvent default
Generated by: cooperjs@u.washington.edu
isCopyrightProtected: false

## General comment
This unit process/ gate-to-gate dataset represents the production of 1 kg durum wheat coproduced with residue. The process technologies are an aggregation of those applied in North Dakota in 2009. Applicable classifications include ISIC 0111, NAIC 111140, UNSPSC 50221101; this dataset was prepared in ILCD format using the UWDFE Lab Excel to ILCD File Generator (beta version, August 2013)

Exchange "Fluroxypyr-soil agricultural" is the result of combining the following original LCA Commons flows: "Fluroxypyr; foliar or directed spray; kg AI", "Fluroxypyr; unspec. appl. method; kg AI", "Fluroxypyr; broadcast with incorporation; kg AI".
Exchange "Clodinafop-propargyl-soil agricultural" is the result of combining the following original LCA Commons flows: "Clodinafop-propargyl; unspec. appl. method; kg AI", "Clodinafop-propargyl; broadcast with incorporation; kg AI", "Clodinafop-propargyl; foliar or directed spray; kg AI".
Exchange "Glyphosate-isopropylammonium-soil agricultural" is the result of combining the following original LCA Commons flows: "Glyphosate-isopropylammonium; unspec. appl. method; kg AI", "Glyphosate-isopropylammonium; foliar or directed spray; kg AI", "Glyphosate-isopropylammonium; broadcast with incorporation; kg AI".
Exchange "Bromoxynil octanoate-soil unspecified" is the result of combining the following original LCA Commons flows: "Bromoxynil octanoate; foliar or directed spray; kg AI", "Bromoxynil octanoate; unspec. appl. method; kg AI", "Bromoxynil octanoate; broadcast with incorporation; kg AI".
Exchange "NMVOC, non-methane volatile organic compounds, unspecified origin-air low population density" is the result of combining the following original LCA Commons flows: "NMVOCs; from residue burning; kg except C, biogenic", "NMVOCs; from residue burning; kg C, biogenic".
Exchange "Flucarbazone sodium salt-soil agricultural" is the result of combining the following original LCA Commons flows: "Flucarbazone-sodium; foliar or directed spray; kg AI", "Flucarbazone-sodium; unspec. appl. method; kg AI", "Flucarbazone-sodium; broadcast with incorporation; kg AI".
Exchange "Carbon-soil agricultural" is the result of combining the following original LCA Commons flows: "Carbon; applied in sewage sludge", "Carbon; in above-ground residue left on field; biogenic", "Carbon; using unspec. method in manure in fall before planting; biogenic", "Carbon; applied in limestone", "Carbon; in below-ground residue; biogenic", "Carbon; applied in dolomite".
Exchange "Particulates, < 2.5 um-air low population density" is the result of combining the following original LCA Commons flows: "PM2.5; from residue burning; kg except C, biogenic", "PM2.5; from residue burning; kg C, biogenic".
Exchange "Starane-soil agricultural" is the result of combining the following original LCA Commons flows: "Fluroxypyr-meptyl; unspec. appl. method; kg AI", "Fluroxypyr-meptyl; foliar or directed spray; kg AI", "Fluroxypyr-meptyl; broadcast with incorporation; kg AI".
Exchange "Chlorpyrifos-soil agricultural" is the result of combining the following original LCA Commons flows: "Chlorpyrifos; foliar or directed spray; kg AI", "Chlorpyrifos; broadcast with incorporation; kg AI", "Chlorpyrifos; unspec. appl. method; kg AI".
Exchange "Pesticides, unspecified-soil agricultural" is the result of combining the following original LCA Commons flows: "Unspecified pesticide; foliar or directed spray; kg AI", "Unspecified pesticide; broadcast with incorporation; kg AI", "Unspecified pesticide; unspec. appl. method; kg AI".
Exchange "Ash-soil agricultural" is the result of combining the following original LCA Commons flows: "Ash; from residue burning; kg except C, biogenic", "Ash; from residue burning; kg C, biogenic".
Exchange "Water-soil agricultural" is the result of combining the following original LCA Commons flows: "Water; in below-ground residue; biogenic", "Water; using unspec. method in manure", "Water; from irrigation and applied with manure and sewage sludge", "Water; in above-ground residue left on field; biogenic".
Exchange "2,4-D, dimethylamine salt-soil agricultural" is the result of combining the following original LCA Commons flows: "2,4-D, dimethylamine salt; broadcast with incorporation; kg AI", "2,4-D, dimethylamine salt; unspec. appl. method; kg AI", "2,4-D, dimethylamine salt; foliar or directed spray; kg AI".
Exchange "Clopyralid-soil agricultural" is the result of combining the following original LCA Commons flows: "Clopyralid; broadcast with incorporation; kg AI", "Clopyralid; foliar or directed spray; kg AI", "Clopyralid; unspec. appl. method; kg AI".
Exchange "Fenoxaprop ethyl ester-soil agricultural" is the result of combining the following original LCA Commons flows: "Fenoxaprop-ethyl; foliar or directed spray; kg AI", "Fenoxaprop-ethyl; unspec. appl. method; kg AI", "Fenoxaprop-ethyl; broadcast with incorporation; kg AI".
Exchange "Water, unspecified origin-resource in water" is the result of combining the following original LCA Commons flows: "Water; from plant uptake; biogenic", "Water; withdrawal from unspec. source, for durum wheat, in 2009".
Exchange "Particulates, < 10 um-air low population density" is the result of combining the following original LCA Commons flows: "PM10; from residue burning; kg C, biogenic", "PM10; from residue burning; kg except C, biogenic".
Exchange "Tribenuron-methyl-soil agricultural" is the result of combining the following original LCA Commons flows: "Tribenuron-methyl; foliar or directed spray; kg AI", "Tribenuron-methyl; broadcast with incorporation; kg AI", "Tribenuron-methyl; unspec. appl. method; kg AI".
Exchange "Transformation, from arable-resource land" is the result of combining the following original LCA Commons flows: "Transformation; from arable, from other to wheat", "Transformation; from arable, from small grains to wheat", "Transformation; from arable, from unspec. use to wheat".
Exchange "Calcium-soil agricultural" is the result of combining the following original LCA Commons flows: "Calcium; applied in dolomite", "Calcium; applied in limestone".
Exchange "Propiconazole-soil agricultural" is the result of combining the following original LCA Commons flows: "Propiconazole; broadcast with incorporation; kg AI", "Propiconazole; unspec. appl. method; kg AI", "Propiconazole; foliar or directed spray; kg AI".
Exchange "Zinc compounds-be1c0329-f1a8-4524-8420-a86d2a8dd358 agricultural" was originally named: "Zinc compounds; as secondary application" in this dataset.
Exchange "Hydrocyanic acid-2bdf9967-6dae-4183-88d1-8f612548c51e low population density" was originally named: "Hydrogen cyanide; from residue burning; kg C, biogenic" in this dataset.
Exchange "Acetone-2bdf9967-6dae-4183-88d1-8f612548c51e low population density" was originally named: "Acetone; from residue burning; kg C, biogenic" in this dataset.
Exchange "Sulfuric acid-be1c0329-f1a8-4524-8420-a86d2a8dd358 agricultural" was originally named: "Sulfuric acid; as secondary application" in this dataset.
Exchange "Acetaldehyde-2bdf9967-6dae-4183-88d1-8f612548c51e low population density" was originally named: "Acetaldehyde; from residue burning; kg C, biogenic" in this dataset.
Exchange "Furan-2bdf9967-6dae-4183-88d1-8f612548c51e low population density" was originally named: "Furan; from residue burning; kg C, biogenic" in this dataset.
Exchange "Sulfur dioxide-2bdf9967-6dae-4183-88d1-8f612548c51e low population density" was originally named: "Sulfur dioxide; from residue burning; biogenic" in this dataset.
Exchange "trans-2-Butene-2bdf9967-6dae-4183-88d1-8f612548c51e low population density" was originally named: "Trans 2 butene; from residue burning; kg C, biogenic" in this dataset.
Exchange "Propane-2bdf9967-6dae-4183-88d1-8f612548c51e low population density" was originally named: "Propane; from residue burning; kg C, biogenic" in this dataset.
Exchange "Dinitrogen monoxide-2bdf9967-6dae-4183-88d1-8f612548c51e low population density" was originally named: "Dinitrogen monoxide; from residue burning; kg N, biogenic" in this dataset.
Exchange "Carbon monoxide, fossil-2bdf9967-6dae-4183-88d1-8f612548c51e low population density" was originally named: "Carbon monoxide; from residue burning; kg C, biogenic" in this dataset.
Exchange "Phenol-2bdf9967-6dae-4183-88d1-8f612548c51e low population density" was originally named: "Phenol; from residue burning; kg C, biogenic" in this dataset.
Exchange "Isoprene-2bdf9967-6dae-4183-88d1-8f612548c51e low population density" was originally named: "Isoprene; from residue burning; kg C, biogenic" in this dataset.
Exchange "Nitrogen dioxide-2bdf9967-6dae-4183-88d1-8f612548c51e low population density" was originally named: "Nitrogen dioxide; from residue burning; kg N, biogenic" in this dataset.
Exchange "Toluene-2bdf9967-6dae-4183-88d1-8f612548c51e low population density" was originally named: "Toluene; from residue burning; kg C, biogenic" in this dataset.
Exchange "Butadiene-2bdf9967-6dae-4183-88d1-8f612548c51e low population density" was originally named: "1,3 butadiene; from residue burning; kg C, biogenic" in this dataset.
Exchange "isobutene-2bdf9967-6dae-4183-88d1-8f612548c51e low population density" was originally named: "I butene; from residue burning; kg C, biogenic" in this dataset.
Exchange "Ethene-2bdf9967-6dae-4183-88d1-8f612548c51e low population density" was originally named: "Ethylene; from residue burning; kg C, biogenic" in this dataset.
Exchange "Benzene-2bdf9967-6dae-4183-88d1-8f612548c51e low population density" was originally named: "Benzene; from residue burning; kg C, biogenic" in this dataset.
Exchange "1-Butene-2bdf9967-6dae-4183-88d1-8f612548c51e low population density" was originally named: "1 butene; from residue burning; kg C, biogenic" in this dataset.
Exchange "Sulfur-be1c0329-f1a8-4524-8420-a86d2a8dd358 agricultural" was originally named: "Sulfur; as secondary application" in this dataset.
Exchange "Carbon dioxide-c19fb2d9-98eb-4cd3-8761-81b71d8a9a1b unspecified" was originally named: "Carbon dioxide; from plant uptake; kg C, biogenic" in this dataset.
Exchange "isopentane-2bdf9967-6dae-4183-88d1-8f612548c51e low population density" was originally named: "I pentane; from residue burning; kg C, biogenic" in this dataset.
Exchange "Carbon dioxide, in air-2bdf9967-6dae-4183-88d1-8f612548c51e low population density" was originally named: "Carbon dioxide; from residue burning; kg C, biogenic" in this dataset.
Exchange "Acetic acid-2bdf9967-6dae-4183-88d1-8f612548c51e low population density" was originally named: "Acetic acid; from residue burning; kg C, biogenic" in this dataset.
Exchange "Methanol-2bdf9967-6dae-4183-88d1-8f612548c51e low population density" was originally named: "Methanol; from residue burning; kg C, biogenic" in this dataset.
Exchange "Butane-2bdf9967-6dae-4183-88d1-8f612548c51e low population density" was originally named: "N butane; from residue burning; kg C, biogenic" in this dataset.
Exchange "cis-2-Butene-2bdf9967-6dae-4183-88d1-8f612548c51e low population density" was originally named: "Cis 2 butene; from residue burning; kg C, biogenic" in this dataset.
Exchange "Phosphorus-c19fb2d9-98eb-4cd3-8761-81b71d8a9a1b unspecified" was originally named: "Phosphorous; from plant uptake; biogenic" in this dataset.
Exchange "Acrylonitrile-2bdf9967-6dae-4183-88d1-8f612548c51e low population density" was originally named: "Propenenitrile; from residue burning; kg C, biogenic" in this dataset.
Exchange "Water-2bdf9967-6dae-4183-88d1-8f612548c51e low population density" was originally named: "Water; from residue burning; biogenic" in this dataset.
Exchange "Transformation, to arable-c19fb2d9-98eb-4cd3-8761-81b71d8a9a1b land" was originally named: "Transformation; to arable, to wheat" in this dataset.
Exchange "Magnesium-be1c0329-f1a8-4524-8420-a86d2a8dd358 agricultural" was originally named: "Magnesium; applied in dolomite" in this dataset.
Exchange "Occupation, arable-c19fb2d9-98eb-4cd3-8761-81b71d8a9a1b land" was originally named: "Occupation; arable, as wheat" in this dataset.
Exchange "Formic acid-2bdf9967-6dae-4183-88d1-8f612548c51e low population density" was originally named: "Formic acid; from residue burning; kg C, biogenic" in this dataset.
Exchange "Ethane-2bdf9967-6dae-4183-88d1-8f612548c51e low population density" was originally named: "Ethane; from residue burning; kg C, biogenic" in this dataset.
Exchange "Pentane-2bdf9967-6dae-4183-88d1-8f612548c51e low population density" was originally named: "N pentane; from residue burning; kg C, biogenic" in this dataset.
Exchange "Acetonitrile-2bdf9967-6dae-4183-88d1-8f612548c51e low population density" was originally named: "Acetonitrile; from residue burning; kg C, biogenic" in this dataset.
Exchange "Ammonia-2bdf9967-6dae-4183-88d1-8f612548c51e low population density" was originally named: "Ammonia; from residue burning; kg N, biogenic" in this dataset.
Exchange "Propene-2bdf9967-6dae-4183-88d1-8f612548c51e low population density" was originally named: "Propylene; from residue burning; kg C, biogenic" in this dataset.
Exchange "Methane-2bdf9967-6dae-4183-88d1-8f612548c51e low population density" was originally named: "Methane; from residue burning; kg C, biogenic" in this dataset.
Exchange "Formaldehyde-2bdf9967-6dae-4183-88d1-8f612548c51e low population density" was originally named: "Formaldehyde; from residue burning; kg C, biogenic" in this dataset.
Exchange "Ethyne-2bdf9967-6dae-4183-88d1-8f612548c51e low population density" was originally named: "Acetylene; from residue burning; kg C, biogenic" in this dataset.

## Geography
The unit process is assumed to represent production in North Dakota (US State).

## Technology
This process produces durum wheat; at harvest in 2009; at farm; 88%-89% moisture. The process is assumed to represent production in North Dakota (US State). Yields and related inputs and outputs represent a single year of operation, in 2009. This dataset includes consideration of residue burning; soil preparation; planting or sowing; irrigation; application, storage, and transport of fertilizers, manures, liming materials, secondary materials, and pesticides; and harvest. Fate and transport of applications are not included as described in Cooper, J.S., Kahn, E., Noon, M. (2012) LCA Digital Commons Unit Process Data: field crop production Version 1 which is available at https://www.lcacommons.gov/discovery/docs/LCA%20Digital%20Commons%20Unit%20Process%20Data%20final%20updated.pdf

## Time period
Start and end dates match the underlying data obtained from the USDA Agricultural Resource Management Survey (ARMS).
## Parameters
- p1682: 0
- p0393: 0.5
- p0447: 0; = SQRT(2)*(IF((2*p0315-1)<0;-1;IF((2*p0315-1)>0;1;0))*SQRT(SQRT((2/(pi()*0.140012289)+LN(1-(2*p0315-1)^2)/2)^2-LN(1-(2*p0315-1)^2)/0.140012289)-(2/(pi()*0.140012289)+LN(1-(2*p0315-1)^2)/2)))
- p0827: 0; = p0818*p0819*p0823
- p4142: 0; = p1793*p3479
- p1914: 5.44395e-6; = p1506*1000/p0818
- p0872: 0; = p0864*p0856
- p2775: 0; = p2384*(p1078+p1080)
- p2151: 9.9825e-8; = p2015*p2079*p2113/(p0818*1000)
- p2848: 0; = p2262*(p1079+p1081)
- p2917: 5.26655e-6; = p2331*(p1020+p1022)
- p0657: 0; = IF(p0393<0.5;-SQRT(p0007*EXP(p0525^2*p0008)-p0007);SQRT(p0007*EXP(p0525^2*p0008)-p0007))
- p0676: 1340.95; = p0016*(1+p0544*p0148/100)
- p2781: 0; = p2390*(p1128+p1130)
- p2259: 0; = p2226*p2205
- p1691: 0
- p0512: 0; = SQRT(2)*(IF((2*p0380-1)<0;-1;IF((2*p0380-1)>0;1;0))*SQRT(SQRT((2/(pi()*0.140012289)+LN(1-(2*p0380-1)^2)/2)^2-LN(1-(2*p0380-1)^2)/0.140012289)-(2/(pi()*0.140012289)+LN(1-(2*p0380-1)^2)/2)))
- p1839: 0
- p0779: 0
- p0373: 0.5
- p1836: 1.41543e-5; = p1428*1000/p0818
- p0699: 0
- p2789: 0; = p2398*(p1019+p1021)
- p1617: 0
- p1831: 0
- p2725: 0; = p2334*(p1019+p1021)
- p2760: 0; = p2369*(p1019+p1021)
- p1642: 0.902
- p2784: 0; = p2393*(p1019+p1021)
- p0401: 0.5
- p2494: 0; = p2298*p1073
- p1918: 0
- p1138: 0; = if(p1121=0;p1132*(p0716/100)*p0703*1000;0)
- p2851: 0; = p2265*(p1079+p1081)
- p2039: 3.63311e-6; = p2015*p2037*p2038/(p0818*1000)
- p2443: 0.000111506; = p2247*p1014
- p1708: 0
- p3270: 0.0747083
- p2183: 0.00209938; = p1064-p2182
- p1844: 0
- p2690: 0; = p2299*(p1078+p1080)
- p2535: 0.00386045; = p2339*p1073
- p3185: 0; = p2404*p1023
- p2748: 0; = p2357*(p1019+p1021)
- p5020: 0; = p1847*p3483
- p1934: 0
- p1155: 0.000139145; = if(p1153*p0818=0;0;p1151/(p1153*p0818))
- p0148: 4.887
- p3379: 0; = if(p1232=0;p3246*p3361/p0818;0)
- p2135: 4.83255e-6; = p2015*p2063*p2097/(p0818*1000)
- p1318: 0; = p1317*p0001/(p0818*p0002)
- p0395: 0.5
- p2117: 0.585147
- p2652: 0; = p2261*(p1078+p1080)
- p1757: 0
- p2559: 6.24278e-6; = p2363*p1014
- p1876: 1.60597e-5; = p1468*1000/p0818
- p1608: 0
- p0503: 0; = SQRT(2)*(IF((2*p0371-1)<0;-1;IF((2*p0371-1)>0;1;0))*SQRT(SQRT((2/(pi()*0.140012289)+LN(1-(2*p0371-1)^2)/2)^2-LN(1-(2*p0371-1)^2)/0.140012289)-(2/(pi()*0.140012289)+LN(1-(2*p0371-1)^2)/2)))
- p2086: 0.0617647
- p0189: 0
- p0911: 0.00503333
- p2756: 0; = p2365*(p1019+p1021)
- p2448: 9.27572e-7; = p2252*p1014
- p2435: 1.86218e-5; = p2239*p1014
- p2282: 0.000365856; = p2223*p2188
- p2707: 0; = p2316*(p1019+p1021)
- p1060: 0.21
- p1733: 0
- p2620: 0; = p2424*p1073
- p3375: 0; = if(p1232=0;p3246*p3357/p0818;0)
- p2475: 0.000183102; = p2279*p1014
- p2967: 0; = p2381*(p1079+p1081)
- p2320: 6.30157e-5; = p2224*p2187
- p0476: 0; = SQRT(2)*(IF((2*p0344-1)<0;-1;IF((2*p0344-1)>0;1;0))*SQRT(SQRT((2/(pi()*0.140012289)+LN(1-(2*p0344-1)^2)/2)^2-LN(1-(2*p0344-1)^2)/0.140012289)-(2/(pi()*0.140012289)+LN(1-(2*p0344-1)^2)/2)))
- p1613: 0
- p1252: 1.24196e8; = if(p1232>0;0;p0724*2000*p0723*1000*p0725/100)
- p0707: 8.554; = p0047*(1+p0575*p0179/100)
- p1943: 8.16593e-7; = p1535*1000/p0818
- p2578: 0; = p2382*p1073
- p3083: 0; = p2302*p1082
- p2791: 0; = p2400*(p1019+p1021)
- p2137: 2.823e-7; = p2015*p2065*p2099/(p0818*1000)
- p2260: 0; = p2226*p2206
- p0674: 619.068; = p0014*(1+p0542*p0146/100)
- p0619: 0; = IF(p0355<0.5;-SQRT(p0007*EXP(p0487^2*p0008)-p0007);SQRT(p0007*EXP(p0487^2*p0008)-p0007))
- p2693: 0; = p2302*(p1078+p1080)
- p0802: 1.57e6
- p2497: 0; = p2301*p1073
- p2153: 9.75596e-9; = p2015*p2081*p2115/(p0818*1000)
- p1628: 0
- p2639: 0; = p2248*(p1019+p1021)
- p0375: 0.5
- p1843: 0
- p1698: 0
- p5226: 6.17069e-8; = p1847*p3484
- p2765: 0; = p2374*(p1019+p1021)
- p1025: 0; = IF(p1012=0;p1019*(p0704/100)*p0703*1000;0)
- p0891: 226512; = IF(p3251=0;0;62.4*6272640/(12*12*12))
- p0769: 9.957; = p0109*(1+p0637*p0241/100)
- p0232: 32.909
- p0730: 0
- p2954: 1.05123e-7; = p2368*(p1020+p1022)
- p2549: 8.83204e-5; = p2353*p1123
- p0282: 0.5
- p2600: 0; = p2404*p1014
- p1929: 0
- p2307: 0; = p2227*p2214
- p0781: 0
- p1953: 0
- p4430: 0; = p1875*p3480
- p1321: 1.27805; = IF(((p0745*1000*p0748/100)+(p0754*1000*p0757/100))/p0801<0;0;((p0745*1000*p0748/100)+(p0754*1000*p0757/100))/p0801)
- p3183: 0; = p2402*p1023
- p1032: 3.40335e-5; = IF(p1012=0;p1026*p0001/(p0818*p0002);0)
- p3174: 0; = p2393*p1023
- p1712: 0
- p1166: 1.96753e-6; = p1164/p0818
- p3386: 0; = p3367*p1234
- p3143: 1.0525e-6; = p2362*p1023
- p2486: 1.61325e-6; = p2290*p1014
- p2017: 1.01041e7; = p2015*p0898
- p3308: 0; = if(and(p1232=0;p3252<>0);p3252*(p3259-p3303)/p3305;0)
- p2206: 0.000518542; = 9*1.00794*p2204/30.973762
- p1055: 31969.1; = IF(p1012=0;p1048*p1036;0)
- p2689: 0; = p2298*(p1078+p1080)
- p1907: 0
- p3297: 0; = if(p1273+p1274+p1275+p1276=0;0;p1273/(p1273+p1274+p1275+p1276))
- p1762: 0
- p1864: 0
- p1899: 0
- p3170: 0; = p2389*p1132
- p0998: 0; = if(p0888=0;0;if((p0699*p0698*1000*p0700/100)/p0888>1;1;(p0699*p0698*1000*p0700/100)/p0888))
- p1016: 0.08554; = IF(p1012=0;p0707/100;0)
- p2084: 0.21
- p2353: 8.83204e-5; = p2232*p2221
- p1011: 0; = p1010*p0001*p0004/(p0818*p0002)
- p1852: 0
- p2860: 0; = p2274*(p1129+p1131)
- p0788: 0
- p1977: 1.24197e8; = p1252+p1188
- p2881: 3.2521e-5; = p2295*(p1020+p1022)
- p1947: 0
- p2262: 0; = p2226*p2208
- p1268: 0
- p1569: 0
- p2019: 0.13105
- p3472: 0; = p3377*p1241
- p2943: 1.19314e-5; = p2357*(p1020+p1022)
- p0963: 1.71743e-6; = if(and(p0683>0;or(p0807=480;p0807=32;p0807=1;and(p0807=60;p0901<0.03)));p0939;0)
- p1065: 0.0012744; = IF(p1012=0;p1051/(p1058*p0818);0)
- p2304: 0; = p2227*p2211
- p2925: 0; = p2339*(p1079+p1081)
- p3171: 0; = p2390*p1132
- p0137: 24.69
- p2249: 0.000188312; = p2222*p2195
- p1792: 0
- p3152: 8.63846e-6; = p2371*p1023
- p2331: 1.8638e-5; = p2224*p2199
- p3314: 0; = if(and(p1232=0;p3253<>0);p3263*p3289;0)
- p5160: 1.25404e-7; = p1781*p3484
- p1820: 0
- p3480: 0; = if(p1328+p1330+p1332+p1334+p1336+p1338+p1340+p1342+p1344=0;0;p1336/(p1328+p1330+p1332+p1334+p1336+p1338+p1340+p1342+p1344))
- p2008: 0.0557612; = ((p1982*p1985+p1988*p1991+p1994*p1997+p2002*p2005)/p0818)*p0005*p0002/1000
- p0934: 0; = p0928*p0001/(p0818*p0002)
- p3248: 0
- p2105: 0.888194
- p0364: 0.5
- p0837: 0.5
- p2418: 0; = p2235*p2208
- p1182: 161.227; = p1181*p0801
- p1996: 30
- p1286: 0; = p1282*p1252/p0818
- p1994: 750
- p2225: 0.0427522; = if(p0765*p0769+p0766*p0770+p0767*p0771+p0768*p0772=0;0;p0772*p0768/(p0765*p0769+p0766*p0770+p0767*p0771+p0768*p0772))
- p3052: 0; = p2271*p1082
- p2958: 3.58636e-5; = p2372*(p1020+p1022)
- p3058: 1.65012e-5; = p2277*p1023
- p2013: 0.85
- p0141: 89.3458
- p3157: 0; = p2376*p1082
- p4825: 0; = p1858*p3482
- p2623: 0; = p2427*p1073
- p0942: 0; = if(and(p0683=0;p0948=0);p0936;0)
- p2253: 2.96312e-6; = p2222*p2199
- p0689: 0
- p3017: 0; = p2431*(p1129+p1131)
- p1742: 0
- p1308: 0
- p3114: 5.14155e-5; = p2333*p1023
- p3118: 8.77513e-5; = p2337*p1082
- p2263: 0; = p2226*p2209
- p1940: 0
- p2414: 0; = p2235*p2204
- p0833: 4.26477e9; = p0830+p0832
- p2341: 0.00100076; = p2228*p2209
- p2070: 0.282
- p0461: 0; = SQRT(2)*(IF((2*p0329-1)<0;-1;IF((2*p0329-1)>0;1;0))*SQRT(SQRT((2/(pi()*0.140012289)+LN(1-(2*p0329-1)^2)/2)^2-LN(1-(2*p0329-1)^2)/0.140012289)-(2/(pi()*0.140012289)+LN(1-(2*p0329-1)^2)/2)))
- p3251: 1.08672e8; = p1252-(p3252+p3253+p3254+p3255+p3256)
- p1139: 4.38218e-5; = if(p1121=0;p1133*p0001/(p0818*p0002);0)
- p2370: 1.34252e-6; = p2225*p2199
- p2942: 3.46396e-6; = p2356*(p1020+p1022)
- p2866: 5.61496e-5; = p2280*(p1020+p1022)
- p2993: 0; = p2407*(p1020+p1022)
- p0811: 0; = if(p0807=480;1-p0810;0)
- p0398: 0.5
- p0475: 0; = SQRT(2)*(IF((2*p0343-1)<0;-1;IF((2*p0343-1)>0;1;0))*SQRT(SQRT((2/(pi()*0.140012289)+LN(1-(2*p0343-1)^2)/2)^2-LN(1-(2*p0343-1)^2)/0.140012289)-(2/(pi()*0.140012289)+LN(1-(2*p0343-1)^2)/2)))
- p3395: 0; = p3376*p1234
- p0006: 30
- p1290: 0; = IF(p1287=p1264;0;IF(p1287+p1288>p1264;p1264-p1287;p1288))
- p3018: 2.63333e-5; = p2237*p1023
- p0828: 0; = if(p0827=0;0;p0819-p0827/p0818)
- p1224: 0.44; = IF(p1221=0;0;IF(p1193=0;1-p1223;0))
- p3403: 0; = p3365*p1238
- p2191: 0.000212165; = 8*1.00794*p2189/(2*14.0067)
- p2101: 0.620397
- p3456: 0; = p3380*p1240
- p0859: 0; = p0671*1000/p0856
- p3383: 0; = p3364*p1234
- p3471: 0; = p3376*p1241
- p0628: 0; = IF(p0364<0.5;-SQRT(p0007*EXP(p0496^2*p0008)-p0007);SQRT(p0007*EXP(p0496^2*p0008)-p0007))
- p2361: 3.15118e-5; = p2225*p2189
- p1715: 0
- p0376: 0.5
- p3447: 0; = p3371*p1240
- p2638: 0; = p2247*(p1019+p1021)
- p1881: 0
- p2170: 0.00629345; = p2166*(p0913)
- p2042: 0.07
- p3425: 0; = p3368*p1239
- p2154: 7.60309e-7; = p2015*p2082*p2116/(p0818*1000)
- p1295: 0; = p1291*p1252/p0818
- p1681: 0
- p2667: 0; = p2276*(p1019+p1021)
- p0949: 0; = if(and(p0683=0;or(p0807=480;p0807=32;p0807=1;and(p0807=60;p0901<0.03)));p0937;0)
- p0736: 0
- p2421: 0; = p2235*p2211
- p3285: 0.275
- p2034: 1.77925e-5; = p2015*p2030*p2032/(p0818*1000)
- p1985: 2.83313e8; = (if(p1057=0;0;p1050/p1057)+if(p1058=0;0;p1051/p1058)+if(p1059=0;0;p1052/p1059)+if(p1060=0;0;p1053/p1060)+if(p1061=0;0;p1054/p1061)+if(p1062=0;0;p1055/p1062)+if(p1063=0;0;p1056/p1063))*(1+p1157)
- p3095: 0; = p2314*p1132
- p3462: 0.00030746; = p3367*p1241
- p2241: 6.96095e-5; = p2222*p2186
- p0711: 89.665; = p0051*(1+p0579*p0183/100)
- p1269: 0
- p4391: 0; = p1836*p3480
- p1196: 0.59
- p2817: 0; = p2426*(p1078+p1080)
- p1566: 0
- p3681: 0; = p1950*p3476
- p3475: 0.0295802; = p3380*p1241
- p0377: 0.5
- p1310: 0; = IF(p1307=p1266;0;IF(p1307+p1308>p1266;p1266-p1307;p1308))
- p1243: 0; = if(p1232>0;0;p1238*(p0725/100)*p0723*1000)
- p2836: 0.000525995; = p2250*(p1020+p1022)
- p1004: 0; = p1000*p0888
- p3454: 0; = p3378*p1240
- p2367: 0.000843387; = p2225*p2196
- p2891: 0; = p2305*(p1079+p1081)
- p1037: 0.346912
- p1122: 0; = p1121*p0001/(p0818*p0002)
- p0329: 0.5
- p0043: 1647.93
- p1136: 0; = if(p1121=0;p1130*(p0716/100)*p0703*1000;0)
- p3021: 2.71944e-6; = p2240*p1023
- p2334: 0.000253593; = p2224*p2202
- p0611: 0; = IF(p0347<0.5;-SQRT(p0007*EXP(p0479^2*p0008)-p0007);SQRT(p0007*EXP(p0479^2*p0008)-p0007))
- p2508: 0; = p2312*p1123
- p2180: 1.51809e-7; = p3233*p1188/(p0818)
- p2887: 0; = p2301*(p1079+p1081)
- p2316: 0.00124603; = p2224*p2183
- p1677: 0
- p2642: 0; = p2251*(p1019+p1021)
- p2786: 0; = p2395*(p1019+p1021)
- p2273: 0; = p2230*p2219
- p1749: 0
- p0920: 0.812698; = p0676*1000/p0801
- p1235: 0; = if(p1232>0;0;p0727/100)
- p1029: 47806.3; = IF(p1012=0;IF(p0801<p1023*(p0704/100)*p0703*1000;p0801;p1023*(p0704/100)*p0703*1000);0)
- p3290: 0.195
- p1089: 0.000312068; = IF(p1071=0;p1083*p0001/(p0818*p0002);0)
- p4597: 8.50757e-6; = p1836*p3481
- p2669: 0; = p2278*(p1019+p1021)
- p2772: 0; = p2381*(p1078+p1080)
- p1741: 0
- p2953: 0.000238316; = p2367*(p1020+p1022)
- p0975: 0.0253887; = p0973*p0974/p0818
- p1303: 0; = p1297*p1252/p0818
- p2333: 0.00176201; = p2224*p2201
- p1930: 0
- p0719: 0
- p1277: 0
- p2452: 2.77481e-5; = p2256*p1014
- p2186: 0.000737702; = p1052/p0818
- p0683: 113.189; = p0023*(1+p0551*p0155/100)
- p1563: 0
- p4955: 0; = p1782*p3483
- p0793: 0
- p0542: 0; = IF(p0278<0.5;-SQRT(p0007*EXP(p0410^2*p0008)-p0007);SQRT(p0007*EXP(p0410^2*p0008)-p0007))
- p4498: 0; = p1943*p3480
- p2376: 0; = p2229*p2205
- p1606: 0.80434
- p2243: 0.000128162; = p2222*p2188
- p2056: 2.07882
- p1924: 0
- p3461: 0.00175606; = p3366*p1241
- p0821: 1.31667
- p2654: 0; = p2263*(p1078+p1080)
- p2168: 0.00676378; = p2166*(p0903)
- p0982: 0; = if(p0886=0;0;min(1;(p0691*p0690*1000*p0693/100)/p0886))
- p2656: 0; = p2265*(p1078+p1080)
- p2198: 1.42828e-5; = 22.98976928*p2197/14.0067
- p0752: 0
- p2049: 25.6942
- p1769: 0
- p0216: 43.946
- p0460: 0; = SQRT(2)*(IF((2*p0328-1)<0;-1;IF((2*p0328-1)>0;1;0))*SQRT(SQRT((2/(pi()*0.140012289)+LN(1-(2*p0328-1)^2)/2)^2-LN(1-(2*p0328-1)^2)/0.140012289)-(2/(pi()*0.140012289)+LN(1-(2*p0328-1)^2)/2)))
- p3080: 0; = p2299*p1082
- p2011: 0.0070419
- p1960: 185.674; = IF(p1959-p1958<0;0;p1959-p1958)
- p0479: 0; = SQRT(2)*(IF((2*p0347-1)<0;-1;IF((2*p0347-1)>0;1;0))*SQRT(SQRT((2/(pi()*0.140012289)+LN(1-(2*p0347-1)^2)/2)^2-LN(1-(2*p0347-1)^2)/0.140012289)-(2/(pi()*0.140012289)+LN(1-(2*p0347-1)^2)/2)))
- p2381: 0; = p2229*p2210
- p1014: 0.68825; = IF(p1012=0;p0705/100;0)
- p1343: 0; = p1342*p0001/(p0818*p0002)
- p2847: 0; = p2261*(p1079+p1081)
- p1886: 0
- p3019: 5.78047e-6; = p2238*p1023
- p3026: 2.32302e-6; = p2245*p1023
- p2831: 2.24954e-5; = p2245*(p1020+p1022)
- p2366: 8.53196e-5; = p2225*p2195
- p3113: 0.000119927; = p2332*p1023
- p3363: 0.000305691; = if(p1232=0;p3244*p3357/p0818;0)
- p2390: 0; = p2233*p2219
- p1871: 0
- p0810: 0
- p2529: 0.0012127; = p2333*p1014
- p2717: 0; = p2326*(p1019+p1021)
- p4018: 1.51372e-5; = p1875*p3478
- p3364: 0.000105537; = if(p1232=0;p3244*p3358/p0818;0)
- p3258: 0.0491162
- p1228: 0.0182484; = IF(p1221=0;0;p0801*p1212*2000/(p1222+p1221*p1225)/p0818)
- p2869: 5.61022e-5; = p2283*(p1020+p1022)
- p1314: 0; = p1310*p1252/p0818
- p3249: 0
- p2528: 0.00282864; = p2332*p1014
- p0327: 0.5
- p1506: 20
- p1770: 0
- p0446: 0; = SQRT(2)*(IF((2*p0314-1)<0;-1;IF((2*p0314-1)>0;1;0))*SQRT(SQRT((2/(pi()*0.140012289)+LN(1-(2*p0314-1)^2)/2)^2-LN(1-(2*p0314-1)^2)/0.140012289)-(2/(pi()*0.140012289)+LN(1-(2*p0314-1)^2)/2)))
- p0663: 0; = IF(p0399<0.5;-SQRT(p0007*EXP(p0531^2*p0008)-p0007);SQRT(p0007*EXP(p0531^2*p0008)-p0007))
- p0546: 0; = IF(p0282<0.5;-SQRT(p0007*EXP(p0414^2*p0008)-p0007);SQRT(p0007*EXP(p0414^2*p0008)-p0007))
- p2930: 0; = p2344*(p1079+p1081)
- p0575: 0; = IF(p0311<0.5;-SQRT(p0007*EXP(p0443^2*p0008)-p0007);SQRT(p0007*EXP(p0443^2*p0008)-p0007))
- p1385: 18
- p1034: 7.83916e-5; = IF(p1012=0;p1028*p0001/(p0818*p0002);0)
- p2133: 2.38231e-6; = p2015*p2061*p2095/(p0818*1000)
- p2023: 2.12
- p1585: 0
- p0052: 4.855
- p0732: 0
- p2412: 0; = p2234*p2202
- p3177: 0; = p2396*p1023
- p1077: 0; = IF(p1071=0;p0715/100;0)
- p0677: 0
- p1227: 0.000400702; = IF(p1221=0;0;p1226*p0001/(p0818*p0002))
- p2447: 5.65131e-7; = p2251*p1014
- p1174: 1.08599e-7; = p1170*p1173/p0818
- p3321: 0; = if(and(p1232=0;p3253<>0);IF((p3317+p3318+p3319+p3320)+(p3253*(p3261*(1-p3277))/p3316)>p3253;p3253-(p3317+p3318+p3319+p3320);p3253*(p3261*(1-p3277))/p3316);0)
- p1732: 0
- p1280: 0; = IF(p1277=p1263;0;IF(p1277+p1278>p1263;p1263-p1277;p1278))
- p1680: 0
- p2931: 0; = p2345*(p1079+p1081)
- p3063: 1.06757e-5; = p2282*p1023
- p1169: 0.000483602
- p2203: 0.00489828; = p1070-p2200-p2201-p2202
- p2057: 3.28794
- p4814: 0; = p1847*p3482
- p0930: 1.34095e6; = p0801*p0924
- p2365: 0.000398017; = p2225*p2193
- p5225: 1.19433e-8; = p1846*p3484
- p2090: 0.40001
- p2131: 1.56747e-6; = p2015*p2059*p2093/(p0818*1000)
- p2979: 0; = p2393*(p1020+p1022)
- p0042: 1647.93
- p4190: 0; = p1841*p3479
- p0946: 0; = if(and(p0683=0;or(p0807=480;p0807=32;p0807=1;and(p0807=60;p0901<0.03)));p0934;0)
- p2980: 0; = p2394*(p1020+p1022)
- p2081: 0.0019
- p0534: 0; = SQRT(2)*(IF((2*p0402-1)<0;-1;IF((2*p0402-1)>0;1;0))*SQRT(SQRT((2/(pi()*0.140012289)+LN(1-(2*p0402-1)^2)/2)^2-LN(1-(2*p0402-1)^2)/0.140012289)-(2/(pi()*0.140012289)+LN(1-(2*p0402-1)^2)/2)))
- p1241: 1; = if(p1232>0;0;IF(p1234+p1238+p1239+p1240=1;0;1-(p1234+p1238+p1239+p1240)))
- p4704: 4.90821e-7; = p1943*p3481
- p1312: 1; = IF(p1307+p1310+p1311=p1266;0;p1266-(p1307+p1310+p1311))
- p1621: 0
- p1238: 0; = if(p1232>0;0;IF(p1234=1;0;IF(p1234+p1235>1;1-p1234;p1235)))
- p1807: 0
- p1906: 0
- p3317: 0; = if(and(p1232=0;p3253<>0);p3253*(p3261*p3277-p3312)/p3316;0)
- p3265: 0.696292
- p2512: 0.000857582; = p2316*p1014
- p2556: 3.99646e-5; = p2360*p1014
- p0591: 0; = IF(p0327<0.5;-SQRT(p0007*EXP(p0459^2*p0008)-p0007);SQRT(p0007*EXP(p0459^2*p0008)-p0007))
- p0286: 0.5
- p1160: 0.0505443; = (p1156+p1158)*p1159
- p0612: 0; = IF(p0348<0.5;-SQRT(p0007*EXP(p0480^2*p0008)-p0007);SQRT(p0007*EXP(p0480^2*p0008)-p0007))
- p2903: 4.80898e-5; = p2317*(p1020+p1022)
- p2890: 0; = p2304*(p1079+p1081)
- p2006: 0.27374; = ((p1980*p1985+p1986*p1991+p1992*p1997+p2000*p2005)/p0818)*p0005*p0002/1000
- p3460: 0.000436378; = p3365*p1241
- p2482: 0.000318309; = p2286*p1014
- p2217: 0.00133312; = p1118-p2216
- p1184: 4.38856e-8; = p1182/p0818
- p0116: 24.924
- p3231: 1.04206e-7; = p1176/p0818
- p3990: 3.3046e-6; = p1847*p3478
- p3103: 1.27655e-5; = p2322*p1023
- p1293: 0; = p1287*p1252/p0818
- p1088: 78536.1; = IF(p1071=0;p1082*(p0710/100)*p0703*1000;0)
- p2354: 0.000408875; = p2225*p2182
- p0593: 0; = IF(p0329<0.5;-SQRT(p0007*EXP(p0461^2*p0008)-p0007);SQRT(p0007*EXP(p0461^2*p0008)-p0007))
- p0871: 0; = p0870*p0001*p0003/(p0818*p0002)
- p2138: 4.63032e-7; = p2015*p2066*p2100/(p0818*1000)
- p0846: 0.290653; = p0841*p0845^3+p0842*p0845^2+p0843*p0845+p0844
- p0801: 1.65e6
- p2782: 0; = p2391*(p1128+p1130)
- p2127: 1.34199e-5; = p2015*p2055*p2089/(p0818*1000)
- p1738: 0
- p2868: 0.00010338; = p2282*(p1020+p1022)
- p4824: 0; = p1857*p3482
- p2453: 0.00031811; = p2257*p1014
- p3358: 387722; = if(p1232=0;p3308+p3319+p3330+p3341+p3352;0)
- p0023: 113.189
- p3241: 1.40348e-9; = p3234*p1188*p3236/p0818
- p2248: 0.000878478; = p2222*p2193
- p2255: 0.000280129; = p2222*p2201
- p1963f: 0.00015145; = p1647*p1851+p1648*p1852+p1649*p1853+p1650*p1854+p1651*p1855+p1652*p1856+p1653*p1857+p1654*p1858+p1655*p1859+p1656*p1860+p1657*p1861+p1658*p1862+p1659*p1863+p1660*p1864+p1661*p1865+p1662*p1866+p1663*p1867+p1664*p1868+p1665*p1869+p1666*p1870
- p2728: 7.77431e-5; = p2337*(p1078+p1080)
- p1997: 3.71694e6; = (if(p1152=0;0;p1150/p1152)+if(p1153=0;0;p1151/p1153))*(1+p1157)
- p3588: 0; = p1857*p3476
- p2975: 0; = p2389*(p1129+p1131)
- p1056: 2.54395e7; = IF(p1012=0;p1049*p1036;0)
- p0505: 0; = SQRT(2)*(IF((2*p0373-1)<0;-1;IF((2*p0373-1)>0;1;0))*SQRT(SQRT((2/(pi()*0.140012289)+LN(1-(2*p0373-1)^2)/2)^2-LN(1-(2*p0373-1)^2)/0.140012289)-(2/(pi()*0.140012289)+LN(1-(2*p0373-1)^2)/2)))
- p0682: 1648.1; = p0022*(1+p0550*p0154/100)
- p2557: 2.1688e-5; = p2361*p1014
- p1085: 0; = IF(p1071=0;p1079*(p0710/100)*p0703*1000;0)
- p1320: 0; = IF(((p0745*1000*p0747/100)+(p0754*1000*p0756/100))/p0801<0;0;((p0745*1000*p0747/100)+(p0754*1000*p0756/100))/p0801)
- p1963: 0.000301662; = p1963a+p1963b+p1963c+p1963d+p1963e+p1963f+p1963g+p1963h+p1963i+p1963j+p1963k
- p2960: 5.91735e-5; = p2374*(p1020+p1022)
- p3421: 0; = p3364*p1239
- p1044: 0.010401; = IF(p1012=0;IF(p1037=1;0;IF(p1037+p1038>1;1-p1037;p1038));0)
- p1535: 3
- p5123: 0; = p1950*p3483
- p1064: 0.0116632; = IF(p1012=0;p1050/(p1057*p0818);0)
- p3007: 0; = p2421*(p1079+p1081)
- p2753: 0; = p2362*(p1019+p1021)
- p1153: 0.365265
- p0212: 0.358
- p0967: 0
- p3482: 0; = if(p1328+p1330+p1332+p1334+p1336+p1338+p1340+p1342+p1344=0;0;p1340/(p1328+p1330+p1332+p1334+p1336+p1338+p1340+p1342+p1344))
- p2844: 0; = p2258*(p1079+p1081)
- p0806: 6.123e7
- p4101: 1.97928e-5; = p1962*p3478
- p0960: 0.000325649; = if(and(p0683>0;or(p0807=480;p0807=32;p0807=1;and(p0807=60;p0901<0.03)));p0936;0)
- p0861: 0.550869; = p0673*1000/p0856
- p4231: 0; = p1882*p3479
- p2477: 1.96832e-5; = p2281*p1014
- p1739: 0.583082
- p2445: 0.000129606; = p2249*p1014
- p0785: 8.505; = p0125*(1+p0653*p0257/100)
- p1909: 0
- p0659: 0; = IF(p0395<0.5;-SQRT(p0007*EXP(p0527^2*p0008)-p0007);SQRT(p0007*EXP(p0527^2*p0008)-p0007))
- p3367: 0.00030746; = if(p1232=0;p3244*p3361/p0818;0)
- p0136: 99.417
- p1242: 0; = if(p1232>0;0;p1234*(p0725/100)*p0723*1000)
- p3252: 0; = p1252*(p1267*(1-p3247)+p1270*(1-p3248)+p1271*(1-p3249)+p1272*(1-p3250))
- p3121: 0.000121275; = p2340*p1082
- p5189: 3.78203e-8; = p1810*p3484
- p3984: 1.066e-7; = p1841*p3478
- p2906: 1.78063e-5; = p2320*(p1020+p1022)
- p2388: 0; = p2229*p2217
- p3006: 0; = p2420*(p1079+p1081)
- p3244: 1; = p0791/100
- p2764: 0; = p2373*(p1019+p1021)
- p0938: 0; = p0932*p0001/(p0818*p0002)
- p1833: 0
- p1776: 0
- p1054: 3.42026e7; = IF(p1012=0;p1047*p1036;0)
- p3405: 0; = p3367*p1238
- p2914: 0.00330852; = p2328*(p1020+p1022)
- p5177: 4.3792e-8; = p1798*p3484
- p2750: 0; = p2359*(p1019+p1021)
- p2292: 8.45864e-6; = p2223*p2199
- p3479: 0; = if(p1328+p1330+p1332+p1334+p1336+p1338+p1340+p1342+p1344=0;0;p1334/(p1328+p1330+p1332+p1334+p1336+p1338+p1340+p1342+p1344))
- p2313: 0; = p2231*p2220
- p1913: 0
- p0613: 0; = IF(p0349<0.5;-SQRT(p0007*EXP(p0481^2*p0008)-p0007);SQRT(p0007*EXP(p0481^2*p0008)-p0007))
- p1575: 0
- p1266: 1; = if(p1232>0;0;IF(p1259+p1263+p1264+p1265=1;0;1-(p1259+p1263+p1264+p1265)))
- p1026: 140142; = IF(p1012=0;p1020*(p0704/100)*p0703*1000;0)
- p1163: 0.00438079
- p2712: 0; = p2321*(p1019+p1021)
- p2281: 2.85989e-5; = p2223*p2187
- p3457: 0.00131461; = p3362*p1241
- p3110: 1.50709e-7; = p2329*p1023
- p1670: 0
- p3484: 0.00731286; = IF(p1344=0;0;p1344/(p1328+p1330+p1332+p1334+p1336+p1338+p1340+p1342+p1344))
- p3091: 0; = p2310*p1082
- p1989: 50
- p1880: 0
- p0585: 0; = IF(p0321<0.5;-SQRT(p0007*EXP(p0453^2*p0008)-p0007);SQRT(p0007*EXP(p0453^2*p0008)-p0007))
- p1270: 0; = IF(p1267=p1259;0;IF(p1267+p1268>p1259;p1259-p1267;p1268))
- p0239: 7.738
- p1294: 0; = p1290*p1252/p0818
- p0368: 0.5
- p2762: 0; = p2371*(p1019+p1021)
- p2314: 0; = p2231*p2221
- p0705: 68.825; = p0045*(1+p0573*p0177/100)
- p0901: 0.02432
- p3219: 0.0082262; = p3215*p1228
- p3131: 0; = p2350*p1132
- p1278: 0
- p0759: 0
- p2014: 2.55273e7; = p0833*p2011*p2013
- p1199: -0.29
- p1700: 0
- p0277: 0.5
- p2415: 0; = p2235*p2205
- p1022: 0.19703; = IF(p1012=0;IF(p1014+p1019+p1020+p1021=1;0;IF(p1014+p1019+p1020+p1021+p1018>1;1-(p1014+p1019+p1020+p1021);p1018));0)
- p2062: 3.76588
- p2504: 0; = p2308*p1073
- p3452: 0; = p3376*p1240
- p2883: 0; = p2297*(p1079+p1081)
- p0083: 0.225
- p0005: 1.60934
- p0314: 0.5
- p1591: 0
- p0868: 0; = IF(p0858+p0864+p0865+p0866+p0867=1;0;IF(p0858+p0864+p0865+p0866+p0867+p0863>1;1-(p0858+p0864+p0865+p0866+p0867);p0863))
- p1186: 2.19428e-8; = p1182*p1185/p0818
- p0770: 30.548; = p0110*(1+p0638*p0242/100)
- p2702: 0; = p2311*(p1128+p1130)
- p5293: 3.98109e-8; = p1914*p3484
- p0680: 0
- p0389: 0.5
- p4311: 0; = p1756*p3480
- p2704: 0; = p2313*(p1128+p1130)
- p2174: 0.00362983; = p0895*p0903/p0818
- p2368: 3.72026e-7; = p2225*p2197
- p2520: 8.66679e-5; = p2324*p1014
- p2470: 0; = p2274*p1123
- p1948: 0
- p2158: 8.86661e-7; = p2015*p2082*p2120/(p0818*1000)
- p2172: 0.268873; = p2166-(p2167+p2168+p2169+p2170)
- p3451: 0; = p3375*p1240
- p2145: 1.9965e-6; = p2015*p2073*p2107/(p0818*1000)
- p1449: 748
- p0851: 0
- p0724: 2.403; = p0064*(1+p0592*p0196/100)
- p1872: 0
- p1433: 1
- p0956: 0; = if(and(p0683>0;or(p0807=56;p0807=100;and(p0807=60;p0901>0.06)));p0938;0)
- p2870: 6.42163e-5; = p2284*(p1020+p1022)
- p1599: 0
- p1123: 1; = if(p1121=0;p0717/100;0)
- p2825: 7.64542e-6; = p2239*(p1020+p1022)
- p2410: 0; = p2234*p2200
- p0009: 41.3071
- p3298: 0; = if(p1283+p1284+p1285+p1286=0;0;p1283/(p1283+p1284+p1285+p1286))
- p1209: 46.0831; = p1206*p0818*p0822/p0801
- p1684: 0
- p0045: 68.825
- p0900: 0.91137; = p0899/p0818
- p0419: 0; = SQRT(2)*(IF((2*p0287-1)<0;-1;IF((2*p0287-1)>0;1;0))*SQRT(SQRT((2/(pi()*0.140012289)+LN(1-(2*p0287-1)^2)/2)^2-LN(1-(2*p0287-1)^2)/0.140012289)-(2/(pi()*0.140012289)+LN(1-(2*p0287-1)^2)/2)))
- p1869: 0
- p3078: 0; = p2297*p1082
- p0857: 4.00702; = p0856*p0001*p0003/(p0818*p0002)
- p2160: 4.29657e-7; = p2015*p2084*p2122/(p0818*1000)
- p1428: 52
- p2934: 0; = p2348*(p1079+p1081)
- p2094: 0.922577
- p0746: 0
- p3414: 0; = p3376*p1238
- p2959: 5.16159e-6; = p2373*(p1020+p1022)
- p1949: 0
- p2387: 0; = p2229*p2216
- p2130: 4.06807e-6; = p2015*p2058*p2092/(p0818*1000)
- p2451: 0.000192798; = p2255*p1014
- p2075: 0.072
- p0243: 5.7
- p3072: 1.12264e-7; = p2291*p1023
- p1438: 6
- p2684: 0; = p2293*(p1019+p1021)
- p1126: 0; = if(p1121=0;p0720/100;0)
- p3070: 0.000155058; = p2289*p1023
- p3326: 0; = if(and(p1232=0;p3255<>0);p3268*p3289;0)
- p2797: 0; = p2406*(p1019+p1021)
- p1629: 0
- p2901: 0.00160397; = p2315*(p1020+p1022)
- p3189: 0; = p2408*p1023
- p2092: 0.54529
- p3274: 0.0768939
- p1648: 0
- p5087: 0; = p1914*p3483
- p1276: 0; = p1272*p1252/p0818
- p1296: 0; = p1292*p1252/p0818
- p2459: 0; = p2263*p1073
- p0803: 0
- p3368: 0; = if(p1232=0;p3245*p3356/p0818;0)
- p5131: 0; = p1962*p3483
- p3233: 0.60394
- p2235: 0; = 1-(p2226+p2227+p2228+p2229)
- p3003: 0; = p2417*(p1079+p1081)
- p2575: 0; = p2379*p1073
- p3192: 0; = p2411*p1023
- p3130: 7.30548e-5; = p2349*p1082
- p0708: 0
- p2509: 0; = p2313*p1123
- p3324: 0; = if(and(p1232=0;p3255<>0);p3266*(p3279*(p3284*p1256+p3286*(p1253+p1257)+p1258*p3288+p3299*p3287));0)
- p0686: 0
- p1627: 0
- p1042: 0.000315647
- p0129: 100
- p0195: 0.015
- p0578: 0; = IF(p0314<0.5;-SQRT(p0007*EXP(p0446^2*p0008)-p0007);SQRT(p0007*EXP(p0446^2*p0008)-p0007))
- p2999: 0; = p2413*(p1020+p1022)
- p0771: 126.693; = p0111*(1+p0639*p0243/100)
- p0370: 0.5
- p1806: 0
- p2837: 2.32022e-7; = p2251*(p1020+p1022)
- p0535: 0; = SQRT(2)*(IF((2*p0403-1)<0;-1;IF((2*p0403-1)>0;1;0))*SQRT(SQRT((2/(pi()*0.140012289)+LN(1-(2*p0403-1)^2)/2)^2-LN(1-(2*p0403-1)^2)/0.140012289)-(2/(pi()*0.140012289)+LN(1-(2*p0403-1)^2)/2)))
- p0342: 0.5
- p3925: 1.8122e-5; = p1782*p3478
- p1915: 0
- p1340: 0; = p1325*p0801
- p1774: 0
- p2207: 0.00430542; = p1119-p2205-p2204-p2206
- p2300: 0; = p2227*p2207
- p2496: 0; = p2300*p1073
- p3134: 0; = p2353*p1132
- p2382: 0; = p2229*p2211
- p2894: 0; = p2308*(p1079+p1081)
- p0220: 10.809
- p1267: 0
- p2501: 0; = p2305*p1073
- p3136: 2.61899e-6; = p2355*p1023
- p2996: 0; = p2410*(p1020+p1022)
- p2747: 0; = p2356*(p1019+p1021)
- p5337: 3.69591e-7; = p1962*p3484
- p1694: 0
- p2905: 0.000123722; = p2319*(p1020+p1022)
- p1816: 0
- p1655: 0
- p0181: 25.264
- p1092: 0; = IF(p1071=0;p1086*p0001/(p0818*p0002);0)
- p0824: 0.863
- p1957: 0
- p3589: 0; = p1858*p3476
- p1192: 1.25682e-7; = p1188*p1191/p0818
- p2162: 9.77659e-8; = p2015*p2086*p2124/(p0818*1000)
- p0571: 0; = IF(p0307<0.5;-SQRT(p0007*EXP(p0439^2*p0008)-p0007);SQRT(p0007*EXP(p0439^2*p0008)-p0007))
- p2400: 0; = p2234*p2189
- p0633: 0; = IF(p0369<0.5;-SQRT(p0007*EXP(p0501^2*p0008)-p0007);SQRT(p0007*EXP(p0501^2*p0008)-p0007))
- p1572: 0
- p3310: 0; = if(and(p1232=0;p3252<>0);IF((p3306+p3307+p3308+p3309)+(p3252*(p3257*(1-p3277))/p3305)>p3252;p3252-(p3306+p3307+p3308+p3309);p3252*(p3257*(1-p3277))/p3305);0)
- p1666: 0
- p1793: 4.89956e-6; = p1385*1000/p0818
- p1765: 0
- p1197: 1.806
- p2161: 5.30729e-8; = p2015*p2085*p2123/(p0818*1000)
- p2546: 0.000295966; = p2350*p1123
- p2899: 0; = p2313*(p1129+p1131)
- p2436: 6.41417e-5; = p2240*p1014
- p1980: 3521.6
- p2964: 0; = p2378*(p1079+p1081)
- p1583: 0
- p0223: 7.205
- p1151: 186721; = if(p1121=0;p1149*p1148*p1145;0)
- p1204: 0.980791
- p0965: 0; = IF(p0684/100=1;0;IF(p0684/100+p0685/100>1;1-p0684/100;p0685/100))
- p2236: 0; = 1-(p2230+p2231+p2232+p2233)
- p2574: 0; = p2378*p1073
- p2332: 0.0041099; = p2224*p2200
- p1171: 0.000400702; = p0801*p0001/(p0818*p0002)
- p3295: 0.58
- p1000: 0; = IF(p0996+p0999=1;0;IF(p0996+p0999+p0998>1;1-(p0996+p0999);p0998))
- p0904: 1.31384e8; = p0825*p0901+(p0830+p0895)*p0824*p0903
- p4469: 0; = p1914*p3480
- p3132: 0; = p2351*p1132
- p2308: 0; = p2227*p2215
- p3387: 0; = p3368*p1234
- p3458: 0.000305691; = p3363*p1241
- p3470: 0; = p3375*p1241
- p1006: 0; = p1002*p0001*p0004/(p0818*p0002)
- p0926: 0; = IF(p0918+p0923+p0924+p0925=1;0;IF(p0918+p0923+p0924+p0925+p0922>1;1-(p0918+p0923+p0924+p0925);p0922))
- p2795: 0; = p2404*(p1019+p1021)
- p1927: 0
- p1623: 0
- p3204: 0; = p2423*p1082
- p1177: 0.000400702; = p0801*p0001/(p0818*p0002)
- p0107: 28.961
- p2126: 4.35933e-6; = p2015*p2054*p2088/(p0818*1000)
- p0865: 0; = IF(p0858+p0864=1;0;IF(p0858+p0864+p0860>1;1-(p0858+p0864);p0860))
- p2832: 5.65701e-6; = p2246*(p1020+p1022)
- p1891: 0
- p2858: 0; = p2272*(p1129+p1131)
- p1584: 0
- p2164: 0.00215468; = (p2015/p0818)-(p2022)-(p2035+p2036+p2052)-(p2017/p0818)-(p2039+p2041+p2044+p2158+p2159+p2160+p2161+p2162)
- p2059: 1.00168
- p0016: 1340.95
- p0909: 2.17548e7
- p3166: 0; = p2385*p1082
- p0403: 0.5
- p1208: 0; = p1205*p0818*p0822/p0801
- p0914: 6.52545e7; = p0825*p0911+(p0830+p0895)*p0824*p0913
- p3279: 0.37
- p0733: 0
- p2132: 1.50673e-6; = p2015*p2060*p2094/(p0818*1000)
- p3953: 2.0254e-6; = p1810*p3478
- p2821: 0; = p2430*(p1128+p1130)
- p2428: 0; = p2236*p2218
- p3333: 0; = if(and(p1232=0;p3255<>0);p3255-(p3328+p3329+p3330+p3331+p3332);0)
- p2404: 0; = p2234*p2193
- p2945: 1.28261e-6; = p2359*(p1020+p1022)
- p0410: 0; = SQRT(2)*(IF((2*p0278-1)<0;-1;IF((2*p0278-1)>0;1;0))*SQRT(SQRT((2/(pi()*0.140012289)+LN(1-(2*p0278-1)^2)/2)^2-LN(1-(2*p0278-1)^2)/0.140012289)-(2/(pi()*0.140012289)+LN(1-(2*p0278-1)^2)/2)))
- p3339: 0; = if(and(p1232=0;p3254<>0);p3254*(p3269*p3277-p3334)/p3338;0)
- p2219: 0.000417078; = p1154-p2218
- p2729: 2.51752e-5; = p2338*(p1078+p1080)
- p3269: 0.851786
- p1798: 5.98835e-6; = p1390*1000/p0818
- p1919: 0
- p3338: 0; = if(and(p1232=0;p3254<>0);1-(p3334+p3335+p3336+p3337);0)
- p0244: 40.596
- p2709: 0; = p2318*(p1019+p1021)
- p0873: 0; = p0872*p0001*p0003/(p0818*p0002)
- p1701: 0
- p2618: 0; = p2422*p1073
- p3178: 0; = p2397*p1023
- p2531: 0.00200091; = p2335*p1014
- p2082: 0.285294
- p3437: 0; = p3380*p1239
- p2978: 0; = p2392*(p1129+p1131)
- p3448: 0; = p3372*p1240
- p2289: 0.00531383; = p2223*p2196
- p1941: 0
- p2697: 0; = p2306*(p1078+p1080)
- p3051: 0; = p2270*p1082
- p2814: 0; = p2423*(p1078+p1080)
- p1849: 0
- p1061: 0.3
- p2405: 0; = p2234*p2195
- p3733: 0; = p1796*p3477
- p2502: 0; = p2306*p1073
- p2524: 0.00805848; = p2328*p1014
- p2801: 0; = p2410*(p1019+p1021)
- p3127: 3.75194e-6; = p2346*p1082
- p1332: 2.10877e6; = p1321*p0801
- p3079: 0; = p2298*p1082
- p1673: 0
- p1073: 0.89665; = IF(p1071=0;p0711/100;0)
- p2951: 0.000112468; = p2365*(p1020+p1022)
- p2783: 0; = p2392*(p1128+p1130)
- p0175: 0.015
- p0690: 0
- p2083: 2.17294
- p0215: 8.57
- p2532: 0.00158754; = p2336*p1073
- p3335: 0; = IF(or(p3254=0;p1232>0);0;p3270*(p3280*(p3283*p1256+p3286*(p1253+p1257)+p1258*p3288+p3300*p3287)))
- p1870: 0
- p2653: 0; = p2262*(p1078+p1080)
- p2677: 0; = p2286*(p1019+p1021)
- p1604: 0
- p2839: 8.37288e-7; = p2253*(p1020+p1022)
- p5132: 0; = p1963*p3483
- p0921: 0; = p0679*1000/p0801
- p2947: 8.90428e-6; = p2361*(p1020+p1022)
- p3396: 0; = p3377*p1234
- p2743: 0; = p2352*(p1128+p1130)
- p1686: 0
- p3465: 0; = p3370*p1241
- p3133: 0; = p2352*p1132
- p1152: 0.415074
- p4348: 0; = p1793*p3480
- p1033: 0; = IF(p1012=0;p1027*p0001/(p0818*p0002);0)
- p2749: 0; = p2358*(p1019+p1021)
- p1602: 0
- p3371: 0; = if(p1232=0;p3245*p3359/p0818;0)
- p2755: 0; = p2364*(p1019+p1021)
- p1596: 0
- p0273: 0.5
- p4292: 0; = p1943*p3479
- p1555: 0
- p2278: 7.72374e-5; = p2223*p2184
- p0835: 903.139; = -LN(1-p0669/100)/p0834
- p3880: 0; = p1943*p3477
- p2490: 0.000550371; = p2294*p1014
- p2201: 0.00296873; = 12.01*p2200/(2*14.0067)
- p1190: 2.51364e-7; = p1188/p0818
- p4969: 0; = p1796*p3483
- p1348: 64
- p3259: 0.00796296
- p2788: 0; = p2397*(p1019+p1021)
- p4618: 0.000122378; = p1857*p3481
- p3138: 1.23211e-6; = p2357*p1023
- p0964: 0; = 56/90000
- p2971: 0; = p2385*(p1079+p1081)
- p0784: 0
- p3086: 0; = p2305*p1082
- p0516: 0; = SQRT(2)*(IF((2*p0384-1)<0;-1;IF((2*p0384-1)>0;1;0))*SQRT(SQRT((2/(pi()*0.140012289)+LN(1-(2*p0384-1)^2)/2)^2-LN(1-(2*p0384-1)^2)/0.140012289)-(2/(pi()*0.140012289)+LN(1-(2*p0384-1)^2)/2)))
- p3065: 6.63139e-6; = p2284*p1023
- p1115: 0.237849
- p3206: 0; = p2425*p1082
- p0876: 908934; = p0866*p0856
- p3040: 0; = p2259*p1082
- p3313: 0; = if(and(p1232=0;p3253<>0);p3262*(p3278*(p3282*p1256+p3286*(p1253+p1257)+p1258*p3288+p3298*p3287));0)
- p1201: 0.65
- p0002: 0.453592
- p2655: 0; = p2264*(p1078+p1080)
- p4723: 0; = p1756*p3482
- p2533: 0.00143581; = p2337*p1073
- p2468: 0; = p2272*p1123
- p1329: 0; = p1328*p0001/(p0818*p0002)
- p0889: 0; = 1000*p0888*p0001*p0003*p0004/(p0818*p0002)
- p1824: 0
- p2041: 2.63847e-6; = p2015*p2040/(p0818*1000)
- p3104: 1.46118e-5; = p2323*p1023
- p3260: 0.0343561
- p2129: 7.39051e-6; = p2015*p2057*p2091/(p0818*1000)
- p2594: 0; = p2398*p1014
- p3203: 0; = p2422*p1082
- p2721: 0; = p2330*(p1019+p1021)
- p1634: 0
- p4131: 0; = p1782*p3479
- p3896: 0; = p1963*p3477
- p0957: 0; = if(and(p0683>0;or(p0807=56;p0807=100;and(p0807=60;p0901>0.06)));p0939;0)
- p3370: 0; = if(p1232=0;p3245*p3358/p0818;0)
- p2047: 1.79896e-13; = p2015*p2045/(p0818*1000000000000)
- p2661: 0; = p2270*(p1078+p1080)
- p2736: 1.32723e-6; = p2345*(p1078+p1080)
- p0405: 0; = SQRT(2)*(IF((2*p0273-1)<0;-1;IF((2*p0273-1)>0;1;0))*SQRT(SQRT((2/(pi()*0.140012289)+LN(1-(2*p0273-1)^2)/2)^2-LN(1-(2*p0273-1)^2)/0.140012289)-(2/(pi()*0.140012289)+LN(1-(2*p0273-1)^2)/2)))
- p2147: 3.56877e-7; = p2015*p2075*p2109/(p0818*1000)
- p2840: 0.000184632; = p2254*(p1020+p1022)
- p3011: 0; = p2425*(p1079+p1081)
- p2590: 0; = p2394*p1014
- p4926: 0; = p1963*p3482
- p0616: 0; = IF(p0352<0.5;-SQRT(p0007*EXP(p0484^2*p0008)-p0007);SQRT(p0007*EXP(p0484^2*p0008)-p0007))
- p1072: 0; = p1071*p0001/(p0818*p0002)
- p2530: 0.000174535; = p2334*p1014
- p2657: 0; = p2266*(p1078+p1080)
- p1284: 0; = p1280*p1252/p0818
- p2466: 0; = p2270*p1073
- p5019: 0; = p1846*p3483
- p2553: 2.90611e-5; = p2357*p1014
- p2926: 0; = p2340*(p1079+p1081)
- p3366: 0.00175606; = if(p1232=0;p3244*p3360/p0818;0)
- p0847: 0
- p1841: 2.72198e-7; = p1433*1000/p0818
- p2079: 0.02
- p2713: 0; = p2322*(p1019+p1021)
- p1945: 0
- p3430: 0; = p3373*p1239
- p1121: 0
- p3150: 1.7818e-8; = p2369*p1023
- p2687: 0; = p2296*(p1019+p1021)
- p1860: 0
- p3369: 0; = if(p1232=0;p3245*p3357/p0818;0)
- p2465: 0; = p2269*p1073
- p0134: 0.06
- p1674: 0
- p3257: 0.849747
- p2108: 0.826583
- p1450: 49
- p0758: 0
- p2599: 0; = p2403*p1014
- p2286: 0.000462491; = p2223*p2192
- p1971: 0.000381274; = p1966*p0001/(p0818*p0002)
- p3280: 0.375
- p2779: 0; = p2388*(p1078+p1080)
- p4607: 9.81642e-7; = p1846*p3481
- p0266: 45.014
- p3413: 0; = p3375*p1238
- p4431: 0; = p1876*p3480
- p0839: 0.548235; = p0838/p0818
- p1740: 0
- p2950: 2.07419e-5; = p2364*(p1020+p1022)
- p3115: 7.39985e-6; = p2334*p1023
- p3184: 0; = p2403*p1023
- p2026: 55.14
- p0817: 0
- p2245: 7.96099e-5; = p2222*p2190
- p0768: 43.164; = p0108*(1+p0636*p0240/100)
- p3440: 0; = p3364*p1240
- p3989: 6.39601e-7; = p1846*p3478
- p3690: 0; = p1963*p3476
- p1724: 0
- p3014: 0; = p2428*(p1129+p1131)
- p2322: 0.000437475; = p2224*p2189
- p5236: 1.48893e-6; = p1857*p3484
- p3263: 0.0214527
- p3041: 0; = p2260*p1082
- p1213: 0
- p1081: 0; = IF(p1071=0;IF(p1073+p1078+p1079+p1080=1;0;IF(p1073+p1078+p1079+p1080+p1077>1;1-(p1073+p1078+p1079+p1080);p1077));0)
- p0504: 0; = SQRT(2)*(IF((2*p0372-1)<0;-1;IF((2*p0372-1)>0;1;0))*SQRT(SQRT((2/(pi()*0.140012289)+LN(1-(2*p0372-1)^2)/2)^2-LN(1-(2*p0372-1)^2)/0.140012289)-(2/(pi()*0.140012289)+LN(1-(2*p0372-1)^2)/2)))
- p2128: 4.98642e-6; = p2015*p2056*p2090/(p0818*1000)
- p2849: 0; = p2263*(p1079+p1081)
- p0885: 100; = IF(p0689+p0884=100;0;100-(p0689+p0884))
- p2538: 0.00038744; = p2342*p1073
- p3182: 0; = p2401*p1023
- p2680: 0; = p2289*(p1019+p1021)
- p2479: 0.000136647; = p2283*p1014
- p2364: 7.34044e-5; = p2225*p2192
- p3466: 0; = p3371*p1241
- p2861: 0; = p2275*(p1129+p1131)
- p2442: 1.37787e-5; = p2246*p1014
- p3190: 0; = p2409*p1023
- p0766: 54.511; = p0106*(1+p0634*p0238/100)
- p2664: 0; = p2273*(p1128+p1130)
- p1240: 0; = if(p1232>0;0;IF(p1234+p1238+p1239=1;0;IF(p1234+p1238+p1239+p1237>1;1-(p1234+p1238+p1239);p1237)))
- p0210: 0.013
- p3094: 0; = p2313*p1132
- p3359: 1.60316e6; = if(p1232=0;p3309+p3320+p3331+p3342+p3353;0)
- p2602: 0; = p2406*p1014
- p1110: 8.13027e6; = IF(p1071=0;p1105*p1104*p1095;0)
- p1612: 0
- p2956: 3.79355e-7; = p2370*(p1020+p1022)
- p2269: 0; = p2226*p2215
- p3173: 0; = p2392*p1132
- p3352: 387722; = if(and(p1232=0;p3256<>0);p3256*(p3275-p3347)/p3349;0)
- p3090: 0; = p2309*p1082
- p1967: 0; = if(p0807=480;p0802*p0810;0)
- p2419: 0; = p2235*p2209
- p3124: 0.000310085; = p2343*p1082
- p2483: 0.00172595; = p2287*p1014
- p2920: 7.16578e-5; = p2334*(p1020+p1022)
- p1748: 0
- p0044: 99.417
- p3246: 0; = IF(p3244+p3245=1;0;1-(p3244+p3245))
- p2854: 0; = p2268*(p1079+p1081)
- p0409: 0; = SQRT(2)*(IF((2*p0277-1)<0;-1;IF((2*p0277-1)>0;1;0))*SQRT(SQRT((2/(pi()*0.140012289)+LN(1-(2*p0277-1)^2)/2)^2-LN(1-(2*p0277-1)^2)/0.140012289)-(2/(pi()*0.140012289)+LN(1-(2*p0277-1)^2)/2)))
- p1325: 0; = IF(((p0745*1000*p0752/100)+(p0754*1000*p0761/100))/p0801<0;0;((p0745*1000*p0752/100)+(p0754*1000*p0761/100))/p0801)
- p1439: 31
- p1818: 0
- p0767: 28.961; = p0107*(1+p0635*p0239/100)
- p0315: 0.5
- p0849: 0
- p2258: 0; = p2226*p2204
- p2290: 2.34398e-6; = p2223*p2197
- p0347: 0.5
- p3350: 4.8296e6; = if(and(p1232=0;p3256<>0);p3256*(p3273*p3277-p3345)/p3349;0)
- p0764: 99.417; = p0104*(1+p0632*p0236/100)
- p2095: 0.765734
- p1556: 0
- p3577: 0; = p1846*p3476
- p1559: 0
- p2898: 0; = p2312*(p1129+p1131)
- p1113: 0.100377
- p0022: 1648.1
- p0496: 0; = SQRT(2)*(IF((2*p0364-1)<0;-1;IF((2*p0364-1)>0;1;0))*SQRT(SQRT((2/(pi()*0.140012289)+LN(1-(2*p0364-1)^2)/2)^2-LN(1-(2*p0364-1)^2)/0.140012289)-(2/(pi()*0.140012289)+LN(1-(2*p0364-1)^2)/2)))
- p4925: 0; = p1962*p3482
- p3478: 0.391628; = if(p1328+p1330+p1332+p1334+p1336+p1338+p1340+p1342+p1344=0;0;p1332/(p1328+p1330+p1332+p1334+p1336+p1338+p1340+p1342+p1344))
- p1211: 0.6
- p3039: 0; = p2258*p1082
- p1225: 1.088; = IF(p1221=0;0;p1223+1.2*p1224)
- p2609: 0; = p2413*p1014
- p1552: 0.80831
- p0867: 0.375193; = IF(p0858+p0864+p0865+p0866=1;0;IF(p0858+p0864+p0865+p0866+p0862>1;1-(p0858+p0864+p0865+p0866);p0862))
- p1965: 0.000530808; = p1963+p1959*p1964*1000/p0818
- p0252: 2.466
- p3000: 0; = p2414*(p1079+p1081)
- p1964: 0.5
- p1168: 9.83764e-7; = p1164*p1167/p0818
- p0112: 6.123
- p2882: 0.000372828; = p2296*(p1020+p1022)
- p2763: 0; = p2372*(p1019+p1021)
- p1150: 1.08732e6; = if(p1121=0;p1149*p1146*p1145;0)
- p2719: 0; = p2328*(p1019+p1021)
- p3341: 0; = if(and(p1232=0;p3254<>0);p3254*(p3271-p3336)/p3338;0)
- p1963c: 1.56435e-5; = p1588*p1792+p1589*p1793+p1590*p1794+p1591*p1795+p1592*p1796+p1593*p1797+p1594*p1798+p1595*p1799+p1596*p1800+p1597*p1801+p1598*p1802+p1599*p1803+p1600*p1804+p1601*p1805+p1602*p1806+p1603*p1807+p1604*p1808+p1605*p1809+p1606*p1810+p1607*p1811
- p2989: 0; = p2403*(p1020+p1022)
- p2537: 0.000897335; = p2341*p1073
- p3784: 0; = p1847*p3477
- p3273: 0.753577
- p2841: 7.91559e-5; = p2255*(p1020+p1022)
- p4929: 0; = p1756*p3483
- p4337: 0; = p1782*p3480
- p0103: 1647.93
- p4748: 0; = p1781*p3482
- p1041: 0.337699
- p0245: 3.787
- p0880: 0; = p0868*p0856
- p0870: 0; = p0858*p0856
- p1652: 0
- p1725: 0
- p1905: 0
- p0893: 0.0295935; = 1000*(p0890+p0892)*p0001*p0003*p0004/(p0818*p0002)
- p1731: 0
- p1066: 0.0022021; = IF(p1012=0;p1052/(p1059*p0818);0)
- p2811: 0; = p2420*(p1078+p1080)
- p2294: 0.000799667; = p2223*p2201
- p3606: 0; = p1875*p3476
- p1717: 0
- p3567: 0; = p1836*p3476
- p1219: 0; = if(p1218=0;0;SQRT(2)*(IF((2*p1218-1)<0;-1;IF((2*p1218-1)>0;1;0))*SQRT(SQRT((2/(pi()*0.140012289)+LN(1-(2*p1218-1)^2)/2)^2-LN(1-(2*p1218-1)^2)/0.140012289)-(2/(pi()*0.140012289)+LN(1-(2*p1218-1)^2)/2))))
- p2143: 8.04238e-7; = p2015*p2071*p2105/(p0818*1000)
- p2541: 2.45121e-5; = p2345*p1073
- p0978: 1.65e6; = p0801
- p0950: 0; = if(and(p0683=0;or(p0807=480;p0807=32;p0807=1;and(p0807=60;p0901<0.03)));p0938;0)
- p0844: 0.292241
- p2252: 1.34773e-6; = p2222*p2198
- p2562: 5.87212e-5; = p2366*p1014
- p2826: 2.63342e-5; = p2240*(p1020+p1022)
- p1143: 0; = if(p1121=0;p1137*p0001/(p0818*p0002);0)
- p1846: 1.63319e-6; = p1438*1000/p0818
- p0738: 1648.1; = p0078*(1+p0606*p0210/100)
- p2727: 8.59588e-5; = p2336*(p1078+p1080)
- p1999: 7.09579e7; = (p1228+p1229)*p0818+p1164
- p1189: 0.000400702; = p0801*p0001/(p0818*p0002)
- p1147: 0.146558
- p0309: 0.5
- p3093: 0; = p2312*p1132
- p1944: 0
- p2761: 0; = p2370*(p1019+p1021)
- p0898: 0.45865
- p2356: 1.22588e-5; = p2225*p2184
- p1135: 0; = if(p1121=0;p1129*(p0716/100)*p0703*1000;0)
- p2053: 1.45647
- p1229: 0.00106424; = IF(p1221=0;0;p1228*p1221)
- p2176: 0.00337742; = p0895*p0913/p0818
- p0913: 0.0120403
- p3229: 1.96753e-6; = p1164/p0818
- p0945: 0; = if(and(p0683=0;p0951=0);p0939;0)
- p2093: 0.260958
- p1719: 0
- p1287: 0
- p0928: 0; = p0801*p0918
- p2121: 0.822447
- p0778: 0
- p1838: 0
- p4675: 3.27214e-6; = p1914*p3481
- p0695: 0
- p5048: 0; = p1875*p3483
- p3287: 0.745
- p0106: 54.511
- p0081: 0.83
- p1076: 0; = IF(p1071=0;p0714/100;0)
- p1049: 0.251177; = IF(p1012=0;IF(p1037+p1044+p1045+p1046+p1047+p1048=1;0;1-(p1037+p1044+p1045+p1046+p1047+p1048));0)
- p0607: 0; = IF(p0343<0.5;-SQRT(p0007*EXP(p0475^2*p0008)-p0007);SQRT(p0007*EXP(p0475^2*p0008)-p0007))
- p0182: 3.787
- p3245: 0; = IF(p3244=1;0;if(p3244+p0792/100>1;1-p3244;p0792/100))
- p2237: 0.000902442; = p2222*p2182
- p1697: 0
- p0716: 10.95; = p0056*(1+p0584*p0188/100)
- p0109: 9.957
- p1866: 0
- p3292: 0.258
- p1553: 0
- p3193: 0; = p2412*p1023
- p2163: 0.0021885; = (p2017-p2020)/p0818-(p2025+p2028+p2033+p2034+p2051+p2125+p2126+p2127+p2128+p2129+p2130+p2131+p2132+p2133+p2134+p2135+p2136+p2137+p2138+p2139+p2140+p2141+p2142+p2143+p2144+p2145+p2146+p2147+p2148+p2149+p2150+p2151+p2152+p2153+p2154+p2155+p2156+p2157)
- p0412: 0; = SQRT(2)*(IF((2*p0280-1)<0;-1;IF((2*p0280-1)>0;1;0))*SQRT(SQRT((2/(pi()*0.140012289)+LN(1-(2*p0280-1)^2)/2)^2-LN(1-(2*p0280-1)^2)/0.140012289)-(2/(pi()*0.140012289)+LN(1-(2*p0280-1)^2)/2)))
- p2585: 0; = p2389*p1123
- p1859: 0
- p3154: 5.33019e-7; = p2373*p1023
- p2544: 0.000133372; = p2348*p1073
- p0321: 0.5
- p3044: 0; = p2263*p1082
- p0715: 0
- p0988: 0; = p0982*p0886
- p1669: 0
- p2100: 0.705744
- p2196: 0.0197273; = p1068-p2193-p2195
- p0584: 0; = IF(p0320<0.5;-SQRT(p0007*EXP(p0452^2*p0008)-p0007);SQRT(p0007*EXP(p0452^2*p0008)-p0007))
- p0402: 0.5
- p2708: 0; = p2317*(p1019+p1021)
- p3309: 0; = if(and(p1232=0;p3252<>0);p3252*(p3260-p3304)/p3305;0)
- p2922: 0; = p2336*(p1079+p1081)
- p3473: 0; = p3378*p1241
- p1988: 750
- p2109: 0.826583
- p3057: 7.51721e-5; = p2276*p1023
- p0826: 0.118333; = 1-p0825/p0818
- p3406: 0; = p3368*p1238
- p1564: 0
- p3255: 0; = p1252*(p1297*(1-p3247)+p1300*(1-p3248)+p1301*(1-p3249)+p1302*(1-p3250))
- p2994: 0; = p2408*(p1020+p1022)
- p1304: 0; = p1300*p1252/p0818
- p0842: 0.076462
- p0684: 0
- p1038: 0.010401
- p3578: 0; = p1847*p3476
- p0763: 1647.93; = p0103*(1+p0631*p0235/100)
- p1165: 0.000400702; = p0801*p0001/(p0818*p0002)
- p3158: 0; = p2377*p1082
- p1877: 0
- p0862: 0.375193; = p0674*1000/p0856
- p1902: 0
- p0088: 39.742
- p1167: 0.5
- p0713: 0
- p2593: 0; = p2397*p1014
- p2705: 0; = p2314*(p1128+p1130)
- p5031: 0; = p1858*p3483
- p1259: 0; = if(p1232>0;0;p0730/100)
- p1987: 400
- p2949: 2.56305e-6; = p2363*(p1020+p1022)
- p1956: 0
- p2460: 0; = p2264*p1073
- p0367: 0.5
- p3441: 0; = p3365*p1240
- p0091: 59.867
- p3312: 0; = if(and(p1232=0;p3253<>0);p3261*p3277*(p3298*p3290+(1-p3298)*p3294);0)
- p0765: 58.585; = p0105*(1+p0633*p0237/100)
- p1271: 0; = IF(p1267+p1270=p1259;0;IF(p1267+p1270+p1269>p1259;p1259-(p1267+p1270);p1269))
- p2104: 0.817136
- p2480: 0.00015641; = p2284*p1014
- p3747: 0; = p1810*p3477
- p0355: 0.5
- p1103: 0.421213; = IF(p1071=0;IF(p1096+p1101+p1102=1;0;IF(p1096+p1101+p1102+p1099>1;1-(p1096+p1101+p1102);p1099));0)
- p2516: 4.33705e-5; = p2320*p1014
- p0399: 0.5
- p1220: 0; = IF(p1218<0.5;-SQRT(p1214*EXP(p1219^2*p1215)-p1214);SQRT(p1214*EXP(p1219^2*p1215)-p1214))
- p1170: 797.944; = p1169*p0801
- p0145: 8.376
- p2298: 0; = p2227*p2205
- p3069: 1.56861e-5; = p2288*p1023
- p0979: 0; = IF(p0976=0;0;p0976*p0001/(p0818*p0002))
- p0807: 60
- p2874: 0.000151899; = p2288*(p1020+p1022)
- p2003: 50
- p1051: 1.05343e6; = IF(p1012=0;p1044*p1036;0)
- p0550: 0; = IF(p0286<0.5;-SQRT(p0007*EXP(p0418^2*p0008)-p0007);SQRT(p0007*EXP(p0418^2*p0008)-p0007))
- p4513: 0; = p1962*p3480
- p0869: 0.0739382; = IF(p0858+p0864+p0865+p0866+p0867+p0868=1;0;1-(p0858+p0864+p0865+p0866+p0867+p0868))
- p1751: 0
- p3049: 0; = p2268*p1082
- p0484: 0; = SQRT(2)*(IF((2*p0352-1)<0;-1;IF((2*p0352-1)>0;1;0))*SQRT(SQRT((2/(pi()*0.140012289)+LN(1-(2*p0352-1)^2)/2)^2-LN(1-(2*p0352-1)^2)/0.140012289)-(2/(pi()*0.140012289)+LN(1-(2*p0352-1)^2)/2)))
- p0014: 619.068
- p2375: 0; = p2229*p2204
- p1780: 0
- p2933: 0; = p2347*(p1079+p1081)
- p3163: 0; = p2382*p1082
- p1954: 0
- p3059: 2.25379e-6; = p2278*p1023
- p2152: 1.24781e-7; = p2015*p2080*p2114/(p0818*1000)
- p1216: 0
- p2724: 0; = p2333*(p1019+p1021)
- p1187: 0.000559674
- p0918: 0; = p0680*1000/p0801
- p0710: 86.966; = p0050*(1+p0578*p0182/100)
- p1916: 0
- p5255: 1.17442e-7; = p1876*p3484
- p2492: 0.000908089; = p2296*p1014
- p1723: 0
- p0532: 0; = SQRT(2)*(IF((2*p0400-1)<0;-1;IF((2*p0400-1)>0;1;0))*SQRT(SQRT((2/(pi()*0.140012289)+LN(1-(2*p0400-1)^2)/2)^2-LN(1-(2*p0400-1)^2)/0.140012289)-(2/(pi()*0.140012289)+LN(1-(2*p0400-1)^2)/2)))
- p3346: 0.0178625; = if(and(p1232=0;p3256<>0);p3274*(p3281*(p3285*p1256+p3286*(p1253+p1257)+p1258*p3288));0)
- p2169: 0.00103402; = p2166*(p0908)
- p0386: 0.5
- p3444: 0; = p3368*p1240
- p1244: 0; = if(p1232>0;0;p1239*(p0725/100)*p0723*1000)
- p3429: 0; = p3372*p1239
- p2859: 0; = p2273*(p1129+p1131)
- p1736: 0
- p1307: 0
- p1005: 0; = p1001*p0888
- p3191: 0; = p2410*p1023
- p2227: 0; = if(p0774*p0778+p0775*p0779+p0776*p0780+p0777*p0781=0;0;p0779*p0775/(p0774*p0778+p0775*p0779+p0776*p0780+p0777*p0781))
- p3148: 2.461e-5; = p2367*p1023
- p0853: 0; = p0803/(p0802+p0803)
- p1289: 0
- p4224: 0; = p1875*p3479
- p1282: 0; = IF(p1277+p1280+p1281=p1260;0;p1260-(p1277+p1280+p1281))
- p2916: 2.3954e-6; = p2330*(p1020+p1022)
- p3463: 0; = p3368*p1241
- p3344: 0; = if(and(p1232=0;p3254<>0);p3254-(p3339+p3340+p3341+p3342+p3343);0)
- p1288: 0
- p0146: 11.253
- p1665: 0
- p1826: 0
- p0440: 0; = SQRT(2)*(IF((2*p0308-1)<0;-1;IF((2*p0308-1)>0;1;0))*SQRT(SQRT((2/(pi()*0.140012289)+LN(1-(2*p0308-1)^2)/2)^2-LN(1-(2*p0308-1)^2)/0.140012289)-(2/(pi()*0.140012289)+LN(1-(2*p0308-1)^2)/2)))
- p3412: 0; = p3374*p1238
- p0343: 0.5
- p0502: 0; = SQRT(2)*(IF((2*p0370-1)<0;-1;IF((2*p0370-1)>0;1;0))*SQRT(SQRT((2/(pi()*0.140012289)+LN(1-(2*p0370-1)^2)/2)^2-LN(1-(2*p0370-1)^2)/0.140012289)-(2/(pi()*0.140012289)+LN(1-(2*p0370-1)^2)/2)))
- p2500: 0; = p2304*p1073
- p0952: 0; = if(and(p0683>0;or(p0807=56;p0807=100;and(p0807=60;p0901>0.06)));p0934;0)
- p1986: 4200
- p0481: 0; = SQRT(2)*(IF((2*p0349-1)<0;-1;IF((2*p0349-1)>0;1;0))*SQRT(SQRT((2/(pi()*0.140012289)+LN(1-(2*p0349-1)^2)/2)^2-LN(1-(2*p0349-1)^2)/0.140012289)-(2/(pi()*0.140012289)+LN(1-(2*p0349-1)^2)/2)))
- p2134: 1.09841e-5; = p2015*p2062*p2096/(p0818*1000)
- p2610: 0; = p2414*p1073
- p1291: 0; = IF(p1287+p1290=p1264;0;IF(p1287+p1290+p1289>p1264;p1264-(p1287+p1290);p1289))
- p2591: 0; = p2395*p1014
- p0636: 0; = IF(p0372<0.5;-SQRT(p0007*EXP(p0504^2*p0008)-p0007);SQRT(p0007*EXP(p0504^2*p0008)-p0007))
- p2900: 0; = p2314*(p1129+p1131)
- p3071: 6.83975e-8; = p2290*p1023
- p0650: 0; = IF(p0386<0.5;-SQRT(p0007*EXP(p0518^2*p0008)-p0007);SQRT(p0007*EXP(p0518^2*p0008)-p0007))
- p4185: 0; = p1836*p3479
- p1803: 0
- p0693: 0
- p2503: 0; = p2307*p1073
- p3302: 0; = if(and(p1232=0;p3252<>0);p3258*(p3278*(p3282*p1256+p3286*(p1253+p1257)+p1258*p3288+p3297*p3287));0)
- p2080: 0.025
- p1626: 0
- p0905: 0.0357623; = p0904/p0818
- p1274: 0; = p1270*p1252/p0818
- p2698: 0; = p2307*(p1078+p1080)
- p3068: 7.31759e-5; = p2287*p1023
- p0856: 1.65e6; = p0801
- p1285: 0; = p1281*p1252/p0818
- p0487: 0; = SQRT(2)*(IF((2*p0355-1)<0;-1;IF((2*p0355-1)>0;1;0))*SQRT(SQRT((2/(pi()*0.140012289)+LN(1-(2*p0355-1)^2)/2)^2-LN(1-(2*p0355-1)^2)/0.140012289)-(2/(pi()*0.140012289)+LN(1-(2*p0355-1)^2)/2)))
- p0791: 100; = p0131*(1+p0659*p0263/100)
- p1128: 0; = if(p1121=0;IF(p1123=1;0;IF(p1123+p1124>1;1-p1123;p1124));0)
- p2759: 0; = p2368*(p1019+p1021)
- p0727: 0
- p3266: 0.0545989
- p1239: 0; = if(p1232>0;0;IF(p1234+p1238=1;0;IF(p1234+p1238+p1236>1;1-(p1234+p1238);p1236)))
- p2009: 0.0163058; = ((p1983*p1985+p1989*p1991+p1995*p1997+p2003*p2005+p1976*p1977+p1978*p1979+p1998*p1999)/p0818)*p0005*p0002/1000
- p3271: 0.0195489
- p1702: 0
- p2338: 0.000518542; = p2228*p2206
- p1337: 0; = p1336*p0001/(p0818*p0002)
- p2491: 7.92108e-5; = p2295*p1014
- p2659: 0; = p2268*(p1078+p1080)
- p2767: 0; = p2376*(p1078+p1080)
- p2660: 0; = p2269*(p1078+p1080)
- p1093: 0; = IF(p1071=0;p1087*p0001/(p0818*p0002);0)
- p2284: 0.000227258; = p2223*p2190
- p0530: 0; = SQRT(2)*(IF((2*p0398-1)<0;-1;IF((2*p0398-1)>0;1;0))*SQRT(SQRT((2/(pi()*0.140012289)+LN(1-(2*p0398-1)^2)/2)^2-LN(1-(2*p0398-1)^2)/0.140012289)-(2/(pi()*0.140012289)+LN(1-(2*p0398-1)^2)/2)))
- p2913: 0.0003347; = p2327*(p1020+p1022)
- p1133: 180448; = if(p1121=0;p1123*(p0716/100)*p0703*1000;0)
- p2283: 0.000198543; = p2223*p2189
- p1975: 0.000400702; = p1970*p0001/(p0818*p0002)
- p1661: 0
- p0745: 5306.16; = p0085*(1+p0613*p0217/100)
- p0640: 0; = IF(p0376<0.5;-SQRT(p0007*EXP(p0508^2*p0008)-p0007);SQRT(p0007*EXP(p0508^2*p0008)-p0007))
- p2850: 0; = p2264*(p1079+p1081)
- p2345: 2.73374e-5; = p2228*p2213
- p4001: 5.22341e-6; = p1858*p3478
- p1589: 0.897233
- p4554: 2.94493e-6; = p1793*p3481
- p2636: 0; = p2245*(p1019+p1021)
- p0838: 2.0141e9; = (p0833-p0836)*p0837
- p0959: 7.3335e-5; = if(and(p0683>0;or(p0807=480;p0807=32;p0807=1;and(p0807=60;p0901<0.03)));p0935;0)
- p2777: 0; = p2386*(p1078+p1080)
- p0271: 31.564
- p1995: 50
- p2027: 0.428799
- p3025: 2.02949e-6; = p2244*p1023
- p4910: 0; = p1943*p3482
- p0709: 19.703; = p0049*(1+p0577*p0181/100)
- p3102: 2.35231e-5; = p2321*p1023
- p2547: 0.000417078; = p2351*p1123
- p1185: 0.5
- p1008: 0; = p1004*p0001*p0004/(p0818*p0002)
- p2020: 571056; = p2015*p2018*p2019
- p0717: 100; = p0057*(1+p0585*p0189/100)
- p3235: 0.118093
- p1063: 0.455
- p1249: 0; = if(p1232>0;0;p1244*p0001/(p0818*p0002))
- p2450: 0.000449704; = p2254*p1014
- p1336: 0; = p1323*p0801
- p2087: 0.856281
- p2302: 0; = p2227*p2209
- p3165: 0; = p2384*p1082
- p2045: 30
- p2185: 0.00098766; = p1065-p2184
- p2107: 0.881623
- p0845: 0.5
- p0797: 24.69; = p0137*(1+p0665*p0269/100)
- p0883: 0.296272; = p0882*p0001*p0003/(p0818*p0002)
- p2233: 0; = if(p0783*p0787+p0784*p0788+p0785*p0789+p0786*p0790=0;0;p0790*p0786/(p0783*p0787+p0784*p0788+p0785*p0789+p0786*p0790))
- p1760: 0
- p3145: 2.14194e-6; = p2364*p1023
- p3385: 0; = p3366*p1234
- p2178: 0.0445306; = (p0895*p0831/(1-p0831))/(p0818)
- p0135: 61.82
- p1218: 0
- p3207: 0; = p2426*p1082
- p2265: 0; = p2226*p2211
- p1070: 0.0152188; = IF(p1012=0;p1056/(p1063*p0818);0)
- p2611: 0; = p2415*p1073
- p0991: 0; = p0987*p0886
- p0056: 10.95
- p0986: 0; = IF(p0982+p0985=1;0;IF(p0982+p0985+p0984>1;1-(p0982+p0985);p0984))
- p4571: 3.10853e-6; = p1810*p3481
- p2179: 0.0507775; = p0970+p0971+p0972
- p0047: 8.554
- p2155: 7.36859e-7; = p2015*p2084*p2117/(p0818*1000)
- p3306: 0; = if(and(p1232=0;p3252<>0);p3252*(p3257*p3277-p3301)/p3305;0)
- p3813: 0; = p1876*p3477
- p0671: 0
- p0631: 0; = IF(p0367<0.5;-SQRT(p0007*EXP(p0499^2*p0008)-p0007);SQRT(p0007*EXP(p0499^2*p0008)-p0007))
- p2554: 2.17063e-5; = p2358*p1014
- p3645: 0; = p1914*p3476
- p0506: 0; = SQRT(2)*(IF((2*p0374-1)<0;-1;IF((2*p0374-1)>0;1;0))*SQRT(SQRT((2/(pi()*0.140012289)+LN(1-(2*p0374-1)^2)/2)^2-LN(1-(2*p0374-1)^2)/0.140012289)-(2/(pi()*0.140012289)+LN(1-(2*p0374-1)^2)/2)))
- p2177: 0.144292; = p0895/p0818-(p2173+p2174+p2175+p2176)
- p4777: 0; = p1810*p3482
- p2221: 8.83204e-5; = p1155-p2220
- p3096: 0.000165636; = p2315*p1023
- p3476: 0; = if(p1328+p1330+p1332+p1334+p1336+p1338+p1340+p1342+p1344=0;0;p1328/(p1328+p1330+p1332+p1334+p1336+p1338+p1340+p1342+p1344))
- p1768: 0
- p0744: 4.762; = p0084*(1+p0612*p0216/100)
- p2193: 0.00930987; = p1054/p0818
- p1646: 0
- p3116: 8.48334e-5; = p2335*p1023
- p2818: 0; = p2427*(p1078+p1080)
- p3056: 0; = p2275*p1132
- p2231: 0; = if(p0783*p0787+p0784*p0788+p0785*p0789+p0786*p0790=0;0;p0788*p0784/(p0783*p0787+p0784*p0788+p0785*p0789+p0786*p0790))
- p2142: 1.38179e-6; = p2015*p2070*p2104/(p0818*1000)
- p1981: 400
- p1799: 0
- p2467: 0; = p2271*p1073
- p3353: 1.60316e6; = if(and(p1232=0;p3256<>0);p3256*(p3276-p3348)/p3349;0)
- p1013: 0; = p1012*p0001/(p0818*p0002)
- p3390: 0; = p3371*p1234
- p2536: 0.00198432; = p2340*p1073
- p3483: 0; = if(p1328+p1330+p1332+p1334+p1336+p1338+p1340+p1342+p1344=0;0;p1342/(p1328+p1330+p1332+p1334+p1336+p1338+p1340+p1342+p1344))
- p0750: 0
- p2488: 5.82166e-6; = p2292*p1014
- p2271: 0; = p2226*p2217
- p1667: 0
- p1722: 0
- p1772: 0
- p0702: 1647.93; = p0042*(1+p0570*p0174/100)
- p1024: 1.12758e6; = IF(p1012=0;p1014*(p0704/100)*p0703*1000;0)
- p3899: 6.82241e-6; = p1756*p3478
- p3210: 0; = p2429*p1132
- p2629: 0; = p2238*(p1019+p1021)
- p1048: 0.000315647; = IF(p1012=0;IF(p1037+p1044+p1045+p1046+p1047=1;0;IF(p1037+p1044+p1045+p1046+p1047+p1042>1;1-(p1037+p1044+p1045+p1046+p1047);p1042));0)
- p1707: 0
- p3453: 0; = p3377*p1240
- p0782: 10.95; = p0122*(1+p0650*p0254/100)
- p3108: 3.45632e-5; = p2327*p1023
- p2915: 1.45942e-6; = p2329*(p1020+p1022)
- p0459: 0; = SQRT(2)*(IF((2*p0327-1)<0;-1;IF((2*p0327-1)>0;1;0))*SQRT(SQRT((2/(pi()*0.140012289)+LN(1-(2*p0327-1)^2)/2)^2-LN(1-(2*p0327-1)^2)/0.140012289)-(2/(pi()*0.140012289)+LN(1-(2*p0327-1)^2)/2)))
- p3198: 0; = p2417*p1082
- p2601: 0; = p2405*p1014
- p4102: 0.000118139; = p1963*p3478
- p0678: 301.977; = p0018*(1+p0546*p0150/100)
- p3036: 8.17415e-6; = p2255*p1023
- p1744: 0
- p0306: 0.5
- p1003: 0; = p0999*p0888
- p1683: 0
- p2111: 0.856281
- p1331: 0; = p1330*p0001/(p0818*p0002)
- p2261: 0; = p2226*p2207
- p1551: 0
- p1568: 0
- p1619: 0
- p2328: 0.0117087; = p2224*p2196
- p2250: 0.00186147; = p2222*p2196
- p2632: 0; = p2241*(p1019+p1021)
- p4514: 0; = p1963*p3480
- p0962: 0; = if(and(p0683>0;or(p0807=480;p0807=32;p0807=1;and(p0807=60;p0901<0.03)));p0938;0)
- p2229: 0; = if(p0774*p0778+p0775*p0779+p0776*p0780+p0777*p0781=0;0;p0781*p0777/(p0774*p0778+p0775*p0779+p0776*p0780+p0777*p0781))
- p3139: 9.2029e-7; = p2358*p1023
- p1663: 0
- p3887: 0; = p1950*p3477
- p1212: 0.0203855; = if(p1211=0;0;if(p1193>0;0;(p1207+p1208+p1209)*p1210/(2000*p1211)))
- p1938: 0
- p2446: 0.00128116; = p2250*p1014
- p1263: 0; = if(p1232>0;0;IF(p1259=1;0;IF(p1259+p1260>1;1-p1259;p1260)))
- p1039: 0.0267589
- p1341: 0; = p1340*p0001/(p0818*p0002)
- p4619: 8.01675e-6; = p1858*p3481
- p0380: 0.5
- p3254: 0; = p1252*(p1287*(1-p3247)+p1290*(1-p3248)+p1291*(1-p3249)+p1292*(1-p3250))
- p1728: 0
- p2166: 0.5227; = p2165*p0824
- p2822: 0; = p2431*(p1128+p1130)
- p2941: 2.53615e-5; = p2355*(p1020+p1022)
- p0792: 0
- p1112: 0.209482
- p5220: 1.99054e-9; = p1841*p3484
- p3399: 0; = p3380*p1234
- p1299: 0
- p3066: 1.66762e-6; = p2285*p1023
- p3075: 2.33343e-5; = p2294*p1023
- p1578: 0.6832
- p3393: 0; = p3374*p1234
- p0664: 0; = IF(p0400<0.5;-SQRT(p0007*EXP(p0532^2*p0008)-p0007);SQRT(p0007*EXP(p0532^2*p0008)-p0007))
- p1992: 3900
- p2875: 0.00150153; = p2289*(p1020+p1022)
- p2077: 0.043
- p1300: 0; = IF(p1297=p1265;0;IF(p1297+p1298>p1265;p1265-p1297;p1298))
- p2195: 0.00199568; = p2194*p2193
- p3188: 0; = p2407*p1023
- p2288: 0.000537564; = p2223*p2195
- p3377: 0; = if(p1232=0;p3246*p3359/p0818;0)
- p2741: 0; = p2350*(p1128+p1130)
- p0669: 41.3071; = p0009*(1+p0537*p0141/100)
- p0404: 0.5
- p0004: 0.0254
- p0790: 0
- p2820: 0; = p2429*(p1128+p1130)
- p2892: 0; = p2306*(p1079+p1081)
- p3155: 6.11064e-6; = p2374*p1023
- p2613: 0; = p2417*p1073
- p0174: 0.015
- p0985: 0; = IF(p0982=1;0;IF(p0982+p0983>1;1-p0982;p0983))
- p3527: 0; = p1796*p3476
- p0687: 0
- p1875: 3.86521e-5; = p1467*1000/p0818
- p3381: 0; = p3362*p1234
- p3735: 0; = p1798*p3477
- p1281: 0; = IF(p1277+p1280=p1263;0;IF(p1277+p1280+p1279>p1263;p1263-(p1277+p1280);p1279))
- p3120: 0.000235937; = p2339*p1082
- p2054: 0.91
- p2621: 0; = p2425*p1073
- p0863: 0; = p0675*1000/p0856
- p1778: 0
- p3924: 6.71581e-6; = p1781*p3478
- p3305: 0; = if(and(p1232=0;p3252<>0);1-(p3301+p3302+p3303+p3304);0)
- p2346: 6.84661e-5; = p2228*p2214
- p1797: 0
- p5338: 2.20601e-6; = p1963*p3484
- p2222: 0.0943598; = if(p0765*p0769+p0766*p0770+p0767*p0771+p0768*p0772=0;0;p0769*p0765/(p0765*p0769+p0766*p0770+p0767*p0771+p0768*p0772))
- p2907: 0.00022779; = p2321*(p1020+p1022)
- p3020: 7.89516e-7; = p2239*p1023
- p2378: 0; = p2229*p2207
- p0673: 908.934; = p0013*(1+p0541*p0145/100)
- p1735: 0
- p1040: 0.0267363
- p0878: 619068; = p0867*p0856
- p0242: 18.801
- p1867: 0
- p1031: 0; = IF(p1012=0;p1025*p0001/(p0818*p0002);0)
- p0188: 35.965
- p4711: 1.63607e-7; = p1950*p3481
- p2358: 3.15384e-5; = p2225*p2186
- p3175: 0; = p2394*p1023
- p0063: 1648.08
- p1272: 0; = IF(p1267+p1270+p1271=p1259;0;p1259-(p1267+p1270+p1271))
- p0723: 1648.08; = p0063*(1+p0591*p0195/100)
- p0371: 0.5
- p0580: 0; = IF(p0316<0.5;-SQRT(p0007*EXP(p0448^2*p0008)-p0007);SQRT(p0007*EXP(p0448^2*p0008)-p0007))
- p1202: 0.7
- p4505: 0; = p1950*p3480
- p3423: 0; = p3366*p1239
- p0819: 0; = p0808*p0809/p0818
- p5116: 0; = p1943*p3483
- p2884: 0; = p2298*(p1079+p1081)
- p0755: 0
- p2834: 0.000248231; = p2248*(p1020+p1022)
- p1119: 0.00819578; = IF(p1071=0;p1109/(p1114*p0818);0)
- p2564: 2.56047e-7; = p2368*p1014
- p3328: 0; = if(and(p1232=0;p3255<>0);p3255*(p3265*p3277-p3323)/p3327;0)
- p2703: 0; = p2312*(p1128+p1130)
- p2254: 0.000653402; = p2222*p2200
- p1898: 0
- p2937: 0; = p2351*(p1129+p1131)
- p2584: 0; = p2388*p1073
- p1703: 0
- p3268: 0.0232481
- p0235: 0.015
- p1668: 0
- p1248: 0; = if(p1232>0;0;p1243*p0001/(p0818*p0002))
- p2738: 1.25438e-5; = p2347*(p1078+p1080)
- p3015: 0; = p2429*(p1129+p1131)
- p2948: 1.01921e-5; = p2362*(p1020+p1022)
- p3024: 3.73976e-6; = p2243*p1023
- p3212: 0; = p2431*p1132
- p1015: 0; = IF(p1012=0;p0706/100;0)
- p1173: 0.5
- p1616: 0
- p2862: 0.000727943; = p2276*(p1020+p1022)
- p0525: 0; = SQRT(2)*(IF((2*p0393-1)<0;-1;IF((2*p0393-1)>0;1;0))*SQRT(SQRT((2/(pi()*0.140012289)+LN(1-(2*p0393-1)^2)/2)^2-LN(1-(2*p0393-1)^2)/0.140012289)-(2/(pi()*0.140012289)+LN(1-(2*p0393-1)^2)/2)))
- p1567: 0
- p0634: 0; = IF(p0370<0.5;-SQRT(p0007*EXP(p0502^2*p0008)-p0007);SQRT(p0007*EXP(p0502^2*p0008)-p0007))
- p4765: 0; = p1798*p3482
- p1101: 0.0162883; = IF(p1071=0;IF(p1096=1;0;IF(p1096+p1097>1;1-p1096;p1097));0)
- p1127: 0; = if(p1121=0;p0721/100;0)
- p0753: 0
- p0140: 10.95
- p2718: 0; = p2327*(p1019+p1021)
- p2842: 1.13923e-5; = p2256*(p1020+p1022)
- p1912: 0
- p1253: 0; = if(p1232>0;0;p0735/100)
- p0509: 0; = SQRT(2)*(IF((2*p0377-1)<0;-1;IF((2*p0377-1)>0;1;0))*SQRT(SQRT((2/(pi()*0.140012289)+LN(1-(2*p0377-1)^2)/2)^2-LN(1-(2*p0377-1)^2)/0.140012289)-(2/(pi()*0.140012289)+LN(1-(2*p0377-1)^2)/2)))
- p1317: 0
- p1327: 0.0238649; = if(p1318=0;if(p1327a=0;1;if(p1327a<0;0;p1327a));0)
- p1779: 0
- p2433: 0.000621106; = p2237*p1014
- p3343: 0; = if(and(p1232=0;p3254<>0);IF((p3339+p3340+p3341+p3342)+(p3254*(p3269*(1-p3277))/p3338)>p3254;p3254-(p3339+p3340+p3341+p3342);p3254*(p3269*(1-p3277))/p3338);0)
- p1756: 1.74207e-5; = p1348*1000/p0818
- p1134: 0; = if(p1121=0;p1128*(p0716/100)*p0703*1000;0)
- p2305: 0; = p2227*p2212
- p1713: 0
- p0352: 0.5
- p3334: 0; = IF(or(p3254=0;p1232>0);0;p3269*p3277*(p3300*p3292+(1-p3300)*p3296))
- p0725: 1.568; = p0065*(1+p0593*p0197/100)
- p2672: 0; = p2281*(p1019+p1021)
- p1236: 0; = if(p1232>0;0;p0728/100)
- p2778: 0; = p2387*(p1078+p1080)
- p4517: 1.04709e-5; = p1756*p3481
- p1053: 2.70788e6; = IF(p1012=0;p1046*p1036;0)
- p0818: 3.6738e9; = p0806*p0807
- p2287: 0.00250774; = p2223*p2193
- p2357: 4.22246e-5; = p2225*p2185
- p2691: 0; = p2300*(p1078+p1080)
- p3247: 0
- p0741: 0.83; = p0081*(1+p0609*p0213/100)
- p3332: 0; = if(and(p1232=0;p3255<>0);IF((p3328+p3329+p3330+p3331)+(p3255*(p3265*(1-p3277))/p3327)>p3255;p3255-(p3328+p3329+p3330+p3331);p3255*(p3265*(1-p3277))/p3327);0)
- p1925: 0
- p1705: 0
- p2118: 0.679049
- p2619: 0; = p2423*p1073
- p5030: 0; = p1857*p3483
- p1969: 0; = p0803
- p3220: 0.0010949; = p3216*p1228
- p2856: 0; = p2270*(p1079+p1081)
- p1755: 0
- p0762: 0
- p2478: 0.0002518; = p2282*p1014
- p1847: 8.43813e-6; = p1439*1000/p0818
- p0815: 0
- p1659: 0
- p2876: 6.6234e-7; = p2290*(p1020+p1022)
- p1952: 0
- p0474: 0; = SQRT(2)*(IF((2*p0342-1)<0;-1;IF((2*p0342-1)>0;1;0))*SQRT(SQRT((2/(pi()*0.140012289)+LN(1-(2*p0342-1)^2)/2)^2-LN(1-(2*p0342-1)^2)/0.140012289)-(2/(pi()*0.140012289)+LN(1-(2*p0342-1)^2)/2)))
- p0968: 0
- p1690: 0
- p0829: 0; = if(p0807=480;p0814*(1-p0824);0)
- p2806: 0; = p2415*(p1078+p1080)
- p1809: 0
- p2199: 3.14023e-5; = p1069-p2197-p2198
- p0320: 0.5
- p2069: 0.190588
- p0155: 1.655
- p0987: 0; = if(p0978>0;0;if(and(p0687=0;p0691=0;p0695=0;p0699=0);0;IF(p0982+p0985+p0986=1;0;1-(p0982+p0985+p0986))))
- p1932: 0
- p3077: 3.85006e-5; = p2296*p1023
- p2733: 2.09783e-5; = p2342*(p1078+p1080)
- p1096: 0.000621953
- p1785: 0
- p3693: 0; = p1756*p3477
- p3398: 0; = p3379*p1234
- p1653: 0.704773
- p0721: 0
- p2852: 0; = p2266*(p1079+p1081)
- p2335: 0.00290725; = p2224*p2203
- p2362: 3.60693e-5; = p2225*p2190
- p2074: 0.025
- p1789: 0
- p1822: 0
- p1344: 39377.2; = IF(p1318=0;p1327*p0801;0)
- p1672: 0.4404
- p1983: 50
- p0120: 95.248
- p0754: 78.482; = p0094*(1+p0622*p0226/100)
- p3300: 0; = if(p1293+p1294+p1295+p1296=0;0;p1293/(p1293+p1294+p1295+p1296))
- p0345: 0.5
- p2275: 0; = p2230*p2221
- p2588: 0; = p2392*p1123
- p3730: 0; = p1793*p3477
- p2752: 0; = p2361*(p1019+p1021)
- p1951: 0
- p3404: 0; = p3366*p1238
- p1795: 0
- p3016: 0; = p2430*(p1129+p1131)
- p1796: 4.62736e-6; = p1388*1000/p0818
- p0772: 6.123; = p0112*(1+p0640*p0244/100)
- p2476: 0.000136762; = p2280*p1014
- p2156: 1.3653e-7; = p2015*p2085*p2118/(p0818*1000)
- p3002: 0; = p2416*(p1079+p1081)
- p1991: 8.43489e7; = (if(p1111=0;0;p1106/p1111)+if(p1112=0;0;p1107/p1112)+if(p1113=0;0;p1108/p1113)+if(p1114=0;0;p1109/p1114)+if(p1115=0;0;p1110/p1115))*(1+p1157)
- p4808: 0; = p1841*p3482
- p1900: 0
- p2291: 3.84728e-6; = p2223*p2198
- p0823: 0
- p3613: 0; = p1882*p3476
- p0703: 1647.93; = p0043*(1+p0571*p0175/100)
- p1920: 0
- p1611: 0
- p0734: 0
- p3284: 0.275
- p3283: 0.3
- p0694: 0
- p2120: 0.51828
- p1557: 0
- p0448: 0; = SQRT(2)*(IF((2*p0316-1)<0;-1;IF((2*p0316-1)>0;1;0))*SQRT(SQRT((2/(pi()*0.140012289)+LN(1-(2*p0316-1)^2)/2)^2-LN(1-(2*p0316-1)^2)/0.140012289)-(2/(pi()*0.140012289)+LN(1-(2*p0316-1)^2)/2)))
- p3004: 0; = p2418*(p1079+p1081)
- p2577: 0; = p2381*p1073
- p2543: 0.000231667; = p2347*p1073
- p1710: 0.757148
- p0270: 3.787
- p0344: 0.5
- p3435: 0; = p3378*p1239
- p1148: 0.146558; = if(p1121=0;IF(p1146=1;0;1-p1146);0)
- p2561: 0.000273935; = p2365*p1014
- p0139: 8.505
- p1777: 0
- p0254: 35.965
- p3119: 2.84161e-5; = p2338*p1082
- p1084: 69578.9; = IF(p1071=0;p1078*(p0710/100)*p0703*1000;0)
- p5161: 3.38392e-7; = p1782*p3484
- p3481: 0.60106; = if(p1328+p1330+p1332+p1334+p1336+p1338+p1340+p1342+p1344=0;0;p1338/(p1328+p1330+p1332+p1334+p1336+p1338+p1340+p1342+p1344))
- p1036: 1.01281e8; = IF(p1012=0;p0795*p0702*1000*p0796/100;0)
- p3327: 0; = if(and(p1232=0;p3255<>0);1-(p3323+p3324+p3325+p3326);0)
- p3388: 0; = p3369*p1234
- p1214: 0; = IF(p1213=0;0;p1213-1)
- p1181: 9.77134e-5
- p2522: 0.00380302; = p2326*p1014
- p0939: 1.71743e-6; = p0933*p0001/(p0818*p0002)
- p1102: 0.0353868; = IF(p1071=0;IF(p1096+p1101=1;0;IF(p1096+p1101+p1098>1;1-(p1096+p1101);p1098));0)
- p3349: 0.816024; = if(and(p1232=0;p3256<>0);1-(p3345+p3346+p3347+p3348);0)
- p3038: 1.3487e-5; = p2257*p1023
- p3199: 0; = p2418*p1082
- p2073: 0.377647
- p0531: 0; = SQRT(2)*(IF((2*p0399-1)<0;-1;IF((2*p0399-1)>0;1;0))*SQRT(SQRT((2/(pi()*0.140012289)+LN(1-(2*p0399-1)^2)/2)^2-LN(1-(2*p0399-1)^2)/0.140012289)-(2/(pi()*0.140012289)+LN(1-(2*p0399-1)^2)/2)))
- p2432: 0.0159419; = p1158
- p3031: 5.43177e-5; = p2250*p1023
- p2088: 0.798875
- p0787: 0
- p2352: 5.08249e-5; = p2232*p2220
- p2485: 0.00365724; = p2289*p1014
- p2566: 9.23987e-7; = p2370*p1014
- p1651: 0
- p3467: 0; = p3372*p1241
- p2648: 0; = p2257*(p1019+p1021)
- p0831: 0.137; = 1-p0824
- p2873: 0.000708612; = p2287*(p1020+p1022)
- p2277: 0.000565497; = p2223*p2183
- p1172: 2.17198e-7; = p1170/p0818
- p0316: 0.5
- p2293: 0.00186523; = p2223*p2200
- p0720: 0
- p1283: 0; = p1277*p1252/p0818
- p2647: 0; = p2256*(p1019+p1021)
- p2317: 0.000170187; = p2224*p2184
- p1576: 0
- p2935: 0; = p2349*(p1079+p1081)
- p3214: 0.376406; = p1222*40.078/100.0869
- p2038: 0.304457
- p1019: 0; = IF(p1012=0;IF(p1014=1;0;IF(p1014+p1015>1;1-p1014;p1015));0)
- p3216: 0.06; = IF(OR(p1226=0;p1228=0);0;1-p3213-p3214-p3215)
- p4351: 0; = p1796*p3480
- p0994: 0; = p0990*p0001*p0004/(p0818*p0002)
- p3434: 0; = p3377*p1239
- p0358: 0.5
- p2568: 8.73524e-5; = p2372*p1014
- p2606: 0; = p2410*p1014
- p2635: 0; = p2244*(p1019+p1021)
- p2864: 2.1825e-5; = p2278*(p1020+p1022)
- p2018: 0.1978
- p1237: 0; = if(p1232>0;0;p0729/100)
- p1324: 1.96151; = IF(((p0745*1000*p0751/100)+(p0754*1000*p0760/100))/p0801<0;0;((p0745*1000*p0751/100)+(p0754*1000*p0760/100))/p0801)
- p2050: 0.952062
- p2780: 0; = p2389*(p1128+p1130)
- p3361: 1.12955e6; = if(p1232=0;p3311+p3322+p3333+p3344+p3355;0)
- p2301: 0; = p2227*p2208
- p0728: 0
- p2125: 7.47856e-6; = p2015*p2053*p2087/(p0818*1000)
- p3125: 1.43264e-7; = p2344*p1082
- p1562: 0
- p0414: 0; = SQRT(2)*(IF((2*p0282-1)<0;-1;IF((2*p0282-1)>0;1;0))*SQRT(SQRT((2/(pi()*0.140012289)+LN(1-(2*p0282-1)^2)/2)^2-LN(1-(2*p0282-1)^2)/0.140012289)-(2/(pi()*0.140012289)+LN(1-(2*p0282-1)^2)/2)))
- p0196: 23.567
- p3400: 0; = p3362*p1238
- p1245: 0; = if(p1232>0;0;p1240*(p0725/100)*p0723*1000)
- p0606: 0; = IF(p0342<0.5;-SQRT(p0007*EXP(p0474^2*p0008)-p0007);SQRT(p0007*EXP(p0474^2*p0008)-p0007))
- p3464: 0; = p3369*p1241
- p1678: 0.8094
- p1145: 1.53471e6; = if(p1121=0;p0799*p0702*1000*p0800/100;0)
- p1858: 1.33377e-5; = p1450*1000/p0818
- p3137: 3.5771e-7; = p2356*p1023
- p0892: 479.761; = if(p0891=0;0;(1-p1240)*p3251/p0891)
- p0084: 4.762
- p1098: 0.0353868
- p3142: 9.19513e-7; = p2361*p1023
- p1002: 0; = p0996*p0888
- p0445: 0; = SQRT(2)*(IF((2*p0313-1)<0;-1;IF((2*p0313-1)>0;1;0))*SQRT(SQRT((2/(pi()*0.140012289)+LN(1-(2*p0313-1)^2)/2)^2-LN(1-(2*p0313-1)^2)/0.140012289)-(2/(pi()*0.140012289)+LN(1-(2*p0313-1)^2)/2)))
- p3336: 0; = IF(or(p3254=0;p1232>0);0;p3271*p3289)
- p2025: 9.51773e-6; = p2015*p2023*p2024/(p0818*1000)
- p2810: 0; = p2419*(p1078+p1080)
- p1618: 0
- p2586: 0; = p2390*p1123
- p2828: 2.83089e-6; = p2242*(p1020+p1022)
- p2007: 0.0297393; = ((p1981*p1985+p1987*p1991+p1993*p1997+p2001*p2005)/p0818)*p0005*p0002/1000
- p2458: 0; = p2262*p1073
- p1632: 0.76325
- p3264: 0.0887032
- p2785: 0; = p2394*(p1019+p1021)
- p2910: 3.55826e-5; = p2324*(p1020+p1022)
- p1573: 0
- p0125: 8.505
- p1175: 0.000232019
- p1091: 0; = IF(p1071=0;p1085*p0001/(p0818*p0002);0)
- p1908: 0
- p3043: 0; = p2262*p1082
- p2067: 0.446471
- p0989: 0; = p0985*p0886
- p3316: 0; = if(and(p1232=0;p3253<>0);1-(p3312+p3313+p3314+p3315);0)
- p3098: 4.96606e-6; = p2317*p1023
- p2732: 4.85871e-5; = p2341*(p1078+p1080)
- p0966: 1; = if(p0683=0;0;IF(p0684/100+p0965=1;0;1-(p0684/100+p0965)))
- p2076: 0.057
- p2116: 0.444424
- p3179: 0; = p2398*p1023
- p0688: 0
- p0925: 0; = IF(p0918+p0923+p0924=1;0;IF(p0918+p0923+p0924+p0921>1;1-(p0918+p0923+p0924);p0921))
- p3153: 3.70351e-6; = p2372*p1023
- p0814: 0; = if(p0807=480;p0810*p0812+p0811*p0813;0)
- p0805: 0
- p2427: 0; = p2235*p2217
- p4954: 0; = p1781*p3483
- p0138: 86.966
- p3099: 1.71053e-5; = p2318*p1023
- p2936: 0; = p2350*(p1129+p1131)
- p1767: 0
- p2539: 0.00507368; = p2343*p1073
- p2379: 0; = p2229*p2208
- p2966: 0; = p2380*(p1079+p1081)
- p2596: 0; = p2400*p1014
- p4813: 0; = p1846*p3482
- p0854: 479577; = p0801*((1-p0853)*p0846+p0853*p0852)
- p0890: 0; = p0686*1000*p0687*p0885/100
- p0018: 301.977
- p2628: 0; = p2237*(p1019+p1021)
- p3432: 0; = p3375*p1239
- p2976: 0; = p2390*(p1129+p1131)
- p4966: 0; = p1793*p3483
- p3141: 1.69439e-6; = p2360*p1023
- p0637: 0; = IF(p0373<0.5;-SQRT(p0007*EXP(p0505^2*p0008)-p0007);SQRT(p0007*EXP(p0505^2*p0008)-p0007))
- p2888: 0; = p2302*(p1079+p1081)
- p3541: 0; = p1810*p3476
- p2372: 0.00012692; = p2225*p2201
- p3055: 0; = p2274*p1132
- p1922: 0
- p3232: 4.38856e-8; = p1182/p0818
- p1727: 0
- p1679: 0
- p0886: 0; = p0686*1000*p0687*p0689/100
- p1790: 0
- p2438: 6.89515e-6; = p2242*p1014
- p2633: 0; = p2242*(p1019+p1021)
- p1097: 0.0162883
- p1194: 1.48
- p1255: 0; = if(p1232>0;0;p0737/100)
- p2399: 0; = p2234*p2188
- p1901: 0
- p2823: 0.000255003; = p2237*(p1020+p1022)
- p1305: 0; = p1301*p1252/p0818
- p1963g: 2.79552e-5; = p1667*p1871+p1668*p1872+p1669*p1873+p1670*p1874+p1671*p1875+p1672*p1876+p1673*p1877+p1674*p1878+p1675*p1879+p1676*p1880+p1677*p1881+p1678*p1882+p1679*p1883+p1680*p1884+p1681*p1885+p1682*p1886+p1683*p1887+p1684*p1888+p1685*p1889
- p0973: 1.86546e8; = p0967+p0968+p0969
- p3162: 0; = p2381*p1082
- p2238: 0.000198097; = p2222*p2183
- p1254: 0; = if(p1232>0;0;p0736/100)
- p3426: 0; = p3369*p1239
- p1805: 0
- p2495: 0; = p2299*p1073
- p1904: 0
- p2871: 1.61487e-5; = p2285*(p1020+p1022)
- p1590: 0
- p2927: 0; = p2341*(p1079+p1081)
- p3939: 1.8122e-6; = p1796*p3478
- p0272: 35.965
- p0179: 39.922
- p2928: 0; = p2342*(p1079+p1081)
- p0443: 0; = SQRT(2)*(IF((2*p0311-1)<0;-1;IF((2*p0311-1)>0;1;0))*SQRT(SQRT((2/(pi()*0.140012289)+LN(1-(2*p0311-1)^2)/2)^2-LN(1-(2*p0311-1)^2)/0.140012289)-(2/(pi()*0.140012289)+LN(1-(2*p0311-1)^2)/2)))
- p1601: 0
- p2348: 0.000148745; = p2228*p2216
- p3433: 0; = p3376*p1239
- p2342: 0.000432097; = p2228*p2210
- p3318: 0; = if(and(p1232=0;p3253<>0);p3253*(p3262-p3313)/p3316;0)
- p0078: 1648.1
- p1794: 0
- p3256: 1.55245e7; = p1252*(p1307*(1-p3247)+p1310*(1-p3248)+p1311*(1-p3249)+p1312*(1-p3250))
- p3097: 3.63592e-5; = p2316*p1023
- p0080: 99.473
- p1928: 0
- p2985: 0; = p2399*(p1020+p1022)
- p2805: 0; = p2414*(p1078+p1080)
- p1825: 0
- p3267: 0.0170629
- p0884: 0; = IF(p0689=100;0;IF(p0689+p0688>100;100-p0689;p0688))
- p0907: 0
- p1973: 0; = if(p0807=480;p1968*p0001/(p0818*p0002);0)
- p0756: 0
- p2646: 0; = p2255*(p1019+p1021)
- p2409: 0; = p2234*p2199
- p2573: 0; = p2377*p1073
- p0850: 0
- p2383: 0; = p2229*p2212
- p2380: 0; = p2229*p2209
- p4000: 7.97369e-5; = p1857*p3478
- p1261: 0; = if(p1232>0;0;p0732/100)
- p2952: 2.41088e-5; = p2366*(p1020+p1022)
- p0131: 100
- p0240: 20.348
- p2770: 0; = p2379*(p1078+p1080)
- p5055: 0; = p1882*p3483
- p3391: 0; = p3372*p1234
- p1146: 0.853442
- p3050: 0; = p2269*p1082
- p1786: 0
- p1931: 0
- p2963: 0; = p2377*(p1079+p1081)
- p4643: 2.12689e-6; = p1882*p3481
- p2846: 0; = p2260*(p1079+p1081)
- p1592: 0.579333
- p1188: 923.462; = p1187*p0801
- p1023: 0.02918; = IF(p1012=0;IF(p1014+p1019+p1020+p1021+p1022=1;0;1-(p1014+p1019+p1020+p1021+p1022));0)
- p1963k: 2.54375e-5; = p1744*p1948+p1745*p1949+p1746*p1950+p1747*p1951+p1748*p1952+p1749*p1953+p1750*p1954+p1751*p1955+p1752*p1956+p1753*p1957+p1961*p1962
- p0518: 0; = SQRT(2)*(IF((2*p0386-1)<0;-1;IF((2*p0386-1)>0;1;0))*SQRT(SQRT((2/(pi()*0.140012289)+LN(1-(2*p0386-1)^2)/2)^2-LN(1-(2*p0386-1)^2)/0.140012289)-(2/(pi()*0.140012289)+LN(1-(2*p0386-1)^2)/2)))
- p1729: 0
- p1888: 0
- p4147: 0; = p1798*p3479
- p0731: 0
- p0777: 0
- p1221: 0.0583196
- p2558: 2.48247e-5; = p2362*p1014
- p0681: 0
- p2036: 2.18445e-5; = p2015*p2030*(1-p2032)/(p0818*1000)
- p1068: 0.0310329; = IF(p1012=0;p1054/(p1061*p0818);0)
- p3325: 0; = if(and(p1232=0;p3255<>0);p3267*p3289;0)
- p2344: 2.61431e-6; = p2228*p2212
- p2392: 0; = p2233*p2221
- p3234: 0.39606; = 1-p3233
- p1620: 0
- p3468: 0; = p3373*p1241
- p0213: 5.891
- p1963e: 1.91668e-5; = p1628*p1832+p1629*p1833+p1630*p1834+p1631*p1835+p1632*p1836+p1633*p1837+p1634*p1838+p1635*p1839+p1636*p1840+p1637*p1841+p1638*p1842+p1639*p1843+p1640*p1844+p1641*p1845+p1642*p1846+p1643*p1847+p1644*p1848+p1645*p1849+p1646*p1850
- p1193: 0; = IF(OR(p1036=0;p1095=0);0.0001*p0857;0)
- p2552: 8.43709e-6; = p2356*p1014
- p1021: 0; = IF(p1012=0;IF(p1014+p1019+p1020=1;0;IF(p1014+p1019+p1020+p1017>1;1-(p1014+p1019+p1020);p1017));0)
- p2662: 0; = p2271*(p1078+p1080)
- p0922: 0; = p0677*1000/p0801
- p3347: 0.00107264; = if(and(p1232=0;p3256<>0);p3275*p3289;0)
- p3360: 6.45142e6; = if(p1232=0;p3310+p3321+p3332+p3343+p3354;0)
- p1962: 5.05399e-5; = p1960*1000/p0818
- p1158: 0.0159419; = p1156*p1157
- p1933: 0
- p0238: 7.328
- p1857: 0.000203604; = p1449*1000/p0818
- p2688: 0; = p2297*(p1078+p1080)
- p0313: 0.5
- p2998: 0; = p2412*(p1020+p1022)
- p1879: 0
- p1747: 0
- p2209: 0.00100076; = 14.0067*p2208/30.973762
- p3431: 0; = p3374*p1239
- p1605: 0
- p3228: 0.000534189; = p3224*p1229
- p1018: 0.19703; = IF(p1012=0;p0709/100;0)
- p3168: 0; = p2387*p1082
- p2119: 0.679049
- p3240: 1.17568e-8; = p3234*p1188*p3235/p0818
- p2029: 4.03
- p1890: 0
- p2406: 0; = p2234*p2196
- p1059: 0.335
- p2617: 0; = p2421*p1073
- p2321: 0.000806138; = p2224*p2188
- p3348: 0.00443516; = if(and(p1232=0;p3256<>0);p3276*p3289;0)
- p1104: 0.52649; = IF(p1071=0;IF(p1096+p1101+p1102+p1103=1;0;1-(p1096+p1101+p1102+p1103));0)
- p1647: 0
- p2395: 0; = p2234*p2184
- p1834: 0
- p3689: 0; = p1962*p3476
- p0742: 0
- p1057: 0.82
- p3294: 0.279
- p3979: 5.54321e-6; = p1836*p3478
- p2706: 0; = p2315*(p1019+p1021)
- p2429: 0; = p2236*p2219
- p2204: 0.00177052; = p1109/p0818
- p2318: 0.0005862; = p2224*p2185
- p1963i: 4.12188e-6; = p1706*p1910+p1707*p1911+p1708*p1912+p1709*p1913+p1710*p1914+p1711*p1915+p1712*p1916+p1713*p1917+p1714*p1918+p1715*p1919+p1716*p1920+p1717*p1921+p1718*p1922+p1719*p1923+p1720*p1924+p1721*p1925+p1722*p1926+p1723*p1927+p1724*p1928
- p1615: 0
- p1761: 0
- p1704: 0
- p2417: 0; = p2235*p2207
- p1402: 19
- p2239: 2.70567e-5; = p2222*p2184
- p2004: 30
- p0737: 0
- p1333: 0.000512115; = p1332*p0001/(p0818*p0002)
- p1993: 400
- p2518: 0.000301092; = p2322*p1014
- p0150: 21.642
- p4917: 0; = p1950*p3482
- p0280: 0.5
- p1773: 0
- p2297: 0; = p2227*p2204
- p2312: 0; = p2231*p2219
- p2923: 0; = p2337*(p1079+p1081)
- p1978: 246
- p2274: 0; = p2230*p2220
- p1645: 0
- p3330: 0; = if(and(p1232=0;p3255<>0);p3255*(p3267-p3325)/p3327;0)
- p1028: 322799; = IF(p1012=0;p1022*(p0704/100)*p0703*1000;0)
- p1246: 25841.9; = if(p1232>0;0;p1241*(p0725/100)*p0723*1000)
- p2603: 0; = p2407*p1014
- p2030: 6.61
- p3296: 0.514
- p0830: 3.6805e9; = p0825*p0821*p0824
- p0573: 0; = IF(p0309<0.5;-SQRT(p0007*EXP(p0441^2*p0008)-p0007);SQRT(p0007*EXP(p0441^2*p0008)-p0007))
- p2394: 0; = p2234*p2183
- p1656: 0
- p2625: 0; = p2429*p1123
- p2758: 0; = p2367*(p1019+p1021)
- p3442: 0; = p3366*p1240
- p2171: 0.0829779; = p2165*p0831
- p0609: 0; = IF(p0345<0.5;-SQRT(p0007*EXP(p0477^2*p0008)-p0007);SQRT(p0007*EXP(p0477^2*p0008)-p0007))
- p0786: 0
- p0328: 0.5
- p3382: 0; = p3363*p1234
- p3819: 0; = p1882*p3477
- p2016: 0.00095194; = (p2014-p2015)/(p0818)
- p1137: 0; = if(p1121=0;p1131*(p0716/100)*p0703*1000;0)
- p2809: 0; = p2418*(p1078+p1080)
- p1109: 6.50454e6; = IF(p1071=0;p1105*p1103*p1095;0)
- p1345: 9.56272e-6; = IF(p1318=0;p1344*p0001/(p0818*p0002);0)
- p2462: 0; = p2266*p1073
- p0877: 2.20734; = p0876*p0001*p0003/(p0818*p0002)
- p1306: 0; = p1302*p1252/p0818
- p2424: 0; = p2235*p2214
- p2607: 0; = p2411*p1014
- p2389: 0; = p2233*p2218
- p0953: 0; = if(and(p0683>0;or(p0807=56;p0807=100;and(p0807=60;p0901>0.06)));p0935;0)
- p2886: 0; = p2300*(p1079+p1081)
- p2329: 5.16481e-6; = p2224*p2197
- p1885: 0
- p2403: 0; = p2234*p2192
- p2857: 0; = p2271*(p1079+p1081)
- p3351: 1.12305e6; = if(and(p1232=0;p3256<>0);p3256*(p3274-p3346)/p3349;0)
- p1802: 0
- p2461: 0; = p2265*p1073
- p0997: 0; = if(p0888=0;0;if((p0695*p0694*1000*p0696/100)/p0888>1;1;(p0695*p0694*1000*p0696/100)/p0888))
- p0184: 19.837
- p2897: 0; = p2311*(p1129+p1131)
- p4196: 0; = p1847*p3479
- p2597: 0; = p2401*p1014
- p2165: 0.605678; = (p0833-p2014)/p0818-p0839
- p2692: 0; = p2301*(p1078+p1080)
- p0541: 0; = IF(p0277<0.5;-SQRT(p0007*EXP(p0409^2*p0008)-p0007);SQRT(p0007*EXP(p0409^2*p0008)-p0007))
- p3293: 0.3875
- p1264: 0; = if(p1232>0;0;IF(p1259+p1263=1;0;IF(p1259+p1263+p1261>1;1-(p1259+p1263);p1261)))
- p1671: 0.46617
- p2997: 0; = p2411*(p1020+p1022)
- p1863: 0
- p1388: 17
- p2974: 0; = p2388*(p1079+p1081)
- p2745: 0; = p2354*(p1019+p1021)
- p2010: 0.00223045; = ((p1984*p1985+p1990*p1991+p1996*p1997+p2004*p2005)/p0818)*p0005*p0002/1000
- p0722: 0
- p3402: 0; = p3364*p1238
- p0105: 58.585
- p2587: 0; = p2391*p1123
- p3407: 0; = p3369*p1238
- p3236: 0.0140975
- p2969: 0; = p2383*(p1079+p1081)
- p0774: 0
- p1644: 0
- p2224: 0.593524; = if(p0765*p0769+p0766*p0770+p0767*p0771+p0768*p0772=0;0;p0771*p0767/(p0765*p0769+p0766*p0770+p0767*p0771+p0768*p0772))
- p3455: 0; = p3379*p1240
- p3445: 0; = p3369*p1240
- p0570: 0; = IF(p0306<0.5;-SQRT(p0007*EXP(p0438^2*p0008)-p0007);SQRT(p0007*EXP(p0438^2*p0008)-p0007))
- p1316: 0.0338059; = p1312*p1252/p0818
- p2215: 0.000258369; = p1117-p2214
- p1099: 0.421213
- p1570: 0
- p0438: 0; = SQRT(2)*(IF((2*p0306-1)<0;-1;IF((2*p0306-1)>0;1;0))*SQRT(SQRT((2/(pi()*0.140012289)+LN(1-(2*p0306-1)^2)/2)^2-LN(1-(2*p0306-1)^2)/0.140012289)-(2/(pi()*0.140012289)+LN(1-(2*p0306-1)^2)/2)))
- p2843: 0.000130604; = p2257*(p1020+p1022)
- p1161: 1.65e6; = p0801
- p1658: 0
- p2149: 2.20793e-7; = p2015*p2077*p2111/(p0818*1000)
- p1758: 0
- p1047: 0.337699; = IF(p1012=0;IF(p1037+p1044+p1045+p1046=1;0;IF(p1037+p1044+p1045+p1046+p1041>1;1-(p1037+p1044+p1045+p1046);p1041));0)
- p0267: 3.738
- p1688: 0
- p2889: 0; = p2303*(p1079+p1081)
- p1117: 0.000326835; = IF(p1071=0;p1107/(p1112*p0818);0)
- p3062: 8.34516e-7; = p2281*p1023
- p1984: 30
- p0051: 89.665
- p3239: 0.013074; = IF(p3238+p3235+p3236=1;0;1-(p3238+p3235+p3236))
- p2306: 0; = p2227*p2213
- p1630: 0
- p0100: 76.262
- p1781: 1.71485e-5; = p1373*1000/p0818
- p3237: 0.854735
- p2141: 1.04285e-6; = p2015*p2069*p2103/(p0818*1000)
- p1923: 0
- p1179: 0.5
- p2464: 0; = p2268*p1073
- p1149: 0.830148
- p1071: 0
- p0780: 95.248; = p0120*(1+p0648*p0252/100)
- p2220: 5.08249e-5; = p1151/p0818
- p4760: 0; = p1793*p3482
- p4057: 2.132e-6; = p1914*p3478
- p1191: 0.5
- p1339: 0.000785981; = p1338*p0001/(p0818*p0002)
- p3217: 0.00205846; = p3213*p1228
- p0795: 61.82; = p0135*(1+p0663*p0267/100)
- p0980: 0; = IF(p0977=0;0;p0977*p0001/(p0818*p0002))
- p0912: 0
- p3420: 0; = p3363*p1239
- p0544: 0; = IF(p0280<0.5;-SQRT(p0007*EXP(p0412^2*p0008)-p0007);SQRT(p0007*EXP(p0412^2*p0008)-p0007))
- p3022: 2.0312e-6; = p2241*p1023
- p2214: 6.84661e-5; = p1107/p0818
- p3408: 0; = p3370*p1238
- p3443: 0; = p3367*p1240
- p3282: 0.3
- p3355: 1.12955e6; = if(and(p1232=0;p3256<>0);p3256-(p3350+p3351+p3352+p3353+p3354);0)
- p3376: 0; = if(p1232=0;p3246*p3358/p0818;0)
- p1579: 0
- p3027: 5.84179e-7; = p2246*p1023
- p1120: 0.00930439; = IF(p1071=0;p1110/(p1115*p0818);0)
- p3128: 1.41586e-5; = p2347*p1082
- p0001: 0.404686
- p2398: 0; = p2234*p2187
- p3082: 0; = p2301*p1082
- p0592: 0; = IF(p0328<0.5;-SQRT(p0007*EXP(p0460^2*p0008)-p0007);SQRT(p0007*EXP(p0460^2*p0008)-p0007))
- p2270: 0; = p2226*p2216
- p2769: 0; = p2378*(p1078+p1080)
- p1130: 0; = if(p1121=0;IF(p1123+p1128+p1129=1;0;IF(p1123+p1128+p1129+p1126>1;1-(p1123+p1128+p1129);p1126));0)
- p2742: 0; = p2351*(p1128+p1130)
- p1808: 0
- p2089: 0.40001
- p1734: 0
- p3311: 0; = if(and(p1232=0;p3252<>0);p3252-(p3306+p3307+p3308+p3309+p3310);0)
- p2173: 0.128656; = p0895*p0898/p0818
- p0692: 0
- p3936: 1.9188e-6; = p1793*p3478
- p1911: 0
- p0665: 0; = IF(p0401<0.5;-SQRT(p0007*EXP(p0533^2*p0008)-p0007);SQRT(p0007*EXP(p0533^2*p0008)-p0007))
- p1017: 0; = IF(p1012=0;p0708/100;0)
- p2845: 0; = p2259*(p1079+p1081)
- p2048: 5.99653e-14; = p2015*p2046/(p0818*1000000000000)
- p3227: 0.000134986; = p3223*p1229
- p0739: 1.027; = p0079*(1+p0607*p0211/100)
- p0608: 0; = IF(p0344<0.5;-SQRT(p0007*EXP(p0476^2*p0008)-p0007);SQRT(p0007*EXP(p0476^2*p0008)-p0007))
- p2431: 0; = p2236*p2221
- p3459: 0.000105537; = p3364*p1241
- p1837: 0
- p2637: 0; = p2246*(p1019+p1021)
- p1695: 0
- p0927: 0.00428606; = IF(p0918+p0923+p0924+p0925+p0926=1;0;1-(p0918+p0923+p0924+p0925+p0926))
- p1114: 0.216028
- p0369: 0.5
- p2946: 1.6408e-5; = p2360*(p1020+p1022)
- p2420: 0; = p2235*p2210
- p1861: 0
- p0287: 0.5
- p3187: 0; = p2406*p1023
- p2005: 2.79326e6; = p1963*p0818+p1959*1000+p1170+p1176+p1182
- p1775: 0
- p0003: 10000
- p2124: 0.263965
- p3109: 0.000341659; = p2328*p1023
- p3089: 0; = p2308*p1082
- p3469: 0; = p3374*p1241
- p0500: 0; = SQRT(2)*(IF((2*p0368-1)<0;-1;IF((2*p0368-1)>0;1;0))*SQRT(SQRT((2/(pi()*0.140012289)+LN(1-(2*p0368-1)^2)/2)^2-LN(1-(2*p0368-1)^2)/0.140012289)-(2/(pi()*0.140012289)+LN(1-(2*p0368-1)^2)/2)))
- p3301: 0; = if(and(p1232=0;p3252<>0);p3257*p3277*(p3297*p3290+(1-p3297)*p3294);0)
- p1743: 0
- p0804: 0
- p1963j: 4.76141e-7; = p1725*p1929+p1726*p1930+p1727*p1931+p1728*p1932+p1729*p1933+p1730*p1934+p1731*p1935+p1732*p1936+p1733*p1937+p1734*p1938+p1735*p1939+p1736*p1940+p1737*p1941+p1738*p1942+p1739*p1943+p1740*p1944+p1741*p1945+p1742*p1946+p1743*p1947
- p2103: 0.912485
- p2232: 1; = if(p0783*p0787+p0784*p0788+p0785*p0789+p0786*p0790=0;0;p0789*p0785/(p0783*p0787+p0784*p0788+p0785*p0789+p0786*p0790))
- p1636: 0
- p0307: 0.5
- p3047: 0; = p2266*p1082
- p1108: 546458; = IF(p1071=0;p1105*p1102*p1095;0)
- p3392: 0; = p3373*p1234
- p2407: 0; = p2234*p2197
- p3272: 0.0398246
- p4763: 0; = p1796*p3482
- p3794: 0; = p1857*p3477
- p2326: 0.00552563; = p2224*p2193
- p0672: 0
- p2542: 6.13901e-5; = p2346*p1073
- p3394: 0; = p3375*p1234
- p1301: 0; = IF(p1297+p1300=p1265;0;IF(p1297+p1300+p1299>p1265;p1265-(p1297+p1300);p1299))
- p0111: 126.693
- p2393: 0; = p2234*p2182
- p1338: 3.23649e6; = p1324*p0801
- p2242: 1.00184e-5; = p2222*p2187
- p2523: 0.000815221; = p2327*p1014
- p3289: 0.05
- p2896: 0; = p2310*(p1079+p1081)
- p2972: 0; = p2386*(p1079+p1081)
- p2044: 2.67168e-7; = p2015*p2042*p2043/(p0818*1000)
- p5329: 1.99054e-9; = p1950*p3484
- p3253: 0; = p1252*(p1277*(1-p3247)+p1280*(1-p3248)+p1281*(1-p3249)+p1282*(1-p3250))
- p2550: 0.000281408; = p2354*p1014
- p0990: 0; = p0986*p0886
- p2582: 0; = p2386*p1073
- p1106: 9604.45; = IF(p1071=0;p1105*p1096*p1095;0)
- p1782: 4.62736e-5; = p1374*1000/p0818
- p2112: 0.856281
- p1720: 0
- p2938: 0; = p2352*(p1129+p1131)
- p2701: 0; = p2310*(p1078+p1080)
- p3428: 0; = p3371*p1239
- p1828: 0
- p2616: 0; = p2420*p1073
- p3197: 0; = p2416*p1082
- p0226: 43.943
- p2363: 9.07051e-6; = p2225*p2191
- p0704: 99.417; = p0044*(1+p0572*p0176/100)
- p1180: 5.21029e-8; = p1176*p1179/p0818
- p2737: 3.32403e-6; = p2346*(p1078+p1080)
- p1467: 142
- p1183: 0.000400702; = p0801*p0001/(p0818*p0002)
- p2473: 0.000389203; = p2277*p1014
- p1640: 0
- p2257: 0.000462201; = p2222*p2203
- p3129: 8.1512e-6; = p2348*p1082
- p0981: 0.000400702; = p0978*p0001/(p0818*p0002)
- p2681: 0; = p2290*(p1019+p1021)
- p2802: 0; = p2411*(p1019+p1021)
- p1848: 0
- p5254: 2.82657e-7; = p1875*p3484
- p1078: 0.04855; = IF(p1071=0;IF(p1073=1;0;IF(p1073+p1074>1;1-p1073;p1074));0)
- p2988: 0; = p2402*(p1020+p1022)
- p1829: 0
- p3037: 1.17644e-6; = p2256*p1023
- p2369: 6.10622e-7; = p2225*p2198
- p3242: 8.50935e-8; = p3234*p1188*p3238/p0818
- p0248: 6.149
- p3209: 0; = p2428*p1132
- p3427: 0; = p3370*p1239
- p1315: 0; = p1311*p1252/p0818
- p0924: 0.812698; = IF(p0918+p0923=1;0;IF(p0918+p0923+p0920>1;1-(p0918+p0923);p0920))
- p1896: 0
- p0941: 0; = if(and(p0683=0;p0947=0);p0935;0)
- p2968: 0; = p2382*(p1079+p1081)
- p0400: 0.5
- p2872: 0.000130686; = p2286*(p1020+p1022)
- p1845: 0
- p0969: 1.86546e8; = p0966*p0683*p0682*1000
- p0698: 0
- p2800: 0; = p2409*(p1019+p1021)
- p0729: 0
- p1079: 0; = IF(p1071=0;IF(p1073+p1078=1;0;IF(p1073+p1078+p1075>1;1-(p1073+p1078);p1075));0)
- p1853: 0
- p2768: 0; = p2377*(p1078+p1080)
- p1976: 0.06
- p2385: 0; = p2229*p2214
- p1334: 0; = p1322*p0801
- p1100: 0.52649
- p4130: 0; = p1781*p3479
- p3045: 0; = p2264*p1082
- p2726: 0; = p2335*(p1019+p1021)
- p0882: 121998; = p0869*p0856
- p2280: 0.00019871; = p2223*p2186
- p1142: 0; = if(p1121=0;p1136*p0001/(p0818*p0002);0)
- p2091: 0.374844
- p1766: 0
- p0685: 0
- p1195: 0.45
- p3438: 0; = p3362*p1240
- p2526: 5.83444e-6; = p2330*p1014
- p2787: 0; = p2396*(p1019+p1021)
- p1959: 1683.67; = if(p0738*p0740*p0739>0;p0738*1000*(p0740/100)*p0739/1000;p1958)
- p1631: 0
- p2995: 0; = p2409*(p1020+p1022)
- p4983: 0; = p1810*p3483
- p3719: 0; = p1782*p3477
- p0154: 0.013
- p4145: 0; = p1796*p3479
- p2921: 0.0008215; = p2335*(p1020+p1022)
- p2355: 8.9753e-5; = p2225*p2183
- p0825: 3.23907e9; = p0818*p0822
- p2330: 8.47721e-6; = p2224*p2198
- p0349: 0.5
- p3436: 0; = p3379*p1239
- p2766: 0; = p2375*(p1078+p1080)
- p1558: 0
- p3081: 0; = p2300*p1082
- p2246: 2.00198e-5; = p2222*p2191
- p3012: 0; = p2426*(p1079+p1081)
- p2771: 0; = p2380*(p1078+p1080)
- p1660: 0
- p2511: 0.00390676; = p2315*p1014
- p2028: 0.000141782; = p2015*p2026*p2027/(p0818*1000)
- p2021: 0.00015544; = p2020/p0818
- p3048: 0; = p2267*p1082
- p1800: 0
- p2932: 0; = p2346*(p1079+p1081)
- p0108: 43.164
- p1827: 0
- p0122: 10.95
- p0896: 0.458
- p1105: 0.436421
- p0691: 0
- p2626: 0; = p2430*p1123
- p3160: 0; = p2379*p1082
- p2343: 0.00565849; = p2228*p2211
- p2790: 0; = p2399*(p1019+p1021)
- p1075: 0; = IF(p1071=0;p0713/100;0)
- p1753: 0
- p1903: 0
- p1868: 0
- p0919: 0.183016; = p0678*1000/p0801
- p0935: 7.3335e-5; = p0929*p0001/(p0818*p0002)
- p1811: 0
- p1046: 0.0267363; = IF(p1012=0;IF(p1037+p1044+p1045=1;0;IF(p1037+p1044+p1045+p1040>1;1-(p1037+p1044+p1045);p1040));0)
- p2571: 0; = p2375*p1073
- p3107: 0.000161238; = p2326*p1023
- p1086: 0; = IF(p1071=0;p1080*(p0710/100)*p0703*1000;0)
- p2812: 0; = p2421*(p1078+p1080)
- p2644: 0; = p2253*(p1019+p1021)
- p0065: 1.568
- p1622: 0
- p1154: 0.000713043; = if(p1152*p0818=0;0;p1150/(p1152*p0818))
- p2327: 0.00118448; = p2224*p2195
- p2514: 0.000403452; = p2318*p1014
- p2641: 0; = p2250*(p1019+p1021)
- p2507: 0; = p2311*p1123
- p3067: 1.34955e-5; = p2286*p1023
- p0384: 0.5
- p1718: 0
- p1921: 0
- p0947: 0; = if(and(p0683=0;or(p0807=480;p0807=32;p0807=1;and(p0807=60;p0901<0.03)));p0935;0)
- p1854: 0
- p3123: 2.36789e-5; = p2342*p1082
- p0748: 39.742; = p0088*(1+p0616*p0220/100)
- p0639: 0; = IF(p0375<0.5;-SQRT(p0007*EXP(p0507^2*p0008)-p0007);SQRT(p0007*EXP(p0507^2*p0008)-p0007))
- p2991: 0; = p2405*(p1020+p1022)
- p3299: 0; = if(p1303+p1304+p1305+p1306=0;0;p1303/(p1303+p1304+p1305+p1306))
- p0499: 0; = SQRT(2)*(IF((2*p0367-1)<0;-1;IF((2*p0367-1)>0;1;0))*SQRT(SQRT((2/(pi()*0.140012289)+LN(1-(2*p0367-1)^2)/2)^2-LN(1-(2*p0367-1)^2)/0.140012289)-(2/(pi()*0.140012289)+LN(1-(2*p0367-1)^2)/2)))
- p0572: 0; = IF(p0308<0.5;-SQRT(p0007*EXP(p0440^2*p0008)-p0007);SQRT(p0007*EXP(p0440^2*p0008)-p0007))
- p2146: 1.23916e-7; = p2015*p2074*p2108/(p0818*1000)
- p1030: 0.000273831; = IF(p1012=0;p1024*p0001/(p0818*p0002);0)
- p1275: 0; = p1271*p1252/p0818
- p3319: 0; = if(and(p1232=0;p3253<>0);p3253*(p3263-p3314)/p3316;0)
- p5261: 2.58771e-8; = p1882*p3484
- p3941: 2.3452e-6; = p1798*p3478
- p0374: 0.5
- p0855: 1.16465; = p0854*p0001*p0003/(p0818*p0002)
- p0840: 0.0751081; = p0839*p0831
- p2983: 0; = p2397*(p1020+p1022)
- p2024: 0.748682
- p3151: 3.91746e-8; = p2370*p1023
- p1788: 0
- p3169: 0; = p2388*p1082
- p1140: 0; = if(p1121=0;p1134*p0001/(p0818*p0002);0)
- p4437: 0; = p1882*p3480
- p2072: 0.134
- p0899: 3.34819e9; = p0825*p0896+(p0830+p0895)*p0824*p0898
- p3322: 0; = if(and(p1232=0;p3253<>0);p3253-(p3317+p3318+p3319+p3320+p3321);0)
- p3607: 0; = p1876*p3476
- p1020: 0.08554; = IF(p1012=0;IF(p1014+p1019=1;0;IF(p1014+p1019+p1016>1;1-(p1014+p1019);p1016));0)
- p2411: 0; = p2234*p2201
- p2716: 0; = p2325*(p1019+p1021)
- p1855: 0
- p1292: 0; = IF(p1287+p1290+p1291=p1261;0;p1261-(p1287+p1290+p1291))
- p0712: 4.855; = p0052*(1+p0580*p0184/100)
- p2099: 0.620397
- p2912: 0.00156138; = p2326*(p1020+p1022)
- p3278: 0.46
- p3042: 0; = p2261*p1082
- p1198: 0.44
- p1045: 0.0267589; = IF(p1012=0;IF(p1037+p1044=1;0;IF(p1037+p1044+p1039>1;1-(p1037+p1044);p1039));0)
- p3449: 0; = p3373*p1240
- p0864: 0; = IF(p0858=1;0;IF(p0858+p0859>1;1-p0858;p0859))
- p3064: 5.79347e-6; = p2283*p1023
- p3060: 7.76304e-6; = p2279*p1023
- p1610: 0
- p0999: 0; = IF(p0996=1;0;IF(p0996+p0997>1;1-p0996;p0997))
- p2700: 0; = p2309*(p1078+p1080)
- p1998: 246
- p2838: 3.80827e-7; = p2252*(p1020+p1022)
- p2374: 0.000209412; = p2225*p2203
- p2957: 8.36522e-5; = p2371*(p1020+p1022)
- p1265: 0; = if(p1232>0;0;IF(p1259+p1263+p1264=1;0;IF(p1259+p1263+p1264+p1262>1;1-(p1259+p1263+p1264);p1262)))
- p2734: 0.000274719; = p2343*(p1078+p1080)
- p2893: 0; = p2307*(p1079+p1081)
- p0735: 0
- p1335: 0; = p1334*p0001/(p0818*p0002)
- p3221: 0.146975; = IF(p3216=0;0;p1223*12.0107/100.0869+(1-p1224)*12.0107/84.3139)
- p2360: 5.8067e-5; = p2225*p2188
- p0860: 0; = p0672*1000/p0856
- p3105: 3.67449e-6; = p2324*p1023
- p3674: 0; = p1943*p3476
- p3513: 0; = p1782*p3476
- p2001: 400
- p3389: 0; = p3370*p1234
- p2740: 6.47229e-5; = p2349*(p1078+p1080)
- p1273: 0; = p1267*p1252/p0818
- p0452: 0; = SQRT(2)*(IF((2*p0320-1)<0;-1;IF((2*p0320-1)>0;1;0))*SQRT(SQRT((2/(pi()*0.140012289)+LN(1-(2*p0320-1)^2)/2)^2-LN(1-(2*p0320-1)^2)/0.140012289)-(2/(pi()*0.140012289)+LN(1-(2*p0320-1)^2)/2)))
- p2157: 2.51502e-7; = p2015*p2086*p2119/(p0818*1000)
- p1815: 0
- p2904: 0.000165643; = p2318*(p1020+p1022)
- p2002: 750
- p0902: 0
- p1893: 0
- p3195: 0; = p2414*p1082
- p1832: 0
- p0944: 0; = if(and(p0683=0;p0950=0);p0938;0)
- p3218: 0.00686879; = p3214*p1228
- p2695: 0; = p2304*(p1078+p1080)
- p2456: 0; = p2260*p1073
- p2276: 0.00257615; = p2223*p2182
- p0257: 31.564
- p1222: 0.94
- p2251: 8.21113e-7; = p2222*p2197
- p0809: 0
- p2624: 0; = p2428*p1123
- p3117: 9.70245e-5; = p2336*p1082
- p1178: 1.04206e-7; = p1176/p0818
- p1550: 0
- p0848: 0
- p2430: 0; = p2236*p2220
- p3194: 0; = p2413*p1023
- p3374: 0; = if(p1232=0;p3246*p3356/p0818;0)
- p1035: 1.16097e-5; = IF(p1012=0;p1029*p0001/(p0818*p0002);0)
- p2682: 0; = p2291*(p1019+p1021)
- p1685: 0
- p2977: 0; = p2391*(p1129+p1131)
- p0551: 0; = IF(p0287<0.5;-SQRT(p0007*EXP(p0419^2*p0008)-p0007);SQRT(p0007*EXP(p0419^2*p0008)-p0007))
- p0897: 0
- p3222: 0.224242; = IF(p3216=0;0;p1223*40.078/100.0869)
- p1842: 0
- p3276: 0.0887032
- p2715: 0; = p2324*(p1019+p1021)
- p2579: 0; = p2383*p1073
- p3112: 5.43857e-7; = p2331*p1023
- p2140: 8.49365e-7; = p2015*p2068*p2102/(p0818*1000)
- p2671: 0; = p2280*(p1019+p1021)
- p2665: 0; = p2274*(p1128+p1130)
- p1257: 0; = if(p1232>0;0;IF(p1253+p1256=1;0;IF(p1253+p1256+p1255>1;1-(p1253+p1256);p1255)))
- p2815: 0; = p2424*(p1078+p1080)
- p1639: 0
- p2244: 6.95507e-5; = p2222*p2189
- p2819: 0; = p2428*(p1128+p1130)
- p2066: 0.109412
- p5049: 0; = p1876*p3483
- p1892: 0
- p2829: 3.62146e-5; = p2243*(p1020+p1022)
- p3033: 3.93266e-8; = p2252*p1023
- p1791: 0
- p0948: 0; = if(and(p0683=0;or(p0807=480;p0807=32;p0807=1;and(p0807=60;p0901<0.03)));p0936;0)
- p3487: 0; = p1756*p3476
- p1111: 0.0872841
- p1200: 0.84
- p0696: 0
- p0773: 86.966; = p0113*(1+p0641*p0245/100)
- p1835: 0
- p2773: 0; = p2382*(p1078+p1080)
- p2634: 0; = p2243*(p1019+p1021)
- p1162: 0.000449126; = p1161/p0818
- p2022: 0.00103067; = p2018*p2015/p0818-p2021
- p2918: 0.00116133; = p2332*(p1020+p1022)
- p4637: 9.65282e-6; = p1876*p3481
- p2437: 4.79087e-5; = p2241*p1014
- p2730: 0.000209028; = p2339*(p1078+p1080)
- p0832: 5.84274e8; = p0831*p0830/(1-p0831)
- p2469: 0; = p2273*p1123
- p0113: 86.966
- p0961: 0; = if(and(p0683>0;or(p0807=480;p0807=32;p0807=1;and(p0807=60;p0901<0.03)));p0937;0)
- p0931: 0; = p0801*p0925
- p0971: 0; = p0968/p0818
- p4849: 0; = p1882*p3482
- p4093: 1.066e-7; = p1950*p3478
- p1936: 0
- p1206: 0.023475
- p4353: 0; = p1798*p3480
- p3439: 0; = p3363*p1240
- p0977: 0; = IF(p0687=0;IF(OR(p0686=0;p0688=0);0;p0686*1000*p0688/100);0)
- p3161: 0; = p2380*p1082
- p2676: 0; = p2285*(p1019+p1021)
- p2955: 1.72543e-7; = p2369*(p1020+p1022)
- p1230: 0.5
- p3147: 2.48963e-6; = p2366*p1023
- p3226: 0.000238647; = p3222*p1229
- p2150: 6.00762e-7; = p2015*p2078*p2112/(p0818*1000)
- p2113: 0.832356
- p1939: 0
- p0983: 0; = if(p0886=0;0;min(1;(p0695*p0694*1000*p0697/100)/p0886))
- p1955: 0
- p0776: 24.924; = p0116*(1+p0644*p0248/100)
- p3415: 0; = p3377*p1238
- p1745: 0
- p2098: 0.856281
- p2264: 0; = p2226*p2210
- p0937: 0; = p0931*p0001/(p0818*p0002)
- p3172: 0; = p2391*p1132
- p2033: 1.12471e-5; = p2015*p2029*p2031/(p0818*1000)
- p0841: 0.0058038
- p1865: 0
- p1107: 251531; = IF(p1071=0;p1105*p1101*p1095;0)
- p3365: 0.000436378; = if(p1232=0;p3244*p3359/p0818;0)
- p1787: 0
- p1067: 0.0035099; = IF(p1012=0;p1053/(p1060*p0818);0)
- p1968: 0; = if(p0807=480;p0802*p0811;0)
- p3356: 4.8296e6; = if(p1232=0;p3306+p3317+p3328+p3339+p3350;0)
- p3417: 0; = p3379*p1238
- p2000: 4000
- p2563: 0.000580461; = p2367*p1014
- p1974: 0; = p1969*p0001/(p0818*p0002)
- p1342: 0; = p1326*p0801
- p1637: 0.478333
- p5215: 1.03508e-7; = p1836*p3484
- p1963b: 4.333e-5; = p1569*p1773+p1570*p1774+p1571*p1775+p1572*p1776+p1573*p1777+p1574*p1778+p1575*p1779+p1576*p1780+p1577*p1781+p1578*p1782+p1579*p1783+p1580*p1784+p1581*p1785+p1582*p1786+p1583*p1787+p1584*p1788+p1585*p1789+p1586*p1790+p1587*p1791
- p2592: 0; = p2396*p1014
- p1256: 0; = if(p1232>0;0;IF(p1253=1;0;IF(p1253+p1254>1;1-p1253;p1254)))
- p1817: 0
- p4365: 0; = p1810*p3480
- p0843: -0.0428595
- p2608: 0; = p2412*p1014
- p0269: 6.027
- p1650: 0
- p0881: 0; = p0880*p0001*p0003/(p0818*p0002)
- p2572: 0; = p2376*p1073
- p3186: 0; = p2405*p1023
- p1970: 1.65e6; = p0801
- p3035: 1.90663e-5; = p2254*p1023
- p2055: 5.59471
- p1001: 0; = if(p0978>0;0;if(and(p0687=0;p0691=0;p0695=0;p0699=0);0;IF(p0996+p0999+p1000=1;0;1-(p0996+p0999+p1000))))
- p3053: 0; = p2272*p1132
- p0858: 0; = p0670*1000/p0856
- p2939: 0; = p2353*(p1129+p1131)
- p2060: 0.272353
- p2754: 0; = p2363*(p1019+p1021)
- p1887: 0
- p3034: 8.64637e-8; = p2253*p1023
- p2723: 0; = p2332*(p1019+p1021)
- p3345: 0.160606; = if(and(p1232=0;p3256<>0);p3273*p3277*p3293;0)
- p0836: 2.36564e8; = p0831*p0835*p0801/(1-p0831)
- p2679: 0; = p2288*(p1019+p1021)
- p1810: 5.17176e-6; = p1402*1000/p0818
- p3778: 0; = p1841*p3477
- p3291: 0.437
- p4542: 1.03072e-5; = p1781*p3481
- p4225: 0; = p1876*p3479
- p1764: 0
- p1157: 0.187228
- p4159: 0; = p1810*p3479
- p1571: 0
- p2569: 1.2572e-5; = p2373*p1014
- p2213: 2.73374e-5; = p1116-p2212
- p1882: 3.53857e-6; = p1474*1000/p0818
- p2350: 0.000295966; = p2232*p2218
- p2240: 9.31954e-5; = p2222*p2185
- p3159: 0; = p2378*p1082
- p3196: 0; = p2415*p1082
- p2046: 10
- p1635: 0
- p1247: 0; = if(p1232>0;0;p1242*p0001/(p0818*p0002))
- p2880: 0.000225962; = p2294*(p1020+p1022)
- p1624: 0
- p1883: 0
- p2722: 0; = p2331*(p1019+p1021)
- p0958: 0; = if(and(p0683>0;or(p0807=480;p0807=32;p0807=1;and(p0807=60;p0901<0.03)));p0934;0)
- p2189: 0.00073708; = p1053/p0818
- p0057: 100
- p3812: 0; = p1875*p3477
- p1963d: 0; = p1608*p1812+p1609*p1813+p1610*p1814+p1611*p1815+p1612*p1816+p1613*p1817+p1614*p1818+p1615*p1819+p1616*p1820+p1617*p1821+p1618*p1822+p1619*p1823+p1620*p1824+p1621*p1825+p1622*p1826+p1623*p1827+p1624*p1828+p1625*p1829+p1626*p1830+p1627*p1831
- p2202: 0.000427267; = 4*1.00794*p2201/(2*14.0067)
- p4105: 0; = p1756*p3479
- p0050: 86.966
- p3111: 2.47365e-7; = p2330*p1023
- p0668: 0; = IF(p0404<0.5;-SQRT(p0007*EXP(p0536^2*p0008)-p0007);SQRT(p0007*EXP(p0536^2*p0008)-p0007))
- p2139: 1.66097e-6; = p2015*p2067*p2101/(p0818*1000)
- p2175: 0.000554914; = p0895*p0908/p0818
- p1009: 0; = p1005*p0001*p0004/(p0818*p0002)
- p2982: 0; = p2396*(p1020+p1022)
- p1689: 0
- p2595: 0; = p2399*p1014
- p1730: 0
- p3176: 0; = p2395*p1023
- p2973: 0; = p2387*(p1079+p1081)
- p1577: 0.6832
- p2401: 0; = p2234*p2190
- p0916: 0.321902; = p0826+(p0832*(1+p0894))/p0818
- p1586: 0
- p1676: 0
- p1600: 0
- p0008: 0.0350765; = (p0007-1.5)/(p0007-1)^2
- p3281: 0.46
- p1050: 3.51356e7; = IF(p1012=0;p1037*p1036;0)
- p0622: 0; = IF(p0358<0.5;-SQRT(p0007*EXP(p0490^2*p0008)-p0007);SQRT(p0007*EXP(p0490^2*p0008)-p0007))
- p1118: 0.00148186; = IF(p1071=0;p1108/(p1113*p0818);0)
- p2268: 0; = p2226*p2214
- p4803: 0; = p1836*p3482
- p2924: 0; = p2338*(p1079+p1081)
- p1233: 0; = p1232*p0001/(p0818*p0002)
- p2987: 0; = p2401*(p1020+p1022)
- p2720: 0; = p2329*(p1019+p1021)
- p0110: 30.548
- p0888: 0; = p0686*1000*p0687*p0884/100
- p1129: 0; = if(p1121=0;IF(p1123+p1128=1;0;IF(p1123+p1128+p1125>1;1-(p1123+p1128);p1125));0)
- p2833: 4.57802e-5; = p2247*(p1020+p1022)
- p2484: 0.000369978; = p2288*p1014
- p1711: 0
- p1721: 0
- p1990: 30
- p3250: 0.875
- p2519: 0.000344639; = p2323*p1014
- p2223: 0.269364; = if(p0765*p0769+p0766*p0770+p0767*p0771+p0768*p0772=0;0;p0770*p0766/(p0765*p0769+p0766*p0770+p0767*p0771+p0768*p0772))
- p1693: 0
- p3144: 2.64677e-7; = p2363*p1023
- p2699: 0; = p2308*(p1078+p1080)
- p1942: 0
- p2908: 0.000123617; = p2322*(p1020+p1022)
- p3135: 1.1931e-5; = p2354*p1023
- p4025: 1.3858e-6; = p1882*p3478
- p1706: 0
- p2144: 6.88052e-7; = p2015*p2072*p2106/(p0818*1000)
- p1889: 0
- p1643: 0.801155
- p2631: 0; = p2240*(p1019+p1021)
- p1979: 1.86546e8; = p0973
- p1763: 0
- p3315: 0; = if(and(p1232=0;p3253<>0);p3264*p3289;0)
- p2863: 0.000159792; = p2277*(p1020+p1022)
- p1759: 0
- p2441: 5.47915e-5; = p2245*p1014
- p2751: 0; = p2360*(p1019+p1021)
- p2339: 0.00430542; = p2228*p2207
- p1323: 0; = IF(((p0745*1000*p0750/100)+(p0754*1000*p0759/100))/p0801<0;0;((p0745*1000*p0750/100)+(p0754*1000*p0759/100))/p0801)
- p1699: 0
- p0261: 0
- p4299: 0; = p1950*p3479
- p2940: 0.000115536; = p2354*(p1020+p1022)
- p1856: 0
- p4557: 2.78132e-6; = p1796*p3481
- p2295: 0.00011509; = p2223*p2202
- p2551: 6.17725e-5; = p2355*p1014
- p4307: 0; = p1962*p3479
- p2423: 0; = p2235*p2213
- p2580: 0; = p2384*p1073
- p0701: 0
- p3512: 0; = p1781*p3476
- p3180: 0; = p2399*p1023
- p2678: 0; = p2287*(p1019+p1021)
- p1958: 1498
- p2347: 0.000258369; = p2228*p2215
- p1080: 0; = IF(p1071=0;IF(p1073+p1078+p1079=1;0;IF(p1073+p1078+p1079+p1076>1;1-(p1073+p1078+p1079);p1076));0)
- p1874: 0
- p2122: 0.341195
- p4401: 0; = p1846*p3480
- p2012: 0.0102252
- p3101: 1.8388e-6; = p2320*p1023
- p1607: 0
- p3205: 0; = p2424*p1082
- p0760: 76.262; = p0100*(1+p0628*p0232/100)
- p2085: 0.0335294
- p0976: 0; = IF(p0687=0;IF(OR(p0686=0;p0689=0);0;p0686*1000*p0689/100);0)
- p1597: 0
- p2190: 0.000843684; = 32.065*p2189/(2*14.0067)
- p1373: 63
- p1319: 0; = IF(((p0745*1000*p0746/100)+(p0754*1000*p0755/100))/p0801<0;0;((p0745*1000*p0746/100)+(p0754*1000*p0755/100))/p0801)
- p4543: 2.78132e-5; = p1782*p3481
- p1302: 0; = IF(p1297+p1300+p1301=p1262;0;p1262-(p1297+p1300+p1301))
- p2911: 0.000287958; = p2325*(p1020+p1022)
- p0908: 0.00197823
- p1696: 0
- p0789: 100; = p0129*(1+p0657*p0261/100)
- p0970: 0; = p0967/p0818
- p1542: 1
- p2853: 0; = p2267*(p1079+p1081)
- p2182: 0.00956384; = p1050/p0818
- p2711: 0; = p2320*(p1019+p1021)
- p2757: 0; = p2366*(p1019+p1021)
- p2065: 0.0758824
- p1961: 0.5
- p3851: 0; = p1914*p3477
- p1043: 0.251177
- p2340: 0.00221304; = p2228*p2208
- p0176: 0.376
- p3783: 0; = p1846*p3477
- p3529: 0; = p1798*p3476
- p3023: 2.92336e-7; = p2242*p1023
- p3181: 0; = p2400*p1023
- p4971: 0; = p1798*p3483
- p2902: 0.000352091; = p2316*(p1020+p1022)
- p3357: 1.12305e6; = if(p1232=0;p3307+p3318+p3329+p3340+p3351;0)
- p0822: 0.881667
- p1813: 0
- p2208: 0.00221304; = p1110/p0818
- p2457: 0; = p2261*p1073
- p1633: 0
- p2071: 0.151
- p0798: 86.966; = p0138*(1+p0666*p0270/100)
- p2416: 0; = p2235*p2206
- p2517: 0.000554824; = p2321*p1014
- p2813: 0; = p2422*(p1078+p1080)
- p3262: 0.0787162
- p2349: 0.00133312; = p2228*p2217
- p3046: 0; = p2265*p1082
- p2986: 0; = p2400*(p1020+p1022)
- p0085: 5306.16
- p3795: 0; = p1858*p3477
- p2534: 0.000464951; = p2338*p1073
- p0477: 0; = SQRT(2)*(IF((2*p0345-1)<0;-1;IF((2*p0345-1)>0;1;0))*SQRT(SQRT((2/(pi()*0.140012289)+LN(1-(2*p0345-1)^2)/2)^2-LN(1-(2*p0345-1)^2)/0.140012289)-(2/(pi()*0.140012289)+LN(1-(2*p0345-1)^2)/2)))
- p5014: 0; = p1841*p3483
- p2481: 3.93332e-5; = p2285*p1014
- p3378: 0; = if(p1232=0;p3246*p3360/p0818;0)
- p2598: 0; = p2402*p1014
- p0217: 5.846
- p3224: 0.501945; = IF(p3216=0;0;1-p3221-p3222-p3223)
- p2506: 0; = p2310*p1073
- p3074: 5.44274e-5; = p2293*p1023
- p3372: 0; = if(p1232=0;p3245*p3360/p0818;0)
- p2970: 0; = p2384*(p1079+p1081)
- p3054: 0; = p2273*p1132
- p0527: 0; = SQRT(2)*(IF((2*p0395-1)<0;-1;IF((2*p0395-1)>0;1;0))*SQRT(SQRT((2/(pi()*0.140012289)+LN(1-(2*p0395-1)^2)/2)^2-LN(1-(2*p0395-1)^2)/0.140012289)-(2/(pi()*0.140012289)+LN(1-(2*p0395-1)^2)/2)))
- p1752: 0
- p0308: 0.5
- p1132: 0; = if(p1121=0;IF(p1123+p1128+p1129+p1130+p1131=1;0;1-(p1123+p1128+p1129+p1130+p1131));0)
- p1878: 0
- p0670: 0
- p3200: 0; = p2419*p1082
- p0697: 0
- p1897: 0
- p3895: 0; = p1962*p3477
- p2032: 0.448886
- p3010: 0; = p2424*(p1079+p1081)
- p1298: 0
- p1675: 0
- p2796: 0; = p2405*(p1019+p1021)
- p2324: 0.000125925; = p2224*p2191
- p2106: 0.856281
- p0537: 0; = IF(p0273<0.5;-SQRT(p0007*EXP(p0405^2*p0008)-p0007);SQRT(p0007*EXP(p0405^2*p0008)-p0007))
- p3088: 0; = p2307*p1082
- p2670: 0; = p2279*(p1019+p1021)
- p4881: 0; = p1914*p3482
- p2311: 0; = p2231*p2218
- p2197: 8.70193e-6; = p1055/p0818
- p0984: 0; = if(p0886=0;0;min(1;(p0699*p0698*1000*p0701/100)/p0886))
- p1374: 170
- p1205: 0
- p0812: 0; = if(p0807=480;0.095/0.34;0)
- p2548: 5.08249e-5; = p2352*p1123
- p1966: 1.57e6; = if(p0814=0;p0802;0)
- p2827: 1.96696e-5; = p2241*(p1020+p1022)
- p2159: 1.07166e-5; = p2015*p2083*p2121/(p0818*1000)
- p3572: 0; = p1841*p3476
- p3156: 0; = p2375*p1082
- p2515: 0.000301346; = p2319*p1014
- p3215: 0.450791; = p1222*3*15.9994/100.0869
- p1007: 0; = p1003*p0001*p0004/(p0818*p0002)
- p3008: 0; = p2422*(p1079+p1081)
- p2299: 0; = p2227*p2206
- p2064: 0.676706
- p1095: 3.53842e7; = IF(p1071=0;p0797*p0702*1000*p0798/100;0)
- p1982: 750
- p0632: 0; = IF(p0368<0.5;-SQRT(p0007*EXP(p0500^2*p0008)-p0007);SQRT(p0007*EXP(p0500^2*p0008)-p0007))
- p2525: 3.55468e-6; = p2329*p1014
- p2776: 0; = p2385*(p1078+p1080)
- p2384: 0; = p2229*p2213
- p0874: 0; = p0865*p0856
- p1917: 0
- p1840: 0
- p2521: 0.000701372; = p2325*p1014
- p1593: 0

- p4720: 0.000181317; = p1963*p3481
- p2413: 0; = p2234*p2203
- p2658: 0; = p2267*(p1078+p1080)
- p1090: 1.68972e-5; = IF(p1071=0;p1084*p0001/(p0818*p0002);0)
- p0993: 0; = p0989*p0001*p0004/(p0818*p0002)
- p2589: 0; = p2393*p1014
- p2188: 0.00135822; = p1066-p2186-p2187
- p1083: 1.28502e6; = IF(p1071=0;p1073*(p0710/100)*p0703*1000;0)
- p4086: 3.198e-7; = p1943*p3478
- p2194: 0.214362
- p2714: 0; = p2323*(p1019+p1021)
- p1716: 0
- p0508: 0; = SQRT(2)*(IF((2*p0376-1)<0;-1;IF((2*p0376-1)>0;1;0))*SQRT(SQRT((2/(pi()*0.140012289)+LN(1-(2*p0376-1)^2)/2)^2-LN(1-(2*p0376-1)^2)/0.140012289)-(2/(pi()*0.140012289)+LN(1-(2*p0376-1)^2)/2)))
- p3337: 0; = IF(or(p3254=0;p1232>0);0;p3272*p3289)
- p3076: 3.35833e-6; = p2295*p1023
- p3474: 0; = p3379*p1241
- p1804: 0
- p0268: 0.376
- p1176: 382.831; = p1175*p0801
- p2391: 0; = p2233*p2220
- p2336: 0.00177052; = p2228*p2204
- p0579: 0; = IF(p0315<0.5;-SQRT(p0007*EXP(p0447^2*p0008)-p0007);SQRT(p0007*EXP(p0447^2*p0008)-p0007))
- p2474: 5.31586e-5; = p2278*p1014
- p0906: 0.00423333
- p1311: 0; = IF(p1307+p1310=p1266;0;IF(p1307+p1310+p1309>p1266;p1266-(p1307+p1310);p1309))
- p0954: 0; = if(and(p0683>0;or(p0807=56;p0807=100;and(p0807=60;p0901>0.06)));p0936;0)
- p3211: 0; = p2430*p1132
- p4412: 0; = p1857*p3480
- p2510: 0; = p2314*p1123
- p1223: 0.56
- p2323: 0.000500747; = p2224*p2190
- p0796: 99.417; = p0136*(1+p0664*p0268/100)
- p1052: 2.71017e6; = IF(p1012=0;p1045*p1036;0)
- p3085: 0; = p2304*p1082
- p2645: 0; = p2254*(p1019+p1021)
- p1946: 0
- p1210: 0.13
- p0820: 0; = if(p0807=480;p0814;0)
- p0799: 8.505; = p0139*(1+p0667*p0271/100)
- p1582: 0
- p2627: 0; = p2431*p1123
- p2408: 0; = p2234*p2198
- p0761: 0
- p1328: 0; = p1319*p0801
- p0747: 0
- p3419: 0; = p3362*p1239
- p2444: 0.000604612; = p2248*p1014
- p0079: 1.027
- p2604: 0; = p2408*p1014
- p1657: 0
- p2944: 8.9118e-6; = p2358*(p1020+p1022)
- p1850: 0
- p3261: 0.908439
- p1598: 0
- p0241: 33.451
- p0875: 0; = p0874*p0001*p0003/(p0818*p0002)
- p3106: 2.97364e-5; = p2325*p1023
- p0726: 0
- p3304: 0; = if(and(p1232=0;p3252<>0);p3260*p3289;0)
- p2835: 5.32113e-5; = p2249*(p1020+p1022)
- p2373: 1.82666e-5; = p2225*p2202
- p1830: 0
- p2463: 0; = p2267*p1073
- p0834: 0.00059
- p2615: 0; = p2419*p1073
- p0932: 0; = p0801*p0926
- p2351: 0.000417078; = p2232*p2219
- p2668: 0; = p2277*(p1019+p1021)
- p0278: 0.5
- p3001: 0; = p2415*(p1079+p1081)
- p2234: 0; = 1-(p2222+p2223+p2224+p2225)
- p5009: 0; = p1836*p3483
- p3223: 0.126838; = IF(p3216=0;0;(1-p1223)*24.3050/84.3139)
- p1215: 0; = IF(p1214=0;0;(p1214-1.5)/(p1214-1)^2)
- p2909: 0.000141496; = p2323*(p1020+p1022)
- p1231: 0.0096563; = IF(p1221=0;0;p1230*(p1228+p1229))
- p2731: 0.000107443; = p2340*(p1078+p1080)
- p0757: 0
- p1823: 0
- p1027: 0; = IF(p1012=0;p1021*(p0704/100)*p0703*1000;0)
- p2377: 0; = p2229*p2206
- p0749: 0
- p0992: 0; = p0988*p0001*p0004/(p0818*p0002)
- p1895: 0
- p0917: 1.19318
- p3092: 0; = p2311*p1132
- p0679: 0
- p3029: 2.5634e-5; = p2248*p1023
- p3397: 0; = p3378*p1234
- p0418: 0; = SQRT(2)*(IF((2*p0286-1)<0;-1;IF((2*p0286-1)>0;1;0))*SQRT(SQRT((2/(pi()*0.140012289)+LN(1-(2*p0286-1)^2)/2)^2-LN(1-(2*p0286-1)^2)/0.140012289)-(2/(pi()*0.140012289)+LN(1-(2*p0286-1)^2)/2)))
- p2272: 0; = p2230*p2218
- p4749: 0; = p1782*p3482
- p2031: 0.465411
- p2685: 0; = p2294*(p1019+p1021)
- p0783: 0
- p2337: 0.0016013; = p2228*p2205
- p1709: 0
- p1258: 1; = if(p1232>0;0;IF(p1253+p1256+p1257=1;0;1-(p1253+p1256+p1257)))
- p2434: 0.00013634; = p2238*p1014
- p2043: 0.636483
- p3446: 0; = p3370*p1240
- p1581: 0
- p2303: 0; = p2227*p2210
- p3013: 0; = p2427*(p1079+p1081)
- p2867: 8.08119e-6; = p2281*(p1020+p1022)
- p0439: 0; = SQRT(2)*(IF((2*p0307-1)<0;-1;IF((2*p0307-1)>0;1;0))*SQRT(SQRT((2/(pi()*0.140012289)+LN(1-(2*p0307-1)^2)/2)^2-LN(1-(2*p0307-1)^2)/0.140012289)-(2/(pi()*0.140012289)+LN(1-(2*p0307-1)^2)/2)))
- p2567: 0.00020375; = p2371*p1014
- p1963h: 0; = p1686*p1890+p1687*p1891+p1688*p1892+p1689*p1893+p1690*p1894+p1691*p1895+p1692*p1896+p1693*p1897+p1694*p1898+p1695*p1899+p1696*p1900+p1697*p1901+p1698*p1902+p1699*p1903+p1700*p1904+p1701*p1905+p1702*p1906+p1703*p1907+p1704*p1908+p1705*p1909
- p5172: 3.58298e-8; = p1793*p3484
- p2919: 0.000497891; = p2333*(p1020+p1022)
- p2068: 0.153529
- p3126: 1.49809e-6; = p2345*p1082
- p3028: 4.72755e-6; = p2247*p1023
- p1588: 0
- p2830: 1.9653e-5; = p2244*(p1020+p1022)
- p1963a: 1.40813e-5; = p1550*p1754+p1551*p1755+p1552*p1756+p1553*p1757+p1554*p1758+p1555*p1759+p1556*p1760+p1557*p1761+p1558*p1762+p1559*p1763+p1560*p1764+p1561*p1765+p1562*p1766+p1563*p1767+p1564*p1768+p1565*p1769+p1566*p1770+p1567*p1771+p1568*p1772
- p2015: 2.20301e7; = p0830*p2011*p2013
- p0641: 0; = IF(p0377<0.5;-SQRT(p0007*EXP(p0509^2*p0008)-p0007);SQRT(p0007*EXP(p0509^2*p0008)-p0007))
- p2498: 0; = p2302*p1073
- p4842: 0; = p1875*p3482
- p1614: 0
- p1603: 0
- p2686: 0; = p2295*(p1019+p1021)
- p2555: 3.12402e-6; = p2359*p1014
- p3009: 0; = p2423*(p1079+p1081)
- p3718: 0; = p1781*p3477
- p2824: 5.59763e-5; = p2238*(p1020+p1022)
- p2878: 2.39016e-6; = p2292*(p1020+p1022)
- p2216: 0.000148745; = p1108/p0818
- p2739: 7.22155e-6; = p2348*(p1078+p1080)
- p1664: 0
- p4602: 1.63607e-7; = p1841*p3481
- p0794: 0.06; = p0134*(1+p0662*p0266/100)
- p2425: 0; = p2235*p2215
- p0700: 0
- p2058: 1.24412
- p2961: 0; = p2375*(p1079+p1081)
- p2570: 0.000144128; = p2374*p1014
- p2102: 0.922577
- p0813: 0; = if(p0807=480;1.56521739130435;0)
- p1649: 0
- p3424: 0; = p3367*p1239
- p1972: 0; = if(p0807=480;p1967*p0001/(p0818*p0002);0)
- p0662: 0; = IF(p0398<0.5;-SQRT(p0007*EXP(p0530^2*p0008)-p0007);SQRT(p0007*EXP(p0530^2*p0008)-p0007))
- p2792: 0; = p2401*(p1019+p1021)
- p2472: 0.00177304; = p2276*p1014
- p2674: 0; = p2283*(p1019+p1021)
- p2187: 0.000106172; = 4*1.00794*p2186/(2*14.0067)
- p3243: 1.30159e-9; = p3234*p1188*p3239/p0818
- p2650: 0; = p2259*(p1078+p1080)
- p2115: 0.856281
- p1609: 0
- p2565: 4.20261e-7; = p2369*p1014
- p2256: 4.03168e-5; = p2222*p2202
- p0480: 0; = SQRT(2)*(IF((2*p0348-1)<0;-1;IF((2*p0348-1)>0;1;0))*SQRT(SQRT((2/(pi()*0.140012289)+LN(1-(2*p0348-1)^2)/2)^2-LN(1-(2*p0348-1)^2)/0.140012289)-(2/(pi()*0.140012289)+LN(1-(2*p0348-1)^2)/2)))
- p2218: 0.000295966; = p1150/p0818
- p0644: 0; = IF(p0380<0.5;-SQRT(p0007*EXP(p0512^2*p0008)-p0007);SQRT(p0007*EXP(p0512^2*p0008)-p0007))
- p3286: 0.185
- p1094: 1.90724e-5; = IF(p1071=0;p1088*p0001/(p0818*p0002);0)
- p2439: 8.82073e-5; = p2243*p1014
- p2200: 0.00692457; = p1056/p0818
- p0816: 0
- p2981: 0; = p2395*(p1020+p1022)
- p4206: 0; = p1857*p3479
- p2622: 0; = p2426*p1073
- p3320: 0; = if(and(p1232=0;p3253<>0);p3253*(p3264-p3315)/p3316;0)
- p0536: 0; = SQRT(2)*(IF((2*p0404-1)<0;-1;IF((2*p0404-1)>0;1;0))*SQRT(SQRT((2/(pi()*0.140012289)+LN(1-(2*p0404-1)^2)/2)^2-LN(1-(2*p0404-1)^2)/0.140012289)-(2/(pi()*0.140012289)+LN(1-(2*p0404-1)^2)/2)))
- p0453: 0; = SQRT(2)*(IF((2*p0321-1)<0;-1;IF((2*p0321-1)>0;1;0))*SQRT(SQRT((2/(pi()*0.140012289)+LN(1-(2*p0321-1)^2)/2)^2-LN(1-(2*p0321-1)^2)/0.140012289)-(2/(pi()*0.140012289)+LN(1-(2*p0321-1)^2)/2)))
- p0348: 0.5
- p1937: 0
- p1561: 0
- p4336: 0; = p1781*p3480
- p1069: 5.43871e-5; = IF(p1012=0;p1055/(p1062*p0818);0)
- p3373: 0; = if(p1232=0;p3245*p3361/p0818;0)
- p3277: 0.55
- p1926: 0
- p2673: 0; = p2282*(p1019+p1021)
- p0237: 7.439
- p3409: 0; = p3371*p1238
- p2774: 0; = p2383*(p1078+p1080)
- p2266: 0; = p2226*p2212
- p4608: 5.07182e-6; = p1847*p3481
- p2078: 0.117
- p2855: 0; = p2269*(p1079+p1081)
- p2746: 0; = p2355*(p1019+p1021)
- p1217: 0
- p2710: 0; = p2319*(p1019+p1021)
- p1226: 1.65e6; = IF(p1221=0;0;IF(p1193=0;p0801;0))
- p0666: 0; = IF(p0402<0.5;-SQRT(p0007*EXP(p0534^2*p0008)-p0007);SQRT(p0007*EXP(p0534^2*p0008)-p0007))
- p1082: 0.0548; = IF(p1071=0;IF(p1073+p1078+p1079+p1080+p1081=1;0;1-(p1073+p1078+p1079+p1080+p1081));0)
- p4843: 0; = p1876*p3482
- p3524: 0; = p1793*p3476
- p3164: 0; = p2383*p1082
- p1784: 0
- p1012: 0
- p3032: 2.39601e-8; = p2251*p1023
- p2630: 0; = p2239*(p1019+p1021)
- p4413: 0; = p1858*p3480
- p1580: 0
- p2576: 0; = p2380*p1073
- p0211: 4.114
- p2612: 0; = p2416*p1073
- p1737: 0
- p2798: 0; = p2407*(p1019+p1021)
- p0577: 0; = IF(p0313<0.5;-SQRT(p0007*EXP(p0445^2*p0008)-p0007);SQRT(p0007*EXP(p0445^2*p0008)-p0007))
- p2640: 0; = p2249*(p1019+p1021)
- p0177: 8.173
- p0718: 0
- p2799: 0; = p2408*(p1019+p1021)
- p1474: 13
- p2744: 0; = p2353*(p1128+p1130)
- p1309: 0
- p0013: 908.934
- p3323: 0; = if(and(p1232=0;p3255<>0);p3265*p3277*(p3299*p3291+(1-p3299)*p3295);0)
- p1692: 0
- p2359: 4.53908e-6; = p2225*p2187
- p1313: 0; = p1307*p1252/p0818
- p2309: 0; = p2227*p2216
- p2035: 1.29189e-5; = p2015*p2029*(1-p2031)/(p0818*1000)
- p4207: 0; = p1858*p3479
- p0923: 0.183016; = IF(p0918=1;0;IF(p0918+p0919>1;1-p0918;p0919))
- p3208: 0; = p2427*p1082
- p2992: 0; = p2406*(p1020+p1022)
- p3401: 0; = p3363*p1238
- p2454: 0; = p2258*p1073
- p1595: 0
- p2583: 0; = p2387*p1073
- p0706: 0
- p0943: 0; = if(and(p0683=0;p0949=0);p0937;0)
- p0263: 0
- p2808: 0; = p2417*(p1078+p1080)
- p1164: 7228.31; = p1163*p0801
- p2735: 1.26925e-7; = p2344*(p1078+p1080)
- p0894: 0.28
- p1950: 2.72198e-7; = p1542*1000/p0818
- p1327a: 0.0238649; = (p0745*1000/p0801)*(1-(p0746+p0747+p0748+p0749+p0750+p0751+p0752+p0753)/100)+(p0754*1000/p0801)*(1-(p0755+p0756+p0757+p0758+p0759+p0760+p0761+p0762)/100)
- p1587: 0
- p2148: 2.92679e-7; = p2015*p2076*p2110/(p0818*1000)
- p2230: 0; = if(p0783*p0787+p0784*p0788+p0785*p0789+p0786*p0790=0;0;p0787*p0783/(p0783*p0787+p0784*p0788+p0785*p0789+p0786*p0790))
- p0521: 0; = SQRT(2)*(IF((2*p0389-1)<0;-1;IF((2*p0389-1)>0;1;0))*SQRT(SQRT((2/(pi()*0.140012289)+LN(1-(2*p0389-1)^2)/2)^2-LN(1-(2*p0389-1)^2)/0.140012289)-(2/(pi()*0.140012289)+LN(1-(2*p0389-1)^2)/2)))
- p3122: 5.48418e-5; = p2341*p1082
- p3410: 0; = p3372*p1238
- p3100: 1.27763e-5; = p2319*p1023
- p2649: 0; = p2258*(p1078+p1080)
- p2296: 0.00131942; = p2223*p2203
- p2167: 0.239736; = p2166*(p0898)
- p1594: 0.735896
- p2545: 0.00119534; = p2349*p1073
- p3354: 6.45142e6; = IF((p3350+p3351+p3352+p3353)+IF(p3349=0;0;(p3256*(p3273*(1-p3277))/p3349))>p3256;p3256-(p3350+p3351+p3352+p3353);IF(p3349=0;0;p3256*(p3273*(1-p3277))/p3349))
- p2247: 0.000162014; = p2222*p2192
- p0936: 0.000325649; = p0930*p0001/(p0818*p0002)
- p2371: 0.000296041; = p2225*p2200
- p2581: 0; = p2385*p1073
- p2040: 0.44
- p3340: 0; = if(and(p1232=0;p3254<>0);p3254*(p3270-p3335)/p3338;0)
- p1260: 0; = if(p1232>0;0;p0731/100)
- p0667: 0; = IF(p0403<0.5;-SQRT(p0007*EXP(p0535^2*p0008)-p0007);SQRT(p0007*EXP(p0535^2*p0008)-p0007))
- p3422: 0; = p3365*p1239
- p2807: 0; = p2416*(p1078+p1080)
- p2794: 0; = p2403*(p1019+p1021)
- p1322: 0; = IF(((p0745*1000*p0749/100)+(p0754*1000*p0758/100))/p0801<0;0;((p0745*1000*p0749/100)+(p0754*1000*p0758/100))/p0801)
- p1714: 0
- p2929: 0; = p2343*(p1079+p1081)
- p1279: 0
- p0441: 0; = SQRT(2)*(IF((2*p0309-1)<0;-1;IF((2*p0309-1)>0;1;0))*SQRT(SQRT((2/(pi()*0.140012289)+LN(1-(2*p0309-1)^2)/2)^2-LN(1-(2*p0309-1)^2)/0.140012289)-(2/(pi()*0.140012289)+LN(1-(2*p0309-1)^2)/2)))
- p4263: 0; = p1914*p3479
- p1141: 0; = if(p1121=0;p1135*p0001/(p0818*p0002);0)
- p2114: 0.832356
- p2205: 0.0016013; = 2*14.0067*p2204/30.973762
- p0879: 1.5034; = p0878*p0001*p0003/(p0818*p0002)
- p2052: 7.38614e-6; = p2015*p2049*(1-p2050)/(p0818*1000)
- p1087: 0; = IF(p1071=0;p1081*(p0710/100)*p0703*1000;0)
- p0653: 0; = IF(p0389<0.5;-SQRT(p0007*EXP(p0521^2*p0008)-p0007);SQRT(p0007*EXP(p0521^2*p0008)-p0007))
- p4019: 6.28941e-6; = p1876*p3478
- p3416: 0; = p3378*p1238
- p3201: 0; = p2420*p1082
- p2386: 0; = p2229*p2215
- p1232: 0
- p4308: 0; = p1963*p3479
- p0648: 0; = IF(p0384<0.5;-SQRT(p0007*EXP(p0516^2*p0008)-p0007);SQRT(p0007*EXP(p0516^2*p0008)-p0007))
- p1116: 2.99517e-5; = IF(p1071=0;p1106/(p1111*p0818);0)
- p1851: 0
- p2267: 0; = p2226*p2213
- p2228: 1; = if(p0774*p0778+p0775*p0779+p0776*p0780+p0777*p0781=0;0;p0780*p0776/(p0774*p0778+p0775*p0779+p0776*p0780+p0777*p0781))
- p0940: 0; = if(and(p0683=0;p0946=0);p0934;0)
- p2666: 0; = p2275*(p1128+p1130)
- p1144: 0; = if(p1121=0;p1138*p0001/(p0818*p0002);0)
- p3329: 0; = if(and(p1232=0;p3255<>0);p3255*(p3266-p3324)/p3327;0)
- p1159: 0.5
- p1884: 0
- p4195: 0; = p1846*p3479
- p2397: 0; = p2234*p2186
- p0064: 2.403
- p3213: 0.112803; = p1222*12.0107/100.0869
- p2804: 0; = p2413*(p1019+p1021)
- p2990: 0; = p2404*(p1020+p1022)
- p2184: 0.00028674; = p1051/p0818
- p1156: 0.0851467; = p1064+p1065+p1066+p1067+p1068+p1069+p1070+p1116+p1117+p1118+p1119+p1120+p1154+p1155
- p0638: 0; = IF(p0374<0.5;-SQRT(p0007*EXP(p0506^2*p0008)-p0007);SQRT(p0007*EXP(p0506^2*p0008)-p0007))
- p2440: 4.78683e-5; = p2244*p1014
- p1654: 0.596472
- p0311: 0.5
- p3202: 0; = p2421*p1082
- p1203: 3
- p0808: 0
- p1574: 0
- p2123: 0.263965
- p1819: 0
- p3275: 0.0214527
- p0996: 0; = if(p0888=0;0;if((p0691*p0690*1000*p0692/100)/p0888>1;1;(p0691*p0690*1000*p0692/100)/p0888))
- p1625: 0
- p2865: 7.51749e-5; = p2279*(p1020+p1022)
- p2455: 0; = p2259*p1073
- p3384: 0; = p3365*p1234
- p0903: 0.0129401
- p3167: 0; = p2386*p1082
- p5175: 3.38392e-8; = p1796*p3484
- p1131: 0; = if(p1121=0;IF(p1123+p1128+p1129+p1130=1;0;IF(p1123+p1128+p1129+p1130+p1127>1;1-(p1123+p1128+p1129+p1130);p1127));0)
- p0490: 0; = SQRT(2)*(IF((2*p0358-1)<0;-1;IF((2*p0358-1)>0;1;0))*SQRT(SQRT((2/(pi()*0.140012289)+LN(1-(2*p0358-1)^2)/2)^2-LN(1-(2*p0358-1)^2)/0.140012289)-(2/(pi()*0.140012289)+LN(1-(2*p0358-1)^2)/2)))
- p0372: 0.5
- p1330: 0; = p1320*p0801
- p2192: 0.00171698; = p1067-p2189-p2190-p2191
- p4402: 0; = p1847*p3480
- p1251: 6.27569e-6; = if(p1232>0;0;p1246*p0001/(p0818*p0002))
- p1638: 0
- p1560: 0
- p2803: 0; = p2412*(p1019+p1021)
- p2310: 0; = p2227*p2217
- p0094: 78.482
- p2984: 0; = p2398*(p1020+p1022)
- p1554: 0
- p1894: 0
- p1058: 0.225
- p2962: 0; = p2376*(p1079+p1081)
- p2643: 0; = p2252*(p1019+p1021)
- p2396: 0; = p2234*p2185
- p2051: 0.00014669; = p2015*p2049*p2050/(p0818*1000)
- p2422: 0; = p2235*p2212
- p1783: 0
- p1565: 0
- p1062: 0.16
- p1814: 0
- p4396: 0; = p1841*p3480
- p0775: 0
- p0675: 0
- p2426: 0; = p2235*p2216
- p1687: 0
- p2097: 0.40001
- p5322: 5.97163e-9; = p1943*p3484
- p3303: 0; = if(and(p1232=0;p3252<>0);p3259*p3289;0)
- p3411: 0; = p3373*p1238
- p1641: 0
- p2061: 0.518824
- p2696: 0; = p2305*(p1078+p1080)
- p0740: 99.473; = p0080*(1+p0608*p0212/100)
- p2471: 0; = p2275*p1123
- p4636: 2.32322e-5; = p1875*p3481
- p2527: 1.28276e-5; = p2331*p1014
- p0910: 0.0059216; = p0909/p0818
- p1754: 0
- p1124: 0; = if(p1121=0;p0718/100;0)
- p0895: 1.03054e9; = p0894*p0830
- p2816: 0; = p2425*(p1078+p1080)
- p5135: 1.27395e-7; = p1756*p3484
- p3005: 0; = p2419*(p1079+p1081)
- p0974: 0.5
- p2877: 1.08713e-6; = p2291*(p1020+p1022)
- p0933: 7072; = p0801*p0927
- p1125: 0; = if(p1121=0;p0719/100;0)
- p0236: 0.376
- p0955: 0; = if(and(p0683>0;or(p0807=56;p0807=100;and(p0807=60;p0901>0.06)));p0937;0)
- p2675: 0; = p2284*(p1019+p1021)
- p2885: 0; = p2299*(p1079+p1081)
- p5237: 9.75367e-8; = p1858*p3484
- p3380: 0.0295802; = p3251/p0818
- p2560: 5.05206e-5; = p2364*p1014
- p1821: 0
- p0800: 10.95; = p0140*(1+p0668*p0272/100)
- p0635: 0; = IF(p0371<0.5;-SQRT(p0007*EXP(p0503^2*p0008)-p0007);SQRT(p0007*EXP(p0503^2*p0008)-p0007))
- p2063: 2.01468
- p3225: 0.000156416; = p3221*p1229
- p3087: 0; = p2306*p1082
- p0007: 29; = p0006-1
- p0929: 301977; = p0801*p0923
- p0104: 99.417
- p2614: 0; = p2418*p1073
- p2136: 3.47469e-6; = p2015*p2064*p2098/(p0818*1000)
- p0951: 0; = if(and(p0683=0;or(p0807=480;p0807=32;p0807=1;and(p0807=60;p0901<0.03)));p0939;0)
- p2285: 5.71495e-5; = p2223*p2191
- p2605: 0; = p2409*p1014
- p2694: 0; = p2303*(p1078+p1080)
- p1297: 0
- p1262: 0; = if(p1232>0;0;p0733/100)
- p0866: 0.550869; = IF(p0858+p0864+p0865=1;0;IF(p0858+p0864+p0865+p0861>1;1-(p0858+p0864+p0865);p0861))
- p1771: 0
- p0972: 0.0507775; = p0969/p0818
- p1801: 0
- p2211: 0.00565849; = p1120-p2209-p2208-p2210
- p0852: 0; = p0847*p0851^3+p0848*p0851^2+p0849*p0851+p0850
- p0887: 0; = 1000*p0886*p0001*p0003*p0004/(p0818*p0002)
- p1750: 0
- p1726: 0
- p2499: 0; = p2303*p1073
- p2683: 0; = p2292*(p1019+p1021)
- p1910: 0
- p1935: 0
- p1862: 0
- p3140: 1.3245e-7; = p2359*p1023
- p3146: 1.16141e-5; = p2365*p1023
- p3773: 0; = p1836*p3477
- p0995: 0; = p0991*p0001*p0004/(p0818*p0002)
- p0501: 0; = SQRT(2)*(IF((2*p0369-1)<0;-1;IF((2*p0369-1)>0;1;0))*SQRT(SQRT((2/(pi()*0.140012289)+LN(1-(2*p0369-1)^2)/2)^2-LN(1-(2*p0369-1)^2)/0.140012289)-(2/(pi()*0.140012289)+LN(1-(2*p0369-1)^2)/2)))
- p3288: 0.505
- p2879: 0.000527058; = p2293*(p1020+p1022)
- p2226: 0; = if(p0774*p0778+p0775*p0779+p0776*p0780+p0777*p0781=0;0;p0778*p0774/(p0774*p0778+p0775*p0779+p0776*p0780+p0777*p0781))
- p2540: 2.34412e-6; = p2344*p1073
- p2279: 0.00026604; = p2223*p2185
- p1812: 0
- p0183: 4.599
- p3073: 2.46823e-7; = p2292*p1023
- p4559: 3.59936e-6; = p1798*p3481
- p3030: 5.49494e-6; = p2249*p1023
- p3362: 0.00131461; = if(p1232=0;p3244*p3356/p0818;0)
- p0507: 0; = SQRT(2)*(IF((2*p0375-1)<0;-1;IF((2*p0375-1)>0;1;0))*SQRT(SQRT((2/(pi()*0.140012289)+LN(1-(2*p0375-1)^2)/2)^2-LN(1-(2*p0375-1)^2)/0.140012289)-(2/(pi()*0.140012289)+LN(1-(2*p0375-1)^2)/2)))
- p1468: 59
- p2505: 0; = p2309*p1073
- p2965: 0; = p2379*(p1079+p1081)
- p0714: 0
- p0751: 59.867; = p0091*(1+p0619*p0223/100)
- p0197: 21.132
- p2325: 0.00101907; = p2224*p2192
- p2181: 0.0295936; = p0887+p0889+p0893+p2180
- p4719: 3.03775e-5; = p1962*p3481
- p2489: 0.00128374; = p2293*p1014
- p2895: 0; = p2309*(p1079+p1081)
- p2513: 0.000117131; = p2317*p1014
- p3477: 0; = if(p1328+p1330+p1332+p1334+p1336+p1338+p1340+p1342+p1344=0;0;p1330/(p1328+p1330+p1332+p1334+p1336+p1338+p1340+p1342+p1344))
- p1873: 0
- p1074: 0.04855; = IF(p1071=0;p0712/100;0)
- p2651: 0; = p2260*(p1078+p1080)
- p2110: 0.856281
- p2212: 2.61431e-6; = p1106/p0818
- p2487: 2.64789e-6; = p2291*p1014
- p1390: 22
- p1207: 142.091; = if(p1193>0;0;(p1194*p1050/p1057+p1195*p1051/p1058+p1196*p1052/p1059+p1197*p1053/p1060+p1198*p1054/p1061+p1199*p1055/p1062+p1200*p1056/p1063)/(p0702*1000)+(p1201*p1109/p1114+p1202*p1110/p1115)/(p0702*1000)+p1203*p1170/p0801+p1204*p1176/p0801)
- p2793: 0; = p2402*(p1019+p1021)
- p2315: 0.00567637; = p2224*p2182
- p1326: 0; = IF(((p0745*1000*p0753/100)+(p0754*1000*p0762/100))/p0801<0;0;((p0745*1000*p0753/100)+(p0754*1000*p0762/100))/p0801)
- p0743: 0.225; = p0083*(1+p0611*p0215/100)
- p3418: 0; = p3380*p1238
- p0915: 0.0177621; = p0914/p0818
- p3230: 2.17198e-7; = p1170/p0818
- p3331: 0; = if(and(p1232=0;p3255<>0);p3255*(p3268-p3326)/p3327;0)
- p3307: 0; = if(and(p1232=0;p3252<>0);p3252*(p3258-p3302)/p3305;0)
- p2663: 0; = p2272*(p1128+p1130)
- p1234: 0; = if(p1232>0;0;p0726/100)
- p1010: 0; = p0890
- p3450: 0; = p3374*p1240
- p3342: 0; = if(and(p1232=0;p3254<>0);p3254*(p3272-p3337)/p3338;0)
- p1662: 0
- p0049: 19.703
- p2402: 0; = p2234*p2191
- p2449: 2.03936e-6; = p2253*p1014
- p2210: 0.000432097; = 6*1.00794*p2208/30.973762
- p3149: 1.08557e-8; = p2368*p1023
- p1746: 0.615605
- p3084: 0; = p2303*p1082
- p2037: 1.99
- p2319: 0.000437844; = p2224*p2186
- p2493: 0; = p2297*p1073
- p2096: 0.486404
- p3061: 5.79837e-6; = p2280*p1023
- p1250: 0; = if(p1232>0;0;p1245*p0001/(p0818*p0002))
- p0533: 0; = SQRT(2)*(IF((2*p0401-1)<0;-1;IF((2*p0401-1)>0;1;0))*SQRT(SQRT((2/(pi()*0.140012289)+LN(1-(2*p0401-1)^2)/2)^2-LN(1-(2*p0401-1)^2)/0.140012289)-(2/(pi()*0.140012289)+LN(1-(2*p0401-1)^2)/2)))
- p3238: 0.854735; = IF(p3237+p3235+p3236>1;1-(p3235+p3236);p3237)

## Reference product
- durum wheat; at harvest in 2009; at farm; 88%-89% moisture: 1 kg

## Inputs from technosphere
- CUTOFF sowing; for no-till, wheat: 0.000325649 ha; = p0960
- CUTOFF phosphatic fertilizer, superphos. grades 22% and under; at point-of-sale: 2.99517e-5 kg; = p1116
- CUTOFF regional or national trucking; class 8, average fuel: 0.0163058 metric ton*km; = p2009
- CUTOFF pesticide, Fluroxypyr-meptyl; at point-of-sale; kg AI: 8.43813e-6 kg; = p1847
- CUTOFF pesticide, Pyrasulfotole; at point-of-sale; kg AI: 3.53857e-6 kg; = p1882
- CUTOFF nitrogenous fertilizer, ammonium nitrate; at point-of-sale: 0.0022021 kg; = p1066
- CUTOFF gypsum storage: 9.83764e-7 kg*a; = p1168
- CUTOFF sulfuric acid; at point-of-sale: 1.04206e-7 kg; = p1178
- CUTOFF sulfuric acid storage: 5.21029e-8 kg*a; = p1180
- CUTOFF pesticide, Thifensulfuron methyl; at point-of-sale; kg AI: 8.16593e-7 kg; = p1943
- CUTOFF wheat seeds; unspec. type; at point-of-sale: 0.0507775 kg; = p0972
- CUTOFF phosphatic fertilizer, other single phosphates; at point-of-sale: 0.00148186 kg; = p1118
- CUTOFF nitrogenous fertilizer, aqueous ammonia; at point-of-sale: 0.0012744 kg; = p1065
- CUTOFF pesticide, Clodinafop-propargyl; at point-of-sale; kg AI: 4.62736e-6 kg; = p1796
- CUTOFF apply pesticide; unspecified application methods: 9.56272e-6 ha; = p1345
- CUTOFF bulk cargo rail transport; diesel: 0.0557612 metric ton*km; = p2008
- CUTOFF N inhibitor appl svc; unspec rate & type, 2009 durum wheat: 0.000449126 ha; = p1162
- CUTOFF apply manure; unspec. method: 6.27569e-6 ha; = p1251
- CUTOFF pesticide, Clopyralid; at point-of-sale; kg AI: 5.98835e-6 kg; = p1798
- CUTOFF apply N fertilizer; no broadcast application: 0.000273831 ha; = p1030
- CUTOFF pesticide, MCPA-isooctyl; at point-of-sale; kg AI: 1.60597e-5 kg; = p1876
- CUTOFF sowing; for mulch till, wheat: 7.3335e-5 ha; = p0959
- CUTOFF sewage sludge; at point-of-sale: 2.51364e-7 kg; = p1190
- CUTOFF irrig svc; unspec wat source & rate, 2009 durum wheat: 0.000400702 ha; = p0981
- CUTOFF apply single or mixed N fertilizer; unspec. method: 1.16097e-5 ha; = p1035
- CUTOFF phosphatic fertilizer, monoammonium phosphate; at point-of-sale: 0.00930439 kg; = p1120
- CUTOFF pesticide, Propiconazole; at point-of-sale; kg AI: 5.44395e-6 kg; = p1914
- CUTOFF apply sulfur; unspecified method: 0.000400702 ha; = p1171
- CUTOFF unspecified animal manure; from unspecified storage; at point-of-sale: 0.0338059 kg; = p1316
- CUTOFF pesticide, unspecified type; at point-of-sale; kg AI: 5.05399e-5 kg; = p1962
- CUTOFF international vessel transport; average fuel: 0.27374 metric ton*km; = p2006
- CUTOFF fertilizer filler materials; at point-of-sale: 0.0159419 kg; = p1158
- CUTOFF dolomite, pulverized; at point-of-sale: 0.00106424 kg; = p1229
- CUTOFF pesticide, Bromoxynil octanoate; at point-of-sale; kg AI: 4.62736e-5 kg; = p1782
- CUTOFF nitrogenous fertilizer, anhydrous ammonia; at point-of-sale: 0.0116632 kg; = p1064
- CUTOFF fertilizer storage: 0.0505443 kg*a; = p1160
- CUTOFF sulfur storage: 1.08599e-7 kg*a; = p1174
- CUTOFF seed storage; wheat: 0.0253887 kg*a; = p0975
- CUTOFF pesticide, 2,4-D, dimethylamine salt; at point-of-sale; kg AI: 1.74207e-5 kg; = p1756
- CUTOFF apply single or mixed P fertilizer; unspec. method: 1.90724e-5 ha; = p1094
- CUTOFF nitrogenous fertilizer, urea; at point-of-sale: 0.0152188 kg; = p1070
- CUTOFF liming materials storage: 0.0096563 kg*a; = p1231
- CUTOFF prepare soil; for mulch till, wheat: 7.3335e-5 ha; = p0935
- CUTOFF potassic fertilizer, potassium chloride; at point-of-sale: 0.000713043 kg; = p1154
- CUTOFF sewage sludge storage: 1.25682e-7 kg*a; = p1192
- CUTOFF apply pesticide; as foliar or directed spray: 0.000785981 ha; = p1339
- CUTOFF limestone, high-grade, pulverized; at point-of-sale: 0.0182484 kg; = p1228
- CUTOFF pesticide storage: 0.000530808 kg*a; = p1965
- CUTOFF apply P fertilizer; no broadcast application: 0.000312068 ha; = p1089
- CUTOFF domestic barge transport; average fuel: 0.0297393 metric ton*km; = p2007
- durum wheat residue; at harvest in 2009; at farm; 83%-90% moisture: 0.548235 kg; = p0839
- CUTOFF pesticide, Fenoxaprop-ethyl; at point-of-sale; kg AI: 1.41543e-5 kg; = p1836
- CUTOFF pesticide, Dicamba-potassium; at point-of-sale; kg AI: 5.17176e-6 kg; = p1810
- CUTOFF harvest; durum wheat residue management: 0.000400702 ha; = p1975
- CUTOFF pesticide, Glyphosate potassium salt; at point-of-sale; kg AI: 1.33377e-5 kg; = p1858
- CUTOFF pesticide, Glyphosate-isopropylammonium; at point-of-sale; kg AI: 0.000203604 kg; = p1857
- CUTOFF apply liming materials; unspecified method: 0.000400702 ha; = p1227
- CUTOFF pesticide, Bromoxynil heptanoate; at point-of-sale; kg AI: 1.71485e-5 kg; = p1781
- CUTOFF apply K fertilizer; no broadcast application: 4.38218e-5 ha; = p1139
- CUTOFF zinc compounds; at point-of-sale: 4.38856e-8 kg; = p1184
- CUTOFF apply gypsum; unspecified method: 0.000400702 ha; = p1165
- CUTOFF pesticide formulation balance; at point-of-sale: 0.000301662 kg; = p1963
- CUTOFF pesticide, Flucarbazone-sodium; at point-of-sale; kg AI: 2.72198e-7 kg; = p1841
- CUTOFF apply N fertilizer; broadcast without incorporation: 3.40335e-5 ha; = p1032
- CUTOFF zinc compounds storage: 2.19428e-8 kg*a; = p1186
- CUTOFF apply P fertilizer; broadcast with incorporation: 1.68972e-5 ha; = p1090
- CUTOFF nitrogenous fertilizer, ammonium sulfate; at point-of-sale: 0.0035099 kg; = p1067
- CUTOFF nitrogenous fertilizer, sodium nitrate; at point-of-sale: 5.43871e-5 kg; = p1069
- CUTOFF nitrogenous fertilizer, nitrogen solutions; at point-of-sale: 0.0310329 kg; = p1068
- CUTOFF apply pesticide; broadcast with incorporation: 0.000512115 ha; = p1333
- CUTOFF apply mixed N fertilizer; without incorporation: 7.83916e-5 ha; = p1034
- CUTOFF gypsum; at point-of-sale: 1.96753e-6 kg; = p1166
- CUTOFF apply zinc compounds; unspecified method: 0.000400702 ha; = p1183
- CUTOFF harvest; durum: 0.000381274 ha; = p1971
- CUTOFF sulfur; at point-of-sale: 2.17198e-7 kg; = p1172
- CUTOFF apply sewage sludge; unspecified method: 0.000400702 ha; = p1189
- CUTOFF phosphatic fertilizer, superphosphate grades over 22%; at point-of-sale: 0.000326835 kg; = p1117
- CUTOFF pesticide, Fluroxypyr; at point-of-sale; kg AI: 1.63319e-6 kg; = p1846
- CUTOFF pesticide, Chlorpyrifos; at point-of-sale; kg AI: 4.89956e-6 kg; = p1793
- CUTOFF apply sulfuric acid; unspecified method: 0.000400702 ha; = p1177
- CUTOFF sowing; for unspec. till, wheat: 1.71743e-6 ha; = p0963
- CUTOFF potassic fertilizer, other single nutrients; at point-of-sale: 0.000139145 kg; = p1155
- CUTOFF local area trucking; class 6, average fuel: 0.00223045 metric ton*km; = p2010
- CUTOFF pesticide, Tribenuron-methyl; at point-of-sale; kg AI: 2.72198e-7 kg; = p1950
- CUTOFF prepare soil; for unspec. till, wheat: 1.71743e-6 ha; = p0939
- CUTOFF phosphatic fertilizer, diammonium phosphate; at point-of-sale: 0.00819578 kg; = p1119
- CUTOFF prepare soil; for no-till, wheat: 0.000325649 ha; = p0936
- CUTOFF pesticide, MCPA-2-ethylhexyl; at point-of-sale; kg AI: 3.86521e-5 kg; = p1875

## Inputs from nature
- Phosphorus: 0.0059216 kg; = p0910
- Nitrogen: 0.0357623 kg; = p0905
- Water, unspecified origin: 0.000351495 m3; = p0916*0.001+p0893*0.001
- Carbon dioxide: 3.34169 kg; = p0900*3.6666666667
- Transformation, from annual crop [natural resource, land]: 4.00702 m2; = 1.0 * (p0879+p0877+p0883)
- Dry matter except CNPK; from plant uptake: 1.19318 kg; = p0917
- Potassium; from plant uptake; biogenic: 0.0177621 kg; = p0915
- Occupation, annual crop [natural resource, land]: 1.16465 m2*year; = 1.0 * (p0855)
- Transformation, to annual crop [natural resource, land]: 4.00702 m2; = 1.0 * (p0857)

## Emissions to nature
- Nitrogen solution; unspec. appl. method in fert. at plant.; unspec. appl. method in fert. at plant.; kg N: 0.000161238 kg; = p3107
- Seeds; used in planting and sowing: 0.0507775 kg; = p2179
- Anhydrous ammonia; broadcast w/o incorp. in fert. at plant.: 0.00194768 kg; = p2901*1.2142857143
- Filler materials, applied with synthetic fertilizer: 0.0159419 kg; = p2432
- Other single phosphates; no broadcast in fert. at plant.; kg P: 0.000133372 kg; = p2544
- Glycolaldehyde; from residue burning: 1.20814e-5 kg; = p2135*2.5
- Anhydrous ammonia; broadcast w/o incorp. in fert. after plant.: 0.000140293 kg; = p2940*1.2142857143
- Nitrogen solution; broadcast w/o incorp. in fert. after plant.; broadcast w/o incorp. in fert. after plant.; kg N: 0.000112468 kg; = p2951
- Anhydrous ammonia; unspec. appl. method in fert. in spr. bef. plant.: 9.12804e-5 kg; = p3057*1.2142857143
- Ammonium sulfate; unspec. appl. method in fert. at plant.: 6.01803e-5 kg; = p3103*4.7142857143
- Superphosphate, grades>22%; broadcast w/ incorp. in fert. at plant.; kg P: 3.32403e-6 kg; = p2737
- Zinc compounds: 4.38856e-8 kg; = p3232
- Potassium chloride; no broadcast in fert. at plant.: 0.000656057 kg; = p2546*2.2166666667
- Nitrogen; in above-ground residue left on field: 0.00676378 kg; = p2168
- Thifensulfuron methyl; foliar or directed spray: 4.90821e-7 kg; = p4704
- Formaldehyde [air, non-urban air or from high stacks]: 1.2466e-5 kg; = 1.0 * (p2128*2.5)
- Sodium nitrate; broadcast w/o incorp. in fert. in fall bef. plant.: 1.4087e-6 kg; = p2837*6.0714285714
- Nitrogen; applied in sewage sludge: 1.17568e-8 kg; = p3240
- Tribenuron-methyl [soil, agricultural]: 2.72198e-7 kg; = 1.0 * (p4711+p4093+p5329)
- Aqueous ammonia; no broadcast in fert. after plant.: 1.0245e-5 kg; = p2552*1.2142857143
- Sewage sludge dry matter; applied in sewage sludge: 1.30159e-9 kg; = p3243
- Urea; no broadcast in fert. in fall bef. plant.: 0.000963992 kg; = p2451*5
- Superphosphate, grades<= 22%; no broadcast in fert. at plant.; kg P: 2.34412e-6 kg; = p2540
- Phosphorous; using unspec. method in manure in fall before planting: 0.000105537 kg; = p3459
- Sodium nitrate; no broadcast in fert. in fall bef. plant.: 3.43115e-6 kg; = p2447*6.0714285714
- Urea; no broadcast in fert. in spr. bef. plant.: 0.00275186 kg; = p2490*5
- Urea; broadcast w/o incorp. in fert. after plant.: 0.000179318 kg; = p2958*5
- Ammonium nitrate; unspec. appl. method in fert. at plant.: 6.02311e-5 kg; = p3100*4.7142857143
- trans-2-Butene: 3.41459e-7 kg; = p2148*1.1666666667
- Sulfur [soil, agricultural]: 2.17198e-7 kg; = 1.0 * (p3230)
- Formic acid [air, non-urban air or from high stacks]: 6.00865e-6 kg; = 1.0 * (p2131*3.8333333333)
- Pentane [air, non-urban air or from high stacks]: 1.26861e-7 kg; = 1.0 * (p2152*1.0166666667)
- Sulfur dioxide [air, non-urban air or from high stacks]: 2.63847e-6 kg; = 1.0 * (p2041)
- Superphosphate, grades<= 22%; unspec. appl. method in fert. at plant.; kg P: 1.43264e-7 kg; = p3125
- Monoammonium phosphate; broadcast w/ incorp. in fert. at plant.: 0.000399108 kg; = p2732*8.2142857143
- Sodium nitrate; broadcast w/o incorp. in fert. in spr. bef. plant.: 4.02135e-6 kg; = p2876*6.0714285714
- Acetone [air, non-urban air or from high stacks]: 2.67601e-6 kg; = 1.0 * (p2139*1.6111111111)
- Plant dry matter; in below-ground residue: 0.144292 kg; = p2177
- Bromoxynil heptanoate; foliar or directed spray: 1.03072e-5 kg; = p4542
- Diammonium phosphate; no broadcast in fert. at plant.: 0.0067688 kg; = p2533*4.7142857143
- Anhydrous ammonia; broadcast w/o incorp. in fert. in fall bef. plant.: 0.000309647 kg; = p2823*1.2142857143
- Glyphosate-isopropylammonium: 0.000203604 kg; = p5236+p4618+p4000
- Nitrogen solution; unspec. appl. method in fert. in spr. bef. plant.; unspec. appl. method in fert. in spr. bef. plan...: 7.31759e-5 kg; = p3068
- Furan [air, non-urban air or from high stacks]: 6.55962e-7 kg; = 1.0 * (p2138*1.4166666667)
- Sodium nitrate; unspec. appl. method in fert. in fall bef. plant.: 1.45472e-7 kg; = p3032*6.0714285714
- Anhydrous ammonia; no broadcast in fert. in fall bef. plant.: 0.0007542 kg; = p2433*1.2142857143
- Dicamba-potassium; foliar or directed spray: 3.10853e-6 kg; = p4571
- Fenoxaprop ethyl ester [soil, agricultural]: 1.41543e-5 kg; = 1.0 * (p4597+p5215+p3979)
- 2,4-D, dimethylamine salt: 1.74207e-5 kg; = p3899+p5135+p4517
- Aqueous ammonia; unspec. appl. method in fert. in fall bef. plant.: 9.58697e-7 kg; = p3020*1.2142857143
- Anhydrous ammonia; unspec. appl. method in fert. after plant.: 1.44876e-5 kg; = p3135*1.2142857143
- Bromoxynil octanoate: 4.62736e-5 kg; = p4543+p5161+p3925
- Propane [air, non-urban air or from high stacks]: 1.68886e-6 kg; = 1.0 * (p2142*1.2222222222)
- Particulates, < 2.5 um [air, non-urban air or from high stacks]: 2.4166e-5 kg; = 1.0 * (p2035+p2033)
- Glyphosate potassium salt; broadcast with incorporation: 5.22341e-6 kg; = p4001
- Particulates, < 10 um: 3.96371e-5 kg; = p2034+p2036
- Potassium; using unspec. method in manure in fall before planting; biogenic: 0.000436378 kg; = p3460
- Chlorpyrifos [soil, agricultural]: 4.89956e-6 kg; = 1.0 * (p4554+p3936+p5172)
- Clopyralid [soil, agricultural]: 5.98835e-6 kg; = 1.0 * (p3941+p4559+p5177)
- Nitrogen dioxide: 1.19374e-5 kg; = p2039*3.2857142857
- Nitrogen solution; broadcast w/o incorp. in fert. in fall bef. plant.; broadcast w/o incorp. in fert. in fall bef. pl...: 0.000248231 kg; = p2834
- Pesticide formulation balance; foliar or directed spray: 0.000181317 kg; = p4720
- Superphosphate, grades<= 22%; broadcast w/ incorp. in fert. at plant.; kg P: 1.26925e-7 kg; = p2735
- cyclopentane: 9.91856e-9 kg; = p2153*1.0166666667
- Propene [air, non-urban air or from high stacks]: 4.05381e-6 kg; = 1.0 * (p2136*1.1666666667)
- Ethene [air, non-urban air or from high stacks]: 8.72499e-6 kg; = 1.0 * (p2125*1.1666666667)
- Carbon monoxide, fossil [air, non-urban air or from high stacks]: 0.000330824 kg; = 1.0 * (p2028*2.3333333333)
- Clodinafop-propargyl [soil, agricultural]: 4.62736e-6 kg; = 1.0 * (p5175+p3939+p4557)
- MCPA-2-ethylhexyl; foliar or directed spray: 2.32322e-5 kg; = p4636
- Ammonium nitrate; no broadcast in fert. in spr. bef. plant.: 0.000644737 kg; = p2476*4.7142857143
- Anhydrous ammonia; no broadcast in fert. in spr. bef. plant.: 0.00215297 kg; = p2472*1.2142857143
- Oxygen; applied in dolomite: 0.000534189 kg; = p3228
- Aqueous ammonia; broadcast w/o incorp. in fert. in fall bef. plant.: 9.28373e-6 kg; = p2825*1.2142857143
- Ammonium sulfate; broadcast w/o incorp. in fert. at plant.: 0.000582767 kg; = p2908*4.7142857143
- Phosphorous; in below-ground residue: 0.000554914 kg; = p2175
- Sodium nitrate; no broadcast in fert. in spr. bef. plant.: 9.79472e-6 kg; = p2486*6.0714285714
- Butadiene [air, non-urban air or from high stacks]: 9.04768e-7 kg; = 1.0 * (p2143*1.125)
- Aqueous ammonia; unspec. appl. method in fert. in spr. bef. plant.: 2.73674e-6 kg; = p3059*1.2142857143
- Hydrocyanic acid: 1.71069e-6 kg; = p2154*2.25
- Ammonium sulfate; unspec. appl. method in fert. in fall bef. plant.: 9.5676e-6 kg; = p3025*4.7142857143
- Urea; unspec. appl. method in fert. in spr. bef. plant.: 0.000116671 kg; = p3075*5
- Anhydrous ammonia; broadcast w/o incorp. in fert. in spr. bef. plant.: 0.000883931 kg; = p2862*1.2142857143
- Sodium nitrate; unspec. appl. method in fert. after plant.: 6.59098e-8 kg; = p3149*6.0714285714
- Other single phosphates; unspec. appl. method in fert. at plant.; kg P: 8.1512e-6 kg; = p3129
- Fluroxypyr [soil, agricultural]: 1.63319e-6 kg; = 1.0 * (p4607+p5225+p3989)
- Anhydrous ammonia; no broadcast in fert. after plant.: 0.00034171 kg; = p2550*1.2142857143
- isopentane: 1.01489e-7 kg; = p2151*1.0166666667
- Acetic acid [air, non-urban air or from high stacks]: 3.35497e-5 kg; = 1.0 * (p2127*2.5)
- Carbon dioxide, in air: 0.00802452 kg; = p2163*3.6666666667
- Sulfuric acid [soil, agricultural]: 1.04206e-7 kg; = 1.0 * (p3231)
- Thifensulfuron methyl; broadcast with incorporation: 3.198e-7 kg; = p4086
- Nitrogen solution; unspec. appl. method in fert. after plant.; unspec. appl. method in fert. after plant.; kg N: 1.16141e-5 kg; = p3146
- Ammonium nitrate; no broadcast in fert. at plant.: 0.00142063 kg; = p2515*4.7142857143
- Ammonium nitrate; broadcast w/o incorp. in fert. at plant.: 0.000583259 kg; = p2905*4.7142857143
- Anhydrous ammonia; unspec. appl. method in fert. at plant.: 0.00020113 kg; = p3096*1.2142857143
- Ammonium nitrate; no broadcast in fert. after plant.: 0.00010233 kg; = p2554*4.7142857143
- Anhydrous ammonia; no broadcast in fert. at plant.: 0.00474392 kg; = p2511*1.2142857143
- Sodium nitrate; no broadcast in fert. after plant.: 1.55457e-6 kg; = p2564*6.0714285714
- Urea; unspec. appl. method in fert. at plant.: 0.000257077 kg; = p3114*5
- Dioxins and furans (PCDD/F); from residue burning: 1.79896e-13 kg TEQ; = p2047
- Ammonium nitrate; no broadcast in fert. in fall bef. plant.: 0.000225855 kg; = p2437*4.7142857143
- Pyrasulfotole; broadcast with incorporation: 1.3858e-6 kg; = p4025
- Calcium [soil, agricultural]: 0.00710744 kg; = 1.0 * (p3226+p3218)
- Acetaldehyde [air, non-urban air or from high stacks]: 7.45813e-6 kg; = 1.0 * (p2130*1.8333333333)
- Methyl vinyl ether; from residue burning: 4.54816e-7 kg; = p2137*1.6111111111
- Nitrogen solution; unspec. appl. method in fert. in fall bef. plant.; unspec. appl. method in fert. in fall bef. plan...: 2.5634e-5 kg; = p3029
- Aqueous ammonia; broadcast w/o incorp. in fert. in spr. bef. plant.: 2.65017e-5 kg; = p2864*1.2142857143
- Superphosphate, grades>22%; unspec. appl. method in fert. at plant.; kg P: 3.75194e-6 kg; = p3127
- Monoammonium phosphate; no broadcast in fert. at plant.: 0.00737096 kg; = p2537*8.2142857143
- Other single K nutrients; no broadcast in fert. at plant.; kg K: 5.08249e-5 kg; = p2548
- Ammonium sulfate; broadcast w/o incorp. in fert. in fall bef. plant.: 9.26496e-5 kg; = p2830*4.7142857143
- Urea; no broadcast in fert. after plant.: 0.000436762 kg; = p2568*5
- Nitrogen solution; broadcast w/o incorp. in fert. in spr. bef. plant.; broadcast w/o incorp. in fert. in spr. bef. pl...: 0.000708612 kg; = p2873
- Bromoxynil heptanoate; unspec. appl. method: 1.25404e-7 kg; = p5160
- Carbon [soil, agricultural]: 0.371922 kg; = 1.0 * (p3242+p2167+p3457+p3217+p2173+p3225)
- Flucarbazone sodium salt [soil, agricultural]: 2.72198e-7 kg; = 1.0 * (p4602+p5220+p3984)
- Potassium; in above-ground residue left on field; biogenic: 0.00629345 kg; = p2170
- Propanenitrile: 3.84239e-7 kg; = p2157*1.5277777778
- Nitrogen solution; no broadcast in fert. in fall bef. plant.; no broadcast in fert. in fall bef. plant.; kg N: 0.000604612 kg; = p2444
- Monoammonium phosphate; unspec. appl. method in fert. at plant.: 0.000450487 kg; = p3122*8.2142857143
- Toluene [air, non-urban air or from high stacks]: 1.14217e-6 kg; = 1.0 * (p2141*1.0952380952)
- Pyrasulfotole; unspec. appl. method: 2.58771e-8 kg; = p5261
- Sodium nitrate; unspec. appl. method in fert. at plant.: 9.15019e-7 kg; = p3110*6.0714285714
- Ash: 0.00118611 kg; = p2022+p2021
- Pesticides, unspecified [soil, agricultural]: 5.05399e-5 kg; = 1.0 * (p4719+p4101+p5337)
- isobutene: 7.00889e-7 kg; = p2150*1.1666666667
- Aqueous ammonia; unspec. appl. method in fert. after plant.: 4.34363e-7 kg; = p3137*1.2142857143
- Diammonium phosphate; broadcast w/ incorp. in fert. at plant.: 0.000366503 kg; = p2728*4.7142857143
- cis-2-Butene: 2.57592e-7 kg; = p2149*1.1666666667
- MCPA-isooctyl; broadcast with incorporation: 6.28941e-6 kg; = p4019
- Bromoxynil heptanoate; broadcast with incorporation: 6.71581e-6 kg; = p3924
- Dicamba-potassium; broadcast with incorporation: 2.0254e-6 kg; = p3953
- Pesticide formulation balance; broadcast with incorporation: 0.000118139 kg; = p4102
- Plant dry matter; in aboveground residue left on field: 0.268873 kg; = p2172
- Ammonium sulfate; broadcast w/o incorp. in fert. in spr. bef. plant.: 0.000264482 kg; = p2869*4.7142857143
- Nitrogen; in below-ground residue: 0.00362983 kg; = p2174
- Ethyne [air, non-urban air or from high stacks]: 1.63229e-6 kg; = 1.0 * (p2132*1.0833333333)
- Plant dry matter; from residue burning: 0.00215468 kg; = p2164
- Urea; broadcast w/o incorp. in fert. in spr. bef. plant.: 0.00112981 kg; = p2880*5
- Urea; unspec. appl. method in fert. after plant.: 1.85176e-5 kg; = p3153*5
- Dinitrogen monoxide [air, non-urban air or from high stacks]: 4.19836e-7 kg; = 1.0 * (p2044*1.5714285714)
- Propiconazole [soil, agricultural]: 5.44395e-6 kg; = 1.0 * (p4057+p5293+p4675)
- Ammonia [air, non-urban air or from high stacks]: 1.3013e-5 kg; = 1.0 * (p2159*1.2142857143)
- Potassium; in below-ground residue; biogenic: 0.00337742 kg; = p2176
- Starane [soil, agricultural]: 8.43813e-6 kg; = 1.0 * (p5226+p4608+p3990)
- Sodium nitrate; broadcast w/o incorp. in fert. at plant.: 8.86076e-6 kg; = p2915*6.0714285714
- Aqueous ammonia; unspec. appl. method in fert. at plant.: 6.03022e-6 kg; = p3098*1.2142857143
- Superphosphate, grades>22%; no broadcast in fert. at plant.; kg P: 6.13901e-5 kg; = p2542
- Ammonium sulfate; no broadcast in fert. in spr. bef. plant.: 0.000644193 kg; = p2479*4.7142857143
- Sodium nitrate; unspec. appl. method in fert. in spr. bef. plant.: 4.1527e-7 kg; = p3071*6.0714285714
- Ammonium nitrate; unspec. appl. method in fert. in fall bef. plant.: 9.57568e-6 kg; = p3022*4.7142857143
- Urea; broadcast w/o incorp. in fert. in fall bef. plant.: 0.00039578 kg; = p2841*5
- Ammonium nitrate; broadcast w/o incorp. in fert. in spr. bef. plant.: 0.000264705 kg; = p2866*4.7142857143
- MCPA-2-ethylhexyl; unspec. appl. method: 2.82657e-7 kg; = p5254
- Ammonium nitrate; unspec. appl. method in fert. after plant.: 4.33851e-6 kg; = p3139*4.7142857143
- Urea; unspec. appl. method in fert. in fall bef. plant.: 4.08708e-5 kg; = p3036*5
- Benzene [air, non-urban air or from high stacks]: 9.20145e-7 kg; = 1.0 * (p2140*1.0833333333)
- Phosphorous; applied in sewage sludge: 1.40348e-9 kg; = p3241
- Glyphosate potassium salt; unspec. appl. method: 9.75367e-8 kg; = p5237
- Oxygen; applied in limestone: 0.0082262 kg; = p3219
- Nitrogen solution; no broadcast in fert. at plant.; no broadcast in fert. at plant.; kg N: 0.00380302 kg; = p2522
- Ammonium sulfate; no broadcast in fert. in fall bef. plant.: 0.000225665 kg; = p2440*4.7142857143
- Phosphorous; in above-ground residue left on field: 0.00103402 kg; = p2169
- Acrylonitrile: 2.01002e-7 kg; = p2156*1.4722222222
- Nitrogen solution; broadcast w/o incorp. in fert. at plant.; broadcast w/o incorp. in fert. at plant.; kg N: 0.00156138 kg; = p2912
- Phenol [air, non-urban air or from high stacks]: 3.11023e-6 kg; = 1.0 * (p2133*1.3055555556)
- Ammonium sulfate; no broadcast in fert. at plant.: 0.00141943 kg; = p2518*4.7142857143
- Butane [air, non-urban air or from high stacks]: 3.64312e-7 kg; = 1.0 * (p2147*1.0208333333)
- Nitrogen solution; no broadcast in fert. in spr. bef. plant.; no broadcast in fert. in spr. bef. plant.; kg N: 0.00172595 kg; = p2483
- 1-Butene: 8.02727e-7 kg; = p2144*1.1666666667
- Ammonium nitrate; unspec. appl. method in fert. in spr. bef. plant.: 2.73352e-5 kg; = p3061*4.7142857143
- Ammonium nitrate; broadcast w/o incorp. in fert. in fall bef. plant.: 9.27279e-5 kg; = p2827*4.7142857143
- Ammonium nitrate; broadcast w/o incorp. in fert. after plant.: 4.20128e-5 kg; = p2944*4.7142857143
- Urea; broadcast w/o incorp. in fert. at plant.: 0.00248946 kg; = p2919*5
- Glyphosate potassium salt; foliar or directed spray: 8.01675e-6 kg; = p4619
- Thifensulfuron methyl; unspec. appl. method: 5.97163e-9 kg; = p5322
- Aqueous ammonia; no broadcast in fert. in fall bef. plant.: 2.26122e-5 kg; = p2435*1.2142857143
- Ammonium sulfate; unspec. appl. method in fert. after plant.: 4.33485e-6 kg; = p3142*4.7142857143
- Pesticide formulation balance; unspec. appl. method: 2.20601e-6 kg; = p5338
- Diammonium phosphate; unspec. appl. method in fert. at plant.: 0.000413685 kg; = p3118*4.7142857143
- Acetonitrile [air, non-urban air or from high stacks]: 1.2588e-6 kg; = 1.0 * (p2155*1.7083333333)
- Gypsum: 1.96753e-6 kg; = p3229
- Sodium nitrate; broadcast w/o incorp. in fert. after plant.: 6.3825e-7 kg; = p2954*6.0714285714
- I butane; from residue burning: 1.26497e-7 kg; = p2146*1.0208333333
- Other single phosphates; broadcast w/ incorp. in fert. at plant.; kg P: 7.22155e-6 kg; = p2739
- Acetol; from residue burning: 2.25784e-5 kg; = p2134*2.0555555556
- Ammonium sulfate; broadcast w/o incorp. in fert. after plant.: 4.19773e-5 kg; = p2947*4.7142857143
- NMVOC, non-methane volatile organic compounds, unspecified origin [air, non-urban air or from high stacks]: 0.000154076 kg; = 1.0 * (p2052+p2051)
- Aqueous ammonia; broadcast w/o incorp. in fert. after plant.: 4.20623e-6 kg; = p2942*1.2142857143
- Aqueous ammonia; no broadcast in fert. at plant.: 0.000142231 kg; = p2513*1.2142857143
- Magnesium [soil, agricultural]: 0.000134986 kg; = 1.0 * (p3227)
- Methane: 1.26903e-5 kg; = p2025*1.3333333333
- Other limestone constituents; applied in limestone: 0.0010949 kg; = p3220
- Water [air, non-urban air or from high stacks]: 9.5194e-7 m3; = 0.001 * (p2016)
- Isoprene [air, non-urban air or from high stacks]: 2.2627e-6 kg; = 1.0 * (p2145*1.1333333333)
- Nitrogen solution; no broadcast in fert. after plant.; no broadcast in fert. after plant.; kg N: 0.000273935 kg; = p2561
- Ammonium sulfate; unspec. appl. method in fert. in spr. bef. plant.: 2.73121e-5 kg; = p3064*4.7142857143
- MCPA-isooctyl; unspec. appl. method: 1.17442e-7 kg; = p5255
- Pyrasulfotole; foliar or directed spray: 2.12689e-6 kg; = p4643
- Dicamba-potassium; unspec. appl. method: 3.78203e-8 kg; = p5189
- Aqueous ammonia; no broadcast in fert. in spr. bef. plant.: 6.45497e-5 kg; = p2474*1.2142857143
- Water: 0.186682 kg; = p2178+p3475+p2181+p2171
- Nitrogen; using unspec. method in manure in fall before planting: 0.000305691 kg; = p3458
- Ethane [air, non-urban air or from high stacks]: 5.44917e-6 kg; = 1.0 * (p2126*1.25)
- Ammonium sulfate; no broadcast in fert. after plant.: 0.000102243 kg; = p2557*4.7142857143
- MCPA-isooctyl; foliar or directed spray: 9.65282e-6 kg; = p4637
- Anhydrous ammonia; unspec. appl. method in fert. in fall bef. plant.: 3.19761e-5 kg; = p3018*1.2142857143
- Sodium nitrate; no broadcast in fert. at plant.: 2.1582e-5 kg; = p2525*6.0714285714
- MCPA-2-ethylhexyl; broadcast with incorporation: 1.51372e-5 kg; = p4018
- Urea; no broadcast in fert. at plant.: 0.00606352 kg; = p2529*5
- Volatile constituents; using unspec. method in man. in fal.bef.plant: 0.00175606 kg; = p3461
- Aqueous ammonia; broadcast w/o incorp. in fert. at plant.: 5.83947e-5 kg; = p2903*1.2142857143
- Methanol [air, non-urban air or from high stacks]: 1.9708e-5 kg; = 1.0 * (p2129*2.6666666667)

## Sampling procedure
A delete-a-group jackknife is used by the USDA to estimate the ARMS sample means and RSEs, based on a 30 sample delete-a-group jackknife. Because of this relatively small sample size, a Students t distribution is used to represent ARMS data probability density functions. Other representations of uncertainty are described in Cooper, J.S., Kahn, E., Noon, M. (2012). LCA Digital Commons Unit Process Data: field crop production Version 1. Prepared for the US Department of Agriculture National Agricultural Library. Retrieved from https://www.lcacommons.gov/discovery/docs/LCA%20Digital%20Commons%20Unit%20Process%20Data%20final%20updated.pdf

## Extrapolations
Data represent an aggregation of processes applied in North Dakota in 2009. Data development is demonstrated by parameterization (exlicitly presents all raw and uncertainty data and all calculations). Flow data quality according to the LCADC convention is provided for all flows.
