# winter wheat; at harvest in 2004; at farm; 86%-90% moisture

Dataset: EcoSpold 2, unit process
Geography: GLO
Time period: 2004-01-02 to 2005-01-01
Scenario: Business-as-Usual
System model: Allocation, ecoinvent default
Generated by: cooperjs@u.washington.edu
isCopyrightProtected: false

## General comment
This unit process/ gate-to-gate dataset represents the production of 1 kg winter wheat coproduced with residue. The process technologies are an aggregation of those applied in Oregon in 2004. Applicable classifications include ISIC 0111, NAIC 111140, UNSPSC 50221101; this dataset was prepared in ILCD format using the UWDFE Lab Excel to ILCD File Generator (beta version, August 2013)

Exchange "2,4-D-butyl-soil agricultural" is the result of combining the following original LCA Commons flows: "2,4-D-butyl; unspec. appl. method; kg AI", "2,4-D-butyl; broadcast with incorporation; kg AI", "2,4-D-butyl; broadcast without incorporation; kg AI", "2,4-D-butyl; foliar or directed spray; kg AI".
Exchange "Diclofop-methyl-soil agricultural" is the result of combining the following original LCA Commons flows: "Diclofop-methyl; foliar or directed spray; kg AI", "Diclofop-methyl; unspec. appl. method; kg AI", "Diclofop-methyl; broadcast without incorporation; kg AI", "Diclofop-methyl; broadcast with incorporation; kg AI".
Exchange "Metribuzin-soil agricultural" is the result of combining the following original LCA Commons flows: "Metribuzin; unspec. appl. method; kg AI", "Metribuzin; foliar or directed spray; kg AI", "Metribuzin; broadcast with incorporation; kg AI", "Metribuzin; broadcast without incorporation; kg AI".
Exchange "NMVOC, non-methane volatile organic compounds, unspecified origin-air low population density" is the result of combining the following original LCA Commons flows: "NMVOCs; from residue burning; kg except C, biogenic", "NMVOCs; from residue burning; kg C, biogenic".
Exchange "Glyphosate-soil agricultural" is the result of combining the following original LCA Commons flows: "Glyphosate; broadcast with incorporation; kg AI", "Glyphosate; unspec. appl. method; kg AI", "Glyphosate; foliar or directed spray; kg AI", "Glyphosate; broadcast without incorporation; kg AI".
Exchange "1-Naphthaleneacetamide-soil agricultural" is the result of combining the following original LCA Commons flows: "1-Naphthaleneacetamide; broadcast without incorporation; kg AI", "1-Naphthaleneacetamide; unspec. appl. method; kg AI", "1-Naphthaleneacetamide; broadcast with incorporation; kg AI", "1-Naphthaleneacetamide; foliar or directed spray; kg AI".
Exchange "Dicamba-soil agricultural" is the result of combining the following original LCA Commons flows: "Dicamba; broadcast without incorporation; kg AI", "Dicamba; unspec. appl. method; kg AI", "Dicamba; broadcast with incorporation; kg AI", "Dicamba; foliar or directed spray; kg AI".
Exchange "Carbon-soil agricultural" is the result of combining the following original LCA Commons flows: "Carbon; in below-ground residue; biogenic", "Carbon; applied in dolomite", "Carbon; applied in sewage sludge", "Carbon; in above-ground residue left on field; biogenic", "Carbon; applied in limestone".
Exchange "Particulates, < 2.5 um-air low population density" is the result of combining the following original LCA Commons flows: "PM2.5; from residue burning; kg except C, biogenic", "PM2.5; from residue burning; kg C, biogenic".
Exchange "Sulfosulfuron-soil agricultural" is the result of combining the following original LCA Commons flows: "Sulfosulfuron; broadcast without incorporation; kg AI", "Sulfosulfuron; unspec. appl. method; kg AI", "Sulfosulfuron; broadcast with incorporation; kg AI", "Sulfosulfuron; foliar or directed spray; kg AI".
Exchange "Pesticides, unspecified-soil agricultural" is the result of combining the following original LCA Commons flows: "Unspecified pesticide; foliar or directed spray; kg AI", "Unspecified pesticide; broadcast with incorporation; kg AI", "Unspecified pesticide; broadcast without incorporation; kg AI", "Unspecified pesticide; unspec. appl. method; kg AI".
Exchange "Ash-soil agricultural" is the result of combining the following original LCA Commons flows: "Ash; from residue burning; kg C, biogenic", "Ash; from residue burning; kg except C, biogenic".
Exchange "Water-soil agricultural" is the result of combining the following original LCA Commons flows: "Water; in below-ground residue; biogenic", "Water; from irrigation and applied with manure and sewage sludge", "Water; in above-ground residue left on field; biogenic".
Exchange "Water, unspecified origin-resource in water" is the result of combining the following original LCA Commons flows: "Water; from plant uptake; biogenic", "Water; withdrawal from unspec. source, for winter wheat, in 2004".
Exchange "Metsulfuron-methyl-soil agricultural" is the result of combining the following original LCA Commons flows: "Metsulfuron-methyl; unspec. appl. method; kg AI", "Metsulfuron-methyl; broadcast without incorporation; kg AI", "Metsulfuron-methyl; foliar or directed spray; kg AI", "Metsulfuron-methyl; broadcast with incorporation; kg AI".
Exchange "Particulates, < 10 um-air low population density" is the result of combining the following original LCA Commons flows: "PM10; from residue burning; kg except C, biogenic", "PM10; from residue burning; kg C, biogenic".
Exchange "Bromoxynil-soil agricultural" is the result of combining the following original LCA Commons flows: "Bromoxynil; broadcast with incorporation; kg AI", "Bromoxynil; broadcast without incorporation; kg AI", "Bromoxynil; foliar or directed spray; kg AI", "Bromoxynil; unspec. appl. method; kg AI".
Exchange "MCPA-soil agricultural" is the result of combining the following original LCA Commons flows: "MCPA; foliar or directed spray; kg AI", "MCPA; broadcast with incorporation; kg AI", "MCPA; broadcast without incorporation; kg AI", "MCPA; unspec. appl. method; kg AI".
Exchange "Triasulfuron-soil agricultural" is the result of combining the following original LCA Commons flows: "Triasulfuron; foliar or directed spray; kg AI", "Triasulfuron; unspec. appl. method; kg AI", "Triasulfuron; broadcast with incorporation; kg AI", "Triasulfuron; broadcast without incorporation; kg AI".
Exchange "Tribenuron-methyl-soil agricultural" is the result of combining the following original LCA Commons flows: "Tribenuron-methyl; broadcast with incorporation; kg AI", "Tribenuron-methyl; broadcast without incorporation; kg AI", "Tribenuron-methyl; foliar or directed spray; kg AI", "Tribenuron-methyl; unspec. appl. method; kg AI".
Exchange "Calcium-soil agricultural" is the result of combining the following original LCA Commons flows: "Calcium; applied in limestone", "Calcium; applied in dolomite".
Exchange "2,4-D-soil agricultural" is the result of combining the following original LCA Commons flows: "2,4-D; foliar or directed spray; kg AI", "2,4-D; broadcast with incorporation; kg AI", "2,4-D; broadcast without incorporation; kg AI", "2,4-D; unspec. appl. method; kg AI".
Exchange "Propiconazole-soil agricultural" is the result of combining the following original LCA Commons flows: "Propiconazole; unspec. appl. method; kg AI", "Propiconazole; broadcast with incorporation; kg AI", "Propiconazole; foliar or directed spray; kg AI", "Propiconazole; broadcast without incorporation; kg AI".
Exchange "Trifloxystrobin-soil agricultural" is the result of combining the following original LCA Commons flows: "Trifloxystrobin; foliar or directed spray; kg AI", "Trifloxystrobin; unspec. appl. method; kg AI", "Trifloxystrobin; broadcast without incorporation; kg AI", "Trifloxystrobin; broadcast with incorporation; kg AI".
Exchange "Ethane-2bdf9967-6dae-4183-88d1-8f612548c51e low population density" was originally named: "Ethane; from residue burning; kg C, biogenic" in this dataset.
Exchange "1-Butene-2bdf9967-6dae-4183-88d1-8f612548c51e low population density" was originally named: "1 butene; from residue burning; kg C, biogenic" in this dataset.
Exchange "Acetic acid-2bdf9967-6dae-4183-88d1-8f612548c51e low population density" was originally named: "Acetic acid; from residue burning; kg C, biogenic" in this dataset.
Exchange "Glyphosate-2bdf9967-6dae-4183-88d1-8f612548c51e low population density" was originally named: "Glyphosate; broadcast by air; kg AI" in this dataset.
Exchange "Carbon monoxide, fossil-2bdf9967-6dae-4183-88d1-8f612548c51e low population density" was originally named: "Carbon monoxide; from residue burning; kg C, biogenic" in this dataset.
Exchange "Furan-2bdf9967-6dae-4183-88d1-8f612548c51e low population density" was originally named: "Furan; from residue burning; kg C, biogenic" in this dataset.
Exchange "Butane-2bdf9967-6dae-4183-88d1-8f612548c51e low population density" was originally named: "N butane; from residue burning; kg C, biogenic" in this dataset.
Exchange "Acrylonitrile-2bdf9967-6dae-4183-88d1-8f612548c51e low population density" was originally named: "Propenenitrile; from residue burning; kg C, biogenic" in this dataset.
Exchange "cis-2-Butene-2bdf9967-6dae-4183-88d1-8f612548c51e low population density" was originally named: "Cis 2 butene; from residue burning; kg C, biogenic" in this dataset.
Exchange "Propiconazole-2bdf9967-6dae-4183-88d1-8f612548c51e low population density" was originally named: "Propiconazole; broadcast by air; kg AI" in this dataset.
Exchange "trans-2-Butene-2bdf9967-6dae-4183-88d1-8f612548c51e low population density" was originally named: "Trans 2 butene; from residue burning; kg C, biogenic" in this dataset.
Exchange "Zinc compounds-be1c0329-f1a8-4524-8420-a86d2a8dd358 agricultural" was originally named: "Zinc compounds; as secondary application" in this dataset.
Exchange "Acetaldehyde-2bdf9967-6dae-4183-88d1-8f612548c51e low population density" was originally named: "Acetaldehyde; from residue burning; kg C, biogenic" in this dataset.
Exchange "Transformation, from arable-c19fb2d9-98eb-4cd3-8761-81b71d8a9a1b land" was originally named: "Transformation; from arable, from unspec. use to wheat" in this dataset.
Exchange "Carbon dioxide-c19fb2d9-98eb-4cd3-8761-81b71d8a9a1b unspecified" was originally named: "Carbon dioxide; from plant uptake; kg C, biogenic" in this dataset.
Exchange "Triasulfuron-2bdf9967-6dae-4183-88d1-8f612548c51e low population density" was originally named: "Triasulfuron; broadcast by air; kg AI" in this dataset.
Exchange "Sulfuric acid-be1c0329-f1a8-4524-8420-a86d2a8dd358 agricultural" was originally named: "Sulfuric acid; as secondary application" in this dataset.
Exchange "Trifloxystrobin-2bdf9967-6dae-4183-88d1-8f612548c51e low population density" was originally named: "Trifloxystrobin; broadcast by air; kg AI" in this dataset.
Exchange "Benzene-2bdf9967-6dae-4183-88d1-8f612548c51e low population density" was originally named: "Benzene; from residue burning; kg C, biogenic" in this dataset.
Exchange "Isoprene-2bdf9967-6dae-4183-88d1-8f612548c51e low population density" was originally named: "Isoprene; from residue burning; kg C, biogenic" in this dataset.
Exchange "Tribenuron-methyl-2bdf9967-6dae-4183-88d1-8f612548c51e low population density" was originally named: "Tribenuron-methyl; broadcast by air; kg AI" in this dataset.
Exchange "MCPA-2bdf9967-6dae-4183-88d1-8f612548c51e low population density" was originally named: "MCPA; broadcast by air; kg AI" in this dataset.
Exchange "Pentane-2bdf9967-6dae-4183-88d1-8f612548c51e low population density" was originally named: "N pentane; from residue burning; kg C, biogenic" in this dataset.
Exchange "Hydrocyanic acid-2bdf9967-6dae-4183-88d1-8f612548c51e low population density" was originally named: "Hydrogen cyanide; from residue burning; kg C, biogenic" in this dataset.
Exchange "Propane-2bdf9967-6dae-4183-88d1-8f612548c51e low population density" was originally named: "Propane; from residue burning; kg C, biogenic" in this dataset.
Exchange "Diclofop-methyl-2bdf9967-6dae-4183-88d1-8f612548c51e low population density" was originally named: "Diclofop-methyl; broadcast by air; kg AI" in this dataset.
Exchange "2,4-D-2bdf9967-6dae-4183-88d1-8f612548c51e low population density" was originally named: "2,4-D; broadcast by air; kg AI" in this dataset.
Exchange "isobutene-2bdf9967-6dae-4183-88d1-8f612548c51e low population density" was originally named: "I butene; from residue burning; kg C, biogenic" in this dataset.
Exchange "Magnesium-be1c0329-f1a8-4524-8420-a86d2a8dd358 agricultural" was originally named: "Magnesium; applied in dolomite" in this dataset.
Exchange "Butadiene-2bdf9967-6dae-4183-88d1-8f612548c51e low population density" was originally named: "1,3 butadiene; from residue burning; kg C, biogenic" in this dataset.
Exchange "isopentane-2bdf9967-6dae-4183-88d1-8f612548c51e low population density" was originally named: "I pentane; from residue burning; kg C, biogenic" in this dataset.
Exchange "Ethyne-2bdf9967-6dae-4183-88d1-8f612548c51e low population density" was originally named: "Acetylene; from residue burning; kg C, biogenic" in this dataset.
Exchange "Metsulfuron-methyl-2bdf9967-6dae-4183-88d1-8f612548c51e low population density" was originally named: "Metsulfuron-methyl; broadcast by air; kg AI" in this dataset.
Exchange "Formaldehyde-2bdf9967-6dae-4183-88d1-8f612548c51e low population density" was originally named: "Formaldehyde; from residue burning; kg C, biogenic" in this dataset.
Exchange "Sulfur dioxide-2bdf9967-6dae-4183-88d1-8f612548c51e low population density" was originally named: "Sulfur dioxide; from residue burning; biogenic" in this dataset.
Exchange "Toluene-2bdf9967-6dae-4183-88d1-8f612548c51e low population density" was originally named: "Toluene; from residue burning; kg C, biogenic" in this dataset.
Exchange "Sulfur-be1c0329-f1a8-4524-8420-a86d2a8dd358 agricultural" was originally named: "Sulfur; as secondary application" in this dataset.
Exchange "Propene-2bdf9967-6dae-4183-88d1-8f612548c51e low population density" was originally named: "Propylene; from residue burning; kg C, biogenic" in this dataset.
Exchange "Ethene-2bdf9967-6dae-4183-88d1-8f612548c51e low population density" was originally named: "Ethylene; from residue burning; kg C, biogenic" in this dataset.
Exchange "Transformation, to arable-c19fb2d9-98eb-4cd3-8761-81b71d8a9a1b land" was originally named: "Transformation; to arable, to wheat" in this dataset.
Exchange "Bromoxynil-2bdf9967-6dae-4183-88d1-8f612548c51e low population density" was originally named: "Bromoxynil; broadcast by air; kg AI" in this dataset.
Exchange "Carbon dioxide, in air-2bdf9967-6dae-4183-88d1-8f612548c51e low population density" was originally named: "Carbon dioxide; from residue burning; kg C, biogenic" in this dataset.
Exchange "Nitrogen dioxide-2bdf9967-6dae-4183-88d1-8f612548c51e low population density" was originally named: "Nitrogen dioxide; from residue burning; kg N, biogenic" in this dataset.
Exchange "Phenol-2bdf9967-6dae-4183-88d1-8f612548c51e low population density" was originally named: "Phenol; from residue burning; kg C, biogenic" in this dataset.
Exchange "Formic acid-2bdf9967-6dae-4183-88d1-8f612548c51e low population density" was originally named: "Formic acid; from residue burning; kg C, biogenic" in this dataset.
Exchange "Acetone-2bdf9967-6dae-4183-88d1-8f612548c51e low population density" was originally named: "Acetone; from residue burning; kg C, biogenic" in this dataset.
Exchange "Occupation, arable-c19fb2d9-98eb-4cd3-8761-81b71d8a9a1b land" was originally named: "Occupation; arable, as wheat" in this dataset.
Exchange "Sulfosulfuron-2bdf9967-6dae-4183-88d1-8f612548c51e low population density" was originally named: "Sulfosulfuron; broadcast by air; kg AI" in this dataset.
Exchange "Water, surface-c19fb2d9-98eb-4cd3-8761-81b71d8a9a1b in water" was originally named: "Water; withdrawal from surface water, for winter wheat, in 2004" in this dataset.
Exchange "Dicamba-2bdf9967-6dae-4183-88d1-8f612548c51e low population density" was originally named: "Dicamba; broadcast by air; kg AI" in this dataset.
Exchange "Acetonitrile-2bdf9967-6dae-4183-88d1-8f612548c51e low population density" was originally named: "Acetonitrile; from residue burning; kg C, biogenic" in this dataset.
Exchange "Water-2bdf9967-6dae-4183-88d1-8f612548c51e low population density" was originally named: "Water; from residue burning; biogenic" in this dataset.
Exchange "Metribuzin-2bdf9967-6dae-4183-88d1-8f612548c51e low population density" was originally named: "Metribuzin; broadcast by air; kg AI" in this dataset.
Exchange "Dinitrogen monoxide-2bdf9967-6dae-4183-88d1-8f612548c51e low population density" was originally named: "Dinitrogen monoxide; from residue burning; kg N, biogenic" in this dataset.
Exchange "Phosphorus-c19fb2d9-98eb-4cd3-8761-81b71d8a9a1b unspecified" was originally named: "Phosphorous; from plant uptake; biogenic" in this dataset.
Exchange "Ammonia-2bdf9967-6dae-4183-88d1-8f612548c51e low population density" was originally named: "Ammonia; from residue burning; kg N, biogenic" in this dataset.
Exchange "Methane-2bdf9967-6dae-4183-88d1-8f612548c51e low population density" was originally named: "Methane; from residue burning; kg C, biogenic" in this dataset.
Exchange "Methanol-2bdf9967-6dae-4183-88d1-8f612548c51e low population density" was originally named: "Methanol; from residue burning; kg C, biogenic" in this dataset.

## Geography
The unit process is assumed to represent production in Oregon (US State).

## Technology
This process produces winter wheat; at harvest in 2004; at farm; 86%-90% moisture. The process is assumed to represent production in Oregon (US State). Yields and related inputs and outputs represent a single year of operation, in 2004. This dataset includes consideration of residue burning; soil preparation; planting or sowing; irrigation; application, storage, and transport of fertilizers, manures, liming materials, secondary materials, and pesticides; and harvest. Fate and transport of applications are not included as described in Cooper, J.S., Kahn, E., Noon, M. (2012) LCA Digital Commons Unit Process Data: field crop production Version 1 which is available at https://www.lcacommons.gov/discovery/docs/LCA%20Digital%20Commons%20Unit%20Process%20Data%20final%20updated.pdf

## Time period
Start and end dates match the underlying data obtained from the USDA Agricultural Resource Management Survey (ARMS).
## Parameters
- p2369: 2.19351e-6; = p2225*p2198
- p1292: 0; = IF(p1287+p1290+p1291=p1261;0;p1261-(p1287+p1290+p1291))
- p1894: 0
- p0080: 96.99
- p1208: 0; = p1205*p0818*p0822/p0801
- p1201: 0.65
- p2484: 0.000473075; = p2288*p1014
- p0027: 32.151
- p0638: 0; = IF(p0374<0.5;-SQRT(p0007*EXP(p0506^2*p0008)-p0007);SQRT(p0007*EXP(p0506^2*p0008)-p0007))
- p2966: 1.59974e-5; = p2380*(p1079+p1081)
- p1290: 0; = IF(p1287=p1264;0;IF(p1287+p1288>p1264;p1264-p1287;p1288))
- p1754: 4.2623e-5; = p1346*1000/p0818
- p3340: 0; = if(and(p1232=0;p3254<>0);p3254*(p3270-p3335)/p3338;0)
- p2165: 0.623791; = (p0833-p2014)/p0818-p0839
- p0739: 0.834; = p0079*(1+p0607*p0211/100)
- p1559: 0.792595
- p1874: 5.46448e-6; = p1466*1000/p0818
- p1229: 0.000359128; = IF(p1221=0;0;p1228*p1221)
- p1793: 0
- p0702: 820; = p0042*(1+p0570*p0174/100)
- p0510: 0; = SQRT(2)*(IF((2*p0378-1)<0;-1;IF((2*p0378-1)>0;1;0))*SQRT(SQRT((2/(pi()*0.140012289)+LN(1-(2*p0378-1)^2)/2)^2-LN(1-(2*p0378-1)^2)/0.140012289)-(2/(pi()*0.140012289)+LN(1-(2*p0378-1)^2)/2)))
- p2579: 1.41946e-7; = p2383*p1073
- p1184: 4.11036e-8; = p1182/p0818
- p5270: 3.07236e-9; = p1891*p3484
- p1587: 0
- p2227: 0; = if(p0774*p0778+p0775*p0779+p0776*p0780+p0777*p0781=0;0;p0779*p0775/(p0774*p0778+p0775*p0779+p0776*p0780+p0777*p0781))
- p1761: 0
- p4309: 0; = p1754*p3480
- p1279: 0
- p0106: 66.24
- p0367: 0.5
- p0051: 35.253
- p0730: 0
- p0725: 0
- p0506: 0; = SQRT(2)*(IF((2*p0374-1)<0;-1;IF((2*p0374-1)>0;1;0))*SQRT(SQRT((2/(pi()*0.140012289)+LN(1-(2*p0374-1)^2)/2)^2-LN(1-(2*p0374-1)^2)/0.140012289)-(2/(pi()*0.140012289)+LN(1-(2*p0374-1)^2)/2)))
- p0649: 0; = IF(p0385<0.5;-SQRT(p0007*EXP(p0517^2*p0008)-p0007);SQRT(p0007*EXP(p0517^2*p0008)-p0007))
- p0185: 34.205
- p3310: 0; = if(and(p1232=0;p3252<>0);IF((p3306+p3307+p3308+p3309)+(p3252*(p3257*(1-p3277))/p3305)>p3252;p3252-(p3306+p3307+p3308+p3309);p3252*(p3257*(1-p3277))/p3305);0)
- p0282: 0.5
- p4314: 0; = p1759*p3480
- p2533: 3.74806e-5; = p2337*p1073
- p1717: 0
- p3451: 0; = p3375*p1240
- p3076: 1.03245e-6; = p2295*p1023
- p1815: 0
- p3851: 1.92543e-7; = p1914*p3477
- p1044: 0.0115234; = IF(p1012=0;IF(p1037=1;0;IF(p1037+p1038>1;1-p1037;p1038));0)
- p2357: 0.000200242; = p2225*p2185
- p1013: 0; = p1012*p0001/(p0818*p0002)
- p0514: 0; = SQRT(2)*(IF((2*p0382-1)<0;-1;IF((2*p0382-1)>0;1;0))*SQRT(SQRT((2/(pi()*0.140012289)+LN(1-(2*p0382-1)^2)/2)^2-LN(1-(2*p0382-1)^2)/0.140012289)-(2/(pi()*0.140012289)+LN(1-(2*p0382-1)^2)/2)))
- p0946: 0.00010848; = if(and(p0683=0;or(p0807=480;p0807=32;p0807=1;and(p0807=60;p0901<0.03)));p0934;0)
- p1104: 0.382423; = IF(p1071=0;IF(p1096+p1101+p1102+p1103=1;0;1-(p1096+p1101+p1102+p1103));0)
- p4335: 0; = p1780*p3480
- p2467: 1.01326e-5; = p2271*p1073
- p0002: 0.453592
- p2363: 3.69568e-5; = p2225*p2191
- p2420: 0; = p2235*p2210
- p2761: 1.73616e-7; = p2370*(p1019+p1021)
- p1205: 0
- p0945: 0; = if(and(p0683=0;p0951=0);p0939;0)
- p1042: 0.000264901
- p1813: 0
- p4318: 0; = p1763*p3480
- p2283: 0.000211665; = p2223*p2189
- p1810: 0
- p3174: 0; = p2393*p1023
- p3484: 0.00843362; = IF(p1344=0;0;p1344/(p1328+p1330+p1332+p1334+p1336+p1338+p1340+p1342+p1344))
- p3175: 0; = p2394*p1023
- p1561: 0
- p1345: 1.08755e-5; = IF(p1318=0;p1344*p0001/(p0818*p0002);0)
- p3433: 0; = p3376*p1239
- p0442: 0; = SQRT(2)*(IF((2*p0310-1)<0;-1;IF((2*p0310-1)>0;1;0))*SQRT(SQRT((2/(pi()*0.140012289)+LN(1-(2*p0310-1)^2)/2)^2-LN(1-(2*p0310-1)^2)/0.140012289)-(2/(pi()*0.140012289)+LN(1-(2*p0310-1)^2)/2)))
- p2228: 0.308836; = if(p0774*p0778+p0775*p0779+p0776*p0780+p0777*p0781=0;0;p0780*p0776/(p0774*p0778+p0775*p0779+p0776*p0780+p0777*p0781))
- p3040: 7.30269e-6; = p2259*p1082
- p3051: 2.6958e-7; = p2270*p1082
- p1822: 0
- p3322: 0; = if(and(p1232=0;p3253<>0);p3253-(p3317+p3318+p3319+p3320+p3321);0)
- p0738: 820; = p0078*(1+p0606*p0210/100)
- p3315: 0; = if(and(p1232=0;p3253<>0);p3264*p3289;0)
- p2252: 1.91734e-6; = p2222*p2198
- p2548: 1.37103e-5; = p2352*p1123
- p0262: 43.247
- p2144: 5.76045e-6; = p2015*p2072*p2106/(p0818*1000)
- p3886: 6.41809e-8; = p1949*p3477
- p3483: 0; = if(p1328+p1330+p1332+p1334+p1336+p1338+p1340+p1342+p1344=0;0;p1342/(p1328+p1330+p1332+p1334+p1336+p1338+p1340+p1342+p1344))
- p0393: 0.5
- p1733: 0
- p1975: 0.000256766; = p1970*p0001/(p0818*p0002)
- p2751: 1.68632e-5; = p2360*(p1019+p1021)
- p2683: 2.86221e-7; = p2292*(p1019+p1021)
- p1194: 1.48
- p1077: 0; = IF(p1071=0;p0715/100;0)
- p2980: 0; = p2394*(p1020+p1022)
- p0781: 43.933; = p0121*(1+p0649*p0253/100)
- p1159: 0.5
- p1237: 0; = if(p1232>0;0;p0729/100)
- p0001: 0.404686
- p0673: 0
- p1963j: 9.15087e-7; = p1725*p1929+p1726*p1930+p1727*p1931+p1728*p1932+p1729*p1933+p1730*p1934+p1731*p1935+p1732*p1936+p1733*p1937+p1734*p1938+p1735*p1939+p1736*p1940+p1737*p1941+p1738*p1942+p1739*p1943+p1740*p1944+p1741*p1945+p1742*p1946+p1743*p1947
- p2587: 1.09914e-5; = p2391*p1123
- p1889: 0
- p2753: 5.29058e-6; = p2362*(p1019+p1021)
- p3116: 4.86151e-6; = p2335*p1023
- p2972: 1.14399e-5; = p2386*(p1079+p1081)
- p3073: 6.32072e-8; = p2292*p1023
- p3219: 0.00613987; = p3215*p1228
- p0707: 9.436; = p0047*(1+p0575*p0179/100)
- p1577: 0
- p0772: 30.955; = p0112*(1+p0640*p0244/100)
- p2937: 0.000107984; = p2351*(p1129+p1131)
- p0252: 25.97
- p2145: 1.67149e-5; = p2015*p2073*p2107/(p0818*1000)
- p1139: 7.9048e-6; = if(p1121=0;p1133*p0001/(p0818*p0002);0)
- p1311: 0; = IF(p1307+p1310=p1266;0;IF(p1307+p1310+p1309>p1266;p1266-(p1307+p1310);p1309))
- p0355: 0.5
- p2004: 30
- p2687: 5.35977e-5; = p2296*(p1019+p1021)
- p0487: 0; = SQRT(2)*(IF((2*p0355-1)<0;-1;IF((2*p0355-1)>0;1;0))*SQRT(SQRT((2/(pi()*0.140012289)+LN(1-(2*p0355-1)^2)/2)^2-LN(1-(2*p0355-1)^2)/0.140012289)-(2/(pi()*0.140012289)+LN(1-(2*p0355-1)^2)/2)))
- p2774: 1.00953e-7; = p2383*(p1078+p1080)
- p2449: 3.38498e-6; = p2253*p1014
- p1166: 1.32975e-6; = p1164/p0818
- p1620: 0
- p1731: 0
- p1134: 0; = if(p1121=0;p1128*(p0716/100)*p0703*1000;0)
- p2538: 5.48069e-6; = p2342*p1073
- p2953: 0.000540688; = p2367*(p1020+p1022)
- p3109: 1.90162e-5; = p2328*p1023
- p1210: 0.13
- p0737: 0
- p0750: 0
- p1604: 0.92902
- p1039: 0.0504301
- p2459: 1.03721e-5; = p2263*p1073
- p3393: 0; = p3374*p1234
- p2827: 3.40383e-5; = p2241*(p1020+p1022)
- p3453: 0; = p3377*p1240
- p0122: 6.149
- p1178: 1.24309e-7; = p1176/p0818
- p2069: 0.190588
- p0299: 0.5
- p2487: 2.90377e-6; = p2291*p1014
- p0242: 29.677
- p2946: 7.16966e-5; = p2360*(p1020+p1022)
- p0130: 49.431
- p3245: 0; = IF(p3244=1;0;if(p3244+p0792/100>1;1-p3244;p0792/100))
- p3420: 0; = p3363*p1239
- p3182: 0; = p2401*p1023
- p5159: 2.45789e-8; = p1780*p3484
- p3122: 3.02676e-6; = p2341*p1082
- p4112: 1.86017e-8; = p1763*p3479
- p3207: 0; = p2426*p1082
- p0889: 113.129; = 1000*p0888*p0001*p0003*p0004/(p0818*p0002)
- p1089: 1.00598e-5; = IF(p1071=0;p1083*p0001/(p0818*p0002);0)
- p1814: 0
- p2393: 0; = p2234*p2182
- p3127: 5.73571e-7; = p2346*p1082
- p0908: 0.00197823
- p3363: 0; = if(p1232=0;p3244*p3357/p0818;0)
- p1376: 24
- p2906: 3.79499e-6; = p2320*(p1020+p1022)
- p2243: 0.000409445; = p2222*p2188
- p1963b: 5.21114e-6; = p1569*p1773+p1570*p1774+p1571*p1775+p1572*p1776+p1573*p1777+p1574*p1778+p1575*p1779+p1576*p1780+p1577*p1781+p1578*p1782+p1579*p1783+p1580*p1784+p1581*p1785+p1582*p1786+p1583*p1787+p1584*p1788+p1585*p1789+p1586*p1790+p1587*p1791
- p1574: 0
- p1925: 0
- p2140: 7.11098e-6; = p2015*p2068*p2102/(p0818*1000)
- p2371: 0.00127668; = p2225*p2200
- p2536: 2.807e-5; = p2340*p1073
- p1130: 0; = if(p1121=0;IF(p1123+p1128+p1129=1;0;IF(p1123+p1128+p1129+p1126>1;1-(p1123+p1128+p1129);p1126));0)
- p0391: 0.5
- p1790: 0
- p1161: 790000; = p0801
- p0715: 0
- p3448: 0; = p3372*p1240
- p2947: 1.96516e-5; = p2361*(p1020+p1022)
- p2265: 0.000166357; = p2226*p2211
- p1575: 0
- p1910: 0
- p2387: 5.57649e-6; = p2229*p2216
- p3045: 1.06785e-6; = p2264*p1082
- p0369: 0.5
- p3265: 0
- p2381: 2.20895e-5; = p2229*p2210
- p2723: 3.11212e-5; = p2332*(p1019+p1021)
- p1094: 2.39873e-6; = IF(p1071=0;p1088*p0001/(p0818*p0002);0)
- p2944: 3.89412e-5; = p2358*(p1020+p1022)
- p1854: 0
- p3381: 0; = p3362*p1234
- p3412: 0; = p3374*p1238
- p1942: 0
- p3811: 9.62714e-7; = p1874*p3477
- p3103: 6.91155e-7; = p2322*p1023
- p2203: 0.00379282; = p1070-p2200-p2201-p2202
- p0839: 0.657452; = p0838/p0818
- p2182: 0.00696708; = p1050/p0818
- p2971: 3.03151e-6; = p2385*(p1079+p1081)
- p2584: 1.76191e-5; = p2388*p1073
- p2450: 0.000896087; = p2254*p1014
- p0476: 0; = SQRT(2)*(IF((2*p0344-1)<0;-1;IF((2*p0344-1)>0;1;0))*SQRT(SQRT((2/(pi()*0.140012289)+LN(1-(2*p0344-1)^2)/2)^2-LN(1-(2*p0344-1)^2)/0.140012289)-(2/(pi()*0.140012289)+LN(1-(2*p0344-1)^2)/2)))
- p0695: 18.994; = p0035*(1+p0563*p0167/100)
- p1892: 0
- p3038: 6.27563e-6; = p2257*p1023
- p2648: 2.8418e-5; = p2257*(p1019+p1021)
- p3074: 1.67325e-5; = p2293*p1023
- p2589: 0; = p2393*p1014
- p1337: 0; = p1336*p0001/(p0818*p0002)
- p0784: 0
- p2392: 3.95983e-5; = p2233*p2221
- p2530: 4.28321e-5; = p2334*p1014
- p3254: 0; = p1252*(p1287*(1-p3247)+p1290*(1-p3248)+p1291*(1-p3249)+p1292*(1-p3250))
- p2303: 0; = p2227*p2210
- p0537: 0; = IF(p0273<0.5;-SQRT(p0007*EXP(p0405^2*p0008)-p0007);SQRT(p0007*EXP(p0405^2*p0008)-p0007))
- p3231: 1.24309e-7; = p1176/p0818
- p2180: 3.15195e-8; = p3233*p1188/(p0818)
- p4102: 9.98513e-5; = p1963*p3478
- p3361: 0; = if(p1232=0;p3311+p3322+p3333+p3344+p3355;0)
- p1633: 0
- p1599: 0
- p2302: 0; = p2227*p2209
- p3061: 3.33447e-6; = p2280*p1023
- p4957: 0; = p1784*p3483
- p3684: 0; = p1953*p3476
- p3295: 0
- p1300: 0; = IF(p1297=p1265;0;IF(p1297+p1298>p1265;p1265-p1297;p1298))
- p0742: 96.933; = p0082*(1+p0610*p0214/100)
- p2636: 4.62448e-6; = p2245*(p1019+p1021)
- p0137: 48.298
- p1801: 0
- p3887: 6.41809e-8; = p1950*p3477
- p1025: 29169.9; = IF(p1012=0;p1019*(p0704/100)*p0703*1000;0)
- p0351: 0.5
- p0478: 0; = SQRT(2)*(IF((2*p0346-1)<0;-1;IF((2*p0346-1)>0;1;0))*SQRT(SQRT((2/(pi()*0.140012289)+LN(1-(2*p0346-1)^2)/2)^2-LN(1-(2*p0346-1)^2)/0.140012289)-(2/(pi()*0.140012289)+LN(1-(2*p0346-1)^2)/2)))
- p3168: 4.6876e-7; = p2387*p1082
- p1917: 0
- p3300: 0; = if(p1293+p1294+p1295+p1296=0;0;p1293/(p1293+p1294+p1295+p1296))
- p1858: 0
- p3287: 0
- p1823: 0
- p3309: 0; = if(and(p1232=0;p3252<>0);p3252*(p3260-p3304)/p3305;0)
- p0650: 0; = IF(p0386<0.5;-SQRT(p0007*EXP(p0518^2*p0008)-p0007);SQRT(p0007*EXP(p0518^2*p0008)-p0007))
- p2656: 4.1709e-5; = p2265*(p1078+p1080)
- p1301: 0; = IF(p1297+p1300=p1265;0;IF(p1297+p1300+p1299>p1265;p1265-(p1297+p1300);p1299))
- p1830: 0
- p0863: 0; = p0675*1000/p0856
- p1335: 7.31623e-6; = p1334*p0001/(p0818*p0002)
- p2079: 0.02
- p2390: 0.000255768; = p2233*p2219
- p1857: 0
- p2433: 0.00116437; = p2237*p1014
- p0254: 25.167
- p1871: 0
- p2219: 0.000743254; = p1154-p2218
- p0547: 0; = IF(p0283<0.5;-SQRT(p0007*EXP(p0415^2*p0008)-p0007);SQRT(p0007*EXP(p0415^2*p0008)-p0007))
- p1726: 0
- p0006: 15
- p2787: 0; = p2396*(p1019+p1021)
- p0761: 0
- p2248: 0.0014572; = p2222*p2193
- p2566: 3.87255e-6; = p2370*p1014
- p2285: 6.09266e-5; = p2223*p2191
- p0154: 0
- p3428: 0; = p3371*p1239
- p2855: 6.57901e-6; = p2269*(p1079+p1081)
- p1318: 0; = p1317*p0001/(p0818*p0002)
- p5064: 0; = p1891*p3483
- p1611: 0
- p1902: 0
- p0847: 0
- p2967: 6.90716e-6; = p2381*(p1079+p1081)
- p2366: 0.000357361; = p2225*p2195
- p2571: 5.88818e-5; = p2375*p1073
- p3043: 5.46914e-6; = p2262*p1082
- p0704: 98.814; = p0044*(1+p0572*p0176/100)
- p3134: 8.85032e-6; = p2353*p1132
- p1886: 0
- p2716: 7.29055e-6; = p2325*(p1019+p1021)
- p3001: 0; = p2415*(p1079+p1081)
- p2397: 0; = p2234*p2186
- p2806: 0; = p2415*(p1078+p1080)
- p2979: 0; = p2393*(p1020+p1022)
- p1709: 0
- p3680: 0; = p1949*p3476
- p4981: 0; = p1808*p3483
- p1142: 0; = if(p1121=0;p1136*p0001/(p0818*p0002);0)
- p1816: 0
- p0905: 0.0341917; = p0904/p0818
- p2684: 7.57698e-5; = p2293*(p1019+p1021)
- p1274: 0; = p1270*p1252/p0818
- p2963: 1.52962e-5; = p2377*(p1079+p1081)
- p3355: 0; = if(and(p1232=0;p3256<>0);p3256-(p3350+p3351+p3352+p3353+p3354);0)
- p3413: 0; = p3375*p1238
- p3104: 7.91117e-7; = p2323*p1023
- p5116: 0; = p1943*p3483
- p1037: 0.328824
- p0311: 0.5
- p2173: 0.121937; = p0895*p0898/p0818
- p2270: 3.20699e-6; = p2226*p2216
- p3364: 0; = if(p1232=0;p3244*p3358/p0818;0)
- p2110: 0.856281
- p0927: 0; = IF(p0918+p0923+p0924+p0925+p0926=1;0;1-(p0918+p0923+p0924+p0925+p0926))
- p0257: 36.338
- p1705: 0
- p1976: 0.089
- p1673: 0
- p3273: 0
- p2338: 3.44288e-5; = p2228*p2206
- p0644: 0; = IF(p0380<0.5;-SQRT(p0007*EXP(p0512^2*p0008)-p0007);SQRT(p0007*EXP(p0512^2*p0008)-p0007))
- p0394: 0.5
- p1984: 30
- p2161: 4.44333e-7; = p2015*p2085*p2123/(p0818*1000)
- p3167: 3.07538e-6; = p2386*p1082
- p1670: 0.74211
- p4086: 7.11287e-7; = p1943*p3478
- p2709: 4.88124e-6; = p2318*(p1019+p1021)
- p3288: 0
- p3205: 0; = p2424*p1082
- p1767: 0
- p3324: 0; = if(and(p1232=0;p3255<>0);p3266*(p3279*(p3284*p1256+p3286*(p1253+p1257)+p1258*p3288+p3299*p3287));0)
- p1655: 0
- p1271: 0; = IF(p1267+p1270=p1259;0;IF(p1267+p1270+p1269>p1259;p1259-(p1267+p1270);p1269))
- p2822: 0; = p2431*(p1128+p1130)
- p3430: 0; = p3373*p1239
- p2978: 1.34028e-5; = p2392*(p1129+p1131)
- p1640: 0
- p1941: 0
- p2122: 0.341195
- p0534: 0; = SQRT(2)*(IF((2*p0402-1)<0;-1;IF((2*p0402-1)>0;1;0))*SQRT(SQRT((2/(pi()*0.140012289)+LN(1-(2*p0402-1)^2)/2)^2-LN(1-(2*p0402-1)^2)/0.140012289)-(2/(pi()*0.140012289)+LN(1-(2*p0402-1)^2)/2)))
- p2638: 9.41124e-6; = p2247*(p1019+p1021)
- p4881: 0; = p1914*p3482
- p1779: 0
- p1133: 24321; = if(p1121=0;p1123*(p0716/100)*p0703*1000;0)
- p0127: 20.826
- p3283: 0
- p3027: 2.56815e-7; = p2246*p1023
- p4726: 0; = p1759*p3482
- p0964: 0; = 56/90000
- p2325: 0.000202515; = p2224*p2192
- p1689: 0
- p0237: 8.831
- p2542: 2.40544e-6; = p2346*p1073
- p2529: 0.000297606; = p2333*p1014
- p2869: 3.23974e-5; = p2283*(p1020+p1022)
- p5123: 0; = p1950*p3483
- p2672: 2.17316e-6; = p2281*(p1019+p1021)
- p1291: 0; = IF(p1287+p1290=p1264;0;IF(p1287+p1290+p1289>p1264;p1264-(p1287+p1290);p1289))
- p1641: 0
- p0113: 10.707
- p0822: 0.8849
- p2836: 0.000472613; = p2250*(p1020+p1022)
- p0859: 0; = p0671*1000/p0856
- p0965: 0; = IF(p0684/100=1;0;IF(p0684/100+p0685/100>1;1-p0684/100;p0685/100))
- p0939: 0; = p0933*p0001/(p0818*p0002)
- p1992: 3900
- p3094: 0; = p2313*p1132
- p2380: 5.11606e-5; = p2229*p2209
- p2630: 1.82935e-6; = p2239*(p1019+p1021)
- p1846: 0
- p0377: 0.5
- p4917: 0; = p1950*p3482
- p2540: 9.99029e-8; = p2344*p1073
- p4103: 2.41822e-7; = p1754*p3479
- p2075: 0.072
- p1339: 0.000204893; = p1338*p0001/(p0818*p0002)
- p1289: 0
- p2532: 4.14414e-5; = p2336*p1073
- p3296: 0
- p2454: 3.38624e-5; = p2258*p1073
- p3091: 0; = p2310*p1082
- p0983: 0; = if(p0886=0;0;min(1;(p0695*p0694*1000*p0697/100)/p0886))
- p1762: 0
- p0920: 0.165987; = p0676*1000/p0801
- p3356: 0; = if(p1232=0;p3306+p3317+p3328+p3339+p3350;0)
- p0087: 17.762
- p2694: 0; = p2303*(p1078+p1080)
- p3154: 6.26259e-7; = p2373*p1023
- p2500: 0; = p2304*p1073
- p2038: 0.304457
- p3384: 0; = p3365*p1234
- p1120: 0.00108397; = IF(p1071=0;p1110/(p1115*p0818);0)
- p0832: 5.03708e8; = p0831*p0830/(1-p0831)
- p0019: 132.109
- p1629: 0
- p0843: -0.0709004
- p2517: 0.000254694; = p2321*p1014
- p1100: 0.382423
- p3461: 0; = p3366*p1241
- p1603: 0
- p2986: 0; = p2400*(p1020+p1022)
- p3347: 0; = if(and(p1232=0;p3256<>0);p3275*p3289;0)
- p3333: 0; = if(and(p1232=0;p3255<>0);p3255-(p3328+p3329+p3330+p3331+p3332);0)
- p3013: 0; = p2427*(p1079+p1081)
- p2287: 0.00274835; = p2223*p2193
- p2372: 0.000547341; = p2225*p2201
- p2186: 0.00106851; = p1052/p0818
- p2621: 0; = p2425*p1073
- p1218: 0.5
- p0512: 0; = SQRT(2)*(IF((2*p0380-1)<0;-1;IF((2*p0380-1)>0;1;0))*SQRT(SQRT((2/(pi()*0.140012289)+LN(1-(2*p0380-1)^2)/2)^2-LN(1-(2*p0380-1)^2)/0.140012289)-(2/(pi()*0.140012289)+LN(1-(2*p0380-1)^2)/2)))
- p2693: 0; = p2302*(p1078+p1080)
- p2728: 2.66563e-5; = p2337*(p1078+p1080)
- p3896: 2.70294e-5; = p1963*p3477
- p0674: 0
- p2200: 0.00536181; = p1056/p0818
- p3251: 0; = p1252-(p3252+p3253+p3254+p3255+p3256)
- p2959: 1.20573e-5; = p2373*(p1020+p1022)
- p0826: 0.1151; = 1-p0825/p0818
- p2865: 5.05277e-5; = p2279*(p1020+p1022)
- p2738: 6.45583e-6; = p2347*(p1078+p1080)
- p1088: 7380.25; = IF(p1071=0;p1082*(p0710/100)*p0703*1000;0)
- p2398: 0; = p2234*p2187
- p2508: 0; = p2312*p1123
- p0667: 0; = IF(p0403<0.5;-SQRT(p0007*EXP(p0535^2*p0008)-p0007);SQRT(p0007*EXP(p0535^2*p0008)-p0007))
- p3416: 0; = p3378*p1238
- p5234: 2.6115e-7; = p1855*p3484
- p2988: 0; = p2402*(p1020+p1022)
- p3211: 0; = p2430*p1132
- p0693: 0
- p0664: 0; = IF(p0400<0.5;-SQRT(p0007*EXP(p0532^2*p0008)-p0007);SQRT(p0007*EXP(p0532^2*p0008)-p0007))
- p0687: 32.151; = p0027*(1+p0555*p0159/100)
- p0645: 0; = IF(p0381<0.5;-SQRT(p0007*EXP(p0513^2*p0008)-p0007);SQRT(p0007*EXP(p0513^2*p0008)-p0007))
- p0823: 0
- p1884: 0
- p1465: 139
- p3294: 0
- p1224: 0.44; = IF(p1221=0;0;IF(p1193=0;1-p1223;0))
- p1685: 0
- p3020: 4.03982e-7; = p2239*p1023
- p0189: 33.349
- p1207: 139.408; = if(p1193>0;0;(p1194*p1050/p1057+p1195*p1051/p1058+p1196*p1052/p1059+p1197*p1053/p1060+p1198*p1054/p1061+p1199*p1055/p1062+p1200*p1056/p1063)/(p0702*1000)+(p1201*p1109/p1114+p1202*p1110/p1115)/(p0702*1000)+p1203*p1170/p0801+p1204*p1176/p0801)
- p3026: 1.02124e-6; = p2245*p1023
- p1285: 0; = p1281*p1252/p0818
- p2349: 3.51756e-5; = p2228*p2217
- p2894: 0; = p2308*(p1079+p1081)
- p2489: 0.00169007; = p2293*p1014
- p1998: 496
- p2298: 0; = p2227*p2205
- p1821: 0
- p2982: 0; = p2396*(p1020+p1022)
- p1645: 0
- p1016: 0.09436; = IF(p1012=0;p0707/100;0)
- p0378: 0.5
- p2056: 2.07882
- p3379: 0; = if(p1232=0;p3246*p3361/p0818;0)
- p0751: 16.019; = p0091*(1+p0619*p0223/100)
- p2225: 0.238106; = if(p0765*p0769+p0766*p0770+p0767*p0771+p0768*p0772=0;0;p0772*p0768/(p0765*p0769+p0766*p0770+p0767*p0771+p0768*p0772))
- p2776: 2.43071e-6; = p2385*(p1078+p1080)
- p3253: 0; = p1252*(p1277*(1-p3247)+p1280*(1-p3248)+p1281*(1-p3249)+p1282*(1-p3250))
- p3455: 0; = p3379*p1240
- p2603: 0; = p2407*p1014
- p1753: 0
- p3193: 0; = p2412*p1023
- p3118: 8.93717e-6; = p2337*p1082
- p3250: 0
- p5126: 0; = p1953*p3483
- p1343: 0; = p1342*p0001/(p0818*p0002)
- p2322: 8.69377e-5; = p2224*p2189
- p3226: 8.05317e-5; = p3222*p1229
- p5253: 4.60854e-8; = p1874*p3484
- p1678: 0
- p2581: 3.41775e-6; = p2385*p1073
- p0427: 0; = SQRT(2)*(IF((2*p0295-1)<0;-1;IF((2*p0295-1)>0;1;0))*SQRT(SQRT((2/(pi()*0.140012289)+LN(1-(2*p0295-1)^2)/2)^2-LN(1-(2*p0295-1)^2)/0.140012289)-(2/(pi()*0.140012289)+LN(1-(2*p0295-1)^2)/2)))
- p2054: 0.91
- p0236: 0.621
- p2646: 1.72234e-5; = p2255*(p1019+p1021)
- p2198: 9.21234e-6; = 22.98976928*p2197/14.0067
- p0913: 0.0120403
- p2096: 0.486404
- p4747: 0; = p1780*p3482
- p2699: 0; = p2308*(p1078+p1080)
- p1922: 0
- p1568: 0
- p1681: 0
- p0259: 47.874
- p2170: 0.00648166; = p2166*(p0913)
- p2167: 0.246906; = p2166*(p0898)
- p0907: 0
- p2442: 2.59396e-5; = p2246*p1014
- p2535: 0.000100774; = p2339*p1073
- p2311: 0; = p2231*p2218
- p3432: 0; = p3375*p1239
- p0150: 0
- p2483: 0.0022069; = p2287*p1014
- p1797: 0
- p2846: 8.79668e-6; = p2260*(p1079+p1081)
- p1118: 0.000126606; = IF(p1071=0;p1108/(p1113*p0818);0)
- p3024: 3.25509e-6; = p2243*p1023
- p1236: 0; = if(p1232>0;0;p0728/100)
- p0053: 31.269
- p2268: 5.57547e-6; = p2226*p2214
- p4302: 2.06686e-9; = p1953*p3479
- p1849: 0
- p2469: 8.12516e-5; = p2273*p1123
- p2556: 0.000376138; = p2360*p1014
- p1226: 790000; = IF(p1221=0;0;IF(p1193=0;p0801;0))
- p2698: 0; = p2307*(p1078+p1080)
- p1297: 0
- p0555: 0; = IF(p0291<0.5;-SQRT(p0007*EXP(p0423^2*p0008)-p0007);SQRT(p0007*EXP(p0423^2*p0008)-p0007))
- p1317: 0
- p1693: 0
- p1829: 0
- p3203: 0; = p2422*p1082
- p2389: 0.000181498; = p2233*p2218
- p1786: 0
- p2561: 0.00133866; = p2365*p1014
- p2445: 0.000250828; = p2249*p1014
- p2431: 0; = p2236*p2221
- p2168: 0.00696605; = p2166*(p0903)
- p3700: 5.77628e-7; = p1763*p3477
- p2047: 1.50611e-12; = p2015*p2045/(p0818*1000000000000)
- p2169: 0.00106494; = p2166*(p0908)
- p0631: 0; = IF(p0367<0.5;-SQRT(p0007*EXP(p0499^2*p0008)-p0007);SQRT(p0007*EXP(p0499^2*p0008)-p0007))
- p2245: 0.000128458; = p2222*p2190
- p1843: 0
- p5132: 0; = p1963*p3483
- p1594: 0
- p1246: 0; = if(p1232>0;0;p1241*(p0725/100)*p0723*1000)
- p1340: 0; = p1325*p0801
- p1700: 0
- p2643: 6.90242e-8; = p2252*(p1019+p1021)
- p0935: 7.24782e-5; = p0929*p0001/(p0818*p0002)
- p2293: 0.00210472; = p2223*p2200
- p3181: 0; = p2400*p1023
- p2732: 9.02771e-6; = p2341*(p1078+p1080)
- p0942: 0; = if(and(p0683=0;p0948=0);p0936;0)
- p1068: 0.0233383; = IF(p1012=0;p1054/(p1061*p0818);0)
- p2339: 0.00028586; = p2228*p2207
- p0690: 21.33; = p0030*(1+p0558*p0162/100)
- p0047: 9.436
- p0712: 25.072; = p0052*(1+p0580*p0184/100)
- p0769: 22.482; = p0109*(1+p0637*p0241/100)
- p1646: 0
- p5133: 3.59466e-7; = p1754*p3484
- p3239: 0.013074; = IF(p3238+p3235+p3236=1;0;1-(p3238+p3235+p3236))
- p0972: 0; = p0969/p0818
- p0300: 0.5
- p0892: 0; = if(p0891=0;0;(1-p1240)*p3251/p0891)
- p2720: 3.25774e-8; = p2329*(p1019+p1021)
- p2493: 0; = p2297*p1073
- p0121: 43.933
- p3397: 0; = p3378*p1234
- p2348: 3.92477e-6; = p2228*p2216
- p0899: 2.65728e9; = p0825*p0896+(p0830+p0895)*p0824*p0898
- p2911: 3.0997e-5; = p2325*(p1020+p1022)
- p2220: 6.6219e-5; = p1151/p0818
- p1447: 85
- p0717: 48.235; = p0057*(1+p0585*p0189/100)
- p2091: 0.374844
- p2845: 2.71649e-5; = p2259*(p1079+p1081)
- p0997: 0.387917; = if(p0888=0;0;if((p0695*p0694*1000*p0696/100)/p0888>1;1;(p0695*p0694*1000*p0696/100)/p0888))
- p2401: 0; = p2234*p2190
- p2592: 0; = p2396*p1014
- p1333: 0.000839268; = p1332*p0001/(p0818*p0002)
- p1996: 30
- p1862: 0
- p1150: 1.44778e6; = if(p1121=0;p1149*p1146*p1145;0)
- p1727: 0
- p1005: 73666.3; = p1001*p0888
- p1062: 0.16
- p4775: 0; = p1808*p3482
- p1404: 8
- p2088: 0.798875
- p0428: 0; = SQRT(2)*(IF((2*p0296-1)<0;-1;IF((2*p0296-1)>0;1;0))*SQRT(SQRT((2/(pi()*0.140012289)+LN(1-(2*p0296-1)^2)/2)^2-LN(1-(2*p0296-1)^2)/0.140012289)-(2/(pi()*0.140012289)+LN(1-(2*p0296-1)^2)/2)))
- p1734: 0
- p1624: 0
- p0879: 0; = p0878*p0001*p0003/(p0818*p0002)
- p2289: 0.00582368; = p2223*p2196
- p2928: 4.8613e-6; = p2342*(p1079+p1081)
- p0694: 32.627; = p0034*(1+p0562*p0166/100)
- p2124: 0.263965
- p1183: 0.000256766; = p0801*p0001/(p0818*p0002)
- p3330: 0; = if(and(p1232=0;p3255<>0);p3255*(p3267-p3325)/p3327;0)
- p2711: 8.92588e-7; = p2320*(p1019+p1021)
- p2974: 1.5628e-5; = p2388*(p1079+p1081)
- p0503: 0; = SQRT(2)*(IF((2*p0371-1)<0;-1;IF((2*p0371-1)>0;1;0))*SQRT(SQRT((2/(pi()*0.140012289)+LN(1-(2*p0371-1)^2)/2)^2-LN(1-(2*p0371-1)^2)/0.140012289)-(2/(pi()*0.140012289)+LN(1-(2*p0371-1)^2)/2)))
- p0079: 0.834
- p0526: 0; = SQRT(2)*(IF((2*p0394-1)<0;-1;IF((2*p0394-1)>0;1;0))*SQRT(SQRT((2/(pi()*0.140012289)+LN(1-(2*p0394-1)^2)/2)^2-LN(1-(2*p0394-1)^2)/0.140012289)-(2/(pi()*0.140012289)+LN(1-(2*p0394-1)^2)/2)))
- p0902: 0
- p3386: 0; = p3367*p1234
- p3357: 0; = if(p1232=0;p3307+p3318+p3329+p3340+p3351;0)
- p0998: 0; = if(p0888=0;0;if((p0699*p0698*1000*p0700/100)/p0888>1;1;(p0699*p0698*1000*p0700/100)/p0888))
- p3604: 0; = p1873*p3476
- p3077: 1.18362e-5; = p2296*p1023
- p1040: 0.0254495
- p0026: 53.957
- p1619: 0
- p0139: 38.931
- p2257: 0.000789388; = p2222*p2203
- p3177: 0; = p2396*p1023
- p1835: 0
- p3436: 0; = p3379*p1239
- p2964: 0.000127003; = p2378*(p1079+p1081)
- p0240: 35.015
- p2087: 0.856281
- p0248: 19.591
- p0692: 68.616; = p0032*(1+p0560*p0164/100)
- p1131: 0; = if(p1121=0;IF(p1123+p1128+p1129+p1130=1;0;IF(p1123+p1128+p1129+p1130+p1127>1;1-(p1123+p1128+p1129+p1130);p1127));0)
- p0550: 0; = IF(p0286<0.5;-SQRT(p0007*EXP(p0418^2*p0008)-p0007);SQRT(p0007*EXP(p0418^2*p0008)-p0007))
- p2554: 0.000204295; = p2358*p1014
- p1729: 0
- p3890: 6.41809e-8; = p1953*p3477
- p3058: 4.77265e-6; = p2277*p1023
- p1573: 0
- p1721: 0
- p1683: 0
- p3402: 0; = p3364*p1238
- p2909: 1.52312e-5; = p2323*(p1020+p1022)
- p1724: 0
- p0768: 55.212; = p0108*(1+p0636*p0240/100)
- p0921: 0.167227; = p0679*1000/p0801
- p2166: 0.538332; = p2165*p0824
- p0885: 21.007; = IF(p0689+p0884=100;0;100-(p0689+p0884))
- p0771: 29.996; = p0111*(1+p0639*p0243/100)
- p0063: 820
- p2242: 3.20063e-5; = p2222*p2187
- p2308: 0; = p2227*p2215
- p2356: 5.81348e-5; = p2225*p2184
- p2582: 1.28975e-5; = p2386*p1073
- p3149: 1.06245e-8; = p2368*p1023
- p0819: 0; = p0808*p0809/p0818
- p1202: 0.7
- p2817: 0; = p2426*(p1078+p1080)
- p1900: 0
- p0882: 790000; = p0869*p0856
- p2565: 1.76137e-6; = p2369*p1014
- p2612: 0; = p2416*p1073
- p0483: 0; = SQRT(2)*(IF((2*p0351-1)<0;-1;IF((2*p0351-1)>0;1;0))*SQRT(SQRT((2/(pi()*0.140012289)+LN(1-(2*p0351-1)^2)/2)^2-LN(1-(2*p0351-1)^2)/0.140012289)-(2/(pi()*0.140012289)+LN(1-(2*p0351-1)^2)/2)))
- p0830: 3.17299e9; = p0825*p0821*p0824
- p1257: 0; = if(p1232>0;0;IF(p1253+p1256=1;0;IF(p1253+p1256+p1255>1;1-(p1253+p1256);p1255)))
- p1608: 0.470583
- p1126: 0; = if(p1121=0;p0720/100;0)
- p0390: 0.5
- p1691: 0
- p4222: 2.87293e-7; = p1873*p3479
- p2608: 0; = p2412*p1014
- p2509: 0; = p2313*p1123
- p1019: 0.036; = IF(p1012=0;IF(p1014=1;0;IF(p1014+p1015>1;1-p1014;p1015));0)
- p1826: 0
- p2306: 0; = p2227*p2213
- p1566: 0
- p2585: 8.75454e-5; = p2389*p1123
- p2926: 2.48978e-5; = p2340*(p1079+p1081)
- p0316: 0.5
- p0371: 0.5
- p3157: 1.26983e-5; = p2376*p1082
- p0775: 0
- p2171: 0.0854594; = p2165*p0831
- p0296: 0.5
- p1064: 0.00849644; = IF(p1012=0;p1050/(p1057*p0818);0)
- p3403: 0; = p3365*p1238
- p3069: 4.68368e-6; = p2288*p1023
- p1059: 0.335
- p2264: 1.27035e-5; = p2226*p2210
- p0376: 0.5
- p1995: 50
- p0191: 27.749
- p2455: 3.0626e-5; = p2259*p1073
- p1918: 0
- p1708: 0
- p1948: 0
- p3307: 0; = if(and(p1232=0;p3252<>0);p3252*(p3258-p3302)/p3305;0)
- p0864: 0; = IF(p0858=1;0;IF(p0858+p0859>1;1-p0858;p0859))
- p3442: 0; = p3366*p1240
- p3278: 0
- p2664: 0; = p2273*(p1128+p1130)
- p2707: 8.87676e-6; = p2316*(p1019+p1021)
- p0585: 0; = IF(p0321<0.5;-SQRT(p0007*EXP(p0453^2*p0008)-p0007);SQRT(p0007*EXP(p0453^2*p0008)-p0007))
- p1114: 0.216028
- p2185: 0.00084098; = p1065-p2184
- p0399: 0.5
- p0241: 25.807
- p0915: 0.0189815; = p0914/p0818
- p3460: 0; = p3365*p1241
- p2703: 0; = p2312*(p1128+p1130)
- p2710: 6.20186e-6; = p2319*(p1019+p1021)
- p1242: 0; = if(p1232>0;0;p1234*(p0725/100)*p0723*1000)
- p1991: 1.03206e7; = (if(p1111=0;0;p1106/p1111)+if(p1112=0;0;p1107/p1112)+if(p1113=0;0;p1108/p1113)+if(p1114=0;0;p1109/p1114)+if(p1115=0;0;p1110/p1115))*(1+p1157)
- p1283: 0; = p1277*p1252/p0818
- p3238: 0.854735; = IF(p3237+p3235+p3236>1;1-(p3235+p3236);p3237)
- p2065: 0.0758824
- p2810: 0; = p2419*(p1078+p1080)
- p0963: 0; = if(and(p0683>0;or(p0807=480;p0807=32;p0807=1;and(p0807=60;p0901<0.03)));p0939;0)
- p1750: 0
- p2146: 1.03744e-6; = p2015*p2074*p2108/(p0818*1000)
- p0901: 0.0206965
- p4161: 1.65348e-8; = p1812*p3479
- p4298: 2.06686e-9; = p1949*p3479
- p1072: 0; = p1071*p0001/(p0818*p0002)
- p1669: 0.523221
- p3000: 0; = p2414*(p1079+p1081)
- p0773: 10.707; = p0113*(1+p0641*p0245/100)
- p2741: 0; = p2350*(p1128+p1130)
- p1327a: 0.0423556; = (p0745*1000/p0801)*(1-(p0746+p0747+p0748+p0749+p0750+p0751+p0752+p0753)/100)+(p0754*1000/p0801)*(1-(p0755+p0756+p0757+p0758+p0759+p0760+p0761+p0762)/100)
- p2408: 0; = p2234*p2198
- p2379: 0.000113134; = p2229*p2208
- p0820: 0; = if(p0807=480;p0814;0)
- p1748: 0
- p1140: 0; = if(p1121=0;p1134*p0001/(p0818*p0002);0)
- p2299: 0; = p2227*p2206
- p0352: 0.5
- p2023: 2.12
- p2727: 2.94732e-5; = p2336*(p1078+p1080)
- p2404: 0; = p2234*p2193
- p2782: 0; = p2391*(p1128+p1130)
- p0168: 18.311
- p2830: 1.71774e-5; = p2244*(p1020+p1022)
- p1803: 0
- p0044: 98.814
- p1000: 0; = IF(p0996+p0999=1;0;IF(p0996+p0999+p0998>1;1-(p0996+p0999);p0998))
- p2443: 0.00020992; = p2247*p1014
- p0570: 0; = IF(p0306<0.5;-SQRT(p0007*EXP(p0438^2*p0008)-p0007);SQRT(p0007*EXP(p0438^2*p0008)-p0007))
- p3459: 0; = p3364*p1241
- p2251: 1.16815e-6; = p2222*p2197
- p0973: 0; = p0967+p0968+p0969
- p2850: 3.97224e-6; = p2264*(p1079+p1081)
- p1299: 0
- p0008: 0.0739645; = (p0007-1.5)/(p0007-1)^2
- p0036: 85.778
- p0733: 0
- p2263: 2.9422e-5; = p2226*p2209
- p3062: 4.79906e-7; = p2281*p1023
- p3086: 0; = p2305*p1082
- p2924: 1.07655e-5; = p2338*(p1079+p1081)
- p3927: 5.6903e-6; = p1784*p3478
- p0617: 0; = IF(p0353<0.5;-SQRT(p0007*EXP(p0485^2*p0008)-p0007);SQRT(p0007*EXP(p0485^2*p0008)-p0007))
- p2717: 4.06382e-5; = p2326*(p1019+p1021)
- p0883: 2.56766; = p0882*p0001*p0003/(p0818*p0002)
- p2537: 1.26936e-5; = p2341*p1073
- p0159: 16.438
- p2749: 9.15903e-6; = p2358*(p1019+p1021)
- p4367: 0; = p1812*p3480
- p2061: 0.518824
- p3048: 2.03542e-7; = p2267*p1082
- p0415: 0; = SQRT(2)*(IF((2*p0283-1)<0;-1;IF((2*p0283-1)>0;1;0))*SQRT(SQRT((2/(pi()*0.140012289)+LN(1-(2*p0283-1)^2)/2)^2-LN(1-(2*p0283-1)^2)/0.140012289)-(2/(pi()*0.140012289)+LN(1-(2*p0283-1)^2)/2)))
- p1191: 0.5
- p1122: 0; = p1121*p0001/(p0818*p0002)
- p2790: 0; = p2399*(p1019+p1021)
- p3674: 0; = p1943*p3476
- p3023: 2.5445e-7; = p2242*p1023
- p1545: 1
- p1054: 1.92191e7; = IF(p1012=0;p1047*p1036;0)
- p2021: 0.00130136; = p2020/p0818
- p3277: 0
- p3151: 3.83402e-8; = p2370*p1023
- p0999: 0.387917; = IF(p0996=1;0;IF(p0996+p0997>1;1-p0996;p0997))
- p1811: 0
- p1053: 1.48016e6; = IF(p1012=0;p1046*p1036;0)
- p3327: 0; = if(and(p1232=0;p3255<>0);1-(p3323+p3324+p3325+p3326);0)
- p2321: 0.000317183; = p2224*p2188
- p4508: 0; = p1953*p3480
- p2665: 0; = p2274*(p1128+p1130)
- p3390: 0; = p3371*p1234
- p3262: 0
- p2351: 0.000319036; = p2232*p2219
- p0003: 10000
- p2337: 0.000106319; = p2228*p2205
- p2273: 0.000168449; = p2230*p2219
- p1765: 0
- p2952: 5.46976e-5; = p2366*(p1020+p1022)
- p2434: 0.000255593; = p2238*p1014
- p2768: 1.22647e-5; = p2377*(p1078+p1080)
- p2604: 0; = p2408*p1014
- p2099: 0.620397
- p2860: 5.07966e-6; = p2274*(p1129+p1131)
- p3320: 0; = if(and(p1232=0;p3253<>0);p3253*(p3264-p3315)/p3316;0)
- p1735: 0
- p3218: 0.00512672; = p3214*p1228
- p2826: 2.67902e-5; = p2240*(p1020+p1022)
- p2188: 0.00196728; = p1066-p2186-p2187
- p3325: 0; = if(and(p1232=0;p3255<>0);p3267*p3289;0)
- p0380: 0.5
- p2690: 0; = p2299*(p1078+p1080)
- p2024: 0.748682
- p5142: 2.76512e-8; = p1763*p3484
- p0670: 0
- p1940: 0
- p2148: 2.45034e-6; = p2015*p2076*p2110/(p0818*1000)
- p2731: 1.99635e-5; = p2340*(p1078+p1080)
- p2613: 0; = p2417*p1073
- p1026: 76457.5; = IF(p1012=0;p1020*(p0704/100)*p0703*1000;0)
- p0714: 0
- p0968: 0
- p4092: 2.37096e-7; = p1949*p3478
- p2814: 0; = p2423*(p1078+p1080)
- p2783: 0; = p2392*(p1128+p1130)
- p2385: 9.69493e-6; = p2229*p2214
- p0211: 10.638
- p2639: 5.24592e-5; = p2248*(p1019+p1021)
- p3902: 1.18548e-5; = p1759*p3478
- p2557: 0.000103097; = p2361*p1014
- p3827: 5.45538e-6; = p1890*p3477
- p2820: 0; = p2429*(p1128+p1130)
- p3494: 0; = p1763*p3476
- p2935: 1.09991e-5; = p2349*(p1079+p1081)
- p1079: 0.31269; = IF(p1071=0;IF(p1073+p1078=1;0;IF(p1073+p1078+p1075>1;1-(p1073+p1078);p1075));0)
- p0685: 0
- p2183: 0.00152936; = p1064-p2182
- p2950: 4.57769e-5; = p2364*(p1020+p1022)
- p1881: 0
- p0284: 0.5
- p1842: 0
- p0888: 1.37035e6; = p0686*1000*p0687*p0884/100
- p1782: 0
- p1876: 0
- p2328: 0.00239198; = p2224*p2196
- p4720: 2.43769e-5; = p1963*p3481
- p5313: 6.14472e-9; = p1934*p3484
- p3696: 3.20905e-6; = p1759*p3477
- p0683: 0
- p3223: 0.126838; = IF(p3216=0;0;(1-p1223)*24.3050/84.3139)
- p1326: 0; = IF(((p0745*1000*p0753/100)+(p0754*1000*p0762/100))/p0801<0;0;((p0745*1000*p0753/100)+(p0754*1000*p0762/100))/p0801)
- p1112: 0.209482
- p0875: 0; = p0874*p0001*p0003/(p0818*p0002)
- p0632: 0; = IF(p0368<0.5;-SQRT(p0007*EXP(p0500^2*p0008)-p0007);SQRT(p0007*EXP(p0500^2*p0008)-p0007))
- p3286: 0
- p3170: 3.25208e-5; = p2389*p1132
- p0123: 42.366
- p2107: 0.881623
- p2546: 0.000109201; = p2350*p1123
- p2661: 8.04057e-7; = p2270*(p1078+p1080)
- p2808: 0; = p2417*(p1078+p1080)
- p2085: 0.0335294
- p1593: 0
- p2278: 9.58404e-5; = p2223*p2184
- p0815: 0
- p2374: 0.000903091; = p2225*p2203
- p1015: 0.036; = IF(p1012=0;p0706/100;0)
- p0384: 0.5
- p2256: 6.88567e-5; = p2222*p2202
- p1043: 0.25306
- p2550: 0.00133208; = p2354*p1014
- p2576: 1.80356e-5; = p2380*p1073
- p2421: 0; = p2235*p2211
- p2233: 0.34412; = if(p0783*p0787+p0784*p0788+p0785*p0789+p0786*p0790=0;0;p0790*p0786/(p0783*p0787+p0784*p0788+p0785*p0789+p0786*p0790))
- p0441: 0; = SQRT(2)*(IF((2*p0309-1)<0;-1;IF((2*p0309-1)>0;1;0))*SQRT(SQRT((2/(pi()*0.140012289)+LN(1-(2*p0309-1)^2)/2)^2-LN(1-(2*p0309-1)^2)/0.140012289)-(2/(pi()*0.140012289)+LN(1-(2*p0309-1)^2)/2)))
- p0116: 38.032
- p2460: 4.47835e-6; = p2264*p1073
- p2190: 0.000617208; = 32.065*p2189/(2*14.0067)
- p2194: 0.214362
- p3297: 0; = if(p1273+p1274+p1275+p1276=0;0;p1273/(p1273+p1274+p1275+p1276))
- p3033: 1.52428e-8; = p2252*p1023
- p3060: 2.62443e-6; = p2279*p1023
- p1887: 0
- p0140: 6.149
- p2175: 0.000525934; = p0895*p0908/p0818
- p3343: 0; = if(and(p1232=0;p3254<>0);IF((p3339+p3340+p3341+p3342)+(p3254*(p3269*(1-p3277))/p3338)>p3254;p3254-(p3339+p3340+p3341+p3342);p3254*(p3269*(1-p3277))/p3338);0)
- p2205: 0.000344256; = 2*14.0067*p2204/30.973762
- p1483: 1
- p0453: 0; = SQRT(2)*(IF((2*p0321-1)<0;-1;IF((2*p0321-1)>0;1;0))*SQRT(SQRT((2/(pi()*0.140012289)+LN(1-(2*p0321-1)^2)/2)^2-LN(1-(2*p0321-1)^2)/0.140012289)-(2/(pi()*0.140012289)+LN(1-(2*p0321-1)^2)/2)))
- p0032: 68.616
- p4920: 0; = p1953*p3482
- p2606: 0; = p2410*p1014
- p3208: 0; = p2427*p1082
- p0679: 132.109; = p0019*(1+p0547*p0151/100)
- p1288: 0
- p1615: 0
- p2313: 0; = p2231*p2220
- p0754: 32.241; = p0094*(1+p0622*p0226/100)
- p3308: 0; = if(and(p1232=0;p3252<>0);p3252*(p3259-p3303)/p3305;0)
- p3479: 0.00567352; = if(p1328+p1330+p1332+p1334+p1336+p1338+p1340+p1342+p1344=0;0;p1334/(p1328+p1330+p1332+p1334+p1336+p1338+p1340+p1342+p1344))
- p4695: 1.15766e-7; = p1934*p3481
- p3088: 0; = p2307*p1082
- p2477: 4.84729e-5; = p2281*p1014
- p2135: 4.04587e-5; = p2015*p2063*p2097/(p0818*1000)
- p0689: 0
- p2286: 0.000493058; = p2223*p2192
- p0971: 0; = p0968/p0818
- p1895: 0
- p2497: 0; = p2301*p1073
- p1036: 5.81607e7; = IF(p1012=0;p0795*p0702*1000*p0796/100;0)
- p0741: 0.819; = p0081*(1+p0609*p0213/100)
- p3349: 0; = if(and(p1232=0;p3256<>0);1-(p3345+p3346+p3347+p3348);0)
- p2572: 5.32541e-5; = p2376*p1073
- p0765: 66.449; = p0105*(1+p0633*p0237/100)
- p2578: 0.000101977; = p2382*p1073
- p2923: 3.32449e-5; = p2337*(p1079+p1081)
- p3190: 0; = p2409*p1023
- p3429: 0; = p3372*p1239
- p3458: 0; = p3363*p1241
- p2439: 0.00032878; = p2243*p1014
- p1050: 1.91246e7; = IF(p1012=0;p1037*p1036;0)
- p4204: 1.75683e-7; = p1855*p3479
- p2343: 0.00020359; = p2228*p2211
- p1346: 117
- p1585: 0
- p2057: 3.28794
- p1200: 0.84
- p4710: 5.78828e-8; = p1949*p3481
- p1963: 0.000153422; = p1963a+p1963b+p1963c+p1963d+p1963e+p1963f+p1963g+p1963h+p1963i+p1963j+p1963k
- p2686: 4.67522e-6; = p2295*(p1019+p1021)
- p0850: 0
- p3083: 0; = p2302*p1082
- p3160: 9.51005e-6; = p2379*p1082
- p3314: 0; = if(and(p1232=0;p3253<>0);p3263*p3289;0)
- p2084: 0.21
- p1947: 0
- p2336: 0.000117554; = p2228*p2204
- p0181: 28.323
- p1581: 0
- p0178: 55.963
- p2177: 0.136757; = p0895/p0818-(p2173+p2174+p2175+p2176)
- p0110: 42.536
- p2929: 6.36607e-5; = p2343*(p1079+p1081)
- p2114: 0.832356
- p5191: 2.45789e-8; = p1812*p3484
- p1737: 0
- p0873: 0; = p0872*p0001*p0003/(p0818*p0002)
- p0818: 2.745e9; = p0806*p0807
- p2249: 0.000312368; = p2222*p2195
- p2689: 0; = p2298*(p1078+p1080)
- p2549: 2.38249e-5; = p2353*p1123
- p1804: 0
- p0896: 0.458
- p0724: 0
- p1684: 0
- p0790: 49.431; = p0130*(1+p0658*p0262/100)
- p3268: 0
- p5322: 9.21707e-9; = p1943*p3484
- p0743: 0
- p2819: 0; = p2428*(p1128+p1130)
- p0195: 0
- p2136: 2.90905e-5; = p2015*p2064*p2098/(p0818*1000)
- p1550: 0.783979
- p2224: 0.161229; = if(p0765*p0769+p0766*p0770+p0767*p0771+p0768*p0772=0;0;p0771*p0767/(p0765*p0769+p0766*p0770+p0767*p0771+p0768*p0772))
- p1901: 0
- p0111: 29.996
- p1009: 6.08153e-7; = p1005*p0001*p0004/(p0818*p0002)
- p0985: 0; = IF(p0982=1;0;IF(p0982+p0983>1;1-p0982;p0983))
- p2872: 7.54674e-5; = p2286*(p1020+p1022)
- p2569: 6.32554e-5; = p2373*p1014
- p0452: 0; = SQRT(2)*(IF((2*p0320-1)<0;-1;IF((2*p0320-1)>0;1;0))*SQRT(SQRT((2/(pi()*0.140012289)+LN(1-(2*p0320-1)^2)/2)^2-LN(1-(2*p0320-1)^2)/0.140012289)-(2/(pi()*0.140012289)+LN(1-(2*p0320-1)^2)/2)))
- p4299: 2.06686e-9; = p1950*p3479
- p2331: 3.26557e-6; = p2224*p2199
- p1162: 0.000287796; = p1161/p0818
- p4157: 2.04619e-7; = p1808*p3479
- p2319: 0.000172274; = p2224*p2186
- p2811: 0; = p2420*(p1078+p1080)
- p1760: 0
- p2791: 0; = p2400*(p1019+p1021)
- p0782: 6.149; = p0122*(1+p0650*p0254/100)
- p2657: 5.80569e-8; = p2266*(p1078+p1080)
- p0606: 0; = IF(p0342<0.5;-SQRT(p0007*EXP(p0474^2*p0008)-p0007);SQRT(p0007*EXP(p0474^2*p0008)-p0007))
- p1569: 0
- p1307: 0
- p2399: 0; = p2234*p2188
- p0443: 0; = SQRT(2)*(IF((2*p0311-1)<0;-1;IF((2*p0311-1)>0;1;0))*SQRT(SQRT((2/(pi()*0.140012289)+LN(1-(2*p0311-1)^2)/2)^2-LN(1-(2*p0311-1)^2)/0.140012289)-(2/(pi()*0.140012289)+LN(1-(2*p0311-1)^2)/2)))
- p0386: 0.5
- p1024: 650643; = IF(p1012=0;p1014*(p0704/100)*p0703*1000;0)
- p2416: 0; = p2235*p2206
- p2607: 0; = p2411*p1014
- p1322: 0.0284937; = IF(((p0745*1000*p0749/100)+(p0754*1000*p0758/100))/p0801<0;0;((p0745*1000*p0749/100)+(p0754*1000*p0758/100))/p0801)
- p1664: 0
- p3906: 2.13386e-6; = p1763*p3478
- p4057: 7.11287e-7; = p1914*p3478
- p0752: 0
- p0535: 0; = SQRT(2)*(IF((2*p0403-1)<0;-1;IF((2*p0403-1)>0;1;0))*SQRT(SQRT((2/(pi()*0.140012289)+LN(1-(2*p0403-1)^2)/2)^2-LN(1-(2*p0403-1)^2)/0.140012289)-(2/(pi()*0.140012289)+LN(1-(2*p0403-1)^2)/2)))
- p0554: 0; = IF(p0290<0.5;-SQRT(p0007*EXP(p0422^2*p0008)-p0007);SQRT(p0007*EXP(p0422^2*p0008)-p0007))
- p3258: 0
- p0291: 0.5
- p1847: 0
- p3301: 0; = if(and(p1232=0;p3252<>0);p3257*p3277*(p3297*p3290+(1-p3297)*p3294);0)
- p2013: 0.85
- p1087: 0; = IF(p1071=0;p1081*(p0710/100)*p0703*1000;0)
- p3456: 0; = p3380*p1240
- p1686: 0.505026
- p1323: 0; = IF(((p0745*1000*p0750/100)+(p0754*1000*p0759/100))/p0801<0;0;((p0745*1000*p0750/100)+(p0754*1000*p0759/100))/p0801)
- p0824: 0.863
- p0507: 0; = SQRT(2)*(IF((2*p0375-1)<0;-1;IF((2*p0375-1)>0;1;0))*SQRT(SQRT((2/(pi()*0.140012289)+LN(1-(2*p0375-1)^2)/2)^2-LN(1-(2*p0375-1)^2)/0.140012289)-(2/(pi()*0.140012289)+LN(1-(2*p0375-1)^2)/2)))
- p4307: 2.54124e-8; = p1962*p3479
- p3358: 0; = if(p1232=0;p3308+p3319+p3330+p3341+p3352;0)
- p1853: 0
- p0806: 4.575e7
- p0676: 131.13; = p0016*(1+p0544*p0148/100)
- p3745: 6.35391e-6; = p1808*p3477
- p0575: 0; = IF(p0311<0.5;-SQRT(p0007*EXP(p0443^2*p0008)-p0007);SQRT(p0007*EXP(p0443^2*p0008)-p0007))
- p2272: 0.000119535; = p2230*p2218
- p2001: 400
- p1831: 0
- p2722: 1.17561e-7; = p2331*(p1019+p1021)
- p2644: 1.51757e-7; = p2253*(p1019+p1021)
- p0270: 26.122
- p1212: 0.022922; = if(p1211=0;0;if(p1193>0;0;(p1207+p1208+p1209)*p1210/(2000*p1211)))
- p1880: 0
- p3139: 2.02262e-6; = p2358*p1023
- p3336: 0; = IF(or(p3254=0;p1232>0);0;p3271*p3289)
- p2934: 1.22724e-6; = p2348*(p1079+p1081)
- p1284: 0; = p1280*p1252/p0818
- p2346: 6.82336e-6; = p2228*p2214
- p4714: 5.78828e-8; = p1953*p3481
- p0401: 0.5
- p0637: 0; = IF(p0373<0.5;-SQRT(p0007*EXP(p0505^2*p0008)-p0007);SQRT(p0007*EXP(p0505^2*p0008)-p0007))
- p2361: 0.000128391; = p2225*p2189
- p4910: 0; = p1943*p3482
- p0842: 0.152728
- p1008: 0; = p1004*p0001*p0004/(p0818*p0002)
- p3147: 2.84102e-6; = p2366*p1023
- p0958: 0; = if(and(p0683>0;or(p0807=480;p0807=32;p0807=1;and(p0807=60;p0901<0.03)));p0934;0)
- p0532: 0; = SQRT(2)*(IF((2*p0400-1)<0;-1;IF((2*p0400-1)>0;1;0))*SQRT(SQRT((2/(pi()*0.140012289)+LN(1-(2*p0400-1)^2)/2)^2-LN(1-(2*p0400-1)^2)/0.140012289)-(2/(pi()*0.140012289)+LN(1-(2*p0400-1)^2)/2)))
- p2052: 6.18376e-5; = p2015*p2049*(1-p2050)/(p0818*1000)
- p0307: 0.5
- p2975: 6.14315e-5; = p2389*(p1129+p1131)
- p1149: 0.830148
- p2832: 4.94442e-6; = p2246*(p1020+p1022)
- p3180: 0; = p2399*p1023
- p2925: 8.93855e-5; = p2339*(p1079+p1081)
- p3437: 0; = p3380*p1239
- p0795: 71.779; = p0135*(1+p0663*p0267/100)
- p0290: 0.5
- p1129: 0.33847; = if(p1121=0;IF(p1123+p1128=1;0;IF(p1123+p1128+p1125>1;1-(p1123+p1128);p1125));0)
- p1713: 0
- p0536: 0; = SQRT(2)*(IF((2*p0404-1)<0;-1;IF((2*p0404-1)>0;1;0))*SQRT(SQRT((2/(pi()*0.140012289)+LN(1-(2*p0404-1)^2)/2)^2-LN(1-(2*p0404-1)^2)/0.140012289)-(2/(pi()*0.140012289)+LN(1-(2*p0404-1)^2)/2)))
- p2428: 0; = p2236*p2218
- p2669: 3.45025e-6; = p2278*(p1019+p1021)
- p3312: 0; = if(and(p1232=0;p3253<>0);p3261*p3277*(p3298*p3290+(1-p3298)*p3294);0)
- p2081: 0.0019
- p0854: 646385; = p0801*((1-p0853)*p0846+p0853*p0852)
- p2280: 0.00041943; = p2223*p2186
- p1295: 0; = p1291*p1252/p0818
- p0016: 131.13
- p0050: 10.707
- p0988: 0; = p0982*p0886
- p3153: 4.35136e-6; = p2372*p1023
- p1834: 0
- p2778: 1.39814e-6; = p2387*(p1078+p1080)
- p0862: 0; = p0674*1000/p0856
- p1312: 0; = IF(p1307+p1310+p1311=p1266;0;p1266-(p1307+p1310+p1311))
- p0412: 0; = SQRT(2)*(IF((2*p0280-1)<0;-1;IF((2*p0280-1)>0;1;0))*SQRT(SQRT((2/(pi()*0.140012289)+LN(1-(2*p0280-1)^2)/2)^2-LN(1-(2*p0280-1)^2)/0.140012289)-(2/(pi()*0.140012289)+LN(1-(2*p0280-1)^2)/2)))
- p1267: 0
- p2269: 2.104e-5; = p2226*p2215
- p2039: 3.04168e-5; = p2015*p2037*p2038/(p0818*1000)
- p2003: 50
- p3213: 0.112803; = p1222*12.0107/100.0869
- p0948: 4.26199e-5; = if(and(p0683=0;or(p0807=480;p0807=32;p0807=1;and(p0807=60;p0901<0.03)));p0936;0)
- p1776: 0
- p2092: 0.54529
- p1214: 14; = IF(p1213=0;0;p1213-1)
- p0726: 0
- p1219: 0; = if(p1218=0;0;SQRT(2)*(IF((2*p1218-1)<0;-1;IF((2*p1218-1)>0;1;0))*SQRT(SQRT((2/(pi()*0.140012289)+LN(1-(2*p1218-1)^2)/2)^2-LN(1-(2*p1218-1)^2)/0.140012289)-(2/(pi()*0.140012289)+LN(1-(2*p1218-1)^2)/2))))
- p3015: 0; = p2429*(p1129+p1131)
- p0648: 0; = IF(p0384<0.5;-SQRT(p0007*EXP(p0516^2*p0008)-p0007);SQRT(p0007*EXP(p0516^2*p0008)-p0007))
- p3318: 0; = if(and(p1232=0;p3253<>0);p3253*(p3262-p3313)/p3316;0)
- p0558: 0; = IF(p0294<0.5;-SQRT(p0007*EXP(p0426^2*p0008)-p0007);SQRT(p0007*EXP(p0426^2*p0008)-p0007))
- p2192: 0.00125607; = p1067-p2189-p2190-p2191
- p3266: 0
- p0269: 22.461
- p3792: 5.45538e-6; = p1855*p3477
- p2575: 3.98832e-5; = p2379*p1073
- p2856: 1.00279e-6; = p2270*(p1079+p1081)
- p0030: 21.33
- p2851: 5.20181e-5; = p2265*(p1079+p1081)
- p1977: 143.261; = p1252+p1188
- p1870: 0
- p1063: 0.455
- p1953: 3.64299e-7; = p1545*1000/p0818
- p1109: 1.04485e6; = IF(p1071=0;p1105*p1103*p1095;0)
- p2341: 3.60071e-5; = p2228*p2209
- p0949: 3.31875e-5; = if(and(p0683=0;or(p0807=480;p0807=32;p0807=1;and(p0807=60;p0901<0.03)));p0937;0)
- p0370: 0.5
- p0385: 0.5
- p0950: 0; = if(and(p0683=0;or(p0807=480;p0807=32;p0807=1;and(p0807=60;p0901<0.03)));p0938;0)
- p2859: 5.70151e-5; = p2273*(p1129+p1131)
- p3191: 0; = p2410*p1023
- p1680: 0
- p0943: 0; = if(and(p0683=0;p0949=0);p0937;0)
- p2117: 0.585147
- p1003: 531581; = p0999*p0888
- p0911: 0.00475556
- p0635: 0; = IF(p0371<0.5;-SQRT(p0007*EXP(p0503^2*p0008)-p0007);SQRT(p0007*EXP(p0503^2*p0008)-p0007))
- p0912: 0
- p3398: 0; = p3379*p1234
- p4446: 0; = p1891*p3480
- p0755: 0
- p2019: 0.13105
- p1145: 1.96297e6; = if(p1121=0;p0799*p0702*1000*p0800/100;0)
- p0757: 0
- p2601: 0; = p2405*p1014
- p0117: 47.077
- p4429: 0; = p1874*p3480
- p3370: 0; = if(p1232=0;p3245*p3358/p0818;0)
- p1652: 0
- p3010: 0; = p2424*(p1079+p1081)
- p2360: 0.000468421; = p2225*p2188
- p2127: 0.000112353; = p2015*p2055*p2089/(p0818*1000)
- p2771: 1.2827e-5; = p2380*(p1078+p1080)
- p1049: 0.25306; = IF(p1012=0;IF(p1037+p1044+p1045+p1046+p1047+p1048=1;0;1-(p1037+p1044+p1045+p1046+p1047+p1048));0)
- p1240: 0; = if(p1232>0;0;IF(p1234+p1238+p1239=1;0;IF(p1234+p1238+p1239+p1237>1;1-(p1234+p1238+p1239);p1237)))
- p3044: 2.47321e-6; = p2263*p1082
- p2045: 30
- p0802: 750000
- p3447: 0; = p3371*p1240
- p3156: 1.40402e-5; = p2375*p1082
- p0792: 0
- p2400: 0; = p2234*p2189
- p2558: 0.000118008; = p2362*p1014
- p3126: 2.49099e-7; = p2345*p1082
- p0167: 13.011
- p2040: 0.44
- p1788: 0
- p2513: 3.16096e-5; = p2317*p1014
- p1330: 698992; = p1320*p0801
- p0372: 0.5
- p3035: 8.87171e-6; = p2254*p1023
- p2662: 7.20633e-6; = p2271*(p1078+p1080)
- p1056: 1.47182e7; = IF(p1012=0;p1049*p1036;0)
- p2329: 9.04927e-7; = p2224*p2197
- p0721: 0
- p2226: 0.252355; = if(p0774*p0778+p0775*p0779+p0776*p0780+p0777*p0781=0;0;p0778*p0774/(p0774*p0778+p0775*p0779+p0776*p0780+p0777*p0781))
- p3383: 0; = p3364*p1234
- p1974: 0; = p1969*p0001/(p0818*p0002)
- p1625: 0
- p1188: 143.261; = p1187*p0801
- p0922: 0; = p0677*1000/p0801
- p2777: 9.17274e-6; = p2386*(p1078+p1080)
- p2437: 0.000178573; = p2241*p1014
- p1586: 0
- p5047: 0; = p1874*p3483
- p1986: 4200
- p2748: 7.20871e-6; = p2357*(p1019+p1021)
- p0887: 0; = 1000*p0886*p0001*p0003*p0004/(p0818*p0002)
- p1073: 0.35253; = IF(p1071=0;p0711/100;0)
- p0672: 0
- p3005: 0; = p2419*(p1079+p1081)
- p1230: 0.5
- p2060: 0.272353
- p3105: 1.98945e-7; = p2324*p1023
- p3605: 0; = p1874*p3476
- p0382: 0.5
- p4822: 0; = p1855*p3482
- p2719: 8.61113e-5; = p2328*(p1019+p1021)
- p1657: 0
- p0651: 0; = IF(p0387<0.5;-SQRT(p0007*EXP(p0519^2*p0008)-p0007);SQRT(p0007*EXP(p0519^2*p0008)-p0007))
- p2320: 2.47941e-5; = p2224*p2187
- p0646: 0; = IF(p0382<0.5;-SQRT(p0007*EXP(p0514^2*p0008)-p0007);SQRT(p0007*EXP(p0514^2*p0008)-p0007))
- p0871: 0; = p0870*p0001*p0003/(p0818*p0002)
- p1595: 0
- p3229: 1.32975e-6; = p1164/p0818
- p0109: 22.482
- p2737: 1.71075e-6; = p2346*(p1078+p1080)
- p3053: 2.14182e-5; = p2272*p1132
- p3081: 0; = p2300*p1082
- p0691: 52.276; = p0031*(1+p0559*p0163/100)
- p1027: 0; = IF(p1012=0;p1021*(p0704/100)*p0703*1000;0)
- p1935: 0
- p0533: 0; = SQRT(2)*(IF((2*p0401-1)<0;-1;IF((2*p0401-1)>0;1;0))*SQRT(SQRT((2/(pi()*0.140012289)+LN(1-(2*p0401-1)^2)/2)^2-LN(1-(2*p0401-1)^2)/0.140012289)-(2/(pi()*0.140012289)+LN(1-(2*p0401-1)^2)/2)))
- p2784: 0; = p2393*(p1019+p1021)
- p0166: 37.304
- p1993: 400
- p0910: 0.00590066; = p0909/p0818
- p3194: 0; = p2413*p1023
- p1869: 0
- p2005: 1.08564e6; = p1963*p0818+p1959*1000+p1170+p1176+p1182
- p2097: 0.40001
- p2765: 3.25113e-5; = p2374*(p1019+p1021)
- p3423: 0; = p3366*p1239
- p1979: 0; = p0973
- p0804: 0
- p2215: 8.33748e-5; = p1117-p2214
- p1968: 0; = if(p0807=480;p0802*p0811;0)
- p3124: 1.71138e-5; = p2343*p1082
- p4901: 0; = p1934*p3482
- p2993: 0; = p2407*(p1020+p1022)
- p1255: 0; = if(p1232>0;0;p0737/100)
- p0475: 0; = SQRT(2)*(IF((2*p0343-1)<0;-1;IF((2*p0343-1)>0;1;0))*SQRT(SQRT((2/(pi()*0.140012289)+LN(1-(2*p0343-1)^2)/2)^2-LN(1-(2*p0343-1)^2)/0.140012289)-(2/(pi()*0.140012289)+LN(1-(2*p0343-1)^2)/2)))
- p1997: 4.85191e6; = (if(p1152=0;0;p1150/p1152)+if(p1153=0;0;p1151/p1153))*(1+p1157)
- p1800: 0
- p0848: 0
- p1012: 0
- p3293: 0
- p0778: 34.304; = p0118*(1+p0646*p0250/100)
- p0716: 6.149; = p0056*(1+p0584*p0188/100)
- p2388: 4.99791e-5; = p2229*p2217
- p3007: 0; = p2421*(p1079+p1081)
- p0994: 0; = p0990*p0001*p0004/(p0818*p0002)
- p4410: 0; = p1855*p3480
- p4953: 0; = p1780*p3483
- p0788: 0
- p1701: 0
- p3446: 0; = p3370*p1240
- p4513: 0; = p1962*p3480
- p1209: 72.1797; = p1206*p0818*p0822/p0801
- p3426: 0; = p3369*p1239
- p3440: 0; = p3364*p1240
- p0500: 0; = SQRT(2)*(IF((2*p0368-1)<0;-1;IF((2*p0368-1)>0;1;0))*SQRT(SQRT((2/(pi()*0.140012289)+LN(1-(2*p0368-1)^2)/2)^2-LN(1-(2*p0368-1)^2)/0.140012289)-(2/(pi()*0.140012289)+LN(1-(2*p0368-1)^2)/2)))
- p2785: 0; = p2394*(p1019+p1021)
- p2936: 7.66275e-5; = p2350*(p1129+p1131)
- p2553: 0.000160792; = p2357*p1014
- p2330: 1.48529e-6; = p2224*p2198
- p1232: 790000; = p0801
- p0981: 0; = p0978*p0001/(p0818*p0002)
- p2208: 0.000257821; = p1110/p0818
- p2345: 2.96335e-6; = p2228*p2213
- p1327: 0.0423556; = if(p1318=0;if(p1327a=0;1;if(p1327a<0;0;p1327a));0)
- p2685: 3.24843e-5; = p2294*(p1019+p1021)
- p1784: 8.74317e-6; = p1376*1000/p0818
- p0658: 0; = IF(p0394<0.5;-SQRT(p0007*EXP(p0526^2*p0008)-p0007);SQRT(p0007*EXP(p0526^2*p0008)-p0007))
- p3388: 0; = p3369*p1234
- p0835: 536.535; = -LN(1-p0669/100)/p0834
- p4711: 5.78828e-8; = p1950*p3481
- p2756: 6.00153e-5; = p2365*(p1019+p1021)
- p3249: 0
- p3466: 0; = p3371*p1241
- p1213: 15
- p2844: 3.00356e-5; = p2258*(p1079+p1081)
- p0731: 0
- p1616: 0
- p2564: 1.07313e-6; = p2368*p1014
- p4932: 0; = p1759*p3483
- p1115: 0.237849
- p3338: 0; = if(and(p1232=0;p3254<>0);1-(p3334+p3335+p3336+p3337);0)
- p5293: 9.21707e-9; = p1914*p3484
- p2908: 1.33067e-5; = p2322*(p1020+p1022)
- p0584: 0; = IF(p0320<0.5;-SQRT(p0007*EXP(p0452^2*p0008)-p0007);SQRT(p0007*EXP(p0452^2*p0008)-p0007))
- p2395: 0; = p2234*p2184
- p2130: 3.40584e-5; = p2015*p2058*p2092/(p0818*1000)
- p1656: 0
- p0295: 0.5
- p0764: 98.814; = p0104*(1+p0632*p0236/100)
- p1807: 0
- p2112: 0.856281
- p0564: 0; = IF(p0300<0.5;-SQRT(p0007*EXP(p0432^2*p0008)-p0007);SQRT(p0007*EXP(p0432^2*p0008)-p0007))
- p0031: 52.276
- p1704: 0
- p1023: 0.00795; = IF(p1012=0;IF(p1014+p1019+p1020+p1021+p1022=1;0;1-(p1014+p1019+p1020+p1021+p1022));0)
- p0619: 0; = IF(p0355<0.5;-SQRT(p0007*EXP(p0487^2*p0008)-p0007);SQRT(p0007*EXP(p0487^2*p0008)-p0007))
- p1768: 0
- p1261: 0; = if(p1232>0;0;p0732/100)
- p3179: 0; = p2398*p1023
- p2652: 5.85633e-5; = p2261*(p1078+p1080)
- p0929: 222996; = p0801*p0923
- p2119: 0.679049
- p3112: 2.59613e-8; = p2331*p1023
- p3142: 1.02071e-6; = p2361*p1023
- p2073: 0.377647
- p2222: 0.208127; = if(p0765*p0769+p0766*p0770+p0767*p0771+p0768*p0772=0;0;p0769*p0765/(p0765*p0769+p0766*p0770+p0767*p0771+p0768*p0772))
- p0852: 0; = p0847*p0851^3+p0848*p0851^2+p0849*p0851+p0850
- p1066: 0.00318957; = IF(p1012=0;p1052/(p1059*p0818);0)
- p1732: 0
- p3059: 7.61931e-7; = p2278*p1023
- p0138: 10.707
- p0129: 45.114
- p3955: 1.89677e-6; = p1812*p3478
- p0718: 0
- p1747: 0
- p1956: 0
- p2218: 0.000527426; = p1150/p0818
- p2789: 0; = p2398*(p1019+p1021)
- p0845: 0.5
- p3404: 0; = p3366*p1238
- p2412: 0; = p2234*p2202
- p2123: 0.263965
- p1988: 750
- p0286: 0.5
- p1332: 2.5822e6; = p1321*p0801
- p1189: 0.000256766; = p0801*p0001/(p0818*p0002)
- p3326: 0; = if(and(p1232=0;p3255<>0);p3268*p3289;0)
- p2969: 1.25905e-7; = p2383*(p1079+p1081)
- p1660: 0
- p2767: 3.78744e-5; = p2376*(p1078+p1080)
- p3202: 0; = p2421*p1082
- p0904: 9.38563e7; = p0825*p0901+(p0830+p0895)*p0824*p0903
- p2155: 6.16906e-6; = p2015*p2084*p2117/(p0818*1000)
- p1262: 0; = if(p1232>0;0;p0733/100)
- p2667: 9.84546e-5; = p2276*(p1019+p1021)
- p5332: 3.07236e-9; = p1953*p3484
- p2700: 0; = p2309*(p1078+p1080)
- p4926: 0; = p1963*p3482
- p0580: 0; = IF(p0316<0.5;-SQRT(p0007*EXP(p0448^2*p0008)-p0007);SQRT(p0007*EXP(p0448^2*p0008)-p0007))
- p2147: 2.98782e-6; = p2015*p2075*p2109/(p0818*1000)
- p1590: 0
- p3063: 6.13927e-6; = p2282*p1023
- p2034: 0.000148961; = p2015*p2030*p2032/(p0818*1000)
- p2742: 0; = p2351*(p1128+p1130)
- p1612: 0
- p2611: 0; = p2415*p1073
- p3102: 2.5216e-6; = p2321*p1023
- p0373: 0.5
- p0872: 0; = p0864*p0856
- p3351: 0; = if(and(p1232=0;p3256<>0);p3256*(p3274-p3346)/p3349;0)
- p2760: 7.89664e-8; = p2369*(p1019+p1021)
- p0666: 0; = IF(p0402<0.5;-SQRT(p0007*EXP(p0534^2*p0008)-p0007);SQRT(p0007*EXP(p0534^2*p0008)-p0007))
- p1562: 0
- p0747: 17.762; = p0087*(1+p0615*p0219/100)
- p1325: 0; = IF(((p0745*1000*p0752/100)+(p0754*1000*p0761/100))/p0801<0;0;((p0745*1000*p0752/100)+(p0754*1000*p0761/100))/p0801)
- p3450: 0; = p3374*p1240
- p0581: 0; = IF(p0317<0.5;-SQRT(p0007*EXP(p0449^2*p0008)-p0007);SQRT(p0007*EXP(p0449^2*p0008)-p0007))
- p1923: 0
- p2102: 0.922577
- p1252: 0; = if(p1232>0;0;p0724*2000*p0723*1000*p0725/100)
- p4033: 2.01531e-5; = p1890*p3478
- p1720: 0
- p0609: 0; = IF(p0345<0.5;-SQRT(p0007*EXP(p0477^2*p0008)-p0007);SQRT(p0007*EXP(p0477^2*p0008)-p0007))
- p1789: 0
- p2775: 1.05564e-6; = p2384*(p1078+p1080)
- p0840: 0.0900709; = p0839*p0831
- p0897: 0
- p2705: 0; = p2314*(p1128+p1130)
- p3350: 0; = if(and(p1232=0;p3256<>0);p3256*(p3273*p3277-p3345)/p3349;0)
- p1962: 4.47913e-6; = p1960*1000/p0818
- p0446: 0; = SQRT(2)*(IF((2*p0314-1)<0;-1;IF((2*p0314-1)>0;1;0))*SQRT(SQRT((2/(pi()*0.140012289)+LN(1-(2*p0314-1)^2)/2)^2-LN(1-(2*p0314-1)^2)/0.140012289)-(2/(pi()*0.140012289)+LN(1-(2*p0314-1)^2)/2)))
- p1879: 0
- p2241: 0.000222385; = p2222*p2186
- p0833: 3.6767e9; = p0830+p0832
- p2880: 0.000138112; = p2294*(p1020+p1022)
- p1047: 0.330448; = IF(p1012=0;IF(p1037+p1044+p1045+p1046=1;0;IF(p1037+p1044+p1045+p1046+p1041>1;1-(p1037+p1044+p1045+p1046);p1041));0)
- p1154: 0.00127068; = if(p1152*p0818=0;0;p1150/(p1152*p0818))
- p0548: 0; = IF(p0284<0.5;-SQRT(p0007*EXP(p0416^2*p0008)-p0007);SQRT(p0007*EXP(p0416^2*p0008)-p0007))
- p1204: 0.980791
- p0878: 0; = p0867*p0856
- p2035: 0.000108158; = p2015*p2029*(1-p2031)/(p0818*1000)
- p0956: 0; = if(and(p0683>0;or(p0807=56;p0807=100;and(p0807=60;p0901>0.06)));p0938;0)
- p1751: 0
- p2973: 1.74371e-6; = p2387*(p1079+p1081)
- p1994: 750
- p2757: 1.2865e-5; = p2366*(p1019+p1021)
- p1338: 630400; = p1324*p0801
- p3090: 0; = p2309*p1082
- p0213: 11.076
- p5163: 7.37366e-8; = p1784*p3484
- p0544: 0; = IF(p0280<0.5;-SQRT(p0007*EXP(p0412^2*p0008)-p0007);SQRT(p0007*EXP(p0412^2*p0008)-p0007))
- p3394: 0; = p3375*p1234
- p2210: 5.03397e-5; = 6*1.00794*p2208/30.973762
- p1466: 15
- p3378: 0; = if(p1232=0;p3246*p3360/p0818;0)
- p0713: 31.269; = p0053*(1+p0581*p0185/100)
- p3087: 0; = p2306*p1082
- p3222: 0.224242; = IF(p3216=0;0;p1223*40.078/100.0869)
- p1966: 750000; = if(p0814=0;p0802;0)
- p2977: 7.7128e-6; = p2391*(p1129+p1131)
- p2649: 2.4083e-5; = p2258*(p1078+p1080)
- p0955: 0; = if(and(p0683>0;or(p0807=56;p0807=100;and(p0807=60;p0901>0.06)));p0937;0)
- p1108: 34884.2; = IF(p1071=0;p1105*p1102*p1095;0)
- p1875: 0
- p2907: 4.8548e-5; = p2321*(p1020+p1022)
- p3204: 0; = p2423*p1082
- p3230: 2.72001e-7; = p1170/p0818
- p1958: 651
- p1950: 3.64299e-7; = p1542*1000/p0818
- p0052: 25.072
- p3130: 2.95686e-6; = p2349*p1082
- p1314: 0; = p1310*p1252/p0818
- p2237: 0.00145004; = p2222*p2182
- p1553: 0
- p3923: 1.89677e-6; = p1780*p3478
- p1723: 0
- p1897: 0
- p0936: 4.26199e-5; = p0930*p0001/(p0818*p0002)
- p0865: 0; = IF(p0858+p0864=1;0;IF(p0858+p0864+p0860>1;1-(p0858+p0864);p0860))
- p2824: 4.87192e-5; = p2238*(p1020+p1022)
- p1247: 0; = if(p1232>0;0;p1242*p0001/(p0818*p0002))
- p0987: 1; = if(p0978>0;0;if(and(p0687=0;p0691=0;p0695=0;p0699=0);0;IF(p0982+p0985+p0986=1;0;1-(p0982+p0985+p0986))))
- p2463: 8.53614e-7; = p2267*p1073
- p2131: 1.31231e-5; = p2015*p2059*p2093/(p0818*1000)
- p0518: 0; = SQRT(2)*(IF((2*p0386-1)<0;-1;IF((2*p0386-1)>0;1;0))*SQRT(SQRT((2/(pi()*0.140012289)+LN(1-(2*p0386-1)^2)/2)^2-LN(1-(2*p0386-1)^2)/0.140012289)-(2/(pi()*0.140012289)+LN(1-(2*p0386-1)^2)/2)))
- p0951: 0; = if(and(p0683=0;or(p0807=480;p0807=32;p0807=1;and(p0807=60;p0901<0.03)));p0939;0)
- p2965: 3.53759e-5; = p2379*(p1079+p1081)
- p1888: 0
- p2089: 0.40001
- p3472: 0; = p3377*p1241
- p3274: 0
- p1972: 0; = if(p0807=480;p1967*p0001/(p0818*p0002);0)
- p2745: 5.97205e-5; = p2354*(p1019+p1021)
- p3220: 0.000817212; = p3216*p1228
- p2473: 0.000482061; = p2277*p1014
- p2831: 1.96617e-5; = p2245*(p1020+p1022)
- p2093: 0.260958
- p2300: 0; = p2227*p2207
- p1665: 0
- p2896: 0; = p2310*(p1079+p1081)
- p3475: 0; = p3380*p1241
- p2430: 0; = p2236*p2220
- p1085: 27453.4; = IF(p1071=0;p1079*(p0710/100)*p0703*1000;0)
- p1253: 0; = if(p1232>0;0;p0735/100)
- p3224: 0.501945; = IF(p3216=0;0;1-p3221-p3222-p3223)
- p3133: 5.09301e-6; = p2352*p1132
- p1221: 0.0263674; = p1216*(1+p1220*p1217/100)
- p2957: 0.000195408; = p2371*(p1020+p1022)
- p0870: 0; = p0858*p0856
- p3264: 0
- p0744: 3.932; = p0084*(1+p0612*p0216/100)
- p2352: 2.8424e-5; = p2232*p2220
- p1965: 0.000274241; = p1963+p1959*p1964*1000/p0818
- p2881: 1.98775e-5; = p2295*(p1020+p1022)
- p1905: 0
- p0346: 0.5
- p2413: 0; = p2234*p2203
- p1052: 2.93305e6; = IF(p1012=0;p1045*p1036;0)
- p3032: 9.28682e-9; = p2251*p1023
- p1020: 0.09436; = IF(p1012=0;IF(p1014+p1019=1;0;IF(p1014+p1019+p1016>1;1-(p1014+p1019);p1016));0)
- p3482: 0; = if(p1328+p1330+p1332+p1334+p1336+p1338+p1340+p1342+p1344=0;0;p1340/(p1328+p1330+p1332+p1334+p1336+p1338+p1340+p1342+p1344))
- p3405: 0; = p3367*p1238
- p0484: 0; = SQRT(2)*(IF((2*p0352-1)<0;-1;IF((2*p0352-1)>0;1;0))*SQRT(SQRT((2/(pi()*0.140012289)+LN(1-(2*p0352-1)^2)/2)^2-LN(1-(2*p0352-1)^2)/0.140012289)-(2/(pi()*0.140012289)+LN(1-(2*p0352-1)^2)/2)))
- p2635: 4.04015e-6; = p2244*(p1019+p1021)
- p0844: 0.834472
- p2204: 0.000380636; = p1109/p0818
- p3880: 1.92543e-7; = p1943*p3477
- p0708: 0
- p1196: 0.59
- p1302: 0; = IF(p1297+p1300+p1301=p1262;0;p1262-(p1297+p1300+p1301))
- p1806: 0
- p2721: 5.34706e-8; = p2330*(p1019+p1021)
- p1893: 0
- p2214: 2.20938e-5; = p1107/p0818
- p2018: 0.1978
- p3070: 4.62983e-5; = p2289*p1023
- p1078: 0.25072; = IF(p1071=0;IF(p1073=1;0;IF(p1073+p1074>1;1-p1073;p1074));0)
- p4520: 2.89414e-6; = p1759*p3481
- p2384: 4.21045e-6; = p2229*p2213
- p0622: 0; = IF(p0358<0.5;-SQRT(p0007*EXP(p0490^2*p0008)-p0007);SQRT(p0007*EXP(p0490^2*p0008)-p0007))
- p2595: 0; = p2399*p1014
- p2235: 0; = 1-(p2226+p2227+p2228+p2229)
- p2940: 0.000253912; = p2354*(p1020+p1022)
- p1634: 0
- p2312: 0; = p2231*p2219
- p0810: 0
- p3374: 0; = if(p1232=0;p3246*p3356/p0818;0)
- p2801: 0; = p2410*(p1019+p1021)
- p0794: 0
- p1648: 0
- p0903: 0.0129401
- p0697: 0
- p1596: 0
- p2072: 0.134
- p3298: 0; = if(p1283+p1284+p1285+p1286=0;0;p1283/(p1283+p1284+p1285+p1286))
- p1051: 670207; = IF(p1012=0;p1044*p1036;0)
- p3828: 6.41809e-8; = p1891*p3477
- p1719: 0
- p2659: 1.39788e-6; = p2268*(p1078+p1080)
- p3302: 0; = if(and(p1232=0;p3252<>0);p3258*(p3278*(p3282*p1256+p3286*(p1253+p1257)+p1258*p3288+p3297*p3287));0)
- p2141: 8.73085e-6; = p2015*p2069*p2103/(p0818*1000)
- p1135: 17066.3; = if(p1121=0;p1129*(p0716/100)*p0703*1000;0)
- p1558: 0
- p1627: 0
- p0799: 38.931; = p0139*(1+p0667*p0271/100)
- p0957: 0; = if(and(p0683>0;or(p0807=56;p0807=100;and(p0807=60;p0901>0.06)));p0939;0)
- p0571: 0; = IF(p0307<0.5;-SQRT(p0007*EXP(p0439^2*p0008)-p0007);SQRT(p0007*EXP(p0439^2*p0008)-p0007))
- p2111: 0.856281
- p2230: 0.226638; = if(p0783*p0787+p0784*p0788+p0785*p0789+p0786*p0790=0;0;p0787*p0783/(p0783*p0787+p0784*p0788+p0785*p0789+p0786*p0790))
- p2995: 0; = p2409*(p1020+p1022)
- p1249: 0; = if(p1232>0;0;p1244*p0001/(p0818*p0002))
- p0817: 0
- p0239: 26.39
- p1795: 0
- p1076: 0; = IF(p1071=0;p0714/100;0)
- p2258: 9.60554e-5; = p2226*p2204
- p3467: 0; = p3372*p1241
- p2290: 2.2032e-6; = p2223*p2197
- p2444: 0.00117012; = p2248*p1014
- p1873: 5.06375e-5; = p1465*1000/p0818
- p2919: 5.67274e-5; = p2333*(p1020+p1022)
- p0587: 0; = IF(p0323<0.5;-SQRT(p0007*EXP(p0455^2*p0008)-p0007);SQRT(p0007*EXP(p0455^2*p0008)-p0007))
- p1647: 0
- p2888: 0; = p2302*(p1079+p1081)
- p2326: 0.00112884; = p2224*p2193
- p1963c: 3.35057e-5; = p1588*p1792+p1589*p1793+p1590*p1794+p1591*p1795+p1592*p1796+p1593*p1797+p1594*p1798+p1595*p1799+p1596*p1800+p1597*p1801+p1598*p1802+p1599*p1803+p1600*p1804+p1601*p1805+p1602*p1806+p1603*p1807+p1604*p1808+p1605*p1809+p1606*p1810+p1607*p1811
- p2762: 4.59604e-5; = p2371*(p1019+p1021)
- p0022: 820
- p1668: 0
- p0991: 0; = p0987*p0886
- p1168: 6.64875e-7; = p1164*p1167/p0818
- p3034: 3.3513e-8; = p2253*p1023
- p1787: 0
- p2333: 0.000370622; = p2224*p2201
- p3068: 2.18494e-5; = p2287*p1023
- p3097: 1.96028e-6; = p2316*p1023
- p0042: 820
- p1866: 0
- p1022: 0.0587; = IF(p1012=0;IF(p1014+p1019+p1020+p1021=1;0;IF(p1014+p1019+p1020+p1021+p1018>1;1-(p1014+p1019+p1020+p1021);p1018));0)
- p1852: 0
- p3399: 0; = p3380*p1234
- p0923: 0.282273; = IF(p0918=1;0;IF(p0918+p0919>1;1-p0918;p0919))
- p2796: 0; = p2405*(p1019+p1021)
- p1651: 0.299611
- p2462: 8.16321e-8; = p2266*p1073
- p3422: 0; = p3365*p1239
- p2559: 2.96759e-5; = p2363*p1014
- p2729: 8.63199e-6; = p2338*(p1078+p1080)
- p1165: 0.000256766; = p0801*p0001/(p0818*p0002)
- p2377: 4.8918e-5; = p2229*p2206
- p2875: 0.000891373; = p2289*(p1020+p1022)
- p2825: 7.7778e-6; = p2239*(p1020+p1022)
- p0516: 0; = SQRT(2)*(IF((2*p0384-1)<0;-1;IF((2*p0384-1)>0;1;0))*SQRT(SQRT((2/(pi()*0.140012289)+LN(1-(2*p0384-1)^2)/2)^2-LN(1-(2*p0384-1)^2)/0.140012289)-(2/(pi()*0.140012289)+LN(1-(2*p0384-1)^2)/2)))
- p0046: 3.6
- p3025: 8.92199e-7; = p2244*p1023
- p4445: 0; = p1890*p3480
- p3476: 0; = if(p1328+p1330+p1332+p1334+p1336+p1338+p1340+p1342+p1344=0;0;p1328/(p1328+p1330+p1332+p1334+p1336+p1338+p1340+p1342+p1344))
- p2423: 0; = p2235*p2213
- p1060: 0.21
- p3140: 2.91101e-7; = p2359*p1023
- p0249: 42.594
- p3121: 6.69324e-6; = p2340*p1082
- p0490: 0; = SQRT(2)*(IF((2*p0358-1)<0;-1;IF((2*p0358-1)>0;1;0))*SQRT(SQRT((2/(pi()*0.140012289)+LN(1-(2*p0358-1)^2)/2)^2-LN(1-(2*p0358-1)^2)/0.140012289)-(2/(pi()*0.140012289)+LN(1-(2*p0358-1)^2)/2)))
- p1055: 15406.8; = IF(p1012=0;p1048*p1036;0)
- p2676: 2.19336e-6; = p2285*(p1019+p1021)
- p2519: 7.99068e-5; = p2323*p1014
- p2244: 0.000112226; = p2222*p2189
- p3100: 1.36958e-6; = p2319*p1023
- p3368: 0; = if(p1232=0;p3245*p3356/p0818;0)
- p1090: 7.15453e-6; = IF(p1071=0;p1084*p0001/(p0818*p0002);0)
- p2812: 0; = p2421*(p1078+p1080)
- p1809: 0
- p1542: 1
- p1695: 0
- p0556: 0; = IF(p0292<0.5;-SQRT(p0007*EXP(p0424^2*p0008)-p0007);SQRT(p0007*EXP(p0424^2*p0008)-p0007))
- p1783: 0
- p3392: 0; = p3373*p1234
- p2794: 0; = p2403*(p1019+p1021)
- p3645: 0; = p1914*p3476
- p2297: 0; = p2227*p2204
- p1570: 0
- p1856: 0
- p1227: 0.000256766; = IF(p1221=0;0;p1226*p0001/(p0818*p0002))
- p1954: 0
- p2750: 1.31819e-6; = p2359*(p1019+p1021)
- p3210: 0; = p2429*p1132
- p0298: 0.5
- p2955: 3.35739e-7; = p2369*(p1020+p1022)
- p0641: 0; = IF(p0377<0.5;-SQRT(p0007*EXP(p0509^2*p0008)-p0007);SQRT(p0007*EXP(p0509^2*p0008)-p0007))
- p2956: 7.38157e-7; = p2370*(p1020+p1022)
- p2458: 2.29364e-5; = p2262*p1073
- p2733: 3.89787e-6; = p2342*(p1078+p1080)
- p1963h: 1.58411e-5; = p1686*p1890+p1687*p1891+p1688*p1892+p1689*p1893+p1690*p1894+p1691*p1895+p1692*p1896+p1693*p1897+p1694*p1898+p1695*p1899+p1696*p1900+p1697*p1901+p1698*p1902+p1699*p1903+p1700*p1904+p1701*p1905+p1702*p1906+p1703*p1907+p1704*p1908+p1705*p1909
- p0321: 0.5
- p2410: 0; = p2234*p2200
- p3691: 7.50917e-6; = p1754*p3477
- p2176: 0.00320104; = p0895*p0913/p0818
- p1038: 0.0115234
- p0868: 0; = IF(p0858+p0864+p0865+p0866+p0867=1;0;IF(p0858+p0864+p0865+p0866+p0867+p0863>1;1-(p0858+p0864+p0865+p0866+p0867);p0863))
- p1631: 0
- p0996: 0.558326; = if(p0888=0;0;if((p0691*p0690*1000*p0692/100)/p0888>1;1;(p0691*p0690*1000*p0692/100)/p0888))
- p1802: 0
- p2041: 2.20896e-5; = p2015*p2040/(p0818*1000)
- p1272: 0; = IF(p1267+p1270+p1271=p1259;0;p1259-(p1267+p1270+p1271))
- p3352: 0; = if(and(p1232=0;p3256<>0);p3256*(p3275-p3347)/p3349;0)
- p1084: 22012.6; = IF(p1071=0;p1078*(p0710/100)*p0703*1000;0)
- p0786: 27.102; = p0126*(1+p0654*p0258/100)
- p4505: 0; = p1950*p3480
- p3225: 5.27828e-5; = p3221*p1229
- p1174: 1.36e-7; = p1170*p1173/p0818
- p3463: 0; = p3368*p1241
- p0705: 80.299; = p0045*(1+p0573*p0177/100)
- p3113: 6.8726e-6; = p2332*p1023
- p2103: 0.912485
- p2296: 0.00148883; = p2223*p2203
- p2030: 6.61
- p0928: 333765; = p0801*p0918
- p1156: 0.0550369; = p1064+p1065+p1066+p1067+p1068+p1069+p1070+p1116+p1117+p1118+p1119+p1120+p1154+p1155
- p3431: 0; = p3374*p1239
- p1555: 0.933291
- p0800: 6.149; = p0140*(1+p0668*p0272/100)
- p2724: 1.33424e-5; = p2333*(p1019+p1021)
- p2984: 0; = p2398*(p1020+p1022)
- p2866: 6.4198e-5; = p2280*(p1020+p1022)
- p3052: 2.4161e-6; = p2271*p1082
- p2534: 1.21372e-5; = p2338*p1073
- p0358: 0.5
- p1268: 0
- p1195: 0.45
- p5328: 3.07236e-9; = p1949*p3484
- p0960: 0; = if(and(p0683>0;or(p0807=480;p0807=32;p0807=1;and(p0807=60;p0901<0.03)));p0936;0)
- p0841: -0.151962
- p0613: 0; = IF(p0349<0.5;-SQRT(p0007*EXP(p0481^2*p0008)-p0007);SQRT(p0007*EXP(p0481^2*p0008)-p0007))
- p3079: 0; = p2298*p1082
- p1908: 0
- p0811: 0; = if(p0807=480;1-p0810;0)
- p2232: 0.429243; = if(p0783*p0787+p0784*p0788+p0785*p0789+p0786*p0790=0;0;p0789*p0785/(p0783*p0787+p0784*p0788+p0785*p0789+p0786*p0790))
- p3123: 1.30686e-6; = p2342*p1082
- p3267: 0
- p2474: 7.69589e-5; = p2278*p1014
- p0177: 6.976
- p2383: 4.02651e-7; = p2229*p2212
- p2310: 0; = p2227*p2217
- p0317: 0.5
- p2427: 0; = p2235*p2217
- p4858: 0; = p1891*p3482
- p3002: 0; = p2416*(p1079+p1081)
- p1837: 0
- p3260: 0
- p2570: 0.000725173; = p2374*p1014
- p3075: 7.17362e-6; = p2294*p1023
- p3065: 1.92611e-6; = p2284*p1023
- p1198: 0.44
- p4489: 0; = p1934*p3480
- p1775: 0
- p1589: 0
- p0294: 0.5
- p0416: 0; = SQRT(2)*(IF((2*p0284-1)<0;-1;IF((2*p0284-1)>0;1;0))*SQRT(SQRT((2/(pi()*0.140012289)+LN(1-(2*p0284-1)^2)/2)^2-LN(1-(2*p0284-1)^2)/0.140012289)-(2/(pi()*0.140012289)+LN(1-(2*p0284-1)^2)/2)))
- p2234: 0; = 1-(p2222+p2223+p2224+p2225)
- p3321: 0; = if(and(p1232=0;p3253<>0);IF((p3317+p3318+p3319+p3320)+(p3253*(p3261*(1-p3277))/p3316)>p3253;p3253-(p3317+p3318+p3319+p3320);p3253*(p3261*(1-p3277))/p3316);0)
- p1010: 364423; = p0890
- p1877: 0
- p3473: 0; = p3378*p1241
- p0578: 0; = IF(p0314<0.5;-SQRT(p0007*EXP(p0446^2*p0008)-p0007);SQRT(p0007*EXP(p0446^2*p0008)-p0007))
- p2602: 0; = p2406*p1014
- p0976: 0; = IF(p0687=0;IF(OR(p0686=0;p0689=0);0;p0686*1000*p0689/100);0)
- p0381: 0.5
- p0881: 0; = p0880*p0001*p0003/(p0818*p0002)
- p0018: 222.996
- p0675: 0
- p2511: 0.000901993; = p2315*p1014
- p1167: 0.5
- p2591: 0; = p2395*p1014
- p3235: 0.118093
- p2580: 1.48431e-6; = p2384*p1073
- p3217: 0.00153639; = p3213*p1228
- p2391: 2.27873e-5; = p2233*p2220
- p3337: 0; = IF(or(p3254=0;p1232>0);0;p3272*p3289)
- p4239: 1.75683e-7; = p1890*p3479
- p1157: 0.217341
- p2834: 0.000223039; = p2248*(p1020+p1022)
- p2786: 0; = p2395*(p1019+p1021)
- p3008: 0; = p2422*(p1079+p1081)
- p2209: 0.00011659; = 14.0067*p2208/30.973762
- p1730: 0.381333
- p0682: 820; = p0022*(1+p0550*p0154/100)
- p2555: 2.94026e-5; = p2359*p1014
- p2507: 0; = p2311*p1123
- p3290: 0
- p2679: 2.12091e-5; = p2288*(p1019+p1021)
- p1137: 0; = if(p1121=0;p1131*(p0716/100)*p0703*1000;0)
- p2898: 0; = p2312*(p1129+p1131)
- p2697: 0; = p2306*(p1078+p1080)
- p2134: 9.196e-5; = p2015*p2062*p2096/(p0818*1000)
- p3198: 0; = p2417*p1082
- p0214: 1.614
- p1711: 0
- p2066: 0.109412
- p3586: 0; = p1855*p3476
- p0028: 78.993
- p0152: 0
- p2620: 0; = p2424*p1073
- p3240: 2.44102e-9; = p3234*p1188*p3235/p0818
- p0816: 0
- p2295: 0.000129867; = p2223*p2202
- p3389: 0; = p3370*p1234
- p0519: 0; = SQRT(2)*(IF((2*p0387-1)<0;-1;IF((2*p0387-1)>0;1;0))*SQRT(SQRT((2/(pi()*0.140012289)+LN(1-(2*p0387-1)^2)/2)^2-LN(1-(2*p0387-1)^2)/0.140012289)-(2/(pi()*0.140012289)+LN(1-(2*p0387-1)^2)/2)))
- p2545: 1.24005e-5; = p2349*p1073
- p2673: 2.78005e-5; = p2282*(p1019+p1021)
- p1716: 0
- p3396: 0; = p3377*p1234
- p2901: 0.000171931; = p2315*(p1020+p1022)
- p2893: 0; = p2307*(p1079+p1081)
- p4936: 0; = p1763*p3483
- p2476: 0.000336798; = p2280*p1014
- p1682: 0
- p2178: 0.042205; = (p0895*p0831/(1-p0831))/(p0818)
- p1535: 3
- p4651: 4.92004e-6; = p1890*p3481
- p2247: 0.000261423; = p2222*p2192
- p2470: 7.23897e-6; = p2274*p1123
- p2157: 2.1056e-6; = p2015*p2086*p2119/(p0818*1000)
- p2864: 1.46693e-5; = p2278*(p1020+p1022)
- p1671: 0
- p3690: 0; = p1963*p3476
- p2968: 9.0452e-5; = p2382*(p1079+p1081)
- p1309: 0
- p0735: 0
- p2396: 0; = p2234*p2185
- p2126: 3.64968e-5; = p2015*p2054*p2088/(p0818*1000)
- p1674: 0
- p1125: 0.33847; = if(p1121=0;p0719/100;0)
- p0914: 5.21043e7; = p0825*p0911+(p0830+p0895)*p0824*p0913
- p4034: 2.37096e-7; = p1891*p3478
- p1978: 496
- p1193: 0; = IF(OR(p1036=0;p1095=0);0.0001*p0857;0)
- p0680: 333.765; = p0020*(1+p0548*p0152/100)
- p3410: 0; = p3372*p1238
- p1259: 0; = if(p1232>0;0;p0730/100)
- p1890: 3.09654e-5; = p1482*1000/p0818
- p2090: 0.40001
- p3004: 0; = p2418*(p1079+p1081)
- p3871: 1.28362e-7; = p1934*p3477
- p2199: 2.02543e-5; = p1069-p2197-p2198
- p0890: 364423; = p0686*1000*p0687*p0885/100
- p0404: 0.5
- p0310: 0.5
- p2773: 7.25259e-5; = p2382*(p1078+p1080)
- p1148: 0.111546; = if(p1121=0;IF(p1146=1;0;1-p1146);0)
- p2747: 2.09285e-6; = p2356*(p1019+p1021)
- p0855: 2.10088; = p0854*p0001*p0003/(p0818*p0002)
- p2563: 0.00283658; = p2367*p1014
- p0004: 0.0254
- p2525: 7.26647e-7; = p2329*p1014
- p3128: 2.16448e-6; = p2347*p1082
- p1932: 0
- p0220: 18.336
- p3003: 0; = p2417*(p1079+p1081)
- p2754: 1.33044e-6; = p2363*(p1019+p1021)
- p1074: 0.25072; = IF(p1071=0;p0712/100;0)
- p0431: 0; = SQRT(2)*(IF((2*p0299-1)<0;-1;IF((2*p0299-1)>0;1;0))*SQRT(SQRT((2/(pi()*0.140012289)+LN(1-(2*p0299-1)^2)/2)^2-LN(1-(2*p0299-1)^2)/0.140012289)-(2/(pi()*0.140012289)+LN(1-(2*p0299-1)^2)/2)))
- p2479: 0.000169965; = p2283*p1014
- p1572: 0
- p1153: 0.365265
- p0671: 0
- p1637: 0
- p1951: 0
- p2277: 0.000600333; = p2223*p2183
- p2425: 0; = p2235*p2215
- p2132: 1.26145e-5; = p2015*p2060*p2094/(p0818*1000)
- p0273: 0.5
- p0615: 0; = IF(p0351<0.5;-SQRT(p0007*EXP(p0483^2*p0008)-p0007);SQRT(p0007*EXP(p0483^2*p0008)-p0007))
- p2494: 0; = p2298*p1073
- p1017: 0; = IF(p1012=0;p0708/100;0)
- p1609: 0
- p2804: 0; = p2413*(p1019+p1021)
- p0250: 30.368
- p0049: 5.87
- p0858: 0; = p0670*1000/p0856
- p3339: 0; = if(and(p1232=0;p3254<>0);p3254*(p3269*p3277-p3334)/p3338;0)
- p0308: 0.5
- p2890: 0; = p2304*(p1079+p1081)
- p0653: 0; = IF(p0389<0.5;-SQRT(p0007*EXP(p0521^2*p0008)-p0007);SQRT(p0007*EXP(p0521^2*p0008)-p0007))
- p2464: 1.96552e-6; = p2268*p1073
- p0684: 0
- p2195: 0.00150085; = p2194*p2193
- p3424: 0; = p3367*p1239
- p1805: 0
- p2807: 0; = p2416*(p1078+p1080)
- p3212: 0; = p2431*p1132
- p1580: 0.438721
- p3443: 0; = p3367*p1240
- p0501: 0; = SQRT(2)*(IF((2*p0369-1)<0;-1;IF((2*p0369-1)>0;1;0))*SQRT(SQRT((2/(pi()*0.140012289)+LN(1-(2*p0369-1)^2)/2)^2-LN(1-(2*p0369-1)^2)/0.140012289)-(2/(pi()*0.140012289)+LN(1-(2*p0369-1)^2)/2)))
- p5337: 3.77753e-8; = p1962*p3484
- p1400: 99
- p3377: 0; = if(p1232=0;p3246*p3359/p0818;0)
- p0938: 0; = p0932*p0001/(p0818*p0002)
- p2506: 0; = p2310*p1073
- p0846: 0.818208; = p0841*p0845^3+p0842*p0845^2+p0843*p0845+p0844
- p2223: 0.392539; = if(p0765*p0769+p0766*p0770+p0767*p0771+p0768*p0772=0;0;p0770*p0766/(p0765*p0769+p0766*p0770+p0767*p0771+p0768*p0772))
- p2334: 5.33408e-5; = p2224*p2202
- p2104: 0.817136
- p2033: 9.41621e-5; = p2015*p2029*p2031/(p0818*1000)
- p1769: 0
- p0954: 0; = if(and(p0683>0;or(p0807=56;p0807=100;and(p0807=60;p0901>0.06)));p0936;0)
- p3360: 0; = if(p1232=0;p3310+p3321+p3332+p3343+p3354;0)
- p2568: 0.00043951; = p2372*p1014
- p3415: 0; = p3377*p1238
- p1263: 0; = if(p1232>0;0;IF(p1259=1;0;IF(p1259+p1260>1;1-p1259;p1260)))
- p2432: 0.0119618; = p1158
- p1014: 0.80299; = IF(p1012=0;p0705/100;0)
- p0089: 0.572
- p3158: 4.11204e-6; = p2377*p1082
- p3462: 0; = p3367*p1241
- p0869: 1; = IF(p0858+p0864+p0865+p0866+p0867+p0868=1;0;1-(p0858+p0864+p0865+p0866+p0867+p0868))
- p3228: 0.000180263; = p3224*p1229
- p2521: 0.000162618; = p2325*p1014
- p0327: 0.5
- p1746: 0.615605
- p2823: 0.000221943; = p2237*(p1020+p1022)
- p0108: 55.212
- p4093: 2.37096e-7; = p1950*p3478
- p2835: 4.7811e-5; = p2249*(p1020+p1022)
- p0345: 0.5
- p0677: 0
- p2181: 143.214; = p0887+p0889+p0893+p2180
- p3341: 0; = if(and(p1232=0;p3254<>0);p3254*(p3271-p3336)/p3338;0)
- p2671: 1.50995e-5; = p2280*(p1019+p1021)
- p1623: 0
- p2904: 2.07534e-5; = p2318*(p1020+p1022)
- p3152: 1.01496e-5; = p2371*p1023
- p2407: 0; = p2234*p2197
- p3375: 0; = if(p1232=0;p3246*p3357/p0818;0)
- p3395: 0; = p3376*p1234
- p3022: 1.76796e-6; = p2241*p1023
- p0992: 0; = p0988*p0001*p0004/(p0818*p0002)
- p1597: 0
- p3282: 0
- p4133: 4.96045e-8; = p1784*p3479
- p0814: 0; = if(p0807=480;p0810*p0812+p0811*p0813;0)
- p2201: 0.00229873; = 12.01*p2200/(2*14.0067)
- p2179: 0; = p0970+p0971+p0972
- p2718: 8.71128e-6; = p2327*(p1019+p1021)
- p2216: 1.27083e-5; = p1108/p0818
- p0508: 0; = SQRT(2)*(IF((2*p0376-1)<0;-1;IF((2*p0376-1)>0;1;0))*SQRT(SQRT((2/(pi()*0.140012289)+LN(1-(2*p0376-1)^2)/2)^2-LN(1-(2*p0376-1)^2)/0.140012289)-(2/(pi()*0.140012289)+LN(1-(2*p0376-1)^2)/2)))
- p1955: 0
- p3110: 7.19417e-9; = p2329*p1023
- p1752: 0
- p2882: 0.00022788; = p2296*(p1020+p1022)
- p0977: 0; = IF(p0687=0;IF(OR(p0686=0;p0688=0);0;p0686*1000*p0688/100);0)
- p1798: 0
- p2867: 9.23954e-6; = p2281*(p1020+p1022)
- p1231: 0.00698966; = IF(p1221=0;0;p1230*(p1228+p1229))
- p4721: 0; = p1754*p3482
- p0736: 0
- p1121: 0
- p2715: 9.00885e-7; = p2324*(p1019+p1021)
- p2364: 0.000299078; = p2225*p2192
- p2752: 4.62209e-6; = p2361*(p1019+p1021)
- p3098: 3.1295e-7; = p2317*p1023
- p1983: 50
- p0306: 0.5
- p2071: 0.151
- p2386: 3.65856e-5; = p2229*p2215
- p2930: 8.86127e-8; = p2344*(p1079+p1081)
- p1556: 0
- p2291: 3.6162e-6; = p2223*p2198
- p3028: 2.07831e-6; = p2247*p1023
- p1672: 0
- p0980: 0; = IF(p0977=0;0;p0977*p0001/(p0818*p0002))
- p1926: 0
- p1254: 0; = if(p1232>0;0;p0736/100)
- p3477: 0.176177; = if(p1328+p1330+p1332+p1334+p1336+p1338+p1340+p1342+p1344=0;0;p1330/(p1328+p1330+p1332+p1334+p1336+p1338+p1340+p1342+p1344))
- p0703: 820; = p0043*(1+p0571*p0175/100)
- p0459: 0; = SQRT(2)*(IF((2*p0327-1)<0;-1;IF((2*p0327-1)>0;1;0))*SQRT(SQRT((2/(pi()*0.140012289)+LN(1-(2*p0327-1)^2)/2)^2-LN(1-(2*p0327-1)^2)/0.140012289)-(2/(pi()*0.140012289)+LN(1-(2*p0327-1)^2)/2)))
- p3064: 1.68273e-6; = p2283*p1023
- p1613: 0
- p2172: 0.276913; = p2166-(p2167+p2168+p2169+p2170)
- p1563: 0
- p2597: 0; = p2401*p1014
- p1306: 0; = p1302*p1252/p0818
- p2365: 0.00166709; = p2225*p2193
- p0727: 0
- p2599: 0; = p2403*p1014
- p2617: 0; = p2421*p1073
- p0798: 10.707; = p0138*(1+p0666*p0270/100)
- p0763: 820; = p0103*(1+p0631*p0235/100)
- p2903: 6.02518e-6; = p2317*(p1020+p1022)
- p3155: 7.17957e-6; = p2374*p1023
- p0219: 37.688
- p3401: 0; = p3363*p1238
- p0164: 29.744
- p4730: 0; = p1763*p3482
- p0212: 1.583
- p2059: 1.00168
- p3165: 3.53931e-7; = p2384*p1082
- p2098: 0.856281
- p2654: 7.37668e-6; = p2263*(p1078+p1080)
- p4096: 2.37096e-7; = p1953*p3478
- p1939: 0
- p2317: 3.93648e-5; = p2224*p2184
- p0926: 0; = IF(p0918+p0923+p0924+p0925=1;0;IF(p0918+p0923+p0924+p0925+p0922>1;1-(p0918+p0923+p0924+p0925);p0922))
- p0797: 48.298; = p0137*(1+p0665*p0269/100)
- p4541: 4.63062e-7; = p1780*p3481
- p2627: 0; = p2431*p1123
- p4635: 8.68242e-7; = p1874*p3481
- p1770: 0
- p3119: 2.89408e-6; = p2338*p1082
- p2981: 0; = p2395*(p1020+p1022)
- p3120: 2.40294e-5; = p2339*p1082
- p5087: 0; = p1914*p3483
- p2734: 5.10442e-5; = p2343*(p1078+p1080)
- p3221: 0.146975; = IF(p3216=0;0;p1223*12.0107/100.0869+(1-p1224)*12.0107/84.3139)
- p0891: 0; = IF(p3251=0;0;62.4*6272640/(12*12*12))
- p2120: 0.51828
- p3030: 2.48332e-6; = p2249*p1023
- p2261: 0.00023358; = p2226*p2207
- p1759: 1.82149e-5; = p1351*1000/p0818
- p1885: 0
- p3263: 0
- p1653: 0
- p2418: 0; = p2235*p2208
- p3029: 1.15847e-5; = p2248*p1023
- p1265: 0; = if(p1232>0;0;IF(p1259+p1263+p1264=1;0;IF(p1259+p1263+p1264+p1262>1;1-(p1259+p1263+p1264);p1262)))
- p1128: 0; = if(p1121=0;IF(p1123=1;0;IF(p1123+p1124>1;1-p1123;p1124));0)
- p3056: 4.67292e-6; = p2275*p1132
- p3166: 8.14956e-7; = p2385*p1082
- p2680: 0.000209653; = p2289*(p1019+p1021)
- p1936: 0
- p2042: 0.07
- p3214: 0.376406; = p1222*40.078/100.0869
- p5338: 1.2939e-6; = p1963*p3484
- p2231: 0; = if(p0783*p0787+p0784*p0788+p0785*p0789+p0786*p0790=0;0;p0788*p0784/(p0783*p0787+p0784*p0788+p0785*p0789+p0786*p0790))
- p1151: 181771; = if(p1121=0;p1149*p1148*p1145;0)
- p1675: 0
- p2441: 0.00010315; = p2245*p1014
- p2332: 0.000864477; = p2224*p2200
- p4469: 0; = p1914*p3480
- p1904: 0
- p2309: 0; = p2227*p2216
- p0974: 0
- p1304: 0; = p1300*p1252/p0818
- p3421: 0; = p3364*p1239
- p1618: 0
- p3332: 0; = if(and(p1232=0;p3255<>0);IF((p3328+p3329+p3330+p3331)+(p3255*(p3265*(1-p3277))/p3327)>p3255;p3255-(p3328+p3329+p3330+p3331);p3255*(p3265*(1-p3277))/p3327);0)
- p2436: 0.000140548; = p2240*p1014
- p0857: 2.56766; = p0856*p0001*p0003/(p0818*p0002)
- p3367: 0; = if(p1232=0;p3244*p3361/p0818;0)
- p2191: 0.000155212; = 8*1.00794*p2189/(2*14.0067)
- p1796: 0
- p0323: 0.5
- p0426: 0; = SQRT(2)*(IF((2*p0294-1)<0;-1;IF((2*p0294-1)>0;1;0))*SQRT(SQRT((2/(pi()*0.140012289)+LN(1-(2*p0294-1)^2)/2)^2-LN(1-(2*p0294-1)^2)/0.140012289)-(2/(pi()*0.140012289)+LN(1-(2*p0294-1)^2)/2)))
- p0895: 7.29788e8; = p0894*p0830
- p4925: 0; = p1962*p3482
- p2350: 0.000226394; = p2232*p2218
- p1778: 0
- p1906: 0
- p2502: 0; = p2306*p1073
- p2838: 2.93468e-7; = p2252*(p1020+p1022)
- p2402: 0; = p2234*p2191
- p3485: 0; = p1754*p3476
- p2668: 2.1612e-5; = p2277*(p1019+p1021)
- p2505: 0; = p2309*p1073
- p0699: 0
- p0734: 0
- p3366: 0; = if(p1232=0;p3244*p3360/p0818;0)
- p0182: 26.122
- p2491: 0.000104282; = p2295*p1014
- p2976: 8.65699e-5; = p2390*(p1129+p1131)
- p2702: 0; = p2311*(p1128+p1130)
- p0961: 0; = if(and(p0683>0;or(p0807=480;p0807=32;p0807=1;and(p0807=60;p0901<0.03)));p0937;0)
- p1924: 0
- p2151: 8.35746e-7; = p2015*p2079*p2113/(p0818*1000)
- p0876: 0; = p0866*p0856
- p1276: 0; = p1272*p1252/p0818
- p2704: 0; = p2313*(p1128+p1130)
- p1164: 3650.17; = p1163*p0801
- p2217: 0.000113897; = p1118-p2216
- p2637: 1.16294e-6; = p2246*(p1019+p1021)
- p3014: 0; = p2428*(p1129+p1131)
- p0402: 0.5
- p2917: 4.99829e-7; = p2331*(p1020+p1022)
- p0440: 0; = SQRT(2)*(IF((2*p0308-1)<0;-1;IF((2*p0308-1)>0;1;0))*SQRT(SQRT((2/(pi()*0.140012289)+LN(1-(2*p0308-1)^2)/2)^2-LN(1-(2*p0308-1)^2)/0.140012289)-(2/(pi()*0.140012289)+LN(1-(2*p0308-1)^2)/2)))
- p2405: 0; = p2234*p2195
- p2254: 0.00111594; = p2222*p2200
- p2629: 1.14588e-5; = p2238*(p1019+p1021)
- p3292: 0
- p1763: 3.27869e-6; = p1355*1000/p0818
- p3408: 0; = p3370*p1238
- p1929: 0
- p0059: 33.847
- p0759: 0
- p2415: 0; = p2235*p2205
- p1334: 22510.1; = p1322*p0801
- p1266: 0; = if(p1232>0;0;IF(p1259+p1263+p1264+p1265=1;0;1-(p1259+p1263+p1264+p1265)))
- p3248: 0
- p1654: 0
- p1171: 0.000256766; = p0801*p0001/(p0818*p0002)
- p0665: 0; = IF(p0401<0.5;-SQRT(p0007*EXP(p0533^2*p0008)-p0007);SQRT(p0007*EXP(p0533^2*p0008)-p0007))
- p2870: 3.7083e-5; = p2284*(p1020+p1022)
- p1909: 0
- p2837: 1.78798e-7; = p2251*(p1020+p1022)
- p3284: 0
- p1916: 0
- p2109: 0.826583
- p1582: 0
- p2562: 0.000286957; = p2366*p1014
- p0104: 98.814
- p2116: 0.444424
- p0572: 0; = IF(p0308<0.5;-SQRT(p0007*EXP(p0440^2*p0008)-p0007);SQRT(p0007*EXP(p0440^2*p0008)-p0007))
- p0709: 5.87; = p0049*(1+p0577*p0181/100)
- p1111: 0.0872841
- p0348: 0.5
- p2246: 3.23038e-5; = p2222*p2191
- p1771: 0
- p2106: 0.856281
- p4857: 0; = p1890*p3482
- p2614: 0; = p2418*p1073
- p1650: 0
- p2852: 7.24068e-8; = p2266*(p1079+p1081)
- p2858: 4.04589e-5; = p2272*(p1129+p1131)
- p2050: 0.952062
- p2792: 0; = p2401*(p1019+p1021)
- p1848: 0
- p2916: 2.27339e-7; = p2330*(p1020+p1022)
- p0740: 96.99; = p0080*(1+p0608*p0212/100)
- p3108: 1.92374e-6; = p2327*p1023
- p2105: 0.888194
- p0112: 30.955
- p0210: 0
- p1628: 0
- p2843: 0.000120824; = p2257*(p1020+p1022)
- p1662: 0
- p0292: 0.5
- p0591: 0; = IF(p0327<0.5;-SQRT(p0007*EXP(p0459^2*p0008)-p0007);SQRT(p0007*EXP(p0459^2*p0008)-p0007))
- p0746: 0
- p2193: 0.00700148; = p1054/p0818
- p2267: 2.42139e-6; = p2226*p2213
- p0521: 0; = SQRT(2)*(IF((2*p0389-1)<0;-1;IF((2*p0389-1)>0;1;0))*SQRT(SQRT((2/(pi()*0.140012289)+LN(1-(2*p0389-1)^2)/2)^2-LN(1-(2*p0389-1)^2)/0.140012289)-(2/(pi()*0.140012289)+LN(1-(2*p0389-1)^2)/2)))
- p0636: 0; = IF(p0372<0.5;-SQRT(p0007*EXP(p0504^2*p0008)-p0007);SQRT(p0007*EXP(p0504^2*p0008)-p0007))
- p3621: 0; = p1890*p3476
- p2512: 0.000197999; = p2316*p1014
- p2113: 0.832356
- p1588: 0
- p1372: 8
- p3331: 0; = if(and(p1232=0;p3255<>0);p3255*(p3268-p3326)/p3327;0)
- p4016: 3.29563e-5; = p1873*p3478
- p0933: 0; = p0801*p0927
- p1867: 0
- p3285: 0
- p2739: 9.84019e-7; = p2348*(p1078+p1080)
- p1567: 0
- p0828: 0; = if(p0827=0;0;p0819-p0827/p0818)
- p3543: 0; = p1812*p3476
- p1177: 0.000256766; = p0801*p0001/(p0818*p0002)
- p1920: 0
- p0944: 0; = if(and(p0683=0;p0950=0);p0938;0)
- p1882: 0
- p0343: 0.5
- p1710: 0.757148
- p5046: 0; = p1873*p3483
- p0821: 1.51364
- p2284: 0.000242278; = p2223*p2190
- p3371: 0; = if(p1232=0;p3245*p3359/p0818;0)
- p2037: 1.99
- p0283: 0.5
- p2624: 0; = p2428*p1123
- p1841: 0
- p2788: 0; = p2397*(p1019+p1021)
- p1223: 0.56
- p2861: 8.82712e-6; = p2275*(p1129+p1131)
- p1741: 0
- p4719: 7.11681e-7; = p1962*p3481
- p2429: 0; = p2236*p2219
- p0084: 3.932
- p2514: 0.000108877; = p2318*p1014
- p2543: 9.07736e-6; = p2347*p1073
- p1070: 0.0117842; = IF(p1012=0;p1056/(p1063*p0818);0)
- p1812: 2.91439e-6; = p1404*1000/p0818
- p2862: 0.000418596; = p2276*(p1020+p1022)
- p2515: 0.000138334; = p2319*p1014
- p1273: 0; = p1267*p1252/p0818
- p0448: 0; = SQRT(2)*(IF((2*p0316-1)<0;-1;IF((2*p0316-1)>0;1;0))*SQRT(SQRT((2/(pi()*0.140012289)+LN(1-(2*p0316-1)^2)/2)^2-LN(1-(2*p0316-1)^2)/0.140012289)-(2/(pi()*0.140012289)+LN(1-(2*p0316-1)^2)/2)))
- p2590: 0; = p2394*p1014
- p0255: 25.077
- p1915: 0
- p0767: 38.581; = p0107*(1+p0635*p0239/100)
- p2044: 2.23676e-6; = p2015*p2042*p2043/(p0818*1000)
- p1107: 60647.4; = IF(p1071=0;p1105*p1101*p1095;0)
- p3380: 0; = p3251/p0818
- p1123: 0.48235; = if(p1121=0;p0717/100;0)
- p3299: 0; = if(p1303+p1304+p1305+p1306=0;0;p1303/(p1303+p1304+p1305+p1306))
- p1220: 0; = IF(p1218<0.5;-SQRT(p1214*EXP(p1219^2*p1215)-p1214);SQRT(p1214*EXP(p1219^2*p1215)-p1214))
- p0245: 26.122
- p2498: 0; = p2302*p1073
- p2544: 1.3836e-6; = p2348*p1073
- p1891: 3.64299e-7; = p1483*1000/p0818
- p2461: 5.86458e-5; = p2265*p1073
- p2435: 4.08042e-5; = p2239*p1014
- p2029: 4.03
- p3107: 8.97428e-6; = p2326*p1023
- p1973: 0; = if(p0807=480;p1968*p0001/(p0818*p0002);0)
- p0836: 6.72876e7; = p0831*p0835*p0801/(1-p0831)
- p3148: 2.80836e-5; = p2367*p1023
- p2076: 0.057
- p1034: 1.5459e-5; = IF(p1012=0;p1028*p0001/(p0818*p0002);0)
- p4545: 1.38919e-6; = p1784*p3481
- p2961: 5.22275e-5; = p2375*(p1079+p1081)
- p2163: 0.0183224; = (p2017-p2020)/p0818-(p2025+p2028+p2033+p2034+p2051+p2125+p2126+p2127+p2128+p2129+p2130+p2131+p2132+p2133+p2134+p2135+p2136+p2137+p2138+p2139+p2140+p2141+p2142+p2143+p2144+p2145+p2146+p2147+p2148+p2149+p2150+p2151+p2152+p2153+p2154+p2155+p2156+p2157)
- p2626: 0; = p2430*p1123
- p1914: 1.0929e-6; = p1506*1000/p0818
- p2841: 7.32283e-5; = p2255*(p1020+p1022)
- p1963k: 2.90857e-6; = p1744*p1948+p1745*p1949+p1746*p1950+p1747*p1951+p1748*p1952+p1749*p1953+p1750*p1954+p1751*p1955+p1752*p1956+p1753*p1957+p1961*p1962
- p1930: 0
- p0728: 0
- p2068: 0.153529
- p2912: 0.00017278; = p2326*(p1020+p1022)
- p3316: 0; = if(and(p1232=0;p3253<>0);1-(p3312+p3313+p3314+p3315);0)
- p3135: 1.31883e-5; = p2354*p1023
- p2128: 4.17469e-5; = p2015*p2056*p2090/(p0818*1000)
- p2101: 0.620397
- p1644: 0
- p0034: 32.627
- p2438: 2.57007e-5; = p2242*p1014
- p1921: 0
- p0805: 0
- p0389: 0.5
- p1855: 3.09654e-5; = p1447*1000/p0818
- p1749: 0.797401
- p0893: 30.085; = 1000*(p0890+p0892)*p0001*p0003*p0004/(p0818*p0002)
- p0007: 14; = p0006-1
- p0175: 0
- p2368: 1.33641e-6; = p2225*p2197
- p1911: 0
- p3257: 0
- p0918: 0.422487; = p0680*1000/p0801
- p1636: 0
- p0118: 34.304
- p1864: 0
- p2996: 0; = p2410*(p1020+p1022)
- p3689: 0; = p1962*p3476
- p2082: 0.285294
- p1554: 0
- p0162: 55.14
- p1170: 746.642; = p1169*p0801
- p0253: 41.71
- p2020: 3.57224e6; = p2015*p2018*p2019
- p0579: 0; = IF(p0315<0.5;-SQRT(p0007*EXP(p0447^2*p0008)-p0007);SQRT(p0007*EXP(p0447^2*p0008)-p0007))
- p1743: 0
- p3280: 0
- p2426: 0; = p2235*p2216
- p2456: 9.91747e-6; = p2260*p1073
- p1298: 0
- p2701: 0; = p2310*(p1078+p1080)
- p2744: 0; = p2353*(p1128+p1130)
- p4129: 1.65348e-8; = p1780*p3479
- p2403: 0; = p2234*p2192
- p3289: 0
- p2324: 2.50246e-5; = p2224*p2191
- p3270: 0
- p1690: 0
- p2095: 0.765734
- p3196: 0; = p2415*p1082
- p1099: 0.564594
- p3185: 0; = p2404*p1023
- p1859: 0
- p0655: 0; = IF(p0391<0.5;-SQRT(p0007*EXP(p0523^2*p0008)-p0007);SQRT(p0007*EXP(p0523^2*p0008)-p0007))
- p1031: 9.48081e-6; = IF(p1012=0;p1025*p0001/(p0818*p0002);0)
- p2726: 2.20144e-5; = p2335*(p1019+p1021)
- p2670: 1.18842e-5; = p2279*(p1019+p1021)
- p3009: 0; = p2423*(p1079+p1081)
- p1571: 0
- p2992: 0; = p2406*(p1020+p1022)
- p1825: 0
- p0183: 32.456
- p1722: 0
- p1282: 0; = IF(p1277+p1280+p1281=p1260;0;p1260-(p1277+p1280+p1281))
- p4841: 0; = p1874*p3482
- p1676: 0
- p0932: 0; = p0801*p0926
- p2149: 1.8485e-6; = p2015*p2077*p2111/(p0818*1000)
- p0314: 0.5
- p1960: 12.2952; = IF(p1959-p1958<0;0;p1959-p1958)
- p2016: 0.00796975; = (p2014-p2015)/(p0818)
- p1883: 0
- p1706: 0
- p1086: 0; = IF(p1071=0;p1080*(p0710/100)*p0703*1000;0)
- p1957: 0
- p2854: 1.74339e-6; = p2268*(p1079+p1081)
- p1281: 0; = IF(p1277+p1280=p1263;0;IF(p1277+p1280+p1279>p1263;p1263-(p1277+p1280);p1279))
- p2282: 0.000772235; = p2223*p2188
- p2340: 7.96245e-5; = p2228*p2208
- p1238: 0; = if(p1232>0;0;IF(p1234=1;0;IF(p1234+p1235>1;1-p1234;p1235)))
- p1808: 3.60656e-5; = p1400*1000/p0818
- p1799: 0
- p2666: 0; = p2275*(p1128+p1130)
- p0272: 25.167
- p2632: 8.00587e-6; = p2241*(p1019+p1021)
- p3471: 0; = p3376*p1241
- p1728: 0
- p3227: 4.55511e-5; = p3223*p1229
- p0970: 0; = p0967/p0818
- p0244: 34.487
- p0088: 65.616
- p4569: 5.7304e-6; = p1808*p3481
- p1698: 0
- p3387: 0; = p3368*p1234
- p2358: 0.000254418; = p2225*p2186
- p2682: 1.30183e-7; = p2291*(p1019+p1021)
- p0941: 0; = if(and(p0683=0;p0947=0);p0935;0)
- p1696: 0
- p1030: 0.000211472; = IF(p1012=0;p1024*p0001/(p0818*p0002);0)
- p1896: 0
- p0710: 10.707; = p0050*(1+p0578*p0182/100)
- p2577: 7.7872e-6; = p2381*p1073
- p1928: 0
- p0616: 0; = IF(p0352<0.5;-SQRT(p0007*EXP(p0484^2*p0008)-p0007);SQRT(p0007*EXP(p0484^2*p0008)-p0007))
- p1287: 0
- p4927: 0; = p1754*p3483
- p1836: 0
- p1981: 400
- p0135: 71.779
- p2466: 1.13056e-6; = p2270*p1073
- p1688: 0
- p2212: 9.176e-7; = p1106/p0818
- p3162: 1.85684e-6; = p2381*p1082
- p1225: 1.088; = IF(p1221=0;0;p1223+1.2*p1224)
- p1817: 0
- p1839: 0
- p2077: 0.043
- p2008: 0.0368976; = ((p1982*p1985+p1988*p1991+p1994*p1997+p2002*p2005)/p0818)*p0005*p0002/1000
- p5187: 3.04163e-7; = p1808*p3484
- p0924: 0.165987; = IF(p0918+p0923=1;0;IF(p0918+p0923+p0920>1;1-(p0918+p0923);p0920))
- p2492: 0.00119551; = p2296*p1014
- p1772: 0
- p1844: 0
- p2605: 0; = p2409*p1014
- p3373: 0; = if(p1232=0;p3245*p3361/p0818;0)
- p1903: 0
- p2055: 5.59471
- p0834: 0.00059
- p0953: 0; = if(and(p0683>0;or(p0807=56;p0807=100;and(p0807=60;p0901>0.06)));p0935;0)
- p2645: 4.01738e-5; = p2254*(p1019+p1021)
- p2688: 0; = p2297*(p1078+p1080)
- p2746: 1.31094e-5; = p2355*(p1019+p1021)
- p3178: 0; = p2397*p1023
- p2394: 0; = p2234*p2183
- p1820: 0
- p0268: 0.621
- p1766: 0
- p3117: 9.88162e-6; = p2336*p1082
- p0485: 0; = SQRT(2)*(IF((2*p0353-1)<0;-1;IF((2*p0353-1)>0;1;0))*SQRT(SQRT((2/(pi()*0.140012289)+LN(1-(2*p0353-1)^2)/2)^2-LN(1-(2*p0353-1)^2)/0.140012289)-(2/(pi()*0.140012289)+LN(1-(2*p0353-1)^2)/2)))
- p1331: 0.000227187; = p1330*p0001/(p0818*p0002)
- p1699: 0
- p2600: 0; = p2404*p1014
- p1075: 0.31269; = IF(p1071=0;p0713/100;0)
- p2419: 0; = p2235*p2209
- p1004: 0; = p1000*p0888
- p0081: 0.819
- p1319: 0; = IF(((p0745*1000*p0746/100)+(p0754*1000*p0755/100))/p0801<0;0;((p0745*1000*p0746/100)+(p0754*1000*p0755/100))/p0801)
- p3037: 5.47411e-7; = p2256*p1023
- p1342: 0; = p1326*p0801
- p3241: 2.914e-10; = p3234*p1188*p3236/p0818
- p2074: 0.025
- p1952: 0
- p4308: 8.70442e-7; = p1963*p3479
- p2593: 0; = p2397*p1014
- p1907: 0
- p2759: 4.81109e-8; = p2368*(p1019+p1021)
- p0758: 0
- p2949: 5.65661e-6; = p2363*(p1020+p1022)
- p2833: 4.00134e-5; = p2247*(p1020+p1022)
- p2839: 6.4522e-7; = p2253*(p1020+p1022)
- p1564: 0
- p2138: 3.87656e-6; = p2015*p2066*p2100/(p0818*1000)
- p0246: 14.39
- p2206: 0.000111479; = 9*1.00794*p2204/30.973762
- p0160: 16.245
- p3425: 0; = p3368*p1239
- p1258: 0; = if(p1232>0;0;IF(p1253+p1256+p1257=1;0;1-(p1253+p1256+p1257)))
- p3172: 4.08302e-6; = p2391*p1132
- p1250: 0; = if(p1232>0;0;p1245*p0001/(p0818*p0002))
- p2260: 2.81323e-5; = p2226*p2206
- p0861: 0; = p0673*1000/p0856
- p1617: 0
- p1840: 0
- p3319: 0; = if(and(p1232=0;p3253<>0);p3253*(p3263-p3314)/p3316;0)
- p2730: 7.16708e-5; = p2339*(p1078+p1080)
- p2153: 8.1678e-8; = p2015*p2081*p2115/(p0818*1000)
- p2472: 0.00219606; = p2276*p1014
- p0990: 0; = p0986*p0886
- p2481: 4.89235e-5; = p2285*p1014
- p2129: 6.18742e-5; = p2015*p2057*p2091/(p0818*1000)
- p3998: 2.01531e-5; = p1855*p3478
- p3306: 0; = if(and(p1232=0;p3252<>0);p3252*(p3257*p3277-p3301)/p3305;0)
- p2803: 0; = p2412*(p1019+p1021)
- p0504: 0; = SQRT(2)*(IF((2*p0372-1)<0;-1;IF((2*p0372-1)>0;1;0))*SQRT(SQRT((2/(pi()*0.140012289)+LN(1-(2*p0372-1)^2)/2)^2-LN(1-(2*p0372-1)^2)/0.140012289)-(2/(pi()*0.140012289)+LN(1-(2*p0372-1)^2)/2)))
- p2678: 9.89407e-5; = p2287*(p1019+p1021)
- p1687: 0.556632
- p2541: 1.04467e-6; = p2345*p1073
- p0107: 38.581
- p2609: 0; = p2413*p1014
- p1190: 5.21898e-8; = p1188/p0818
- p1860: 0
- p2187: 0.000153782; = 4*1.00794*p2186/(2*14.0067)
- p1718: 0
- p1583: 0
- p2647: 2.47884e-6; = p2256*(p1019+p1021)
- p0226: 39.651
- p2279: 0.000330117; = p2223*p2185
- p1967: 0; = if(p0807=480;p0802*p0810;0)
- p2451: 0.000384174; = p2255*p1014
- p3101: 1.97113e-7; = p2320*p1023
- p1827: 0
- p2897: 0; = p2311*(p1129+p1131)
- p2758: 0.000127171; = p2367*(p1019+p1021)
- p0438: 0; = SQRT(2)*(IF((2*p0306-1)<0;-1;IF((2*p0306-1)>0;1;0))*SQRT(SQRT((2/(pi()*0.140012289)+LN(1-(2*p0306-1)^2)/2)^2-LN(1-(2*p0306-1)^2)/0.140012289)-(2/(pi()*0.140012289)+LN(1-(2*p0306-1)^2)/2)))
- p1234: 0; = if(p1232>0;0;p0726/100)
- p2275: 2.60795e-5; = p2230*p2221
- p0776: 38.032; = p0116*(1+p0644*p0248/100)
- p1182: 112.829; = p1181*p0801
- p2921: 9.35978e-5; = p2335*(p1020+p1022)
- p3050: 1.76863e-6; = p2269*p1082
- p1155: 0.00018129; = if(p1153*p0818=0;0;p1151/(p1153*p0818))
- p2446: 0.00247944; = p2250*p1014
- p1552: 0
- p1173: 0.5
- p1294: 0; = p1290*p1252/p0818
- p1071: 0
- p3200: 0; = p2419*p1082
- p2288: 0.000589142; = p2223*p2195
- p0634: 0; = IF(p0370<0.5;-SQRT(p0007*EXP(p0502^2*p0008)-p0007);SQRT(p0007*EXP(p0502^2*p0008)-p0007))
- p2213: 9.59519e-6; = p1116-p2212
- p1293: 0; = p1287*p1252/p0818
- p0422: 0; = SQRT(2)*(IF((2*p0290-1)<0;-1;IF((2*p0290-1)>0;1;0))*SQRT(SQRT((2/(pi()*0.140012289)+LN(1-(2*p0290-1)^2)/2)^2-LN(1-(2*p0290-1)^2)/0.140012289)-(2/(pi()*0.140012289)+LN(1-(2*p0290-1)^2)/2)))
- p5138: 1.53618e-7; = p1759*p3484
- p2121: 0.822447
- p3011: 0; = p2425*(p1079+p1081)
- p2655: 3.18501e-6; = p2264*(p1078+p1080)
- p5269: 2.6115e-7; = p1890*p3484
- p2802: 0; = p2411*(p1019+p1021)
- p3078: 0; = p2297*p1082
- p2539: 7.17717e-5; = p2343*p1073
- p3067: 3.91981e-6; = p2286*p1023
- p3136: 2.89499e-6; = p2355*p1023
- p3515: 0; = p1784*p3476
- p3407: 0; = p3369*p1238
- p3665: 0; = p1934*p3476
- p0909: 1.61973e7
- p2373: 7.87748e-5; = p2225*p2202
- p3242: 1.76676e-8; = p3234*p1188*p3238/p0818
- p3163: 2.43161e-5; = p2382*p1082
- p0793: 0
- p3041: 2.3648e-6; = p2260*p1082
- p1635: 0
- p0447: 0; = SQRT(2)*(IF((2*p0315-1)<0;-1;IF((2*p0315-1)>0;1;0))*SQRT(SQRT((2/(pi()*0.140012289)+LN(1-(2*p0315-1)^2)/2)^2-LN(1-(2*p0315-1)^2)/0.140012289)-(2/(pi()*0.140012289)+LN(1-(2*p0315-1)^2)/2)))
- p3018: 1.15278e-5; = p2237*p1023
- p0696: 85.778; = p0036*(1+p0564*p0168/100)
- p1745: 0.4234
- p2133: 1.99449e-5; = p2015*p2061*p2095/(p0818*1000)
- p1061: 0.3
- p2551: 0.000292408; = p2355*p1014
- p0574: 0; = IF(p0310<0.5;-SQRT(p0007*EXP(p0442^2*p0008)-p0007);SQRT(p0007*EXP(p0442^2*p0008)-p0007))
- p3031: 2.45477e-5; = p2250*p1023
- p3342: 0; = if(and(p1232=0;p3254<>0);p3254*(p3272-p3337)/p3338;0)
- p2998: 0; = p2412*(p1020+p1022)
- p0045: 80.299
- p2221: 0.000115071; = p1155-p2220
- p2954: 2.04551e-7; = p2368*(p1020+p1022)
- p0639: 0; = IF(p0375<0.5;-SQRT(p0007*EXP(p0507^2*p0008)-p0007);SQRT(p0007*EXP(p0507^2*p0008)-p0007))
- p2623: 0; = p2427*p1073
- p1095: 4.24044e6; = IF(p1071=0;p0797*p0702*1000*p0798/100;0)
- p0141: 70.6541
- p3171: 4.58286e-5; = p2390*p1132
- p0780: 38.274; = p0120*(1+p0648*p0252/100)
- p0573: 0; = IF(p0309<0.5;-SQRT(p0007*EXP(p0441^2*p0008)-p0007);SQRT(p0007*EXP(p0441^2*p0008)-p0007))
- p1243: 0; = if(p1232>0;0;p1238*(p0725/100)*p0723*1000)
- p1982: 750
- p0925: 0.129252; = IF(p0918+p0923+p0924=1;0;IF(p0918+p0923+p0924+p0921>1;1-(p0918+p0923+p0924);p0921))
- p2939: 1.67182e-5; = p2353*(p1129+p1131)
- p2323: 9.95116e-5; = p2224*p2190
- p2681: 7.93151e-8; = p2290*(p1019+p1021)
- p1679: 0
- p3354: 0; = IF((p3350+p3351+p3352+p3353)+IF(p3349=0;0;(p3256*(p3273*(1-p3277))/p3349))>p3256;p3256-(p3350+p3351+p3352+p3353);IF(p3349=0;0;p3256*(p3273*(1-p3277))/p3349))
- p0856: 790000; = p0801
- p1899: 0
- p3159: 3.4142e-5; = p2378*p1082
- p0505: 0; = SQRT(2)*(IF((2*p0373-1)<0;-1;IF((2*p0373-1)>0;1;0))*SQRT(SQRT((2/(pi()*0.140012289)+LN(1-(2*p0373-1)^2)/2)^2-LN(1-(2*p0373-1)^2)/0.140012289)-(2/(pi()*0.140012289)+LN(1-(2*p0373-1)^2)/2)))
- p0368: 0.5
- p0374: 0.5
- p0827: 0; = p0818*p0819*p0823
- p0966: 0; = if(p0683=0;0;IF(p0684/100+p0965=1;0;1-(p0684/100+p0965)))
- p0094: 32.241
- p3441: 0; = p3365*p1240
- p2994: 0; = p2408*(p1020+p1022)
- p2985: 0; = p2399*(p1020+p1022)
- p3232: 4.11036e-8; = p1182/p0818
- p1245: 0; = if(p1232>0;0;p1240*(p0725/100)*p0723*1000)
- p0445: 0; = SQRT(2)*(IF((2*p0313-1)<0;-1;IF((2*p0313-1)>0;1;0))*SQRT(SQRT((2/(pi()*0.140012289)+LN(1-(2*p0313-1)^2)/2)^2-LN(1-(2*p0313-1)^2)/0.140012289)-(2/(pi()*0.140012289)+LN(1-(2*p0313-1)^2)/2)))
- p1792: 0
- p3234: 0.39606; = 1-p3233
- p0612: 0; = IF(p0348<0.5;-SQRT(p0007*EXP(p0480^2*p0008)-p0007);SQRT(p0007*EXP(p0480^2*p0008)-p0007))
- p2583: 1.96588e-6; = p2387*p1073
- p2007: 0.0196787; = ((p1981*p1985+p1987*p1991+p1993*p1997+p2001*p2005)/p0818)*p0005*p0002/1000
- p1780: 2.91439e-6; = p1372*1000/p0818
- p1239: 0; = if(p1232>0;0;IF(p1234+p1238=1;0;IF(p1234+p1238+p1236>1;1-(p1234+p1238);p1236)))
- p1773: 0
- p3480: 0; = if(p1328+p1330+p1332+p1334+p1336+p1338+p1340+p1342+p1344=0;0;p1336/(p1328+p1330+p1332+p1334+p1336+p1338+p1340+p1342+p1344))
- p2274: 1.50077e-5; = p2230*p2220
- p3092: 0; = p2311*p1132
- p1785: 0
- p5122: 0; = p1949*p3483
- p1659: 0
- p1602: 0
- p3810: 8.92115e-6; = p1873*p3477
- p3099: 1.07794e-6; = p2318*p1023
- p0414: 0; = SQRT(2)*(IF((2*p0282-1)<0;-1;IF((2*p0282-1)>0;1;0))*SQRT(SQRT((2/(pi()*0.140012289)+LN(1-(2*p0282-1)^2)/2)^2-LN(1-(2*p0282-1)^2)/0.140012289)-(2/(pi()*0.140012289)+LN(1-(2*p0282-1)^2)/2)))
- p3183: 0; = p2402*p1023
- p4515: 6.77229e-6; = p1754*p3481
- p2633: 1.15223e-6; = p2242*(p1019+p1021)
- p0400: 0.5
- p1832: 0
- p2962: 4.72358e-5; = p2376*(p1079+p1081)
- p1199: -0.29
- p3114: 2.94644e-6; = p2333*p1023
- p2795: 0; = p2404*(p1019+p1021)
- p0812: 0; = if(p0807=480;0.095/0.34;0)
- p1222: 0.94
- p3261: 0
- p2799: 0; = p2408*(p1019+p1021)
- p0271: 16.539
- p4223: 3.10028e-8; = p1874*p3479
- p5329: 3.07236e-9; = p1950*p3484
- p3042: 1.96348e-5; = p2261*p1082
- p4101: 2.91514e-6; = p1962*p3478
- p2062: 3.76588
- p4675: 1.73648e-7; = p1914*p3481
- p2735: 7.10511e-8; = p2344*(p1078+p1080)
- p1868: 0
- p1774: 0
- p1277: 0
- p3206: 0; = p2425*p1082
- p3132: 5.71649e-5; = p2351*p1132
- p1919: 0
- p1007: 4.38848e-6; = p1003*p0001*p0004/(p0818*p0002)
- p1032: 2.48502e-5; = IF(p1012=0;p1026*p0001/(p0818*p0002);0)
- p0105: 66.449
- p1694: 0
- p1296: 0; = p1292*p1252/p0818
- p3276: 0
- p2250: 0.00308776; = p2222*p2196
- p0959: 0; = if(and(p0683>0;or(p0807=480;p0807=32;p0807=1;and(p0807=60;p0901<0.03)));p0935;0)
- p1102: 0.01885; = IF(p1071=0;IF(p1096+p1101=1;0;IF(p1096+p1101+p1098>1;1-(p1096+p1101);p1098));0)
- p1018: 0.0587; = IF(p1012=0;p0709/100;0)
- p3082: 0; = p2301*p1082
- p1152: 0.415074
- p2236: 0; = 1-(p2230+p2231+p2232+p2233)
- p2353: 4.93935e-5; = p2232*p2221
- p1303: 0; = p1297*p1252/p0818
- p2292: 7.95059e-6; = p2223*p2199
- p3012: 0; = p2426*(p1079+p1081)
- p2763: 1.97043e-5; = p2372*(p1019+p1021)
- p2475: 0.000265081; = p2279*p1014
- p2631: 6.30111e-6; = p2240*(p1019+p1021)
- p1964: 0.5
- p2108: 0.826583
- p2927: 1.12591e-5; = p2341*(p1079+p1081)
- p0663: 0; = IF(p0399<0.5;-SQRT(p0007*EXP(p0531^2*p0008)-p0007);SQRT(p0007*EXP(p0531^2*p0008)-p0007))
- p3369: 0; = if(p1232=0;p3245*p3357/p0818;0)
- p1938: 0
- p0148: 0
- p0082: 96.933
- p2496: 0; = p2300*p1073
- p4077: 4.74192e-7; = p1934*p3478
- p1163: 0.00462046
- p1598: 0
- p1105: 0.436421
- p2522: 0.000906447; = p2326*p1014
- p2663: 0; = p2272*(p1128+p1130)
- p0874: 0; = p0865*p0856
- p0837: 0.5
- p2327: 0.00024198; = p2224*p2195
- p1576: 0.47191
- p2943: 3.0649e-5; = p2357*(p1020+p1022)
- p1083: 30951.2; = IF(p1071=0;p1073*(p0710/100)*p0703*1000;0)
- p0722: 0
- p3311: 0; = if(and(p1232=0;p3252<>0);p3252-(p3306+p3307+p3308+p3309+p3310);0)
- p2780: 0; = p2389*(p1128+p1130)
- p2142: 1.15685e-5; = p2015*p2070*p2104/(p0818*1000)
- p1777: 0
- p2781: 0; = p2390*(p1128+p1130)
- p2526: 1.19268e-6; = p2330*p1014
- p3434: 0; = p3377*p1239
- p3144: 2.93807e-7; = p2363*p1023
- p3259: 0
- p1632: 0
- p2315: 0.00112329; = p2224*p2182
- p0688: 78.993; = p0028*(1+p0556*p0160/100)
- p0681: 0
- p2012: 0.075394
- p2905: 2.63683e-5; = p2319*(p1020+p1022)
- p3539: 0; = p1808*p3476
- p1315: 0; = p1311*p1252/p0818
- p1097: 0.0327715
- p1714: 0
- p3192: 0; = p2411*p1023
- p3195: 0; = p2414*p1082
- p0522: 0; = SQRT(2)*(IF((2*p0390-1)<0;-1;IF((2*p0390-1)>0;1;0))*SQRT(SQRT((2/(pi()*0.140012289)+LN(1-(2*p0390-1)^2)/2)^2-LN(1-(2*p0390-1)^2)/0.140012289)-(2/(pi()*0.140012289)+LN(1-(2*p0390-1)^2)/2)))
- p1101: 0.0327715; = IF(p1071=0;IF(p1096=1;0;IF(p1096+p1097>1;1-p1096;p1097));0)
- p0035: 18.994
- p1081: 0; = IF(p1071=0;IF(p1073+p1078+p1079+p1080=1;0;IF(p1073+p1078+p1079+p1080+p1077>1;1-(p1073+p1078+p1079+p1080);p1077));0)
- p3353: 0; = if(and(p1232=0;p3256<>0);p3256*(p3276-p3348)/p3349;0)
- p3019: 2.5305e-6; = p2238*p1023
- p1963a: 5.3014e-5; = p1550*p1754+p1551*p1755+p1552*p1756+p1553*p1757+p1554*p1758+p1555*p1759+p1556*p1760+p1557*p1761+p1558*p1762+p1559*p1763+p1560*p1764+p1561*p1765+p1562*p1766+p1563*p1767+p1564*p1768+p1565*p1769+p1566*p1770+p1567*p1771+p1568*p1772
- p1046: 0.0254495; = IF(p1012=0;IF(p1037+p1044+p1045=1;0;IF(p1037+p1044+p1045+p1040>1;1-(p1037+p1044+p1045);p1040));0)
- p1828: 0
- p2528: 0.000694167; = p2332*p1014
- p1092: 0; = IF(p1071=0;p1086*p0001/(p0818*p0002);0)
- p2347: 2.57492e-5; = p2228*p2215
- p1256: 0; = if(p1232>0;0;IF(p1253=1;0;IF(p1253+p1254>1;1-p1253;p1254)))
- p2764: 2.83589e-6; = p2373*(p1019+p1021)
- p2370: 4.82266e-6; = p2225*p2199
- p1160: 0.0334993; = (p1156+p1158)*p1159
- p3359: 0; = if(p1232=0;p3309+p3320+p3331+p3342+p3353;0)
- p0762: 0
- p0103: 820
- p1341: 0; = p1340*p0001/(p0818*p0002)
- p2314: 0; = p2231*p2221
- p1526: 2
- p0043: 820
- p1172: 2.72001e-7; = p1170/p0818
- p0831: 0.137; = 1-p0824
- p2886: 0; = p2300*(p1079+p1081)
- p2887: 0; = p2301*(p1079+p1081)
- p0188: 25.167
- p2499: 0; = p2303*p1073
- p1649: 0
- p2490: 0.000724571; = p2294*p1014
- p2026: 55.14
- p2036: 0.000182885; = p2015*p2030*(1-p2032)/(p0818*1000)
- p2691: 0; = p2300*(p1078+p1080)
- p1622: 0
- p0886: 0; = p0686*1000*p0687*p0689/100
- p3414: 0; = p3376*p1238
- p3017: 0; = p2431*(p1129+p1131)
- p3049: 4.68674e-7; = p2268*p1082
- p2674: 7.61993e-6; = p2283*(p1019+p1021)
- p1946: 0
- p3125: 2.38216e-8; = p2344*p1082
- p2137: 2.36344e-6; = p2015*p2065*p2099/(p0818*1000)
- p0803: 0
- p2616: 0; = p2420*p1073
- p2951: 0.000255165; = p2365*(p1020+p1022)
- p1985: 1.68739e8; = (if(p1057=0;0;p1050/p1057)+if(p1058=0;0;p1051/p1058)+if(p1059=0;0;p1052/p1059)+if(p1060=0;0;p1053/p1060)+if(p1061=0;0;p1054/p1061)+if(p1062=0;0;p1055/p1062)+if(p1063=0;0;p1056/p1063))*(1+p1157)
- p2713: 3.12976e-6; = p2322*(p1019+p1021)
- p1961: 0.5
- p0342: 0.5
- p2335: 0.00061151; = p2224*p2203
- p3093: 0; = p2312*p1132
- p2006: 0.17574; = ((p1980*p1985+p1986*p1991+p1992*p1997+p2000*p2005)/p0818)*p0005*p0002/1000
- p0931: 102109; = p0801*p0925
- p3391: 0; = p3372*p1234
- p1310: 0; = IF(p1307=p1266;0;IF(p1307+p1308>p1266;p1266-p1307;p1308))
- p0430: 0; = SQRT(2)*(IF((2*p0298-1)<0;-1;IF((2*p0298-1)>0;1;0))*SQRT(SQRT((2/(pi()*0.140012289)+LN(1-(2*p0298-1)^2)/2)^2-LN(1-(2*p0298-1)^2)/0.140012289)-(2/(pi()*0.140012289)+LN(1-(2*p0298-1)^2)/2)))
- p3186: 0; = p2405*p1023
- p1091: 8.9229e-6; = IF(p1071=0;p1085*p0001/(p0818*p0002);0)
- p0984: 0; = if(p0886=0;0;min(1;(p0699*p0698*1000*p0701/100)/p0886))
- p2362: 0.000146961; = p2225*p2190
- p2891: 0; = p2305*(p1079+p1081)
- p1987: 400
- p1755: 0
- p2725: 1.92027e-6; = p2334*(p1019+p1021)
- p3244: 0; = p0791/100
- p2516: 1.99094e-5; = p2320*p1014
- p3454: 0; = p3378*p1240
- p0525: 0; = SQRT(2)*(IF((2*p0393-1)<0;-1;IF((2*p0393-1)>0;1;0))*SQRT(SQRT((2/(pi()*0.140012289)+LN(1-(2*p0393-1)^2)/2)^2-LN(1-(2*p0393-1)^2)/0.140012289)-(2/(pi()*0.140012289)+LN(1-(2*p0393-1)^2)/2)))
- p0120: 38.274
- p3435: 0; = p3378*p1239
- p2677: 1.77501e-5; = p2286*(p1019+p1021)
- p4363: 0; = p1808*p3480
- p2094: 0.922577
- p3465: 0; = p3370*p1241
- p0423: 0; = SQRT(2)*(IF((2*p0291-1)<0;-1;IF((2*p0291-1)>0;1;0))*SQRT(SQRT((2/(pi()*0.140012289)+LN(1-(2*p0291-1)^2)/2)^2-LN(1-(2*p0291-1)^2)/0.140012289)-(2/(pi()*0.140012289)+LN(1-(2*p0291-1)^2)/2)))
- p3427: 0; = p3370*p1239
- p0057: 48.235
- p0481: 0; = SQRT(2)*(IF((2*p0349-1)<0;-1;IF((2*p0349-1)>0;1;0))*SQRT(SQRT((2/(pi()*0.140012289)+LN(1-(2*p0349-1)^2)/2)^2-LN(1-(2*p0349-1)^2)/0.140012289)-(2/(pi()*0.140012289)+LN(1-(2*p0349-1)^2)/2)))
- p2818: 0; = p2427*(p1078+p1080)
- p3346: 0; = if(and(p1232=0;p3256<>0);p3274*(p3281*(p3285*p1256+p3286*(p1253+p1257)+p1258*p3288));0)
- p3089: 0; = p2308*p1082
- p0480: 0; = SQRT(2)*(IF((2*p0348-1)<0;-1;IF((2*p0348-1)>0;1;0))*SQRT(SQRT((2/(pi()*0.140012289)+LN(1-(2*p0348-1)^2)/2)^2-LN(1-(2*p0348-1)^2)/0.140012289)-(2/(pi()*0.140012289)+LN(1-(2*p0348-1)^2)/2)))
- p1058: 0.225
- p0940: 0; = if(and(p0683=0;p0946=0);p0934;0)
- p3305: 0; = if(and(p1232=0;p3252<>0);1-(p3301+p3302+p3303+p3304);0)
- p0184: 38.294
- p3115: 4.2406e-7; = p2334*p1023
- p1320: 0.884801; = IF(((p0745*1000*p0747/100)+(p0754*1000*p0756/100))/p0801<0;0;((p0745*1000*p0747/100)+(p0754*1000*p0756/100))/p0801)
- p3243: 2.70245e-10; = p3234*p1188*p3239/p0818
- p2417: 0; = p2235*p2207
- p2375: 0.000167026; = p2229*p2204
- p1001: 0.0537574; = if(p0978>0;0;if(and(p0687=0;p0691=0;p0695=0;p0699=0);0;IF(p0996+p0999+p1000=1;0;1-(p0996+p0999+p1000))))
- p3418: 0; = p3380*p1238
- p2658: 6.07092e-7; = p2267*(p1078+p1080)
- p4498: 0; = p1943*p3480
- p2118: 0.679049

- p2991: 0; = p2405*(p1020+p1022)
- p0669: 27.1346; = p0009*(1+p0537*p0141/100)
- p1136: 0; = if(p1121=0;p1130*(p0716/100)*p0703*1000;0)
- p2202: 0.00033084; = 4*1.00794*p2201/(2*14.0067)
- p2958: 8.37761e-5; = p2372*(p1020+p1022)
- p1927: 0
- p1912: 0
- p2478: 0.000620097; = p2282*p1014
- p0559: 0; = IF(p0295<0.5;-SQRT(p0007*EXP(p0427^2*p0008)-p0007);SQRT(p0007*EXP(p0427^2*p0008)-p0007))
- p2653: 1.63124e-5; = p2262*(p1078+p1080)
- p4616: 4.92004e-6; = p1855*p3481
- p1963g: 3.05498e-5; = p1667*p1871+p1668*p1872+p1669*p1873+p1670*p1874+p1671*p1875+p1672*p1876+p1673*p1877+p1674*p1878+p1675*p1879+p1676*p1880+p1677*p1881+p1678*p1882+p1679*p1883+p1680*p1884+p1681*p1885+p1682*p1886+p1683*p1887+p1684*p1888+p1685*p1889
- p2805: 0; = p2414*(p1078+p1080)
- p1934: 7.28597e-7; = p1526*1000/p0818
- p2997: 0; = p2411*(p1020+p1022)
- p2900: 0; = p2314*(p1129+p1131)
- p0791: 0
- p1715: 0
- p2229: 0.438809; = if(p0774*p0778+p0775*p0779+p0776*p0780+p0777*p0781=0;0;p0781*p0777/(p0774*p0778+p0775*p0779+p0776*p0780+p0777*p0781))
- p1269: 0
- p3895: 7.89118e-7; = p1962*p3477
- p2942: 8.89811e-6; = p2356*(p1020+p1022)
- p1041: 0.330448
- p1863: 0
- p3419: 0; = p3362*p1239
- p2238: 0.000318301; = p2222*p2183
- p2184: 0.000244155; = p1051/p0818
- p2359: 3.66164e-5; = p2225*p2187
- p1666: 0
- p2070: 0.282
- p3409: 0; = p3371*p1238
- p2160: 3.59713e-6; = p2015*p2084*p2122/(p0818*1000)
- p0851: 0
- p0114: 34.673
- p2892: 0; = p2306*(p1079+p1081)
- p2615: 0; = p2419*p1073
- p3449: 0; = p3373*p1240
- p2164: 0.0180392; = (p2015/p0818)-(p2022)-(p2035+p2036+p2052)-(p2017/p0818)-(p2039+p2041+p2044+p2158+p2159+p2160+p2161+p2162)
- p0267: 9.831
- p2849: 9.19996e-6; = p2263*(p1079+p1081)
- p3335: 0; = IF(or(p3254=0;p1232>0);0;p3270*(p3280*(p3283*p1256+p3286*(p1253+p1257)+p1258*p3288+p3300*p3287)))
- p1851: 0
- p3071: 1.75154e-8; = p2290*p1023
- p0877: 0; = p0876*p0001*p0003/(p0818*p0002)
- p0151: 0
- p3951: 2.34725e-5; = p1808*p3478
- p2619: 0; = p2423*p1073
- p1592: 0
- p3046: 1.3984e-5; = p2265*p1082
- p2027: 0.428799
- p0838: 1.80471e9; = (p0833-p0836)*p0837
- p1937: 0
- p0720: 0
- p1127: 0; = if(p1121=0;p0721/100;0)
- p3016: 0; = p2430*(p1129+p1131)
- p1702: 0
- p1096: 0.00136107
- p3164: 3.38468e-8; = p2383*p1082
- p3717: 5.13447e-7; = p1780*p3477
- p1141: 5.54688e-6; = if(p1121=0;p1135*p0001/(p0818*p0002);0)
- p3304: 0; = if(and(p1232=0;p3252<>0);p3260*p3289;0)
- p2259: 8.68748e-5; = p2226*p2205
- p2159: 8.97203e-5; = p2015*p2083*p2121/(p0818*1000)
- p0729: 0
- p3329: 0; = if(and(p1232=0;p3255<>0);p3255*(p3266-p3324)/p3327;0)
- p1169: 0.000945116
- p3452: 0; = p3376*p1240
- p2367: 0.00353252; = p2225*p2196
- p3173: 7.09522e-6; = p2392*p1132
- p1630: 0
- p3344: 0; = if(and(p1232=0;p3254<>0);p3254-(p3339+p3340+p3341+p3342+p3343);0)
- p1185: 0.5
- p1233: 0.000256766; = p1232*p0001/(p0818*p0002)
- p1138: 9034.58; = if(p1121=0;p1132*(p0716/100)*p0703*1000;0)
- p2918: 0.000132317; = p2332*(p1020+p1022)
- p0884: 78.993; = IF(p0689=100;0;IF(p0689+p0688>100;100-p0689;p0688))
- p1833: 0
- p3511: 0; = p1780*p3476
- p2304: 0; = p2227*p2211
- p2240: 0.000175031; = p2222*p2185
- p3176: 0; = p2395*p1023
- p3047: 1.9465e-8; = p2266*p1082
- p2503: 0; = p2307*p1073
- p1579: 0
- p3317: 0; = if(and(p1232=0;p3253<>0);p3253*(p3261*p3277-p3312)/p3316;0)
- p0866: 0; = IF(p0858+p0864+p0865=1;0;IF(p0858+p0864+p0865+p0861>1;1-(p0858+p0864+p0865);p0861))
- p1106: 2518.81; = IF(p1071=0;p1105*p1096*p1095;0)
- p0005: 1.60934
- p3161: 4.30056e-6; = p2380*p1082
- p4339: 0; = p1784*p3480
- p3036: 3.80351e-6; = p2255*p1023
- p1739: 0.583082
- p2152: 1.04468e-6; = p2015*p2080*p2114/(p0818*1000)
- p0179: 36.878
- p0766: 66.24; = p0106*(1+p0634*p0238/100)
- p2910: 3.83026e-6; = p2324*(p1020+p1022)
- p1949: 3.64299e-7; = p1541*1000/p0818
- p2064: 0.676706
- p0238: 14.547
- p2983: 0; = p2397*(p1020+p1022)
- p2938: 9.62067e-6; = p2352*(p1129+p1131)
- p0701: 0
- p3681: 0; = p1950*p3476
- p2740: 8.81924e-6; = p2349*(p1078+p1080)
- p2915: 1.38508e-7; = p2329*(p1020+p1022)
- p0952: 0; = if(and(p0683>0;or(p0807=56;p0807=100;and(p0807=60;p0901>0.06)));p0934;0)
- p1316: 0; = p1312*p1252/p0818
- p2809: 0; = p2418*(p1078+p1080)
- p0774: 34.673; = p0114*(1+p0642*p0246/100)
- p3345: 0; = if(and(p1232=0;p3256<>0);p3273*p3277*p3293;0)
- p2015: 1.37809e8; = p0830*p2011*p2013
- p1933: 0
- p0678: 222.996; = p0018*(1+p0546*p0150/100)
- p3470: 0; = p3375*p1241
- p0745: 3935.32; = p0085*(1+p0613*p0217/100)
- p3376: 0; = if(p1232=0;p3246*p3358/p0818;0)
- p1845: 0
- p1989: 50
- p3255: 0; = p1252*(p1297*(1-p3247)+p1300*(1-p3248)+p1301*(1-p3249)+p1302*(1-p3250))
- p4292: 6.20057e-9; = p1943*p3479
- p2115: 0.856281
- p0807: 60
- p1206: 0.023475
- p2842: 1.05392e-5; = p2256*(p1020+p1022)
- p1216: 0.0263674
- p2879: 0.000322148; = p2293*(p1020+p1022)
- p2706: 4.04386e-5; = p2315*(p1019+p1021)
- p0562: 0; = IF(p0298<0.5;-SQRT(p0007*EXP(p0430^2*p0008)-p0007);SQRT(p0007*EXP(p0430^2*p0008)-p0007))
- p0995: 0; = p0991*p0001*p0004/(p0818*p0002)
- p0509: 0; = SQRT(2)*(IF((2*p0377-1)<0;-1;IF((2*p0377-1)>0;1;0))*SQRT(SQRT((2/(pi()*0.140012289)+LN(1-(2*p0377-1)^2)/2)^2-LN(1-(2*p0377-1)^2)/0.140012289)-(2/(pi()*0.140012289)+LN(1-(2*p0377-1)^2)/2)))
- p3247: 0
- p0657: 0; = IF(p0393<0.5;-SQRT(p0007*EXP(p0525^2*p0008)-p0007);SQRT(p0007*EXP(p0525^2*p0008)-p0007))
- p2573: 1.72451e-5; = p2377*p1073
- p1663: 0
- p2255: 0.000478429; = p2222*p2201
- p3464: 0; = p3369*p1241
- p0906: 0.00392517
- p2868: 0.000118198; = p2282*(p1020+p1022)
- p2022: 0.00862891; = p2018*p2015/p0818-p2021
- p0235: 0
- p1736: 0
- p0642: 0; = IF(p0378<0.5;-SQRT(p0007*EXP(p0510^2*p0008)-p0007);SQRT(p0007*EXP(p0510^2*p0008)-p0007))
- p0563: 0; = IF(p0299<0.5;-SQRT(p0007*EXP(p0431^2*p0008)-p0007);SQRT(p0007*EXP(p0431^2*p0008)-p0007))
- p0947: 7.24782e-5; = if(and(p0683=0;or(p0807=480;p0807=32;p0807=1;and(p0807=60;p0901<0.03)));p0935;0)
- p1110: 707719; = IF(p1071=0;p1105*p1104*p1095;0)
- p2518: 6.98101e-5; = p2322*p1014
- p1045: 0.0504301; = IF(p1012=0;IF(p1037+p1044=1;0;IF(p1037+p1044+p1039>1;1-(p1037+p1044);p1039));0)
- p3478: 0.650828; = if(p1328+p1330+p1332+p1334+p1336+p1338+p1340+p1342+p1344=0;0;p1332/(p1328+p1330+p1332+p1334+p1336+p1338+p1340+p1342+p1344))
- p2043: 0.636483
- p1175: 0.000431935
- p3216: 0.06; = IF(OR(p1226=0;p1228=0);0;1-p3213-p3214-p3215)
- p1764: 0
- p0753: 0
- p2344: 2.83388e-7; = p2228*p2212
- p1606: 0
- p2471: 1.25794e-5; = p2275*p1123
- p0523: 0; = SQRT(2)*(IF((2*p0391-1)<0;-1;IF((2*p0391-1)>0;1;0))*SQRT(SQRT((2/(pi()*0.140012289)+LN(1-(2*p0391-1)^2)/2)^2-LN(1-(2*p0391-1)^2)/0.140012289)-(2/(pi()*0.140012289)+LN(1-(2*p0391-1)^2)/2)))
- p2902: 3.7741e-5; = p2316*(p1020+p1022)
- p2712: 1.14186e-5; = p2321*(p1019+p1021)
- p1943: 1.0929e-6; = p1535*1000/p0818
- p0020: 333.765
- p1677: 0
- p2002: 750
- p2696: 0; = p2305*(p1078+p1080)
- p2622: 0; = p2426*p1073
- p1132: 0.17918; = if(p1121=0;IF(p1123+p1128+p1129+p1130+p1131=1;0;1-(p1123+p1128+p1129+p1130+p1131));0)
- p1980: 3521.6
- p1248: 0; = if(p1232>0;0;p1243*p0001/(p0818*p0002))
- p2453: 0.000633871; = p2257*p1014
- p0867: 0; = IF(p0858+p0864+p0865+p0866=1;0;IF(p0858+p0864+p0865+p0866+p0862>1;1-(p0858+p0864+p0865+p0866);p0862))
- p2480: 0.000194547; = p2284*p1014
- p0777: 47.077; = p0117*(1+p0645*p0249/100)
- p0880: 0; = p0868*p0856
- p1642: 0
- p1324: 0.797974; = IF(((p0745*1000*p0751/100)+(p0754*1000*p0760/100))/p0801<0;0;((p0745*1000*p0751/100)+(p0754*1000*p0760/100))/p0801)
- p1103: 0.564594; = IF(p1071=0;IF(p1096+p1101+p1102=1;0;IF(p1096+p1101+p1102+p1099>1;1-(p1096+p1101+p1102);p1099));0)
- p0770: 42.536; = p0110*(1+p0638*p0242/100)
- p0919: 0.282273; = p0678*1000/p0801
- p3365: 0; = if(p1232=0;p3244*p3359/p0818;0)
- p1605: 0
- p0711: 35.253; = p0051*(1+p0579*p0183/100)
- p2049: 25.6942
- p3054: 3.01828e-5; = p2273*p1132
- p2960: 0.000138227; = p2374*(p1020+p1022)
- p5107: 0; = p1934*p3483
- p1643: 0
- p1963f: 9.27757e-6; = p1647*p1851+p1648*p1852+p1649*p1853+p1650*p1854+p1651*p1855+p1652*p1856+p1653*p1857+p1654*p1858+p1655*p1859+p1656*p1860+p1657*p1861+p1658*p1862+p1659*p1863+p1660*p1864+p1661*p1865+p1662*p1866+p1663*p1867+p1664*p1868+p1665*p1869+p1666*p1870
- p1712: 0
- p1260: 0; = if(p1232>0;0;p0731/100)
- p0779: 0
- p2883: 0; = p2297*(p1079+p1081)
- p1241: 0; = if(p1232>0;0;IF(p1234+p1238+p1239+p1240=1;0;1-(p1234+p1238+p1239+p1240)))
- p0978: 0
- p1002: 765101; = p0996*p0888
- p0315: 0.5
- p3096: 8.93018e-6; = p2315*p1023
- p3468: 0; = p3373*p1241
- p0640: 0; = IF(p0376<0.5;-SQRT(p0007*EXP(p0508^2*p0008)-p0007);SQRT(p0007*EXP(p0508^2*p0008)-p0007))
- p2239: 5.08154e-5; = p2222*p2184
- p1944: 0
- p1794: 0
- p2411: 0; = p2234*p2201
- p0809: 0
- p0723: 820; = p0063*(1+p0591*p0195/100)
- p1756: 0
- p2067: 0.446471
- p1963d: 1.37146e-6; = p1608*p1812+p1609*p1813+p1610*p1814+p1611*p1815+p1612*p1816+p1613*p1817+p1614*p1818+p1615*p1819+p1616*p1820+p1617*p1821+p1618*p1822+p1619*p1823+p1620*p1824+p1621*p1825+p1622*p1826+p1623*p1827+p1624*p1828+p1625*p1829+p1626*p1830+p1627*p1831
- p0967: 0
- p3252: 0; = p1252*(p1267*(1-p3247)+p1270*(1-p3248)+p1271*(1-p3249)+p1272*(1-p3250))
- p2574: 0.000143184; = p2378*p1073
- p2779: 1.25308e-5; = p2388*(p1078+p1080)
- p1781: 0
- p4840: 0; = p1873*p3482
- p0608: 0; = IF(p0344<0.5;-SQRT(p0007*EXP(p0476^2*p0008)-p0007);SQRT(p0007*EXP(p0476^2*p0008)-p0007))
- p0732: 0
- p2914: 0.000366116; = p2328*(p1020+p1022)
- p1963e: 0; = p1628*p1832+p1629*p1833+p1630*p1834+p1631*p1835+p1632*p1836+p1633*p1837+p1634*p1838+p1635*p1839+p1636*p1840+p1637*p1841+p1638*p1842+p1639*p1843+p1640*p1844+p1641*p1845+p1642*p1846+p1643*p1847+p1644*p1848+p1645*p1849+p1646*p1850
- p3323: 0; = if(and(p1232=0;p3255<>0);p3265*p3277*(p3299*p3291+(1-p3299)*p3295);0)
- p2634: 1.474e-5; = p2243*(p1019+p1021)
- p3039: 8.07442e-6; = p2258*p1082
- p2736: 7.4297e-7; = p2345*(p1078+p1080)
- p2596: 0; = p2400*p1014
- p1143: 0; = if(p1121=0;p1137*p0001/(p0818*p0002);0)
- p0405: 0; = SQRT(2)*(IF((2*p0273-1)<0;-1;IF((2*p0273-1)>0;1;0))*SQRT(SQRT((2/(pi()*0.140012289)+LN(1-(2*p0273-1)^2)/2)^2-LN(1-(2*p0273-1)^2)/0.140012289)-(2/(pi()*0.140012289)+LN(1-(2*p0273-1)^2)/2)))
- p1244: 0; = if(p1232>0;0;p1239*(p0725/100)*p0723*1000)
- p1280: 0; = IF(p1277=p1263;0;IF(p1277+p1278>p1263;p1263-p1277;p1278))
- p4428: 0; = p1873*p3480
- p2828: 4.89888e-6; = p2242*(p1020+p1022)
- p2999: 0; = p2413*(p1020+p1022)
- p2048: 5.02036e-13; = p2015*p2046/(p0818*1000000000000)
- p1158: 0.0119618; = p1156*p1157
- p1065: 0.00108514; = IF(p1012=0;p1051/(p1058*p0818);0)
- p1639: 0
- p2485: 0.00467636; = p2289*p1014
- p1742: 0
- p3385: 0; = p3366*p1234
- p2414: 0; = p2235*p2204
- p0853: 0; = p0803/(p0802+p0803)
- p2660: 5.27516e-6; = p2269*(p1078+p1080)
- p0982: 0; = if(p0886=0;0;min(1;(p0691*p0690*1000*p0693/100)/p0886))
- p2840: 0.000170806; = p2254*(p1020+p1022)
- p2154: 6.36539e-6; = p2015*p2082*p2116/(p0818*1000)
- p2174: 0.00344026; = p0895*p0903/p0818
- p0546: 0; = IF(p0282<0.5;-SQRT(p0007*EXP(p0414^2*p0008)-p0007);SQRT(p0007*EXP(p0414^2*p0008)-p0007))
- p0477: 0; = SQRT(2)*(IF((2*p0345-1)<0;-1;IF((2*p0345-1)>0;1;0))*SQRT(SQRT((2/(pi()*0.140012289)+LN(1-(2*p0345-1)^2)/2)^2-LN(1-(2*p0345-1)^2)/0.140012289)-(2/(pi()*0.140012289)+LN(1-(2*p0345-1)^2)/2)))
- p1147: 0.111546
- p1180: 6.21546e-8; = p1176*p1179/p0818
- p1235: 0; = if(p1232>0;0;p0727/100)
- p3150: 1.74384e-8; = p2369*p1023
- p1355: 9
- p4751: 0; = p1784*p3482
- p0056: 6.149
- p0719: 33.847; = p0059*(1+p0587*p0191/100)
- p0449: 0; = SQRT(2)*(IF((2*p0317-1)<0;-1;IF((2*p0317-1)>0;1;0))*SQRT(SQRT((2/(pi()*0.140012289)+LN(1-(2*p0317-1)^2)/2)^2-LN(1-(2*p0317-1)^2)/0.140012289)-(2/(pi()*0.140012289)+LN(1-(2*p0317-1)^2)/2)))
- p2990: 0; = p2404*(p1020+p1022)
- p2486: 1.76915e-6; = p2290*p1014
- p2524: 0.00192074; = p2328*p1014
- p2813: 0; = p2422*(p1078+p1080)
- p3275: 0
- p3272: 0
- p2588: 1.91002e-5; = p2392*p1123
- p3291: 0
- p2853: 7.57146e-7; = p2267*(p1079+p1081)
- p1818: 0
- p3106: 1.61e-6; = p2325*p1023
- p2798: 0; = p2407*(p1019+p1021)
- p3749: 5.13447e-7; = p1812*p3477
- p1865: 0
- p2714: 3.58242e-6; = p2323*(p1019+p1021)
- p2651: 7.05333e-6; = p2260*(p1078+p1080)
- p0894: 0.23
- p0176: 0.621
- p3372: 0; = if(p1232=0;p3245*p3360/p0818;0)
- p2197: 5.61269e-6; = p1055/p0818
- p2800: 0; = p2409*(p1019+p1021)
- p2586: 0.00012337; = p2390*p1123
- p0607: 0; = IF(p0343<0.5;-SQRT(p0007*EXP(p0475^2*p0008)-p0007);SQRT(p0007*EXP(p0475^2*p0008)-p0007))
- p2560: 0.000240157; = p2364*p1014
- p3281: 0
- p2889: 0; = p2303*(p1079+p1081)
- p0258: 26.423
- p4652: 5.78828e-8; = p1891*p3481
- p3481: 0.158888; = if(p1328+p1330+p1332+p1334+p1336+p1338+p1340+p1342+p1344=0;0;p1338/(p1328+p1330+p1332+p1334+p1336+p1338+p1340+p1342+p1344))
- p0633: 0; = IF(p0369<0.5;-SQRT(p0007*EXP(p0501^2*p0008)-p0007);SQRT(p0007*EXP(p0501^2*p0008)-p0007))
- p2610: 0; = p2414*p1073
- p2797: 0; = p2406*(p1019+p1021)
- p1098: 0.01885
- p5028: 0; = p1855*p3483
- p3400: 0; = p3362*p1238
- p0502: 0; = SQRT(2)*(IF((2*p0370-1)<0;-1;IF((2*p0370-1)>0;1;0))*SQRT(SQRT((2/(pi()*0.140012289)+LN(1-(2*p0370-1)^2)/2)^2-LN(1-(2*p0370-1)^2)/0.140012289)-(2/(pi()*0.140012289)+LN(1-(2*p0370-1)^2)/2)))
- p2083: 2.17294
- p1305: 0; = p1301*p1252/p0818
- p2156: 1.14304e-6; = p2015*p2085*p2118/(p0818*1000)
- p0975: 0; = p0973*p0974/p0818
- p1999: 3.83769e7; = (p1228+p1229)*p0818+p1164
- p1057: 0.82
- p3169: 4.20125e-6; = p2388*p1082
- p2266: 2.31561e-7; = p2226*p2212
- p1179: 0.5
- p0163: 5.756
- p2941: 5.57367e-5; = p2355*(p1020+p1022)
- p2281: 6.03655e-5; = p2223*p2187
- p2382: 0.00028927; = p2229*p2211
- p2447: 9.38016e-7; = p2251*p1014
- p1861: 0
- p2863: 9.18869e-5; = p2277*(p1020+p1022)
- p0808: 0
- p2301: 0; = p2227*p2208
- p1824: 0
- p0309: 0.5
- p2000: 4000
- p2305: 0; = p2227*p2212
- p3897: 2.77402e-5; = p1754*p3478
- p4916: 0; = p1949*p3482
- p2567: 0.00102516; = p2371*p1014
- p0860: 0; = p0672*1000/p0856
- p2501: 0; = p2305*p1073
- p3145: 2.37767e-6; = p2364*p1023
- p1626: 0
- p1264: 0; = if(p1232>0;0;IF(p1259+p1263=1;0;IF(p1259+p1263+p1261>1;1-(p1259+p1263);p1261)))
- p2100: 0.705744
- p1697: 0
- p1308: 0
- p0313: 0.5
- p2552: 4.66816e-5; = p2356*p1014
- p5252: 4.27058e-7; = p1873*p3484
- p2158: 7.42322e-6; = p2015*p2082*p2120/(p0818*1000)
- p0748: 65.616; = p0088*(1+p0616*p0220/100)
- p2871: 9.32543e-6; = p2285*(p1020+p1022)
- p2422: 0; = p2235*p2212
- p1313: 0; = p1307*p1252/p0818
- p0418: 0; = SQRT(2)*(IF((2*p0286-1)<0;-1;IF((2*p0286-1)>0;1;0))*SQRT(SQRT((2/(pi()*0.140012289)+LN(1-(2*p0286-1)^2)/2)^2-LN(1-(2*p0286-1)^2)/0.140012289)-(2/(pi()*0.140012289)+LN(1-(2*p0286-1)^2)/2)))
- p2017: 6.32061e7; = p2015*p0898
- p4108: 1.03343e-7; = p1759*p3479
- p0221: 46.831
- p3438: 0; = p3362*p1240
- p3095: 0; = p2314*p1132
- p2948: 2.24938e-5; = p2362*(p1020+p1022)
- p0986: 0; = IF(p0982+p0985=1;0;IF(p0982+p0985+p0984>1;1-(p0982+p0985);p0984))
- p1931: 0
- p3445: 0; = p3369*p1240
- p1740: 0
- p3622: 0; = p1891*p3476
- p1181: 0.000142822
- p1757: 0
- p2527: 2.62222e-6; = p2331*p1014
- p0085: 3935.32
- p2207: 0.000925603; = p1119-p2205-p2204-p2206
- p0560: 0; = IF(p0296<0.5;-SQRT(p0007*EXP(p0428^2*p0008)-p0007);SQRT(p0007*EXP(p0428^2*p0008)-p0007))
- p3246: 1; = IF(p3244+p3245=1;0;1-(p3244+p3245))
- p3138: 1.59192e-6; = p2357*p1023
- p3006: 0; = p2420*(p1079+p1081)
- p2354: 0.0016589; = p2225*p2182
- p1011: 3.0085e-6; = p1010*p0001*p0004/(p0818*p0002)
- p2520: 2.00945e-5; = p2324*p1014
- p1119: 0.00176197; = IF(p1071=0;p1109/(p1114*p0818);0)
- p3111: 1.18081e-8; = p2330*p1023
- p0749: 0.572; = p0089*(1+p0617*p0221/100)
- p5131: 0; = p1962*p3483
- p0009: 27.1346
- p1329: 0; = p1328*p0001/(p0818*p0002)
- p2641: 0.000111159; = p2250*(p1019+p1021)
- p2628: 5.22014e-5; = p2237*(p1019+p1021)
- p0825: 2.42905e9; = p0818*p0822
- p0174: 0
- p0217: 15.077
- p0989: 0; = p0985*p0886
- p0455: 0; = SQRT(2)*(IF((2*p0323-1)<0;-1;IF((2*p0323-1)>0;1;0))*SQRT(SQRT((2/(pi()*0.140012289)+LN(1-(2*p0323-1)^2)/2)^2-LN(1-(2*p0323-1)^2)/0.140012289)-(2/(pi()*0.140012289)+LN(1-(2*p0323-1)^2)/2)))
- p1872: 0
- p2933: 8.05151e-6; = p2347*(p1079+p1081)
- p1116: 1.05128e-5; = IF(p1071=0;p1106/(p1111*p0818);0)
- p0158: 34.569
- p1850: 0
- p0801: 790000
- p2816: 0; = p2425*(p1078+p1080)
- p0993: 0; = p0989*p0001*p0004/(p0818*p0002)
- p2162: 8.18507e-7; = p2015*p2086*p2124/(p0818*1000)
- p0375: 0.5
- p0898: 0.45865
- p2989: 0; = p2403*(p1020+p1022)
- p2078: 0.117
- p1080: 0; = IF(p1071=0;IF(p1073+p1078+p1079=1;0;IF(p1073+p1078+p1079+p1076>1;1-(p1073+p1078+p1079);p1076));0)
- p4634: 8.04571e-6; = p1873*p3481
- p0760: 0
- p1970: 790000; = p0801
- p0796: 98.814; = p0136*(1+p0664*p0268/100)
- p2547: 0.000153887; = p2351*p1123
- p0700: 0
- p3085: 0; = p2304*p1082
- p0756: 0
- p2987: 0; = p2401*(p1020+p1022)
- p1557: 0
- p3237: 0.854735
- p2318: 0.00013559; = p2224*p2185
- p0125: 37.041
- p0216: 39.651
- p2080: 0.025
- p1969: 0; = p0803
- p3444: 0; = p3368*p1240
- p2769: 0.000101833; = p2378*(p1078+p1080)
- p3199: 0; = p2418*p1082
- p4985: 0; = p1812*p3483
- p1738: 0
- p2376: 0.000151063; = p2229*p2205
- p0424: 0; = SQRT(2)*(IF((2*p0292-1)<0;-1;IF((2*p0292-1)>0;1;0))*SQRT(SQRT((2/(pi()*0.140012289)+LN(1-(2*p0292-1)^2)/2)^2-LN(1-(2*p0292-1)^2)/0.140012289)-(2/(pi()*0.140012289)+LN(1-(2*p0292-1)^2)/2)))
- p4263: 6.20057e-9; = p1914*p3479
- p0979: 0; = IF(p0976=0;0;p0976*p0001/(p0818*p0002))
- p1344: 33461; = IF(p1318=0;p1327*p0801;0)
- p1336: 0; = p1323*p0801
- p2482: 0.00039592; = p2286*p1014
- p1176: 341.229; = p1175*p0801
- p4704: 1.73648e-7; = p1943*p3481
- p2510: 0; = p2314*p1123
- p1069: 3.50793e-5; = IF(p1012=0;p1055/(p1062*p0818);0)
- p2448: 1.5396e-6; = p2252*p1014
- p1565: 0
- p2770: 2.8365e-5; = p2379*(p1078+p1080)
- p0439: 0; = SQRT(2)*(IF((2*p0307-1)<0;-1;IF((2*p0307-1)>0;1;0))*SQRT(SQRT((2/(pi()*0.140012289)+LN(1-(2*p0307-1)^2)/2)^2-LN(1-(2*p0307-1)^2)/0.140012289)-(2/(pi()*0.140012289)+LN(1-(2*p0307-1)^2)/2)))
- p0387: 0.5
- p0849: 0
- p1035: 2.09368e-6; = IF(p1012=0;p1029*p0001/(p0818*p0002);0)
- p3055: 2.68908e-6; = p2274*p1132
- p0353: 0.5
- p3080: 0; = p2299*p1082
- p1033: 0; = IF(p1012=0;p1027*p0001/(p0818*p0002);0)
- p0783: 42.366; = p0123*(1+p0651*p0255/100)
- p2594: 0; = p2398*p1014
- p2053: 1.45647
- p4514: 0; = p1963*p3480
- p1217: 31.7856
- p1601: 0
- p1791: 0
- p2457: 8.23441e-5; = p2261*p1073
- p1878: 0
- p1913: 0
- p2406: 0; = p2234*p2196
- p4240: 2.06686e-9; = p1891*p3479
- p0668: 0; = IF(p0404<0.5;-SQRT(p0007*EXP(p0536^2*p0008)-p0007);SQRT(p0007*EXP(p0536^2*p0008)-p0007))
- p2650: 2.17812e-5; = p2259*(p1078+p1080)
- p3187: 0; = p2406*p1023
- p1203: 3
- p0789: 45.114; = p0129*(1+p0657*p0261/100)
- p2011: 0.0510963
- p4504: 0; = p1949*p3480
- p4017: 3.55644e-6; = p1874*p3478
- p3143: 1.16834e-6; = p2362*p1023
- p1551: 0
- p2932: 2.1336e-6; = p2346*(p1079+p1081)
- p1082: 0.08406; = IF(p1071=0;IF(p1073+p1078+p1079+p1080+p1081=1;0;1-(p1073+p1078+p1079+p1080+p1081));0)
- p0320: 0.5
- p0610: 0; = IF(p0346<0.5;-SQRT(p0007*EXP(p0478^2*p0008)-p0007);SQRT(p0007*EXP(p0478^2*p0008)-p0007))
- p0243: 35.273
- p2857: 8.98751e-6; = p2271*(p1079+p1081)
- p2009: 0.00752185; = ((p1983*p1985+p1989*p1991+p1995*p1997+p2003*p2005+p1976*p1977+p1978*p1979+p1998*p1999)/p0818)*p0005*p0002/1000
- p3474: 0; = p3379*p1241
- p0577: 0; = IF(p0313<0.5;-SQRT(p0007*EXP(p0445^2*p0008)-p0007);SQRT(p0007*EXP(p0445^2*p0008)-p0007))
- p2847: 7.30382e-5; = p2261*(p1079+p1081)
- p1187: 0.000181343
- p3129: 3.29916e-7; = p2348*p1082
- p0969: 0
- p1584: 0
- p2211: 0.000659218; = p1120-p2209-p2208-p2210
- p2642: 4.20535e-8; = p2251*(p1019+p1021)
- p0344: 0.5
- p2878: 1.21692e-6; = p2292*(p1020+p1022)
- p2378: 0.000406162; = p2229*p2207
- p3072: 2.87488e-8; = p2291*p1023
- p1251: 0; = if(p1232>0;0;p1246*p0001/(p0818*p0002))
- p1006: 6.3163e-6; = p1002*p0001*p0004/(p0818*p0002)
- p3057: 2.17421e-5; = p2276*p1023
- p1228: 0.0136202; = IF(p1221=0;0;p0801*p1212*2000/(p1222+p1221*p1225)/p0818)
- p1278: 0
- p4283: 4.13371e-9; = p1934*p3479
- p2307: 0; = p2227*p2214
- p1621: 0
- p0698: 0
- p0829: 0; = if(p0807=480;p0814*(1-p0824);0)
- p2618: 0; = p2422*p1073
- p1898: 0
- p0917: 1.27956
- p3131: 4.05652e-5; = p2350*p1132
- p1144: 2.93642e-6; = if(p1121=0;p1138*p0001/(p0818*p0002);0)
- p1275: 0; = p1271*p1252/p0818
- p3279: 0
- p0517: 0; = SQRT(2)*(IF((2*p0385-1)<0;-1;IF((2*p0385-1)>0;1;0))*SQRT(SQRT((2/(pi()*0.140012289)+LN(1-(2*p0385-1)^2)/2)^2-LN(1-(2*p0385-1)^2)/0.140012289)-(2/(pi()*0.140012289)+LN(1-(2*p0385-1)^2)/2)))
- p1591: 0
- p1506: 3
- p2465: 7.41724e-6; = p2269*p1073
- p2922: 3.67581e-5; = p2336*(p1079+p1081)
- p1744: 0
- p1945: 0
- p1124: 0; = if(p1121=0;p0718/100;0)
- p2821: 0; = p2430*(p1128+p1130)
- p2046: 10
- p0900: 0.968045; = p0899/p0818
- p1048: 0.000264901; = IF(p1012=0;IF(p1037+p1044+p1045+p1046+p1047=1;0;IF(p1037+p1044+p1045+p1046+p1047+p1042>1;1-(p1037+p1044+p1045+p1046+p1047);p1042));0)
- p1482: 85
- p2772: 5.53827e-6; = p2381*(p1078+p1080)
- p2010: 0.0014759; = ((p1984*p1985+p1990*p1991+p1996*p1997+p2004*p2005)/p0818)*p0005*p0002/1000
- p2895: 0; = p2309*(p1079+p1081)
- p2598: 0; = p2402*p1014
- p2355: 0.000364149; = p2225*p2183
- p3146: 1.32534e-5; = p2365*p1023
- p1351: 50
- p1186: 2.05518e-8; = p1182*p1185/p0818
- p1215: 0.0739645; = IF(p1214=0;0;(p1214-1.5)/(p1214-1)^2)
- p3137: 4.62171e-7; = p2356*p1023
- p2504: 0; = p2308*p1073
- p1638: 0
- p1838: 0
- p0126: 27.102
- p5063: 0; = p1890*p3483
- p0280: 0.5
- p2125: 6.26114e-5; = p2015*p2053*p2087/(p0818*1000)
- p1692: 0
- p1146: 0.888454
- p2051: 0.0012281; = p2015*p2049*p2050/(p0818*1000)
- p3348: 0; = if(and(p1232=0;p3256<>0);p3276*p3289;0)
- p0499: 0; = SQRT(2)*(IF((2*p0367-1)<0;-1;IF((2*p0367-1)>0;1;0))*SQRT(SQRT((2/(pi()*0.140012289)+LN(1-(2*p0367-1)^2)/2)^2-LN(1-(2*p0367-1)^2)/0.140012289)-(2/(pi()*0.140012289)+LN(1-(2*p0367-1)^2)/2)))
- p1610: 0
- p2523: 0.000194308; = p2327*p1014
- p0916: 0.340805; = p0826+(p0832*(1+p0894))/p0818
- p2189: 0.00053922; = p1053/p0818
- p1707: 0
- p3721: 1.54034e-6; = p1784*p3477
- p2014: 1.59686e8; = p0833*p2011*p2013
- p2440: 9.01166e-5; = p2244*p1014
- p1819: 0
- p3141: 3.72395e-6; = p2360*p1023
- p1093: 0; = IF(p1071=0;p1087*p0001/(p0818*p0002);0)
- p2873: 0.000420663; = p2287*(p1020+p1022)
- p1113: 0.100377
- p3457: 0; = p3362*p1241
- p0785: 37.041; = p0125*(1+p0653*p0257/100)
- p1270: 0; = IF(p1267=p1259;0;IF(p1267+p1268>p1259;p1259-p1267;p1268))
- p2708: 1.41713e-6; = p2317*(p1019+p1021)
- p2143: 6.73317e-6; = p2015*p2071*p2105/(p0818*1000)
- p2063: 2.01468
- p2874: 9.0174e-5; = p2288*(p1020+p1022)
- p2829: 6.26697e-5; = p2243*(p1020+p1022)
- p0813: 0; = if(p0807=480;1.56521739130435;0)
- p2899: 0; = p2313*(p1129+p1131)
- p1321: 3.26861; = IF(((p0745*1000*p0748/100)+(p0754*1000*p0757/100))/p0801<0;0;((p0745*1000*p0748/100)+(p0754*1000*p0757/100))/p0801)
- p2625: 0; = p2429*p1123
- p0706: 3.6; = p0046*(1+p0574*p0178/100)
- p1286: 0; = p1282*p1252/p0818
- p3201: 0; = p2420*p1082
- p2495: 0; = p2299*p1073
- p1758: 0
- p1725: 0
- p1211: 0.6
- p0091: 16.019
- p0136: 98.814
- p2294: 0.000902342; = p2223*p2201
- p2945: 5.60451e-6; = p2359*(p1020+p1022)
- p2253: 4.21547e-6; = p2222*p2199
- p1541: 1
- p2196: 0.0148359; = p1068-p2193-p2195
- p1067: 0.00256771; = IF(p1012=0;p1053/(p1060*p0818);0)
- p2675: 8.722e-6; = p2284*(p1019+p1021)
- p2970: 1.31657e-6; = p2384*(p1079+p1081)
- p1661: 0
- p3328: 0; = if(and(p1232=0;p3255<>0);p3255*(p3265*p3277-p3323)/p3327;0)
- p1614: 0
- p1959: 663.295; = if(p0738*p0740*p0739>0;p0738*1000*(p0740/100)*p0739/1000;p1958)
- p2920: 8.16435e-6; = p2334*(p1020+p1022)
- p0686: 53.957; = p0026*(1+p0554*p0158/100)
- p0261: 31.98
- p2743: 0; = p2352*(p1128+p1130)
- p1703: 0
- p3469: 0; = p3374*p1241
- p2695: 0; = p2304*(p1078+p1080)
- p3236: 0.0140975
- p2884: 0; = p2298*(p1079+p1081)
- p1328: 0; = p1319*p0801
- p2848: 2.03444e-5; = p2262*(p1079+p1081)
- p2913: 3.70375e-5; = p2327*(p1020+p1022)
- p2028: 0.00118701; = p2015*p2026*p2027/(p0818*1000)
- p1029: 6441.68; = IF(p1012=0;IF(p0801<p1023*(p0704/100)*p0703*1000;p0801;p1023*(p0704/100)*p0703*1000);0)
- p3382: 0; = p3363*p1234
- p3188: 0; = p2407*p1023
- p0787: 20.826; = p0127*(1+p0655*p0259/100)
- p2139: 1.39058e-5; = p2015*p2067*p2101/(p0818*1000)
- p2086: 0.0617647
- p2815: 0; = p2424*(p1078+p1080)
- p3021: 1.39149e-6; = p2240*p1023
- p3256: 0; = p1252*(p1307*(1-p3247)+p1310*(1-p3248)+p1311*(1-p3249)+p1312*(1-p3250))
- p4573: 4.63062e-7; = p1812*p3481
- p0223: 37.57
- p3334: 0; = IF(or(p3254=0;p1232>0);0;p3269*p3277*(p3300*p3292+(1-p3300)*p3296))
- p2342: 1.55467e-5; = p2228*p2210
- p2409: 0; = p2234*p2199
- p3411: 0; = p3373*p1238
- p0531: 0; = SQRT(2)*(IF((2*p0399-1)<0;-1;IF((2*p0399-1)>0;1;0))*SQRT(SQRT((2/(pi()*0.140012289)+LN(1-(2*p0399-1)^2)/2)^2-LN(1-(2*p0399-1)^2)/0.140012289)-(2/(pi()*0.140012289)+LN(1-(2*p0399-1)^2)/2)))
- p2640: 1.12452e-5; = p2249*(p1019+p1021)
- p1963i: 8.27484e-7; = p1706*p1910+p1707*p1911+p1708*p1912+p1709*p1913+p1710*p1914+p1711*p1915+p1712*p1916+p1713*p1917+p1714*p1918+p1715*p1919+p1716*p1920+p1717*p1921+p1718*p1922+p1719*p1923+p1720*p1924+p1721*p1925+p1722*p1926+p1723*p1927+p1724*p1928
- p2692: 0; = p2301*(p1078+p1080)
- p3417: 0; = p3379*p1238
- p0403: 0.5
- p3269: 0
- p1192: 2.60949e-8; = p1188*p1191/p0818
- p0078: 820
- p0937: 3.31875e-5; = p0931*p0001/(p0818*p0002)
- p1971: 0.000243765; = p1966*p0001/(p0818*p0002)
- p2276: 0.00273485; = p2223*p2182
- p3209: 0; = p2428*p1132
- p4779: 0; = p1812*p3482
- p2058: 1.24412
- p2877: 5.53496e-7; = p2291*(p1020+p1022)
- p0654: 0; = IF(p0390<0.5;-SQRT(p0007*EXP(p0522^2*p0008)-p0007);SQRT(p0007*EXP(p0522^2*p0008)-p0007))
- p1600: 0
- p3303: 0; = if(and(p1232=0;p3252<>0);p3259*p3289;0)
- p1021: 0; = IF(p1012=0;IF(p1014+p1019+p1020=1;0;IF(p1014+p1019+p1020+p1017>1;1-(p1014+p1019+p1020);p1017));0)
- p1028: 47563.1; = IF(p1012=0;p1022*(p0704/100)*p0703*1000;0)
- p2262: 6.50624e-5; = p2226*p2208
- p1990: 30
- p2885: 0; = p2299*(p1079+p1081)
- p2755: 1.07668e-5; = p2364*(p1019+p1021)
- p2031: 0.465411
- p2531: 0.000491037; = p2335*p1014
- p3189: 0; = p2408*p1023
- p0513: 0; = SQRT(2)*(IF((2*p0381-1)<0;-1;IF((2*p0381-1)>0;1;0))*SQRT(SQRT((2/(pi()*0.140012289)+LN(1-(2*p0381-1)^2)/2)^2-LN(1-(2*p0381-1)^2)/0.140012289)-(2/(pi()*0.140012289)+LN(1-(2*p0381-1)^2)/2)))
- p3406: 0; = p3368*p1238
- p1560: 0
- p1117: 0.000105469; = IF(p1071=0;p1107/(p1112*p0818);0)
- p2931: 9.26608e-7; = p2345*(p1079+p1081)
- p3184: 0; = p2403*p1023
- p1578: 0
- p1667: 0
- p3084: 0; = p2303*p1082
- p2488: 6.38425e-6; = p2292*p1014
- p0474: 0; = SQRT(2)*(IF((2*p0342-1)<0;-1;IF((2*p0342-1)>0;1;0))*SQRT(SQRT((2/(pi()*0.140012289)+LN(1-(2*p0342-1)^2)/2)^2-LN(1-(2*p0342-1)^2)/0.140012289)-(2/(pi()*0.140012289)+LN(1-(2*p0342-1)^2)/2)))
- p2424: 0; = p2235*p2214
- p3233: 0.60394
- p0432: 0; = SQRT(2)*(IF((2*p0300-1)<0;-1;IF((2*p0300-1)>0;1;0))*SQRT(SQRT((2/(pi()*0.140012289)+LN(1-(2*p0300-1)^2)/2)^2-LN(1-(2*p0300-1)^2)/0.140012289)-(2/(pi()*0.140012289)+LN(1-(2*p0300-1)^2)/2)))
- p3362: 0; = if(p1232=0;p3244*p3356/p0818;0)
- p2793: 0; = p2402*(p1019+p1021)
- p2032: 0.448886
- p2468: 5.76575e-5; = p2272*p1123
- p2316: 0.000246577; = p2224*p2183
- p0934: 0.00010848; = p0928*p0001/(p0818*p0002)
- p1658: 0
- p4524: 5.20945e-7; = p1763*p3481
- p3066: 4.84367e-7; = p2285*p1023
- p0962: 0; = if(and(p0683>0;or(p0807=480;p0807=32;p0807=1;and(p0807=60;p0901<0.03)));p0938;0)
- p0930: 131130; = p0801*p0924
- p1197: 1.806
- p2766: 4.18769e-5; = p2375*(p1078+p1080)
- p3215: 0.450791; = p1222*3*15.9994/100.0869
- p2452: 5.52913e-5; = p2256*p1014
- p2025: 7.96835e-5; = p2015*p2023*p2024/(p0818*1000)
- p3490: 0; = p1759*p3476
- p3313: 0; = if(and(p1232=0;p3253<>0);p3262*(p3278*(p3282*p1256+p3286*(p1253+p1257)+p1258*p3288+p3298*p3287));0)
- p2876: 3.37222e-7; = p2290*(p1020+p1022)
- p2150: 5.02965e-6; = p2015*p2078*p2112/(p0818*1000)
- p2271: 2.87425e-5; = p2226*p2217
- p3271: 0
- p0349: 0.5
- p1607: 0
- p3439: 0; = p3363*p1240
- p3197: 0; = p2416*p1082

## Reference product
- winter wheat; at harvest in 2004; at farm; 86%-90% moisture: 1 kg

## Inputs from technosphere
- CUTOFF apply sulfur; unspecified method: 0.000256766 ha; = p1171
- CUTOFF pesticide, Propiconazole; at point-of-sale; kg AI: 1.0929e-6 kg; = p1914
- CUTOFF pesticide, MCPA, dimethylamine salt; at point-of-sale; kg AI: 5.46448e-6 kg; = p1874
- CUTOFF pesticide, Triasulfuron; at point-of-sale; kg AI: 3.64299e-7 kg; = p1949
- CUTOFF potassic fertilizer, other single nutrients; at point-of-sale: 0.00018129 kg; = p1155
- CUTOFF apply N fertilizer; broadcast without incorporation: 2.48502e-5 ha; = p1032
- CUTOFF apply pesticide; unspecified application methods: 1.08755e-5 ha; = p1345
- CUTOFF harvest; winter wheat residue management: 0.000256766 ha; = p1975
- CUTOFF prepare soil; for mulch till, wheat: 7.24782e-5 ha; = p0935
- CUTOFF irrigate; pressure, surface water source, in 2004: 4.38848e-6 ha-m; = p1007
- CUTOFF phosphatic fertilizer, monoammonium phosphate; at point-of-sale: 0.00108397 kg; = p1120
- CUTOFF irrigate; gravity, surface water source, in 2004: 6.3163e-6 ha-m; = p1006
- CUTOFF phosphatic fertilizer, other single phosphates; at point-of-sale: 0.000126606 kg; = p1118
- CUTOFF apply sewage sludge; unspecified method: 0.000256766 ha; = p1189
- CUTOFF nitrogenous fertilizer, nitrogen solutions; at point-of-sale: 0.0233383 kg; = p1068
- CUTOFF limestone, high-grade, pulverized; at point-of-sale: 0.0136202 kg; = p1228
- CUTOFF sulfuric acid storage: 6.21546e-8 kg*a; = p1180
- CUTOFF pesticide, Dichlorprop-dimethylammonium; at point-of-sale; kg AI: 1.82149e-5 kg; = p1759
- CUTOFF apply liming materials; unspecified method: 0.000256766 ha; = p1227
- CUTOFF apply N fertilizer; no broadcast application: 0.000211472 ha; = p1030
- CUTOFF pesticide, MCPA; at point-of-sale; kg AI: 5.06375e-5 kg; = p1873
- CUTOFF nitrogenous fertilizer, ammonium sulfate; at point-of-sale: 0.00256771 kg; = p1067
- CUTOFF irrigate; unspecified irrigation method, surface water source, in 2004: 6.08153e-7 ha-m; = p1009
- CUTOFF dolomite, pulverized; at point-of-sale: 0.000359128 kg; = p1229
- CUTOFF fertilizer filler materials; at point-of-sale: 0.0119618 kg; = p1158
- CUTOFF apply mixed N fertilizer; without incorporation: 1.5459e-5 ha; = p1034
- CUTOFF apply P fertilizer; no broadcast application: 1.00598e-5 ha; = p1089
- CUTOFF apply single or mixed P fertilizer; unspec. method: 2.39873e-6 ha; = p1094
- CUTOFF prepare soil; for conventional till, wheat; <15% residue: 0.00010848 ha; = p0934
- CUTOFF phosphatic fertilizer, superphosphate grades over 22%; at point-of-sale: 0.000105469 kg; = p1117
- CUTOFF apply K fertilizer; no broadcast application: 7.9048e-6 ha; = p1139
- CUTOFF apply sulfuric acid; unspecified method: 0.000256766 ha; = p1177
- CUTOFF apply gypsum; unspecified method: 0.000256766 ha; = p1165
- CUTOFF fertilizer storage: 0.0334993 kg*a; = p1160
- CUTOFF apply pesticide; broadcast with incorporation: 0.000839268 ha; = p1333
- CUTOFF sewage sludge; at point-of-sale: 5.21898e-8 kg; = p1190
- CUTOFF zinc compounds storage: 2.05518e-8 kg*a; = p1186
- CUTOFF phosphatic fertilizer, diammonium phosphate; at point-of-sale: 0.00176197 kg; = p1119
- CUTOFF nitrogenous fertilizer, aqueous ammonia; at point-of-sale: 0.00108514 kg; = p1065
- CUTOFF nitrogenous fertilizer, anhydrous ammonia; at point-of-sale: 0.00849644 kg; = p1064
- CUTOFF apply zinc compounds; unspecified method: 0.000256766 ha; = p1183
- CUTOFF pesticide, Bromoxynil; at point-of-sale; kg AI: 2.91439e-6 kg; = p1780
- CUTOFF pesticide, 2,4-D-butyl; at point-of-sale; kg AI: 8.74317e-6 kg; = p1784
- CUTOFF gypsum storage: 6.64875e-7 kg*a; = p1168
- CUTOFF prepare soil; for no-till, wheat: 4.26199e-5 ha; = p0936
- CUTOFF sowing svc; for mulch till, 2004 winter wheat: 7.24782e-5 ha; = p0947
- CUTOFF liming materials storage: 0.00698966 kg*a; = p1231
- CUTOFF pesticide, Metribuzin; at point-of-sale; kg AI: 3.09654e-5 kg; = p1890
- CUTOFF apply P fertilizer; broadcast with incorporation: 7.15453e-6 ha; = p1090
- CUTOFF international vessel transport; average fuel: 0.17574 metric ton*km; = p2006
- CUTOFF apply pesticide; broadcast by air: 0.000227187 ha; = p1331
- CUTOFF phosphatic fertilizer, superphos. grades 22% and under; at point-of-sale: 1.05128e-5 kg; = p1116
- CUTOFF nitrogenous fertilizer, urea; at point-of-sale: 0.0117842 kg; = p1070
- CUTOFF apply P fertilizer; broadcast without incorporation: 8.9229e-6 ha; = p1091
- CUTOFF manure appl svc; unspec rate, 2004 winter wheat: 0.000256766 ha; = p1233
- CUTOFF pesticide, Thifensulfuron methyl; at point-of-sale; kg AI: 1.0929e-6 kg; = p1943
- CUTOFF pesticide formulation balance; at point-of-sale: 0.000153422 kg; = p1963
- CUTOFF potassic fertilizer, potassium chloride; at point-of-sale: 0.00127068 kg; = p1154
- CUTOFF apply single or mixed N fertilizer; unspec. method: 2.09368e-6 ha; = p1035
- CUTOFF sowing svc; for conventional till, 2004 winter wheat: 0.00010848 ha; = p0946
- CUTOFF pesticide, Metsulfuron-methyl; at point-of-sale; kg AI: 3.64299e-7 kg; = p1891
- CUTOFF sowing svc; for no-till, 2004 winter wheat: 4.26199e-5 ha; = p0948
- CUTOFF bulk cargo rail transport; diesel: 0.0368976 metric ton*km; = p2008
- CUTOFF local area trucking; class 6, average fuel: 0.0014759 metric ton*km; = p2010
- CUTOFF domestic barge transport; average fuel: 0.0196787 metric ton*km; = p2007
- CUTOFF sulfur; at point-of-sale: 2.72001e-7 kg; = p1172
- CUTOFF apply pesticide; as foliar or directed spray: 0.000204893 ha; = p1339
- CUTOFF apply pesticide; broadcast without incorporation: 7.31623e-6 ha; = p1335
- CUTOFF pesticide, Trifloxystrobin; at point-of-sale; kg AI: 3.64299e-7 kg; = p1953
- CUTOFF nitrogenous fertilizer, sodium nitrate; at point-of-sale: 3.50793e-5 kg; = p1069
- CUTOFF pesticide, Tribenuron-methyl; at point-of-sale; kg AI: 3.64299e-7 kg; = p1950
- CUTOFF sulfuric acid; at point-of-sale: 1.24309e-7 kg; = p1178
- CUTOFF harvest; winter: 0.000243765 ha; = p1971
- CUTOFF gypsum; at point-of-sale: 1.32975e-6 kg; = p1166
- CUTOFF pesticide, unspecified type; at point-of-sale; kg AI: 4.47913e-6 kg; = p1962
- CUTOFF nitrogenous fertilizer, ammonium nitrate; at point-of-sale: 0.00318957 kg; = p1066
- CUTOFF regional or national trucking; class 8, average fuel: 0.00752185 metric ton*km; = p2009
- CUTOFF prepare soil; for reduced till, wheat; 15-30% residue: 3.31875e-5 ha; = p0937
- CUTOFF zinc compounds; at point-of-sale: 4.11036e-8 kg; = p1184
- CUTOFF pesticide, 1-Naphthaleneacetamide; at point-of-sale; kg AI: 3.27869e-6 kg; = p1763
- CUTOFF pesticide, Sulfosulfuron; at point-of-sale; kg AI: 7.28597e-7 kg; = p1934
- CUTOFF apply K fertilizer; broadcast without incorporation: 5.54688e-6 ha; = p1141
- CUTOFF sewage sludge storage: 2.60949e-8 kg*a; = p1192
- CUTOFF apply single or mixed K fertilizer; unspec. method: 2.93642e-6 ha; = p1144
- CUTOFF pesticide, Dicamba; at point-of-sale; kg AI: 3.60656e-5 kg; = p1808
- CUTOFF sowing svc; for reduced till, 2004 winter wheat: 3.31875e-5 ha; = p0949
- CUTOFF pesticide, Diclofop-methyl; at point-of-sale; kg AI: 2.91439e-6 kg; = p1812
- CUTOFF sulfur storage: 1.36e-7 kg*a; = p1174
- CUTOFF N inhibitor appl svc; unspec rate & type, 2004 winter wheat: 0.000287796 ha; = p1162
- CUTOFF irrigate; unspec. irrigation method, unspec. water source, in 2004: 3.0085e-6 ha-m; = p1011
- winter wheat residue; at harvest in 2004; at farm; 83%-90% moisture: 0.657452 kg; = p0839
- CUTOFF pesticide, Glyphosate; at point-of-sale; kg AI: 3.09654e-5 kg; = p1855
- CUTOFF apply N fertilizer; broadcast with incorporation: 9.48081e-6 ha; = p1031
- CUTOFF pesticide storage: 0.000274241 kg*a; = p1965
- CUTOFF pesticide, 2,4-D; at point-of-sale; kg AI: 4.2623e-5 kg; = p1754

## Inputs from nature
- Transformation, from annual crop [natural resource, land]: 2.56766 m2; = 1.0 * (p0883)
- Nitrogen: 0.0341917 kg; = p0905
- Potassium; from plant uptake; biogenic: 0.0189815 kg; = p0915
- Carbon dioxide: 3.5495 kg; = p0900*3.6666666667
- Water, surface: 113.129 kg; = p0889
- Occupation, annual crop [natural resource, land]: 2.10088 m2*year; = 1.0 * (p0855)
- Water, unspecified origin: 0.0304258 m3; = p0916*0.001+p0893*0.001
- Dry matter except CNPK; from plant uptake: 1.27956 kg; = p0917
- Transformation, to annual crop [natural resource, land]: 2.56766 m2; = 1.0 * (p0857)
- Phosphorus: 0.00590066 kg; = p0910

## Emissions to nature
- Nitrogen solution; no broadcast in fert. after plant.; no broadcast in fert. after plant.; kg N: 0.00133866 kg; = p2561
- Tribenuron-methyl: 6.41809e-8 kg; = p3887
- Ammonium nitrate; broadcast w/ incorp. in fert. at plant.: 2.92374e-5 kg; = p2710*4.7142857143
- Propiconazole [air, non-urban air or from high stacks]: 1.92543e-7 kg; = 1.0 * (p3851)
- Carbon [soil, agricultural]: 0.370432 kg; = 1.0 * (p2173+p3225+p3242+p2167+p3217)
- Other single K nutrients; unspec. appl. method in fert. at plant.; kg K: 5.09301e-6 kg; = p3133
- Nitrogen solution; broadcast w/o incorp. in fert. at plant.; broadcast w/o incorp. in fert. at plant.; kg N: 0.00017278 kg; = p2912
- Methane: 0.000106245 kg; = p2025*1.3333333333
- Potassium chloride; no broadcast in fert. after plant.: 0.000194059 kg; = p2585*2.2166666667
- Nitrogen solution; unspec. appl. method in fert. in fall bef. plant.; unspec. appl. method in fert. in fall bef. plan...: 1.15847e-5 kg; = p3029
- Nitrogen solution; no broadcast in fert. in spr. bef. plant.; no broadcast in fert. in spr. bef. plant.; kg N: 0.0022069 kg; = p2483
- Nitrogen solution; broadcast w/o incorp. in fert. after plant.; broadcast w/o incorp. in fert. after plant.; kg N: 0.000255165 kg; = p2951
- Oxygen; applied in dolomite: 0.000180263 kg; = p3228
- Gypsum: 1.32975e-6 kg; = p3229
- Sodium nitrate; no broadcast in fert. in fall bef. plant.: 5.6951e-6 kg; = p2447*6.0714285714
- Superphosphate, grades<= 22%; no broadcast in fert. after plant.; kg P: 1.41946e-7 kg; = p2579
- Ammonia [air, non-urban air or from high stacks]: 0.000108946 kg; = 1.0 * (p2159*1.2142857143)
- Aqueous ammonia; no broadcast in fert. at plant.: 3.83831e-5 kg; = p2513*1.2142857143
- Urea; broadcast w/o incorp. in fert. after plant.: 0.00041888 kg; = p2958*5
- cyclopentane: 8.30393e-8 kg; = p2153*1.0166666667
- Magnesium [soil, agricultural]: 4.55511e-5 kg; = 1.0 * (p3227)
- 2,4-D-butyl; broadcast by air: 1.54034e-6 kg; = p3721
- Ammonium nitrate; unspec. appl. method in fert. in spr. bef. plant.: 1.57196e-5 kg; = p3061*4.7142857143
- Pesticide formulation balance; foliar or directed spray: 2.43769e-5 kg; = p4720
- Monoammonium phosphate; broadcast w/ incorp. in fert. at plant.: 7.41562e-5 kg; = p2732*8.2142857143
- Methanol [air, non-urban air or from high stacks]: 0.000164998 kg; = 1.0 * (p2129*2.6666666667)
- Potassium chloride; broadcast w/o incorp. in fert. at plant.: 0.000169858 kg; = p2936*2.2166666667
- Urea; broadcast w/ incorp. in fert. after plant.: 9.85215e-5 kg; = p2763*5
- Toluene [air, non-urban air or from high stacks]: 9.56236e-6 kg; = 1.0 * (p2141*1.0952380952)
- Ammonium sulfate; unspec. appl. method in fert. in spr. bef. plant.: 7.93289e-6 kg; = p3064*4.7142857143
- Ammonium sulfate; unspec. appl. method in fert. after plant.: 4.81192e-6 kg; = p3142*4.7142857143
- Superphosphate, grades>22%; broadcast w/ incorp. in fert. at plant.; kg P: 1.71075e-6 kg; = p2737
- Ammonium nitrate; broadcast w/o incorp. in fert. in spr. bef. plant.: 0.000302648 kg; = p2866*4.7142857143
- 2,4-D-butyl: 7.20283e-6 kg; = p5163+p3927+p4133+p4545
- Monoammonium phosphate; no broadcast in fert. after plant.: 0.00014815 kg; = p2576*8.2142857143
- Nitrogen solution; unspec. appl. method in fert. in spr. bef. plant.; unspec. appl. method in fert. in spr. bef. plan...: 2.18494e-5 kg; = p3068
- Nitrogen solution; unspec. appl. method in fert. at plant.; unspec. appl. method in fert. at plant.; kg N: 8.97428e-6 kg; = p3107
- Anhydrous ammonia; no broadcast in fert. after plant.: 0.00161753 kg; = p2550*1.2142857143
- Superphosphate, grades>22%; broadcast w/o incorp. in fert. in fall bef. plant.; kg P: 1.74339e-6 kg; = p2854
- Nitrogen solution; broadcast w/ incorp. in fert. in fall bef. plant.; broadcast w/ incorp. in fert. in fall bef. plan...: 5.24592e-5 kg; = p2639
- trans-2-Butene: 2.85873e-6 kg; = p2148*1.1666666667
- Pesticides, unspecified: 7.89118e-7 kg; = p3895
- Bromoxynil [soil, agricultural]: 2.40094e-6 kg; = 1.0 * (p3923+p4129+p4541+p5159)
- Ammonium nitrate; broadcast w/ incorp. in fert. in fall bef. plant.: 3.7742e-5 kg; = p2632*4.7142857143
- Sulfosulfuron [soil, agricultural]: 6.00236e-7 kg; = 1.0 * (p4283+p5313+p4077+p4695)
- Phenol [air, non-urban air or from high stacks]: 2.60392e-5 kg; = 1.0 * (p2133*1.3055555556)
- Potassium chloride; unspec. appl. method in fert. after plant.: 7.20877e-5 kg; = p3170*2.2166666667
- Monoammonium phosphate; no broadcast in fert. in fall bef. plant.: 8.51996e-5 kg; = p2459*8.2142857143
- Monoammonium phosphate; broadcast w/o incorp. in fert. in fall bef. plant.: 7.55711e-5 kg; = p2849*8.2142857143
- Diammonium phosphate; broadcast w/o incorp. in fert. in fall bef. plant.: 0.000128063 kg; = p2845*4.7142857143
- Dichlorprop-dimethylammonium; foliar or directed spray: 2.89414e-6 kg; = p4520
- Monoammonium phosphate; broadcast w/o incorp. in fert. at plant.: 9.24853e-5 kg; = p2927*8.2142857143
- Sodium nitrate; broadcast w/ incorp. in fert. at plant.: 1.97791e-7 kg; = p2720*6.0714285714
- MCPA, dimethylamine salt; broadcast with incorporation: 3.55644e-6 kg; = p4017
- Pesticides, unspecified [soil, agricultural]: 3.69001e-6 kg; = 1.0 * (p4719+p4101+p4307+p5337)
- MCPA, dimethylamine salt; broadcast without incorporation: 3.10028e-8 kg; = p4223
- Dioxins and furans (PCDD/F); from residue burning: 1.50611e-12 kg TEQ; = p2047
- Butane [air, non-urban air or from high stacks]: 3.05006e-6 kg; = 1.0 * (p2147*1.0208333333)
- Ammonium nitrate; broadcast w/ incorp. in fert. after plant.: 4.31783e-5 kg; = p2749*4.7142857143
- Triasulfuron: 6.41809e-8 kg; = p3886
- Monoammonium phosphate; unspec. appl. method in fert. in fall bef. plant.: 2.03157e-5 kg; = p3044*8.2142857143
- Ammonium sulfate; broadcast w/o incorp. in fert. in spr. bef. plant.: 0.000152731 kg; = p2869*4.7142857143
- Acrylonitrile: 1.68281e-6 kg; = p2156*1.4722222222
- Aqueous ammonia; unspec. appl. method in fert. after plant.: 5.61208e-7 kg; = p3137*1.2142857143
- Dichlorprop-dimethylammonium; broadcast by air: 3.20905e-6 kg; = p3696
- Diammonium phosphate; no broadcast in fert. at plant.: 0.000176694 kg; = p2533*4.7142857143
- Ammonium sulfate; broadcast w/ incorp. in fert. in spr. bef. plant.: 3.59225e-5 kg; = p2674*4.7142857143
- Aqueous ammonia; no broadcast in fert. after plant.: 5.66848e-5 kg; = p2552*1.2142857143
- Monoammonium phosphate; broadcast w/ incorp. in fert. in fall bef. plant.: 6.05941e-5 kg; = p2654*8.2142857143
- isopentane: 8.49675e-7 kg; = p2151*1.0166666667
- Propane [air, non-urban air or from high stacks]: 1.41393e-5 kg; = 1.0 * (p2142*1.2222222222)
- Calcium [soil, agricultural]: 0.00520726 kg; = 1.0 * (p3218+p3226)
- Anhydrous ammonia; unspec. appl. method in fert. in fall bef. plant.: 1.39981e-5 kg; = p3018*1.2142857143
- Oxygen; applied in limestone: 0.00613987 kg; = p3219
- Acetone [air, non-urban air or from high stacks]: 2.24039e-5 kg; = 1.0 * (p2139*1.6111111111)
- Ammonium sulfate; broadcast w/ incorp. in fert. at plant.: 1.47546e-5 kg; = p2713*4.7142857143
- Other single phosphates; broadcast w/ incorp. in fert. at plant.; kg P: 9.84019e-7 kg; = p2739
- Thifensulfuron methyl; unspec. appl. method: 9.21707e-9 kg; = p5322
- MCPA, dimethylamine salt; unspec. appl. method: 4.60854e-8 kg; = p5253
- Anhydrous ammonia; broadcast w/ incorp. in fert. after plant.: 7.25177e-5 kg; = p2745*1.2142857143
- Ammonium sulfate; no broadcast in fert. at plant.: 0.000329105 kg; = p2518*4.7142857143
- Urea; broadcast w/ incorp. in fert. in spr. bef. plant.: 0.000162421 kg; = p2685*5
- MCPA, dimethylamine salt; broadcast by air: 9.62714e-7 kg; = p3811
- Urea; broadcast w/ incorp. in fert. in fall bef. plant.: 8.61172e-5 kg; = p2646*5
- Acetonitrile [air, non-urban air or from high stacks]: 1.05388e-5 kg; = 1.0 * (p2155*1.7083333333)
- Potassium chloride; broadcast w/o incorp. in fert. in fall bef. plant.: 8.96839e-5 kg; = p2858*2.2166666667
- Other single phosphates; unspec. appl. method in fert. at plant.; kg P: 3.29916e-7 kg; = p3129
- Pesticide formulation balance; broadcast with incorporation: 9.98513e-5 kg; = p4102
- Ammonium sulfate; no broadcast in fert. after plant.: 0.000486028 kg; = p2557*4.7142857143
- Ammonium nitrate; broadcast w/o incorp. in fert. in fall bef. plant.: 0.000160466 kg; = p2827*4.7142857143
- Sodium nitrate; unspec. appl. method in fert. at plant.: 4.36789e-8 kg; = p3110*6.0714285714
- Formaldehyde [air, non-urban air or from high stacks]: 0.000104367 kg; = 1.0 * (p2128*2.5)
- Other single K nutrients; broadcast w/o incorp. in fert. in fall bef. plant.; kg K: 5.07966e-6 kg; = p2860
- Potassium chloride; unspec. appl. method in fert. in fall bef. plant.: 4.74771e-5 kg; = p3053*2.2166666667
- Sewage sludge dry matter; applied in sewage sludge: 2.70245e-10 kg; = p3243
- Other single phosphates; broadcast w/o incorp. in fert. after plant.; kg P: 1.74371e-6 kg; = p2973
- Diammonium phosphate; broadcast w/ incorp. in fert. in fall bef. plant.: 0.000102683 kg; = p2650*4.7142857143
- Anhydrous ammonia; unspec. appl. method in fert. at plant.: 1.08438e-5 kg; = p3096*1.2142857143
- Superphosphate, grades<= 22%; unspec. appl. method in fert. after plant.; kg P: 3.38468e-8 kg; = p3164
- Superphosphate, grades>22%; unspec. appl. method in fert. at plant.; kg P: 5.73571e-7 kg; = p3127
- Water: 143.342 kg; = p2178+p2181+p2171
- Diammonium phosphate; no broadcast in fert. after plant.: 0.000251055 kg; = p2572*4.7142857143
- Monoammonium phosphate; unspec. appl. method in fert. after plant.: 3.5326e-5 kg; = p3161*8.2142857143
- MCPA [soil, agricultural]: 4.17164e-5 kg; = 1.0 * (p4634+p4016+p4222+p5252)
- Urea; broadcast w/ incorp. in fert. at plant.: 6.67119e-5 kg; = p2724*5
- Ammonium nitrate; broadcast w/ incorp. in fert. in spr. bef. plant.: 7.11833e-5 kg; = p2671*4.7142857143
- Glyphosate [soil, agricultural]: 2.551e-5 kg; = 1.0 * (p3998+p5234+p4616+p4204)
- 1-Naphthaleneacetamide: 2.70106e-6 kg; = p4112+p5142+p3906+p4524
- Sodium nitrate; no broadcast in fert. in spr. bef. plant.: 1.07412e-5 kg; = p2486*6.0714285714
- Urea; unspec. appl. method in fert. at plant.: 1.47322e-5 kg; = p3114*5
- Anhydrous ammonia; unspec. appl. method in fert. after plant.: 1.60143e-5 kg; = p3135*1.2142857143
- Other single phosphates; broadcast w/ incorp. in fert. after plant.; kg P: 1.39814e-6 kg; = p2778
- Diammonium phosphate; unspec. appl. method in fert. in fall bef. plant.: 3.4427e-5 kg; = p3040*4.7142857143
- Pesticide formulation balance; broadcast by air: 2.70294e-5 kg; = p3896
- Metsulfuron-methyl [soil, agricultural]: 3.00118e-7 kg; = 1.0 * (p5270+p4240+p4652+p4034)
- Furan [air, non-urban air or from high stacks]: 5.49179e-6 kg; = 1.0 * (p2138*1.4166666667)
- Other single K nutrients; unspec. appl. method in fert. in fall bef. plant.; kg K: 2.68908e-6 kg; = p3055
- Superphosphate, grades<= 22%; broadcast w/o incorp. in fert. after plant.; kg P: 1.25905e-7 kg; = p2969
- Nitrogen solution; broadcast w/ incorp. in fert. in spr. bef. plant.; broadcast w/ incorp. in fert. in spr. bef. plan...: 9.89407e-5 kg; = p2678
- Other single K nutrients; broadcast w/o incorp. in fert. after plant.; kg K: 7.7128e-6 kg; = p2977
- Nitrogen solution; broadcast w/o incorp. in fert. in fall bef. plant.; broadcast w/o incorp. in fert. in fall bef. pl...: 0.000223039 kg; = p2834
- Sodium nitrate; broadcast w/o incorp. in fert. in fall bef. plant.: 1.08556e-6 kg; = p2837*6.0714285714
- Nitrogen solution; broadcast w/o incorp. in fert. in spr. bef. plant.; broadcast w/o incorp. in fert. in spr. bef. pl...: 0.000420663 kg; = p2873
- Propiconazole [soil, agricultural]: 9.00353e-7 kg; = 1.0 * (p5293+p4057+p4675+p4263)
- Other single K nutrients; no broadcast in fert. in fall bef. plant.; kg K: 7.23897e-6 kg; = p2470
- Aqueous ammonia; broadcast w/ incorp. in fert. in spr. bef. plant.: 4.18959e-6 kg; = p2669*1.2142857143
- Diammonium phosphate; broadcast w/o incorp. in fert. at plant.: 0.000156726 kg; = p2923*4.7142857143
- Potassium chloride; no broadcast in fert. in fall bef. plant.: 0.000127808 kg; = p2468*2.2166666667
- Pesticide formulation balance; broadcast without incorporation: 8.70442e-7 kg; = p4308
- Ammonium nitrate; broadcast w/o incorp. in fert. after plant.: 0.00018358 kg; = p2944*4.7142857143
- Superphosphate, grades<= 22%; broadcast w/ incorp. in fert. in fall bef. plant.; kg P: 5.80569e-8 kg; = p2657
- Aqueous ammonia; broadcast w/o incorp. in fert. after plant.: 1.08048e-5 kg; = p2942*1.2142857143
- Phosphorous; in above-ground residue left on field: 0.00106494 kg; = p2169
- Ash: 0.00993028 kg; = p2021+p2022
- Urea; broadcast w/o incorp. in fert. at plant.: 0.000283637 kg; = p2919*5
- Aqueous ammonia; broadcast w/ incorp. in fert. in fall bef. plant.: 2.22136e-6 kg; = p2630*1.2142857143
- Ammonium nitrate; unspec. appl. method in fert. after plant.: 9.53521e-6 kg; = p3139*4.7142857143
- Bromoxynil: 5.13447e-7 kg; = p3717
- Ammonium sulfate; no broadcast in fert. in spr. bef. plant.: 0.000801262 kg; = p2479*4.7142857143
- Ethene [air, non-urban air or from high stacks]: 7.30466e-5 kg; = 1.0 * (p2125*1.1666666667)
- Anhydrous ammonia; no broadcast in fert. in spr. bef. plant.: 0.00266664 kg; = p2472*1.2142857143
- Superphosphate, grades>22%; no broadcast in fert. at plant.; kg P: 2.40544e-6 kg; = p2542
- Other limestone constituents; applied in limestone: 0.000817212 kg; = p3220
- Anhydrous ammonia; broadcast w/ incorp. in fert. in fall bef. plant.: 6.33874e-5 kg; = p2628*1.2142857143
- Superphosphate, grades>22%; broadcast w/o incorp. in fert. after plant.; kg P: 3.03151e-6 kg; = p2971
- Superphosphate, grades<= 22%; broadcast w/o incorp. in fert. in fall bef. plant.; kg P: 7.24068e-8 kg; = p2852
- Anhydrous ammonia; unspec. appl. method in fert. in spr. bef. plant.: 2.64011e-5 kg; = p3057*1.2142857143
- Superphosphate, grades<= 22%; unspec. appl. method in fert. in fall bef. plant.; kg P: 1.9465e-8 kg; = p3047
- 2,4-D [soil, agricultural]: 3.51138e-5 kg; = 1.0 * (p4515+p3897+p4103+p5133)
- Anhydrous ammonia; broadcast w/o incorp. in fert. in spr. bef. plant.: 0.000508295 kg; = p2862*1.2142857143
- Urea; broadcast w/o incorp. in fert. in spr. bef. plant.: 0.000690562 kg; = p2880*5
- I butane; from residue burning: 1.05905e-6 kg; = p2146*1.0208333333
- Ammonium sulfate; no broadcast in fert. in fall bef. plant.: 0.000424835 kg; = p2440*4.7142857143
- Other single K nutrients; broadcast w/o incorp. in fert. at plant.; kg K: 9.62067e-6 kg; = p2938
- Nitrogen solution; no broadcast in fert. in fall bef. plant.; no broadcast in fert. in fall bef. plant.; kg N: 0.00117012 kg; = p2444
- Carbon monoxide, fossil [air, non-urban air or from high stacks]: 0.0027697 kg; = 1.0 * (p2028*2.3333333333)
- Urea; broadcast w/o incorp. in fert. in fall bef. plant.: 0.000366142 kg; = p2841*5
- Nitrogen solution; broadcast w/ incorp. in fert. at plant.; broadcast w/ incorp. in fert. at plant.; kg N: 4.06382e-5 kg; = p2717
- Sulfuric acid [soil, agricultural]: 1.24309e-7 kg; = 1.0 * (p3231)
- 2,4-D [air, non-urban air or from high stacks]: 7.50917e-6 kg; = 1.0 * (p3691)
- Superphosphate, grades>22%; unspec. appl. method in fert. in fall bef. plant.; kg P: 4.68674e-7 kg; = p3049
- Thifensulfuron methyl; broadcast with incorporation: 7.11287e-7 kg; = p4086
- Potassium; in above-ground residue left on field; biogenic: 0.00648166 kg; = p2170
- Monoammonium phosphate; broadcast w/o incorp. in fert. after plant.: 0.000131407 kg; = p2966*8.2142857143
- Anhydrous ammonia; broadcast w/o incorp. in fert. in fall bef. plant.: 0.000269502 kg; = p2823*1.2142857143
- Zinc compounds: 4.11036e-8 kg; = p3232
- Aqueous ammonia; broadcast w/ incorp. in fert. at plant.: 1.72081e-6 kg; = p2708*1.2142857143
- Anhydrous ammonia; no broadcast in fert. at plant.: 0.00109528 kg; = p2511*1.2142857143
- Superphosphate, grades>22%; no broadcast in fert. after plant.; kg P: 3.41775e-6 kg; = p2581
- Ammonium sulfate; broadcast w/o incorp. in fert. after plant.: 9.26431e-5 kg; = p2947*4.7142857143
- Diammonium phosphate; broadcast w/o incorp. in fert. after plant.: 0.000222683 kg; = p2962*4.7142857143
- Superphosphate, grades>22%; unspec. appl. method in fert. after plant.; kg P: 8.14956e-7 kg; = p3166
- Other single phosphates; unspec. appl. method in fert. after plant.; kg P: 4.6876e-7 kg; = p3168
- Ammonium sulfate; unspec. appl. method in fert. in fall bef. plant.: 4.20608e-6 kg; = p3025*4.7142857143
- isobutene: 5.86792e-6 kg; = p2150*1.1666666667
- Diammonium phosphate; broadcast w/ incorp. in fert. after plant.: 0.000178551 kg; = p2767*4.7142857143
- Anhydrous ammonia; broadcast w/o incorp. in fert. after plant.: 0.000308321 kg; = p2940*1.2142857143
- Sulfur dioxide [air, non-urban air or from high stacks]: 2.20896e-5 kg; = 1.0 * (p2041)
- Filler materials, applied with synthetic fertilizer: 0.0119618 kg; = p2432
- Ammonium nitrate; unspec. appl. method in fert. in fall bef. plant.: 8.33469e-6 kg; = p3022*4.7142857143
- Dicamba [air, non-urban air or from high stacks]: 6.35391e-6 kg; = 1.0 * (p3745)
- Nitrogen solution; broadcast w/ incorp. in fert. after plant.; broadcast w/ incorp. in fert. after plant.; kg N: 6.00153e-5 kg; = p2756
- Propene [air, non-urban air or from high stacks]: 3.39389e-5 kg; = 1.0 * (p2136*1.1666666667)
- Dichlorprop-dimethylammonium; broadcast without incorporation: 1.03343e-7 kg; = p4108
- Sulfur [soil, agricultural]: 2.72001e-7 kg; = 1.0 * (p3230)
- Tribenuron-methyl [soil, agricultural]: 3.00118e-7 kg; = 1.0 * (p4093+p4299+p4711+p5329)
- Sodium nitrate; broadcast w/o incorp. in fert. at plant.: 8.40942e-7 kg; = p2915*6.0714285714
- Hydrocyanic acid: 1.43221e-5 kg; = p2154*2.25
- Methyl vinyl ether; from residue burning: 3.80777e-6 kg; = p2137*1.6111111111
- Dicamba [soil, agricultural]: 2.97117e-5 kg; = 1.0 * (p4157+p5187+p3951+p4569)
- Sodium nitrate; broadcast w/o incorp. in fert. in spr. bef. plant.: 2.04742e-6 kg; = p2876*6.0714285714
- Dichlorprop-dimethylammonium; unspec. appl. method: 1.53618e-7 kg; = p5138
- 1-Butene: 6.72052e-6 kg; = p2144*1.1666666667
- Urea; unspec. appl. method in fert. after plant.: 2.17568e-5 kg; = p3153*5
- Aqueous ammonia; broadcast w/ incorp. in fert. after plant.: 2.54132e-6 kg; = p2747*1.2142857143
- Sodium nitrate; broadcast w/ incorp. in fert. in fall bef. plant.: 2.55325e-7 kg; = p2642*6.0714285714
- Phosphorous; applied in sewage sludge: 2.914e-10 kg; = p3241
- Urea; unspec. appl. method in fert. in fall bef. plant.: 1.90176e-5 kg; = p3036*5
- Other single phosphates; unspec. appl. method in fert. in fall bef. plant.; kg P: 2.6958e-7 kg; = p3051
- Pentane [air, non-urban air or from high stacks]: 1.06209e-6 kg; = 1.0 * (p2152*1.0166666667)
- Diammonium phosphate; no broadcast in fert. in fall bef. plant.: 0.00014438 kg; = p2455*4.7142857143
- Aqueous ammonia; no broadcast in fert. in spr. bef. plant.: 9.34501e-5 kg; = p2474*1.2142857143
- Trifloxystrobin [air, non-urban air or from high stacks]: 6.41809e-8 kg; = 1.0 * (p3890)
- Particulates, < 2.5 um [air, non-urban air or from high stacks]: 0.000202321 kg; = 1.0 * (p2035+p2033)
- Sodium nitrate; unspec. appl. method in fert. in spr. bef. plant.: 1.06344e-7 kg; = p3071*6.0714285714
- Nitrogen solution; no broadcast in fert. at plant.; no broadcast in fert. at plant.; kg N: 0.000906447 kg; = p2522
- Diammonium phosphate; unspec. appl. method in fert. at plant.: 4.21324e-5 kg; = p3118*4.7142857143
- Plant dry matter; from residue burning: 0.0180392 kg; = p2164
- Acetic acid [air, non-urban air or from high stacks]: 0.000280882 kg; = 1.0 * (p2127*2.5)
- Ammonium nitrate; no broadcast in fert. in spr. bef. plant.: 0.00158776 kg; = p2476*4.7142857143
- Other single K nutrients; no broadcast in fert. at plant.; kg K: 1.37103e-5 kg; = p2548
- Other single phosphates; broadcast w/o incorp. in fert. at plant.; kg P: 1.22724e-6 kg; = p2934
- Sodium nitrate; unspec. appl. method in fert. after plant.: 6.45058e-8 kg; = p3149*6.0714285714
- Ammonium sulfate; unspec. appl. method in fert. at plant.: 3.2583e-6 kg; = p3103*4.7142857143
- Urea; no broadcast in fert. after plant.: 0.00219755 kg; = p2568*5
- Dinitrogen monoxide [air, non-urban air or from high stacks]: 3.51491e-6 kg; = 1.0 * (p2044*1.5714285714)
- Monoammonium phosphate; broadcast w/ incorp. in fert. after plant.: 0.000105364 kg; = p2771*8.2142857143
- Superphosphate, grades<= 22%; unspec. appl. method in fert. at plant.; kg P: 2.38216e-8 kg; = p3125
- Superphosphate, grades<= 22%; broadcast w/o incorp. in fert. at plant.; kg P: 8.86127e-8 kg; = p2930
- Aqueous ammonia; broadcast w/o incorp. in fert. in spr. bef. plant.: 1.78128e-5 kg; = p2864*1.2142857143
- Potassium chloride; no broadcast in fert. at plant.: 0.000242062 kg; = p2546*2.2166666667
- Potassium chloride; broadcast w/o incorp. in fert. after plant.: 0.000136173 kg; = p2975*2.2166666667
- Superphosphate, grades>22%; no broadcast in fert. in fall bef. plant.; kg P: 1.96552e-6 kg; = p2464
- Nitrogen; applied in sewage sludge: 2.44102e-9 kg; = p3240
- Sodium nitrate; no broadcast in fert. after plant.: 6.51541e-6 kg; = p2564*6.0714285714
- Benzene [air, non-urban air or from high stacks]: 7.70356e-6 kg; = 1.0 * (p2140*1.0833333333)
- Triasulfuron [soil, agricultural]: 3.00118e-7 kg; = 1.0 * (p4710+p5328+p4092+p4298)
- Metsulfuron-methyl: 6.41809e-8 kg; = p3828
- Other single K nutrients; no broadcast in fert. after plant.; kg K: 1.09914e-5 kg; = p2587
- Urea; unspec. appl. method in fert. in spr. bef. plant.: 3.58681e-5 kg; = p3075*5
- Other single phosphates; no broadcast in fert. after plant.; kg P: 1.96588e-6 kg; = p2583
- Other single phosphates; broadcast w/ incorp. in fert. in fall bef. plant.; kg P: 8.04057e-7 kg; = p2661
- Thifensulfuron methyl; foliar or directed spray: 1.73648e-7 kg; = p4704
- Ammonium sulfate; broadcast w/o incorp. in fert. at plant.: 6.27315e-5 kg; = p2908*4.7142857143
- Ammonium nitrate; no broadcast in fert. at plant.: 0.000652147 kg; = p2515*4.7142857143
- NMVOC, non-methane volatile organic compounds, unspecified origin [air, non-urban air or from high stacks]: 0.00128994 kg; = 1.0 * (p2052+p2051)
- Diammonium phosphate; unspec. appl. method in fert. after plant.: 5.98635e-5 kg; = p3157*4.7142857143
- Superphosphate, grades<= 22%; broadcast w/ incorp. in fert. at plant.; kg P: 7.10511e-8 kg; = p2735
- Superphosphate, grades>22%; broadcast w/ incorp. in fert. in fall bef. plant.; kg P: 1.39788e-6 kg; = p2659
- Monoammonium phosphate; unspec. appl. method in fert. at plant.: 2.48627e-5 kg; = p3122*8.2142857143
- Metribuzin [soil, agricultural]: 2.551e-5 kg; = 1.0 * (p5269+p4651+p4033+p4239)
- Sodium nitrate; broadcast w/o incorp. in fert. after plant.: 1.24192e-6 kg; = p2954*6.0714285714
- 1-Naphthaleneacetamide: 5.77628e-7 kg; = p3700
- Sulfosulfuron: 1.28362e-7 kg; = p3871
- Anhydrous ammonia; broadcast w/o incorp. in fert. at plant.: 0.000208774 kg; = p2901*1.2142857143
- Plant dry matter; in aboveground residue left on field: 0.276913 kg; = p2172
- Formic acid [air, non-urban air or from high stacks]: 5.03051e-5 kg; = 1.0 * (p2131*3.8333333333)
- Monoammonium phosphate; no broadcast in fert. at plant.: 0.000104269 kg; = p2537*8.2142857143
- Ammonium nitrate; no broadcast in fert. in fall bef. plant.: 0.000841845 kg; = p2437*4.7142857143
- Thifensulfuron methyl; broadcast without incorporation: 6.20057e-9 kg; = p4292
- Aqueous ammonia; unspec. appl. method in fert. in spr. bef. plant.: 9.25202e-7 kg; = p3059*1.2142857143
- Nitrogen solution; unspec. appl. method in fert. after plant.; unspec. appl. method in fert. after plant.; kg N: 1.32534e-5 kg; = p3146
- Aqueous ammonia; broadcast w/o incorp. in fert. at plant.: 7.31629e-6 kg; = p2903*1.2142857143
- Diammonium phosphate; broadcast w/ incorp. in fert. at plant.: 0.000125665 kg; = p2728*4.7142857143
- Aqueous ammonia; broadcast w/o incorp. in fert. in fall bef. plant.: 9.44447e-6 kg; = p2825*1.2142857143
- Superphosphate, grades>22%; broadcast w/o incorp. in fert. at plant.; kg P: 2.1336e-6 kg; = p2932
- Anhydrous ammonia; broadcast w/ incorp. in fert. at plant.: 4.9104e-5 kg; = p2706*1.2142857143
- Aqueous ammonia; unspec. appl. method in fert. in fall bef. plant.: 4.9055e-7 kg; = p3020*1.2142857143
- Nitrogen; in above-ground residue left on field: 0.00696605 kg; = p2168
- Diclofop-methyl: 5.13447e-7 kg; = p3749
- Superphosphate, grades>22%; broadcast w/ incorp. in fert. after plant.; kg P: 2.43071e-6 kg; = p2776
- Ammonium nitrate; broadcast w/o incorp. in fert. at plant.: 0.000124307 kg; = p2905*4.7142857143
- Trifloxystrobin [soil, agricultural]: 3.00118e-7 kg; = 1.0 * (p4714+p5332+p4302+p4096)
- Superphosphate, grades<= 22%; no broadcast in fert. in fall bef. plant.; kg P: 8.16321e-8 kg; = p2462
- Diclofop-methyl [soil, agricultural]: 2.40094e-6 kg; = 1.0 * (p4573+p5191+p4161+p3955)
- Water [air, non-urban air or from high stacks]: 7.96975e-6 m3; = 0.001 * (p2016)
- Sodium nitrate; broadcast w/ incorp. in fert. in spr. bef. plant.: 4.81556e-7 kg; = p2681*6.0714285714
- Phosphorous; in below-ground residue: 0.000525934 kg; = p2175
- Ethane [air, non-urban air or from high stacks]: 4.5621e-5 kg; = 1.0 * (p2126*1.25)
- Other single phosphates; no broadcast in fert. at plant.; kg P: 1.3836e-6 kg; = p2544
- Nitrogen dioxide: 9.99411e-5 kg; = p2039*3.2857142857
- Sodium nitrate; unspec. appl. method in fert. in fall bef. plant.: 5.63843e-8 kg; = p3032*6.0714285714
- Propanenitrile: 3.21689e-6 kg; = p2157*1.5277777778
- MCPA: 8.92115e-6 kg; = p3810
- Ammonium sulfate; broadcast w/ incorp. in fert. after plant.: 2.17898e-5 kg; = p2752*4.7142857143
- Plant dry matter; in below-ground residue: 0.136757 kg; = p2177
- Acetol; from residue burning: 0.000189029 kg; = p2134*2.0555555556
- Superphosphate, grades<= 22%; broadcast w/ incorp. in fert. after plant.; kg P: 1.00953e-7 kg; = p2774
- Ammonium sulfate; broadcast w/o incorp. in fert. in fall bef. plant.: 8.0979e-5 kg; = p2830*4.7142857143
- Superphosphate, grades<= 22%; no broadcast in fert. at plant.; kg P: 9.99029e-8 kg; = p2540
- Other single phosphates; no broadcast in fert. in fall bef. plant.; kg P: 1.13056e-6 kg; = p2466
- Urea; no broadcast in fert. in fall bef. plant.: 0.00192087 kg; = p2451*5
- Other single phosphates; broadcast w/o incorp. in fert. in fall bef. plant.; kg P: 1.00279e-6 kg; = p2856
- MCPA, dimethylamine salt; foliar or directed spray: 8.68242e-7 kg; = p4635
- Sodium nitrate; no broadcast in fert. at plant.: 4.41179e-6 kg; = p2525*6.0714285714
- Anhydrous ammonia; no broadcast in fert. in fall bef. plant.: 0.00141387 kg; = p2433*1.2142857143
- Urea; no broadcast in fert. at plant.: 0.00148803 kg; = p2529*5
- Anhydrous ammonia; broadcast w/ incorp. in fert. in spr. bef. plant.: 0.000119552 kg; = p2667*1.2142857143
- Aqueous ammonia; unspec. appl. method in fert. at plant.: 3.80011e-7 kg; = p3098*1.2142857143
- Pesticide formulation balance; unspec. appl. method: 1.2939e-6 kg; = p5338
- Metribuzin [air, non-urban air or from high stacks]: 5.45538e-6 kg; = 1.0 * (p3827)
- Carbon dioxide, in air: 0.0671822 kg; = p2163*3.6666666667
- Isoprene [air, non-urban air or from high stacks]: 1.89436e-5 kg; = 1.0 * (p2145*1.1333333333)
- Aqueous ammonia; no broadcast in fert. in fall bef. plant.: 4.9548e-5 kg; = p2435*1.2142857143
- Glyphosate [air, non-urban air or from high stacks]: 5.45538e-6 kg; = 1.0 * (p3792)
- Potassium; in below-ground residue; biogenic: 0.00320104 kg; = p2176
- cis-2-Butene: 2.15659e-6 kg; = p2149*1.1666666667
- Potassium chloride; unspec. appl. method in fert. at plant.: 8.99196e-5 kg; = p3131*2.2166666667
- Ammonium nitrate; unspec. appl. method in fert. at plant.: 6.45658e-6 kg; = p3100*4.7142857143
- Butadiene [air, non-urban air or from high stacks]: 7.57482e-6 kg; = 1.0 * (p2143*1.125)
- Thifensulfuron methyl; broadcast by air: 1.92543e-7 kg; = p3880
- Urea; no broadcast in fert. in spr. bef. plant.: 0.00362286 kg; = p2490*5
- Glycolaldehyde; from residue burning: 0.000101147 kg; = p2135*2.5
- Sodium nitrate; broadcast w/ incorp. in fert. after plant.: 2.92102e-7 kg; = p2759*6.0714285714
- Acetaldehyde [air, non-urban air or from high stacks]: 6.24403e-5 kg; = 1.0 * (p2130*1.8333333333)
- Nitrogen; in below-ground residue: 0.00344026 kg; = p2174
- Dichlorprop-dimethylammonium; broadcast with incorporation: 1.18548e-5 kg; = p3902
- Particulates, < 10 um: 0.000331846 kg; = p2036+p2034
- Ammonium sulfate; broadcast w/ incorp. in fert. in fall bef. plant.: 1.90464e-5 kg; = p2635*4.7142857143
- Ammonium nitrate; no broadcast in fert. after plant.: 0.000963104 kg; = p2554*4.7142857143
- Ethyne [air, non-urban air or from high stacks]: 1.36657e-5 kg; = 1.0 * (p2132*1.0833333333)
- Other single K nutrients; unspec. appl. method in fert. after plant.; kg K: 4.08302e-6 kg; = p3172

## Sampling procedure
A delete-a-group jackknife is used by the USDA to estimate the ARMS sample means and RSEs, based on a 15 sample delete-a-group jackknife. Because of this relatively small sample size, a Students t distribution is used to represent ARMS data probability density functions. Other representations of uncertainty are described in Cooper, J.S., Kahn, E., Noon, M. (2012). LCA Digital Commons Unit Process Data: field crop production Version 1. Prepared for the US Department of Agriculture National Agricultural Library. Retrieved from https://www.lcacommons.gov/discovery/docs/LCA%20Digital%20Commons%20Unit%20Process%20Data%20final%20updated.pdf

## Extrapolations
Data represent an aggregation of processes applied in Oregon in 2004. Data development is demonstrated by parameterization (exlicitly presents all raw and uncertainty data and all calculations). Flow data quality according to the LCADC convention is provided for all flows.
