# winter wheat; at harvest in 1998; at farm; 86%-90% moisture

Dataset: EcoSpold 2, unit process
Geography: GLO
Time period: 1998-01-02 to 1999-01-01
Scenario: Business-as-Usual
System model: Allocation, ecoinvent default
Generated by: cooperjs@u.washington.edu
isCopyrightProtected: false

## General comment
This unit process/ gate-to-gate dataset represents the production of 1 kg winter wheat coproduced with residue. The process technologies are an aggregation of those applied in Idaho in 1998. Applicable classifications include ISIC 0111, NAIC 111140, UNSPSC 50221101; this dataset was prepared in ILCD format using the UWDFE Lab Excel to ILCD File Generator (beta version, August 2013)

Exchange "Prosulfuron-soil agricultural" is the result of combining the following original LCA Commons flows: "Prosulfuron; broadcast with incorporation; kg AI", "Prosulfuron; foliar or directed spray; kg AI", "Prosulfuron; unspec. appl. method; kg AI".
Exchange "Diclofop-methyl-soil agricultural" is the result of combining the following original LCA Commons flows: "Diclofop-methyl; unspec. appl. method; kg AI", "Diclofop-methyl; broadcast with incorporation; kg AI", "Diclofop-methyl; foliar or directed spray; kg AI".
Exchange "NMVOC, non-methane volatile organic compounds, unspecified origin-air low population density" is the result of combining the following original LCA Commons flows: "NMVOCs; from residue burning; kg C, biogenic", "NMVOCs; from residue burning; kg except C, biogenic".
Exchange "Dicamba-soil agricultural" is the result of combining the following original LCA Commons flows: "Dicamba; broadcast with incorporation; kg AI", "Dicamba; unspec. appl. method; kg AI", "Dicamba; foliar or directed spray; kg AI".
Exchange "Imazamethabenz-soil agricultural" is the result of combining the following original LCA Commons flows: "Imazamethabenz; foliar or directed spray; kg AI", "Imazamethabenz; broadcast with incorporation; kg AI", "Imazamethabenz; unspec. appl. method; kg AI".
Exchange "Carbon-soil agricultural" is the result of combining the following original LCA Commons flows: "Carbon; applied in sewage sludge", "Carbon; in below-ground residue; biogenic", "Carbon; in above-ground residue left on field; biogenic", "Carbon; applied in dolomite", "Carbon; applied in limestone".
Exchange "Particulates, < 2.5 um-air low population density" is the result of combining the following original LCA Commons flows: "PM2.5; from residue burning; kg except C, biogenic", "PM2.5; from residue burning; kg C, biogenic".
Exchange "Pesticides, unspecified-soil agricultural" is the result of combining the following original LCA Commons flows: "Unspecified pesticide; unspec. appl. method; kg AI", "Unspecified pesticide; broadcast with incorporation; kg AI", "Unspecified pesticide; foliar or directed spray; kg AI".
Exchange "Ash-soil agricultural" is the result of combining the following original LCA Commons flows: "Ash; from residue burning; kg except C, biogenic", "Ash; from residue burning; kg C, biogenic".
Exchange "Water-soil agricultural" is the result of combining the following original LCA Commons flows: "Water; in below-ground residue; biogenic", "Water; from irrigation and applied with manure and sewage sludge", "Water; in above-ground residue left on field; biogenic".
Exchange "Clopyralid-soil agricultural" is the result of combining the following original LCA Commons flows: "Clopyralid; unspec. appl. method; kg AI", "Clopyralid; broadcast with incorporation; kg AI", "Clopyralid; foliar or directed spray; kg AI".
Exchange "difenzoquat-soil agricultural" is the result of combining the following original LCA Commons flows: "Difenzoquat; broadcast with incorporation; kg AI", "Difenzoquat; unspec. appl. method; kg AI", "Difenzoquat; foliar or directed spray; kg AI".
Exchange "Particulates, < 10 um-air low population density" is the result of combining the following original LCA Commons flows: "PM10; from residue burning; kg except C, biogenic", "PM10; from residue burning; kg C, biogenic".
Exchange "Bromoxynil-soil agricultural" is the result of combining the following original LCA Commons flows: "Bromoxynil; broadcast with incorporation; kg AI", "Bromoxynil; foliar or directed spray; kg AI", "Bromoxynil; unspec. appl. method; kg AI".
Exchange "MCPA-soil agricultural" is the result of combining the following original LCA Commons flows: "MCPA; broadcast with incorporation; kg AI", "MCPA; foliar or directed spray; kg AI", "MCPA; unspec. appl. method; kg AI".
Exchange "Tribenuron-methyl-soil agricultural" is the result of combining the following original LCA Commons flows: "Tribenuron-methyl; unspec. appl. method; kg AI", "Tribenuron-methyl; foliar or directed spray; kg AI", "Tribenuron-methyl; broadcast with incorporation; kg AI".
Exchange "Calcium-soil agricultural" is the result of combining the following original LCA Commons flows: "Calcium; applied in limestone", "Calcium; applied in dolomite".
Exchange "2,4-D-soil agricultural" is the result of combining the following original LCA Commons flows: "2,4-D; foliar or directed spray; kg AI", "2,4-D; unspec. appl. method; kg AI", "2,4-D; broadcast with incorporation; kg AI".
Exchange "Phenol-2bdf9967-6dae-4183-88d1-8f612548c51e low population density" was originally named: "Phenol; from residue burning; kg C, biogenic" in this dataset.
Exchange "Propane-2bdf9967-6dae-4183-88d1-8f612548c51e low population density" was originally named: "Propane; from residue burning; kg C, biogenic" in this dataset.
Exchange "Ethene-2bdf9967-6dae-4183-88d1-8f612548c51e low population density" was originally named: "Ethylene; from residue burning; kg C, biogenic" in this dataset.
Exchange "Benzene-2bdf9967-6dae-4183-88d1-8f612548c51e low population density" was originally named: "Benzene; from residue burning; kg C, biogenic" in this dataset.
Exchange "Formic acid-2bdf9967-6dae-4183-88d1-8f612548c51e low population density" was originally named: "Formic acid; from residue burning; kg C, biogenic" in this dataset.
Exchange "Sulfuric acid-be1c0329-f1a8-4524-8420-a86d2a8dd358 agricultural" was originally named: "Sulfuric acid; as secondary application" in this dataset.
Exchange "Water, surface-c19fb2d9-98eb-4cd3-8761-81b71d8a9a1b in water" was originally named: "Water; withdrawal from surface water, for winter wheat, in 1998" in this dataset.
Exchange "Clopyralid-2bdf9967-6dae-4183-88d1-8f612548c51e low population density" was originally named: "Clopyralid; broadcast by air; kg AI" in this dataset.
Exchange "Dicamba-2bdf9967-6dae-4183-88d1-8f612548c51e low population density" was originally named: "Dicamba; broadcast by air; kg AI" in this dataset.
Exchange "isopentane-2bdf9967-6dae-4183-88d1-8f612548c51e low population density" was originally named: "I pentane; from residue burning; kg C, biogenic" in this dataset.
Exchange "Phosphorus-c19fb2d9-98eb-4cd3-8761-81b71d8a9a1b unspecified" was originally named: "Phosphorous; from plant uptake; biogenic" in this dataset.
Exchange "Water, ground-c19fb2d9-98eb-4cd3-8761-81b71d8a9a1b in water" was originally named: "Water; withdrawal from groundwater, for winter wheat, in 1998" in this dataset.
Exchange "Transformation, from arable-c19fb2d9-98eb-4cd3-8761-81b71d8a9a1b land" was originally named: "Transformation; from arable, from unspec. use to wheat" in this dataset.
Exchange "Butane-2bdf9967-6dae-4183-88d1-8f612548c51e low population density" was originally named: "N butane; from residue burning; kg C, biogenic" in this dataset.
Exchange "Dinitrogen monoxide-2bdf9967-6dae-4183-88d1-8f612548c51e low population density" was originally named: "Dinitrogen monoxide; from residue burning; kg N, biogenic" in this dataset.
Exchange "Magnesium-be1c0329-f1a8-4524-8420-a86d2a8dd358 agricultural" was originally named: "Magnesium; applied in dolomite" in this dataset.
Exchange "trans-2-Butene-2bdf9967-6dae-4183-88d1-8f612548c51e low population density" was originally named: "Trans 2 butene; from residue burning; kg C, biogenic" in this dataset.
Exchange "Carbon monoxide, fossil-2bdf9967-6dae-4183-88d1-8f612548c51e low population density" was originally named: "Carbon monoxide; from residue burning; kg C, biogenic" in this dataset.
Exchange "Ethane-2bdf9967-6dae-4183-88d1-8f612548c51e low population density" was originally named: "Ethane; from residue burning; kg C, biogenic" in this dataset.
Exchange "Butadiene-2bdf9967-6dae-4183-88d1-8f612548c51e low population density" was originally named: "1,3 butadiene; from residue burning; kg C, biogenic" in this dataset.
Exchange "Sulfur dioxide-2bdf9967-6dae-4183-88d1-8f612548c51e low population density" was originally named: "Sulfur dioxide; from residue burning; biogenic" in this dataset.
Exchange "Propene-2bdf9967-6dae-4183-88d1-8f612548c51e low population density" was originally named: "Propylene; from residue burning; kg C, biogenic" in this dataset.
Exchange "Acetonitrile-2bdf9967-6dae-4183-88d1-8f612548c51e low population density" was originally named: "Acetonitrile; from residue burning; kg C, biogenic" in this dataset.
Exchange "Diclofop-methyl-2bdf9967-6dae-4183-88d1-8f612548c51e low population density" was originally named: "Diclofop-methyl; broadcast by air; kg AI" in this dataset.
Exchange "Acrylonitrile-2bdf9967-6dae-4183-88d1-8f612548c51e low population density" was originally named: "Propenenitrile; from residue burning; kg C, biogenic" in this dataset.
Exchange "Ethyne-2bdf9967-6dae-4183-88d1-8f612548c51e low population density" was originally named: "Acetylene; from residue burning; kg C, biogenic" in this dataset.
Exchange "Acetic acid-2bdf9967-6dae-4183-88d1-8f612548c51e low population density" was originally named: "Acetic acid; from residue burning; kg C, biogenic" in this dataset.
Exchange "Methane-2bdf9967-6dae-4183-88d1-8f612548c51e low population density" was originally named: "Methane; from residue burning; kg C, biogenic" in this dataset.
Exchange "Bromoxynil-2bdf9967-6dae-4183-88d1-8f612548c51e low population density" was originally named: "Bromoxynil; broadcast by air; kg AI" in this dataset.
Exchange "Toluene-2bdf9967-6dae-4183-88d1-8f612548c51e low population density" was originally named: "Toluene; from residue burning; kg C, biogenic" in this dataset.
Exchange "Occupation, arable-c19fb2d9-98eb-4cd3-8761-81b71d8a9a1b land" was originally named: "Occupation; arable, as wheat" in this dataset.
Exchange "Sulfur-be1c0329-f1a8-4524-8420-a86d2a8dd358 agricultural" was originally named: "Sulfur; as secondary application" in this dataset.
Exchange "Acetone-2bdf9967-6dae-4183-88d1-8f612548c51e low population density" was originally named: "Acetone; from residue burning; kg C, biogenic" in this dataset.
Exchange "isobutene-2bdf9967-6dae-4183-88d1-8f612548c51e low population density" was originally named: "I butene; from residue burning; kg C, biogenic" in this dataset.
Exchange "Prosulfuron-2bdf9967-6dae-4183-88d1-8f612548c51e low population density" was originally named: "Prosulfuron; broadcast by air; kg AI" in this dataset.
Exchange "Tribenuron-methyl-2bdf9967-6dae-4183-88d1-8f612548c51e low population density" was originally named: "Tribenuron-methyl; broadcast by air; kg AI" in this dataset.
Exchange "Ammonia-2bdf9967-6dae-4183-88d1-8f612548c51e low population density" was originally named: "Ammonia; from residue burning; kg N, biogenic" in this dataset.
Exchange "Formaldehyde-2bdf9967-6dae-4183-88d1-8f612548c51e low population density" was originally named: "Formaldehyde; from residue burning; kg C, biogenic" in this dataset.
Exchange "difenzoquat-2bdf9967-6dae-4183-88d1-8f612548c51e low population density" was originally named: "Difenzoquat; broadcast by air; kg AI" in this dataset.
Exchange "Nitrogen dioxide-2bdf9967-6dae-4183-88d1-8f612548c51e low population density" was originally named: "Nitrogen dioxide; from residue burning; kg N, biogenic" in this dataset.
Exchange "Isoprene-2bdf9967-6dae-4183-88d1-8f612548c51e low population density" was originally named: "Isoprene; from residue burning; kg C, biogenic" in this dataset.
Exchange "Water-2bdf9967-6dae-4183-88d1-8f612548c51e low population density" was originally named: "Water; from residue burning; biogenic" in this dataset.
Exchange "Acetaldehyde-2bdf9967-6dae-4183-88d1-8f612548c51e low population density" was originally named: "Acetaldehyde; from residue burning; kg C, biogenic" in this dataset.
Exchange "Methanol-2bdf9967-6dae-4183-88d1-8f612548c51e low population density" was originally named: "Methanol; from residue burning; kg C, biogenic" in this dataset.
Exchange "Carbon dioxide, in air-2bdf9967-6dae-4183-88d1-8f612548c51e low population density" was originally named: "Carbon dioxide; from residue burning; kg C, biogenic" in this dataset.
Exchange "Water, unspecified origin-c19fb2d9-98eb-4cd3-8761-81b71d8a9a1b in water" was originally named: "Water; from plant uptake; biogenic" in this dataset.
Exchange "Transformation, to arable-c19fb2d9-98eb-4cd3-8761-81b71d8a9a1b land" was originally named: "Transformation; to arable, to wheat" in this dataset.
Exchange "1-Butene-2bdf9967-6dae-4183-88d1-8f612548c51e low population density" was originally named: "1 butene; from residue burning; kg C, biogenic" in this dataset.
Exchange "cis-2-Butene-2bdf9967-6dae-4183-88d1-8f612548c51e low population density" was originally named: "Cis 2 butene; from residue burning; kg C, biogenic" in this dataset.
Exchange "Furan-2bdf9967-6dae-4183-88d1-8f612548c51e low population density" was originally named: "Furan; from residue burning; kg C, biogenic" in this dataset.
Exchange "Carbon dioxide-c19fb2d9-98eb-4cd3-8761-81b71d8a9a1b unspecified" was originally named: "Carbon dioxide; from plant uptake; kg C, biogenic" in this dataset.
Exchange "2,4-D-2bdf9967-6dae-4183-88d1-8f612548c51e low population density" was originally named: "2,4-D; broadcast by air; kg AI" in this dataset.
Exchange "Zinc compounds-be1c0329-f1a8-4524-8420-a86d2a8dd358 agricultural" was originally named: "Zinc compounds; as secondary application" in this dataset.
Exchange "MCPA-2bdf9967-6dae-4183-88d1-8f612548c51e low population density" was originally named: "MCPA; broadcast by air; kg AI" in this dataset.
Exchange "Pentane-2bdf9967-6dae-4183-88d1-8f612548c51e low population density" was originally named: "N pentane; from residue burning; kg C, biogenic" in this dataset.
Exchange "Hydrocyanic acid-2bdf9967-6dae-4183-88d1-8f612548c51e low population density" was originally named: "Hydrogen cyanide; from residue burning; kg C, biogenic" in this dataset.

## Geography
The unit process is assumed to represent production in Idaho (US State).

## Technology
This process produces winter wheat; at harvest in 1998; at farm; 86%-90% moisture. The process is assumed to represent production in Idaho (US State). Yields and related inputs and outputs represent a single year of operation, in 1998. This dataset includes consideration of residue burning; soil preparation; planting or sowing; irrigation; application, storage, and transport of fertilizers, manures, liming materials, secondary materials, and pesticides; and harvest. Fate and transport of applications are not included as described in Cooper, J.S., Kahn, E., Noon, M. (2012) LCA Digital Commons Unit Process Data: field crop production Version 1 which is available at https://www.lcacommons.gov/discovery/docs/LCA%20Digital%20Commons%20Unit%20Process%20Data%20final%20updated.pdf

## Time period
Start and end dates match the underlying data obtained from the USDA Agricultural Resource Management Survey (ARMS).
## Parameters
- p1746: 0.615605
- p2818: 0; = p2427*(p1078+p1080)
- p0509: 0; = SQRT(2)*(IF((2*p0377-1)<0;-1;IF((2*p0377-1)>0;1;0))*SQRT(SQRT((2/(pi()*0.140012289)+LN(1-(2*p0377-1)^2)/2)^2-LN(1-(2*p0377-1)^2)/0.140012289)-(2/(pi()*0.140012289)+LN(1-(2*p0377-1)^2)/2)))
- p1343: 0; = p1342*p0001/(p0818*p0002)
- p0412: 0; = SQRT(2)*(IF((2*p0280-1)<0;-1;IF((2*p0280-1)>0;1;0))*SQRT(SQRT((2/(pi()*0.140012289)+LN(1-(2*p0280-1)^2)/2)^2-LN(1-(2*p0280-1)^2)/0.140012289)-(2/(pi()*0.140012289)+LN(1-(2*p0280-1)^2)/2)))
- p1164: 7065.53; = p1163*p0801
- p1740: 0
- p2758: 0.00186661; = p2367*(p1019+p1021)
- p1645: 0
- p3334: 0; = IF(or(p3254=0;p1232>0);0;p3269*p3277*(p3300*p3292+(1-p3300)*p3296))
- p2657: 1.10936e-6; = p2266*(p1078+p1080)
- p1883: 0
- p3202: 0; = p2421*p1082
- p2132: 3.05434e-5; = p2015*p2060*p2094/(p0818*1000)
- p1767: 0
- p2878: 0; = p2292*(p1020+p1022)
- p2245: 0.000185936; = p2222*p2190
- p0937: 2.63017e-5; = p0931*p0001/(p0818*p0002)
- p2304: 0; = p2227*p2211
- p3247: 0
- p2890: 0; = p2304*(p1079+p1081)
- p1908: 0
- p0121: 18.34
- p0427: 0; = SQRT(2)*(IF((2*p0295-1)<0;-1;IF((2*p0295-1)>0;1;0))*SQRT(SQRT((2/(pi()*0.140012289)+LN(1-(2*p0295-1)^2)/2)^2-LN(1-(2*p0295-1)^2)/0.140012289)-(2/(pi()*0.140012289)+LN(1-(2*p0295-1)^2)/2)))
- p0881: 0; = p0880*p0001*p0003/(p0818*p0002)
- p0252: 15.593
- p2813: 0; = p2422*(p1078+p1080)
- p4765: 0; = p1798*p3482
- p1203: 3
- p3455: 0; = p3379*p1240
- p0513: 0; = SQRT(2)*(IF((2*p0381-1)<0;-1;IF((2*p0381-1)>0;1;0))*SQRT(SQRT((2/(pi()*0.140012289)+LN(1-(2*p0381-1)^2)/2)^2-LN(1-(2*p0381-1)^2)/0.140012289)-(2/(pi()*0.140012289)+LN(1-(2*p0381-1)^2)/2)))
- p0633: 0; = IF(p0369<0.5;-SQRT(p0007*EXP(p0501^2*p0008)-p0007);SQRT(p0007*EXP(p0501^2*p0008)-p0007))
- p3057: 0; = p2276*p1023
- p2482: 0; = p2286*p1014
- p1327: 0.0824925; = if(p1318=0;if(p1327a=0;1;if(p1327a<0;0;p1327a));0)
- p2914: 0.00199229; = p2328*(p1020+p1022)
- p0258: 37.635
- p3094: 0; = p2313*p1132
- p3451: 0; = p3375*p1240
- p2648: 0.000203868; = p2257*(p1019+p1021)
- p1185: 0.5
- p2698: 0; = p2307*(p1078+p1080)
- p3425: 0; = p3368*p1239
- p2615: 0; = p2419*p1073
- p3161: 1.85204e-6; = p2380*p1082
- p2348: 1.31449e-5; = p2228*p2216
- p1579: 0
- p3004: 0; = p2418*(p1079+p1081)
- p0719: 54.193; = p0059*(1+p0587*p0191/100)
- p1799: 0
- p0700: 0
- p1209: 95.9714; = p1206*p0818*p0822/p0801
- p2742: 0; = p2351*(p1128+p1130)
- p1553: 0
- p2639: 0.000438202; = p2248*(p1019+p1021)
- p3042: 5.41012e-5; = p2261*p1082
- p1345: 1.59304e-5; = IF(p1318=0;p1344*p0001/(p0818*p0002);0)
- p1097: 0.0625488
- p1995: 50
- p3591: 0; = p1860*p3476
- p0666: 0; = IF(p0402<0.5;-SQRT(p0007*EXP(p0534^2*p0008)-p0007);SQRT(p0007*EXP(p0534^2*p0008)-p0007))
- p1078: 0.27682; = IF(p1071=0;IF(p1073=1;0;IF(p1073+p1074>1;1-p1073;p1074));0)
- p2610: 0; = p2414*p1073
- p2301: 0; = p2227*p2208
- p1155: 0.000347866; = if(p1153*p0818=0;0;p1151/(p1153*p0818))
- p3034: 0; = p2253*p1023
- p2341: 7.54066e-5; = p2228*p2209
- p1853: 0
- p1631: 0
- p2795: 0; = p2404*(p1019+p1021)
- p1310: 0; = IF(p1307=p1266;0;IF(p1307+p1308>p1266;p1266-p1307;p1308))
- p1337: 0; = p1336*p0001/(p0818*p0002)
- p2892: 0; = p2306*(p1079+p1081)
- p2606: 0; = p2410*p1014
- p1635: 0
- p1671: 0
- p4353: 0; = p1798*p3480
- p1237: 0; = if(p1232>0;0;p0729/100)
- p2548: 2.79528e-6; = p2352*p1123
- p2597: 0; = p2401*p1014
- p0345: 0.5
- p3193: 0; = p2412*p1023
- p2452: 6.63478e-6; = p2256*p1014
- p0771: 37.94; = p0111*(1+p0639*p0243/100)
- p1720: 0
- p1972: 0; = if(p0807=480;p1967*p0001/(p0818*p0002);0)
- p3047: 1.15136e-7; = p2266*p1082
- p0217: 12.77
- p3271: 0
- p2542: 1.96855e-5; = p2346*p1073
- p2989: 0; = p2403*(p1020+p1022)
- p0346: 0.5
- p1303: 0; = p1297*p1252/p0818
- p1703: 0
- p0499: 0; = SQRT(2)*(IF((2*p0367-1)<0;-1;IF((2*p0367-1)>0;1;0))*SQRT(SQRT((2/(pi()*0.140012289)+LN(1-(2*p0367-1)^2)/2)^2-LN(1-(2*p0367-1)^2)/0.140012289)-(2/(pi()*0.140012289)+LN(1-(2*p0367-1)^2)/2)))
- p2413: 0; = p2234*p2203
- p1585: 0
- p1010: 0; = p0890
- p2589: 0; = p2393*p1014
- p3195: 0; = p2414*p1082
- p1887: 0
- p0967: 0
- p2768: 2.88702e-5; = p2377*(p1078+p1080)
- p3426: 0; = p3369*p1239
- p2991: 0; = p2405*(p1020+p1022)
- p0130: 61.443
- p1673: 0
- p0794: 0
- p1962: 3.128e-5; = p1960*1000/p0818
- p2397: 0; = p2234*p2186
- p0236: 1.371
- p4415: 0; = p1860*p3480
- p2274: 0; = p2230*p2220
- p3447: 0; = p3371*p1240
- p3357: 0; = if(p1232=0;p3307+p3318+p3329+p3340+p3351;0)
- p2868: 0; = p2282*(p1020+p1022)
- p2901: 0.00110965; = p2315*(p1020+p1022)
- p1778: 0
- p1067: 0.00279362; = IF(p1012=0;p1053/(p1060*p0818);0)
- p2707: 6.8257e-5; = p2316*(p1019+p1021)
- p0709: 50.287; = p0049*(1+p0577*p0181/100)
- p3170: 0.000358402; = p2389*p1132
- p1868: 0
- p1819: 0
- p3681: 0; = p1950*p3476
- p2025: 0.000192937; = p2015*p2023*p2024/(p0818*1000)
- p2922: 8.39633e-5; = p2336*(p1079+p1081)
- p2490: 0; = p2294*p1014
- p2152: 2.52949e-6; = p2015*p2080*p2114/(p0818*1000)
- p2185: 0.000528448; = p1065-p2184
- p3238: 0.854735; = IF(p3237+p3235+p3236>1;1-(p3235+p3236);p3237)
- p2302: 0; = p2227*p2209
- p2896: 0; = p2310*(p1079+p1081)
- p1633: 0
- p3323: 0; = if(and(p1232=0;p3255<>0);p3265*p3277*(p3299*p3291+(1-p3299)*p3295);0)
- p2228: 0.269256; = if(p0774*p0778+p0775*p0779+p0776*p0780+p0777*p0781=0;0;p0780*p0776/(p0774*p0778+p0775*p0779+p0776*p0780+p0777*p0781))
- p2912: 0.000940215; = p2326*(p1020+p1022)
- p1797: 0
- p3353: 0; = if(and(p1232=0;p3256<>0);p3256*(p3276-p3348)/p3349;0)
- p1076: 0; = IF(p1071=0;p0714/100;0)
- p2999: 0; = p2413*(p1020+p1022)
- p3191: 0; = p2410*p1023
- p0969: 0
- p0280: 0.5
- p0046: 8.76
- p2893: 0; = p2307*(p1079+p1081)
- p1317: 0
- p2247: 0.000378396; = p2222*p2192
- p2749: 0.000186803; = p2358*(p1019+p1021)
- p3264: 0
- p1752: 0
- p0085: 2114.53
- p0384: 0.5
- p4721: 0; = p1754*p3482
- p0160: 19.455
- p0733: 0
- p1641: 0
- p1084: 150050; = IF(p1071=0;p1078*(p0710/100)*p0703*1000;0)
- p4428: 0; = p1873*p3480
- p0955: 0; = if(and(p0683>0;or(p0807=56;p0807=100;and(p0807=60;p0901>0.06)));p0937;0)
- p1869: 0
- p0739: 0.728; = p0079*(1+p0607*p0211/100)
- p2791: 0; = p2400*(p1019+p1021)
- p1964: 0.5
- p1066: 0.00495052; = IF(p1012=0;p1052/(p1059*p0818);0)
- p2000: 4000
- p1291: 0; = IF(p1287+p1290=p1264;0;IF(p1287+p1290+p1289>p1264;p1264-(p1287+p1290);p1289))
- p1090: 3.53374e-5; = IF(p1071=0;p1084*p0001/(p0818*p0002);0)
- p0850: 0
- p2385: 3.41437e-5; = p2229*p2214
- p2729: 3.3771e-5; = p2338*(p1078+p1080)
- p1243: 0; = if(p1232>0;0;p1238*(p0725/100)*p0723*1000)
- p1324: 1.11908; = IF(((p0745*1000*p0751/100)+(p0754*1000*p0760/100))/p0801<0;0;((p0745*1000*p0751/100)+(p0754*1000*p0760/100))/p0801)
- p0776: 28.505; = p0116*(1+p0644*p0248/100)
- p2211: 0.00158348; = p1120-p2209-p2208-p2210
- p4925: 0; = p1962*p3482
- p1068: 0.0260686; = IF(p1012=0;p1054/(p1061*p0818);0)
- p0822: 0.8849
- p0976: 0; = IF(p0687=0;IF(OR(p0686=0;p0689=0);0;p0686*1000*p0689/100);0)
- p3391: 0; = p3372*p1234
- p2016: 0.0192971; = (p2014-p2015)/(p0818)
- p1107: 561948; = IF(p1071=0;p1105*p1101*p1095;0)
- p2613: 0; = p2417*p1073
- p3420: 0; = p3363*p1239
- p2187: 0.000238685; = 4*1.00794*p2186/(2*14.0067)
- p1699: 0
- p3163: 1.04718e-5; = p2382*p1082
- p1963j: 4.61738e-7; = p1725*p1929+p1726*p1930+p1727*p1931+p1728*p1932+p1729*p1933+p1730*p1934+p1731*p1935+p1732*p1936+p1733*p1937+p1734*p1938+p1735*p1939+p1736*p1940+p1737*p1941+p1738*p1942+p1739*p1943+p1740*p1944+p1741*p1945+p1742*p1946+p1743*p1947
- p0351: 0.5
- p3351: 0; = if(and(p1232=0;p3256<>0);p3256*(p3274-p3346)/p3349;0)
- p1148: 0.082617; = if(p1121=0;IF(p1146=1;0;1-p1146);0)
- p3411: 0; = p3373*p1238
- p0606: 0; = IF(p0342<0.5;-SQRT(p0007*EXP(p0474^2*p0008)-p0007);SQRT(p0007*EXP(p0474^2*p0008)-p0007))
- p3008: 0; = p2422*(p1079+p1081)
- p1046: 0.0238398; = IF(p1012=0;IF(p1037+p1044+p1045=1;0;IF(p1037+p1044+p1045+p1040>1;1-(p1037+p1044+p1045);p1040));0)
- p2578: 0.000179649; = p2382*p1073
- p2654: 3.88061e-5; = p2263*(p1078+p1080)
- p3177: 0; = p2396*p1023
- p0080: 83.963
- p0637: 0; = IF(p0373<0.5;-SQRT(p0007*EXP(p0505^2*p0008)-p0007);SQRT(p0007*EXP(p0505^2*p0008)-p0007))
- p1963h: 0; = p1686*p1890+p1687*p1891+p1688*p1892+p1689*p1893+p1690*p1894+p1691*p1895+p1692*p1896+p1693*p1897+p1694*p1898+p1695*p1899+p1696*p1900+p1697*p1901+p1698*p1902+p1699*p1903+p1700*p1904+p1701*p1905+p1702*p1906+p1703*p1907+p1704*p1908+p1705*p1909
- p1846: 0
- p0922: 0; = p0677*1000/p0801
- p2013: 0.85
- p3416: 0; = p3378*p1238
- p3295: 0
- p3129: 3.77654e-7; = p2348*p1082
- p2275: 0; = p2230*p2221
- p3039: 2.22481e-5; = p2258*p1082
- p2293: 0; = p2223*p2200
- p2975: 0.000662649; = p2389*(p1129+p1131)
- p4363: 0; = p1808*p3480
- p1842: 0
- p0934: 0.000132173; = p0928*p0001/(p0818*p0002)
- p1282: 0; = IF(p1277+p1280+p1281=p1260;0;p1260-(p1277+p1280+p1281))
- p3453: 0; = p3377*p1240
- p3280: 0
- p0164: 0
- p1986: 4200
- p0401: 0.5
- p3067: 0; = p2286*p1023
- p1032: 4.09151e-5; = IF(p1012=0;p1026*p0001/(p0818*p0002);0)
- p3147: 0; = p2366*p1023
- p2383: 1.84285e-6; = p2229*p2212
- p1018: 0.50287; = IF(p1012=0;p0709/100;0)
- p0045: 7.55
- p3152: 0; = p2371*p1023
- p3955: 2.88268e-6; = p1812*p3478
- p1763: 0
- p0400: 0.5
- p0669: 21.6068; = p0009*(1+p0537*p0141/100)
- p2857: 4.41474e-5; = p2271*(p1079+p1081)
- p0007: 14; = p0006-1
- p2046: 10
- p1400: 3
- p3241: 3.03851e-10; = p3234*p1188*p3236/p0818
- p2335: 0.000605732; = p2224*p2203
- p1679: 0
- p2940: 0.00371008; = p2354*(p1020+p1022)
- p1670: 0
- p2223: 0; = if(p0765*p0769+p0766*p0770+p0767*p0771+p0768*p0772=0;0;p0770*p0766/(p0765*p0769+p0766*p0770+p0767*p0771+p0768*p0772))
- p3070: 0; = p2289*p1023
- p3364: 0; = if(p1232=0;p3244*p3358/p0818;0)
- p0375: 0.5
- p3090: 0; = p2309*p1082
- p0127: 31.414
- p2569: 1.33377e-5; = p2373*p1014
- p2756: 0.000880904; = p2365*(p1019+p1021)
- p1828: 0
- p2230: 0; = if(p0783*p0787+p0784*p0788+p0785*p0789+p0786*p0790=0;0;p0787*p0783/(p0783*p0787+p0784*p0788+p0785*p0789+p0786*p0790))
- p2117: 0.585147
- p1852: 0
- p2257: 0.00100745; = p2222*p2203
- p0563: 0; = IF(p0299<0.5;-SQRT(p0007*EXP(p0431^2*p0008)-p0007);SQRT(p0007*EXP(p0431^2*p0008)-p0007))
- p2845: 0.000141174; = p2259*(p1079+p1081)
- p3539: 0; = p1808*p3476
- p3262: 0
- p2939: 1.59578e-5; = p2353*(p1129+p1131)
- p3717: 1.77053e-6; = p1780*p3477
- p3095: 0; = p2314*p1132
- p3077: 0; = p2296*p1023
- p1653: 0
- p3117: 1.19674e-5; = p2336*p1082
- p0890: 0; = p0686*1000*p0687*p0885/100
- p0211: 10.435
- p5159: 5.8265e-7; = p1780*p3484
- p0442: 0; = SQRT(2)*(IF((2*p0310-1)<0;-1;IF((2*p0310-1)>0;1;0))*SQRT(SQRT((2/(pi()*0.140012289)+LN(1-(2*p0310-1)^2)/2)^2-LN(1-(2*p0310-1)^2)/0.140012289)-(2/(pi()*0.140012289)+LN(1-(2*p0310-1)^2)/2)))
- p2338: 0.000121996; = p2228*p2206
- p3309: 0; = if(and(p1232=0;p3252<>0);p3252*(p3260-p3304)/p3305;0)
- p3257: 0
- p1857: 0
- p1003: 2.9177e6; = p0999*p0888
- p2351: 0.000265157; = p2232*p2219
- p0556: 0; = IF(p0292<0.5;-SQRT(p0007*EXP(p0424^2*p0008)-p0007);SQRT(p0007*EXP(p0424^2*p0008)-p0007))
- p1019: 0.0876; = IF(p1012=0;IF(p1014=1;0;IF(p1014+p1015>1;1-p1014;p1015));0)
- p1581: 0
- p0580: 0; = IF(p0316<0.5;-SQRT(p0007*EXP(p0448^2*p0008)-p0007);SQRT(p0007*EXP(p0448^2*p0008)-p0007))
- p0571: 0; = IF(p0307<0.5;-SQRT(p0007*EXP(p0439^2*p0008)-p0007);SQRT(p0007*EXP(p0439^2*p0008)-p0007))
- p0475: 0; = SQRT(2)*(IF((2*p0343-1)<0;-1;IF((2*p0343-1)>0;1;0))*SQRT(SQRT((2/(pi()*0.140012289)+LN(1-(2*p0343-1)^2)/2)^2-LN(1-(2*p0343-1)^2)/0.140012289)-(2/(pi()*0.140012289)+LN(1-(2*p0343-1)^2)/2)))
- p0591: 0; = IF(p0327<0.5;-SQRT(p0007*EXP(p0459^2*p0008)-p0007);SQRT(p0007*EXP(p0459^2*p0008)-p0007))
- p2565: 1.09526e-6; = p2369*p1014
- p1326: 0; = IF(((p0745*1000*p0753/100)+(p0754*1000*p0762/100))/p0801<0;0;((p0745*1000*p0753/100)+(p0754*1000*p0762/100))/p0801)
- p2692: 0; = p2301*(p1078+p1080)
- p2299: 0; = p2227*p2206
- p1626: 0
- p3033: 0; = p2252*p1023
- p2802: 0; = p2411*(p1019+p1021)
- p2521: 1.71771e-5; = p2325*p1014
- p0859: 0; = p0671*1000/p0856
- p1152: 0.415074
- p3223: 0.126838; = IF(p3216=0;0;(1-p1223)*24.3050/84.3139)
- p3250: 0
- p3244: 0; = p0791/100
- p2442: 3.53023e-6; = p2246*p1014
- p2192: 0.00136659; = p1067-p2189-p2190-p2191
- p1770: 0
- p0823: 0
- p0952: 0; = if(and(p0683>0;or(p0807=56;p0807=100;and(p0807=60;p0901>0.06)));p0934;0)
- p1153: 0.365265
- p2319: 0.000276097; = p2224*p2186
- p2876: 0; = p2290*(p1020+p1022)
- p0816: 0
- p2601: 0; = p2405*p1014
- p2609: 0; = p2413*p1014
- p4498: 0; = p1943*p3480
- p1592: 0
- p2487: 0; = p2291*p1014
- p0691: 5.587; = p0031*(1+p0559*p0163/100)
- p3462: 0; = p3367*p1241
- p2678: 0; = p2287*(p1019+p1021)
- p2408: 0; = p2234*p2198
- p0610: 0; = IF(p0346<0.5;-SQRT(p0007*EXP(p0478^2*p0008)-p0007);SQRT(p0007*EXP(p0478^2*p0008)-p0007))
- p1997: 1.78869e7; = (if(p1152=0;0;p1150/p1152)+if(p1153=0;0;p1151/p1153))*(1+p1157)
- p1927: 0
- p2917: 6.88875e-6; = p2331*(p1020+p1022)
- p2777: 3.56676e-5; = p2386*(p1078+p1080)
- p2168: 0.00598502; = p2166*(p0903)
- p1212: 0.0367397; = if(p1211=0;0;if(p1193>0;0;(p1207+p1208+p1209)*p1210/(2000*p1211)))
- p0183: 18.457
- p3369: 0; = if(p1232=0;p3245*p3357/p0818;0)
- p0685: 0
- p1144: 1.32554e-5; = if(p1121=0;p1138*p0001/(p0818*p0002);0)
- p0678: 82.529; = p0018*(1+p0546*p0150/100)
- p1825: 0
- p0727: 0
- p4505: 0; = p1950*p3480
- p2098: 0.856281
- p1028: 398440; = IF(p1012=0;p1022*(p0704/100)*p0703*1000;0)
- p3289: 0
- p0983: 1; = if(p0886=0;0;min(1;(p0695*p0694*1000*p0697/100)/p0886))
- p1186: 1.51309e-8; = p1182*p1185/p0818
- p2805: 0; = p2414*(p1078+p1080)
- p0793: 0
- p0642: 0; = IF(p0378<0.5;-SQRT(p0007*EXP(p0510^2*p0008)-p0007);SQRT(p0007*EXP(p0510^2*p0008)-p0007))
- p1081: 0; = IF(p1071=0;IF(p1073+p1078+p1079+p1080=1;0;IF(p1073+p1078+p1079+p1080+p1077>1;1-(p1073+p1078+p1079+p1080);p1077));0)
- p0819: 0; = p0808*p0809/p0818
- p2545: 5.80667e-5; = p2349*p1073
- p0575: 0; = IF(p0311<0.5;-SQRT(p0007*EXP(p0443^2*p0008)-p0007);SQRT(p0007*EXP(p0443^2*p0008)-p0007))
- p0701: 0
- p0817: 0
- p3403: 0; = p3365*p1238
- p2276: 0; = p2223*p2182
- p3277: 0
- p3445: 0; = p3369*p1240
- p3887: 5.13198e-8; = p1950*p3477
- p0020: 561.237
- p2872: 0; = p2286*(p1020+p1022)
- p0874: 0; = p0865*p0856
- p2886: 0; = p2300*(p1079+p1081)
- p3896: 6.94206e-6; = p1963*p3477
- p1145: 7.01861e6; = if(p1121=0;p0799*p0702*1000*p0800/100;0)
- p0501: 0; = SQRT(2)*(IF((2*p0369-1)<0;-1;IF((2*p0369-1)>0;1;0))*SQRT(SQRT((2/(pi()*0.140012289)+LN(1-(2*p0369-1)^2)/2)^2-LN(1-(2*p0369-1)^2)/0.140012289)-(2/(pi()*0.140012289)+LN(1-(2*p0369-1)^2)/2)))
- p2646: 0.000123559; = p2255*(p1019+p1021)
- p0554: 0; = IF(p0290<0.5;-SQRT(p0007*EXP(p0422^2*p0008)-p0007);SQRT(p0007*EXP(p0422^2*p0008)-p0007))
- p3143: 0; = p2362*p1023
- p1567: 0
- p3144: 0; = p2363*p1023
- p1301: 0; = IF(p1297+p1300=p1265;0;IF(p1297+p1300+p1299>p1265;p1265-(p1297+p1300);p1299))
- p1680: 0
- p0720: 0
- p2217: 0.000437543; = p1118-p2216
- p3078: 0; = p2297*p1082
- p0053: 20.157
- p0019: 111.683
- p1175: 9.76968e-5
- p2496: 0; = p2300*p1073
- p0301: 0.5
- p2428: 0; = p2236*p2218
- p1588: 0
- p2505: 0; = p2309*p1073
- p0309: 0.5
- p2003: 50
- p3137: 0; = p2356*p1023
- p1290: 0; = IF(p1287=p1264;0;IF(p1287+p1288>p1264;p1264-p1287;p1288))
- p1062: 0.16
- p3035: 0; = p2254*p1023
- p0117: 47.622
- p3149: 0; = p2368*p1023
- p0993: 8.79214e-6; = p0989*p0001*p0004/(p0818*p0002)
- p2780: 0; = p2389*(p1128+p1130)
- p1833: 0
- p2689: 0; = p2298*(p1078+p1080)
- p1893: 0
- p2624: 0; = p2428*p1123
- p0704: 97.154; = p0044*(1+p0572*p0176/100)
- p3308: 0; = if(and(p1232=0;p3252<>0);p3252*(p3259-p3303)/p3305;0)
- p0705: 7.55; = p0045*(1+p0573*p0177/100)
- p1030: 1.40881e-5; = IF(p1012=0;p1024*p0001/(p0818*p0002);0)
- p3735: 1.0264e-7; = p1798*p3477
- p0382: 0.5
- p3307: 0; = if(and(p1232=0;p3252<>0);p3252*(p3258-p3302)/p3305;0)
- p3439: 0; = p3363*p1240
- p2149: 4.47577e-6; = p2015*p2077*p2111/(p0818*1000)
- p2381: 2.78333e-5; = p2229*p2210
- p4515: 8.36232e-6; = p1754*p3481
- p3329: 0; = if(and(p1232=0;p3255<>0);p3255*(p3266-p3324)/p3327;0)
- p2393: 0; = p2234*p2182
- p3479: 0; = if(p1328+p1330+p1332+p1334+p1336+p1338+p1340+p1342+p1344=0;0;p1334/(p1328+p1330+p1332+p1334+p1336+p1338+p1340+p1342+p1344))
- p1023: 0; = IF(p1012=0;IF(p1014+p1019+p1020+p1021+p1022=1;0;1-(p1014+p1019+p1020+p1021+p1022));0)
- p0235: 0
- p3221: 0.146975; = IF(p3216=0;0;p1223*12.0107/100.0869+(1-p1224)*12.0107/84.3139)
- p2674: 0; = p2283*(p1019+p1021)
- p0895: 1.00719e9; = p0894*p0830
- p2630: 8.59641e-6; = p2239*(p1019+p1021)
- p5252: 1.18219e-6; = p1873*p3484
- p1279: 0
- p0747: 9.721; = p0087*(1+p0615*p0219/100)
- p1739: 0.583082
- p3169: 2.89353e-6; = p2388*p1082
- p3005: 0; = p2419*(p1079+p1081)
- p1169: 0.000508261
- p2258: 0.000774385; = p2226*p2204
- p1667: 0
- p1732: 0
- p2229: 0.230182; = if(p0774*p0778+p0775*p0779+p0776*p0780+p0777*p0781=0;0;p0781*p0777/(p0774*p0778+p0775*p0779+p0776*p0780+p0777*p0781))
- p2154: 1.54125e-5; = p2015*p2082*p2116/(p0818*1000)
- p0431: 0; = SQRT(2)*(IF((2*p0299-1)<0;-1;IF((2*p0299-1)>0;1;0))*SQRT(SQRT((2/(pi()*0.140012289)+LN(1-(2*p0299-1)^2)/2)^2-LN(1-(2*p0299-1)^2)/0.140012289)-(2/(pi()*0.140012289)+LN(1-(2*p0299-1)^2)/2)))
- p1287: 0
- p3173: 5.60885e-5; = p2392*p1132
- p1983: 50
- p2731: 4.61599e-5; = p2340*(p1078+p1080)
- p2374: 0.00202525; = p2225*p2203
- p3293: 0
- p3197: 0; = p2416*p1082
- p2904: 6.35316e-5; = p2318*(p1020+p1022)
- p2472: 0; = p2276*p1014
- p0043: 815.543
- p2215: 0.000559765; = p1117-p2214
- p2278: 0; = p2223*p2184
- p1098: 0.020586
- p1103: 0.652345; = IF(p1071=0;IF(p1096+p1101+p1102=1;0;IF(p1096+p1101+p1102+p1099>1;1-(p1096+p1101+p1102);p1099));0)
- p2077: 0.043
- p0836: 5.37094e7; = p0831*p0835*p0801/(1-p0831)
- p2867: 0; = p2281*(p1020+p1022)
- p2902: 0.000243581; = p2316*(p1020+p1022)
- p1263: 0; = if(p1232>0;0;IF(p1259=1;0;IF(p1259+p1260>1;1-p1259;p1260)))
- p2685: 0; = p2294*(p1019+p1021)
- p3378: 0; = if(p1232=0;p3246*p3360/p0818;0)
- p0452: 0; = SQRT(2)*(IF((2*p0320-1)<0;-1;IF((2*p0320-1)>0;1;0))*SQRT(SQRT((2/(pi()*0.140012289)+LN(1-(2*p0320-1)^2)/2)^2-LN(1-(2*p0320-1)^2)/0.140012289)-(2/(pi()*0.140012289)+LN(1-(2*p0320-1)^2)/2)))
- p1221: 0.015942
- p0558: 0; = IF(p0294<0.5;-SQRT(p0007*EXP(p0426^2*p0008)-p0007);SQRT(p0007*EXP(p0426^2*p0008)-p0007))
- p1961: 0.5
- p0958: 0; = if(and(p0683>0;or(p0807=480;p0807=32;p0807=1;and(p0807=60;p0901<0.03)));p0934;0)
- p1241: 0; = if(p1232>0;0;IF(p1234+p1238+p1239+p1240=1;0;1-(p1234+p1238+p1239+p1240)))
- p2136: 7.04368e-5; = p2015*p2064*p2098/(p0818*1000)
- p1650: 0
- p2873: 0; = p2287*(p1020+p1022)
- p0994: 0; = p0990*p0001*p0004/(p0818*p0002)
- p0432: 0; = SQRT(2)*(IF((2*p0300-1)<0;-1;IF((2*p0300-1)>0;1;0))*SQRT(SQRT((2/(pi()*0.140012289)+LN(1-(2*p0300-1)^2)/2)^2-LN(1-(2*p0300-1)^2)/0.140012289)-(2/(pi()*0.140012289)+LN(1-(2*p0300-1)^2)/2)))
- p1969: 0; = p0803
- p0027: 12.305
- p3482: 0; = if(p1328+p1330+p1332+p1334+p1336+p1338+p1340+p1342+p1344=0;0;p1340/(p1328+p1330+p1332+p1334+p1336+p1338+p1340+p1342+p1344))
- p2055: 5.59471
- p0267: 4.238
- p2611: 0; = p2415*p1073
- p2815: 0; = p2424*(p1078+p1080)
- p0940: 0; = if(and(p0683=0;p0946=0);p0934;0)
- p4371: 0; = p1816*p3480
- p3211: 0; = p2430*p1132
- p2666: 0; = p2275*(p1128+p1130)
- p0001: 0.404686
- p3450: 0; = p3374*p1240
- p2577: 1.37185e-5; = p2381*p1073
- p3084: 0; = p2303*p1082
- p2554: 6.96958e-5; = p2358*p1014
- p1757: 0
- p5132: 0; = p1963*p3483
- p2751: 0.000343933; = p2360*(p1019+p1021)
- p1261: 0; = if(p1232>0;0;p0732/100)
- p2410: 0; = p2234*p2200
- p1834: 0
- p1232: 4020.63; = (p0725/100)*p0723*1000
- p1208: 0; = p1205*p0818*p0822/p0801
- p1266: 0; = if(p1232>0;0;IF(p1259+p1263+p1264+p1265=1;0;1-(p1259+p1263+p1264+p1265)))
- p2596: 0; = p2400*p1014
- p0681: 0
- p2501: 0; = p2305*p1073
- p1963k: 1.5965e-5; = p1744*p1948+p1745*p1949+p1746*p1950+p1747*p1951+p1748*p1952+p1749*p1953+p1750*p1954+p1751*p1955+p1752*p1956+p1753*p1957+p1961*p1962
- p2604: 0; = p2408*p1014
- p0349: 0.5
- p2441: 1.40381e-5; = p2245*p1014
- p1915: 0
- p0925: 0.136199; = IF(p0918+p0923+p0924=1;0;IF(p0918+p0923+p0924+p0921>1;1-(p0918+p0923+p0924);p0921))
- p2494: 0; = p2298*p1073
- p1721: 0
- p1535: 3
- p3087: 0; = p2306*p1082
- p0904: 1.29532e8; = p0825*p0901+(p0830+p0895)*p0824*p0903
- p2237: 0.00255568; = p2222*p2182
- p1083: 267166; = IF(p1071=0;p1073*(p0710/100)*p0703*1000;0)
- p1342: 0; = p1326*p0801
- p0723: 815.543; = p0063*(1+p0591*p0195/100)
- p3098: 0; = p2317*p1023
- p0984: 0; = if(p0886=0;0;min(1;(p0699*p0698*1000*p0701/100)/p0886))
- p3810: 3.59239e-6; = p1873*p3477
- p2954: 6.38253e-6; = p2368*(p1020+p1022)
- p3370: 0; = if(p1232=0;p3245*p3358/p0818;0)
- p2420: 0; = p2235*p2210
- p1210: 0.13
- p1754: 1.92693e-5; = p1346*1000/p0818
- p3097: 0; = p2316*p1023
- p3231: 2.11465e-8; = p1176/p0818
- p0578: 0; = IF(p0314<0.5;-SQRT(p0007*EXP(p0446^2*p0008)-p0007);SQRT(p0007*EXP(p0446^2*p0008)-p0007))
- p1777: 0
- p1223: 0.56
- p2193: 0.00782059; = p1054/p0818
- p3022: 0; = p2241*p1023
- p2214: 0.000148334; = p1107/p0818
- p2170: 0.00556884; = p2166*(p0913)
- p2317: 2.55417e-5; = p2224*p2184
- p1648: 0
- p2376: 0.000322063; = p2229*p2205
- p0522: 0; = SQRT(2)*(IF((2*p0390-1)<0;-1;IF((2*p0390-1)>0;1;0))*SQRT(SQRT((2/(pi()*0.140012289)+LN(1-(2*p0390-1)^2)/2)^2-LN(1-(2*p0390-1)^2)/0.140012289)-(2/(pi()*0.140012289)+LN(1-(2*p0390-1)^2)/2)))
- p2382: 0.000364488; = p2229*p2211
- p1866: 0
- p2620: 0; = p2424*p1073
- p2143: 1.6303e-5; = p2015*p2071*p2105/(p0818*1000)
- p1820: 0
- p1329: 0; = p1328*p0001/(p0818*p0002)
- p1831: 0
- p2964: 0.000174546; = p2378*(p1079+p1081)
- p2298: 0; = p2227*p2205
- p0948: 1.41523e-5; = if(and(p0683=0;or(p0807=480;p0807=32;p0807=1;and(p0807=60;p0901<0.03)));p0936;0)
- p2024: 0.748682
- p1958: 380
- p1916: 2.63964e-7; = p1508*1000/p0818
- p0300: 0.5
- p0767: 51.625; = p0107*(1+p0635*p0239/100)
- p1934: 0
- p3104: 0; = p2323*p1023
- p1005: 118600; = p1001*p0888
- p3325: 0; = if(and(p1232=0;p3255<>0);p3267*p3289;0)
- p1250: 0; = if(p1232>0;0;p1245*p0001/(p0818*p0002))
- p1244: 0; = if(p1232>0;0;p1239*(p0725/100)*p0723*1000)
- p2599: 0; = p2403*p1014
- p3166: 9.8095e-7; = p2385*p1082
- p1603: 0
- p1080: 0; = IF(p1071=0;IF(p1073+p1078+p1079=1;0;IF(p1073+p1078+p1079+p1076>1;1-(p1073+p1078+p1079);p1076));0)
- p0784: 0
- p3259: 0
- p2859: 0; = p2273*(p1129+p1131)
- p1170: 416.774; = p1169*p0801
- p3013: 0; = p2427*(p1079+p1081)
- p1341: 0; = p1340*p0001/(p0818*p0002)
- p0896: 0.458
- p2525: 1.99581e-7; = p2329*p1014
- p1963g: 1.93356e-5; = p1667*p1871+p1668*p1872+p1669*p1873+p1670*p1874+p1671*p1875+p1672*p1876+p1673*p1877+p1674*p1878+p1675*p1879+p1676*p1880+p1677*p1881+p1678*p1882+p1679*p1883+p1680*p1884+p1681*p1885+p1682*p1886+p1683*p1887+p1684*p1888+p1685*p1889
- p2591: 0; = p2395*p1014
- p3261: 0
- p3299: 0; = if(p1303+p1304+p1305+p1306=0;0;p1303/(p1303+p1304+p1305+p1306))
- p0245: 7.802
- p0813: 0; = if(p0807=480;1.56521739130435;0)
- p3239: 0.013074; = IF(p3238+p3235+p3236=1;0;1-(p3238+p3235+p3236))
- p0894: 0.23
- p0695: 13.299; = p0035*(1+p0563*p0167/100)
- p3092: 0; = p2311*p1132
- p3272: 0
- p0372: 0.5
- p1616: 0
- p0158: 14.162
- p0915: 0.0189815; = p0914/p0818
- p0082: 84.305
- p1800: 0
- p3043: 8.90629e-6; = p2262*p1082
- p2894: 0; = p2308*(p1079+p1081)
- p3478: 0.43683; = if(p1328+p1330+p1332+p1334+p1336+p1338+p1340+p1342+p1344=0;0;p1332/(p1328+p1330+p1332+p1334+p1336+p1338+p1340+p1342+p1344))
- p0907: 0
- p2959: 0.000127572; = p2373*(p1020+p1022)
- p2953: 0.00666117; = p2367*(p1020+p1022)
- p3320: 0; = if(and(p1232=0;p3253<>0);p3253*(p3264-p3315)/p3316;0)
- p1063: 0.455
- p0052: 27.682
- p4308: 0; = p1963*p3479
- p2622: 0; = p2426*p1073
- p0951: 1.04964e-6; = if(and(p0683=0;or(p0807=480;p0807=32;p0807=1;and(p0807=60;p0901<0.03)));p0939;0)
- p3011: 0; = p2425*(p1079+p1081)
- p2717: 0.00026347; = p2326*(p1019+p1021)
- p2763: 0.000248388; = p2372*(p1019+p1021)
- p1809: 0
- p0956: 0; = if(and(p0683>0;or(p0807=56;p0807=100;and(p0807=60;p0901>0.06)));p0938;0)
- p3107: 0; = p2326*p1023
- p3437: 0; = p3380*p1239
- p3006: 0; = p2420*(p1079+p1081)
- p2809: 0; = p2418*(p1078+p1080)
- p1999: 6.39481e7; = (p1228+p1229)*p0818+p1164
- p1862: 0
- p2158: 1.79738e-5; = p2015*p2082*p2120/(p0818*1000)
- p1207: 243.164; = if(p1193>0;0;(p1194*p1050/p1057+p1195*p1051/p1058+p1196*p1052/p1059+p1197*p1053/p1060+p1198*p1054/p1061+p1199*p1055/p1062+p1200*p1056/p1063)/(p0702*1000)+(p1201*p1109/p1114+p1202*p1110/p1115)/(p0702*1000)+p1203*p1170/p0801+p1204*p1176/p0801)
- p3322: 0; = if(and(p1232=0;p3253<>0);p3253-(p3317+p3318+p3319+p3320+p3321);0)
- p0114: 39.041
- p1882: 0
- p2987: 0; = p2401*(p1020+p1022)
- p1599: 0
- p2423: 0; = p2235*p2213
- p2836: 0.00331357; = p2250*(p1020+p1022)
- p2743: 0; = p2352*(p1128+p1130)
- p4103: 0; = p1754*p3479
- p2738: 4.17223e-5; = p2347*(p1078+p1080)
- p0032: 100
- p2331: 9.53936e-6; = p2224*p2199
- p3398: 0; = p3379*p1234
- p3480: 0; = if(p1328+p1330+p1332+p1334+p1336+p1338+p1340+p1342+p1344=0;0;p1336/(p1328+p1330+p1332+p1334+p1336+p1338+p1340+p1342+p1344))
- p0824: 0.863
- p1294: 0; = p1290*p1252/p0818
- p1228: 0.0166133; = IF(p1221=0;0;p0801*p1212*2000/(p1222+p1221*p1225)/p0818)
- p0500: 0; = SQRT(2)*(IF((2*p0368-1)<0;-1;IF((2*p0368-1)>0;1;0))*SQRT(SQRT((2/(pi()*0.140012289)+LN(1-(2*p0368-1)^2)/2)^2-LN(1-(2*p0368-1)^2)/0.140012289)-(2/(pi()*0.140012289)+LN(1-(2*p0368-1)^2)/2)))
- p1666: 0
- p2353: 2.94463e-5; = p2232*p2221
- p3470: 0; = p3375*p1241
- p3286: 0
- p0368: 0.5
- p1963: 7.1413e-5; = p1963a+p1963b+p1963c+p1963d+p1963e+p1963f+p1963g+p1963h+p1963i+p1963j+p1963k
- p0544: 0; = IF(p0280<0.5;-SQRT(p0007*EXP(p0412^2*p0008)-p0007);SQRT(p0007*EXP(p0412^2*p0008)-p0007))
- p1912: 0
- p0746: 0
- p3059: 0; = p2278*p1023
- p1903: 0
- p0682: 815.543; = p0022*(1+p0550*p0154/100)
- p0730: 0
- p0741: 0.713; = p0081*(1+p0609*p0213/100)
- p2266: 4.00753e-6; = p2226*p2212
- p2439: 6.38325e-5; = p2243*p1014
- p3015: 0; = p2429*(p1129+p1131)
- p5033: 0; = p1860*p3483
- p2355: 0.00112777; = p2225*p2183
- p4016: 1.6143e-5; = p1873*p3478
- p1688: 0
- p1202: 0.7
- p0414: 0; = SQRT(2)*(IF((2*p0282-1)<0;-1;IF((2*p0282-1)>0;1;0))*SQRT(SQRT((2/(pi()*0.140012289)+LN(1-(2*p0282-1)^2)/2)^2-LN(1-(2*p0282-1)^2)/0.140012289)-(2/(pi()*0.140012289)+LN(1-(2*p0282-1)^2)/2)))
- p2943: 0.000212416; = p2357*(p1020+p1022)
- p1719: 0
- p1163: 0.0086165
- p3140: 0; = p2359*p1023
- p1009: 7.0944e-7; = p1005*p0001*p0004/(p0818*p0002)
- p2174: 0.00344026; = p0895*p0903/p0818
- p0848: 0
- p1556: 0
- p1274: 0; = p1270*p1252/p0818
- p1285: 0; = p1281*p1252/p0818
- p0791: 0
- p0091: 43.397
- p2623: 0; = p2427*p1073
- p0440: 0; = SQRT(2)*(IF((2*p0308-1)<0;-1;IF((2*p0308-1)>0;1;0))*SQRT(SQRT((2/(pi()*0.140012289)+LN(1-(2*p0308-1)^2)/2)^2-LN(1-(2*p0308-1)^2)/0.140012289)-(2/(pi()*0.140012289)+LN(1-(2*p0308-1)^2)/2)))
- p2440: 1.22643e-5; = p2244*p1014
- p2243: 0.000845464; = p2222*p2188
- p2529: 2.77175e-5; = p2333*p1014
- p2830: 0.000117306; = p2244*(p1020+p1022)
- p1871: 0
- p2111: 0.856281
- p2121: 0.822447
- p1109: 5.86077e6; = IF(p1071=0;p1105*p1103*p1095;0)
- p0740: 83.963; = p0080*(1+p0608*p0212/100)
- p3103: 0; = p2322*p1023
- p0044: 97.154
- p0081: 0.713
- p3037: 0; = p2256*p1023
- p0223: 35.172
- p3248: 0
- p0770: 0
- p0769: 46.973; = p0109*(1+p0637*p0241/100)
- p1937: 0
- p0829: 0; = if(p0807=480;p0814*(1-p0824);0)
- p0683: 0
- p0188: 17.907
- p0945: 0; = if(and(p0683=0;p0951=0);p0939;0)
- p2066: 0.109412
- p1059: 0.335
- p1845: 0
- p2605: 0; = p2409*p1014
- p2643: 1.46029e-6; = p2252*(p1019+p1021)
- p1590: 0
- p0655: 0; = IF(p0391<0.5;-SQRT(p0007*EXP(p0523^2*p0008)-p0007);SQRT(p0007*EXP(p0523^2*p0008)-p0007))
- p0653: 0; = IF(p0389<0.5;-SQRT(p0007*EXP(p0521^2*p0008)-p0007);SQRT(p0007*EXP(p0521^2*p0008)-p0007))
- p1773: 0
- p2481: 0; = p2285*p1014
- p2658: 1.16004e-5; = p2267*(p1078+p1080)
- p1764: 0
- p5116: 0; = p1943*p3483
- p2318: 8.79768e-5; = p2224*p2185
- p2732: 2.0874e-5; = p2341*(p1078+p1080)
- p0004: 0.0254
- p0649: 0; = IF(p0385<0.5;-SQRT(p0007*EXP(p0517^2*p0008)-p0007);SQRT(p0007*EXP(p0517^2*p0008)-p0007))
- p0373: 0.5
- p2785: 0; = p2394*(p1019+p1021)
- p1000: 0; = IF(p0996+p0999=1;0;IF(p0996+p0999+p0998>1;1-(p0996+p0999);p0998))
- p3797: 6.41498e-7; = p1860*p3477
- p2532: 0.000205307; = p2336*p1073
- p1255: 0; = if(p1232>0;0;p0737/100)
- p3428: 0; = p3371*p1239
- p2793: 0; = p2402*(p1019+p1021)
- p2045: 30
- p0087: 9.721
- p1271: 0; = IF(p1267+p1270=p1259;0;IF(p1267+p1270+p1269>p1259;p1259-(p1267+p1270);p1269))
- p2608: 0; = p2412*p1014
- p2533: 0.000185685; = p2337*p1073
- p4775: 0; = p1808*p3482
- p2093: 0.260958
- p1039: 0.0673925
- p2392: 0.000191357; = p2233*p2221
- p1743: 0
- p1617: 0
- p2970: 3.88432e-6; = p2384*(p1079+p1081)
- p1292: 0; = IF(p1287+p1290+p1291=p1261;0;p1261-(p1287+p1290+p1291))
- p0048: 11.476
- p0565: 0; = IF(p0301<0.5;-SQRT(p0007*EXP(p0433^2*p0008)-p0007);SQRT(p0007*EXP(p0433^2*p0008)-p0007))
- p2099: 0.620397
- p1623: 0
- p2332: 0.000856308; = p2224*p2200
- p1013: 0; = p1012*p0001/(p0818*p0002)
- p2022: 0.0208931; = p2018*p2015/p0818-p2021
- p0352: 0.5
- p1661: 0
- p0286: 0.5
- p0584: 0; = IF(p0320<0.5;-SQRT(p0007*EXP(p0452^2*p0008)-p0007);SQRT(p0007*EXP(p0452^2*p0008)-p0007))
- p0979: 0; = IF(p0976=0;0;p0976*p0001/(p0818*p0002))
- p1038: 0.00623446
- p2467: 0.00010795; = p2271*p1073
- p1213: 0
- p0308: 0.5
- p1215: 0; = IF(p1214=0;0;(p1214-1.5)/(p1214-1)^2)
- p3467: 0; = p3372*p1241
- p1004: 0; = p1000*p0888
- p0079: 0.728
- p2881: 0; = p2295*(p1020+p1022)
- p2544: 6.47887e-6; = p2348*p1073
- p3341: 0; = if(and(p1232=0;p3254<>0);p3254*(p3271-p3336)/p3338;0)
- p1565: 0
- p0846: 0.834462; = p0841*p0845^3+p0842*p0845^2+p0843*p0845+p0844
- p2869: 0; = p2283*(p1020+p1022)
- p3408: 0; = p3370*p1238
- p1334: 0; = p1322*p0801
- p3753: 8.98097e-7; = p1816*p3477
- p1922: 0
- p3511: 0; = p1780*p3476
- p1265: 0; = if(p1232>0;0;IF(p1259+p1263+p1264=1;0;IF(p1259+p1263+p1264+p1262>1;1-(p1259+p1263+p1264);p1262)))
- p4719: 1.35746e-5; = p1962*p3481
- p2594: 0; = p2398*p1014
- p0975: 0; = p0973*p0974/p0818
- p1610: 0
- p0536: 0; = SQRT(2)*(IF((2*p0404-1)<0;-1;IF((2*p0404-1)>0;1;0))*SQRT(SQRT((2/(pi()*0.140012289)+LN(1-(2*p0404-1)^2)/2)^2-LN(1-(2*p0404-1)^2)/0.140012289)-(2/(pi()*0.140012289)+LN(1-(2*p0404-1)^2)/2)))
- p2314: 0; = p2231*p2221
- p1948: 0
- p3366: 0; = if(p1232=0;p3244*p3360/p0818;0)
- p1669: 0.523221
- p3049: 2.13321e-6; = p2268*p1082
- p2925: 0.000204176; = p2339*(p1079+p1081)
- p3276: 0
- p4883: 0; = p1916*p3482
- p1328: 0; = p1319*p0801
- p2294: 0; = p2223*p2201
- p2715: 5.68901e-6; = p2324*(p1019+p1021)
- p0510: 0; = SQRT(2)*(IF((2*p0378-1)<0;-1;IF((2*p0378-1)>0;1;0))*SQRT(SQRT((2/(pi()*0.140012289)+LN(1-(2*p0378-1)^2)/2)^2-LN(1-(2*p0378-1)^2)/0.140012289)-(2/(pi()*0.140012289)+LN(1-(2*p0378-1)^2)/2)))
- p1861: 0
- p0944: 0; = if(and(p0683=0;p0950=0);p0938;0)
- p2935: 2.37472e-5; = p2349*(p1079+p1081)
- p0902: 0
- p2680: 0; = p2289*(p1019+p1021)
- p0844: 0.855396
- p1339: 0.000216108; = p1338*p0001/(p0818*p0002)
- p0314: 0.5
- p1087: 0; = IF(p1071=0;p1081*(p0710/100)*p0703*1000;0)
- p3373: 0; = if(p1232=0;p3245*p3361/p0818;0)
- p1236: 0; = if(p1232>0;0;p0728/100)
- p0369: 0.5
- p0825: 3.35236e9; = p0818*p0822
- p2967: 5.61036e-6; = p2381*(p1079+p1081)
- p1033: 2.14139e-5; = IF(p1012=0;p1027*p0001/(p0818*p0002);0)
- p4917: 0; = p1950*p3482
- p2103: 0.912485
- p1021: 0.11476; = IF(p1012=0;IF(p1014+p1019+p1020=1;0;IF(p1014+p1019+p1020+p1017>1;1-(p1014+p1019+p1020);p1017));0)
- p3430: 0; = p3373*p1239
- p1575: 0
- p2978: 0.000103702; = p2392*(p1129+p1131)
- p2479: 0; = p2283*p1014
- p2014: 5.33615e8; = p0833*p2011*p2013
- p0898: 0.45865
- p4059: 1.15307e-7; = p1916*p3478
- p0906: 0.00392517
- p3075: 0; = p2294*p1023
- p2764: 3.57486e-5; = p2373*(p1019+p1021)
- p4910: 0; = p1943*p3482
- p2784: 0; = p2393*(p1019+p1021)
- p0998: 0; = if(p0888=0;0;if((p0699*p0698*1000*p0700/100)/p0888>1;1;(p0699*p0698*1000*p0700/100)/p0888))
- p2485: 0; = p2289*p1014
- p1158: 0.0187114; = p1156*p1157
- p0689: 30.71; = p0029*(1+p0557*p0161/100)
- p0428: 0; = SQRT(2)*(IF((2*p0296-1)<0;-1;IF((2*p0296-1)>0;1;0))*SQRT(SQRT((2/(pi()*0.140012289)+LN(1-(2*p0296-1)^2)/2)^2-LN(1-(2*p0296-1)^2)/0.140012289)-(2/(pi()*0.140012289)+LN(1-(2*p0296-1)^2)/2)))
- p1759: 0
- p2033: 0.000227994; = p2015*p2029*p2031/(p0818*1000)
- p0843: -0.137185
- p3283: 0
- p2656: 0.000219416; = p2265*(p1078+p1080)
- p1130: 0; = if(p1121=0;IF(p1123+p1128+p1129=1;0;IF(p1123+p1128+p1129+p1126>1;1-(p1123+p1128+p1129);p1126));0)
- p1810: 0
- p2918: 0.000618375; = p2332*(p1020+p1022)
- p3427: 0; = p3370*p1239
- p1695: 0
- p2562: 7.04528e-5; = p2366*p1014
- p1600: 0
- p3381: 0; = p3362*p1234
- p2296: 0; = p2223*p2203
- p3880: 7.69797e-8; = p1943*p3477
- p0919: 0.100645; = p0678*1000/p0801
- p0645: 0; = IF(p0381<0.5;-SQRT(p0007*EXP(p0513^2*p0008)-p0007);SQRT(p0007*EXP(p0513^2*p0008)-p0007))
- p2361: 0.000326551; = p2225*p2189
- p2447: 3.31943e-7; = p2251*p1014
- p4559: 4.58209e-7; = p1798*p3481
- p1960: 118.501; = IF(p1959-p1958<0;0;p1959-p1958)
- p0950: 0; = if(and(p0683=0;or(p0807=480;p0807=32;p0807=1;and(p0807=60;p0901<0.03)));p0938;0)
- p2040: 0.44
- p2350: 0.00018816; = p2232*p2218
- p2506: 0; = p2310*p1073
- p3396: 0; = p3377*p1234
- p2032: 0.448886
- p3413: 0; = p3375*p1238
- p1573: 0
- p2669: 0; = p2278*(p1019+p1021)
- p2585: 0.000201706; = p2389*p1123
- p3183: 0; = p2402*p1023
- p2948: 0.000269922; = p2362*(p1020+p1022)
- p1211: 0.6
- p0548: 0; = IF(p0284<0.5;-SQRT(p0007*EXP(p0416^2*p0008)-p0007);SQRT(p0007*EXP(p0416^2*p0008)-p0007))
- p4720: 3.09911e-5; = p1963*p3481
- p2728: 0.000104288; = p2337*(p1078+p1080)
- p2636: 3.76259e-5; = p2245*(p1019+p1021)
- p2449: 1.19787e-6; = p2253*p1014
- p2309: 0; = p2227*p2216
- p0508: 0; = SQRT(2)*(IF((2*p0376-1)<0;-1;IF((2*p0376-1)>0;1;0))*SQRT(SQRT((2/(pi()*0.140012289)+LN(1-(2*p0376-1)^2)/2)^2-LN(1-(2*p0376-1)^2)/0.140012289)-(2/(pi()*0.140012289)+LN(1-(2*p0376-1)^2)/2)))
- p1733: 0
- p3674: 0; = p1943*p3476
- p2219: 0.00198828; = p1154-p2218
- p2287: 0; = p2223*p2193
- p1658: 0
- p2488: 0; = p2292*p1014
- p0184: 38.898
- p2846: 4.57158e-5; = p2260*(p1079+p1081)
- p0283: 0.5
- p2254: 0.00142421; = p2222*p2200
- p0756: 0
- p2883: 0; = p2297*(p1079+p1081)
- p2837: 3.17496e-6; = p2251*(p1020+p1022)
- p2231: 0; = if(p0783*p0787+p0784*p0788+p0785*p0789+p0786*p0790=0;0;p0788*p0784/(p0783*p0787+p0784*p0788+p0785*p0789+p0786*p0790))
- p1452: 25
- p2522: 9.82998e-5; = p2326*p1014
- p2753: 7.56382e-5; = p2362*(p1019+p1021)
- p0755: 0
- p1298: 0
- p3038: 0; = p2257*p1023
- p2101: 0.620397
- p2459: 6.90946e-5; = p2263*p1073
- p1815: 0
- p1785: 0
- p0185: 33.575
- p3301: 0; = if(and(p1232=0;p3252<>0);p3257*p3277*(p3297*p3290+(1-p3297)*p3294);0)
- p1594: 0.735896
- p1235: 0; = if(p1232>0;0;p0727/100)
- p1099: 0.652345
- p0877: 0; = p0876*p0001*p0003/(p0818*p0002)
- p2804: 0; = p2413*(p1019+p1021)
- p4292: 0; = p1943*p3479
- p4147: 0; = p1798*p3479
- p3529: 0; = p1798*p3476
- p2068: 0.153529
- p2334: 5.28368e-5; = p2224*p2202
- p1860: 6.59909e-6; = p1452*1000/p0818
- p2388: 0.000100714; = p2229*p2217
- p2942: 6.16692e-5; = p2356*(p1020+p1022)
- p1007: 1.74531e-5; = p1003*p0001*p0004/(p0818*p0002)
- p1956: 0
- p3032: 0; = p2251*p1023
- p2924: 2.45908e-5; = p2338*(p1079+p1081)
- p1709: 0
- p1108: 184948; = IF(p1071=0;p1105*p1102*p1095;0)
- p2078: 0.117
- p1048: 0.000645242; = IF(p1012=0;IF(p1037+p1044+p1045+p1046+p1047=1;0;IF(p1037+p1044+p1045+p1046+p1047+p1042>1;1-(p1037+p1044+p1045+p1046+p1047);p1042));0)
- p0971: 0; = p0968/p0818
- p3481: 0.43397; = if(p1328+p1330+p1332+p1334+p1336+p1338+p1340+p1342+p1344=0;0;p1338/(p1328+p1330+p1332+p1334+p1336+p1338+p1340+p1342+p1344))
- p3959: 4.03575e-6; = p1816*p3478
- p1729: 0
- p0425: 0; = SQRT(2)*(IF((2*p0293-1)<0;-1;IF((2*p0293-1)>0;1;0))*SQRT(SQRT((2/(pi()*0.140012289)+LN(1-(2*p0293-1)^2)/2)^2-LN(1-(2*p0293-1)^2)/0.140012289)-(2/(pi()*0.140012289)+LN(1-(2*p0293-1)^2)/2)))
- p0168: 23.458
- p2491: 0; = p2295*p1014
- p0378: 0.5
- p0789: 16.968; = p0129*(1+p0657*p0261/100)
- p1101: 0.0625488; = IF(p1071=0;IF(p1096=1;0;IF(p1096+p1097>1;1-p1096;p1097));0)
- p0852: 0; = p0847*p0851^3+p0848*p0851^2+p0849*p0851+p0850
- p0738: 815.543; = p0078*(1+p0606*p0210/100)
- p0905: 0.0341917; = p0904/p0818
- p2566: 2.40804e-6; = p2370*p1014
- p2242: 6.60898e-5; = p2222*p2187
- p3168: 3.22849e-7; = p2387*p1082
- p0936: 1.41523e-5; = p0930*p0001/(p0818*p0002)
- p0162: 28.628
- p0003: 10000
- p0151: 0
- p3141: 0; = p2360*p1023
- p2320: 3.97366e-5; = p2224*p2187
- p1055: 60153.8; = IF(p1012=0;p1048*p1036;0)
- p2853: 8.44701e-6; = p2267*(p1079+p1081)
- p2191: 0.000168867; = 8*1.00794*p2189/(2*14.0067)
- p2386: 0.000128848; = p2229*p2215
- p1257: 0; = if(p1232>0;0;IF(p1253+p1256=1;0;IF(p1253+p1256+p1255>1;1-(p1253+p1256);p1255)))
- p5187: 2.53326e-8; = p1808*p3484
- p2703: 0; = p2312*(p1128+p1130)
- p1974: 0; = p1969*p0001/(p0818*p0002)
- p0801: 820000
- p1652: 0
- p0268: 1.371
- p2008: 0.0497488; = ((p1982*p1985+p1988*p1991+p1994*p1997+p2002*p2005)/p0818)*p0005*p0002/1000
- p0997: 0.879805; = if(p0888=0;0;if((p0695*p0694*1000*p0696/100)/p0888>1;1;(p0695*p0694*1000*p0696/100)/p0888))
- p0715: 0
- p2808: 0; = p2417*(p1078+p1080)
- p2504: 0; = p2308*p1073
- p2835: 0.000335211; = p2249*(p1020+p1022)
- p2087: 0.856281
- p0313: 0.5
- p1247: 0; = if(p1232>0;0;p1242*p0001/(p0818*p0002))
- p3058: 0; = p2277*p1023
- p2598: 0; = p2402*p1014
- p1640: 0
- p1554: 0
- p0868: 0; = IF(p0858+p0864+p0865+p0866+p0867=1;0;IF(p0858+p0864+p0865+p0866+p0867+p0863>1;1-(p0858+p0864+p0865+p0866+p0867);p0863))
- p2670: 0; = p2279*(p1019+p1021)
- p0241: 14.362
- p2097: 0.40001
- p2283: 0; = p2223*p2189
- p2471: 0; = p2275*p1123
- p0607: 0; = IF(p0343<0.5;-SQRT(p0007*EXP(p0475^2*p0008)-p0007);SQRT(p0007*EXP(p0475^2*p0008)-p0007))
- p0772: 102.87; = p0112*(1+p0640*p0244/100)
- p2188: 0.00305341; = p1066-p2186-p2187
- p2866: 0; = p2280*(p1020+p1022)
- p0962: 0; = if(and(p0683>0;or(p0807=480;p0807=32;p0807=1;and(p0807=60;p0901<0.03)));p0938;0)
- p5329: 1.68884e-8; = p1950*p3484
- p3477: 0.09721; = if(p1328+p1330+p1332+p1334+p1336+p1338+p1340+p1342+p1344=0;0;p1330/(p1328+p1330+p1332+p1334+p1336+p1338+p1340+p1342+p1344))
- p1966: 770000; = if(p0814=0;p0802;0)
- p1070: 0.0113045; = IF(p1012=0;p1056/(p1063*p0818);0)
- p1073: 0.49288; = IF(p1071=0;p0711/100;0)
- p2874: 0; = p2288*(p1020+p1022)
- p1197: 1.806
- p3266: 0
- p1555: 0
- p0938: 0; = p0932*p0001/(p0818*p0002)
- p3456: 0; = p3380*p1240
- p1598: 0
- p2114: 0.832356
- p3036: 0; = p2255*p1023
- p2165: 0.535942; = (p0833-p2014)/p0818-p0839
- p1171: 0.000193113; = p0801*p0001/(p0818*p0002)
- p3410: 0; = p3372*p1238
- p1636: 0
- p1095: 2.0586e7; = IF(p1071=0;p0797*p0702*1000*p0798/100;0)
- p1967: 0; = if(p0807=480;p0802*p0810;0)
- p2938: 9.1831e-6; = p2352*(p1129+p1131)
- p3026: 0; = p2245*p1023
- p0862: 0; = p0674*1000/p0856
- p2436: 1.10474e-5; = p2240*p1014
- p2988: 0; = p2402*(p1020+p1022)
- p2540: 1.06249e-6; = p2344*p1073
- p2976: 0.000933811; = p2390*(p1129+p1131)
- p0282: 0.5
- p1199: -0.29
- p2774: 5.10137e-7; = p2383*(p1078+p1080)
- p2175: 0.000525934; = p0895*p0908/p0818
- p3023: 0; = p2242*p1023
- p1808: 7.91891e-7; = p1400*1000/p0818
- p0126: 32.863
- p3306: 0; = if(and(p1232=0;p3252<>0);p3252*(p3257*p3277-p3301)/p3305;0)
- p5177: 3.37768e-8; = p1798*p3484
- p3328: 0; = if(and(p1232=0;p3255<>0);p3255*(p3265*p3277-p3323)/p3327;0)
- p1216: 0
- p3342: 0; = if(and(p1232=0;p3254<>0);p3254*(p3272-p3337)/p3338;0)
- p2150: 1.21783e-5; = p2015*p2078*p2112/(p0818*1000)
- p2956: 2.30324e-5; = p2370*(p1020+p1022)
- p2326: 0.00130198; = p2224*p2193
- p1838: 0
- p2080: 0.025
- p2844: 0.000156093; = p2258*(p1079+p1081)
- p1296: 0; = p1292*p1252/p0818
- p1256: 0; = if(p1232>0;0;IF(p1253=1;0;IF(p1253+p1254>1;1-p1253;p1254)))
- p1691: 0
- p2289: 0; = p2223*p2196
- p1824: 0
- p0051: 49.288
- p0016: 60.094
- p3263: 0
- p1751: 0
- p0797: 37.978; = p0137*(1+p0665*p0269/100)
- p2787: 0; = p2396*(p1019+p1021)
- p3461: 0; = p3366*p1241
- p4677: 1.14552e-7; = p1916*p3481
- p1167: 0.5
- p2176: 0.00320104; = p0895*p0913/p0818
- p1924: 0
- p1025: 69408.3; = IF(p1012=0;p1019*(p0704/100)*p0703*1000;0)
- p1333: 0.000217532; = p1332*p0001/(p0818*p0002)
- p0778: 48.649; = p0118*(1+p0646*p0250/100)
- p1822: 0
- p2847: 0.000379575; = p2261*(p1079+p1081)
- p1693: 0
- p0262: 34.98
- p0674: 0
- p0059: 54.193
- p2655: 1.67552e-5; = p2264*(p1078+p1080)
- p3179: 0; = p2398*p1023
- p1165: 0.000193113; = p0801*p0001/(p0818*p0002)
- p2148: 5.933e-6; = p2015*p2076*p2110/(p0818*1000)
- p3121: 4.79074e-6; = p2340*p1082
- p3290: 0
- p3367: 0; = if(p1232=0;p3244*p3361/p0818;0)
- p2891: 0; = p2305*(p1079+p1081)
- p0579: 0; = IF(p0315<0.5;-SQRT(p0007*EXP(p0447^2*p0008)-p0007);SQRT(p0007*EXP(p0447^2*p0008)-p0007))
- p2687: 0; = p2296*(p1019+p1021)
- p2736: 6.23995e-6; = p2345*(p1078+p1080)
- p2549: 4.85746e-6; = p2353*p1123
- p1116: 9.1724e-5; = IF(p1071=0;p1106/(p1111*p0818);0)
- p1897: 0
- p0968: 0
- p2684: 0; = p2293*(p1019+p1021)
- p3300: 0; = if(p1293+p1294+p1295+p1296=0;0;p1293/(p1293+p1294+p1295+p1296))
- p0996: 0.0844323; = if(p0888=0;0;if((p0691*p0690*1000*p0692/100)/p0888>1;1;(p0691*p0690*1000*p0692/100)/p0888))
- p1183: 0.000193113; = p0801*p0001/(p0818*p0002)
- p2473: 0; = p2277*p1014
- p2486: 0; = p2290*p1014
- p1566: 0
- p2404: 0; = p2234*p2193
- p2128: 0.000101081; = p2015*p2056*p2090/(p0818*1000)
- p0294: 0.5
- p3027: 0; = p2246*p1023
- p3442: 0; = p3366*p1240
- p0750: 0
- p0141: 106.192
- p2094: 0.922577
- p2402: 0; = p2234*p2191
- p3190: 0; = p2409*p1023
- p2663: 0; = p2272*(p1128+p1130)
- p1803: 0
- p2365: 0.00435315; = p2225*p2193
- p1930: 0
- p2571: 0.000175513; = p2375*p1073
- p1106: 30330.1; = IF(p1071=0;p1105*p1096*p1095;0)
- p2178: 0.042205; = (p0895*p0831/(1-p0831))/(p0818)
- p2803: 0; = p2412*(p1019+p1021)
- p1844: 0
- p1859: 0
- p0104: 97.154
- p3275: 0
- p3017: 0; = p2431*(p1129+p1131)
- p2401: 0; = p2234*p2190
- p0219: 48.682
- p1975: 0.000193113; = p1970*p0001/(p0818*p0002)
- p0763: 815.543; = p0103*(1+p0631*p0235/100)
- p2235: 0; = 1-(p2226+p2227+p2228+p2229)
- p0759: 0
- p1856: 0
- p0748: 43.683; = p0088*(1+p0616*p0220/100)
- p1632: 0
- p1804: 0
- p2997: 0; = p2411*(p1020+p1022)
- p2826: 0.000105666; = p2240*(p1020+p1022)
- p0292: 0.5
- p2983: 0; = p2397*(p1020+p1022)
- p1646: 0
- p2710: 5.5871e-5; = p2319*(p1019+p1021)
- p2724: 7.42903e-5; = p2333*(p1019+p1021)
- p3337: 0; = IF(or(p3254=0;p1232>0);0;p3272*p3289)
- p1240: 0; = if(p1232>0;0;IF(p1234+p1238+p1239=1;0;IF(p1234+p1238+p1239+p1237>1;1-(p1234+p1238+p1239);p1237)))
- p3319: 0; = if(and(p1232=0;p3253<>0);p3253*(p3263-p3314)/p3316;0)
- p2711: 8.0411e-6; = p2320*(p1019+p1021)
- p3106: 0; = p2325*p1023
- p2358: 0.000923123; = p2225*p2186
- p2854: 1.49667e-5; = p2268*(p1079+p1081)
- p0757: 0
- p2035: 0.000261884; = p2015*p2029*(1-p2031)/(p0818*1000)
- p1756: 0
- p1218: 0
- p3040: 2.01217e-5; = p2259*p1082
- p0174: 0
- p1841: 0
- p2325: 0.000227511; = p2224*p2192
- p0166: 14.659
- p0768: 63.66; = p0108*(1+p0636*p0240/100)
- p2807: 0; = p2416*(p1078+p1080)
- p3108: 0; = p2327*p1023
- p2387: 1.12374e-5; = p2229*p2216
- p2631: 2.96099e-5; = p2240*(p1019+p1021)
- p2273: 0; = p2230*p2219
- p3418: 0; = p3380*p1238
- p2517: 3.83794e-5; = p2321*p1014
- p1139: 7.46001e-6; = if(p1121=0;p1133*p0001/(p0818*p0002);0)
- p2755: 0.000153931; = p2364*(p1019+p1021)
- p0815: 0
- p3406: 0; = p3368*p1238
- p1812: 6.59909e-6; = p1404*1000/p0818
- p3404: 0; = p3366*p1238
- p0812: 0; = if(p0807=480;0.095/0.34;0)
- p3119: 3.50495e-6; = p2338*p1082
- p1161: 820000; = p0801
- p0035: 13.299
- p0729: 0
- p2603: 0; = p2407*p1014
- p3543: 0; = p1812*p3476
- p0291: 0.5
- p1982: 750
- p4573: 2.86381e-6; = p1812*p3481
- p2713: 1.97641e-5; = p2322*(p1019+p1021)
- p2573: 5.14036e-5; = p2377*p1073
- p3472: 0; = p3377*p1241
- p2256: 8.78779e-5; = p2222*p2202
- p0311: 0.5
- p3157: 9.25287e-6; = p2376*p1082
- p1191: 0.5
- p3285: 0
- p3431: 0; = p3374*p1239
- p0296: 0.5
- p0220: 30.483
- p3071: 0; = p2290*p1023
- p1146: 0.917383
- p0804: 0
- p3358: 0; = if(p1232=0;p3308+p3319+p3330+p3341+p3352;0)
- p1092: 0; = IF(p1071=0;p1086*p0001/(p0818*p0002);0)
- p2010: 0.00198995; = ((p1984*p1985+p1990*p1991+p1996*p1997+p2004*p2005)/p0818)*p0005*p0002/1000
- p0474: 0; = SQRT(2)*(IF((2*p0342-1)<0;-1;IF((2*p0342-1)>0;1;0))*SQRT(SQRT((2/(pi()*0.140012289)+LN(1-(2*p0342-1)^2)/2)^2-LN(1-(2*p0342-1)^2)/0.140012289)-(2/(pi()*0.140012289)+LN(1-(2*p0342-1)^2)/2)))
- p0521: 0; = SQRT(2)*(IF((2*p0389-1)<0;-1;IF((2*p0389-1)>0;1;0))*SQRT(SQRT((2/(pi()*0.140012289)+LN(1-(2*p0389-1)^2)/2)^2-LN(1-(2*p0389-1)^2)/0.140012289)-(2/(pi()*0.140012289)+LN(1-(2*p0389-1)^2)/2)))
- p0820: 0; = if(p0807=480;p0814;0)
- p1252: 0; = if(p1232>0;0;p0724*2000*p0723*1000*p0725/100)
- p2120: 0.51828
- p1302: 0; = IF(p1297+p1300+p1301=p1262;0;p1262-(p1297+p1300+p1301))
- p0920: 0.0732854; = p0676*1000/p0801
- p2537: 3.71664e-5; = p2341*p1073
- p3051: 7.02082e-7; = p2270*p1082
- p0422: 0; = SQRT(2)*(IF((2*p0290-1)<0;-1;IF((2*p0290-1)>0;1;0))*SQRT(SQRT((2/(pi()*0.140012289)+LN(1-(2*p0290-1)^2)/2)^2-LN(1-(2*p0290-1)^2)/0.140012289)-(2/(pi()*0.140012289)+LN(1-(2*p0290-1)^2)/2)))
- p2686: 0; = p2295*(p1019+p1021)
- p2091: 0.374844
- p3344: 0; = if(and(p1232=0;p3254<>0);p3254-(p3339+p3340+p3341+p3342+p3343);0)
- p3085: 0; = p2304*p1082
- p2737: 1.10561e-5; = p2346*(p1078+p1080)
- p1582: 0
- p2461: 0.000390672; = p2265*p1073
- p2706: 0.000310948; = p2315*(p1019+p1021)
- p2058: 1.24412
- p2564: 6.67295e-7; = p2368*p1014
- p1053: 2.22251e6; = IF(p1012=0;p1046*p1036;0)
- p1557: 0
- p2236: 0; = 1-(p2230+p2231+p2232+p2233)
- p3246: 1; = IF(p3244+p3245=1;0;1-(p3244+p3245))
- p0018: 82.529
- p2295: 0; = p2223*p2202
- p1001: 0.0357627; = if(p0978>0;0;if(and(p0687=0;p0691=0;p0695=0;p0699=0);0;IF(p0996+p0999+p1000=1;0;1-(p0996+p0999+p1000))))
- p2011: 0.123719
- p2113: 0.832356
- p1180: 1.05732e-8; = p1176*p1179/p0818
- p0423: 0; = SQRT(2)*(IF((2*p0291-1)<0;-1;IF((2*p0291-1)>0;1;0))*SQRT(SQRT((2/(pi()*0.140012289)+LN(1-(2*p0291-1)^2)/2)^2-LN(1-(2*p0291-1)^2)/0.140012289)-(2/(pi()*0.140012289)+LN(1-(2*p0291-1)^2)/2)))
- p2652: 0.000521278; = p2261*(p1078+p1080)
- p2792: 0; = p2401*(p1019+p1021)
- p2958: 0.000886394; = p2372*(p1020+p1022)
- p2592: 0; = p2396*p1014
- p2264: 6.05275e-5; = p2226*p2210
- p2232: 0.13336; = if(p0783*p0787+p0784*p0788+p0785*p0789+p0786*p0790=0;0;p0789*p0785/(p0783*p0787+p0784*p0788+p0785*p0789+p0786*p0790))
- p0873: 0; = p0872*p0001*p0003/(p0818*p0002)
- p2856: 4.92581e-6; = p2270*(p1079+p1081)
- p2137: 5.7226e-6; = p2015*p2065*p2099/(p0818*1000)
- p2370: 3.18946e-5; = p2225*p2199
- p1826: 0
- p3326: 0; = if(and(p1232=0;p3255<>0);p3268*p3289;0)
- p0870: 0; = p0858*p0856
- p3460: 0; = p3365*p1241
- p2444: 0.000163492; = p2248*p1014
- p1276: 0; = p1272*p1252/p0818
- p1963d: 7.72479e-6; = p1608*p1812+p1609*p1813+p1610*p1814+p1611*p1815+p1612*p1816+p1613*p1817+p1614*p1818+p1615*p1819+p1616*p1820+p1617*p1821+p1618*p1822+p1619*p1823+p1620*p1824+p1621*p1825+p1622*p1826+p1623*p1827+p1624*p1828+p1625*p1829+p1626*p1830+p1627*p1831
- p2539: 0.000210145; = p2343*p1073
- p2456: 0.000111784; = p2260*p1073
- p4165: 0; = p1816*p3479
- p1697: 0
- p2083: 2.17294
- p2770: 3.94612e-5; = p2379*(p1078+p1080)
- p2001: 400
- p1281: 0; = IF(p1277+p1280=p1263;0;IF(p1277+p1280+p1279>p1263;p1263-(p1277+p1280);p1279))
- p2709: 1.7803e-5; = p2318*(p1019+p1021)
- p2681: 0; = p2290*(p1019+p1021)
- p1708: 0
- p1273: 0; = p1267*p1252/p0818
- p2946: 0.00122736; = p2360*(p1020+p1022)
- p2405: 0; = p2234*p2195
- p1043: 0.209016
- p3165: 5.53637e-7; = p2384*p1082
- p2820: 0; = p2429*(p1128+p1130)
- p1110: 2.34616e6; = IF(p1071=0;p1105*p1104*p1095;0)
- p1615: 0
- p0697: 35.252; = p0037*(1+p0565*p0169/100)
- p2985: 0; = p2399*(p1020+p1022)
- p2475: 0; = p2279*p1014
- p2019: 0.13105
- p0376: 0.5
- p0418: 0; = SQRT(2)*(IF((2*p0286-1)<0;-1;IF((2*p0286-1)>0;1;0))*SQRT(SQRT((2/(pi()*0.140012289)+LN(1-(2*p0286-1)^2)/2)^2-LN(1-(2*p0286-1)^2)/0.140012289)-(2/(pi()*0.140012289)+LN(1-(2*p0286-1)^2)/2)))
- p2260: 0.000226799; = p2226*p2206
- p1570: 0
- p4309: 0; = p1754*p3480
- p1953: 0
- p3115: 0; = p2334*p1023
- p2462: 1.97523e-6; = p2266*p1073
- p3181: 0; = p2400*p1023
- p2568: 9.26728e-5; = p2372*p1014
- p1620: 0
- p2960: 0.00146251; = p2374*(p1020+p1022)
- p0832: 6.95172e8; = p0831*p0830/(1-p0831)
- p0535: 0; = SQRT(2)*(IF((2*p0403-1)<0;-1;IF((2*p0403-1)>0;1;0))*SQRT(SQRT((2/(pi()*0.140012289)+LN(1-(2*p0403-1)^2)/2)^2-LN(1-(2*p0403-1)^2)/0.140012289)-(2/(pi()*0.140012289)+LN(1-(2*p0403-1)^2)/2)))
- p0213: 10.976
- p5123: 0; = p1950*p3483
- p3080: 0; = p2299*p1082
- p1031: 1.63459e-5; = IF(p1012=0;p1025*p0001/(p0818*p0002);0)
- p2102: 0.922577
- p2994: 0; = p2408*(p1020+p1022)
- p2346: 3.99397e-5; = p2228*p2214
- p2576: 3.17729e-5; = p2380*p1073
- p1309: 0
- p0891: 0; = IF(p3251=0;0;62.4*6272640/(12*12*12))
- p0943: 0; = if(and(p0683=0;p0949=0);p0937;0)
- p1568: 0
- p2509: 0; = p2313*p1123
- p1795: 0
- p1766: 0
- p0120: 35.841
- p0240: 13.24
- p3433: 0; = p3376*p1239
- p2327: 0.000279096; = p2224*p2195
- p2009: 0.00891084; = ((p1983*p1985+p1989*p1991+p1995*p1997+p2003*p2005+p1976*p1977+p1978*p1979+p1998*p1999)/p0818)*p0005*p0002/1000
- p1902: 0
- p1816: 9.23873e-6; = p1408*1000/p0818
- p4367: 0; = p1812*p3480
- p0577: 0; = IF(p0313<0.5;-SQRT(p0007*EXP(p0445^2*p0008)-p0007);SQRT(p0007*EXP(p0445^2*p0008)-p0007))
- p0648: 0; = IF(p0384<0.5;-SQRT(p0007*EXP(p0516^2*p0008)-p0007);SQRT(p0007*EXP(p0516^2*p0008)-p0007))
- p0916: 0.340805; = p0826+(p0832*(1+p0894))/p0818
- p2328: 0.00275887; = p2224*p2196
- p2064: 0.676706
- p1742: 0
- p0088: 43.683
- p3001: 0; = p2415*(p1079+p1081)
- p0924: 0.0732854; = IF(p0918+p0923=1;0;IF(p0918+p0923+p0920>1;1-(p0918+p0923);p0920))
- p1942: 0
- p0861: 0; = p0673*1000/p0856
- p2910: 2.03018e-5; = p2324*(p1020+p1022)
- p1085: 109261; = IF(p1071=0;p1079*(p0710/100)*p0703*1000;0)
- p1805: 0
- p0858: 0; = p0670*1000/p0856
- p2349: 0.000117811; = p2228*p2217
- p0329: 0.5
- p3380: 0; = p3251/p0818
- p2858: 0; = p2272*(p1129+p1131)
- p0026: 388.958
- p3388: 0; = p3369*p1234
- p3390: 0; = p3371*p1234
- p1264: 0; = if(p1232>0;0;IF(p1259+p1263=1;0;IF(p1259+p1263+p1261>1;1-(p1259+p1263);p1261)))
- p1082: 0.02873; = IF(p1071=0;IF(p1073+p1078+p1079+p1080+p1081=1;0;1-(p1073+p1078+p1079+p1080+p1081));0)
- p3068: 0; = p2287*p1023
- p1798: 1.05585e-6; = p1390*1000/p0818
- p2849: 2.82572e-5; = p2263*(p1079+p1081)
- p0977: 0; = IF(p0687=0;IF(OR(p0686=0;p0688=0);0;p0686*1000*p0688/100);0)
- p0991: 0; = p0987*p0886
- p1947: 0
- p1710: 0
- p2634: 0.000171088; = p2243*(p1019+p1021)
- p0941: 0; = if(and(p0683=0;p0947=0);p0935;0)
- p2315: 0.00153661; = p2224*p2182
- p2071: 0.151
- p2602: 0; = p2406*p1014
- p3282: 0
- p2288: 0; = p2223*p2195
- p3029: 0; = p2248*p1023
- p1978: 454
- p1288: 0
- p1848: 0
- p0711: 49.288; = p0051*(1+p0579*p0183/100)
- p2511: 0.000116014; = p2315*p1014
- p2125: 0.000151601; = p2015*p2053*p2087/(p0818*1000)
- p2650: 0.000193877; = p2259*(p1078+p1080)
- p2263: 0.000140185; = p2226*p2209
- p2593: 0; = p2397*p1014
- p3941: 4.61229e-7; = p1798*p3478
- p2246: 4.6758e-5; = p2222*p2191
- p1717: 0
- p2458: 0.000152793; = p2262*p1073
- p0453: 0; = SQRT(2)*(IF((2*p0321-1)<0;-1;IF((2*p0321-1)>0;1;0))*SQRT(SQRT((2/(pi()*0.140012289)+LN(1-(2*p0321-1)^2)/2)^2-LN(1-(2*p0321-1)^2)/0.140012289)-(2/(pi()*0.140012289)+LN(1-(2*p0321-1)^2)/2)))
- p3314: 0; = if(and(p1232=0;p3253<>0);p3263*p3289;0)
- p2502: 0; = p2306*p1073
- p0270: 7.802
- p2971: 6.88235e-6; = p2385*(p1079+p1081)
- p1041: 0.317801
- p1020: 0.21927; = IF(p1012=0;IF(p1014+p1019=1;0;IF(p1014+p1019+p1016>1;1-(p1014+p1019);p1016));0)
- p2822: 0; = p2431*(p1128+p1130)
- p3338: 0; = if(and(p1232=0;p3254<>0);1-(p3334+p3335+p3336+p3337);0)
- p0892: 0; = if(p0891=0;0;(1-p1240)*p3251/p0891)
- p0914: 7.19096e7; = p0825*p0911+(p0830+p0895)*p0824*p0913
- p3025: 0; = p2244*p1023
- p0512: 0; = SQRT(2)*(IF((2*p0380-1)<0;-1;IF((2*p0380-1)>0;1;0))*SQRT(SQRT((2/(pi()*0.140012289)+LN(1-(2*p0380-1)^2)/2)^2-LN(1-(2*p0380-1)^2)/0.140012289)-(2/(pi()*0.140012289)+LN(1-(2*p0380-1)^2)/2)))
- p2305: 0; = p2227*p2212
- p2292: 0; = p2223*p2199
- p2086: 0.0617647
- p0315: 0.5
- p2778: 3.11072e-6; = p2387*(p1078+p1080)
- p3449: 0; = p3373*p1240
- p5089: 0; = p1916*p3483
- p2432: 0.0187114; = p1158
- p2330: 4.33882e-6; = p2224*p2198
- p0047: 21.927
- p3207: 0; = p2426*p1082
- p1332: 923691; = p1321*p0801
- p0893: 0; = 1000*(p0890+p0892)*p0001*p0003*p0004/(p0818*p0002)
- p3146: 0; = p2365*p1023
- p3377: 0; = if(p1232=0;p3246*p3359/p0818;0)
- p0927: 0.00543537; = IF(p0918+p0923+p0924+p0925+p0926=1;0;1-(p0918+p0923+p0924+p0925+p0926))
- p3407: 0; = p3369*p1238
- p3270: 0
- p0122: 23.546
- p2269: 0.000280197; = p2226*p2215
- p2618: 0; = p2422*p1073
- p2530: 3.98918e-6; = p2334*p1014
- p0557: 0; = IF(p0293<0.5;-SQRT(p0007*EXP(p0425^2*p0008)-p0007);SQRT(p0007*EXP(p0425^2*p0008)-p0007))
- p0849: 0
- p0863: 0; = p0675*1000/p0856
- p0773: 66.465; = p0113*(1+p0641*p0245/100)
- p2007: 0.0265327; = ((p1981*p1985+p1987*p1991+p1993*p1997+p2001*p2005)/p0818)*p0005*p0002/1000
- p3203: 0; = p2422*p1082
- p2926: 3.36119e-5; = p2340*(p1079+p1081)
- p2426: 0; = p2235*p2216
- p3297: 0; = if(p1273+p1274+p1275+p1276=0;0;p1273/(p1273+p1274+p1275+p1276))
- p3690: 0; = p1963*p3476
- p0646: 0; = IF(p0382<0.5;-SQRT(p0007*EXP(p0514^2*p0008)-p0007);SQRT(p0007*EXP(p0514^2*p0008)-p0007))
- p2280: 0; = p2223*p2186
- p0974: 0
- p1801: 0
- p4634: 1.60373e-5; = p1873*p3481
- p0443: 0; = SQRT(2)*(IF((2*p0311-1)<0;-1;IF((2*p0311-1)>0;1;0))*SQRT(SQRT((2/(pi()*0.140012289)+LN(1-(2*p0311-1)^2)/2)^2-LN(1-(2*p0311-1)^2)/0.140012289)-(2/(pi()*0.140012289)+LN(1-(2*p0311-1)^2)/2)))
- p1724: 0
- p2993: 0; = p2407*(p1020+p1022)
- p0140: 23.546
- p2271: 0.000219018; = p2226*p2217
- p4209: 0; = p1860*p3479
- p2861: 0; = p2275*(p1129+p1131)
- p1335: 0; = p1334*p0001/(p0818*p0002)
- p2415: 0; = p2235*p2205
- p2842: 6.34602e-5; = p2256*(p1020+p1022)
- p2469: 0; = p2273*p1123
- p3441: 0; = p3365*p1240
- p2038: 0.304457
- p2628: 0.000517168; = p2237*(p1019+p1021)
- p1179: 0.5
- p2241: 0.000459204; = p2222*p2186
- p1198: 0.44
- p2855: 5.64794e-5; = p2269*(p1079+p1081)
- p2089: 0.40001
- p1668: 0
- p2726: 0.000122576; = p2335*(p1019+p1021)
- p1190: 5.44199e-8; = p1188/p0818
- p1120: 0.00260376; = IF(p1071=0;p1110/(p1115*p0818);0)
- p1898: 0
- p0585: 0; = IF(p0321<0.5;-SQRT(p0007*EXP(p0453^2*p0008)-p0007);SQRT(p0007*EXP(p0453^2*p0008)-p0007))
- p3082: 0; = p2301*p1082
- p2079: 0.02
- p2765: 0.000409829; = p2374*(p1019+p1021)
- p0517: 0; = SQRT(2)*(IF((2*p0385-1)<0;-1;IF((2*p0385-1)>0;1;0))*SQRT(SQRT((2/(pi()*0.140012289)+LN(1-(2*p0385-1)^2)/2)^2-LN(1-(2*p0385-1)^2)/0.140012289)-(2/(pi()*0.140012289)+LN(1-(2*p0385-1)^2)/2)))
- p2531: 4.57328e-5; = p2335*p1014
- p2547: 4.37403e-5; = p2351*p1123
- p2303: 0; = p2227*p2210
- p3182: 0; = p2401*p1023
- p4514: 0; = p1963*p3480
- p1204: 0.980791
- p1968: 0; = if(p0807=480;p0802*p0811;0)
- p0667: 0; = IF(p0403<0.5;-SQRT(p0007*EXP(p0535^2*p0008)-p0007);SQRT(p0007*EXP(p0535^2*p0008)-p0007))
- p2195: 0.00167644; = p2194*p2193
- p3249: 0
- p2913: 0.000201546; = p2327*(p1020+p1022)
- p1896: 0
- p0386: 0.5
- p1931: 0
- p1268: 0
- p1881: 0
- p1142: 0; = if(p1121=0;p1136*p0001/(p0818*p0002);0)
- p1618: 0
- p0197: 56.281
- p2712: 0.000102867; = p2321*(p1019+p1021)
- p0483: 0; = SQRT(2)*(IF((2*p0351-1)<0;-1;IF((2*p0351-1)>0;1;0))*SQRT(SQRT((2/(pi()*0.140012289)+LN(1-(2*p0351-1)^2)/2)^2-LN(1-(2*p0351-1)^2)/0.140012289)-(2/(pi()*0.140012289)+LN(1-(2*p0351-1)^2)/2)))
- p0169: 43.084
- p2827: 0.000331609; = p2241*(p1020+p1022)
- p2448: 5.44832e-7; = p2252*p1014
- p1926: 0
- p3148: 0; = p2367*p1023
- p0615: 0; = IF(p0351<0.5;-SQRT(p0007*EXP(p0483^2*p0008)-p0007);SQRT(p0007*EXP(p0483^2*p0008)-p0007))
- p0837: 0.5
- p1143: 0; = if(p1121=0;p1137*p0001/(p0818*p0002);0)
- p0639: 0; = IF(p0375<0.5;-SQRT(p0007*EXP(p0507^2*p0008)-p0007);SQRT(p0007*EXP(p0507^2*p0008)-p0007))
- p1776: 0
- p3219: 0.00748911; = p3215*p1228
- p2558: 2.82204e-5; = p2362*p1014
- p2220: 0.000127063; = p1151/p0818
- p1231: 0.00843905; = IF(p1221=0;0;p1230*(p1228+p1229))
- p2928: 6.56274e-6; = p2342*(p1079+p1081)
- p2122: 0.341195
- p0636: 0; = IF(p0372<0.5;-SQRT(p0007*EXP(p0504^2*p0008)-p0007);SQRT(p0007*EXP(p0504^2*p0008)-p0007))
- p5295: 8.4442e-9; = p1916*p3484
- p0855: 1.61145; = p0854*p0001*p0003/(p0818*p0002)
- p0534: 0; = SQRT(2)*(IF((2*p0402-1)<0;-1;IF((2*p0402-1)>0;1;0))*SQRT(SQRT((2/(pi()*0.140012289)+LN(1-(2*p0402-1)^2)/2)^2-LN(1-(2*p0402-1)^2)/0.140012289)-(2/(pi()*0.140012289)+LN(1-(2*p0402-1)^2)/2)))
- p2923: 7.59383e-5; = p2337*(p1079+p1081)
- p0980: 0; = IF(p0977=0;0;p0977*p0001/(p0818*p0002))
- p2582: 6.35064e-5; = p2386*p1073
- p3086: 0; = p2305*p1082
- p0613: 0; = IF(p0349<0.5;-SQRT(p0007*EXP(p0481^2*p0008)-p0007);SQRT(p0007*EXP(p0481^2*p0008)-p0007))
- p0523: 0; = SQRT(2)*(IF((2*p0391-1)<0;-1;IF((2*p0391-1)>0;1;0))*SQRT(SQRT((2/(pi()*0.140012289)+LN(1-(2*p0391-1)^2)/2)^2-LN(1-(2*p0391-1)^2)/0.140012289)-(2/(pi()*0.140012289)+LN(1-(2*p0391-1)^2)/2)))
- p1564: 0
- p2171: 0.0734241; = p2165*p0831
- p2144: 1.39478e-5; = p2015*p2072*p2106/(p0818*1000)
- p2848: 6.24866e-5; = p2262*(p1079+p1081)
- p0931: 111683; = p0801*p0925
- p1963c: 1.51268e-6; = p1588*p1792+p1589*p1793+p1590*p1794+p1591*p1795+p1592*p1796+p1593*p1797+p1594*p1798+p1595*p1799+p1596*p1800+p1597*p1801+p1598*p1802+p1599*p1803+p1600*p1804+p1601*p1805+p1602*p1806+p1603*p1807+p1604*p1808+p1605*p1809+p1606*p1810+p1607*p1811
- p0988: 0; = p0982*p0886
- p0887: 87.9214; = 1000*p0886*p0001*p0003*p0004/(p0818*p0002)
- p2552: 6.44754e-6; = p2356*p1014
- p1665: 0
- p2368: 8.83835e-6; = p2225*p2197
- p3923: 7.9562e-6; = p1780*p3478
- p3292: 0
- p2227: 0; = if(p0774*p0778+p0775*p0779+p0776*p0780+p0777*p0781=0;0;p0779*p0775/(p0774*p0778+p0775*p0779+p0776*p0780+p0777*p0781))
- p2903: 1.84447e-5; = p2317*(p1020+p1022)
- p3134: 8.631e-6; = p2353*p1132
- p3463: 0; = p3368*p1241
- p2380: 6.44637e-5; = p2229*p2209
- p1125: 0.54193; = if(p1121=0;p0719/100;0)
- p1214: 0; = IF(p1213=0;0;p1213-1)
- p1061: 0.3
- p1929: 0
- p3485: 0; = p1754*p3476
- p1760: 0
- p1879: 0
- p3260: 0
- p3242: 1.84226e-8; = p3234*p1188*p3238/p0818
- p0796: 97.154; = p0136*(1+p0664*p0268/100)
- p2800: 0; = p2409*(p1019+p1021)
- p2297: 0; = p2227*p2204
- p1336: 0; = p1323*p0801
- p2906: 2.86954e-5; = p2320*(p1020+p1022)
- p0999: 0.879805; = IF(p0996=1;0;IF(p0996+p0997>1;1-p0996;p0997))
- p1723: 0
- p1260: 0; = if(p1232>0;0;p0731/100)
- p1863: 0
- p0028: 69.29
- p1174: 5.50066e-8; = p1170*p1173/p0818
- p1596: 0
- p2693: 0; = p2302*(p1078+p1080)
- p3376: 0; = if(p1232=0;p3246*p3358/p0818;0)
- p3214: 0.376406; = p1222*40.078/100.0869
- p1996: 30
- p0658: 0; = IF(p0394<0.5;-SQRT(p0007*EXP(p0526^2*p0008)-p0007);SQRT(p0007*EXP(p0526^2*p0008)-p0007))
- p3217: 0.00187402; = p3213*p1228
- p1837: 0
- p2834: 0.00156376; = p2248*(p1020+p1022)
- p0867: 0; = IF(p0858+p0864+p0865+p0866=1;0;IF(p0858+p0864+p0865+p0866+p0862>1;1-(p0858+p0864+p0865+p0866);p0862))
- p4779: 0; = p1812*p3482
- p0966: 0; = if(p0683=0;0;IF(p0684/100+p0965=1;0;1-(p0684/100+p0965)))
- p3399: 0; = p3380*p1234
- p0710: 66.465; = p0050*(1+p0578*p0182/100)
- p0403: 0.5
- p2559: 7.09671e-6; = p2363*p1014
- p0694: 338.841; = p0034*(1+p0562*p0166/100)
- p1563: 0
- p2140: 1.72178e-5; = p2015*p2068*p2102/(p0818*1000)
- p2135: 9.79624e-5; = p2015*p2063*p2097/(p0818*1000)
- p0312: 0.5
- p0764: 97.154; = p0104*(1+p0632*p0236/100)
- p3021: 0; = p2240*p1023
- p1913: 0
- p1654: 0
- p4222: 0; = p1873*p3479
- p3185: 0; = p2404*p1023
- p2612: 0; = p2416*p1073
- p0177: 51.405
- p1918: 0
- p3200: 0; = p2419*p1082
- p1173: 0.5
- p3313: 0; = if(and(p1232=0;p3253<>0);p3262*(p3278*(p3282*p1256+p3286*(p1253+p1257)+p1258*p3288+p3298*p3287));0)
- p3423: 0; = p3366*p1239
- p0644: 0; = IF(p0380<0.5;-SQRT(p0007*EXP(p0512^2*p0008)-p0007);SQRT(p0007*EXP(p0512^2*p0008)-p0007))
- p2074: 0.025
- p0029: 30.71
- p1560: 0
- p2962: 6.49183e-5; = p2376*(p1079+p1081)
- p2723: 0.000173283; = p2332*(p1019+p1021)
- p0766: 0
- p0788: 0
- p1900: 0
- p3278: 0
- p0706: 8.76; = p0046*(1+p0574*p0178/100)
- p0476: 0; = SQRT(2)*(IF((2*p0344-1)<0;-1;IF((2*p0344-1)>0;1;0))*SQRT(SQRT((2/(pi()*0.140012289)+LN(1-(2*p0344-1)^2)/2)^2-LN(1-(2*p0344-1)^2)/0.140012289)-(2/(pi()*0.140012289)+LN(1-(2*p0344-1)^2)/2)))
- p0031: 5.587
- p2725: 1.0692e-5; = p2334*(p1019+p1021)
- p2980: 0; = p2394*(p1020+p1022)
- p1338: 917643; = p1324*p0801
- p2600: 0; = p2404*p1014
- p2716: 4.60392e-5; = p2325*(p1019+p1021)
- p2262: 0.00031; = p2226*p2208
- p1105: 0.436421
- p2788: 0; = p2397*(p1019+p1021)
- p2238: 0.000561004; = p2222*p2183
- p2209: 0.000280056; = 14.0067*p2208/30.973762
- p2116: 0.444424
- p0065: 0.493
- p3000: 0; = p2414*(p1079+p1081)
- p0853: 0; = p0803/(p0802+p0803)
- p1234: 0; = if(p1232>0;0;p0726/100)
- p2115: 0.856281
- p0965: 0; = IF(p0684/100=1;0;IF(p0684/100+p0685/100>1;1-p0684/100;p0685/100))
- p1205: 0
- p2395: 0; = p2234*p2184
- p2159: 0.000217239; = p2015*p2083*p2121/(p0818*1000)
- p1988: 750
- p0929: 82529; = p0801*p0923
- p2673: 0; = p2282*(p1019+p1021)
- p2653: 8.58141e-5; = p2262*(p1078+p1080)
- p1885: 0
- p1390: 4
- p2213: 8.3718e-5; = p1116-p2212
- p0686: 388.958; = p0026*(1+p0554*p0158/100)
- p2492: 0; = p2296*p1014
- p2831: 0.000134271; = p2245*(p1020+p1022)
- p2018: 0.1978
- p0246: 14.68
- p1970: 820000; = p0801
- p1872: 0
- p2107: 0.881623
- p3387: 0; = p3368*p1234
- p0995: 0; = p0991*p0001*p0004/(p0818*p0002)
- p0367: 0.5
- p1077: 0; = IF(p1071=0;p0715/100;0)
- p3229: 1.86504e-6; = p1164/p0818
- p3208: 0; = p2427*p1082
- p1136: 0; = if(p1121=0;p1130*(p0716/100)*p0703*1000;0)
- p0635: 0; = IF(p0371<0.5;-SQRT(p0007*EXP(p0503^2*p0008)-p0007);SQRT(p0007*EXP(p0503^2*p0008)-p0007))
- p2206: 0.000453087; = 9*1.00794*p2204/30.973762
- p3749: 6.41498e-7; = p1812*p3477
- p3232: 3.02618e-8; = p1182/p0818
- p3053: 0; = p2272*p1132
- p1114: 0.216028
- p3064: 0; = p2283*p1023
- p2843: 0.000727521; = p2257*(p1020+p1022)
- p2389: 0.00122276; = p2233*p2218
- p1313: 0; = p1307*p1252/p0818
- p2249: 0.000464191; = p2222*p2195
- p0189: 43.506
- p2572: 0.000158738; = p2376*p1073
- p2998: 0; = p2412*(p1020+p1022)
- p0446: 0; = SQRT(2)*(IF((2*p0314-1)<0;-1;IF((2*p0314-1)>0;1;0))*SQRT(SQRT((2/(pi()*0.140012289)+LN(1-(2*p0314-1)^2)/2)^2-LN(1-(2*p0314-1)^2)/0.140012289)-(2/(pi()*0.140012289)+LN(1-(2*p0314-1)^2)/2)))
- p3422: 0; = p3365*p1239
- p3435: 0; = p3378*p1239
- p2875: 0; = p2289*(p1020+p1022)
- p1713: 0
- p1792: 0
- p1677: 0
- p5046: 0; = p1873*p3483
- p2200: 0.00514356; = p1056/p0818
- p1730: 0
- p1323: 0; = IF(((p0745*1000*p0750/100)+(p0754*1000*p0759/100))/p0801<0;0;((p0745*1000*p0750/100)+(p0754*1000*p0759/100))/p0801)
- p2212: 8.00605e-6; = p1106/p0818
- p1687: 0
- p3476: 0; = if(p1328+p1330+p1332+p1334+p1336+p1338+p1340+p1342+p1344=0;0;p1328/(p1328+p1330+p1332+p1334+p1336+p1338+p1340+p1342+p1344))
- p2123: 0.263965
- p1638: 0
- p2621: 0; = p2425*p1073
- p2637: 9.46195e-6; = p2246*(p1019+p1021)
- p0876: 0; = p0866*p0856
- p1558: 0
- p2416: 0; = p2235*p2206
- p0253: 29.491
- p1122: 0; = p1121*p0001/(p0818*p0002)
- p2322: 9.76682e-5; = p2224*p2189
- p1747: 0
- p2391: 0.000110118; = p2233*p2220
- p0176: 1.371
- p2949: 6.78784e-5; = p2363*(p1020+p1022)
- p0150: 0
- p2390: 0.00172312; = p2233*p2219
- p1011: 0; = p1010*p0001*p0004/(p0818*p0002)
- p2002: 750
- p1895: 0
- p0731: 0
- p0779: 0
- p3150: 0; = p2369*p1023
- p2465: 0.000138104; = p2269*p1073
- p2965: 2.87342e-5; = p2379*(p1079+p1081)
- p0749: 0
- p1278: 0
- p0866: 0; = IF(p0858+p0864+p0865=1;0;IF(p0858+p0864+p0865+p0861>1;1-(p0858+p0864+p0865);p0861))
- p1245: 0; = if(p1232>0;0;p1240*(p0725/100)*p0723*1000)
- p3136: 0; = p2355*p1023
- p2527: 7.20221e-7; = p2331*p1014
- p2810: 0; = p2419*(p1078+p1080)
- p3171: 0.000505064; = p2390*p1132
- p0109: 46.973
- p3371: 0; = if(p1232=0;p3245*p3359/p0818;0)
- p1562: 0
- p2790: 0; = p2399*(p1019+p1021)
- p2151: 2.02359e-6; = p2015*p2079*p2113/(p0818*1000)
- p2050: 0.952062
- p2208: 0.000619302; = p1110/p0818
- p0879: 0; = p0878*p0001*p0003/(p0818*p0002)
- p1182: 114.644; = p1181*p0801
- p1508: 1
- p3074: 0; = p2293*p1023
- p0735: 0
- p1884: 0
- p3044: 4.02753e-6; = p2263*p1082
- p2899: 0; = p2313*(p1129+p1131)
- p2104: 0.817136
- p0882: 820000; = p0869*p0856
- p1008: 0; = p1004*p0001*p0004/(p0818*p0002)
- p3176: 0; = p2395*p1023
- p1230: 0.5
- p3189: 0; = p2408*p1023
- p2399: 0; = p2234*p2188
- p1829: 0
- p3294: 0
- p0933: 4457; = p0801*p0927
- p2507: 0; = p2311*p1123
- p2026: 55.14
- p2356: 8.53979e-5; = p2225*p2184
- p1134: 0; = if(p1121=0;p1128*(p0716/100)*p0703*1000;0)
- p0964: 0; = 56/90000
- p2952: 0.000673864; = p2366*(p1020+p1022)
- p2931: 4.5437e-6; = p2345*(p1079+p1081)
- p1684: 0
- p3473: 0; = p3378*p1241
- p3060: 0; = p2279*p1023
- p0533: 0; = SQRT(2)*(IF((2*p0401-1)<0;-1;IF((2*p0401-1)>0;1;0))*SQRT(SQRT((2/(pi()*0.140012289)+LN(1-(2*p0401-1)^2)/2)^2-LN(1-(2*p0401-1)^2)/0.140012289)-(2/(pi()*0.140012289)+LN(1-(2*p0401-1)^2)/2)))
- p2418: 0; = p2235*p2208
- p1830: 0
- p1321: 1.12645; = IF(((p0745*1000*p0748/100)+(p0754*1000*p0757/100))/p0801<0;0;((p0745*1000*p0748/100)+(p0754*1000*p0757/100))/p0801)
- p0953: 0; = if(and(p0683>0;or(p0807=56;p0807=100;and(p0807=60;p0901>0.06)));p0935;0)
- p3458: 0; = p3363*p1241
- p0514: 0; = SQRT(2)*(IF((2*p0382-1)<0;-1;IF((2*p0382-1)>0;1;0))*SQRT(SQRT((2/(pi()*0.140012289)+LN(1-(2*p0382-1)^2)/2)^2-LN(1-(2*p0382-1)^2)/0.140012289)-(2/(pi()*0.140012289)+LN(1-(2*p0382-1)^2)/2)))
- p2377: 0.000104292; = p2229*p2206
- p2250: 0.00458854; = p2222*p2196
- p3471: 0; = p3376*p1241
- p2396: 0; = p2234*p2185
- p0505: 0; = SQRT(2)*(IF((2*p0373-1)<0;-1;IF((2*p0373-1)>0;1;0))*SQRT(SQRT((2/(pi()*0.140012289)+LN(1-(2*p0373-1)^2)/2)^2-LN(1-(2*p0373-1)^2)/0.140012289)-(2/(pi()*0.140012289)+LN(1-(2*p0373-1)^2)/2)))
- p2951: 0.00314359; = p2365*(p1020+p1022)
- p1550: 0.783979
- p0774: 39.041; = p0114*(1+p0642*p0246/100)
- p2877: 0; = p2291*(p1020+p1022)
- p0713: 20.157; = p0053*(1+p0581*p0185/100)
- p3382: 0; = p3363*p1234
- p0516: 0; = SQRT(2)*(IF((2*p0384-1)<0;-1;IF((2*p0384-1)>0;1;0))*SQRT(SQRT((2/(pi()*0.140012289)+LN(1-(2*p0384-1)^2)/2)^2-LN(1-(2*p0384-1)^2)/0.140012289)-(2/(pi()*0.140012289)+LN(1-(2*p0384-1)^2)/2)))
- p2865: 0; = p2279*(p1020+p1022)
- p1674: 0
- p3089: 0; = p2308*p1082
- p0992: 0; = p0988*p0001*p0004/(p0818*p0002)
- p2607: 0; = p2411*p1014
- p0154: 0
- p0178: 71.723
- p1836: 0
- p2955: 1.04759e-5; = p2369*(p1020+p1022)
- p0910: 0.00590066; = p0909/p0818
- p1131: 0; = if(p1121=0;IF(p1123+p1128+p1129+p1130=1;0;IF(p1123+p1128+p1129+p1130+p1127>1;1-(p1123+p1128+p1129+p1130);p1127));0)
- p0672: 0
- p3312: 0; = if(and(p1232=0;p3253<>0);p3261*p3277*(p3298*p3290+(1-p3298)*p3294);0)
- p0564: 0; = IF(p0300<0.5;-SQRT(p0007*EXP(p0432^2*p0008)-p0007);SQRT(p0007*EXP(p0432^2*p0008)-p0007))
- p3349: 0; = if(and(p1232=0;p3256<>0);1-(p3345+p3346+p3347+p3348);0)
- p0959: 0; = if(and(p0683>0;or(p0807=480;p0807=32;p0807=1;and(p0807=60;p0901<0.03)));p0935;0)
- p0609: 0; = IF(p0345<0.5;-SQRT(p0007*EXP(p0477^2*p0008)-p0007);SQRT(p0007*EXP(p0477^2*p0008)-p0007))
- p1121: 0
- p1874: 0
- p2118: 0.679049
- p1639: 0
- p1642: 0
- p0838: 2.51027e9; = (p0833-p0836)*p0837
- p0883: 1.93113; = p0882*p0001*p0003/(p0818*p0002)
- p1608: 0.470583
- p2429: 0; = p2236*p2219
- p2625: 0; = p2429*p1123
- p2431: 0; = p2236*p2221
- p2551: 8.51466e-5; = p2355*p1014
- p1714: 0
- p0560: 0; = IF(p0296<0.5;-SQRT(p0007*EXP(p0428^2*p0008)-p0007);SQRT(p0007*EXP(p0428^2*p0008)-p0007))
- p3340: 0; = if(and(p1232=0;p3254<>0);p3254*(p3270-p3335)/p3338;0)
- p2054: 0.91
- p1971: 0.000181338; = p1966*p0001/(p0818*p0002)
- p2769: 0.000239707; = p2378*(p1078+p1080)
- p2073: 0.377647
- p3457: 0; = p3362*p1241
- p2373: 0.000176658; = p2225*p2202
- p2096: 0.486404
- p1258: 0; = if(p1232>0;0;IF(p1253+p1256+p1257=1;0;1-(p1253+p1256+p1257)))
- p1768: 0
- p0677: 0
- p0978: 0
- p3123: 9.35395e-7; = p2342*p1082
- p3466: 0; = p3371*p1241
- p0257: 31.635
- p1206: 0.023475
- p2344: 2.15567e-6; = p2228*p2212
- p1657: 0
- p2575: 7.0261e-5; = p2379*p1073
- p3196: 0; = p2415*p1082
- p2407: 0; = p2234*p2197
- p3469: 0; = p3374*p1241
- p3284: 0
- p1559: 0
- p2660: 7.75643e-5; = p2269*(p1078+p1080)
- p2277: 0; = p2223*p2183
- p0426: 0; = SQRT(2)*(IF((2*p0294-1)<0;-1;IF((2*p0294-1)>0;1;0))*SQRT(SQRT((2/(pi()*0.140012289)+LN(1-(2*p0294-1)^2)/2)^2-LN(1-(2*p0294-1)^2)/0.140012289)-(2/(pi()*0.140012289)+LN(1-(2*p0294-1)^2)/2)))
- p1780: 1.82135e-5; = p1372*1000/p0818
- p1239: 0; = if(p1232>0;0;IF(p1234+p1238=1;0;IF(p1234+p1238+p1236>1;1-(p1234+p1238);p1236)))
- p2828: 4.77261e-5; = p2242*(p1020+p1022)
- p2984: 0; = p2398*(p1020+p1022)
- p2130: 8.24653e-5; = p2015*p2058*p2092/(p0818*1000)
- p1705: 0
- p2966: 1.29939e-5; = p2380*(p1079+p1081)
- p4577: 4.00933e-6; = p1816*p3481
- p0783: 0
- p2640: 9.39337e-5; = p2249*(p1019+p1021)
- p1611: 0
- p2060: 0.272353
- p3465: 0; = p3370*p1241
- p2947: 0.000235816; = p2361*(p1020+p1022)
- p2667: 0; = p2276*(p1019+p1021)
- p2460: 2.98328e-5; = p2264*p1073
- p0525: 0; = SQRT(2)*(IF((2*p0393-1)<0;-1;IF((2*p0393-1)>0;1;0))*SQRT(SQRT((2/(pi()*0.140012289)+LN(1-(2*p0393-1)^2)/2)^2-LN(1-(2*p0393-1)^2)/0.140012289)-(2/(pi()*0.140012289)+LN(1-(2*p0393-1)^2)/2)))
- p0781: 18.34; = p0121*(1+p0649*p0253/100)
- p4471: 0; = p1916*p3480
- p1042: 0.000645242
- p0875: 0; = p0874*p0001*p0003/(p0818*p0002)
- p0693: 0
- p1227: 0.000193113; = IF(p1221=0;0;p1226*p0001/(p0818*p0002))
- p2929: 8.59417e-5; = p2343*(p1079+p1081)
- p2518: 7.37395e-6; = p2322*p1014
- p3475: 0; = p3380*p1241
- p1219: 0; = if(p1218=0;0;SQRT(2)*(IF((2*p1218-1)<0;-1;IF((2*p1218-1)>0;1;0))*SQRT(SQRT((2/(pi()*0.140012289)+LN(1-(2*p1218-1)^2)/2)^2-LN(1-(2*p1218-1)^2)/0.140012289)-(2/(pi()*0.140012289)+LN(1-(2*p1218-1)^2)/2))))
- p0761: 0
- p2801: 0; = p2410*(p1019+p1021)
- p0957: 0; = if(and(p0683>0;or(p0807=56;p0807=100;and(p0807=60;p0901>0.06)));p0939;0)
- p1994: 750
- p3245: 0; = IF(p3244=1;0;if(p3244+p0792/100>1;1-p3244;p0792/100))
- p1748: 0
- p1656: 0.386667
- p2384: 1.92703e-5; = p2229*p2213
- p0811: 0; = if(p0807=480;1-p0810;0)
- p1817: 0
- p3138: 0; = p2357*p1023
- p2963: 2.10222e-5; = p2377*(p1079+p1081)
- p0790: 61.443; = p0130*(1+p0658*p0262/100)
- p2021: 0.00315098; = p2020/p0818
- p2513: 1.9284e-6; = p2317*p1014
- p3007: 0; = p2421*(p1079+p1081)
- p2889: 0; = p2303*(p1079+p1081)
- p1753: 0
- p0399: 0.5
- p3235: 0.118093
- p0985: 1; = IF(p0982=1;0;IF(p0982+p0983>1;1-p0982;p0983))
- p2816: 0; = p2425*(p1078+p1080)
- p3321: 0; = if(and(p1232=0;p3253<>0);IF((p3317+p3318+p3319+p3320)+(p3253*(p3261*(1-p3277))/p3316)>p3253;p3253-(p3317+p3318+p3319+p3320);p3253*(p3261*(1-p3277))/p3316);0)
- p1791: 0
- p0970: 0; = p0967/p0818
- p2740: 3.26124e-5; = p2349*(p1078+p1080)
- p1305: 0; = p1301*p1252/p0818
- p2574: 0.0004268; = p2378*p1073
- p2478: 0; = p2282*p1014
- p1660: 0
- p2665: 0; = p2274*(p1128+p1130)
- p2638: 7.65722e-5; = p2247*(p1019+p1021)
- p3343: 0; = if(and(p1232=0;p3254<>0);IF((p3339+p3340+p3341+p3342)+(p3254*(p3269*(1-p3277))/p3338)>p3254;p3254-(p3339+p3340+p3341+p3342);p3254*(p3269*(1-p3277))/p3338);0)
- p1194: 1.48
- p1722: 0
- p1627: 0
- p4827: 0; = p1860*p3482
- p3327: 0; = if(and(p1232=0;p3255<>0);1-(p3323+p3324+p3325+p3326);0)
- p3009: 0; = p2423*(p1079+p1081)
- p2526: 3.27581e-7; = p2330*p1014
- p3012: 0; = p2426*(p1079+p1081)
- p1888: 0
- p3268: 0
- p4989: 0; = p1816*p3483
- p3101: 0; = p2320*p1023
- p1725: 0
- p2671: 0; = p2280*(p1019+p1021)
- p0841: -0.188576
- p2378: 0.000865932; = p2229*p2207
- p0935: 1.94359e-5; = p0929*p0001/(p0818*p0002)
- p2586: 0.000284246; = p2390*p1123
- p1910: 0
- p1936: 0
- p2371: 0.00286305; = p2225*p2200
- p0703: 815.543; = p0043*(1+p0571*p0175/100)
- p1625: 0
- p3317: 0; = if(and(p1232=0;p3253<>0);p3253*(p3261*p3277-p3312)/p3316;0)
- p3076: 0; = p2295*p1023
- p3003: 0; = p2417*(p1079+p1081)
- p0641: 0; = IF(p0377<0.5;-SQRT(p0007*EXP(p0509^2*p0008)-p0007);SQRT(p0007*EXP(p0509^2*p0008)-p0007))
- p2146: 2.51194e-6; = p2015*p2074*p2108/(p0818*1000)
- p2941: 0.000814407; = p2355*(p1020+p1022)
- p3440: 0; = p3364*p1240
- p1601: 0
- p4003: 2.88268e-6; = p1860*p3478
- p2435: 3.2073e-6; = p2239*p1014
- p2701: 0; = p2310*(p1078+p1080)
- p3116: 0; = p2335*p1023
- p1698: 0
- p1622: 0
- p3347: 0; = if(and(p1232=0;p3256<>0);p3275*p3289;0)
- p3362: 0; = if(p1232=0;p3244*p3356/p0818;0)
- p0942: 0; = if(and(p0683=0;p0948=0);p0936;0)
- p0487: 0; = SQRT(2)*(IF((2*p0355-1)<0;-1;IF((2*p0355-1)>0;1;0))*SQRT(SQRT((2/(pi()*0.140012289)+LN(1-(2*p0355-1)^2)/2)^2-LN(1-(2*p0355-1)^2)/0.140012289)-(2/(pi()*0.140012289)+LN(1-(2*p0355-1)^2)/2)))
- p0954: 0; = if(and(p0683>0;or(p0807=56;p0807=100;and(p0807=60;p0901>0.06)));p0936;0)
- p1270: 0; = IF(p1267=p1259;0;IF(p1267+p1268>p1259;p1259-p1267;p1268))
- p3055: 0; = p2274*p1132
- p3356: 0; = if(p1232=0;p3306+p3317+p3328+p3339+p3350;0)
- p1058: 0.225
- p2489: 0; = p2293*p1014
- p1300: 0; = IF(p1297=p1265;0;IF(p1297+p1298>p1265;p1265-p1297;p1298))
- p2057: 3.28794
- p1111: 0.0872841
- p1069: 9.92401e-5; = IF(p1012=0;p1055/(p1062*p0818);0)
- p2821: 0; = p2430*(p1128+p1130)
- p1034: 9.3834e-5; = IF(p1012=0;p1028*p0001/(p0818*p0002);0)
- p0871: 0; = p0870*p0001*p0003/(p0818*p0002)
- p3113: 0; = p2332*p1023
- p2204: 0.00154703; = p1109/p0818
- p1246: 0; = if(p1232>0;0;p1241*(p0725/100)*p0723*1000)
- p0878: 0; = p0867*p0856
- p1965: 0.000137206; = p1963+p1959*p1964*1000/p0818
- p1919: 0
- p2433: 0.000192954; = p2237*p1014
- p0310: 0.5
- p1188: 206.164; = p1187*p0801
- p2163: 0.044364; = (p2017-p2020)/p0818-(p2025+p2028+p2033+p2034+p2051+p2125+p2126+p2127+p2128+p2129+p2130+p2131+p2132+p2133+p2134+p2135+p2136+p2137+p2138+p2139+p2140+p2141+p2142+p2143+p2144+p2145+p2146+p2147+p2148+p2149+p2150+p2151+p2152+p2153+p2154+p2155+p2156+p2157)
- p2546: 3.10389e-5; = p2350*p1123
- p0108: 63.66
- p2752: 6.60809e-5; = p2361*(p1019+p1021)
- p2340: 0.000166751; = p2228*p2208
- p1925: 0
- p2321: 0.000508337; = p2224*p2188
- p3368: 0; = if(p1232=0;p3245*p3356/p0818;0)
- p5322: 2.53326e-8; = p1943*p3484
- p2981: 0; = p2395*(p1020+p1022)
- p2129: 0.000149816; = p2015*p2057*p2091/(p0818*1000)
- p1664: 0
- p1017: 0.11476; = IF(p1012=0;p0708/100;0)
- p2880: 0; = p2294*(p1020+p1022)
- p0249: 21.041
- p0105: 69.351
- p2691: 0; = p2300*(p1078+p1080)
- p1346: 73
- p0111: 37.94
- p0909: 2.23541e7
- p0900: 0.968045; = p0899/p0818
- p2579: 9.08302e-7; = p2383*p1073
- p0518: 0; = SQRT(2)*(IF((2*p0386-1)<0;-1;IF((2*p0386-1)>0;1;0))*SQRT(SQRT((2/(pi()*0.140012289)+LN(1-(2*p0386-1)^2)/2)^2-LN(1-(2*p0386-1)^2)/0.140012289)-(2/(pi()*0.140012289)+LN(1-(2*p0386-1)^2)/2)))
- p3448: 0; = p3372*p1240
- p0250: 16.163
- p0050: 66.465
- p2379: 0.000142552; = p2229*p2208
- p1117: 0.000708099; = IF(p1071=0;p1107/(p1112*p0818);0)
- p3287: 0
- p3298: 0; = if(p1283+p1284+p1285+p1286=0;0;p1283/(p1283+p1284+p1285+p1286))
- p2031: 0.465411
- p0673: 0
- p1954: 0
- p1249: 0; = if(p1232>0;0;p1244*p0001/(p0818*p0002))
- p2721: 8.78004e-7; = p2330*(p1019+p1021)
- p4299: 0; = p1950*p3479
- p2443: 2.85689e-5; = p2247*p1014
- p0736: 0
- p2112: 0.856281
- p2497: 0; = p2301*p1073
- p1044: 0.00623446; = IF(p1012=0;IF(p1037=1;0;IF(p1037+p1038>1;1-p1037;p1038));0)
- p2748: 5.95238e-5; = p2357*(p1019+p1021)
- p2696: 0; = p2305*(p1078+p1080)
- p3274: 0
- p3159: 2.48782e-5; = p2378*p1082
- p2973: 2.26511e-6; = p2387*(p1079+p1081)
- p1894: 0
- p3412: 0; = p3374*p1238
- p1787: 0
- p1843: 0
- p0261: 43.891
- p3073: 0; = p2292*p1023
- p0911: 0.00475556
- p2466: 1.20446e-5; = p2270*p1073
- p2493: 0; = p2297*p1073
- p0675: 0
- p2464: 3.65966e-5; = p2268*p1073
- p2587: 1.81651e-5; = p2391*p1123
- p0897: 0
- p2541: 1.11103e-5; = p2345*p1073
- p4985: 0; = p1812*p3483
- p3414: 0; = p3376*p1238
- p1465: 140
- p3024: 0; = p2243*p1023
- p2364: 0.000760678; = p2225*p2192
- p0814: 0; = if(p0807=480;p0810*p0812+p0811*p0813;0)
- p0702: 815.543; = p0042*(1+p0570*p0174/100)
- p1091: 2.57314e-5; = IF(p1071=0;p1085*p0001/(p0818*p0002);0)
- p2367: 0.00922421; = p2225*p2196
- p3237: 0.854735
- p3218: 0.00625333; = p3214*p1228
- p1909: 0
- p1655: 0
- p2253: 1.58658e-5; = p2222*p2199
- p1583: 0
- p1187: 0.00025142
- p1821: 0
- p2311: 0; = p2231*p2218
- p1923: 0
- p3311: 0; = if(and(p1232=0;p3252<>0);p3252-(p3306+p3307+p3308+p3309+p3310);0)
- p1976: 0.0475
- p1224: 0.44; = IF(p1221=0;0;IF(p1193=0;1-p1223;0))
- p0657: 0; = IF(p0393<0.5;-SQRT(p0007*EXP(p0525^2*p0008)-p0007);SQRT(p0007*EXP(p0525^2*p0008)-p0007))
- p0559: 0; = IF(p0295<0.5;-SQRT(p0007*EXP(p0427^2*p0008)-p0007);SQRT(p0007*EXP(p0427^2*p0008)-p0007))
- p2675: 0; = p2284*(p1019+p1021)
- p2735: 5.96734e-7; = p2344*(p1078+p1080)
- p1086: 0; = IF(p1071=0;p1080*(p0710/100)*p0703*1000;0)
- p1891: 0
- p1026: 173735; = IF(p1012=0;p1020*(p0704/100)*p0703*1000;0)
- p3172: 3.22767e-5; = p2391*p1132
- p1681: 0
- p2535: 0.000499251; = p2339*p1073
- p3174: 0; = p2393*p1023
- p0654: 0; = IF(p0390<0.5;-SQRT(p0007*EXP(p0522^2*p0008)-p0007);SQRT(p0007*EXP(p0522^2*p0008)-p0007))
- p3419: 0; = p3362*p1239
- p1138: 56285.3; = if(p1121=0;p1132*(p0716/100)*p0703*1000;0)
- p0295: 0.5
- p2882: 0; = p2296*(p1020+p1022)
- p0989: 1.46982e6; = p0985*p0886
- p3372: 0; = if(p1232=0;p3245*p3360/p0818;0)
- p0441: 0; = SQRT(2)*(IF((2*p0309-1)<0;-1;IF((2*p0309-1)>0;1;0))*SQRT(SQRT((2/(pi()*0.140012289)+LN(1-(2*p0309-1)^2)/2)^2-LN(1-(2*p0309-1)^2)/0.140012289)-(2/(pi()*0.140012289)+LN(1-(2*p0309-1)^2)/2)))
- p1741: 0
- p1980: 3521.6
- p0802: 770000
- p2333: 0.000367119; = p2224*p2201
- p3951: 3.45922e-7; = p1808*p3478
- p1728: 0
- p2056: 2.07882
- p2968: 7.34699e-5; = p2382*(p1079+p1081)
- p2567: 0.00021616; = p2371*p1014
- p1758: 0
- p3394: 0; = p3375*p1234
- p0795: 117.661; = p0135*(1+p0663*p0267/100)
- p2937: 0.000143696; = p2351*(p1129+p1131)
- p2588: 3.15662e-5; = p2392*p1123
- p0786: 32.863; = p0126*(1+p0654*p0258/100)
- p2919: 0.000265112; = p2333*(p1020+p1022)
- p1755: 0
- p0640: 0; = IF(p0376<0.5;-SQRT(p0007*EXP(p0508^2*p0008)-p0007);SQRT(p0007*EXP(p0508^2*p0008)-p0007))
- p2216: 4.88195e-5; = p1108/p0818
- p1027: 90928.1; = IF(p1012=0;p1021*(p0704/100)*p0703*1000;0)
- p1088: 15573.1; = IF(p1071=0;p1082*(p0710/100)*p0703*1000;0)
- p1147: 0.082617
- p2503: 0; = p2307*p1073
- p3348: 0; = if(and(p1232=0;p3256<>0);p3276*p3289;0)
- p2806: 0; = p2415*(p1078+p1080)
- p1876: 0
- p1802: 0
- p0608: 0; = IF(p0344<0.5;-SQRT(p0007*EXP(p0476^2*p0008)-p0007);SQRT(p0007*EXP(p0476^2*p0008)-p0007))
- p2779: 2.78798e-5; = p2388*(p1078+p1080)
- p2164: 0.0436782; = (p2015/p0818)-(p2022)-(p2035+p2036+p2052)-(p2017/p0818)-(p2039+p2041+p2044+p2158+p2159+p2160+p2161+p2162)
- p3361: 0; = if(p1232=0;p3311+p3322+p3333+p3344+p3355;0)
- p1750: 0
- p0869: 1; = IF(p0858+p0864+p0865+p0866+p0867+p0868=1;0;1-(p0858+p0864+p0865+p0866+p0867+p0868))
- p1283: 0; = p1277*p1252/p0818
- p2070: 0.282
- p2900: 0; = p2314*(p1129+p1131)
- p0973: 0; = p0967+p0968+p0969
- p2205: 0.00139917; = 2*14.0067*p2204/30.973762
- p3363: 0; = if(p1232=0;p3244*p3357/p0818;0)
- p3188: 0; = p2407*p1023
- p2888: 0; = p2302*(p1079+p1081)
- p0237: 6.006
- p2166: 0.462518; = p2165*p0824
- p2023: 2.12
- p2061: 0.518824
- p0807: 60
- p3045: 1.73896e-6; = p2264*p1082
- p0481: 0; = SQRT(2)*(IF((2*p0349-1)<0;-1;IF((2*p0349-1)>0;1;0))*SQRT(SQRT((2/(pi()*0.140012289)+LN(1-(2*p0349-1)^2)/2)^2-LN(1-(2*p0349-1)^2)/0.140012289)-(2/(pi()*0.140012289)+LN(1-(2*p0349-1)^2)/2)))
- p1576: 0.47191
- p2156: 2.76764e-6; = p2015*p2085*p2118/(p0818*1000)
- p3151: 0; = p2370*p1023
- p2794: 0; = p2403*(p1019+p1021)
- p2851: 0.000159771; = p2265*(p1079+p1081)
- p3209: 0; = p2428*p1132
- p0688: 69.29; = p0028*(1+p0556*p0160/100)
- p3072: 0; = p2291*p1023
- p1162: 0.00021645; = p1161/p0818
- p1542: 2
- p2555: 1.00308e-5; = p2359*p1014
- p2225: 0.556627; = if(p0765*p0769+p0766*p0770+p0767*p0771+p0768*p0772=0;0;p0772*p0768/(p0765*p0769+p0766*p0770+p0767*p0771+p0768*p0772))
- p3279: 0
- p3100: 0; = p2319*p1023
- p2534: 6.01295e-5; = p2338*p1073
- p3215: 0.450791; = p1222*3*15.9994/100.0869
- p0034: 338.841
- p1793: 0
- p1137: 0; = if(p1121=0;p1131*(p0716/100)*p0703*1000;0)
- p2272: 0; = p2230*p2218
- p1940: 0
- p2905: 0.000199381; = p2319*(p1020+p1022)
- p2042: 0.07
- p0078: 815.543
- p3333: 0; = if(and(p1232=0;p3255<>0);p3255-(p3328+p3329+p3330+p3331+p3332);0)
- p1286: 0; = p1282*p1252/p0818
- p3464: 0; = p3369*p1241
- p3360: 0; = if(p1232=0;p3310+p3321+p3332+p3343+p3354;0)
- p1587: 0
- p3002: 0; = p2416*(p1079+p1081)
- p1408: 35
- p2852: 8.07798e-7; = p2266*(p1079+p1081)
- p1663: 0
- p0181: 22.431
- p3253: 0; = p1252*(p1277*(1-p3247)+p1280*(1-p3248)+p1281*(1-p3249)+p1282*(1-p3250))
- p2895: 0; = p2309*(p1079+p1081)
- p0782: 23.546; = p0122*(1+p0650*p0254/100)
- p1072: 0; = p1071*p0001/(p0818*p0002)
- p0269: 8.892
- p2224: 0.166482; = if(p0765*p0769+p0766*p0770+p0767*p0771+p0768*p0772=0;0;p0771*p0767/(p0765*p0769+p0766*p0770+p0767*p0771+p0768*p0772))
- p2352: 1.69452e-5; = p2232*p2220
- p2850: 1.22005e-5; = p2264*(p1079+p1081)
- p0880: 0; = p0868*p0856
- p0845: 0.5
- p2183: 0.00202608; = p1064-p2182
- p2210: 0.000120919; = 6*1.00794*p2208/30.973762
- p3400: 0; = p3362*p1238
- p1963i: 1.59709e-7; = p1706*p1910+p1707*p1911+p1708*p1912+p1709*p1913+p1710*p1914+p1711*p1915+p1712*p1916+p1713*p1917+p1714*p1918+p1715*p1919+p1716*p1920+p1717*p1921+p1718*p1922+p1719*p1923+p1720*p1924+p1721*p1925+p1722*p1926+p1723*p1927+p1724*p1928
- p2632: 9.29245e-5; = p2241*(p1019+p1021)
- p1745: 0
- p1939: 0
- p2832: 3.37658e-5; = p2246*(p1020+p1022)
- p0504: 0; = SQRT(2)*(IF((2*p0372-1)<0;-1;IF((2*p0372-1)>0;1;0))*SQRT(SQRT((2/(pi()*0.140012289)+LN(1-(2*p0372-1)^2)/2)^2-LN(1-(2*p0372-1)^2)/0.140012289)-(2/(pi()*0.140012289)+LN(1-(2*p0372-1)^2)/2)))
- p2006: 0.241865; = ((p1980*p1985+p1986*p1991+p1992*p1997+p2000*p2005)/p0818)*p0005*p0002/1000
- p0884: 69.29; = IF(p0689=100;0;IF(p0689+p0688>100;100-p0689;p0688))
- p1262: 0; = if(p1232>0;0;p0733/100)
- p3153: 0; = p2372*p1023
- p1624: 0
- p2037: 1.99
- p0316: 0.5
- p0912: 0
- p1788: 0
- p1229: 0.000264849; = IF(p1221=0;0;p1228*p1221)
- p1771: 0
- p3296: 0
- p1991: 5.27537e7; = (if(p1111=0;0;p1106/p1111)+if(p1112=0;0;p1107/p1112)+if(p1113=0;0;p1108/p1113)+if(p1114=0;0;p1109/p1114)+if(p1115=0;0;p1110/p1115))*(1+p1157)
- p1899: 0
- p2347: 0.00015072; = p2228*p2215
- p3056: 0; = p2275*p1132
- p2043: 0.636483
- p3133: 4.9668e-6; = p2352*p1132
- p0917: 1.27956
- p2451: 4.60997e-5; = p2255*p1014
- p2679: 0; = p2288*(p1019+p1021)
- p0699: 0
- p2316: 0.000337305; = p2224*p2183
- p2811: 0; = p2420*(p1078+p1080)
- p2766: 9.8575e-5; = p2375*(p1078+p1080)
- p1022: 0.50287; = IF(p1012=0;IF(p1014+p1019+p1020+p1021=1;0;IF(p1014+p1019+p1020+p1021+p1018>1;1-(p1014+p1019+p1020+p1021);p1018));0)
- p0762: 0
- p0455: 0; = SQRT(2)*(IF((2*p0323-1)<0;-1;IF((2*p0323-1)>0;1;0))*SQRT(SQRT((2/(pi()*0.140012289)+LN(1-(2*p0323-1)^2)/2)^2-LN(1-(2*p0323-1)^2)/0.140012289)-(2/(pi()*0.140012289)+LN(1-(2*p0323-1)^2)/2)))
- p2570: 0.000152906; = p2374*p1014
- p1784: 0
- p1675: 0
- p2553: 2.22082e-5; = p2357*p1014
- p3052: 6.29238e-6; = p2271*p1082
- p3066: 0; = p2285*p1023
- p2590: 0; = p2394*p1014
- p1051: 581218; = IF(p1012=0;p1044*p1036;0)
- p0680: 561.237; = p0020*(1+p0548*p0152/100)
- p0321: 0.5
- p3236: 0.0140975
- p1989: 50
- p0939: 1.04964e-6; = p0933*p0001/(p0818*p0002)
- p0857: 1.93113; = p0856*p0001*p0003/(p0818*p0002)
- p0830: 4.37907e9; = p0825*p0821*p0824
- p0663: 0; = IF(p0399<0.5;-SQRT(p0007*EXP(p0531^2*p0008)-p0007);SQRT(p0007*EXP(p0531^2*p0008)-p0007))
- p3392: 0; = p3373*p1234
- p1689: 0
- p2781: 0; = p2390*(p1128+p1130)
- p4307: 0; = p1962*p3479
- p0271: 17.322
- p3041: 6.51592e-6; = p2260*p1082
- p3109: 0; = p2328*p1023
- p2184: 0.00015342; = p1051/p0818
- p3397: 0; = p3378*p1234
- p3318: 0; = if(and(p1232=0;p3253<>0);p3253*(p3262-p3313)/p3316;0)
- p0712: 27.682; = p0052*(1+p0580*p0184/100)
- p2476: 0; = p2280*p1014
- p2498: 0; = p2302*p1073
- p2239: 4.24808e-5; = p2222*p2184
- p0433: 0; = SQRT(2)*(IF((2*p0301-1)<0;-1;IF((2*p0301-1)>0;1;0))*SQRT(SQRT((2/(pi()*0.140012289)+LN(1-(2*p0301-1)^2)/2)^2-LN(1-(2*p0301-1)^2)/0.140012289)-(2/(pi()*0.140012289)+LN(1-(2*p0301-1)^2)/2)))
- p1649: 0
- p1248: 0; = if(p1232>0;0;p1243*p0001/(p0818*p0002))
- p1731: 0
- p1901: 0
- p2265: 0.000792632; = p2226*p2211
- p0385: 0.5
- p0537: 0; = IF(p0273<0.5;-SQRT(p0007*EXP(p0405^2*p0008)-p0007);SQRT(p0007*EXP(p0405^2*p0008)-p0007))
- p0254: 17.907
- p2734: 0.000118025; = p2343*(p1078+p1080)
- p1064: 0.011256; = IF(p1012=0;p1050/(p1057*p0818);0)
- p2363: 9.39962e-5; = p2225*p2191
- p3156: 1.02307e-5; = p2375*p1082
- p1024: 59821.1; = IF(p1012=0;p1014*(p0704/100)*p0703*1000;0)
- p0865: 0; = IF(p0858+p0864=1;0;IF(p0858+p0864+p0860>1;1-(p0858+p0864);p0860))
- p2817: 0; = p2426*(p1078+p1080)
- p0259: 53.195
- p2434: 4.23558e-5; = p2238*p1014
- p1813: 0
- p2127: 0.000272039; = p2015*p2055*p2089/(p0818*1000)
- p1609: 0
- p0981: 0; = p0978*p0001/(p0818*p0002)
- p3118: 1.08236e-5; = p2337*p1082
- p0851: 0
- p1914: 0
- p2627: 0; = p2431*p1123
- p3126: 6.47618e-7; = p2345*p1082
- p1325: 0; = IF(((p0745*1000*p0752/100)+(p0754*1000*p0761/100))/p0801<0;0;((p0745*1000*p0752/100)+(p0754*1000*p0761/100))/p0801)
- p1149: 0.830148
- p1736: 0
- p0191: 31.771
- p0803: 0
- p2186: 0.00165842; = p1052/p0818
- p1850: 0
- p2244: 0.000162441; = p2222*p2189
- p3269: 0
- p1280: 0; = IF(p1277=p1263;0;IF(p1277+p1278>p1263;p1263-p1277;p1278))
- p2550: 0.00038789; = p2354*p1014
- p2672: 0; = p2281*(p1019+p1021)
- p3335: 0; = IF(or(p3254=0;p1232>0);0;p3270*(p3280*(p3283*p1256+p3286*(p1253+p1257)+p1258*p3288+p3300*p3287)))
- p2727: 0.000115308; = p2336*(p1078+p1080)
- p2044: 5.41586e-6; = p2015*p2042*p2043/(p0818*1000)
- p0180: 21.802
- p3102: 0; = p2321*p1023
- p0765: 69.351; = p0105*(1+p0633*p0237/100)
- p1647: 0
- p3112: 0; = p2331*p1023
- p3415: 0; = p3377*p1238
- p1135: 104066; = if(p1121=0;p1129*(p0716/100)*p0703*1000;0)
- p0854: 684259; = p0801*((1-p0853)*p0846+p0853*p0852)
- p1220: 0; = IF(p1218<0.5;-SQRT(p1214*EXP(p1219^2*p1215)-p1214);SQRT(p1214*EXP(p1219^2*p1215)-p1214))
- p3384: 0; = p3365*p1234
- p2645: 0.000288203; = p2254*(p1019+p1021)
- p0112: 102.87
- p0806: 6.314e7
- p2310: 0; = p2227*p2217
- p0113: 66.465
- p0886: 1.46982e6; = p0686*1000*p0687*p0689/100
- p0744: 0
- p0163: 26.769
- p1035: 0; = IF(p1012=0;p1029*p0001/(p0818*p0002);0)
- p0394: 0.5
- p1166: 1.86504e-6; = p1164/p0818
- p2313: 0; = p2231*p2220
- p2366: 0.000933149; = p2225*p2195
- p1880: 0
- p1057: 0.82
- p3135: 0; = p2354*p1023
- p2048: 1.21558e-12; = p2015*p2046/(p0818*1000000000000)
- p2036: 0.000442818; = p2015*p2030*(1-p2032)/(p0818*1000)
- p3184: 0; = p2403*p1023
- p5239: 2.11105e-7; = p1860*p3484
- p2155: 1.49371e-5; = p2015*p2084*p2117/(p0818*1000)
- p2197: 1.58784e-5; = p1055/p0818
- p4102: 3.11954e-5; = p1963*p3478
- p3331: 0; = if(and(p1232=0;p3255<>0);p3255*(p3268-p3326)/p3327;0)
- p3201: 0; = p2420*p1082
- p1591: 0
- p2053: 1.45647
- p2543: 7.42868e-5; = p2347*p1073
- p0239: 28.5
- p2722: 1.93038e-6; = p2331*(p1019+p1021)
- p2081: 0.0019
- p3452: 0; = p3376*p1240
- p0707: 21.927; = p0047*(1+p0575*p0179/100)
- p2221: 0.000220803; = p1155-p2220
- p0888: 3.31631e6; = p0686*1000*p0687*p0884/100
- p2417: 0; = p2235*p2207
- p3484: 0.03199; = IF(p1344=0;0;p1344/(p1328+p1330+p1332+p1334+p1336+p1338+p1340+p1342+p1344))
- p2863: 0; = p2277*(p1020+p1022)
- p2109: 0.826583
- p3302: 0; = if(and(p1232=0;p3252<>0);p3258*(p3278*(p3282*p1256+p3286*(p1253+p1257)+p1258*p3288+p3297*p3287));0)
- p0546: 0; = IF(p0282<0.5;-SQRT(p0007*EXP(p0414^2*p0008)-p0007);SQRT(p0007*EXP(p0414^2*p0008)-p0007))
- p1621: 0
- p1226: 820000; = IF(p1221=0;0;IF(p1193=0;p0801;0))
- p2072: 0.134
- p2750: 2.68852e-5; = p2359*(p1019+p1021)
- p2291: 0; = p2223*p2198
- p2783: 0; = p2392*(p1128+p1130)
- p3212: 0; = p2431*p1132
- p2714: 2.26226e-5; = p2323*(p1019+p1021)
- p2745: 0.00103965; = p2354*(p1019+p1021)
- p0290: 0.5
- p0195: 0
- p0444: 0; = SQRT(2)*(IF((2*p0312-1)<0;-1;IF((2*p0312-1)>0;1;0))*SQRT(SQRT((2/(pi()*0.140012289)+LN(1-(2*p0312-1)^2)/2)^2-LN(1-(2*p0312-1)^2)/0.140012289)-(2/(pi()*0.140012289)+LN(1-(2*p0312-1)^2)/2)))
- p2259: 0.000700372; = p2226*p2205
- p3226: 5.93902e-5; = p3222*p1229
- p2870: 0; = p2284*(p1020+p1022)
- p2767: 8.91535e-5; = p2376*(p1078+p1080)
- p3206: 0; = p2425*p1082
- p3436: 0; = p3379*p1239
- p2773: 0.000100898; = p2382*(p1078+p1080)
- p1297: 0
- p3304: 0; = if(and(p1232=0;p3252<>0);p3260*p3289;0)
- p2339: 0.00101293; = p2228*p2207
- p2705: 0; = p2314*(p1128+p1130)
- p1963b: 8.59513e-6; = p1569*p1773+p1570*p1774+p1571*p1775+p1572*p1776+p1573*p1777+p1574*p1778+p1575*p1779+p1576*p1780+p1577*p1781+p1578*p1782+p1579*p1783+p1580*p1784+p1581*p1785+p1582*p1786+p1583*p1787+p1584*p1788+p1585*p1789+p1586*p1790+p1587*p1791
- p2375: 0.000356098; = p2229*p2204
- p3046: 2.27723e-5; = p2265*p1082
- p2445: 3.50464e-5; = p2249*p1014
- p0342: 0.5
- p2668: 0; = p2277*(p1019+p1021)
- p0619: 0; = IF(p0355<0.5;-SQRT(p0007*EXP(p0487^2*p0008)-p0007);SQRT(p0007*EXP(p0487^2*p0008)-p0007))
- p2839: 1.14573e-5; = p2253*(p1020+p1022)
- p2167: 0.212134; = p2166*(p0898)
- p2207: 0.00376195; = p1119-p2205-p2204-p2206
- p0377: 0.5
- p1963e: 0; = p1628*p1832+p1629*p1833+p1630*p1834+p1631*p1835+p1632*p1836+p1633*p1837+p1634*p1838+p1635*p1839+p1636*p1840+p1637*p1841+p1638*p1842+p1639*p1843+p1640*p1844+p1641*p1845+p1642*p1846+p1643*p1847+p1644*p1848+p1645*p1849+p1646*p1850
- p2100: 0.705744
- p2179: 0; = p0970+p0971+p0972
- p0928: 561237; = p0801*p0918
- p0860: 0; = p0672*1000/p0856
- p0808: 0
- p1128: 0; = if(p1121=0;IF(p1123=1;0;IF(p1123+p1124>1;1-p1123;p1124));0)
- p2345: 2.25415e-5; = p2228*p2213
- p3199: 0; = p2418*p1082
- p2911: 0.000164295; = p2325*(p1020+p1022)
- p1630: 0
- p2134: 0.000222662; = p2015*p2062*p2096/(p0818*1000)
- p0918: 0.684435; = p0680*1000/p0801
- p1827: 0
- p2616: 0; = p2420*p1073
- p2110: 0.856281
- p3383: 0; = p3364*p1234
- p1319: 0; = IF(((p0745*1000*p0746/100)+(p0754*1000*p0755/100))/p0801<0;0;((p0745*1000*p0746/100)+(p0754*1000*p0755/100))/p0801)
- p2267: 4.19061e-5; = p2226*p2213
- p0743: 0
- p1293: 0; = p1287*p1252/p0818
- p0840: 0.0907789; = p0839*p0831
- p3330: 0; = if(and(p1232=0;p3255<>0);p3255*(p3267-p3325)/p3327;0)
- p3424: 0; = p3367*p1239
- p0402: 0.5
- p2196: 0.0165716; = p1068-p2193-p2195
- p2699: 0; = p2308*(p1078+p1080)
- p2560: 5.74312e-5; = p2364*p1014
- p3130: 3.38471e-6; = p2349*p1082
- p2430: 0; = p2236*p2220
- p1606: 0
- p2838: 5.21119e-6; = p2252*(p1020+p1022)
- p0725: 0.493; = p0065*(1+p0593*p0197/100)
- p2860: 0; = p2274*(p1129+p1131)
- p3198: 0; = p2417*p1082
- p2683: 0; = p2292*(p1019+p1021)
- p4783: 0; = p1816*p3482
- p1284: 0; = p1280*p1252/p0818
- p2161: 1.07586e-6; = p2015*p2085*p2123/(p0818*1000)
- p2268: 7.42504e-5; = p2226*p2214
- p1126: 0; = if(p1121=0;p0720/100;0)
- p3162: 7.99651e-7; = p2381*p1082
- p0818: 3.7884e9; = p0806*p0807
- p1855: 0
- p2419: 0; = p2235*p2209
- p2754: 1.90211e-5; = p2363*(p1019+p1021)
- p0381: 0.5
- p1574: 0
- p0037: 35.252
- p1949: 0
- p3547: 0; = p1816*p3476
- p3145: 0; = p2364*p1023
- p1847: 0
- p0135: 117.661
- p3125: 6.19325e-8; = p2344*p1082
- p3213: 0.112803; = p1222*12.0107/100.0869
- p2563: 0.000696428; = p2367*p1014
- p2484: 0; = p2288*p1014
- p1595: 0
- p1990: 30
- p2557: 2.46546e-5; = p2361*p1014
- p1659: 0
- p2676: 0; = p2285*(p1019+p1021)
- p4101: 1.3664e-5; = p1962*p3478
- p0972: 0; = p0969/p0818
- p3256: 0; = p1252*(p1307*(1-p3247)+p1310*(1-p3248)+p1311*(1-p3249)+p1312*(1-p3250))
- p1814: 0
- p0573: 0; = IF(p0309<0.5;-SQRT(p0007*EXP(p0441^2*p0008)-p0007);SQRT(p0007*EXP(p0441^2*p0008)-p0007))
- p1945: 0
- p0107: 51.625
- p2871: 0; = p2285*(p1020+p1022)
- p1735: 0
- p1157: 0.260052
- p2414: 0; = p2235*p2204
- p2614: 0; = p2418*p1073
- p2251: 4.3966e-6; = p2222*p2197
- p1935: 0
- p1272: 0; = IF(p1267+p1270+p1271=p1259;0;p1259-(p1267+p1270+p1271))
- p2177: 0.136757; = p0895/p0818-(p2173+p2174+p2175+p2176)
- p0826: 0.1151; = 1-p0825/p0818
- p0175: 0
- p1911: 0
- p2343: 0.000426361; = p2228*p2211
- p1193: 0; = IF(OR(p1036=0;p1095=0);0.0001*p0857;0)
- p2584: 4.96401e-5; = p2388*p1073
- p2282: 0; = p2223*p2188
- p1818: 0
- p0424: 0; = SQRT(2)*(IF((2*p0292-1)<0;-1;IF((2*p0292-1)>0;1;0))*SQRT(SQRT((2/(pi()*0.140012289)+LN(1-(2*p0292-1)^2)/2)^2-LN(1-(2*p0292-1)^2)/0.140012289)-(2/(pi()*0.140012289)+LN(1-(2*p0292-1)^2)/2)))
- p2927: 1.51997e-5; = p2341*(p1079+p1081)
- p2412: 0; = p2234*p2202
- p3233: 0.60394
- p1200: 0.84
- p4093: 2.30615e-7; = p1950*p3478
- p0961: 0; = if(and(p0683>0;or(p0807=480;p0807=32;p0807=1;and(p0807=60;p0901<0.03)));p0937;0)
- p1651: 0
- p0833: 5.07425e9; = p0830+p0832
- p1327a: 0.0824925; = (p0745*1000/p0801)*(1-(p0746+p0747+p0748+p0749+p0750+p0751+p0752+p0753)/100)+(p0754*1000/p0801)*(1-(p0755+p0756+p0757+p0758+p0759+p0760+p0761+p0762)/100)
- p1065: 0.000681868; = IF(p1012=0;p1051/(p1058*p0818);0)
- p2933: 3.03806e-5; = p2347*(p1079+p1081)
- p3083: 0; = p2302*p1082
- p1344: 67643.9; = IF(p1318=0;p1327*p0801;0)
- p0298: 0.5
- p2357: 0.000294148; = p2225*p2185
- p3359: 0; = if(p1232=0;p3309+p3320+p3331+p3342+p3353;0)
- p0986: 0; = IF(p0982+p0985=1;0;IF(p0982+p0985+p0984>1;1-(p0982+p0985);p0984))
- p0574: 0; = IF(p0310<0.5;-SQRT(p0007*EXP(p0442^2*p0008)-p0007);SQRT(p0007*EXP(p0442^2*p0008)-p0007))
- p2028: 0.00287411; = p2015*p2026*p2027/(p0818*1000)
- p3385: 0; = p3366*p1234
- p2524: 0.000208295; = p2328*p1014
- p2308: 0; = p2227*p2215
- p0248: 12.074
- p1643: 0
- p2424: 0; = p2235*p2214
- p3305: 0; = if(and(p1232=0;p3252<>0);1-(p3301+p3302+p3303+p3304);0)
- p4747: 0; = p1780*p3482
- p2189: 0.000586661; = p1053/p0818
- p3346: 0; = if(and(p1232=0;p3256<>0);p3274*(p3281*(p3285*p1256+p3286*(p1253+p1257)+p1258*p3288));0)
- p0129: 16.968
- p3065: 0; = p2284*p1023
- p0810: 0
- p2190: 0.00067151; = 32.065*p2189/(2*14.0067)
- p0009: 21.6068
- p1006: 1.67492e-6; = p1002*p0001*p0004/(p0818*p0002)
- p1269: 0
- p1150: 5.34512e6; = if(p1121=0;p1149*p1146*p1145;0)
- p1938: 0
- p3131: 5.51516e-5; = p2350*p1132
- p3225: 3.89261e-5; = p3221*p1229
- p3127: 1.14747e-6; = p2346*p1082
- p3395: 0; = p3376*p1234
- p1267: 0
- p2324: 2.81133e-5; = p2224*p2191
- p1993: 400
- p3081: 0; = p2300*p1082
- p1597: 0
- p1304: 0; = p1300*p1252/p0818
- p0179: 28.755
- p2279: 0; = p2223*p2185
- p0555: 0; = IF(p0291<0.5;-SQRT(p0007*EXP(p0423^2*p0008)-p0007);SQRT(p0007*EXP(p0423^2*p0008)-p0007))
- p0799: 36.55; = p0139*(1+p0667*p0271/100)
- p0317: 0.5
- p0780: 35.841; = p0120*(1+p0648*p0252/100)
- p2992: 0; = p2406*(p1020+p1022)
- p2641: 0.000928537; = p2250*(p1019+p1021)
- p1774: 0
- p2084: 0.21
- p1702: 0
- p3091: 0; = p2310*p1082
- p0210: 0
- p3315: 0; = if(and(p1232=0;p3253<>0);p3264*p3289;0)
- p2049: 25.6942
- p1955: 0
- p3474: 0; = p3379*p1241
- p4711: 2.29105e-7; = p1950*p3481
- p1686: 0
- p4927: 0; = p1754*p3483
- p1181: 0.00013981
- p2934: 2.64962e-6; = p2348*(p1079+p1081)
- p1094: 3.66752e-6; = IF(p1071=0;p1088*p0001/(p0818*p0002);0)
- p2986: 0; = p2400*(p1020+p1022)
- p1330: 205554; = p1320*p0801
- p0022: 815.543
- p1707: 0
- p0827: 0; = p0818*p0819*p0823
- p1839: 0
- p0775: 0
- p2421: 0; = p2235*p2211
- p0484: 0; = SQRT(2)*(IF((2*p0352-1)<0;-1;IF((2*p0352-1)>0;1;0))*SQRT(SQRT((2/(pi()*0.140012289)+LN(1-(2*p0352-1)^2)/2)^2-LN(1-(2*p0352-1)^2)/0.140012289)-(2/(pi()*0.140012289)+LN(1-(2*p0352-1)^2)/2)))
- p0734: 0
- p0805: 0
- p2323: 0.000111794; = p2224*p2190
- p3110: 0; = p2329*p1023
- p2455: 0.000345199; = p2259*p1073
- p0306: 0.5
- p3069: 0; = p2288*p1023
- p0008: 0.0739645; = (p0007-1.5)/(p0007-1)^2
- p1854: 0
- p5133: 6.16426e-7; = p1754*p3484
- p1308: 0
- p0139: 36.55
- p2982: 0; = p2396*(p1020+p1022)
- p0692: 100; = p0032*(1+p0560*p0164/100)
- p1045: 0.0673925; = IF(p1012=0;IF(p1037+p1044=1;0;IF(p1037+p1044+p1039>1;1-(p1037+p1044);p1039));0)
- p2153: 1.97767e-7; = p2015*p2081*p2115/(p0818*1000)
- p1749: 0
- p2372: 0.00122745; = p2225*p2201
- p0963: 0; = if(and(p0683>0;or(p0807=480;p0807=32;p0807=1;and(p0807=60;p0901<0.03)));p0939;0)
- p1851: 0
- p3434: 0; = p3377*p1239
- p1672: 0
- p0835: 412.598; = -LN(1-p0669/100)/p0834
- p2957: 0.00206752; = p2371*(p1020+p1022)
- p2556: 0.000128321; = p2360*p1014
- p3158: 2.99632e-6; = p2377*p1082
- p1124: 0; = if(p1121=0;p0718/100;0)
- p2944: 0.000666624; = p2358*(p1020+p1022)
- p3105: 0; = p2324*p1023
- p1316: 0; = p1312*p1252/p0818
- p2647: 1.7783e-5; = p2256*(p1019+p1021)
- p3354: 0; = IF((p3350+p3351+p3352+p3353)+IF(p3349=0;0;(p3256*(p3273*(1-p3277))/p3349))>p3256;p3256-(p3350+p3351+p3352+p3353);IF(p3349=0;0;p3256*(p3273*(1-p3277))/p3349))
- p1159: 0.5
- p0448: 0; = SQRT(2)*(IF((2*p0316-1)<0;-1;IF((2*p0316-1)>0;1;0))*SQRT(SQRT((2/(pi()*0.140012289)+LN(1-(2*p0316-1)^2)/2)^2-LN(1-(2*p0316-1)^2)/0.140012289)-(2/(pi()*0.140012289)+LN(1-(2*p0316-1)^2)/2)))
- p1115: 0.237849
- p1251: 0; = if(p1232>0;0;p1246*p0001/(p0818*p0002))
- p0728: 0
- p3160: 4.09552e-6; = p2379*p1082
- p3251: 0; = p1252-(p3252+p3253+p3254+p3255+p3256)
- p3273: 0
- p3020: 0; = p2239*p1023
- p2697: 0; = p2306*(p1078+p1080)
- p3379: 0; = if(p1232=0;p3246*p3361/p0818;0)
- p2799: 0; = p2408*(p1019+p1021)
- p1987: 400
- p4840: 0; = p1873*p3482
- p0430: 0; = SQRT(2)*(IF((2*p0298-1)<0;-1;IF((2*p0298-1)>0;1;0))*SQRT(SQRT((2/(pi()*0.140012289)+LN(1-(2*p0298-1)^2)/2)^2-LN(1-(2*p0298-1)^2)/0.140012289)-(2/(pi()*0.140012289)+LN(1-(2*p0298-1)^2)/2)))
- p2757: 0.000188832; = p2366*(p1019+p1021)
- p2921: 0.000437423; = p2335*(p1020+p1022)
- p1259: 0; = if(p1232>0;0;p0730/100)
- p3122: 2.16643e-6; = p2341*p1082
- p1892: 0
- p3243: 2.81792e-10; = p3234*p1188*p3239/p0818
- p2300: 0; = p2227*p2207
- p2138: 9.38629e-6; = p2015*p2066*p2100/(p0818*1000)
- p1071: 0
- p0478: 0; = SQRT(2)*(IF((2*p0346-1)<0;-1;IF((2*p0346-1)>0;1;0))*SQRT(SQRT((2/(pi()*0.140012289)+LN(1-(2*p0346-1)^2)/2)^2-LN(1-(2*p0346-1)^2)/0.140012289)-(2/(pi()*0.140012289)+LN(1-(2*p0346-1)^2)/2)))
- p0698: 0
- p1779: 0
- p1016: 0.21927; = IF(p1012=0;p0707/100;0)
- p0714: 0
- p3254: 0; = p1252*(p1287*(1-p3247)+p1290*(1-p3248)+p1291*(1-p3249)+p1292*(1-p3250))
- p0244: 14.492
- p1178: 2.11465e-8; = p1176/p0818
- p2775: 5.33441e-6; = p2384*(p1078+p1080)
- p1561: 0
- p1877: 0
- p2181: 286.296; = p0887+p0889+p0893+p2180
- p2034: 0.000360679; = p2015*p2030*p2032/(p0818*1000)
- p1704: 0
- p2477: 0; = p2281*p1014
- p4981: 0; = p1808*p3483
- p1951: 0
- p1189: 0.000193113; = p0801*p0001/(p0818*p0002)
- p2354: 0.00513762; = p2225*p2182
- p2480: 0; = p2284*p1014
- p1156: 0.0719527; = p1064+p1065+p1066+p1067+p1068+p1069+p1070+p1116+p1117+p1118+p1119+p1120+p1154+p1155
- p1727: 0
- p1726: 0
- p3316: 0; = if(and(p1232=0;p3253<>0);1-(p3312+p3313+p3314+p3315);0)
- p2342: 3.25581e-5; = p2228*p2210
- p0990: 0; = p0986*p0886
- p2172: 0.237915; = p2166-(p2167+p2168+p2169+p2170)
- p1040: 0.0238398
- p0576: 0; = IF(p0312<0.5;-SQRT(p0007*EXP(p0444^2*p0008)-p0007);SQRT(p0007*EXP(p0444^2*p0008)-p0007))
- p2920: 3.81555e-5; = p2334*(p1020+p1022)
- p2425: 0; = p2235*p2215
- p0042: 815.543
- p1718: 0
- p1052: 6.28277e6; = IF(p1012=0;p1045*p1036;0)
- p3030: 0; = p2249*p1023
- p1950: 5.27927e-7; = p1542*1000/p0818
- p2862: 0; = p2276*(p1020+p1022)
- p1060: 0.21
- p2961: 7.17786e-5; = p2375*(p1079+p1081)
- p2088: 0.798875
- p1096: 0.00337596
- p3175: 0; = p2394*p1023
- p1905: 0
- p0159: 14.501
- p0006: 15
- p1331: 4.84086e-5; = p1330*p0001/(p0818*p0002)
- p5195: 2.95547e-7; = p1816*p3484
- p1662: 0
- p0726: 0
- p2092: 0.54529
- p0161: 43.895
- p2202: 0.000317373; = 4*1.00794*p2201/(2*14.0067)
- p4265: 0; = p1916*p3479
- p1889: 0
- p0798: 66.465; = p0138*(1+p0666*p0270/100)
- p3216: 0.06; = IF(OR(p1226=0;p1228=0);0;1-p3213-p3214-p3215)
- p3255: 0; = p1252*(p1297*(1-p3247)+p1300*(1-p3248)+p1301*(1-p3249)+p1302*(1-p3250))
- p1307: 0
- p3186: 0; = p2405*p1023
- p0752: 0
- p1140: 0; = if(p1121=0;p1134*p0001/(p0818*p0002);0)
- p2062: 3.76588
- p2682: 0; = p2291*(p1019+p1021)
- p1314: 0; = p1310*p1252/p0818
- p1992: 3900
- p2664: 0; = p2273*(p1128+p1130)
- p0758: 0
- p0737: 0
- p1744: 0
- p2133: 4.82926e-5; = p2015*p2061*p2095/(p0818*1000)
- p2824: 0.000405123; = p2238*(p1020+p1022)
- p3220: 0.000996795; = p3216*p1228
- p2234: 0; = 1-(p2222+p2223+p2224+p2225)
- p0921: 0.136199; = p0679*1000/p0801
- p0503: 0; = SQRT(2)*(IF((2*p0371-1)<0;-1;IF((2*p0371-1)>0;1;0))*SQRT(SQRT((2/(pi()*0.140012289)+LN(1-(2*p0371-1)^2)/2)^2-LN(1-(2*p0371-1)^2)/0.140012289)-(2/(pi()*0.140012289)+LN(1-(2*p0371-1)^2)/2)))
- p2139: 3.36702e-5; = p2015*p2067*p2101/(p0818*1000)
- p0063: 815.543
- p2199: 5.72998e-5; = p1069-p2197-p2198
- p2090: 0.40001
- p2012: 0.202233
- p2030: 6.61
- p3339: 0; = if(and(p1232=0;p3254<>0);p3254*(p3269*p3277-p3334)/p3338;0)
- p2879: 0; = p2293*(p1020+p1022)
- p1832: 0
- p2160: 8.70973e-6; = p2015*p2084*p2122/(p0818*1000)
- p0809: 0
- p3365: 0; = if(p1232=0;p3244*p3359/p0818;0)
- p3374: 0; = if(p1232=0;p3246*p3356/p0818;0)
- p0391: 0.5
- p1014: 0.0755; = IF(p1012=0;p0705/100;0)
- p1613: 0
- p0982: 0; = if(p0886=0;0;min(1;(p0691*p0690*1000*p0693/100)/p0886))
- p1047: 0.317801; = IF(p1012=0;IF(p1037+p1044+p1045+p1046=1;0;IF(p1037+p1044+p1045+p1046+p1041>1;1-(p1037+p1044+p1045+p1046);p1041));0)
- p0531: 0; = SQRT(2)*(IF((2*p0399-1)<0;-1;IF((2*p0399-1)>0;1;0))*SQRT(SQRT((2/(pi()*0.140012289)+LN(1-(2*p0399-1)^2)/2)^2-LN(1-(2*p0399-1)^2)/0.140012289)-(2/(pi()*0.140012289)+LN(1-(2*p0399-1)^2)/2)))
- p2069: 0.190588
- p2898: 0; = p2312*(p1129+p1131)

- p3332: 0; = if(and(p1232=0;p3255<>0);IF((p3328+p3329+p3330+p3331)+(p3255*(p3265*(1-p3277))/p3327)>p3255;p3255-(p3328+p3329+p3330+p3331);p3255*(p3265*(1-p3277))/p3327);0)
- p2700: 0; = p2309*(p1078+p1080)
- p2840: 0.00102848; = p2254*(p1020+p1022)
- p0777: 47.622; = p0117*(1+p0645*p0249/100)
- p1775: 0
- p1998: 454
- p2688: 0; = p2297*(p1078+p1080)
- p0684: 0
- p1372: 69
- p1154: 0.0033992; = if(p1152*p0818=0;0;p1150/(p1152*p0818))
- p0696: 64.748; = p0036*(1+p0564*p0168/100)
- p2762: 0.000579366; = p2371*(p1019+p1021)
- p3258: 0
- p2930: 4.34519e-7; = p2344*(p1079+p1081)
- p0438: 0; = SQRT(2)*(IF((2*p0306-1)<0;-1;IF((2*p0306-1)>0;1;0))*SQRT(SQRT((2/(pi()*0.140012289)+LN(1-(2*p0306-1)^2)/2)^2-LN(1-(2*p0306-1)^2)/0.140012289)-(2/(pi()*0.140012289)+LN(1-(2*p0306-1)^2)/2)))
- p2833: 0.000273255; = p2247*(p1020+p1022)
- p2812: 0; = p2421*(p1078+p1080)
- p1151: 481367; = if(p1121=0;p1149*p1148*p1145;0)
- p1552: 0
- p3192: 0; = p2411*p1023
- p2633: 1.33739e-5; = p2242*(p1019+p1021)
- p2789: 0; = p2398*(p1019+p1021)
- p0724: 0
- p2067: 0.446471
- p2887: 0; = p2301*(p1079+p1081)
- p2438: 4.98978e-6; = p2242*p1014
- p2180: 3.28663e-8; = p3233*p1188/(p0818)
- p0885: 0; = IF(p0689+p0884=100;0;100-(p0689+p0884))
- p1238: 0; = if(p1232>0;0;IF(p1234=1;0;IF(p1234+p1235>1;1-p1234;p1235)))
- p1782: 0
- p2759: 1.78853e-6; = p2368*(p1019+p1021)
- p3228: 0.00013294; = p3224*p1229
- p0030: 50.117
- p1141: 2.45078e-5; = if(p1121=0;p1135*p0001/(p0818*p0002);0)
- p2704: 0; = p2313*(p1128+p1130)
- p3281: 0
- p2457: 0.000928138; = p2261*p1073
- p1963f: 2.55165e-6; = p1647*p1851+p1648*p1852+p1649*p1853+p1650*p1854+p1651*p1855+p1652*p1856+p1653*p1857+p1654*p1858+p1655*p1859+p1656*p1860+p1657*p1861+p1658*p1862+p1659*p1863+p1660*p1864+p1661*p1865+p1662*p1866+p1663*p1867+p1664*p1868+p1665*p1869+p1666*p1870
- p2240: 0.000146323; = p2222*p2185
- p0947: 1.94359e-5; = if(and(p0683=0;or(p0807=480;p0807=32;p0807=1;and(p0807=60;p0901<0.03)));p0935;0)
- p0930: 60094; = p0801*p0924
- p2617: 0; = p2421*p1073
- p1761: 0
- p2261: 0.00188309; = p2226*p2207
- p1113: 0.100377
- p2884: 0; = p2298*(p1079+p1081)
- p3114: 0; = p2333*p1023
- p3291: 0
- p1694: 0
- p3689: 0; = p1962*p3476
- p2659: 2.0554e-5; = p2268*(p1078+p1080)
- p1201: 0.65
- p0103: 815.543
- p4953: 0; = p1780*p3483
- p1049: 0.209016; = IF(p1012=0;IF(p1037+p1044+p1045+p1046+p1047+p1048=1;0;1-(p1037+p1044+p1045+p1046+p1047+p1048));0)
- p2108: 0.826583
- p0800: 23.546; = p0140*(1+p0668*p0272/100)
- p0550: 0; = IF(p0286<0.5;-SQRT(p0007*EXP(p0418^2*p0008)-p0007);SQRT(p0007*EXP(p0418^2*p0008)-p0007))
- p0946: 0.000132173; = if(and(p0683=0;or(p0807=480;p0807=32;p0807=1;and(p0807=60;p0901<0.03)));p0934;0)
- p2145: 4.04717e-5; = p2015*p2073*p2107/(p0818*1000)
- p0899: 3.66734e9; = p0825*p0896+(p0830+p0895)*p0824*p0898
- p3386: 0; = p3367*p1234
- p2194: 0.214362
- p4513: 0; = p1962*p3480
- p3454: 0; = p3378*p1240
- p1685: 0
- p1957: 0
- p5191: 2.11105e-7; = p1812*p3484
- p0148: 0
- p3389: 0; = p3370*p1234
- p0616: 0; = IF(p0352<0.5;-SQRT(p0007*EXP(p0484^2*p0008)-p0007);SQRT(p0007*EXP(p0484^2*p0008)-p0007))
- p1112: 0.209482
- p1118: 0.000486363; = IF(p1071=0;p1108/(p1113*p0818);0)
- p1551: 0
- p1602: 0
- p5337: 1.00065e-6; = p1962*p3484
- p1050: 3.49666e7; = IF(p1012=0;p1037*p1036;0)
- p2047: 3.64673e-12; = p2015*p2045/(p0818*1000000000000)
- p0477: 0; = SQRT(2)*(IF((2*p0345-1)<0;-1;IF((2*p0345-1)>0;1;0))*SQRT(SQRT((2/(pi()*0.140012289)+LN(1-(2*p0345-1)^2)/2)^2-LN(1-(2*p0345-1)^2)/0.140012289)-(2/(pi()*0.140012289)+LN(1-(2*p0345-1)^2)/2)))
- p1254: 0; = if(p1232>0;0;p0736/100)
- p1690: 0
- p0581: 0; = IF(p0317<0.5;-SQRT(p0007*EXP(p0449^2*p0008)-p0007);SQRT(p0007*EXP(p0449^2*p0008)-p0007))
- p3393: 0; = p3374*p1234
- p2730: 0.000280398; = p2339*(p1078+p1080)
- p2796: 0; = p2405*(p1019+p1021)
- p2105: 0.888194
- p2744: 0; = p2353*(p1128+p1130)
- p2702: 0; = p2311*(p1128+p1130)
- p1311: 0; = IF(p1307+p1310=p1266;0;IF(p1307+p1310+p1309>p1266;p1266-(p1307+p1310);p1309))
- p2463: 2.06547e-5; = p2267*p1073
- p3897: 8.41743e-6; = p1754*p3478
- p2369: 1.45067e-5; = p2225*p2198
- p0459: 0; = SQRT(2)*(IF((2*p0327-1)<0;-1;IF((2*p0327-1)>0;1;0))*SQRT(SQRT((2/(pi()*0.140012289)+LN(1-(2*p0327-1)^2)/2)^2-LN(1-(2*p0327-1)^2)/0.140012289)-(2/(pi()*0.140012289)+LN(1-(2*p0327-1)^2)/2)))
- p2969: 3.71462e-7; = p2383*(p1079+p1081)
- p2718: 5.64778e-5; = p2327*(p1019+p1021)
- p0760: 0
- p1629: 0
- p2284: 0; = p2223*p2190
- p3018: 0; = p2237*p1023
- p4704: 3.43657e-7; = p1943*p3481
- p2500: 0; = p2304*p1073
- p1217: 0
- p1712: 0.60504
- p1089: 6.29185e-5; = IF(p1071=0;p1083*p0001/(p0818*p0002);0)
- p1979: 0; = p0973
- p1195: 0.45
- p3132: 7.77201e-5; = p2351*p1132
- p1676: 0
- p1840: 0
- p3604: 0; = p1873*p3476
- p1628: 0
- p2286: 0; = p2223*p2192
- p1079: 0.20157; = IF(p1071=0;IF(p1073+p1078=1;0;IF(p1073+p1078+p1075>1;1-(p1073+p1078);p1075));0)
- p1873: 3.69549e-5; = p1465*1000/p0818
- p2580: 9.49796e-6; = p2384*p1073
- p1036: 9.32267e7; = IF(p1012=0;p0795*p0702*1000*p0796/100;0)
- p2226: 0.500563; = if(p0774*p0778+p0775*p0779+p0776*p0780+p0777*p0781=0;0;p0778*p0774/(p0774*p0778+p0775*p0779+p0776*p0780+p0777*p0781))
- p2312: 0; = p2231*p2219
- p0839: 0.66262; = p0838/p0818
- p0449: 0; = SQRT(2)*(IF((2*p0317-1)<0;-1;IF((2*p0317-1)>0;1;0))*SQRT(SQRT((2/(pi()*0.140012289)+LN(1-(2*p0317-1)^2)/2)^2-LN(1-(2*p0317-1)^2)/0.140012289)-(2/(pi()*0.140012289)+LN(1-(2*p0317-1)^2)/2)))
- p2218: 0.00141092; = p1150/p0818
- p2222: 0.276892; = if(p0765*p0769+p0766*p0770+p0767*p0771+p0768*p0772=0;0;p0769*p0765/(p0765*p0769+p0766*p0770+p0767*p0771+p0768*p0772))
- p2169: 0.000914967; = p2166*(p0908)
- p0903: 0.0129401
- p2979: 0; = p2393*(p1020+p1022)
- p0668: 0; = IF(p0404<0.5;-SQRT(p0007*EXP(p0536^2*p0008)-p0007);SQRT(p0007*EXP(p0536^2*p0008)-p0007))
- p3063: 0; = p2282*p1023
- p2635: 3.28717e-5; = p2244*(p1019+p1021)
- p1683: 0
- p3031: 0; = p2250*p1023
- p3350: 0; = if(and(p1232=0;p3256<>0);p3256*(p3273*p3277-p3345)/p3349;0)
- p2814: 0; = p2423*(p1078+p1080)
- p1586: 0
- p4541: 7.90411e-6; = p1780*p3481
- p3227: 3.35929e-5; = p3223*p1229
- p0056: 23.546
- p2819: 0; = p2428*(p1128+p1130)
- p3483: 0; = if(p1328+p1330+p1332+p1334+p1336+p1338+p1340+p1342+p1344=0;0;p1342/(p1328+p1330+p1332+p1334+p1336+p1338+p1340+p1342+p1344))
- p1886: 0
- p4129: 0; = p1780*p3479
- p3417: 0; = p3379*p1238
- p1312: 0; = IF(p1307+p1310+p1311=p1266;0;p1266-(p1307+p1310+p1311))
- p2908: 7.05301e-5; = p2322*(p1020+p1022)
- p0136: 97.154
- p1580: 0
- p2825: 3.06771e-5; = p2239*(p1020+p1022)
- p1786: 0
- p1306: 0; = p1302*p1252/p0818
- p2015: 4.6051e8; = p0830*p2011*p2013
- p2909: 8.0731e-5; = p2323*(p1020+p1022)
- p2741: 0; = p2350*(p1128+p1130)
- p1637: 0
- p0355: 0.5
- p0214: 5.633
- p0152: 0
- p2907: 0.00036709; = p2321*(p1020+p1022)
- p2039: 7.36482e-5; = p2015*p2037*p2038/(p0818*1000)
- p3096: 0; = p2315*p1023
- p1715: 0
- p1192: 2.72099e-8; = p1188*p1191/p0818
- p1700: 0
- p2841: 0.000440933; = p2255*(p1020+p1022)
- p1012: 0
- p2131: 3.17748e-5; = p2015*p2059*p2093/(p0818*1000)
- p2255: 0.000610592; = p2222*p2201
- p1906: 0
- p0821: 1.51364
- p2864: 0; = p2278*(p1020+p1022)
- p2017: 2.11213e8; = p2015*p0898
- p1769: 0
- p0631: 0; = IF(p0367<0.5;-SQRT(p0007*EXP(p0499^2*p0008)-p0007);SQRT(p0007*EXP(p0499^2*p0008)-p0007))
- p1890: 0
- p1127: 0; = if(p1121=0;p0721/100;0)
- p2915: 1.90895e-6; = p2329*(p1020+p1022)
- p1093: 0; = IF(p1071=0;p1087*p0001/(p0818*p0002);0)
- p1577: 0
- p3167: 3.70179e-6; = p2386*p1082
- p0447: 0; = SQRT(2)*(IF((2*p0315-1)<0;-1;IF((2*p0315-1)>0;1;0))*SQRT(SQRT((2/(pi()*0.140012289)+LN(1-(2*p0315-1)^2)/2)^2-LN(1-(2*p0315-1)^2)/0.140012289)-(2/(pi()*0.140012289)+LN(1-(2*p0315-1)^2)/2)))
- p1612: 0.5
- p1132: 0.29311; = if(p1121=0;IF(p1123+p1128+p1129+p1130+p1131=1;0;1-(p1123+p1128+p1129+p1130+p1131));0)
- p3267: 0
- p1593: 0
- p2972: 2.59718e-5; = p2386*(p1079+p1081)
- p3014: 0; = p2428*(p1129+p1131)
- p1569: 0
- p1242: 0; = if(p1232>0;0;p1234*(p0725/100)*p0723*1000)
- p0889: 198.374; = 1000*p0888*p0001*p0003*p0004/(p0818*p0002)
- p2454: 0.000381679; = p2258*p1073
- p0587: 0; = IF(p0323<0.5;-SQRT(p0007*EXP(p0455^2*p0008)-p0007);SQRT(p0007*EXP(p0455^2*p0008)-p0007))
- p0671: 0
- p0273: 0.5
- p2394: 0; = p2234*p2183
- p1783: 0
- p0847: 0
- p2162: 1.98185e-6; = p2015*p2086*p2124/(p0818*1000)
- p3178: 0; = p2397*p1023
- p2786: 0; = p2395*(p1019+p1021)
- p1604: 0.92902
- p2829: 0.000610543; = p2243*(p1020+p1022)
- p1177: 0.000193113; = p0801*p0001/(p0818*p0002)
- p1002: 280004; = p0996*p0888
- p2519: 8.44045e-6; = p2323*p1014
- p0670: 0
- p1917: 0
- p2359: 0.000132858; = p2225*p2187
- p2095: 0.765734
- p2595: 0; = p2399*p1014
- p2329: 2.64346e-6; = p2224*p2197
- p0272: 17.907
- p1789: 0
- p3016: 0; = p2430*(p1129+p1131)
- p2141: 2.114e-5; = p2015*p2069*p2103/(p0818*1000)
- p0650: 0; = IF(p0386<0.5;-SQRT(p0007*EXP(p0518^2*p0008)-p0007);SQRT(p0007*EXP(p0518^2*p0008)-p0007))
- p1811: 0
- p3402: 0; = p3364*p1238
- p1184: 3.02618e-8; = p1182/p0818
- p3310: 0; = if(and(p1232=0;p3252<>0);IF((p3306+p3307+p3308+p3309)+(p3252*(p3257*(1-p3277))/p3305)>p3252;p3252-(p3306+p3307+p3308+p3309);p3252*(p3257*(1-p3277))/p3305);0)
- p1315: 0; = p1311*p1252/p0818
- p2583: 5.53867e-6; = p2387*p1073
- p2173: 0.121937; = p0895*p0898/p0818
- p1823: 0
- p2823: 0.00184556; = p2237*(p1020+p1022)
- p3443: 0; = p3367*p1240
- p3210: 0; = p2429*p1132
- p4971: 0; = p1798*p3483
- p2995: 0; = p2409*(p1020+p1022)
- p2996: 0; = p2410*(p1020+p1022)
- p1572: 0
- p3355: 0; = if(and(p1232=0;p3256<>0);p3256-(p3350+p3351+p3352+p3353+p3354);0)
- p1959: 498.501; = if(p0738*p0740*p0739>0;p0738*1000*(p0740/100)*p0739/1000;p1958)
- p3061: 0; = p2280*p1023
- p1790: 0
- p3288: 0
- p1253: 0; = if(p1232>0;0;p0735/100)
- p0632: 0; = IF(p0368<0.5;-SQRT(p0007*EXP(p0500^2*p0008)-p0007);SQRT(p0007*EXP(p0500^2*p0008)-p0007))
- p2075: 0.072
- p3062: 0; = p2281*p1023
- p2932: 8.05065e-6; = p2346*(p1079+p1081)
- p2798: 0; = p2407*(p1019+p1021)
- p1299: 0
- p0532: 0; = SQRT(2)*(IF((2*p0400-1)<0;-1;IF((2*p0400-1)>0;1;0))*SQRT(SQRT((2/(pi()*0.140012289)+LN(1-(2*p0400-1)^2)/2)^2-LN(1-(2*p0400-1)^2)/0.140012289)-(2/(pi()*0.140012289)+LN(1-(2*p0400-1)^2)/2)))
- p0721: 0
- p0137: 37.978
- p1225: 1.088; = IF(p1221=0;0;p1223+1.2*p1224)
- p1318: 0; = p1317*p0001/(p0818*p0002)
- p2285: 0; = p2223*p2191
- p1920: 0
- p2916: 3.13324e-6; = p2330*(p1020+p1022)
- p0371: 0.5
- p0831: 0.137; = 1-p0824
- p0002: 0.453592
- p1634: 0
- p2974: 2.0301e-5; = p2388*(p1079+p1081)
- p1765: 0
- p1706: 0
- p1772: 0
- p3164: 5.2945e-8; = p2383*p1082
- p3745: 7.69797e-8; = p1808*p3477
- p0792: 0
- p3010: 0; = p2424*(p1079+p1081)
- p2126: 8.83696e-5; = p2015*p2054*p2088/(p0818*1000)
- p4335: 0; = p1780*p3480
- p2065: 0.0758824
- p0323: 0.5
- p1928: 0
- p1172: 1.10013e-7; = p1170/p0818
- p0913: 0.0120403
- p1056: 1.94859e7; = IF(p1012=0;p1049*p1036;0)
- p1289: 0
- p0742: 84.305; = p0082*(1+p0610*p0214/100)
- p5338: 2.2845e-6; = p1963*p3484
- p3375: 0; = if(p1232=0;p3246*p3357/p0818;0)
- p2198: 2.60619e-5; = 22.98976928*p2197/14.0067
- p2661: 6.76471e-6; = p2270*(p1078+p1080)
- p2398: 0; = p2234*p2187
- p1737: 0
- p2708: 5.16861e-6; = p2317*(p1019+p1021)
- p3401: 0; = p3363*p1238
- p0036: 64.748
- p3120: 2.91014e-5; = p2339*p1082
- p3222: 0.224242; = IF(p3216=0;0;p1223*40.078/100.0869)
- p1054: 2.96275e7; = IF(p1012=0;p1047*p1036;0)
- p1295: 0; = p1291*p1252/p0818
- p2270: 2.44372e-5; = p2226*p2216
- p2747: 1.72811e-5; = p2356*(p1019+p1021)
- p2201: 0.00220517; = 12.01*p2200/(2*14.0067)
- p1711: 0
- p2437: 3.46699e-5; = p2241*p1014
- p2516: 3.00011e-6; = p2320*p1014
- p1123: 0.16496; = if(p1121=0;p0717/100;0)
- p2281: 0; = p2223*p2187
- p3303: 0; = if(and(p1232=0;p3252<>0);p3259*p3289;0)
- p2514: 6.64225e-6; = p2318*p1014
- p2020: 1.19372e7; = p2015*p2018*p2019
- p1738: 0
- p3028: 0; = p2247*p1023
- p0828: 0; = if(p0827=0;0;p0819-p0827/p0818)
- p1104: 0.261145; = IF(p1071=0;IF(p1096+p1101+p1102+p1103=1;0;1-(p1096+p1101+p1102+p1103));0)
- p2897: 0; = p2311*(p1129+p1131)
- p0416: 0; = SQRT(2)*(IF((2*p0284-1)<0;-1;IF((2*p0284-1)>0;1;0))*SQRT(SQRT((2/(pi()*0.140012289)+LN(1-(2*p0284-1)^2)/2)^2-LN(1-(2*p0284-1)^2)/0.140012289)-(2/(pi()*0.140012289)+LN(1-(2*p0284-1)^2)/2)))
- p1029: 0; = IF(p1012=0;IF(p0801<p1023*(p0704/100)*p0703*1000;p0801;p1023*(p0704/100)*p0703*1000);0)
- p2690: 0; = p2299*(p1078+p1080)
- p2446: 0.000346435; = p2250*p1014
- p1102: 0.020586; = IF(p1071=0;IF(p1096+p1101=1;0;IF(p1096+p1101+p1098>1;1-(p1096+p1101);p1098));0)
- p2336: 0.000416546; = p2228*p2204
- p0923: 0.100645; = IF(p0918=1;0;IF(p0918+p0919>1;1-p0918;p0919))
- p3139: 0; = p2358*p1023
- p0344: 0.5
- p0842: 0.28492
- p3155: 0; = p2374*p1023
- p2499: 0; = p2303*p1073
- p0404: 0.5
- p0908: 0.00197823
- p1696: 0
- p1952: 0
- p1734: 0
- p1858: 0
- p2520: 2.12256e-6; = p2324*p1014
- p2119: 0.679049
- p2290: 0; = p2223*p2197
- p5131: 0; = p1962*p3483
- p1404: 25
- p2306: 0; = p2227*p2213
- p0138: 66.465
- p2029: 4.03
- p0932: 0; = p0801*p0926
- p1794: 0
- p1614: 0
- p2411: 0; = p2234*p2201
- p1176: 80.1113; = p1175*p0801
- p2720: 5.34931e-7; = p2329*(p1019+p1021)
- p2495: 0; = p2299*p1073
- p2450: 0.000107528; = p2254*p1014
- p3079: 0; = p2298*p1082
- p4926: 0; = p1963*p3482
- p2427: 0; = p2235*p2217
- p2233: 0.86664; = if(p0783*p0787+p0784*p0788+p0785*p0789+p0786*p0790=0;0;p0790*p0786/(p0783*p0787+p0784*p0788+p0785*p0789+p0786*p0790))
- p3019: 0; = p2238*p1023
- p1233: 9.46871e-7; = p1232*p0001/(p0818*p0002)
- p2248: 0.00216546; = p2222*p2193
- p3409: 0; = p3371*p1238
- p3194: 0; = p2413*p1023
- p2403: 0; = p2234*p2192
- p2468: 0; = p2272*p1123
- p0753: 0
- p1781: 0
- p2977: 5.96764e-5; = p2391*(p1129+p1131)
- p3429: 0; = p3372*p1239
- p4161: 0; = p1812*p3479
- p0718: 0
- p1878: 0
- p1320: 0.250675; = IF(((p0745*1000*p0747/100)+(p0754*1000*p0756/100))/p0801<0;0;((p0745*1000*p0747/100)+(p0754*1000*p0756/100))/p0801)
- p1932: 0
- p2776: 9.45167e-6; = p2385*(p1078+p1080)
- p1807: 0
- p3050: 8.05007e-6; = p2269*p1082
- p3099: 0; = p2318*p1023
- p0380: 0.5
- p0872: 0; = p0864*p0856
- p3853: 2.56599e-8; = p1916*p3477
- p2644: 3.21061e-6; = p2253*(p1019+p1021)
- p0751: 43.397; = p0091*(1+p0619*p0223/100)
- p1129: 0.54193; = if(p1121=0;IF(p1123+p1128=1;0;IF(p1123+p1128+p1125>1;1-(p1123+p1128);p1125));0)
- p0676: 60.094; = p0016*(1+p0544*p0148/100)
- p1589: 0
- p4157: 0; = p1808*p3479
- p0212: 5.81
- p0284: 0.5
- p3647: 0; = p1916*p3476
- p2470: 0; = p2274*p1123
- p3691: 1.87317e-6; = p1754*p3477
- p2746: 0.000228215; = p2355*(p1019+p1021)
- p1275: 0; = p1271*p1252/p0818
- p3459: 0; = p3364*p1241
- p2561: 0.000328663; = p2365*p1014
- p2771: 1.78448e-5; = p2380*(p1078+p1080)
- p0167: 14.369
- p0299: 0.5
- p2510: 0; = p2314*p1123
- p2885: 0; = p2299*(p1079+p1081)
- p3345: 0; = if(and(p1232=0;p3256<>0);p3273*p3277*p3293;0)
- p2052: 0.000149727; = p2015*p2049*(1-p2050)/(p0818*1000)
- p1849: 0
- p3324: 0; = if(and(p1232=0;p3255<>0);p3266*(p3279*(p3284*p1256+p3286*(p1253+p1257)+p1258*p3288+p3299*p3287));0)
- p0293: 0.5
- p0732: 0
- p3895: 3.04073e-6; = p1962*p3477
- p2059: 1.00168
- p2082: 0.285294
- p2203: 0.00363843; = p1070-p2200-p2201-p2202
- p0593: 0; = IF(p0329<0.5;-SQRT(p0007*EXP(p0461^2*p0008)-p0007);SQRT(p0007*EXP(p0461^2*p0008)-p0007))
- p0690: 50.117; = p0030*(1+p0558*p0162/100)
- p3252: 0; = p1252*(p1267*(1-p3247)+p1270*(1-p3248)+p1271*(1-p3249)+p1272*(1-p3250))
- p2739: 3.63878e-6; = p2348*(p1078+p1080)
- p0390: 0.5
- p2782: 0; = p2391*(p1128+p1130)
- p1865: 0
- p0572: 0; = IF(p0308<0.5;-SQRT(p0007*EXP(p0440^2*p0008)-p0007);SQRT(p0007*EXP(p0440^2*p0008)-p0007))
- p4569: 3.43657e-7; = p1808*p3481
- p0049: 50.287
- p1946: 0
- p2085: 0.0335294
- p2483: 0; = p2287*p1014
- p0405: 0; = SQRT(2)*(IF((2*p0273-1)<0;-1;IF((2*p0273-1)>0;1;0))*SQRT(SQRT((2/(pi()*0.140012289)+LN(1-(2*p0273-1)^2)/2)^2-LN(1-(2*p0273-1)^2)/0.140012289)-(2/(pi()*0.140012289)+LN(1-(2*p0273-1)^2)/2)))
- p3048: 1.20396e-6; = p2267*p1082
- p2453: 7.60626e-5; = p2257*p1014
- p2695: 0; = p2304*(p1078+p1080)
- p0716: 23.546; = p0056*(1+p0584*p0188/100)
- p1701: 0
- p0461: 0; = SQRT(2)*(IF((2*p0329-1)<0;-1;IF((2*p0329-1)>0;1;0))*SQRT(SQRT((2/(pi()*0.140012289)+LN(1-(2*p0329-1)^2)/2)^2-LN(1-(2*p0329-1)^2)/0.140012289)-(2/(pi()*0.140012289)+LN(1-(2*p0329-1)^2)/2)))
- p2142: 2.80108e-5; = p2015*p2070*p2104/(p0818*1000)
- p0118: 48.649
- p0949: 2.63017e-5; = if(and(p0683=0;or(p0807=480;p0807=32;p0807=1;and(p0807=60;p0901<0.03)));p0937;0)
- p1571: 0
- p2508: 0; = p2312*p1123
- p1835: 0
- p2076: 0.057
- p2536: 8.2188e-5; = p2340*p1073
- p2182: 0.00922991; = p1050/p0818
- p3224: 0.501945; = IF(p3216=0;0;1-p3221-p3222-p3223)
- p1985: 2.72831e8; = (if(p1057=0;0;p1050/p1057)+if(p1058=0;0;p1051/p1058)+if(p1059=0;0;p1052/p1059)+if(p1060=0;0;p1053/p1060)+if(p1061=0;0;p1054/p1061)+if(p1062=0;0;p1055/p1062)+if(p1063=0;0;p1056/p1063))*(1+p1157)
- p2337: 0.000376734; = p2228*p2205
- p2004: 30
- p0687: 12.305; = p0027*(1+p0555*p0159/100)
- p0116: 28.505
- p0057: 16.496
- p3234: 0.39606; = 1-p3233
- p1133: 31676.9; = if(p1121=0;p1123*(p0716/100)*p0703*1000;0)
- p1015: 0.0876; = IF(p1012=0;p0706/100;0)
- p3265: 0
- p0960: 0; = if(and(p0683>0;or(p0807=480;p0807=32;p0807=1;and(p0807=60;p0901<0.03)));p0936;0)
- p0679: 111.683; = p0019*(1+p0547*p0151/100)
- p3352: 0; = if(and(p1232=0;p3256<>0);p3256*(p3275-p3347)/p3349;0)
- p0787: 31.414; = p0127*(1+p0655*p0259/100)
- p1864: 0
- p2694: 0; = p2303*(p1078+p1080)
- p0754: 0
- p0526: 0; = SQRT(2)*(IF((2*p0394-1)<0;-1;IF((2*p0394-1)>0;1;0))*SQRT(SQRT((2/(pi()*0.140012289)+LN(1-(2*p0394-1)^2)/2)^2-LN(1-(2*p0394-1)^2)/0.140012289)-(2/(pi()*0.140012289)+LN(1-(2*p0394-1)^2)/2)))
- p0665: 0; = IF(p0401<0.5;-SQRT(p0007*EXP(p0533^2*p0008)-p0007);SQRT(p0007*EXP(p0533^2*p0008)-p0007))
- p2733: 9.01274e-6; = p2342*(p1078+p1080)
- p3093: 0; = p2312*p1132
- p0834: 0.00059
- p2626: 0; = p2430*p1123
- p1875: 0
- p3432: 0; = p3375*p1239
- p1870: 0
- p2252: 7.21632e-6; = p2222*p2198
- p3438: 0; = p3362*p1240
- p0182: 7.802
- p1867: 0
- p1277: 0
- p2761: 6.45419e-6; = p2370*(p1019+p1021)
- p1977: 206.164; = p1252+p1188
- p2990: 0; = p2404*(p1020+p1022)
- p0722: 0
- p0864: 0; = IF(p0858=1;0;IF(p0858+p0859>1;1-p0858;p0859))
- p3421: 0; = p3364*p1239
- p1322: 0; = IF(((p0745*1000*p0749/100)+(p0754*1000*p0758/100))/p0801<0;0;((p0745*1000*p0749/100)+(p0754*1000*p0758/100))/p0801)
- p2041: 5.34854e-5; = p2015*p2040/(p0818*1000)
- p3180: 0; = p2399*p1023
- p2936: 0.00010197; = p2350*(p1129+p1131)
- p2512: 2.54665e-5; = p2316*p1014
- p0547: 0; = IF(p0283<0.5;-SQRT(p0007*EXP(p0415^2*p0008)-p0007);SQRT(p0007*EXP(p0415^2*p0008)-p0007))
- p2772: 7.70482e-6; = p2381*(p1078+p1080)
- p3088: 0; = p2307*p1082
- p3187: 0; = p2406*p1023
- p2360: 0.00169961; = p2225*p2188
- p0445: 0; = SQRT(2)*(IF((2*p0313-1)<0;-1;IF((2*p0313-1)>0;1;0))*SQRT(SQRT((2/(pi()*0.140012289)+LN(1-(2*p0313-1)^2)/2)^2-LN(1-(2*p0313-1)^2)/0.140012289)-(2/(pi()*0.140012289)+LN(1-(2*p0313-1)^2)/2)))
- p3230: 1.10013e-7; = p1170/p0818
- p1806: 0
- p1907: 0
- p3128: 4.33018e-6; = p2347*p1082
- p2629: 0.000113525; = p2238*(p1019+p1021)
- p3205: 0; = p2424*p1082
- p2307: 0; = p2227*p2214
- p2027: 0.428799
- p1682: 0
- p1100: 0.261145
- p0343: 0.5
- p2406: 0; = p2234*p2196
- p0926: 0; = IF(p0918+p0923+p0924+p0925=1;0;IF(p0918+p0923+p0924+p0925+p0922>1;1-(p0918+p0923+p0924+p0925);p0922))
- p1692: 0
- p1644: 0
- p1981: 400
- p4086: 3.45922e-7; = p1943*p3478
- p1984: 30
- p1196: 0.59
- p2124: 0.263965
- p0570: 0; = IF(p0306<0.5;-SQRT(p0007*EXP(p0438^2*p0008)-p0007);SQRT(p0007*EXP(p0438^2*p0008)-p0007))
- p1963a: 1.51068e-5; = p1550*p1754+p1551*p1755+p1552*p1756+p1553*p1757+p1554*p1758+p1555*p1759+p1556*p1760+p1557*p1761+p1558*p1762+p1559*p1763+p1560*p1764+p1561*p1765+p1562*p1766+p1563*p1767+p1564*p1768+p1565*p1769+p1566*p1770+p1567*p1771+p1568*p1772
- p0389: 0.5
- p0125: 18.312
- p3142: 0; = p2361*p1023
- p3444: 0; = p3368*p1240
- p2063: 2.01468
- p2649: 0.000214365; = p2258*(p1078+p1080)
- p3054: 0; = p2273*p1132
- p2157: 5.09828e-6; = p2015*p2086*p2119/(p0818*1000)
- p2528: 6.46513e-5; = p2332*p1014
- p1584: 0
- p1037: 0.375071
- p0320: 0.5
- p2523: 2.10717e-5; = p2327*p1014
- p4621: 2.86381e-6; = p1860*p3481
- p0745: 2114.53; = p0085*(1+p0613*p0217/100)
- p1973: 0; = if(p0807=480;p1968*p0001/(p0818*p0002);0)
- p2005: 769654; = p1963*p0818+p1959*1000+p1170+p1176+p1182
- p0664: 0; = IF(p0400<0.5;-SQRT(p0007*EXP(p0532^2*p0008)-p0007);SQRT(p0007*EXP(p0532^2*p0008)-p0007))
- p2760: 2.93559e-6; = p2369*(p1019+p1021)
- p3124: 1.22494e-5; = p2343*p1082
- p2651: 6.27824e-5; = p2260*(p1078+p1080)
- p2409: 0; = p2234*p2199
- p0901: 0.0206965
- p1075: 0.20157; = IF(p1071=0;p0713/100;0)
- p0562: 0; = IF(p0298<0.5;-SQRT(p0007*EXP(p0430^2*p0008)-p0007);SQRT(p0007*EXP(p0430^2*p0008)-p0007))
- p2950: 0.000549316; = p2364*(p1020+p1022)
- p1160: 0.045332; = (p1156+p1158)*p1159
- p3336: 0; = IF(or(p3254=0;p1232>0);0;p3271*p3289)
- p1605: 0
- p0415: 0; = SQRT(2)*(IF((2*p0283-1)<0;-1;IF((2*p0283-1)>0;1;0))*SQRT(SQRT((2/(pi()*0.140012289)+LN(1-(2*p0283-1)^2)/2)^2-LN(1-(2*p0283-1)^2)/0.140012289)-(2/(pi()*0.140012289)+LN(1-(2*p0283-1)^2)/2)))
- p0439: 0; = SQRT(2)*(IF((2*p0307-1)<0;-1;IF((2*p0307-1)>0;1;0))*SQRT(SQRT((2/(pi()*0.140012289)+LN(1-(2*p0307-1)^2)/2)^2-LN(1-(2*p0307-1)^2)/0.140012289)-(2/(pi()*0.140012289)+LN(1-(2*p0307-1)^2)/2)))
- p2538: 1.60472e-5; = p2342*p1073
- p0393: 0.5
- p2945: 9.59423e-5; = p2359*(p1020+p1022)
- p1933: 0
- p2474: 0; = p2278*p1014
- p2051: 0.0029736; = p2015*p2049*p2050/(p0818*1000)
- p3468: 0; = p3373*p1241
- p2515: 2.08453e-5; = p2319*p1014
- p1168: 9.32522e-7; = p1164*p1167/p0818
- p1607: 0
- p1921: 0
- p1904: 0
- p0327: 0.5
- p3154: 0; = p2373*p1023
- p2147: 7.23438e-6; = p2015*p2075*p2109/(p0818*1000)
- p1619: 0
- p0708: 11.476; = p0048*(1+p0576*p0180/100)
- p0785: 18.312; = p0125*(1+p0653*p0257/100)
- p0307: 0.5
- p3111: 0; = p2330*p1023
- p1941: 0
- p3240: 2.54532e-9; = p3234*p1188*p3235/p0818
- p2106: 0.856281
- p0856: 820000; = p0801
- p1578: 0
- p2677: 0; = p2286*(p1019+p1021)
- p0243: 19.079
- p2400: 0; = p2234*p2189
- p2719: 0.000558285; = p2328*(p1019+p1021)
- p1074: 0.27682; = IF(p1071=0;p0712/100;0)
- p2422: 0; = p2235*p2212
- p0005: 1.60934
- p2797: 0; = p2406*(p1019+p1021)
- p1943: 7.91891e-7; = p1535*1000/p0818
- p2581: 1.68288e-5; = p2385*p1073
- p1944: 0
- p0717: 16.496; = p0057*(1+p0585*p0189/100)
- p0987: 0; = if(p0978>0;0;if(and(p0687=0;p0691=0;p0695=0;p0699=0);0;IF(p0982+p0985+p0986=1;0;1-(p0982+p0985+p0986))))
- p1716: 0
- p0507: 0; = SQRT(2)*(IF((2*p0375-1)<0;-1;IF((2*p0375-1)>0;1;0))*SQRT(SQRT((2/(pi()*0.140012289)+LN(1-(2*p0375-1)^2)/2)^2-LN(1-(2*p0375-1)^2)/0.140012289)-(2/(pi()*0.140012289)+LN(1-(2*p0375-1)^2)/2)))
- p1119: 0.00716124; = IF(p1071=0;p1109/(p1114*p0818);0)
- p3204: 0; = p2423*p1082
- p2619: 0; = p2423*p1073
- p3446: 0; = p3370*p1240
- p1796: 0
- p2362: 0.000373781; = p2225*p2190
- p2642: 8.89696e-7; = p2251*(p1019+p1021)
- p2662: 6.06285e-5; = p2271*(p1078+p1080)
- p3405: 0; = p3367*p1238
- p1762: 0
- p1678: 0
- p1340: 0; = p1325*p0801
- p1222: 0.94

## Reference product
- winter wheat; at harvest in 1998; at farm; 86%-90% moisture: 1 kg

## Inputs from technosphere
- CUTOFF potassic fertilizer, potassium chloride; at point-of-sale: 0.0033992 kg; = p1154
- CUTOFF sowing svc; for mulch till, 1998 winter wheat: 1.94359e-5 ha; = p0947
- CUTOFF phosphatic fertilizer, superphos. grades 22% and under; at point-of-sale: 9.1724e-5 kg; = p1116
- CUTOFF nitrogenous fertilizer, ammonium sulfate; at point-of-sale: 0.00279362 kg; = p1067
- CUTOFF harvest; winter wheat residue management: 0.000193113 ha; = p1975
- CUTOFF apply single or mixed P fertilizer; unspec. method: 3.66752e-6 ha; = p1094
- CUTOFF gypsum storage: 9.32522e-7 kg*a; = p1168
- CUTOFF regional or national trucking; class 8, average fuel: 0.00891084 metric ton*km; = p2009
- CUTOFF apply K fertilizer; no broadcast application: 7.46001e-6 ha; = p1139
- CUTOFF apply zinc compounds; unspecified method: 0.000193113 ha; = p1183
- CUTOFF pesticide, Difenzoquat; at point-of-sale; kg AI: 9.23873e-6 kg; = p1816
- winter wheat residue; at harvest in 1998; at farm; 83%-90% moisture: 0.66262 kg; = p0839
- CUTOFF apply pesticide; broadcast by air: 4.84086e-5 ha; = p1331
- CUTOFF apply pesticide; unspecified application methods: 1.59304e-5 ha; = p1345
- CUTOFF apply sulfur; unspecified method: 0.000193113 ha; = p1171
- CUTOFF pesticide storage: 0.000137206 kg*a; = p1965
- CUTOFF zinc compounds; at point-of-sale: 3.02618e-8 kg; = p1184
- CUTOFF nitrogenous fertilizer, aqueous ammonia; at point-of-sale: 0.000681868 kg; = p1065
- CUTOFF sowing svc; for unspec till, 1998 winter wheat: 1.04964e-6 ha; = p0951
- CUTOFF sulfuric acid storage: 1.05732e-8 kg*a; = p1180
- CUTOFF prepare soil; for conventional till, wheat; <15% residue: 0.000132173 ha; = p0934
- CUTOFF prepare soil; for no-till, wheat: 1.41523e-5 ha; = p0936
- CUTOFF phosphatic fertilizer, diammonium phosphate; at point-of-sale: 0.00716124 kg; = p1119
- CUTOFF liming materials storage: 0.00843905 kg*a; = p1231
- CUTOFF pesticide, Dicamba; at point-of-sale; kg AI: 7.91891e-7 kg; = p1808
- CUTOFF phosphatic fertilizer, other single phosphates; at point-of-sale: 0.000486363 kg; = p1118
- CUTOFF pesticide, Diclofop-methyl; at point-of-sale; kg AI: 6.59909e-6 kg; = p1812
- CUTOFF fertilizer filler materials; at point-of-sale: 0.0187114 kg; = p1158
- CUTOFF apply N fertilizer; broadcast without incorporation: 4.09151e-5 ha; = p1032
- CUTOFF pesticide, Tribenuron-methyl; at point-of-sale; kg AI: 5.27927e-7 kg; = p1950
- CUTOFF apply pesticide; broadcast with incorporation: 0.000217532 ha; = p1333
- CUTOFF pesticide, Bromoxynil; at point-of-sale; kg AI: 1.82135e-5 kg; = p1780
- CUTOFF fertilizer storage: 0.045332 kg*a; = p1160
- CUTOFF apply gypsum; unspecified method: 0.000193113 ha; = p1165
- CUTOFF pesticide, 2,4-D; at point-of-sale; kg AI: 1.92693e-5 kg; = p1754
- CUTOFF prepare soil; for mulch till, wheat: 1.94359e-5 ha; = p0935
- CUTOFF apply P fertilizer; broadcast without incorporation: 2.57314e-5 ha; = p1091
- CUTOFF apply N fertilizer; no broadcast application: 1.40881e-5 ha; = p1030
- CUTOFF apply single or mixed K fertilizer; unspec. method: 1.32554e-5 ha; = p1144
- CUTOFF sewage sludge; at point-of-sale: 5.44199e-8 kg; = p1190
- CUTOFF sulfuric acid; at point-of-sale: 2.11465e-8 kg; = p1178
- CUTOFF nitrogenous fertilizer, anhydrous ammonia; at point-of-sale: 0.011256 kg; = p1064
- CUTOFF local area trucking; class 6, average fuel: 0.00198995 metric ton*km; = p2010
- CUTOFF irrigate; gravity, surface water source, in 1998: 1.67492e-6 ha-m; = p1006
- CUTOFF apply mixed N fertilizer; without incorporation: 9.3834e-5 ha; = p1034
- CUTOFF sewage sludge storage: 2.72099e-8 kg*a; = p1192
- CUTOFF irrigate; unspecified irrigation method, surface water source, in 1998: 7.0944e-7 ha-m; = p1009
- CUTOFF harvest; winter: 0.000181338 ha; = p1971
- CUTOFF apply liming materials; unspecified method: 0.000193113 ha; = p1227
- CUTOFF N inhibitor appl svc; unspec rate & type, 1998 winter wheat: 0.00021645 ha; = p1162
- CUTOFF apply N fertilizer; broadcast with incorporation: 1.63459e-5 ha; = p1031
- CUTOFF pesticide, unspecified type; at point-of-sale; kg AI: 3.128e-5 kg; = p1962
- CUTOFF domestic barge transport; average fuel: 0.0265327 metric ton*km; = p2007
- CUTOFF prepare soil; for reduced till, wheat; 15-30% residue: 2.63017e-5 ha; = p0937
- CUTOFF gypsum; at point-of-sale: 1.86504e-6 kg; = p1166
- CUTOFF sowing svc; for no-till, 1998 winter wheat: 1.41523e-5 ha; = p0948
- CUTOFF pesticide, Imazamethabenz; at point-of-sale; kg AI: 6.59909e-6 kg; = p1860
- CUTOFF apply pesticide; as foliar or directed spray: 0.000216108 ha; = p1339
- CUTOFF nitrogenous fertilizer, urea; at point-of-sale: 0.0113045 kg; = p1070
- CUTOFF sulfur; at point-of-sale: 1.10013e-7 kg; = p1172
- CUTOFF nitrogenous fertilizer, nitrogen solutions; at point-of-sale: 0.0260686 kg; = p1068
- CUTOFF nitrogenous fertilizer, ammonium nitrate; at point-of-sale: 0.00495052 kg; = p1066
- CUTOFF apply P fertilizer; broadcast with incorporation: 3.53374e-5 ha; = p1090
- CUTOFF phosphatic fertilizer, superphosphate grades over 22%; at point-of-sale: 0.000708099 kg; = p1117
- CUTOFF apply P fertilizer; no broadcast application: 6.29185e-5 ha; = p1089
- CUTOFF irrigate; pressure, groundwater source, in 1998: 8.79214e-6 ha-m; = p0993
- CUTOFF potassic fertilizer, other single nutrients; at point-of-sale: 0.000347866 kg; = p1155
- CUTOFF sowing svc; for reduced till, 1998 winter wheat: 2.63017e-5 ha; = p0949
- CUTOFF sulfur storage: 5.50066e-8 kg*a; = p1174
- CUTOFF prepare soil; for unspec. till, wheat: 1.04964e-6 ha; = p0939
- CUTOFF nitrogenous fertilizer, sodium nitrate; at point-of-sale: 9.92401e-5 kg; = p1069
- CUTOFF pesticide, MCPA; at point-of-sale; kg AI: 3.69549e-5 kg; = p1873
- CUTOFF dolomite, pulverized; at point-of-sale: 0.000264849 kg; = p1229
- CUTOFF apply sewage sludge; unspecified method: 0.000193113 ha; = p1189
- CUTOFF irrigate; pressure, surface water source, in 1998: 1.74531e-5 ha-m; = p1007
- CUTOFF apply mixed N fertilizer; with incorporation: 2.14139e-5 ha; = p1033
- CUTOFF bulk cargo rail transport; diesel: 0.0497488 metric ton*km; = p2008
- CUTOFF pesticide, Thifensulfuron methyl; at point-of-sale; kg AI: 7.91891e-7 kg; = p1943
- CUTOFF pesticide formulation balance; at point-of-sale: 7.1413e-5 kg; = p1963
- CUTOFF zinc compounds storage: 1.51309e-8 kg*a; = p1186
- CUTOFF pesticide, Prosulfuron; at point-of-sale; kg AI: 2.63964e-7 kg; = p1916
- CUTOFF phosphatic fertilizer, monoammonium phosphate; at point-of-sale: 0.00260376 kg; = p1120
- CUTOFF manure appl svc; unspec rate, 1998 winter wheat: 9.46871e-7 ha; = p1233
- CUTOFF apply K fertilizer; broadcast without incorporation: 2.45078e-5 ha; = p1141
- CUTOFF pesticide, Clopyralid; at point-of-sale; kg AI: 1.05585e-6 kg; = p1798
- CUTOFF limestone, high-grade, pulverized; at point-of-sale: 0.0166133 kg; = p1228
- CUTOFF apply sulfuric acid; unspecified method: 0.000193113 ha; = p1177
- CUTOFF international vessel transport; average fuel: 0.241865 metric ton*km; = p2006
- CUTOFF sowing svc; for conventional till, 1998 winter wheat: 0.000132173 ha; = p0946

## Inputs from nature
- Potassium; from plant uptake; biogenic: 0.0189815 kg; = p0915
- Water, unspecified origin: 0.000340805 m3; = p0916*0.001
- Water, ground: 87.9214 kg; = p0887
- Occupation, annual crop [natural resource, land]: 1.61145 m2*year; = 1.0 * (p0855)
- Water, surface: 198.374 kg; = p0889
- Transformation, to annual crop [natural resource, land]: 1.93113 m2; = 1.0 * (p0857)
- Transformation, from annual crop [natural resource, land]: 1.93113 m2; = 1.0 * (p0883)
- Carbon dioxide: 3.5495 kg; = p0900*3.6666666667
- Dry matter except CNPK; from plant uptake: 1.27956 kg; = p0917
- Nitrogen: 0.0341917 kg; = p0905
- Phosphorus: 0.00590066 kg; = p0910

## Emissions to nature
- Monoammonium phosphate; broadcast w/o incorp. in fert. in fall bef. plant.: 0.000232113 kg; = p2849*8.2142857143
- Anhydrous ammonia; no broadcast in fert. at plant.: 0.000140874 kg; = p2511*1.2142857143
- Pesticide formulation balance; broadcast with incorporation: 3.11954e-5 kg; = p4102
- Anhydrous ammonia; no broadcast in fert. after plant.: 0.000471009 kg; = p2550*1.2142857143
- Aqueous ammonia; broadcast w/o incorp. in fert. at plant.: 2.23971e-5 kg; = p2903*1.2142857143
- Toluene [air, non-urban air or from high stacks]: 2.31533e-5 kg; = 1.0 * (p2141*1.0952380952)
- Formaldehyde [air, non-urban air or from high stacks]: 0.000252704 kg; = 1.0 * (p2128*2.5)
- Potassium chloride; no broadcast in fert. after plant.: 0.000447115 kg; = p2585*2.2166666667
- Other single phosphates; broadcast w/o incorp. in fert. after plant.; kg P: 2.26511e-6 kg; = p2973
- Zinc compounds: 3.02618e-8 kg; = p3232
- Ammonium sulfate; broadcast w/ incorp. in fert. in fall bef. plant.: 0.000154966 kg; = p2635*4.7142857143
- Pesticides, unspecified [soil, agricultural]: 2.82393e-5 kg; = 1.0 * (p5337+p4101+p4719)
- Nitrogen solution; broadcast w/o incorp. in fert. at plant.; broadcast w/o incorp. in fert. at plant.; kg N: 0.000940215 kg; = p2912
- Urea; no broadcast in fert. at plant.: 0.000138588 kg; = p2529*5
- Monoammonium phosphate; unspec. appl. method in fert. after plant.: 1.52132e-5 kg; = p3161*8.2142857143
- Magnesium [soil, agricultural]: 3.35929e-5 kg; = 1.0 * (p3227)
- 2,4-D [soil, agricultural]: 1.73962e-5 kg; = 1.0 * (p4515+p5133+p3897)
- Phosphorous; in above-ground residue left on field: 0.000914967 kg; = p2169
- Ammonium nitrate; broadcast w/o incorp. in fert. in fall bef. plant.: 0.0015633 kg; = p2827*4.7142857143
- Methyl vinyl ether; from residue burning: 9.21974e-6 kg; = p2137*1.6111111111
- Monoammonium phosphate; broadcast w/ incorp. in fert. after plant.: 0.000146583 kg; = p2771*8.2142857143
- isobutene: 1.4208e-5 kg; = p2150*1.1666666667
- Acetol; from residue burning: 0.000457695 kg; = p2134*2.0555555556
- Aqueous ammonia; broadcast w/ incorp. in fert. at plant.: 6.27617e-6 kg; = p2708*1.2142857143
- Sewage sludge dry matter; applied in sewage sludge: 2.81792e-10 kg; = p3243
- Nitrogen solution; broadcast w/o incorp. in fert. in fall bef. plant.; broadcast w/o incorp. in fert. in fall bef. pl...: 0.00156376 kg; = p2834
- Thifensulfuron methyl; broadcast with incorporation: 3.45922e-7 kg; = p4086
- Diammonium phosphate; unspec. appl. method in fert. in fall bef. plant.: 9.48594e-5 kg; = p3040*4.7142857143
- Aqueous ammonia; broadcast w/o incorp. in fert. in fall bef. plant.: 3.72507e-5 kg; = p2825*1.2142857143
- Diammonium phosphate; no broadcast in fert. after plant.: 0.000748339 kg; = p2572*4.7142857143
- Diammonium phosphate; no broadcast in fert. at plant.: 0.000875371 kg; = p2533*4.7142857143
- Superphosphate, grades>22%; no broadcast in fert. in fall bef. plant.; kg P: 3.65966e-5 kg; = p2464
- Other single K nutrients; unspec. appl. method in fert. after plant.; kg K: 3.22767e-5 kg; = p3172
- Potassium chloride; broadcast w/o incorp. in fert. at plant.: 0.000226032 kg; = p2936*2.2166666667
- isopentane: 2.05731e-6 kg; = p2151*1.0166666667
- Imazamethabenz: 6.41498e-7 kg; = p3797
- Superphosphate, grades>22%; unspec. appl. method in fert. in fall bef. plant.; kg P: 2.13321e-6 kg; = p3049
- Superphosphate, grades>22%; no broadcast in fert. at plant.; kg P: 1.96855e-5 kg; = p2542
- Superphosphate, grades>22%; broadcast w/ incorp. in fert. in fall bef. plant.; kg P: 2.0554e-5 kg; = p2659
- Methanol [air, non-urban air or from high stacks]: 0.000399509 kg; = 1.0 * (p2129*2.6666666667)
- Other single K nutrients; broadcast w/o incorp. in fert. after plant.; kg K: 5.96764e-5 kg; = p2977
- Urea; broadcast w/o incorp. in fert. after plant.: 0.00443197 kg; = p2958*5
- Propanenitrile: 7.78905e-6 kg; = p2157*1.5277777778
- Oxygen; applied in limestone: 0.00748911 kg; = p3219
- Dioxins and furans (PCDD/F); from residue burning: 3.64673e-12 kg TEQ; = p2047
- Other single phosphates; broadcast w/ incorp. in fert. after plant.; kg P: 3.11072e-6 kg; = p2778
- Dicamba [air, non-urban air or from high stacks]: 7.69797e-8 kg; = 1.0 * (p3745)
- Potassium; in below-ground residue; biogenic: 0.00320104 kg; = p2176
- Aqueous ammonia; broadcast w/ incorp. in fert. in fall bef. plant.: 1.04385e-5 kg; = p2630*1.2142857143
- Aqueous ammonia; no broadcast in fert. at plant.: 2.34162e-6 kg; = p2513*1.2142857143
- Propene [air, non-urban air or from high stacks]: 8.21762e-5 kg; = 1.0 * (p2136*1.1666666667)
- Pesticide formulation balance; foliar or directed spray: 3.09911e-5 kg; = p4720
- Diammonium phosphate; broadcast w/o incorp. in fert. after plant.: 0.000306043 kg; = p2962*4.7142857143
- Monoammonium phosphate; unspec. appl. method in fert. at plant.: 1.77957e-5 kg; = p3122*8.2142857143
- Furan [air, non-urban air or from high stacks]: 1.32973e-5 kg; = 1.0 * (p2138*1.4166666667)
- Imazamethabenz: 5.95759e-6 kg; = p4621+p4003+p5239
- Monoammonium phosphate; unspec. appl. method in fert. in fall bef. plant.: 3.30833e-5 kg; = p3044*8.2142857143
- Diammonium phosphate; unspec. appl. method in fert. after plant.: 4.36207e-5 kg; = p3157*4.7142857143
- Urea; no broadcast in fert. after plant.: 0.000463364 kg; = p2568*5
- Other single phosphates; no broadcast in fert. in fall bef. plant.; kg P: 1.20446e-5 kg; = p2466
- Superphosphate, grades>22%; broadcast w/o incorp. in fert. after plant.; kg P: 6.88235e-6 kg; = p2971
- Pentane [air, non-urban air or from high stacks]: 2.57164e-6 kg; = 1.0 * (p2152*1.0166666667)
- Potassium chloride; broadcast w/o incorp. in fert. after plant.: 0.00146887 kg; = p2975*2.2166666667
- Diammonium phosphate; broadcast w/ incorp. in fert. in fall bef. plant.: 0.000913992 kg; = p2650*4.7142857143
- Nitrogen solution; no broadcast in fert. at plant.; no broadcast in fert. at plant.; kg N: 9.82998e-5 kg; = p2522
- Other single K nutrients; unspec. appl. method in fert. at plant.; kg K: 4.9668e-6 kg; = p3133
- Ethene [air, non-urban air or from high stacks]: 0.000176867 kg; = 1.0 * (p2125*1.1666666667)
- Nitrogen solution; broadcast w/ incorp. in fert. at plant.; broadcast w/ incorp. in fert. at plant.; kg N: 0.00026347 kg; = p2717
- Aqueous ammonia; broadcast w/o incorp. in fert. after plant.: 7.4884e-5 kg; = p2942*1.2142857143
- Bromoxynil: 1.77053e-6 kg; = p3717
- Pesticides, unspecified: 3.04073e-6 kg; = p3895
- Sodium nitrate; broadcast w/o incorp. in fert. after plant.: 3.87511e-5 kg; = p2954*6.0714285714
- Clopyralid: 1.0264e-7 kg; = p3735
- Anhydrous ammonia; broadcast w/ incorp. in fert. after plant.: 0.00126243 kg; = p2745*1.2142857143
- Monoammonium phosphate; broadcast w/o incorp. in fert. at plant.: 0.000124855 kg; = p2927*8.2142857143
- Anhydrous ammonia; broadcast w/o incorp. in fert. in fall bef. plant.: 0.00224104 kg; = p2823*1.2142857143
- Other single phosphates; broadcast w/o incorp. in fert. at plant.; kg P: 2.64962e-6 kg; = p2934
- Monoammonium phosphate; broadcast w/ incorp. in fert. at plant.: 0.000171465 kg; = p2732*8.2142857143
- Ammonium nitrate; broadcast w/ incorp. in fert. in fall bef. plant.: 0.000438073 kg; = p2632*4.7142857143
- difenzoquat: 8.34063e-6 kg; = p3959+p5195+p4577
- Sodium nitrate; broadcast w/ incorp. in fert. after plant.: 1.08589e-5 kg; = p2759*6.0714285714
- cis-2-Butene: 5.22173e-6 kg; = p2149*1.1666666667
- Ammonium sulfate; broadcast w/o incorp. in fert. in fall bef. plant.: 0.000553012 kg; = p2830*4.7142857143
- Superphosphate, grades>22%; no broadcast in fert. after plant.; kg P: 1.68288e-5 kg; = p2581
- Monoammonium phosphate; broadcast w/ incorp. in fert. in fall bef. plant.: 0.000318765 kg; = p2654*8.2142857143
- Sodium nitrate; broadcast w/ incorp. in fert. at plant.: 3.2478e-6 kg; = p2720*6.0714285714
- Ammonia [air, non-urban air or from high stacks]: 0.000263791 kg; = 1.0 * (p2159*1.2142857143)
- Phenol [air, non-urban air or from high stacks]: 6.30487e-5 kg; = 1.0 * (p2133*1.3055555556)
- Monoammonium phosphate; broadcast w/o incorp. in fert. after plant.: 0.000106736 kg; = p2966*8.2142857143
- Particulates, < 2.5 um [air, non-urban air or from high stacks]: 0.000489878 kg; = 1.0 * (p2035+p2033)
- Nitrogen; in above-ground residue left on field: 0.00598502 kg; = p2168
- 2,4-D [air, non-urban air or from high stacks]: 1.87317e-6 kg; = 1.0 * (p3691)
- Superphosphate, grades>22%; broadcast w/o incorp. in fert. at plant.; kg P: 8.05065e-6 kg; = p2932
- Ammonium sulfate; broadcast w/o incorp. in fert. at plant.: 0.000332499 kg; = p2908*4.7142857143
- Anhydrous ammonia; no broadcast in fert. in fall bef. plant.: 0.000234301 kg; = p2433*1.2142857143
- Urea; no broadcast in fert. in fall bef. plant.: 0.000230498 kg; = p2451*5
- Anhydrous ammonia; broadcast w/ incorp. in fert. in fall bef. plant.: 0.00062799 kg; = p2628*1.2142857143
- Prosulfuron: 2.56599e-8 kg; = p3853
- Pesticide formulation balance; broadcast by air: 6.94206e-6 kg; = p3896
- Carbon monoxide, fossil [air, non-urban air or from high stacks]: 0.00670625 kg; = 1.0 * (p2028*2.3333333333)
- Other single phosphates; broadcast w/ incorp. in fert. at plant.; kg P: 3.63878e-6 kg; = p2739
- Acetaldehyde [air, non-urban air or from high stacks]: 0.000151186 kg; = 1.0 * (p2130*1.8333333333)
- Diammonium phosphate; unspec. appl. method in fert. at plant.: 5.10254e-5 kg; = p3118*4.7142857143
- MCPA [soil, agricultural]: 3.33625e-5 kg; = 1.0 * (p4016+p4634+p5252)
- NMVOC, non-methane volatile organic compounds, unspecified origin [air, non-urban air or from high stacks]: 0.00312333 kg; = 1.0 * (p2051+p2052)
- Other limestone constituents; applied in limestone: 0.000996795 kg; = p3220
- Nitrogen solution; broadcast w/ incorp. in fert. after plant.; broadcast w/ incorp. in fert. after plant.; kg N: 0.000880904 kg; = p2756
- Urea; broadcast w/ incorp. in fert. after plant.: 0.00124194 kg; = p2763*5
- Urea; broadcast w/ incorp. in fert. in fall bef. plant.: 0.000617797 kg; = p2646*5
- Diammonium phosphate; broadcast w/ incorp. in fert. at plant.: 0.000491642 kg; = p2728*4.7142857143
- Particulates, < 10 um: 0.000803497 kg; = p2036+p2034
- Superphosphate, grades>22%; broadcast w/ incorp. in fert. at plant.; kg P: 1.10561e-5 kg; = p2737
- Superphosphate, grades<= 22%; broadcast w/o incorp. in fert. in fall bef. plant.; kg P: 8.07798e-7 kg; = p2852
- Sodium nitrate; no broadcast in fert. at plant.: 1.21174e-6 kg; = p2525*6.0714285714
- Water [air, non-urban air or from high stacks]: 1.92971e-5 m3; = 0.001 * (p2016)
- Gypsum: 1.86504e-6 kg; = p3229
- Diclofop-methyl [soil, agricultural]: 5.95759e-6 kg; = 1.0 * (p5191+p3955+p4573)
- Other single phosphates; broadcast w/o incorp. in fert. in fall bef. plant.; kg P: 4.92581e-6 kg; = p2856
- Aqueous ammonia; broadcast w/ incorp. in fert. after plant.: 2.09842e-5 kg; = p2747*1.2142857143
- Sulfuric acid [soil, agricultural]: 2.11465e-8 kg; = 1.0 * (p3231)
- Other single K nutrients; no broadcast in fert. after plant.; kg K: 1.81651e-5 kg; = p2587
- Nitrogen solution; broadcast w/o incorp. in fert. after plant.; broadcast w/o incorp. in fert. after plant.; kg N: 0.00314359 kg; = p2951
- Nitrogen; in below-ground residue: 0.00344026 kg; = p2174
- Plant dry matter; in aboveground residue left on field: 0.237915 kg; = p2172
- Other single phosphates; no broadcast in fert. at plant.; kg P: 6.47887e-6 kg; = p2544
- Superphosphate, grades<= 22%; broadcast w/ incorp. in fert. in fall bef. plant.; kg P: 1.10936e-6 kg; = p2657
- Butadiene [air, non-urban air or from high stacks]: 1.83409e-5 kg; = 1.0 * (p2143*1.125)
- Nitrogen dioxide: 0.000241987 kg; = p2039*3.2857142857
- Aqueous ammonia; no broadcast in fert. after plant.: 7.82915e-6 kg; = p2552*1.2142857143
- Superphosphate, grades>22%; unspec. appl. method in fert. at plant.; kg P: 1.14747e-6 kg; = p3127
- Ammonium sulfate; broadcast w/ incorp. in fert. at plant.: 9.31738e-5 kg; = p2713*4.7142857143
- Ammonium sulfate; no broadcast in fert. in fall bef. plant.: 5.78176e-5 kg; = p2440*4.7142857143
- Acetic acid [air, non-urban air or from high stacks]: 0.000680098 kg; = 1.0 * (p2127*2.5)
- Thifensulfuron methyl; broadcast by air: 7.69797e-8 kg; = p3880
- Acrylonitrile: 4.07458e-6 kg; = p2156*1.4722222222
- Butane [air, non-urban air or from high stacks]: 7.3851e-6 kg; = 1.0 * (p2147*1.0208333333)
- Superphosphate, grades<= 22%; broadcast w/o incorp. in fert. after plant.; kg P: 3.71462e-7 kg; = p2969
- Plant dry matter; from residue burning: 0.0436782 kg; = p2164
- Carbon dioxide, in air: 0.162668 kg; = p2163*3.6666666667
- Dinitrogen monoxide [air, non-urban air or from high stacks]: 8.51064e-6 kg; = 1.0 * (p2044*1.5714285714)
- Acetone [air, non-urban air or from high stacks]: 5.42464e-5 kg; = 1.0 * (p2139*1.6111111111)
- Potassium chloride; unspec. appl. method in fert. after plant.: 0.000794459 kg; = p3170*2.2166666667
- Anhydrous ammonia; broadcast w/o incorp. in fert. after plant.: 0.00450509 kg; = p2940*1.2142857143
- Anhydrous ammonia; broadcast w/o incorp. in fert. at plant.: 0.00134743 kg; = p2901*1.2142857143
- Ammonium nitrate; no broadcast in fert. after plant.: 0.000328566 kg; = p2554*4.7142857143
- Tribenuron-methyl [soil, agricultural]: 4.76608e-7 kg; = 1.0 * (p5329+p4711+p4093)
- Superphosphate, grades<= 22%; broadcast w/o incorp. in fert. at plant.; kg P: 4.34519e-7 kg; = p2930
- Benzene [air, non-urban air or from high stacks]: 1.86526e-5 kg; = 1.0 * (p2140*1.0833333333)
- Nitrogen solution; no broadcast in fert. after plant.; no broadcast in fert. after plant.; kg N: 0.000328663 kg; = p2561
- Superphosphate, grades<= 22%; unspec. appl. method in fert. at plant.; kg P: 6.19325e-8 kg; = p3125
- Sodium nitrate; broadcast w/ incorp. in fert. in fall bef. plant.: 5.40172e-6 kg; = p2642*6.0714285714
- Other single K nutrients; broadcast w/o incorp. in fert. at plant.; kg K: 9.1831e-6 kg; = p2938
- Ammonium nitrate; broadcast w/ incorp. in fert. at plant.: 0.000263392 kg; = p2710*4.7142857143
- I butane; from residue burning: 2.56427e-6 kg; = p2146*1.0208333333
- Monoammonium phosphate; no broadcast in fert. at plant.: 0.000305295 kg; = p2537*8.2142857143
- Diammonium phosphate; broadcast w/o incorp. in fert. at plant.: 0.000357995 kg; = p2923*4.7142857143
- Ethane [air, non-urban air or from high stacks]: 0.000110462 kg; = 1.0 * (p2126*1.25)
- Diammonium phosphate; broadcast w/ incorp. in fert. after plant.: 0.000420295 kg; = p2767*4.7142857143
- cyclopentane: 2.01063e-7 kg; = p2153*1.0166666667
- Sulfur dioxide [air, non-urban air or from high stacks]: 5.34854e-5 kg; = 1.0 * (p2041)
- Calcium [soil, agricultural]: 0.00631272 kg; = 1.0 * (p3218+p3226)
- Tribenuron-methyl: 5.13198e-8 kg; = p3887
- Potassium chloride; unspec. appl. method in fert. at plant.: 0.000122253 kg; = p3131*2.2166666667
- Diammonium phosphate; broadcast w/o incorp. in fert. in fall bef. plant.: 0.000665535 kg; = p2845*4.7142857143
- Ethyne [air, non-urban air or from high stacks]: 3.30887e-5 kg; = 1.0 * (p2132*1.0833333333)
- trans-2-Butene: 6.92183e-6 kg; = p2148*1.1666666667
- Oxygen; applied in dolomite: 0.00013294 kg; = p3228
- Water: 286.411 kg; = p2178+p2181+p2171
- Ammonium sulfate; broadcast w/ incorp. in fert. after plant.: 0.000311524 kg; = p2752*4.7142857143
- Potassium; in above-ground residue left on field; biogenic: 0.00556884 kg; = p2170
- Dicamba [soil, agricultural]: 7.14911e-7 kg; = 1.0 * (p3951+p5187+p4569)
- Superphosphate, grades>22%; unspec. appl. method in fert. after plant.; kg P: 9.8095e-7 kg; = p3166
- Thifensulfuron methyl; unspec. appl. method: 2.53326e-8 kg; = p5322
- Diclofop-methyl: 6.41498e-7 kg; = p3749
- Ammonium nitrate; broadcast w/o incorp. in fert. at plant.: 0.000939938 kg; = p2905*4.7142857143
- Diammonium phosphate; no broadcast in fert. in fall bef. plant.: 0.00162737 kg; = p2455*4.7142857143
- Other single phosphates; unspec. appl. method in fert. at plant.; kg P: 3.77654e-7 kg; = p3129
- Superphosphate, grades>22%; broadcast w/ incorp. in fert. after plant.; kg P: 9.45167e-6 kg; = p2776
- Sulfur [soil, agricultural]: 1.10013e-7 kg; = 1.0 * (p3230)
- Superphosphate, grades<= 22%; unspec. appl. method in fert. in fall bef. plant.; kg P: 1.15136e-7 kg; = p3047
- difenzoquat: 8.98097e-7 kg; = p3753
- Other single phosphates; broadcast w/ incorp. in fert. in fall bef. plant.; kg P: 6.76471e-6 kg; = p2661
- Ammonium sulfate; no broadcast in fert. after plant.: 0.000116229 kg; = p2557*4.7142857143
- Sodium nitrate; broadcast w/o incorp. in fert. at plant.: 1.15901e-5 kg; = p2915*6.0714285714
- Filler materials, applied with synthetic fertilizer: 0.0187114 kg; = p2432
- Sodium nitrate; broadcast w/o incorp. in fert. in fall bef. plant.: 1.92765e-5 kg; = p2837*6.0714285714
- Monoammonium phosphate; no broadcast in fert. in fall bef. plant.: 0.000567563 kg; = p2459*8.2142857143
- Propane [air, non-urban air or from high stacks]: 3.42355e-5 kg; = 1.0 * (p2142*1.2222222222)
- Clopyralid [soil, agricultural]: 9.53215e-7 kg; = 1.0 * (p5177+p3941+p4559)
- Other single K nutrients; no broadcast in fert. at plant.; kg K: 2.79528e-6 kg; = p2548
- Glycolaldehyde; from residue burning: 0.000244906 kg; = p2135*2.5
- Thifensulfuron methyl; foliar or directed spray: 3.43657e-7 kg; = p4704
- Superphosphate, grades<= 22%; unspec. appl. method in fert. after plant.; kg P: 5.2945e-8 kg; = p3164
- Ammonium sulfate; no broadcast in fert. at plant.: 3.47629e-5 kg; = p2518*4.7142857143
- Monoammonium phosphate; no broadcast in fert. after plant.: 0.000260991 kg; = p2576*8.2142857143
- Hydrocyanic acid: 3.46781e-5 kg; = p2154*2.25
- Phosphorous; in below-ground residue: 0.000525934 kg; = p2175
- Aqueous ammonia; no broadcast in fert. in fall bef. plant.: 3.89458e-6 kg; = p2435*1.2142857143
- Superphosphate, grades<= 22%; broadcast w/ incorp. in fert. at plant.; kg P: 5.96734e-7 kg; = p2735
- Potassium chloride; no broadcast in fert. at plant.: 6.88028e-5 kg; = p2546*2.2166666667
- Prosulfuron [soil, agricultural]: 2.38304e-7 kg; = 1.0 * (p4059+p4677+p5295)
- Ammonium nitrate; broadcast w/o incorp. in fert. after plant.: 0.00314266 kg; = p2944*4.7142857143
- Methane: 0.00025725 kg; = p2025*1.3333333333
- Sodium nitrate; no broadcast in fert. after plant.: 4.05144e-6 kg; = p2564*6.0714285714
- Ammonium nitrate; no broadcast in fert. in fall bef. plant.: 0.000163444 kg; = p2437*4.7142857143
- MCPA: 3.59239e-6 kg; = p3810
- Plant dry matter; in below-ground residue: 0.136757 kg; = p2177
- 1-Butene: 1.62724e-5 kg; = p2144*1.1666666667
- Anhydrous ammonia; broadcast w/ incorp. in fert. at plant.: 0.00037758 kg; = p2706*1.2142857143
- Superphosphate, grades>22%; broadcast w/o incorp. in fert. in fall bef. plant.; kg P: 1.49667e-5 kg; = p2854
- Pesticide formulation balance; unspec. appl. method: 2.2845e-6 kg; = p5338
- Superphosphate, grades<= 22%; no broadcast in fert. at plant.; kg P: 1.06249e-6 kg; = p2540
- Urea; broadcast w/ incorp. in fert. at plant.: 0.000371451 kg; = p2724*5
- Carbon [soil, agricultural]: 0.335984 kg; = 1.0 * (p3242+p2173+p2167+p3225+p3217)
- Other single phosphates; no broadcast in fert. after plant.; kg P: 5.53867e-6 kg; = p2583
- Phosphorous; applied in sewage sludge: 3.03851e-10 kg; = p3241
- Nitrogen solution; no broadcast in fert. in fall bef. plant.; no broadcast in fert. in fall bef. plant.; kg N: 0.000163492 kg; = p2444
- Ammonium nitrate; broadcast w/ incorp. in fert. after plant.: 0.000880644 kg; = p2749*4.7142857143
- Superphosphate, grades<= 22%; no broadcast in fert. in fall bef. plant.; kg P: 1.97523e-6 kg; = p2462
- Ammonium nitrate; no broadcast in fert. at plant.: 9.82708e-5 kg; = p2515*4.7142857143
- Sodium nitrate; no broadcast in fert. in fall bef. plant.: 2.01537e-6 kg; = p2447*6.0714285714
- Other single phosphates; unspec. appl. method in fert. in fall bef. plant.; kg P: 7.02082e-7 kg; = p3051
- Superphosphate, grades<= 22%; no broadcast in fert. after plant.; kg P: 9.08302e-7 kg; = p2579
- Other single phosphates; unspec. appl. method in fert. after plant.; kg P: 3.22849e-7 kg; = p3168
- Bromoxynil [soil, agricultural]: 1.6443e-5 kg; = 1.0 * (p3923+p4541+p5159)
- Nitrogen solution; broadcast w/ incorp. in fert. in fall bef. plant.; broadcast w/ incorp. in fert. in fall bef. plan...: 0.000438202 kg; = p2639
- Isoprene [air, non-urban air or from high stacks]: 4.58679e-5 kg; = 1.0 * (p2145*1.1333333333)
- Acetonitrile [air, non-urban air or from high stacks]: 2.55176e-5 kg; = 1.0 * (p2155*1.7083333333)
- Formic acid [air, non-urban air or from high stacks]: 0.000121803 kg; = 1.0 * (p2131*3.8333333333)
- Nitrogen; applied in sewage sludge: 2.54532e-9 kg; = p3240
- Ash: 0.0240441 kg; = p2022+p2021
- Urea; broadcast w/o incorp. in fert. in fall bef. plant.: 0.00220466 kg; = p2841*5
- Superphosphate, grades<= 22%; broadcast w/ incorp. in fert. after plant.; kg P: 5.10137e-7 kg; = p2774
- Ammonium sulfate; broadcast w/o incorp. in fert. after plant.: 0.0011117 kg; = p2947*4.7142857143
- Urea; broadcast w/o incorp. in fert. at plant.: 0.00132556 kg; = p2919*5

## Sampling procedure
A delete-a-group jackknife is used by the USDA to estimate the ARMS sample means and RSEs, based on a 15 sample delete-a-group jackknife. Because of this relatively small sample size, a Students t distribution is used to represent ARMS data probability density functions. Other representations of uncertainty are described in Cooper, J.S., Kahn, E., Noon, M. (2012). LCA Digital Commons Unit Process Data: field crop production Version 1. Prepared for the US Department of Agriculture National Agricultural Library. Retrieved from https://www.lcacommons.gov/discovery/docs/LCA%20Digital%20Commons%20Unit%20Process%20Data%20final%20updated.pdf

## Extrapolations
Data represent an aggregation of processes applied in Idaho in 1998. Data development is demonstrated by parameterization (exlicitly presents all raw and uncertainty data and all calculations). Flow data quality according to the LCADC convention is provided for all flows.
