# cotton lint; at harvest in 2007; at farm; 90%-93% moisture

Dataset: EcoSpold 2, unit process
Geography: GLO
Time period: 2007-01-02 to 2008-01-01
Scenario: Business-as-Usual
System model: Allocation, ecoinvent default
Generated by: cooperjs@u.washington.edu
isCopyrightProtected: false

## General comment
This unit process/ gate-to-gate dataset represents the production of 1 kg cotton coproduced with cottonseed and residue. The process technologies are an aggregation of those applied in California in 2007. Applicable classifications include ISIC 0116, NAIC 111920, UNSPSC 11121802; this dataset was prepared in ILCD format using the UWDFE Lab Excel to ILCD File Generator (beta version, August 2013)

Exchange "S,S,S-tributyl phosphorotrithioate-soil agricultural" is the result of combining the following original LCA Commons flows: "Tribufos; unspec. appl. method; kg AI", "Tribufos; broadcast without incorporation; kg AI", "Tribufos; banded or side-dressed; kg AI", "Tribufos; broadcast with incorporation; kg AI", "Tribufos; foliar or directed spray; kg AI", "Tribufos; in seed furrow; kg AI", "Tribufos; chiseled or injected/knifed in; kg AI".
Exchange "Ethephon-soil agricultural" is the result of combining the following original LCA Commons flows: "Ethephon; chiseled or injected/knifed in; kg AI", "Ethephon; banded or side-dressed; kg AI", "Ethephon; in seed furrow; kg AI", "Ethephon; broadcast with incorporation; kg AI", "Ethephon; foliar or directed spray; kg AI", "Ethephon; unspec. appl. method; kg AI", "Ethephon; broadcast without incorporation; kg AI".
Exchange "BARBAN-soil unspecified" is the result of combining the following original LCA Commons flows: "Barban; unspec. appl. method; kg AI", "Barban; banded or side-dressed; kg AI", "Barban; in seed furrow; kg AI", "Barban; broadcast with incorporation; kg AI", "Barban; chiseled or injected/knifed in; kg AI", "Barban; foliar or directed spray; kg AI", "Barban; broadcast without incorporation; kg AI".
Exchange "Oxyfluorfen-soil agricultural" is the result of combining the following original LCA Commons flows: "Oxyfluorfen; in seed furrow; kg AI", "Oxyfluorfen; broadcast with incorporation; kg AI", "Oxyfluorfen; banded or side-dressed; kg AI", "Oxyfluorfen; unspec. appl. method; kg AI", "Oxyfluorfen; chiseled or injected/knifed in; kg AI", "Oxyfluorfen; foliar or directed spray; kg AI", "Oxyfluorfen; broadcast without incorporation; kg AI".
Exchange "Sodium chlorate-soil agricultural" is the result of combining the following original LCA Commons flows: "Sodium chlorate; chiseled or injected/knifed in; kg AI", "Sodium chlorate; unspec. appl. method; kg AI", "Sodium chlorate; foliar or directed spray; kg AI", "Sodium chlorate; banded or side-dressed; kg AI", "Sodium chlorate; broadcast without incorporation; kg AI", "Sodium chlorate; broadcast with incorporation; kg AI", "Sodium chlorate; in seed furrow; kg AI".
Exchange "Phorate-soil agricultural" is the result of combining the following original LCA Commons flows: "Phorate; unspec. appl. method; kg AI", "Phorate; chiseled or injected/knifed in; kg AI", "Phorate; banded or side-dressed; kg AI", "Phorate; in seed furrow; kg AI", "Phorate; broadcast without incorporation; kg AI", "Phorate; broadcast with incorporation; kg AI", "Phorate; foliar or directed spray; kg AI".
Exchange "Dimethoate-soil agricultural" is the result of combining the following original LCA Commons flows: "Dimethoate; banded or side-dressed; kg AI", "Dimethoate; broadcast without incorporation; kg AI", "Dimethoate; unspec. appl. method; kg AI", "Dimethoate; in seed furrow; kg AI", "Dimethoate; foliar or directed spray; kg AI", "Dimethoate; chiseled or injected/knifed in; kg AI", "Dimethoate; broadcast with incorporation; kg AI".
Exchange "S-Metolachlor-soil agricultural" is the result of combining the following original LCA Commons flows: "S-Metolachlor; broadcast without incorporation; kg AI", "S-Metolachlor; broadcast with incorporation; kg AI", "S-Metolachlor; in seed furrow; kg AI", "S-Metolachlor; chiseled or injected/knifed in; kg AI", "S-Metolachlor; foliar or directed spray; kg AI", "S-Metolachlor; unspec. appl. method; kg AI", "S-Metolachlor; banded or side-dressed; kg AI".
Exchange "Abamectin-soil agricultural" is the result of combining the following original LCA Commons flows: "Abamectin; broadcast with incorporation; kg AI", "Abamectin; unspec. appl. method; kg AI", "Abamectin; broadcast without incorporation; kg AI", "Abamectin; in seed furrow; kg AI", "Abamectin; chiseled or injected/knifed in; kg AI", "Abamectin; foliar or directed spray; kg AI", "Abamectin; banded or side-dressed; kg AI".
Exchange "NMVOC, non-methane volatile organic compounds, unspecified origin-air low population density" is the result of combining the following original LCA Commons flows: "NMVOCs; from residue burning; kg except C, biogenic", "NMVOCs; from residue burning; kg C, biogenic".
Exchange "Cyclanilide-soil agricultural" is the result of combining the following original LCA Commons flows: "Cyclanilide; broadcast with incorporation; kg AI", "Cyclanilide; banded or side-dressed; kg AI", "Cyclanilide; unspec. appl. method; kg AI", "Cyclanilide; broadcast without incorporation; kg AI", "Cyclanilide; foliar or directed spray; kg AI", "Cyclanilide; in seed furrow; kg AI", "Cyclanilide; chiseled or injected/knifed in; kg AI".
Exchange "Mepiquat chloride-soil agricultural" is the result of combining the following original LCA Commons flows: "1,1-Dimethylpiperidinium chloride; broadcast with incorporation; kg AI", "1,1-Dimethylpiperidinium chloride; broadcast without incorporation; kg AI", "1,1-Dimethylpiperidinium chloride; unspec. appl. method; kg AI", "1,1-Dimethylpiperidinium chloride; banded or side-dressed; kg AI", "1,1-Dimethylpiperidinium chloride; in seed furrow; kg AI", "1,1-Dimethylpiperidinium chloride; foliar or directed spray; kg AI", "1,1-Dimethylpiperidinium chloride; chiseled or injected/knifed in; kg AI".
Exchange "Carbon-soil agricultural" is the result of combining the following original LCA Commons flows: "Carbon; in above-ground residue left on field; biogenic", "Carbon; broadcast w/o incorp. in manure in fall before planting; biogenic", "Carbon; broadcast w/o incorp. in manure at an unknown time", "Carbon; using unspec. method in manure in fall before planting; biogenic", "Carbon; in below-ground residue; biogenic", "Carbon; using unspec. method in manure at an unknown time", "Carbon; broadcast w/ incorp. in manure in fall before planting; biogenic", "Carbon; applied in limestone", "Carbon; broadcast w/ incorp. in manure at an unknown time", "Carbon; applied in sewage sludge", "Carbon; applied in dolomite".
Exchange "Particulates, < 2.5 um-air low population density" is the result of combining the following original LCA Commons flows: "PM2.5; from residue burning; kg except C, biogenic", "PM2.5; from residue burning; kg C, biogenic".
Exchange "Thidiazuron-soil agricultural" is the result of combining the following original LCA Commons flows: "Thidiazuron; unspec. appl. method; kg AI", "Thidiazuron; chiseled or injected/knifed in; kg AI", "Thidiazuron; in seed furrow; kg AI", "Thidiazuron; foliar or directed spray; kg AI", "Thidiazuron; broadcast with incorporation; kg AI", "Thidiazuron; banded or side-dressed; kg AI", "Thidiazuron; broadcast without incorporation; kg AI".
Exchange "Prometryn-soil agricultural" is the result of combining the following original LCA Commons flows: "Prometryn; chiseled or injected/knifed in; kg AI", "Prometryn; foliar or directed spray; kg AI", "Prometryn; broadcast with incorporation; kg AI", "Prometryn; banded or side-dressed; kg AI", "Prometryn; in seed furrow; kg AI", "Prometryn; unspec. appl. method; kg AI", "Prometryn; broadcast without incorporation; kg AI".
Exchange "Pesticides, unspecified-soil agricultural" is the result of combining the following original LCA Commons flows: "Unspecified pesticide; broadcast without incorporation; kg AI", "Unspecified pesticide; chiseled or injected/knifed in; kg AI", "Unspecified pesticide; foliar or directed spray; kg AI", "Unspecified pesticide; banded or side-dressed; kg AI", "Unspecified pesticide; unspec. appl. method; kg AI", "Unspecified pesticide; in seed furrow; kg AI", "Unspecified pesticide; broadcast with incorporation; kg AI".
Exchange "Dicofol-soil agricultural" is the result of combining the following original LCA Commons flows: "Dicofol; broadcast with incorporation; kg AI", "Dicofol; in seed furrow; kg AI", "Dicofol; unspec. appl. method; kg AI", "Dicofol; banded or side-dressed; kg AI", "Dicofol; broadcast without incorporation; kg AI", "Dicofol; foliar or directed spray; kg AI", "Dicofol; chiseled or injected/knifed in; kg AI".
Exchange "Ash-soil agricultural" is the result of combining the following original LCA Commons flows: "Ash; from residue burning; kg except C, biogenic", "Ash; from residue burning; kg C, biogenic".
Exchange "Trifluralin-soil agricultural" is the result of combining the following original LCA Commons flows: "Trifluralin; broadcast with incorporation; kg AI", "Trifluralin; chiseled or injected/knifed in; kg AI", "Trifluralin; in seed furrow; kg AI", "Trifluralin; unspec. appl. method; kg AI", "Trifluralin; foliar or directed spray; kg AI", "Trifluralin; broadcast without incorporation; kg AI", "Trifluralin; banded or side-dressed; kg AI".
Exchange "Diuron-soil agricultural" is the result of combining the following original LCA Commons flows: "Diuron; broadcast without incorporation; kg AI", "Diuron; in seed furrow; kg AI", "Diuron; chiseled or injected/knifed in; kg AI", "Diuron; broadcast with incorporation; kg AI", "Diuron; unspec. appl. method; kg AI", "Diuron; foliar or directed spray; kg AI", "Diuron; banded or side-dressed; kg AI".
Exchange "Water-soil agricultural" is the result of combining the following original LCA Commons flows: "Water; in below-ground residue; biogenic", "Water; in above-ground residue left on field; biogenic", "Water; broadcast w/o incorp. in manure", "Water; from irrigation and applied with manure and sewage sludge", "Water; using unspec. method in manure", "Water; broadcast w/ incorp. in manure".
Exchange "Endothall-soil agricultural" is the result of combining the following original LCA Commons flows: "Endothall; chiseled or injected/knifed in; kg AI", "Endothall; banded or side-dressed; kg AI", "Endothall; in seed furrow; kg AI", "Endothall; unspec. appl. method; kg AI", "Endothall; foliar or directed spray; kg AI", "Endothall; broadcast with incorporation; kg AI", "Endothall; broadcast without incorporation; kg AI".
Exchange "Thiamethoxam-soil agricultural" is the result of combining the following original LCA Commons flows: "Thiamethoxam; unspec. appl. method; kg AI", "Thiamethoxam; broadcast without incorporation; kg AI", "Thiamethoxam; foliar or directed spray; kg AI", "Thiamethoxam; in seed furrow; kg AI", "Thiamethoxam; banded or side-dressed; kg AI", "Thiamethoxam; broadcast with incorporation; kg AI", "Thiamethoxam; chiseled or injected/knifed in; kg AI".
Exchange "Pendimethalin-soil agricultural" is the result of combining the following original LCA Commons flows: "Pendimethalin; broadcast without incorporation; kg AI", "Pendimethalin; foliar or directed spray; kg AI", "Pendimethalin; in seed furrow; kg AI", "Pendimethalin; banded or side-dressed; kg AI", "Pendimethalin; broadcast with incorporation; kg AI", "Pendimethalin; unspec. appl. method; kg AI", "Pendimethalin; chiseled or injected/knifed in; kg AI".
Exchange "Flumioxazin-soil agricultural" is the result of combining the following original LCA Commons flows: "Flumioxazin; broadcast with incorporation; kg AI", "Flumioxazin; banded or side-dressed; kg AI", "Flumioxazin; unspec. appl. method; kg AI", "Flumioxazin; foliar or directed spray; kg AI", "Flumioxazin; broadcast without incorporation; kg AI", "Flumioxazin; chiseled or injected/knifed in; kg AI", "Flumioxazin; in seed furrow; kg AI".
Exchange "Water, unspecified origin-resource in water" is the result of combining the following original LCA Commons flows: "Water; withdrawal from unspec. source, for cotton, in 2007", "Water; from plant uptake; biogenic".
Exchange "Pyrithiobac sodium salt-soil agricultural" is the result of combining the following original LCA Commons flows: "Pyrithiobac-sodium; chiseled or injected/knifed in; kg AI", "Pyrithiobac-sodium; in seed furrow; kg AI", "Pyrithiobac-sodium; unspec. appl. method; kg AI", "Pyrithiobac-sodium; banded or side-dressed; kg AI", "Pyrithiobac-sodium; foliar or directed spray; kg AI", "Pyrithiobac-sodium; broadcast with incorporation; kg AI", "Pyrithiobac-sodium; broadcast without incorporation; kg AI".
Exchange "Carfentrazone ethyl ester-soil agricultural" is the result of combining the following original LCA Commons flows: "Carfentrazone-ethyl; unspec. appl. method; kg AI", "Carfentrazone-ethyl; foliar or directed spray; kg AI", "Carfentrazone-ethyl; banded or side-dressed; kg AI", "Carfentrazone-ethyl; chiseled or injected/knifed in; kg AI", "Carfentrazone-ethyl; broadcast with incorporation; kg AI", "Carfentrazone-ethyl; in seed furrow; kg AI", "Carfentrazone-ethyl; broadcast without incorporation; kg AI".
Exchange "Particulates, < 10 um-air low population density" is the result of combining the following original LCA Commons flows: "PM10; from residue burning; kg C, biogenic", "PM10; from residue burning; kg except C, biogenic".
Exchange "Cyfluthrin-soil agricultural" is the result of combining the following original LCA Commons flows: "Beta-Cyfluthrin; banded or side-dressed; kg AI", "Beta-Cyfluthrin; chiseled or injected/knifed in; kg AI", "Beta-Cyfluthrin; unspec. appl. method; kg AI", "Beta-Cyfluthrin; in seed furrow; kg AI", "Beta-Cyfluthrin; foliar or directed spray; kg AI", "Beta-Cyfluthrin; broadcast with incorporation; kg AI", "Beta-Cyfluthrin; broadcast without incorporation; kg AI".
Exchange "Pyraflufen-ethyl-soil agricultural" is the result of combining the following original LCA Commons flows: "Pyraflufen-ethyl; banded or side-dressed; kg AI", "Pyraflufen-ethyl; unspec. appl. method; kg AI", "Pyraflufen-ethyl; foliar or directed spray; kg AI", "Pyraflufen-ethyl; broadcast with incorporation; kg AI", "Pyraflufen-ethyl; in seed furrow; kg AI", "Pyraflufen-ethyl; chiseled or injected/knifed in; kg AI", "Pyraflufen-ethyl; broadcast without incorporation; kg AI".
Exchange "Azoxystrobin-soil agricultural" is the result of combining the following original LCA Commons flows: "Azoxystrobin; banded or side-dressed; kg AI", "Azoxystrobin; in seed furrow; kg AI", "Azoxystrobin; chiseled or injected/knifed in; kg AI", "Azoxystrobin; broadcast with incorporation; kg AI", "Azoxystrobin; unspec. appl. method; kg AI", "Azoxystrobin; foliar or directed spray; kg AI", "Azoxystrobin; broadcast without incorporation; kg AI".
Exchange "Acetamiprid-soil agricultural" is the result of combining the following original LCA Commons flows: "Acetamiprid; foliar or directed spray; kg AI", "Acetamiprid; banded or side-dressed; kg AI", "Acetamiprid; unspec. appl. method; kg AI", "Acetamiprid; broadcast without incorporation; kg AI", "Acetamiprid; chiseled or injected/knifed in; kg AI", "Acetamiprid; in seed furrow; kg AI", "Acetamiprid; broadcast with incorporation; kg AI".
Exchange "Transformation, from arable-resource land" is the result of combining the following original LCA Commons flows: "Transformation; from arable, from cotton to cotton", "Transformation; from arable, from unspec. use to cotton", "Transformation; from arable, from fallow to cotton", "Transformation; from arable, from corn to cotton", "Transformation; from arable, from small grains to cotton", "Transformation; from arable, from other to cotton".
Exchange "Calcium-soil agricultural" is the result of combining the following original LCA Commons flows: "Calcium; applied in dolomite", "Calcium; applied in limestone".
Exchange "Bifenthrin-soil agricultural" is the result of combining the following original LCA Commons flows: "Bifenthrin; in seed furrow; kg AI", "Bifenthrin; foliar or directed spray; kg AI", "Bifenthrin; banded or side-dressed; kg AI", "Bifenthrin; unspec. appl. method; kg AI", "Bifenthrin; broadcast with incorporation; kg AI", "Bifenthrin; chiseled or injected/knifed in; kg AI", "Bifenthrin; broadcast without incorporation; kg AI".
Exchange "Indoxacarb-soil agricultural" is the result of combining the following original LCA Commons flows: "Indoxacarb; broadcast with incorporation; kg AI", "Indoxacarb; broadcast without incorporation; kg AI", "Indoxacarb; banded or side-dressed; kg AI", "Indoxacarb; in seed furrow; kg AI", "Indoxacarb; chiseled or injected/knifed in; kg AI", "Indoxacarb; unspec. appl. method; kg AI", "Indoxacarb; foliar or directed spray; kg AI".
Exchange "Paraquat dichloride-soil unspecified" is the result of combining the following original LCA Commons flows: "Paraquat dichloride; foliar or directed spray; kg AI", "Paraquat dichloride; broadcast without incorporation; kg AI", "Paraquat dichloride; chiseled or injected/knifed in; kg AI", "Paraquat dichloride; unspec. appl. method; kg AI", "Paraquat dichloride; in seed furrow; kg AI", "Paraquat dichloride; broadcast with incorporation; kg AI", "Paraquat dichloride; banded or side-dressed; kg AI".
Exchange "Aldicarb-soil agricultural" is the result of combining the following original LCA Commons flows: "Aldicarb; in seed furrow; kg AI", "Aldicarb; broadcast with incorporation; kg AI", "Aldicarb; foliar or directed spray; kg AI", "Aldicarb; banded or side-dressed; kg AI", "Aldicarb; chiseled or injected/knifed in; kg AI", "Aldicarb; broadcast without incorporation; kg AI", "Aldicarb; unspec. appl. method; kg AI".
Exchange "Isoprene-2bdf9967-6dae-4183-88d1-8f612548c51e low population density" was originally named: "Isoprene; from residue burning; kg C, biogenic" in this dataset.
Exchange "Dimethoate-2bdf9967-6dae-4183-88d1-8f612548c51e low population density" was originally named: "Dimethoate; broadcast by air; kg AI" in this dataset.
Exchange "Water-2bdf9967-6dae-4183-88d1-8f612548c51e low population density" was originally named: "Water; from residue burning; biogenic" in this dataset.
Exchange "Water, ground-c19fb2d9-98eb-4cd3-8761-81b71d8a9a1b in water" was originally named: "Water; withdrawal from groundwater, for cotton, in 2007" in this dataset.
Exchange "S-Metolachlor-2bdf9967-6dae-4183-88d1-8f612548c51e low population density" was originally named: "S-Metolachlor; broadcast by air; kg AI" in this dataset.
Exchange "Carbon monoxide, fossil-2bdf9967-6dae-4183-88d1-8f612548c51e low population density" was originally named: "Carbon monoxide; from residue burning; kg C, biogenic" in this dataset.
Exchange "Methane-2bdf9967-6dae-4183-88d1-8f612548c51e low population density" was originally named: "Methane; from residue burning; kg C, biogenic" in this dataset.
Exchange "isopentane-2bdf9967-6dae-4183-88d1-8f612548c51e low population density" was originally named: "I pentane; from residue burning; kg C, biogenic" in this dataset.
Exchange "Trifluralin-2bdf9967-6dae-4183-88d1-8f612548c51e low population density" was originally named: "Trifluralin; broadcast by air; kg AI" in this dataset.
Exchange "Ethyne-2bdf9967-6dae-4183-88d1-8f612548c51e low population density" was originally named: "Acetylene; from residue burning; kg C, biogenic" in this dataset.
Exchange "Diuron-2bdf9967-6dae-4183-88d1-8f612548c51e low population density" was originally named: "Diuron; broadcast by air; kg AI" in this dataset.
Exchange "Ethane-2bdf9967-6dae-4183-88d1-8f612548c51e low population density" was originally named: "Ethane; from residue burning; kg C, biogenic" in this dataset.
Exchange "Acetic acid-2bdf9967-6dae-4183-88d1-8f612548c51e low population density" was originally named: "Acetic acid; from residue burning; kg C, biogenic" in this dataset.
Exchange "Transformation, to arable-c19fb2d9-98eb-4cd3-8761-81b71d8a9a1b land" was originally named: "Transformation; to arable, to cotton" in this dataset.
Exchange "Sodium chlorate-2bdf9967-6dae-4183-88d1-8f612548c51e low population density" was originally named: "Sodium chlorate; broadcast by air; kg AI" in this dataset.
Exchange "cis-2-Butene-2bdf9967-6dae-4183-88d1-8f612548c51e low population density" was originally named: "Cis 2 butene; from residue burning; kg C, biogenic" in this dataset.
Exchange "Tribufos-2bdf9967-6dae-4183-88d1-8f612548c51e low population density" was originally named: "Tribufos; broadcast by air; kg AI" in this dataset.
Exchange "Occupation, arable-c19fb2d9-98eb-4cd3-8761-81b71d8a9a1b land" was originally named: "Occupation; arable, as cotton" in this dataset.
Exchange "Prometryn-2bdf9967-6dae-4183-88d1-8f612548c51e low population density" was originally named: "Prometryn; broadcast by air; kg AI" in this dataset.
Exchange "Cyclanilide-2bdf9967-6dae-4183-88d1-8f612548c51e low population density" was originally named: "Cyclanilide; broadcast by air; kg AI" in this dataset.
Exchange "Zinc compounds-be1c0329-f1a8-4524-8420-a86d2a8dd358 agricultural" was originally named: "Zinc compounds; as secondary application" in this dataset.
Exchange "Ammonia-2bdf9967-6dae-4183-88d1-8f612548c51e low population density" was originally named: "Ammonia; from residue burning; kg N, biogenic" in this dataset.
Exchange "Indoxacarb-2bdf9967-6dae-4183-88d1-8f612548c51e low population density" was originally named: "Indoxacarb; broadcast by air; kg AI" in this dataset.
Exchange "Methanol-2bdf9967-6dae-4183-88d1-8f612548c51e low population density" was originally named: "Methanol; from residue burning; kg C, biogenic" in this dataset.
Exchange "Propene-2bdf9967-6dae-4183-88d1-8f612548c51e low population density" was originally named: "Propylene; from residue burning; kg C, biogenic" in this dataset.
Exchange "Carbon dioxide, in air-2bdf9967-6dae-4183-88d1-8f612548c51e low population density" was originally named: "Carbon dioxide; from residue burning; kg C, biogenic" in this dataset.
Exchange "Acetaldehyde-2bdf9967-6dae-4183-88d1-8f612548c51e low population density" was originally named: "Acetaldehyde; from residue burning; kg C, biogenic" in this dataset.
Exchange "trans-2-Butene-2bdf9967-6dae-4183-88d1-8f612548c51e low population density" was originally named: "Trans 2 butene; from residue burning; kg C, biogenic" in this dataset.
Exchange "isobutene-2bdf9967-6dae-4183-88d1-8f612548c51e low population density" was originally named: "I butene; from residue burning; kg C, biogenic" in this dataset.
Exchange "Azoxystrobin-2bdf9967-6dae-4183-88d1-8f612548c51e low population density" was originally named: "Azoxystrobin; broadcast by air; kg AI" in this dataset.
Exchange "Sulfur-be1c0329-f1a8-4524-8420-a86d2a8dd358 agricultural" was originally named: "Sulfur; as secondary application" in this dataset.
Exchange "Butadiene-2bdf9967-6dae-4183-88d1-8f612548c51e low population density" was originally named: "1,3 butadiene; from residue burning; kg C, biogenic" in this dataset.
Exchange "Furan-2bdf9967-6dae-4183-88d1-8f612548c51e low population density" was originally named: "Furan; from residue burning; kg C, biogenic" in this dataset.
Exchange "Benzene-2bdf9967-6dae-4183-88d1-8f612548c51e low population density" was originally named: "Benzene; from residue burning; kg C, biogenic" in this dataset.
Exchange "Abamectin-2bdf9967-6dae-4183-88d1-8f612548c51e low population density" was originally named: "Abamectin; broadcast by air; kg AI" in this dataset.
Exchange "Pentane-2bdf9967-6dae-4183-88d1-8f612548c51e low population density" was originally named: "N pentane; from residue burning; kg C, biogenic" in this dataset.
Exchange "Magnesium-be1c0329-f1a8-4524-8420-a86d2a8dd358 agricultural" was originally named: "Magnesium; applied in dolomite" in this dataset.
Exchange "Phorate-2bdf9967-6dae-4183-88d1-8f612548c51e low population density" was originally named: "Phorate; broadcast by air; kg AI" in this dataset.
Exchange "Formic acid-2bdf9967-6dae-4183-88d1-8f612548c51e low population density" was originally named: "Formic acid; from residue burning; kg C, biogenic" in this dataset.
Exchange "Acetonitrile-2bdf9967-6dae-4183-88d1-8f612548c51e low population density" was originally named: "Acetonitrile; from residue burning; kg C, biogenic" in this dataset.
Exchange "Bifenthrin-2bdf9967-6dae-4183-88d1-8f612548c51e low population density" was originally named: "Bifenthrin; broadcast by air; kg AI" in this dataset.
Exchange "Carfentrazone ethyl ester-2bdf9967-6dae-4183-88d1-8f612548c51e low population density" was originally named: "Carfentrazone-ethyl; broadcast by air; kg AI" in this dataset.
Exchange "Ethene-2bdf9967-6dae-4183-88d1-8f612548c51e low population density" was originally named: "Ethylene; from residue burning; kg C, biogenic" in this dataset.
Exchange "Pendimethalin-2bdf9967-6dae-4183-88d1-8f612548c51e low population density" was originally named: "Pendimethalin; broadcast by air; kg AI" in this dataset.
Exchange "Nitrogen dioxide-2bdf9967-6dae-4183-88d1-8f612548c51e low population density" was originally named: "Nitrogen dioxide; from residue burning; kg N, biogenic" in this dataset.
Exchange "Phenol-2bdf9967-6dae-4183-88d1-8f612548c51e low population density" was originally named: "Phenol; from residue burning; kg C, biogenic" in this dataset.
Exchange "Pyrithiobac sodium salt-2bdf9967-6dae-4183-88d1-8f612548c51e low population density" was originally named: "Pyrithiobac-sodium; broadcast by air; kg AI" in this dataset.
Exchange "Propane-2bdf9967-6dae-4183-88d1-8f612548c51e low population density" was originally named: "Propane; from residue burning; kg C, biogenic" in this dataset.
Exchange "Flumioxazin-2bdf9967-6dae-4183-88d1-8f612548c51e low population density" was originally named: "Flumioxazin; broadcast by air; kg AI" in this dataset.
Exchange "Acrylonitrile-2bdf9967-6dae-4183-88d1-8f612548c51e low population density" was originally named: "Propenenitrile; from residue burning; kg C, biogenic" in this dataset.
Exchange "Oxyfluorfen-2bdf9967-6dae-4183-88d1-8f612548c51e low population density" was originally named: "Oxyfluorfen; broadcast by air; kg AI" in this dataset.
Exchange "Formaldehyde-2bdf9967-6dae-4183-88d1-8f612548c51e low population density" was originally named: "Formaldehyde; from residue burning; kg C, biogenic" in this dataset.
Exchange "Phosphorus-c19fb2d9-98eb-4cd3-8761-81b71d8a9a1b unspecified" was originally named: "Phosphorous; from plant uptake; biogenic" in this dataset.
Exchange "Thidiazuron-2bdf9967-6dae-4183-88d1-8f612548c51e low population density" was originally named: "Thidiazuron; broadcast by air; kg AI" in this dataset.
Exchange "Mepiquat chloride-2bdf9967-6dae-4183-88d1-8f612548c51e low population density" was originally named: "1,1-Dimethylpiperidinium chloride; broadcast by air; kg AI" in this dataset.
Exchange "Dicofol-2bdf9967-6dae-4183-88d1-8f612548c51e low population density" was originally named: "Dicofol; broadcast by air; kg AI" in this dataset.
Exchange "Butane-2bdf9967-6dae-4183-88d1-8f612548c51e low population density" was originally named: "N butane; from residue burning; kg C, biogenic" in this dataset.
Exchange "Aldicarb-2bdf9967-6dae-4183-88d1-8f612548c51e low population density" was originally named: "Aldicarb; broadcast by air; kg AI" in this dataset.
Exchange "Sulfuric acid-be1c0329-f1a8-4524-8420-a86d2a8dd358 agricultural" was originally named: "Sulfuric acid; as secondary application" in this dataset.
Exchange "Ethephon-2bdf9967-6dae-4183-88d1-8f612548c51e low population density" was originally named: "Ethephon; broadcast by air; kg AI" in this dataset.
Exchange "1-Butene-2bdf9967-6dae-4183-88d1-8f612548c51e low population density" was originally named: "1 butene; from residue burning; kg C, biogenic" in this dataset.
Exchange "Dinitrogen monoxide-2bdf9967-6dae-4183-88d1-8f612548c51e low population density" was originally named: "Dinitrogen monoxide; from residue burning; kg N, biogenic" in this dataset.
Exchange "Endothall-2bdf9967-6dae-4183-88d1-8f612548c51e low population density" was originally named: "Endothall; broadcast by air; kg AI" in this dataset.
Exchange "Acetone-2bdf9967-6dae-4183-88d1-8f612548c51e low population density" was originally named: "Acetone; from residue burning; kg C, biogenic" in this dataset.
Exchange "Cyfluthrin-2bdf9967-6dae-4183-88d1-8f612548c51e low population density" was originally named: "Beta-Cyfluthrin; broadcast by air; kg AI" in this dataset.
Exchange "Hydrocyanic acid-2bdf9967-6dae-4183-88d1-8f612548c51e low population density" was originally named: "Hydrogen cyanide; from residue burning; kg C, biogenic" in this dataset.
Exchange "Carbon dioxide-c19fb2d9-98eb-4cd3-8761-81b71d8a9a1b unspecified" was originally named: "Carbon dioxide; from plant uptake; kg C, biogenic" in this dataset.
Exchange "Water, surface-c19fb2d9-98eb-4cd3-8761-81b71d8a9a1b in water" was originally named: "Water; withdrawal from surface water, for cotton, in 2007" in this dataset.
Exchange "Toluene-2bdf9967-6dae-4183-88d1-8f612548c51e low population density" was originally named: "Toluene; from residue burning; kg C, biogenic" in this dataset.

## Geography
The unit process is assumed to represent production in California (US State).

## Technology
This process produces cotton lint; at harvest in 2007; at farm; 90%-93% moisture. The process is assumed to represent production in California (US State). Yields and related inputs and outputs represent a single year of operation, in 2007. This dataset includes consideration of residue burning; soil preparation; planting or sowing; irrigation; application, storage, and transport of fertilizers, manures, liming materials, secondary materials, and pesticides; and harvest. Fate and transport of applications are not included as described in Cooper, J.S., Kahn, E., Noon, M. (2012) LCA Digital Commons Unit Process Data: field crop production Version 1 which is available at https://www.lcacommons.gov/discovery/docs/LCA%20Digital%20Commons%20Unit%20Process%20Data%20final%20updated.pdf

## Time period
Start and end dates match the underlying data obtained from the USDA Agricultural Resource Management Survey (ARMS).
## Parameters
- p2044: 7.31432e-7; = p2015*p2042*p2043/(p0818*1000)
- p2432: 0.0509438; = p1158
- p2245: 0.000257338; = p2222*p2190
- p2186: 0.00273949; = p1052/p0818
- p0308: 0.5
- p0367: 0.5
- p3009: 0; = p2423*(p1079+p1081)
- p2698: 7.93224e-6; = p2307*(p1078+p1080)
- p1963f: 1.0293e-5; = p1647*p1851+p1648*p1852+p1649*p1853+p1650*p1854+p1651*p1855+p1652*p1856+p1653*p1857+p1654*p1858+p1655*p1859+p1656*p1860+p1657*p1861+p1658*p1862+p1659*p1863+p1660*p1864+p1661*p1865+p1662*p1866+p1663*p1867+p1664*p1868+p1665*p1869+p1666*p1870
- p1605: 0
- p2719: 0.000811431; = p2328*(p1019+p1021)
- p0073: 51.303
- p1879: 1.7325e-5; = p1471*1000/p0818
- p4789: 0; = p1822*p3482
- p0166: 29.595
- p0682: 455.082; = p0022*(1+p0550*p0154/100)
- p4252: 6.55422e-6; = p1903*p3479
- p1247: 4.55241e-5; = if(p1232>0;0;p1242*p0001/(p0818*p0002))
- p3293: 0.3875
- p3399: 0.546983; = p3380*p1234
- p1161: 455000; = p0801
- p4514: 2.79065e-5; = p1963*p3480
- p0262: 33.998
- p0593: 0; = IF(p0329<0.5;-SQRT(p0007*EXP(p0461^2*p0008)-p0007);SQRT(p0007*EXP(p0461^2*p0008)-p0007))
- p0142: 0
- p0558: 0; = IF(p0294<0.5;-SQRT(p0007*EXP(p0426^2*p0008)-p0007);SQRT(p0007*EXP(p0426^2*p0008)-p0007))
- p3079: 1.94581e-5; = p2298*p1082
- p2933: 0; = p2347*(p1079+p1081)
- p0124: 26.911
- p3185: 0; = p2404*p1023
- p2635: 4.79276e-5; = p2244*(p1019+p1021)
- p1534: 24
- p2387: 4.10942e-5; = p2229*p2216
- p2930: 0; = p2344*(p1079+p1081)
- p2336: 0; = p2228*p2204
- p0948: 0; = if(and(p0683=0;or(p0807=480;p0807=32;p0807=1;and(p0807=60;p0901<0.03)));p0936;0)
- p4177: 3.27711e-7; = p1828*p3479
- p3034: 5.83164e-11; = p2253*p1023
- p3250: 0.875
- p0917: 3.53057; = ((p0825+p0827+((p0830+p0895)+p0814*p0818))/p0818)-(p0900+p0905+p0910+p0915)
- p0307: 0.5
- p1190: 1.9698e-7; = p1188/p0818
- p1923: 4.33125e-6; = p1515*1000/p0818
- p0104: 95.906
- p1582: 0
- p1078: 0.25429; = IF(p1071=0;IF(p1073=1;0;IF(p1073+p1074>1;1-p1073;p1074));0)
- p2909: 1.07061e-5; = p2323*(p1020+p1022)
- p1843: 0
- p4564: 1.20122e-6; = p1803*p3481
- p0699: 0
- p3106: 3.38848e-9; = p2325*p1023
- p2116: 0.444424
- p2525: 7.5545e-7; = p2329*p1014
- p4163: 4.75181e-6; = p1814*p3479
- p2967: 2.00718e-5; = p2381*(p1079+p1081)
- p2222: 0.0999857; = if(p0765*p0769+p0766*p0770+p0767*p0771+p0768*p0772=0;0;p0769*p0765/(p0765*p0769+p0766*p0770+p0767*p0771+p0768*p0772))
- p2798: 0; = p2407*(p1019+p1021)
- p3642: 9.58119e-6; = p1911*p3476
- p4918: 0; = p1951*p3482
- p3470: 5.16077e-6; = p3375*p1241
- p2803: 0; = p2412*(p1019+p1021)
- p3039: 8.69312e-5; = p2258*p1082
- p2837: 1.0391e-7; = p2251*(p1020+p1022)
- p2437: 0.000197903; = p2241*p1014
- p2213: 5.29554e-5; = p1116-p2212
- p0738: 455.082; = p0078*(1+p0606*p0210/100)
- p2403: 0; = p2234*p2192
- p2134: 3.00714e-5; = p2015*p2062*p2096/(p0818*1000)
- p2713: 3.101e-5; = p2322*(p1019+p1021)
- p0674: 187.786; = p0014*(1+p0542*p0146/100)
- p2183: 0.00592566; = p1064-p2182
- p4662: 2.67272e-5; = p1901*p3481
- p4434: 2.49978e-7; = p1879*p3480
- p3287: 0.745
- p1425: 3
- p5258: 5.0755e-7; = p1879*p3484
- p2100: 0.705744
- p1918: 0
- p3072: 3.78849e-11; = p2291*p1023
- p4290: 1.63855e-7; = p1941*p3479
- p3460: 2.10634e-5; = p3365*p1241
- p2844: 0.000283691; = p2258*(p1079+p1081)
- p3141: 3.4929e-8; = p2360*p1023
- p0043: 455.145
- p1284: 0.368028; = p1280*p1252/p0818
- p1684: 0
- p1216: 0.0263674
- p0628: 0; = IF(p0364<0.5;-SQRT(p0007*EXP(p0496^2*p0008)-p0007);SQRT(p0007*EXP(p0496^2*p0008)-p0007))
- p2810: 0; = p2419*(p1078+p1080)
- p3419: 0; = p3362*p1239
- p0478: 0; = SQRT(2)*(IF((2*p0346-1)<0;-1;IF((2*p0346-1)>0;1;0))*SQRT(SQRT((2/(pi()*0.140012289)+LN(1-(2*p0346-1)^2)/2)^2-LN(1-(2*p0346-1)^2)/0.140012289)-(2/(pi()*0.140012289)+LN(1-(2*p0346-1)^2)/2)))
- p1335: 0.000271566; = p1334*p0001/(p0818*p0002)
- p1217: 31.7856
- p2210: 0.00083681; = 6*1.00794*p2208/30.973762
- p0993: 2.08254e-5; = p0989*p0001*p0004/(p0818*p0002)
- p0035: 30.821
- p1940: 0
- p0823: 0.91625
- p0034: 42.064
- p4485: 8.04095e-6; = p1930*p3480
- p3499: 1.98011e-5; = p1768*p3476
- p0536: 0; = SQRT(2)*(IF((2*p0404-1)<0;-1;IF((2*p0404-1)>0;1;0))*SQRT(SQRT((2/(pi()*0.140012289)+LN(1-(2*p0404-1)^2)/2)^2-LN(1-(2*p0404-1)^2)/0.140012289)-(2/(pi()*0.140012289)+LN(1-(2*p0404-1)^2)/2)))
- p1754: 0
- p2916: 1.1035e-7; = p2330*(p1020+p1022)
- p0485: 0; = SQRT(2)*(IF((2*p0353-1)<0;-1;IF((2*p0353-1)>0;1;0))*SQRT(SQRT((2/(pi()*0.140012289)+LN(1-(2*p0353-1)^2)/2)^2-LN(1-(2*p0353-1)^2)/0.140012289)-(2/(pi()*0.140012289)+LN(1-(2*p0353-1)^2)/2)))
- p2900: 0; = p2314*(p1129+p1131)
- p1232: 0
- p0982: 0.903401; = if(p0886=0;0;min(1;(p0691*p0690*1000*p0693/100)/p0886))
- p4719: 0.000175429; = p1962*p3481
- p2249: 0.000595127; = p2222*p2195
- p1250: 0; = if(p1232>0;0;p1245*p0001/(p0818*p0002))
- p4084: 4.24369e-7; = p1941*p3478
- p3186: 0; = p2405*p1023
- p2219: 0.00653661; = p1154-p2218
- p2266: 3.16644e-6; = p2226*p2212
- p2470: 0.000203234; = p2274*p1123
- p0717: 69.481; = p0057*(1+p0585*p0189/100)
- p0611: 0; = IF(p0347<0.5;-SQRT(p0007*EXP(p0479^2*p0008)-p0007);SQRT(p0007*EXP(p0479^2*p0008)-p0007))
- p2020: 294754; = p2015*p2018*p2019
- p3770: 8.39729e-7; = p1833*p3477
- p1701: 0
- p1717: 0
- p3323: 0.222117; = if(and(p1232=0;p3255<>0);p3265*p3277*(p3299*p3291+(1-p3299)*p3295);0)
- p0904: 8.18274e7; = p0825*p0901+(p0830+p0895)*p0824*p0903
- p3330: 1.51846e6; = if(and(p1232=0;p3255<>0);p3255*(p3267-p3325)/p3327;0)
- p0227: 26.392
- p1780: 0
- p2225: 0.692511; = if(p0765*p0769+p0766*p0770+p0767*p0771+p0768*p0772=0;0;p0772*p0768/(p0765*p0769+p0766*p0770+p0767*p0771+p0768*p0772))
- p2373: 0.000861554; = p2225*p2202
- p1942: 3.465e-5; = p1534*1000/p0818
- p1511: 1
- p0392: 0.5
- p2925: 0; = p2339*(p1079+p1081)
- p2875: 0.000540283; = p2289*(p1020+p1022)
- p1006: 0.000153031; = p1002*p0001*p0004/(p0818*p0002)
- p2688: 0.00016375; = p2297*(p1078+p1080)
- p2876: 1.48415e-7; = p2290*(p1020+p1022)
- p2592: 0; = p2396*p1014
- p1642: 0
- p1197: 1.806
- p0984: 0; = if(p0886=0;0;min(1;(p0699*p0698*1000*p0701/100)/p0886))
- p1023: 1e-5; = IF(p1012=0;IF(p1014+p1019+p1020+p1021+p1022=1;0;1-(p1014+p1019+p1020+p1021+p1022));0)
- p1763: 0
- p0774: 89.898; = p0114*(1+p0642*p0246/100)
- p2397: 0; = p2234*p2186
- p2355: 0.00410358; = p2225*p2183
- p0550: 0; = IF(p0286<0.5;-SQRT(p0007*EXP(p0418^2*p0008)-p0007);SQRT(p0007*EXP(p0418^2*p0008)-p0007))
- p1332: 546026; = p1321*p0801
- p3634: 6.38746e-6; = p1903*p3476
- p0109: 28.176
- p0399: 0.5
- p1868: 0
- p2854: 1.37423e-5; = p2268*(p1079+p1081)
- p2308: 0.000117715; = p2227*p2215
- p1258: 0.02564; = if(p1232>0;0;IF(p1253+p1256+p1257=1;0;1-(p1253+p1256+p1257)))
- p0551: 0; = IF(p0287<0.5;-SQRT(p0007*EXP(p0419^2*p0008)-p0007);SQRT(p0007*EXP(p0419^2*p0008)-p0007))
- p4333: 6.24945e-8; = p1778*p3480
- p1130: 0; = if(p1121=0;IF(p1123+p1128+p1129=1;0;IF(p1123+p1128+p1129+p1126>1;1-(p1123+p1128+p1129);p1126));0)
- p1554: 0
- p0352: 0.5
- p2189: 0.00224854; = p1053/p0818
- p0251: 35.21
- p2054: 0.91
- p1641: 0
- p1643: 0
- p2337: 0; = p2228*p2205
- p3327: 0.770193; = if(and(p1232=0;p3255<>0);1-(p3323+p3324+p3325+p3326);0)
- p2953: 0.00261992; = p2367*(p1020+p1022)
- p5074: 4.67236e-6; = p1901*p3483
- p3084: 4.32632e-6; = p2303*p1082
- p2021: 0.000425552; = p2020/p0818
- p3113: 1.30438e-8; = p2332*p1023
- p2087: 0.856281
- p3904: 8.48738e-7; = p1761*p3478
- p2579: 6.72101e-7; = p2383*p1073
- p0777: 54.175; = p0117*(1+p0645*p0249/100)
- p1817: 0
- p0447: 0; = SQRT(2)*(IF((2*p0315-1)<0;-1;IF((2*p0315-1)>0;1;0))*SQRT(SQRT((2/(pi()*0.140012289)+LN(1-(2*p0315-1)^2)/2)^2-LN(1-(2*p0315-1)^2)/0.140012289)-(2/(pi()*0.140012289)+LN(1-(2*p0315-1)^2)/2)))
- p1129: 0; = if(p1121=0;IF(p1123+p1128=1;0;IF(p1123+p1128+p1125>1;1-(p1123+p1128);p1125));0)
- p2332: 0.00130438; = p2224*p2200
- p4343: 2.08315e-8; = p1788*p3480
- p0038: 22.751
- p3196: 0; = p2415*p1082
- p2625: 0; = p2429*p1123
- p0557: 0; = IF(p0293<0.5;-SQRT(p0007*EXP(p0425^2*p0008)-p0007);SQRT(p0007*EXP(p0425^2*p0008)-p0007))
- p2853: 3.61009e-6; = p2267*(p1079+p1081)
- p2574: 0.001343; = p2378*p1073
- p3154: 8.61554e-9; = p2373*p1023
- p2049: 25.6942
- p3138: 1.54936e-8; = p2357*p1023
- p1825: 0
- p0270: 14.118
- p3412: 0.00517882; = p3374*p1238
- p0540: 0; = IF(p0276<0.5;-SQRT(p0007*EXP(p0408^2*p0008)-p0007);SQRT(p0007*EXP(p0408^2*p0008)-p0007))
- p1165: 0.00058608; = p0801*p0001/(p0818*p0002)
- p1963g: 1.13517e-5; = p1667*p1871+p1668*p1872+p1669*p1873+p1670*p1874+p1671*p1875+p1672*p1876+p1673*p1877+p1674*p1878+p1675*p1879+p1676*p1880+p1677*p1881+p1678*p1882+p1679*p1883+p1680*p1884+p1681*p1885+p1682*p1886+p1683*p1887+p1684*p1888+p1685*p1889
- p2159: 2.9339e-5; = p2015*p2083*p2121/(p0818*1000)
- p3078: 2.15144e-5; = p2297*p1082
- p3014: 0; = p2428*(p1129+p1131)
- p0216: 3.082
- p3386: 0.0129915; = p3367*p1234
- p0747: 11.291; = p0087*(1+p0615*p0219/100)
- p2647: 2.6518e-5; = p2256*(p1019+p1021)
- p4461: 2.29146e-7; = p1906*p3480
- p0732: 0
- p3164: 3.72219e-8; = p2383*p1082
- p0936: 0; = p0930*p0001/(p0818*p0002)
- p1191: 0.5
- p0005: 1.60934
- p0744: 88.924; = p0084*(1+p0612*p0216/100)
- p2091: 0.374844
- p1013: 0; = p1012*p0001/(p0818*p0002)
- p1050: 1.86976e7; = IF(p1012=0;p1037*p1036;0)
- p1229: 0.00151813; = IF(p1221=0;0;p1228*p1221)
- p2686: 3.78758e-5; = p2295*(p1019+p1021)
- p0158: 1.802
- p2767: 0.000210548; = p2376*(p1078+p1080)
- p1769: 0
- p0096: 28.002
- p1835: 0
- p4085: 1.01849e-5; = p1942*p3478
- p1678: 0
- p3094: 6.97135e-6; = p2313*p1132
- p3637: 1.75655e-6; = p1906*p3476
- p2710: 3.77808e-5; = p2319*(p1019+p1021)
- p4113: 8.19277e-7; = p1764*p3479
- p2381: 0.000184094; = p2229*p2210
- p1565: 0
- p2599: 0; = p2403*p1014
- p1262: 0.51303; = if(p1232>0;0;p0733/100)
- p1742: 0
- p0523: 0; = SQRT(2)*(IF((2*p0391-1)<0;-1;IF((2*p0391-1)>0;1;0))*SQRT(SQRT((2/(pi()*0.140012289)+LN(1-(2*p0391-1)^2)/2)^2-LN(1-(2*p0391-1)^2)/0.140012289)-(2/(pi()*0.140012289)+LN(1-(2*p0391-1)^2)/2)))
- p2684: 0.000613841; = p2293*(p1019+p1021)
- p1120: 0.0180191; = IF(p1071=0;p1110/(p1115*p0818);0)
- p3471: 1.62848e-6; = p3376*p1241
- p0298: 0.5
- p4878: 0; = p1911*p3482
- p3235: 0.118093
- p3238: 0.854735; = IF(p3237+p3235+p3236>1;1-(p3235+p3236);p3237)
- p0580: 0; = IF(p0316<0.5;-SQRT(p0007*EXP(p0448^2*p0008)-p0007);SQRT(p0007*EXP(p0448^2*p0008)-p0007))
- p2426: 0; = p2235*p2216
- p0854: 213700; = p0801*((1-p0853)*p0846+p0853*p0852)
- p2446: 0.00425042; = p2250*p1014
- p1702: 0.853515
- p3469: 2.09995e-5; = p3374*p1241
- p0578: 0; = IF(p0314<0.5;-SQRT(p0007*EXP(p0446^2*p0008)-p0007);SQRT(p0007*EXP(p0446^2*p0008)-p0007))
- p4073: 0.000163806; = p1930*p3478
- p2880: 7.93776e-5; = p2294*(p1020+p1022)
- p1551: 0
- p0199: 29.118
- p0715: 0
- p0006: 15
- p4510: 2.41645e-6; = p1955*p3480
- p1366: 2
- p2379: 0.000942861; = p2229*p2208
- p1306: 0.0167865; = p1302*p1252/p0818
- p2548: 0; = p2352*p1123
- p3191: 0; = p2410*p1023
- p0503: 0; = SQRT(2)*(IF((2*p0371-1)<0;-1;IF((2*p0371-1)>0;1;0))*SQRT(SQRT((2/(pi()*0.140012289)+LN(1-(2*p0371-1)^2)/2)^2-LN(1-(2*p0371-1)^2)/0.140012289)-(2/(pi()*0.140012289)+LN(1-(2*p0371-1)^2)/2)))
- p3248: 0.84
- p0837: 0.5
- p2802: 0; = p2411*(p1019+p1021)
- p1853: 0
- p2047: 4.92505e-13; = p2015*p2045/(p0818*1000000000000)
- p0053: 10.903
- p1831: 0
- p3153: 5.98624e-8; = p2372*p1023
- p0499: 0; = SQRT(2)*(IF((2*p0367-1)<0;-1;IF((2*p0367-1)>0;1;0))*SQRT(SQRT((2/(pi()*0.140012289)+LN(1-(2*p0367-1)^2)/2)^2-LN(1-(2*p0367-1)^2)/0.140012289)-(2/(pi()*0.140012289)+LN(1-(2*p0367-1)^2)/2)))
- p2524: 0.0027501; = p2328*p1014
- p1498: 11
- p0328: 0.5
- p2946: 0.000224594; = p2360*(p1020+p1022)
- p1621: 0
- p2129: 2.02332e-5; = p2015*p2057*p2091/(p0818*1000)
- p1828: 2.8875e-6; = p1420*1000/p0818
- p2715: 8.92609e-6; = p2324*(p1019+p1021)
- p2753: 0.000379962; = p2362*(p1019+p1021)
- p2178: 0.0877082; = (p0895*p0831/(1-p0831))/(p0818)
- p4799: 0; = p1832*p3482
- p2780: 0.000373479; = p2389*(p1128+p1130)
- p2986: 0; = p2400*(p1020+p1022)
- p0009: 0.568
- p2204: 0.00416139; = p1109/p0818
- p0256: 34.042
- p1821: 0
- p0020: 440.984
- p1730: 0
- p1592: 0
- p1617: 0
- p3181: 0; = p2400*p1023
- p1765: 0
- p2580: 7.02805e-6; = p2384*p1073
- p3239: 0.013074; = IF(p3238+p3235+p3236=1;0;1-(p3238+p3235+p3236))
- p2570: 0.00713626; = p2374*p1014
- p1963e: 0.000279305; = p1628*p1832+p1629*p1833+p1630*p1834+p1631*p1835+p1632*p1836+p1633*p1837+p1634*p1838+p1635*p1839+p1636*p1840+p1637*p1841+p1638*p1842+p1639*p1843+p1640*p1844+p1641*p1845+p1642*p1846+p1643*p1847+p1644*p1848+p1645*p1849+p1646*p1850
- p2376: 0.000827985; = p2229*p2205
- p2717: 0.000382936; = p2326*(p1019+p1021)
- p2466: 7.04598e-5; = p2270*p1073
- p0381: 0.5
- p0843: -0.094426
- p0839: 1.51864; = p0838/p0818
- p3114: 5.59219e-9; = p2333*p1023
- p4529: 3.72379e-5; = p1768*p3481
- p1858: 0
- p0877: 0.592842; = p0876*p0001*p0003/(p0818*p0002)
- p3309: 0; = if(and(p1232=0;p3252<>0);p3252*(p3260-p3304)/p3305;0)
- p3472: 4.58302e-6; = p3377*p1241
- p0704: 95.906; = p0044*(1+p0572*p0176/100)
- p2233: 0.379762; = if(p0783*p0787+p0784*p0788+p0785*p0789+p0786*p0790=0;0;p0790*p0786/(p0783*p0787+p0784*p0788+p0785*p0789+p0786*p0790))
- p0570: 0; = IF(p0306<0.5;-SQRT(p0007*EXP(p0438^2*p0008)-p0007);SQRT(p0007*EXP(p0438^2*p0008)-p0007))
- p1764: 7.21876e-6; = p1356*1000/p0818
- p3100: 1.77225e-9; = p2319*p1023
- p1285: 0; = p1281*p1252/p0818
- p0846: 0.46967; = p0841*p0845^3+p0842*p0845^2+p0843*p0845+p0844
- p2191: 0.000647232; = 8*1.00794*p2189/(2*14.0067)
- p1122: 0; = p1121*p0001/(p0818*p0002)
- p0658: 0; = IF(p0394<0.5;-SQRT(p0007*EXP(p0526^2*p0008)-p0007);SQRT(p0007*EXP(p0526^2*p0008)-p0007))
- p0772: 109.707; = p0112*(1+p0640*p0244/100)
- p1857: 0
- p0977: 0; = IF(p0687=0;IF(OR(p0686=0;p0688=0);0;p0686*1000*p0688/100);0)
- p1960: 584.169; = IF(p1959-p1958<0;0;p1959-p1958)
- p1184: 1.07053e-7; = p1182/p0818
- p1163: 0.00436756
- p2978: 0; = p2392*(p1129+p1131)
- p0797: 78.774; = p0137*(1+p0665*p0269/100)
- p1655: 0
- p0701: 0
- p2952: 0.000265039; = p2366*(p1020+p1022)
- p1716: 0
- p2048: 1.64168e-13; = p2015*p2046/(p0818*1000000000000)
- p4575: 8.70885e-6; = p1814*p3481
- p0607: 0; = IF(p0343<0.5;-SQRT(p0007*EXP(p0475^2*p0008)-p0007);SQRT(p0007*EXP(p0475^2*p0008)-p0007))
- p0472: 0; = SQRT(2)*(IF((2*p0340-1)<0;-1;IF((2*p0340-1)>0;1;0))*SQRT(SQRT((2/(pi()*0.140012289)+LN(1-(2*p0340-1)^2)/2)^2-LN(1-(2*p0340-1)^2)/0.140012289)-(2/(pi()*0.140012289)+LN(1-(2*p0340-1)^2)/2)))
- p2653: 0.000681437; = p2262*(p1078+p1080)
- p5334: 4.90631e-6; = p1955*p3484
- p1323: 0.0589086; = IF(((p0745*1000*p0750/100)+(p0754*1000*p0759/100))/p0801<0;0;((p0745*1000*p0750/100)+(p0754*1000*p0759/100))/p0801)
- p1687: 0
- p0509: 0; = SQRT(2)*(IF((2*p0377-1)<0;-1;IF((2*p0377-1)>0;1;0))*SQRT(SQRT((2/(pi()*0.140012289)+LN(1-(2*p0377-1)^2)/2)^2-LN(1-(2*p0377-1)^2)/0.140012289)-(2/(pi()*0.140012289)+LN(1-(2*p0377-1)^2)/2)))
- p1116: 5.80196e-5; = IF(p1071=0;p1106/(p1111*p0818);0)
- p1329: 0.000264657; = p1328*p0001/(p0818*p0002)
- p0313: 0.5
- p3180: 0; = p2399*p1023
- p2010: 0.00659388; = ((p1984*p1985+p1990*p1991+p1996*p1997+p2004*p2005)/p0818)*p0005*p0002/1000
- p1136: 0; = if(p1121=0;p1130*(p0716/100)*p0703*1000;0)
- p3555: 2.07592e-6; = p1824*p3476
- p0513: 0; = SQRT(2)*(IF((2*p0381-1)<0;-1;IF((2*p0381-1)>0;1;0))*SQRT(SQRT((2/(pi()*0.140012289)+LN(1-(2*p0381-1)^2)/2)^2-LN(1-(2*p0381-1)^2)/0.140012289)-(2/(pi()*0.140012289)+LN(1-(2*p0381-1)^2)/2)))
- p3256: 2.68593e7; = p1252*(p1307*(1-p3247)+p1310*(1-p3248)+p1311*(1-p3249)+p1312*(1-p3250))
- p3236: 0.0140975
- p1599: 0.806571
- p1812: 0
- p2748: 0.000330292; = p2357*(p1019+p1021)
- p3051: 3.90217e-6; = p2270*p1082
- p0340: 0.5
- p3328: 1.50671e7; = if(and(p1232=0;p3255<>0);p3255*(p3265*p3277-p3323)/p3327;0)
- p2624: 0; = p2428*p1123
- p1256: 0.97436; = if(p1232>0;0;IF(p1253=1;0;IF(p1253+p1254>1;1-p1253;p1254)))
- p0297: 0.5
- p3290: 0.195
- p2271: 0.00104678; = p2226*p2217
- p2765: 0.00210559; = p2374*(p1019+p1021)
- p1865: 0
- p2894: 1.28345e-5; = p2308*(p1079+p1081)
- p2770: 0.00023976; = p2379*(p1078+p1080)
- p1759: 0
- p3407: 0; = p3369*p1238
- p1175: 0.000337452
- p0585: 0; = IF(p0321<0.5;-SQRT(p0007*EXP(p0453^2*p0008)-p0007);SQRT(p0007*EXP(p0453^2*p0008)-p0007))
- p1987: 400
- p1123: 0.69481; = if(p1121=0;p0717/100;0)
- p5207: 8.45916e-8; = p1828*p3484
- p1944: 0
- p1615: 0
- p2172: 0.678607; = p2166-(p2167+p2168+p2169+p2170)
- p2699: 2.99337e-5; = p2308*(p1078+p1080)
- p0928: 440984; = p0801*p0918
- p3207: 0; = p2426*p1082
- p3167: 5.59121e-6; = p2386*p1082
- p0423: 0; = SQRT(2)*(IF((2*p0291-1)<0;-1;IF((2*p0291-1)>0;1;0))*SQRT(SQRT((2/(pi()*0.140012289)+LN(1-(2*p0291-1)^2)/2)^2-LN(1-(2*p0291-1)^2)/0.140012289)-(2/(pi()*0.140012289)+LN(1-(2*p0291-1)^2)/2)))
- p2597: 0; = p2401*p1014
- p2920: 5.17514e-6; = p2334*(p1020+p1022)
- p4716: 3.48354e-5; = p1955*p3481
- p0903: 0.0175
- p3139: 1.89713e-8; = p2358*p1023
- p3505: 3.19373e-7; = p1774*p3476
- p2135: 1.32302e-5; = p2015*p2063*p2097/(p0818*1000)
- p2716: 7.22357e-5; = p2325*(p1019+p1021)
- p3387: 0; = p3368*p1234
- p1654: 0
- p2855: 5.1859e-5; = p2269*(p1079+p1081)
- p0990: 0; = p0986*p0886
- p2121: 0.822447
- p0826: 0.084; = 1-p0825/p0818
- p3255: 7.21484e7; = p1252*(p1297*(1-p3247)+p1300*(1-p3248)+p1301*(1-p3249)+p1302*(1-p3250))
- p3378: 0.0143878; = if(p1232=0;p3246*p3360/p0818;0)
- p2831: 1.65468e-5; = p2245*(p1020+p1022)
- p3741: 2.7991e-7; = p1804*p3477
- p2140: 2.32532e-6; = p2015*p2068*p2102/(p0818*1000)
- p0609: 0; = IF(p0345<0.5;-SQRT(p0007*EXP(p0477^2*p0008)-p0007);SQRT(p0007*EXP(p0477^2*p0008)-p0007))
- p2142: 3.78297e-6; = p2015*p2070*p2104/(p0818*1000)
- p1395: 4
- p3305: 0; = if(and(p1232=0;p3252<>0);1-(p3301+p3302+p3303+p3304);0)
- p2055: 5.59471
- p3367: 0.0254875; = if(p1232=0;p3244*p3361/p0818;0)
- p3192: 0; = p2411*p1023
- p3190: 0; = p2409*p1023
- p0231: 35.554
- p2458: 0.00161662; = p2262*p1073
- p4800: 0; = p1833*p3482
- p0664: 0; = IF(p0400<0.5;-SQRT(p0007*EXP(p0532^2*p0008)-p0007);SQRT(p0007*EXP(p0532^2*p0008)-p0007))
- p1192: 9.84902e-8; = p1188*p1191/p0818
- p1370: 3
- p3264: 0.0887032
- p2701: 6.58779e-5; = p2310*(p1078+p1080)
- p3016: 0; = p2430*(p1129+p1131)
- p2226: 0.625261; = if(p0774*p0778+p0775*p0779+p0776*p0780+p0777*p0781=0;0;p0778*p0774/(p0774*p0778+p0775*p0779+p0776*p0780+p0777*p0781))
- p1856: 0
- p4728: 0; = p1761*p3482
- p0232: 17.303
- p2030: 8.87
- p0241: 20.412
- p2486: 1.66767e-6; = p2290*p1014
- p1213: 15
- p2041: 0; = p2015*p2040/(p0818*1000)
- p2826: 1.43838e-5; = p2240*(p1020+p1022)
- p1073: 0.60327; = IF(p1071=0;p0711/100;0)
- p3406: 0; = p3368*p1238
- p4496: 2.08315e-8; = p1941*p3480
- p0411: 0; = SQRT(2)*(IF((2*p0279-1)<0;-1;IF((2*p0279-1)>0;1;0))*SQRT(SQRT((2/(pi()*0.140012289)+LN(1-(2*p0279-1)^2)/2)^2-LN(1-(2*p0279-1)^2)/0.140012289)-(2/(pi()*0.140012289)+LN(1-(2*p0279-1)^2)/2)))
- p2545: 0; = p2349*p1073
- p2746: 0.000874802; = p2355*(p1019+p1021)
- p2478: 0.000520431; = p2282*p1014
- p2583: 2.47909e-5; = p2387*p1073
- p0300: 0.5
- p4260: 9.83133e-6; = p1911*p3479
- p2705: 2.75678e-5; = p2314*(p1128+p1130)
- p2289: 0.00840253; = p2223*p2196
- p1813: 0
- p1289: 0
- p1282: 0.00758893; = IF(p1277+p1280+p1281=p1260;0;p1260-(p1277+p1280+p1281))
- p1060: 0.21
- p2657: 8.05194e-7; = p2266*(p1078+p1080)
- p0266: 31.599
- p3176: 0; = p2395*p1023
- p2085: 0.0335294
- p0902: 0.0377084
- p0081: 1.564
- p2262: 0.00267976; = p2226*p2208
- p0221: 26.773
- p2018: 0.1978
- p3015: 0; = p2429*(p1129+p1131)
- p1586: 0
- p1253: 0; = if(p1232>0;0;p0735/100)
- p0185: 60.523
- p1083: 107452; = IF(p1071=0;p1073*(p0710/100)*p0703*1000;0)
- p4272: 4.91566e-7; = p1923*p3479
- p1914: 0
- p3266: 0.0545989
- p2951: 0.00123641; = p2365*(p1020+p1022)
- p3575: 3.19373e-7; = p1844*p3476
- p0637: 0; = IF(p0373<0.5;-SQRT(p0007*EXP(p0505^2*p0008)-p0007);SQRT(p0007*EXP(p0505^2*p0008)-p0007))
- p2662: 0.000266187; = p2271*(p1078+p1080)
- p2678: 0.00084534; = p2287*(p1019+p1021)
- p2442: 4.67564e-5; = p2246*p1014
- p2195: 0.00595213; = p2194*p2193
- p2620: 0; = p2424*p1073
- p2396: 0; = p2234*p2185
- p2321: 0.000326298; = p2224*p2188
- p2190: 0.00257375; = 32.065*p2189/(2*14.0067)
- p0552: 0; = IF(p0288<0.5;-SQRT(p0007*EXP(p0420^2*p0008)-p0007);SQRT(p0007*EXP(p0420^2*p0008)-p0007))
- p1047: 0.344595; = IF(p1012=0;IF(p1037+p1044+p1045+p1046=1;0;IF(p1037+p1044+p1045+p1046+p1041>1;1-(p1037+p1044+p1045+p1046);p1041));0)
- p1893: 0.000726207; = p1485*1000/p0818
- p3245: 0; = IF(p3244=1;0;if(p3244+p0792/100>1;1-p3244;p0792/100))
- p1945: 0
- p2510: 9.03424e-5; = p2314*p1123
- p1805: 0
- p3223: 0.126838; = IF(p3216=0;0;(1-p1223)*24.3050/84.3139)
- p2205: 0.00376366; = 2*14.0067*p2204/30.973762
- p1068: 0.0925558; = IF(p1012=0;p1054/(p1061*p0818);0)
- p4735: 0; = p1768*p3482
- p0119: 21.771
- p2489: 0.00208043; = p2293*p1014
- p0487: 0; = SQRT(2)*(IF((2*p0355-1)<0;-1;IF((2*p0355-1)>0;1;0))*SQRT(SQRT((2/(pi()*0.140012289)+LN(1-(2*p0355-1)^2)/2)^2-LN(1-(2*p0355-1)^2)/0.140012289)-(2/(pi()*0.140012289)+LN(1-(2*p0355-1)^2)/2)))
- p0681: 23.756; = p0021*(1+p0549*p0153/100)
- p3360: 5.5767e7; = if(p1232=0;p3310+p3321+p3332+p3343+p3354;0)
- p0469: 0; = SQRT(2)*(IF((2*p0337-1)<0;-1;IF((2*p0337-1)>0;1;0))*SQRT(SQRT((2/(pi()*0.140012289)+LN(1-(2*p0337-1)^2)/2)^2-LN(1-(2*p0337-1)^2)/0.140012289)-(2/(pi()*0.140012289)+LN(1-(2*p0337-1)^2)/2)))
- p2296: 0.00203685; = p2223*p2203
- p2323: 0.000166503; = p2224*p2190
- p1035: 5.62265e-9; = IF(p1012=0;p1029*p0001/(p0818*p0002);0)
- p0680: 440.984; = p0020*(1+p0548*p0152/100)
- p2969: 1.2147e-7; = p2383*(p1079+p1081)
- p1756: 0
- p1589: 0
- p1576: 0
- p2294: 0.00123449; = p2223*p2201
- p0972: 0.00026977; = p0969/p0818
- p3119: 0; = p2338*p1082
- p3318: 3.33684e6; = if(and(p1232=0;p3253<>0);p3253*(p3262-p3313)/p3316;0)
- p1757: 0
- p3310: 0; = if(and(p1232=0;p3252<>0);IF((p3306+p3307+p3308+p3309)+(p3252*(p3257*(1-p3277))/p3305)>p3252;p3252-(p3306+p3307+p3308+p3309);p3252*(p3257*(1-p3277))/p3305);0)
- p0684: 97.283; = p0024*(1+p0552*p0156/100)
- p2119: 0.679049
- p3227: 0.000192557; = p3223*p1229
- p2558: 0.00128777; = p2362*p1014
- p1320: 0.791546; = IF(((p0745*1000*p0747/100)+(p0754*1000*p0756/100))/p0801<0;0;((p0745*1000*p0747/100)+(p0754*1000*p0756/100))/p0801)
- p0403: 0.5
- p1212: 0.0424515; = if(p1211=0;0;if(p1193>0;0;(p1207+p1208+p1209)*p1210/(2000*p1211)))
- p0835: 0.000258918; = -LN(1-p0669/100)/p0834
- p0267: 6.979
- p3156: 3.05863e-5; = p2375*p1082
- p1264: 0; = if(p1232>0;0;IF(p1259+p1263=1;0;IF(p1259+p1263+p1261>1;1-(p1259+p1263);p1261)))
- p0141: 15.491
- p3321: 1.53611e7; = if(and(p1232=0;p3253<>0);IF((p3317+p3318+p3319+p3320)+(p3253*(p3261*(1-p3277))/p3316)>p3253;p3253-(p3317+p3318+p3319+p3320);p3253*(p3261*(1-p3277))/p3316);0)
- p1704: 0
- p1822: 5.77501e-6; = p1414*1000/p0818
- p3345: 0.160606; = if(and(p1232=0;p3256<>0);p3273*p3277*p3293;0)
- p0110: 25.137
- p4539: 9.00916e-7; = p1778*p3481
- p1338: 386396; = p1324*p0801
- p0863: 0.0708396; = p0675*1000/p0856
- p3032: 1.61601e-11; = p2251*p1023
- p1922: 0
- p0190: 40.314
- p2407: 0; = p2234*p2197
- p0761: 0
- p1878: 0
- p1118: 0.00186095; = IF(p1071=0;p1108/(p1113*p0818);0)
- p1984: 30
- p1819: 0
- p2382: 0.00241078; = p2229*p2211
- p2561: 0.013893; = p2365*p1014
- p0514: 0; = SQRT(2)*(IF((2*p0382-1)<0;-1;IF((2*p0382-1)>0;1;0))*SQRT(SQRT((2/(pi()*0.140012289)+LN(1-(2*p0382-1)^2)/2)^2-LN(1-(2*p0382-1)^2)/0.140012289)-(2/(pi()*0.140012289)+LN(1-(2*p0382-1)^2)/2)))
- p1699: 0.762907
- p4242: 8.24193e-5; = p1893*p3479
- p2892: 8.93452e-7; = p2306*(p1079+p1081)
- p1795: 0
- p0271: 26.727
- p2158: 2.42743e-6; = p2015*p2082*p2120/(p0818*1000)
- p0082: 82.453
- p2456: 0.000459721; = p2260*p1073
- p2971: 4.83515e-6; = p2385*(p1079+p1081)
- p3308: 0; = if(and(p1232=0;p3252<>0);p3252*(p3259-p3303)/p3305;0)
- p0614: 0; = IF(p0350<0.5;-SQRT(p0007*EXP(p0482^2*p0008)-p0007);SQRT(p0007*EXP(p0482^2*p0008)-p0007))
- p1038: 0.00806102
- p0999: 0.0931786; = IF(p0996=1;0;IF(p0996+p0997>1;1-p0996;p0997))
- p2777: 4.25558e-5; = p2386*(p1078+p1080)
- p2052: 2.02212e-5; = p2015*p2049*(1-p2050)/(p0818*1000)
- p2904: 9.30659e-6; = p2318*(p1020+p1022)
- p2584: 0.000222188; = p2388*p1073
- p2709: 3.08551e-5; = p2318*(p1019+p1021)
- p2606: 0; = p2410*p1014
- p0892: 3281.39; = if(p0891=0;0;(1-p1240)*p3251/p0891)
- p1003: 533400; = p0999*p0888
- p0495: 0; = SQRT(2)*(IF((2*p0363-1)<0;-1;IF((2*p0363-1)>0;1;0))*SQRT(SQRT((2/(pi()*0.140012289)+LN(1-(2*p0363-1)^2)/2)^2-LN(1-(2*p0363-1)^2)/0.140012289)-(2/(pi()*0.140012289)+LN(1-(2*p0363-1)^2)/2)))
- p2477: 4.0682e-5; = p2281*p1014
- p0780: 12.555; = p0120*(1+p0648*p0252/100)
- p0998: 0; = if(p0888=0;0;if((p0699*p0698*1000*p0700/100)/p0888>1;1;(p0699*p0698*1000*p0700/100)/p0888))
- p1313: 0; = p1307*p1252/p0818
- p1638: 0
- p1365: 1
- p1691: 0
- p0989: 636525; = p0985*p0886
- p3063: 7.2031e-9; = p2282*p1023
- p2850: 5.70472e-5; = p2264*(p1079+p1081)
- p0246: 9.721
- p2352: 0; = p2232*p2220
- p0044: 95.906
- p2408: 0; = p2234*p2198
- p3267: 0.0170629
- p2636: 5.48594e-5; = p2245*(p1019+p1021)
- p2559: 0.00032384; = p2363*p1014
- p2944: 0.000121985; = p2358*(p1020+p1022)
- p0767: 66.098; = p0107*(1+p0635*p0239/100)
- p0076: 97.436
- p2956: 2.59711e-6; = p2370*(p1020+p1022)
- p0168: 37.226
- p5337: 2.47079e-5; = p1962*p3484
- p0360: 0.5
- p0240: 9.855
- p3428: 0; = p3371*p1239
- p2015: 1.1371e7; = p0830*p2011*p2013
- p1877: 0
- p0751: 17.652; = p0091*(1+p0619*p0223/100)
- p3344: 0; = if(and(p1232=0;p3254<>0);p3254-(p3339+p3340+p3341+p3342+p3343);0)
- p1243: 33857.2; = if(p1232>0;0;p1238*(p0725/100)*p0723*1000)
- p3117: 0; = p2336*p1082
- p2221: 0.00102915; = p1155-p2220
- p1254: 0.97436; = if(p1232>0;0;p0736/100)
- p3213: 0.112803; = p1222*12.0107/100.0869
- p3445: 0; = p3369*p1240
- p5017: 1.04997e-7; = p1844*p3483
- p2188: 0.00504382; = p1066-p2186-p2187
- p4009: 3.39495e-6; = p1866*p3478
- p0887: 2155.85; = 1000*p0886*p0001*p0003*p0004/(p0818*p0002)
- p2515: 0.000128047; = p2319*p1014
- p1867: 0
- p3126: 0; = p2345*p1082
- p3414: 0.00040161; = p3376*p1238
- p0417: 0; = SQRT(2)*(IF((2*p0285-1)<0;-1;IF((2*p0285-1)>0;1;0))*SQRT(SQRT((2/(pi()*0.140012289)+LN(1-(2*p0285-1)^2)/2)^2-LN(1-(2*p0285-1)^2)/0.140012289)-(2/(pi()*0.140012289)+LN(1-(2*p0285-1)^2)/2)))
- p0942: 0; = if(and(p0683=0;p0948=0);p0936;0)
- p3240: 9.21315e-9; = p3234*p1188*p3235/p0818
- p0983: 0.107021; = if(p0886=0;0;min(1;(p0695*p0694*1000*p0697/100)/p0886))
- p2982: 0; = p2396*(p1020+p1022)
- p0626: 0; = IF(p0362<0.5;-SQRT(p0007*EXP(p0494^2*p0008)-p0007);SQRT(p0007*EXP(p0494^2*p0008)-p0007))
- p1281: 0; = IF(p1277+p1280=p1263;0;IF(p1277+p1280+p1279>p1263;p1263-(p1277+p1280);p1279))
- p2095: 0.765734
- p0766: 72.64; = p0106*(1+p0634*p0238/100)
- p2032: 0.448886
- p5052: 6.29981e-7; = p1879*p3483
- p0946: 0; = if(and(p0683=0;or(p0807=480;p0807=32;p0807=1;and(p0807=60;p0901<0.03)));p0934;0)
- p3761: 3.63882e-6; = p1824*p3477
- p1656: 0
- p2165: 1.49958; = (p0833-p2014)/p0818-p0839
- p2359: 0.00027304; = p2225*p2187
- p4152: 6.55422e-7; = p1803*p3479
- p2655: 0.000133051; = p2264*(p1078+p1080)
- p1623: 0
- p3976: 1.27311e-6; = p1833*p3478
- p1614: 0
- p0994: 0; = p0990*p0001*p0004/(p0818*p0002)
- p4860: 0; = p1893*p3482
- p4054: 2.54621e-5; = p1911*p3478
- p1291: 0; = IF(p1287+p1290=p1264;0;IF(p1287+p1290+p1289>p1264;p1264-(p1287+p1290);p1289))
- p0434: 0; = SQRT(2)*(IF((2*p0302-1)<0;-1;IF((2*p0302-1)>0;1;0))*SQRT(SQRT((2/(pi()*0.140012289)+LN(1-(2*p0302-1)^2)/2)^2-LN(1-(2*p0302-1)^2)/0.140012289)-(2/(pi()*0.140012289)+LN(1-(2*p0302-1)^2)/2)))
- p0807: 480
- p0446: 0; = SQRT(2)*(IF((2*p0314-1)<0;-1;IF((2*p0314-1)>0;1;0))*SQRT(SQRT((2/(pi()*0.140012289)+LN(1-(2*p0314-1)^2)/2)^2-LN(1-(2*p0314-1)^2)/0.140012289)-(2/(pi()*0.140012289)+LN(1-(2*p0314-1)^2)/2)))
- p0329: 0.5
- p3304: 0; = if(and(p1232=0;p3252<>0);p3260*p3289;0)
- p2423: 0; = p2235*p2213
- p0395: 0.5
- p2431: 0; = p2236*p2221
- p2501: 4.72756e-7; = p2305*p1073
- p1948: 0
- p2391: 0.000224909; = p2233*p2220
- p3085: 5.66548e-5; = p2304*p1082
- p2778: 1.04498e-5; = p2387*(p1078+p1080)
- p0890: 258101; = p0686*1000*p0687*p0885/100
- p2857: 0.000114131; = p2271*(p1079+p1081)
- p1837: 0
- p0930: 0; = p0801*p0924
- p2137: 7.72857e-7; = p2015*p2065*p2099/(p0818*1000)
- p1271: 0; = IF(p1267+p1270=p1259;0;IF(p1267+p1270+p1269>p1259;p1259-(p1267+p1270);p1269))
- p1773: 1.44375e-6; = p1365*1000/p0818
- p1640: 0.609075
- p2659: 3.2051e-5; = p2268*(p1078+p1080)
- p1606: 0
- p2801: 0; = p2410*(p1019+p1021)
- p3135: 1.86941e-7; = p2354*p1023
- p2934: 0; = p2348*(p1079+p1081)
- p2422: 0; = p2235*p2212
- p3148: 4.07452e-7; = p2367*p1023
- p2723: 0.000278068; = p2332*(p1019+p1021)
- p1334: 210829; = p1322*p0801
- p1861: 0
- p0424: 0; = SQRT(2)*(IF((2*p0292-1)<0;-1;IF((2*p0292-1)>0;1;0))*SQRT(SQRT((2/(pi()*0.140012289)+LN(1-(2*p0292-1)^2)/2)^2-LN(1-(2*p0292-1)^2)/0.140012289)-(2/(pi()*0.140012289)+LN(1-(2*p0292-1)^2)/2)))
- p3151: 4.03906e-10; = p2370*p1023
- p1098: 0.0211292
- p1044: 0.00806102; = IF(p1012=0;IF(p1037=1;0;IF(p1037+p1038>1;1-p1037;p1038));0)
- p2700: 7.35042e-6; = p2309*(p1078+p1080)
- p0245: 14.118
- p0420: 0; = SQRT(2)*(IF((2*p0288-1)<0;-1;IF((2*p0288-1)>0;1;0))*SQRT(SQRT((2/(pi()*0.140012289)+LN(1-(2*p0288-1)^2)/2)^2-LN(1-(2*p0288-1)^2)/0.140012289)-(2/(pi()*0.140012289)+LN(1-(2*p0288-1)^2)/2)))
- p3931: 4.24369e-7; = p1788*p3478
- p2616: 0; = p2420*p1073
- p1750: 0
- p1114: 0.216028
- p1648: 0
- p2358: 0.00189713; = p2225*p2186
- p1189: 0.00058608; = p0801*p0001/(p0818*p0002)
- p3179: 0; = p2398*p1023
- p1533: 1
- p2962: 9.02752e-5; = p2376*(p1079+p1081)
- p3104: 1.66503e-9; = p2323*p1023
- p2663: 0.000485724; = p2272*(p1128+p1130)
- p2924: 0; = p2338*(p1079+p1081)
- p2488: 6.01806e-6; = p2292*p1014
- p4661: 3.60366e-6; = p1900*p3481
- p2306: 8.19455e-6; = p2227*p2213
- p2733: 0; = p2342*(p1078+p1080)
- p0951: 0; = if(and(p0683=0;or(p0807=480;p0807=32;p0807=1;and(p0807=60;p0901<0.03)));p0939;0)
- p2185: 0.0022373; = p1065-p2184
- p4593: 9.3395e-5; = p1832*p3481
- p1908: 0
- p3089: 3.93286e-6; = p2308*p1082
- p1963i: 7.29208e-5; = p1706*p1910+p1707*p1911+p1708*p1912+p1709*p1913+p1710*p1914+p1711*p1915+p1712*p1916+p1713*p1917+p1714*p1918+p1715*p1919+p1716*p1920+p1717*p1921+p1718*p1922+p1719*p1923+p1720*p1924+p1721*p1925+p1722*p1926+p1723*p1927+p1724*p1928
- p0496: 0; = SQRT(2)*(IF((2*p0364-1)<0;-1;IF((2*p0364-1)>0;1;0))*SQRT(SQRT((2/(pi()*0.140012289)+LN(1-(2*p0364-1)^2)/2)^2-LN(1-(2*p0364-1)^2)/0.140012289)-(2/(pi()*0.140012289)+LN(1-(2*p0364-1)^2)/2)))
- p0139: 48.925
- p2170: 0.00215423; = p2166*(p0913)
- p1735: 0
- p2835: 3.82667e-5; = p2249*(p1020+p1022)
- p3319: 1.00505e6; = if(and(p1232=0;p3253<>0);p3253*(p3263-p3314)/p3316;0)
- p0824: 0.8615
- p2483: 0.00286503; = p2287*p1014
- p0377: 0.5
- p2375: 0.000915483; = p2229*p2204
- p0296: 0.5
- p2948: 0.000114605; = p2362*(p1020+p1022)
- p0713: 10.903; = p0053*(1+p0581*p0185/100)
- p4549: 3.00305e-7; = p1788*p3481
- p2745: 0.00398521; = p2354*(p1019+p1021)
- p3171: 0.000231281; = p2390*p1132
- p2740: 0; = p2349*(p1078+p1080)
- p1226: 455000; = IF(p1221=0;0;IF(p1193=0;p0801;0))
- p3112: 3.77318e-11; = p2331*p1023
- p2608: 0; = p2412*p1014
- p0857: 5.8608; = p0856*p0001*p0003/(p0818*p0002)
- p3268: 0.0232481
- p0353: 0.5
- p2480: 0.000265565; = p2284*p1014
- p0816: 0
- p3535: 1.59686e-7; = p1804*p3476
- p1863: 0
- p1149: 0.830148
- p0896: 0.516338
- p2251: 1.61601e-6; = p2222*p2197
- p3987: 8.48738e-7; = p1844*p3478
- p1086: 0; = IF(p1071=0;p1080*(p0710/100)*p0703*1000;0)
- p3209: 0; = p2428*p1132
- p4925: 0; = p1962*p3482
- p0953: 0; = if(and(p0683>0;or(p0807=56;p0807=100;and(p0807=60;p0901>0.06)));p0935;0)
- p3860: 8.39729e-7; = p1923*p3477
- p2666: 0.000107768; = p2275*(p1128+p1130)
- p0147: 0
- p0787: 42.515; = p0127*(1+p0655*p0259/100)
- p0483: 0; = SQRT(2)*(IF((2*p0351-1)<0;-1;IF((2*p0351-1)>0;1;0))*SQRT(SQRT((2/(pi()*0.140012289)+LN(1-(2*p0351-1)^2)/2)^2-LN(1-(2*p0351-1)^2)/0.140012289)-(2/(pi()*0.140012289)+LN(1-(2*p0351-1)^2)/2)))
- p1066: 0.00817758; = IF(p1012=0;p1052/(p1059*p0818);0)
- p3115: 8.04842e-10; = p2334*p1023
- p3068: 3.96538e-8; = p2287*p1023
- p3298: 0; = if(p1283+p1284+p1285+p1286=0;0;p1283/(p1283+p1284+p1285+p1286))
- p0803: 0
- p0931: 0; = p0801*p0925
- p2586: 0.00172477; = p2390*p1123
- p3840: 1.11964e-5; = p1903*p3477
- p3082: 2.21578e-5; = p2301*p1082
- p1152: 0.415074
- p2605: 0; = p2409*p1014
- p2668: 0.000180403; = p2277*(p1019+p1021)
- p0113: 39.134
- p2536: 0; = p2340*p1073
- p5320: 4.22958e-8; = p1941*p3484
- p1991: 3.36123e7; = (if(p1111=0;0;p1106/p1111)+if(p1112=0;0;p1107/p1112)+if(p1113=0;0;p1108/p1113)+if(p1114=0;0;p1109/p1114)+if(p1115=0;0;p1110/p1115))*(1+p1157)
- p0632: 0; = IF(p0368<0.5;-SQRT(p0007*EXP(p0500^2*p0008)-p0007);SQRT(p0007*EXP(p0500^2*p0008)-p0007))
- p1696: 0.752785
- p2518: 0.000105099; = p2322*p1014
- p3174: 0; = p2393*p1023
- p2334: 8.04842e-5; = p2224*p2202
- p0106: 72.64
- p4308: 0.000219506; = p1963*p3479
- p2370: 4.03906e-5; = p2225*p2199
- p2181: 4114.28; = p0887+p0889+p0893+p2180
- p0477: 0; = SQRT(2)*(IF((2*p0345-1)<0;-1;IF((2*p0345-1)>0;1;0))*SQRT(SQRT((2/(pi()*0.140012289)+LN(1-(2*p0345-1)^2)/2)^2-LN(1-(2*p0345-1)^2)/0.140012289)-(2/(pi()*0.140012289)+LN(1-(2*p0345-1)^2)/2)))
- p3740: 1.11964e-6; = p1803*p3477
- p2819: 0; = p2428*(p1128+p1130)
- p1224: 0.44; = IF(p1221=0;0;IF(p1193=0;1-p1223;0))
- p1280: 0.288391; = IF(p1277=p1263;0;IF(p1277+p1278>p1263;p1263-p1277;p1278))
- p1156: 0.244623; = p1064+p1065+p1066+p1067+p1068+p1069+p1070+p1116+p1117+p1118+p1119+p1120+p1154+p1155
- p3765: 5.59819e-7; = p1828*p3477
- p1689: 0.2666
- p5330: 3.08759e-6; = p1951*p3484
- p0893: 85.5177; = 1000*(p0890+p0892)*p0001*p0003*p0004/(p0818*p0002)
- p3422: 0; = p3365*p1239
- p3475: 0.00212475; = p3380*p1241
- p2268: 0.000126041; = p2226*p2214
- p1743: 0
- p4250: 1.45831e-5; = p1901*p3479
- p1958: 1906
- p0754: 900.047; = p0094*(1+p0622*p0226/100)
- p0348: 0.5
- p2145: 5.46585e-6; = p2015*p2073*p2107/(p0818*1000)
- p2275: 0.000508294; = p2230*p2221
- p2627: 0; = p2431*p1123
- p0706: 10.541; = p0046*(1+p0574*p0178/100)
- p0117: 54.175
- p1597: 0
- p3276: 0.0887032
- p0733: 51.303; = p0073*(1+p0601*p0205/100)
- p2553: 0.00111943; = p2357*p1014
- p0402: 0.5
- p2623: 0; = p2427*p1073
- p0114: 89.898
- p2415: 0; = p2235*p2205
- p1299: 0
- p1917: 0
- p0912: 0.0117914
- p2238: 0.000592481; = p2222*p2183
- p1571: 0
- p0508: 0; = SQRT(2)*(IF((2*p0376-1)<0;-1;IF((2*p0376-1)>0;1;0))*SQRT(SQRT((2/(pi()*0.140012289)+LN(1-(2*p0376-1)^2)/2)^2-LN(1-(2*p0376-1)^2)/0.140012289)-(2/(pi()*0.140012289)+LN(1-(2*p0376-1)^2)/2)))
- p2216: 0.000186796; = p1108/p0818
- p4369: 6.04113e-7; = p1814*p3480
- p1102: 0.0211292; = IF(p1071=0;IF(p1096+p1101=1;0;IF(p1096+p1101+p1098>1;1-(p1096+p1101);p1098));0)
- p3129: 0; = p2348*p1082
- p1888: 0
- p4941: 6.50981e-6; = p1768*p3483
- p2791: 0; = p2400*(p1019+p1021)
- p1272: 0; = IF(p1267+p1270+p1271=p1259;0;p1259-(p1267+p1270+p1271))
- p1569: 0.819138
- p3993: 2.97058e-6; = p1850*p3478
- p0566: 0; = IF(p0302<0.5;-SQRT(p0007*EXP(p0434^2*p0008)-p0007);SQRT(p0007*EXP(p0434^2*p0008)-p0007))
- p2593: 0; = p2397*p1014
- p3379: 0.00554563; = if(p1232=0;p3246*p3361/p0818;0)
- p4405: 1.4582e-7; = p1850*p3480
- p3295: 0.58
- p1081: 0; = IF(p1071=0;IF(p1073+p1078+p1079+p1080=1;0;IF(p1073+p1078+p1079+p1080+p1077>1;1-(p1073+p1078+p1079+p1080);p1077));0)
- p0933: 14016; = p0801*p0927
- p1124: 0.21202; = if(p1121=0;p0718/100;0)
- p2353: 0; = p2232*p2221
- p4791: 0; = p1824*p3482
- p3848: 1.67946e-5; = p1911*p3477
- p5212: 1.26887e-7; = p1833*p3484
- p3325: 0.000853147; = if(and(p1232=0;p3255<>0);p3267*p3289;0)
- p2703: 0.000175096; = p2312*(p1128+p1130)
- p0819: 1.57658; = p0808*p0809/p0818
- p3093: 7.6944e-5; = p2312*p1132
- p1931: 0
- p1627: 0
- p0374: 0.5
- p2304: 0.00169574; = p2227*p2211
- p2427: 0; = p2235*p2217
- p2492: 0.00147165; = p2296*p1014
- p2533: 0; = p2337*p1073
- p2484: 0.000614152; = p2288*p1014
- p2497: 0.000400094; = p2301*p1073
- p2707: 8.17218e-5; = p2316*(p1019+p1021)
- p0182: 14.118
- p3028: 5.23707e-9; = p2247*p1023
- p1273: 0; = p1267*p1252/p0818
- p2511: 0.00126176; = p2315*p1014
- p2573: 0.00016175; = p2377*p1073
- p2564: 8.08682e-6; = p2368*p1014
- p1939: 0
- p1070: 0.0443137; = IF(p1012=0;p1056/(p1063*p0818);0)
- p0522: 0; = SQRT(2)*(IF((2*p0390-1)<0;-1;IF((2*p0390-1)>0;1;0))*SQRT(SQRT((2/(pi()*0.140012289)+LN(1-(2*p0390-1)^2)/2)^2-LN(1-(2*p0390-1)^2)/0.140012289)-(2/(pi()*0.140012289)+LN(1-(2*p0390-1)^2)/2)))
- p3127: 0; = p2346*p1082
- p2556: 0.00252366; = p2360*p1014
- p0950: 0; = if(and(p0683=0;or(p0807=480;p0807=32;p0807=1;and(p0807=60;p0901<0.03)));p0938;0)
- p2312: 0.000825846; = p2231*p2219
- p0685: 0
- p0572: 0; = IF(p0308<0.5;-SQRT(p0007*EXP(p0440^2*p0008)-p0007);SQRT(p0007*EXP(p0440^2*p0008)-p0007))
- p1903: 5.77501e-5; = p1495*1000/p0818
- p1930: 0.000557288; = p1522*1000/p0818
- p1221: 0.0263674; = p1216*(1+p1220*p1217/100)
- p2644: 1.24319e-6; = p2253*(p1019+p1021)
- p1308: 0.186093
- p0058: 21.202
- p0448: 0; = SQRT(2)*(IF((2*p0316-1)<0;-1;IF((2*p0316-1)>0;1;0))*SQRT(SQRT((2/(pi()*0.140012289)+LN(1-(2*p0316-1)^2)/2)^2-LN(1-(2*p0316-1)^2)/0.140012289)-(2/(pi()*0.140012289)+LN(1-(2*p0316-1)^2)/2)))
- p0645: 0; = IF(p0381<0.5;-SQRT(p0007*EXP(p0513^2*p0008)-p0007);SQRT(p0007*EXP(p0513^2*p0008)-p0007))
- p0676: 0
- p5005: 1.6327e-5; = p1832*p3483
- p2037: 3.44
- p3257: 0.849747
- p2990: 0; = p2404*(p1020+p1022)
- p0847: 0
- p2728: 0; = p2337*(p1078+p1080)
- p1146: 0.886778
- p5131: 3.06679e-5; = p1962*p3483
- p4741: 0; = p1774*p3482
- p3155: 9.87704e-8; = p2374*p1023
- p0534: 0; = SQRT(2)*(IF((2*p0402-1)<0;-1;IF((2*p0402-1)>0;1;0))*SQRT(SQRT((2/(pi()*0.140012289)+LN(1-(2*p0402-1)^2)/2)^2-LN(1-(2*p0402-1)^2)/0.140012289)-(2/(pi()*0.140012289)+LN(1-(2*p0402-1)^2)/2)))
- p0047: 1.048
- p2764: 0.000183666; = p2373*(p1019+p1021)
- p3316: 0.844039; = if(and(p1232=0;p3253<>0);1-(p3312+p3313+p3314+p3315);0)
- p1814: 4.18688e-5; = p1406*1000/p0818
- p3234: 0.39606; = 1-p3233
- p2943: 9.96237e-5; = p2357*(p1020+p1022)
- p1635: 0
- p2629: 0.000126305; = p2238*(p1019+p1021)
- p2812: 0; = p2421*(p1078+p1080)
- p2508: 0.000573806; = p2312*p1123
- p1982: 750
- p0079: 5.554
- p2660: 0.00012095; = p2269*(p1078+p1080)
- p5306: 2.24168e-6; = p1927*p3484
- p0431: 0; = SQRT(2)*(IF((2*p0299-1)<0;-1;IF((2*p0299-1)>0;1;0))*SQRT(SQRT((2/(pi()*0.140012289)+LN(1-(2*p0299-1)^2)/2)^2-LN(1-(2*p0299-1)^2)/0.140012289)-(2/(pi()*0.140012289)+LN(1-(2*p0299-1)^2)/2)))
- p1134: 18913; = if(p1121=0;p1128*(p0716/100)*p0703*1000;0)
- p3074: 2.87945e-8; = p2293*p1023
- p0940: 0; = if(and(p0683=0;p0946=0);p0934;0)
- p4307: 9.57192e-5; = p1962*p3479
- p2265: 0.00685183; = p2226*p2211
- p1234: 0.50972; = if(p1232>0;0;p0726/100)
- p0996: 0.81708; = if(p0888=0;0;if((p0691*p0690*1000*p0692/100)/p0888>1;1;(p0691*p0690*1000*p0692/100)/p0888))
- p1585: 0
- p1000: 0; = IF(p0996+p0999=1;0;IF(p0996+p0999+p0998>1;1-(p0996+p0999);p0998))
- p0445: 0; = SQRT(2)*(IF((2*p0313-1)<0;-1;IF((2*p0313-1)>0;1;0))*SQRT(SQRT((2/(pi()*0.140012289)+LN(1-(2*p0313-1)^2)/2)^2-LN(1-(2*p0313-1)^2)/0.140012289)-(2/(pi()*0.140012289)+LN(1-(2*p0313-1)^2)/2)))
- p0606: 0; = IF(p0342<0.5;-SQRT(p0007*EXP(p0474^2*p0008)-p0007);SQRT(p0007*EXP(p0474^2*p0008)-p0007))
- p1994: 750
- p1981: 400
- p3021: 2.23698e-9; = p2240*p1023
- p1967: 338250; = if(p0807=480;p0802*p0810;0)
- p2292: 8.32938e-6; = p2223*p2199
- p0197: 30.843
- p2747: 9.58912e-5; = p2356*(p1019+p1021)
- p2587: 0.000156269; = p2391*p1123
- p3313: 0.0110532; = if(and(p1232=0;p3253<>0);p3262*(p3278*(p3282*p1256+p3286*(p1253+p1257)+p1258*p3288+p3298*p3287));0)
- p2784: 0; = p2393*(p1019+p1021)
- p0144: 0
- p1842: 0
- p2313: 7.4824e-5; = p2231*p2220
- p1766: 0
- p3061: 3.91228e-9; = p2280*p1023
- p1900: 1.7325e-5; = p1492*1000/p0818
- p2027: 0.428799
- p0347: 0.5
- p0755: 13.772; = p0095*(1+p0623*p0227/100)
- p2315: 0.00174636; = p2224*p2182
- p3011: 0; = p2425*(p1079+p1081)
- p1920: 0
- p1092: 0; = IF(p1071=0;p1086*p0001/(p0818*p0002);0)
- p1672: 0
- p1345: 7.0099e-5; = IF(p1318=0;p1344*p0001/(p0818*p0002);0)
- p3261: 0.908439
- p0249: 34.578
- p2465: 0.000286939; = p2269*p1073
- p1031: 5.92683e-5; = IF(p1012=0;p1025*p0001/(p0818*p0002);0)
- p2141: 2.85503e-6; = p2015*p2069*p2103/(p0818*1000)
- p3673: 3.83248e-6; = p1942*p3476
- p0007: 14; = p0006-1
- p1983: 50
- p1327a: 0.119607; = (p0745*1000/p0801)*(1-(p0746+p0747+p0748+p0749+p0750+p0751+p0752+p0753)/100)+(p0754*1000/p0801)*(1-(p0755+p0756+p0757+p0758+p0759+p0760+p0761+p0762)/100)
- p2862: 0.000247884; = p2276*(p1020+p1022)
- p0010: 7.796
- p1137: 0; = if(p1121=0;p1131*(p0716/100)*p0703*1000;0)
- p4062: 4.24369e-7; = p1919*p3478
- p3504: 1.59686e-7; = p1773*p3476
- p3759: 1.11964e-6; = p1822*p3477
- p2542: 0; = p2346*p1073
- p2074: 0.025
- p0228: 10.031
- p1600: 0.895638
- p2200: 0.0201628; = p1056/p0818
- p0794: 0.157; = p0134*(1+p0662*p0266/100)
- p0832: 2.91368e8; = p0831*p0830/(1-p0831)
- p1652: 0
- p4215: 1.31084e-6; = p1866*p3479
- p5079: 5.77483e-7; = p1906*p3483
- p0730: 0
- p0815: 0
- p4276: 8.68434e-6; = p1927*p3479
- p1916: 0
- p4817: 0; = p1850*p3482
- p0212: 0.937
- p3284: 0.275
- p1778: 4.33125e-6; = p1370*1000/p0818
- p2329: 1.04559e-6; = p2224*p2197
- p0252: 44.158
- p3456: 0; = p3380*p1240
- p1885: 0
- p0675: 32.232; = p0015*(1+p0543*p0147/100)
- p1559: 0
- p0760: 24.15; = p0100*(1+p0628*p0232/100)
- p3725: 2.7991e-7; = p1788*p3477
- p1298: 0.499876
- p0115: 53.753
- p3971: 8.48738e-7; = p1828*p3478
- p0723: 455.116; = p0063*(1+p0591*p0195/100)
- p2270: 0.000116796; = p2226*p2216
- p2082: 0.285294
- p2808: 0; = p2417*(p1078+p1080)
- p0218: 34.582
- p2333: 0.000559219; = p2224*p2201
- p2860: 0; = p2274*(p1129+p1131)
- p0662: 0; = IF(p0398<0.5;-SQRT(p0007*EXP(p0530^2*p0008)-p0007);SQRT(p0007*EXP(p0530^2*p0008)-p0007))
- p1604: 0
- p1550: 0
- p1244: 0; = if(p1232>0;0;p1239*(p0725/100)*p0723*1000)
- p3803: 2.23928e-6; = p1866*p3477
- p2368: 1.11927e-5; = p2225*p2197
- p5157: 1.26887e-7; = p1778*p3484
- p2107: 0.881623
- p2043: 0.636483
- p1882: 0
- p4926: 0; = p1963*p3482
- p2176: 0.000909728; = p0895*p0913/p0818
- p2236: 0; = 1-(p2230+p2231+p2232+p2233)
- p2885: 2.05628e-5; = p2299*(p1079+p1081)
- p0500: 0; = SQRT(2)*(IF((2*p0368-1)<0;-1;IF((2*p0368-1)>0;1;0))*SQRT(SQRT((2/(pi()*0.140012289)+LN(1-(2*p0368-1)^2)/2)^2-LN(1-(2*p0368-1)^2)/0.140012289)-(2/(pi()*0.140012289)+LN(1-(2*p0368-1)^2)/2)))
- p0463: 0; = SQRT(2)*(IF((2*p0331-1)<0;-1;IF((2*p0331-1)>0;1;0))*SQRT(SQRT((2/(pi()*0.140012289)+LN(1-(2*p0331-1)^2)/2)^2-LN(1-(2*p0331-1)^2)/0.140012289)-(2/(pi()*0.140012289)+LN(1-(2*p0331-1)^2)/2)))
- p2342: 0; = p2228*p2210
- p2209: 0.0019381; = 14.0067*p2208/30.973762
- p2326: 0.0017963; = p2224*p2193
- p1027: 47042.8; = IF(p1012=0;p1021*(p0704/100)*p0703*1000;0)
- p2207: 0.0101193; = p1119-p2205-p2204-p2206
- p0410: 0; = SQRT(2)*(IF((2*p0278-1)<0;-1;IF((2*p0278-1)>0;1;0))*SQRT(SQRT((2/(pi()*0.140012289)+LN(1-(2*p0278-1)^2)/2)^2-LN(1-(2*p0278-1)^2)/0.140012289)-(2/(pi()*0.140012289)+LN(1-(2*p0278-1)^2)/2)))
- p3231: 2.21674e-7; = p1176/p0818
- p2471: 0.000353168; = p2275*p1123
- p1590: 0
- p2148: 8.01273e-7; = p2015*p2076*p2110/(p0818*1000)
- p2201: 0.00864424; = 12.01*p2200/(2*14.0067)
- p1188: 136.437; = p1187*p0801
- p1919: 1.44375e-6; = p1511*1000/p0818
- p3464: 0; = p3369*p1241
- p3864: 1.48352e-5; = p1927*p3477
- p2161: 1.45299e-7; = p2015*p2085*p2123/(p0818*1000)
- p2551: 0.00296488; = p2355*p1014
- p2776: 1.1277e-5; = p2385*(p1078+p1080)
- p0330: 0.5
- p1164: 1987.24; = p1163*p0801
- p2828: 2.53482e-6; = p2242*(p1020+p1022)
- p2818: 0; = p2427*(p1078+p1080)
- p3249: 0
- p1148: 0.113222; = if(p1121=0;IF(p1146=1;0;1-p1146);0)
- p4664: 1.20122e-5; = p1903*p3481
- p2718: 8.20869e-5; = p2327*(p1019+p1021)
- p3265: 0.696292
- p2761: 8.61046e-6; = p2370*(p1019+p1021)
- p2132: 4.125e-6; = p2015*p2060*p2094/(p0818*1000)
- p0140: 19.599
- p2278: 9.2761e-5; = p2223*p2184
- p0992: 0.00019476; = p0988*p0001*p0004/(p0818*p0002)
- p1971: 0; = p1966*p0001/(p0818*p0002)
- p2874: 5.46566e-5; = p2288*(p1020+p1022)
- p2409: 0; = p2234*p2199
- p0608: 0; = IF(p0344<0.5;-SQRT(p0007*EXP(p0476^2*p0008)-p0007);SQRT(p0007*EXP(p0476^2*p0008)-p0007))
- p3492: 3.19373e-7; = p1761*p3476
- p2084: 0.21
- p0169: 34.343
- p0258: 20.468
- p2617: 0; = p2421*p1073
- p2363: 0.000448215; = p2225*p2191
- p4627: 2.40244e-6; = p1866*p3481
- p0938: 0; = p0932*p0001/(p0818*p0002)
- p0842: -0.111633
- p3452: 0; = p3376*p1240
- p2184: 0.00064954; = p1051/p0818
- p2150: 1.64472e-6; = p2015*p2078*p2112/(p0818*1000)
- p1616: 0
- p1556: 0
- p3013: 0; = p2427*(p1079+p1081)
- p2009: 0.0226246; = ((p1983*p1985+p1989*p1991+p1995*p1997+p2003*p2005+p1976*p1977+p1978*p1979+p1998*p1999)/p0818)*p0005*p0002/1000
- p3237: 0.854735
- p2283: 0.000321115; = p2223*p2189
- p1051: 449897; = IF(p1012=0;p1044*p1036;0)
- p2537: 0; = p2341*p1073
- p3025: 2.24822e-9; = p2244*p1023
- p1594: 0
- p3107: 1.7963e-8; = p2326*p1023
- p4399: 4.1663e-8; = p1844*p3480
- p0591: 0; = IF(p0327<0.5;-SQRT(p0007*EXP(p0459^2*p0008)-p0007);SQRT(p0007*EXP(p0459^2*p0008)-p0007))
- p3715: 8.39729e-7; = p1778*p3477
- p1396: 1
- p2775: 2.96246e-6; = p2384*(p1078+p1080)
- p0705: 72.251; = p0045*(1+p0573*p0177/100)
- p2017: 5.15502e6; = p2015*p0898
- p0923: 0; = IF(p0918=1;0;IF(p0918+p0919>1;1-p0918;p0919))
- p1796: 0
- p3349: 0.82395; = if(and(p1232=0;p3256<>0);1-(p3345+p3346+p3347+p3348);0)
- p3329: 4.58303e6; = if(and(p1232=0;p3255<>0);p3255*(p3266-p3324)/p3327;0)
- p0029: 52.413
- p2089: 0.40001
- p3444: 0; = p3368*p1240
- p2906: 1.64008e-6; = p2320*(p1020+p1022)
- p2631: 4.7688e-5; = p2240*(p1019+p1021)
- p0302: 0.5
- p0943: 0; = if(and(p0683=0;p0949=0);p0937;0)
- p0906: 0.0041
- p2344: 0; = p2228*p2212
- p2235: 0; = 1-(p2226+p2227+p2228+p2229)
- p2335: 0.000922688; = p2224*p2203
- p2023: 3.3
- p3281: 0.46
- p2679: 0.000181208; = p2288*(p1019+p1021)
- p1090: 5.83416e-5; = IF(p1071=0;p1084*p0001/(p0818*p0002);0)
- p0728: 0
- p2246: 6.47139e-5; = p2222*p2191
- p3398: 0.00282672; = p3379*p1234
- p2907: 2.0981e-5; = p2321*(p1020+p1022)
- p2771: 0.000108422; = p2380*(p1078+p1080)
- p4922: 0; = p1955*p3482
- p1043: 0.250227
- p1018: 0.05382; = IF(p1012=0;p0709/100;0)
- p4482: 1.10407e-6; = p1927*p3480
- p0269: 12.704
- p1220: 0; = IF(p1218<0.5;-SQRT(p1214*EXP(p1219^2*p1215)-p1214);SQRT(p1214*EXP(p1219^2*p1215)-p1214))
- p0978: 0
- p1233: 0; = p1232*p0001/(p0818*p0002)
- p1952: 0
- p2883: 7.021e-5; = p2297*(p1079+p1081)
- p0259: 32.458
- p0490: 0; = SQRT(2)*(IF((2*p0358-1)<0;-1;IF((2*p0358-1)>0;1;0))*SQRT(SQRT((2/(pi()*0.140012289)+LN(1-(2*p0358-1)^2)/2)^2-LN(1-(2*p0358-1)^2)/0.140012289)-(2/(pi()*0.140012289)+LN(1-(2*p0358-1)^2)/2)))
- p1095: 1.40309e7; = IF(p1071=0;p0797*p0702*1000*p0798/100;0)
- p4703: 7.20733e-6; = p1942*p3481
- p1288: 0
- p2171: 0.207692; = p2165*p0831
- p1935: 0
- p3856: 2.7991e-7; = p1919*p3477
- p1260: 0.29598; = if(p1232>0;0;p0731/100)
- p1892: 0
- p1085: 19420; = IF(p1071=0;p1079*(p0710/100)*p0703*1000;0)
- p1698: 0
- p2166: 1.29189; = p2165*p0824
- p2418: 0; = p2235*p2208
- p4036: 0.000213458; = p1893*p3478
- p1886: 0
- p1963c: 5.95103e-6; = p1588*p1792+p1589*p1793+p1590*p1794+p1591*p1795+p1592*p1796+p1593*p1797+p1594*p1798+p1595*p1799+p1596*p1800+p1597*p1801+p1598*p1802+p1599*p1803+p1600*p1804+p1601*p1805+p1602*p1806+p1603*p1807+p1604*p1808+p1605*p1809+p1606*p1810+p1607*p1811
- p2475: 0.000230849; = p2279*p1014
- p3252: 0; = p1252*(p1267*(1-p3247)+p1270*(1-p3248)+p1271*(1-p3249)+p1272*(1-p3250))
- p1297: 0
- p3150: 1.8371e-10; = p2369*p1023
- p2645: 0.000429768; = p2254*(p1019+p1021)
- p1718: 0
- p2196: 0.0588369; = p1068-p2193-p2195
- p0103: 455.145
- p2908: 9.35335e-6; = p2322*(p1020+p1022)
- p0099: 2.978
- p2760: 3.91633e-6; = p2369*(p1019+p1021)
- p2192: 0.00523782; = p1067-p2189-p2190-p2191
- p0690: 380.052; = p0030*(1+p0558*p0162/100)
- p3343: 0; = if(and(p1232=0;p3254<>0);IF((p3339+p3340+p3341+p3342)+(p3254*(p3269*(1-p3277))/p3338)>p3254;p3254-(p3339+p3340+p3341+p3342);p3254*(p3269*(1-p3277))/p3338);0)
- p1208: 0; = p1205*p0818*p0822/p0801
- p3099: 1.44737e-9; = p2318*p1023
- p3002: 0; = p2416*(p1079+p1081)
- p1777: 0
- p2523: 0.000278209; = p2327*p1014
- p5153: 8.45916e-8; = p1774*p3484
- p2783: 8.28644e-5; = p2392*(p1128+p1130)
- p0236: 2.77
- p1955: 0.000167475; = p1547*1000/p0818
- p2097: 0.40001
- p2896: 2.8246e-5; = p2310*(p1079+p1081)
- p2654: 0.000308154; = p2263*(p1078+p1080)
- p2749: 0.00040443; = p2358*(p1019+p1021)
- p0459: 0; = SQRT(2)*(IF((2*p0327-1)<0;-1;IF((2*p0327-1)>0;1;0))*SQRT(SQRT((2/(pi()*0.140012289)+LN(1-(2*p0327-1)^2)/2)^2-LN(1-(2*p0327-1)^2)/0.140012289)-(2/(pi()*0.140012289)+LN(1-(2*p0327-1)^2)/2)))
- p3837: 3.35891e-6; = p1900*p3477
- p2538: 0; = p2342*p1073
- p1963a: 0.000155548; = p1550*p1754+p1551*p1755+p1552*p1756+p1553*p1757+p1554*p1758+p1555*p1759+p1556*p1760+p1557*p1761+p1558*p1762+p1559*p1763+p1560*p1764+p1561*p1765+p1562*p1766+p1563*p1767+p1564*p1768+p1565*p1769+p1566*p1770+p1567*p1771+p1568*p1772
- p2670: 6.81132e-5; = p2279*(p1019+p1021)
- p1712: 0
- p1880: 0
- p1711: 0
- p2708: 8.95792e-6; = p2317*(p1019+p1021)
- p1142: 0; = if(p1121=0;p1136*p0001/(p0818*p0002);0)
- p1827: 0
- p0756: 28.002; = p0096*(1+p0624*p0228/100)
- p2058: 1.24412
- p3037: 1.24392e-9; = p2256*p1023
- p0312: 0.5
- p2793: 0; = p2402*(p1019+p1021)
- p1151: 410206; = if(p1121=0;p1149*p1148*p1145;0)
- p3197: 0; = p2416*p1082
- p2602: 0; = p2406*p1014
- p0659: 0; = IF(p0395<0.5;-SQRT(p0007*EXP(p0527^2*p0008)-p0007);SQRT(p0007*EXP(p0527^2*p0008)-p0007))
- p0123: 55.378
- p0511: 0; = SQRT(2)*(IF((2*p0379-1)<0;-1;IF((2*p0379-1)>0;1;0))*SQRT(SQRT((2/(pi()*0.140012289)+LN(1-(2*p0379-1)^2)/2)^2-LN(1-(2*p0379-1)^2)/0.140012289)-(2/(pi()*0.140012289)+LN(1-(2*p0379-1)^2)/2)))
- p0778: 52.599; = p0118*(1+p0646*p0250/100)
- p1612: 0
- p1992: 3900
- p0616: 0; = IF(p0352<0.5;-SQRT(p0007*EXP(p0484^2*p0008)-p0007);SQRT(p0007*EXP(p0484^2*p0008)-p0007))
- p1788: 1.44375e-6; = p1380*1000/p0818
- p4049: 4.66806e-6; = p1906*p3478
- p0687: 28.26; = p0027*(1+p0555*p0159/100)
- p2143: 2.20178e-6; = p2015*p2071*p2105/(p0818*1000)
- p1406: 29
- p2732: 0; = p2341*(p1078+p1080)
- p3480: 0.0144287; = if(p1328+p1330+p1332+p1334+p1336+p1338+p1340+p1342+p1344=0;0;p1336/(p1328+p1330+p1332+p1334+p1336+p1338+p1340+p1342+p1344))
- p0642: 0; = IF(p0378<0.5;-SQRT(p0007*EXP(p0510^2*p0008)-p0007);SQRT(p0007*EXP(p0510^2*p0008)-p0007))
- p0668: 0; = IF(p0404<0.5;-SQRT(p0007*EXP(p0536^2*p0008)-p0007);SQRT(p0007*EXP(p0536^2*p0008)-p0007))
- p3215: 0.450791; = p1222*3*15.9994/100.0869
- p2351: 0; = p2232*p2219
- p0672: 181.278; = p0012*(1+p0540*p0144/100)
- p2726: 0.000196699; = p2335*(p1019+p1021)
- p0299: 0.5
- p1210: 0.18
- p1117: 0.000962288; = IF(p1071=0;p1107/(p1112*p0818);0)
- p0861: 0.101154; = p0673*1000/p0856
- p3057: 3.85512e-8; = p2276*p1023
- p2557: 0.00112505; = p2361*p1014
- p0152: 0
- p1022: 0.05382; = IF(p1012=0;IF(p1014+p1019+p1020+p1021=1;0;IF(p1014+p1019+p1020+p1021+p1018>1;1-(p1014+p1019+p1020+p1021);p1018));0)
- p1884: 0
- p2577: 0.000111058; = p2381*p1073
- p2682: 8.0763e-7; = p2291*(p1019+p1021)
- p1591: 0
- p0722: 0
- p1567: 0
- p2797: 0; = p2406*(p1019+p1021)
- p1030: 0.000406242; = IF(p1012=0;p1024*p0001/(p0818*p0002);0)
- p1011: 8.44441e-6; = p1010*p0001*p0004/(p0818*p0002)
- p1609: 0
- p1866: 1.155e-5; = p1458*1000/p0818
- p0692: 43.476; = p0032*(1+p0560*p0164/100)
- p1318: 0; = p1317*p0001/(p0818*p0002)
- p2905: 1.13956e-5; = p2319*(p1020+p1022)
- p2083: 2.17294
- p2098: 0.856281
- p2552: 0.000324995; = p2356*p1014
- p0067: 48.83
- p3658: 8.46338e-6; = p1927*p3476
- p3411: 0; = p3373*p1238
- p3111: 1.71617e-11; = p2330*p1023
- p2665: 6.20165e-5; = p2274*(p1128+p1130)
- p0335: 0.5
- p0003: 10000
- p0808: 546000
- p2130: 1.11372e-5; = p2015*p2058*p2092/(p0818*1000)
- p3403: 0.00519458; = p3365*p1238
- p5321: 1.0151e-6; = p1942*p3484
- p0759: 2.978; = p0099*(1+p0627*p0231/100)
- p0791: 82.13; = p0131*(1+p0659*p0263/100)
- p5182: 1.69183e-7; = p1803*p3484
- p1052: 1.89748e6; = IF(p1012=0;p1045*p1036;0)
- p3088: 1.04218e-6; = p2307*p1082
- p2314: 0.000130025; = p2231*p2221
- p0935: 0; = p0929*p0001/(p0818*p0002)
- p2182: 0.0269947; = p1050/p0818
- p0031: 28.308
- p4377: 8.3326e-8; = p1822*p3480
- p3035: 2.01599e-8; = p2254*p1023
- p2356: 0.000449814; = p2225*p2184
- p1815: 0
- p1583: 0
- p3342: 0; = if(and(p1232=0;p3254<>0);p3254*(p3272-p3337)/p3338;0)
- p2243: 0.00050431; = p2222*p2188
- p0625: 0; = IF(p0361<0.5;-SQRT(p0007*EXP(p0493^2*p0008)-p0007);SQRT(p0007*EXP(p0493^2*p0008)-p0007))
- p2690: 4.79585e-5; = p2299*(p1078+p1080)
- p2516: 1.84288e-5; = p2320*p1014
- p3303: 0; = if(and(p1232=0;p3252<>0);p3259*p3289;0)
- p1938: 0
- p3220: 0.00345457; = p3216*p1228
- p2316: 0.000383346; = p2224*p2183
- p2856: 1.27343e-5; = p2270*(p1079+p1081)
- p0873: 0; = p0872*p0001*p0003/(p0818*p0002)
- p0922: 0; = p0677*1000/p0801
- p3161: 1.42451e-5; = p2380*p1082
- p1099: 0.47071
- p2562: 0.00297812; = p2366*p1014
- p1178: 2.21674e-7; = p1176/p0818
- p3134: 0; = p2353*p1132
- p2499: 7.81184e-5; = p2303*p1073
- p2999: 0; = p2413*(p1020+p1022)
- p0941: 0; = if(and(p0683=0;p0947=0);p0935;0)
- p3121: 0; = p2340*p1082
- p0538: 0; = IF(p0274<0.5;-SQRT(p0007*EXP(p0406^2*p0008)-p0007);SQRT(p0007*EXP(p0406^2*p0008)-p0007))
- p2156: 3.7378e-7; = p2015*p2085*p2118/(p0818*1000)
- p2549: 0; = p2353*p1123
- p3065: 3.67558e-9; = p2284*p1023
- p0498: 0; = SQRT(2)*(IF((2*p0366-1)<0;-1;IF((2*p0366-1)>0;1;0))*SQRT(SQRT((2/(pi()*0.140012289)+LN(1-(2*p0366-1)^2)/2)^2-LN(1-(2*p0366-1)^2)/0.140012289)-(2/(pi()*0.140012289)+LN(1-(2*p0366-1)^2)/2)))
- p1560: 0.813359
- p0643: 0; = IF(p0379<0.5;-SQRT(p0007*EXP(p0511^2*p0008)-p0007);SQRT(p0007*EXP(p0511^2*p0008)-p0007))
- p2468: 0.00159176; = p2272*p1123
- p1767: 0
- p3278: 0.46
- p2503: 1.88182e-5; = p2307*p1073
- p0130: 52.385
- p3201: 0; = p2420*p1082
- p0814: 0.600863; = if(p0807=480;p0810*p0812+p0811*p0813;0)
- p1236: 0; = if(p1232>0;0;p0728/100)
- p1895: 0
- p2384: 1.16499e-5; = p2229*p2213
- p1040: 0.0279052
- p3701: 1.39955e-6; = p1764*p3477
- p1173: 0.5
- p0988: 5.95279e6; = p0982*p0886
- p0818: 6.9264e8; = p0806*p0807
- p0622: 0; = IF(p0358<0.5;-SQRT(p0007*EXP(p0490^2*p0008)-p0007);SQRT(p0007*EXP(p0490^2*p0008)-p0007))
- p0974: 0.5
- p1700: 0
- p1339: 0.000497712; = p1338*p0001/(p0818*p0002)
- p4171: 6.55422e-7; = p1822*p3479
- p2476: 0.000282666; = p2280*p1014
- p0770: 25.137; = p0110*(1+p0638*p0242/100)
- p1312: 0.00489698; = IF(p1307+p1310+p1311=p1266;0;p1266-(p1307+p1310+p1311))
- p3711: 5.59819e-7; = p1774*p3477
- p0615: 0; = IF(p0351<0.5;-SQRT(p0007*EXP(p0483^2*p0008)-p0007);SQRT(p0007*EXP(p0483^2*p0008)-p0007))
- p3259: 0.00796296
- p2938: 0; = p2352*(p1129+p1131)
- p3297: 0; = if(p1273+p1274+p1275+p1276=0;0;p1273/(p1273+p1274+p1275+p1276))
- p1629: 0.569667
- p0651: 0; = IF(p0387<0.5;-SQRT(p0007*EXP(p0519^2*p0008)-p0007);SQRT(p0007*EXP(p0519^2*p0008)-p0007))
- p1017: 0.10777; = IF(p1012=0;p0708/100;0)
- p1304: 0.637913; = p1300*p1252/p0818
- p0154: 0
- p1112: 0.209482
- p0627: 0; = IF(p0363<0.5;-SQRT(p0007*EXP(p0495^2*p0008)-p0007);SQRT(p0007*EXP(p0495^2*p0008)-p0007))
- p0211: 13.961
- p1296: 0; = p1292*p1252/p0818
- p2070: 0.282
- p1566: 0
- p0748: 38.042; = p0088*(1+p0616*p0220/100)
- p3437: 0; = p3380*p1239
- p2757: 0.00087871; = p2366*(p1019+p1021)
- p2830: 1.44561e-5; = p2244*(p1020+p1022)
- p2613: 0; = p2417*p1073
- p1709: 0
- p0696: 41.143; = p0036*(1+p0564*p0168/100)
- p2286: 0.000748015; = p2223*p2192
- p1972: 0.000435695; = if(p0807=480;p1967*p0001/(p0818*p0002);0)
- p2228: 0; = if(p0774*p0778+p0775*p0779+p0776*p0780+p0777*p0781=0;0;p0780*p0776/(p0774*p0778+p0775*p0779+p0776*p0780+p0777*p0781))
- p1287: 0
- p2591: 0; = p2395*p1014
- p3439: 0; = p3363*p1240
- p4951: 1.57495e-7; = p1778*p3483
- p4101: 0.000247903; = p1962*p3478
- p2106: 0.856281
- p1848: 0
- p2117: 0.585147
- p2578: 0.00145435; = p2382*p1073
- p0095: 13.772
- p3203: 0; = p2422*p1082
- p5201: 1.69183e-7; = p1822*p3484
- p1276: 0; = p1272*p1252/p0818
- p1283: 0; = p1277*p1252/p0818
- p3030: 5.95127e-9; = p2249*p1023
- p1079: 0.10903; = IF(p1071=0;IF(p1073+p1078=1;0;IF(p1073+p1078+p1075>1;1-(p1073+p1078);p1075));0)
- p1748: 0
- p2656: 0.00174235; = p2265*(p1078+p1080)
- p0630: 0; = IF(p0366<0.5;-SQRT(p0007*EXP(p0498^2*p0008)-p0007);SQRT(p0007*EXP(p0498^2*p0008)-p0007))
- p2864: 5.96453e-6; = p2278*(p1020+p1022)
- p2730: 0; = p2339*(p1078+p1080)
- p0388: 0.5
- p3361: 2.14948e7; = if(p1232=0;p3311+p3322+p3333+p3344+p3355;0)
- p1683: 0
- p2994: 0; = p2408*(p1020+p1022)
- p2950: 0.000233232; = p2364*(p1020+p1022)
- p1965: 0.00373169; = p1963+p1959*p1964*1000/p0818
- p0769: 28.176; = p0109*(1+p0637*p0241/100)
- p0882: 0; = p0869*p0856
- p2302: 0.000299911; = p2227*p2209
- p1883: 0
- p1953: 0
- p1808: 0
- p2744: 0; = p2353*(p1128+p1130)
- p2487: 2.73722e-6; = p2291*p1014
- p0652: 0; = IF(p0388<0.5;-SQRT(p0007*EXP(p0520^2*p0008)-p0007);SQRT(p0007*EXP(p0520^2*p0008)-p0007))
- p1157: 0.208255
- p1724: 0
- p2059: 1.00168
- p3339: 0; = if(and(p1232=0;p3254<>0);p3254*(p3269*p3277-p3334)/p3338;0)
- p0131: 82.13
- p1658: 0
- p3133: 0; = p2352*p1132
- p0320: 0.5
- p2445: 0.000429986; = p2249*p1014
- p4976: 2.09994e-7; = p1803*p3483
- p4755: 0; = p1788*p3482
- p2544: 0; = p2348*p1073
- p2737: 0; = p2346*(p1078+p1080)
- p2011: 0.00965242
- p2638: 0.000111644; = p2247*(p1019+p1021)
- p2836: 0.000378267; = p2250*(p1020+p1022)
- p1790: 0
- p1771: 0
- p0991: 0; = p0987*p0886
- p1109: 2.88234e6; = IF(p1071=0;p1105*p1103*p1095;0)
- p0884: 45.534; = IF(p0689=100;0;IF(p0689+p0688>100;100-p0689;p0688))
- p1906: 1.58813e-5; = p1498*1000/p0818
- p1198: 0.44
- p1263: 0.29598; = if(p1232>0;0;IF(p1259=1;0;IF(p1259+p1260>1;1-p1259;p1260)))
- p2212: 5.06419e-6; = p1106/p0818
- p2460: 0.000315646; = p2264*p1073
- p0686: 444.866; = p0026*(1+p0554*p0158/100)
- p2131: 4.29131e-6; = p2015*p2059*p2093/(p0818*1000)
- p2345: 0; = p2228*p2213
- p2706: 0.000372288; = p2315*(p1019+p1021)
- p2025: 4.05602e-5; = p2015*p2023*p2024/(p0818*1000)
- p2989: 0; = p2403*(p1020+p1022)
- p1645: 0
- p0976: 0; = IF(p0687=0;IF(OR(p0686=0;p0689=0);0;p0686*1000*p0689/100);0)
- p1045: 0.033998; = IF(p1012=0;IF(p1037+p1044=1;0;IF(p1037+p1044+p1039>1;1-(p1037+p1044);p1039));0)
- p2153: 2.67091e-8; = p2015*p2081*p2115/(p0818*1000)
- p1801: 0
- p1628: 0.601994
- p2758: 0.00868607; = p2367*(p1019+p1021)
- p2007: 0.0879185; = ((p1981*p1985+p1987*p1991+p1993*p1997+p2001*p2005)/p0818)*p0005*p0002/1000
- p4870: 0; = p1903*p3482
- p2045: 30
- p3102: 3.26298e-9; = p2321*p1023
- p1568: 0
- p0091: 17.652
- p3007: 0; = p2421*(p1079+p1081)
- p1677: 0
- p2174: 0.00954737; = p0895*p0903/p0818
- p5229: 2.96071e-7; = p1850*p3484
- p1561: 0
- p2103: 0.912485
- p3058: 8.46245e-9; = p2277*p1023
- p0613: 0; = IF(p0349<0.5;-SQRT(p0007*EXP(p0481^2*p0008)-p0007);SQRT(p0007*EXP(p0481^2*p0008)-p0007))
- p0666: 0; = IF(p0402<0.5;-SQRT(p0007*EXP(p0534^2*p0008)-p0007);SQRT(p0007*EXP(p0534^2*p0008)-p0007))
- p1901: 0.000128494; = p1493*1000/p0818
- p4770: 0; = p1803*p3482
- p0649: 0; = IF(p0385<0.5;-SQRT(p0007*EXP(p0517^2*p0008)-p0007);SQRT(p0007*EXP(p0517^2*p0008)-p0007))
- p0907: 0.00734516
- p2019: 0.13105
- p3043: 8.95309e-5; = p2262*p1082
- p1330: 360153; = p1320*p0801
- p2505: 1.74379e-5; = p2309*p1073
- p1249: 0; = if(p1232>0;0;p1244*p0001/(p0818*p0002))
- p0505: 0; = SQRT(2)*(IF((2*p0373-1)<0;-1;IF((2*p0373-1)>0;1;0))*SQRT(SQRT((2/(pi()*0.140012289)+LN(1-(2*p0373-1)^2)/2)^2-LN(1-(2*p0373-1)^2)/0.140012289)-(2/(pi()*0.140012289)+LN(1-(2*p0373-1)^2)/2)))
- p2840: 0.000129628; = p2254*(p1020+p1022)
- p4886: 0; = p1919*p3482
- p0708: 10.777; = p0048*(1+p0576*p0180/100)
- p0677: 0
- p0786: 34.558; = p0126*(1+p0654*p0258/100)
- p2806: 0; = p2415*(p1078+p1080)
- p2068: 0.153529
- p3442: 0; = p3366*p1240
- p0782: 19.599; = p0122*(1+p0650*p0254/100)
- p2897: 0; = p2311*(p1129+p1131)
- p3816: 3.35891e-6; = p1879*p3477
- p2042: 0.07
- p0439: 0; = SQRT(2)*(IF((2*p0307-1)<0;-1;IF((2*p0307-1)>0;1;0))*SQRT(SQRT((2/(pi()*0.140012289)+LN(1-(2*p0307-1)^2)/2)^2-LN(1-(2*p0307-1)^2)/0.140012289)-(2/(pi()*0.140012289)+LN(1-(2*p0307-1)^2)/2)))
- p3366: 0.0661259; = if(p1232=0;p3244*p3360/p0818;0)
- p0764: 95.906; = p0104*(1+p0632*p0236/100)
- p4137: 1.63855e-7; = p1788*p3479
- p2463: 1.99748e-5; = p2267*p1073
- p0097: 20.192
- p2787: 0; = p2396*(p1019+p1021)
- p0317: 0.5
- p2217: 0.00167416; = p1118-p2216
- p1803: 5.77501e-6; = p1395*1000/p0818
- p1113: 0.100377
- p1290: 0; = IF(p1287=p1264;0;IF(p1287+p1288>p1264;p1264-p1287;p1288))
- p2160: 1.17628e-6; = p2015*p2084*p2122/(p0818*1000)
- p3145: 3.62725e-8; = p2364*p1023
- p1082: 0.03341; = IF(p1071=0;IF(p1073+p1078+p1079+p1080+p1081=1;0;1-(p1073+p1078+p1079+p1080+p1081));0)
- p0840: 0.210331; = p0839*p0831
- p0665: 0; = IF(p0401<0.5;-SQRT(p0007*EXP(p0533^2*p0008)-p0007);SQRT(p0007*EXP(p0533^2*p0008)-p0007))
- p2050: 0.952062
- p3682: 1.16571e-5; = p1951*p3476
- p0208: 3.023
- p0127: 42.515
- p0841: 0.222722
- p1168: 1.43454e-6; = p1164*p1167/p0818
- p3146: 1.92288e-7; = p2365*p1023
- p2198: 2.65281e-5; = 22.98976928*p2197/14.0067
- p0688: 45.534; = p0028*(1+p0556*p0160/100)
- p3416: 0.00702556; = p3378*p1238
- p1637: 0
- p1543: 73
- p4745: 0; = p1778*p3482
- p0850: 0
- p2112: 0.856281
- p2066: 0.109412
- p0494: 0; = SQRT(2)*(IF((2*p0362-1)<0;-1;IF((2*p0362-1)>0;1;0))*SQRT(SQRT((2/(pi()*0.140012289)+LN(1-(2*p0362-1)^2)/2)^2-LN(1-(2*p0362-1)^2)/0.140012289)-(2/(pi()*0.140012289)+LN(1-(2*p0362-1)^2)/2)))
- p3095: 1.21144e-5; = p2314*p1132
- p0571: 0; = IF(p0307<0.5;-SQRT(p0007*EXP(p0439^2*p0008)-p0007);SQRT(p0007*EXP(p0439^2*p0008)-p0007))
- p4534: 3.00305e-7; = p1773*p3481
- p1239: 0; = if(p1232>0;0;IF(p1234+p1238=1;0;IF(p1234+p1238+p1236>1;1-(p1234+p1238);p1236)))
- p2102: 0.922577
- p2681: 4.92055e-7; = p2290*(p1019+p1021)
- p3450: 0; = p3374*p1240
- p2317: 4.20204e-5; = p2224*p2184
- p3229: 2.86908e-6; = p1164/p0818
- p2921: 5.93289e-5; = p2335*(p1020+p1022)
- p2762: 0.00297662; = p2371*(p1019+p1021)
- p0670: 7.796; = p0010*(1+p0538*p0142/100)
- p0812: 0.279412; = if(p0807=480;0.095/0.34;0)
- p4044: 3.77688e-5; = p1901*p3478
- p1316: 0.00624925; = p1312*p1252/p0818
- p1928: 0
- p2704: 1.58642e-5; = p2313*(p1128+p1130)
- p2257: 0.00142606; = p2222*p2203
- p4193: 3.27711e-7; = p1844*p3479
- p2146: 3.39247e-7; = p2015*p2074*p2108/(p0818*1000)
- p2790: 0; = p2399*(p1019+p1021)
- p0719: 0
- p2231: 0.126342; = if(p0783*p0787+p0784*p0788+p0785*p0789+p0786*p0790=0;0;p0788*p0784/(p0783*p0787+p0784*p0788+p0785*p0789+p0786*p0790))
- p1182: 74.1492; = p1181*p0801
- p0398: 0.5
- p0027: 28.26
- p3650: 1.59686e-7; = p1919*p3476
- p0391: 0.5
- p2435: 4.69232e-5; = p2239*p1014
- p0162: 4.93
- p1753: 0
- p2354: 0.0186941; = p2225*p2182
- p2239: 6.49447e-5; = p2222*p2184
- p3243: 1.01999e-9; = p3234*p1188*p3239/p0818
- p3143: 1.78235e-8; = p2362*p1023
- p3458: 2.37188e-5; = p3363*p1241
- p1625: 0
- p3468: 0; = p3373*p1241
- p1493: 89
- p0740: 98.522; = p0080*(1+p0608*p0212/100)
- p0921: 0; = p0679*1000/p0801
- p0452: 0; = SQRT(2)*(IF((2*p0320-1)<0;-1;IF((2*p0320-1)>0;1;0))*SQRT(SQRT((2/(pi()*0.140012289)+LN(1-(2*p0320-1)^2)/2)^2-LN(1-(2*p0320-1)^2)/0.140012289)-(2/(pi()*0.140012289)+LN(1-(2*p0320-1)^2)/2)))
- p1876: 0
- p1172: 4.98881e-7; = p1170/p0818
- p3377: 0.00231466; = if(p1232=0;p3246*p3359/p0818;0)
- p0937: 0; = p0931*p0001/(p0818*p0002)
- p0028: 45.534
- p2361: 0.00155714; = p2225*p2189
- p0253: 30.712
- p3427: 0; = p3370*p1239
- p0920: 0; = p0676*1000/p0801
- p0729: 0
- p3246: 0.1787; = IF(p3244+p3245=1;0;1-(p3244+p3245))
- p0449: 0; = SQRT(2)*(IF((2*p0317-1)<0;-1;IF((2*p0317-1)>0;1;0))*SQRT(SQRT((2/(pi()*0.140012289)+LN(1-(2*p0317-1)^2)/2)^2-LN(1-(2*p0317-1)^2)/0.140012289)-(2/(pi()*0.140012289)+LN(1-(2*p0317-1)^2)/2)))
- p0979: 0; = IF(p0976=0;0;p0976*p0001/(p0818*p0002))
- p1633: 0
- p0880: 32115; = p0868*p0856
- p3346: 0.00993567; = if(and(p1232=0;p3256<>0);p3274*(p3281*(p3285*p1256+p3286*(p1253+p1257)+p1258*p3288));0)
- p0969: 186854; = p0966*p0683*p0682*1000
- p2664: 0.000684487; = p2273*(p1128+p1130)
- p3347: 0.00107264; = if(and(p1232=0;p3256<>0);p3275*p3289;0)
- p0655: 0; = IF(p0391<0.5;-SQRT(p0007*EXP(p0523^2*p0008)-p0007);SQRT(p0007*EXP(p0523^2*p0008)-p0007))
- p1009: 1.68077e-5; = p1005*p0001*p0004/(p0818*p0002)
- p2922: 0; = p2336*(p1079+p1081)
- p2056: 2.07882
- p1925: 0
- p0758: 2.737; = p0098*(1+p0626*p0230/100)
- p0250: 14.087
- p1008: 0; = p1004*p0001*p0004/(p0818*p0002)
- p0617: 0; = IF(p0353<0.5;-SQRT(p0007*EXP(p0485^2*p0008)-p0007);SQRT(p0007*EXP(p0485^2*p0008)-p0007))
- p4894: 0; = p1927*p3482
- p0809: 2000
- p2348: 0; = p2228*p2216
- p2626: 0; = p2430*p1123
- p0565: 0; = IF(p0301<0.5;-SQRT(p0007*EXP(p0433^2*p0008)-p0007);SQRT(p0007*EXP(p0433^2*p0008)-p0007))
- p1311: 0; = IF(p1307+p1310=p1266;0;IF(p1307+p1310+p1309>p1266;p1266-(p1307+p1310);p1309))
- p3086: 2.61819e-8; = p2305*p1082
- p0163: 5.165
- p3417: 0.00270793; = p3379*p1238
- p3263: 0.0214527
- p1021: 0.10777; = IF(p1012=0;IF(p1014+p1019+p1020=1;0;IF(p1014+p1019+p1020+p1017>1;1-(p1014+p1019+p1020);p1017));0)
- p0344: 0.5
- p2402: 0; = p2234*p2191
- p4740: 0; = p1773*p3482
- p3352: 664353; = if(and(p1232=0;p3256<>0);p3256*(p3275-p3347)/p3349;0)
- p2977: 0; = p2391*(p1129+p1131)
- p3218: 0.0216721; = p3214*p1228
- p4565: 3.00305e-7; = p1804*p3481
- p4497: 4.99956e-7; = p1942*p3480
- p3299: 0; = if(p1303+p1304+p1305+p1306=0;0;p1303/(p1303+p1304+p1305+p1306))
- p2947: 0.000100124; = p2361*(p1020+p1022)
- p1119: 0.0192632; = IF(p1071=0;p1109/(p1114*p0818);0)
- p3033: 2.65243e-11; = p2252*p1023
- p0790: 52.385; = p0130*(1+p0658*p0262/100)
- p0792: 0
- p1105: 0.436421
- p2380: 0.000426373; = p2229*p2209
- p2393: 0; = p2234*p2182
- p2809: 0; = p2418*(p1078+p1080)
- p0961: 0; = if(and(p0683>0;or(p0807=480;p0807=32;p0807=1;and(p0807=60;p0901<0.03)));p0937;0)
- p3393: 0.00540599; = p3374*p1234
- p3000: 0; = p2414*(p1079+p1081)
- p0663: 0; = IF(p0399<0.5;-SQRT(p0007*EXP(p0531^2*p0008)-p0007);SQRT(p0007*EXP(p0531^2*p0008)-p0007))
- p0762: 7.505; = p0102*(1+p0630*p0234/100)
- p4046: 1.69748e-5; = p1903*p3478
- p2462: 1.91022e-6; = p2266*p1073
- p1889: 0
- p1037: 0.335013
- p1132: 0.09317; = if(p1121=0;IF(p1123+p1128+p1129+p1130+p1131=1;0;1-(p1123+p1128+p1129+p1130+p1131));0)
- p0491: 0; = SQRT(2)*(IF((2*p0359-1)<0;-1;IF((2*p0359-1)>0;1;0))*SQRT(SQRT((2/(pi()*0.140012289)+LN(1-(2*p0359-1)^2)/2)^2-LN(1-(2*p0359-1)^2)/0.140012289)-(2/(pi()*0.140012289)+LN(1-(2*p0359-1)^2)/2)))
- p3631: 1.91624e-6; = p1900*p3476
- p2569: 0.000622482; = p2373*p1014
- p1838: 0
- p0736: 97.436; = p0076*(1+p0604*p0208/100)
- p3128: 0; = p2347*p1082
- p0516: 0; = SQRT(2)*(IF((2*p0384-1)<0;-1;IF((2*p0384-1)>0;1;0))*SQRT(SQRT((2/(pi()*0.140012289)+LN(1-(2*p0384-1)^2)/2)^2-LN(1-(2*p0384-1)^2)/0.140012289)-(2/(pi()*0.140012289)+LN(1-(2*p0384-1)^2)/2)))
- p1911: 8.66251e-5; = p1503*1000/p0818
- p1779: 0
- p3195: 0; = p2414*p1082
- p1309: 0
- p1707: 0.356204
- p1020: 0.01048; = IF(p1012=0;IF(p1014+p1019=1;0;IF(p1014+p1019+p1016>1;1-(p1014+p1019);p1016));0)
- p2051: 0.000401596; = p2015*p2049*p2050/(p0818*1000)
- p1034: 3.02611e-5; = IF(p1012=0;p1028*p0001/(p0818*p0002);0)
- p0561: 0; = IF(p0297<0.5;-SQRT(p0007*EXP(p0429^2*p0008)-p0007);SQRT(p0007*EXP(p0429^2*p0008)-p0007))
- p3232: 1.07053e-7; = p1182/p0818
- p2357: 0.00154936; = p2225*p2185
- p3350: 8.27542e6; = if(and(p1232=0;p3256<>0);p3256*(p3273*p3277-p3345)/p3349;0)
- p2899: 0; = p2313*(p1129+p1131)
- p2504: 7.10139e-5; = p2308*p1073
- p0827: 1.00054e9; = p0818*p0819*p0823
- p2539: 0; = p2343*p1073
- p0373: 0.5
- p3055: 2.72525e-5; = p2274*p1132
- p4720: 0.000402299; = p1963*p3481
- p5167: 4.22958e-8; = p1788*p3484
- p2424: 0; = p2235*p2214
- p0405: 0; = SQRT(2)*(IF((2*p0273-1)<0;-1;IF((2*p0273-1)>0;1;0))*SQRT(SQRT((2/(pi()*0.140012289)+LN(1-(2*p0273-1)^2)/2)^2-LN(1-(2*p0273-1)^2)/0.140012289)-(2/(pi()*0.140012289)+LN(1-(2*p0273-1)^2)/2)))
- p5338: 5.66608e-5; = p1963*p3484
- p2502: 4.94353e-6; = p2306*p1073
- p2838: 1.70551e-7; = p2252*(p1020+p1022)
- p3482: 0; = if(p1328+p1330+p1332+p1334+p1336+p1338+p1340+p1342+p1344=0;0;p1340/(p1328+p1330+p1332+p1334+p1336+p1338+p1340+p1342+p1344))
- p1265: 0.51303; = if(p1232>0;0;IF(p1259+p1263+p1264=1;0;IF(p1259+p1263+p1264+p1262>1;1-(p1259+p1263+p1264);p1262)))
- p2621: 0; = p2425*p1073
- p3371: 0; = if(p1232=0;p3245*p3359/p0818;0)
- p3455: 0; = p3379*p1240
- p4316: 4.1663e-8; = p1761*p3480
- p1854: 0
- p2530: 5.81507e-5; = p2334*p1014
- p0636: 0; = IF(p0372<0.5;-SQRT(p0007*EXP(p0504^2*p0008)-p0007);SQRT(p0007*EXP(p0504^2*p0008)-p0007))
- p2531: 0.000666652; = p2335*p1014
- p1076: 0; = IF(p1071=0;p0714/100;0)
- p0443: 0; = SQRT(2)*(IF((2*p0311-1)<0;-1;IF((2*p0311-1)>0;1;0))*SQRT(SQRT((2/(pi()*0.140012289)+LN(1-(2*p0311-1)^2)/2)^2-LN(1-(2*p0311-1)^2)/0.140012289)-(2/(pi()*0.140012289)+LN(1-(2*p0311-1)^2)/2)))
- p2024: 0.748682
- p2800: 0; = p2409*(p1019+p1021)
- p2517: 0.000235754; = p2321*p1014
- p0737: 0
- p1963k: 0.000577131; = p1744*p1948+p1745*p1949+p1746*p1950+p1747*p1951+p1748*p1952+p1749*p1953+p1750*p1954+p1751*p1955+p1752*p1956+p1753*p1957+p1961*p1962
- p1442: 7
- p0321: 0.5
- p4897: 0; = p1930*p3482
- p2936: 0; = p2350*(p1129+p1131)
- p3448: 0; = p3372*p1240
- p2092: 0.54529
- p0387: 0.5
- p2702: 0.000124251; = p2311*(p1128+p1130)
- p5096: 1.57495e-7; = p1923*p3483
- p2632: 5.83921e-5; = p2241*(p1019+p1021)
- p0987: 0; = if(p0978>0;0;if(and(p0687=0;p0691=0;p0695=0;p0699=0);0;IF(p0982+p0985+p0986=1;0;1-(p0982+p0985+p0986))))
- p2984: 0; = p2398*(p1020+p1022)
- p0406: 0; = SQRT(2)*(IF((2*p0274-1)<0;-1;IF((2*p0274-1)>0;1;0))*SQRT(SQRT((2/(pi()*0.140012289)+LN(1-(2*p0274-1)^2)/2)^2-LN(1-(2*p0274-1)^2)/0.140012289)-(2/(pi()*0.140012289)+LN(1-(2*p0274-1)^2)/2)))
- p0610: 0; = IF(p0346<0.5;-SQRT(p0007*EXP(p0478^2*p0008)-p0007);SQRT(p0007*EXP(p0478^2*p0008)-p0007))
- p2434: 0.000428073; = p2238*p1014
- p2521: 0.000244821; = p2325*p1014
- p0295: 0.5
- p3441: 0; = p3365*p1240
- p2006: 0.804268; = ((p1980*p1985+p1986*p1991+p1992*p1997+p2000*p2005)/p0818)*p0005*p0002/1000
- p2261: 0.00632723; = p2226*p2207
- p3326: 0.0011624; = if(and(p1232=0;p3255<>0);p3268*p3289;0)
- p4304: 1.90072e-5; = p1955*p3479
- p2105: 0.888194
- p1575: 0
- p2339: 0; = p2228*p2207
- p5309: 1.63262e-5; = p1930*p3484
- p0963: 1.80538e-5; = if(and(p0683>0;or(p0807=480;p0807=32;p0807=1;and(p0807=60;p0901<0.03)));p0939;0)
- p2993: 0; = p2407*(p1020+p1022)
- p0709: 5.382; = p0049*(1+p0577*p0181/100)
- p3228: 0.00076202; = p3224*p1229
- p0707: 1.048; = p0047*(1+p0575*p0179/100)
- p2264: 0.000523225; = p2226*p2210
- p0860: 0.398413; = p0672*1000/p0856
- p2291: 3.78849e-6; = p2223*p2198
- p3946: 1.69748e-6; = p1803*p3478
- p2968: 0.000262848; = p2382*(p1079+p1081)
- p2096: 0.486404
- p2861: 0; = p2275*(p1129+p1131)
- p0853: 0; = p0803/(p0802+p0803)
- p1202: 0.7
- p2985: 0; = p2399*(p1020+p1022)
- p0409: 0; = SQRT(2)*(IF((2*p0277-1)<0;-1;IF((2*p0277-1)>0;1;0))*SQRT(SQRT((2/(pi()*0.140012289)+LN(1-(2*p0277-1)^2)/2)^2-LN(1-(2*p0277-1)^2)/0.140012289)-(2/(pi()*0.140012289)+LN(1-(2*p0277-1)^2)/2)))
- p4684: 9.00916e-7; = p1923*p3481
- p1325: 0; = IF(((p0745*1000*p0752/100)+(p0754*1000*p0761/100))/p0801<0;0;((p0745*1000*p0752/100)+(p0754*1000*p0761/100))/p0801)
- p3957: 1.23067e-5; = p1814*p3478
- p2295: 0.000177671; = p2223*p2202
- p0915: 0.0260641; = p0914/p0818
- p1458: 8
- p3024: 5.0431e-9; = p2243*p1023
- p1989: 50
- p0703: 455.145; = p0043*(1+p0571*p0175/100)
- p0619: 0; = IF(p0355<0.5;-SQRT(p0007*EXP(p0487^2*p0008)-p0007);SQRT(p0007*EXP(p0487^2*p0008)-p0007))
- p0507: 0; = SQRT(2)*(IF((2*p0375-1)<0;-1;IF((2*p0375-1)>0;1;0))*SQRT(SQRT((2/(pi()*0.140012289)+LN(1-(2*p0375-1)^2)/2)^2-LN(1-(2*p0375-1)^2)/0.140012289)-(2/(pi()*0.140012289)+LN(1-(2*p0375-1)^2)/2)))
- p3311: 0; = if(and(p1232=0;p3252<>0);p3252-(p3306+p3307+p3308+p3309+p3310);0)
- p3385: 0.0337057; = p3366*p1234
- p3175: 0; = p2394*p1023
- p1957: 0
- p5183: 4.22958e-8; = p1804*p3484
- p2970: 1.27019e-6; = p2384*(p1079+p1081)
- p0378: 0.5
- p2034: 6.53655e-5; = p2015*p2030*p2032/(p0818*1000)
- p1731: 0
- p2751: 0.000744617; = p2360*(p1019+p1021)
- p0825: 6.34458e8; = p0818*p0822
- p3376: 0.000822466; = if(p1232=0;p3246*p3358/p0818;0)
- p5302: 1.26887e-7; = p1923*p3484
- p0138: 39.134
- p1726: 0.686898
- p0952: 0; = if(and(p0683>0;or(p0807=56;p0807=100;and(p0807=60;p0901>0.06)));p0934;0)
- p0066: 50.972
- p0805: 793000
- p1064: 0.0329203; = IF(p1012=0;p1050/(p1057*p0818);0)
- p2474: 6.70208e-5; = p2278*p1014
- p2149: 6.04469e-7; = p2015*p2077*p2111/(p0818*1000)
- p2081: 0.0019
- p3430: 0; = p3373*p1239
- p1094: 7.66524e-6; = IF(p1071=0;p1088*p0001/(p0818*p0002);0)
- p2506: 0.000156287; = p2310*p1073
- p1956: 0
- p2847: 0.000689858; = p2261*(p1079+p1081)
- p2448: 1.91641e-6; = p2252*p1014
- p0725: 15.235; = p0065*(1+p0593*p0197/100)
- p2603: 0; = p2407*p1014
- p0695: 30.821; = p0035*(1+p0563*p0167/100)
- p3286: 0.185
- p3226: 0.000340429; = p3222*p1229
- p3402: 0.00184579; = p3364*p1238
- p1160: 0.147783; = (p1156+p1158)*p1159
- p2637: 1.37957e-5; = p2246*(p1019+p1021)
- p1874: 0
- p3341: 0; = if(and(p1232=0;p3254<>0);p3254*(p3271-p3336)/p3338;0)
- p3843: 3.079e-6; = p1906*p3477
- p1241: 0.00198; = if(p1232>0;0;IF(p1234+p1238+p1239+p1240=1;0;1-(p1234+p1238+p1239+p1240)))
- p0105: 45.372
- p0773: 39.134; = p0113*(1+p0641*p0245/100)
- p2046: 10
- p3294: 0.279
- p3198: 0; = p2417*p1082
- p2430: 0; = p2236*p2220
- p3967: 5.5168e-6; = p1824*p3478
- p2094: 0.922577
- p3173: 3.64139e-5; = p2392*p1132
- p4987: 1.52245e-6; = p1814*p3483
- p0453: 0; = SQRT(2)*(IF((2*p0321-1)<0;-1;IF((2*p0321-1)>0;1;0))*SQRT(SQRT((2/(pi()*0.140012289)+LN(1-(2*p0321-1)^2)/2)^2-LN(1-(2*p0321-1)^2)/0.140012289)-(2/(pi()*0.140012289)+LN(1-(2*p0321-1)^2)/2)))
- p1237: 0; = if(p1232>0;0;p0729/100)
- p1680: 0
- p2258: 0.00260195; = p2226*p2204
- p2330: 1.71617e-6; = p2224*p2198
- p0862: 0.412716; = p0674*1000/p0856
- p1145: 4.3643e6; = if(p1121=0;p0799*p0702*1000*p0800/100;0)
- p1974: 0; = p1969*p0001/(p0818*p0002)
- p0219: 24.62
- p1785: 0
- p2338: 0; = p2228*p2206
- p0520: 0; = SQRT(2)*(IF((2*p0388-1)<0;-1;IF((2*p0388-1)>0;1;0))*SQRT(SQRT((2/(pi()*0.140012289)+LN(1-(2*p0388-1)^2)/2)^2-LN(1-(2*p0388-1)^2)/0.140012289)-(2/(pi()*0.140012289)+LN(1-(2*p0388-1)^2)/2)))
- p0327: 0.5
- p5223: 8.45916e-8; = p1844*p3484
- p1804: 1.44375e-6; = p1396*1000/p0818
- p1733: 0
- p1963h: 0.000354882; = p1686*p1890+p1687*p1891+p1688*p1892+p1689*p1893+p1690*p1894+p1691*p1895+p1692*p1896+p1693*p1897+p1694*p1898+p1695*p1899+p1696*p1900+p1697*p1901+p1698*p1902+p1699*p1903+p1700*p1904+p1701*p1905+p1702*p1906+p1703*p1907+p1704*p1908+p1705*p1909
- p1218: 0.5
- p4680: 3.00305e-7; = p1919*p3481
- p0404: 0.5
- p5140: 8.45916e-8; = p1761*p3484
- p3338: 0; = if(and(p1232=0;p3254<>0);1-(p3334+p3335+p3336+p3337);0)
- p1012: 0
- p4771: 0; = p1804*p3482
- p1912: 0
- p1277: 0
- p1607: 0
- p2596: 0; = p2400*p1014
- p3291: 0.437
- p0371: 0.5
- p5001: 1.04997e-7; = p1828*p3483
- p1660: 0
- p3170: 0.000164121; = p2389*p1132
- p0753: 0
- p2898: 0; = p2312*(p1129+p1131)
- p0167: 11.444
- p0926: 0; = IF(p0918+p0923+p0924+p0925=1;0;IF(p0918+p0923+p0924+p0925+p0922>1;1-(p0918+p0923+p0924+p0925);p0922))
- p3324: 0.00567457; = if(and(p1232=0;p3255<>0);p3266*(p3279*(p3284*p1256+p3286*(p1253+p1257)+p1258*p3288+p3299*p3287));0)
- p5076: 2.09994e-6; = p1903*p3483
- p2966: 4.64874e-5; = p2380*(p1079+p1081)
- p1782: 0
- p0798: 39.134; = p0138*(1+p0666*p0270/100)
- p3206: 0; = p2425*p1082
- p3334: 0; = IF(or(p3254=0;p1232>0);0;p3269*p3277*(p3300*p3292+(1-p3300)*p3296))
- p2671: 8.34019e-5; = p2280*(p1019+p1021)
- p0479: 0; = SQRT(2)*(IF((2*p0347-1)<0;-1;IF((2*p0347-1)>0;1;0))*SQRT(SQRT((2/(pi()*0.140012289)+LN(1-(2*p0347-1)^2)/2)^2-LN(1-(2*p0347-1)^2)/0.140012289)-(2/(pi()*0.140012289)+LN(1-(2*p0347-1)^2)/2)))
- p0924: 0; = IF(p0918+p0923=1;0;IF(p0918+p0923+p0920>1;1-(p0918+p0923);p0920))
- p2469: 0.00224313; = p2273*p1123
- p1847: 0
- p4456: 1.854e-6; = p1901*p3480
- p2390: 0.00248236; = p2233*p2219
- p2399: 0; = p2234*p2188
- p3443: 0; = p3367*p1240
- p2911: 2.1788e-5; = p2325*(p1020+p1022)
- p3022: 2.7391e-9; = p2241*p1023
- p1041: 0.344595
- p3440: 0; = p3364*p1240
- p3559: 3.19373e-7; = p1828*p3476
- p2639: 0.000591847; = p2248*(p1019+p1021)
- p3337: 0; = IF(or(p3254=0;p1232>0);0;p3272*p3289)
- p0623: 0; = IF(p0359<0.5;-SQRT(p0007*EXP(p0491^2*p0008)-p0007);SQRT(p0007*EXP(p0491^2*p0008)-p0007))
- p0426: 0; = SQRT(2)*(IF((2*p0294-1)<0;-1;IF((2*p0294-1)>0;1;0))*SQRT(SQRT((2/(pi()*0.140012289)+LN(1-(2*p0294-1)^2)/2)^2-LN(1-(2*p0294-1)^2)/0.140012289)-(2/(pi()*0.140012289)+LN(1-(2*p0294-1)^2)/2)))
- p2101: 0.620397
- p3751: 8.11738e-6; = p1814*p3477
- p1203: 3
- p4691: 0.000115918; = p1930*p3481
- p0579: 0; = IF(p0315<0.5;-SQRT(p0007*EXP(p0447^2*p0008)-p0007);SQRT(p0007*EXP(p0447^2*p0008)-p0007))
- p0909: 1.41016e7; = p0825*p0906+p0827*p0907+(p0830+p0895)*p0824*p0908
- p3047: 1.05791e-7; = p2266*p1082
- p2975: 0; = p2389*(p1129+p1131)
- p1268: 0
- p0944: 0; = if(and(p0683=0;p0950=0);p0938;0)
- p2859: 0; = p2273*(p1129+p1131)
- p1673: 0
- p4731: 0; = p1764*p3482
- p1723: 0.507159
- p3017: 0; = p2431*(p1129+p1131)
- p4388: 6.24945e-8; = p1833*p3480
- p0349: 0.5
- p5272: 2.12748e-5; = p1893*p3484
- p2485: 0.00607091; = p2289*p1014
- p3382: 0.00610602; = p3363*p1234
- p2926: 0; = p2340*(p1079+p1081)
- p0037: 54.394
- p1608: 0
- p2099: 0.620397
- p5290: 2.53775e-6; = p1911*p3484
- p0135: 127.858
- p1196: 0.59
- p3149: 1.11927e-10; = p2368*p1023
- p0278: 0.5
- p4102: 0.000568498; = p1963*p3478
- p0833: 2.10374e9; = p0830+p0832
- p2555: 0.000197274; = p2359*p1014
- p3018: 2.69908e-8; = p2237*p1023
- p1578: 0
- p2604: 0; = p2408*p1014
- p0086: 8.512
- p1800: 0
- p1344: 54421; = IF(p1318=0;p1327*p0801;0)
- p0975: 0.00496448; = p0973*p0974/p0818
- p0885: 2.053; = IF(p0689+p0884=100;0;100-(p0689+p0884))
- p4997: 6.8248e-7; = p1824*p3483
- p2394: 0; = p2234*p2183
- p1144: 1.07055e-5; = if(p1121=0;p1138*p0001/(p0818*p0002);0)
- p2712: 6.95602e-5; = p2321*(p1019+p1021)
- p0810: 0.75
- p3306: 0; = if(and(p1232=0;p3252<>0);p3252*(p3257*p3277-p3301)/p3305;0)
- p0958: 0.000568026; = if(and(p0683>0;or(p0807=480;p0807=32;p0807=1;and(p0807=60;p0901<0.03)));p0934;0)
- p2691: 0.000398196; = p2300*(p1078+p1080)
- p0673: 46.025; = p0013*(1+p0541*p0145/100)
- p1054: 1.92324e7; = IF(p1012=0;p1047*p1036;0)
- p0878: 187786; = p0867*p0856
- p1522: 386
- p1725: 0
- p1593: 0
- p4702: 3.00305e-7; = p1941*p3481
- p0301: 0.5
- p0765: 45.372; = p0105*(1+p0633*p0237/100)
- p2697: 2.08379e-6; = p2306*(p1078+p1080)
- p1781: 0
- p0962: 0; = if(and(p0683>0;or(p0807=480;p0807=32;p0807=1;and(p0807=60;p0901<0.03)));p0938;0)
- p3247: 0
- p4474: 2.08315e-8; = p1919*p3480
- p0775: 53.753; = p0115*(1+p0643*p0247/100)
- p3233: 0.60394
- p0175: 0
- p1601: 0
- p2104: 0.817136
- p1294: 0; = p1290*p1252/p0818
- p1977: 8.83907e8; = p1252+p1188
- p1768: 0.000179025; = p1360*1000/p0818
- p2988: 0; = p2402*(p1020+p1022)
- p2274: 0.000292503; = p2230*p2220
- p1222: 0.94
- p2940: 0.00120203; = p2354*(p1020+p1022)
- p1933: 0
- p1715: 0.883409
- p3838: 2.49119e-5; = p1901*p3477
- p1845: 0
- p3204: 0; = p2423*p1082
- p3280: 0.375
- p2739: 0; = p2348*(p1078+p1080)
- p0375: 0.5
- p3036: 8.64301e-9; = p2255*p1023
- p3689: 9.32838e-5; = p1962*p3476
- p2322: 0.000145464; = p2224*p2189
- p1705: 0
- p0422: 0; = SQRT(2)*(IF((2*p0290-1)<0;-1;IF((2*p0290-1)>0;1;0))*SQRT(SQRT((2/(pi()*0.140012289)+LN(1-(2*p0290-1)^2)/2)^2-LN(1-(2*p0290-1)^2)/0.140012289)-(2/(pi()*0.140012289)+LN(1-(2*p0290-1)^2)/2)))
- p1936: 0
- p0205: 51.413
- p2350: 0; = p2232*p2218
- p2509: 5.19885e-5; = p2313*p1123
- p0051: 60.327
- p3067: 7.48015e-9; = p2286*p1023
- p2683: 1.77566e-6; = p2292*(p1019+p1021)
- p2061: 0.518824
- p1907: 0
- p1307: 0
- p1194: 1.48
- p0638: 0; = IF(p0374<0.5;-SQRT(p0007*EXP(p0506^2*p0008)-p0007);SQRT(p0007*EXP(p0506^2*p0008)-p0007))
- p4127: 4.91566e-7; = p1778*p3479
- p0895: 3.77879e8; = p0894*p0830
- p4868: 0; = p1901*p3482
- p1133: 61979.7; = if(p1121=0;p1123*(p0716/100)*p0703*1000;0)
- p1620: 0.633063
- p1649: 0
- p3921: 1.27311e-6; = p1778*p3478
- p1181: 0.000162965
- p3144: 4.48215e-9; = p2363*p1023
- p2788: 0; = p2397*(p1019+p1021)
- p3509: 4.79059e-7; = p1778*p3476
- p0910: 0.0203592; = p0909/p0818
- p2807: 0; = p2416*(p1078+p1080)
- p3421: 0; = p3364*p1239
- p1807: 0
- p1004: 0; = p1000*p0888
- p3353: 2.74698e6; = if(and(p1232=0;p3256<>0);p3256*(p3276-p3348)/p3349;0)
- p3519: 1.59686e-7; = p1788*p3476
- p2918: 8.38718e-5; = p2332*(p1020+p1022)
- p1171: 0.00058608; = p0801*p0001/(p0818*p0002)
- p3020: 6.49447e-10; = p2239*p1023
- p0226: 8.48
- p2254: 0.00201599; = p2222*p2200
- p2385: 4.4347e-5; = p2229*p2214
- p3199: 0; = p2418*p1082
- p3564: 4.79059e-7; = p1833*p3476
- p0852: 0; = p0847*p0851^3+p0848*p0851^2+p0849*p0851+p0850
- p1669: 0
- p2612: 0; = p2416*p1073
- p1840: 0
- p2500: 0.00102299; = p2304*p1073
- p3132: 0; = p2351*p1132
- p5115: 1.25996e-6; = p1942*p3483
- p3019: 5.92481e-9; = p2238*p1023
- p2513: 3.03602e-5; = p2317*p1014
- p2365: 0.0192288; = p2225*p2193
- p0543: 0; = IF(p0279<0.5;-SQRT(p0007*EXP(p0411^2*p0008)-p0007);SQRT(p0007*EXP(p0411^2*p0008)-p0007))
- p3205: 0; = p2424*p1082
- p3260: 0.0343561
- p3242: 6.66831e-8; = p3234*p1188*p3238/p0818
- p1492: 12
- p3122: 0; = p2341*p1082
- p0845: 0.5
- p0855: 2.75264; = p0854*p0001*p0003/(p0818*p0002)
- p2785: 0; = p2394*(p1019+p1021)
- p0667: 0; = IF(p0403<0.5;-SQRT(p0007*EXP(p0535^2*p0008)-p0007);SQRT(p0007*EXP(p0535^2*p0008)-p0007))
- p1321: 1.20006; = IF(((p0745*1000*p0748/100)+(p0754*1000*p0757/100))/p0801<0;0;((p0745*1000*p0748/100)+(p0754*1000*p0757/100))/p0801)
- p2628: 0.00057539; = p2237*(p1019+p1021)
- p4022: 5.09243e-6; = p1879*p3478
- p0633: 0; = IF(p0369<0.5;-SQRT(p0007*EXP(p0501^2*p0008)-p0007);SQRT(p0007*EXP(p0501^2*p0008)-p0007))
- p1841: 0
- p0223: 35.918
- p2796: 0; = p2405*(p1019+p1021)
- p2851: 0.000747055; = p2265*(p1079+p1081)
- p3895: 0.000163514; = p1962*p3477
- p1915: 0
- p0560: 0; = IF(p0296<0.5;-SQRT(p0007*EXP(p0428^2*p0008)-p0007);SQRT(p0007*EXP(p0428^2*p0008)-p0007))
- p3230: 4.98881e-7; = p1170/p0818
- p2763: 0.00127615; = p2372*(p1019+p1021)
- p2421: 0; = p2235*p2211
- p2514: 0.000104574; = p2318*p1014
- p0504: 0; = SQRT(2)*(IF((2*p0372-1)<0;-1;IF((2*p0372-1)>0;1;0))*SQRT(SQRT((2/(pi()*0.140012289)+LN(1-(2*p0372-1)^2)/2)^2-LN(1-(2*p0372-1)^2)/0.140012289)-(2/(pi()*0.140012289)+LN(1-(2*p0372-1)^2)/2)))
- p3340: 0; = if(and(p1232=0;p3254<>0);p3254*(p3270-p3335)/p3338;0)
- p2890: 0.000184887; = p2304*(p1079+p1081)
- p3062: 5.63065e-10; = p2281*p1023
- p1959: 2490.17; = if(p0738*p0740*p0739>0;p0738*1000*(p0740/100)*p0739/1000;p1958)
- p3466: 0; = p3371*p1241
- p1333: 0.000703329; = p1332*p0001/(p0818*p0002)
- p0196: 26.52
- p3163: 8.05442e-5; = p2382*p1082
- p5128: 6.08982e-6; = p1955*p3483
- p0599: 0; = IF(p0335<0.5;-SQRT(p0007*EXP(p0467^2*p0008)-p0007);SQRT(p0007*EXP(p0467^2*p0008)-p0007))
- p3581: 1.11781e-6; = p1850*p3476
- p2915: 6.72315e-8; = p2329*(p1020+p1022)
- p1926: 0
- p0239: 34.46
- p2992: 0; = p2406*(p1020+p1022)
- p2457: 0.00381703; = p2261*p1073
- p1864: 0
- p1995: 50
- p2389: 0.00176153; = p2233*p2218
- p3162: 6.15058e-6; = p2381*p1082
- p2163: 0.0057307; = (p2017-p2020)/p0818-(p2025+p2028+p2033+p2034+p2051+p2125+p2126+p2127+p2128+p2129+p2130+p2131+p2132+p2133+p2134+p2135+p2136+p2137+p2138+p2139+p2140+p2141+p2142+p2143+p2144+p2145+p2146+p2147+p2148+p2149+p2150+p2151+p2152+p2153+p2154+p2155+p2156+p2157)
- p1360: 124
- p2136: 9.51274e-6; = p2015*p2064*p2098/(p0818*1000)
- p1495: 40
- p3124: 0; = p2343*p1082
- p1093: 0; = IF(p1071=0;p1087*p0001/(p0818*p0002);0)
- p1736: 0
- p2039: 1.71939e-5; = p2015*p2037*p2038/(p0818*1000)
- p3433: 0; = p3376*p1239
- p2237: 0.00269908; = p2222*p2182
- p1869: 0
- p1295: 0; = p1291*p1252/p0818
- p1760: 0
- p2088: 0.798875
- p2038: 0.304457
- p1820: 0
- p3172: 2.09548e-5; = p2391*p1132
- p2614: 0; = p2418*p1073
- p0331: 0.5
- p2935: 0; = p2349*(p1079+p1081)
- p0604: 0; = IF(p0340<0.5;-SQRT(p0007*EXP(p0472^2*p0008)-p0007);SQRT(p0007*EXP(p0472^2*p0008)-p0007))
- p0056: 19.599
- p2077: 0.043
- p2004: 30
- p0230: 54.459
- p5114: 5.24984e-8; = p1941*p3483
- p1954: 0
- p2852: 3.45237e-7; = p2266*(p1079+p1081)
- p2162: 2.67656e-7; = p2015*p2086*p2124/(p0818*1000)
- p2643: 5.65445e-7; = p2252*(p1019+p1021)
- p1961: 0.5
- p3273: 0.753577
- p1238: 0.4883; = if(p1232>0;0;IF(p1234=1;0;IF(p1234+p1235>1;1-p1234;p1235)))
- p0210: 0
- p0121: 30.71
- p1225: 1.088; = IF(p1221=0;0;p1223+1.2*p1224)
- p0981: 0; = p0978*p0001/(p0818*p0002)
- p0947: 0; = if(and(p0683=0;or(p0807=480;p0807=32;p0807=1;and(p0807=60;p0901<0.03)));p0935;0)
- p3389: 0; = p3370*p1234
- p0595: 0; = IF(p0331<0.5;-SQRT(p0007*EXP(p0463^2*p0008)-p0007);SQRT(p0007*EXP(p0463^2*p0008)-p0007))
- p1231: 0.0295472; = IF(p1221=0;0;p1230*(p1228+p1229))
- p0343: 0.5
- p2594: 0; = p2398*p1014
- p0689: 52.413; = p0029*(1+p0557*p0161/100)
- p2299: 0.000188598; = p2227*p2206
- p3351: 2.18272e6; = if(and(p1232=0;p3256<>0);p3256*(p3274-p3346)/p3349;0)
- p2792: 0; = p2401*(p1019+p1021)
- p1075: 0.10903; = IF(p1071=0;p0713/100;0)
- p0440: 0; = SQRT(2)*(IF((2*p0308-1)<0;-1;IF((2*p0308-1)>0;1;0))*SQRT(SQRT((2/(pi()*0.140012289)+LN(1-(2*p0308-1)^2)/2)^2-LN(1-(2*p0308-1)^2)/0.140012289)-(2/(pi()*0.140012289)+LN(1-(2*p0308-1)^2)/2)))
- p0563: 0; = IF(p0299<0.5;-SQRT(p0007*EXP(p0431^2*p0008)-p0007);SQRT(p0007*EXP(p0431^2*p0008)-p0007))
- p1737: 0.786618
- p0678: 0
- p1832: 0.000449007; = p1424*1000/p0818
- p1978: 228
- p0949: 0; = if(and(p0683=0;or(p0807=480;p0807=32;p0807=1;and(p0807=60;p0901<0.03)));p0937;0)
- p1734: 0
- p3292: 0.258
- p0702: 455.145; = p0042*(1+p0570*p0174/100)
- p2689: 0.0001481; = p2298*(p1078+p1080)
- p0189: 17.119
- p1823: 0
- p1084: 45293.2; = IF(p1071=0;p1078*(p0710/100)*p0703*1000;0)
- p3449: 0; = p3373*p1240
- p2180: 1.18964e-7; = p3233*p1188/(p0818)
- p0554: 0; = IF(p0290<0.5;-SQRT(p0007*EXP(p0422^2*p0008)-p0007);SQRT(p0007*EXP(p0422^2*p0008)-p0007))
- p0364: 0.5
- p2675: 7.83561e-5; = p2284*(p1019+p1021)
- p1739: 0
- p1905: 0
- p0879: 2.41885; = p0878*p0001*p0003/(p0818*p0002)
- p0188: 23.727
- p1966: 0; = if(p0814=0;p0802;0)
- p3632: 1.42121e-5; = p1901*p3476
- p1206: 0.00953
- p1279: 0
- p2347: 0; = p2228*p2215
- p3769: 8.70519e-5; = p1832*p3477
- p1647: 0
- p3413: 0.00127273; = p3375*p1238
- p0174: 0
- p0856: 455000; = p0801
- p0838: 1.05187e9; = (p0833-p0836)*p0837
- p2973: 4.4805e-6; = p2387*(p1079+p1081)
- p0799: 48.925; = p0139*(1+p0667*p0271/100)
- p0195: 0
- p2641: 0.00125411; = p2250*(p1019+p1021)
- p0165: 7.702
- p3947: 4.24369e-7; = p1804*p3478
- p1356: 5
- p2919: 3.59578e-5; = p2333*(p1020+p1022)
- p0864: 0; = IF(p0858=1;0;IF(p0858+p0859>1;1-p0858;p0859))
- p3258: 0.0491162
- p2754: 9.55505e-5; = p2363*(p1019+p1021)
- p2735: 0; = p2344*(p1078+p1080)
- p3459: 7.48446e-6; = p3364*p1241
- p0524: 0; = SQRT(2)*(IF((2*p0392-1)<0;-1;IF((2*p0392-1)>0;1;0))*SQRT(SQRT((2/(pi()*0.140012289)+LN(1-(2*p0392-1)^2)/2)^2-LN(1-(2*p0392-1)^2)/0.140012289)-(2/(pi()*0.140012289)+LN(1-(2*p0392-1)^2)/2)))
- p2673: 0.000153556; = p2282*(p1019+p1021)
- p1787: 0
- p1738: 0.54188
- p0872: 0; = p0864*p0856
- p0482: 0; = SQRT(2)*(IF((2*p0350-1)<0;-1;IF((2*p0350-1)>0;1;0))*SQRT(SQRT((2/(pi()*0.140012289)+LN(1-(2*p0350-1)^2)/2)^2-LN(1-(2*p0350-1)^2)/0.140012289)-(2/(pi()*0.140012289)+LN(1-(2*p0350-1)^2)/2)))
- p3029: 2.77628e-8; = p2248*p1023
- p1158: 0.0509438; = p1156*p1157
- p2878: 5.35579e-7; = p2292*(p1020+p1022)
- p0384: 0.5
- p1341: 0; = p1340*p0001/(p0818*p0002)
- p0122: 19.599
- p2887: 7.23096e-5; = p2301*(p1079+p1081)
- p2481: 6.67826e-5; = p2285*p1014
- p1029: 4.36511; = IF(p1012=0;IF(p0801<p1023*(p0704/100)*p0703*1000;p0801;p1023*(p0704/100)*p0703*1000);0)
- p0745: 957.595; = p0085*(1+p0613*p0217/100)
- p2031: 0.465411
- p2568: 0.00432512; = p2372*p1014
- p0871: 0.100419; = p0870*p0001*p0003/(p0818*p0002)
- p3184: 0; = p2403*p1023
- p1166: 2.86908e-6; = p1164/p0818
- p3965: 1.69748e-6; = p1822*p3478
- p2341: 0; = p2228*p2209
- p3395: 0.000419227; = p3376*p1234
- p2240: 0.000223698; = p2222*p2185
- p3390: 0; = p3371*p1234
- p1798: 0
- p1728: 0
- p3418: 0.523997; = p3380*p1238
- p1860: 0
- p1632: 0
- p3867: 0.000108045; = p1930*p3477
- p1580: 0
- p1019: 0.10541; = IF(p1012=0;IF(p1014=1;0;IF(p1014+p1015>1;1-p1014;p1015));0)
- p3423: 0; = p3366*p1239
- p3462: 5.04653e-5; = p3367*p1241
- p3322: 0; = if(and(p1232=0;p3253<>0);p3253-(p3317+p3318+p3319+p3320+p3321);0)
- p1187: 0.00029986
- p2247: 0.000523707; = p2222*p2192
- p2983: 0; = p2397*(p1020+p1022)
- p3123: 0; = p2342*p1082
- p0897: 0.49875
- p1106: 3507.66; = IF(p1071=0;p1105*p1096*p1095;0)
- p0867: 0.412716; = IF(p0858+p0864+p0865+p0866=1;0;IF(p0858+p0864+p0865+p0866+p0862>1;1-(p0858+p0864+p0865+p0866);p0862))
- p2582: 0.000100958; = p2386*p1073
- p2543: 0; = p2347*p1073
- p0346: 0.5
- p3142: 1.55714e-8; = p2361*p1023
- p3365: 0.0106381; = if(p1232=0;p3244*p3359/p0818;0)
- p3301: 0; = if(and(p1232=0;p3252<>0);p3257*p3277*(p3297*p3290+(1-p3297)*p3294);0)
- p1721: 0
- p1049: 0.250227; = IF(p1012=0;IF(p1037+p1044+p1045+p1046+p1047+p1048=1;0;1-(p1037+p1044+p1045+p1046+p1047+p1048));0)
- p3288: 0.505
- p1293: 0; = p1287*p1252/p0818
- p2272: 0.00229093; = p2230*p2218
- p0911: 0.0049
- p2566: 2.91826e-5; = p2370*p1014
- p4328: 2.08315e-8; = p1773*p3480
- p1039: 0.033998
- p2374: 0.00987704; = p2225*p2203
- p2540: 0; = p2344*p1073
- p0314: 0.5
- p3277: 0.55
- p4688: 1.59162e-5; = p1927*p3481
- p1176: 153.54; = p1175*p0801
- p0743: 1.231; = p0083*(1+p0611*p0215/100)
- p2300: 0.00156591; = p2227*p2207
- p1063: 0.455
- p3187: 0; = p2406*p1023
- p2461: 0.00413351; = p2265*p1073
- p0394: 0.5
- p2848: 0.000292174; = p2262*(p1079+p1081)
- p0071: 29.598
- p0153: 0
- p0646: 0; = IF(p0382<0.5;-SQRT(p0007*EXP(p0514^2*p0008)-p0007);SQRT(p0007*EXP(p0514^2*p0008)-p0007))
- p2711: 5.43751e-6; = p2320*(p1019+p1021)
- p0789: 0
- p2756: 0.00409919; = p2365*(p1019+p1021)
- p2028: 0.000514307; = p2015*p2026*p2027/(p0818*1000)
- p1204: 0.980791
- p1110: 2.96854e6; = IF(p1071=0;p1105*p1104*p1095;0)
- p0213: 5.881
- p0741: 1.564; = p0081*(1+p0609*p0213/100)
- p3975: 0.000131979; = p1832*p3478
- p0957: 0; = if(and(p0683>0;or(p0807=56;p0807=100;and(p0807=60;p0901>0.06)));p0939;0)
- p2741: 0; = p2350*(p1128+p1130)
- p2622: 0; = p2426*p1073
- p1230: 0.5
- p1065: 0.00288684; = IF(p1012=0;p1051/(p1058*p0818);0)
- p0714: 0
- p0576: 0; = IF(p0312<0.5;-SQRT(p0007*EXP(p0444^2*p0008)-p0007);SQRT(p0007*EXP(p0444^2*p0008)-p0007))
- p3624: 8.03223e-5; = p1893*p3476
- p4611: 2.10214e-6; = p1850*p3481
- p3168: 1.37296e-6; = p2387*p1082
- p0089: 19.444
- p1741: 0
- p1485: 503
- p3081: 5.23171e-5; = p2300*p1082
- p2419: 0; = p2235*p2209
- p2067: 0.446471
- p2071: 0.151
- p2063: 2.01468
- p2064: 0.676706
- p2115: 0.856281
- p2804: 0; = p2413*(p1019+p1021)
- p2429: 0; = p2236*p2219
- p0429: 0; = SQRT(2)*(IF((2*p0297-1)<0;-1;IF((2*p0297-1)>0;1;0))*SQRT(SQRT((2/(pi()*0.140012289)+LN(1-(2*p0297-1)^2)/2)^2-LN(1-(2*p0297-1)^2)/0.140012289)-(2/(pi()*0.140012289)+LN(1-(2*p0297-1)^2)/2)))
- p3008: 0; = p2422*(p1079+p1081)
- p4833: 0; = p1866*p3482
- p2371: 0.0139629; = p2225*p2200
- p3302: 0; = if(and(p1232=0;p3252<>0);p3258*(p3278*(p3282*p1256+p3286*(p1253+p1257)+p1258*p3288+p3297*p3287));0)
- p3253: 4.16242e7; = p1252*(p1277*(1-p3247)+p1280*(1-p3248)+p1281*(1-p3249)+p1282*(1-p3250))
- p3080: 6.30104e-6; = p2299*p1082
- p2929: 0; = p2343*(p1079+p1081)
- p0277: 0.5
- p2076: 0.057
- p2822: 0; = p2431*(p1128+p1130)
- p4300: 1.19614e-5; = p1951*p3479
- p3787: 1.95937e-6; = p1850*p3477
- p2845: 0.000256577; = p2259*(p1079+p1081)
- p3059: 9.2761e-10; = p2278*p1023
- p1694: 0
- p2177: 0.286575; = p0895/p0818-(p2173+p2174+p2175+p2176)
- p1747: 0.217583
- p3217: 0.00649475; = p3213*p1228
- p3435: 0; = p3378*p1239
- p4712: 2.19223e-5; = p1951*p3481
- p1042: 0.000200582
- p2288: 0.000850026; = p2223*p2195
- p0802: 451000
- p0120: 12.555
- p1077: 0; = IF(p1071=0;p0715/100;0)
- p2459: 0.000731055; = p2263*p1073
- p2420: 0; = p2235*p2210
- p1055: 11194.8; = IF(p1012=0;p1048*p1036;0)
- p1169: 0.00075944
- p3474: 1.09803e-5; = p3379*p1241
- p1155: 0.00162139; = if(p1153*p0818=0;0;p1151/(p1153*p0818))
- p1970: 455000; = p0801
- p2734: 0; = p2343*(p1078+p1080)
- p0865: 0.398413; = IF(p0858+p0864=1;0;IF(p0858+p0864+p0860>1;1-(p0858+p0864);p0860))
- p1121: 0
- p2305: 7.83655e-7; = p2227*p2212
- p4199: 1.14699e-6; = p1850*p3479
- p0220: 10.86
- p1174: 2.49441e-7; = p1170*p1173/p0818
- p3690: 0.000213921; = p1963*p3476
- p3212: 0; = p2431*p1132
- p2981: 0; = p2395*(p1020+p1022)
- p0956: 0; = if(and(p0683>0;or(p0807=56;p0807=100;and(p0807=60;p0901>0.06)));p0938;0)
- p2774: 2.83303e-7; = p2383*(p1078+p1080)
- p3359: 8.9716e6; = if(p1232=0;p3309+p3320+p3331+p3342+p3353;0)
- p3194: 0; = p2413*p1023
- p1185: 0.5
- p3120: 0; = p2339*p1082
- p2998: 0; = p2412*(p1020+p1022)
- p3066: 9.24314e-10; = p2285*p1023
- p3354: 1.10544e7; = IF((p3350+p3351+p3352+p3353)+IF(p3349=0;0;(p3256*(p3273*(1-p3277))/p3349))>p3256;p3256-(p3350+p3351+p3352+p3353);IF(p3349=0;0;p3256*(p3273*(1-p3277))/p3349))
- p1875: 0
- p1519: 53
- p2884: 6.34996e-5; = p2298*(p1079+p1081)
- p3188: 0; = p2407*p1023
- p1328: 205465; = p1319*p0801
- p2464: 7.60369e-5; = p2268*p1073
- p1574: 0.91928
- p0048: 10.777
- p3075: 1.23449e-8; = p2294*p1023
- p0822: 0.916
- p0203: 48.494
- p0757: 20.192; = p0097*(1+p0625*p0229/100)
- p0290: 0.5
- p1786: 0
- p0624: 0; = IF(p0360<0.5;-SQRT(p0007*EXP(p0492^2*p0008)-p0007);SQRT(p0007*EXP(p0492^2*p0008)-p0007))
- p3166: 1.48163e-6; = p2385*p1082
- p2882: 0.00013097; = p2296*(p1020+p1022)
- p1846: 0
- p1301: 0; = IF(p1297+p1300=p1265;0;IF(p1297+p1300+p1299>p1265;p1265-(p1297+p1300);p1299))
- p0229: 24.11
- p1056: 1.39655e7; = IF(p1012=0;p1049*p1036;0)
- p1002: 4.67737e6; = p0996*p0888
- p2866: 2.51559e-5; = p2280*(p1020+p1022)
- p1664: 0
- p0285: 0.5
- p3534: 6.38746e-7; = p1803*p3476
- p0372: 0.5
- p2695: 0.000431211; = p2304*(p1078+p1080)
- p3178: 0; = p2397*p1023
- p4358: 8.3326e-8; = p1803*p3480
- p1850: 1.01063e-5; = p1442*1000/p0818
- p4535: 6.00611e-7; = p1774*p3481
- p2867: 3.62051e-6; = p2281*(p1020+p1022)
- p1104: 0.484786; = IF(p1071=0;IF(p1096+p1101+p1102+p1103=1;0;1-(p1096+p1101+p1102+p1103));0)
- p2454: 0.00156968; = p2258*p1073
- p3383: 0.00192676; = p3364*p1234
- p3241: 1.09983e-9; = p3234*p1188*p3236/p0818
- p4961: 5.24984e-8; = p1788*p3483
- p0573: 0; = IF(p0309<0.5;-SQRT(p0007*EXP(p0441^2*p0008)-p0007);SQRT(p0007*EXP(p0441^2*p0008)-p0007))
- p1941: 1.44375e-6; = p1533*1000/p0818
- p1671: 0
- p1793: 0
- p2607: 0; = p2411*p1014
- p1681: 0
- p0428: 0; = SQRT(2)*(IF((2*p0296-1)<0;-1;IF((2*p0296-1)>0;1;0))*SQRT(SQRT((2/(pi()*0.140012289)+LN(1-(2*p0296-1)^2)/2)^2-LN(1-(2*p0296-1)^2)/0.140012289)-(2/(pi()*0.140012289)+LN(1-(2*p0296-1)^2)/2)))
- p1792: 0
- p4781: 0; = p1814*p3482
- p0967: 6.69035e6; = (p0684/100)*p0683*p0682*1000
- p1057: 0.82
- p2618: 0; = p2422*p1073
- p1515: 3
- p2972: 1.82463e-5; = p2386*(p1079+p1081)
- p2203: 0.0142626; = p1070-p2200-p2201-p2202
- p1758: 0
- p1245: 0; = if(p1232>0;0;p1240*(p0725/100)*p0723*1000)
- p2244: 0.000224822; = p2222*p2189
- p2412: 0; = p2234*p2202
- p2729: 0; = p2338*(p1078+p1080)
- p3101: 2.55067e-10; = p2320*p1023
- p5280: 3.76433e-6; = p1901*p3484
- p0083: 1.231
- p2026: 73.06
- p2811: 0; = p2420*(p1078+p1080)
- p0916: 0.807629; = p0826+p0828+p0829+(p0832*(1+p0894))/p0818
- p0337: 0.5
- p1342: 67548.5; = p1326*p0801
- p3125: 0; = p2344*p1082
- p3672: 1.59686e-7; = p1941*p3476
- p0891: 226512; = IF(p3251=0;0;62.4*6272640/(12*12*12))
- p2589: 0; = p2393*p1014
- p0894: 0.2085
- p3314: 0.00107264; = if(and(p1232=0;p3253<>0);p3263*p3289;0)
- p1324: 0.849222; = IF(((p0745*1000*p0751/100)+(p0754*1000*p0760/100))/p0801<0;0;((p0745*1000*p0751/100)+(p0754*1000*p0760/100))/p0801)
- p3368: 0; = if(p1232=0;p3245*p3356/p0818;0)
- p0137: 78.774
- p0671: 0
- p2942: 2.8923e-5; = p2356*(p1020+p1022)
- p3465: 0; = p3370*p1241
- p4589: 6.00611e-7; = p1828*p3481
- p3479: 0.113493; = if(p1328+p1330+p1332+p1334+p1336+p1338+p1340+p1342+p1344=0;0;p1334/(p1328+p1330+p1332+p1334+p1336+p1338+p1340+p1342+p1344))
- p2736: 0; = p2345*(p1078+p1080)
- p0184: 32.17
- p3023: 3.94218e-10; = p2242*p1023
- p0929: 0; = p0801*p0923
- p3169: 1.23051e-5; = p2388*p1082
- p2832: 4.1611e-6; = p2246*(p1020+p1022)
- p0033: 55.331
- p0986: 0; = IF(p0982+p0985=1;0;IF(p0982+p0985+p0984>1;1-(p0982+p0985);p0984))
- p1836: 0
- p3404: 0.0322893; = p3366*p1238
- p1774: 2.8875e-6; = p1366*1000/p0818
- p2652: 0.00160895; = p2261*(p1078+p1080)
- p0592: 0; = IF(p0328<0.5;-SQRT(p0007*EXP(p0460^2*p0008)-p0007);SQRT(p0007*EXP(p0460^2*p0008)-p0007))
- p1619: 0
- p0932: 0; = p0801*p0926
- p1682: 0
- p0164: 10.874
- p2842: 7.99843e-6; = p2256*(p1020+p1022)
- p1751: 0.791173
- p0050: 39.134
- p2799: 0; = p2408*(p1019+p1021)
- p3147: 4.12191e-8; = p2366*p1023
- p2310: 0.000259066; = p2227*p2217
- p1135: 0; = if(p1121=0;p1129*(p0716/100)*p0703*1000;0)
- p0444: 0; = SQRT(2)*(IF((2*p0312-1)<0;-1;IF((2*p0312-1)>0;1;0))*SQRT(SQRT((2/(pi()*0.140012289)+LN(1-(2*p0312-1)^2)/2)^2-LN(1-(2*p0312-1)^2)/0.140012289)-(2/(pi()*0.140012289)+LN(1-(2*p0312-1)^2)/2)))
- p0971: 0; = p0968/p0818
- p2634: 0.000107509; = p2243*(p1019+p1021)
- p0235: 0
- p1934: 0
- p0057: 69.481
- p0012: 181.278
- p1033: 6.05953e-5; = IF(p1012=0;p1027*p0001/(p0818*p0002);0)
- p3373: 0; = if(p1232=0;p3245*p3361/p0818;0)
- p0492: 0; = SQRT(2)*(IF((2*p0360-1)<0;-1;IF((2*p0360-1)>0;1;0))*SQRT(SQRT((2/(pi()*0.140012289)+LN(1-(2*p0360-1)^2)/2)^2-LN(1-(2*p0360-1)^2)/0.140012289)-(2/(pi()*0.140012289)+LN(1-(2*p0360-1)^2)/2)))
- p3222: 0.224242; = IF(p3216=0;0;p1223*40.078/100.0869)
- p1336: 26803.4; = p1323*p0801
- p2444: 0.00200589; = p2248*p1014
- p1089: 0.000138408; = IF(p1071=0;p1083*p0001/(p0818*p0002);0)
- p3105: 4.18711e-10; = p2324*p1023
- p1783: 0
- p0181: 42.762
- p3363: 0.0119792; = if(p1232=0;p3244*p3357/p0818;0)
- p3481: 0.208003; = if(p1328+p1330+p1332+p1334+p1336+p1338+p1340+p1342+p1344=0;0;p1338/(p1328+p1330+p1332+p1334+p1336+p1338+p1340+p1342+p1344))
- p2766: 0.000232798; = p2375*(p1078+p1080)
- p3355: 1.93545e6; = if(and(p1232=0;p3256<>0);p3256-(p3350+p3351+p3352+p3353+p3354);0)
- p3473: 2.84878e-5; = p3378*p1241
- p1025: 46012.7; = IF(p1012=0;p1019*(p0704/100)*p0703*1000;0)
- p1932: 0
- p2229: 0.219995; = if(p0774*p0778+p0775*p0779+p0776*p0780+p0777*p0781=0;0;p0781*p0777/(p0774*p0778+p0775*p0779+p0776*p0780+p0777*p0781))
- p1670: 0
- p0315: 0.5
- p1697: 0.705252
- p0425: 0; = SQRT(2)*(IF((2*p0293-1)<0;-1;IF((2*p0293-1)>0;1;0))*SQRT(SQRT((2/(pi()*0.140012289)+LN(1-(2*p0293-1)^2)/2)^2-LN(1-(2*p0293-1)^2)/0.140012289)-(2/(pi()*0.140012289)+LN(1-(2*p0293-1)^2)/2)))
- p0875: 2.33502; = p0874*p0001*p0003/(p0818*p0002)
- p2349: 0; = p2228*p2217
- p2813: 0; = p2422*(p1078+p1080)
- p3432: 0; = p3375*p1239
- p3467: 0; = p3372*p1241
- p2575: 0.000568799; = p2379*p1073
- p1024: 315384; = IF(p1012=0;p1014*(p0704/100)*p0703*1000;0)
- p1251: 1.76838e-7; = if(p1232>0;0;p1246*p0001/(p0818*p0002))
- p0779: 21.771; = p0119*(1+p0647*p0251/100)
- p2340: 0; = p2228*p2208
- p1772: 0
- p1310: 0.186093; = IF(p1307=p1266;0;IF(p1307+p1308>p1266;p1266-p1307;p1308))
- p3410: 0; = p3372*p1238
- p0768: 80.709; = p0108*(1+p0636*p0240/100)
- p3409: 0; = p3371*p1238
- p2895: 3.15159e-6; = p2309*(p1079+p1081)
- p2954: 7.19689e-7; = p2368*(p1020+p1022)
- p2113: 0.832356
- p1314: 0.237481; = p1310*p1252/p0818
- p3048: 1.10624e-6; = p2267*p1082
- p0966: 0.02717; = if(p0683=0;0;IF(p0684/100+p0965=1;0;1-(p0684/100+p0965)))
- p0914: 1.8053e7; = p0825*p0911+p0827*p0912+(p0830+p0895)*p0824*p0913
- p2433: 0.00195011; = p2237*p1014
- p1894: 0
- p3426: 0; = p3369*p1239
- p0532: 0; = SQRT(2)*(IF((2*p0400-1)<0;-1;IF((2*p0400-1)>0;1;0))*SQRT(SQRT((2/(pi()*0.140012289)+LN(1-(2*p0400-1)^2)/2)^2-LN(1-(2*p0400-1)^2)/0.140012289)-(2/(pi()*0.140012289)+LN(1-(2*p0400-1)^2)/2)))
- p0442: 0; = SQRT(2)*(IF((2*p0310-1)<0;-1;IF((2*p0310-1)>0;1;0))*SQRT(SQRT((2/(pi()*0.140012289)+LN(1-(2*p0310-1)^2)/2)^2-LN(1-(2*p0310-1)^2)/0.140012289)-(2/(pi()*0.140012289)+LN(1-(2*p0310-1)^2)/2)))
- p2269: 0.00047564; = p2226*p2215
- p2769: 0.000566101; = p2378*(p1078+p1080)
- p2601: 0; = p2405*p1014
- p2472: 0.00278536; = p2276*p1014
- p3283: 0.3
- p1140: 2.43616e-5; = if(p1121=0;p1134*p0001/(p0818*p0002);0)
- p0107: 66.098
- p2651: 0.000193781; = p2260*(p1078+p1080)
- p1088: 5950.87; = IF(p1071=0;p1082*(p0710/100)*p0703*1000;0)
- p1797: 0
- p1503: 60
- p1775: 0
- p0176: 2.77
- p1968: 112750; = if(p0807=480;p0802*p0811;0)
- p1579: 0
- p5193: 1.22658e-6; = p1814*p3484
- p0379: 0.5
- p1973: 0.000145232; = if(p0807=480;p1968*p0001/(p0818*p0002);0)
- p1695: 0
- p2858: 0; = p2272*(p1129+p1131)
- p2000: 4000
- p2331: 3.77318e-6; = p2224*p2199
- p3830: 0.000140794; = p1893*p3477
- p0731: 29.598; = p0071*(1+p0599*p0203/100)
- p3140: 2.7304e-9; = p2359*p1023
- p2411: 0; = p2234*p2201
- p1091: 2.50147e-5; = IF(p1071=0;p1085*p0001/(p0818*p0002);0)
- p1127: 0; = if(p1121=0;p0721/100;0)
- p2062: 3.76588
- p1211: 0.6
- p2886: 0.000170731; = p2300*(p1079+p1081)
- p0102: 7.505
- p0292: 0.5
- p1080: 0; = IF(p1071=0;IF(p1073+p1078+p1079=1;0;IF(p1073+p1078+p1079+p1076>1;1-(p1073+p1078+p1079);p1076));0)
- p0851: 0
- p4448: 1.04782e-5; = p1893*p3480
- p2072: 0.134
- p2398: 0; = p2234*p2187
- p0859: 0; = p0671*1000/p0856
- p5147: 5.24468e-6; = p1768*p3484

- p2392: 0.000390833; = p2233*p2221
- p3317: 1.77655e7; = if(and(p1232=0;p3253<>0);p3253*(p3261*p3277-p3312)/p3316;0)
- p2720: 2.22899e-7; = p2329*(p1019+p1021)
- p4228: 1.96627e-6; = p1879*p3479
- p0515: 0; = SQRT(2)*(IF((2*p0383-1)<0;-1;IF((2*p0383-1)>0;1;0))*SQRT(SQRT((2/(pi()*0.140012289)+LN(1-(2*p0383-1)^2)/2)^2-LN(1-(2*p0383-1)^2)/0.140012289)-(2/(pi()*0.140012289)+LN(1-(2*p0383-1)^2)/2)))
- p0849: 0
- p1353: 2
- p2512: 0.000276972; = p2316*p1014
- p0284: 0.5
- p3045: 1.74809e-5; = p2264*p1082
- p2273: 0.00322841; = p2230*p2219
- p3364: 0.00378003; = if(p1232=0;p3244*p3358/p0818;0)
- p2849: 0.000132125; = p2263*(p1079+p1081)
- p2672: 1.20034e-5; = p2281*(p1019+p1021)
- p2073: 0.377647
- p0084: 88.924
- p2175: 0.00120024; = p0895*p0908/p0818
- p0581: 0; = IF(p0317<0.5;-SQRT(p0007*EXP(p0449^2*p0008)-p0007);SQRT(p0007*EXP(p0449^2*p0008)-p0007))
- p3282: 0.3
- p0419: 0; = SQRT(2)*(IF((2*p0287-1)<0;-1;IF((2*p0287-1)>0;1;0))*SQRT(SQRT((2/(pi()*0.140012289)+LN(1-(2*p0287-1)^2)/2)^2-LN(1-(2*p0287-1)^2)/0.140012289)-(2/(pi()*0.140012289)+LN(1-(2*p0287-1)^2)/2)))
- p3026: 2.57338e-9; = p2245*p1023
- p0362: 0.5
- p2893: 3.40105e-6; = p2307*(p1079+p1081)
- p3610: 1.91624e-6; = p1879*p3476
- p0716: 19.599; = p0056*(1+p0584*p0188/100)
- p2168: 0.0226081; = p2166*(p0903)
- p0118: 52.599
- p1071: 0
- p4359: 2.08315e-8; = p1804*p3480
- p2029: 6.19
- p0351: 0.5
- p0390: 0.5
- p0345: 0.5
- p3431: 0; = p3374*p1239
- p4667: 3.30336e-6; = p1906*p3481
- p1667: 0
- p3110: 1.04559e-11; = p2329*p1023
- p2013: 0.65
- p0939: 1.80538e-5; = p0933*p0001/(p0818*p0002)
- p0238: 28.83
- p1749: 0
- p0831: 0.1385; = 1-p0824
- p0870: 7796; = p0858*p0856
- p2959: 5.53979e-5; = p2373*(p1020+p1022)
- p3251: 7.43275e8; = p1252-(p3252+p3253+p3254+p3255+p3256)
- p1744: 0
- p2633: 8.40394e-6; = p2242*(p1019+p1021)
- p1806: 0
- p2118: 0.679049
- p0355: 0.5
- p2846: 8.30861e-5; = p2260*(p1079+p1081)
- p3911: 5.26217e-5; = p1768*p3478
- p0648: 0; = IF(p0384<0.5;-SQRT(p0007*EXP(p0516^2*p0008)-p0007);SQRT(p0007*EXP(p0516^2*p0008)-p0007))
- p2658: 8.41978e-6; = p2267*(p1078+p1080)
- p0720: 0
- p0526: 0; = SQRT(2)*(IF((2*p0394-1)<0;-1;IF((2*p0394-1)>0;1;0))*SQRT(SQRT((2/(pi()*0.140012289)+LN(1-(2*p0394-1)^2)/2)^2-LN(1-(2*p0394-1)^2)/0.140012289)-(2/(pi()*0.140012289)+LN(1-(2*p0394-1)^2)/2)))
- p3401: 0.00584943; = p3363*p1238
- p0905: 0.118138; = p0904/p0818
- p5211: 1.3154e-5; = p1832*p3484
- p2595: 0; = p2399*p1014
- p0100: 24.15
- p0656: 0; = IF(p0392<0.5;-SQRT(p0007*EXP(p0524^2*p0008)-p0007);SQRT(p0007*EXP(p0524^2*p0008)-p0007))
- p1603: 0
- p3160: 3.1501e-5; = p2379*p1082
- p0586: 0; = IF(p0322<0.5;-SQRT(p0007*EXP(p0454^2*p0008)-p0007);SQRT(p0007*EXP(p0454^2*p0008)-p0007))
- p2003: 50
- p1688: 0
- p2108: 0.826583
- p2193: 0.0277667; = p1054/p0818
- p1584: 0.886972
- p2199: 5.83248e-5; = p1069-p2197-p2198
- p3654: 4.79059e-7; = p1923*p3476
- p0985: 0.0965995; = IF(p0982=1;0;IF(p0982+p0983>1;1-p0982;p0983))
- p2692: 0.000168647; = p2301*(p1078+p1080)
- p1223: 0.56
- p4323: 2.5831e-6; = p1768*p3480
- p3332: 2.93515e7; = if(and(p1232=0;p3255<>0);IF((p3328+p3329+p3330+p3331)+(p3255*(p3265*(1-p3277))/p3327)>p3255;p3255-(p3328+p3329+p3330+p3331);p3255*(p3265*(1-p3277))/p3327);0)
- p0183: 14.121
- p3888: 2.04334e-5; = p1951*p3477
- p2820: 0; = p2429*(p1128+p1130)
- p2494: 0.000351347; = p2298*p1073
- p1242: 35342.4; = if(p1232>0;0;p1234*(p0725/100)*p0723*1000)
- p0763: 455.145; = p0103*(1+p0631*p0235/100)
- p2650: 0.000598412; = p2259*(p1078+p1080)
- p2187: 0.000394274; = 4*1.00794*p2186/(2*14.0067)
- p2405: 0; = p2234*p2195
- p4934: 1.04997e-7; = p1761*p3483
- p0995: 0; = p0991*p0001*p0004/(p0818*p0002)
- p2234: 0; = 1-(p2222+p2223+p2224+p2225)
- p3052: 3.4973e-5; = p2271*p1082
- p0042: 455.145
- p2565: 1.32732e-5; = p2369*p1014
- p0631: 0; = IF(p0367<0.5;-SQRT(p0007*EXP(p0499^2*p0008)-p0007);SQRT(p0007*EXP(p0499^2*p0008)-p0007))
- p1998: 228
- p0260: 41.642
- p0177: 5.938
- p0274: 0.5
- p1007: 1.74515e-5; = p1003*p0001*p0004/(p0818*p0002)
- p2436: 0.000161624; = p2240*p1014
- p0359: 0.5
- p2546: 0; = p2350*p1123
- p1618: 0.660002
- p1686: 0
- p3705: 3.47088e-5; = p1768*p3477
- p2400: 0; = p2234*p2189
- p0564: 0; = IF(p0300<0.5;-SQRT(p0007*EXP(p0432^2*p0008)-p0007);SQRT(p0007*EXP(p0432^2*p0008)-p0007))
- p2615: 0; = p2419*p1073
- p3495: 7.98432e-7; = p1764*p3476
- p1162: 0.000656907; = p1161/p0818
- p0462: 0; = SQRT(2)*(IF((2*p0330-1)<0;-1;IF((2*p0330-1)>0;1;0))*SQRT(SQRT((2/(pi()*0.140012289)+LN(1-(2*p0330-1)^2)/2)^2-LN(1-(2*p0330-1)^2)/0.140012289)-(2/(pi()*0.140012289)+LN(1-(2*p0330-1)^2)/2)))
- p2285: 9.24314e-5; = p2223*p2191
- p2479: 0.000232009; = p2283*p1014
- p2550: 0.0135067; = p2354*p1014
- p5282: 1.69183e-6; = p1903*p3484
- p3152: 1.39629e-7; = p2371*p1023
- p3054: 0.000300791; = p2273*p1132
- p2571: 0.000552284; = p2375*p1073
- p0126: 34.558
- p1666: 0
- p3225: 0.000223127; = p3221*p1229
- p0134: 0.157
- p3096: 1.74636e-8; = p2315*p1023
- p5279: 5.0755e-7; = p1900*p3484
- p1108: 129383; = IF(p1071=0;p1105*p1102*p1095;0)
- p2743: 0; = p2352*(p1128+p1130)
- p3006: 0; = p2420*(p1079+p1081)
- p2868: 4.63159e-5; = p2282*(p1020+p1022)
- p1274: 0; = p1270*p1252/p0818
- p2865: 2.05445e-5; = p2279*(p1020+p1022)
- p4122: 1.63855e-7; = p1773*p3479
- p2694: 3.29284e-5; = p2303*(p1078+p1080)
- p1706: 0
- p3446: 0; = p3370*p1240
- p0474: 0; = SQRT(2)*(IF((2*p0342-1)<0;-1;IF((2*p0342-1)>0;1;0))*SQRT(SQRT((2/(pi()*0.140012289)+LN(1-(2*p0342-1)^2)/2)^2-LN(1-(2*p0342-1)^2)/0.140012289)-(2/(pi()*0.140012289)+LN(1-(2*p0342-1)^2)/2)))
- p2290: 2.30817e-6; = p2223*p2197
- p3269: 0.851786
- p1058: 0.225
- p0804: 650000
- p0970: 0.0096592; = p0967/p0818
- p2040: 0
- p1097: 0.0228017
- p2220: 0.000592236; = p1151/p0818
- p2378: 0.0022262; = p2229*p2207
- p0268: 2.77
- p0160: 10.375
- p0518: 0; = SQRT(2)*(IF((2*p0386-1)<0;-1;IF((2*p0386-1)>0;1;0))*SQRT(SQRT((2/(pi()*0.140012289)+LN(1-(2*p0386-1)^2)/2)^2-LN(1-(2*p0386-1)^2)/0.140012289)-(2/(pi()*0.140012289)+LN(1-(2*p0386-1)^2)/2)))
- p1087: 0; = IF(p1071=0;p1081*(p0710/100)*p0703*1000;0)
- p2372: 0.00598624; = p2225*p2201
- p1653: 0
- p1713: 0
- p2987: 0; = p2401*(p1020+p1022)
- p3451: 0; = p3375*p1240
- p5124: 3.83239e-6; = p1951*p3483
- p0726: 50.972; = p0066*(1+p0594*p0198/100)
- p0506: 0; = SQRT(2)*(IF((2*p0374-1)<0;-1;IF((2*p0374-1)>0;1;0))*SQRT(SQRT((2/(pi()*0.140012289)+LN(1-(2*p0374-1)^2)/2)^2-LN(1-(2*p0374-1)^2)/0.140012289)-(2/(pi()*0.140012289)+LN(1-(2*p0374-1)^2)/2)))
- p0288: 0.5
- p1380: 1
- p2319: 0.000177225; = p2224*p2186
- p2630: 1.38449e-5; = p2239*(p1019+p1021)
- p4268: 1.63855e-7; = p1919*p3479
- p4255: 1.80241e-6; = p1906*p3479
- p0088: 38.042
- p2078: 0.117
- p1630: 0
- p1663: 0
- p2786: 0; = p2395*(p1019+p1021)
- p1631: 0
- p3214: 0.376406; = p1222*40.078/100.0869
- p2949: 2.88202e-5; = p2363*(p1020+p1022)
- p2913: 2.47593e-5; = p2327*(p1020+p1022)
- p1167: 0.5
- p2560: 0.00262072; = p2364*p1014
- p1014: 0.72251; = IF(p1012=0;p0705/100;0)
- p3092: 5.46008e-5; = p2311*p1132
- p3289: 0.05
- p1300: 0.499876; = IF(p1297=p1265;0;IF(p1297+p1298>p1265;p1265-p1297;p1298))
- p1929: 0
- p2248: 0.00277628; = p2222*p2193
- p2528: 0.000942429; = p2332*p1014
- p1587: 0
- p1729: 0
- p0821: 3.91667
- p2439: 0.000364369; = p2243*p1014
- p2425: 0; = p2235*p2215
- p1659: 0
- p2473: 0.000611421; = p2277*p1014
- p1980: 3521.6
- p0385: 0.5
- p2677: 0.000159462; = p2286*(p1019+p1021)
- p3661: 6.1639e-5; = p1930*p3476
- p1829: 0
- p1881: 0
- p2816: 0; = p2425*(p1078+p1080)
- p3254: 0; = p1252*(p1287*(1-p3247)+p1290*(1-p3248)+p1291*(1-p3249)+p1292*(1-p3250))
- p0179: 35.497
- p1809: 0
- p3040: 7.86226e-5; = p2259*p1082
- p0960: 0; = if(and(p0683>0;or(p0807=480;p0807=32;p0807=1;and(p0807=60;p0901<0.03)));p0936;0)
- p4946: 5.24984e-8; = p1773*p3483
- p1646: 0.472875
- p3463: 0; = p3368*p1241
- p0263: 16.891
- p0510: 0; = SQRT(2)*(IF((2*p0378-1)<0;-1;IF((2*p0378-1)>0;1;0))*SQRT(SQRT((2/(pi()*0.140012289)+LN(1-(2*p0378-1)^2)/2)^2-LN(1-(2*p0378-1)^2)/0.140012289)-(2/(pi()*0.140012289)+LN(1-(2*p0378-1)^2)/2)))
- p2600: 0; = p2404*p1014
- p4043: 5.09243e-6; = p1900*p3478
- p0030: 380.052
- p0913: 0.0016675
- p0078: 455.082
- p2080: 0.025
- p3315: 0.00443516; = if(and(p1232=0;p3253<>0);p3264*p3289;0)
- p0868: 0.0705824; = IF(p0858+p0864+p0865+p0866+p0867=1;0;IF(p0858+p0864+p0865+p0866+p0867+p0863>1;1-(p0858+p0864+p0865+p0866+p0867);p0863))
- p3070: 8.40253e-8; = p2289*p1023
- p0383: 0.5
- p5132: 7.03286e-5; = p1963*p3483
- p3050: 1.58911e-5; = p2269*p1082
- p2241: 0.00027391; = p2222*p2186
- p1657: 0
- p0013: 46.025
- p1128: 0.21202; = if(p1121=0;IF(p1123=1;0;IF(p1123+p1124>1;1-p1123;p1124));0)
- p5066: 2.64067e-5; = p1893*p3483
- p3394: 0.00132856; = p3375*p1234
- p2669: 1.97748e-5; = p2278*(p1019+p1021)
- p1558: 0
- p2817: 0; = p2426*(p1078+p1080)
- p2609: 0; = p2413*p1014
- p0002: 0.453592
- p1147: 0.113222
- p2961: 9.98152e-5; = p2375*(p1079+p1081)
- p0418: 0; = SQRT(2)*(IF((2*p0286-1)<0;-1;IF((2*p0286-1)>0;1;0))*SQRT(SQRT((2/(pi()*0.140012289)+LN(1-(2*p0286-1)^2)/2)^2-LN(1-(2*p0286-1)^2)/0.140012289)-(2/(pi()*0.140012289)+LN(1-(2*p0286-1)^2)/2)))
- p2877: 2.436e-7; = p2291*(p1020+p1022)
- p2563: 0.0294389; = p2367*p1014
- p1610: 0.889688
- p0813: 1.56522; = if(p0807=480;1.56521739130435;0)
- p2901: 0.000112291; = p2315*(p1020+p1022)
- p0575: 0; = IF(p0311<0.5;-SQRT(p0007*EXP(p0443^2*p0008)-p0007);SQRT(p0007*EXP(p0443^2*p0008)-p0007))
- p2328: 0.00380632; = p2224*p2196
- p1745: 0
- p2447: 1.16759e-6; = p2251*p1014
- p3563: 4.96625e-5; = p1832*p3476
- p1183: 0.00058608; = p0801*p0001/(p0818*p0002)
- p1141: 0; = if(p1121=0;p1135*p0001/(p0818*p0002);0)
- p1337: 3.45251e-5; = p1336*p0001/(p0818*p0002)
- p1963: 0.0019341; = p1963a+p1963b+p1963c+p1963d+p1963e+p1963f+p1963g+p1963h+p1963i+p1963j+p1963k
- p1246: 137.287; = if(p1232>0;0;p1241*(p0725/100)*p0723*1000)
- p3211: 0; = p2430*p1132
- p1855: 0
- p2324: 4.18711e-5; = p2224*p2191
- p3333: 1.95594e7; = if(and(p1232=0;p3255<>0);p3255-(p3328+p3329+p3330+p3331+p3332);0)
- p1816: 0
- p4387: 6.47859e-6; = p1832*p3480
- p0080: 98.522
- p0400: 0.5
- p0900: 2.42845; = p0899/p0818
- p2932: 0; = p2346*(p1079+p1081)
- p2325: 0.000338848; = p2224*p2192
- p3004: 0; = p2418*(p1079+p1081)
- p2937: 0; = p2351*(p1129+p1131)
- p1811: 0
- p1722: 0
- p2903: 2.70191e-6; = p2317*(p1020+p1022)
- p3193: 0; = p2412*p1023
- p3210: 0; = p2429*p1132
- p1248: 4.3611e-5; = if(p1232>0;0;p1243*p0001/(p0818*p0002))
- p1789: 0
- p1665: 0
- p2814: 0; = p2423*(p1078+p1080)
- p0024: 97.283
- p1069: 0.000101015; = IF(p1012=0;p1055/(p1062*p0818);0)
- p4173: 2.13012e-6; = p1824*p3479
- p1170: 345.545; = p1169*p0801
- p2309: 2.89057e-5; = p2227*p2216
- p4094: 3.09789e-5; = p1951*p3478
- p2167: 0.585678; = p2166*(p0898)
- p2872: 4.80974e-5; = p2286*(p1020+p1022)
- p3307: 0; = if(and(p1232=0;p3252<>0);p3252*(p3258-p3302)/p3305;0)
- p2939: 0; = p2353*(p1129+p1131)
- p3219: 0.0259549; = p3215*p1228
- p3331: 2.06889e6; = if(and(p1232=0;p3255<>0);p3255*(p3268-p3326)/p3327;0)
- p0925: 0; = IF(p0918+p0923+p0924=1;0;IF(p0918+p0923+p0924+p0921>1;1-(p0918+p0923+p0924);p0921))
- p3476: 0.110605; = if(p1328+p1330+p1332+p1334+p1336+p1338+p1340+p1342+p1344=0;0;p1328/(p1328+p1330+p1332+p1334+p1336+p1338+p1340+p1342+p1344))
- p1577: 0
- p4117: 2.03181e-5; = p1768*p3479
- p1179: 0.5
- p3224: 0.501945; = IF(p3216=0;0;1-p3221-p3222-p3223)
- p1962: 0.000843394; = p1960*1000/p0818
- p0955: 0; = if(and(p0683>0;or(p0807=56;p0807=100;and(p0807=60;p0901>0.06)));p0937;0)
- p2752: 0.000331951; = p2361*(p1019+p1021)
- p0691: 28.308; = p0031*(1+p0559*p0163/100)
- p1675: 0.655218
- p1891: 0
- p3216: 0.06; = IF(OR(p1226=0;p1228=0);0;1-p3213-p3214-p3215)
- p1275: 0; = p1271*p1252/p0818
- p0322: 0.5
- p1327: 0.119607; = if(p1318=0;if(p1327a=0;1;if(p1327a<0;0;p1327a));0)
- p1255: 0; = if(p1232>0;0;p0737/100)
- p1319: 0.451571; = IF(((p0745*1000*p0746/100)+(p0754*1000*p0755/100))/p0801<0;0;((p0745*1000*p0746/100)+(p0754*1000*p0755/100))/p0801)
- p1676: 0
- p3384: 0.00542245; = p3365*p1234
- p1963b: 8.88478e-6; = p1569*p1773+p1570*p1774+p1571*p1775+p1572*p1776+p1573*p1777+p1574*p1778+p1575*p1779+p1576*p1780+p1577*p1781+p1578*p1782+p1579*p1783+p1580*p1784+p1581*p1785+p1582*p1786+p1583*p1787+p1584*p1788+p1585*p1789+p1586*p1790+p1587*p1791
- p3320: 4.15572e6; = if(and(p1232=0;p3253<>0);p3253*(p3264-p3315)/p3316;0)
- p2889: 1.41185e-5; = p2303*(p1079+p1081)
- p3244: 0.8213; = p0791/100
- p0776: 0
- p0408: 0; = SQRT(2)*(IF((2*p0276-1)<0;-1;IF((2*p0276-1)>0;1;0))*SQRT(SQRT((2/(pi()*0.140012289)+LN(1-(2*p0276-1)^2)/2)^2-LN(1-(2*p0276-1)^2)/0.140012289)-(2/(pi()*0.140012289)+LN(1-(2*p0276-1)^2)/2)))
- p2173: 0.247331; = p0895*p0898/p0818
- p2360: 0.0034929; = p2225*p2188
- p3478: 0.293935; = if(p1328+p1330+p1332+p1334+p1336+p1338+p1340+p1342+p1344=0;0;p1332/(p1328+p1330+p1332+p1334+p1336+p1338+p1340+p1342+p1344))
- p1921: 0
- p2965: 0.0001028; = p2379*(p1079+p1081)
- p0517: 0; = SQRT(2)*(IF((2*p0385-1)<0;-1;IF((2*p0385-1)>0;1;0))*SQRT(SQRT((2/(pi()*0.140012289)+LN(1-(2*p0385-1)^2)/2)^2-LN(1-(2*p0385-1)^2)/0.140012289)-(2/(pi()*0.140012289)+LN(1-(2*p0385-1)^2)/2)))
- p0886: 6.58932e6; = p0686*1000*p0687*p0689/100
- p0669: 0.568; = p0009*(1+p0537*p0141/100)
- p2823: 0.000173551; = p2237*(p1020+p1022)
- p2114: 0.832356
- p0484: 0; = SQRT(2)*(IF((2*p0352-1)<0;-1;IF((2*p0352-1)>0;1;0))*SQRT(SQRT((2/(pi()*0.140012289)+LN(1-(2*p0352-1)^2)/2)^2-LN(1-(2*p0352-1)^2)/0.140012289)-(2/(pi()*0.140012289)+LN(1-(2*p0352-1)^2)/2)))
- p1219: 0; = if(p1218=0;0;SQRT(2)*(IF((2*p1218-1)<0;-1;IF((2*p1218-1)>0;1;0))*SQRT(SQRT((2/(pi()*0.140012289)+LN(1-(2*p1218-1)^2)/2)^2-LN(1-(2*p1218-1)^2)/0.140012289)-(2/(pi()*0.140012289)+LN(1-(2*p1218-1)^2)/2))))
- p1159: 0.5
- p2022: 0.0028217; = p2018*p2015/p0818-p2021
- p2110: 0.856281
- p3348: 0.00443516; = if(and(p1232=0;p3256<>0);p3276*p3289;0)
- p3157: 2.7663e-5; = p2376*p1082
- p2455: 0.00141966; = p2259*p1073
- p1100: 0.484786
- p2218: 0.00463849; = p1150/p0818
- p3483: 0.0363625; = if(p1328+p1330+p1332+p1334+p1336+p1338+p1340+p1342+p1344=0;0;p1342/(p1328+p1330+p1332+p1334+p1336+p1338+p1340+p1342+p1344))
- p1016: 0.01048; = IF(p1012=0;p0707/100;0)
- p2649: 0.00066165; = p2258*(p1078+p1080)
- p0801: 455000
- p1598: 0
- p1720: 0
- p3434: 0; = p3377*p1239
- p4110: 3.27711e-7; = p1761*p3479
- p3060: 3.1951e-9; = p2279*p1023
- p2281: 5.63065e-5; = p2223*p2187
- p2960: 0.000635094; = p2374*(p1020+p1022)
- p2795: 0; = p2404*(p1019+p1021)
- p4291: 3.93253e-6; = p1942*p3479
- p2834: 0.000178515; = p2248*(p1020+p1022)
- p2014: 1.3199e7; = p0833*p2011*p2013
- p0811: 0.25; = if(p0807=480;1-p0810;0)
- p3158: 8.95798e-6; = p2377*p1082
- p2482: 0.000540448; = p2286*p1014
- p1762: 0
- p0146: 0
- p3056: 4.73577e-5; = p2275*p1132
- p2722: 8.04367e-7; = p2331*(p1019+p1021)
- p2520: 3.02523e-5; = p2324*p1014
- p2404: 0; = p2234*p2193
- p0829: 0.0832195; = if(p0807=480;p0814*(1-p0824);0)
- p3076: 1.77671e-9; = p2295*p1023
- p3781: 5.59819e-7; = p1844*p3477
- p2667: 0.000821834; = p2276*(p1019+p1021)
- p1963j: 0.000402712; = p1725*p1929+p1726*p1930+p1727*p1931+p1728*p1932+p1729*p1933+p1730*p1934+p1731*p1935+p1732*p1936+p1733*p1937+p1734*p1938+p1735*p1939+p1736*p1940+p1737*p1941+p1738*p1942+p1739*p1943+p1740*p1944+p1741*p1945+p1742*p1946+p1743*p1947
- p1261: 0; = if(p1232>0;0;p0732/100)
- p4098: 4.92268e-5; = p1955*p3478
- p0555: 0; = IF(p0291<0.5;-SQRT(p0007*EXP(p0423^2*p0008)-p0007);SQRT(p0007*EXP(p0423^2*p0008)-p0007))
- p1951: 0.000105394; = p1543*1000/p0818
- p2945: 1.75564e-5; = p2359*(p1020+p1022)
- p3116: 9.22688e-9; = p2335*p1023
- p1150: 3.21281e6; = if(p1121=0;p1149*p1146*p1145;0)
- p1125: 0; = if(p1121=0;p0719/100;0)
- p2224: 0.0646927; = if(p0765*p0769+p0766*p0770+p0767*p0771+p0768*p0772=0;0;p0771*p0767/(p0765*p0769+p0766*p0770+p0767*p0771+p0768*p0772))
- p4867: 0; = p1900*p3482
- p0401: 0.5
- p2364: 0.00362725; = p2225*p2192
- p2685: 0.000263168; = p2294*(p1019+p1021)
- p1650: 0
- p3477: 0.193877; = if(p1328+p1330+p1332+p1334+p1336+p1338+p1340+p1342+p1344=0;0;p1330/(p1328+p1330+p1332+p1334+p1336+p1338+p1340+p1342+p1344))
- p1153: 0.365265
- p0954: 0; = if(and(p0683>0;or(p0807=56;p0807=100;and(p0807=60;p0901>0.06)));p0936;0)
- p0734: 0
- p2547: 0; = p2351*p1123
- p3357: 1.01026e7; = if(p1232=0;p3307+p3318+p3329+p3340+p3351;0)
- p4421: 1.66652e-7; = p1866*p3480
- p0214: 7.654
- p2588: 0.000271555; = p2392*p1123
- p1755: 0
- p2980: 0; = p2394*(p1020+p1022)
- p0968: 0
- p0363: 0.5
- p3878: 2.7991e-7; = p1941*p3477
- p2111: 0.856281
- p0945: 0; = if(and(p0683=0;p0951=0);p0939;0)
- p2841: 5.55745e-5; = p2255*(p1020+p1022)
- p2122: 0.341195
- p1107: 139624; = IF(p1071=0;p1105*p1101*p1095;0)
- p3046: 0.00022892; = p2265*p1082
- p0959: 0; = if(and(p0683>0;or(p0807=480;p0807=32;p0807=1;and(p0807=60;p0901<0.03)));p0935;0)
- p1552: 0
- p2012: 0.0165939
- p4909: 0; = p1942*p3482
- p0559: 0; = IF(p0295<0.5;-SQRT(p0007*EXP(p0427^2*p0008)-p0007);SQRT(p0007*EXP(p0427^2*p0008)-p0007))
- p0198: 27.823
- p3312: 0.1394; = if(and(p1232=0;p3253<>0);p3261*p3277*(p3298*p3290+(1-p3298)*p3294);0)
- p2825: 4.17594e-6; = p2239*(p1020+p1022)
- p1573: 0
- p0049: 5.382
- p5039: 4.19987e-7; = p1866*p3483
- p0021: 23.756
- p4181: 5.0959e-5; = p1832*p3479
- p0001: 0.404686
- p2057: 3.28794
- p0026: 444.866
- p3279: 0.37
- p2805: 0; = p2414*(p1078+p1080)
- p2008: 0.164847; = ((p1982*p1985+p1988*p1991+p1994*p1997+p2002*p2005)/p0818)*p0005*p0002/1000
- p1997: 1.07092e7; = (if(p1152=0;0;p1150/p1152)+if(p1153=0;0;p1151/p1153))*(1+p1157)
- p0601: 0; = IF(p0337<0.5;-SQRT(p0007*EXP(p0469^2*p0008)-p0007);SQRT(p0007*EXP(p0469^2*p0008)-p0007))
- p2871: 5.94334e-6; = p2285*(p1020+p1022)
- p1946: 0
- p1177: 0.00058608; = p0801*p0001/(p0818*p0002)
- p0771: 12.514; = p0111*(1+p0639*p0243/100)
- p3597: 1.27749e-6; = p1866*p3476
- p1143: 0; = if(p1121=0;p1137*p0001/(p0818*p0002);0)
- p1235: 0.4883; = if(p1232>0;0;p0727/100)
- p0817: 0
- p2035: 5.43251e-5; = p2015*p2029*(1-p2031)/(p0818*1000)
- p0480: 0; = SQRT(2)*(IF((2*p0348-1)<0;-1;IF((2*p0348-1)>0;1;0))*SQRT(SQRT((2/(pi()*0.140012289)+LN(1-(2*p0348-1)^2)/2)^2-LN(1-(2*p0348-1)^2)/0.140012289)-(2/(pi()*0.140012289)+LN(1-(2*p0348-1)^2)/2)))
- p0980: 0; = IF(p0977=0;0;p0977*p0001/(p0818*p0002))
- p1436: 2
- p1947: 0
- p2833: 3.36743e-5; = p2247*(p1020+p1022)
- p0361: 0.5
- p2955: 1.18126e-6; = p2369*(p1020+p1022)
- p3027: 6.47139e-10; = p2246*p1023
- p4811: 0; = p1844*p3482
- p0432: 0; = SQRT(2)*(IF((2*p0300-1)<0;-1;IF((2*p0300-1)>0;1;0))*SQRT(SQRT((2/(pi()*0.140012289)+LN(1-(2*p0300-1)^2)/2)^2-LN(1-(2*p0300-1)^2)/0.140012289)-(2/(pi()*0.140012289)+LN(1-(2*p0300-1)^2)/2)))
- p0430: 0; = SQRT(2)*(IF((2*p0298-1)<0;-1;IF((2*p0298-1)>0;1;0))*SQRT(SQRT((2/(pi()*0.140012289)+LN(1-(2*p0298-1)^2)/2)^2-LN(1-(2*p0298-1)^2)/0.140012289)-(2/(pi()*0.140012289)+LN(1-(2*p0298-1)^2)/2)))
- p3090: 9.65739e-7; = p2309*p1082
- p0180: 32.308
- p2065: 0.0758824
- p2725: 1.71576e-5; = p2334*(p1019+p1021)
- p0836: 18.9395; = p0831*p0835*p0801/(1-p0831)
- p1270: 0; = IF(p1267=p1259;0;IF(p1267+p1268>p1259;p1259-p1267;p1268))
- p2001: 400
- p1414: 4
- p2610: 0; = p2414*p1073
- p3165: 3.89224e-7; = p2384*p1082
- p3300: 0; = if(p1293+p1294+p1295+p1296=0;0;p1293/(p1293+p1294+p1295+p1296))
- p2362: 0.00178235; = p2225*p2190
- p2529: 0.000404041; = p2333*p1014
- p2532: 0; = p2336*p1073
- p2208: 0.00428583; = p1110/p0818
- p1416: 13
- p2576: 0.000257218; = p2380*p1073
- p1207: 269.721; = if(p1193>0;0;(p1194*p1050/p1057+p1195*p1051/p1058+p1196*p1052/p1059+p1197*p1053/p1060+p1198*p1054/p1061+p1199*p1055/p1062+p1200*p1056/p1063)/(p0702*1000)+(p1201*p1109/p1114+p1202*p1110/p1115)/(p0702*1000)+p1203*p1170/p0801+p1204*p1176/p0801)
- p2377: 0.000268123; = p2229*p2206
- p3159: 7.43775e-5; = p2378*p1082
- p3545: 4.63091e-6; = p1814*p3476
- p0416: 0; = SQRT(2)*(IF((2*p0284-1)<0;-1;IF((2*p0284-1)>0;1;0))*SQRT(SQRT((2/(pi()*0.140012289)+LN(1-(2*p0284-1)^2)/2)^2-LN(1-(2*p0284-1)^2)/0.140012289)-(2/(pi()*0.140012289)+LN(1-(2*p0284-1)^2)/2)))
- p1634: 0
- p2242: 3.94218e-5; = p2222*p2187
- p0919: 0; = p0678*1000/p0801
- p2259: 0.00235327; = p2226*p2205
- p1943: 0
- p2451: 0.000624466; = p2255*p1014
- p2917: 2.42616e-7; = p2331*(p1020+p1022)
- p0574: 0; = IF(p0310<0.5;-SQRT(p0007*EXP(p0442^2*p0008)-p0007);SQRT(p0007*EXP(p0442^2*p0008)-p0007))
- p1890: 0
- p2227: 0.154744; = if(p0774*p0778+p0775*p0779+p0776*p0780+p0777*p0781=0;0;p0779*p0775/(p0774*p0778+p0775*p0779+p0776*p0780+p0777*p0781))
- p2211: 0.0109584; = p1120-p2209-p2208-p2210
- p0294: 0.5
- p2738: 0; = p2347*(p1078+p1080)
- p2282: 0.00072031; = p2223*p2188
- p5092: 5.24984e-8; = p1919*p3483
- p2252: 2.65243e-6; = p2222*p2198
- p0112: 109.707
- p3453: 0; = p3377*p1240
- p3686: 1.85236e-5; = p1955*p3476
- p3202: 0; = p2421*p1082
- p2928: 0; = p2342*(p1079+p1081)
- p3049: 4.21104e-6; = p2268*p1082
- p2789: 0; = p2398*(p1019+p1021)
- p5298: 4.22958e-8; = p1919*p3484
- p2123: 0.263965
- p2301: 0.000663208; = p2227*p2208
- p2782: 4.76852e-5; = p2391*(p1128+p1130)
- p4153: 1.63855e-7; = p1804*p3479
- p0918: 0.969196; = p0680*1000/p0801
- p0784: 26.911; = p0124*(1+p0652*p0256/100)
- p2902: 2.46492e-5; = p2316*(p1020+p1022)
- p2128: 1.36514e-5; = p2015*p2056*p2090/(p0818*1000)
- p0795: 127.858; = p0135*(1+p0663*p0267/100)
- p1303: 0; = p1297*p1252/p0818
- p4070: 2.24916e-5; = p1927*p3478
- p1985: 1.604e8; = (if(p1057=0;0;p1050/p1057)+if(p1058=0;0;p1051/p1058)+if(p1059=0;0;p1052/p1059)+if(p1060=0;0;p1053/p1060)+if(p1061=0;0;p1054/p1061)+if(p1062=0;0;p1055/p1062)+if(p1063=0;0;p1056/p1063))*(1+p1157)
- p1727: 0
- p2742: 0; = p2351*(p1128+p1130)
- p2839: 3.74975e-7; = p2253*(p1020+p1022)
- p2327: 0.000385059; = p2224*p2195
- p2223: 0.14281; = if(p0765*p0769+p0766*p0770+p0767*p0771+p0768*p0772=0;0;p0770*p0766/(p0765*p0769+p0766*p0770+p0767*p0771+p0768*p0772))
- p1322: 0.463361; = IF(((p0745*1000*p0749/100)+(p0754*1000*p0758/100))/p0801<0;0;((p0745*1000*p0749/100)+(p0754*1000*p0758/100))/p0801)
- p1595: 0
- p1154: 0.0111751; = if(p1152*p0818=0;0;p1150/(p1152*p0818))
- p1420: 2
- p2687: 0.000434217; = p2296*(p1019+p1021)
- p1986: 4200
- p2541: 0; = p2345*p1073
- p0316: 0.5
- p2086: 0.0617647
- p2410: 0; = p2234*p2200
- p2138: 1.26765e-6; = p2015*p2066*p2100/(p0818*1000)
- p2727: 0; = p2336*(p1078+p1080)
- p4873: 0; = p1906*p3482
- p0679: 0
- p1032: 5.89253e-6; = IF(p1012=0;p1026*p0001/(p0818*p0002);0)
- p0242: 21.846
- p1761: 2.8875e-6; = p1353*1000/p0818
- p2197: 1.61624e-5; = p1055/p0818
- p1824: 1.87688e-5; = p1416*1000/p0818
- p0386: 0.5
- p4585: 3.90397e-6; = p1824*p3481
- p0796: 95.906; = p0136*(1+p0664*p0268/100)
- p2927: 0; = p2341*(p1079+p1081)
- p2526: 1.23995e-6; = p2330*p1014
- p0254: 23.727
- p0806: 1.443e6; = p0804+p0805
- p3189: 0; = p2408*p1023
- p1852: 0
- p2964: 0.000242723; = p2378*(p1079+p1081)
- p1227: 0.00058608; = IF(p1221=0;0;p1226*p0001/(p0818*p0002))
- p0004: 0.0254
- p1872: 0
- p3182: 0; = p2401*p1023
- p3698: 5.59819e-7; = p1761*p3477
- p1975: 0.00058608; = p1970*p0001/(p0818*p0002)
- p2293: 0.00287945; = p2223*p2200
- p0461: 0; = SQRT(2)*(IF((2*p0329-1)<0;-1;IF((2*p0329-1)>0;1;0))*SQRT(SQRT((2/(pi()*0.140012289)+LN(1-(2*p0329-1)^2)/2)^2-LN(1-(2*p0329-1)^2)/0.140012289)-(2/(pi()*0.140012289)+LN(1-(2*p0329-1)^2)/2)))
- p2155: 2.01731e-6; = p2015*p2084*p2117/(p0818*1000)
- p1564: 0.822
- p1557: 0.872068
- p0997: 0.0931786; = if(p0888=0;0;if((p0695*p0694*1000*p0696/100)/p0888>1;1;(p0695*p0694*1000*p0696/100)/p0888))
- p0170: 40.571
- p1001: 0.0897414; = if(p0978>0;0;if(and(p0687=0;p0691=0;p0695=0;p0699=0);0;IF(p0996+p0999+p1000=1;0;1-(p0996+p0999+p1000))))
- p1690: 0
- p2147: 9.7703e-7; = p2015*p2075*p2109/(p0818*1000)
- p1871: 0
- p2280: 0.000391228; = p2223*p2186
- p0697: 54.394; = p0037*(1+p0565*p0169/100)
- p3271: 0.0195489
- p0273: 0.5
- p1898: 0
- p2388: 0.000368306; = p2229*p2217
- p3083: 1.002e-5; = p2302*p1082
- p0556: 0; = IF(p0292<0.5;-SQRT(p0007*EXP(p0424^2*p0008)-p0007);SQRT(p0007*EXP(p0424^2*p0008)-p0007))
- p3044: 4.04869e-5; = p2263*p1082
- p3457: 9.65131e-5; = p3362*p1241
- p3118: 0; = p2337*p1082
- p0698: 22.751; = p0038*(1+p0566*p0170/100)
- p3010: 0; = p2424*(p1079+p1081)
- p1969: 0; = p0803
- p3003: 0; = p2417*(p1079+p1081)
- p2428: 0; = p2236*p2218
- p2581: 2.67532e-5; = p2385*p1073
- p3391: 0; = p3372*p1234
- p0537: 0; = IF(p0273<0.5;-SQRT(p0007*EXP(p0405^2*p0008)-p0007);SQRT(p0007*EXP(p0405^2*p0008)-p0007))
- p1849: 0
- p0858: 0.0171341; = p0670*1000/p0856
- p0785: 0
- p1668: 0
- p0311: 0.5
- p2298: 0.000582404; = p2227*p2205
- p2768: 6.81809e-5; = p2377*(p1078+p1080)
- p3262: 0.0787162
- p0369: 0.5
- p2401: 0; = p2234*p2190
- p0286: 0.5
- p0023: 15.112
- p3454: 0; = p3378*p1240
- p1602: 0
- p2491: 0.000128369; = p2295*p1014
- p2069: 0.190588
- p0255: 20.806
- p2346: 0; = p2228*p2214
- p0781: 30.71; = p0121*(1+p0649*p0253/100)
- p1286: 0.00968455; = p1282*p1252/p0818
- p2991: 0; = p2405*(p1020+p1022)
- p2406: 0; = p2234*p2196
- p2888: 3.26992e-5; = p2302*(p1079+p1081)
- p1061: 0.3
- p4478: 6.24945e-8; = p1923*p3480
- p3424: 0; = p3367*p1239
- p2253: 5.83164e-6; = p2222*p2199
- p1996: 30
- p2395: 0; = p2234*p2184
- p2674: 6.84553e-5; = p2283*(p1019+p1021)
- p3415: 0.00113025; = p3377*p1238
- p0548: 0; = IF(p0284<0.5;-SQRT(p0007*EXP(p0416^2*p0008)-p0007);SQRT(p0007*EXP(p0416^2*p0008)-p0007))
- p2263: 0.00121182; = p2226*p2209
- p3053: 0.000213446; = p2272*p1132
- p1904: 0
- p2750: 5.82066e-5; = p2359*(p1019+p1021)
- p2976: 0; = p2390*(p1129+p1131)
- p3380: 1.0731; = p3251/p0818
- p2829: 3.24271e-5; = p2243*(p1020+p1022)
- p1611: 0
- p3381: 0.0248458; = p3362*p1234
- p0639: 0; = IF(p0375<0.5;-SQRT(p0007*EXP(p0507^2*p0008)-p0007);SQRT(p0007*EXP(p0507^2*p0008)-p0007))
- p0342: 0.5
- p0577: 0; = IF(p0313<0.5;-SQRT(p0007*EXP(p0445^2*p0008)-p0007);SQRT(p0007*EXP(p0445^2*p0008)-p0007))
- p1685: 0
- p3071: 2.30817e-11; = p2290*p1023
- p2256: 0.000124392; = p2222*p2202
- p0052: 25.429
- p2696: 1.99276e-7; = p2305*(p1078+p1080)
- p2079: 0.02
- p0279: 0.5
- p3447: 0; = p3371*p1240
- p2318: 0.000144737; = p2224*p2185
- p2151: 2.73293e-7; = p2015*p2079*p2113/(p0818*1000)
- p0156: 1.585
- p0022: 455.082
- p1269: 0
- p2721: 3.65854e-7; = p2330*(p1019+p1021)
- p2490: 0.00089193; = p2294*p1014
- p1302: 0.0131541; = IF(p1297+p1300+p1301=p1262;0;p1262-(p1297+p1300+p1301))
- p0094: 900.047
- p3069: 8.50026e-9; = p2288*p1023
- p0309: 0.5
- p4947: 1.04997e-7; = p1774*p3483
- p1588: 0
- p2824: 3.80965e-5; = p2238*(p1020+p1022)
- p4525: 1.50153e-6; = p1764*p3481
- p1873: 0
- p3038: 1.42606e-8; = p2257*p1023
- p2194: 0.214362
- p1732: 0
- p0128: 22.38
- p0370: 0.5
- p1570: 0.845
- p0306: 0.5
- p4995: 2.09994e-7; = p1822*p3483
- p1278: 0.288391
- p1005: 513724; = p1001*p0888
- p2957: 0.000897817; = p2371*(p1020+p1022)
- p0635: 0; = IF(p0371<0.5;-SQRT(p0007*EXP(p0503^2*p0008)-p0007);SQRT(p0007*EXP(p0503^2*p0008)-p0007))
- p1228: 0.0575762; = IF(p1221=0;0;p0801*p1212*2000/(p1222+p1221*p1225)/p0818)
- p0908: 0.0022
- p1547: 116
- p3896: 0.000374976; = p1963*p3477
- p3336: 0; = IF(or(p3254=0;p1232>0);0;p3271*p3289)
- p2527: 2.72616e-6; = p2331*p1014
- p2416: 0; = p2235*p2206
- p3136: 4.10358e-8; = p2355*p1023
- p0530: 0; = SQRT(2)*(IF((2*p0398-1)<0;-1;IF((2*p0398-1)>0;1;0))*SQRT(SQRT((2/(pi()*0.140012289)+LN(1-(2*p0398-1)^2)/2)^2-LN(1-(2*p0398-1)^2)/0.140012289)-(2/(pi()*0.140012289)+LN(1-(2*p0398-1)^2)/2)))
- p3362: 0.048744; = if(p1232=0;p3244*p3356/p0818;0)
- p3109: 3.80632e-8; = p2328*p1023
- p1949: 0
- p2912: 0.000115502; = p2326*(p1020+p1022)
- p2152: 3.41616e-7; = p2015*p2080*p2114/(p0818*1000)
- p2144: 1.88369e-6; = p2015*p2072*p2106/(p0818*1000)
- p3285: 0.275
- p1186: 5.35265e-8; = p1182*p1185/p0818
- p0927: 0.0308044; = IF(p0918+p0923+p0924+p0925+p0926=1;0;1-(p0918+p0923+p0924+p0925+p0926))
- p2496: 0.000944668; = p2300*p1073
- p1201: 0.65
- p0287: 0.5
- p0272: 23.727
- p1103: 0.47071; = IF(p1071=0;IF(p1096+p1101+p1102=1;0;IF(p1096+p1101+p1102+p1099>1;1-(p1096+p1101+p1102);p1099));0)
- p2891: 8.54419e-8; = p2305*(p1079+p1081)
- p1555: 0
- p0876: 46025; = p0866*p0856
- p1343: 8.70084e-5; = p1342*p0001/(p0818*p0002)
- p0032: 43.476
- p5143: 2.11479e-7; = p1764*p3484
- p2535: 0; = p2339*p1073
- p2827: 1.76124e-5; = p2241*(p1020+p1022)
- p0712: 25.429; = p0052*(1+p0580*p0184/100)
- p2279: 0.00031951; = p2223*p2185
- p1053: 1.55743e6; = IF(p1012=0;p1046*p1036;0)
- p1317: 0
- p2869: 2.06477e-5; = p2283*(p1020+p1022)
- p5100: 2.78242e-6; = p1927*p3483
- p2873: 0.000254974; = p2287*(p1020+p1022)
- p3274: 0.0768939
- p0866: 0.101154; = IF(p0858+p0864+p0865=1;0;IF(p0858+p0864+p0865+p0861>1;1-(p0858+p0864+p0865);p0861))
- p2452: 8.98747e-5; = p2256*p1014
- p1740: 0
- p0694: 42.064; = p0034*(1+p0562*p0166/100)
- p0934: 0.000568026; = p0928*p0001/(p0818*p0002)
- p0533: 0; = SQRT(2)*(IF((2*p0401-1)<0;-1;IF((2*p0401-1)>0;1;0))*SQRT(SQRT((2/(pi()*0.140012289)+LN(1-(2*p0401-1)^2)/2)^2-LN(1-(2*p0401-1)^2)/0.140012289)-(2/(pi()*0.140012289)+LN(1-(2*p0401-1)^2)/2)))
- p0654: 0; = IF(p0390<0.5;-SQRT(p0007*EXP(p0522^2*p0008)-p0007);SQRT(p0007*EXP(p0522^2*p0008)-p0007))
- p2611: 0; = p2415*p1073
- p2215: 0.000760706; = p1117-p2214
- p4890: 0; = p1923*p3482
- p3397: 0.00733375; = p3378*p1234
- p1266: 0.19099; = if(p1232>0;0;IF(p1259+p1263+p1264+p1265=1;0;1-(p1259+p1263+p1264+p1265)))
- p1257: 0; = if(p1232>0;0;IF(p1253+p1256=1;0;IF(p1253+p1256+p1255>1;1-(p1253+p1256);p1255)))
- p3400: 0.0238017; = p3362*p1238
- p2109: 0.826583
- p0366: 0.5
- p4672: 1.80183e-5; = p1911*p3481
- p0234: 25.353
- p4513: 1.21691e-5; = p1962*p3480
- p0710: 39.134; = p0050*(1+p0578*p0182/100)
- p2450: 0.00145657; = p2254*p1014
- p0454: 0; = SQRT(2)*(IF((2*p0322-1)<0;-1;IF((2*p0322-1)>0;1;0))*SQRT(SQRT((2/(pi()*0.140012289)+LN(1-(2*p0322-1)^2)/2)^2-LN(1-(2*p0322-1)^2)/0.140012289)-(2/(pi()*0.140012289)+LN(1-(2*p0322-1)^2)/2)))
- p0612: 0; = IF(p0348<0.5;-SQRT(p0007*EXP(p0480^2*p0008)-p0007);SQRT(p0007*EXP(p0480^2*p0008)-p0007))
- p2724: 0.000119214; = p2333*(p1019+p1021)
- p0159: 4.504
- p2366: 0.00412191; = p2225*p2195
- p2843: 9.16957e-5; = p2257*(p1020+p1022)
- p1622: 0
- p1240: 0; = if(p1232>0;0;IF(p1234+p1238+p1239=1;0;IF(p1234+p1238+p1239+p1237>1;1-(p1234+p1238+p1239);p1237)))
- p1902: 0
- p1624: 0.752571
- p1305: 0; = p1301*p1252/p0818
- p0742: 82.453; = p0082*(1+p0610*p0214/100)
- p2773: 0.000613038; = p2382*(p1078+p1080)
- p4908: 0; = p1941*p3482
- p1553: 0
- p3374: 0.0106058; = if(p1232=0;p3246*p3356/p0818;0)
- p2870: 2.3634e-5; = p2284*(p1020+p1022)
- p2307: 3.11937e-5; = p2227*p2214
- p1626: 0
- p0046: 10.541
- p1572: 0
- p2154: 2.08151e-6; = p2015*p2082*p2116/(p0818*1000)
- p2590: 0; = p2394*p1014
- p5023: 3.67489e-7; = p1850*p3483
- p2881: 1.14242e-5; = p2295*(p1020+p1022)
- p0800: 19.599; = p0140*(1+p0668*p0272/100)
- p3077: 2.03685e-8; = p2296*p1023
- p1036: 5.58115e7; = IF(p1012=0;p0795*p0702*1000*p0796/100;0)
- p1046: 0.0279052; = IF(p1012=0;IF(p1037+p1044+p1045=1;0;IF(p1037+p1044+p1045+p1040>1;1-(p1037+p1044+p1045);p1040));0)
- p0834: 22
- p3879: 6.71783e-6; = p1942*p3477
- p2297: 0.000643951; = p2227*p2204
- p2495: 0.000113775; = p2299*p1073
- p0844: 0.516951
- p2075: 0.072
- p4329: 4.1663e-8; = p1774*p3480
- p1644: 0
- p1927: 7.65188e-5; = p1519*1000/p0818
- p2414: 0; = p2235*p2204
- p0898: 0.45335
- p1199: -0.29
- p3436: 0; = p3379*p1239
- p0640: 0; = IF(p0376<0.5;-SQRT(p0007*EXP(p0508^2*p0008)-p0007);SQRT(p0007*EXP(p0508^2*p0008)-p0007))
- p1719: 0.4576
- p2661: 2.97002e-5; = p2270*(p1078+p1080)
- p2779: 9.36564e-5; = p2388*(p1078+p1080)
- p1752: 0
- p0783: 55.378; = p0123*(1+p0651*p0255/100)
- p2879: 0.000185149; = p2293*(p1020+p1022)
- p1844: 2.8875e-6; = p1436*1000/p0818
- p1710: 0
- p3372: 0; = if(p1232=0;p3245*p3360/p0818;0)
- p1067: 0.0107073; = IF(p1012=0;p1053/(p1060*p0818);0)
- p3392: 0; = p3373*p1234
- p0711: 60.327; = p0051*(1+p0579*p0183/100)
- p3429: 0; = p3372*p1239
- p3103: 1.45464e-9; = p2322*p1023
- p3892: 3.24695e-5; = p1955*p3477
- p1015: 0.10541; = IF(p1012=0;p0706/100;0)
- p3031: 5.88285e-8; = p2250*p1023
- p4977: 5.24984e-8; = p1804*p3483
- p1126: 0; = if(p1121=0;p0720/100;0)
- p1913: 0
- p0531: 0; = SQRT(2)*(IF((2*p0399-1)<0;-1;IF((2*p0399-1)>0;1;0))*SQRT(SQRT((2/(pi()*0.140012289)+LN(1-(2*p0399-1)^2)/2)^2-LN(1-(2*p0399-1)^2)/0.140012289)-(2/(pi()*0.140012289)+LN(1-(2*p0399-1)^2)/2)))
- p4640: 3.60366e-6; = p1879*p3481
- p2914: 0.000244746; = p2328*(p1020+p1022)
- p1776: 0
- p2093: 0.260958
- p1708: 0
- p0641: 0; = IF(p0377<0.5;-SQRT(p0007*EXP(p0509^2*p0008)-p0007);SQRT(p0007*EXP(p0509^2*p0008)-p0007))
- p2519: 0.0001203; = p2323*p1014
- p1794: 0
- p1209: 13.2888; = p1206*p0818*p0822/p0801
- p4249: 1.96627e-6; = p1900*p3479
- p1026: 4574.64; = IF(p1012=0;p1020*(p0704/100)*p0703*1000;0)
- p2974: 4.01564e-5; = p2388*(p1079+p1081)
- p1950: 0
- p2759: 2.38605e-6; = p2368*(p1019+p1021)
- p0178: 56.695
- p1562: 0
- p2367: 0.0407452; = p2225*p2196
- p2441: 0.000185929; = p2245*p1014
- p2941: 0.00026386; = p2355*(p1020+p1022)
- p3438: 0; = p3362*p1240
- p5006: 1.57495e-7; = p1833*p3483
- p1896: 0
- p2036: 8.02517e-5; = p2015*p2030*(1-p2032)/(p0818*1000)
- p0964: 0; = 56/90000
- p2311: 0.000586035; = p2231*p2218
- p0739: 5.554; = p0079*(1+p0607*p0211/100)
- p2958: 0.000384915; = p2372*(p1020+p1022)
- p2320: 2.55067e-5; = p2224*p2187
- p5073: 6.29981e-7; = p1900*p3483
- p1259: 0; = if(p1232>0;0;p0730/100)
- p1048: 0.000200582; = IF(p1012=0;IF(p1037+p1044+p1045+p1046+p1047=1;0;IF(p1037+p1044+p1045+p1046+p1047+p1042>1;1-(p1037+p1044+p1045+p1046+p1047);p1042));0)
- p0584: 0; = IF(p0320<0.5;-SQRT(p0007*EXP(p0452^2*p0008)-p0007);SQRT(p0007*EXP(p0452^2*p0008)-p0007))
- p3710: 2.7991e-7; = p1773*p3477
- p5152: 4.22958e-8; = p1773*p3484
- p1899: 0
- p3177: 0; = p2396*p1023
- p0276: 0.5
- p2413: 0; = p2234*p2203
- p1834: 0
- p0247: 36.933
- p0541: 0; = IF(p0277<0.5;-SQRT(p0007*EXP(p0409^2*p0008)-p0007);SQRT(p0007*EXP(p0409^2*p0008)-p0007))
- p1818: 0
- p1964: 0.5
- p3484: 0.0292958; = IF(p1344=0;0;p1344/(p1328+p1330+p1332+p1334+p1336+p1338+p1340+p1342+p1344))
- p3408: 0; = p3370*p1238
- p4066: 1.27311e-6; = p1923*p3478
- p2648: 0.000304008; = p2257*(p1019+p1021)
- p1784: 0
- p0501: 0; = SQRT(2)*(IF((2*p0369-1)<0;-1;IF((2*p0369-1)>0;1;0))*SQRT(SQRT((2/(pi()*0.140012289)+LN(1-(2*p0369-1)^2)/2)^2-LN(1-(2*p0369-1)^2)/0.140012289)-(2/(pi()*0.140012289)+LN(1-(2*p0369-1)^2)/2)))
- p2863: 5.44136e-5; = p2277*(p1020+p1022)
- p0087: 11.291
- p0460: 0; = SQRT(2)*(IF((2*p0328-1)<0;-1;IF((2*p0328-1)>0;1;0))*SQRT(SQRT((2/(pi()*0.140012289)+LN(1-(2*p0328-1)^2)/2)^2-LN(1-(2*p0328-1)^2)/0.140012289)-(2/(pi()*0.140012289)+LN(1-(2*p0328-1)^2)/2)))
- p2642: 3.44502e-7; = p2251*(p1019+p1021)
- p0045: 72.251
- p2133: 6.52209e-6; = p2015*p2061*p2095/(p0818*1000)
- p1887: 0
- p2996: 0; = p2410*(p1020+p1022)
- p0634: 0; = IF(p0370<0.5;-SQRT(p0007*EXP(p0502^2*p0008)-p0007);SQRT(p0007*EXP(p0502^2*p0008)-p0007))
- p3005: 0; = p2419*(p1079+p1081)
- p1862: 0
- p0358: 0.5
- p5203: 5.49845e-7; = p1824*p3484
- p2303: 0.000129492; = p2227*p2210
- p4594: 9.00916e-7; = p1833*p3481
- p0749: 19.444; = p0089*(1+p0617*p0221/100)
- p1062: 0.16
- p1799: 0
- p2120: 0.51828
- p1471: 12
- p0098: 2.737
- p3296: 0.514
- p1636: 0
- p1937: 0
- p3553: 6.38746e-7; = p1822*p3476
- p0155: 4.68
- p2383: 1.1141e-6; = p2229*p2212
- p0542: 0; = IF(p0278<0.5;-SQRT(p0007*EXP(p0410^2*p0008)-p0007);SQRT(p0007*EXP(p0410^2*p0008)-p0007))
- p3200: 0; = p2419*p1082
- p2276: 0.00385512; = p2223*p2182
- p2277: 0.000846245; = p2223*p2183
- p3270: 0.0747083
- p2440: 0.000162436; = p2244*p1014
- p4846: 0; = p1879*p3482
- p2619: 0; = p2423*p1073
- p0901: 0.01746
- p1252: 8.83907e8; = if(p1232>0;0;p0724*2000*p0723*1000*p0725/100)
- p5245: 3.38366e-7; = p1866*p3484
- p2714: 3.54951e-5; = p2323*(p1019+p1021)
- p0291: 0.5
- p1770: 0
- p0874: 181278; = p0865*p0856
- p2267: 3.31109e-5; = p2226*p2213
- p2250: 0.00588285; = p2222*p2196
- p3272: 0.0398246
- p3916: 4.24369e-7; = p1773*p3478
- p2640: 0.000126869; = p2249*(p1019+p1021)
- p2997: 0; = p2411*(p1020+p1022)
- p2157: 6.88542e-7; = p2015*p2086*p2119/(p0818*1000)
- p0889: 1872.91; = 1000*p0888*p0001*p0003*p0004/(p0818*p0002)
- p0527: 0; = SQRT(2)*(IF((2*p0395-1)<0;-1;IF((2*p0395-1)>0;1;0))*SQRT(SQRT((2/(pi()*0.140012289)+LN(1-(2*p0395-1)^2)/2)^2-LN(1-(2*p0395-1)^2)/0.140012289)-(2/(pi()*0.140012289)+LN(1-(2*p0395-1)^2)/2)))
- p1830: 0
- p2680: 0.00179125; = p2289*(p1019+p1021)
- p3183: 0; = p2402*p1023
- p3098: 4.20204e-10; = p2317*p1023
- p0683: 15.112; = p0023*(1+p0551*p0155/100)
- p1596: 0
- p2931: 0; = p2345*(p1079+p1081)
- p2417: 0; = p2235*p2207
- p0476: 0; = SQRT(2)*(IF((2*p0344-1)<0;-1;IF((2*p0344-1)>0;1;0))*SQRT(SQRT((2/(pi()*0.140012289)+LN(1-(2*p0344-1)^2)/2)^2-LN(1-(2*p0344-1)^2)/0.140012289)-(2/(pi()*0.140012289)+LN(1-(2*p0344-1)^2)/2)))
- p3461: 0.000130929; = p3366*p1241
- p5103: 2.02644e-5; = p1930*p3483
- p1581: 0
- p0376: 0.5
- p3917: 8.48738e-7; = p1774*p3478
- p1074: 0.25429; = IF(p1071=0;p0712/100;0)
- p1924: 0
- p0493: 0; = SQRT(2)*(IF((2*p0361-1)<0;-1;IF((2*p0361-1)>0;1;0))*SQRT(SQRT((2/(pi()*0.140012289)+LN(1-(2*p0361-1)^2)/2)^2-LN(1-(2*p0361-1)^2)/0.140012289)-(2/(pi()*0.140012289)+LN(1-(2*p0361-1)^2)/2)))
- p2910: 2.69231e-6; = p2324*(p1020+p1022)
- p0064: 6.374
- p0869: 0; = IF(p0858+p0864+p0865+p0866+p0867+p0868=1;0;1-(p0858+p0864+p0865+p0866+p0867+p0868))
- p0217: 9.908
- p2214: 0.000201582; = p1107/p0818
- p3907: 2.12184e-6; = p1764*p3478
- p2731: 0; = p2340*(p1078+p1080)
- p1999: 4.09331e7; = (p1228+p1229)*p0818+p1164
- p0368: 0.5
- p3208: 0; = p2427*p1082
- p4182: 4.91566e-7; = p1833*p3479
- p1693: 0
- p2005: 3.83037e6; = p1963*p0818+p1959*1000+p1170+p1176+p1182
- p3425: 0; = p3368*p1239
- p0752: 0
- p1563: 0
- p1214: 14; = IF(p1213=0;0;p1213-1)
- p3012: 0; = p2426*(p1079+p1081)
- p0481: 0; = SQRT(2)*(IF((2*p0349-1)<0;-1;IF((2*p0349-1)>0;1;0))*SQRT(SQRT((2/(pi()*0.140012289)+LN(1-(2*p0349-1)^2)/2)^2-LN(1-(2*p0349-1)^2)/0.140012289)-(2/(pi()*0.140012289)+LN(1-(2*p0349-1)^2)/2)))
- p2453: 0.00103034; = p2257*p1014
- p0888: 5.72449e6; = p0686*1000*p0687*p0884/100
- p2284: 0.000367558; = p2223*p2190
- p1131: 0; = if(p1121=0;IF(p1123+p1128+p1129+p1130=1;0;IF(p1123+p1128+p1129+p1130+p1127>1;1-(p1123+p1128+p1129+p1130);p1127));0)
- p1215: 0.0739645; = IF(p1214=0;0;(p1214-1.5)/(p1214-1)^2)
- p2781: 0.00052631; = p2390*(p1128+p1130)
- p0310: 0.5
- p4583: 1.20122e-6; = p1822*p3481
- p1267: 0
- p1101: 0.0228017; = IF(p1071=0;IF(p1096=1;0;IF(p1096+p1097>1;1-p1096;p1097));0)
- p0063: 455.116
- p1679: 0
- p1714: 0
- p2963: 2.92334e-5; = p2377*(p1079+p1081)
- p0848: 0
- p0145: 0
- p0427: 0; = SQRT(2)*(IF((2*p0295-1)<0;-1;IF((2*p0295-1)>0;1;0))*SQRT(SQRT((2/(pi()*0.140012289)+LN(1-(2*p0295-1)^2)/2)^2-LN(1-(2*p0295-1)^2)/0.140012289)-(2/(pi()*0.140012289)+LN(1-(2*p0295-1)^2)/2)))
- p1910: 0
- p1802: 0
- p0382: 0.5
- p2995: 0; = p2409*(p1020+p1022)
- p0519: 0; = SQRT(2)*(IF((2*p0387-1)<0;-1;IF((2*p0387-1)>0;1;0))*SQRT(SQRT((2/(pi()*0.140012289)+LN(1-(2*p0387-1)^2)/2)^2-LN(1-(2*p0387-1)^2)/0.140012289)-(2/(pi()*0.140012289)+LN(1-(2*p0387-1)^2)/2)))
- p2287: 0.00396538; = p2223*p2193
- p2033: 4.72951e-5; = p2015*p2029*p2031/(p0818*1000)
- p4383: 4.1663e-8; = p1828*p3480
- p0136: 95.906
- p3108: 3.85059e-9; = p2327*p1023
- p0549: 0; = IF(p0285<0.5;-SQRT(p0007*EXP(p0417^2*p0008)-p0007);SQRT(p0007*EXP(p0417^2*p0008)-p0007))
- p0475: 0; = SQRT(2)*(IF((2*p0343-1)<0;-1;IF((2*p0343-1)>0;1;0))*SQRT(SQRT((2/(pi()*0.140012289)+LN(1-(2*p0343-1)^2)/2)^2-LN(1-(2*p0343-1)^2)/0.140012289)-(2/(pi()*0.140012289)+LN(1-(2*p0343-1)^2)/2)))
- p0293: 0.5
- p0594: 0; = IF(p0330<0.5;-SQRT(p0007*EXP(p0462^2*p0008)-p0007);SQRT(p0007*EXP(p0462^2*p0008)-p0007))
- p1010: 258101; = p0890
- p2369: 1.8371e-5; = p2225*p2198
- p2206: 0.00121877; = 9*1.00794*p2204/30.973762
- p3221: 0.146975; = IF(p3216=0;0;p1223*12.0107/100.0869+(1-p1224)*12.0107/84.3139)
- p2232: 0; = if(p0783*p0787+p0784*p0788+p0785*p0789+p0786*p0790=0;0;p0789*p0785/(p0783*p0787+p0784*p0788+p0785*p0789+p0786*p0790))
- p2164: 0.00594648; = (p2015/p0818)-(p2022)-(p2035+p2036+p2052)-(p2017/p0818)-(p2039+p2041+p2044+p2158+p2159+p2160+p2161+p2162)
- p1028: 23493; = IF(p1012=0;p1022*(p0704/100)*p0703*1000;0)
- p3091: 8.6554e-6; = p2310*p1082
- p3097: 3.83346e-9; = p2316*p1023
- p0650: 0; = IF(p0386<0.5;-SQRT(p0007*EXP(p0518^2*p0008)-p0007);SQRT(p0007*EXP(p0518^2*p0008)-p0007))
- p2169: 0.00284216; = p2166*(p0908)
- p2060: 0.272353
- p0014: 187.786
- p3356: 4.1108e7; = if(p1232=0;p3306+p3317+p3328+p3339+p3350;0)
- p1851: 0
- p1115: 0.237849
- p3087: 2.7378e-7; = p2306*p1082
- p5285: 4.65254e-7; = p1906*p3484
- p2646: 0.000184252; = p2255*(p1019+p1021)
- p4466: 1.24989e-6; = p1911*p3480
- p2125: 2.04742e-5; = p2015*p2053*p2087/(p0818*1000)
- p3130: 0; = p2349*p1082
- p2554: 0.00137069; = p2358*p1014
- p4605: 6.00611e-7; = p1844*p3481
- p0820: 0.600863; = if(p0807=480;p0814;0)
- p0161: 8.164
- p2507: 0.000407183; = p2311*p1123
- p1810: 0
- p1674: 0
- p2534: 0; = p2338*p1073
- p2693: 7.62642e-5; = p2302*(p1078+p1080)
- p1909: 0
- p1979: 6.8772e6; = p0973
- p0433: 0; = SQRT(2)*(IF((2*p0301-1)<0;-1;IF((2*p0301-1)>0;1;0))*SQRT(SQRT((2/(pi()*0.140012289)+LN(1-(2*p0301-1)^2)/2)^2-LN(1-(2*p0301-1)^2)/0.140012289)-(2/(pi()*0.140012289)+LN(1-(2*p0301-1)^2)/2)))
- p1205: 0
- p1661: 0
- p2260: 0.000762048; = p2226*p2206
- p1897: 0
- p3369: 0; = if(p1232=0;p3245*p3357/p0818;0)
- p5084: 3.14991e-6; = p1911*p3483
- p1990: 30
- p2676: 1.97045e-5; = p2285*(p1019+p1021)
- p3370: 0; = if(p1232=0;p3245*p3358/p0818;0)
- p1139: 7.98353e-5; = if(p1121=0;p1133*p0001/(p0818*p0002);0)
- p4506: 1.5207e-6; = p1951*p3480
- p0721: 0
- p0750: 0
- p2755: 0.000773257; = p2364*(p1019+p1021)
- p3420: 0; = p3363*p1239
- p0746: 8.512; = p0086*(1+p0614*p0218/100)
- p1072: 0; = p1071*p0001/(p0818*p0002)
- p0015: 32.232
- p2124: 0.263965
- p0647: 0; = IF(p0383<0.5;-SQRT(p0007*EXP(p0515^2*p0008)-p0007);SQRT(p0007*EXP(p0515^2*p0008)-p0007))
- p3131: 0; = p2350*p1132
- p0965: 0; = IF(p0684/100=1;0;IF(p0684/100+p0685/100>1;1-p0684/100;p0685/100))
- p1111: 0.0872841
- p4654: 0.000151054; = p1893*p3481
- p0727: 48.83; = p0067*(1+p0595*p0199/100)
- p4795: 0; = p1828*p3482
- p2343: 0; = p2228*p2211
- p0973: 6.8772e6; = p0967+p0968+p0969
- p0724: 6.374; = p0064*(1+p0592*p0196/100)
- p3405: 0.0124456; = p3367*p1238
- p0700: 0
- p1993: 400
- p1651: 0
- p2230: 0.493896; = if(p0783*p0787+p0784*p0788+p0785*p0789+p0786*p0790=0;0;p0787*p0783/(p0783*p0787+p0784*p0788+p0785*p0789+p0786*p0790))
- p2443: 0.000378383; = p2247*p1014
- p0502: 0; = SQRT(2)*(IF((2*p0370-1)<0;-1;IF((2*p0370-1)>0;1;0))*SQRT(SQRT((2/(pi()*0.140012289)+LN(1-(2*p0370-1)^2)/2)^2-LN(1-(2*p0370-1)^2)/0.140012289)-(2/(pi()*0.140012289)+LN(1-(2*p0370-1)^2)/2)))
- p0065: 15.235
- p4458: 8.3326e-7; = p1903*p3480
- p2139: 4.54728e-6; = p2015*p2067*p2101/(p0818*1000)
- p2179: 0.00992897; = p0970+p0971+p0972
- p3001: 0; = p2415*(p1079+p1081)
- p2923: 0; = p2337*(p1079+p1081)
- p2202: 0.0012441; = 4*1.00794*p2201/(2*14.0067)
- p2002: 750
- p2255: 0.000864301; = p2222*p2201
- p1059: 0.335
- p1870: 0
- p2053: 1.45647
- p0881: 0.413669; = p0880*p0001*p0003/(p0818*p0002)
- p1976: 0.157
- p1639: 0
- p4937: 2.62492e-7; = p1764*p3483
- p4522: 6.00611e-7; = p1761*p3481
- p0111: 12.514
- p2449: 4.21342e-6; = p2253*p1014
- p3042: 0.000211393; = p2261*p1082
- p4379: 2.70809e-7; = p1824*p3480
- p2585: 0.00122393; = p2389*p1123
- p1292: 0; = IF(p1287+p1290+p1291=p1261;0;p1261-(p1287+p1290+p1291))
- p1193: 0; = IF(OR(p1036=0;p1095=0);0.0001*p0857;0)
- p1746: 0
- p1791: 0
- p2522: 0.00129785; = p2326*p1014
- p4455: 2.49978e-7; = p1900*p3480
- p1180: 1.10837e-7; = p1176*p1179/p0818
- p1138: 8311.12; = if(p1121=0;p1132*(p0716/100)*p0703*1000;0)
- p3396: 0.00117983; = p3377*p1234
- p1833: 4.33125e-6; = p1425*1000/p0818
- p3275: 0.0214527
- p1963d: 5.51165e-5; = p1608*p1812+p1609*p1813+p1610*p1814+p1611*p1815+p1612*p1816+p1613*p1817+p1614*p1818+p1615*p1819+p1616*p1820+p1617*p1821+p1618*p1822+p1619*p1823+p1620*p1824+p1621*p1825+p1622*p1826+p1623*p1827+p1624*p1828+p1625*p1829+p1626*p1830+p1627*p1831
- p2572: 0.000499498; = p2376*p1073
- p1096: 0.00057283
- p1340: 0; = p1325*p0801
- p0085: 957.595
- p2821: 0; = p2430*(p1128+p1130)
- p0788: 22.38; = p0128*(1+p0656*p0260/100)
- p0793: 0
- p1195: 0.45
- p2386: 0.000167351; = p2229*p2215
- p0350: 0.5
- p0244: 5.627
- p3064: 3.21115e-9; = p2283*p1023
- p2815: 0; = p2424*(p1078+p1080)
- p0718: 21.202; = p0058*(1+p0586*p0190/100)
- p1692: 0
- p1859: 0
- p1703: 0
- p1988: 750
- p1826: 0
- p2498: 0.000180927; = p2302*p1073
- p0883: 0; = p0882*p0001*p0003/(p0818*p0002)
- p2438: 2.84826e-5; = p2242*p1014
- p2127: 3.67399e-5; = p2015*p2055*p2089/(p0818*1000)
- p3335: 0; = IF(or(p3254=0;p1232>0);0;p3270*(p3280*(p3283*p1256+p3286*(p1253+p1257)+p1258*p3288+p3300*p3287)))
- p0438: 0; = SQRT(2)*(IF((2*p0306-1)<0;-1;IF((2*p0306-1)>0;1;0))*SQRT(SQRT((2/(pi()*0.140012289)+LN(1-(2*p0306-1)^2)/2)^2-LN(1-(2*p0306-1)^2)/0.140012289)-(2/(pi()*0.140012289)+LN(1-(2*p0306-1)^2)/2)))
- p4319: 1.04157e-7; = p1764*p3480
- p3073: 8.32938e-11; = p2292*p1023
- p0243: 35.395
- p1839: 0
- p2772: 4.68132e-5; = p2381*(p1078+p1080)
- p0108: 80.709
- p2467: 0.000631493; = p2271*p1073
- p4123: 3.27711e-7; = p1774*p3479
- p2979: 0; = p2393*(p1020+p1022)
- p2493: 0.000388476; = p2297*p1073
- p0693: 55.331; = p0033*(1+p0561*p0165/100)
- p3388: 0; = p3369*p1234
- p1424: 311
- p0828: 0.132038; = if(p0827=0;0;p0819-p0827/p0818)
- p2598: 0; = p2402*p1014
- p4279: 6.32482e-5; = p1930*p3479
- p3358: 3.18787e6; = if(p1232=0;p3308+p3319+p3330+p3341+p3352;0)
- p2126: 1.19346e-5; = p2015*p2054*p2088/(p0818*1000)
- p2016: 0.00263927; = (p2014-p2015)/(p0818)
- p1662: 0.891164
- p0441: 0; = SQRT(2)*(IF((2*p0309-1)<0;-1;IF((2*p0309-1)>0;1;0))*SQRT(SQRT((2/(pi()*0.140012289)+LN(1-(2*p0309-1)^2)/2)^2-LN(1-(2*p0309-1)^2)/0.140012289)-(2/(pi()*0.140012289)+LN(1-(2*p0309-1)^2)/2)))
- p0899: 1.68204e9; = p0825*p0896+p0827*p0897+(p0830+p0895)*p0824*p0898
- p2794: 0; = p2403*(p1019+p1021)
- p0467: 0; = SQRT(2)*(IF((2*p0335-1)<0;-1;IF((2*p0335-1)>0;1;0))*SQRT(SQRT((2/(pi()*0.140012289)+LN(1-(2*p0335-1)^2)/2)^2-LN(1-(2*p0335-1)^2)/0.140012289)-(2/(pi()*0.140012289)+LN(1-(2*p0335-1)^2)/2)))
- p0237: 15.208
- p2090: 0.40001
- p0735: 0
- p1326: 0.148458; = IF(((p0745*1000*p0753/100)+(p0754*1000*p0762/100))/p0801<0;0;((p0745*1000*p0753/100)+(p0754*1000*p0762/100))/p0801)
- p0535: 0; = SQRT(2)*(IF((2*p0403-1)<0;-1;IF((2*p0403-1)>0;1;0))*SQRT(SQRT((2/(pi()*0.140012289)+LN(1-(2*p0403-1)^2)/2)^2-LN(1-(2*p0403-1)^2)/0.140012289)-(2/(pi()*0.140012289)+LN(1-(2*p0403-1)^2)/2)))
- p0830: 1.81237e9; = p0825*(p0821-p0814)*p0824
- p0008: 0.0739645; = (p0007-1.5)/(p0007-1)^2
- p1331: 0.000463909; = p1330*p0001/(p0818*p0002)
- p0215: 47.658
- p3375: 0.00260645; = if(p1232=0;p3246*p3357/p0818;0)
- p0036: 41.143
- p1613: 0
- p3041: 2.546e-5; = p2260*p1082
- p0562: 0; = IF(p0298<0.5;-SQRT(p0007*EXP(p0430^2*p0008)-p0007);SQRT(p0007*EXP(p0430^2*p0008)-p0007))
- p1315: 0; = p1311*p1252/p0818
- p2567: 0.0100884; = p2371*p1014
- p3137: 4.49814e-9; = p2356*p1023
- p1200: 0.84

## Reference product
- cotton lint; at harvest in 2007; at farm; 90%-93% moisture: 1 kg

## Inputs from technosphere
- CUTOFF apply zinc compounds; unspecified method: 0.00058608 ha; = p1183
- CUTOFF pesticide, Pyrithiobac-sodium; at point-of-sale; kg AI: 4.33125e-6 kg; = p1923
- CUTOFF nitrogenous fertilizer, anhydrous ammonia; at point-of-sale: 0.0329203 kg; = p1064
- CUTOFF seed storage; cotton: 0.00496448 kg*a; = p0975
- cottonseed; at harvest in 2007; at farm; 90%-93% moisture: 1.57658 kg; = p0819
- CUTOFF pesticide, Pendimethalin; at point-of-sale; kg AI: 5.77501e-5 kg; = p1903
- CUTOFF sulfuric acid; at point-of-sale: 2.21674e-7 kg; = p1178
- CUTOFF phosphatic fertilizer, other single phosphates; at point-of-sale: 0.00186095 kg; = p1118
- CUTOFF apply pesticide; in seed furrow: 8.70084e-5 ha; = p1343
- CUTOFF pesticide, Thidiazuron; at point-of-sale; kg AI: 3.465e-5 kg; = p1942
- CUTOFF pesticide, Paraquat dichloride; at point-of-sale; kg AI: 0.000128494 kg; = p1901
- CUTOFF pesticide, Ethephon; at point-of-sale; kg AI: 0.000449007 kg; = p1832
- CUTOFF dairy manure; from semi-solid to solid storage; at point-of-sale: 0.368028 kg; = p1284
- CUTOFF apply N fertilizer; broadcast without incorporation: 5.89253e-6 ha; = p1032
- CUTOFF domestic barge transport; average fuel: 0.0879185 metric ton*km; = p2007
- CUTOFF phosphatic fertilizer, diammonium phosphate; at point-of-sale: 0.0192632 kg; = p1119
- CUTOFF sowing; for unspec. till, cotton: 1.80538e-5 ha; = p0963
- CUTOFF local area trucking; class 6, average fuel: 0.00659388 metric ton*km; = p2010
- CUTOFF pesticide, Trifluralin; at point-of-sale; kg AI: 0.000167475 kg; = p1955
- CUTOFF apply mixed N fertilizer; without incorporation: 3.02611e-5 ha; = p1034
- CUTOFF sulfur storage: 2.49441e-7 kg*a; = p1174
- CUTOFF pesticide, Bifenthrin; at point-of-sale; kg AI: 4.33125e-6 kg; = p1778
- CUTOFF pesticide, Carfentrazone-ethyl; at point-of-sale; kg AI: 1.44375e-6 kg; = p1788
- CUTOFF apply pesticide; chiseled or injected/knifed in: 3.45251e-5 ha; = p1337
- CUTOFF pesticide, Acetamiprid; at point-of-sale; kg AI: 7.21876e-6 kg; = p1764
- CUTOFF apply K fertilizer; broadcast with incorporation: 2.43616e-5 ha; = p1140
- CUTOFF nitrogenous fertilizer, nitrogen solutions; at point-of-sale: 0.0925558 kg; = p1068
- CUTOFF fertilizer filler materials; at point-of-sale: 0.0509438 kg; = p1158
- CUTOFF zinc compounds; at point-of-sale: 1.07053e-7 kg; = p1184
- CUTOFF apply pesticide; banded or side-dressed: 0.000264657 ha; = p1329
- CUTOFF apply manure; broadcast or spray with incorporation: 4.55241e-5 ha; = p1247
- CUTOFF pesticide, Thiamethoxam; at point-of-sale; kg AI: 1.44375e-6 kg; = p1941
- CUTOFF apply mixed N fertilizer; with incorporation: 6.05953e-5 ha; = p1033
- CUTOFF pesticide, Etoxazole; at point-of-sale; kg AI: 4.33125e-6 kg; = p1833
- CUTOFF pesticide, Phorate; at point-of-sale; kg AI: 1.58813e-5 kg; = p1906
- CUTOFF pesticide, S-Metolachlor; at point-of-sale; kg AI: 7.65188e-5 kg; = p1927
- CUTOFF nitrogenous fertilizer, ammonium nitrate; at point-of-sale: 0.00817758 kg; = p1066
- CUTOFF pesticide, Urea, sulfate; at point-of-sale; kg AI: 0.000726207 kg; = p1893
- CUTOFF irrigate; pressure, groundwater source, in 2007: 2.08254e-5 ha-m; = p0993
- CUTOFF nitrogenous fertilizer, ammonium sulfate; at point-of-sale: 0.0107073 kg; = p1067
- CUTOFF apply P fertilizer; broadcast with incorporation: 5.83416e-5 ha; = p1090
- CUTOFF dolomite, pulverized; at point-of-sale: 0.00151813 kg; = p1229
- CUTOFF regional or national trucking; class 8, average fuel: 0.0226246 metric ton*km; = p2009
- CUTOFF pesticide, Prometryn; at point-of-sale; kg AI: 8.66251e-5 kg; = p1911
- CUTOFF pesticide, Sodium chlorate; at point-of-sale; kg AI: 0.000557288 kg; = p1930
- CUTOFF sowing; for conventional till, cotton; <15% residue: 0.000568026 ha; = p0958
- CUTOFF apply pesticide; broadcast by air: 0.000463909 ha; = p1331
- CUTOFF pesticide, Abamectin; at point-of-sale; kg AI: 2.8875e-6 kg; = p1761
- CUTOFF pesticide, Pyraflufen-ethyl; at point-of-sale; kg AI: 1.44375e-6 kg; = p1919
- CUTOFF apply K fertilizer; no broadcast application: 7.98353e-5 ha; = p1139
- CUTOFF apply sulfur; unspecified method: 0.00058608 ha; = p1171
- CUTOFF pesticide, Tribufos; at point-of-sale; kg AI: 0.000105394 kg; = p1951
- CUTOFF harvest; cotton residue management: 0.00058608 ha; = p1975
- CUTOFF zinc compounds storage: 5.35265e-8 kg*a; = p1186
- CUTOFF phosphatic fertilizer, superphosphate grades over 22%; at point-of-sale: 0.000962288 kg; = p1117
- CUTOFF pesticide, Flonicamid; at point-of-sale; kg AI: 1.01063e-5 kg; = p1850
- CUTOFF nitrogenous fertilizer, aqueous ammonia; at point-of-sale: 0.00288684 kg; = p1065
- CUTOFF prepare soil; for unspec. till, cotton: 1.80538e-5 ha; = p0939
- CUTOFF sewage sludge; at point-of-sale: 1.9698e-7 kg; = p1190
- CUTOFF pesticide, Azoxystrobin; at point-of-sale; kg AI: 1.44375e-6 kg; = p1773
- CUTOFF phosphatic fertilizer, monoammonium phosphate; at point-of-sale: 0.0180191 kg; = p1120
- CUTOFF apply N fertilizer; no broadcast application: 0.000406242 ha; = p1030
- CUTOFF apply manure; unspec. method: 1.76838e-7 ha; = p1251
- CUTOFF gypsum; at point-of-sale: 2.86908e-6 kg; = p1166
- CUTOFF irrigate; gravity, surface water source, in 2007: 0.000153031 ha-m; = p1006
- CUTOFF irrigate; unspec. irrigation method, unspec. water source, in 2007: 8.44441e-6 ha-m; = p1011
- CUTOFF pesticide, Diuron; at point-of-sale; kg AI: 1.87688e-5 kg; = p1824
- CUTOFF sewage sludge storage: 9.84902e-8 kg*a; = p1192
- CUTOFF bulk cargo rail transport; diesel: 0.164847 metric ton*km; = p2008
- CUTOFF cotton seeds; GMO herbicide resistant seed; at point-of-sale: 0.0096592 kg; = p0970
- CUTOFF pesticide, unspecified type; at point-of-sale; kg AI: 0.000843394 kg; = p1962
- CUTOFF poultry manure; from semi-solid to solid storage; at point-of-sale: 0.637913 kg; = p1304
- CUTOFF gypsum storage: 1.43454e-6 kg*a; = p1168
- CUTOFF sulfur; at point-of-sale: 4.98881e-7 kg; = p1172
- CUTOFF pesticide, Indoxacarb; at point-of-sale; kg AI: 1.155e-5 kg; = p1866
- CUTOFF apply manure; broadcast without incorporation: 4.3611e-5 ha; = p1248
- CUTOFF apply liming materials; unspecified method: 0.00058608 ha; = p1227
- CUTOFF pesticide, Barban; at point-of-sale; kg AI: 2.8875e-6 kg; = p1774
- CUTOFF pesticide, Flumioxazin; at point-of-sale; kg AI: 2.8875e-6 kg; = p1844
- CUTOFF apply N fertilizer; broadcast with incorporation: 5.92683e-5 ha; = p1031
- CUTOFF nitrogenous fertilizer, urea; at point-of-sale: 0.0443137 kg; = p1070
- CUTOFF apply pesticide; broadcast with incorporation: 0.000703329 ha; = p1333
- CUTOFF pesticide, Dimethoate; at point-of-sale; kg AI: 5.77501e-6 kg; = p1822
- CUTOFF irrigate; unspecified irrigation method, surface water source, in 2007: 1.68077e-5 ha-m; = p1009
- CUTOFF poultry manure; from unspecified storage; at point-of-sale: 0.0167865 kg; = p1306
- CUTOFF pesticide, Aldicarb; at point-of-sale; kg AI: 0.000179025 kg; = p1768
- CUTOFF limestone, high-grade, pulverized; at point-of-sale: 0.0575762 kg; = p1228
- CUTOFF pesticide, Dicofol; at point-of-sale; kg AI: 4.18688e-5 kg; = p1814
- CUTOFF apply single or mixed N fertilizer; unspec. method: 5.62265e-9 ha; = p1035
- CUTOFF pesticide, Cyclanilide; at point-of-sale; kg AI: 5.77501e-6 kg; = p1803
- CUTOFF apply pesticide; unspecified application methods: 7.0099e-5 ha; = p1345
- CUTOFF apply single or mixed P fertilizer; unspec. method: 7.66524e-6 ha; = p1094
- CUTOFF apply pesticide; as foliar or directed spray: 0.000497712 ha; = p1339
- CUTOFF N inhibitor appl svc; unspec rate & type, 2007 cotton: 0.000656907 ha; = p1162
- CUTOFF pesticide, 1,1-Dimethylpiperidinium chloride; at point-of-sale; kg AI: 1.7325e-5 kg; = p1879
- CUTOFF apply P fertilizer; no broadcast application: 0.000138408 ha; = p1089
- CUTOFF pesticide, Endothall; at point-of-sale; kg AI: 2.8875e-6 kg; = p1828
- cotton residue; at harvest in 2007; at farm; 80%-92% moisture: 1.51864 kg; = p0839
- CUTOFF apply sewage sludge; unspecified method: 0.00058608 ha; = p1189
- CUTOFF potassic fertilizer, potassium chloride; at point-of-sale: 0.0111751 kg; = p1154
- CUTOFF pesticide, Oxyfluorfen; at point-of-sale; kg AI: 1.7325e-5 kg; = p1900
- CUTOFF apply single or mixed K fertilizer; unspec. method: 1.07055e-5 ha; = p1144
- CUTOFF international vessel transport; average fuel: 0.804268 metric ton*km; = p2006
- CUTOFF potassic fertilizer, other single nutrients; at point-of-sale: 0.00162139 kg; = p1155
- CUTOFF harvest; cotton, spindle picked: 0.000435695 ha; = p1972
- CUTOFF unspecified manure; from semi-solid to solid storage; at point-of-sale: 0.237481 kg; = p1314
- CUTOFF apply pesticide; broadcast without incorporation: 0.000271566 ha; = p1335
- CUTOFF fertilizer storage: 0.147783 kg*a; = p1160
- CUTOFF apply gypsum; unspecified method: 0.00058608 ha; = p1165
- CUTOFF cotton seeds; seed, unspec. type; at point-of-sale: 0.00026977 kg; = p0972
- CUTOFF liming materials storage: 0.0295472 kg*a; = p1231
- CUTOFF unspecified animal manure; from unspecified storage; at point-of-sale: 0.00624925 kg; = p1316
- CUTOFF apply sulfuric acid; unspecified method: 0.00058608 ha; = p1177
- CUTOFF sulfuric acid storage: 1.10837e-7 kg*a; = p1180
- CUTOFF pesticide, beta-Cyfluthrin; at point-of-sale; kg AI: 1.44375e-6 kg; = p1804
- CUTOFF nitrogenous fertilizer, sodium nitrate; at point-of-sale: 0.000101015 kg; = p1069
- CUTOFF apply P fertilizer; broadcast without incorporation: 2.50147e-5 ha; = p1091
- CUTOFF harvest; cotton, stripper harvested: 0.000145232 ha; = p1973
- CUTOFF pesticide formulation balance; at point-of-sale: 0.0019341 kg; = p1963
- CUTOFF irrigate; gravity, groundwater source, in 2007: 0.00019476 ha-m; = p0992
- CUTOFF phosphatic fertilizer, superphos. grades 22% and under; at point-of-sale: 5.80196e-5 kg; = p1116
- CUTOFF pesticide storage: 0.00373169 kg*a; = p1965
- CUTOFF dairy manure; from unspecified storage; at point-of-sale: 0.00968455 kg; = p1286
- CUTOFF irrigate; pressure, surface water source, in 2007: 1.74515e-5 ha-m; = p1007
- CUTOFF prepare soil; for conventional till, cotton; <15% residue: 0.000568026 ha; = p0934

## Inputs from nature
- Water, ground: 2155.85 kg; = p0887
- Water, unspecified origin: 0.0863253 m3; = p0893*0.001+p0916*0.001
- Nitrogen: 0.118138 kg; = p0905
- Occupation, annual crop [natural resource, land]: 2.75264 m2*year; = 1.0 * (p0855)
- Dry matter except CNPK; from plant uptake: 3.53057 kg; = p0917
- Transformation, from annual crop [natural resource, land]: 5.8608 m2; = 1.0 * (p0875+p0883+p0881+p0871+p0877+p0879)
- Carbon dioxide: 8.90432 kg; = p0900*3.6666666667
- Phosphorus: 0.0203592 kg; = p0910
- Potassium; from plant uptake; biogenic: 0.0260641 kg; = p0915
- Water, surface: 1872.91 kg; = p0889
- Transformation, to annual crop [natural resource, land]: 5.8608 m2; = 1.0 * (p0857)

## Emissions to nature
- Potassium chloride; broadcast w/ incorp. in fert. in fall bef. plant.: 0.00107669 kg; = p2663*2.2166666667
- Methyl vinyl ether; from residue burning: 1.24516e-6 kg; = p2137*1.6111111111
- Plant dry matter; in aboveground residue left on field: 0.678607 kg; = p2172
- NMVOC, non-methane volatile organic compounds, unspecified origin [air, non-urban air or from high stacks]: 0.000421817 kg; = 1.0 * (p2052+p2051)
- Urea; unspec. appl. method in fert. in spr. bef. plant.: 6.17244e-8 kg; = p3075*5
- Other single K nutrients; broadcast w/ incorp. in fert. in fall bef. plant.; kg K: 6.20165e-5 kg; = p2665
- Toluene [air, non-urban air or from high stacks]: 3.12694e-6 kg; = 1.0 * (p2141*1.0952380952)
- Filler materials, applied with synthetic fertilizer: 0.0509438 kg; = p2432
- BARBAN: 5.59819e-7 kg; = p3711
- Trifluralin [air, non-urban air or from high stacks]: 3.24695e-5 kg; = 1.0 * (p3892)
- Furan [air, non-urban air or from high stacks]: 1.79584e-6 kg; = 1.0 * (p2138*1.4166666667)
- Other single phosphates; unspec. appl. method in fert. after plant.; kg P: 1.37296e-6 kg; = p3168
- Endothall [soil, agricultural]: 2.32768e-6 kg; = 1.0 * (p4383+p3559+p5001+p5207+p4589+p3971+p4177)
- Other single phosphates; broadcast w/ incorp. in fert. after plant.; kg P: 1.04498e-5 kg; = p2778
- Ammonium sulfate; broadcast w/o incorp. in fert. after plant.: 0.000472014 kg; = p2947*4.7142857143
- Nitrogen solution; broadcast w/o incorp. in fert. at plant.; broadcast w/o incorp. in fert. at plant.; kg N: 0.000115502 kg; = p2912
- Nitrogen solution; no broadcast in fert. after plant.; no broadcast in fert. after plant.; kg N: 0.013893 kg; = p2561
- 1-Butene: 2.19764e-6 kg; = p2144*1.1666666667
- S,S,S-tributyl phosphorotrithioate: 8.49605e-5 kg; = p5330+p4300+p3682+p4094+p4712+p5124+p4506
- Nitrogen; broadcast w/o incorp. in manure at an unknown time: 0.00127273 kg; = p3413
- Cyclanilide [soil, agricultural]: 4.65537e-6 kg; = 1.0 * (p3946+p3534+p5182+p4152+p4564+p4976+p4358)
- Nitrogen solution; unspec. appl. method in fert. in spr. bef. plant.; unspec. appl. method in fert. in spr. bef. plan...: 3.96538e-8 kg; = p3068
- Aqueous ammonia; no broadcast in fert. at plant.: 3.68659e-5 kg; = p2513*1.2142857143
- Anhydrous ammonia; broadcast w/o incorp. in fert. in fall bef. plant.: 0.00021074 kg; = p2823*1.2142857143
- Other single phosphates; broadcast w/ incorp. in fert. in fall bef. plant.; kg P: 2.97002e-5 kg; = p2661
- Dicofol [soil, agricultural]: 3.37514e-5 kg; = 1.0 * (p3957+p4987+p5193+p3545+p4163+p4575+p4369)
- Flumioxazin [soil, agricultural]: 2.32768e-6 kg; = 1.0 * (p3987+p3575+p5223+p4605+p4193+p4399+p5017)
- Aqueous ammonia; broadcast w/ incorp. in fert. at plant.: 1.08775e-5 kg; = p2708*1.2142857143
- Ammonium sulfate; broadcast w/o incorp. in fert. in spr. bef. plant.: 9.73392e-5 kg; = p2869*4.7142857143
- Sodium nitrate; no broadcast in fert. in fall bef. plant.: 7.08891e-6 kg; = p2447*6.0714285714
- Oxygen; applied in limestone: 0.0259549 kg; = p3219
- Superphosphate, grades>22%; broadcast w/ incorp. in fert. in fall bef. plant.; kg P: 3.2051e-5 kg; = p2659
- Sodium nitrate; no broadcast in fert. in spr. bef. plant.: 1.01252e-5 kg; = p2486*6.0714285714
- Aqueous ammonia; unspec. appl. method in fert. after plant.: 5.46202e-9 kg; = p3137*1.2142857143
- Volatile constituents; broadcast w/o incorp. in man. at unknown time: 0.00702556 kg; = p3416
- Propane [air, non-urban air or from high stacks]: 4.62363e-6 kg; = 1.0 * (p2142*1.2222222222)
- Diammonium phosphate; broadcast w/ incorp. in fert. in spr. bef. plant.: 0.000698184 kg; = p2689*4.7142857143
- Mepiquat chloride: 3.35891e-6 kg; = p3816
- Other single K nutrients; unspec. appl. method in fert. in spr. bef. plant.; kg K: 6.97135e-6 kg; = p3094
- Sodium nitrate; no broadcast in fert. after plant.: 4.90986e-5 kg; = p2564*6.0714285714
- Dinitrogen monoxide [air, non-urban air or from high stacks]: 1.14939e-6 kg; = 1.0 * (p2044*1.5714285714)
- Sodium nitrate; broadcast w/o incorp. in fert. in spr. bef. plant.: 9.01091e-7 kg; = p2876*6.0714285714
- Pentane [air, non-urban air or from high stacks]: 3.4731e-7 kg; = 1.0 * (p2152*1.0166666667)
- Aqueous ammonia; broadcast w/o incorp. in fert. at plant.: 3.2809e-6 kg; = p2903*1.2142857143
- Sodium nitrate; broadcast w/o incorp. in fert. at plant.: 4.08192e-7 kg; = p2915*6.0714285714
- Potassium chloride; no broadcast in fert. in spr. bef. plant.: 0.000902588 kg; = p2507*2.2166666667
- isopentane: 2.77848e-7 kg; = p2151*1.0166666667
- Thiamethoxam [soil, agricultural]: 1.16384e-6 kg; = 1.0 * (p5320+p4290+p4702+p5114+p3672+p4084+p4496)
- Carfentrazone-ethyl [air, non-urban air or from high stacks]: 2.7991e-7 kg; = 1.0 * (p3725)
- Oxyfluorfen [soil, agricultural]: 1.39661e-5 kg; = 1.0 * (p5073+p4043+p3631+p5279+p4455+p4661+p4249)
- Ammonium nitrate; no broadcast in fert. after plant.: 0.00646184 kg; = p2554*4.7142857143
- Cyfluthrin [air, non-urban air or from high stacks]: 2.7991e-7 kg; = 1.0 * (p3741)
- Other single phosphates; unspec. appl. method in fert. in fall bef. plant.; kg P: 3.90217e-6 kg; = p3051
- Butadiene [air, non-urban air or from high stacks]: 2.477e-6 kg; = 1.0 * (p2143*1.125)
- Bifenthrin [soil, agricultural]: 3.49153e-6 kg; = 1.0 * (p4951+p4539+p3509+p5157+p3921+p4333+p4127)
- Acetamiprid: 1.39955e-6 kg; = p3701
- Nitrogen; broadcast w/ incorp. in manure in fall before planting: 0.00610602 kg; = p3382
- Indoxacarb [soil, agricultural]: 9.31074e-6 kg; = 1.0 * (p4009+p4215+p3597+p5039+p4421+p5245+p4627)
- Superphosphate, grades>22%; unspec. appl. method in fert. in spr. bef. plant.; kg P: 1.04218e-6 kg; = p3088
- Plant dry matter; from residue burning: 0.00594648 kg; = p2164
- Potassium; using unspec. method in manure at an unknown time: 4.58302e-6 kg; = p3472
- Ash: 0.00324725 kg; = p2022+p2021
- Other single K nutrients; unspec. appl. method in fert. after plant.; kg K: 2.09548e-5 kg; = p3172
- Pendimethalin [air, non-urban air or from high stacks]: 1.11964e-5 kg; = 1.0 * (p3840)
- Superphosphate, grades<= 22%; unspec. appl. method in fert. in spr. bef. plant.; kg P: 2.61819e-8 kg; = p3086
- Water [air, non-urban air or from high stacks]: 2.63927e-6 m3; = 0.001 * (p2016)
- Etoxazole; broadcast with incorporation: 1.27311e-6 kg; = p3976
- Superphosphate, grades>22%; unspec. appl. method in fert. after plant.; kg P: 1.48163e-6 kg; = p3166
- Anhydrous ammonia; broadcast w/o incorp. in fert. in spr. bef. plant.: 0.000301002 kg; = p2862*1.2142857143
- Nitrogen solution; no broadcast in fert. in spr. bef. plant.; no broadcast in fert. in spr. bef. plant.; kg N: 0.00286503 kg; = p2483
- Pyraflufen-ethyl: 1.16384e-6 kg; = p3650+p5298+p4680+p4062+p5092+p4474+p4268
- Dimethoate [soil, agricultural]: 4.65537e-6 kg; = 1.0 * (p3553+p4171+p5201+p4995+p4583+p4377+p3965)
- Seeds; used in planting and sowing: 0.00992897 kg; = p2179
- Nonvolatile constituents;broadcast w/o incorp. in man. in fal.bef.plant; exc.CNPK,biogenic: 0.0124456 kg; = p3405
- Urea, sulfate; broadcast with incorporation; kg AI: 0.000213458 kg; = p4036
- cis-2-Butene: 7.05214e-7 kg; = p2149*1.1666666667
- Ammonium sulfate; unspec. appl. method in fert. after plant.: 7.34081e-8 kg; = p3142*4.7142857143
- Sodium nitrate; no broadcast in fert. at plant.: 4.58666e-6 kg; = p2525*6.0714285714
- Aqueous ammonia; no broadcast in fert. in fall bef. plant.: 5.69781e-5 kg; = p2435*1.2142857143
- Monoammonium phosphate; broadcast w/o incorp. in fert. after plant.: 0.000381861 kg; = p2966*8.2142857143
- Sodium chlorate [air, non-urban air or from high stacks]: 0.000108045 kg; = 1.0 * (p3867)
- Monoammonium phosphate; no broadcast in fert. after plant.: 0.00211286 kg; = p2576*8.2142857143
- trans-2-Butene: 9.34819e-7 kg; = p2148*1.1666666667
- Pesticides, unspecified [soil, agricultural]: 0.00067988 kg; = 1.0 * (p4307+p4513+p4719+p3689+p5337+p5131+p4101)
- Potassium chloride; unspec. appl. method in fert. after plant.: 0.000363802 kg; = p3170*2.2166666667
- Aqueous ammonia; broadcast w/ incorp. in fert. after plant.: 0.000116439 kg; = p2747*1.2142857143
- Ammonium sulfate; no broadcast in fert. after plant.: 0.00530381 kg; = p2557*4.7142857143
- Prometryn [soil, agricultural]: 6.98305e-5 kg; = 1.0 * (p4466+p4672+p4054+p3642+p5084+p5290+p4260)
- Monoammonium phosphate; unspec. appl. method in fert. after plant.: 0.000117013 kg; = p3161*8.2142857143
- Potassium; broadcast w/ incorp. in manure at an unknown time: 0.00117983 kg; = p3396
- Phosphorous; broadcast w/o incorp. in manure in fall before planting: 0.00184579 kg; = p3402
- Other single phosphates; no broadcast in fert. in fall bef. plant.; kg P: 7.04598e-5 kg; = p2466
- Diammonium phosphate; broadcast w/o incorp. in fert. after plant.: 0.000425583 kg; = p2962*4.7142857143
- Ammonium sulfate; unspec. appl. method in fert. at plant.: 6.8576e-9 kg; = p3103*4.7142857143
- Anhydrous ammonia; no broadcast in fert. in fall bef. plant.: 0.00236799 kg; = p2433*1.2142857143
- Sodium chlorate: 0.000449243 kg; = p4485+p5309+p4691+p3661+p4279+p4073+p5103
- Thiamethoxam: 2.7991e-7 kg; = p3878
- Pyrithiobac sodium salt: 8.39729e-7 kg; = p3860
- Cyfluthrin [soil, agricultural]: 1.16384e-6 kg; = 1.0 * (p3535+p4359+p5183+p4977+p4565+p3947+p4153)
- Etoxazole; banded or side-dressed: 4.79059e-7 kg; = p3564
- I butane; from residue burning: 3.46314e-7 kg; = p2146*1.0208333333
- Phosphorous; applied in sewage sludge: 1.09983e-9 kg; = p3241
- Water: 4115.65 kg; = p2178+p2171+p3418+p2181+p3475+p3399
- Carbon monoxide, fossil [air, non-urban air or from high stacks]: 0.00120005 kg; = 1.0 * (p2028*2.3333333333)
- Nitrogen solution; broadcast w/o incorp. in fert. in spr. bef. plant.; broadcast w/o incorp. in fert. in spr. bef. pl...: 0.000254974 kg; = p2873
- Flonicamid; foliar or directed spray: 2.10214e-6 kg; = p4611
- Butane [air, non-urban air or from high stacks]: 9.97385e-7 kg; = 1.0 * (p2147*1.0208333333)
- Monoammonium phosphate; no broadcast in fert. in spr. bef. plant.: 0.00148619 kg; = p2498*8.2142857143
- Urea; broadcast w/o incorp. in fert. in fall bef. plant.: 0.000277873 kg; = p2841*5
- Ammonium nitrate; broadcast w/o incorp. in fert. at plant.: 5.37219e-5 kg; = p2905*4.7142857143
- Paraquat dichloride: 2.49119e-5 kg; = p3838
- Potassium; broadcast w/o incorp. in manure in fall before planting; biogenic: 0.00519458 kg; = p3403
- Anhydrous ammonia; no broadcast in fert. after plant.: 0.016401 kg; = p2550*1.2142857143
- Sodium nitrate; unspec. appl. method in fert. in spr. bef. plant.: 1.40139e-10 kg; = p3071*6.0714285714
- Glycolaldehyde; from residue burning: 3.30754e-5 kg; = p2135*2.5
- Acrylonitrile: 5.50287e-7 kg; = p2156*1.4722222222
- Gypsum: 2.86908e-6 kg; = p3229
- Anhydrous ammonia; broadcast w/o incorp. in fert. at plant.: 0.000136353 kg; = p2901*1.2142857143
- Flonicamid; broadcast by air: 1.95937e-6 kg; = p3787
- Anhydrous ammonia; broadcast w/ incorp. in fert. after plant.: 0.00483918 kg; = p2745*1.2142857143
- Nitrogen; applied in sewage sludge: 9.21315e-9 kg; = p3240
- Potassium chloride; unspec. appl. method in fert. in fall bef. plant.: 0.00047314 kg; = p3053*2.2166666667
- Diammonium phosphate; no broadcast in fert. in fall bef. plant.: 0.00669266 kg; = p2455*4.7142857143
- Urea, sulfate; in seed furrow; kg AI: 2.64067e-5 kg; = p5066
- Indoxacarb: 2.23928e-6 kg; = p3803
- Potassium chloride; no broadcast in fert. after plant.: 0.00271303 kg; = p2585*2.2166666667
- Phosphorous; broadcast w/ incorp. in manure at an unknown time: 0.000419227 kg; = p3395
- Volatile constituents; broadcast w/ incorp. in man. in fal.bef.plant: 0.0337057 kg; = p3385
- Nitrogen dioxide: 5.64942e-5 kg; = p2039*3.2857142857
- Ammonium sulfate; broadcast w/ incorp. in fert. after plant.: 0.00156491 kg; = p2752*4.7142857143
- Magnesium [soil, agricultural]: 0.000192557 kg; = 1.0 * (p3227)
- Carbon dioxide, in air: 0.0210126 kg; = p2163*3.6666666667
- Benzene [air, non-urban air or from high stacks]: 2.5191e-6 kg; = 1.0 * (p2140*1.0833333333)
- Cyclanilide: 1.11964e-6 kg; = p3740
- Other limestone constituents; applied in limestone: 0.00345457 kg; = p3220
- Bifenthrin: 8.39729e-7 kg; = p3715
- Ammonium nitrate; unspec. appl. method in fert. at plant.: 8.35489e-9 kg; = p3100*4.7142857143
- Monoammonium phosphate; broadcast w/ incorp. in fert. after plant.: 0.000890612 kg; = p2771*8.2142857143
- Nitrogen; broadcast w/ incorp. in manure at an unknown time: 0.00132856 kg; = p3394
- Aqueous ammonia; unspec. appl. method in fert. in fall bef. plant.: 7.88614e-10 kg; = p3020*1.2142857143
- Ammonium sulfate; no broadcast in fert. at plant.: 0.000495468 kg; = p2518*4.7142857143
- Flonicamid; broadcast with incorporation: 2.97058e-6 kg; = p3993
- Aqueous ammonia; broadcast w/o incorp. in fert. after plant.: 3.51208e-5 kg; = p2942*1.2142857143
- Potassium; using unspec. method in manure in fall before planting; biogenic: 2.10634e-5 kg; = p3460
- Other single phosphates; broadcast w/o incorp. in fert. after plant.; kg P: 4.4805e-6 kg; = p2973
- Sodium nitrate; broadcast w/ incorp. in fert. in spr. bef. plant.: 2.98748e-6 kg; = p2681*6.0714285714
- Nitrogen solution; no broadcast in fert. at plant.; no broadcast in fert. at plant.; kg N: 0.00129785 kg; = p2522
- Dioxins and furans (PCDD/F); from residue burning: 4.92505e-13 kg TEQ; = p2047
- Pyrithiobac sodium salt [soil, agricultural]: 3.49153e-6 kg; = 1.0 * (p4478+p5096+p5302+p3654+p4684+p4066+p4272)
- Ammonium nitrate; unspec. appl. method in fert. after plant.: 8.9436e-8 kg; = p3139*4.7142857143
- Diammonium phosphate; broadcast w/ incorp. in fert. after plant.: 0.000992585 kg; = p2767*4.7142857143
- Phosphorous; broadcast w/ incorp. in manure in fall before planting: 0.00192676 kg; = p3383
- Monoammonium phosphate; broadcast w/o incorp. in fert. in spr. bef. plant.: 0.000268601 kg; = p2888*8.2142857143
- Aqueous ammonia; no broadcast in fert. after plant.: 0.000394636 kg; = p2552*1.2142857143
- Formic acid [air, non-urban air or from high stacks]: 1.645e-5 kg; = 1.0 * (p2131*3.8333333333)
- Other single K nutrients; broadcast w/ incorp. in fert. in spr. bef. plant.; kg K: 1.58642e-5 kg; = p2704
- Superphosphate, grades>22%; unspec. appl. method in fert. in fall bef. plant.; kg P: 4.21104e-6 kg; = p3049
- Superphosphate, grades<= 22%; broadcast w/ incorp. in fert. in spr. bef. plant.; kg P: 1.99276e-7 kg; = p2696
- Ammonium sulfate; no broadcast in fert. in fall bef. plant.: 0.00076577 kg; = p2440*4.7142857143
- Pesticide formulation balance; chiseled or injected/knifed in: 2.79065e-5 kg; = p4514
- Urea; broadcast w/ incorp. in fert. after plant.: 0.00638073 kg; = p2763*5
- Ammonia [air, non-urban air or from high stacks]: 3.56259e-5 kg; = 1.0 * (p2159*1.2142857143)
- Particulates, < 10 um: 0.000145617 kg; = p2034+p2036
- Azoxystrobin [soil, agricultural]: 1.16384e-6 kg; = 1.0 * (p3504+p4946+p4328+p3916+p5152+p4534+p4122)
- Acetol; from residue burning: 6.18134e-5 kg; = p2134*2.0555555556
- Anhydrous ammonia; broadcast w/ incorp. in fert. in fall bef. plant.: 0.000698687 kg; = p2628*1.2142857143
- Urea; no broadcast in fert. in spr. bef. plant.: 0.00445965 kg; = p2490*5
- Ethephon: 8.70519e-5 kg; = p3769
- Oxyfluorfen: 3.35891e-6 kg; = p3837
- Aqueous ammonia; broadcast w/o incorp. in fert. in spr. bef. plant.: 7.24265e-6 kg; = p2864*1.2142857143
- Superphosphate, grades>22%; broadcast w/ incorp. in fert. after plant.; kg P: 1.1277e-5 kg; = p2776
- S-Metolachlor: 6.16836e-5 kg; = p4276+p4070+p5100+p4482+p4688+p5306+p3658
- Phosphorous; using unspec. method in manure at an unknown time: 1.62848e-6 kg; = p3471
- Flonicamid; broadcast without incorporation: 1.14699e-6 kg; = p4199
- Superphosphate, grades<= 22%; no broadcast in fert. after plant.; kg P: 6.72101e-7 kg; = p2579
- Ethene [air, non-urban air or from high stacks]: 2.38866e-5 kg; = 1.0 * (p2125*1.1666666667)
- Urea, sulfate; broadcast by air; kg AI: 0.000140794 kg; = p3830
- Ammonium sulfate; unspec. appl. method in fert. in fall bef. plant.: 1.05988e-8 kg; = p3025*4.7142857143
- Ethephon [soil, agricultural]: 0.000361955 kg; = 1.0 * (p4387+p3563+p5005+p3975+p4593+p5211+p4181)
- Urea; unspec. appl. method in fert. after plant.: 2.99312e-7 kg; = p3153*5
- Urea; no broadcast in fert. in fall bef. plant.: 0.00312233 kg; = p2451*5
- Carbon [soil, agricultural]: 0.899077 kg; = 1.0 * (p2167+p3400+p3412+p3457+p2173+p3469+p3381+p3217+p3393+p3242+p3225)
- Pyraflufen-ethyl: 2.7991e-7 kg; = p3856
- Etoxazole; broadcast without incorporation: 4.91566e-7 kg; = p4182
- Potassium; broadcast w/ incorp. in manure in fall before planting; biogenic: 0.00542245 kg; = p3384
- Dicofol: 8.11738e-6 kg; = p3751
- Phosphorous; using unspec. method in manure in fall before planting: 7.48446e-6 kg; = p3459
- Anhydrous ammonia; no broadcast in fert. in spr. bef. plant.: 0.00338222 kg; = p2472*1.2142857143
- Acetic acid [air, non-urban air or from high stacks]: 9.18497e-5 kg; = 1.0 * (p2127*2.5)
- Urea; no broadcast in fert. after plant.: 0.0216256 kg; = p2568*5
- Anhydrous ammonia; unspec. appl. method in fert. after plant.: 2.27e-7 kg; = p3135*1.2142857143
- Trifluralin [soil, agricultural]: 0.000135006 kg; = 1.0 * (p4098+p4510+p5128+p5334+p4716+p4304+p3686)
- Other single phosphates; no broadcast in fert. in spr. bef. plant.; kg P: 1.74379e-5 kg; = p2505
- Acetonitrile [air, non-urban air or from high stacks]: 3.44624e-6 kg; = 1.0 * (p2155*1.7083333333)
- Ammonium nitrate; no broadcast in fert. in spr. bef. plant.: 0.00133257 kg; = p2476*4.7142857143
- Aldicarb [soil, agricultural]: 0.000144316 kg; = 1.0 * (p4941+p3911+p4529+p3499+p4323+p4117+p5147)
- Superphosphate, grades>22%; no broadcast in fert. after plant.; kg P: 2.67532e-5 kg; = p2581
- Acetone [air, non-urban air or from high stacks]: 7.32617e-6 kg; = 1.0 * (p2139*1.6111111111)
- Urea; broadcast w/ incorp. in fert. in fall bef. plant.: 0.000921258 kg; = p2646*5
- Volatile constituents; using unspec. method in man. in fal.bef.plant: 0.000130929 kg; = p3461
- Hydrocyanic acid: 4.6834e-6 kg; = p2154*2.25
- cyclopentane: 2.71543e-8 kg; = p2153*1.0166666667
- Ammonium sulfate; no broadcast in fert. in spr. bef. plant.: 0.00109376 kg; = p2479*4.7142857143
- Sodium nitrate; broadcast w/o incorp. in fert. after plant.: 4.36954e-6 kg; = p2954*6.0714285714
- Aqueous ammonia; unspec. appl. method in fert. in spr. bef. plant.: 1.12638e-9 kg; = p3059*1.2142857143
- Flonicamid; in seed furrow: 3.67489e-7 kg; = p5023
- Nitrogen solution; broadcast w/ incorp. in fert. after plant.; broadcast w/ incorp. in fert. after plant.; kg N: 0.00409919 kg; = p2756
- Nonvolatile constituents; broadcast w/o incorp. in man. at unknown time; exc.CNPK,biogenic: 0.00270793 kg; = p3417
- Pesticide formulation balance; unspec. appl. method: 5.66608e-5 kg; = p5338
- Pesticides, unspecified: 0.000163514 kg; = p3895
- Flonicamid; unspec. appl. method: 2.96071e-7 kg; = p5229
- Superphosphate, grades<= 22%; no broadcast in fert. in fall bef. plant.; kg P: 1.91022e-6 kg; = p2462
- Sodium nitrate; unspec. appl. method in fert. in fall bef. plant.: 9.81151e-11 kg; = p3032*6.0714285714
- Ammonium nitrate; broadcast w/ incorp. in fert. in spr. bef. plant.: 0.000393181 kg; = p2671*4.7142857143
- Nitrogen solution; broadcast w/ incorp. in fert. in fall bef. plant.; broadcast w/ incorp. in fert. in fall bef. plan...: 0.000591847 kg; = p2639
- Monoammonium phosphate; no broadcast in fert. in fall bef. plant.: 0.00600509 kg; = p2459*8.2142857143
- Diammonium phosphate; broadcast w/o incorp. in fert. in fall bef. plant.: 0.00120958 kg; = p2845*4.7142857143
- Diammonium phosphate; no broadcast in fert. in spr. bef. plant.: 0.00165635 kg; = p2494*4.7142857143
- Superphosphate, grades>22%; no broadcast in fert. in fall bef. plant.; kg P: 7.60369e-5 kg; = p2464
- Aldicarb: 3.47088e-5 kg; = p3705
- Acetamiprid: 5.81921e-6 kg; = p4525+p3495+p5143+p4113+p4319+p4937+p3907
- Volatile constituents; broadcast w/o incorp. in man. in fal.bef.plant: 0.0322893 kg; = p3404
- Anhydrous ammonia; unspec. appl. method in fert. in spr. bef. plant.: 4.68121e-8 kg; = p3057*1.2142857143
- Formaldehyde [air, non-urban air or from high stacks]: 3.41286e-5 kg; = 1.0 * (p2128*2.5)
- Superphosphate, grades>22%; broadcast w/o incorp. in fert. in spr. bef. plant.; kg P: 3.40105e-6 kg; = p2893
- Pesticide formulation balance; broadcast without incorporation: 0.000219506 kg; = p4308
- Monoammonium phosphate; unspec. appl. method in fert. in fall bef. plant.: 0.000332571 kg; = p3044*8.2142857143
- Pesticide formulation balance; banded or side-dressed: 0.000213921 kg; = p3690
- Sewage sludge dry matter; applied in sewage sludge: 1.01999e-9 kg; = p3243
- Nonvolatile constituents; using unspec. method in man. at unknown time; exc.CNPK,biogenic: 1.09803e-5 kg; = p3474
- Sodium nitrate; unspec. appl. method in fert. after plant.: 6.79555e-10 kg; = p3149*6.0714285714
- Methanol [air, non-urban air or from high stacks]: 5.39551e-5 kg; = 1.0 * (p2129*2.6666666667)
- Diammonium phosphate; no broadcast in fert. after plant.: 0.00235478 kg; = p2572*4.7142857143
- Flonicamid; banded or side-dressed: 1.11781e-6 kg; = p3581
- Aqueous ammonia; broadcast w/ incorp. in fert. in fall bef. plant.: 1.68117e-5 kg; = p2630*1.2142857143
- Superphosphate, grades<= 22%; unspec. appl. method in fert. in fall bef. plant.; kg P: 1.05791e-7 kg; = p3047
- Superphosphate, grades<= 22%; broadcast w/ incorp. in fert. after plant.; kg P: 2.83303e-7 kg; = p2774
- Anhydrous ammonia; no broadcast in fert. at plant.: 0.00153214 kg; = p2511*1.2142857143
- Nitrogen solution; broadcast w/o incorp. in fert. after plant.; broadcast w/o incorp. in fert. after plant.; kg N: 0.00123641 kg; = p2951
- Anhydrous ammonia; broadcast w/ incorp. in fert. in spr. bef. plant.: 0.000997941 kg; = p2667*1.2142857143
- Phosphorous; broadcast w/o incorp. in manure at an unknown time: 0.00040161 kg; = p3414
- Diammonium phosphate; broadcast w/o incorp. in fert. in spr. bef. plant.: 0.000299355 kg; = p2884*4.7142857143
- Urea, sulfate; unspec. appl. method; kg AI: 2.12748e-5 kg; = p5272
- Paraquat dichloride: 0.000103582 kg; = p4662+p4250+p4456+p5280+p5074+p4044+p3632
- Ammonium nitrate; broadcast w/o incorp. in fert. after plant.: 0.000575074 kg; = p2944*4.7142857143
- Sodium nitrate; broadcast w/o incorp. in fert. in fall bef. plant.: 6.3088e-7 kg; = p2837*6.0714285714
- Diuron: 3.63882e-6 kg; = p3761
- Anhydrous ammonia; broadcast w/ incorp. in fert. at plant.: 0.000452064 kg; = p2706*1.2142857143
- Ammonium nitrate; broadcast w/o incorp. in fert. in spr. bef. plant.: 0.000118592 kg; = p2866*4.7142857143
- Superphosphate, grades<= 22%; broadcast w/o incorp. in fert. after plant.; kg P: 1.2147e-7 kg; = p2969
- Urea, sulfate; broadcast without incorporation; kg AI: 8.24193e-5 kg; = p4242
- Volatile constituents; broadcast w/ incorp. in man. at unknown time: 0.00733375 kg; = p3397
- Propene [air, non-urban air or from high stacks]: 1.10982e-5 kg; = 1.0 * (p2136*1.1666666667)
- Nonvolatile constituents; broadcast w/ incorp. in man. at unknown time; exc.CNPK,biogenic: 0.00282672 kg; = p3398
- Aqueous ammonia; no broadcast in fert. in spr. bef. plant.: 8.13823e-5 kg; = p2474*1.2142857143
- Ammonium nitrate; unspec. appl. method in fert. in spr. bef. plant.: 1.84436e-8 kg; = p3061*4.7142857143
- Monoammonium phosphate; broadcast w/o incorp. in fert. in fall bef. plant.: 0.00108531 kg; = p2849*8.2142857143
- Ammonium nitrate; broadcast w/ incorp. in fert. in fall bef. plant.: 0.000275277 kg; = p2632*4.7142857143
- Ammonium sulfate; unspec. appl. method in fert. in spr. bef. plant.: 1.51383e-8 kg; = p3064*4.7142857143
- Diammonium phosphate; unspec. appl. method in fert. after plant.: 0.000130411 kg; = p3157*4.7142857143
- Aqueous ammonia; broadcast w/ incorp. in fert. in spr. bef. plant.: 2.40122e-5 kg; = p2669*1.2142857143
- Ammonium nitrate; broadcast w/o incorp. in fert. in fall bef. plant.: 8.30299e-5 kg; = p2827*4.7142857143
- Pesticide formulation balance; broadcast by air: 0.000374976 kg; = p3896
- Other single phosphates; broadcast w/o incorp. in fert. in spr. bef. plant.; kg P: 3.15159e-6 kg; = p2895
- Pendimethalin [soil, agricultural]: 4.65537e-5 kg; = 1.0 * (p4252+p4664+p5076+p3634+p4046+p5282+p4458)
- Superphosphate, grades<= 22%; unspec. appl. method in fert. after plant.; kg P: 3.72219e-8 kg; = p3164
- Pesticide formulation balance; foliar or directed spray: 0.000402299 kg; = p4720
- Flumioxazin [air, non-urban air or from high stacks]: 5.59819e-7 kg; = 1.0 * (p3781)
- S-Metolachlor: 1.48352e-5 kg; = p3864
- Nitrogen; using unspec. method in manure in fall before planting: 2.37188e-5 kg; = p3458
- Nitrogen solution; no broadcast in fert. in fall bef. plant.; no broadcast in fert. in fall bef. plant.; kg N: 0.00200589 kg; = p2444
- Pesticide formulation balance; broadcast with incorporation: 0.000568498 kg; = p4102
- Potassium; in below-ground residue; biogenic: 0.000909728 kg; = p2176
- Diammonium phosphate; unspec. appl. method in fert. in fall bef. plant.: 0.00037065 kg; = p3040*4.7142857143
- Nitrogen; in above-ground residue left on field: 0.0226081 kg; = p2168
- Sulfur [soil, agricultural]: 4.98881e-7 kg; = 1.0 * (p3230)
- Azoxystrobin [air, non-urban air or from high stacks]: 2.7991e-7 kg; = 1.0 * (p3710)
- Propanenitrile: 1.05194e-6 kg; = p2157*1.5277777778
- Nitrogen; using unspec. method in manure at an unknown time: 5.16077e-6 kg; = p3470
- Oxygen; applied in dolomite: 0.00076202 kg; = p3228
- Dimethoate: 1.11964e-6 kg; = p3759
- Monoammonium phosphate; broadcast w/ incorp. in fert. in fall bef. plant.: 0.00253126 kg; = p2654*8.2142857143
- Potassium; in above-ground residue left on field; biogenic: 0.00215423 kg; = p2170
- Urea, sulfate; banded or side-dressed; kg AI: 8.03223e-5 kg; = p3624
- Ammonium nitrate; no broadcast in fert. at plant.: 0.000603649 kg; = p2515*4.7142857143
- Nitrogen solution; unspec. appl. method in fert. after plant.; unspec. appl. method in fert. after plant.; kg N: 1.92288e-7 kg; = p3146
- Etoxazole; in seed furrow: 1.57495e-7 kg; = p5006
- Ammonium nitrate; broadcast w/ incorp. in fert. after plant.: 0.0019066 kg; = p2749*4.7142857143
- Potassium chloride; broadcast w/ incorp. in fert. in spr. bef. plant.: 0.000275423 kg; = p2702*2.2166666667
- Diuron [soil, agricultural]: 1.51299e-5 kg; = 1.0 * (p4173+p4997+p4379+p3967+p5203+p4585+p3555)
- Superphosphate, grades<= 22%; broadcast w/ incorp. in fert. in fall bef. plant.; kg P: 8.05194e-7 kg; = p2657
- Superphosphate, grades>22%; broadcast w/o incorp. in fert. in fall bef. plant.; kg P: 1.37423e-5 kg; = p2854
- Superphosphate, grades<= 22%; broadcast w/o incorp. in fert. in spr. bef. plant.; kg P: 8.54419e-8 kg; = p2891
- Ammonium sulfate; broadcast w/ incorp. in fert. in spr. bef. plant.: 0.000322718 kg; = p2674*4.7142857143
- Methane: 5.40803e-5 kg; = p2025*1.3333333333
- Aqueous ammonia; broadcast w/o incorp. in fert. in fall bef. plant.: 5.07079e-6 kg; = p2825*1.2142857143
- Potassium chloride; no broadcast in fert. in fall bef. plant.: 0.00352841 kg; = p2468*2.2166666667
- Urea; unspec. appl. method in fert. in fall bef. plant.: 4.3215e-8 kg; = p3036*5
- Mepiquat chloride [soil, agricultural]: 1.39661e-5 kg; = 1.0 * (p4022+p4228+p5258+p3610+p5052+p4640+p4434)
- Ammonium nitrate; unspec. appl. method in fert. in fall bef. plant.: 1.29129e-8 kg; = p3022*4.7142857143
- Ethane [air, non-urban air or from high stacks]: 1.49183e-5 kg; = 1.0 * (p2126*1.25)
- Ammonium sulfate; broadcast w/ incorp. in fert. in fall bef. plant.: 0.000225944 kg; = p2635*4.7142857143
- Sulfuric acid [soil, agricultural]: 2.21674e-7 kg; = 1.0 * (p3231)
- Particulates, < 2.5 um [air, non-urban air or from high stacks]: 0.00010162 kg; = 1.0 * (p2035+p2033)
- Etoxazole; foliar or directed spray: 9.00916e-7 kg; = p4594
- Anhydrous ammonia; unspec. appl. method in fert. in fall bef. plant.: 3.27745e-8 kg; = p3018*1.2142857143
- Ammonium nitrate; no broadcast in fert. in fall bef. plant.: 0.000932969 kg; = p2437*4.7142857143
- Other single phosphates; broadcast w/ incorp. in fert. in spr. bef. plant.; kg P: 7.35042e-6 kg; = p2700
- Flonicamid; chiseled or injected/knifed in: 1.4582e-7 kg; = p4405
- Monoammonium phosphate; unspec. appl. method in fert. in spr. bef. plant.: 8.23072e-5 kg; = p3083*8.2142857143
- Thidiazuron [soil, agricultural]: 2.79322e-5 kg; = 1.0 * (p5321+p4497+p5115+p4703+p4085+p3673+p4291)
- Pesticide formulation balance; in seed furrow: 7.03286e-5 kg; = p5132
- Anhydrous ammonia; unspec. appl. method in fert. at plant.: 2.12058e-8 kg; = p3096*1.2142857143
- Thidiazuron: 6.71783e-6 kg; = p3879
- Other single K nutrients; no broadcast in fert. after plant.; kg K: 0.000156269 kg; = p2587
- Urea; no broadcast in fert. at plant.: 0.00202021 kg; = p2529*5
- Abamectin [soil, agricultural]: 2.32768e-6 kg; = 1.0 * (p3904+p5140+p4110+p4934+p4316+p4522+p3492)
- Ammonium nitrate; broadcast w/ incorp. in fert. at plant.: 0.00017811 kg; = p2710*4.7142857143
- Ammonium sulfate; broadcast w/ incorp. in fert. at plant.: 0.00014619 kg; = p2713*4.7142857143
- Nonvolatile constituents; broadcast w/incorp. in man. in fal.bef.plant; exc.CNPK,biogenic: 0.0129915 kg; = p3386
- Ethyne [air, non-urban air or from high stacks]: 4.46875e-6 kg; = 1.0 * (p2132*1.0833333333)
- Potassium chloride; broadcast w/ incorp. in fert. after plant.: 0.000827877 kg; = p2780*2.2166666667
- Nitrogen solution; unspec. appl. method in fert. in fall bef. plant.; unspec. appl. method in fert. in fall bef. plan...: 2.77628e-8 kg; = p3029
- Nitrogen; in below-ground residue: 0.00954737 kg; = p2174
- Endothall: 5.59819e-7 kg; = p3765
- Ammonium sulfate; broadcast w/o incorp. in fert. in fall bef. plant.: 6.815e-5 kg; = p2830*4.7142857143
- Nitrogen solution; broadcast w/ incorp. in fert. at plant.; broadcast w/ incorp. in fert. at plant.; kg N: 0.000382936 kg; = p2717
- Nitrogen solution; broadcast w/o incorp. in fert. in fall bef. plant.; broadcast w/o incorp. in fert. in fall bef. pl...: 0.000178515 kg; = p2834
- Phosphorous; in above-ground residue left on field: 0.00284216 kg; = p2169
- Superphosphate, grades>22%; broadcast w/ incorp. in fert. in spr. bef. plant.; kg P: 7.93224e-6 kg; = p2698
- Anhydrous ammonia; broadcast w/o incorp. in fert. after plant.: 0.00145961 kg; = p2940*1.2142857143
- Superphosphate, grades<= 22%; broadcast w/o incorp. in fert. in fall bef. plant.; kg P: 3.45237e-7 kg; = p2852
- Superphosphate, grades>22%; no broadcast in fert. in spr. bef. plant.; kg P: 1.88182e-5 kg; = p2503
- Potassium chloride; unspec. appl. method in fert. in spr. bef. plant.: 0.000121032 kg; = p3092*2.2166666667
- Urea; broadcast w/ incorp. in fert. in spr. bef. plant.: 0.00131584 kg; = p2685*5
- Other single phosphates; broadcast w/o incorp. in fert. in fall bef. plant.; kg P: 1.27343e-5 kg; = p2856
- Volatile constituents; using unspec. method in man. at unknown time: 2.84878e-5 kg; = p3473
- Other single K nutrients; unspec. appl. method in fert. in fall bef. plant.; kg K: 2.72525e-5 kg; = p3055
- Aqueous ammonia; unspec. appl. method in fert. at plant.: 5.10248e-10 kg; = p3098*1.2142857143
- Carfentrazone ethyl ester [soil, agricultural]: 1.16384e-6 kg; = 1.0 * (p5167+p4549+p3519+p4343+p3931+p4961+p4137)
- Urea; broadcast w/o incorp. in fert. at plant.: 0.000179789 kg; = p2919*5
- isobutene: 1.91884e-6 kg; = p2150*1.1666666667
- Diammonium phosphate; broadcast w/ incorp. in fert. in fall bef. plant.: 0.00282109 kg; = p2650*4.7142857143
- Other single K nutrients; no broadcast in fert. in fall bef. plant.; kg K: 0.000203234 kg; = p2470
- Phosphorous; in below-ground residue: 0.00120024 kg; = p2175
- Calcium [soil, agricultural]: 0.0220125 kg; = 1.0 * (p3226+p3218)
- Isoprene [air, non-urban air or from high stacks]: 6.19463e-6 kg; = 1.0 * (p2145*1.1333333333)
- Phenol [air, non-urban air or from high stacks]: 8.51495e-6 kg; = 1.0 * (p2133*1.3055555556)
- Other single phosphates; no broadcast in fert. after plant.; kg P: 2.47909e-5 kg; = p2583
- Phorate [soil, agricultural]: 1.28023e-5 kg; = 1.0 * (p5285+p4461+p3637+p5079+p4255+p4049+p4667)
- Tribufos: 2.04334e-5 kg; = p3888
- Urea, sulfate; chiseled or injected/knifed in; kg AI: 1.04782e-5 kg; = p4448
- Sodium nitrate; broadcast w/ incorp. in fert. at plant.: 1.35332e-6 kg; = p2720*6.0714285714
- Superphosphate, grades<= 22%; no broadcast in fert. in spr. bef. plant.; kg P: 4.72756e-7 kg; = p2501
- Potassium; broadcast w/o incorp. in manure at an unknown time: 0.00113025 kg; = p3415
- Diammonium phosphate; unspec. appl. method in fert. in spr. bef. plant.: 9.17312e-5 kg; = p3079*4.7142857143
- Ammonium sulfate; broadcast w/o incorp. in fert. at plant.: 4.40943e-5 kg; = p2908*4.7142857143
- Urea; broadcast w/o incorp. in fert. after plant.: 0.00192458 kg; = p2958*5
- Urea; broadcast w/ incorp. in fert. at plant.: 0.000596072 kg; = p2724*5
- Abamectin: 5.59819e-7 kg; = p3698
- Urea; unspec. appl. method in fert. at plant.: 2.7961e-8 kg; = p3114*5
- Nitrogen solution; broadcast w/ incorp. in fert. in spr. bef. plant.; broadcast w/ incorp. in fert. in spr. bef. plan...: 0.00084534 kg; = p2678
- BARBAN: 2.32768e-6 kg; = p5153+p3505+p4947+p3917+p4329+p4535+p4123
- Urea, sulfate; foliar or directed spray; kg AI: 0.000151054 kg; = p4654
- Prometryn: 1.67946e-5 kg; = p3848
- Urea; broadcast w/o incorp. in fert. in spr. bef. plant.: 0.000396888 kg; = p2880*5
- Plant dry matter; in below-ground residue: 0.286575 kg; = p2177
- Monoammonium phosphate; broadcast w/ incorp. in fert. in spr. bef. plant.: 0.000626456 kg; = p2693*8.2142857143
- Superphosphate, grades>22%; broadcast w/o incorp. in fert. after plant.; kg P: 4.83515e-6 kg; = p2971
- Other single phosphates; unspec. appl. method in fert. in spr. bef. plant.; kg P: 9.65739e-7 kg; = p3090
- Etoxazole; broadcast by air: 8.39729e-7 kg; = p3770
- Sodium nitrate; broadcast w/ incorp. in fert. in fall bef. plant.: 2.09162e-6 kg; = p2642*6.0714285714
- Nitrogen solution; unspec. appl. method in fert. at plant.; unspec. appl. method in fert. at plant.; kg N: 1.7963e-8 kg; = p3107
- Sodium nitrate; unspec. appl. method in fert. at plant.: 6.34824e-11 kg; = p3110*6.0714285714
- Nitrogen; broadcast w/o incorp. in manure in fall before planting: 0.00584943 kg; = p3401
- Other single K nutrients; broadcast w/ incorp. in fert. after plant.; kg K: 4.76852e-5 kg; = p2782
- Sodium nitrate; broadcast w/ incorp. in fert. after plant.: 1.44868e-5 kg; = p2759*6.0714285714
- Etoxazole; chiseled or injected/knifed in: 6.24945e-8 kg; = p4388
- Other single K nutrients; no broadcast in fert. in spr. bef. plant.; kg K: 5.19885e-5 kg; = p2509
- Zinc compounds: 1.07053e-7 kg; = p3232
- Acetaldehyde [air, non-urban air or from high stacks]: 2.04183e-5 kg; = 1.0 * (p2130*1.8333333333)
- Etoxazole; unspec. appl. method: 1.26887e-7 kg; = p5212
- Phorate: 3.079e-6 kg; = p3843

## Sampling procedure
A delete-a-group jackknife is used by the USDA to estimate the ARMS sample means and RSEs, based on a 15 sample delete-a-group jackknife. Because of this relatively small sample size, a Students t distribution is used to represent ARMS data probability density functions. Other representations of uncertainty are described in Cooper, J.S., Kahn, E., Noon, M. (2012). LCA Digital Commons Unit Process Data: field crop production Version 1. Prepared for the US Department of Agriculture National Agricultural Library. Retrieved from https://www.lcacommons.gov/discovery/docs/LCA%20Digital%20Commons%20Unit%20Process%20Data%20final%20updated.pdf

## Extrapolations
Data represent an aggregation of processes applied in California in 2007. Data development is demonstrated by parameterization (exlicitly presents all raw and uncertainty data and all calculations). Flow data quality according to the LCADC convention is provided for all flows.
