# winter wheat; at harvest in 1997; at farm; 86%-90% moisture

Dataset: EcoSpold 2, unit process
Geography: GLO
Time period: 1997-01-02 to 1998-01-01
Scenario: Business-as-Usual
System model: Allocation, ecoinvent default
Generated by: cooperjs@u.washington.edu
isCopyrightProtected: false

## General comment
This unit process/ gate-to-gate dataset represents the production of 1 kg winter wheat coproduced with residue. The process technologies are an aggregation of those applied in Oklahoma in 1997. Applicable classifications include ISIC 0111, NAIC 111140, UNSPSC 50221101; this dataset was prepared in ILCD format using the UWDFE Lab Excel to ILCD File Generator (beta version, August 2013)

Exchange "Parathion-methyl-soil agricultural" is the result of combining the following original LCA Commons flows: "Methyl parathion; unspec. appl. method; kg AI", "Methyl parathion; foliar or directed spray; kg AI", "Methyl parathion; broadcast with incorporation; kg AI".
Exchange "Dimethoate-soil agricultural" is the result of combining the following original LCA Commons flows: "Dimethoate; unspec. appl. method; kg AI", "Dimethoate; foliar or directed spray; kg AI", "Dimethoate; broadcast with incorporation; kg AI".
Exchange "NMVOC, non-methane volatile organic compounds, unspecified origin-air low population density" is the result of combining the following original LCA Commons flows: "NMVOCs; from residue burning; kg C, biogenic", "NMVOCs; from residue burning; kg except C, biogenic".
Exchange "Chlorsulfuron-soil agricultural" is the result of combining the following original LCA Commons flows: "Chlorsulfuron; foliar or directed spray; kg AI", "Chlorsulfuron; broadcast with incorporation; kg AI", "Chlorsulfuron; unspec. appl. method; kg AI".
Exchange "Carbon-soil agricultural" is the result of combining the following original LCA Commons flows: "Carbon; in below-ground residue; biogenic", "Carbon; applied in dolomite", "Carbon; applied in limestone", "Carbon; applied in sewage sludge", "Carbon; in above-ground residue left on field; biogenic".
Exchange "Particulates, < 2.5 um-air low population density" is the result of combining the following original LCA Commons flows: "PM2.5; from residue burning; kg except C, biogenic", "PM2.5; from residue burning; kg C, biogenic".
Exchange "Pesticides, unspecified-soil agricultural" is the result of combining the following original LCA Commons flows: "Unspecified pesticide; unspec. appl. method; kg AI", "Unspecified pesticide; broadcast with incorporation; kg AI", "Unspecified pesticide; foliar or directed spray; kg AI".
Exchange "Ash-soil agricultural" is the result of combining the following original LCA Commons flows: "Ash; from residue burning; kg C, biogenic", "Ash; from residue burning; kg except C, biogenic".
Exchange "Water-soil agricultural" is the result of combining the following original LCA Commons flows: "Water; in below-ground residue; biogenic", "Water; from irrigation and applied with manure and sewage sludge", "Water; in above-ground residue left on field; biogenic".
Exchange "Metsulfuron-methyl-soil agricultural" is the result of combining the following original LCA Commons flows: "Metsulfuron-methyl; broadcast with incorporation; kg AI", "Metsulfuron-methyl; unspec. appl. method; kg AI", "Metsulfuron-methyl; foliar or directed spray; kg AI".
Exchange "Particulates, < 10 um-air low population density" is the result of combining the following original LCA Commons flows: "PM10; from residue burning; kg C, biogenic", "PM10; from residue burning; kg except C, biogenic".
Exchange "Triasulfuron-soil agricultural" is the result of combining the following original LCA Commons flows: "Triasulfuron; foliar or directed spray; kg AI", "Triasulfuron; broadcast with incorporation; kg AI", "Triasulfuron; unspec. appl. method; kg AI".
Exchange "Calcium-soil agricultural" is the result of combining the following original LCA Commons flows: "Calcium; applied in dolomite", "Calcium; applied in limestone".
Exchange "2,4-D-soil agricultural" is the result of combining the following original LCA Commons flows: "2,4-D; foliar or directed spray; kg AI", "2,4-D; broadcast with incorporation; kg AI", "2,4-D; unspec. appl. method; kg AI".
Exchange "Transformation, from arable-c19fb2d9-98eb-4cd3-8761-81b71d8a9a1b land" was originally named: "Transformation; from arable, from unspec. use to wheat" in this dataset.
Exchange "Acetaldehyde-2bdf9967-6dae-4183-88d1-8f612548c51e low population density" was originally named: "Acetaldehyde; from residue burning; kg C, biogenic" in this dataset.
Exchange "isobutene-2bdf9967-6dae-4183-88d1-8f612548c51e low population density" was originally named: "I butene; from residue burning; kg C, biogenic" in this dataset.
Exchange "Phosphorus-c19fb2d9-98eb-4cd3-8761-81b71d8a9a1b unspecified" was originally named: "Phosphorous; from plant uptake; biogenic" in this dataset.
Exchange "Butane-2bdf9967-6dae-4183-88d1-8f612548c51e low population density" was originally named: "N butane; from residue burning; kg C, biogenic" in this dataset.
Exchange "Furan-2bdf9967-6dae-4183-88d1-8f612548c51e low population density" was originally named: "Furan; from residue burning; kg C, biogenic" in this dataset.
Exchange "Water, unspecified origin-c19fb2d9-98eb-4cd3-8761-81b71d8a9a1b in water" was originally named: "Water; from plant uptake; biogenic" in this dataset.
Exchange "Transformation, to arable-c19fb2d9-98eb-4cd3-8761-81b71d8a9a1b land" was originally named: "Transformation; to arable, to wheat" in this dataset.
Exchange "Sulfur-be1c0329-f1a8-4524-8420-a86d2a8dd358 agricultural" was originally named: "Sulfur; as secondary application" in this dataset.
Exchange "Propane-2bdf9967-6dae-4183-88d1-8f612548c51e low population density" was originally named: "Propane; from residue burning; kg C, biogenic" in this dataset.
Exchange "Triasulfuron-2bdf9967-6dae-4183-88d1-8f612548c51e low population density" was originally named: "Triasulfuron; broadcast by air; kg AI" in this dataset.
Exchange "Methane-2bdf9967-6dae-4183-88d1-8f612548c51e low population density" was originally named: "Methane; from residue burning; kg C, biogenic" in this dataset.
Exchange "Chlorsulfuron-2bdf9967-6dae-4183-88d1-8f612548c51e low population density" was originally named: "Chlorsulfuron; broadcast by air; kg AI" in this dataset.
Exchange "Phenol-2bdf9967-6dae-4183-88d1-8f612548c51e low population density" was originally named: "Phenol; from residue burning; kg C, biogenic" in this dataset.
Exchange "Formic acid-2bdf9967-6dae-4183-88d1-8f612548c51e low population density" was originally named: "Formic acid; from residue burning; kg C, biogenic" in this dataset.
Exchange "Nitrogen dioxide-2bdf9967-6dae-4183-88d1-8f612548c51e low population density" was originally named: "Nitrogen dioxide; from residue burning; kg N, biogenic" in this dataset.
Exchange "Metsulfuron-methyl-2bdf9967-6dae-4183-88d1-8f612548c51e low population density" was originally named: "Metsulfuron-methyl; broadcast by air; kg AI" in this dataset.
Exchange "Carbon dioxide-c19fb2d9-98eb-4cd3-8761-81b71d8a9a1b unspecified" was originally named: "Carbon dioxide; from plant uptake; kg C, biogenic" in this dataset.
Exchange "Ethyne-2bdf9967-6dae-4183-88d1-8f612548c51e low population density" was originally named: "Acetylene; from residue burning; kg C, biogenic" in this dataset.
Exchange "Ethene-2bdf9967-6dae-4183-88d1-8f612548c51e low population density" was originally named: "Ethylene; from residue burning; kg C, biogenic" in this dataset.
Exchange "Butadiene-2bdf9967-6dae-4183-88d1-8f612548c51e low population density" was originally named: "1,3 butadiene; from residue burning; kg C, biogenic" in this dataset.
Exchange "Parathion-methyl-2bdf9967-6dae-4183-88d1-8f612548c51e low population density" was originally named: "Methyl parathion; broadcast by air; kg AI" in this dataset.
Exchange "Ethane-2bdf9967-6dae-4183-88d1-8f612548c51e low population density" was originally named: "Ethane; from residue burning; kg C, biogenic" in this dataset.
Exchange "Hydrocyanic acid-2bdf9967-6dae-4183-88d1-8f612548c51e low population density" was originally named: "Hydrogen cyanide; from residue burning; kg C, biogenic" in this dataset.
Exchange "Methanol-2bdf9967-6dae-4183-88d1-8f612548c51e low population density" was originally named: "Methanol; from residue burning; kg C, biogenic" in this dataset.
Exchange "Carbon monoxide, fossil-2bdf9967-6dae-4183-88d1-8f612548c51e low population density" was originally named: "Carbon monoxide; from residue burning; kg C, biogenic" in this dataset.
Exchange "Dinitrogen monoxide-2bdf9967-6dae-4183-88d1-8f612548c51e low population density" was originally named: "Dinitrogen monoxide; from residue burning; kg N, biogenic" in this dataset.
Exchange "Pentane-2bdf9967-6dae-4183-88d1-8f612548c51e low population density" was originally named: "N pentane; from residue burning; kg C, biogenic" in this dataset.
Exchange "Acetone-2bdf9967-6dae-4183-88d1-8f612548c51e low population density" was originally named: "Acetone; from residue burning; kg C, biogenic" in this dataset.
Exchange "Acetonitrile-2bdf9967-6dae-4183-88d1-8f612548c51e low population density" was originally named: "Acetonitrile; from residue burning; kg C, biogenic" in this dataset.
Exchange "Benzene-2bdf9967-6dae-4183-88d1-8f612548c51e low population density" was originally named: "Benzene; from residue burning; kg C, biogenic" in this dataset.
Exchange "Acetic acid-2bdf9967-6dae-4183-88d1-8f612548c51e low population density" was originally named: "Acetic acid; from residue burning; kg C, biogenic" in this dataset.
Exchange "trans-2-Butene-2bdf9967-6dae-4183-88d1-8f612548c51e low population density" was originally named: "Trans 2 butene; from residue burning; kg C, biogenic" in this dataset.
Exchange "Dimethoate-2bdf9967-6dae-4183-88d1-8f612548c51e low population density" was originally named: "Dimethoate; broadcast by air; kg AI" in this dataset.
Exchange "Carbon dioxide, in air-2bdf9967-6dae-4183-88d1-8f612548c51e low population density" was originally named: "Carbon dioxide; from residue burning; kg C, biogenic" in this dataset.
Exchange "Toluene-2bdf9967-6dae-4183-88d1-8f612548c51e low population density" was originally named: "Toluene; from residue burning; kg C, biogenic" in this dataset.
Exchange "Acrylonitrile-2bdf9967-6dae-4183-88d1-8f612548c51e low population density" was originally named: "Propenenitrile; from residue burning; kg C, biogenic" in this dataset.
Exchange "Water-2bdf9967-6dae-4183-88d1-8f612548c51e low population density" was originally named: "Water; from residue burning; biogenic" in this dataset.
Exchange "1-Butene-2bdf9967-6dae-4183-88d1-8f612548c51e low population density" was originally named: "1 butene; from residue burning; kg C, biogenic" in this dataset.
Exchange "2,4-D-2bdf9967-6dae-4183-88d1-8f612548c51e low population density" was originally named: "2,4-D; broadcast by air; kg AI" in this dataset.
Exchange "Zinc compounds-be1c0329-f1a8-4524-8420-a86d2a8dd358 agricultural" was originally named: "Zinc compounds; as secondary application" in this dataset.
Exchange "cis-2-Butene-2bdf9967-6dae-4183-88d1-8f612548c51e low population density" was originally named: "Cis 2 butene; from residue burning; kg C, biogenic" in this dataset.
Exchange "Ammonia-2bdf9967-6dae-4183-88d1-8f612548c51e low population density" was originally named: "Ammonia; from residue burning; kg N, biogenic" in this dataset.
Exchange "Isoprene-2bdf9967-6dae-4183-88d1-8f612548c51e low population density" was originally named: "Isoprene; from residue burning; kg C, biogenic" in this dataset.
Exchange "Occupation, arable-c19fb2d9-98eb-4cd3-8761-81b71d8a9a1b land" was originally named: "Occupation; arable, as wheat" in this dataset.
Exchange "Sulfur dioxide-2bdf9967-6dae-4183-88d1-8f612548c51e low population density" was originally named: "Sulfur dioxide; from residue burning; biogenic" in this dataset.
Exchange "Magnesium-be1c0329-f1a8-4524-8420-a86d2a8dd358 agricultural" was originally named: "Magnesium; applied in dolomite" in this dataset.
Exchange "Propene-2bdf9967-6dae-4183-88d1-8f612548c51e low population density" was originally named: "Propylene; from residue burning; kg C, biogenic" in this dataset.
Exchange "isopentane-2bdf9967-6dae-4183-88d1-8f612548c51e low population density" was originally named: "I pentane; from residue burning; kg C, biogenic" in this dataset.
Exchange "Sulfuric acid-be1c0329-f1a8-4524-8420-a86d2a8dd358 agricultural" was originally named: "Sulfuric acid; as secondary application" in this dataset.
Exchange "Formaldehyde-2bdf9967-6dae-4183-88d1-8f612548c51e low population density" was originally named: "Formaldehyde; from residue burning; kg C, biogenic" in this dataset.

## Geography
The unit process is assumed to represent production in Oklahoma (US State).

## Technology
This process produces winter wheat; at harvest in 1997; at farm; 86%-90% moisture. The process is assumed to represent production in Oklahoma (US State). Yields and related inputs and outputs represent a single year of operation, in 1997. This dataset includes consideration of residue burning; soil preparation; planting or sowing; irrigation; application, storage, and transport of fertilizers, manures, liming materials, secondary materials, and pesticides; and harvest. Fate and transport of applications are not included as described in Cooper, J.S., Kahn, E., Noon, M. (2012) LCA Digital Commons Unit Process Data: field crop production Version 1 which is available at https://www.lcacommons.gov/discovery/docs/LCA%20Digital%20Commons%20Unit%20Process%20Data%20final%20updated.pdf

## Time period
Start and end dates match the underlying data obtained from the USDA Agricultural Resource Management Survey (ARMS).
## Parameters
- p0840: 0.0887185; = p0839*p0831
- p1037: 0.407994
- p0732: 0
- p0493: 0; = SQRT(2)*(IF((2*p0361-1)<0;-1;IF((2*p0361-1)>0;1;0))*SQRT(SQRT((2/(pi()*0.140012289)+LN(1-(2*p0361-1)^2)/2)^2-LN(1-(2*p0361-1)^2)/0.140012289)-(2/(pi()*0.140012289)+LN(1-(2*p0361-1)^2)/2)))
- p3025: 6.11871e-6; = p2244*p1023
- p2804: 0; = p2413*(p1019+p1021)
- p2523: 4.68074e-5; = p2327*p1014
- p2648: 0.000291376; = p2257*(p1019+p1021)
- p2944: 0.000329403; = p2358*(p1020+p1022)
- p2608: 0; = p2412*p1014
- p0026: 87.245
- p0516: 0; = SQRT(2)*(IF((2*p0384-1)<0;-1;IF((2*p0384-1)>0;1;0))*SQRT(SQRT((2/(pi()*0.140012289)+LN(1-(2*p0384-1)^2)/2)^2-LN(1-(2*p0384-1)^2)/0.140012289)-(2/(pi()*0.140012289)+LN(1-(2*p0384-1)^2)/2)))
- p0246: 8.882
- p3297: 0; = if(p1273+p1274+p1275+p1276=0;0;p1273/(p1273+p1274+p1275+p1276))
- p1223: 0.56
- p0943: 0; = if(and(p0683=0;p0949=0);p0937;0)
- p2743: 0; = p2352*(p1128+p1130)
- p0446: 0; = SQRT(2)*(IF((2*p0314-1)<0;-1;IF((2*p0314-1)>0;1;0))*SQRT(SQRT((2/(pi()*0.140012289)+LN(1-(2*p0314-1)^2)/2)^2-LN(1-(2*p0314-1)^2)/0.140012289)-(2/(pi()*0.140012289)+LN(1-(2*p0314-1)^2)/2)))
- p1109: 2.38944e7; = IF(p1071=0;p1105*p1103*p1095;0)
- p2547: 0; = p2351*p1123
- p1963i: 0; = p1706*p1910+p1707*p1911+p1708*p1912+p1709*p1913+p1710*p1914+p1711*p1915+p1712*p1916+p1713*p1917+p1714*p1918+p1715*p1919+p1716*p1920+p1717*p1921+p1718*p1922+p1719*p1923+p1720*p1924+p1721*p1925+p1722*p1926+p1723*p1927+p1724*p1928
- p1638: 0
- p3127: 2.36708e-6; = p2346*p1082
- p1994: 750
- p0897: 0
- p4967: 0; = p1794*p3483
- p1315: 0; = p1311*p1252/p0818
- p1327: 0.0472941; = if(p1318=0;if(p1327a=0;1;if(p1327a<0;0;p1327a));0)
- p3318: 0; = if(and(p1232=0;p3253<>0);p3253*(p3262-p3313)/p3316;0)
- p4103: 0; = p1754*p3479
- p1923: 0
- p2571: 4.32895e-5; = p2375*p1073
- p0384: 0.5
- p2665: 1.27988e-5; = p2274*(p1128+p1130)
- p3240: 5.27096e-9; = p3234*p1188*p3235/p0818
- p3476: 0; = if(p1328+p1330+p1332+p1334+p1336+p1338+p1340+p1342+p1344=0;0;p1328/(p1328+p1330+p1332+p1334+p1336+p1338+p1340+p1342+p1344))
- p2588: 0; = p2392*p1123
- p3184: 0; = p2403*p1023
- p2383: 5.16673e-7; = p2229*p2212
- p1621: 0
- p2573: 1.26785e-5; = p2377*p1073
- p2442: 5.25012e-5; = p2246*p1014
- p2137: 5.88716e-7; = p2015*p2065*p2099/(p0818*1000)
- p4309: 0; = p1754*p3480
- p4927: 0; = p1754*p3483
- p1567: 0
- p0005: 1.60934
- p2745: 0.00051592; = p2354*(p1019+p1021)
- p2139: 3.46384e-6; = p2015*p2067*p2101/(p0818*1000)
- p0611: 0; = IF(p0347<0.5;-SQRT(p0007*EXP(p0479^2*p0008)-p0007);SQRT(p0007*EXP(p0479^2*p0008)-p0007))
- p1161: 6.7e6; = p0801
- p1727: 0
- p0219: 21.184
- p0439: 0; = SQRT(2)*(IF((2*p0307-1)<0;-1;IF((2*p0307-1)>0;1;0))*SQRT(SQRT((2/(pi()*0.140012289)+LN(1-(2*p0307-1)^2)/2)^2-LN(1-(2*p0307-1)^2)/0.140012289)-(2/(pi()*0.140012289)+LN(1-(2*p0307-1)^2)/2)))
- p3483: 0; = if(p1328+p1330+p1332+p1334+p1336+p1338+p1340+p1342+p1344=0;0;p1342/(p1328+p1330+p1332+p1334+p1336+p1338+p1340+p1342+p1344))
- p1080: 0; = IF(p1071=0;IF(p1073+p1078+p1079=1;0;IF(p1073+p1078+p1079+p1076>1;1-(p1073+p1078+p1079);p1076));0)
- p2552: 2.00373e-5; = p2356*p1014
- p2739: 6.6358e-6; = p2348*(p1078+p1080)
- p3680: 0; = p1949*p3476
- p0957: 0; = if(and(p0683>0;or(p0807=56;p0807=100;and(p0807=60;p0901>0.06)));p0939;0)
- p2313: 0; = p2231*p2220
- p0956: 0; = if(and(p0683>0;or(p0807=56;p0807=100;and(p0807=60;p0901>0.06)));p0938;0)
- p1796: 0
- p2062: 3.76588
- p3484: 0.0714107; = IF(p1344=0;0;p1344/(p1328+p1330+p1332+p1334+p1336+p1338+p1340+p1342+p1344))
- p0887: 0; = 1000*p0886*p0001*p0003*p0004/(p0818*p0002)
- p2292: 1.52812e-6; = p2223*p2199
- p3451: 0; = p3375*p1240
- p1762: 0
- p0063: 5398.76
- p1562: 0
- p3257: 0
- p1123: 0; = if(p1121=0;p0717/100;0)
- p0685: 0
- p2744: 0; = p2353*(p1128+p1130)
- p1302: 0; = IF(p1297+p1300+p1301=p1262;0;p1262-(p1297+p1300+p1301))
- p2853: 2.26693e-5; = p2267*(p1079+p1081)
- p2867: 3.62528e-6; = p2281*(p1020+p1022)
- p3478: 0.470084; = if(p1328+p1330+p1332+p1334+p1336+p1338+p1340+p1342+p1344=0;0;p1332/(p1328+p1330+p1332+p1334+p1336+p1338+p1340+p1342+p1344))
- p0866: 0; = IF(p0858+p0864+p0865=1;0;IF(p0858+p0864+p0865+p0861>1;1-(p0858+p0864+p0865);p0861))
- p3205: 0; = p2424*p1082
- p2365: 0.00318; = p2225*p2193
- p3229: 4.88944e-6; = p1164/p0818
- p2367: 0.00673832; = p2225*p2196
- p2753: 3.82017e-5; = p2362*(p1019+p1021)
- p0619: 0; = IF(p0355<0.5;-SQRT(p0007*EXP(p0487^2*p0008)-p0007);SQRT(p0007*EXP(p0487^2*p0008)-p0007))
- p2924: 8.99129e-5; = p2338*(p1079+p1081)
- p2380: 1.77313e-5; = p2229*p2209
- p0106: 62.143
- p0706: 12.49; = p0046*(1+p0574*p0178/100)
- p3085: 0; = p2304*p1082
- p2059: 1.00168
- p2237: 0.00751873; = p2222*p2182
- p2093: 0.260958
- p0355: 0.5
- p0161: 0
- p3461: 0; = p3366*p1241
- p3315: 0; = if(and(p1232=0;p3253<>0);p3264*p3289;0)
- p2338: 0.000276715; = p2228*p2206
- p2921: 0.000114411; = p2335*(p1020+p1022)
- p2630: 1.21477e-5; = p2239*(p1019+p1021)
- p1649: 0
- p1628: 0
- p1681: 0
- p2012: 0.0203749
- p1807: 0
- p1304: 0; = p1300*p1252/p0818
- p2720: 1.26648e-7; = p2329*(p1019+p1021)
- p3192: 0; = p2411*p1023
- p3278: 0
- p3619: 0; = p1888*p3476
- p2883: 0; = p2297*(p1079+p1081)
- p1627: 0
- p1076: 0; = IF(p1071=0;p0714/100;0)
- p2311: 0; = p2231*p2218
- p0797: 32.633; = p0137*(1+p0665*p0269/100)
- p3402: 0; = p3364*p1238
- p3048: 1.73719e-6; = p2267*p1082
- p1247: 0; = if(p1232>0;0;p1242*p0001/(p0818*p0002))
- p1005: 0; = p1001*p0888
- p2714: 6.99507e-6; = p2323*(p1019+p1021)
- p1155: 0.000133531; = if(p1153*p0818=0;0;p1151/(p1153*p0818))
- p2811: 0; = p2420*(p1078+p1080)
- p2931: 1.64449e-5; = p2345*(p1079+p1081)
- p2894: 0; = p2308*(p1079+p1081)
- p2234: 0; = 1-(p2222+p2223+p2224+p2225)
- p2742: 0; = p2351*(p1128+p1130)
- p0669: 22.1054; = p0009*(1+p0537*p0141/100)
- p2654: 5.05949e-5; = p2263*(p1078+p1080)
- p2487: 2.6064e-7; = p2291*p1014
- p3031: 0.000154297; = p2250*p1023
- p1335: 0; = p1334*p0001/(p0818*p0002)
- p0081: 0.178
- p3398: 0; = p3379*p1234
- p3406: 0; = p3368*p1238
- p1954: 0
- p1319: 0; = IF(((p0745*1000*p0746/100)+(p0754*1000*p0755/100))/p0801<0;0;((p0745*1000*p0746/100)+(p0754*1000*p0755/100))/p0801)
- p3203: 0; = p2422*p1082
- p0059: 26.607
- p2772: 1.69171e-6; = p2381*(p1078+p1080)
- p2185: 0.000566826; = p1065-p2184
- p2874: 2.54127e-5; = p2288*(p1020+p1022)
- p0236: 4.994
- p1283: 0; = p1277*p1252/p0818
- p2835: 0.00060491; = p2249*(p1020+p1022)
- p2614: 0; = p2418*p1073
- p2421: 0; = p2235*p2211
- p3298: 0; = if(p1283+p1284+p1285+p1286=0;0;p1283/(p1283+p1284+p1285+p1286))
- p2146: 2.58417e-7; = p2015*p2074*p2108/(p0818*1000)
- p1774: 0
- p0767: 17.698; = p0107*(1+p0635*p0239/100)
- p3458: 0; = p3363*p1241
- p2970: 1.75552e-6; = p2384*(p1079+p1081)
- p0116: 29.782
- p2540: 2.07731e-6; = p2344*p1073
- p4240: 0; = p1891*p3479
- p2406: 0; = p2234*p2196
- p1990: 30
- p1074: 0.22097; = IF(p1071=0;p0712/100;0)
- p1749: 0
- p0607: 0; = IF(p0343<0.5;-SQRT(p0007*EXP(p0475^2*p0008)-p0007);SQRT(p0007*EXP(p0475^2*p0008)-p0007))
- p3234: 0.39606; = 1-p3233
- p2727: 0.000208777; = p2336*(p1078+p1080)
- p1689: 0
- p0190: 78.721
- p2967: 2.48761e-6; = p2381*(p1079+p1081)
- p2690: 0; = p2299*(p1078+p1080)
- p2324: 1.40839e-5; = p2224*p2191
- p3015: 0; = p2429*(p1129+p1131)
- p0686: 87.245; = p0026*(1+p0554*p0158/100)
- p5133: 2.22457e-6; = p1754*p3484
- p3319: 0; = if(and(p1232=0;p3253<>0);p3253*(p3263-p3314)/p3316;0)
- p0480: 0; = SQRT(2)*(IF((2*p0348-1)<0;-1;IF((2*p0348-1)>0;1;0))*SQRT(SQRT((2/(pi()*0.140012289)+LN(1-(2*p0348-1)^2)/2)^2-LN(1-(2*p0348-1)^2)/0.140012289)-(2/(pi()*0.140012289)+LN(1-(2*p0348-1)^2)/2)))
- p2299: 0; = p2227*p2206
- p3389: 0; = p3370*p1234
- p3072: 8.74359e-9; = p2291*p1023
- p3300: 0; = if(p1293+p1294+p1295+p1296=0;0;p1293/(p1293+p1294+p1295+p1296))
- p2481: 2.20562e-6; = p2285*p1014
- p2010: 0.00242079; = ((p1984*p1985+p1990*p1991+p1996*p1997+p2004*p2005)/p0818)*p0005*p0002/1000
- p0214: 11.074
- p2729: 6.11456e-5; = p2338*(p1078+p1080)
- p2889: 0; = p2303*(p1079+p1081)
- p2105: 0.888194
- p3201: 0; = p2420*p1082
- p1171: 0.000587422; = p0801*p0001/(p0818*p0002)
- p0211: 33.642
- p1070: 0.0122639; = IF(p1012=0;p1056/(p1063*p0818);0)
- p2545: 0.000115517; = p2349*p1073
- p3041: 9.49812e-6; = p2260*p1082
- p3043: 1.26076e-5; = p2262*p1082
- p3435: 0; = p3378*p1239
- p3330: 0; = if(and(p1232=0;p3255<>0);p3255*(p3267-p3325)/p3327;0)
- p2399: 0; = p2234*p2188
- p2634: 0.000282821; = p2243*(p1019+p1021)
- p0900: 0.968045; = p0899/p0818
- p2141: 2.17479e-6; = p2015*p2069*p2103/(p0818*1000)
- p2024: 0.748682
- p2109: 0.826583
- p2872: 2.3205e-5; = p2286*(p1020+p1022)
- p2572: 3.91521e-5; = p2376*p1073
- p2550: 0.001549; = p2354*p1014
- p0079: 0.235
- p2460: 4.2431e-5; = p2264*p1073
- p2079: 0.02
- p2841: 0.000689305; = p2255*(p1020+p1022)
- p3164: 1.28651e-8; = p2383*p1082
- p0738: 5398.01; = p0078*(1+p0606*p0210/100)
- p1695: 0
- p1786: 0
- p2632: 0.000153611; = p2241*(p1019+p1021)
- p2972: 1.24435e-5; = p2386*(p1079+p1081)
- p2160: 8.96019e-7; = p2015*p2084*p2122/(p0818*1000)
- p1255: 0; = if(p1232>0;0;p0737/100)
- p3103: 6.15524e-7; = p2322*p1023
- p2639: 0.000722958; = p2248*(p1019+p1021)
- p3212: 0; = p2431*p1132
- p2963: 9.59834e-6; = p2377*(p1079+p1081)
- p2200: 0.00558007; = p1056/p0818
- p2134: 2.29065e-5; = p2015*p2062*p2096/(p0818*1000)
- p0418: 0; = SQRT(2)*(IF((2*p0286-1)<0;-1;IF((2*p0286-1)>0;1;0))*SQRT(SQRT((2/(pi()*0.140012289)+LN(1-(2*p0286-1)^2)/2)^2-LN(1-(2*p0286-1)^2)/0.140012289)-(2/(pi()*0.140012289)+LN(1-(2*p0286-1)^2)/2)))
- p1728: 0
- p2339: 0.00229754; = p2228*p2207
- p2132: 3.14217e-6; = p2015*p2060*p2094/(p0818*1000)
- p2679: 6.5106e-6; = p2288*(p1019+p1021)
- p2471: 0; = p2275*p1123
- p0672: 0
- p1969: 0; = p0803
- p2954: 2.69971e-6; = p2368*(p1020+p1022)
- p0633: 0; = IF(p0369<0.5;-SQRT(p0007*EXP(p0501^2*p0008)-p0007);SQRT(p0007*EXP(p0501^2*p0008)-p0007))
- p3077: 1.23292e-6; = p2296*p1023
- p0807: 60
- p2959: 5.45024e-5; = p2373*(p1020+p1022)
- p0613: 0; = IF(p0349<0.5;-SQRT(p0007*EXP(p0481^2*p0008)-p0007);SQRT(p0007*EXP(p0481^2*p0008)-p0007))
- p1645: 0
- p2880: 2.89582e-5; = p2294*(p1020+p1022)
- p0138: 47.429
- p3937: 6.0054e-7; = p1794*p3478
- p1907: 0
- p0425: 0; = SQRT(2)*(IF((2*p0293-1)<0;-1;IF((2*p0293-1)>0;1;0))*SQRT(SQRT((2/(pi()*0.140012289)+LN(1-(2*p0293-1)^2)/2)^2-LN(1-(2*p0293-1)^2)/0.140012289)-(2/(pi()*0.140012289)+LN(1-(2*p0293-1)^2)/2)))
- p0078: 5398.01
- p2196: 0.0207527; = p1068-p2193-p2195
- p3477: 0.135934; = if(p1328+p1330+p1332+p1334+p1336+p1338+p1340+p1342+p1344=0;0;p1330/(p1328+p1330+p1332+p1334+p1336+p1338+p1340+p1342+p1344))
- p2932: 3.0889e-5; = p2346*(p1079+p1081)
- p0808: 0
- p2254: 0.00329793; = p2222*p2200
- p0502: 0; = SQRT(2)*(IF((2*p0370-1)<0;-1;IF((2*p0370-1)>0;1;0))*SQRT(SQRT((2/(pi()*0.140012289)+LN(1-(2*p0370-1)^2)/2)^2-LN(1-(2*p0370-1)^2)/0.140012289)-(2/(pi()*0.140012289)+LN(1-(2*p0370-1)^2)/2)))
- p1691: 0
- p2183: 0.00279255; = p1064-p2182
- p3376: 0; = if(p1232=0;p3246*p3358/p0818;0)
- p3250: 0
- p2907: 0.000111052; = p2321*(p1020+p1022)
- p1650: 0
- p1799: 0
- p3105: 1.77175e-7; = p2324*p1023
- p3034: 4.5759e-7; = p2253*p1023
- p2393: 0; = p2234*p2182
- p2778: 7.08382e-7; = p2387*(p1078+p1080)
- p1864: 0
- p1081: 0; = IF(p1071=0;IF(p1073+p1078+p1079+p1080=1;0;IF(p1073+p1078+p1079+p1080+p1077>1;1-(p1073+p1078+p1079+p1080);p1077));0)
- p2491: 3.20582e-6; = p2295*p1014
- p0850: 0
- p2627: 0; = p2431*p1123
- p2078: 0.117
- p2734: 0.000207524; = p2343*(p1078+p1080)
- p2319: 0.000123721; = p2224*p2186
- p0792: 0
- p2828: 8.62939e-5; = p2242*(p1020+p1022)
- p1117: 0.00112782; = IF(p1071=0;p1107/(p1112*p0818);0)
- p4031: 5.12769e-6; = p1888*p3478
- p2833: 0.000552358; = p2247*(p1020+p1022)
- p0848: 0
- p1819: 0
- p1976: 0.28
- p3194: 0; = p2413*p1023
- p0121: 6.545
- p3895: 3.86141e-7; = p1962*p3477
- p2272: 0.000477384; = p2230*p2218
- p3004: 0; = p2418*(p1079+p1081)
- p0981: 0; = p0978*p0001/(p0818*p0002)
- p2153: 2.03454e-8; = p2015*p2081*p2115/(p0818*1000)
- p2645: 0.000411912; = p2254*(p1019+p1021)
- p1958: 520
- p2871: 2.86742e-6; = p2285*(p1020+p1022)
- p2699: 0; = p2308*(p1078+p1080)
- p2966: 5.76145e-6; = p2380*(p1079+p1081)
- p0053: 32.493
- p0726: 0
- p2056: 2.07882
- p0974: 0
- p1917: 0
- p0750: 0
- p0846: 0.706051; = p0841*p0845^3+p0842*p0845^2+p0843*p0845+p0844
- p1760: 0
- p0901: 0.0206965
- p3002: 0; = p2416*(p1079+p1081)
- p1872: 0
- p2285: 5.88164e-6; = p2223*p2191
- p1182: 910.518; = p1181*p0801
- p1860: 0
- p2646: 0.000176596; = p2255*(p1019+p1021)
- p3210: 0; = p2429*p1132
- p0487: 0; = SQRT(2)*(IF((2*p0355-1)<0;-1;IF((2*p0355-1)>0;1;0))*SQRT(SQRT((2/(pi()*0.140012289)+LN(1-(2*p0355-1)^2)/2)^2-LN(1-(2*p0355-1)^2)/0.140012289)-(2/(pi()*0.140012289)+LN(1-(2*p0355-1)^2)/2)))
- p1051: 1.67459e6; = IF(p1012=0;p1044*p1036;0)
- p2014: 1.47456e8; = p0833*p2011*p2013
- p2276: 0.000315868; = p2223*p2182
- p3215: 0.450791; = p1222*3*15.9994/100.0869
- p1108: 759464; = IF(p1071=0;p1105*p1102*p1095;0)
- p3270: 0
- p2756: 0.000397181; = p2365*(p1019+p1021)
- p2787: 0; = p2396*(p1019+p1021)
- p0368: 0.5
- p0933: 1.30934e6; = p0801*p0927
- p3191: 0; = p2410*p1023
- p2711: 2.224e-6; = p2320*(p1019+p1021)
- p1950: 0
- p0440: 0; = SQRT(2)*(IF((2*p0308-1)<0;-1;IF((2*p0308-1)>0;1;0))*SQRT(SQRT((2/(pi()*0.140012289)+LN(1-(2*p0308-1)^2)/2)^2-LN(1-(2*p0308-1)^2)/0.140012289)-(2/(pi()*0.140012289)+LN(1-(2*p0308-1)^2)/2)))
- p2784: 0; = p2393*(p1019+p1021)
- p0051: 42.92
- p0229: 18.387
- p2415: 0; = p2235*p2205
- p2473: 2.60013e-5; = p2277*p1014
- p2916: 8.11383e-7; = p2330*(p1020+p1022)
- p3415: 0; = p3377*p1238
- p0315: 0.5
- p0675: 0
- p2437: 0.000461201; = p2241*p1014
- p3062: 9.35469e-8; = p2281*p1023
- p3017: 0; = p2431*(p1129+p1131)
- p1581: 0
- p1926: 0
- p1870: 0
- p2496: 0; = p2300*p1073
- p3277: 0
- p2222: 0.59102; = if(p0765*p0769+p0766*p0770+p0767*p0771+p0768*p0772=0;0;p0769*p0765/(p0765*p0769+p0766*p0770+p0767*p0771+p0768*p0772))
- p0088: 46.942
- p0803: 0
- p2095: 0.765734
- p1321: 0.311329; = IF(((p0745*1000*p0748/100)+(p0754*1000*p0757/100))/p0801<0;0;((p0745*1000*p0748/100)+(p0754*1000*p0757/100))/p0801)
- p3311: 0; = if(and(p1232=0;p3252<>0);p3252-(p3306+p3307+p3308+p3309+p3310);0)
- p3302: 0; = if(and(p1232=0;p3252<>0);p3258*(p3278*(p3282*p1256+p3286*(p1253+p1257)+p1258*p3288+p3297*p3287));0)
- p2202: 0.000344307; = 4*1.00794*p2201/(2*14.0067)
- p2531: 8.80051e-5; = p2335*p1014
- p1993: 400
- p2857: 0.000120554; = p2271*(p1079+p1081)
- p4034: 9.23907e-8; = p1891*p3478
- p2689: 0; = p2298*(p1078+p1080)
- p0667: 0; = IF(p0403<0.5;-SQRT(p0007*EXP(p0535^2*p0008)-p0007);SQRT(p0007*EXP(p0535^2*p0008)-p0007))
- p2774: 1.14169e-7; = p2383*(p1078+p1080)
- p1330: 603178; = p1320*p0801
- p0876: 0; = p0866*p0856
- p0401: 0.5
- p0314: 0.5
- p2805: 0; = p2414*(p1078+p1080)
- p0372: 0.5
- p2199: 6.15451e-5; = p1069-p2197-p2198
- p2416: 0; = p2235*p2206
- p2427: 0; = p2235*p2217
- p3384: 0; = p3365*p1234
- p3293: 0
- p1301: 0; = IF(p1297+p1300=p1265;0;IF(p1297+p1300+p1299>p1265;p1265-(p1297+p1300);p1299))
- p0120: 43.985
- p0179: 28.457
- p0301: 0.5
- p2040: 0.44
- p3248: 0
- p2271: 0.000371017; = p2226*p2217
- p2077: 0.043
- p1147: 0.0926988
- p1079: 0.32493; = IF(p1071=0;IF(p1073+p1078=1;0;IF(p1073+p1078+p1075>1;1-(p1073+p1078);p1075));0)
- p5338: 2.79578e-6; = p1963*p3484
- p1955: 0
- p0253: 38.913
- p1293: 0; = p1287*p1252/p0818
- p1244: 0; = if(p1232>0;0;p1239*(p0725/100)*p0723*1000)
- p3014: 0; = p2428*(p1129+p1131)
- p0177: 12.877
- p1963: 3.91508e-5; = p1963a+p1963b+p1963c+p1963d+p1963e+p1963f+p1963g+p1963h+p1963i+p1963j+p1963k
- p3078: 0; = p2297*p1082
- p2801: 0; = p2410*(p1019+p1021)
- p2456: 0.000163719; = p2260*p1073
- p4307: 0; = p1962*p3479
- p0182: 11.183
- p3024: 2.84859e-5; = p2243*p1023
- p1563: 0
- p1781: 0
- p2936: 0; = p2350*(p1129+p1131)
- p1840: 0
- p2291: 6.95039e-7; = p2223*p2198
- p2333: 0.000142234; = p2224*p2201
- p2402: 0; = p2234*p2191
- p2440: 0.000182394; = p2244*p1014
- p2363: 7.69155e-5; = p2225*p2191
- p1094: 5.59039e-6; = IF(p1071=0;p1088*p0001/(p0818*p0002);0)
- p0580: 0; = IF(p0316<0.5;-SQRT(p0007*EXP(p0448^2*p0008)-p0007);SQRT(p0007*EXP(p0448^2*p0008)-p0007))
- p0228: 33.422
- p0891: 0; = IF(p3251=0;0;62.4*6272640/(12*12*12))
- p3141: 1.56497e-5; = p2360*p1023
- p0857: 5.87422; = p0856*p0001*p0003/(p0818*p0002)
- p1341: 0; = p1340*p0001/(p0818*p0002)
- p1785: 0
- p3253: 0; = p1252*(p1277*(1-p3247)+p1280*(1-p3248)+p1281*(1-p3249)+p1282*(1-p3250))
- p0492: 0; = SQRT(2)*(IF((2*p0360-1)<0;-1;IF((2*p0360-1)>0;1;0))*SQRT(SQRT((2/(pi()*0.140012289)+LN(1-(2*p0360-1)^2)/2)^2-LN(1-(2*p0360-1)^2)/0.140012289)-(2/(pi()*0.140012289)+LN(1-(2*p0360-1)^2)/2)))
- p1913: 0
- p2280: 5.16678e-5; = p2223*p2186
- p3214: 0.376406; = p1222*40.078/100.0869
- p1725: 0
- p1911: 0
- p2797: 0; = p2406*(p1019+p1021)
- p3399: 0; = p3380*p1234
- p1254: 0; = if(p1232>0;0;p0736/100)
- p0785: 17.492; = p0125*(1+p0653*p0257/100)
- p1028: 1.39335e6; = IF(p1012=0;p1022*(p0704/100)*p0703*1000;0)
- p0761: 0
- p1603: 0
- p3334: 0; = IF(or(p3254=0;p1232>0);0;p3269*p3277*(p3300*p3292+(1-p3300)*p3296))
- p1564: 0
- p1263: 0; = if(p1232>0;0;IF(p1259=1;0;IF(p1259+p1260>1;1-p1259;p1260)))
- p1876: 0
- p1316: 0; = p1312*p1252/p0818
- p1208: 0; = p1205*p0818*p0822/p0801
- p0938: 0; = p0932*p0001/(p0818*p0002)
- p0977: 0; = IF(p0687=0;IF(OR(p0686=0;p0688=0);0;p0686*1000*p0688/100);0)
- p0347: 0.5
- p4514: 0; = p1963*p3480
- p0639: 0; = IF(p0375<0.5;-SQRT(p0007*EXP(p0507^2*p0008)-p0007);SQRT(p0007*EXP(p0507^2*p0008)-p0007))
- p1898: 0
- p3225: 0.000259571; = p3221*p1229
- p3400: 0; = p3362*p1238
- p2475: 5.27769e-6; = p2279*p1014
- p0771: 21.886; = p0111*(1+p0639*p0243/100)
- p1992: 3900
- p0692: 0
- p0575: 0; = IF(p0311<0.5;-SQRT(p0007*EXP(p0443^2*p0008)-p0007);SQRT(p0007*EXP(p0443^2*p0008)-p0007))
- p0725: 0
- p2748: 2.29874e-5; = p2357*(p1019+p1021)
- p0747: 9.124; = p0087*(1+p0615*p0219/100)
- p5131: 0; = p1962*p3483
- p0798: 47.429; = p0138*(1+p0666*p0270/100)
- p3245: 0; = IF(p3244=1;0;if(p3244+p0792/100>1;1-p3244;p0792/100))
- p0959: 0; = if(and(p0683>0;or(p0807=480;p0807=32;p0807=1;and(p0807=60;p0901<0.03)));p0935;0)
- p0007: 14; = p0006-1
- p3152: 2.27928e-5; = p2371*p1023
- p0174: 0
- p0929: 303710; = p0801*p0923
- p1592: 0
- p3227: 0.000224008; = p3223*p1229
- p2830: 0.000237122; = p2244*(p1020+p1022)
- p0820: 0; = if(p0807=480;p0814;0)
- p0105: 49.917
- p1273: 0; = p1267*p1252/p0818
- p0349: 0.5
- p1059: 0.335
- p1286: 0; = p1282*p1252/p0818
- p2795: 0; = p2404*(p1019+p1021)
- p0830: 1.17626e10; = p0825*p0821*p0824
- p2798: 0; = p2407*(p1019+p1021)
- p3095: 0; = p2314*p1132
- p2675: 2.92124e-6; = p2284*(p1019+p1021)
- p1152: 0.415074
- p2600: 0; = p2404*p1014
- p0941: 0; = if(and(p0683=0;p0947=0);p0935;0)
- p0166: 26.549
- p0636: 0; = IF(p0372<0.5;-SQRT(p0007*EXP(p0504^2*p0008)-p0007);SQRT(p0007*EXP(p0504^2*p0008)-p0007))
- p0772: 59.557; = p0112*(1+p0640*p0244/100)
- p0479: 0; = SQRT(2)*(IF((2*p0347-1)<0;-1;IF((2*p0347-1)>0;1;0))*SQRT(SQRT((2/(pi()*0.140012289)+LN(1-(2*p0347-1)^2)/2)^2-LN(1-(2*p0347-1)^2)/0.140012289)-(2/(pi()*0.140012289)+LN(1-(2*p0347-1)^2)/2)))
- p1871: 0
- p3153: 9.77181e-6; = p2372*p1023
- p1888: 1.0908e-5; = p1480*1000/p0818
- p0091: 39.154
- p2266: 6.67186e-6; = p2226*p2212
- p1943: 0
- p2846: 0.000123945; = p2260*(p1079+p1081)
- p2177: 0.136757; = p0895/p0818-(p2173+p2174+p2175+p2176)
- p0344: 0.5
- p2998: 0; = p2412*(p1020+p1022)
- p3068: 3.05909e-6; = p2287*p1023
- p2279: 1.40738e-5; = p2223*p2185
- p0430: 0; = SQRT(2)*(IF((2*p0298-1)<0;-1;IF((2*p0298-1)>0;1;0))*SQRT(SQRT((2/(pi()*0.140012289)+LN(1-(2*p0298-1)^2)/2)^2-LN(1-(2*p0298-1)^2)/0.140012289)-(2/(pi()*0.140012289)+LN(1-(2*p0298-1)^2)/2)))
- p2584: 1.23317e-5; = p2388*p1073
- p3463: 0; = p3368*p1241
- p0649: 0; = IF(p0385<0.5;-SQRT(p0007*EXP(p0517^2*p0008)-p0007);SQRT(p0007*EXP(p0517^2*p0008)-p0007))
- p3178: 0; = p2397*p1023
- p0711: 42.92; = p0051*(1+p0579*p0183/100)
- p2758: 0.000841616; = p2367*(p1019+p1021)
- p2360: 0.00124401; = p2225*p2188
- p2829: 0.00110393; = p2243*(p1020+p1022)
- p2085: 0.0335294
- p1181: 0.000135898
- p3437: 0; = p3380*p1239
- p1060: 0.21
- p1480: 111
- p2716: 1.42356e-5; = p2325*(p1019+p1021)
- p0503: 0; = SQRT(2)*(IF((2*p0371-1)<0;-1;IF((2*p0371-1)>0;1;0))*SQRT(SQRT((2/(pi()*0.140012289)+LN(1-(2*p0371-1)^2)/2)^2-LN(1-(2*p0371-1)^2)/0.140012289)-(2/(pi()*0.140012289)+LN(1-(2*p0371-1)^2)/2)))
- p2191: 0.000236884; = 8*1.00794*p2189/(2*14.0067)
- p1813: 0
- p2371: 0.00181183; = p2225*p2200
- p3460: 0; = p3365*p1241
- p0951: 0.000114796; = if(and(p0683=0;or(p0807=480;p0807=32;p0807=1;and(p0807=60;p0901<0.03)));p0939;0)
- p3419: 0; = p3362*p1239
- p1674: 0
- p3456: 0; = p3380*p1240
- p2129: 1.54124e-5; = p2015*p2057*p2091/(p0818*1000)
- p2186: 0.00208093; = p1052/p0818
- p1266: 0; = if(p1232>0;0;IF(p1259+p1263+p1264+p1265=1;0;1-(p1259+p1263+p1264+p1265)))
- p1098: 0.0208246
- p2647: 2.54162e-5; = p2256*(p1019+p1021)
- p1124: 0.26241; = if(p1121=0;p0718/100;0)
- p2615: 0; = p2419*p1073
- p2381: 7.65582e-6; = p2229*p2210
- p2566: 7.49381e-6; = p2370*p1014
- p1044: 0.00527766; = IF(p1012=0;IF(p1037=1;0;IF(p1037+p1038>1;1-p1037;p1038));0)
- p2971: 3.29745e-6; = p2385*(p1079+p1081)
- p0769: 77.136; = p0109*(1+p0637*p0241/100)
- p3267: 0
- p0136: 90.206
- p3087: 0; = p2306*p1082
- p3016: 0; = p2430*(p1129+p1131)
- p1677: 0
- p1559: 0
- p3342: 0; = if(and(p1232=0;p3254<>0);p3254*(p3272-p3337)/p3338;0)
- p3426: 0; = p3369*p1239
- p3965: 3.51085e-6; = p1822*p3478
- p0243: 21.475
- p3056: 3.99646e-5; = p2275*p1132
- p2052: 1.54033e-5; = p2015*p2049*(1-p2050)/(p0818*1000)
- p2034: 3.7105e-5; = p2015*p2030*p2032/(p0818*1000)
- p1916: 0
- p1721: 0
- p5328: 7.01756e-9; = p1949*p3484
- p2092: 0.54529
- p0058: 26.241
- p1552: 0
- p0622: 0; = IF(p0358<0.5;-SQRT(p0007*EXP(p0490^2*p0008)-p0007);SQRT(p0007*EXP(p0490^2*p0008)-p0007))
- p0150: 0
- p1836: 0
- p3007: 0; = p2421*(p1079+p1081)
- p0309: 0.5
- p2251: 1.00797e-5; = p2222*p2197
- p1773: 0
- p3445: 0; = p3369*p1240
- p0311: 0.5
- p3413: 0; = p3375*p1238
- p2006: 0.294867; = ((p1980*p1985+p1986*p1991+p1992*p1997+p2000*p2005)/p0818)*p0005*p0002/1000
- p0965: 0; = IF(p0684/100=1;0;IF(p0684/100+p0685/100>1;1-p0684/100;p0685/100))
- p3438: 0; = p3362*p1240
- p3144: 9.67596e-7; = p2363*p1023
- p3405: 0; = p3367*p1238
- p1012: 0
- p3473: 0; = p3378*p1241
- p3446: 0; = p3370*p1240
- p1211: 0.6
- p0910: 0.00590066; = p0909/p0818
- p1296: 0; = p1292*p1252/p0818
- p1722: 0
- p2692: 0; = p2301*(p1078+p1080)
- p3180: 0; = p2399*p1023
- p3136: 1.14067e-5; = p2355*p1023
- p2120: 0.51828
- p3169: 7.1542e-7; = p2388*p1082
- p1560: 0
- p1320: 0.0900265; = IF(((p0745*1000*p0747/100)+(p0754*1000*p0756/100))/p0801<0;0;((p0745*1000*p0747/100)+(p0754*1000*p0756/100))/p0801)
- p3457: 0; = p3362*p1241
- p1768: 0
- p2248: 0.0057883; = p2222*p2193
- p3317: 0; = if(and(p1232=0;p3253<>0);p3253*(p3261*p3277-p3312)/p3316;0)
- p0514: 0; = SQRT(2)*(IF((2*p0382-1)<0;-1;IF((2*p0382-1)>0;1;0))*SQRT(SQRT((2/(pi()*0.140012289)+LN(1-(2*p0382-1)^2)/2)^2-LN(1-(2*p0382-1)^2)/0.140012289)-(2/(pi()*0.140012289)+LN(1-(2*p0382-1)^2)/2)))
- p2732: 3.67029e-5; = p2341*(p1078+p1080)
- p0801: 6.7e6
- p3309: 0; = if(and(p1232=0;p3252<>0);p3252*(p3260-p3304)/p3305;0)
- p1568: 0
- p2368: 5.53765e-6; = p2225*p2197
- p2147: 7.44242e-7; = p2015*p2075*p2109/(p0818*1000)
- p3343: 0; = if(and(p1232=0;p3254<>0);IF((p3339+p3340+p3341+p3342)+(p3254*(p3269*(1-p3277))/p3338)>p3254;p3254-(p3339+p3340+p3341+p3342);p3254*(p3269*(1-p3277))/p3338);0)
- p0913: 0.0120403
- p1586: 0
- p2901: 0.000368741; = p2315*(p1020+p1022)
- p2451: 0.000530213; = p2255*p1014
- p0042: 5399.12
- p3115: 2.57521e-7; = p2334*p1023
- p3442: 0; = p3366*p1240
- p3093: 0; = p2312*p1132
- p2724: 1.7765e-5; = p2333*(p1019+p1021)
- p2296: 9.8006e-5; = p2223*p2203
- p2298: 0; = p2227*p2205
- p0877: 0; = p0876*p0001*p0003/(p0818*p0002)
- p0481: 0; = SQRT(2)*(IF((2*p0349-1)<0;-1;IF((2*p0349-1)>0;1;0))*SQRT(SQRT((2/(pi()*0.140012289)+LN(1-(2*p0349-1)^2)/2)^2-LN(1-(2*p0349-1)^2)/0.140012289)-(2/(pi()*0.140012289)+LN(1-(2*p0349-1)^2)/2)))
- p2862: 0.000153992; = p2276*(p1020+p1022)
- p2685: 7.41894e-6; = p2294*(p1019+p1021)
- p0896: 0.458
- p2760: 1.13524e-6; = p2369*(p1019+p1021)
- p1964: 0.5
- p1661: 0
- p2534: 0.000118766; = p2338*p1073
- p3401: 0; = p3363*p1238
- p0317: 0.5
- p2875: 0.000251206; = p2289*(p1020+p1022)
- p3408: 0; = p3370*p1238
- p2618: 0; = p2422*p1073
- p1648: 0
- p0634: 0; = IF(p0370<0.5;-SQRT(p0007*EXP(p0502^2*p0008)-p0007);SQRT(p0007*EXP(p0502^2*p0008)-p0007))
- p1250: 0; = if(p1232>0;0;p1245*p0001/(p0818*p0002))
- p0501: 0; = SQRT(2)*(IF((2*p0369-1)<0;-1;IF((2*p0369-1)>0;1;0))*SQRT(SQRT((2/(pi()*0.140012289)+LN(1-(2*p0369-1)^2)/2)^2-LN(1-(2*p0369-1)^2)/0.140012289)-(2/(pi()*0.140012289)+LN(1-(2*p0369-1)^2)/2)))
- p3352: 0; = if(and(p1232=0;p3256<>0);p3256*(p3275-p3347)/p3349;0)
- p3177: 0; = p2396*p1023
- p0548: 0; = IF(p0284<0.5;-SQRT(p0007*EXP(p0416^2*p0008)-p0007);SQRT(p0007*EXP(p0416^2*p0008)-p0007))
- p2560: 0.000233419; = p2364*p1014
- p1711: 0
- p3196: 0; = p2415*p1082
- p2257: 0.00233288; = p2222*p2203
- p3359: 0; = if(p1232=0;p3309+p3320+p3331+p3342+p3353;0)
- p3120: 5.72088e-5; = p2339*p1082
- p3147: 8.5754e-6; = p2366*p1023
- p0688: 0
- p2317: 9.78402e-6; = p2224*p2184
- p2765: 0.000160077; = p2374*(p1019+p1021)
- p2060: 0.272353
- p2965: 1.27406e-5; = p2379*(p1079+p1081)
- p2865: 6.86128e-6; = p2279*(p1020+p1022)
- p0847: 0
- p0810: 0
- p1619: 0
- p1251: 0; = if(p1232>0;0;p1246*p0001/(p0818*p0002))
- p3001: 0; = p2415*(p1079+p1081)
- p2295: 8.54886e-6; = p2223*p2202
- p1046: 0.0263929; = IF(p1012=0;IF(p1037+p1044+p1045=1;0;IF(p1037+p1044+p1045+p1040>1;1-(p1037+p1044+p1045);p1040));0)
- p1700: 0
- p1847: 0
- p1167: 0.5
- p2543: 0.000153971; = p2347*p1073
- p1087: 0; = IF(p1071=0;p1081*(p0710/100)*p0703*1000;0)
- p2239: 9.72596e-5; = p2222*p2184
- p0902: 0
- p2253: 3.63744e-5; = p2222*p2199
- p2999: 0; = p2413*(p1020+p1022)
- p0744: 13.419; = p0084*(1+p0612*p0216/100)
- p1339: 0.000125493; = p1338*p0001/(p0818*p0002)
- p3417: 0; = p3379*p1238
- p2682: 8.68104e-8; = p2291*(p1019+p1021)
- p0083: 0.257
- p3202: 0; = p2421*p1082
- p0050: 47.429
- p2262: 0.000506328; = p2226*p2208
- p1881: 0
- p1386: 13
- p2131: 3.26885e-6; = p2015*p2059*p2093/(p0818*1000)
- p1346: 317
- p2476: 1.93754e-5; = p2280*p1014
- p1899: 0
- p1826: 0
- p1666: 0
- p1806: 0
- p2382: 0.000100256; = p2229*p2211
- p2856: 1.3451e-5; = p2270*(p1079+p1081)
- p2100: 0.705744
- p0947: 2.66278e-5; = if(and(p0683=0;or(p0807=480;p0807=32;p0807=1;and(p0807=60;p0901<0.03)));p0935;0)
- p2873: 0.000118551; = p2287*(p1020+p1022)
- p3439: 0; = p3363*p1240
- p2879: 6.75452e-5; = p2293*(p1020+p1022)
- p3051: 1.03078e-6; = p2270*p1082
- p1156: 0.0893926; = p1064+p1065+p1066+p1067+p1068+p1069+p1070+p1116+p1117+p1118+p1119+p1120+p1154+p1155
- p0939: 0.000114796; = p0933*p0001/(p0818*p0002)
- p1818: 0
- p1863: 0
- p3239: 0.013074; = IF(p3238+p3235+p3236=1;0;1-(p3238+p3235+p3236))
- p2664: 0.000176532; = p2273*(p1128+p1130)
- p1561: 0
- p1550: 0.783979
- p3425: 0; = p3368*p1239
- p1795: 0
- p1667: 0
- p1687: 0.556632
- p2375: 0.000100861; = p2229*p2204
- p2336: 0.000944819; = p2228*p2204
- p0677: 0
- p0842: 0.41734
- p1670: 0
- p0839: 0.64758; = p0838/p0818
- p2089: 0.40001
- p1591: 0
- p2391: 0; = p2233*p2220
- p2458: 0.000217316; = p2262*p1073
- p2127: 2.79862e-5; = p2015*p2055*p2089/(p0818*1000)
- p1179: 0.5
- p3146: 4.00043e-5; = p2365*p1023
- p2340: 0.000367304; = p2228*p2208
- p1915: 0
- p4649: 3.51862e-6; = p1888*p3481
- p0739: 0.235; = p0079*(1+p0607*p0211/100)
- p1702: 0
- p1097: 0.0659222
- p2343: 0.000939152; = p2228*p2211
- p1141: 8.37309e-6; = if(p1121=0;p1135*p0001/(p0818*p0002);0)
- p4583: 2.40914e-6; = p1822*p3481
- p0708: 0
- p2171: 0.0927964; = p2165*p0831
- p0681: 0
- p2913: 6.08521e-5; = p2327*(p1020+p1022)
- p2083: 2.17294
- p0819: 0; = p0808*p0809/p0818
- p0781: 6.545; = p0121*(1+p0649*p0253/100)
- p2346: 9.50637e-5; = p2228*p2214
- p2733: 1.58471e-5; = p2342*(p1078+p1080)
- p1878: 0
- p2691: 0; = p2300*(p1078+p1080)
- p2621: 0; = p2425*p1073
- p0646: 0; = IF(p0382<0.5;-SQRT(p0007*EXP(p0514^2*p0008)-p0007);SQRT(p0007*EXP(p0514^2*p0008)-p0007))
- p2605: 0; = p2409*p1014
- p2198: 2.79928e-5; = 22.98976928*p2197/14.0067
- p1260: 0; = if(p1232>0;0;p0731/100)
- p0950: 0; = if(and(p0683=0;or(p0807=480;p0807=32;p0807=1;and(p0807=60;p0901<0.03)));p0938;0)
- p0638: 0; = IF(p0374<0.5;-SQRT(p0007*EXP(p0506^2*p0008)-p0007);SQRT(p0007*EXP(p0506^2*p0008)-p0007))
- p2376: 9.12211e-5; = p2229*p2205
- p3088: 0; = p2307*p1082
- p1641: 0
- p2934: 9.75775e-6; = p2348*(p1079+p1081)
- p0766: 62.143; = p0106*(1+p0634*p0238/100)
- p2301: 0; = p2227*p2208
- p2987: 0; = p2401*(p1020+p1022)
- p2170: 0.00703813; = p2166*(p0913)
- p1122: 0; = p1121*p0001/(p0818*p0002)
- p2899: 0; = p2313*(p1129+p1131)
- p0212: 11.024
- p1194: 1.48
- p3280: 0
- p1794: 1.27752e-6; = p1386*1000/p0818
- p1111: 0.0872841
- p1154: 0.00115012; = if(p1152*p0818=0;0;p1150/(p1152*p0818))
- p2263: 0.000228967; = p2226*p2209
- p3485: 0; = p1754*p3476
- p0490: 0; = SQRT(2)*(IF((2*p0358-1)<0;-1;IF((2*p0358-1)>0;1;0))*SQRT(SQRT((2/(pi()*0.140012289)+LN(1-(2*p0358-1)^2)/2)^2-LN(1-(2*p0358-1)^2)/0.140012289)-(2/(pi()*0.140012289)+LN(1-(2*p0358-1)^2)/2)))
- p1174: 1.58759e-7; = p1170*p1173/p0818
- p0962: 0; = if(and(p0683>0;or(p0807=480;p0807=32;p0807=1;and(p0807=60;p0901<0.03)));p0938;0)
- p2428: 0; = p2236*p2218
- p0404: 0.5
- p4237: 0; = p1888*p3479
- p1935: 0
- p1808: 0
- p2752: 3.33747e-5; = p2361*(p1019+p1021)
- p0990: 0; = p0986*p0886
- p1759: 0
- p0719: 26.607; = p0059*(1+p0587*p0191/100)
- p0125: 17.492
- p3465: 0; = p3370*p1241
- p0577: 0; = IF(p0313<0.5;-SQRT(p0007*EXP(p0445^2*p0008)-p0007);SQRT(p0007*EXP(p0445^2*p0008)-p0007))
- p2898: 0; = p2312*(p1129+p1131)
- p1587: 0
- p3271: 0
- p2548: 0; = p2352*p1123
- p1809: 0
- p1784: 0
- p1703: 0
- p0195: 0
- p2863: 3.38031e-5; = p2277*(p1020+p1022)
- p1817: 0
- p2824: 0.000804629; = p2238*(p1020+p1022)
- p1602: 0
- p1940: 0
- p1654: 0
- p2130: 8.48367e-6; = p2015*p2058*p2092/(p0818*1000)
- p2709: 4.2092e-6; = p2318*(p1019+p1021)
- p2066: 0.109412
- p0862: 0; = p0674*1000/p0856
- p1756: 0
- p2823: 0.00366553; = p2237*(p1020+p1022)
- p1790: 0
- p0871: 0; = p0870*p0001*p0003/(p0818*p0002)
- p2803: 0; = p2412*(p1019+p1021)
- p1678: 0
- p0818: 1.0176e10; = p0806*p0807
- p0963: 0; = if(and(p0683>0;or(p0807=480;p0807=32;p0807=1;and(p0807=60;p0901<0.03)));p0939;0)
- p0870: 0; = p0858*p0856
- p2866: 2.51891e-5; = p2280*(p1020+p1022)
- p0441: 0; = SQRT(2)*(IF((2*p0309-1)<0;-1;IF((2*p0309-1)>0;1;0))*SQRT(SQRT((2/(pi()*0.140012289)+LN(1-(2*p0309-1)^2)/2)^2-LN(1-(2*p0309-1)^2)/0.140012289)-(2/(pi()*0.140012289)+LN(1-(2*p0309-1)^2)/2)))
- p3011: 0; = p2425*(p1079+p1081)
- p0504: 0; = SQRT(2)*(IF((2*p0372-1)<0;-1;IF((2*p0372-1)>0;1;0))*SQRT(SQRT((2/(pi()*0.140012289)+LN(1-(2*p0372-1)^2)/2)^2-LN(1-(2*p0372-1)^2)/0.140012289)-(2/(pi()*0.140012289)+LN(1-(2*p0372-1)^2)/2)))
- p2563: 0.00252687; = p2367*p1014
- p1285: 0; = p1281*p1252/p0818
- p2708: 1.22202e-6; = p2317*(p1019+p1021)
- p2265: 0.00129462; = p2226*p2211
- p2192: 0.00191702; = p1067-p2189-p2190-p2191
- p2794: 0; = p2403*(p1019+p1021)
- p2026: 55.14
- p3433: 0; = p3376*p1239
- p3312: 0; = if(and(p1232=0;p3253<>0);p3261*p3277*(p3298*p3290+(1-p3298)*p3294);0)
- p2310: 0; = p2227*p2217
- p0779: 0
- p1735: 0
- p2501: 0; = p2305*p1073
- p1575: 0
- p0967: 0
- p0888: 0; = p0686*1000*p0687*p0884/100
- p1200: 0.84
- p0704: 90.206; = p0044*(1+p0572*p0176/100)
- p2228: 0.402374; = if(p0774*p0778+p0775*p0779+p0776*p0780+p0777*p0781=0;0;p0780*p0776/(p0774*p0778+p0775*p0779+p0776*p0780+p0777*p0781))
- p2827: 0.000599586; = p2241*(p1020+p1022)
- p2533: 0.000366759; = p2337*p1073
- p0216: 31.527
- p2493: 0; = p2297*p1073
- p1705: 0
- p0642: 0; = IF(p0378<0.5;-SQRT(p0007*EXP(p0510^2*p0008)-p0007);SQRT(p0007*EXP(p0510^2*p0008)-p0007))
- p2670: 1.75782e-6; = p2279*(p1019+p1021)
- p3118: 2.12775e-5; = p2337*p1082
- p0721: 0
- p1747: 0
- p2341: 0.000166099; = p2228*p2209
- p1859: 0
- p0855: 4.1475; = p0854*p0001*p0003/(p0818*p0002)
- p2256: 0.000203492; = p2222*p2202
- p2694: 0; = p2303*(p1078+p1080)
- p1920: 0
- p3198: 0; = p2417*p1082
- p2203: 0.00394721; = p1070-p2200-p2201-p2202
- p1867: 0
- p1142: 0; = if(p1121=0;p1136*p0001/(p0818*p0002);0)
- p2780: 0; = p2389*(p1128+p1130)
- p1127: 0; = if(p1121=0;p0721/100;0)
- p1991: 2.10172e8; = (if(p1111=0;0;p1106/p1111)+if(p1112=0;0;p1107/p1112)+if(p1113=0;0;p1108/p1113)+if(p1114=0;0;p1109/p1114)+if(p1115=0;0;p1110/p1115))*(1+p1157)
- p0454: 0; = SQRT(2)*(IF((2*p0322-1)<0;-1;IF((2*p0322-1)>0;1;0))*SQRT(SQRT((2/(pi()*0.140012289)+LN(1-(2*p0322-1)^2)/2)^2-LN(1-(2*p0322-1)^2)/0.140012289)-(2/(pi()*0.140012289)+LN(1-(2*p0322-1)^2)/2)))
- p2725: 2.55679e-6; = p2334*(p1019+p1021)
- p3148: 8.47681e-5; = p2367*p1023
- p1856: 0
- p0220: 24.727
- p1736: 0
- p2288: 5.21265e-5; = p2223*p2195
- p1013: 0; = p1012*p0001/(p0818*p0002)
- p2817: 0; = p2426*(p1078+p1080)
- p2182: 0.0127216; = p1050/p0818
- p2655: 2.18452e-5; = p2264*(p1078+p1080)
- p1625: 0
- p3385: 0; = p3366*p1234
- p3012: 0; = p2426*(p1079+p1081)
- p0244: 8.98
- p2423: 0; = p2235*p2213
- p1113: 0.100377
- p5132: 0; = p1963*p3483
- p2405: 0; = p2234*p2195
- p1612: 0
- p1252: 0; = if(p1232>0;0;p0724*2000*p0723*1000*p0725/100)
- p1942: 0
- p2037: 1.99
- p0348: 0.5
- p2701: 0; = p2310*(p1078+p1080)
- p0664: 0; = IF(p0400<0.5;-SQRT(p0007*EXP(p0532^2*p0008)-p0007);SQRT(p0007*EXP(p0532^2*p0008)-p0007))
- p2802: 0; = p2411*(p1019+p1021)
- p2674: 2.55213e-6; = p2283*(p1019+p1021)
- p2845: 0.000382751; = p2259*(p1079+p1081)
- p4925: 0; = p1962*p3482
- p0693: 0
- p0046: 12.49
- p1025: 608305; = IF(p1012=0;p1019*(p0704/100)*p0703*1000;0)
- p1983: 50
- p1198: 0.44
- p3208: 0; = p2427*p1082
- p1882: 0
- p2249: 0.00124079; = p2222*p2195
- p1082: 0.0249; = IF(p1071=0;IF(p1073+p1078+p1079+p1080+p1081=1;0;1-(p1073+p1078+p1079+p1080+p1081));0)
- p2315: 0.000756362; = p2224*p2182
- p2717: 7.27274e-5; = p2326*(p1019+p1021)
- p2362: 0.000305858; = p2225*p2190
- p0537: 0; = IF(p0273<0.5;-SQRT(p0007*EXP(p0405^2*p0008)-p0007);SQRT(p0007*EXP(p0405^2*p0008)-p0007))
- p2559: 2.88433e-5; = p2363*p1014
- p2671: 6.45331e-6; = p2280*(p1019+p1021)
- p1571: 0
- p0346: 0.5
- p0932: 0; = p0801*p0926
- p3323: 0; = if(and(p1232=0;p3255<>0);p3265*p3277*(p3299*p3291+(1-p3299)*p3295);0)
- p1024: 1.82638e6; = IF(p1012=0;p1014*(p0704/100)*p0703*1000;0)
- p1748: 0
- p1877: 0
- p2781: 0; = p2390*(p1128+p1130)
- p2384: 5.40276e-6; = p2229*p2213
- p3111: 2.0937e-8; = p2330*p1023
- p2436: 0.000125627; = p2240*p1014
- p0986: 0; = IF(p0982+p0985=1;0;IF(p0982+p0985+p0984>1;1-(p0982+p0985);p0984))
- p1604: 0
- p2611: 0; = p2415*p1073
- p2537: 7.12897e-5; = p2341*p1073
- p3268: 0
- p2231: 0; = if(p0783*p0787+p0784*p0788+p0785*p0789+p0786*p0790=0;0;p0788*p0784/(p0783*p0787+p0784*p0788+p0785*p0789+p0786*p0790))
- p2366: 0.000681669; = p2225*p2195
- p1075: 0.32493; = IF(p1071=0;p0713/100;0)
- p0737: 0
- p0680: 3518.41; = p0020*(1+p0548*p0152/100)
- p1338: 1.43134e6; = p1324*p0801
- p0370: 0.5
- p2933: 0.000116565; = p2347*(p1079+p1081)
- p1696: 0
- p2015: 1.27254e8; = p0830*p2011*p2013
- p1662: 0
- p2353: 0; = p2232*p2221
- p1262: 0; = if(p1232>0;0;p0733/100)
- p3896: 5.32191e-6; = p1963*p3477
- p1897: 0
- p0691: 0
- p1972: 0; = if(p0807=480;p1967*p0001/(p0818*p0002);0)
- p3479: 0; = if(p1328+p1330+p1332+p1334+p1336+p1338+p1340+p1342+p1344=0;0;p1334/(p1328+p1330+p1332+p1334+p1336+p1338+p1340+p1342+p1344))
- p0997: 0; = if(p0888=0;0;if((p0695*p0694*1000*p0696/100)/p0888>1;1;(p0695*p0694*1000*p0696/100)/p0888))
- p2217: 0.000668894; = p1118-p2216
- p0961: 0; = if(and(p0683>0;or(p0807=480;p0807=32;p0807=1;and(p0807=60;p0901<0.03)));p0937;0)
- p1578: 0
- p0181: 16.068
- p0034: 87.245
- p3364: 0; = if(p1232=0;p3244*p3358/p0818;0)
- p3243: 5.83546e-10; = p3234*p1188*p3239/p0818
- p2497: 0; = p2301*p1073
- p2210: 0.000178233; = 6*1.00794*p2208/30.973762
- p1883: 0
- p1797: 0
- p1614: 0
- p0787: 33.55; = p0127*(1+p0655*p0259/100)
- p3482: 0; = if(p1328+p1330+p1332+p1334+p1336+p1338+p1340+p1342+p1344=0;0;p1340/(p1328+p1330+p1332+p1334+p1336+p1338+p1340+p1342+p1344))
- p0919: 0.0453299; = p0678*1000/p0801
- p4555: 4.1209e-7; = p1794*p3481
- p1345: 2.77816e-5; = IF(p1318=0;p1344*p0001/(p0818*p0002);0)
- p3130: 6.70173e-6; = p2349*p1082
- p3286: 0
- p0690: 0
- p0903: 0.0129401
- p1173: 0.5
- p2597: 0; = p2401*p1014
- p1202: 0.7
- p1848: 0
- p1002: 0; = p0996*p0888
- p2270: 4.13967e-5; = p2226*p2216
- p2227: 0; = if(p0774*p0778+p0775*p0779+p0776*p0780+p0777*p0781=0;0;p0779*p0775/(p0774*p0778+p0775*p0779+p0776*p0780+p0777*p0781))
- p0476: 0; = SQRT(2)*(IF((2*p0344-1)<0;-1;IF((2*p0344-1)>0;1;0))*SQRT(SQRT((2/(pi()*0.140012289)+LN(1-(2*p0344-1)^2)/2)^2-LN(1-(2*p0344-1)^2)/0.140012289)-(2/(pi()*0.140012289)+LN(1-(2*p0344-1)^2)/2)))
- p3453: 0; = p3377*p1240
- p2786: 0; = p2395*(p1019+p1021)
- p1675: 0
- p2521: 4.2741e-5; = p2325*p1014
- p1829: 0
- p2693: 0; = p2302*(p1078+p1080)
- p1231: 0.0120402; = IF(p1221=0;0;p1230*(p1228+p1229))
- p2189: 0.000822957; = p1053/p0818
- p2156: 2.84723e-7; = p2015*p2085*p2118/(p0818*1000)
- p0663: 0; = IF(p0399<0.5;-SQRT(p0007*EXP(p0531^2*p0008)-p0007);SQRT(p0007*EXP(p0531^2*p0008)-p0007))
- p1720: 0
- p0238: 8.709
- p3156: 2.51144e-6; = p2375*p1082
- p1753: 0
- p2490: 2.22746e-5; = p2294*p1014
- p0886: 0; = p0686*1000*p0687*p0689/100
- p1741: 0
- p3033: 2.08127e-7; = p2252*p1023
- p0915: 0.0189815; = p0914/p0818
- p0049: 28.609
- p0123: 18.374
- p2978: 0; = p2392*(p1129+p1131)
- p1270: 0; = IF(p1267=p1259;0;IF(p1267+p1268>p1259;p1259-p1267;p1268))
- p2369: 9.08917e-6; = p2225*p2198
- p0310: 0.5
- p2988: 0; = p2402*(p1020+p1022)
- p2544: 1.2889e-5; = p2348*p1073
- p1688: 0
- p1188: 1146.78; = p1187*p0801
- p1128: 0.26241; = if(p1121=0;IF(p1123=1;0;IF(p1123+p1124>1;1-p1123;p1124));0)
- p0381: 0.5
- p2435: 3.64723e-5; = p2239*p1014
- p1600: 0
- p0483: 0; = SQRT(2)*(IF((2*p0351-1)<0;-1;IF((2*p0351-1)>0;1;0))*SQRT(SQRT((2/(pi()*0.140012289)+LN(1-(2*p0351-1)^2)/2)^2-LN(1-(2*p0351-1)^2)/0.140012289)-(2/(pi()*0.140012289)+LN(1-(2*p0351-1)^2)/2)))
- p0984: 0; = if(p0886=0;0;min(1;(p0699*p0698*1000*p0701/100)/p0886))
- p1054: 9.96612e7; = IF(p1012=0;p1047*p1036;0)
- p0920: 0; = p0676*1000/p0801
- p2962: 2.96405e-5; = p2376*(p1079+p1081)
- p0998: 0; = if(p0888=0;0;if((p0699*p0698*1000*p0700/100)/p0888>1;1;(p0699*p0698*1000*p0700/100)/p0888))
- p1268: 0
- p0002: 0.453592
- p2542: 4.08013e-5; = p2346*p1073
- p1280: 0; = IF(p1277=p1263;0;IF(p1277+p1278>p1263;p1263-p1277;p1278))
- p3390: 0; = p3371*p1234
- p1279: 0
- p1832: 0
- p2084: 0.21
- p0536: 0; = SQRT(2)*(IF((2*p0404-1)<0;-1;IF((2*p0404-1)>0;1;0))*SQRT(SQRT((2/(pi()*0.140012289)+LN(1-(2*p0404-1)^2)/2)^2-LN(1-(2*p0404-1)^2)/0.140012289)-(2/(pi()*0.140012289)+LN(1-(2*p0404-1)^2)/2)))
- p2345: 5.06106e-5; = p2228*p2213
- p1988: 750
- p2508: 0; = p2312*p1123
- p1772: 0
- p1656: 0
- p1084: 565849; = IF(p1071=0;p1078*(p0710/100)*p0703*1000;0)
- p1938: 0
- p3046: 3.2236e-5; = p2265*p1082
- p1300: 0; = IF(p1297=p1265;0;IF(p1297+p1298>p1265;p1265-p1297;p1298))
- p2914: 0.000601525; = p2328*(p1020+p1022)
- p0624: 0; = IF(p0360<0.5;-SQRT(p0007*EXP(p0492^2*p0008)-p0007);SQRT(p0007*EXP(p0492^2*p0008)-p0007))
- p1775: 0
- p0019: 1568.54
- p2980: 0; = p2394*(p1020+p1022)
- p0934: 0.000308476; = p0928*p0001/(p0818*p0002)
- p2337: 0.000854517; = p2228*p2205
- p0137: 32.633
- p0267: 7.319
- p2564: 2.07662e-6; = p2368*p1014
- p1734: 0
- p2763: 9.7019e-5; = p2372*(p1019+p1021)
- p1946: 0
- p1811: 0
- p1726: 0
- p1090: 4.96108e-5; = IF(p1071=0;p1084*p0001/(p0818*p0002);0)
- p0378: 0.5
- p0546: 0; = IF(p0282<0.5;-SQRT(p0007*EXP(p0414^2*p0008)-p0007);SQRT(p0007*EXP(p0414^2*p0008)-p0007))
- p0608: 0; = IF(p0344<0.5;-SQRT(p0007*EXP(p0476^2*p0008)-p0007);SQRT(p0007*EXP(p0476^2*p0008)-p0007))
- p1893: 0
- p0763: 5399.12; = p0103*(1+p0631*p0235/100)
- p3368: 0; = if(p1232=0;p3245*p3356/p0818;0)
- p2583: 1.37592e-6; = p2387*p1073
- p2158: 1.84907e-6; = p2015*p2082*p2120/(p0818*1000)
- p1746: 0
- p0009: 22.1054
- p2730: 0.000507688; = p2339*(p1078+p1080)
- p3431: 0; = p3374*p1239
- p2464: 5.62445e-5; = p2268*p1073
- p4761: 0; = p1794*p3482
- p2283: 2.04334e-5; = p2223*p2189
- p1595: 0
- p2246: 0.000140003; = p2222*p2191
- p1298: 0
- p0323: 0.5
- p1143: 0; = if(p1121=0;p1137*p0001/(p0818*p0002);0)
- p2677: 5.945e-6; = p2286*(p1019+p1021)
- p1241: 0; = if(p1232>0;0;IF(p1234+p1238+p1239+p1240=1;0;1-(p1234+p1238+p1239+p1240)))
- p1892: 0
- p2074: 0.025
- p1344: 316870; = IF(p1318=0;p1327*p0801;0)
- p3462: 0; = p3367*p1241
- p4719: 9.16315e-7; = p1962*p3481
- p4926: 0; = p1963*p3482
- p3037: 2.55993e-6; = p2256*p1023
- p2207: 0.00570996; = p1119-p2205-p2204-p2206
- p1660: 0
- p1551: 0
- p0635: 0; = IF(p0371<0.5;-SQRT(p0007*EXP(p0503^2*p0008)-p0007);SQRT(p0007*EXP(p0503^2*p0008)-p0007))
- p2622: 0; = p2426*p1073
- p2884: 0; = p2298*(p1079+p1081)
- p2408: 0; = p2234*p2198
- p1565: 0
- p0878: 0; = p0867*p0856
- p0697: 100; = p0037*(1+p0565*p0169/100)
- p3096: 9.51503e-6; = p2315*p1023
- p0976: 87245; = IF(p0687=0;IF(OR(p0686=0;p0689=0);0;p0686*1000*p0689/100);0)
- p1574: 0
- p3069: 6.55752e-7; = p2288*p1023
- p2507: 0; = p2311*p1123
- p2407: 0; = p2234*p2197
- p0777: 21.366; = p0117*(1+p0645*p0249/100)
- p2782: 0; = p2391*(p1128+p1130)
- p3053: 0.000225096; = p2272*p1132
- p0987: 0; = if(p0978>0;0;if(and(p0687=0;p0691=0;p0695=0;p0699=0);0;IF(p0982+p0985+p0986=1;0;1-(p0982+p0985+p0986))))
- p3159: 6.10713e-6; = p2378*p1082
- p2068: 0.153529
- p2104: 0.817136
- p4789: 0; = p1822*p3482
- p2124: 0.263965
- p2350: 0; = p2232*p2218
- p3228: 0.000886482; = p3224*p1229
- p1906: 0
- p0952: 0; = if(and(p0683>0;or(p0807=56;p0807=100;and(p0807=60;p0901>0.06)));p0934;0)
- p1102: 0.0208246; = IF(p1071=0;IF(p1096+p1101=1;0;IF(p1096+p1101+p1098>1;1-(p1096+p1101);p1098));0)
- p1212: 0.017388; = if(p1211=0;0;if(p1193>0;0;(p1207+p1208+p1209)*p1210/(2000*p1211)))
- p3320: 0; = if(and(p1232=0;p3253<>0);p3253*(p3264-p3315)/p3316;0)
- p1233: 0.000587422; = p1232*p0001/(p0818*p0002)
- p2668: 8.66017e-6; = p2277*(p1019+p1021)
- p2470: 0; = p2274*p1123
- p3112: 4.60321e-8; = p2331*p1023
- p1849: 0
- p0632: 0; = IF(p0368<0.5;-SQRT(p0007*EXP(p0500^2*p0008)-p0007);SQRT(p0007*EXP(p0500^2*p0008)-p0007))
- p1086: 0; = IF(p1071=0;p1080*(p0710/100)*p0703*1000;0)
- p2457: 0.00135934; = p2261*p1073
- p2241: 0.00122987; = p2222*p2186
- p1766: 0
- p1311: 0; = IF(p1307+p1310=p1266;0;IF(p1307+p1310+p1309>p1266;p1266-(p1307+p1310);p1309))
- p2494: 0; = p2298*p1073
- p2214: 0.000236257; = p1107/p0818
- p2704: 0; = p2313*(p1128+p1130)
- p2997: 0; = p2411*(p1020+p1022)
- p0104: 90.206
- p0914: 1.93156e8; = p0825*p0911+(p0830+p0895)*p0824*p0913
- p0884: 0; = IF(p0689=100;0;IF(p0689+p0688>100;100-p0689;p0688))
- p2081: 0.0019
- p2233: 0; = if(p0783*p0787+p0784*p0788+p0785*p0789+p0786*p0790=0;0;p0790*p0786/(p0783*p0787+p0784*p0788+p0785*p0789+p0786*p0790))
- p1837: 0
- p1232: 6.7e6; = p0801
- p2821: 0; = p2430*(p1128+p1130)
- p2922: 0.000307; = p2336*(p1079+p1081)
- p2462: 2.86356e-6; = p2266*p1073
- p2945: 4.74085e-5; = p2359*(p1020+p1022)
- p0666: 0; = IF(p0402<0.5;-SQRT(p0007*EXP(p0534^2*p0008)-p0007);SQRT(p0007*EXP(p0534^2*p0008)-p0007))
- p3276: 0
- p4721: 0; = p1754*p3482
- p2048: 1.25053e-13; = p2015*p2046/(p0818*1000000000000)
- p0240: 7.178
- p2895: 0; = p2309*(p1079+p1081)
- p3299: 0; = if(p1303+p1304+p1305+p1306=0;0;p1303/(p1303+p1304+p1305+p1306))
- p2660: 0.000109275; = p2269*(p1078+p1080)
- p0723: 5398.76; = p0063*(1+p0591*p0195/100)
- p1610: 0
- p3026: 7.00366e-6; = p2245*p1023
- p1951: 0
- p1822: 7.46855e-6; = p1414*1000/p0818
- p2051: 0.000305911; = p2015*p2049*p2050/(p0818*1000)
- p1833: 0
- p2444: 0.00217061; = p2248*p1014
- p0572: 0; = IF(p0308<0.5;-SQRT(p0007*EXP(p0440^2*p0008)-p0007);SQRT(p0007*EXP(p0440^2*p0008)-p0007))
- p1169: 0.000482248
- p0909: 6.00451e7
- p3326: 0; = if(and(p1232=0;p3255<>0);p3268*p3289;0)
- p0254: 44.616
- p3393: 0; = p3374*p1234
- p2165: 0.677346; = (p0833-p2014)/p0818-p0839
- p0696: 0
- p2126: 9.09108e-6; = p2015*p2054*p2088/(p0818*1000)
- p1683: 0
- p0242: 50.596
- p2038: 0.304457
- p2429: 0; = p2236*p2219
- p0554: 0; = IF(p0290<0.5;-SQRT(p0007*EXP(p0422^2*p0008)-p0007);SQRT(p0007*EXP(p0422^2*p0008)-p0007))
- p1845: 0
- p1227: 0.000587422; = IF(p1221=0;0;p1226*p0001/(p0818*p0002))
- p3009: 0; = p2423*(p1079+p1081)
- p1195: 0.45
- p2347: 0.00035874; = p2228*p2215
- p3170: 0; = p2389*p1132
- p1791: 0
- p1091: 7.29513e-5; = IF(p1071=0;p1085*p0001/(p0818*p0002);0)
- p1292: 0; = IF(p1287+p1290+p1291=p1261;0;p1261-(p1287+p1290+p1291))
- p1309: 0
- p1579: 0
- p2935: 8.74535e-5; = p2349*(p1079+p1081)
- p1930: 0
- p2937: 0; = p2351*(p1129+p1131)
- p0995: 0; = p0991*p0001*p0004/(p0818*p0002)
- p0734: 0
- p0762: 0
- p0926: 0; = IF(p0918+p0923+p0924+p0925=1;0;IF(p0918+p0923+p0924+p0925+p0922>1;1-(p0918+p0923+p0924+p0925);p0922))
- p5064: 0; = p1891*p3483
- p2735: 1.06948e-6; = p2344*(p1078+p1080)
- p3083: 0; = p2302*p1082
- p1615: 0
- p2022: 0.0021494; = p2018*p2015/p0818-p2021
- p1042: 0.000546963
- p0535: 0; = SQRT(2)*(IF((2*p0403-1)<0;-1;IF((2*p0403-1)>0;1;0))*SQRT(SQRT((2/(pi()*0.140012289)+LN(1-(2*p0403-1)^2)/2)^2-LN(1-(2*p0403-1)^2)/0.140012289)-(2/(pi()*0.140012289)+LN(1-(2*p0403-1)^2)/2)))
- p3346: 0; = if(and(p1232=0;p3256<>0);p3274*(p3281*(p3285*p1256+p3286*(p1253+p1257)+p1258*p3288));0)
- p1326: 0; = IF(((p0745*1000*p0753/100)+(p0754*1000*p0762/100))/p0801<0;0;((p0745*1000*p0753/100)+(p0754*1000*p0762/100))/p0801)
- p1035: 5.37174e-6; = IF(p1012=0;p1029*p0001/(p0818*p0002);0)
- p0152: 0
- p1937: 0
- p1929: 0
- p1844: 0
- p0811: 0; = if(p0807=480;1-p0810;0)
- p0795: 65.149; = p0135*(1+p0663*p0267/100)
- p2157: 5.24489e-7; = p2015*p2086*p2119/(p0818*1000)
- p2816: 0; = p2425*(p1078+p1080)
- p1092: 0; = IF(p1071=0;p1086*p0001/(p0818*p0002);0)
- p2312: 0; = p2231*p2219
- p2325: 0.000113976; = p2224*p2192
- p3470: 0; = p3375*p1241
- p0796: 90.206; = p0136*(1+p0664*p0268/100)
- p0112: 59.557
- p2370: 1.99835e-5; = p2225*p2199
- p4513: 0; = p1962*p3480
- p2122: 0.341195
- p1908: 0
- p2718: 1.559e-5; = p2327*(p1019+p1021)
- p2495: 0; = p2299*p1073
- p2642: 1.25896e-6; = p2251*(p1019+p1021)
- p3274: 0
- p2700: 0; = p2309*(p1078+p1080)
- p2073: 0.377647
- p1652: 0
- p0004: 0.0254
- p0864: 0; = IF(p0858=1;0;IF(p0858+p0859>1;1-p0858;p0859))
- p0702: 5399.12; = p0042*(1+p0570*p0174/100)
- p0571: 0; = IF(p0307<0.5;-SQRT(p0007*EXP(p0439^2*p0008)-p0007);SQRT(p0007*EXP(p0439^2*p0008)-p0007))
- p1910: 0
- p3294: 0
- p3416: 0; = p3378*p1238
- p3005: 0; = p2419*(p1079+p1081)
- p1676: 0
- p1803: 0
- p0405: 0; = SQRT(2)*(IF((2*p0273-1)<0;-1;IF((2*p0273-1)>0;1;0))*SQRT(SQRT((2/(pi()*0.140012289)+LN(1-(2*p0273-1)^2)/2)^2-LN(1-(2*p0273-1)^2)/0.140012289)-(2/(pi()*0.140012289)+LN(1-(2*p0273-1)^2)/2)))
- p2594: 0; = p2398*p1014
- p3067: 5.98784e-7; = p2286*p1023
- p0358: 0.5
- p2766: 2.22873e-5; = p2375*(p1078+p1080)
- p0879: 0; = p0878*p0001*p0003/(p0818*p0002)
- p2221: 8.47569e-5; = p1155-p2220
- p0587: 0; = IF(p0323<0.5;-SQRT(p0007*EXP(p0455^2*p0008)-p0007);SQRT(p0007*EXP(p0455^2*p0008)-p0007))
- p2839: 1.77332e-5; = p2253*(p1020+p1022)
- p0322: 0.5
- p3137: 6.72185e-7; = p2356*p1023
- p2650: 0.000260292; = p2259*(p1078+p1080)
- p0584: 0; = IF(p0320<0.5;-SQRT(p0007*EXP(p0452^2*p0008)-p0007);SQRT(p0007*EXP(p0452^2*p0008)-p0007))
- p1100: 0.254708
- p0701: 0
- p1596: 0
- p1328: 0; = p1319*p0801
- p0845: 0.5
- p0096: 34.497
- p0591: 0; = IF(p0327<0.5;-SQRT(p0007*EXP(p0459^2*p0008)-p0007);SQRT(p0007*EXP(p0459^2*p0008)-p0007))
- p4308: 0; = p1963*p3479
- p0759: 0
- p2941: 0.00044205; = p2355*(p1020+p1022)
- p2478: 3.56731e-5; = p2282*p1014
- p3387: 0; = p3368*p1234
- p3347: 0; = if(and(p1232=0;p3256<>0);p3275*p3289;0)
- p2289: 0.000515272; = p2223*p2196
- p2255: 0.0014139; = p2222*p2201
- p2112: 0.856281
- p0103: 5399.12
- p1891: 1.96541e-7; = p1483*1000/p0818
- p1253: 0; = if(p1232>0;0;p0735/100)
- p3310: 0; = if(and(p1232=0;p3252<>0);IF((p3306+p3307+p3308+p3309)+(p3252*(p3257*(1-p3277))/p3305)>p3252;p3252-(p3306+p3307+p3308+p3309);p3252*(p3257*(1-p3277))/p3305);0)
- p0298: 0.5
- p3303: 0; = if(and(p1232=0;p3252<>0);p3259*p3289;0)
- p0710: 47.429; = p0050*(1+p0578*p0182/100)
- p1140: 8.25791e-6; = if(p1121=0;p1134*p0001/(p0818*p0002);0)
- p3199: 0; = p2418*p1082
- p3339: 0; = if(and(p1232=0;p3254<>0);p3254*(p3269*p3277-p3334)/p3338;0)
- p0740: 43.271; = p0080*(1+p0608*p0212/100)
- p2395: 0; = p2234*p2184
- p0176: 4.994
- p2814: 0; = p2423*(p1078+p1080)
- p0110: 2.603
- p0615: 0; = IF(p0351<0.5;-SQRT(p0007*EXP(p0483^2*p0008)-p0007);SQRT(p0007*EXP(p0483^2*p0008)-p0007))
- p3287: 0
- p2672: 9.28776e-7; = p2281*(p1019+p1021)
- p2029: 4.03
- p3175: 0; = p2394*p1023
- p0999: 0; = IF(p0996=1;0;IF(p0996+p0997>1;1-p0996;p0997))
- p2008: 0.0605197; = ((p1982*p1985+p1988*p1991+p1994*p1997+p2002*p2005)/p0818)*p0005*p0002/1000
- p2309: 0; = p2227*p2216
- p1986: 4200
- p2069: 0.190588
- p1105: 0.436421
- p0729: 0
- p3259: 0
- p3226: 0.000396032; = p3222*p1229
- p0217: 10.817
- p2114: 0.832356
- p0899: 9.85083e9; = p0825*p0896+(p0830+p0895)*p0824*p0898
- p2032: 0.448886
- p3064: 2.57052e-7; = p2283*p1023
- p0550: 0; = IF(p0286<0.5;-SQRT(p0007*EXP(p0418^2*p0008)-p0007);SQRT(p0007*EXP(p0418^2*p0008)-p0007))
- p1031: 5.33331e-5; = IF(p1012=0;p1025*p0001/(p0818*p0002);0)
- p0754: 781.615; = p0094*(1+p0622*p0226/100)
- p1062: 0.16
- p2925: 0.00074654; = p2339*(p1079+p1081)
- p2557: 0.000100204; = p2361*p1014
- p0320: 0.5
- p1196: 0.59
- p1541: 1
- p3060: 1.77049e-7; = p2279*p1023
- p1862: 0
- p3079: 0; = p2298*p1082
- p2116: 0.444424
- p0169: 0
- p1713: 0
- p1342: 0; = p1326*p0801
- p3139: 8.49993e-6; = p2358*p1023
- p2492: 3.67522e-5; = p2296*p1014
- p1956: 0
- p1981: 400
- p0831: 0.137; = 1-p0824
- p1168: 2.44472e-6; = p1164*p1167/p0818
- p4720: 1.26289e-5; = p1963*p3481
- p1886: 0
- p2454: 0.000559004; = p2258*p1073
- p0931: 1.56854e6; = p0801*p0925
- p1685: 0
- p2722: 4.57028e-7; = p2331*(p1019+p1021)
- p0678: 303.71; = p0018*(1+p0546*p0150/100)
- p2736: 1.11834e-5; = p2345*(p1078+p1080)
- p2864: 1.99198e-6; = p2278*(p1020+p1022)
- p0249: 2.384
- p2286: 4.75981e-5; = p2223*p2192
- p2161: 1.1068e-7; = p2015*p2085*p2123/(p0818*1000)
- p3414: 0; = p3376*p1238
- p2977: 0; = p2391*(p1129+p1131)
- p1719: 0
- p1776: 0
- p1256: 0; = if(p1232>0;0;IF(p1253=1;0;IF(p1253+p1254>1;1-p1253;p1254)))
- p1658: 0
- p1576: 0
- p2576: 7.61029e-6; = p2380*p1073
- p1989: 50
- p0671: 0
- p2001: 400
- p2982: 0; = p2396*(p1020+p1022)
- p0684: 0
- p0712: 22.097; = p0052*(1+p0580*p0184/100)
- p1038: 0.00527766
- p1343: 0; = p1342*p0001/(p0818*p0002)
- p2155: 1.53667e-6; = p2015*p2084*p2117/(p0818*1000)
- p3154: 1.40638e-6; = p2373*p1023
- p2859: 0.000178994; = p2273*(p1129+p1131)
- p1085: 832065; = IF(p1071=0;p1079*(p0710/100)*p0703*1000;0)
- p0282: 0.5
- p1226: 6.7e6; = IF(p1221=0;0;IF(p1193=0;p0801;0))
- p2135: 1.00779e-5; = p2015*p2063*p2097/(p0818*1000)
- p4446: 0; = p1891*p3480
- p1974: 0; = p1969*p0001/(p0818*p0002)
- p1659: 0
- p1635: 0
- p2479: 7.66251e-6; = p2283*p1014
- p0158: 26.549
- p1690: 0
- p2472: 0.00011845; = p2276*p1014
- p3333: 0; = if(and(p1232=0;p3255<>0);p3255-(p3328+p3329+p3330+p3331+p3332);0)
- p5270: 1.40351e-8; = p1891*p3484
- p3291: 0
- p0117: 21.366
- p2417: 0; = p2235*p2207
- p2188: 0.00383131; = p1066-p2186-p2187
- p2771: 3.9181e-6; = p2380*(p1078+p1080)
- p2706: 9.44696e-5; = p2315*(p1019+p1021)
- p1214: 4; = IF(p1213=0;0;p1213-1)
- p1931: 0
- p4102: 1.84041e-5; = p1963*p3478
- p0814: 0; = if(p0807=480;p0810*p0812+p0811*p0813;0)
- p2638: 0.000141511; = p2247*(p1019+p1021)
- p2877: 3.38845e-7; = p2291*(p1020+p1022)
- p2445: 0.000465296; = p2249*p1014
- p2332: 0.000331762; = p2224*p2200
- p0782: 6.648; = p0122*(1+p0650*p0254/100)
- p1633: 0
- p1206: 0.023475
- p0816: 0
- p2033: 2.34551e-5; = p2015*p2029*p2031/(p0818*1000)
- p2842: 9.92065e-5; = p2256*(p1020+p1022)
- p0235: 0
- p3110: 1.2756e-8; = p2329*p1023
- p2960: 0.000624827; = p2374*(p1020+p1022)
- p1088: 63762.7; = IF(p1071=0;p1082*(p0710/100)*p0703*1000;0)
- p1190: 1.12695e-7; = p1188/p0818
- p1995: 50
- p2847: 0.0010291; = p2261*(p1079+p1081)
- p1802: 0
- p1664: 0
- p2344: 4.83995e-6; = p2228*p2212
- p3351: 0; = if(and(p1232=0;p3256<>0);p3256*(p3274-p3346)/p3349;0)
- p3295: 0
- p0044: 90.206
- p0606: 0; = IF(p0342<0.5;-SQRT(p0007*EXP(p0474^2*p0008)-p0007);SQRT(p0007*EXP(p0474^2*p0008)-p0007))
- p2591: 0; = p2395*p1014
- p0753: 0
- p1804: 0
- p2250: 0.0122652; = p2222*p2196
- p4443: 0; = p1888*p3480
- p2000: 4000
- p2517: 8.54211e-5; = p2321*p1014
- p2414: 0; = p2235*p2204
- p1580: 0
- p0191: 35.771
- p3006: 0; = p2420*(p1079+p1081)
- p2240: 0.000335005; = p2222*p2185
- p0885: 0; = IF(p0689+p0884=100;0;100-(p0689+p0884))
- p3249: 0
- p2581: 4.35561e-6; = p2385*p1073
- p1723: 0
- p2813: 0; = p2422*(p1078+p1080)
- p2243: 0.00226438; = p2222*p2188
- p3252: 0; = p1252*(p1267*(1-p3247)+p1270*(1-p3248)+p1271*(1-p3249)+p1272*(1-p3250))
- p3825: 1.48277e-6; = p1888*p3477
- p2994: 0; = p2408*(p1020+p1022)
- p1278: 0
- p0433: 0; = SQRT(2)*(IF((2*p0301-1)<0;-1;IF((2*p0301-1)>0;1;0))*SQRT(SQRT((2/(pi()*0.140012289)+LN(1-(2*p0301-1)^2)/2)^2-LN(1-(2*p0301-1)^2)/0.140012289)-(2/(pi()*0.140012289)+LN(1-(2*p0301-1)^2)/2)))
- p1842: 0
- p0139: 17.969
- p0773: 47.429; = p0113*(1+p0641*p0245/100)
- p3379: 0; = if(p1232=0;p3246*p3361/p0818;0)
- p1839: 0
- p2912: 0.000283876; = p2326*(p1020+p1022)
- p2099: 0.620397
- p1584: 0
- p2145: 4.16355e-6; = p2015*p2073*p2107/(p0818*1000)
- p2951: 0.00155031; = p2365*(p1020+p1022)
- p0531: 0; = SQRT(2)*(IF((2*p0399-1)<0;-1;IF((2*p0399-1)>0;1;0))*SQRT(SQRT((2/(pi()*0.140012289)+LN(1-(2*p0399-1)^2)/2)^2-LN(1-(2*p0399-1)^2)/0.140012289)-(2/(pi()*0.140012289)+LN(1-(2*p0399-1)^2)/2)))
- p1294: 0; = p1290*p1252/p0818
- p2480: 8.77075e-6; = p2284*p1014
- p0905: 0.0341917; = p0904/p0818
- p2372: 0.000776774; = p2225*p2201
- p1077: 0; = IF(p1071=0;p0715/100;0)
- p1744: 0
- p1710: 0
- p2164: 0.00449342; = (p2015/p0818)-(p2022)-(p2035+p2036+p2052)-(p2017/p0818)-(p2039+p2041+p2044+p2158+p2159+p2160+p2161+p2162)
- p2767: 2.01571e-5; = p2376*(p1078+p1080)
- p2304: 0; = p2227*p2211
- p1069: 0.000106593; = IF(p1012=0;p1055/(p1062*p0818);0)
- p2695: 0; = p2304*(p1078+p1080)
- p1033: 0; = IF(p1012=0;p1027*p0001/(p0818*p0002);0)
- p0342: 0.5
- p0733: 0
- p2323: 5.60053e-5; = p2224*p2190
- p1823: 0
- p3065: 2.94229e-7; = p2284*p1023
- p1137: 0; = if(p1121=0;p1131*(p0716/100)*p0703*1000;0)
- p2172: 0.300687; = p2166-(p2167+p2168+p2169+p2170)
- p3050: 1.23136e-5; = p2269*p1082
- p2761: 2.49594e-6; = p2370*(p1019+p1021)
- p3044: 5.70129e-6; = p2263*p1082
- p0518: 0; = SQRT(2)*(IF((2*p0386-1)<0;-1;IF((2*p0386-1)>0;1;0))*SQRT(SQRT((2/(pi()*0.140012289)+LN(1-(2*p0386-1)^2)/2)^2-LN(1-(2*p0386-1)^2)/0.140012289)-(2/(pi()*0.140012289)+LN(1-(2*p0386-1)^2)/2)))
- p3029: 7.28168e-5; = p2248*p1023
- p0804: 0
- p3525: 0; = p1794*p3476
- p1129: 0.26607; = if(p1121=0;IF(p1123+p1128=1;0;IF(p1123+p1128+p1125>1;1-(p1123+p1128);p1125));0)
- p2505: 0; = p2309*p1073
- p1606: 0
- p0924: 0; = IF(p0918+p0923=1;0;IF(p0918+p0923+p0920>1;1-(p0918+p0923);p0920))
- p2519: 2.1002e-5; = p2323*p1014
- p1132: 0.47152; = if(p1121=0;IF(p1123+p1128+p1129+p1130+p1131=1;0;1-(p1123+p1128+p1129+p1130+p1131));0)
- p3354: 0; = IF((p3350+p3351+p3352+p3353)+IF(p3349=0;0;(p3256*(p3273*(1-p3277))/p3349))>p3256;p3256-(p3350+p3351+p3352+p3353);IF(p3349=0;0;p3256*(p3273*(1-p3277))/p3349))
- p1782: 0
- p1715: 0
- p3213: 0.112803; = p1222*12.0107/100.0869
- p1611: 0
- p2318: 3.37005e-5; = p2224*p2185
- p1572: 0
- p0241: 7.074
- p3219: 0.0100591; = p3215*p1228
- p1707: 0
- p3242: 3.81502e-8; = p3234*p1188*p3238/p0818
- p2908: 2.38537e-5; = p2322*(p1020+p1022)
- p0508: 0; = SQRT(2)*(IF((2*p0376-1)<0;-1;IF((2*p0376-1)>0;1;0))*SQRT(SQRT((2/(pi()*0.140012289)+LN(1-(2*p0376-1)^2)/2)^2-LN(1-(2*p0376-1)^2)/0.140012289)-(2/(pi()*0.140012289)+LN(1-(2*p0376-1)^2)/2)))
- p1934: 0
- p2601: 0; = p2405*p1014
- p2698: 0; = p2307*(p1078+p1080)
- p2602: 0; = p2406*p1014
- p2915: 4.94341e-7; = p2329*(p1020+p1022)
- p2526: 6.24115e-7; = p2330*p1014
- p1282: 0; = IF(p1277+p1280+p1281=p1260;0;p1260-(p1277+p1280+p1281))
- p3123: 1.78573e-6; = p2342*p1082
- p0655: 0; = IF(p0391<0.5;-SQRT(p0007*EXP(p0523^2*p0008)-p0007);SQRT(p0007*EXP(p0523^2*p0008)-p0007))
- p1257: 0; = if(p1232>0;0;IF(p1253+p1256=1;0;IF(p1253+p1256+p1255>1;1-(p1253+p1256);p1255)))
- p4916: 0; = p1949*p3482
- p0637: 0; = IF(p0373<0.5;-SQRT(p0007*EXP(p0505^2*p0008)-p0007);SQRT(p0007*EXP(p0505^2*p0008)-p0007))
- p2392: 0; = p2233*p2221
- p1119: 0.0108695; = IF(p1071=0;p1109/(p1114*p0818);0)
- p3428: 0; = p3371*p1239
- p3160: 9.76336e-7; = p2379*p1082
- p0849: 0
- p3336: 0; = IF(or(p3254=0;p1232>0);0;p3271*p3289)
- p1605: 0
- p2673: 1.18815e-5; = p2282*(p1019+p1021)
- p1824: 0
- p2876: 2.06444e-7; = p2290*(p1020+p1022)
- p1752: 0
- p2825: 4.7416e-5; = p2239*(p1020+p1022)
- p2869: 9.96167e-6; = p2283*(p1020+p1022)
- p3391: 0; = p3372*p1234
- p0786: 0
- p2535: 0.000986105; = p2339*p1073
- p2567: 0.000679436; = p2371*p1014
- p3221: 0.146975; = IF(p3216=0;0;p1223*12.0107/100.0869+(1-p1224)*12.0107/84.3139)
- p0790: 0
- p0863: 0; = p0675*1000/p0856
- p2525: 3.80247e-7; = p2329*p1014
- p2150: 1.25285e-6; = p2015*p2078*p2112/(p0818*1000)
- p2474: 1.53223e-6; = p2278*p1014
- p0791: 0
- p2102: 0.922577
- p2678: 3.0372e-5; = p2287*(p1019+p1021)
- p1048: 0.000546963; = IF(p1012=0;IF(p1037+p1044+p1045+p1046+p1047=1;0;IF(p1037+p1044+p1045+p1046+p1047+p1042>1;1-(p1037+p1044+p1045+p1046+p1047);p1042));0)
- p2264: 9.88607e-5; = p2226*p2210
- p3897: 1.46439e-5; = p1754*p3478
- p1825: 0
- p0813: 0; = if(p0807=480;1.56521739130435;0)
- p0122: 6.648
- p3162: 1.9063e-7; = p2381*p1082
- p2230: 1; = if(p0783*p0787+p0784*p0788+p0785*p0789+p0786*p0790=0;0;p0787*p0783/(p0783*p0787+p0784*p0788+p0785*p0789+p0786*p0790))
- p2663: 0.00012527; = p2272*(p1128+p1130)
- p0859: 0; = p0671*1000/p0856
- p0883: 5.87422; = p0882*p0001*p0003/(p0818*p0002)
- p2580: 2.31886e-6; = p2384*p1073
- p3235: 0.118093
- p3040: 2.9331e-5; = p2259*p1082
- p3353: 0; = if(and(p1232=0;p3256<>0);p3256*(p3276-p3348)/p3349;0)
- p1851: 0
- p1896: 0
- p3223: 0.126838; = IF(p3216=0;0;(1-p1223)*24.3050/84.3139)
- p2964: 7.96944e-5; = p2378*(p1079+p1081)
- p1754: 3.11517e-5; = p1346*1000/p0818
- p3206: 0; = p2425*p1082
- p2306: 0; = p2227*p2213
- p1599: 0
- p2923: 0.000277658; = p2337*(p1079+p1081)
- p3075: 7.4724e-7; = p2294*p1023
- p2536: 0.000157647; = p2340*p1073
- p0610: 0; = IF(p0346<0.5;-SQRT(p0007*EXP(p0478^2*p0008)-p0007);SQRT(p0007*EXP(p0478^2*p0008)-p0007))
- p1593: 0
- p2815: 0; = p2424*(p1078+p1080)
- p3181: 0; = p2400*p1023
- p2562: 0.000255626; = p2366*p1014
- p2422: 0; = p2235*p2212
- p3076: 1.07545e-7; = p2295*p1023
- p2166: 0.584549; = p2165*p0824
- p1919: 0
- p0944: 0; = if(and(p0683=0;p0950=0);p0938;0)
- p4171: 0; = p1822*p3479
- p2432: 0.0210543; = p1158
- p3174: 0; = p2393*p1023
- p1918: 0
- p0829: 0; = if(p0807=480;p0814*(1-p0824);0)
- p1009: 0; = p1005*p0001*p0004/(p0818*p0002)
- p0717: 0
- p3305: 0; = if(and(p1232=0;p3252<>0);1-(p3301+p3302+p3303+p3304);0)
- p0751: 39.154; = p0091*(1+p0619*p0223/100)
- p2042: 0.07
- p1620: 0
- p1932: 0
- p1657: 0
- p2151: 2.08178e-7; = p2015*p2079*p2113/(p0818*1000)
- p1780: 0
- p0837: 0.5
- p3238: 0.854735; = IF(p3237+p3235+p3236>1;1-(p3235+p3236);p3237)
- p1729: 0
- p0979: 7.6492e-6; = IF(p0976=0;0;p0976*p0001/(p0818*p0002))
- p3329: 0; = if(and(p1232=0;p3255<>0);p3255*(p3266-p3324)/p3327;0)
- p0029: 100
- p3165: 1.34529e-7; = p2384*p1082
- p2903: 4.76991e-6; = p2317*(p1020+p1022)
- p2890: 0; = p2304*(p1079+p1081)
- p3073: 1.92237e-8; = p2292*p1023
- p2574: 0.000105268; = p2378*p1073
- p2499: 0; = p2303*p1073
- p2447: 3.7799e-6; = p2251*p1014
- p1914: 0
- p1264: 0; = if(p1232>0;0;IF(p1259+p1263=1;0;IF(p1259+p1263+p1261>1;1-(p1259+p1263);p1261)))
- p3366: 0; = if(p1232=0;p3244*p3360/p0818;0)
- p3107: 7.32515e-6; = p2326*p1023
- p3158: 7.35539e-7; = p2377*p1082
- p3423: 0; = p3366*p1239
- p2054: 0.91
- p1249: 0; = if(p1232>0;0;p1244*p0001/(p0818*p0002))
- p1944: 0
- p0665: 0; = IF(p0401<0.5;-SQRT(p0007*EXP(p0533^2*p0008)-p0007);SQRT(p0007*EXP(p0533^2*p0008)-p0007))
- p3161: 4.41511e-7; = p2380*p1082
- p1617: 0
- p2459: 9.82728e-5; = p2263*p1073
- p1765: 0
- p2133: 4.96813e-6; = p2015*p2061*p2095/(p0818*1000)
- p0989: 0; = p0985*p0886
- p2651: 8.42891e-5; = p2260*(p1078+p1080)
- p2117: 0.585147
- p1712: 0
- p0581: 0; = IF(p0317<0.5;-SQRT(p0007*EXP(p0449^2*p0008)-p0007);SQRT(p0007*EXP(p0449^2*p0008)-p0007))
- p2843: 0.00113732; = p2257*(p1020+p1022)
- p0184: 32.49
- p1970: 6.7e6; = p0801
- p1717: 0
- p0904: 3.47935e8; = p0825*p0901+(p0830+p0895)*p0824*p0903
- p0911: 0.00475556
- p0215: 18.036
- p1061: 0.3
- p0574: 0; = IF(p0310<0.5;-SQRT(p0007*EXP(p0442^2*p0008)-p0007);SQRT(p0007*EXP(p0442^2*p0008)-p0007))
- p2144: 1.43488e-6; = p2015*p2072*p2106/(p0818*1000)
- p2636: 6.95355e-5; = p2245*(p1019+p1021)
- p1933: 0
- p2754: 9.60674e-6; = p2363*(p1019+p1021)
- p1288: 0
- p2463: 2.99438e-5; = p2267*p1073
- p0579: 0; = IF(p0315<0.5;-SQRT(p0007*EXP(p0447^2*p0008)-p0007);SQRT(p0007*EXP(p0447^2*p0008)-p0007))
- p0937: 0.000137522; = p0931*p0001/(p0818*p0002)
- p1065: 0.000731388; = IF(p1012=0;p1051/(p1058*p0818);0)
- p2644: 4.54316e-6; = p2253*(p1019+p1021)
- p2355: 0.000906732; = p2225*p2183
- p2838: 8.06568e-6; = p2252*(p1020+p1022)
- p0970: 0; = p0967/p0818
- p0973: 0; = p0967+p0968+p0969
- p1133: 0; = if(p1121=0;p1123*(p0716/100)*p0703*1000;0)
- p0307: 0.5
- p2755: 7.7744e-5; = p2364*(p1019+p1021)
- p2719: 0.000154107; = p2328*(p1019+p1021)
- p2386: 3.82961e-5; = p2229*p2215
- p2832: 6.82543e-5; = p2246*(p1020+p1022)
- p3020: 1.22353e-6; = p2239*p1023
- p0255: 24.63
- p2796: 0; = p2405*(p1019+p1021)
- p2606: 0; = p2410*p1014
- p1325: 0; = IF(((p0745*1000*p0752/100)+(p0754*1000*p0761/100))/p0801<0;0;((p0745*1000*p0752/100)+(p0754*1000*p0761/100))/p0801)
- p1040: 0.0263929
- p2385: 1.01482e-5; = p2229*p2214
- p3019: 2.07627e-5; = p2238*p1023
- p3374: 0; = if(p1232=0;p3246*p3356/p0818;0)
- p1327a: 0.0472941; = (p0745*1000/p0801)*(1-(p0746+p0747+p0748+p0749+p0750+p0751+p0752+p0753)/100)+(p0754*1000/p0801)*(1-(p0755+p0756+p0757+p0758+p0759+p0760+p0761+p0762)/100)
- p1039: 0.0667372
- p1189: 0.000587422; = p0801*p0001/(p0818*p0002)
- p1948: 0
- p0980: 0; = IF(p0977=0;0;p0977*p0001/(p0818*p0002))
- p2003: 50
- p1556: 0
- p0823: 0
- p1317: 0
- p2373: 0.000111795; = p2225*p2202
- p1945: 0
- p2886: 0; = p2300*(p1079+p1081)
- p0386: 0.5
- p2850: 3.21228e-5; = p2264*(p1079+p1081)
- p1153: 0.365265
- p2466: 1.77675e-5; = p2270*p1073
- p0861: 0; = p0673*1000/p0856
- p0047: 20.143
- p1651: 0
- p0975: 0; = p0973*p0974/p0818
- p2840: 0.00160781; = p2254*(p1020+p1022)
- p1939: 0
- p2111: 0.856281
- p1237: 0; = if(p1232>0;0;p0729/100)
- p3306: 0; = if(and(p1232=0;p3252<>0);p3252*(p3257*p3277-p3301)/p3305;0)
- p0500: 0; = SQRT(2)*(IF((2*p0368-1)<0;-1;IF((2*p0368-1)>0;1;0))*SQRT(SQRT((2/(pi()*0.140012289)+LN(1-(2*p0368-1)^2)/2)^2-LN(1-(2*p0368-1)^2)/0.140012289)-(2/(pi()*0.140012289)+LN(1-(2*p0368-1)^2)/2)))
- p3220: 0.00133886; = p3216*p1228
- p2201: 0.00239231; = 12.01*p2200/(2*14.0067)
- p1669: 0
- p2176: 0.00320104; = p0895*p0913/p0818
- p0832: 1.8673e9; = p0831*p0830/(1-p0831)
- p1199: -0.29
- p0918: 0.525136; = p0680*1000/p0801
- p1014: 0.375; = IF(p1012=0;p0705/100;0)
- p2570: 0.000480617; = p2374*p1014
- p2620: 0; = p2424*p1073
- p1555: 0
- p2703: 0; = p2312*(p1128+p1130)
- p2443: 0.000424874; = p2247*p1014
- p2721: 2.07872e-7; = p2330*(p1019+p1021)
- p2274: 4.87742e-5; = p2230*p2220
- p2398: 0; = p2234*p2187
- p1706: 0
- p2452: 7.63095e-5; = p2256*p1014
- p1966: 5.3e6; = if(p0814=0;p0802;0)
- p0154: 0
- p4652: 6.33985e-8; = p1891*p3481
- p2926: 0.000119348; = p2340*(p1079+p1081)
- p0698: 0
- p3114: 1.78931e-6; = p2333*p1023
- p2995: 0; = p2409*(p1020+p1022)
- p3173: 0; = p2392*p1132
- p4092: 4.61954e-8; = p1949*p3478
- p3256: 0; = p1252*(p1307*(1-p3247)+p1310*(1-p3248)+p1311*(1-p3249)+p1312*(1-p3250))
- p0856: 6.7e6; = p0801
- p0748: 46.942; = p0088*(1+p0616*p0220/100)
- p1073: 0.4292; = IF(p1071=0;p0711/100;0)
- p1103: 0.655189; = IF(p1071=0;IF(p1096+p1101+p1102=1;0;IF(p1096+p1101+p1102+p1099>1;1-(p1096+p1101+p1102);p1099));0)
- p2067: 0.446471
- p2390: 0; = p2233*p2219
- p0776: 29.782; = p0116*(1+p0644*p0248/100)
- p1709: 0
- p1333: 0.000182881; = p1332*p0001/(p0818*p0002)
- p1207: 128.954; = if(p1193>0;0;(p1194*p1050/p1057+p1195*p1051/p1058+p1196*p1052/p1059+p1197*p1053/p1060+p1198*p1054/p1061+p1199*p1055/p1062+p1200*p1056/p1063)/(p0702*1000)+(p1201*p1109/p1114+p1202*p1110/p1115)/(p0702*1000)+p1203*p1170/p0801+p1204*p1176/p0801)
- p1295: 0; = p1291*p1252/p0818
- p1855: 0
- p0043: 5399.12
- p2211: 0.00233403; = p1120-p2209-p2208-p2210
- p1821: 0
- p0578: 0; = IF(p0314<0.5;-SQRT(p0007*EXP(p0446^2*p0008)-p0007);SQRT(p0007*EXP(p0446^2*p0008)-p0007))
- p0343: 0.5
- p1636: 0
- p2514: 1.26377e-5; = p2318*p1014
- p2361: 0.000267211; = p2225*p2189
- p2983: 0; = p2397*(p1020+p1022)
- p2918: 0.000161741; = p2332*(p1020+p1022)
- p2538: 3.07806e-5; = p2342*p1073
- p2213: 0.00012578; = p1116-p2212
- p1001: 0; = if(p0978>0;0;if(and(p0687=0;p0691=0;p0695=0;p0699=0);0;IF(p0996+p0999+p1000=1;0;1-(p0996+p0999+p1000))))
- p2930: 1.57265e-6; = p2344*(p1079+p1081)
- p1928: 0
- p3197: 0; = p2416*p1082
- p2468: 0; = p2272*p1123
- p1718: 0
- p2050: 0.952062
- p1236: 0; = if(p1232>0;0;p0728/100)
- p1134: 94187.8; = if(p1121=0;p1128*(p0716/100)*p0703*1000;0)
- p2439: 0.000849141; = p2243*p1014
- p0969: 0
- p1324: 0.213634; = IF(((p0745*1000*p0751/100)+(p0754*1000*p0760/100))/p0801<0;0;((p0745*1000*p0751/100)+(p0754*1000*p0760/100))/p0801)
- p3285: 0
- p1177: 0.000587422; = p0801*p0001/(p0818*p0002)
- p1653: 0
- p2425: 0; = p2235*p2215
- p2775: 1.19385e-6; = p2384*(p1078+p1080)
- p1672: 0
- p1941: 0
- p3113: 4.17357e-6; = p2332*p1023
- p3023: 2.22673e-6; = p2242*p1023
- p3304: 0; = if(and(p1232=0;p3252<>0);p3260*p3289;0)
- p2844: 0.000423199; = p2258*(p1079+p1081)
- p0188: 44.616
- p3388: 0; = p3369*p1234
- p2110: 0.856281
- p3464: 0; = p3369*p1241
- p2989: 0; = p2403*(p1020+p1022)
- p2354: 0.00413067; = p2225*p2182
- p1291: 0; = IF(p1287+p1290=p1264;0;IF(p1287+p1290+p1289>p1264;p1264-(p1287+p1290);p1289))
- p0789: 0
- p2314: 0; = p2231*p2221
- p2482: 1.78493e-5; = p2286*p1014
- p1068: 0.0326458; = IF(p1012=0;p1054/(p1061*p0818);0)
- p1569: 0
- p2023: 2.12
- p3313: 0; = if(and(p1232=0;p3253<>0);p3262*(p3278*(p3282*p1256+p3286*(p1253+p1257)+p1258*p3288+p3298*p3287));0)
- p2569: 4.19232e-5; = p2373*p1014
- p0094: 781.615
- p2061: 0.518824
- p1030: 0.000160127; = IF(p1012=0;p1024*p0001/(p0818*p0002);0)
- p2434: 0.00061892; = p2238*p1014
- p0082: 37.717
- p2273: 0.000672734; = p2230*p2219
- p0087: 9.124
- p2090: 0.40001
- p3128: 8.93262e-6; = p2347*p1082
- p0045: 37.5
- p2981: 0; = p2395*(p1020+p1022)
- p2768: 6.52739e-6; = p2377*(p1078+p1080)
- p2516: 6.67735e-6; = p2320*p1014
- p2412: 0; = p2234*p2202
- p0447: 0; = SQRT(2)*(IF((2*p0315-1)<0;-1;IF((2*p0315-1)>0;1;0))*SQRT(SQRT((2/(pi()*0.140012289)+LN(1-(2*p0315-1)^2)/2)^2-LN(1-(2*p0315-1)^2)/0.140012289)-(2/(pi()*0.140012289)+LN(1-(2*p0315-1)^2)/2)))
- p5122: 0; = p1949*p3483
- p2488: 5.73043e-7; = p2292*p1014
- p0387: 0.5
- p1630: 0
- p1963j: 0; = p1725*p1929+p1726*p1930+p1727*p1931+p1728*p1932+p1729*p1933+p1730*p1934+p1731*p1935+p1732*p1936+p1733*p1937+p1734*p1938+p1735*p1939+p1736*p1940+p1737*p1941+p1738*p1942+p1739*p1943+p1740*p1944+p1741*p1945+p1742*p1946+p1743*p1947
- p2039: 7.5766e-6; = p2015*p2037*p2038/(p0818*1000)
- p1272: 0; = IF(p1267+p1270+p1271=p1259;0;p1259-(p1267+p1270+p1271))
- p0674: 0
- p2808: 0; = p2417*(p1078+p1080)
- p1318: 0; = p1317*p0001/(p0818*p0002)
- p3361: 0; = if(p1232=0;p3311+p3322+p3333+p3344+p3355;0)
- p2565: 3.40844e-6; = p2369*p1014
- p3307: 0; = if(and(p1232=0;p3252<>0);p3252*(p3258-p3302)/p3305;0)
- p0006: 15
- p1631: 0
- p2070: 0.282
- p2226: 0.554672; = if(p0774*p0778+p0775*p0779+p0776*p0780+p0777*p0781=0;0;p0778*p0774/(p0774*p0778+p0775*p0779+p0776*p0780+p0777*p0781))
- p3189: 0; = p2408*p1023
- p2477: 2.78856e-6; = p2281*p1014
- p3367: 0; = if(p1232=0;p3244*p3361/p0818;0)
- p2162: 2.03884e-7; = p2015*p2086*p2124/(p0818*1000)
- p3292: 0
- p0127: 33.55
- p2420: 0; = p2235*p2210
- p2513: 3.66901e-6; = p2317*p1014
- p1000: 0; = IF(p0996+p0999=1;0;IF(p0996+p0999+p0998>1;1-(p0996+p0999);p0998))
- p0644: 0; = IF(p0380<0.5;-SQRT(p0007*EXP(p0512^2*p0008)-p0007);SQRT(p0007*EXP(p0512^2*p0008)-p0007))
- p3179: 0; = p2398*p1023
- p1792: 0
- p1205: 0
- p2852: 2.16789e-6; = p2266*(p1079+p1081)
- p2750: 1.21458e-5; = p2359*(p1019+p1021)
- p0835: 423.413; = -LN(1-p0669/100)/p0834
- p2510: 0; = p2314*p1123
- p2245: 0.00055673; = p2222*p2190
- p3452: 0; = p3376*p1240
- p3263: 0
- p2940: 0.00201378; = p2354*(p1020+p1022)
- p3380: 0; = p3251/p0818
- p0917: 1.27956
- p1314: 0; = p1310*p1252/p0818
- p2046: 10
- p2688: 0; = p2297*(p1078+p1080)
- p3022: 1.54718e-5; = p2241*p1023
- p2953: 0.00328507; = p2367*(p1020+p1022)
- p3410: 0; = p3372*p1238
- p2785: 0; = p2394*(p1019+p1021)
- p2616: 0; = p2420*p1073
- p3418: 0; = p3380*p1238
- p1770: 0
- p2740: 5.94731e-5; = p2349*(p1078+p1080)
- p1322: 0; = IF(((p0745*1000*p0749/100)+(p0754*1000*p0758/100))/p0801<0;0;((p0745*1000*p0749/100)+(p0754*1000*p0758/100))/p0801)
- p3272: 0
- p2586: 0; = p2390*p1123
- p1732: 0
- p0402: 0.5
- p0695: 0
- p0237: 7.671
- p2905: 6.03165e-5; = p2319*(p1020+p1022)
- p0250: 11.246
- p3082: 0; = p2301*p1082
- p2208: 0.000912842; = p1110/p0818
- p1176: 887.315; = p1175*p0801
- p2351: 0; = p2232*p2219
- p2511: 0.000283636; = p2315*p1014
- p1299: 0
- p0689: 100; = p0029*(1+p0557*p0161/100)
- p0872: 0; = p0864*p0856
- p2927: 5.39706e-5; = p2341*(p1079+p1081)
- p3275: 0
- p1597: 0
- p1622: 0
- p2751: 0.000155377; = p2360*(p1019+p1021)
- p2297: 0; = p2227*p2204
- p1984: 30
- p0949: 0.000137522; = if(and(p0683=0;or(p0807=480;p0807=32;p0807=1;and(p0807=60;p0901<0.03)));p0937;0)
- p2837: 4.91408e-6; = p2251*(p1020+p1022)
- p0507: 0; = SQRT(2)*(IF((2*p0375-1)<0;-1;IF((2*p0375-1)>0;1;0))*SQRT(SQRT((2/(pi()*0.140012289)+LN(1-(2*p0375-1)^2)/2)^2-LN(1-(2*p0375-1)^2)/0.140012289)-(2/(pi()*0.140012289)+LN(1-(2*p0375-1)^2)/2)))
- p0735: 0
- p2174: 0.00344026; = p0895*p0903/p0818
- p2484: 1.95474e-5; = p2288*p1014
- p2683: 1.90862e-7; = p2292*(p1019+p1021)
- p1331: 5.28836e-5; = p1330*p0001/(p0818*p0002)
- p2595: 0; = p2399*p1014
- p1973: 0; = if(p0807=480;p1968*p0001/(p0818*p0002);0)
- p0517: 0; = SQRT(2)*(IF((2*p0385-1)<0;-1;IF((2*p0385-1)>0;1;0))*SQRT(SQRT((2/(pi()*0.140012289)+LN(1-(2*p0385-1)^2)/2)^2-LN(1-(2*p0385-1)^2)/0.140012289)-(2/(pi()*0.140012289)+LN(1-(2*p0385-1)^2)/2)))
- p0345: 0.5
- p3480: 0; = if(p1328+p1330+p1332+p1334+p1336+p1338+p1340+p1342+p1344=0;0;p1336/(p1328+p1330+p1332+p1334+p1336+p1338+p1340+p1342+p1344))
- p0682: 5398.01; = p0022*(1+p0550*p0154/100)
- p2649: 0.000287798; = p2258*(p1078+p1080)
- p3281: 0
- p1337: 0; = p1336*p0001/(p0818*p0002)
- p0239: 16.285
- p2287: 0.000243171; = p2223*p2193
- p2952: 0.000332327; = p2366*(p1020+p1022)
- p2342: 7.17162e-5; = p2228*p2210
- p2098: 0.856281
- p1900: 0
- p1885: 0
- p1148: 0.0926988; = if(p1121=0;IF(p1146=1;0;1-p1146);0)
- p2979: 0; = p2393*(p1020+p1022)
- p3459: 0; = p3364*p1241
- p1577: 0
- p2252: 1.65443e-5; = p2222*p2198
- p3481: 0.322571; = if(p1328+p1330+p1332+p1334+p1336+p1338+p1340+p1342+p1344=0;0;p1338/(p1328+p1330+p1332+p1334+p1336+p1338+p1340+p1342+p1344))
- p3266: 0
- p2030: 6.61
- p3052: 9.23832e-6; = p2271*p1082
- p2836: 0.00597955; = p2250*(p1020+p1022)
- p1655: 0
- p1027: 0; = IF(p1012=0;p1021*(p0704/100)*p0703*1000;0)
- p2498: 0; = p2302*p1073
- p0313: 0.5
- p1963f: 0; = p1647*p1851+p1648*p1852+p1649*p1853+p1650*p1854+p1651*p1855+p1652*p1856+p1653*p1857+p1654*p1858+p1655*p1859+p1656*p1860+p1657*p1861+p1658*p1862+p1659*p1863+p1660*p1864+p1661*p1865+p1662*p1866+p1663*p1867+p1664*p1868+p1665*p1869+p1666*p1870
- p1071: 0
- p0869: 1; = IF(p0858+p0864+p0865+p0866+p0867+p0868=1;0;1-(p0858+p0864+p0865+p0866+p0867+p0868))
- p2397: 0; = p2234*p2186
- p0452: 0; = SQRT(2)*(IF((2*p0320-1)<0;-1;IF((2*p0320-1)>0;1;0))*SQRT(SQRT((2/(pi()*0.140012289)+LN(1-(2*p0320-1)^2)/2)^2-LN(1-(2*p0320-1)^2)/0.140012289)-(2/(pi()*0.140012289)+LN(1-(2*p0320-1)^2)/2)))
- p2500: 0; = p2304*p1073
- p0135: 65.149
- p2187: 0.000299493; = 4*1.00794*p2186/(2*14.0067)
- p0983: 0; = if(p0886=0;0;min(1;(p0695*p0694*1000*p0697/100)/p0886))
- p2282: 9.51282e-5; = p2223*p2188
- p2776: 2.24245e-6; = p2385*(p1078+p1080)
- p0746: 0
- p1006: 0; = p1002*p0001*p0004/(p0818*p0002)
- p2713: 6.1112e-6; = p2322*(p1019+p1021)
- p2225: 0.324696; = if(p0765*p0769+p0766*p0770+p0767*p0771+p0768*p0772=0;0;p0772*p0768/(p0765*p0769+p0766*p0770+p0767*p0771+p0768*p0772))
- p1238: 0; = if(p1232>0;0;IF(p1234=1;0;IF(p1234+p1235>1;1-p1234;p1235)))
- p3383: 0; = p3364*p1234
- p3421: 0; = p3364*p1239
- p2173: 0.121937; = p0895*p0898/p0818
- p3409: 0; = p3371*p1238
- p0993: 0; = p0989*p0001*p0004/(p0818*p0002)
- p2680: 6.43575e-5; = p2289*(p1019+p1021)
- p0586: 0; = IF(p0322<0.5;-SQRT(p0007*EXP(p0454^2*p0008)-p0007);SQRT(p0007*EXP(p0454^2*p0008)-p0007))
- p3133: 0; = p2352*p1132
- p0806: 1.696e8
- p2789: 0; = p2398*(p1019+p1021)
- p2667: 3.94519e-5; = p2276*(p1019+p1021)
- p3140: 1.22333e-6; = p2359*p1023
- p5061: 0; = p1888*p3483
- p1216: 0.0791463
- p3008: 0; = p2422*(p1079+p1081)
- p2215: 0.000891558; = p1117-p2214
- p1010: 0; = p0890
- p1771: 0
- p1336: 0; = p1323*p0801
- p0945: 0; = if(and(p0683=0;p0951=0);p0939;0)
- p1183: 0.000587422; = p0801*p0001/(p0818*p0002)
- p3244: 0; = p0791/100
- p2058: 1.24412
- p1800: 0
- p3358: 0; = if(p1232=0;p3308+p3319+p3330+p3341+p3352;0)
- p0854: 4.73054e6; = p0801*((1-p0853)*p0846+p0853*p0852)
- p2599: 0; = p2403*p1014
- p0764: 90.206; = p0104*(1+p0632*p0236/100)
- p1230: 0.5
- p1841: 0
- p3207: 0; = p2426*p1082
- p2904: 1.64297e-5; = p2318*(p1020+p1022)
- p2585: 0; = p2389*p1123
- p0382: 0.5
- p1925: 0
- p0707: 20.143; = p0047*(1+p0575*p0179/100)
- p0293: 0.5
- p2418: 0; = p2235*p2208
- p2455: 0.000505576; = p2259*p1073
- p3396: 0; = p3377*p1234
- p2710: 1.54528e-5; = p2319*(p1019+p1021)
- p3474: 0; = p3379*p1241
- p1265: 0; = if(p1232>0;0;IF(p1259+p1263+p1264=1;0;IF(p1259+p1263+p1264+p1262>1;1-(p1259+p1263+p1264);p1262)))
- p2178: 0.042205; = (p0895*p0831/(1-p0831))/(p0818)
- p3357: 0; = if(p1232=0;p3307+p3318+p3329+p3340+p3351;0)
- p3010: 0; = p2424*(p1079+p1081)
- p2063: 2.01468
- p0749: 0
- p2258: 0.00130243; = p2226*p2204
- p3828: 2.67165e-8; = p1891*p3477
- p4349: 0; = p1794*p3480
- p2592: 0; = p2396*p1014
- p0908: 0.00197823
- p3420: 0; = p3363*p1239
- p2892: 0; = p2306*(p1079+p1081)
- p1738: 0
- p3308: 0; = if(and(p1232=0;p3252<>0);p3252*(p3259-p3303)/p3305;0)
- p2235: 0; = 1-(p2226+p2227+p2228+p2229)
- p0858: 0; = p0670*1000/p0856
- p2377: 2.95397e-5; = p2229*p2206
- p0874: 0; = p0865*p0856
- p3090: 0; = p2309*p1082
- p0141: 50.8711
- p2453: 0.000874829; = p2257*p1014
- p2359: 9.72442e-5; = p2225*p2187
- p1332: 2.0859e6; = p1321*p0801
- p2506: 0; = p2310*p1073
- p0416: 0; = SQRT(2)*(IF((2*p0284-1)<0;-1;IF((2*p0284-1)>0;1;0))*SQRT(SQRT((2/(pi()*0.140012289)+LN(1-(2*p0284-1)^2)/2)^2-LN(1-(2*p0284-1)^2)/0.140012289)-(2/(pi()*0.140012289)+LN(1-(2*p0284-1)^2)/2)))
- p1763: 0
- p2512: 6.22615e-5; = p2316*p1014
- p0821: 1.51364
- p2715: 1.75908e-6; = p2324*(p1019+p1021)
- p3344: 0; = if(and(p1232=0;p3254<>0);p3254-(p3339+p3340+p3341+p3342+p3343);0)
- p2087: 0.856281
- p3316: 0; = if(and(p1232=0;p3253<>0);1-(p3312+p3313+p3314+p3315);0)
- p2942: 2.60496e-5; = p2356*(p1020+p1022)
- p2881: 4.16774e-6; = p2295*(p1020+p1022)
- p1261: 0; = if(p1232>0;0;p0732/100)
- p0022: 5398.01
- p2707: 2.07372e-5; = p2316*(p1019+p1021)
- p2568: 0.00029129; = p2372*p1014
- p0699: 0
- p1629: 0
- p2705: 0; = p2314*(p1128+p1130)
- p1162: 0.000658412; = p1161/p0818
- p2238: 0.00165045; = p2222*p2183
- p3074: 1.74294e-6; = p2293*p1023
- p1106: 122402; = IF(p1071=0;p1105*p1096*p1095;0)
- p3142: 3.36152e-6; = p2361*p1023
- p2053: 1.45647
- p2394: 0; = p2234*p2183
- p2204: 0.00234811; = p1109/p0818
- p1052: 2.11755e7; = IF(p1012=0;p1045*p1036;0)
- p2446: 0.00459946; = p2250*p1014
- p1624: 0
- p1570: 0
- p2019: 0.13105
- p2910: 6.86618e-6; = p2324*(p1020+p1022)
- p3167: 9.53572e-7; = p2386*p1082
- p0703: 5399.12; = p0043*(1+p0571*p0175/100)
- p3381: 0; = p3362*p1234
- p3058: 8.72257e-7; = p2277*p1023
- p0272: 44.616
- p1290: 0; = IF(p1287=p1264;0;IF(p1287+p1288>p1264;p1264-p1287;p1288))
- p0210: 0
- p3100: 1.55641e-6; = p2319*p1023
- p2633: 2.2108e-5; = p2242*(p1019+p1021)
- p0844: 0.741768
- p2334: 2.04707e-5; = p2224*p2202
- p2148: 6.10361e-7; = p2015*p2076*p2110/(p0818*1000)
- p3338: 0; = if(and(p1232=0;p3254<>0);1-(p3334+p3335+p3336+p3337);0)
- p3124: 2.33849e-5; = p2343*p1082
- p2657: 1.47428e-6; = p2266*(p1078+p1080)
- p1982: 750
- p2974: 9.3358e-6; = p2388*(p1079+p1081)
- p2121: 0.822447
- p2348: 3.00303e-5; = p2228*p2216
- p2640: 0.000154975; = p2249*(p1019+p1021)
- p2928: 2.33028e-5; = p2342*(p1079+p1081)
- p0512: 0; = SQRT(2)*(IF((2*p0380-1)<0;-1;IF((2*p0380-1)>0;1;0))*SQRT(SQRT((2/(pi()*0.140012289)+LN(1-(2*p0380-1)^2)/2)^2-LN(1-(2*p0380-1)^2)/0.140012289)-(2/(pi()*0.140012289)+LN(1-(2*p0380-1)^2)/2)))
- p3467: 0; = p3372*p1241
- p5173: 9.12283e-8; = p1794*p3484
- p4101: 1.33535e-6; = p1962*p3478
- p3237: 0.854735
- p2769: 5.41965e-5; = p2378*(p1078+p1080)
- p0799: 17.969; = p0139*(1+p0667*p0271/100)
- p2140: 1.77129e-6; = p2015*p2068*p2102/(p0818*1000)
- p3279: 0
- p2975: 0; = p2389*(p1129+p1131)
- p1146: 0.907301
- p0640: 0; = IF(p0376<0.5;-SQRT(p0007*EXP(p0508^2*p0008)-p0007);SQRT(p0007*EXP(p0508^2*p0008)-p0007))
- p3129: 7.47755e-7; = p2348*p1082
- p1820: 0
- p0964: 0; = 56/90000
- p1903: 0
- p1187: 0.000171162
- p3145: 7.83042e-6; = p2364*p1023
- p2712: 2.84509e-5; = p2321*(p1019+p1021)
- p0828: 0; = if(p0827=0;0;p0819-p0827/p0818)
- p3143: 3.8477e-6; = p2362*p1023
- p2431: 0; = p2236*p2221
- p2159: 2.23486e-5; = p2015*p2083*p2121/(p0818*1000)
- p0892: 0; = if(p0891=0;0;(1-p1240)*p3251/p0891)
- p1608: 0
- p3039: 3.24305e-5; = p2258*p1082
- p2737: 2.10062e-5; = p2346*(p1078+p1080)
- p2005: 952334; = p1963*p0818+p1959*1000+p1170+p1176+p1182
- p0175: 0
- p3469: 0; = p3374*p1241
- p3084: 0; = p2303*p1082
- p3348: 0; = if(and(p1232=0;p3256<>0);p3276*p3289;0)
- p3117: 2.3526e-5; = p2336*p1082
- p2885: 0; = p2299*(p1079+p1081)
- p2681: 5.28899e-8; = p2290*(p1019+p1021)
- p1957: 0
- p2831: 0.000271417; = p2245*(p1020+p1022)
- p1971: 0.000464677; = p1966*p0001/(p0818*p0002)
- p2658: 1.54163e-5; = p2267*(p1078+p1080)
- p0109: 77.136
- p0755: 0
- p2357: 0.000184046; = p2225*p2185
- p1894: 0
- p2260: 0.00038145; = p2226*p2206
- p2504: 0; = p2308*p1073
- p3200: 0; = p2419*p1082
- p0722: 0
- p3440: 0; = p3364*p1240
- p1589: 0
- p0890: 0; = p0686*1000*p0687*p0885/100
- p2223: 0.0248292; = if(p0765*p0769+p0766*p0770+p0767*p0771+p0768*p0772=0;0;p0770*p0766/(p0765*p0769+p0766*p0770+p0767*p0771+p0768*p0772))
- p3042: 7.88622e-5; = p2261*p1082
- p0248: 10.774
- p2656: 0.000286072; = p2265*(p1078+p1080)
- p1157: 0.235526
- p2193: 0.00979375; = p1054/p0818
- p0730: 0
- p1901: 0
- p1016: 0.20143; = IF(p1012=0;p0707/100;0)
- p0958: 0; = if(and(p0683>0;or(p0807=480;p0807=32;p0807=1;and(p0807=60;p0901<0.03)));p0934;0)
- p1733: 0
- p1020: 0.20143; = IF(p1012=0;IF(p1014+p1019=1;0;IF(p1014+p1019+p1016>1;1-(p1014+p1019);p1016));0)
- p1242: 0; = if(p1232>0;0;p1234*(p0725/100)*p0723*1000)
- p0223: 33.981
- p0923: 0.0453299; = IF(p0918=1;0;IF(p0918+p0919>1;1-p0918;p0919))
- p1889: 0
- p2807: 0; = p2416*(p1078+p1080)
- p2403: 0; = p2234*p2192
- p2379: 3.92103e-5; = p2229*p2208
- p1217: 29.3663
- p1558: 0
- p1135: 95501.5; = if(p1121=0;p1129*(p0716/100)*p0703*1000;0)
- p3101: 2.24003e-7; = p2320*p1023
- p2152: 2.60222e-7; = p2015*p2080*p2114/(p0818*1000)
- p1810: 0
- p2328: 0.00123385; = p2224*p2196
- p3071: 5.3271e-9; = p2290*p1023
- p3102: 2.86559e-6; = p2321*p1023
- p3057: 3.97362e-6; = p2276*p1023
- p2991: 0; = p2405*(p1020+p1022)
- p1015: 0.1249; = IF(p1012=0;p0706/100;0)
- p2294: 5.93991e-5; = p2223*p2201
- p2958: 0.000378693; = p2372*(p1020+p1022)
- p1313: 0; = p1307*p1252/p0818
- p0455: 0; = SQRT(2)*(IF((2*p0323-1)<0;-1;IF((2*p0323-1)>0;1;0))*SQRT(SQRT((2/(pi()*0.140012289)+LN(1-(2*p0323-1)^2)/2)^2-LN(1-(2*p0323-1)^2)/0.140012289)-(2/(pi()*0.140012289)+LN(1-(2*p0323-1)^2)/2)))
- p5201: 5.33335e-7; = p1822*p3484
- p0893: 0; = 1000*(p0890+p0892)*p0001*p0003*p0004/(p0818*p0002)
- p2212: 1.20285e-5; = p1106/p0818
- p1960: 28.9065; = IF(p1959-p1958<0;0;p1959-p1958)
- p1963e: 0; = p1628*p1832+p1629*p1833+p1630*p1834+p1631*p1835+p1632*p1836+p1633*p1837+p1634*p1838+p1635*p1839+p1636*p1840+p1637*p1841+p1638*p1842+p1639*p1843+p1640*p1844+p1641*p1845+p1642*p1846+p1643*p1847+p1644*p1848+p1645*p1849+p1646*p1850
- p4504: 0; = p1949*p3480
- p3397: 0; = p3378*p1234
- p2232: 0; = if(p0783*p0787+p0784*p0788+p0785*p0789+p0786*p0790=0;0;p0789*p0785/(p0783*p0787+p0784*p0788+p0785*p0789+p0786*p0790))
- p1158: 0.0210543; = p1156*p1157
- p3132: 0; = p2351*p1132
- p1003: 0; = p0999*p0888
- p0270: 11.183
- p0968: 0
- p1186: 4.47385e-8; = p1182*p1185/p0818
- p2465: 0.000212249; = p2269*p1073
- p0523: 0; = SQRT(2)*(IF((2*p0391-1)<0;-1;IF((2*p0391-1)>0;1;0))*SQRT(SQRT((2/(pi()*0.140012289)+LN(1-(2*p0391-1)^2)/2)^2-LN(1-(2*p0391-1)^2)/0.140012289)-(2/(pi()*0.140012289)+LN(1-(2*p0391-1)^2)/2)))
- p2209: 0.000412798; = 14.0067*p2208/30.973762
- p2686: 1.06775e-6; = p2295*(p1019+p1021)
- p1887: 0
- p0731: 0
- p2101: 0.620397
- p0843: -0.196624
- p3332: 0; = if(and(p1232=0;p3255<>0);IF((p3328+p3329+p3330+p3331)+(p3255*(p3265*(1-p3277))/p3327)>p3255;p3255-(p3328+p3329+p3330+p3331);p3255*(p3265*(1-p3277))/p3327);0)
- p2449: 1.36404e-5; = p2253*p1014
- p0982: 0; = if(p0886=0;0;min(1;(p0691*p0690*1000*p0693/100)/p0886))
- p2609: 0; = p2413*p1014
- p0151: 0
- p2389: 0; = p2233*p2218
- p1043: 0.178958
- p2897: 0; = p2311*(p1129+p1131)
- p0687: 0
- p2194: 0.214362
- p2269: 0.000494522; = p2226*p2215
- p0955: 0; = if(and(p0683>0;or(p0807=56;p0807=100;and(p0807=60;p0901>0.06)));p0937;0)
- p3283: 0
- p0273: 0.5
- p5267: 7.78949e-7; = p1888*p3484
- p0743: 0.257; = p0083*(1+p0611*p0215/100)
- p2503: 0; = p2307*p1073
- p1985: 8.97597e8; = (if(p1057=0;0;p1050/p1057)+if(p1058=0;0;p1051/p1058)+if(p1059=0;0;p1052/p1059)+if(p1060=0;0;p1053/p1060)+if(p1061=0;0;p1054/p1061)+if(p1062=0;0;p1055/p1062)+if(p1063=0;0;p1056/p1063))*(1+p1157)
- p3066: 7.39911e-8; = p2285*p1023
- p2728: 0.000188823; = p2337*(p1078+p1080)
- p1303: 0; = p1297*p1252/p0818
- p1289: 0
- p1312: 0; = IF(p1307+p1310+p1311=p1266;0;p1266-(p1307+p1310+p1311))
- p0694: 87.245; = p0034*(1+p0562*p0166/100)
- p0724: 0
- p0306: 0.5
- p2809: 0; = p2418*(p1078+p1080)
- p2489: 5.19558e-5; = p2293*p1014
- p1793: 0
- p0822: 0.8849
- p2661: 9.14744e-6; = p2270*(p1078+p1080)
- p1007: 0; = p1003*p0001*p0004/(p0818*p0002)
- p0906: 0.00392517
- p3289: 0
- p2025: 1.98485e-5; = p2015*p2023*p2024/(p0818*1000)
- p2013: 0.85
- p1684: 0.698317
- p1905: 0
- p2822: 0; = p2431*(p1128+p1130)
- p2072: 0.134
- p0245: 11.183
- p1175: 0.000132435
- p1952: 0
- p2045: 30
- p1866: 0
- p0867: 0; = IF(p0858+p0864+p0865+p0866=1;0;IF(p0858+p0864+p0865+p0866+p0862>1;1-(p0858+p0864+p0865+p0866);p0862))
- p2629: 0.000206142; = p2238*(p1019+p1021)
- p0257: 85.393
- p3187: 0; = p2406*p1023
- p2388: 2.87317e-5; = p2229*p2217
- p2242: 0.000177006; = p2222*p2187
- p1997: 1.6139e7; = (if(p1152=0;0;p1150/p1152)+if(p1153=0;0;p1151/p1153))*(1+p1157)
- p1665: 0
- p2021: 0.000324159; = p2020/p0818
- p0557: 0; = IF(p0293<0.5;-SQRT(p0007*EXP(p0425^2*p0008)-p0007);SQRT(p0007*EXP(p0425^2*p0008)-p0007))
- p0443: 0; = SQRT(2)*(IF((2*p0311-1)<0;-1;IF((2*p0311-1)>0;1;0))*SQRT(SQRT((2/(pi()*0.140012289)+LN(1-(2*p0311-1)^2)/2)^2-LN(1-(2*p0311-1)^2)/0.140012289)-(2/(pi()*0.140012289)+LN(1-(2*p0311-1)^2)/2)))
- p1609: 0
- p3288: 0
- p0371: 0.5
- p0003: 10000
- p3255: 0; = p1252*(p1297*(1-p3247)+p1300*(1-p3248)+p1301*(1-p3249)+p1302*(1-p3250))
- p0954: 0; = if(and(p0683>0;or(p0807=56;p0807=100;and(p0807=60;p0901>0.06)));p0936;0)
- p1145: 6.44968e6; = if(p1121=0;p0799*p0702*1000*p0800/100;0)
- p2887: 0; = p2301*(p1079+p1081)
- p1026: 981031; = IF(p1012=0;p1020*(p0704/100)*p0703*1000;0)
- p1873: 0
- p2115: 0.856281
- p3689: 0; = p1962*p3476
- p2330: 1.66431e-6; = p2224*p2198
- p0570: 0; = IF(p0306<0.5;-SQRT(p0007*EXP(p0438^2*p0008)-p0007);SQRT(p0007*EXP(p0438^2*p0008)-p0007))
- p2906: 8.68091e-6; = p2320*(p1020+p1022)
- p2558: 0.000114697; = p2362*p1014
- p0679: 1568.54; = p0019*(1+p0547*p0151/100)
- p0834: 0.00059
- p0616: 0; = IF(p0352<0.5;-SQRT(p0007*EXP(p0484^2*p0008)-p0007);SQRT(p0007*EXP(p0484^2*p0008)-p0007))
- p1215: 0.277778; = IF(p1214=0;0;(p1214-1.5)/(p1214-1)^2)
- p1963b: 0; = p1569*p1773+p1570*p1774+p1571*p1775+p1572*p1776+p1573*p1777+p1574*p1778+p1575*p1779+p1576*p1780+p1577*p1781+p1578*p1782+p1579*p1783+p1580*p1784+p1581*p1785+p1582*p1786+p1583*p1787+p1584*p1788+p1585*p1789+p1586*p1790+p1587*p1791
- p1114: 0.216028
- p1874: 0
- p0226: 32.334
- p1922: 0
- p3331: 0; = if(and(p1232=0;p3255<>0);p3255*(p3268-p3326)/p3327;0)
- p1607: 0
- p1067: 0.00391884; = IF(p1012=0;p1053/(p1060*p0818);0)
- p0817: 0
- p1924: 0
- p1017: 0; = IF(p1012=0;p0708/100;0)
- p1959: 548.907; = if(p0738*p0740*p0739>0;p0738*1000*(p0740/100)*p0739/1000;p1958)
- p3360: 0; = if(p1232=0;p3310+p3321+p3332+p3343+p3354;0)
- p3378: 0; = if(p1232=0;p3246*p3360/p0818;0)
- p2075: 0.072
- p2290: 4.23458e-7; = p2223*p2197
- p2969: 1.67882e-7; = p2383*(p1079+p1081)
- p3314: 0; = if(and(p1232=0;p3253<>0);p3263*p3289;0)
- p1323: 0; = IF(((p0745*1000*p0750/100)+(p0754*1000*p0759/100))/p0801<0;0;((p0745*1000*p0750/100)+(p0754*1000*p0759/100))/p0801)
- p3447: 0; = p3371*p1240
- p2984: 0; = p2398*(p1020+p1022)
- p3131: 0; = p2350*p1132
- p1618: 0.660002
- p3013: 0; = p2427*(p1079+p1081)
- p0705: 37.5; = p0045*(1+p0573*p0177/100)
- p0268: 4.994
- p0793: 0
- p3327: 0; = if(and(p1232=0;p3255<>0);1-(p3323+p3324+p3325+p3326);0)
- p3099: 4.23953e-7; = p2318*p1023
- p0809: 0
- p3262: 0
- p2082: 0.285294
- p1483: 2
- p0609: 0; = IF(p0345<0.5;-SQRT(p0007*EXP(p0477^2*p0008)-p0007);SQRT(p0007*EXP(p0477^2*p0008)-p0007))
- p3373: 0; = if(p1232=0;p3245*p3361/p0818;0)
- p2582: 1.64367e-5; = p2386*p1073
- p1149: 0.830148
- p2858: 0.000127018; = p2272*(p1129+p1131)
- p2216: 7.46328e-5; = p1108/p0818
- p3290: 0
- p3362: 0; = if(p1232=0;p3244*p3356/p0818;0)
- p2293: 0.000138549; = p2223*p2200
- p1963d: 4.92926e-6; = p1608*p1812+p1609*p1813+p1610*p1814+p1611*p1815+p1612*p1816+p1613*p1817+p1614*p1818+p1615*p1819+p1616*p1820+p1617*p1821+p1618*p1822+p1619*p1823+p1620*p1824+p1621*p1825+p1622*p1826+p1623*p1827+p1624*p1828+p1625*p1829+p1626*p1830+p1627*p1831
- p1879: 0
- p2433: 0.00281952; = p2237*p1014
- p2676: 7.34617e-7; = p2285*(p1019+p1021)
- p1693: 0
- p2387: 3.20578e-6; = p2229*p2216
- p1789: 0
- p1307: 0
- p3251: 0; = p1252-(p3252+p3253+p3254+p3255+p3256)
- p2637: 1.74864e-5; = p2246*(p1019+p1021)
- p1761: 0
- p0881: 0; = p0880*p0001*p0003/(p0818*p0002)
- p0403: 0.5
- p2888: 0; = p2302*(p1079+p1081)
- p1160: 0.0552235; = (p1156+p1158)*p1159
- p2247: 0.001133; = p2222*p2192
- p2741: 0; = p2350*(p1128+p1130)
- p1308: 0
- p0757: 47.319; = p0097*(1+p0625*p0229/100)
- p2307: 0; = p2227*p2214
- p2762: 0.000226297; = p2371*(p1019+p1021)
- p2219: 0.000672734; = p1154-p2218
- p2653: 0.000111883; = p2262*(p1078+p1080)
- p2579: 2.21756e-7; = p2383*p1073
- p0927: 0.195424; = IF(p0918+p0923+p0924+p0925+p0926=1;0;1-(p0918+p0923+p0924+p0925+p0926))
- p1057: 0.82
- p0916: 0.340805; = p0826+(p0832*(1+p0894))/p0818
- p1310: 0; = IF(p1307=p1266;0;IF(p1307+p1308>p1266;p1266-p1307;p1308))
- p0056: 6.648
- p0683: 0
- p2800: 0; = p2409*(p1019+p1021)
- p3247: 0
- p1895: 0
- p1730: 0
- p2197: 1.70548e-5; = p1055/p0818
- p3097: 2.08867e-6; = p2316*p1023
- p0966: 0; = if(p0683=0;0;IF(p0684/100+p0965=1;0;1-(p0684/100+p0965)))
- p0936: 0; = p0930*p0001/(p0818*p0002)
- p1222: 0.94
- p2702: 0; = p2311*(p1128+p1130)
- p1751: 0
- p1180: 4.35984e-8; = p1176*p1179/p0818
- p2556: 0.000466504; = p2360*p1014
- p1228: 0.0223143; = IF(p1221=0;0;p0801*p1212*2000/(p1222+p1221*p1225)/p0818)
- p3472: 0; = p3377*p1241
- p2539: 0.000403084; = p2343*p1073
- p2108: 0.826583
- p1816: 0
- p1221: 0.0791463; = p1216*(1+p1220*p1217/100)
- p2788: 0; = p2397*(p1019+p1021)
- p2031: 0.465411
- p0765: 49.917; = p0105*(1+p0633*p0237/100)
- p2851: 0.000420661; = p2265*(p1079+p1081)
- p1692: 0
- p0742: 37.717; = p0082*(1+p0610*p0214/100)
- p3411: 0; = p3373*p1238
- p1165: 0.000587422; = p0801*p0001/(p0818*p0002)
- p2244: 0.000486384; = p2222*p2189
- p2268: 0.000131045; = p2226*p2214
- p0794: 0
- p3236: 0.0140975
- p1647: 0
- p1553: 0
- p0269: 7.933
- p0653: 0; = IF(p0389<0.5;-SQRT(p0007*EXP(p0521^2*p0008)-p0007);SQRT(p0007*EXP(p0521^2*p0008)-p0007))
- p0631: 0; = IF(p0367<0.5;-SQRT(p0007*EXP(p0499^2*p0008)-p0007);SQRT(p0007*EXP(p0499^2*p0008)-p0007))
- p3337: 0; = IF(or(p3254=0;p1232>0);0;p3272*p3289)
- p2322: 4.89287e-5; = p2224*p2189
- p2086: 0.0617647
- p0727: 0
- p3475: 0; = p3380*p1241
- p1095: 8.3565e7; = IF(p1071=0;p0797*p0702*1000*p0798/100;0)
- p0922: 0; = p0677*1000/p0801
- p1996: 30
- p2430: 0; = p2236*p2220
- p2016: 0.0019852; = (p2014-p2015)/(p0818)
- p3036: 1.77869e-5; = p2255*p1023
- p2812: 0; = p2421*(p1078+p1080)
- p0802: 5.3e6
- p0037: 100
- p4855: 0; = p1888*p3482
- p3731: 1.73657e-7; = p1794*p3477
- p3269: 0
- p1884: 0
- p3134: 0; = p2353*p1132
- p0376: 0.5
- p2469: 0; = p2273*p1123
- p1880: 0
- p2163: 0.00456397; = (p2017-p2020)/p0818-(p2025+p2028+p2033+p2034+p2051+p2125+p2126+p2127+p2128+p2129+p2130+p2131+p2132+p2133+p2134+p2135+p2136+p2137+p2138+p2139+p2140+p2141+p2142+p2143+p2144+p2145+p2146+p2147+p2148+p2149+p2150+p2151+p2152+p2153+p2154+p2155+p2156+p2157)
- p1191: 0.5
- p2643: 2.06638e-6; = p2252*(p1019+p1021)
- p1936: 0
- p2091: 0.374844
- p0700: 0
- p3363: 0; = if(p1232=0;p3244*p3357/p0818;0)
- p0838: 6.58978e9; = (p0833-p0836)*p0837
- p3454: 0; = p3378*p1240
- p1850: 0
- p3204: 0; = p2423*p1082
- p3261: 0
- p0286: 0.5
- p2411: 0; = p2234*p2201
- p3027: 1.76124e-6; = p2246*p1023
- p3176: 0; = p2395*p1023
- p2820: 0; = p2429*(p1128+p1130)
- p2759: 6.91652e-7; = p2368*(p1019+p1021)
- p1708: 0
- p3186: 0; = p2405*p1023
- p3443: 0; = p3367*p1240
- p1853: 0
- p3407: 0; = p3369*p1238
- p3350: 0; = if(and(p1232=0;p3256<>0);p3256*(p3273*p3277-p3345)/p3349;0)
- p2515: 4.63954e-5; = p2319*p1014
- p0860: 0; = p0672*1000/p0856
- p3233: 0.60394
- p0775: 0
- p2855: 0.000160685; = p2269*(p1079+p1081)
- p2167: 0.268104; = p2166*(p0898)
- p1967: 0; = if(p0807=480;p0802*p0810;0)
- p2793: 0; = p2402*(p1019+p1021)
- p2909: 2.73037e-5; = p2323*(p1020+p1022)
- p3322: 0; = if(and(p1232=0;p3253<>0);p3253-(p3317+p3318+p3319+p3320+p3321);0)
- p2041: 5.50235e-6; = p2015*p2040/(p0818*1000)
- p0625: 0; = IF(p0361<0.5;-SQRT(p0007*EXP(p0493^2*p0008)-p0007);SQRT(p0007*EXP(p0493^2*p0008)-p0007))
- p0851: 0
- p0992: 0; = p0988*p0001*p0004/(p0818*p0002)
- p1755: 0
- p1248: 0; = if(p1232>0;0;p1243*p0001/(p0818*p0002))
- p2902: 8.09433e-5; = p2316*(p1020+p1022)
- p1116: 0.000137808; = IF(p1071=0;p1106/(p1111*p0818);0)
- p0972: 0; = p0969/p0818
- p0114: 35.012
- p2893: 0; = p2307*(p1079+p1081)
- p2697: 0; = p2306*(p1078+p1080)
- p0778: 51.576; = p0118*(1+p0646*p0250/100)
- p0001: 0.404686
- p0720: 0
- p0506: 0; = SQRT(2)*(IF((2*p0374-1)<0;-1;IF((2*p0374-1)>0;1;0))*SQRT(SQRT((2/(pi()*0.140012289)+LN(1-(2*p0374-1)^2)/2)^2-LN(1-(2*p0374-1)^2)/0.140012289)-(2/(pi()*0.140012289)+LN(1-(2*p0374-1)^2)/2)))
- p1640: 0
- p1740: 0
- p1305: 0; = p1301*p1252/p0818
- p0940: 0; = if(and(p0683=0;p0946=0);p0934;0)
- p2956: 9.74235e-6; = p2370*(p1020+p1022)
- p0284: 0.5
- p3340: 0; = if(and(p1232=0;p3254<>0);p3254*(p3270-p3335)/p3338;0)
- p1218: 0.5
- p2175: 0.000525934; = p0895*p0908/p0818
- p1193: 0; = IF(OR(p1036=0;p1095=0);0.0001*p0857;0)
- p2626: 0; = p2430*p1123
- p2746: 0.000113251; = p2355*(p1019+p1021)
- p2275: 8.47569e-5; = p2230*p2221
- p2071: 0.151
- p1203: 3
- p1701: 0
- p2955: 4.43115e-6; = p2369*(p1020+p1022)
- p1163: 0.00742611
- p3086: 0; = p2305*p1082
- p2957: 0.000883303; = p2371*(p1020+p1022)
- p2009: 0.0118586; = ((p1983*p1985+p1989*p1991+p1995*p1997+p2003*p2005+p1976*p1977+p1978*p1979+p1998*p1999)/p0818)*p0005*p0002/1000
- p2929: 0.000305159; = p2343*(p1079+p1081)
- p2738: 7.92708e-5; = p2347*(p1078+p1080)
- p0898: 0.45865
- p1613: 0
- p1275: 0; = p1271*p1252/p0818
- p2596: 0; = p2400*p1014
- p3403: 0; = p3365*p1238
- p3258: 0
- p1274: 0; = p1270*p1252/p0818
- p1139: 0; = if(p1121=0;p1133*p0001/(p0818*p0002);0)
- p0505: 0; = SQRT(2)*(IF((2*p0373-1)<0;-1;IF((2*p0373-1)>0;1;0))*SQRT(SQRT((2/(pi()*0.140012289)+LN(1-(2*p0373-1)^2)/2)^2-LN(1-(2*p0373-1)^2)/0.140012289)-(2/(pi()*0.140012289)+LN(1-(2*p0373-1)^2)/2)))
- p1036: 3.17297e8; = IF(p1012=0;p0795*p0702*1000*p0796/100;0)
- p2799: 0; = p2408*(p1019+p1021)
- p2326: 0.000582285; = p2224*p2193
- p1184: 8.9477e-8; = p1182/p0818
- p1828: 0
- p1269: 0
- p3216: 0.06; = IF(OR(p1226=0;p1228=0);0;1-p3213-p3214-p3215)
- p0930: 0; = p0801*p0924
- p2818: 0; = p2427*(p1078+p1080)
- p2896: 0; = p2310*(p1079+p1081)
- p3003: 0; = p2417*(p1079+p1081)
- p2426: 0; = p2235*p2216
- p3193: 0; = p2412*p1023
- p1682: 0
- p2551: 0.000340025; = p2355*p1014
- p2364: 0.00062245; = p2225*p2192
- p2088: 0.798875
- p2308: 0; = p2227*p2215
- p3149: 6.96636e-8; = p2368*p1023
- p4143: 0; = p1794*p3479
- p0895: 2.7054e9; = p0894*p0830
- p1083: 1.09907e6; = IF(p1071=0;p1073*(p0710/100)*p0703*1000;0)
- p2546: 0; = p2350*p1123
- p2777: 8.46228e-6; = p2386*(p1078+p1080)
- p2483: 9.11891e-5; = p2287*p1014
- p0760: 0
- p2410: 0; = p2234*p2200
- p1963k: 1.46194e-6; = p1744*p1948+p1745*p1949+p1746*p1950+p1747*p1951+p1748*p1952+p1749*p1953+p1750*p1954+p1751*p1955+p1752*p1956+p1753*p1957+p1961*p1962
- p1041: 0.314094
- p1787: 0
- p0745: 3655.68; = p0085*(1+p0613*p0217/100)
- p0475: 0; = SQRT(2)*(IF((2*p0343-1)<0;-1;IF((2*p0343-1)>0;1;0))*SQRT(SQRT((2/(pi()*0.140012289)+LN(1-(2*p0343-1)^2)/2)^2-LN(1-(2*p0343-1)^2)/0.140012289)-(2/(pi()*0.140012289)+LN(1-(2*p0343-1)^2)/2)))
- p2590: 0; = p2394*p1014
- p0391: 0.5
- p0080: 43.271
- p2806: 0; = p2415*(p1078+p1080)
- p3080: 0; = p2299*p1082
- p0875: 0; = p0874*p0001*p0003/(p0818*p0002)
- p2125: 1.5596e-5; = p2015*p2053*p2087/(p0818*1000)
- p1673: 0
- p2076: 0.057
- p3209: 0; = p2428*p1132
- p0509: 0; = SQRT(2)*(IF((2*p0377-1)<0;-1;IF((2*p0377-1)>0;1;0))*SQRT(SQRT((2/(pi()*0.140012289)+LN(1-(2*p0377-1)^2)/2)^2-LN(1-(2*p0377-1)^2)/0.140012289)-(2/(pi()*0.140012289)+LN(1-(2*p0377-1)^2)/2)))
- p3182: 0; = p2401*p1023
- p0020: 3518.41
- p2993: 0; = p2407*(p1020+p1022)
- p0988: 0; = p0982*p0886
- p3430: 0; = p3373*p1239
- p3254: 0; = p1252*(p1287*(1-p3247)+p1290*(1-p3248)+p1291*(1-p3249)+p1292*(1-p3250))
- p1963g: 7.61726e-6; = p1667*p1871+p1668*p1872+p1669*p1873+p1670*p1874+p1671*p1875+p1672*p1876+p1673*p1877+p1674*p1878+p1675*p1879+p1676*p1880+p1677*p1881+p1678*p1882+p1679*p1883+p1680*p1884+p1681*p1885+p1682*p1886+p1683*p1887+p1684*p1888+p1685*p1889
- p2617: 0; = p2421*p1073
- p0442: 0; = SQRT(2)*(IF((2*p0310-1)<0;-1;IF((2*p0310-1)>0;1;0))*SQRT(SQRT((2/(pi()*0.140012289)+LN(1-(2*p0310-1)^2)/2)^2-LN(1-(2*p0310-1)^2)/0.140012289)-(2/(pi()*0.140012289)+LN(1-(2*p0310-1)^2)/2)))
- p0259: 46.452
- p2587: 0; = p2391*p1123
- p1008: 0; = p1004*p0001*p0004/(p0818*p0002)
- p2302: 0; = p2227*p2209
- p3168: 7.9824e-8; = p2387*p1082
- p1021: 0; = IF(p1012=0;IF(p1014+p1019+p1020=1;0;IF(p1014+p1019+p1020+p1017>1;1-(p1014+p1019+p1020);p1017));0)
- p1099: 0.655189
- p2687: 1.22409e-5; = p2296*(p1019+p1021)
- p2002: 750
- p1838: 0
- p0728: 0
- p0477: 0; = SQRT(2)*(IF((2*p0345-1)<0;-1;IF((2*p0345-1)>0;1;0))*SQRT(SQRT((2/(pi()*0.140012289)+LN(1-(2*p0345-1)^2)/2)^2-LN(1-(2*p0345-1)^2)/0.140012289)-(2/(pi()*0.140012289)+LN(1-(2*p0345-1)^2)/2)))
- p2976: 0; = p2390*(p1129+p1131)
- p1857: 0
- p2321: 0.000227789; = p2224*p2188
- p0369: 0.5
- p0946: 0.000308476; = if(and(p0683=0;or(p0807=480;p0807=32;p0807=1;and(p0807=60;p0901<0.03)));p0934;0)
- p2017: 5.83652e7; = p2015*p0898
- p4298: 0; = p1949*p3479
- p2598: 0; = p2402*p1014
- p2985: 0; = p2399*(p1020+p1022)
- p2331: 3.65915e-6; = p2224*p2199
- p3365: 0; = if(p1232=0;p3244*p3359/p0818;0)
- p1686: 0
- p1096: 0.00335628
- p1590: 0.477952
- p0519: 0; = SQRT(2)*(IF((2*p0387-1)<0;-1;IF((2*p0387-1)>0;1;0))*SQRT(SQRT((2/(pi()*0.140012289)+LN(1-(2*p0387-1)^2)/2)^2-LN(1-(2*p0387-1)^2)/0.140012289)-(2/(pi()*0.140012289)+LN(1-(2*p0387-1)^2)/2)))
- p1698: 0
- p1045: 0.0667372; = IF(p1012=0;IF(p1037+p1044=1;0;IF(p1037+p1044+p1039>1;1-(p1037+p1044);p1039));0)
- p2529: 5.33378e-5; = p2333*p1014
- p1101: 0.0659222; = IF(p1071=0;IF(p1096=1;0;IF(p1096+p1097>1;1-p1096;p1097));0)
- p2409: 0; = p2234*p2199
- p2080: 0.025
- p1623: 0
- p2624: 0; = p2428*p1123
- p1267: 0
- p1246: 0; = if(p1232>0;0;p1241*(p0725/100)*p0723*1000)
- p1582: 0
- p2723: 4.14371e-5; = p2332*(p1019+p1021)
- p1138: 169244; = if(p1121=0;p1132*(p0716/100)*p0703*1000;0)
- p1209: 31.5502; = p1206*p0818*p0822/p0801
- p3055: 2.2998e-5; = p2274*p1132
- p2589: 0; = p2393*p1014
- p0271: 50.786
- p0824: 0.863
- p1022: 0.28609; = IF(p1012=0;IF(p1014+p1019+p1020+p1021=1;0;IF(p1014+p1019+p1020+p1021+p1018>1;1-(p1014+p1019+p1020+p1021);p1018));0)
- p1063: 0.455
- p1626: 0
- p1632: 0
- p1306: 0; = p1302*p1252/p0818
- p0484: 0; = SQRT(2)*(IF((2*p0352-1)<0;-1;IF((2*p0352-1)>0;1;0))*SQRT(SQRT((2/(pi()*0.140012289)+LN(1-(2*p0352-1)^2)/2)^2-LN(1-(2*p0352-1)^2)/0.140012289)-(2/(pi()*0.140012289)+LN(1-(2*p0352-1)^2)/2)))
- p2878: 7.44987e-7; = p2292*(p1020+p1022)
- p3091: 0; = p2310*p1082
- p0565: 0; = IF(p0301<0.5;-SQRT(p0007*EXP(p0433^2*p0008)-p0007);SQRT(p0007*EXP(p0433^2*p0008)-p0007))
- p2917: 1.78391e-6; = p2331*(p1020+p1022)
- p1743: 0
- p2168: 0.00756411; = p2166*(p0903)
- p1980: 3521.6
- p0562: 0; = IF(p0298<0.5;-SQRT(p0007*EXP(p0430^2*p0008)-p0007);SQRT(p0007*EXP(p0430^2*p0008)-p0007))
- p3394: 0; = p3375*p1234
- p1120: 0.0038379; = IF(p1071=0;p1110/(p1115*p0818);0)
- p3370: 0; = if(p1232=0;p3245*p3358/p0818;0)
- p3183: 0; = p2402*p1023
- p3122: 4.13587e-6; = p2341*p1082
- p3021: 4.21437e-6; = p2240*p1023
- p2635: 6.07493e-5; = p2244*(p1019+p1021)
- p3030: 1.56091e-5; = p2249*p1023
- p1783: 0
- p2035: 2.69414e-5; = p2015*p2029*(1-p2031)/(p0818*1000)
- p1679: 0
- p2401: 0; = p2234*p2190
- p1962: 2.84066e-6; = p1960*1000/p0818
- p1047: 0.314094; = IF(p1012=0;IF(p1037+p1044+p1045+p1046=1;0;IF(p1037+p1044+p1045+p1046+p1041>1;1-(p1037+p1044+p1045+p1046);p1041));0)
- p1018: 0.28609; = IF(p1012=0;p0709/100;0)
- p2055: 5.59471
- p1340: 0; = p1325*p0801
- p1585: 0
- p3448: 0; = p3372*p1240
- p1240: 0; = if(p1232>0;0;IF(p1234+p1238+p1239=1;0;IF(p1234+p1238+p1239+p1237>1;1-(p1234+p1238+p1239);p1237)))
- p0868: 0; = IF(p0858+p0864+p0865+p0866+p0867=1;0;IF(p0858+p0864+p0865+p0866+p0867+p0863>1;1-(p0858+p0864+p0865+p0866+p0867);p0863))
- p0084: 13.419
- p0770: 2.603; = p0110*(1+p0638*p0242/100)
- p2891: 0; = p2305*(p1079+p1081)
- p0448: 0; = SQRT(2)*(IF((2*p0316-1)<0;-1;IF((2*p0316-1)>0;1;0))*SQRT(SQRT((2/(pi()*0.140012289)+LN(1-(2*p0316-1)^2)/2)^2-LN(1-(2*p0316-1)^2)/0.140012289)-(2/(pi()*0.140012289)+LN(1-(2*p0316-1)^2)/2)))
- p0880: 0; = p0868*p0856
- p0085: 3655.68
- p2541: 2.17221e-5; = p2345*p1073
- p2149: 4.60448e-7; = p2015*p2077*p2111/(p0818*1000)
- p0532: 0; = SQRT(2)*(IF((2*p0400-1)<0;-1;IF((2*p0400-1)>0;1;0))*SQRT(SQRT((2/(pi()*0.140012289)+LN(1-(2*p0400-1)^2)/2)^2-LN(1-(2*p0400-1)^2)/0.140012289)-(2/(pi()*0.140012289)+LN(1-(2*p0400-1)^2)/2)))
- p2281: 7.43616e-6; = p2223*p2187
- p2603: 0; = p2407*p1014
- p3690: 0; = p1963*p3476
- p2524: 0.000462692; = p2328*p1014
- p2623: 0; = p2427*p1073
- p0252: 14.178
- p3395: 0; = p3376*p1234
- p0414: 0; = SQRT(2)*(IF((2*p0282-1)<0;-1;IF((2*p0282-1)>0;1;0))*SQRT(SQRT((2/(pi()*0.140012289)+LN(1-(2*p0282-1)^2)/2)^2-LN(1-(2*p0282-1)^2)/0.140012289)-(2/(pi()*0.140012289)+LN(1-(2*p0282-1)^2)/2)))
- p1854: 0
- p1130: 0; = if(p1121=0;IF(p1123+p1128+p1129=1;0;IF(p1123+p1128+p1129+p1126>1;1-(p1123+p1128+p1129);p1126));0)
- p3047: 1.66129e-7; = p2266*p1082
- p1151: 496327; = if(p1121=0;p1149*p1148*p1145;0)
- p1213: 5
- p2992: 0; = p2406*(p1020+p1022)
- p1637: 0
- p2404: 0; = p2234*p2193
- p1066: 0.00621173; = IF(p1012=0;p1052/(p1059*p0818);0)
- p2113: 0.832356
- p2277: 6.93368e-5; = p2223*p2183
- p3466: 0; = p3371*p1241
- p3622: 0; = p1891*p3476
- p1757: 0
- p0774: 35.012; = p0114*(1+p0642*p0246/100)
- p0758: 0
- p2848: 0.000164521; = p2262*(p1079+p1081)
- p2004: 30
- p1663: 0
- p3296: 0
- p3441: 0; = p3365*p1240
- p1287: 0
- p1004: 0; = p1000*p0888
- p0978: 0
- p0118: 51.576
- p0827: 0; = p0818*p0819*p0823
- p1115: 0.237849
- p1868: 0
- p0573: 0; = IF(p0309<0.5;-SQRT(p0007*EXP(p0441^2*p0008)-p0007);SQRT(p0007*EXP(p0441^2*p0008)-p0007))
- p1778: 0
- p1668: 0
- p2826: 0.000163322; = p2240*(p1020+p1022)
- p1927: 0
- p1089: 9.63613e-5; = IF(p1071=0;p1083*p0001/(p0818*p0002);0)
- p1642: 0
- p0736: 0
- p3166: 2.5269e-7; = p2385*p1082

- p0438: 0; = SQRT(2)*(IF((2*p0306-1)<0;-1;IF((2*p0306-1)>0;1;0))*SQRT(SQRT((2/(pi()*0.140012289)+LN(1-(2*p0306-1)^2)/2)^2-LN(1-(2*p0306-1)^2)/0.140012289)-(2/(pi()*0.140012289)+LN(1-(2*p0306-1)^2)/2)))
- p2450: 0.00123672; = p2254*p1014
- p0283: 0.5
- p0784: 0
- p1739: 0
- p3328: 0; = if(and(p1232=0;p3255<>0);p3255*(p3265*p3277-p3323)/p3327;0)
- p1050: 1.29455e8; = IF(p1012=0;p1037*p1036;0)
- p2949: 3.74978e-5; = p2363*(p1020+p1022)
- p2990: 0; = p2404*(p1020+p1022)
- p2138: 9.65621e-7; = p2015*p2066*p2100/(p0818*1000)
- p0521: 0; = SQRT(2)*(IF((2*p0389-1)<0;-1;IF((2*p0389-1)>0;1;0))*SQRT(SQRT((2/(pi()*0.140012289)+LN(1-(2*p0389-1)^2)/2)^2-LN(1-(2*p0389-1)^2)/0.140012289)-(2/(pi()*0.140012289)+LN(1-(2*p0389-1)^2)/2)))
- p1961: 0.5
- p0380: 0.5
- p1801: 0
- p2854: 4.25805e-5; = p2268*(p1079+p1081)
- p3222: 0.224242; = IF(p3216=0;0;p1223*40.078/100.0869)
- p3098: 1.23083e-7; = p2317*p1023
- p3135: 5.19638e-5; = p2354*p1023
- p2882: 4.77799e-5; = p2296*(p1020+p1022)
- p3218: 0.00839923; = p3214*p1228
- p0985: 0; = IF(p0982=1;0;IF(p0982+p0983>1;1-p0982;p0983))
- p2939: 0; = p2353*(p1129+p1131)
- p0805: 0
- p0415: 0; = SQRT(2)*(IF((2*p0283-1)<0;-1;IF((2*p0283-1)>0;1;0))*SQRT(SQRT((2/(pi()*0.140012289)+LN(1-(2*p0283-1)^2)/2)^2-LN(1-(2*p0283-1)^2)/0.140012289)-(2/(pi()*0.140012289)+LN(1-(2*p0283-1)^2)/2)))
- p1861: 0
- p3155: 1.61231e-5; = p2374*p1023
- p0889: 0; = 1000*p0888*p0001*p0003*p0004/(p0818*p0002)
- p2047: 3.7516e-13; = p2015*p2045/(p0818*1000000000000)
- p1704: 0
- p1843: 0
- p2527: 1.37218e-6; = p2331*p1014
- p1812: 0
- p2259: 0.00117795; = p2226*p2205
- p0800: 6.648; = p0140*(1+p0668*p0272/100)
- p1210: 0.13
- p2900: 0; = p2314*(p1129+p1131)
- p0925: 0.234111; = IF(p0918+p0923+p0924=1;0;IF(p0918+p0923+p0924+p0921>1;1-(p0918+p0923+p0924);p0921))
- p1616: 0
- p2849: 7.43983e-5; = p2263*(p1079+p1081)
- p1694: 0
- p2103: 0.912485
- p0449: 0; = SQRT(2)*(IF((2*p0317-1)<0;-1;IF((2*p0317-1)>0;1;0))*SQRT(SQRT((2/(pi()*0.140012289)+LN(1-(2*p0317-1)^2)/2)^2-LN(1-(2*p0317-1)^2)/0.140012289)-(2/(pi()*0.140012289)+LN(1-(2*p0317-1)^2)/2)))
- p0513: 0; = SQRT(2)*(IF((2*p0381-1)<0;-1;IF((2*p0381-1)>0;1;0))*SQRT(SQRT((2/(pi()*0.140012289)+LN(1-(2*p0381-1)^2)/2)^2-LN(1-(2*p0381-1)^2)/0.140012289)-(2/(pi()*0.140012289)+LN(1-(2*p0381-1)^2)/2)))
- p1259: 0; = if(p1232>0;0;p0730/100)
- p1869: 0
- p3188: 0; = p2407*p1023
- p1846: 0
- p3038: 2.93476e-5; = p2257*p1023
- p1598: 0
- p1680: 0
- p0718: 26.241; = p0058*(1+p0586*p0190/100)
- p1815: 0
- p0894: 0.23
- p0474: 0; = SQRT(2)*(IF((2*p0342-1)<0;-1;IF((2*p0342-1)>0;1;0))*SQRT(SQRT((2/(pi()*0.140012289)+LN(1-(2*p0342-1)^2)/2)^2-LN(1-(2*p0342-1)^2)/0.140012289)-(2/(pi()*0.140012289)+LN(1-(2*p0342-1)^2)/2)))
- p2613: 0; = p2417*p1073
- p2946: 0.00060648; = p2360*(p1020+p1022)
- p2509: 0; = p2313*p1123
- p0676: 0
- p0478: 0; = SQRT(2)*(IF((2*p0346-1)<0;-1;IF((2*p0346-1)>0;1;0))*SQRT(SQRT((2/(pi()*0.140012289)+LN(1-(2*p0346-1)^2)/2)^2-LN(1-(2*p0346-1)^2)/0.140012289)-(2/(pi()*0.140012289)+LN(1-(2*p0346-1)^2)/2)))
- p2441: 0.000208774; = p2245*p1014
- p2834: 0.00282191; = p2248*(p1020+p1022)
- p2662: 8.19836e-5; = p2271*(p1078+p1080)
- p3106: 1.43382e-6; = p2325*p1023
- p2625: 0; = p2429*p1123
- p3224: 0.501945; = IF(p3216=0;0;1-p3221-p3222-p3223)
- p1697: 0
- p3427: 0; = p3370*p1239
- p2577: 3.28588e-6; = p2381*p1073
- p0534: 0; = SQRT(2)*(IF((2*p0402-1)<0;-1;IF((2*p0402-1)>0;1;0))*SQRT(SQRT((2/(pi()*0.140012289)+LN(1-(2*p0402-1)^2)/2)^2-LN(1-(2*p0402-1)^2)/0.140012289)-(2/(pi()*0.140012289)+LN(1-(2*p0402-1)^2)/2)))
- p3089: 0; = p2308*p1082
- p2278: 4.08595e-6; = p2223*p2184
- p0780: 43.985; = p0120*(1+p0648*p0252/100)
- p1178: 8.71969e-8; = p1176/p0818
- p3190: 0; = p2409*p1023
- p2169: 0.00115637; = p2166*(p0908)
- p0953: 0; = if(and(p0683>0;or(p0807=56;p0807=100;and(p0807=60;p0901>0.06)));p0935;0)
- p2911: 5.55656e-5; = p2325*(p1020+p1022)
- p0928: 3.51841e6; = p0801*p0918
- p2020: 3.29865e6; = p2015*p2018*p2019
- p3349: 0; = if(and(p1232=0;p3256<>0);1-(p3345+p3346+p3347+p3348);0)
- p2181: 6.8061e-8; = p0887+p0889+p0893+p2180
- p2400: 0; = p2234*p2189
- p3392: 0; = p3373*p1234
- p0668: 0; = IF(p0404<0.5;-SQRT(p0007*EXP(p0536^2*p0008)-p0007);SQRT(p0007*EXP(p0536^2*p0008)-p0007))
- p1583: 0
- p3422: 0; = p3365*p1239
- p3246: 1; = IF(p3244+p3245=1;0;1-(p3244+p3245))
- p0316: 0.5
- p1731: 0
- p3553: 0; = p1822*p3476
- p0948: 0; = if(and(p0683=0;or(p0807=480;p0807=32;p0807=1;and(p0807=60;p0901<0.03)));p0936;0)
- p3241: 6.29228e-10; = p3234*p1188*p3236/p0818
- p1239: 0; = if(p1232>0;0;IF(p1234+p1238=1;0;IF(p1234+p1238+p1236>1;1-(p1234+p1238);p1236)))
- p3150: 1.14342e-7; = p2369*p1023
- p4995: 0; = p1822*p3483
- p1921: 0
- p1714: 0
- p3092: 0; = p2311*p1132
- p1904: 0
- p0852: 0; = p0847*p0851^3+p0848*p0851^2+p0849*p0851+p0850
- p0547: 0; = IF(p0283<0.5;-SQRT(p0007*EXP(p0415^2*p0008)-p0007);SQRT(p0007*EXP(p0415^2*p0008)-p0007))
- p2224: 0.0594548; = if(p0765*p0769+p0766*p0770+p0767*p0771+p0768*p0772=0;0;p0771*p0767/(p0765*p0769+p0766*p0770+p0767*p0771+p0768*p0772))
- p2948: 0.000149112; = p2362*(p1020+p1022)
- p0768: 35.518; = p0108*(1+p0636*p0240/100)
- p2205: 0.00212369; = 2*14.0067*p2204/30.973762
- p2628: 0.00093909; = p2237*(p1019+p1021)
- p0377: 0.5
- p1912: 0
- p2612: 0; = p2416*p1073
- p0111: 21.886
- p2593: 0; = p2397*p1014
- p2973: 1.04166e-6; = p2387*(p1079+p1081)
- p3000: 0; = p2414*(p1079+p1081)
- p2652: 0.000699846; = p2261*(p1078+p1080)
- p1034: 0.000122162; = IF(p1012=0;p1028*p0001/(p0818*p0002);0)
- p2726: 2.93116e-5; = p2335*(p1019+p1021)
- p1788: 0
- p2947: 0.000130271; = p2361*(p1020+p1022)
- p0308: 0.5
- p1979: 0; = p0973
- p1975: 0.000587422; = p1970*p0001/(p0818*p0002)
- p1125: 0.26607; = if(p1121=0;p0719/100;0)
- p3375: 0; = if(p1232=0;p3246*p3357/p0818;0)
- p1779: 0
- p3412: 0; = p3374*p1238
- p3116: 2.95228e-6; = p2335*p1023
- p0713: 32.493; = p0053*(1+p0581*p0185/100)
- p2096: 0.486404
- p1229: 0.00176609; = IF(p1221=0;0;p1228*p1221)
- p3444: 0; = p3368*p1240
- p2396: 0; = p2234*p2185
- p1170: 3231.06; = p1169*p0801
- p2607: 0; = p2411*p1014
- p2610: 0; = p2414*p1073
- p3211: 0; = p2430*p1132
- p1827: 0
- p3185: 0; = p2404*p1023
- p3109: 1.55218e-5; = p2328*p1023
- p1164: 49755; = p1163*p0801
- p0399: 0.5
- p1963c: 6.10592e-7; = p1588*p1792+p1589*p1793+p1590*p1794+p1591*p1795+p1592*p1796+p1593*p1797+p1594*p1798+p1595*p1799+p1596*p1800+p1597*p1801+p1598*p1802+p1599*p1803+p1600*p1804+p1601*p1805+p1602*p1806+p1603*p1807+p1604*p1808+p1605*p1809+p1606*p1810+p1607*p1811
- p3321: 0; = if(and(p1232=0;p3253<>0);IF((p3317+p3318+p3319+p3320)+(p3253*(p3261*(1-p3277))/p3316)>p3253;p3253-(p3317+p3318+p3319+p3320);p3253*(p3261*(1-p3277))/p3316);0)
- p3369: 0; = if(p1232=0;p3245*p3357/p0818;0)
- p3217: 0.00251711; = p3213*p1228
- p1777: 0
- p0648: 0; = IF(p0384<0.5;-SQRT(p0007*EXP(p0516^2*p0008)-p0007);SQRT(p0007*EXP(p0516^2*p0008)-p0007))
- p2502: 0; = p2306*p1073
- p2118: 0.679049
- p1334: 0; = p1322*p0801
- p2143: 1.67718e-6; = p2015*p2071*p2105/(p0818*1000)
- p0836: 4.50349e8; = p0831*p0835*p0801/(1-p0831)
- p2300: 0; = p2227*p2207
- p1963h: 1.09401e-7; = p1686*p1890+p1687*p1891+p1688*p1892+p1689*p1893+p1690*p1894+p1691*p1895+p1692*p1896+p1693*p1897+p1694*p1898+p1695*p1899+p1696*p1900+p1697*p1901+p1698*p1902+p1699*p1903+p1700*p1904+p1701*p1905+p1702*p1906+p1703*p1907+p1704*p1908+p1705*p1909
- p1219: 0; = if(p1218=0;0;SQRT(2)*(IF((2*p1218-1)<0;-1;IF((2*p1218-1)>0;1;0))*SQRT(SQRT((2/(pi()*0.140012289)+LN(1-(2*p1218-1)^2)/2)^2-LN(1-(2*p1218-1)^2)/0.140012289)-(2/(pi()*0.140012289)+LN(1-(2*p1218-1)^2)/2))))
- p2303: 0; = p2227*p2210
- p1798: 0
- p2943: 8.97263e-5; = p2357*(p1020+p1022)
- p2028: 0.000295676; = p2015*p2026*p2027/(p0818*1000)
- p1858: 0
- p3886: 1.33583e-8; = p1949*p3477
- p3377: 0; = if(p1232=0;p3246*p3359/p0818;0)
- p1831: 0
- p3455: 0; = p3379*p1240
- p1121: 0
- p1271: 0; = IF(p1267+p1270=p1259;0;IF(p1267+p1270+p1269>p1259;p1259-(p1267+p1270);p1269))
- p1634: 0
- p2575: 1.68291e-5; = p2379*p1073
- p2106: 0.856281
- p0716: 6.648; = p0056*(1+p0584*p0188/100)
- p0996: 0; = if(p0888=0;0;if((p0691*p0690*1000*p0692/100)/p0888>1;1;(p0691*p0690*1000*p0692/100)/p0888))
- p0107: 17.698
- p0991: 0; = p0987*p0886
- p2530: 7.67651e-6; = p2334*p1014
- p0815: 0
- p3356: 0; = if(p1232=0;p3306+p3317+p3328+p3339+p3350;0)
- p3061: 6.49981e-7; = p2280*p1023
- p0641: 0; = IF(p0377<0.5;-SQRT(p0007*EXP(p0509^2*p0008)-p0007);SQRT(p0007*EXP(p0509^2*p0008)-p0007))
- p1281: 0; = IF(p1277+p1280=p1263;0;IF(p1277+p1280+p1279>p1263;p1263-(p1277+p1280);p1279))
- p1277: 0
- p1329: 0; = p1328*p0001/(p0818*p0002)
- p1987: 400
- p1947: 0
- p3171: 0; = p2390*p1132
- p1243: 0; = if(p1232>0;0;p1238*(p0725/100)*p0723*1000)
- p3301: 0; = if(and(p1232=0;p3252<>0);p3257*p3277*(p3297*p3290+(1-p3297)*p3294);0)
- p0422: 0; = SQRT(2)*(IF((2*p0290-1)<0;-1;IF((2*p0290-1)>0;1;0))*SQRT(SQRT((2/(pi()*0.140012289)+LN(1-(2*p0290-1)^2)/2)^2-LN(1-(2*p0290-1)^2)/0.140012289)-(2/(pi()*0.140012289)+LN(1-(2*p0290-1)^2)/2)))
- p3355: 0; = if(and(p1232=0;p3256<>0);p3256-(p3350+p3351+p3352+p3353+p3354);0)
- p1963a: 2.44223e-5; = p1550*p1754+p1551*p1755+p1552*p1756+p1553*p1757+p1554*p1758+p1555*p1759+p1556*p1760+p1557*p1761+p1558*p1762+p1559*p1763+p1560*p1764+p1561*p1765+p1562*p1766+p1563*p1767+p1564*p1768+p1565*p1769+p1566*p1770+p1567*p1771+p1568*p1772
- p2731: 8.11631e-5; = p2340*(p1078+p1080)
- p1671: 0
- p3054: 0.000317208; = p2273*p1132
- p0108: 35.518
- p0756: 34.497; = p0096*(1+p0624*p0228/100)
- p2747: 6.67376e-6; = p2356*(p1019+p1021)
- p1144: 1.48385e-5; = if(p1121=0;p1138*p0001/(p0818*p0002);0)
- p2123: 0.263965
- p1172: 3.17518e-7; = p1170/p0818
- p2764: 1.39632e-5; = p2373*(p1019+p1021)
- p1225: 1.088; = IF(p1221=0;0;p1223+1.2*p1224)
- p2267: 6.97666e-5; = p2226*p2213
- p1865: 0
- p2011: 0.0127277
- p2413: 0; = p2234*p2203
- p4377: 0; = p1822*p3480
- p1107: 2.40415e6; = IF(p1071=0;p1105*p1101*p1095;0)
- p1830: 0
- p1758: 0
- p1965: 6.61214e-5; = p1963+p1959*p1964*1000/p0818
- p1998: 445
- p2770: 8.66429e-6; = p2379*(p1078+p1080)
- p3126: 1.2602e-6; = p2345*p1082
- p2356: 5.34328e-5; = p2225*p2184
- p1104: 0.254708; = IF(p1071=0;IF(p1096+p1101+p1102+p1103=1;0;1-(p1096+p1101+p1102+p1103));0)
- p2938: 0; = p2352*(p1129+p1131)
- p1414: 76
- p3404: 0; = p3366*p1238
- p1166: 4.88944e-6; = p1164/p0818
- p2057: 3.28794
- p2553: 6.90174e-5; = p2357*p1014
- p1573: 0
- p2578: 4.30299e-5; = p2382*p1073
- p1055: 173550; = IF(p1012=0;p1048*p1036;0)
- p3265: 0
- p1557: 0
- p1029: 61268.8; = IF(p1012=0;IF(p0801<p1023*(p0704/100)*p0703*1000;p0801;p1023*(p0704/100)*p0703*1000);0)
- p0352: 0.5
- p1224: 0.44; = IF(p1221=0;0;IF(p1193=0;1-p1223;0))
- p2684: 1.73047e-5; = p2293*(p1019+p1021)
- p3345: 0; = if(and(p1232=0;p3256<>0);p3273*p3277*p3293;0)
- p1058: 0.225
- p3432: 0; = p3375*p1239
- p1968: 0; = if(p0807=480;p0802*p0811;0)
- p0670: 0
- p0389: 0.5
- p2327: 0.00012482; = p2224*p2195
- p1737: 0
- p2631: 4.18422e-5; = p2240*(p1019+p1021)
- p3138: 2.3153e-6; = p2357*p1023
- p3341: 0; = if(and(p1232=0;p3254<>0);p3254*(p3271-p3336)/p3338;0)
- p2554: 0.000253376; = p2358*p1014
- p3335: 0; = IF(or(p3254=0;p1232>0);0;p3270*(p3280*(p3283*p1256+p3286*(p1253+p1257)+p1258*p3288+p3300*p3287)))
- p1588: 0
- p1805: 0
- p0825: 9.00474e9; = p0818*p0822
- p1716: 0
- p0459: 0; = SQRT(2)*(IF((2*p0327-1)<0;-1;IF((2*p0327-1)>0;1;0))*SQRT(SQRT((2/(pi()*0.140012289)+LN(1-(2*p0327-1)^2)/2)^2-LN(1-(2*p0327-1)^2)/0.140012289)-(2/(pi()*0.140012289)+LN(1-(2*p0327-1)^2)/2)))
- p0373: 0.5
- p2561: 0.0011925; = p2365*p1014
- p2486: 1.58797e-7; = p2290*p1014
- p3434: 0; = p3377*p1239
- p5337: 2.02853e-7; = p1962*p3484
- p1072: 0; = p1071*p0001/(p0818*p0002)
- p2316: 0.000166031; = p2224*p2183
- p0360: 0.5
- p3232: 8.9477e-8; = p1182/p0818
- p0714: 0
- p4515: 1.00487e-5; = p1754*p3481
- p2284: 2.33887e-5; = p2223*p2190
- p1953: 0
- p1750: 0
- p1126: 0; = if(p1121=0;p0720/100;0)
- p3059: 5.14013e-8; = p2278*p1023
- p1220: 0; = IF(p1218<0.5;-SQRT(p1214*EXP(p1219^2*p1215)-p1214);SQRT(p1214*EXP(p1219^2*p1215)-p1214))
- p2518: 1.83483e-5; = p2322*p1014
- p2136: 7.24623e-6; = p2015*p2064*p2098/(p0818*1000)
- p2218: 0.000477384; = p1150/p0818
- p1297: 0
- p3386: 0; = p3367*p1234
- p1284: 0; = p1280*p1252/p0818
- p2461: 0.000555651; = p2265*p1073
- p2374: 0.00128164; = p2225*p2203
- p2659: 2.8957e-5; = p2268*(p1078+p1080)
- p1639: 0
- p1875: 0
- p3284: 0
- p3104: 7.04547e-7; = p2323*p1023
- p2666: 2.2241e-5; = p2275*(p1128+p1130)
- p1554: 0
- p3371: 0; = if(p1232=0;p3245*p3359/p0818;0)
- p2349: 0.000269146; = p2228*p2217
- p1235: 0; = if(p1232>0;0;p0727/100)
- p2961: 3.27728e-5; = p2375*(p1079+p1081)
- p2868: 4.63769e-5; = p2282*(p1020+p1022)
- p0374: 0.5
- p0935: 2.66278e-5; = p0929*p0001/(p0818*p0002)
- p2128: 1.03988e-5; = p2015*p2056*p2090/(p0818*1000)
- p1093: 0; = IF(p1071=0;p1087*p0001/(p0818*p0002);0)
- p0367: 0.5
- p2180: 6.8061e-8; = p3233*p1188/(p0818)
- p3125: 1.20515e-7; = p2344*p1082
- p3436: 0; = p3379*p1239
- p2043: 0.636483
- p3273: 0
- p3372: 0; = if(p1232=0;p3245*p3360/p0818;0)
- p2335: 0.00023468; = p2224*p2203
- p0510: 0; = SQRT(2)*(IF((2*p0378-1)<0;-1;IF((2*p0378-1)>0;1;0))*SQRT(SQRT((2/(pi()*0.140012289)+LN(1-(2*p0378-1)^2)/2)^2-LN(1-(2*p0378-1)^2)/0.140012289)-(2/(pi()*0.140012289)+LN(1-(2*p0378-1)^2)/2)))
- p1594: 0
- p2044: 5.5716e-7; = p2015*p2042*p2043/(p0818*1000)
- p2549: 0; = p2353*p1123
- p3450: 0; = p3374*p1240
- p2791: 0; = p2400*(p1019+p1021)
- p2419: 0; = p2235*p2209
- p0873: 0; = p0872*p0001*p0003/(p0818*p0002)
- p1136: 0; = if(p1121=0;p1130*(p0716/100)*p0703*1000;0)
- p1131: 0; = if(p1121=0;IF(p1123+p1128+p1129+p1130=1;0;IF(p1123+p1128+p1129+p1130+p1127>1;1-(p1123+p1128+p1129+p1130);p1127));0)
- p3045: 2.46163e-6; = p2264*p1082
- p2179: 0; = p0970+p0971+p0972
- p3081: 0; = p2300*p1082
- p0783: 18.374; = p0123*(1+p0651*p0255/100)
- p2810: 0; = p2419*(p1078+p1080)
- p0097: 47.319
- p2485: 0.000193227; = p2289*p1014
- p2968: 3.25762e-5; = p2382*(p1079+p1081)
- p2064: 0.676706
- p1019: 0.1249; = IF(p1012=0;IF(p1014=1;0;IF(p1014+p1015>1;1-p1014;p1015));0)
- p0445: 0; = SQRT(2)*(IF((2*p0313-1)<0;-1;IF((2*p0313-1)>0;1;0))*SQRT(SQRT((2/(pi()*0.140012289)+LN(1-(2*p0313-1)^2)/2)^2-LN(1-(2*p0313-1)^2)/0.140012289)-(2/(pi()*0.140012289)+LN(1-(2*p0313-1)^2)/2)))
- p1764: 0
- p0327: 0.5
- p0788: 0
- p3471: 0; = p3376*p1241
- p0960: 0; = if(and(p0683>0;or(p0807=480;p0807=32;p0807=1;and(p0807=60;p0901<0.03)));p0936;0)
- p2236: 0; = 1-(p2230+p2231+p2232+p2233)
- p2352: 0; = p2232*p2220
- p3468: 0; = p3373*p1241
- p3151: 2.51392e-7; = p2370*p1023
- p2520: 5.28146e-6; = p2324*p1014
- p2049: 25.6942
- p1032: 8.60119e-5; = IF(p1012=0;p1026*p0001/(p0818*p0002);0)
- p1234: 0; = if(p1232>0;0;p0726/100)
- p1192: 5.63474e-8; = p1188*p1191/p0818
- p1902: 0
- p3195: 0; = p2414*p1082
- p4710: 3.16992e-8; = p1949*p3481
- p1909: 0
- p2027: 0.428799
- p1064: 0.0155142; = IF(p1012=0;p1050/(p1057*p0818);0)
- p0673: 0
- p2036: 4.55552e-5; = p2015*p2030*(1-p2032)/(p0818*1000)
- p0499: 0; = SQRT(2)*(IF((2*p0367-1)<0;-1;IF((2*p0367-1)>0;1;0))*SQRT(SQRT((2/(pi()*0.140012289)+LN(1-(2*p0367-1)^2)/2)^2-LN(1-(2*p0367-1)^2)/0.140012289)-(2/(pi()*0.140012289)+LN(1-(2*p0367-1)^2)/2)))
- p3157: 2.2714e-6; = p2376*p1082
- p3119: 6.89019e-6; = p2338*p1082
- p1204: 0.980791
- p1150: 4.85786e6; = if(p1121=0;p1149*p1146*p1145;0)
- p2919: 6.9342e-5; = p2333*(p1020+p1022)
- p1011: 0; = p1010*p0001*p0004/(p0818*p0002)
- p2097: 0.40001
- p1745: 0.4234
- p1999: 2.45092e8; = (p1228+p1229)*p0818+p1164
- p1112: 0.209482
- p3324: 0; = if(and(p1232=0;p3255<>0);p3266*(p3279*(p3284*p1256+p3286*(p1253+p1257)+p1258*p3288+p3299*p3287));0)
- p2007: 0.0322772; = ((p1981*p1985+p1987*p1991+p1993*p1997+p2001*p2005)/p0818)*p0005*p0002/1000
- p2206: 0.000687705; = 9*1.00794*p2204/30.973762
- p1767: 0
- p3691: 4.23457e-6; = p1754*p3477
- p1049: 0.178958; = IF(p1012=0;IF(p1037+p1044+p1045+p1046+p1047+p1048=1;0;1-(p1037+p1044+p1045+p1046+p1047+p1048));0)
- p1110: 9.28908e6; = IF(p1071=0;p1105*p1104*p1095;0)
- p1053: 8.37441e6; = IF(p1012=0;p1046*p1036;0)
- p2142: 2.88163e-6; = p2015*p2070*p2104/(p0818*1000)
- p0833: 1.36299e10; = p0830+p0832
- p0865: 0; = IF(p0858+p0864=1;0;IF(p0858+p0864+p0860>1;1-(p0858+p0864);p0860))
- p2950: 0.000303457; = p2364*(p1020+p1022)
- p2641: 0.00153193; = p2250*(p1019+p1021)
- p1201: 0.65
- p0400: 0.5
- p1769: 0
- p2358: 0.00067567; = p2225*p2186
- p2619: 0; = p2423*p1073
- p1643: 0
- p2184: 0.000164562; = p1051/p0818
- p0912: 0
- p2195: 0.0020994; = p2194*p2193
- p0645: 0; = IF(p0381<0.5;-SQRT(p0007*EXP(p0513^2*p0008)-p0007);SQRT(p0007*EXP(p0513^2*p0008)-p0007))
- p2870: 1.14024e-5; = p2284*(p1020+p1022)
- p1118: 0.000743527; = IF(p1071=0;p1108/(p1113*p0818);0)
- p3063: 1.19671e-6; = p2282*p1023
- p1890: 0
- p3382: 0; = p3363*p1234
- p2190: 0.000941982; = 32.065*p2189/(2*14.0067)
- p1646: 0
- p3094: 0; = p2313*p1132
- p3231: 8.71969e-8; = p1176/p0818
- p0185: 27.17
- p1258: 0; = if(p1232>0;0;IF(p1253+p1256+p1257=1;0;1-(p1253+p1256+p1257)))
- p0113: 47.429
- p3282: 0
- p3260: 0
- p1197: 1.806
- p1814: 0
- p1949: 9.82704e-8; = p1541*1000/p0818
- p2320: 1.78063e-5; = p2224*p2187
- p2860: 1.29774e-5; = p2274*(p1129+p1131)
- p3032: 1.26803e-7; = p2251*p1023
- p2467: 0.00015924; = p2271*p1073
- p2749: 8.43912e-5; = p2358*(p1019+p1021)
- p3429: 0; = p3372*p1239
- p0361: 0.5
- p0841: -0.333923
- p0853: 0; = p0803/(p0802+p0803)
- p4858: 0; = p1891*p3482
- p0942: 0; = if(and(p0683=0;p0948=0);p0936;0)
- p2305: 0; = p2227*p2212
- p3070: 6.48213e-6; = p2289*p1023
- p1159: 0.5
- p3028: 1.42531e-5; = p2247*p1023
- p2790: 0; = p2399*(p1019+p1021)
- p0907: 0
- p3121: 9.14587e-6; = p2340*p1082
- p1978: 445
- p0741: 0.178; = p0081*(1+p0609*p0213/100)
- p1023: 0.01258; = IF(p1012=0;IF(p1014+p1019+p1020+p1021+p1022=1;0;1-(p1014+p1019+p1020+p1021+p1022));0)
- p3035: 4.1488e-5; = p2254*p1023
- p2528: 0.000124411; = p2332*p1014
- p0994: 0; = p0990*p0001*p0004/(p0818*p0002)
- p3264: 0
- p1601: 0
- p1566: 0
- p0375: 0.5
- p1724: 0
- p1056: 5.67828e7; = IF(p1012=0;p1049*p1036;0)
- p2779: 6.34885e-6; = p2388*(p1078+p1080)
- p0882: 6.7e6; = p0869*p0856
- p2861: 2.25513e-5; = p2275*(p1129+p1131)
- p0290: 0.5
- p3049: 3.26302e-6; = p2268*p1082
- p0921: 0.234111; = p0679*1000/p0801
- p1835: 0
- p0385: 0.5
- p0715: 0
- p0533: 0; = SQRT(2)*(IF((2*p0401-1)<0;-1;IF((2*p0401-1)>0;1;0))*SQRT(SQRT((2/(pi()*0.140012289)+LN(1-(2*p0401-1)^2)/2)^2-LN(1-(2*p0401-1)^2)/0.140012289)-(2/(pi()*0.140012289)+LN(1-(2*p0401-1)^2)/2)))
- p1977: 1146.78; = p1252+p1188
- p2329: 1.01399e-6; = p2224*p2197
- p2119: 0.679049
- p3759: 1.01523e-6; = p1822*p3477
- p0140: 6.648
- p3424: 0; = p3367*p1239
- p1185: 0.5
- p2532: 0.000405516; = p2336*p1073
- p2261: 0.00316716; = p2226*p2207
- p0178: 28.878
- p3230: 3.17518e-7; = p1170/p0818
- p0752: 0
- p1245: 0; = if(p1232>0;0;p1240*(p0725/100)*p0723*1000)
- p0651: 0; = IF(p0387<0.5;-SQRT(p0007*EXP(p0519^2*p0008)-p0007);SQRT(p0007*EXP(p0519^2*p0008)-p0007))
- p0650: 0; = IF(p0386<0.5;-SQRT(p0007*EXP(p0518^2*p0008)-p0007);SQRT(p0007*EXP(p0518^2*p0008)-p0007))
- p2920: 9.97987e-6; = p2334*(p1020+p1022)
- p1834: 0
- p2819: 0; = p2428*(p1128+p1130)
- p2757: 8.51405e-5; = p2366*(p1019+p1021)
- p3108: 1.57023e-6; = p2327*p1023
- p3018: 9.45856e-5; = p2237*p1023
- p2555: 3.64666e-5; = p2359*p1014
- p2018: 0.1978
- p0183: 18.751
- p3163: 2.49637e-6; = p2382*p1082
- p2094: 0.922577
- p0351: 0.5
- p2107: 0.881623
- p2065: 0.0758824
- p2996: 0; = p2410*(p1020+p1022)
- p2154: 1.58557e-6; = p2015*p2082*p2116/(p0818*1000)
- p2696: 0; = p2305*(p1078+p1080)
- p0052: 22.097
- p2229: 0.0429541; = if(p0774*p0778+p0775*p0779+p0776*p0780+p0777*p0781=0;0;p0781*p0777/(p0774*p0778+p0775*p0779+p0776*p0780+p0777*p0781))
- p1644: 0
- p2604: 0; = p2408*p1014
- p0008: 0.0739645; = (p0007-1.5)/(p0007-1)^2
- p0018: 303.71
- p1742: 0
- p1078: 0.22097; = IF(p1071=0;IF(p1073=1;0;IF(p1073+p1074>1;1-p1073;p1074));0)
- p2438: 6.63772e-5; = p2242*p1014
- p2220: 4.87742e-5; = p1151/p0818
- p0812: 0; = if(p0807=480;0.095/0.34;0)
- p0612: 0; = IF(p0348<0.5;-SQRT(p0007*EXP(p0480^2*p0008)-p0007);SQRT(p0007*EXP(p0480^2*p0008)-p0007))
- p0709: 28.609; = p0049*(1+p0577*p0181/100)
- p0213: 43.768
- p3449: 0; = p3373*p1240
- p3325: 0; = if(and(p1232=0;p3255<>0);p3267*p3289;0)
- p0826: 0.1151; = 1-p0825/p0818
- p2424: 0; = p2235*p2214
- p3172: 0; = p2391*p1132
- p2669: 5.10335e-7; = p2278*(p1019+p1021)
- p2783: 0; = p2392*(p1128+p1130)
- p2378: 0.000245266; = p2229*p2207
- p1699: 0
- p2792: 0; = p2401*(p1019+p1021)
- p0971: 0; = p0968/p0818
- p2448: 6.20411e-6; = p2252*p1014
- p2986: 0; = p2400*(p1020+p1022)
- p2522: 0.000218357; = p2326*p1014
- p2773: 2.21536e-5; = p2382*(p1078+p1080)
- p1276: 0; = p1272*p1252/p0818
- p1852: 0

## Reference product
- winter wheat; at harvest in 1997; at farm; 86%-90% moisture: 1 kg

## Inputs from technosphere
- CUTOFF apply liming materials; unspecified method: 0.000587422 ha; = p1227
- CUTOFF bulk cargo rail transport; diesel: 0.0605197 metric ton*km; = p2008
- CUTOFF irrig svc; gnd wat source, unspec rate, 1997 winter wheat: 7.6492e-6 ha; = p0979
- CUTOFF nitrogenous fertilizer, ammonium nitrate; at point-of-sale: 0.00621173 kg; = p1066
- CUTOFF apply pesticide; unspecified application methods: 2.77816e-5 ha; = p1345
- CUTOFF zinc compounds; at point-of-sale: 8.9477e-8 kg; = p1184
- CUTOFF dolomite, pulverized; at point-of-sale: 0.00176609 kg; = p1229
- CUTOFF sowing svc; for reduced till, 1997 winter wheat: 0.000137522 ha; = p0949
- CUTOFF nitrogenous fertilizer, anhydrous ammonia; at point-of-sale: 0.0155142 kg; = p1064
- CUTOFF apply single or mixed N fertilizer; unspec. method: 5.37174e-6 ha; = p1035
- CUTOFF apply gypsum; unspecified method: 0.000587422 ha; = p1165
- CUTOFF pesticide storage: 6.61214e-5 kg*a; = p1965
- CUTOFF sewage sludge storage: 5.63474e-8 kg*a; = p1192
- CUTOFF sowing svc; for conventional till, 1997 winter wheat: 0.000308476 ha; = p0946
- CUTOFF prepare soil; for reduced till, wheat; 15-30% residue: 0.000137522 ha; = p0937
- CUTOFF apply single or mixed K fertilizer; unspec. method: 1.48385e-5 ha; = p1144
- CUTOFF fertilizer storage: 0.0552235 kg*a; = p1160
- CUTOFF harvest; winter wheat residue management: 0.000587422 ha; = p1975
- CUTOFF N inhibitor appl svc; unspec rate & type, 1997 winter wheat: 0.000658412 ha; = p1162
- CUTOFF phosphatic fertilizer, other single phosphates; at point-of-sale: 0.000743527 kg; = p1118
- CUTOFF pesticide, unspecified type; at point-of-sale; kg AI: 2.84066e-6 kg; = p1962
- CUTOFF apply K fertilizer; broadcast without incorporation: 8.37309e-6 ha; = p1141
- CUTOFF sowing svc; for unspec till, 1997 winter wheat: 0.000114796 ha; = p0951
- CUTOFF pesticide, Metsulfuron-methyl; at point-of-sale; kg AI: 1.96541e-7 kg; = p1891
- CUTOFF sulfur; at point-of-sale: 3.17518e-7 kg; = p1172
- CUTOFF nitrogenous fertilizer, ammonium sulfate; at point-of-sale: 0.00391884 kg; = p1067
- CUTOFF nitrogenous fertilizer, aqueous ammonia; at point-of-sale: 0.000731388 kg; = p1065
- CUTOFF apply N fertilizer; broadcast with incorporation: 5.33331e-5 ha; = p1031
- CUTOFF zinc compounds storage: 4.47385e-8 kg*a; = p1186
- CUTOFF apply single or mixed P fertilizer; unspec. method: 5.59039e-6 ha; = p1094
- CUTOFF manure appl svc; unspec rate, 1997 winter wheat: 0.000587422 ha; = p1233
- CUTOFF potassic fertilizer, other single nutrients; at point-of-sale: 0.000133531 kg; = p1155
- CUTOFF fertilizer filler materials; at point-of-sale: 0.0210543 kg; = p1158
- CUTOFF limestone, high-grade, pulverized; at point-of-sale: 0.0223143 kg; = p1228
- CUTOFF domestic barge transport; average fuel: 0.0322772 metric ton*km; = p2007
- CUTOFF sulfuric acid; at point-of-sale: 8.71969e-8 kg; = p1178
- CUTOFF nitrogenous fertilizer, urea; at point-of-sale: 0.0122639 kg; = p1070
- CUTOFF apply P fertilizer; broadcast without incorporation: 7.29513e-5 ha; = p1091
- CUTOFF sulfuric acid storage: 4.35984e-8 kg*a; = p1180
- CUTOFF apply pesticide; as foliar or directed spray: 0.000125493 ha; = p1339
- CUTOFF potassic fertilizer, potassium chloride; at point-of-sale: 0.00115012 kg; = p1154
- CUTOFF international vessel transport; average fuel: 0.294867 metric ton*km; = p2006
- CUTOFF apply zinc compounds; unspecified method: 0.000587422 ha; = p1183
- CUTOFF pesticide, Triasulfuron; at point-of-sale; kg AI: 9.82704e-8 kg; = p1949
- CUTOFF phosphatic fertilizer, monoammonium phosphate; at point-of-sale: 0.0038379 kg; = p1120
- CUTOFF pesticide, 2,4-D; at point-of-sale; kg AI: 3.11517e-5 kg; = p1754
- CUTOFF apply N fertilizer; no broadcast application: 0.000160127 ha; = p1030
- CUTOFF apply sulfur; unspecified method: 0.000587422 ha; = p1171
- CUTOFF gypsum storage: 2.44472e-6 kg*a; = p1168
- CUTOFF apply pesticide; broadcast by air: 5.28836e-5 ha; = p1331
- CUTOFF apply mixed N fertilizer; without incorporation: 0.000122162 ha; = p1034
- CUTOFF prepare soil; for unspec. till, wheat: 0.000114796 ha; = p0939
- CUTOFF apply sulfuric acid; unspecified method: 0.000587422 ha; = p1177
- CUTOFF nitrogenous fertilizer, nitrogen solutions; at point-of-sale: 0.0326458 kg; = p1068
- CUTOFF apply K fertilizer; broadcast with incorporation: 8.25791e-6 ha; = p1140
- CUTOFF pesticide formulation balance; at point-of-sale: 3.91508e-5 kg; = p1963
- CUTOFF phosphatic fertilizer, superphosphate grades over 22%; at point-of-sale: 0.00112782 kg; = p1117
- CUTOFF apply P fertilizer; broadcast with incorporation: 4.96108e-5 ha; = p1090
- CUTOFF liming materials storage: 0.0120402 kg*a; = p1231
- CUTOFF sewage sludge; at point-of-sale: 1.12695e-7 kg; = p1190
- CUTOFF sowing svc; for mulch till, 1997 winter wheat: 2.66278e-5 ha; = p0947
- CUTOFF apply pesticide; broadcast with incorporation: 0.000182881 ha; = p1333
- CUTOFF apply N fertilizer; broadcast without incorporation: 8.60119e-5 ha; = p1032
- CUTOFF pesticide, Dimethoate; at point-of-sale; kg AI: 7.46855e-6 kg; = p1822
- CUTOFF nitrogenous fertilizer, sodium nitrate; at point-of-sale: 0.000106593 kg; = p1069
- CUTOFF prepare soil; for conventional till, wheat; <15% residue: 0.000308476 ha; = p0934
- CUTOFF prepare soil; for mulch till, wheat: 2.66278e-5 ha; = p0935
- CUTOFF gypsum; at point-of-sale: 4.88944e-6 kg; = p1166
- CUTOFF phosphatic fertilizer, diammonium phosphate; at point-of-sale: 0.0108695 kg; = p1119
- CUTOFF phosphatic fertilizer, superphos. grades 22% and under; at point-of-sale: 0.000137808 kg; = p1116
- CUTOFF regional or national trucking; class 8, average fuel: 0.0118586 metric ton*km; = p2009
- CUTOFF pesticide, Methyl parathion; at point-of-sale; kg AI: 1.0908e-5 kg; = p1888
- CUTOFF apply sewage sludge; unspecified method: 0.000587422 ha; = p1189
- CUTOFF sulfur storage: 1.58759e-7 kg*a; = p1174
- CUTOFF pesticide, Chlorsulfuron; at point-of-sale; kg AI: 1.27752e-6 kg; = p1794
- winter wheat residue; at harvest in 1997; at farm; 83%-90% moisture: 0.64758 kg; = p0839
- CUTOFF apply P fertilizer; no broadcast application: 9.63613e-5 ha; = p1089
- CUTOFF local area trucking; class 6, average fuel: 0.00242079 metric ton*km; = p2010
- CUTOFF harvest; winter: 0.000464677 ha; = p1971

## Inputs from nature
- Water, unspecified origin: 0.000340805 m3; = p0916*0.001
- Dry matter except CNPK; from plant uptake: 1.27956 kg; = p0917
- Potassium; from plant uptake; biogenic: 0.0189815 kg; = p0915
- Transformation, to annual crop [natural resource, land]: 5.87422 m2; = 1.0 * (p0857)
- Phosphorus: 0.00590066 kg; = p0910
- Carbon dioxide: 3.5495 kg; = p0900*3.6666666667
- Nitrogen: 0.0341917 kg; = p0905
- Occupation, annual crop [natural resource, land]: 4.1475 m2*year; = 1.0 * (p0855)
- Transformation, from annual crop [natural resource, land]: 5.87422 m2; = 1.0 * (p0883)

## Emissions to nature
- Ammonium sulfate; broadcast w/o incorp. in fert. in spr. bef. plant.: 4.69622e-5 kg; = p2869*4.7142857143
- NMVOC, non-methane volatile organic compounds, unspecified origin [air, non-urban air or from high stacks]: 0.000321315 kg; = 1.0 * (p2051+p2052)
- Monoammonium phosphate; broadcast w/o incorp. in fert. in fall bef. plant.: 0.000611129 kg; = p2849*8.2142857143
- Sulfur [soil, agricultural]: 3.17518e-7 kg; = 1.0 * (p3230)
- Carbon dioxide, in air: 0.0167346 kg; = p2163*3.6666666667
- Ammonium nitrate; broadcast w/ incorp. in fert. after plant.: 0.000397844 kg; = p2749*4.7142857143
- Propanenitrile: 8.01303e-7 kg; = p2157*1.5277777778
- Nitrogen; applied in sewage sludge: 5.27096e-9 kg; = p3240
- Ammonium nitrate; broadcast w/o incorp. in fert. after plant.: 0.0015529 kg; = p2944*4.7142857143
- Sodium nitrate; no broadcast in fert. after plant.: 1.2608e-5 kg; = p2564*6.0714285714
- Other single phosphates; broadcast w/o incorp. in fert. at plant.; kg P: 9.75775e-6 kg; = p2934
- Aqueous ammonia; broadcast w/o incorp. in fert. in spr. bef. plant.: 2.41884e-6 kg; = p2864*1.2142857143
- 1-Butene: 1.67403e-6 kg; = p2144*1.1666666667
- Superphosphate, grades<= 22%; broadcast w/ incorp. in fert. in fall bef. plant.; kg P: 1.47428e-6 kg; = p2657
- Dimethoate [soil, agricultural]: 6.45333e-6 kg; = 1.0 * (p5201+p4583+p3965)
- Calcium [soil, agricultural]: 0.00879527 kg; = 1.0 * (p3226+p3218)
- Monoammonium phosphate; broadcast w/o incorp. in fert. at plant.: 0.00044333 kg; = p2927*8.2142857143
- Diammonium phosphate; unspec. appl. method in fert. at plant.: 0.000100308 kg; = p3118*4.7142857143
- Superphosphate, grades<= 22%; unspec. appl. method in fert. after plant.; kg P: 1.28651e-8 kg; = p3164
- Anhydrous ammonia; no broadcast in fert. in fall bef. plant.: 0.00342371 kg; = p2433*1.2142857143
- Methyl vinyl ether; from residue burning: 9.48486e-7 kg; = p2137*1.6111111111
- Ammonium nitrate; no broadcast in fert. in spr. bef. plant.: 9.13413e-5 kg; = p2476*4.7142857143
- Acetic acid [air, non-urban air or from high stacks]: 6.99655e-5 kg; = 1.0 * (p2127*2.5)
- Superphosphate, grades>22%; unspec. appl. method in fert. after plant.; kg P: 2.5269e-7 kg; = p3166
- Phenol [air, non-urban air or from high stacks]: 6.48617e-6 kg; = 1.0 * (p2133*1.3055555556)
- Superphosphate, grades>22%; unspec. appl. method in fert. in fall bef. plant.; kg P: 3.26302e-6 kg; = p3049
- Ammonium sulfate; no broadcast in fert. in spr. bef. plant.: 3.61233e-5 kg; = p2479*4.7142857143
- Anhydrous ammonia; no broadcast in fert. at plant.: 0.000344415 kg; = p2511*1.2142857143
- Sodium nitrate; broadcast w/ incorp. in fert. in fall bef. plant.: 7.64369e-6 kg; = p2642*6.0714285714
- Superphosphate, grades>22%; broadcast w/ incorp. in fert. after plant.; kg P: 2.24245e-6 kg; = p2776
- Ammonium nitrate; no broadcast in fert. in fall bef. plant.: 0.00217423 kg; = p2437*4.7142857143
- Nitrogen solution; broadcast w/ incorp. in fert. in fall bef. plant.; broadcast w/ incorp. in fert. in fall bef. plan...: 0.000722958 kg; = p2639
- Anhydrous ammonia; no broadcast in fert. after plant.: 0.00188093 kg; = p2550*1.2142857143
- Other single K nutrients; broadcast w/o incorp. in fert. in fall bef. plant.; kg K: 1.29774e-5 kg; = p2860
- Anhydrous ammonia; unspec. appl. method in fert. at plant.: 1.1554e-5 kg; = p3096*1.2142857143
- Glycolaldehyde; from residue burning: 2.51949e-5 kg; = p2135*2.5
- Filler materials, applied with synthetic fertilizer: 0.0210543 kg; = p2432
- Methane: 2.64647e-5 kg; = p2025*1.3333333333
- Pesticide formulation balance; broadcast with incorporation: 1.84041e-5 kg; = p4102
- Acetone [air, non-urban air or from high stacks]: 5.58063e-6 kg; = 1.0 * (p2139*1.6111111111)
- Oxygen; applied in dolomite: 0.000886482 kg; = p3228
- Diammonium phosphate; no broadcast in fert. after plant.: 0.000184574 kg; = p2572*4.7142857143
- Anhydrous ammonia; no broadcast in fert. in spr. bef. plant.: 0.000143833 kg; = p2472*1.2142857143
- Superphosphate, grades<= 22%; broadcast w/o incorp. in fert. at plant.; kg P: 1.57265e-6 kg; = p2930
- Aqueous ammonia; unspec. appl. method in fert. in fall bef. plant.: 1.48571e-6 kg; = p3020*1.2142857143
- Superphosphate, grades>22%; broadcast w/o incorp. in fert. after plant.; kg P: 3.29745e-6 kg; = p2971
- Dimethoate: 1.01523e-6 kg; = p3759
- Ammonium sulfate; broadcast w/ incorp. in fert. at plant.: 2.88099e-5 kg; = p2713*4.7142857143
- Urea; broadcast w/ incorp. in fert. in spr. bef. plant.: 3.70947e-5 kg; = p2685*5
- Isoprene [air, non-urban air or from high stacks]: 4.71869e-6 kg; = 1.0 * (p2145*1.1333333333)
- Sodium nitrate; no broadcast in fert. at plant.: 2.30864e-6 kg; = p2525*6.0714285714
- Nitrogen solution; no broadcast in fert. in fall bef. plant.; no broadcast in fert. in fall bef. plant.; kg N: 0.00217061 kg; = p2444
- Aqueous ammonia; unspec. appl. method in fert. at plant.: 1.49458e-7 kg; = p3098*1.2142857143
- Sodium nitrate; broadcast w/o incorp. in fert. after plant.: 1.63911e-5 kg; = p2954*6.0714285714
- Superphosphate, grades<= 22%; broadcast w/o incorp. in fert. after plant.; kg P: 1.67882e-7 kg; = p2969
- Sodium nitrate; broadcast w/o incorp. in fert. in spr. bef. plant.: 1.25341e-6 kg; = p2876*6.0714285714
- Sewage sludge dry matter; applied in sewage sludge: 5.83546e-10 kg; = p3243
- Sodium nitrate; unspec. appl. method in fert. in fall bef. plant.: 7.69877e-7 kg; = p3032*6.0714285714
- Anhydrous ammonia; unspec. appl. method in fert. in spr. bef. plant.: 4.82511e-6 kg; = p3057*1.2142857143
- Diammonium phosphate; broadcast w/o incorp. in fert. after plant.: 0.000139734 kg; = p2962*4.7142857143
- Ammonium sulfate; unspec. appl. method in fert. in fall bef. plant.: 2.88453e-5 kg; = p3025*4.7142857143
- Aqueous ammonia; unspec. appl. method in fert. after plant.: 8.16225e-7 kg; = p3137*1.2142857143
- Other limestone constituents; applied in limestone: 0.00133886 kg; = p3220
- Methyl parathion [soil, agricultural]: 9.42525e-6 kg; = 1.0 * (p5267+p4649+p4031)
- Formic acid [air, non-urban air or from high stacks]: 1.25306e-5 kg; = 1.0 * (p2131*3.8333333333)
- Ammonium sulfate; broadcast w/ incorp. in fert. in spr. bef. plant.: 1.20315e-5 kg; = p2674*4.7142857143
- Superphosphate, grades<= 22%; no broadcast in fert. at plant.; kg P: 2.07731e-6 kg; = p2540
- Plant dry matter; in aboveground residue left on field: 0.300687 kg; = p2172
- Urea; no broadcast in fert. after plant.: 0.00145645 kg; = p2568*5
- Urea; broadcast w/o incorp. in fert. after plant.: 0.00189346 kg; = p2958*5
- I butane; from residue burning: 2.63801e-7 kg; = p2146*1.0208333333
- Diammonium phosphate; no broadcast in fert. in fall bef. plant.: 0.00238343 kg; = p2455*4.7142857143
- Nitrogen solution; broadcast w/o incorp. in fert. in fall bef. plant.; broadcast w/o incorp. in fert. in fall bef. pl...: 0.00282191 kg; = p2834
- Potassium chloride; broadcast w/o incorp. in fert. in fall bef. plant.: 0.000281556 kg; = p2858*2.2166666667
- Diammonium phosphate; no broadcast in fert. at plant.: 0.00172901 kg; = p2533*4.7142857143
- Monoammonium phosphate; no broadcast in fert. in fall bef. plant.: 0.000807241 kg; = p2459*8.2142857143
- Anhydrous ammonia; unspec. appl. method in fert. after plant.: 6.30989e-5 kg; = p3135*1.2142857143
- Formaldehyde [air, non-urban air or from high stacks]: 2.59971e-5 kg; = 1.0 * (p2128*2.5)
- Aqueous ammonia; no broadcast in fert. in spr. bef. plant.: 1.86057e-6 kg; = p2474*1.2142857143
- Monoammonium phosphate; broadcast w/o incorp. in fert. after plant.: 4.73262e-5 kg; = p2966*8.2142857143
- Acetonitrile [air, non-urban air or from high stacks]: 2.62514e-6 kg; = 1.0 * (p2155*1.7083333333)
- Propene [air, non-urban air or from high stacks]: 8.45393e-6 kg; = 1.0 * (p2136*1.1666666667)
- Potassium chloride; broadcast w/ incorp. in fert. in fall bef. plant.: 0.000277683 kg; = p2663*2.2166666667
- isobutene: 1.46165e-6 kg; = p2150*1.1666666667
- Aqueous ammonia; broadcast w/ incorp. in fert. after plant.: 8.10385e-6 kg; = p2747*1.2142857143
- Superphosphate, grades<= 22%; broadcast w/ incorp. in fert. at plant.; kg P: 1.06948e-6 kg; = p2735
- Methanol [air, non-urban air or from high stacks]: 4.10997e-5 kg; = 1.0 * (p2129*2.6666666667)
- Ammonium sulfate; no broadcast in fert. at plant.: 8.6499e-5 kg; = p2518*4.7142857143
- Ammonium sulfate; broadcast w/ incorp. in fert. after plant.: 0.000157338 kg; = p2752*4.7142857143
- Hydrocyanic acid: 3.56753e-6 kg; = p2154*2.25
- Nitrogen solution; unspec. appl. method in fert. in spr. bef. plant.; unspec. appl. method in fert. in spr. bef. plan...: 3.05909e-6 kg; = p3068
- Ammonium sulfate; unspec. appl. method in fert. in spr. bef. plant.: 1.21182e-6 kg; = p3064*4.7142857143
- Urea; broadcast w/ incorp. in fert. in fall bef. plant.: 0.000882981 kg; = p2646*5
- Butane [air, non-urban air or from high stacks]: 7.59747e-7 kg; = 1.0 * (p2147*1.0208333333)
- Toluene [air, non-urban air or from high stacks]: 2.38191e-6 kg; = 1.0 * (p2141*1.0952380952)
- Pentane [air, non-urban air or from high stacks]: 2.64559e-7 kg; = 1.0 * (p2152*1.0166666667)
- Sulfur dioxide [air, non-urban air or from high stacks]: 5.50235e-6 kg; = 1.0 * (p2041)
- Urea; broadcast w/o incorp. in fert. in spr. bef. plant.: 0.000144791 kg; = p2880*5
- Ammonium nitrate; no broadcast in fert. at plant.: 0.000218721 kg; = p2515*4.7142857143
- Aqueous ammonia; no broadcast in fert. in fall bef. plant.: 4.42879e-5 kg; = p2435*1.2142857143
- Metsulfuron-methyl: 2.67165e-8 kg; = p3828
- Pesticides, unspecified [soil, agricultural]: 2.45452e-6 kg; = 1.0 * (p5337+p4101+p4719)
- Superphosphate, grades>22%; no broadcast in fert. after plant.; kg P: 4.35561e-6 kg; = p2581
- trans-2-Butene: 7.12088e-7 kg; = p2148*1.1666666667
- Monoammonium phosphate; unspec. appl. method in fert. after plant.: 3.62669e-6 kg; = p3161*8.2142857143
- Particulates, < 10 um: 8.26603e-5 kg; = p2034+p2036
- Urea; no broadcast in fert. at plant.: 0.000266689 kg; = p2529*5
- Acetaldehyde [air, non-urban air or from high stacks]: 1.55534e-5 kg; = 1.0 * (p2130*1.8333333333)
- Ammonium sulfate; broadcast w/o incorp. in fert. after plant.: 0.000614134 kg; = p2947*4.7142857143
- Acrylonitrile: 4.19175e-7 kg; = p2156*1.4722222222
- Ammonium sulfate; no broadcast in fert. after plant.: 0.000472391 kg; = p2557*4.7142857143
- Other single K nutrients; broadcast w/ incorp. in fert. in fall bef. plant.; kg K: 1.27988e-5 kg; = p2665
- Other single phosphates; unspec. appl. method in fert. at plant.; kg P: 7.47755e-7 kg; = p3129
- Propane [air, non-urban air or from high stacks]: 3.522e-6 kg; = 1.0 * (p2142*1.2222222222)
- Anhydrous ammonia; broadcast w/ incorp. in fert. in fall bef. plant.: 0.00114032 kg; = p2628*1.2142857143
- Monoammonium phosphate; no broadcast in fert. after plant.: 6.25131e-5 kg; = p2576*8.2142857143
- Urea; unspec. appl. method in fert. after plant.: 4.88591e-5 kg; = p3153*5
- Superphosphate, grades>22%; no broadcast in fert. in fall bef. plant.; kg P: 5.62445e-5 kg; = p2464
- Metsulfuron-methyl [soil, agricultural]: 1.69824e-7 kg; = 1.0 * (p4034+p5270+p4652)
- Butadiene [air, non-urban air or from high stacks]: 1.88683e-6 kg; = 1.0 * (p2143*1.125)
- Superphosphate, grades>22%; unspec. appl. method in fert. at plant.; kg P: 2.36708e-6 kg; = p3127
- Nitrogen solution; no broadcast in fert. in spr. bef. plant.; no broadcast in fert. in spr. bef. plant.; kg N: 9.11891e-5 kg; = p2483
- Chlorsulfuron: 1.73657e-7 kg; = p3731
- Superphosphate, grades<= 22%; unspec. appl. method in fert. at plant.; kg P: 1.20515e-7 kg; = p3125
- Anhydrous ammonia; unspec. appl. method in fert. in fall bef. plant.: 0.000114854 kg; = p3018*1.2142857143
- Superphosphate, grades<= 22%; unspec. appl. method in fert. in fall bef. plant.; kg P: 1.66129e-7 kg; = p3047
- Sodium nitrate; broadcast w/ incorp. in fert. in spr. bef. plant.: 3.21117e-7 kg; = p2681*6.0714285714
- cis-2-Butene: 5.37189e-7 kg; = p2149*1.1666666667
- Ammonium nitrate; no broadcast in fert. after plant.: 0.00119449 kg; = p2554*4.7142857143
- Nitrogen; in above-ground residue left on field: 0.00756411 kg; = p2168
- Aqueous ammonia; broadcast w/ incorp. in fert. at plant.: 1.48389e-6 kg; = p2708*1.2142857143
- Other single phosphates; unspec. appl. method in fert. after plant.; kg P: 7.9824e-8 kg; = p3168
- Urea; unspec. appl. method in fert. at plant.: 8.94653e-6 kg; = p3114*5
- Ethyne [air, non-urban air or from high stacks]: 3.40402e-6 kg; = 1.0 * (p2132*1.0833333333)
- Anhydrous ammonia; broadcast w/ incorp. in fert. after plant.: 0.000626475 kg; = p2745*1.2142857143
- Dinitrogen monoxide [air, non-urban air or from high stacks]: 8.75538e-7 kg; = 1.0 * (p2044*1.5714285714)
- Sodium nitrate; broadcast w/ incorp. in fert. at plant.: 7.68932e-7 kg; = p2720*6.0714285714
- Chlorsulfuron [soil, agricultural]: 1.10386e-6 kg; = 1.0 * (p4555+p3937+p5173)
- Ammonium sulfate; broadcast w/ incorp. in fert. in fall bef. plant.: 0.00028639 kg; = p2635*4.7142857143
- 2,4-D [air, non-urban air or from high stacks]: 4.23457e-6 kg; = 1.0 * (p3691)
- Ammonium nitrate; broadcast w/ incorp. in fert. at plant.: 7.28488e-5 kg; = p2710*4.7142857143
- Ammonium nitrate; unspec. appl. method in fert. at plant.: 7.33737e-6 kg; = p3100*4.7142857143
- Nitrogen solution; unspec. appl. method in fert. after plant.; unspec. appl. method in fert. after plant.; kg N: 4.00043e-5 kg; = p3146
- Superphosphate, grades>22%; broadcast w/ incorp. in fert. in fall bef. plant.; kg P: 2.8957e-5 kg; = p2659
- Monoammonium phosphate; unspec. appl. method in fert. at plant.: 3.39732e-5 kg; = p3122*8.2142857143
- Urea; unspec. appl. method in fert. in fall bef. plant.: 8.89343e-5 kg; = p3036*5
- Aqueous ammonia; no broadcast in fert. at plant.: 4.45522e-6 kg; = p2513*1.2142857143
- Other single phosphates; no broadcast in fert. in fall bef. plant.; kg P: 1.77675e-5 kg; = p2466
- Superphosphate, grades>22%; broadcast w/o incorp. in fert. in fall bef. plant.; kg P: 4.25805e-5 kg; = p2854
- Dioxins and furans (PCDD/F); from residue burning: 3.7516e-13 kg TEQ; = p2047
- Diammonium phosphate; broadcast w/ incorp. in fert. after plant.: 9.50264e-5 kg; = p2767*4.7142857143
- Ammonium nitrate; broadcast w/o incorp. in fert. at plant.: 0.000284349 kg; = p2905*4.7142857143
- Sodium nitrate; broadcast w/o incorp. in fert. in fall bef. plant.: 2.98355e-5 kg; = p2837*6.0714285714
- Superphosphate, grades>22%; broadcast w/ incorp. in fert. at plant.; kg P: 2.10062e-5 kg; = p2737
- Ethane [air, non-urban air or from high stacks]: 1.13639e-5 kg; = 1.0 * (p2126*1.25)
- Particulates, < 2.5 um [air, non-urban air or from high stacks]: 5.03965e-5 kg; = 1.0 * (p2035+p2033)
- Pesticides, unspecified: 3.86141e-7 kg; = p3895
- Urea; broadcast w/o incorp. in fert. in fall bef. plant.: 0.00344652 kg; = p2841*5
- Sodium nitrate; broadcast w/o incorp. in fert. at plant.: 3.00136e-6 kg; = p2915*6.0714285714
- Other single phosphates; broadcast w/o incorp. in fert. in fall bef. plant.; kg P: 1.3451e-5 kg; = p2856
- Phosphorous; in below-ground residue: 0.000525934 kg; = p2175
- Other single K nutrients; unspec. appl. method in fert. in fall bef. plant.; kg K: 2.2998e-5 kg; = p3055
- Ammonium nitrate; broadcast w/ incorp. in fert. in fall bef. plant.: 0.000724165 kg; = p2632*4.7142857143
- Triasulfuron [soil, agricultural]: 8.49122e-8 kg; = 1.0 * (p4710+p4092+p5328)
- Aqueous ammonia; broadcast w/ incorp. in fert. in spr. bef. plant.: 6.19693e-7 kg; = p2669*1.2142857143
- Ammonium sulfate; broadcast w/o incorp. in fert. at plant.: 0.000112453 kg; = p2908*4.7142857143
- Aqueous ammonia; broadcast w/o incorp. in fert. at plant.: 5.79203e-6 kg; = p2903*1.2142857143
- Superphosphate, grades<= 22%; broadcast w/ incorp. in fert. after plant.; kg P: 1.14169e-7 kg; = p2774
- Urea; broadcast w/o incorp. in fert. at plant.: 0.00034671 kg; = p2919*5
- Nitrogen solution; no broadcast in fert. at plant.; no broadcast in fert. at plant.; kg N: 0.000218357 kg; = p2522
- Monoammonium phosphate; no broadcast in fert. at plant.: 0.000585594 kg; = p2537*8.2142857143
- Furan [air, non-urban air or from high stacks]: 1.36796e-6 kg; = 1.0 * (p2138*1.4166666667)
- Nitrogen solution; broadcast w/o incorp. in fert. at plant.; broadcast w/o incorp. in fert. at plant.; kg N: 0.000283876 kg; = p2912
- Other single phosphates; broadcast w/o incorp. in fert. after plant.; kg P: 1.04166e-6 kg; = p2973
- Ethene [air, non-urban air or from high stacks]: 1.81953e-5 kg; = 1.0 * (p2125*1.1666666667)
- Sodium nitrate; unspec. appl. method in fert. in spr. bef. plant.: 3.23431e-8 kg; = p3071*6.0714285714
- Anhydrous ammonia; broadcast w/ incorp. in fert. at plant.: 0.000114713 kg; = p2706*1.2142857143
- Sulfuric acid [soil, agricultural]: 8.71969e-8 kg; = 1.0 * (p3231)
- Ammonium nitrate; unspec. appl. method in fert. in fall bef. plant.: 7.29383e-5 kg; = p3022*4.7142857143
- Nitrogen solution; no broadcast in fert. after plant.; no broadcast in fert. after plant.; kg N: 0.0011925 kg; = p2561
- Plant dry matter; from residue burning: 0.00449342 kg; = p2164
- Ammonium nitrate; unspec. appl. method in fert. after plant.: 4.00711e-5 kg; = p3139*4.7142857143
- Superphosphate, grades>22%; no broadcast in fert. at plant.; kg P: 4.08013e-5 kg; = p2542
- Aqueous ammonia; broadcast w/o incorp. in fert. in fall bef. plant.: 5.75766e-5 kg; = p2825*1.2142857143
- Monoammonium phosphate; broadcast w/ incorp. in fert. after plant.: 3.21844e-5 kg; = p2771*8.2142857143
- Diammonium phosphate; broadcast w/o incorp. in fert. at plant.: 0.00130896 kg; = p2923*4.7142857143
- Triasulfuron: 1.33583e-8 kg; = p3886
- Ammonium sulfate; unspec. appl. method in fert. at plant.: 2.90175e-6 kg; = p3103*4.7142857143
- Diammonium phosphate; broadcast w/o incorp. in fert. in fall bef. plant.: 0.0018044 kg; = p2845*4.7142857143
- Water [air, non-urban air or from high stacks]: 1.9852e-6 m3; = 0.001 * (p2016)
- Nitrogen dioxide: 2.48946e-5 kg; = p2039*3.2857142857
- Plant dry matter; in below-ground residue: 0.136757 kg; = p2177
- Anhydrous ammonia; broadcast w/ incorp. in fert. in spr. bef. plant.: 4.79059e-5 kg; = p2667*1.2142857143
- Nitrogen solution; unspec. appl. method in fert. in fall bef. plant.; unspec. appl. method in fert. in fall bef. plan...: 7.28168e-5 kg; = p3029
- Diammonium phosphate; unspec. appl. method in fert. after plant.: 1.0708e-5 kg; = p3157*4.7142857143
- Anhydrous ammonia; broadcast w/o incorp. in fert. at plant.: 0.000447758 kg; = p2901*1.2142857143
- Sodium nitrate; unspec. appl. method in fert. at plant.: 7.74473e-8 kg; = p3110*6.0714285714
- Anhydrous ammonia; broadcast w/o incorp. in fert. in spr. bef. plant.: 0.00018699 kg; = p2862*1.2142857143
- Sodium nitrate; no broadcast in fert. in spr. bef. plant.: 9.64123e-7 kg; = p2486*6.0714285714
- Ammonium nitrate; broadcast w/ incorp. in fert. in spr. bef. plant.: 3.04227e-5 kg; = p2671*4.7142857143
- Potassium; in below-ground residue; biogenic: 0.00320104 kg; = p2176
- Benzene [air, non-urban air or from high stacks]: 1.9189e-6 kg; = 1.0 * (p2140*1.0833333333)
- Magnesium [soil, agricultural]: 0.000224008 kg; = 1.0 * (p3227)
- Nitrogen solution; broadcast w/ incorp. in fert. at plant.; broadcast w/ incorp. in fert. at plant.; kg N: 7.27274e-5 kg; = p2717
- Nitrogen solution; broadcast w/ incorp. in fert. in spr. bef. plant.; broadcast w/ incorp. in fert. in spr. bef. plan...: 3.0372e-5 kg; = p2678
- Urea; no broadcast in fert. in spr. bef. plant.: 0.000111373 kg; = p2490*5
- Ammonia [air, non-urban air or from high stacks]: 2.71376e-5 kg; = 1.0 * (p2159*1.2142857143)
- Methyl parathion [air, non-urban air or from high stacks]: 1.48277e-6 kg; = 1.0 * (p3825)
- Aqueous ammonia; unspec. appl. method in fert. in spr. bef. plant.: 6.24158e-8 kg; = p3059*1.2142857143
- Other single phosphates; no broadcast in fert. after plant.; kg P: 1.37592e-6 kg; = p2583
- Pesticide formulation balance; unspec. appl. method: 2.79578e-6 kg; = p5338
- Pesticide formulation balance; foliar or directed spray: 1.26289e-5 kg; = p4720
- Urea; broadcast w/ incorp. in fert. at plant.: 8.88252e-5 kg; = p2724*5
- Pesticide formulation balance; broadcast by air: 5.32191e-6 kg; = p3896
- Water: 0.135001 kg; = p2178+p2181+p2171
- Nitrogen solution; broadcast w/o incorp. in fert. in spr. bef. plant.; broadcast w/o incorp. in fert. in spr. bef. pl...: 0.000118551 kg; = p2873
- Other single phosphates; broadcast w/ incorp. in fert. in fall bef. plant.; kg P: 9.14744e-6 kg; = p2661
- Nitrogen solution; broadcast w/o incorp. in fert. after plant.; broadcast w/o incorp. in fert. after plant.; kg N: 0.00155031 kg; = p2951
- Diammonium phosphate; broadcast w/ incorp. in fert. in fall bef. plant.: 0.00122709 kg; = p2650*4.7142857143
- Oxygen; applied in limestone: 0.0100591 kg; = p3219
- Carbon [soil, agricultural]: 0.392817 kg; = 1.0 * (p2173+p3225+p3217+p3242+p2167)
- Monoammonium phosphate; unspec. appl. method in fert. in fall bef. plant.: 4.6832e-5 kg; = p3044*8.2142857143
- Other single phosphates; broadcast w/ incorp. in fert. after plant.; kg P: 7.08382e-7 kg; = p2778
- Anhydrous ammonia; broadcast w/o incorp. in fert. after plant.: 0.00244531 kg; = p2940*1.2142857143
- Urea; broadcast w/ incorp. in fert. after plant.: 0.000485095 kg; = p2763*5
- Acetol; from residue burning: 4.70856e-5 kg; = p2134*2.0555555556
- 2,4-D [soil, agricultural]: 2.69172e-5 kg; = 1.0 * (p4515+p3897+p5133)
- Potassium chloride; unspec. appl. method in fert. in fall bef. plant.: 0.000498963 kg; = p3053*2.2166666667
- Superphosphate, grades>22%; broadcast w/o incorp. in fert. at plant.; kg P: 3.0889e-5 kg; = p2932
- Aqueous ammonia; no broadcast in fert. after plant.: 2.4331e-5 kg; = p2552*1.2142857143
- Carbon monoxide, fossil [air, non-urban air or from high stacks]: 0.00068991 kg; = 1.0 * (p2028*2.3333333333)
- Diammonium phosphate; unspec. appl. method in fert. in fall bef. plant.: 0.000138274 kg; = p3040*4.7142857143
- Aqueous ammonia; broadcast w/ incorp. in fert. in fall bef. plant.: 1.47508e-5 kg; = p2630*1.2142857143
- Superphosphate, grades<= 22%; no broadcast in fert. after plant.; kg P: 2.21756e-7 kg; = p2579
- Potassium; in above-ground residue left on field; biogenic: 0.00703813 kg; = p2170
- Phosphorous; applied in sewage sludge: 6.29228e-10 kg; = p3241
- Phosphorous; in above-ground residue left on field: 0.00115637 kg; = p2169
- Other single phosphates; no broadcast in fert. at plant.; kg P: 1.2889e-5 kg; = p2544
- Nitrogen solution; unspec. appl. method in fert. at plant.; unspec. appl. method in fert. at plant.; kg N: 7.32515e-6 kg; = p3107
- Superphosphate, grades<= 22%; no broadcast in fert. in fall bef. plant.; kg P: 2.86356e-6 kg; = p2462
- Nitrogen solution; broadcast w/ incorp. in fert. after plant.; broadcast w/ incorp. in fert. after plant.; kg N: 0.000397181 kg; = p2756
- Ammonium sulfate; no broadcast in fert. in fall bef. plant.: 0.000859857 kg; = p2440*4.7142857143
- cyclopentane: 2.06845e-8 kg; = p2153*1.0166666667
- Ammonium nitrate; broadcast w/o incorp. in fert. in spr. bef. plant.: 0.000118748 kg; = p2866*4.7142857143
- Sodium nitrate; unspec. appl. method in fert. after plant.: 4.22958e-7 kg; = p3149*6.0714285714
- isopentane: 2.11648e-7 kg; = p2151*1.0166666667
- Urea; unspec. appl. method in fert. in spr. bef. plant.: 3.7362e-6 kg; = p3075*5
- Zinc compounds: 8.9477e-8 kg; = p3232
- Ammonium sulfate; unspec. appl. method in fert. after plant.: 1.58472e-5 kg; = p3142*4.7142857143
- Urea; no broadcast in fert. in fall bef. plant.: 0.00265106 kg; = p2451*5
- Sodium nitrate; no broadcast in fert. in fall bef. plant.: 2.29494e-5 kg; = p2447*6.0714285714
- Ash: 0.00247356 kg; = p2021+p2022
- Anhydrous ammonia; broadcast w/o incorp. in fert. in fall bef. plant.: 0.004451 kg; = p2823*1.2142857143
- Ammonium nitrate; unspec. appl. method in fert. in spr. bef. plant.: 3.06419e-6 kg; = p3061*4.7142857143
- Other single phosphates; unspec. appl. method in fert. in fall bef. plant.; kg P: 1.03078e-6 kg; = p3051
- Monoammonium phosphate; broadcast w/ incorp. in fert. at plant.: 0.000301488 kg; = p2732*8.2142857143
- Monoammonium phosphate; broadcast w/ incorp. in fert. in fall bef. plant.: 0.000415601 kg; = p2654*8.2142857143
- Superphosphate, grades<= 22%; broadcast w/o incorp. in fert. in fall bef. plant.; kg P: 2.16789e-6 kg; = p2852
- Aqueous ammonia; broadcast w/o incorp. in fert. after plant.: 3.16316e-5 kg; = p2942*1.2142857143
- Gypsum: 4.88944e-6 kg; = p3229
- Diammonium phosphate; broadcast w/ incorp. in fert. at plant.: 0.000890164 kg; = p2728*4.7142857143
- Ammonium sulfate; broadcast w/o incorp. in fert. in fall bef. plant.: 0.00111786 kg; = p2830*4.7142857143
- Ammonium nitrate; broadcast w/o incorp. in fert. in fall bef. plant.: 0.00282662 kg; = p2827*4.7142857143
- Nitrogen; in below-ground residue: 0.00344026 kg; = p2174
- Other single phosphates; broadcast w/ incorp. in fert. at plant.; kg P: 6.6358e-6 kg; = p2739
- Sodium nitrate; broadcast w/ incorp. in fert. after plant.: 4.19932e-6 kg; = p2759*6.0714285714

## Sampling procedure
A delete-a-group jackknife is used by the USDA to estimate the ARMS sample means and RSEs, based on a 15 sample delete-a-group jackknife. Because of this relatively small sample size, a Students t distribution is used to represent ARMS data probability density functions. Other representations of uncertainty are described in Cooper, J.S., Kahn, E., Noon, M. (2012). LCA Digital Commons Unit Process Data: field crop production Version 1. Prepared for the US Department of Agriculture National Agricultural Library. Retrieved from https://www.lcacommons.gov/discovery/docs/LCA%20Digital%20Commons%20Unit%20Process%20Data%20final%20updated.pdf

## Extrapolations
Data represent an aggregation of processes applied in Oklahoma in 1997. Data development is demonstrated by parameterization (exlicitly presents all raw and uncertainty data and all calculations). Flow data quality according to the LCADC convention is provided for all flows.
