# CUTOFF irrigate; unspecified irrigation method, groundwater source, in 2000

Dataset: EcoSpold 2, unit process
Geography: GLO
Time period: 1996-01-02 to 2010-01-01
Scenario: Business-as-Usual
System model: Allocation, ecoinvent default
Generated by: cooperjs@u.washington.edu
isCopyrightProtected: false

## General comment
This unit process/ gate-to-gate dataset provides a crosswalk between the exchange "CUTOFF irrigate; unspecified irrigation method, groundwater source, in 2000" in the USDA LCA Commons to the exchange "irrigating" in the ecoinvent 2.2 database. As a result of the crosswalk, the geographic representativeness is reduced, with the ecoinvent 2.2 data representing operations in United States as opposed to operation in South Dakota (US State). The impact on the temporal representativeness is not known. Applicable classifications include ISIC 3600, NAIC 221310, UNSPSC 70171709. This dataset was prepared in ILCD format using the UWDFE Lab Excel to ILCD File Generator (beta version, August 2013).

## Geography
Operations in United States are used as a surrogate for operations in South Dakota (US State).

## Technology
This process represents irrigating in South Dakota (US State), measured on a per ha-m basis. Included processes are listed in the meta data for the "irrigating" dataset in the ecoinvent 2.2 database.

## Time period
Start and end dates match the underlying data obtained from the USDA Agricultural Resource Management Survey (ARMS) for all data contained within the USDA Digital Commons.

## Reference product
- CUTOFF irrigate; unspecified irrigation method, groundwater source, in 2000: 1 ha-m

## Inputs from technosphere
- irrigating: 10000 m3

## Sampling procedure
Boundary conditions are described in the meta data for the "irrigating" dataset in the ecoinvent 2.2 database. Uncertainty is not estimated.

## Extrapolations
Quantitative transformation accounts for differences in units of measure. Flow data quality according to the LCADC convention is provided for all flows.
