# winter wheat; at harvest in 2009; at farm; 86%-90% moisture

Dataset: EcoSpold 2, unit process
Geography: GLO
Time period: 2009-01-02 to 2010-01-01
Scenario: Business-as-Usual
System model: Allocation, ecoinvent default
Generated by: cooperjs@u.washington.edu
isCopyrightProtected: false

## General comment
This unit process/ gate-to-gate dataset represents the production of 1 kg winter wheat coproduced with residue. The process technologies are an aggregation of those applied in Washington in 2009. Applicable classifications include ISIC 0111, NAIC 111140, UNSPSC 50221101; this dataset was prepared in ILCD format using the UWDFE Lab Excel to ILCD File Generator (beta version, August 2013)

Exchange "Prosulfuron-soil agricultural" is the result of combining the following original LCA Commons flows: "Prosulfuron; broadcast with incorporation; kg AI", "Prosulfuron; foliar or directed spray; kg AI", "Prosulfuron; unspec. appl. method; kg AI", "Prosulfuron; broadcast without incorporation; kg AI".
Exchange "Glyphosate-isopropylammonium-soil agricultural" is the result of combining the following original LCA Commons flows: "Glyphosate-isopropylammonium; foliar or directed spray; kg AI", "Glyphosate-isopropylammonium; unspec. appl. method; kg AI", "Glyphosate-isopropylammonium; broadcast with incorporation; kg AI", "Glyphosate-isopropylammonium; broadcast without incorporation; kg AI".
Exchange "2,4-D, 2-ethylhexyl ester-soil agricultural" is the result of combining the following original LCA Commons flows: "2,4-D, 2-ethylhexyl ester; broadcast without incorporation; kg AI", "2,4-D, 2-ethylhexyl ester; foliar or directed spray; kg AI", "2,4-D, 2-ethylhexyl ester; unspec. appl. method; kg AI", "2,4-D, 2-ethylhexyl ester; broadcast with incorporation; kg AI".
Exchange "Bromoxynil octanoate-soil unspecified" is the result of combining the following original LCA Commons flows: "Bromoxynil octanoate; broadcast without incorporation; kg AI", "Bromoxynil octanoate; broadcast with incorporation; kg AI", "Bromoxynil octanoate; foliar or directed spray; kg AI", "Bromoxynil octanoate; unspec. appl. method; kg AI".
Exchange "NMVOC, non-methane volatile organic compounds, unspecified origin-air low population density" is the result of combining the following original LCA Commons flows: "NMVOCs; from residue burning; kg C, biogenic", "NMVOCs; from residue burning; kg except C, biogenic".
Exchange "Propoxycarbazone-sodium (prop)-soil agricultural" is the result of combining the following original LCA Commons flows: "Propoxycarbazone-sodium; unspec. appl. method; kg AI", "Propoxycarbazone-sodium; foliar or directed spray; kg AI", "Propoxycarbazone-sodium; broadcast without incorporation; kg AI", "Propoxycarbazone-sodium; broadcast with incorporation; kg AI".
Exchange "Mesosulfuron-methyl (prop)-soil agricultural" is the result of combining the following original LCA Commons flows: "Mesosulfuron-methyl; broadcast without incorporation; kg AI", "Mesosulfuron-methyl; broadcast with incorporation; kg AI", "Mesosulfuron-methyl; unspec. appl. method; kg AI", "Mesosulfuron-methyl; foliar or directed spray; kg AI".
Exchange "Carbon-soil agricultural" is the result of combining the following original LCA Commons flows: "Carbon; applied in dolomite", "Carbon; applied in limestone", "Carbon; applied in sewage sludge", "Carbon; in below-ground residue; biogenic", "Carbon; in above-ground residue left on field; biogenic".
Exchange "Particulates, < 2.5 um-air low population density" is the result of combining the following original LCA Commons flows: "PM2.5; from residue burning; kg except C, biogenic", "PM2.5; from residue burning; kg C, biogenic".
Exchange "Starane-soil agricultural" is the result of combining the following original LCA Commons flows: "Fluroxypyr-meptyl; foliar or directed spray; kg AI", "Fluroxypyr-meptyl; broadcast without incorporation; kg AI", "Fluroxypyr-meptyl; unspec. appl. method; kg AI", "Fluroxypyr-meptyl; broadcast with incorporation; kg AI".
Exchange "Pesticides, unspecified-soil agricultural" is the result of combining the following original LCA Commons flows: "Unspecified pesticide; broadcast without incorporation; kg AI", "Unspecified pesticide; unspec. appl. method; kg AI", "Unspecified pesticide; broadcast with incorporation; kg AI", "Unspecified pesticide; foliar or directed spray; kg AI".
Exchange "Ash-soil agricultural" is the result of combining the following original LCA Commons flows: "Ash; from residue burning; kg C, biogenic", "Ash; from residue burning; kg except C, biogenic".
Exchange "Water-soil agricultural" is the result of combining the following original LCA Commons flows: "Water; in above-ground residue left on field; biogenic", "Water; in below-ground residue; biogenic", "Water; from irrigation and applied with manure and sewage sludge".
Exchange "2,4-D, dimethylamine salt-soil agricultural" is the result of combining the following original LCA Commons flows: "2,4-D, dimethylamine salt; broadcast without incorporation; kg AI", "2,4-D, dimethylamine salt; unspec. appl. method; kg AI", "2,4-D, dimethylamine salt; foliar or directed spray; kg AI", "2,4-D, dimethylamine salt; broadcast with incorporation; kg AI".
Exchange "Water, unspecified origin-resource in water" is the result of combining the following original LCA Commons flows: "Water; from plant uptake; biogenic", "Water; withdrawal from unspec. source, for winter wheat, in 2009".
Exchange "Metsulfuron-methyl-soil agricultural" is the result of combining the following original LCA Commons flows: "Metsulfuron-methyl; foliar or directed spray; kg AI", "Metsulfuron-methyl; unspec. appl. method; kg AI", "Metsulfuron-methyl; broadcast with incorporation; kg AI", "Metsulfuron-methyl; broadcast without incorporation; kg AI".
Exchange "Particulates, < 10 um-air low population density" is the result of combining the following original LCA Commons flows: "PM10; from residue burning; kg C, biogenic", "PM10; from residue burning; kg except C, biogenic".
Exchange "Tribenuron-methyl-soil agricultural" is the result of combining the following original LCA Commons flows: "Tribenuron-methyl; broadcast without incorporation; kg AI", "Tribenuron-methyl; foliar or directed spray; kg AI", "Tribenuron-methyl; broadcast with incorporation; kg AI", "Tribenuron-methyl; unspec. appl. method; kg AI".
Exchange "Transformation, from arable-resource land" is the result of combining the following original LCA Commons flows: "Transformation; from arable, from other to wheat", "Transformation; from arable, from unspec. use to wheat", "Transformation; from arable, from fallow to wheat", "Transformation; from arable, from small grains to wheat".
Exchange "Calcium-soil agricultural" is the result of combining the following original LCA Commons flows: "Calcium; applied in dolomite", "Calcium; applied in limestone".
Exchange "Imazamox-soil agricultural" is the result of combining the following original LCA Commons flows: "Imazamox; broadcast without incorporation; kg AI", "Imazamox; broadcast with incorporation; kg AI", "Imazamox; unspec. appl. method; kg AI", "Imazamox; foliar or directed spray; kg AI".
Exchange "Propiconazole-soil agricultural" is the result of combining the following original LCA Commons flows: "Propiconazole; broadcast with incorporation; kg AI", "Propiconazole; broadcast without incorporation; kg AI", "Propiconazole; foliar or directed spray; kg AI", "Propiconazole; unspec. appl. method; kg AI".
Exchange "Sulfuric acid-be1c0329-f1a8-4524-8420-a86d2a8dd358 agricultural" was originally named: "Sulfuric acid; as secondary application" in this dataset.
Exchange "Butadiene-2bdf9967-6dae-4183-88d1-8f612548c51e low population density" was originally named: "1,3 butadiene; from residue burning; kg C, biogenic" in this dataset.
Exchange "Isoprene-2bdf9967-6dae-4183-88d1-8f612548c51e low population density" was originally named: "Isoprene; from residue burning; kg C, biogenic" in this dataset.
Exchange "Phosphorus-c19fb2d9-98eb-4cd3-8761-81b71d8a9a1b unspecified" was originally named: "Phosphorous; from plant uptake; biogenic" in this dataset.
Exchange "Starane-2bdf9967-6dae-4183-88d1-8f612548c51e low population density" was originally named: "Fluroxypyr-meptyl; broadcast by air; kg AI" in this dataset.
Exchange "Glyphosate-isopropylammonium-2bdf9967-6dae-4183-88d1-8f612548c51e low population density" was originally named: "Glyphosate-isopropylammonium; broadcast by air; kg AI" in this dataset.
Exchange "cis-2-Butene-2bdf9967-6dae-4183-88d1-8f612548c51e low population density" was originally named: "Cis 2 butene; from residue burning; kg C, biogenic" in this dataset.
Exchange "Sulfur dioxide-2bdf9967-6dae-4183-88d1-8f612548c51e low population density" was originally named: "Sulfur dioxide; from residue burning; biogenic" in this dataset.
Exchange "Ethene-2bdf9967-6dae-4183-88d1-8f612548c51e low population density" was originally named: "Ethylene; from residue burning; kg C, biogenic" in this dataset.
Exchange "isobutene-2bdf9967-6dae-4183-88d1-8f612548c51e low population density" was originally named: "I butene; from residue burning; kg C, biogenic" in this dataset.
Exchange "Acetonitrile-2bdf9967-6dae-4183-88d1-8f612548c51e low population density" was originally named: "Acetonitrile; from residue burning; kg C, biogenic" in this dataset.
Exchange "Dinitrogen monoxide-2bdf9967-6dae-4183-88d1-8f612548c51e low population density" was originally named: "Dinitrogen monoxide; from residue burning; kg N, biogenic" in this dataset.
Exchange "Furan-2bdf9967-6dae-4183-88d1-8f612548c51e low population density" was originally named: "Furan; from residue burning; kg C, biogenic" in this dataset.
Exchange "Propane-2bdf9967-6dae-4183-88d1-8f612548c51e low population density" was originally named: "Propane; from residue burning; kg C, biogenic" in this dataset.
Exchange "Magnesium-be1c0329-f1a8-4524-8420-a86d2a8dd358 agricultural" was originally named: "Magnesium; applied in dolomite" in this dataset.
Exchange "isopentane-2bdf9967-6dae-4183-88d1-8f612548c51e low population density" was originally named: "I pentane; from residue burning; kg C, biogenic" in this dataset.
Exchange "Tribenuron-methyl-2bdf9967-6dae-4183-88d1-8f612548c51e low population density" was originally named: "Tribenuron-methyl; broadcast by air; kg AI" in this dataset.
Exchange "Acetic acid-2bdf9967-6dae-4183-88d1-8f612548c51e low population density" was originally named: "Acetic acid; from residue burning; kg C, biogenic" in this dataset.
Exchange "Methanol-2bdf9967-6dae-4183-88d1-8f612548c51e low population density" was originally named: "Methanol; from residue burning; kg C, biogenic" in this dataset.
Exchange "Sulfur-be1c0329-f1a8-4524-8420-a86d2a8dd358 agricultural" was originally named: "Sulfur; as secondary application" in this dataset.
Exchange "Toluene-2bdf9967-6dae-4183-88d1-8f612548c51e low population density" was originally named: "Toluene; from residue burning; kg C, biogenic" in this dataset.
Exchange "Occupation, arable-c19fb2d9-98eb-4cd3-8761-81b71d8a9a1b land" was originally named: "Occupation; arable, as wheat" in this dataset.
Exchange "Prosulfuron-2bdf9967-6dae-4183-88d1-8f612548c51e low population density" was originally named: "Prosulfuron; broadcast by air; kg AI" in this dataset.
Exchange "Carbon dioxide-c19fb2d9-98eb-4cd3-8761-81b71d8a9a1b unspecified" was originally named: "Carbon dioxide; from plant uptake; kg C, biogenic" in this dataset.
Exchange "Acetaldehyde-2bdf9967-6dae-4183-88d1-8f612548c51e low population density" was originally named: "Acetaldehyde; from residue burning; kg C, biogenic" in this dataset.
Exchange "Ethyne-2bdf9967-6dae-4183-88d1-8f612548c51e low population density" was originally named: "Acetylene; from residue burning; kg C, biogenic" in this dataset.
Exchange "Propiconazole-2bdf9967-6dae-4183-88d1-8f612548c51e low population density" was originally named: "Propiconazole; broadcast by air; kg AI" in this dataset.
Exchange "Imazamox-2bdf9967-6dae-4183-88d1-8f612548c51e low population density" was originally named: "Imazamox; broadcast by air; kg AI" in this dataset.
Exchange "1-Butene-2bdf9967-6dae-4183-88d1-8f612548c51e low population density" was originally named: "1 butene; from residue burning; kg C, biogenic" in this dataset.
Exchange "Methane-2bdf9967-6dae-4183-88d1-8f612548c51e low population density" was originally named: "Methane; from residue burning; kg C, biogenic" in this dataset.
Exchange "Hydrocyanic acid-2bdf9967-6dae-4183-88d1-8f612548c51e low population density" was originally named: "Hydrogen cyanide; from residue burning; kg C, biogenic" in this dataset.
Exchange "Carbon monoxide, fossil-2bdf9967-6dae-4183-88d1-8f612548c51e low population density" was originally named: "Carbon monoxide; from residue burning; kg C, biogenic" in this dataset.
Exchange "Propene-2bdf9967-6dae-4183-88d1-8f612548c51e low population density" was originally named: "Propylene; from residue burning; kg C, biogenic" in this dataset.
Exchange "Metsulfuron-methyl-2bdf9967-6dae-4183-88d1-8f612548c51e low population density" was originally named: "Metsulfuron-methyl; broadcast by air; kg AI" in this dataset.
Exchange "Water-2bdf9967-6dae-4183-88d1-8f612548c51e low population density" was originally named: "Water; from residue burning; biogenic" in this dataset.
Exchange "Acetone-2bdf9967-6dae-4183-88d1-8f612548c51e low population density" was originally named: "Acetone; from residue burning; kg C, biogenic" in this dataset.
Exchange "Carbon dioxide, in air-2bdf9967-6dae-4183-88d1-8f612548c51e low population density" was originally named: "Carbon dioxide; from residue burning; kg C, biogenic" in this dataset.
Exchange "Benzene-2bdf9967-6dae-4183-88d1-8f612548c51e low population density" was originally named: "Benzene; from residue burning; kg C, biogenic" in this dataset.
Exchange "Acrylonitrile-2bdf9967-6dae-4183-88d1-8f612548c51e low population density" was originally named: "Propenenitrile; from residue burning; kg C, biogenic" in this dataset.
Exchange "Ethane-2bdf9967-6dae-4183-88d1-8f612548c51e low population density" was originally named: "Ethane; from residue burning; kg C, biogenic" in this dataset.
Exchange "Butane-2bdf9967-6dae-4183-88d1-8f612548c51e low population density" was originally named: "N butane; from residue burning; kg C, biogenic" in this dataset.
Exchange "Formic acid-2bdf9967-6dae-4183-88d1-8f612548c51e low population density" was originally named: "Formic acid; from residue burning; kg C, biogenic" in this dataset.
Exchange "trans-2-Butene-2bdf9967-6dae-4183-88d1-8f612548c51e low population density" was originally named: "Trans 2 butene; from residue burning; kg C, biogenic" in this dataset.
Exchange "Phenol-2bdf9967-6dae-4183-88d1-8f612548c51e low population density" was originally named: "Phenol; from residue burning; kg C, biogenic" in this dataset.
Exchange "Nitrogen dioxide-2bdf9967-6dae-4183-88d1-8f612548c51e low population density" was originally named: "Nitrogen dioxide; from residue burning; kg N, biogenic" in this dataset.
Exchange "Water, surface-c19fb2d9-98eb-4cd3-8761-81b71d8a9a1b in water" was originally named: "Water; withdrawal from surface water, for winter wheat, in 2009" in this dataset.
Exchange "Zinc compounds-be1c0329-f1a8-4524-8420-a86d2a8dd358 agricultural" was originally named: "Zinc compounds; as secondary application" in this dataset.
Exchange "Pentane-2bdf9967-6dae-4183-88d1-8f612548c51e low population density" was originally named: "N pentane; from residue burning; kg C, biogenic" in this dataset.
Exchange "Formaldehyde-2bdf9967-6dae-4183-88d1-8f612548c51e low population density" was originally named: "Formaldehyde; from residue burning; kg C, biogenic" in this dataset.
Exchange "Transformation, to arable-c19fb2d9-98eb-4cd3-8761-81b71d8a9a1b land" was originally named: "Transformation; to arable, to wheat" in this dataset.
Exchange "Ammonia-2bdf9967-6dae-4183-88d1-8f612548c51e low population density" was originally named: "Ammonia; from residue burning; kg N, biogenic" in this dataset.

## Geography
The unit process is assumed to represent production in Washington (US State).

## Technology
This process produces winter wheat; at harvest in 2009; at farm; 86%-90% moisture. The process is assumed to represent production in Washington (US State). Yields and related inputs and outputs represent a single year of operation, in 2009. This dataset includes consideration of residue burning; soil preparation; planting or sowing; irrigation; application, storage, and transport of fertilizers, manures, liming materials, secondary materials, and pesticides; and harvest. Fate and transport of applications are not included as described in Cooper, J.S., Kahn, E., Noon, M. (2012) LCA Digital Commons Unit Process Data: field crop production Version 1 which is available at https://www.lcacommons.gov/discovery/docs/LCA%20Digital%20Commons%20Unit%20Process%20Data%20final%20updated.pdf

## Time period
Start and end dates match the underlying data obtained from the USDA Agricultural Resource Management Survey (ARMS).
## Parameters
- p3141: 0; = p2360*p1023
- p1125: 0; = if(p1121=0;p0719/100;0)
- p3251: 0; = p1252-(p3252+p3253+p3254+p3255+p3256)
- p1300: 0; = IF(p1297=p1265;0;IF(p1297+p1298>p1265;p1265-p1297;p1298))
- p0371: 0.5
- p1207: 150.508; = if(p1193>0;0;(p1194*p1050/p1057+p1195*p1051/p1058+p1196*p1052/p1059+p1197*p1053/p1060+p1198*p1054/p1061+p1199*p1055/p1062+p1200*p1056/p1063)/(p0702*1000)+(p1201*p1109/p1114+p1202*p1110/p1115)/(p0702*1000)+p1203*p1170/p0801+p1204*p1176/p0801)
- p0783: 32.117; = p0123*(1+p0651*p0255/100)
- p0655: 0; = IF(p0391<0.5;-SQRT(p0007*EXP(p0523^2*p0008)-p0007);SQRT(p0007*EXP(p0523^2*p0008)-p0007))
- p2703: 0; = p2312*(p1128+p1130)
- p1942: 0
- p2314: 0; = p2231*p2221
- p1904: 0
- p0774: 21.034; = p0114*(1+p0642*p0246/100)
- p3304: 0; = if(and(p1232=0;p3252<>0);p3260*p3289;0)
- p1859: 0
- p2946: 2.0772e-5; = p2360*(p1020+p1022)
- p2161: 5.44493e-7; = p2015*p2085*p2123/(p0818*1000)
- p3076: 0; = p2295*p1023
- p3477: 0.22733; = if(p1328+p1330+p1332+p1334+p1336+p1338+p1340+p1342+p1344=0;0;p1330/(p1328+p1330+p1332+p1334+p1336+p1338+p1340+p1342+p1344))
- p3263: 0
- p2300: 0; = p2227*p2207
- p2514: 7.20809e-5; = p2318*p1014
- p0343: 0.5
- p5240: 6.73488e-9; = p1861*p3484
- p0956: 0; = if(and(p0683>0;or(p0807=56;p0807=100;and(p0807=60;p0901>0.06)));p0938;0)
- p0374: 0.5
- p2922: 0; = p2336*(p1079+p1081)
- p0382: 0.5
- p0790: 0
- p2559: 1.73305e-5; = p2363*p1014
- p4814: 0; = p1847*p3482
- p0999: 1; = IF(p0996=1;0;IF(p0996+p0997>1;1-p0996;p0997))
- p1203: 3
- p2500: 0; = p2304*p1073
- p2248: 0.00345335; = p2222*p2193
- p2442: 5.60315e-5; = p2246*p1014
- p2557: 6.02079e-5; = p2361*p1014
- p0825: 5.13738e9; = p0818*p0822
- p0782: 7.419; = p0122*(1+p0650*p0254/100)
- p1120: 0.00146969; = IF(p1071=0;p1110/(p1115*p0818);0)
- p1243: 0; = if(p1232>0;0;p1238*(p0725/100)*p0723*1000)
- p3257: 0
- p2225: 0.141239; = if(p0765*p0769+p0766*p0770+p0767*p0771+p0768*p0772=0;0;p0772*p0768/(p0765*p0769+p0766*p0770+p0767*p0771+p0768*p0772))
- p3259: 0
- p1172: 1.41609e-7; = p1170/p0818
- p0699: 0
- p0895: 1.54348e9; = p0894*p0830
- p1074: 0; = IF(p1071=0;p0712/100;0)
- p3191: 0; = p2410*p1023
- p2855: 0; = p2269*(p1079+p1081)
- p1805: 0
- p1730: 0
- p0953: 0; = if(and(p0683>0;or(p0807=56;p0807=100;and(p0807=60;p0901>0.06)));p0935;0)
- p2489: 0.00110504; = p2293*p1014
- p1633: 0
- p0236: 0
- p1831: 0
- p1559: 0
- p1772: 0
- p2725: 6.7768e-6; = p2334*(p1019+p1021)
- p0632: 0; = IF(p0368<0.5;-SQRT(p0007*EXP(p0500^2*p0008)-p0007);SQRT(p0007*EXP(p0500^2*p0008)-p0007))
- p3250: 0
- p1309: 0
- p0741: 0.925; = p0081*(1+p0609*p0213/100)
- p2874: 5.96273e-5; = p2288*(p1020+p1022)
- p3039: 2.87113e-5; = p2258*p1082
- p1567: 0
- p2055: 5.59471
- p2797: 0; = p2406*(p1019+p1021)
- p1947: 0
- p1871: 0
- p1850: 0
- p1201: 0.65
- p0696: 95.852; = p0036*(1+p0564*p0168/100)
- p2313: 0; = p2231*p2220
- p3436: 0; = p3379*p1239
- p2438: 2.80394e-5; = p2242*p1014
- p2465: 8.99894e-6; = p2269*p1073
- p2661: 0; = p2270*(p1078+p1080)
- p2128: 5.11574e-5; = p2015*p2056*p2090/(p0818*1000)
- p2138: 4.75041e-6; = p2015*p2066*p2100/(p0818*1000)
- p2349: 0.000110256; = p2228*p2217
- p3075: 0; = p2294*p1023
- p3336: 0; = IF(or(p3254=0;p1232>0);0;p3271*p3289)
- p0136: 100
- p4954: 0; = p1781*p3483
- p5135: 2.00699e-7; = p1756*p3484
- p4310: 0; = p1755*p3480
- p2286: 0.000384847; = p2223*p2192
- p1917: 0
- p2136: 3.56481e-5; = p2015*p2064*p2098/(p0818*1000)
- p1322: 0.0809396; = IF(((p0745*1000*p0749/100)+(p0754*1000*p0758/100))/p0801<0;0;((p0745*1000*p0749/100)+(p0754*1000*p0758/100))/p0801)
- p3065: 0; = p2284*p1023
- p4265: 4.25279e-9; = p1916*p3479
- p2910: 2.89904e-6; = p2324*(p1020+p1022)
- p2633: 6.0937e-6; = p2242*(p1019+p1021)
- p1774: 0
- p2867: 3.17223e-6; = p2281*(p1020+p1022)
- p2764: 7.58491e-6; = p2373*(p1019+p1021)
- p1038: 0.010401
- p2468: 0.000299999; = p2272*p1123
- p2630: 1.64573e-5; = p2239*(p1019+p1021)
- p0046: 15.473
- p3000: 0; = p2414*(p1079+p1081)
- p0962: 0; = if(and(p0683>0;or(p0807=480;p0807=32;p0807=1;and(p0807=60;p0901<0.03)));p0938;0)
- p2943: 1.51048e-5; = p2357*(p1020+p1022)
- p0219: 31.017
- p2584: 2.20173e-5; = p2388*p1073
- p1044: 0.010401; = IF(p1012=0;IF(p1037=1;0;IF(p1037+p1038>1;1-p1037;p1038));0)
- p2135: 4.95788e-5; = p2015*p2063*p2097/(p0818*1000)
- p3144: 0; = p2363*p1023
- p2712: 2.15425e-5; = p2321*(p1019+p1021)
- p3118: 4.20722e-5; = p2337*p1082
- p1952: 0
- p1588: 0
- p4910: 0; = p1943*p3482
- p0049: 7.629
- p0551: 0; = IF(p0287<0.5;-SQRT(p0007*EXP(p0419^2*p0008)-p0007);SQRT(p0007*EXP(p0419^2*p0008)-p0007))
- p1276: 0; = p1272*p1252/p0818
- p0780: 60.137; = p0120*(1+p0648*p0252/100)
- p2024: 0.748682
- p2033: 0.000115388; = p2015*p2029*p2031/(p0818*1000)
- p2430: 0; = p2236*p2220
- p2969: 0; = p2383*(p1079+p1081)
- p2010: 0.0014919; = ((p1984*p1985+p1990*p1991+p1996*p1997+p2004*p2005)/p0818)*p0005*p0002/1000
- p2257: 0.00181694; = p2222*p2203
- p1595: 0
- p0761: 0
- p0050: 27.366
- p0543: 0; = IF(p0279<0.5;-SQRT(p0007*EXP(p0411^2*p0008)-p0007);SQRT(p0007*EXP(p0411^2*p0008)-p0007))
- p1166: 1.28279e-6; = p1164/p0818
- p1703: 0
- p2320: 1.08833e-5; = p2224*p2187
- p2814: 0; = p2423*(p1078+p1080)
- p2757: 3.54276e-5; = p2366*(p1019+p1021)
- p1819: 0
- p0932: 0; = p0801*p0926
- p0027: 21.973
- p1118: 0.000234069; = IF(p1071=0;p1108/(p1113*p0818);0)
- p1654: 0
- p3239: 0.013074; = IF(p3238+p3235+p3236=1;0;1-(p3238+p3235+p3236))
- p1082: 0.31768; = IF(p1071=0;IF(p1073+p1078+p1079+p1080+p1081=1;0;1-(p1073+p1078+p1079+p1080+p1081));0)
- p1844: 0
- p1009: 0; = p1005*p0001*p0004/(p0818*p0002)
- p1968: 0; = if(p0807=480;p0802*p0811;0)
- p1936: 0
- p1591: 0
- p3016: 0; = p2430*(p1129+p1131)
- p2331: 3.21894e-6; = p2224*p2199
- p1250: 0; = if(p1232>0;0;p1245*p0001/(p0818*p0002))
- p4513: 0; = p1962*p3480
- p3463: 0; = p3368*p1241
- p0299: 0.5
- p0742: 97.295; = p0082*(1+p0610*p0214/100)
- p1374: 132
- p3199: 0; = p2418*p1082
- p5161: 1.77801e-7; = p1782*p3484
- p2305: 0; = p2227*p2212
- p0738: 1698.52; = p0078*(1+p0606*p0210/100)
- p1605: 0
- p1506: 6
- p3412: 0; = p3374*p1238
- p1198: 0.44
- p1004: 0; = p1000*p0888
- p2663: 0; = p2272*(p1128+p1130)
- p4058: 2.75444e-7; = p1915*p3478
- p0897: 0
- p1798: 0
- p3031: 0; = p2250*p1023
- p2744: 0; = p2353*(p1128+p1130)
- p2673: 4.71053e-5; = p2282*(p1019+p1021)
- p1645: 0
- p2647: 2.45228e-5; = p2256*(p1019+p1021)
- p2678: 0.000322881; = p2287*(p1019+p1021)
- p2345: 2.26094e-6; = p2228*p2213
- p2214: 1.08146e-5; = p1107/p0818
- p0534: 0; = SQRT(2)*(IF((2*p0402-1)<0;-1;IF((2*p0402-1)>0;1;0))*SQRT(SQRT((2/(pi()*0.140012289)+LN(1-(2*p0402-1)^2)/2)^2-LN(1-(2*p0402-1)^2)/0.140012289)-(2/(pi()*0.140012289)+LN(1-(2*p0402-1)^2)/2)))
- p1983: 50
- p2460: 1.50499e-5; = p2264*p1073
- p1653: 0.704773
- p2494: 0; = p2298*p1073
- p0290: 0.5
- p1923: 0
- p1583: 0
- p0911: 0.00475556
- p1063: 0.455
- p0104: 100
- p2127: 0.000137679; = p2015*p2055*p2089/(p0818*1000)
- p2398: 0; = p2234*p2187
- p0237: 8.305
- p5338: 1.50376e-6; = p1963*p3484
- p0916: 0.340805; = p0826+(p0832*(1+p0894))/p0818
- p1869: 0
- p2541: 1.54268e-6; = p2345*p1073
- p4516: 2.61067e-5; = p1755*p3481
- p2217: 0.000210574; = p1118-p2216
- p0564: 0; = IF(p0300<0.5;-SQRT(p0007*EXP(p0432^2*p0008)-p0007);SQRT(p0007*EXP(p0432^2*p0008)-p0007))
- p3432: 0; = p3375*p1239
- p4748: 0; = p1781*p3482
- p2049: 25.6942
- p1561: 0
- p0885: 7.715; = IF(p0689+p0884=100;0;100-(p0689+p0884))
- p1141: 0; = if(p1121=0;p1135*p0001/(p0818*p0002);0)
- p1996: 30
- p0082: 97.295
- p4505: 0; = p1950*p3480
- p1343: 0; = p1342*p0001/(p0818*p0002)
- p0941: 0; = if(and(p0683=0;p0947=0);p0935;0)
- p0536: 0; = SQRT(2)*(IF((2*p0404-1)<0;-1;IF((2*p0404-1)>0;1;0))*SQRT(SQRT((2/(pi()*0.140012289)+LN(1-(2*p0404-1)^2)/2)^2-LN(1-(2*p0404-1)^2)/0.140012289)-(2/(pi()*0.140012289)+LN(1-(2*p0404-1)^2)/2)))
- p2237: 0.00354755; = p2222*p2182
- p0487: 0; = SQRT(2)*(IF((2*p0355-1)<0;-1;IF((2*p0355-1)>0;1;0))*SQRT(SQRT((2/(pi()*0.140012289)+LN(1-(2*p0355-1)^2)/2)^2-LN(1-(2*p0355-1)^2)/0.140012289)-(2/(pi()*0.140012289)+LN(1-(2*p0355-1)^2)/2)))
- p3029: 0; = p2248*p1023
- p0797: 19.005; = p0137*(1+p0665*p0269/100)
- p2162: 1.00301e-6; = p2015*p2086*p2124/(p0818*1000)
- p3023: 0; = p2242*p1023
- p3288: 0
- p1576: 0
- p0744: 0
- p2670: 3.42536e-5; = p2279*(p1019+p1021)
- p1934: 0
- p2378: 0.000104213; = p2229*p2207
- p0137: 19.005
- p0923: 0.810021; = IF(p0918=1;0;IF(p0918+p0919>1;1-p0918;p0919))
- p4430: 0; = p1875*p3480
- p0546: 0; = IF(p0282<0.5;-SQRT(p0007*EXP(p0414^2*p0008)-p0007);SQRT(p0007*EXP(p0414^2*p0008)-p0007))
- p2267: 1.39547e-6; = p2226*p2213
- p4723: 0; = p1756*p3482
- p1776: 0
- p2898: 0; = p2312*(p1129+p1131)
- p2163: 0.0224526; = (p2017-p2020)/p0818-(p2025+p2028+p2033+p2034+p2051+p2125+p2126+p2127+p2128+p2129+p2130+p2131+p2132+p2133+p2134+p2135+p2136+p2137+p2138+p2139+p2140+p2141+p2142+p2143+p2144+p2145+p2146+p2147+p2148+p2149+p2150+p2151+p2152+p2153+p2154+p2155+p2156+p2157)
- p1054: 4.3905e7; = IF(p1012=0;p1047*p1036;0)
- p2767: 0; = p2376*(p1078+p1080)
- p2546: 0; = p2350*p1123
- p2411: 0; = p2234*p2201
- p3352: 0; = if(and(p1232=0;p3256<>0);p3256*(p3275-p3347)/p3349;0)
- p2784: 0; = p2393*(p1019+p1021)
- p1807: 0
- p0008: 0.0350765; = (p0007-1.5)/(p0007-1)^2
- p2339: 0.00035608; = p2228*p2207
- p2367: 0.00226332; = p2225*p2196
- p2737: 0; = p2346*(p1078+p1080)
- p3409: 0; = p3371*p1238
- p0446: 0; = SQRT(2)*(IF((2*p0314-1)<0;-1;IF((2*p0314-1)>0;1;0))*SQRT(SQRT((2/(pi()*0.140012289)+LN(1-(2*p0314-1)^2)/2)^2-LN(1-(2*p0314-1)^2)/0.140012289)-(2/(pi()*0.140012289)+LN(1-(2*p0314-1)^2)/2)))
- p0081: 0.925
- p2170: 0.00636063; = p2166*(p0913)
- p2261: 0.000219775; = p2226*p2207
- p3408: 0; = p3370*p1238
- p2446: 0.00520987; = p2250*p1014
- p3473: 0; = p3378*p1241
- p3423: 0; = p3366*p1239
- p1759: 0
- p3156: 1.36144e-5; = p2375*p1082
- p0828: 0; = if(p0827=0;0;p0819-p0827/p0818)
- p2432: 0.0106663; = p1158
- p0872: 0; = p0864*p0856
- p0954: 0; = if(and(p0683>0;or(p0807=56;p0807=100;and(p0807=60;p0901>0.06)));p0936;0)
- p0120: 60.137
- p1642: 0
- p2205: 0.000252935; = 2*14.0067*p2204/30.973762
- p1959: 1719.99; = if(p0738*p0740*p0739>0;p0738*1000*(p0740/100)*p0739/1000;p1958)
- p3117: 4.65182e-5; = p2336*p1082
- p1043: 0.251177
- p2975: 0; = p2389*(p1129+p1131)
- p2385: 1.65723e-6; = p2229*p2214
- p2243: 0.000503811; = p2222*p2188
- p2738: 0; = p2347*(p1078+p1080)
- p0438: 0; = SQRT(2)*(IF((2*p0306-1)<0;-1;IF((2*p0306-1)>0;1;0))*SQRT(SQRT((2/(pi()*0.140012289)+LN(1-(2*p0306-1)^2)/2)^2-LN(1-(2*p0306-1)^2)/0.140012289)-(2/(pi()*0.140012289)+LN(1-(2*p0306-1)^2)/2)))
- p3280: 0
- p1552: 0.80831
- p0174: 0.024
- p0927: 0.0182512; = IF(p0918+p0923+p0924+p0925+p0926=1;0;1-(p0918+p0923+p0924+p0925+p0926))
- p1326: 0; = IF(((p0745*1000*p0753/100)+(p0754*1000*p0762/100))/p0801<0;0;((p0745*1000*p0753/100)+(p0754*1000*p0762/100))/p0801)
- p2859: 0; = p2273*(p1129+p1131)
- p0481: 0; = SQRT(2)*(IF((2*p0349-1)<0;-1;IF((2*p0349-1)>0;1;0))*SQRT(SQRT((2/(pi()*0.140012289)+LN(1-(2*p0349-1)^2)/2)^2-LN(1-(2*p0349-1)^2)/0.140012289)-(2/(pi()*0.140012289)+LN(1-(2*p0349-1)^2)/2)))
- p1323: 0; = IF(((p0745*1000*p0750/100)+(p0754*1000*p0759/100))/p0801<0;0;((p0745*1000*p0750/100)+(p0754*1000*p0759/100))/p0801)
- p1108: 136403; = IF(p1071=0;p1105*p1102*p1095;0)
- p2819: 0; = p2428*(p1128+p1130)
- p0838: 3.8084e9; = (p0833-p0836)*p0837
- p0014: 214.741
- p2723: 0.000109829; = p2332*(p1019+p1021)
- p1672: 0
- p1259: 0; = if(p1232>0;0;p0730/100)
- p4086: 1.8363e-7; = p1943*p3478
- p3116: 0; = p2335*p1023
- p3421: 0; = p3364*p1239
- p0212: 1.024
- p1169: 0.000483602
- p5034: 0; = p1861*p3483
- p2616: 0; = p2420*p1073
- p3303: 0; = if(and(p1232=0;p3252<>0);p3259*p3289;0)
- p3266: 0
- p3109: 0; = p2328*p1023
- p0250: 41.372
- p1963: 0.000192297; = p1963a+p1963b+p1963c+p1963d+p1963e+p1963f+p1963g+p1963h+p1963i+p1963j+p1963k
- p1205: 0
- p3267: 0
- p2506: 0; = p2310*p1073
- p1191: 0.5
- p3398: 0; = p3379*p1234
- p0779: 0
- p3378: 0; = if(p1232=0;p3246*p3360/p0818;0)
- p3990: 5.04981e-7; = p1847*p3478
- p1906: 0
- p0713: 0
- p0277: 0.5
- p1186: 1.43063e-8; = p1182*p1185/p0818
- p2037: 1.99
- p0384: 0.5
- p1913: 0
- p3080: 0; = p2299*p1082
- p2157: 2.58024e-6; = p2015*p2086*p2119/(p0818*1000)
- p2329: 8.92004e-7; = p2224*p2197
- p0695: 22.384; = p0035*(1+p0563*p0167/100)
- p2057: 3.28794
- p2536: 0.000124885; = p2340*p1073
- p2429: 0; = p2236*p2219
- p1325: 0; = IF(((p0745*1000*p0752/100)+(p0754*1000*p0761/100))/p0801<0;0;((p0745*1000*p0752/100)+(p0754*1000*p0761/100))/p0801)
- p2130: 4.17357e-5; = p2015*p2058*p2092/(p0818*1000)
- p0947: 0; = if(and(p0683=0;or(p0807=480;p0807=32;p0807=1;and(p0807=60;p0901<0.03)));p0935;0)
- p3395: 0; = p3376*p1234
- p2875: 0.000589417; = p2289*(p1020+p1022)
- p2604: 0; = p2408*p1014
- p0689: 0
- p2518: 5.37932e-5; = p2322*p1014
- p2583: 2.45661e-6; = p2387*p1073
- p0644: 0; = IF(p0380<0.5;-SQRT(p0007*EXP(p0512^2*p0008)-p0007);SQRT(p0007*EXP(p0512^2*p0008)-p0007))
- p1190: 1.63884e-7; = p1188/p0818
- p4848: 0; = p1881*p3482
- p2656: 0; = p2265*(p1078+p1080)
- p3360: 0; = if(p1232=0;p3310+p3321+p3332+p3343+p3354;0)
- p3798: 1.95785e-7; = p1861*p3477
- p0711: 68.232; = p0051*(1+p0579*p0183/100)
- p3154: 0; = p2373*p1023
- p3460: 0; = p3365*p1241
- p1184: 2.86125e-8; = p1182/p0818
- p0306: 0.5
- p4471: 0; = p1916*p3480
- p0246: 27.387
- p1728: 0
- p1018: 0.07629; = IF(p1012=0;p0709/100;0)
- p2311: 0; = p2231*p2218
- p2576: 1.65282e-5; = p2380*p1073
- p2007: 0.019892; = ((p1981*p1985+p1987*p1991+p1993*p1997+p2001*p2005)/p0818)*p0005*p0002/1000
- p3181: 0; = p2400*p1023
- p1553: 0
- p2347: 2.13684e-5; = p2228*p2215
- p3430: 0; = p3373*p1239
- p3166: 5.26468e-7; = p2385*p1082
- p3443: 0; = p3367*p1240
- p2626: 0; = p2430*p1123
- p1771: 0
- p1963i: 1.48106e-6; = p1706*p1910+p1707*p1911+p1708*p1912+p1709*p1913+p1710*p1914+p1711*p1915+p1712*p1916+p1713*p1917+p1714*p1918+p1715*p1919+p1716*p1920+p1717*p1921+p1718*p1922+p1719*p1923+p1720*p1924+p1721*p1925+p1722*p1926+p1723*p1927+p1724*p1928
- p2022: 0.010574; = p2018*p2015/p0818-p2021
- p2352: 0; = p2232*p2220
- p4470: 0; = p1915*p3480
- p1439: 11
- p1566: 0
- p5293: 8.08185e-9; = p1914*p3484
- p2888: 0; = p2302*(p1079+p1081)
- p5270: 1.34698e-9; = p1891*p3484
- p1637: 0
- p3300: 0; = if(p1293+p1294+p1295+p1296=0;0;p1293/(p1293+p1294+p1295+p1296))
- p2687: 0.00016988; = p2296*(p1019+p1021)
- p1170: 822.124; = p1169*p0801
- p1011: 4.01794e-7; = p1010*p0001*p0004/(p0818*p0002)
- p3022: 0; = p2241*p1023
- p1034: 1.991e-5; = IF(p1012=0;p1028*p0001/(p0818*p0002);0)
- p2936: 0; = p2350*(p1129+p1131)
- p2623: 0; = p2427*p1073
- p1937: 0
- p2858: 0; = p2272*(p1129+p1131)
- p2710: 1.17006e-5; = p2319*(p1019+p1021)
- p3261: 0
- p1052: 3.47898e6; = IF(p1012=0;p1045*p1036;0)
- p2467: 4.64322e-5; = p2271*p1073
- p3140: 0; = p2359*p1023
- p3578: 0; = p1847*p3476
- p2287: 0.00208674; = p2223*p2193
- p2650: 0; = p2259*(p1078+p1080)
- p3215: 0.450791; = p1222*3*15.9994/100.0869
- p1084: 0; = IF(p1071=0;p1078*(p0710/100)*p0703*1000;0)
- p3293: 0
- p2708: 4.54793e-6; = p2317*(p1019+p1021)
- p0157: 28.109
- p2388: 3.22682e-5; = p2229*p2217
- p3010: 0; = p2424*(p1079+p1081)
- p0900: 0.968045; = p0899/p0818
- p2204: 0.000279665; = p1109/p0818
- p3193: 0; = p2412*p1023
- p3180: 0; = p2399*p1023
- p0717: 75.088; = p0057*(1+p0585*p0189/100)
- p0043: 1698.24
- p0015: 1171.9
- p3320: 0; = if(and(p1232=0;p3253<>0);p3253*(p3264-p3315)/p3316;0)
- p0975: 0.00984352; = p0973*p0974/p0818
- p2525: 6.3508e-7; = p2329*p1014
- p1812: 0
- p3365: 0; = if(p1232=0;p3244*p3359/p0818;0)
- p2498: 0; = p2302*p1073
- p4224: 8.33547e-7; = p1875*p3479
- p4883: 0; = p1916*p3482
- p0280: 0.5
- p2483: 0.00148569; = p2287*p1014
- p2864: 8.56727e-6; = p2278*(p1020+p1022)
- p2188: 0.0011033; = p1066-p2186-p2187
- p0607: 0; = IF(p0343<0.5;-SQRT(p0007*EXP(p0475^2*p0008)-p0007);SQRT(p0007*EXP(p0475^2*p0008)-p0007))
- p0706: 15.473; = p0046*(1+p0574*p0178/100)
- p1256: 0; = if(p1232>0;0;IF(p1253=1;0;IF(p1253+p1254>1;1-p1253;p1254)))
- p1975: 0.000261249; = p1970*p0001/(p0818*p0002)
- p1164: 7447.35; = p1163*p0801
- p2369: 1.63867e-6; = p2225*p2198
- p0984: 0; = if(p0886=0;0;min(1;(p0699*p0698*1000*p0701/100)/p0886))
- p1332: 1.48532e6; = p1321*p0801
- p1677: 0.853087
- p1878: 0
- p1896: 0
- p0139: 25.985
- p3442: 0; = p3366*p1240
- p2325: 0.000176001; = p2224*p2192
- p1083: 317101; = IF(p1071=0;p1073*(p0710/100)*p0703*1000;0)
- p1958: 1506
- p3234: 0.39606; = 1-p3233
- p1971: 0.000252028; = p1966*p0001/(p0818*p0002)
- p1820: 0
- p2104: 0.817136
- p2231: 0; = if(p0783*p0787+p0784*p0788+p0785*p0789+p0786*p0790=0;0;p0788*p0784/(p0783*p0787+p0784*p0788+p0785*p0789+p0786*p0790))
- p1221: 0.0263674; = p1216*(1+p1220*p1217/100)
- p1102: 0.0353868; = IF(p1071=0;IF(p1096+p1101=1;0;IF(p1096+p1101+p1098>1;1-(p1096+p1101);p1098));0)
- p2743: 0; = p2352*(p1128+p1130)
- p5048: 0; = p1875*p3483
- p4720: 9.10794e-5; = p1963*p3481
- p2614: 0; = p2418*p1073
- p3456: 0; = p3380*p1240
- p2857: 0; = p2271*(p1079+p1081)
- p1180: 3.397e-8; = p1176*p1179/p0818
- p3009: 0; = p2423*(p1079+p1081)
- p2279: 0.000221376; = p2223*p2185
- p1016: 0.05701; = IF(p1012=0;p0707/100;0)
- p0135: 76.557
- p1926: 0
- p1573: 0
- p0811: 0; = if(p0807=480;1-p0810;0)
- p1726: 0
- p2620: 0; = p2424*p1073
- p2141: 1.06989e-5; = p2015*p2069*p2103/(p0818*1000)
- p1597: 0
- p1940: 0
- p1802: 0
- p5260: 4.04093e-9; = p1881*p3484
- p0802: 1.64e6
- p0213: 16.744
- p1702: 0
- p1283: 0; = p1277*p1252/p0818
- p2502: 0; = p2306*p1073
- p2570: 0.000400112; = p2374*p1014
- p1025: 262769; = IF(p1012=0;p1019*(p0704/100)*p0703*1000;0)
- p3212: 0; = p2431*p1132
- p0245: 19.151
- p3324: 0; = if(and(p1232=0;p3255<>0);p3266*(p3279*(p3284*p1256+p3286*(p1253+p1257)+p1258*p3288+p3299*p3287));0)
- p3483: 0; = if(p1328+p1330+p1332+p1334+p1336+p1338+p1340+p1342+p1344=0;0;p1342/(p1328+p1330+p1332+p1334+p1336+p1338+p1340+p1342+p1344))
- p3161: 7.69535e-6; = p2380*p1082
- p0639: 0; = IF(p0375<0.5;-SQRT(p0007*EXP(p0507^2*p0008)-p0007);SQRT(p0007*EXP(p0507^2*p0008)-p0007))
- p1764: 0
- p1670: 0
- p1290: 0; = IF(p1287=p1264;0;IF(p1287+p1288>p1264;p1264-p1287;p1288))
- p1589: 0
- p2348: 1.23019e-5; = p2228*p2216
- p2137: 2.89621e-6; = p2015*p2065*p2099/(p0818*1000)
- p2959: 6.53441e-6; = p2373*(p1020+p1022)
- p3030: 0; = p2249*p1023
- p1648: 0
- p3230: 1.41609e-7; = p1170/p0818
- p1227: 0.000261249; = IF(p1221=0;0;p1226*p0001/(p0818*p0002))
- p3090: 0; = p2309*p1082
- p0577: 0; = IF(p0313<0.5;-SQRT(p0007*EXP(p0445^2*p0008)-p0007);SQRT(p0007*EXP(p0445^2*p0008)-p0007))
- p2247: 0.000636885; = p2222*p2192
- p3045: 7.00703e-6; = p2264*p1082
- p1557: 0
- p2208: 0.000349564; = p1110/p0818
- p1699: 0
- p1000: 0; = IF(p0996+p0999=1;0;IF(p0996+p0999+p0998>1;1-(p0996+p0999);p0998))
- p2919: 4.0565e-5; = p2333*(p1020+p1022)
- p0787: 44.912; = p0127*(1+p0655*p0259/100)
- p2999: 0; = p2413*(p1020+p1022)
- p3315: 0; = if(and(p1232=0;p3253<>0);p3264*p3289;0)
- p2301: 0; = p2227*p2208
- p3278: 0
- p2275: 0.000119225; = p2230*p2221
- p2484: 0.000318476; = p2288*p1014
- p2111: 0.856281
- p2982: 0; = p2396*(p1020+p1022)
- p0376: 0.5
- p1992: 3900
- p2822: 0; = p2431*(p1128+p1130)
- p2896: 0; = p2310*(p1079+p1081)
- p2973: 0; = p2387*(p1079+p1081)
- p0651: 0; = IF(p0387<0.5;-SQRT(p0007*EXP(p0519^2*p0008)-p0007);SQRT(p0007*EXP(p0519^2*p0008)-p0007))
- p1679: 0
- p1324: 1.5527; = IF(((p0745*1000*p0751/100)+(p0754*1000*p0760/100))/p0801<0;0;((p0745*1000*p0751/100)+(p0754*1000*p0760/100))/p0801)
- p0835: 590.373; = -LN(1-p0669/100)/p0834
- p1755: 5.51192e-5; = p1347*1000/p0818
- p2505: 0; = p2309*p1073
- p2479: 0.000117625; = p2283*p1014
- p0967: 0
- p3330: 0; = if(and(p1232=0;p3255<>0);p3255*(p3267-p3325)/p3327;0)
- p0535: 0; = SQRT(2)*(IF((2*p0403-1)<0;-1;IF((2*p0403-1)>0;1;0))*SQRT(SQRT((2/(pi()*0.140012289)+LN(1-(2*p0403-1)^2)/2)^2-LN(1-(2*p0403-1)^2)/0.140012289)-(2/(pi()*0.140012289)+LN(1-(2*p0403-1)^2)/2)))
- p2436: 0.000260835; = p2240*p1014
- p3133: 0; = p2352*p1132
- p2823: 0.000472889; = p2237*(p1020+p1022)
- p3317: 0; = if(and(p1232=0;p3253<>0);p3253*(p3261*p3277-p3312)/p3316;0)
- p2697: 0; = p2306*(p1078+p1080)
- p2401: 0; = p2234*p2190
- p1087: 0; = IF(p1071=0;p1081*(p0710/100)*p0703*1000;0)
- p0963: 4.7681e-6; = if(and(p0683>0;or(p0807=480;p0807=32;p0807=1;and(p0807=60;p0901<0.03)));p0939;0)
- p0504: 0; = SQRT(2)*(IF((2*p0372-1)<0;-1;IF((2*p0372-1)>0;1;0))*SQRT(SQRT((2/(pi()*0.140012289)+LN(1-(2*p0372-1)^2)/2)^2-LN(1-(2*p0372-1)^2)/0.140012289)-(2/(pi()*0.140012289)+LN(1-(2*p0372-1)^2)/2)))
- p3337: 0; = IF(or(p3254=0;p1232>0);0;p3272*p3289)
- p2227: 0; = if(p0774*p0778+p0775*p0779+p0776*p0780+p0777*p0781=0;0;p0779*p0775/(p0774*p0778+p0775*p0779+p0776*p0780+p0777*p0781))
- p0991: 0; = p0987*p0886
- p0372: 0.5
- p4824: 0; = p1857*p3482
- p3064: 0; = p2283*p1023
- p0485: 0; = SQRT(2)*(IF((2*p0353-1)<0;-1;IF((2*p0353-1)>0;1;0))*SQRT(SQRT((2/(pi()*0.140012289)+LN(1-(2*p0353-1)^2)/2)^2-LN(1-(2*p0353-1)^2)/0.140012289)-(2/(pi()*0.140012289)+LN(1-(2*p0353-1)^2)/2)))
- p2173: 0.121937; = p0895*p0898/p0818
- p2719: 0.000312892; = p2328*(p1019+p1021)
- p0110: 36.955
- p2683: 1.08908e-6; = p2292*(p1019+p1021)
- p0771: 20.173; = p0111*(1+p0639*p0243/100)
- p0034: 101.813
- p0501: 0; = SQRT(2)*(IF((2*p0369-1)<0;-1;IF((2*p0369-1)>0;1;0))*SQRT(SQRT((2/(pi()*0.140012289)+LN(1-(2*p0369-1)^2)/2)^2-LN(1-(2*p0369-1)^2)/0.140012289)-(2/(pi()*0.140012289)+LN(1-(2*p0369-1)^2)/2)))
- p2517: 9.91251e-5; = p2321*p1014
- p2119: 0.679049
- p0047: 5.701
- p2018: 0.1978
- p1864: 0
- p3452: 0; = p3376*p1240
- p1879: 0
- p2357: 0.000113314; = p2225*p2185
- p2387: 3.60038e-6; = p2229*p2216
- p0636: 0; = IF(p0372<0.5;-SQRT(p0007*EXP(p0504^2*p0008)-p0007);SQRT(p0007*EXP(p0504^2*p0008)-p0007))
- p2911: 2.34609e-5; = p2325*(p1020+p1022)
- p2965: 0; = p2379*(p1079+p1081)
- p0808: 0
- p1998: 515
- p1809: 0
- p2883: 0; = p2297*(p1079+p1081)
- p1634: 0
- p1920: 0
- p0106: 57.163
- p0556: 0; = IF(p0292<0.5;-SQRT(p0007*EXP(p0424^2*p0008)-p0007);SQRT(p0007*EXP(p0424^2*p0008)-p0007))
- p2108: 0.826583
- p0555: 0; = IF(p0291<0.5;-SQRT(p0007*EXP(p0423^2*p0008)-p0007);SQRT(p0007*EXP(p0423^2*p0008)-p0007))
- p2069: 0.190588
- p1019: 0.15473; = IF(p1012=0;IF(p1014=1;0;IF(p1014+p1015>1;1-p1014;p1015));0)
- p0871: 0; = p0870*p0001*p0003/(p0818*p0002)
- p1598: 0
- p2045: 30
- p2924: 0; = p2338*(p1079+p1081)
- p1650: 0
- p2907: 1.85589e-5; = p2321*(p1020+p1022)
- p3344: 0; = if(and(p1232=0;p3254<>0);p3254-(p3339+p3340+p3341+p3342+p3343);0)
- p1651: 0
- p2906: 1.45075e-6; = p2320*(p1020+p1022)
- p0714: 0
- p3262: 0
- p1055: 41038; = IF(p1012=0;p1048*p1036;0)
- p3318: 0; = if(and(p1232=0;p3253<>0);p3253*(p3262-p3313)/p3316;0)
- p3207: 0; = p2426*p1082
- p2058: 1.24412
- p2774: 0; = p2383*(p1078+p1080)
- p3283: 0
- p2092: 0.54529
- p2063: 2.01468
- p2526: 1.04238e-6; = p2330*p1014
- p1298: 0
- p0864: 0; = IF(p0858=1;0;IF(p0858+p0859>1;1-p0858;p0859))
- p3068: 0; = p2287*p1023
- p3015: 0; = p2429*(p1129+p1131)
- p2601: 0; = p2405*p1014
- p1988: 750
- p2574: 7.11067e-5; = p2378*p1073
- p1866: 0
- p1564: 0
- p2298: 0; = p2227*p2205
- p1278: 0
- p0896: 0.458
- p3162: 3.3226e-6; = p2381*p1082
- p1127: 0; = if(p1121=0;p0721/100;0)
- p0708: 0
- p1580: 0
- p2274: 6.86095e-5; = p2230*p2220
- p0683: 67.291; = p0023*(1+p0551*p0155/100)
- p3455: 0; = p3379*p1240
- p2166: 0.52828; = p2165*p0824
- p0769: 49.16; = p0109*(1+p0637*p0241/100)
- p2250: 0.00731755; = p2222*p2196
- p2617: 0; = p2421*p1073
- p1885: 0
- p1077: 0; = IF(p1071=0;p0715/100;0)
- p1737: 0
- p2846: 0; = p2260*(p1079+p1081)
- p1640: 0
- p2297: 0; = p2227*p2204
- p2804: 0; = p2413*(p1019+p1021)
- p2005: 2.83777e6; = p1963*p0818+p1959*1000+p1170+p1176+p1182
- p0840: 0.0898702; = p0839*p0831
- p1911: 0
- p5020: 0; = p1847*p3483
- p1887: 0
- p2644: 1.80232e-6; = p2253*(p1019+p1021)
- p0584: 0; = IF(p0320<0.5;-SQRT(p0007*EXP(p0452^2*p0008)-p0007);SQRT(p0007*EXP(p0452^2*p0008)-p0007))
- p0995: 0; = p0991*p0001*p0004/(p0818*p0002)
- p3011: 0; = p2425*(p1079+p1081)
- p2848: 0; = p2262*(p1079+p1081)
- p1667: 0
- p1150: 2.31951e6; = if(p1121=0;p1149*p1146*p1145;0)
- p3020: 0; = p2239*p1023
- p1747: 0
- p2915: 1.18904e-7; = p2329*(p1020+p1022)
- p1955: 0
- p1177: 0.000261249; = p0801*p0001/(p0818*p0002)
- p1999: 8.64315e7; = (p1228+p1229)*p0818+p1164
- p1253: 0; = if(p1232>0;0;p0735/100)
- p0441: 0; = SQRT(2)*(IF((2*p0309-1)<0;-1;IF((2*p0309-1)>0;1;0))*SQRT(SQRT((2/(pi()*0.140012289)+LN(1-(2*p0309-1)^2)/2)^2-LN(1-(2*p0309-1)^2)/0.140012289)-(2/(pi()*0.140012289)+LN(1-(2*p0309-1)^2)/2)))
- p0858: 0; = p0670*1000/p0856
- p3325: 0; = if(and(p1232=0;p3255<>0);p3267*p3289;0)
- p1238: 0; = if(p1232>0;0;IF(p1234=1;0;IF(p1234+p1235>1;1-p1234;p1235)))
- p0013: 311.142
- p2191: 0.000172344; = 8*1.00794*p2189/(2*14.0067)
- p1914: 1.03348e-6; = p1506*1000/p0818
- p1895: 0
- p1603: 0
- p2098: 0.856281
- p2391: 0; = p2233*p2220
- p0510: 0; = SQRT(2)*(IF((2*p0378-1)<0;-1;IF((2*p0378-1)>0;1;0))*SQRT(SQRT((2/(pi()*0.140012289)+LN(1-(2*p0378-1)^2)/2)^2-LN(1-(2*p0378-1)^2)/0.140012289)-(2/(pi()*0.140012289)+LN(1-(2*p0378-1)^2)/2)))
- p0447: 0; = SQRT(2)*(IF((2*p0315-1)<0;-1;IF((2*p0315-1)>0;1;0))*SQRT(SQRT((2/(pi()*0.140012289)+LN(1-(2*p0315-1)^2)/2)^2-LN(1-(2*p0315-1)^2)/0.140012289)-(2/(pi()*0.140012289)+LN(1-(2*p0315-1)^2)/2)))
- p2684: 0.000240155; = p2293*(p1019+p1021)
- p3014: 0; = p2428*(p1129+p1131)
- p2733: 0; = p2342*(p1078+p1080)
- p1710: 0.757148
- p2619: 0; = p2423*p1073
- p1622: 0
- p4643: 2.4475e-7; = p1882*p3481
- p0578: 0; = IF(p0314<0.5;-SQRT(p0007*EXP(p0446^2*p0008)-p0007);SQRT(p0007*EXP(p0446^2*p0008)-p0007))
- p0812: 0; = if(p0807=480;0.095/0.34;0)
- p3896: 4.37148e-5; = p1963*p3477
- p3240: 7.66518e-9; = p3234*p1188*p3235/p0818
- p0736: 0
- p1287: 0
- p1056: 3.2656e7; = IF(p1012=0;p1049*p1036;0)
- p2829: 6.7158e-5; = p2243*(p1020+p1022)
- p5089: 0; = p1916*p3483
- p2028: 0.00145459; = p2015*p2026*p2027/(p0818*1000)
- p1822: 0
- p2379: 5.35669e-5; = p2229*p2208
- p0810: 0
- p2934: 0; = p2348*(p1079+p1081)
- p0685: 20.353; = p0025*(1+p0553*p0157/100)
- p2535: 0.00024296; = p2339*p1073
- p1963h: 9.58785e-8; = p1686*p1890+p1687*p1891+p1688*p1892+p1689*p1893+p1690*p1894+p1691*p1895+p1692*p1896+p1693*p1897+p1694*p1898+p1695*p1899+p1696*p1900+p1697*p1901+p1698*p1902+p1699*p1903+p1700*p1904+p1701*p1905+p1702*p1906+p1703*p1907+p1704*p1908+p1705*p1909
- p1957: 0
- p4034: 4.59074e-8; = p1891*p3478
- p2196: 0.0160248; = p1068-p2193-p2195
- p0971: 0.0040069; = p0968/p0818
- p1789: 0
- p0725: 0
- p2728: 0; = p2337*(p1078+p1080)
- p2852: 0; = p2266*(p1079+p1081)
- p0925: 0; = IF(p0918+p0923+p0924=1;0;IF(p0918+p0923+p0924+p0921>1;1-(p0918+p0923+p0924);p0921))
- p2660: 0; = p2269*(p1078+p1080)
- p3482: 0; = if(p1328+p1330+p1332+p1334+p1336+p1338+p1340+p1342+p1344=0;0;p1340/(p1328+p1330+p1332+p1334+p1336+p1338+p1340+p1342+p1344))
- p2569: 3.4901e-5; = p2373*p1014
- p1960: 213.99; = IF(p1959-p1958<0;0;p1959-p1958)
- p2734: 0; = p2343*(p1078+p1080)
- p1658: 0
- p0252: 21.604
- p2350: 0; = p2232*p2218
- p0778: 25.624; = p0118*(1+p0646*p0250/100)
- p1040: 0.0267363
- p0690: 0
- p0279: 0.5
- p3206: 0; = p2425*p1082
- p1247: 0; = if(p1232>0;0;p1242*p0001/(p0818*p0002))
- p2507: 0; = p2311*p1123
- p0118: 25.624
- p3311: 0; = if(and(p1232=0;p3252<>0);p3252-(p3306+p3307+p3308+p3309+p3310);0)
- p2072: 0.134
- p2462: 9.10558e-8; = p2266*p1073
- p1778: 0
- p0740: 97.651; = p0080*(1+p0608*p0212/100)
- p1067: 0.00285114; = IF(p1012=0;p1053/(p1060*p0818);0)
- p0367: 0.5
- p3313: 0; = if(and(p1232=0;p3253<>0);p3262*(p3278*(p3282*p1256+p3286*(p1253+p1257)+p1258*p3288+p3298*p3287));0)
- p3446: 0; = p3370*p1240
- p0701: 0
- p0831: 0.137; = 1-p0824
- p3203: 0; = p2422*p1082
- p1838: 0
- p1003: 1.23129e6; = p0999*p0888
- p3348: 0; = if(and(p1232=0;p3256<>0);p3276*p3289;0)
- p2035: 0.000132539; = p2015*p2029*(1-p2031)/(p0818*1000)
- p1989: 50
- p1783: 0
- p3101: 0; = p2320*p1023
- p0751: 47.364; = p0091*(1+p0619*p0223/100)
- p2886: 0; = p2300*(p1079+p1081)
- p2608: 0; = p2412*p1014
- p0850: 0
- p0839: 0.655987; = p0838/p0818
- p1814: 0
- p1818: 0
- p1842: 0
- p4230: 1.27584e-8; = p1881*p3479
- p0103: 1698.24
- p1803: 0
- p1183: 0.000261249; = p0801*p0001/(p0818*p0002)
- p0700: 0
- p0892: 0; = if(p0891=0;0;(1-p1240)*p3251/p0891)
- p0946: 0; = if(and(p0683=0;or(p0807=480;p0807=32;p0807=1;and(p0807=60;p0901<0.03)));p0934;0)
- p2080: 0.025
- p1015: 0.15473; = IF(p1012=0;p0706/100;0)
- p1333: 0.000228257; = p1332*p0001/(p0818*p0002)
- p2048: 6.15204e-13; = p2015*p2046/(p0818*1000000000000)
- p0570: 0; = IF(p0306<0.5;-SQRT(p0007*EXP(p0438^2*p0008)-p0007);SQRT(p0007*EXP(p0438^2*p0008)-p0007))
- p2881: 1.2766e-5; = p2295*(p1020+p1022)
- p1235: 0; = if(p1232>0;0;p0727/100)
- p0913: 0.0120403
- p0800: 7.419; = p0140*(1+p0668*p0272/100)
- p1745: 0
- p1619: 0
- p0399: 0.5
- p3433: 0; = p3376*p1239
- p3083: 0; = p2302*p1082
- p0674: 214.741; = p0014*(1+p0542*p0146/100)
- p1449: 619
- p0745: 5573; = p0085*(1+p0613*p0217/100)
- p3274: 0
- p1918: 0
- p2064: 0.676706
- p2303: 0; = p2227*p2210
- p1855: 0
- p2956: 4.80251e-7; = p2370*(p1020+p1022)
- p1967: 0; = if(p0807=480;p0802*p0810;0)
- p3235: 0.118093
- p3481: 0.47364; = if(p1328+p1330+p1332+p1334+p1336+p1338+p1340+p1342+p1344=0;0;p1338/(p1328+p1330+p1332+p1334+p1336+p1338+p1340+p1342+p1344))
- p2414: 0; = p2235*p2204
- p2799: 0; = p2408*(p1019+p1021)
- p2775: 0; = p2384*(p1078+p1080)
- p2970: 0; = p2384*(p1079+p1081)
- p1168: 6.41393e-7; = p1164*p1167/p0818
- p3035: 0; = p2254*p1023
- p2940: 0.000146265; = p2354*(p1020+p1022)
- p1748: 0
- p3379: 0; = if(p1232=0;p3246*p3361/p0818;0)
- p3377: 0; = if(p1232=0;p3246*p3359/p0818;0)
- p2833: 8.48967e-5; = p2247*(p1020+p1022)
- p2133: 2.44409e-5; = p2015*p2061*p2095/(p0818*1000)
- p3217: 0.00163608; = p3213*p1228
- p1891: 1.72247e-7; = p1483*1000/p0818
- p2794: 0; = p2403*(p1019+p1021)
- p0729: 0
- p0718: 0
- p2425: 0; = p2235*p2215
- p2200: 0.00562492; = p1056/p0818
- p1986: 4200
- p1345: 6.69732e-6; = IF(p1318=0;p1344*p0001/(p0818*p0002);0)
- p1701: 0
- p3321: 0; = if(and(p1232=0;p3253<>0);IF((p3317+p3318+p3319+p3320)+(p3253*(p3261*(1-p3277))/p3316)>p3253;p3253-(p3317+p3318+p3319+p3320);p3253*(p3261*(1-p3277))/p3316);0)
- p3794: 2.42382e-5; = p1857*p3477
- p1863: 0
- p1673: 0
- p0255: 34.2
- p2053: 1.45647
- p0881: 1.80093; = p0880*p0001*p0003/(p0818*p0002)
- p2452: 0.000112839; = p2256*p1014
- p0355: 0.5
- p0939: 4.7681e-6; = p0933*p0001/(p0818*p0002)
- p2602: 0; = p2406*p1014
- p1733: 0
- p0675: 1171.9; = p0015*(1+p0543*p0147/100)
- p2609: 0; = p2413*p1014
- p0874: 0; = p0865*p0856
- p0950: 0; = if(and(p0683=0;or(p0807=480;p0807=32;p0807=1;and(p0807=60;p0901<0.03)));p0938;0)
- p3447: 0; = p3371*p1240
- p3420: 0; = p3363*p1239
- p2002: 750
- p0756: 0
- p1209: 70.9411; = p1206*p0818*p0822/p0801
- p2175: 0.000525934; = p0895*p0908/p0818
- p1149: 0.830148
- p2513: 2.09267e-5; = p2317*p1014
- p3189: 0; = p2408*p1023
- p0248: 13.317
- p0904: 1.98503e8; = p0825*p0901+(p0830+p0895)*p0824*p0903
- p1835: 0
- p0869: 0.00130412; = IF(p0858+p0864+p0865+p0866+p0867+p0868=1;0;1-(p0858+p0864+p0865+p0866+p0867+p0868))
- p2497: 0; = p2301*p1073
- p3160: 1.70171e-5; = p2379*p1082
- p1754: 0
- p1551: 0.651482
- p1312: 0; = IF(p1307+p1310+p1311=p1266;0;p1266-(p1307+p1310+p1311))
- p2332: 0.000709814; = p2224*p2200
- p4196: 4.67807e-8; = p1847*p3479
- p1022: 0.07629; = IF(p1012=0;IF(p1014+p1019+p1020+p1021=1;0;IF(p1014+p1019+p1020+p1021+p1018>1;1-(p1014+p1019+p1020+p1021);p1018));0)
- p3812: 7.67478e-6; = p1875*p3477
- p2972: 0; = p2386*(p1079+p1081)
- p0873: 0; = p0872*p0001*p0003/(p0818*p0002)
- p2824: 0.000103805; = p2238*(p1020+p1022)
- p3071: 0; = p2290*p1023
- p2568: 0.000242498; = p2372*p1014
- p2957: 0.000105901; = p2371*(p1020+p1022)
- p1928: 0
- p2424: 0; = p2235*p2214
- p0129: 41.418
- p1777: 0
- p0930: 291938; = p0801*p0924
- p3853: 3.9157e-8; = p1916*p3477
- p2817: 0; = p2426*(p1078+p1080)
- p3036: 0; = p2255*p1023
- p3057: 0; = p2276*p1023
- p3784: 4.30727e-7; = p1847*p3477
- p1579: 0
- p2359: 1.21811e-5; = p2225*p2187
- p0353: 0.5
- p1717: 0
- p0809: 0
- p1562: 0
- p3150: 0; = p2369*p1023
- p2552: 2.34222e-5; = p2356*p1014
- p3034: 0; = p2253*p1023
- p1146: 0.853442
- p2402: 0; = p2234*p2191
- p3221: 0.146975; = IF(p3216=0;0;p1223*12.0107/100.0869+(1-p1224)*12.0107/84.3139)
- p0806: 9.676e7
- p0728: 0
- p1890: 0
- p1105: 0.436421
- p0289: 0.5
- p2059: 1.00168
- p3195: 0; = p2414*p1082
- p0507: 0; = SQRT(2)*(IF((2*p0375-1)<0;-1;IF((2*p0375-1)>0;1;0))*SQRT(SQRT((2/(pi()*0.140012289)+LN(1-(2*p0375-1)^2)/2)^2-LN(1-(2*p0375-1)^2)/0.140012289)-(2/(pi()*0.140012289)+LN(1-(2*p0375-1)^2)/2)))
- p0321: 0.5
- p0875: 0; = p0874*p0001*p0003/(p0818*p0002)
- p0893: 4.01794; = 1000*(p0890+p0892)*p0001*p0003*p0004/(p0818*p0002)
- p3719: 5.16873e-6; = p1782*p3477
- p1601: 0
- p0823: 0
- p2599: 0; = p2403*p1014
- p2625: 0; = p2429*p1123
- p0807: 60
- p1706: 0
- p2470: 5.15175e-5; = p2274*p1123
- p0117: 14.027
- p2420: 0; = p2235*p2210
- p0478: 0; = SQRT(2)*(IF((2*p0346-1)<0;-1;IF((2*p0346-1)>0;1;0))*SQRT(SQRT((2/(pi()*0.140012289)+LN(1-(2*p0346-1)^2)/2)^2-LN(1-(2*p0346-1)^2)/0.140012289)-(2/(pi()*0.140012289)+LN(1-(2*p0346-1)^2)/2)))
- p2282: 0.000304435; = p2223*p2188
- p1308: 0
- p3088: 0; = p2307*p1082
- p3329: 0; = if(and(p1232=0;p3255<>0);p3255*(p3266-p3324)/p3327;0)
- p0905: 0.0341917; = p0904/p0818
- p2854: 0; = p2268*(p1079+p1081)
- p0608: 0; = IF(p0344<0.5;-SQRT(p0007*EXP(p0476^2*p0008)-p0007);SQRT(p0007*EXP(p0476^2*p0008)-p0007))
- p0847: 0
- p2722: 4.98066e-7; = p2331*(p1019+p1021)
- p2283: 0.000165211; = p2223*p2189
- p0920: 0.171728; = p0676*1000/p0801
- p1572: 0
- p1610: 0
- p2835: 9.86774e-5; = p2249*(p1020+p1022)
- p1274: 0; = p1270*p1252/p0818
- p1160: 0.0338179; = (p1156+p1158)*p1159
- p2177: 0.136757; = p0895/p0818-(p2173+p2174+p2175+p2176)
- p1075: 0; = IF(p1071=0;p0713/100;0)
- p1123: 0.75088; = if(p1121=0;p0717/100;0)
- p0573: 0; = IF(p0309<0.5;-SQRT(p0007*EXP(p0441^2*p0008)-p0007);SQRT(p0007*EXP(p0441^2*p0008)-p0007))
- p0765: 71.113; = p0105*(1+p0633*p0237/100)
- p1173: 0.5
- p2390: 0; = p2233*p2219
- p1704: 0
- p1724: 0
- p1987: 400
- p3417: 0; = p3379*p1238
- p0768: 40.021; = p0108*(1+p0636*p0240/100)
- p1137: 0; = if(p1121=0;p1131*(p0716/100)*p0703*1000;0)
- p2903: 3.91805e-6; = p2317*(p1020+p1022)
- p3072: 0; = p2291*p1023
- p2968: 0; = p2382*(p1079+p1081)
- p1069: 4.41793e-5; = IF(p1012=0;p1055/(p1062*p0818);0)
- p2640: 0.000114541; = p2249*(p1019+p1021)
- p1946: 0
- p2706: 0.00015169; = p2315*(p1019+p1021)
- p2627: 0; = p2431*p1123
- p3428: 0; = p3371*p1239
- p1213: 15
- p0952: 0; = if(and(p0683>0;or(p0807=56;p0807=100;and(p0807=60;p0901>0.06)));p0934;0)
- p0749: 2.469; = p0089*(1+p0617*p0221/100)
- p0261: 32.082
- p1582: 0
- p1810: 0
- p0910: 0.00590066; = p0909/p0818
- p2884: 0; = p2298*(p1079+p1081)
- p2522: 0.000679448; = p2326*p1014
- p2131: 1.60812e-5; = p2015*p2059*p2093/(p0818*1000)
- p0709: 7.629; = p0049*(1+p0577*p0181/100)
- p0969: 9.10326e7; = p0966*p0683*p0682*1000
- p0693: 0
- p2091: 0.374844
- p1279: 0
- p3152: 0; = p2371*p1023
- p3038: 0; = p2257*p1023
- p4622: 4.07916e-7; = p1861*p3481
- p2870: 2.52078e-5; = p2284*(p1020+p1022)
- p2932: 0; = p2346*(p1079+p1081)
- p1467: 196
- p3444: 0; = p3368*p1240
- p1051: 1.35226e6; = IF(p1012=0;p1044*p1036;0)
- p2755: 3.048e-5; = p2364*(p1019+p1021)
- p2455: 5.57729e-5; = p2259*p1073
- p2435: 7.57263e-5; = p2239*p1014
- p0009: 29.4127
- p1638: 0
- p0057: 75.088
- p1321: 0.873715; = IF(((p0745*1000*p0748/100)+(p0754*1000*p0757/100))/p0801<0;0;((p0745*1000*p0748/100)+(p0754*1000*p0757/100))/p0801)
- p0720: 0
- p1678: 0.8094
- p1834: 0
- p3308: 0; = if(and(p1232=0;p3252<>0);p3252*(p3259-p3303)/p3305;0)
- p2812: 0; = p2421*(p1078+p1080)
- p2845: 0; = p2259*(p1079+p1081)
- p3306: 0; = if(and(p1232=0;p3252<>0);p3252*(p3257*p3277-p3301)/p3305;0)
- p1565: 0
- p1656: 0
- p4514: 0; = p1963*p3480
- p0727: 0
- p0439: 0; = SQRT(2)*(IF((2*p0307-1)<0;-1;IF((2*p0307-1)>0;1;0))*SQRT(SQRT((2/(pi()*0.140012289)+LN(1-(2*p0307-1)^2)/2)^2-LN(1-(2*p0307-1)^2)/0.140012289)-(2/(pi()*0.140012289)+LN(1-(2*p0307-1)^2)/2)))
- p0544: 0; = IF(p0280<0.5;-SQRT(p0007*EXP(p0412^2*p0008)-p0007);SQRT(p0007*EXP(p0412^2*p0008)-p0007))
- p0837: 0.5
- p1138: 31387.2; = if(p1121=0;p1132*(p0716/100)*p0703*1000;0)
- p1882: 5.16742e-7; = p1474*1000/p0818
- p3440: 0; = p3364*p1240
- p0996: 0; = if(p0888=0;0;if((p0691*p0690*1000*p0692/100)/p0888>1;1;(p0691*p0690*1000*p0692/100)/p0888))
- p2798: 0; = p2407*(p1019+p1021)
- p2967: 0; = p2381*(p1079+p1081)
- p5116: 0; = p1943*p3483
- p3145: 0; = p2364*p1023
- p3265: 0
- p2252: 5.29799e-6; = p2222*p2198
- p3388: 0; = p3369*p1234
- p4677: 8.15833e-8; = p1916*p3481
- p0919: 0.810021; = p0678*1000/p0801
- p0513: 0; = SQRT(2)*(IF((2*p0381-1)<0;-1;IF((2*p0381-1)>0;1;0))*SQRT(SQRT((2/(pi()*0.140012289)+LN(1-(2*p0381-1)^2)/2)^2-LN(1-(2*p0381-1)^2)/0.140012289)-(2/(pi()*0.140012289)+LN(1-(2*p0381-1)^2)/2)))
- p2987: 0; = p2401*(p1020+p1022)
- p1151: 398320; = if(p1121=0;p1149*p1148*p1145;0)
- p0554: 0; = IF(p0290<0.5;-SQRT(p0007*EXP(p0422^2*p0008)-p0007);SQRT(p0007*EXP(p0422^2*p0008)-p0007))
- p3227: 4.85065e-5; = p3223*p1229
- p2046: 10
- p0645: 0; = IF(p0381<0.5;-SQRT(p0007*EXP(p0513^2*p0008)-p0007);SQRT(p0007*EXP(p0513^2*p0008)-p0007))
- p0747: 22.733; = p0087*(1+p0615*p0219/100)
- p2807: 0; = p2416*(p1078+p1080)
- p0300: 0.5
- p2265: 0.000288844; = p2226*p2211
- p0619: 0; = IF(p0355<0.5;-SQRT(p0007*EXP(p0487^2*p0008)-p0007);SQRT(p0007*EXP(p0487^2*p0008)-p0007))
- p5088: 0; = p1915*p3483
- p2364: 0.000196989; = p2225*p2192
- p3394: 0; = p3375*p1234
- p2828: 5.24973e-6; = p2242*(p1020+p1022)
- p1093: 0; = IF(p1071=0;p1087*p0001/(p0818*p0002);0)
- p3001: 0; = p2415*(p1079+p1081)
- p2474: 4.57587e-5; = p2278*p1014
- p2524: 0.00143973; = p2328*p1014
- p2023: 2.12
- p1884: 0
- p2537: 5.64744e-5; = p2341*p1073
- p2916: 1.95162e-7; = p2330*(p1020+p1022)
- p4517: 1.21559e-5; = p1756*p3481
- p1139: 1.45385e-5; = if(p1121=0;p1133*p0001/(p0818*p0002);0)
- p3175: 0; = p2394*p1023
- p1639: 0
- p3205: 0; = p2424*p1082
- p0500: 0; = SQRT(2)*(IF((2*p0368-1)<0;-1;IF((2*p0368-1)>0;1;0))*SQRT(SQRT((2/(pi()*0.140012289)+LN(1-(2*p0368-1)^2)/2)^2-LN(1-(2*p0368-1)^2)/0.140012289)-(2/(pi()*0.140012289)+LN(1-(2*p0368-1)^2)/2)))
- p2056: 2.07882
- p2189: 0.00059874; = p1053/p0818
- p1629: 0
- p2355: 0.000240862; = p2225*p2183
- p2675: 2.92603e-5; = p2284*(p1019+p1021)
- p0308: 0.5
- p2664: 0; = p2273*(p1128+p1130)
- p2296: 0.00109791; = p2223*p2203
- p2790: 0; = p2399*(p1019+p1021)
- p3383: 0; = p3364*p1234
- p3292: 0
- p2990: 0; = p2404*(p1020+p1022)
- p3438: 0; = p3362*p1240
- p0637: 0; = IF(p0373<0.5;-SQRT(p0007*EXP(p0505^2*p0008)-p0007);SQRT(p0007*EXP(p0505^2*p0008)-p0007))
- p5123: 0; = p1950*p3483
- p2495: 0; = p2299*p1073
- p0815: 0
- p2621: 0; = p2425*p1073
- p2213: 4.31811e-6; = p1116-p2212
- p1340: 0; = p1325*p0801
- p3085: 0; = p2304*p1082
- p1134: 0; = if(p1121=0;p1128*(p0716/100)*p0703*1000;0)
- p2731: 0; = p2340*(p1078+p1080)
- p0681: 0
- p4749: 0; = p1782*p3482
- p2211: 0.000893793; = p1120-p2209-p2208-p2210
- p3466: 0; = p3371*p1241
- p2600: 0; = p2404*p1014
- p0393: 0.5
- p1189: 0.000261249; = p0801*p0001/(p0818*p0002)
- p2736: 0; = p2345*(p1078+p1080)
- p1226: 1.7e6; = IF(p1221=0;0;IF(p1193=0;p0801;0))
- p0986: 0; = IF(p0982+p0985=1;0;IF(p0982+p0985+p0984>1;1-(p0982+p0985);p0984))
- p2549: 0; = p2353*p1123
- p1881: 5.16742e-7; = p1473*1000/p0818
- p1762: 0
- p1768: 0
- p2892: 0; = p2306*(p1079+p1081)
- p3018: 0; = p2237*p1023
- p1976: 0.003
- p4299: 1.27584e-8; = p1950*p3479
- p2752: 1.30848e-5; = p2361*(p1019+p1021)
- p0088: 26.652
- p1674: 0
- p1193: 0; = IF(OR(p1036=0;p1095=0);0.0001*p0857;0)
- p2099: 0.620397
- p0574: 0; = IF(p0310<0.5;-SQRT(p0007*EXP(p0442^2*p0008)-p0007);SQRT(p0007*EXP(p0442^2*p0008)-p0007))
- p0147: 9.162
- p0833: 7.77612e9; = p0830+p0832
- p0562: 0; = IF(p0298<0.5;-SQRT(p0007*EXP(p0430^2*p0008)-p0007);SQRT(p0007*EXP(p0430^2*p0008)-p0007))
- p2115: 0.856281
- p1257: 0; = if(p1232>0;0;IF(p1253+p1256=1;0;IF(p1253+p1256+p1255>1;1-(p1253+p1256);p1255)))
- p2285: 4.75552e-5; = p2223*p2191
- p2242: 3.93828e-5; = p2222*p2187
- p2646: 0.000170389; = p2255*(p1019+p1021)
- p4000: 2.84167e-5; = p1857*p3478
- p2103: 0.912485
- p0880: 1.1719e6; = p0868*p0856
- p2671: 2.55847e-5; = p2280*(p1019+p1021)
- p2375: 4.28556e-5; = p2229*p2204
- p0606: 0; = IF(p0342<0.5;-SQRT(p0007*EXP(p0474^2*p0008)-p0007);SQRT(p0007*EXP(p0474^2*p0008)-p0007))
- p3012: 0; = p2426*(p1079+p1081)
- p2236: 0; = 1-(p2230+p2231+p2232+p2233)
- p3693: 5.8344e-6; = p1756*p3477
- p2439: 0.000358698; = p2243*p1014
- p0688: 92.285; = p0028*(1+p0556*p0160/100)
- p3299: 0; = if(p1303+p1304+p1305+p1306=0;0;p1303/(p1303+p1304+p1305+p1306))
- p2085: 0.0335294
- p2611: 0; = p2415*p1073
- p3099: 0; = p2318*p1023
- p2299: 0; = p2227*p2206
- p0694: 101.813; = p0034*(1+p0562*p0166/100)
- p3256: 0; = p1252*(p1307*(1-p3247)+p1310*(1-p3248)+p1311*(1-p3249)+p1312*(1-p3250))
- p2527: 2.29179e-6; = p2331*p1014
- p0804: 0
- p1066: 0.00178879; = IF(p1012=0;p1052/(p1059*p0818);0)
- p2668: 7.28097e-5; = p2277*(p1019+p1021)
- p2449: 8.29316e-6; = p2253*p1014
- p3165: 2.1021e-7; = p2384*p1082
- p3606: 0; = p1875*p3476
- p1028: 129559; = IF(p1012=0;p1022*(p0704/100)*p0703*1000;0)
- p2362: 9.67959e-5; = p2225*p2190
- p2729: 0; = p2338*(p1078+p1080)
- p0781: 18.22; = p0121*(1+p0649*p0253/100)
- p3052: 2.16183e-5; = p2271*p1082
- p1071: 0
- p1587: 0
- p0112: 27.018
- p3361: 0; = if(p1232=0;p3311+p3322+p3333+p3344+p3355;0)
- p1767: 0
- p2395: 0; = p2234*p2184
- p3484: 0.00782; = IF(p1344=0;0;p1344/(p1328+p1330+p1332+p1334+p1336+p1338+p1340+p1342+p1344))
- p0865: 0; = IF(p0858+p0864=1;0;IF(p0858+p0864+p0860>1;1-(p0858+p0864);p0860))
- p2694: 0; = p2303*(p1078+p1080)
- p1943: 6.8899e-7; = p1535*1000/p0818
- p3017: 0; = p2431*(p1129+p1131)
- p1963a: 5.66544e-5; = p1550*p1754+p1551*p1755+p1552*p1756+p1553*p1757+p1554*p1758+p1555*p1759+p1556*p1760+p1557*p1761+p1558*p1762+p1559*p1763+p1560*p1764+p1561*p1765+p1562*p1766+p1563*p1767+p1564*p1768+p1565*p1769+p1566*p1770+p1567*p1771+p1568*p1772
- p2412: 0; = p2234*p2202
- p3399: 0; = p3380*p1234
- p3284: 0
- p0087: 22.733
- p3226: 8.57567e-5; = p3222*p1229
- p3044: 1.62287e-5; = p2263*p1082
- p1870: 0
- p1232: 1.7e6; = p0801
- p0753: 0
- p0349: 0.5
- p3486: 0; = p1755*p3476
- p1024: 1.2091e6; = IF(p1012=0;p1014*(p0704/100)*p0703*1000;0)
- p1888: 0
- p2258: 9.03782e-5; = p2226*p2204
- p2269: 1.31887e-5; = p2226*p2215
- p0514: 0; = SQRT(2)*(IF((2*p0382-1)<0;-1;IF((2*p0382-1)>0;1;0))*SQRT(SQRT((2/(pi()*0.140012289)+LN(1-(2*p0382-1)^2)/2)^2-LN(1-(2*p0382-1)^2)/0.140012289)-(2/(pi()*0.140012289)+LN(1-(2*p0382-1)^2)/2)))
- p2481: 3.38578e-5; = p2285*p1014
- p2406: 0; = p2234*p2196
- p2912: 0.000127211; = p2326*(p1020+p1022)
- p2202: 0.000347074; = 4*1.00794*p2201/(2*14.0067)
- p4337: 0; = p1782*p3480
- p1661: 0
- p1128: 0; = if(p1121=0;IF(p1123=1;0;IF(p1123+p1124>1;1-p1123;p1124));0)
- p1155: 0.000187835; = if(p1153*p0818=0;0;p1151/(p1153*p0818))
- p0805: 0
- p2272: 0.00039953; = p2230*p2218
- p2676: 7.35821e-6; = p2285*(p1019+p1021)
- p1586: 0
- p1098: 0.0353868
- p0509: 0; = SQRT(2)*(IF((2*p0377-1)<0;-1;IF((2*p0377-1)>0;1;0))*SQRT(SQRT((2/(pi()*0.140012289)+LN(1-(2*p0377-1)^2)/2)^2-LN(1-(2*p0377-1)^2)/0.140012289)-(2/(pi()*0.140012289)+LN(1-(2*p0377-1)^2)/2)))
- p2400: 0; = p2234*p2189
- p2806: 0; = p2415*(p1078+p1080)
- p5295: 1.34698e-9; = p1916*p3484
- p3286: 0
- p3024: 0; = p2243*p1023
- p1867: 0
- p1933: 0
- p2105: 0.888194
- p2544: 8.39385e-6; = p2348*p1073
- p0183: 16.993
- p1676: 0
- p2945: 1.62374e-6; = p2359*(p1020+p1022)
- p1608: 0
- p2850: 0; = p2264*(p1079+p1081)
- p1845: 0
- p1210: 0.13
- p5236: 8.33778e-7; = p1857*p3484
- p1245: 0; = if(p1232>0;0;p1240*(p0725/100)*p0723*1000)
- p0758: 0
- p2637: 1.21771e-5; = p2246*(p1019+p1021)
- p2563: 0.00161141; = p2367*p1014
- p2735: 0; = p2344*(p1078+p1080)
- p1574: 0
- p2165: 0.612143; = (p0833-p2014)/p0818-p0839
- p1225: 1.088; = IF(p1221=0;0;p1223+1.2*p1224)
- p2921: 6.69306e-5; = p2335*(p1020+p1022)
- p2711: 1.68398e-6; = p2320*(p1019+p1021)
- p0692: 0
- p1602: 0
- p1604: 0
- p1862: 0
- p2788: 0; = p2397*(p1019+p1021)
- p2454: 6.16668e-5; = p2258*p1073
- p2418: 0; = p2235*p2208
- p3123: 1.13528e-5; = p2342*p1082
- p0762: 0
- p2444: 0.00245868; = p2248*p1014
- p2354: 0.00109726; = p2225*p2182
- p2868: 4.05812e-5; = p2282*(p1020+p1022)
- p1035: 0; = IF(p1012=0;p1029*p0001/(p0818*p0002);0)
- p1508: 1
- p2473: 0.000335025; = p2277*p1014
- p2327: 0.00020457; = p2224*p2195
- p2876: 2.59998e-7; = p2290*(p1020+p1022)
- p2185: 0.000802289; = p1065-p2184
- p0537: 0; = IF(p0273<0.5;-SQRT(p0007*EXP(p0405^2*p0008)-p0007);SQRT(p0007*EXP(p0405^2*p0008)-p0007))
- p2178: 0.042205; = (p0895*p0831/(1-p0831))/(p0818)
- p3487: 0; = p1756*p3476
- p0146: 28.644
- p1935: 0
- p3899: 6.8402e-6; = p1756*p3478
- p1719: 0
- p2567: 0.000565629; = p2371*p1014
- p2893: 0; = p2307*(p1079+p1081)
- p0063: 1697.78
- p0748: 26.652; = p0088*(1+p0616*p0220/100)
- p2239: 0.000106362; = p2222*p2184
- p0056: 7.419
- p2342: 3.57366e-5; = p2228*p2210
- p0843: -0.0709004
- p2827: 3.64761e-5; = p2241*(p1020+p1022)
- p1769: 0
- p2802: 0; = p2411*(p1019+p1021)
- p3077: 0; = p2296*p1023
- p0863: 0.689353; = p0675*1000/p0856
- p0148: 32.854
- p1715: 0
- p1829: 0
- p2307: 0; = p2227*p2214
- p2232: 0; = if(p0783*p0787+p0784*p0788+p0785*p0789+p0786*p0790=0;0;p0789*p0785/(p0783*p0787+p0784*p0788+p0785*p0789+p0786*p0790))
- p2206: 8.1907e-5; = 9*1.00794*p2204/30.973762
- p1963d: 0; = p1608*p1812+p1609*p1813+p1610*p1814+p1611*p1815+p1612*p1816+p1613*p1817+p1614*p1818+p1615*p1819+p1616*p1820+p1617*p1821+p1618*p1822+p1619*p1823+p1620*p1824+p1621*p1825+p1622*p1826+p1623*p1827+p1624*p1828+p1625*p1829+p1626*p1830+p1627*p1831
- p1786: 0
- p3209: 0; = p2428*p1132
- p2808: 0; = p2417*(p1078+p1080)
- p2190: 0.000685336; = 32.065*p2189/(2*14.0067)
- p3187: 0; = p2406*p1023
- p0273: 0.5
- p2777: 0; = p2386*(p1078+p1080)
- p2409: 0; = p2234*p2199
- p1535: 4
- p2408: 0; = p2234*p2198
- p1020: 0.05701; = IF(p1012=0;IF(p1014+p1019=1;0;IF(p1014+p1019+p1016>1;1-(p1014+p1019);p1016));0)
- p3355: 0; = if(and(p1232=0;p3256<>0);p3256-(p3350+p3351+p3352+p3353+p3354);0)
- p0241: 13.82
- p3128: 6.78832e-6; = p2347*p1082
- p3127: 1.79886e-6; = p2346*p1082
- p3147: 0; = p2366*p1023
- p1621: 0
- p1657: 0.687857
- p0271: 47.861
- p3346: 0; = if(and(p1232=0;p3256<>0);p3274*(p3281*(p3285*p1256+p3286*(p1253+p1257)+p1258*p3288));0)
- p1171: 0.000261249; = p0801*p0001/(p0818*p0002)
- p0829: 0; = if(p0807=480;p0814*(1-p0824);0)
- p0402: 0.5
- p2887: 0; = p2301*(p1079+p1081)
- p2793: 0; = p2402*(p1019+p1021)
- p2114: 0.832356
- p3828: 3.9157e-8; = p1891*p3477
- p3003: 0; = p2417*(p1079+p1081)
- p1666: 0
- p3895: 8.3792e-6; = p1962*p3477
- p2588: 0; = p2392*p1123
- p1114: 0.216028
- p2645: 0.000397433; = p2254*(p1019+p1021)
- p3413: 0; = p3375*p1238
- p2487: 2.27929e-6; = p2291*p1014
- p0886: 0; = p0686*1000*p0687*p0689/100
- p0979: 0; = IF(p0976=0;0;p0976*p0001/(p0818*p0002))
- p2358: 8.46366e-5; = p2225*p2186
- p1344: 43580.8; = IF(p1318=0;p1327*p0801;0)
- p1131: 0; = if(p1121=0;IF(p1123+p1128+p1129+p1130=1;0;IF(p1123+p1128+p1129+p1130+p1127>1;1-(p1123+p1128+p1129+p1130);p1127));0)
- p1910: 0
- p2971: 0; = p2385*(p1079+p1081)
- p3351: 0; = if(and(p1232=0;p3256<>0);p3256*(p3274-p3346)/p3349;0)
- p0298: 0.5
- p0242: 25.593
- p1700: 0
- p3173: 0; = p2392*p1132
- p2759: 1.54478e-7; = p2368*(p1019+p1021)
- p0418: 0; = SQRT(2)*(IF((2*p0286-1)<0;-1;IF((2*p0286-1)>0;1;0))*SQRT(SQRT((2/(pi()*0.140012289)+LN(1-(2*p0286-1)^2)/2)^2-LN(1-(2*p0286-1)^2)/0.140012289)-(2/(pi()*0.140012289)+LN(1-(2*p0286-1)^2)/2)))
- p3190: 0; = p2409*p1023
- p1775: 0
- p2720: 1.3802e-7; = p2329*(p1019+p1021)
- p3216: 0.06; = IF(OR(p1226=0;p1228=0);0;1-p3213-p3214-p3215)
- p3281: 0
- p3419: 0; = p3362*p1239
- p2014: 4.13862e8; = p0833*p2011*p2013
- p3613: 0; = p1882*p3476
- p1865: 0
- p3236: 0.0140975
- p0309: 0.5
- p1696: 0
- p2139: 1.70405e-5; = p2015*p2067*p2101/(p0818*1000)
- p0287: 0.5
- p1556: 0
- p2508: 0; = p2312*p1123
- p1763: 0
- p0666: 0; = IF(p0402<0.5;-SQRT(p0007*EXP(p0534^2*p0008)-p0007);SQRT(p0007*EXP(p0534^2*p0008)-p0007))
- p0826: 0.1151; = 1-p0825/p0818
- p2219: 0.000563021; = p1154-p2218
- p0188: 37.219
- p2553: 8.06763e-5; = p2357*p1014
- p3208: 0; = p2427*p1082
- p2276: 0.00214366; = p2223*p2182
- p1037: 0.346912
- p2561: 0.00076047; = p2365*p1014
- p1614: 0
- p2366: 0.000228964; = p2225*p2195
- p0687: 21.973; = p0027*(1+p0555*p0159/100)
- p3469: 0; = p3374*p1241
- p2338: 4.28861e-5; = p2228*p2206
- p2374: 0.000561979; = p2225*p2203
- p3405: 0; = p3367*p1238
- p0508: 0; = SQRT(2)*(IF((2*p0376-1)<0;-1;IF((2*p0376-1)>0;1;0))*SQRT(SQRT((2/(pi()*0.140012289)+LN(1-(2*p0376-1)^2)/2)^2-LN(1-(2*p0376-1)^2)/0.140012289)-(2/(pi()*0.140012289)+LN(1-(2*p0376-1)^2)/2)))
- p0903: 0.0129401
- p2478: 0.000216749; = p2282*p1014
- p0453: 0; = SQRT(2)*(IF((2*p0321-1)<0;-1;IF((2*p0321-1)>0;1;0))*SQRT(SQRT((2/(pi()*0.140012289)+LN(1-(2*p0321-1)^2)/2)^2-LN(1-(2*p0321-1)^2)/0.140012289)-(2/(pi()*0.140012289)+LN(1-(2*p0321-1)^2)/2)))
- p0746: 0
- p2334: 4.37976e-5; = p2224*p2202
- p1877: 0
- p2459: 3.48564e-5; = p2263*p1073
- p1174: 7.08044e-8; = p1170*p1173/p0818
- p2853: 0; = p2267*(p1079+p1081)
- p3327: 0; = if(and(p1232=0;p3255<>0);1-(p3323+p3324+p3325+p3326);0)
- p2123: 0.263965
- p1089: 4.87308e-5; = IF(p1071=0;p1083*p0001/(p0818*p0002);0)
- p1832: 0
- p2042: 0.07
- p5131: 0; = p1962*p3483
- p1978: 515
- p0679: 0
- p1229: 0.000382429; = IF(p1221=0;0;p1228*p1221)
- p2785: 0; = p2394*(p1019+p1021)
- p1623: 0
- p2050: 0.952062
- p0506: 0; = SQRT(2)*(IF((2*p0374-1)<0;-1;IF((2*p0374-1)>0;1;0))*SQRT(SQRT((2/(pi()*0.140012289)+LN(1-(2*p0374-1)^2)/2)^2-LN(1-(2*p0374-1)^2)/0.140012289)-(2/(pi()*0.140012289)+LN(1-(2*p0374-1)^2)/2)))
- p3718: 1.84038e-6; = p1781*p3477
- p2550: 0.000781216; = p2354*p1014
- p3033: 0; = p2252*p1023
- p0908: 0.00197823
- p0003: 10000
- p2801: 0; = p2410*(p1019+p1021)
- p0818: 5.8056e9; = p0806*p0807
- p3369: 0; = if(p1232=0;p3245*p3357/p0818;0)
- p1046: 0.0267363; = IF(p1012=0;IF(p1037+p1044+p1045=1;0;IF(p1037+p1044+p1045+p1040>1;1-(p1037+p1044+p1045);p1040));0)
- p1925: 0
- p1275: 0; = p1271*p1252/p0818
- p1277: 0
- p1757: 0
- p2654: 0; = p2263*(p1078+p1080)
- p1048: 0.000315647; = IF(p1012=0;IF(p1037+p1044+p1045+p1046+p1047=1;0;IF(p1037+p1044+p1045+p1046+p1047+p1042>1;1-(p1037+p1044+p1045+p1046+p1047);p1042));0)
- p2118: 0.679049
- p3287: 0
- p0891: 0; = IF(p3251=0;0;62.4*6272640/(12*12*12))
- p2751: 2.41114e-5; = p2360*(p1019+p1021)
- p0268: 0
- p3353: 0; = if(and(p1232=0;p3256<>0);p3256*(p3276-p3348)/p3349;0)
- p1342: 0; = p1326*p0801
- p1294: 0; = p1290*p1252/p0818
- p3100: 0; = p2319*p1023
- p0819: 0; = p0808*p0809/p0818
- p2641: 0.00113224; = p2250*(p1019+p1021)
- p3260: 0
- p1313: 0; = p1307*p1252/p0818
- p2427: 0; = p2235*p2217
- p1663: 0
- p0409: 0; = SQRT(2)*(IF((2*p0277-1)<0;-1;IF((2*p0277-1)>0;1;0))*SQRT(SQRT((2/(pi()*0.140012289)+LN(1-(2*p0277-1)^2)/2)^2-LN(1-(2*p0277-1)^2)/0.140012289)-(2/(pi()*0.140012289)+LN(1-(2*p0277-1)^2)/2)))
- p3362: 0; = if(p1232=0;p3244*p3356/p0818;0)
- p1080: 0; = IF(p1071=0;IF(p1073+p1078+p1079=1;0;IF(p1073+p1078+p1079+p1076>1;1-(p1073+p1078+p1079);p1076));0)
- p3246: 1; = IF(p3244+p3245=1;0;1-(p3244+p3245))
- p2302: 0; = p2227*p2209
- p1821: 0
- p2593: 0; = p2397*p1014
- p2255: 0.0011012; = p2222*p2201
- p1041: 0.337699
- p2856: 0; = p2270*(p1079+p1081)
- p3172: 0; = p2391*p1132
- p3210: 0; = p2429*p1132
- p2861: 0; = p2275*(p1129+p1131)
- p4955: 0; = p1782*p3483
- p1042: 0.000315647
- p0044: 100
- p0723: 1697.78; = p0063*(1+p0591*p0195/100)
- p2765: 8.69551e-5; = p2374*(p1019+p1021)
- p3338: 0; = if(and(p1232=0;p3254<>0);1-(p3334+p3335+p3336+p3337);0)
- p1924: 0
- p3229: 1.28279e-6; = p1164/p0818
- p3153: 0; = p2372*p1023
- p2914: 0.000269557; = p2328*(p1020+p1022)
- p1596: 0
- p1319: 0; = IF(((p0745*1000*p0746/100)+(p0754*1000*p0755/100))/p0801<0;0;((p0745*1000*p0746/100)+(p0754*1000*p0755/100))/p0801)
- p1165: 0.000261249; = p0801*p0001/(p0818*p0002)
- p1963e: 1.51797e-6; = p1628*p1832+p1629*p1833+p1630*p1834+p1631*p1835+p1632*p1836+p1633*p1837+p1634*p1838+p1635*p1839+p1636*p1840+p1637*p1841+p1638*p1842+p1639*p1843+p1640*p1844+p1641*p1845+p1642*p1846+p1643*p1847+p1644*p1848+p1645*p1849+p1646*p1850
- p3441: 0; = p3365*p1240
- p2121: 0.822447
- p1617: 0
- p3404: 0; = p3366*p1238
- p5226: 1.48167e-8; = p1847*p3484
- p1254: 0; = if(p1232>0;0;p0736/100)
- p1318: 0; = p1317*p0001/(p0818*p0002)
- p2981: 0; = p2395*(p1020+p1022)
- p2974: 0; = p2388*(p1079+p1081)
- p4636: 1.59903e-5; = p1875*p3481
- p2490: 0.000473757; = p2294*p1014
- p1830: 0
- p2317: 2.93927e-5; = p2224*p2184
- p3268: 0
- p0755: 0
- p0776: 14.521; = p0116*(1+p0644*p0248/100)
- p2781: 0; = p2390*(p1128+p1130)
- p1097: 0.0162883
- p2776: 0; = p2385*(p1078+p1080)
- p4057: 2.75444e-7; = p1914*p3478
- p0914: 1.10199e8; = p0825*p0911+(p0830+p0895)*p0824*p0913
- p1103: 0.421213; = IF(p1071=0;IF(p1096+p1101+p1102=1;0;IF(p1096+p1101+p1102+p1099>1;1-(p1096+p1101+p1102);p1099));0)
- p1984: 30
- p3097: 0; = p2316*p1023
- p1790: 0
- p0888: 1.23129e6; = p0686*1000*p0687*p0884/100
- p3357: 0; = if(p1232=0;p3307+p3318+p3329+p3340+p3351;0)
- p4642: 2.4475e-7; = p1881*p3481
- p2938: 0; = p2352*(p1129+p1131)
- p0042: 1698.24
- p2786: 0; = p2395*(p1019+p1021)
- p1047: 0.337699; = IF(p1012=0;IF(p1037+p1044+p1045+p1046=1;0;IF(p1037+p1044+p1045+p1046+p1041>1;1-(p1037+p1044+p1045+p1046);p1041));0)
- p0114: 21.034
- p0127: 44.912
- p2029: 4.03
- p1709: 0
- p2538: 2.43838e-5; = p2342*p1073
- p2978: 0; = p2392*(p1129+p1131)
- p2193: 0.00756253; = p1054/p0818
- p1725: 0
- p3188: 0; = p2407*p1023
- p1302: 0; = IF(p1297+p1300+p1301=p1262;0;p1262-(p1297+p1300+p1301))
- p1560: 0
- p0023: 67.291
- p1705: 0
- p2290: 1.95047e-6; = p2223*p2197
- p2480: 0.000134637; = p2284*p1014
- p1142: 0; = if(p1121=0;p1136*p0001/(p0818*p0002);0)
- p2690: 0; = p2299*(p1078+p1080)
- p2951: 0.000142381; = p2365*(p1020+p1022)
- p3218: 0.00545935; = p3214*p1228
- p2707: 3.32979e-5; = p2316*(p1019+p1021)
- p1688: 0
- p3592: 0; = p1861*p3476
- p2832: 1.04906e-5; = p2246*(p1020+p1022)
- p4105: 6.33666e-7; = p1756*p3479
- p3233: 0.60394
- p1027: 0; = IF(p1012=0;p1021*(p0704/100)*p0703*1000;0)
- p1032: 1.48784e-5; = IF(p1012=0;p1026*p0001/(p0818*p0002);0)
- p2963: 0; = p2377*(p1079+p1081)
- p3429: 0; = p3372*p1239
- p2805: 0; = p2414*(p1078+p1080)
- p1033: 0; = IF(p1012=0;p1027*p0001/(p0818*p0002);0)
- p1749: 0
- p2750: 1.88478e-6; = p2359*(p1019+p1021)
- p1132: 0.24912; = if(p1121=0;IF(p1123+p1128+p1129+p1130+p1131=1;0;1-(p1123+p1128+p1129+p1130+p1131));0)
- p5322: 5.3879e-9; = p1943*p3484
- p1900: 0
- p3008: 0; = p2422*(p1079+p1081)
- p4104: 1.36089e-6; = p1755*p3479
- p0571: 0; = IF(p0307<0.5;-SQRT(p0007*EXP(p0439^2*p0008)-p0007);SQRT(p0007*EXP(p0439^2*p0008)-p0007))
- p0791: 0
- p1945: 0
- p2089: 0.40001
- p2039: 3.72734e-5; = p2015*p2037*p2038/(p0818*1000)
- p2606: 0; = p2410*p1014
- p3364: 0; = if(p1232=0;p3244*p3358/p0818;0)
- p1647: 0
- p1578: 0.6832
- p2564: 7.10811e-7; = p2368*p1014
- p0026: 60.721
- p3053: 9.95309e-5; = p2272*p1132
- p0981: 0; = p0978*p0001/(p0818*p0002)
- p2952: 3.05209e-5; = p2366*(p1020+p1022)
- p1320: 0.745241; = IF(((p0745*1000*p0747/100)+(p0754*1000*p0756/100))/p0801<0;0;((p0745*1000*p0747/100)+(p0754*1000*p0756/100))/p0801)
- p2811: 0; = p2420*(p1078+p1080)
- p2453: 0.00129361; = p2257*p1014
- p1897: 0
- p1742: 0
- p0210: 0.027
- p2741: 0; = p2350*(p1128+p1130)
- p0430: 0; = SQRT(2)*(IF((2*p0298-1)<0;-1;IF((2*p0298-1)>0;1;0))*SQRT(SQRT((2/(pi()*0.140012289)+LN(1-(2*p0298-1)^2)/2)^2-LN(1-(2*p0298-1)^2)/0.140012289)-(2/(pi()*0.140012289)+LN(1-(2*p0298-1)^2)/2)))
- p0712: 0
- p0221: 49.385
- p0563: 0; = IF(p0299<0.5;-SQRT(p0007*EXP(p0431^2*p0008)-p0007);SQRT(p0007*EXP(p0431^2*p0008)-p0007))
- p2140: 8.71392e-6; = p2015*p2068*p2102/(p0818*1000)
- p5134: 4.31032e-7; = p1755*p3484
- p3422: 0; = p3365*p1239
- p2198: 1.16021e-5; = 22.98976928*p2197/14.0067
- p1316: 0; = p1312*p1252/p0818
- p0291: 0.5
- p2873: 0.000278162; = p2287*(p1020+p1022)
- p2176: 0.00320104; = p0895*p0913/p0818
- p3244: 0; = p0791/100
- p2149: 2.26519e-6; = p2015*p2077*p2111/(p0818*1000)
- p2758: 0.000350203; = p2367*(p1019+p1021)
- p3055: 1.7092e-5; = p2274*p1132
- p1827: 0
- p0442: 0; = SQRT(2)*(IF((2*p0310-1)<0;-1;IF((2*p0310-1)>0;1;0))*SQRT(SQRT((2/(pi()*0.140012289)+LN(1-(2*p0310-1)^2)/2)^2-LN(1-(2*p0310-1)^2)/0.140012289)-(2/(pi()*0.140012289)+LN(1-(2*p0310-1)^2)/2)))
- p1784: 0
- p4416: 0; = p1861*p3480
- p1751: 0
- p2428: 0; = p2236*p2218
- p1964: 0.5
- p0824: 0.863
- p0697: 0
- p0859: 0; = p0671*1000/p0856
- p2143: 8.25095e-6; = p2015*p2071*p2105/(p0818*1000)
- p0989: 0; = p0985*p0886
- p2373: 4.90203e-5; = p2225*p2202
- p3390: 0; = p3371*p1234
- p2146: 1.27129e-6; = p2015*p2074*p2108/(p0818*1000)
- p1977: 951.446; = p1252+p1188
- p1876: 0
- p3013: 0; = p2427*(p1079+p1081)
- p1973: 0; = if(p0807=480;p1968*p0001/(p0818*p0002);0)
- p0517: 0; = SQRT(2)*(IF((2*p0385-1)<0;-1;IF((2*p0385-1)>0;1;0))*SQRT(SQRT((2/(pi()*0.140012289)+LN(1-(2*p0385-1)^2)/2)^2-LN(1-(2*p0385-1)^2)/0.140012289)-(2/(pi()*0.140012289)+LN(1-(2*p0385-1)^2)/2)))
- p3681: 0; = p1950*p3476
- p1848: 0
- p3192: 0; = p2411*p1023
- p1808: 0
- p0842: 0.152728
- p5087: 0; = p1914*p3483
- p1307: 0
- p1212: 0.0239904; = if(p1211=0;0;if(p1193>0;0;(p1207+p1208+p1209)*p1210/(2000*p1211)))
- p0035: 22.384
- p2277: 0.00047056; = p2223*p2183
- p1542: 3
- p0459: 0; = SQRT(2)*(IF((2*p0327-1)<0;-1;IF((2*p0327-1)>0;1;0))*SQRT(SQRT((2/(pi()*0.140012289)+LN(1-(2*p0327-1)^2)/2)^2-LN(1-(2*p0327-1)^2)/0.140012289)-(2/(pi()*0.140012289)+LN(1-(2*p0327-1)^2)/2)))
- p1182: 166.113; = p1181*p0801
- p3298: 0; = if(p1283+p1284+p1285+p1286=0;0;p1283/(p1283+p1284+p1285+p1286))
- p0045: 71.197
- p1088: 147639; = IF(p1071=0;p1082*(p0710/100)*p0703*1000;0)
- p0609: 0; = IF(p0345<0.5;-SQRT(p0007*EXP(p0477^2*p0008)-p0007);SQRT(p0007*EXP(p0477^2*p0008)-p0007))
- p1839: 0
- p1007: 4.80617e-6; = p1003*p0001*p0004/(p0818*p0002)
- p2792: 0; = p2401*(p1019+p1021)
- p2076: 0.057
- p1915: 1.03348e-6; = p1507*1000/p0818
- p0949: 0; = if(and(p0683=0;or(p0807=480;p0807=32;p0807=1;and(p0807=60;p0901<0.03)));p0937;0)
- p2335: 0.000502105; = p2224*p2203
- p3122: 2.62938e-5; = p2341*p1082
- p1119: 0.00129458; = IF(p1071=0;p1109/(p1114*p0818);0)
- p2068: 0.153529
- p0638: 0; = IF(p0374<0.5;-SQRT(p0007*EXP(p0506^2*p0008)-p0007);SQRT(p0007*EXP(p0506^2*p0008)-p0007))
- p1122: 0; = p1121*p0001/(p0818*p0002)
- p2577: 7.13636e-6; = p2381*p1073
- p3110: 0; = p2329*p1023
- p3342: 0; = if(and(p1232=0;p3254<>0);p3254*(p3272-p3337)/p3338;0)
- p2078: 0.117
- p1692: 0
- p0177: 9.758
- p0431: 0; = SQRT(2)*(IF((2*p0299-1)<0;-1;IF((2*p0299-1)>0;1;0))*SQRT(SQRT((2/(pi()*0.140012289)+LN(1-(2*p0299-1)^2)/2)^2-LN(1-(2*p0299-1)^2)/0.140012289)-(2/(pi()*0.140012289)+LN(1-(2*p0299-1)^2)/2)))
- p0731: 0
- p3054: 0.00014026; = p2273*p1132
- p0650: 0; = IF(p0386<0.5;-SQRT(p0007*EXP(p0518^2*p0008)-p0007);SQRT(p0007*EXP(p0518^2*p0008)-p0007))
- p2321: 0.000139227; = p2224*p2188
- p2271: 6.80504e-5; = p2226*p2217
- p0965: 0.20353; = IF(p0684/100=1;0;IF(p0684/100+p0685/100>1;1-p0684/100;p0685/100))
- p2512: 0.000153216; = p2316*p1014
- p1347: 320
- p1880: 0
- p3431: 0; = p3374*p1239
- p2356: 3.28977e-5; = p2225*p2184
- p2413: 0; = p2234*p2203
- p4206: 2.63248e-6; = p1857*p3479
- p2639: 0.000534336; = p2248*(p1019+p1021)
- p2920: 5.83822e-6; = p2334*(p1020+p1022)
- p0876: 311142; = p0866*p0856
- p3389: 0; = p3370*p1234
- p1817: 0
- p2716: 2.72326e-5; = p2325*(p1019+p1021)
- p0107: 47.89
- p1854: 0
- p2082: 0.285294
- p3462: 0; = p3367*p1241
- p2081: 0.0019
- p2933: 0; = p2347*(p1079+p1081)
- p4402: 0; = p1847*p3480
- p2210: 6.82525e-5; = 6*1.00794*p2208/30.973762
- p1909: 0
- p0541: 0; = IF(p0277<0.5;-SQRT(p0007*EXP(p0409^2*p0008)-p0007);SQRT(p0007*EXP(p0409^2*p0008)-p0007))
- p2457: 0.000149957; = p2261*p1073
- p2964: 0; = p2378*(p1079+p1081)
- p3349: 0; = if(and(p1232=0;p3256<>0);1-(p3345+p3346+p3347+p3348);0)
- p1005: 0; = p1001*p0888
- p0381: 0.5
- p2341: 8.27682e-5; = p2228*p2209
- p2186: 0.000599245; = p1052/p0818
- p0976: 0; = IF(p0687=0;IF(OR(p0686=0;p0689=0);0;p0686*1000*p0689/100);0)
- p1852: 0
- p1255: 0; = if(p1232>0;0;p0737/100)
- p2519: 6.15734e-5; = p2323*p1014
- p2877: 4.26745e-7; = p2291*(p1020+p1022)
- p2592: 0; = p2396*p1014
- p1722: 0
- p3213: 0.112803; = p1222*12.0107/100.0869
- p3159: 3.31064e-5; = p2378*p1082
- p3232: 2.86125e-8; = p1182/p0818
- p1773: 0
- p2396: 0; = p2234*p2185
- p0635: 0; = IF(p0371<0.5;-SQRT(p0007*EXP(p0503^2*p0008)-p0007);SQRT(p0007*EXP(p0503^2*p0008)-p0007))
- p3312: 0; = if(and(p1232=0;p3253<>0);p3261*p3277*(p3298*p3290+(1-p3298)*p3294);0)
- p1272: 0; = IF(p1267+p1270+p1271=p1259;0;p1259-(p1267+p1270+p1271))
- p1281: 0; = IF(p1277+p1280=p1263;0;IF(p1277+p1280+p1279>p1263;p1263-(p1277+p1280);p1279))
- p2944: 1.12821e-5; = p2358*(p1020+p1022)
- p2686: 1.48183e-5; = p2295*(p1019+p1021)
- p0887: 0; = 1000*p0886*p0001*p0003*p0004/(p0818*p0002)
- p2532: 9.99128e-5; = p2336*p1073
- p1963g: 1.65972e-5; = p1667*p1871+p1668*p1872+p1669*p1873+p1670*p1874+p1671*p1875+p1672*p1876+p1673*p1877+p1674*p1878+p1675*p1879+p1676*p1880+p1677*p1881+p1678*p1882+p1679*p1883+p1680*p1884+p1681*p1885+p1682*p1886+p1683*p1887+p1684*p1888+p1685*p1889
- p2095: 0.765734
- p3450: 0; = p3374*p1240
- p1258: 0; = if(p1232>0;0;IF(p1253+p1256+p1257=1;0;1-(p1253+p1256+p1257)))
- p3414: 0; = p3376*p1238
- p1282: 0; = IF(p1277+p1280+p1281=p1260;0;p1260-(p1277+p1280+p1281))
- p1092: 0; = IF(p1071=0;p1086*p0001/(p0818*p0002);0)
- p2019: 0.13105
- p2740: 0; = p2349*(p1078+p1080)
- p1474: 3
- p2581: 1.13076e-6; = p2385*p1073
- p3026: 0; = p2245*p1023
- p1113: 0.100377
- p1049: 0.251177; = IF(p1012=0;IF(p1037+p1044+p1045+p1046+p1047+p1048=1;0;1-(p1037+p1044+p1045+p1046+p1047+p1048));0)
- p0777: 14.027; = p0117*(1+p0645*p0249/100)
- p2739: 0; = p2348*(p1078+p1080)
- p0852: 0; = p0847*p0851^3+p0848*p0851^2+p0849*p0851+p0850
- p1797: 0
- p3270: 0
- p2416: 0; = p2235*p2206
- p2631: 5.66864e-5; = p2240*(p1019+p1021)
- p2860: 0; = p2274*(p1129+p1131)
- p0866: 0.183025; = IF(p0858+p0864+p0865=1;0;IF(p0858+p0864+p0865+p0861>1;1-(p0858+p0864+p0865);p0861))
- p0848: 0
- p2778: 0; = p2387*(p1078+p1080)
- p2051: 0.00150494; = p2015*p2049*p2050/(p0818*1000)
- p1939: 0
- p2613: 0; = p2417*p1073
- p3406: 0; = p3368*p1238
- p4018: 8.99785e-6; = p1875*p3478
- p0352: 0.5
- p3381: 0; = p3362*p1234
- p0889: 48.0617; = 1000*p0888*p0001*p0003*p0004/(p0818*p0002)
- p2899: 0; = p2313*(p1129+p1131)
- p0160: 311.779
- p2174: 0.00344026; = p0895*p0903/p0818
- p1682: 0
- p2991: 0; = p2405*(p1020+p1022)
- p1021: 0; = IF(p1012=0;IF(p1014+p1019+p1020=1;0;IF(p1014+p1019+p1020+p1017>1;1-(p1014+p1019+p1020);p1017));0)
- p0123: 32.117
- p0958: 0; = if(and(p0683>0;or(p0807=480;p0807=32;p0807=1;and(p0807=60;p0901<0.03)));p0934;0)
- p1200: 0.84
- p1892: 0
- p2361: 8.45652e-5; = p2225*p2189
- p4469: 0; = p1914*p3480
- p3200: 0; = p2419*p1082
- p2169: 0.00104506; = p2166*(p0908)
- p0310: 0.5
- p0239: 27.348
- p3157: 1.23132e-5; = p2376*p1082
- p1179: 0.5
- p3222: 0.224242; = IF(p3216=0;0;p1223*40.078/100.0869)
- p2233: 0; = if(p0783*p0787+p0784*p0788+p0785*p0789+p0786*p0790=0;0;p0790*p0786/(p0783*p0787+p0784*p0788+p0785*p0789+p0786*p0790))
- p3302: 0; = if(and(p1232=0;p3252<>0);p3258*(p3278*(p3282*p1256+p3286*(p1253+p1257)+p1258*p3288+p3297*p3287));0)
- p2890: 0; = p2304*(p1079+p1081)
- p0663: 0; = IF(p0399<0.5;-SQRT(p0007*EXP(p0531^2*p0008)-p0007);SQRT(p0007*EXP(p0531^2*p0008)-p0007))
- p2147: 3.66132e-6; = p2015*p2075*p2109/(p0818*1000)
- p0004: 0.0254
- p3243: 8.4861e-10; = p3234*p1188*p3239/p0818
- p3066: 0; = p2285*p1023
- p5254: 2.64007e-7; = p1875*p3484
- p3289: 0
- p1711: 0.575083
- p0405: 0; = SQRT(2)*(IF((2*p0273-1)<0;-1;IF((2*p0273-1)>0;1;0))*SQRT(SQRT((2/(pi()*0.140012289)+LN(1-(2*p0273-1)^2)/2)^2-LN(1-(2*p0273-1)^2)/0.140012289)-(2/(pi()*0.140012289)+LN(1-(2*p0273-1)^2)/2)))
- p3471: 0; = p3376*p1241
- p2383: 6.32796e-8; = p2229*p2212
- p2160: 4.40799e-6; = p2015*p2084*p2122/(p0818*1000)
- p4711: 2.4475e-7; = p1950*p3481
- p1263: 0; = if(p1232>0;0;IF(p1259=1;0;IF(p1259+p1260>1;1-p1259;p1260)))
- p0935: 0.000211617; = p0929*p0001/(p0818*p0002)
- p3358: 0; = if(p1232=0;p3308+p3319+p3330+p3341+p3352;0)
- p2323: 8.64831e-5; = p2224*p2190
- p1804: 0
- p3247: 0
- p0936: 4.48638e-5; = p0930*p0001/(p0818*p0002)
- p5294: 8.08185e-9; = p1915*p3484
- p2935: 0; = p2349*(p1079+p1081)
- p3124: 0.00014867; = p2343*p1082
- p0924: 0.171728; = IF(p0918+p0923=1;0;IF(p0918+p0923+p0920>1;1-(p0918+p0923);p0920))
- p1339: 0.000405642; = p1338*p0001/(p0818*p0002)
- p0974: 0.5
- p3225: 5.62075e-5; = p3221*p1229
- p1095: 8.83239e6; = IF(p1071=0;p0797*p0702*1000*p0798/100;0)
- p1096: 0.000621953
- p3254: 0; = p1252*(p1287*(1-p3247)+p1290*(1-p3248)+p1291*(1-p3249)+p1292*(1-p3250))
- p5064: 0; = p1891*p3483
- p2831: 4.17164e-5; = p2245*(p1020+p1022)
- p3183: 0; = p2402*p1023
- p1147: 0.146558
- p0796: 100; = p0136*(1+p0664*p0268/100)
- p2826: 4.88354e-5; = p2240*(p1020+p1022)
- p2316: 0.0002152; = p2224*p2183
- p2466: 5.18074e-6; = p2270*p1073
- p1550: 0
- p2579: 4.31769e-8; = p2383*p1073
- p1329: 0; = p1328*p0001/(p0818*p0002)
- p3451: 0; = p3375*p1240
- p1111: 0.0872841
- p1216: 0.0263674
- p4308: 4.7478e-6; = p1963*p3479
- p0921: 0; = p0679*1000/p0801
- p3690: 0; = p1963*p3476
- p1813: 0
- p0993: 0; = p0989*p0001*p0004/(p0818*p0002)
- p3137: 0; = p2356*p1023
- p1264: 0; = if(p1232>0;0;IF(p1259+p1263=1;0;IF(p1259+p1263+p1261>1;1-(p1259+p1263);p1261)))
- p3027: 0; = p2246*p1023
- p2371: 0.000794456; = p2225*p2200
- p3332: 0; = if(and(p1232=0;p3255<>0);IF((p3328+p3329+p3330+p3331)+(p3255*(p3265*(1-p3277))/p3327)>p3255;p3255-(p3328+p3329+p3330+p3331);p3255*(p3265*(1-p3277))/p3327);0)
- p0028: 92.285
- p0938: 0; = p0932*p0001/(p0818*p0002)
- p3223: 0.126838; = IF(p3216=0;0;(1-p1223)*24.3050/84.3139)
- p0525: 0; = SQRT(2)*(IF((2*p0393-1)<0;-1;IF((2*p0393-1)>0;1;0))*SQRT(SQRT((2/(pi()*0.140012289)+LN(1-(2*p0393-1)^2)/2)^2-LN(1-(2*p0393-1)^2)/0.140012289)-(2/(pi()*0.140012289)+LN(1-(2*p0393-1)^2)/2)))
- p0960: 4.48638e-5; = if(and(p0683>0;or(p0807=480;p0807=32;p0807=1;and(p0807=60;p0901<0.03)));p0936;0)
- p1153: 0.365265
- p2441: 0.000222812; = p2245*p1014
- p1664: 0
- p2192: 0.00139472; = p1067-p2189-p2190-p2191
- p1841: 0
- p0369: 0.5
- p2404: 0; = p2234*p2193
- p2816: 0; = p2425*(p1078+p1080)
- p1956: 0
- p0867: 0.126318; = IF(p0858+p0864+p0865+p0866=1;0;IF(p0858+p0864+p0865+p0866+p0862>1;1-(p0858+p0864+p0865+p0866);p0862))
- p0673: 311.142; = p0013*(1+p0541*p0145/100)
- p2203: 0.00397893; = p1070-p2200-p2201-p2202
- p0616: 0; = IF(p0352<0.5;-SQRT(p0007*EXP(p0484^2*p0008)-p0007);SQRT(p0007*EXP(p0484^2*p0008)-p0007))
- p1721: 0
- p0980: 0; = IF(p0977=0;0;p0977*p0001/(p0818*p0002))
- p3328: 0; = if(and(p1232=0;p3255<>0);p3255*(p3265*p3277-p3323)/p3327;0)
- p3925: 6.05978e-6; = p1782*p3478
- p3339: 0; = if(and(p1232=0;p3254<>0);p3254*(p3269*p3277-p3334)/p3338;0)
- p0665: 0; = IF(p0401<0.5;-SQRT(p0007*EXP(p0533^2*p0008)-p0007);SQRT(p0007*EXP(p0533^2*p0008)-p0007))
- p0931: 0; = p0801*p0925
- p3474: 0; = p3379*p1241
- p2228: 0.523595; = if(p0774*p0778+p0775*p0779+p0776*p0780+p0777*p0781=0;0;p0780*p0776/(p0774*p0778+p0775*p0779+p0776*p0780+p0777*p0781))
- p1787: 0
- p3095: 0; = p2314*p1132
- p0181: 38.525
- p1558: 0
- p3316: 0; = if(and(p1232=0;p3253<>0);1-(p3312+p3313+p3314+p3315);0)
- p1199: -0.29
- p0786: 0
- p0707: 5.701; = p0047*(1+p0575*p0179/100)
- p2540: 1.47529e-7; = p2344*p1073
- p0830: 6.71079e9; = p0825*p0821*p0824
- p0928: 0; = p0801*p0918
- p2545: 7.52296e-5; = p2349*p1073
- p2322: 7.55555e-5; = p2224*p2189
- p0503: 0; = SQRT(2)*(IF((2*p0371-1)<0;-1;IF((2*p0371-1)>0;1;0))*SQRT(SQRT((2/(pi()*0.140012289)+LN(1-(2*p0371-1)^2)/2)^2-LN(1-(2*p0371-1)^2)/0.140012289)-(2/(pi()*0.140012289)+LN(1-(2*p0371-1)^2)/2)))
- p1750: 0
- p1239: 0; = if(p1232>0;0;IF(p1234+p1238=1;0;IF(p1234+p1238+p1236>1;1-(p1234+p1238);p1236)))
- p0668: 0; = IF(p0404<0.5;-SQRT(p0007*EXP(p0536^2*p0008)-p0007);SQRT(p0007*EXP(p0536^2*p0008)-p0007))
- p2482: 0.000274; = p2286*p1014
- p4131: 5.61368e-7; = p1782*p3479
- p3407: 0; = p3369*p1238
- p1240: 0; = if(p1232>0;0;IF(p1234+p1238+p1239=1;0;IF(p1234+p1238+p1239+p1237>1;1-(p1234+p1238+p1239);p1237)))
- p0145: 29.361
- p2030: 6.61
- p1331: 0.000194693; = p1330*p0001/(p0818*p0002)
- p3177: 0; = p2396*p1023
- p1950: 5.16742e-7; = p1542*1000/p0818
- p3368: 0; = if(p1232=0;p3245*p3356/p0818;0)
- p2961: 0; = p2375*(p1079+p1081)
- p3089: 0; = p2308*p1082
- p2090: 0.40001
- p2950: 2.62586e-5; = p2364*(p1020+p1022)
- p1115: 0.237849
- p3163: 4.35108e-5; = p2382*p1082
- p2308: 0; = p2227*p2215
- p2235: 0; = 1-(p2226+p2227+p2228+p2229)
- p1801: 0
- p0292: 0.5
- p3397: 0; = p3378*p1234
- p1334: 137597; = p1322*p0801
- p0254: 37.219
- p0179: 42.834
- p0422: 0; = SQRT(2)*(IF((2*p0290-1)<0;-1;IF((2*p0290-1)>0;1;0))*SQRT(SQRT((2/(pi()*0.140012289)+LN(1-(2*p0290-1)^2)/2)^2-LN(1-(2*p0290-1)^2)/0.140012289)-(2/(pi()*0.140012289)+LN(1-(2*p0290-1)^2)/2)))
- p1117: 5.16257e-5; = IF(p1071=0;p1107/(p1112*p0818);0)
- p1594: 0
- p3231: 6.79399e-8; = p1176/p0818
- p2692: 0; = p2301*(p1078+p1080)
- p2643: 8.19758e-7; = p2252*(p1019+p1021)
- p1152: 0.415074
- p3427: 0; = p3370*p1239
- p2201: 0.00241154; = 12.01*p2200/(2*14.0067)
- p2156: 1.4007e-6; = p2015*p2085*p2118/(p0818*1000)
- p2434: 0.000554433; = p2238*p1014
- p0007: 29; = p0006-1
- p1058: 0.225
- p1236: 0; = if(p1232>0;0;p0728/100)
- p2866: 2.20412e-5; = p2280*(p1020+p1022)
- p1230: 0.5
- p1315: 0; = p1311*p1252/p0818
- p0519: 0; = SQRT(2)*(IF((2*p0387-1)<0;-1;IF((2*p0387-1)>0;1;0))*SQRT(SQRT((2/(pi()*0.140012289)+LN(1-(2*p0387-1)^2)/2)^2-LN(1-(2*p0387-1)^2)/0.140012289)-(2/(pi()*0.140012289)+LN(1-(2*p0387-1)^2)/2)))
- p0750: 0
- p1615: 0
- p1916: 1.72247e-7; = p1508*1000/p0818
- p1337: 0; = p1336*p0001/(p0818*p0002)
- p1744: 0
- p0002: 0.453592
- p1571: 0
- p1030: 0.000185809; = IF(p1012=0;p1024*p0001/(p0818*p0002);0)
- p0737: 0
- p5132: 0; = p1963*p3483
- p0523: 0; = SQRT(2)*(IF((2*p0391-1)<0;-1;IF((2*p0391-1)>0;1;0))*SQRT(SQRT((2/(pi()*0.140012289)+LN(1-(2*p0391-1)^2)/2)^2-LN(1-(2*p0391-1)^2)/0.140012289)-(2/(pi()*0.140012289)+LN(1-(2*p0391-1)^2)/2)))
- p0894: 0.23
- p2041: 2.7069e-5; = p2015*p2040/(p0818*1000)
- p3326: 0; = if(and(p1232=0;p3255<>0);p3268*p3289;0)
- p2485: 0.00314814; = p2289*p1014
- p0870: 0; = p0858*p0856
- p0902: 0
- p2983: 0; = p2397*(p1020+p1022)
- p2770: 0; = p2379*(p1078+p1080)
- p1143: 0; = if(p1121=0;p1137*p0001/(p0818*p0002);0)
- p1969: 0; = p0803
- p3333: 0; = if(and(p1232=0;p3255<>0);p3255-(p3328+p3329+p3330+p3331+p3332);0)
- p0617: 0; = IF(p0353<0.5;-SQRT(p0007*EXP(p0485^2*p0008)-p0007);SQRT(p0007*EXP(p0485^2*p0008)-p0007))
- p0822: 0.8849
- p0411: 0; = SQRT(2)*(IF((2*p0279-1)<0;-1;IF((2*p0279-1)>0;1;0))*SQRT(SQRT((2/(pi()*0.140012289)+LN(1-(2*p0279-1)^2)/2)^2-LN(1-(2*p0279-1)^2)/0.140012289)-(2/(pi()*0.140012289)+LN(1-(2*p0279-1)^2)/2)))
- p0682: 1698.52; = p0022*(1+p0550*p0154/100)
- p2543: 1.45801e-5; = p2347*p1073
- p0240: 26.735
- p2132: 1.5458e-5; = p2015*p2060*p2094/(p0818*1000)
- p2596: 0; = p2400*p1014
- p0988: 0; = p0982*p0886
- p5160: 6.33078e-8; = p1781*p3484
- p2386: 6.25385e-6; = p2229*p2215
- p2530: 3.11826e-5; = p2334*p1014
- p1311: 0; = IF(p1307+p1310=p1266;0;IF(p1307+p1310+p1309>p1266;p1266-(p1307+p1310);p1309))
- p2800: 0; = p2409*(p1019+p1021)
- p0671: 0
- p2657: 0; = p2266*(p1078+p1080)
- p3269: 0
- p1014: 0.71197; = IF(p1012=0;p0705/100;0)
- p3380: 0; = p3251/p0818
- p1006: 0; = p1002*p0001*p0004/(p0818*p0002)
- p4842: 0; = p1875*p3482
- p1107: 62785.5; = IF(p1071=0;p1105*p1101*p1095;0)
- p1039: 0.0267589
- p3258: 0
- p0899: 5.62008e9; = p0825*p0896+(p0830+p0895)*p0824*p0898
- p2942: 4.38526e-6; = p2356*(p1020+p1022)
- p1800: 0
- p1899: 0
- p1065: 0.00103521; = IF(p1012=0;p1051/(p1058*p0818);0)
- p0036: 95.852
- p4719: 1.7458e-5; = p1962*p3481
- p1228: 0.0145039; = IF(p1221=0;0;p0801*p1212*2000/(p1222+p1221*p1225)/p0818)
- p0238: 10.94
- p2107: 0.881623
- p1241: 0; = if(p1232>0;0;IF(p1234+p1238+p1239+p1240=1;0;1-(p1234+p1238+p1239+p1240)))
- p2700: 0; = p2309*(p1078+p1080)
- p3135: 0; = p2354*p1023
- p2566: 2.56508e-6; = p2370*p1014
- p2244: 0.000273408; = p2222*p2189
- p2034: 0.00018254; = p2015*p2030*p2032/(p0818*1000)
- p2773: 0; = p2382*(p1078+p1080)
- p3115: 0; = p2334*p1023
- p2351: 0; = p2232*p2219
- p2523: 0.000145648; = p2327*p1014
- p3476: 0; = if(p1328+p1330+p1332+p1334+p1336+p1338+p1340+p1342+p1344=0;0;p1328/(p1328+p1330+p1332+p1334+p1336+p1338+p1340+p1342+p1344))
- p2254: 0.00256856; = p2222*p2200
- p2491: 6.81844e-5; = p2295*p1014
- p3220: 0.000870234; = p3216*p1228
- p3341: 0; = if(and(p1232=0;p3254<>0);p3254*(p3271-p3336)/p3338;0)
- p2837: 4.30271e-7; = p2251*(p1020+p1022)
- p1270: 0; = IF(p1267=p1259;0;IF(p1267+p1268>p1259;p1259-p1267;p1268))
- p3186: 0; = p2405*p1023
- p3418: 0; = p3380*p1238
- p0926: 0; = IF(p0918+p0923+p0924+p0925=1;0;IF(p0918+p0923+p0924+p0925+p0922>1;1-(p0918+p0923+p0924+p0925);p0922))
- p1931: 0
- p0849: 0
- p1570: 0
- p2669: 9.94459e-6; = p2278*(p1019+p1021)
- p2333: 0.000304314; = p2224*p2201
- p0122: 7.419
- p1206: 0.023475
- p1994: 750
- p1902: 0
- p1901: 0
- p2948: 1.29029e-5; = p2362*(p1020+p1022)
- p2679: 6.92133e-5; = p2288*(p1019+p1021)
- p3252: 0; = p1252*(p1267*(1-p3247)+p1270*(1-p3248)+p1271*(1-p3249)+p1272*(1-p3250))
- p3403: 0; = p3365*p1238
- p1756: 2.56649e-5; = p1348*1000/p0818
- p3084: 0; = p2303*p1082
- p0814: 0; = if(p0807=480;p0810*p0812+p0811*p0813;0)
- p1833: 0
- p1284: 0; = p1280*p1252/p0818
- p1223: 0.56
- p2221: 0.000119225; = p1155-p2220
- p3102: 0; = p2321*p1023
- p0613: 0; = IF(p0349<0.5;-SQRT(p0007*EXP(p0481^2*p0008)-p0007);SQRT(p0007*EXP(p0481^2*p0008)-p0007))
- p1741: 0
- p3898: 1.46904e-5; = p1755*p3478
- p3151: 0; = p2370*p1023
- p0670: 0
- p2905: 1.008e-5; = p2319*(p1020+p1022)
- p1694: 0
- p2209: 0.000158077; = 14.0067*p2208/30.973762
- p1781: 8.09563e-6; = p1373*1000/p0818
- p1649: 0
- p3277: 0
- p2763: 5.27014e-5; = p2372*(p1019+p1021)
- p0957: 0; = if(and(p0683>0;or(p0807=56;p0807=100;and(p0807=60;p0901>0.06)));p0939;0)
- p2031: 0.465411
- p3647: 0; = p1916*p3476
- p1753: 0
- p1856: 0
- p1625: 0
- p0404: 0.5
- p1338: 2.63959e6; = p1324*p0801
- p2215: 4.0811e-5; = p1117-p2214
- p1192: 8.19421e-8; = p1188*p1191/p0818
- p2699: 0; = p2308*(p1078+p1080)
- p1823: 0
- p1815: 0
- p0721: 0
- p3179: 0; = p2398*p1023
- p1723: 0
- p3021: 0; = p2240*p1023
- p1145: 3.27391e6; = if(p1121=0;p0799*p0702*1000*p0800/100;0)
- p3040: 2.59672e-5; = p2259*p1082
- p1780: 0
- p0705: 71.197; = p0045*(1+p0573*p0177/100)
- p0155: 3.766
- p0158: 21.367
- p2766: 0; = p2375*(p1078+p1080)
- p0344: 0.5
- p3121: 5.81449e-5; = p2340*p1082
- p3461: 0; = p3366*p1241
- p1029: 0; = IF(p1012=0;IF(p0801<p1023*(p0704/100)*p0703*1000;p0801;p1023*(p0704/100)*p0703*1000);0)
- p4618: 5.05001e-5; = p1857*p3481
- p1109: 1.62362e6; = IF(p1071=0;p1105*p1103*p1095;0)
- p2761: 5.57459e-7; = p2370*(p1019+p1021)
- p3372: 0; = if(p1232=0;p3245*p3360/p0818;0)
- p1197: 1.806
- p2309: 0; = p2227*p2216
- p3074: 0; = p2293*p1023
- p1112: 0.209482
- p1630: 0
- p2344: 2.16217e-7; = p2228*p2212
- p1260: 0; = if(p1232>0;0;p0731/100)
- p0972: 0.0156801; = p0969/p0818
- p2628: 0.000548913; = p2237*(p1019+p1021)
- p3125: 6.86877e-8; = p2344*p1082
- p3479: 0.02469; = if(p1328+p1330+p1332+p1334+p1336+p1338+p1340+p1342+p1344=0;0;p1334/(p1328+p1330+p1332+p1334+p1336+p1338+p1340+p1342+p1344))
- p2769: 0; = p2378*(p1078+p1080)
- p2836: 0.000975429; = p2250*(p1020+p1022)
- p3345: 0; = if(and(p1232=0;p3256<>0);p3273*p3277*p3293;0)
- p2955: 2.18435e-7; = p2369*(p1020+p1022)
- p1126: 0; = if(p1121=0;p0720/100;0)
- p3467: 0; = p3372*p1241
- p1738: 0
- p3093: 0; = p2312*p1132
- p1922: 0
- p0877: 0.47815; = p0876*p0001*p0003/(p0818*p0002)
- p3061: 0; = p2280*p1023
- p2696: 0; = p2305*(p1078+p1080)
- p2591: 0; = p2395*p1014
- p2651: 0; = p2260*(p1078+p1080)
- p2937: 0; = p2351*(p1129+p1131)
- p1611: 0
- p0677: 0
- p1793: 0
- p2880: 8.87002e-5; = p2294*(p1020+p1022)
- p3382: 0; = p3363*p1234
- p1795: 0
- p2084: 0.21
- p1288: 0
- p2218: 0.00039953; = p1150/p0818
- p1195: 0.45
- p3314: 0; = if(and(p1232=0;p3253<>0);p3263*p3289;0)
- p1081: 0; = IF(p1071=0;IF(p1073+p1078+p1079+p1080=1;0;IF(p1073+p1078+p1079+p1080+p1077>1;1-(p1073+p1078+p1079+p1080);p1077));0)
- p1739: 0.583082
- p0178: 29.642
- p1836: 0
- p2721: 2.26537e-7; = p2330*(p1019+p1021)
- p3037: 0; = p2256*p1023
- p3103: 0; = p2322*p1023
- p2405: 0; = p2234*p2195
- p2754: 3.76639e-6; = p2363*(p1019+p1021)
- p0672: 0
- p2001: 400
- p2580: 4.51494e-7; = p2384*p1073
- p0684: 0
- p2682: 4.95351e-7; = p2291*(p1019+p1021)
- p3434: 0; = p3377*p1239
- p2693: 0; = p2302*(p1078+p1080)
- p1990: 30
- p1907: 0
- p0220: 15.253
- p3082: 0; = p2301*p1082
- p0085: 5573
- p0634: 0; = IF(p0370<0.5;-SQRT(p0007*EXP(p0502^2*p0008)-p0007);SQRT(p0007*EXP(p0502^2*p0008)-p0007))
- p0267: 9.049
- p1072: 0; = p1071*p0001/(p0818*p0002)
- p1045: 0.0267589; = IF(p1012=0;IF(p1037+p1044=1;0;IF(p1037+p1044+p1039>1;1-(p1037+p1044);p1039));0)
- p2813: 0; = p2422*(p1078+p1080)
- p2253: 1.16482e-5; = p2222*p2199
- p0801: 1.7e6
- p1697: 0
- p1736: 0
- p3170: 0; = p2389*p1132
- p0579: 0; = IF(p0315<0.5;-SQRT(p0007*EXP(p0447^2*p0008)-p0007);SQRT(p0007*EXP(p0447^2*p0008)-p0007))
- p3445: 0; = p3369*p1240
- p2772: 0; = p2381*(p1078+p1080)
- p2032: 0.448886
- p3374: 0; = if(p1232=0;p3246*p3356/p0818;0)
- p3391: 0; = p3372*p1234
- p3042: 6.98181e-5; = p2261*p1082
- p2389: 0; = p2233*p2218
- p0710: 27.366; = p0050*(1+p0578*p0182/100)
- p2882: 0.000146352; = p2296*(p1020+p1022)
- p2598: 0; = p2402*p1014
- p4311: 0; = p1756*p3480
- p2947: 1.12725e-5; = p2361*(p1020+p1022)
- p1683: 0
- p1668: 0
- p0166: 42.062
- p2595: 0; = p2399*p1014
- p2534: 2.9262e-5; = p2338*p1073
- p1963j: 4.01738e-7; = p1725*p1929+p1726*p1930+p1727*p1931+p1728*p1932+p1729*p1933+p1730*p1934+p1731*p1935+p1732*p1936+p1733*p1937+p1734*p1938+p1735*p1939+p1736*p1940+p1737*p1941+p1738*p1942+p1739*p1943+p1740*p1944+p1741*p1945+p1742*p1946+p1743*p1947
- p1140: 0; = if(p1121=0;p1134*p0001/(p0818*p0002);0)
- p2717: 0.000147662; = p2326*(p1019+p1021)
- p2894: 0; = p2308*(p1079+p1081)
- p3185: 0; = p2404*p1023
- p0813: 0; = if(p0807=480;1.56521739130435;0)
- p3290: 0
- p2939: 0; = p2353*(p1129+p1131)
- p2749: 1.30958e-5; = p2358*(p1019+p1021)
- p2904: 1.34955e-5; = p2318*(p1020+p1022)
- p2447: 2.29813e-6; = p2251*p1014
- p1031: 4.03812e-5; = IF(p1012=0;p1025*p0001/(p0818*p0002);0)
- p2368: 9.98372e-7; = p2225*p2197
- p0108: 40.021
- p3437: 0; = p3380*p1239
- p4917: 0; = p1950*p3482
- p1627: 0
- p1085: 0; = IF(p1071=0;p1079*(p0710/100)*p0703*1000;0)
- p0116: 14.521
- p2962: 0; = p2376*(p1079+p1081)
- p0175: 0.024
- p2562: 0.000163016; = p2366*p1014
- p1248: 0; = if(p1232>0;0;p1243*p0001/(p0818*p0002))
- p0816: 0
- p0820: 0; = if(p0807=480;p0814;0)
- p1059: 0.335
- p2289: 0.00442174; = p2223*p2196
- p1963k: 1.87477e-5; = p1744*p1948+p1745*p1949+p1746*p1950+p1747*p1951+p1748*p1952+p1749*p1953+p1750*p1954+p1751*p1955+p1752*p1956+p1753*p1957+p1961*p1962
- p3478: 0.26652; = if(p1328+p1330+p1332+p1334+p1336+p1338+p1340+p1342+p1344=0;0;p1332/(p1328+p1330+p1332+p1334+p1336+p1338+p1340+p1342+p1344))
- p0375: 0.5
- p0678: 1377.04; = p0018*(1+p0546*p0150/100)
- p1941: 0
- p2036: 0.000224111; = p2015*p2030*(1-p2032)/(p0818*1000)
- p2897: 0; = p2311*(p1129+p1131)
- p0642: 0; = IF(p0378<0.5;-SQRT(p0007*EXP(p0510^2*p0008)-p0007);SQRT(p0007*EXP(p0510^2*p0008)-p0007))
- p2995: 0; = p2409*(p1020+p1022)
- p2615: 0; = p2419*p1073
- p2825: 1.4178e-5; = p2239*(p1020+p1022)
- p1327: 0.0256358; = if(p1318=0;if(p1327a=0;1;if(p1327a<0;0;p1327a));0)
- p1023: 0; = IF(p1012=0;IF(p1014+p1019+p1020+p1021+p1022=1;0;1-(p1014+p1019+p1020+p1021+p1022));0)
- p2326: 0.000954322; = p2224*p2193
- p1932: 0
- p3384: 0; = p3365*p1234
- p2117: 0.585147
- p2288: 0.000447316; = p2223*p2195
- p2834: 0.000460331; = p2248*(p1020+p1022)
- p2528: 0.000505366; = p2332*p1014
- p0377: 0.5
- p3242: 5.54792e-8; = p3234*p1188*p3238/p0818
- p1297: 0
- p0474: 0; = SQRT(2)*(IF((2*p0342-1)<0;-1;IF((2*p0342-1)>0;1;0))*SQRT(SQRT((2/(pi()*0.140012289)+LN(1-(2*p0342-1)^2)/2)^2-LN(1-(2*p0342-1)^2)/0.140012289)-(2/(pi()*0.140012289)+LN(1-(2*p0342-1)^2)/2)))
- p0907: 0
- p2097: 0.40001
- p2635: 4.23044e-5; = p2244*(p1019+p1021)
- p2998: 0; = p2412*(p1020+p1022)
- p2492: 0.00078168; = p2296*p1014
- p2954: 1.33083e-7; = p2368*(p1020+p1022)
- p3131: 0; = p2350*p1132
- p1110: 2.02943e6; = IF(p1071=0;p1105*p1104*p1095;0)
- p5329: 4.04093e-9; = p1950*p3484
- p0505: 0; = SQRT(2)*(IF((2*p0373-1)<0;-1;IF((2*p0373-1)>0;1;0))*SQRT(SQRT((2/(pi()*0.140012289)+LN(1-(2*p0373-1)^2)/2)^2-LN(1-(2*p0373-1)^2)/0.140012289)-(2/(pi()*0.140012289)+LN(1-(2*p0373-1)^2)/2)))
- p4263: 2.55167e-8; = p1914*p3479
- p0667: 0; = IF(p0403<0.5;-SQRT(p0007*EXP(p0535^2*p0008)-p0007);SQRT(p0007*EXP(p0535^2*p0008)-p0007))
- p2025: 9.76456e-5; = p2015*p2023*p2024/(p0818*1000)
- p2100: 0.705744
- p0477: 0; = SQRT(2)*(IF((2*p0345-1)<0;-1;IF((2*p0345-1)>0;1;0))*SQRT(SQRT((2/(pi()*0.140012289)+LN(1-(2*p0345-1)^2)/2)^2-LN(1-(2*p0345-1)^2)/0.140012289)-(2/(pi()*0.140012289)+LN(1-(2*p0345-1)^2)/2)))
- p1181: 9.77134e-5
- p1951: 0
- p3335: 0; = IF(or(p3254=0;p1232>0);0;p3270*(p3280*(p3283*p1256+p3286*(p1253+p1257)+p1258*p3288+p3300*p3287)))
- p2195: 0.00162112; = p2194*p2193
- p1963b: 2.10646e-5; = p1569*p1773+p1570*p1774+p1571*p1775+p1572*p1776+p1573*p1777+p1574*p1778+p1575*p1779+p1576*p1780+p1577*p1781+p1578*p1782+p1579*p1783+p1580*p1784+p1581*p1785+p1582*p1786+p1583*p1787+p1584*p1788+p1585*p1789+p1586*p1790+p1587*p1791
- p2542: 3.86363e-6; = p2346*p1073
- p2727: 0; = p2336*(p1078+p1080)
- p1144: 4.82346e-6; = if(p1121=0;p1138*p0001/(p0818*p0002);0)
- p1185: 0.5
- p2376: 3.87596e-5; = p2229*p2205
- p1348: 149
- p3050: 4.1898e-6; = p2269*p1082
- p2587: 0; = p2391*p1123
- p2372: 0.000340602; = p2225*p2201
- p0572: 0; = IF(p0308<0.5;-SQRT(p0007*EXP(p0440^2*p0008)-p0007);SQRT(p0007*EXP(p0440^2*p0008)-p0007))
- p3241: 9.15042e-10; = p3234*p1188*p3236/p0818
- p4446: 0; = p1891*p3480
- p0631: 0; = IF(p0367<0.5;-SQRT(p0007*EXP(p0499^2*p0008)-p0007);SQRT(p0007*EXP(p0499^2*p0008)-p0007))
- p2421: 0; = p2235*p2211
- p0649: 0; = IF(p0385<0.5;-SQRT(p0007*EXP(p0517^2*p0008)-p0007);SQRT(p0007*EXP(p0517^2*p0008)-p0007))
- p1507: 6
- p0272: 37.219
- p4676: 4.895e-7; = p1915*p3481
- p1837: 0
- p0704: 100; = p0044*(1+p0572*p0176/100)
- p3096: 0; = p2315*p1023
- p3295: 0
- p2222: 0.456639; = if(p0765*p0769+p0766*p0770+p0767*p0771+p0768*p0772=0;0;p0769*p0765/(p0765*p0769+p0766*p0770+p0767*p0771+p0768*p0772))
- p0788: 0
- p1963c: 0; = p1588*p1792+p1589*p1793+p1590*p1794+p1591*p1795+p1592*p1796+p1593*p1797+p1594*p1798+p1595*p1799+p1596*p1800+p1597*p1801+p1598*p1802+p1599*p1803+p1600*p1804+p1601*p1805+p1602*p1806+p1603*p1807+p1604*p1808+p1605*p1809+p1606*p1810+p1607*p1811
- p2501: 0; = p2305*p1073
- p2504: 0; = p2308*p1073
- p2471: 8.9524e-5; = p2275*p1123
- p0518: 0; = SQRT(2)*(IF((2*p0386-1)<0;-1;IF((2*p0386-1)>0;1;0))*SQRT(SQRT((2/(pi()*0.140012289)+LN(1-(2*p0386-1)^2)/2)^2-LN(1-(2*p0386-1)^2)/0.140012289)-(2/(pi()*0.140012289)+LN(1-(2*p0386-1)^2)/2)))
- p3046: 9.17598e-5; = p2265*p1082
- p2732: 0; = p2341*(p1078+p1080)
- p2393: 0; = p2234*p2182
- p1612: 0
- p3081: 0; = p2300*p1082
- p1796: 0
- p2815: 0; = p2424*(p1078+p1080)
- p2445: 0.000527047; = p2249*p1014
- p4882: 0; = p1915*p3482
- p1963f: 7.57361e-5; = p1647*p1851+p1648*p1852+p1649*p1853+p1650*p1854+p1651*p1855+p1652*p1856+p1653*p1857+p1654*p1858+p1655*p1859+p1656*p1860+p1657*p1861+p1658*p1862+p1659*p1863+p1660*p1864+p1661*p1865+p1662*p1866+p1663*p1867+p1664*p1868+p1665*p1869+p1666*p1870
- p1104: 0.52649; = IF(p1071=0;IF(p1096+p1101+p1102+p1103=1;0;1-(p1096+p1101+p1102+p1103));0)
- p3392: 0; = p3373*p1234
- p1086: 0; = IF(p1071=0;p1080*(p0710/100)*p0703*1000;0)
- p3279: 0
- p2226: 0.323166; = if(p0774*p0778+p0775*p0779+p0776*p0780+p0777*p0781=0;0;p0778*p0774/(p0774*p0778+p0775*p0779+p0776*p0780+p0777*p0781))
- p4704: 3.26333e-7; = p1943*p3481
- p2021: 0.00159471; = p2020/p0818
- p2603: 0; = p2407*p1014
- p1341: 0; = p1340*p0001/(p0818*p0002)
- p1686: 0
- p1158: 0.0106663; = p1156*p1157
- p2346: 5.66249e-6; = p2228*p2214
- p1874: 0
- p2006: 0.177473; = ((p1980*p1985+p1986*p1991+p1992*p1997+p2000*p2005)/p0818)*p0005*p0002/1000
- p3674: 0; = p1943*p3476
- p2642: 4.99444e-7; = p2251*(p1019+p1021)
- p2061: 0.518824
- p0423: 0; = SQRT(2)*(IF((2*p0291-1)<0;-1;IF((2*p0291-1)>0;1;0))*SQRT(SQRT((2/(pi()*0.140012289)+LN(1-(2*p0291-1)^2)/2)^2-LN(1-(2*p0291-1)^2)/0.140012289)-(2/(pi()*0.140012289)+LN(1-(2*p0291-1)^2)/2)))
- p2199: 2.55085e-5; = p1069-p2197-p2198
- p1130: 0; = if(p1121=0;IF(p1123+p1128+p1129=1;0;IF(p1123+p1128+p1129+p1126>1;1-(p1123+p1128+p1129);p1126));0)
- p2655: 0; = p2264*(p1078+p1080)
- p2110: 0.856281
- p1993: 400
- p2702: 0; = p2311*(p1128+p1130)
- p2726: 7.76907e-5; = p2335*(p1019+p1021)
- p2869: 2.20226e-5; = p2283*(p1020+p1022)
- p0378: 0.5
- p3371: 0; = if(p1232=0;p3245*p3359/p0818;0)
- p0915: 0.0189815; = p0914/p0818
- p2450: 0.00182874; = p2254*p1014
- p1659: 0
- p3887: 1.17471e-7; = p1950*p3477
- p0646: 0; = IF(p0382<0.5;-SQRT(p0007*EXP(p0514^2*p0008)-p0007);SQRT(p0007*EXP(p0514^2*p0008)-p0007))
- p0785: 0
- p1962: 3.68592e-5; = p1960*1000/p0818
- p0724: 0
- p1252: 0; = if(p1232>0;0;p0724*2000*p0723*1000*p0725/100)
- p2539: 0.000319316; = p2343*p1073
- p0739: 1.037; = p0079*(1+p0607*p0211/100)
- p2901: 0.000130681; = p2315*(p1020+p1022)
- p1090: 0; = IF(p1071=0;p1084*p0001/(p0818*p0002);0)
- p3238: 0.854735; = IF(p3237+p3235+p3236>1;1-(p3235+p3236);p3237)
- p2681: 3.01796e-7; = p2290*(p1019+p1021)
- p3201: 0; = p2420*p1082
- p2976: 0; = p2390*(p1129+p1131)
- p0937: 0; = p0931*p0001/(p0818*p0002)
- p3426: 0; = p3369*p1239
- p2380: 2.42236e-5; = p2229*p2209
- p2677: 5.95474e-5; = p2286*(p1019+p1021)
- p2047: 1.84561e-12; = p2015*p2045/(p0818*1000000000000)
- p2262: 0.000112967; = p2226*p2208
- p2124: 0.263965
- p2966: 0; = p2380*(p1079+p1081)
- p1981: 400
- p2093: 0.260958
- p2212: 4.12946e-7; = p1106/p0818
- p0385: 0.5
- p2172: 0.271743; = p2166-(p2167+p2168+p2169+p2170)
- p1310: 0; = IF(p1307=p1266;0;IF(p1307+p1308>p1266;p1266-p1307;p1308))
- p2397: 0; = p2234*p2186
- p1162: 0.000292821; = p1161/p0818
- p1335: 2.11454e-5; = p1334*p0001/(p0818*p0002)
- p1002: 0; = p0996*p0888
- p3176: 0; = p2395*p1023
- p3924: 2.15765e-6; = p1781*p3478
- p0793: 0
- p0387: 0.5
- p0259: 46.868
- p1905: 0
- p2672: 3.68221e-6; = p2281*(p1019+p1021)
- p2780: 0; = p2389*(p1128+p1130)
- p3204: 0; = p2423*p1082
- p4412: 0; = p1857*p3480
- p1847: 1.89472e-6; = p1439*1000/p0818
- p2718: 3.16531e-5; = p2327*(p1019+p1021)
- p2996: 0; = p2410*(p1020+p1022)
- p0853: 0; = p0803/(p0802+p0803)
- p0159: 187.688
- p3472: 0; = p3377*p1241
- p2666: 0; = p2275*(p1128+p1130)
- p4240: 4.25279e-9; = p1891*p3479
- p1154: 0.000962551; = if(p1152*p0818=0;0;p1150/(p1152*p0818))
- p0985: 0; = IF(p0982=1;0;IF(p0982+p0983>1;1-p0982;p0983))
- p2328: 0.00202218; = p2224*p2196
- p2713: 1.16907e-5; = p2322*(p1019+p1021)
- p1903: 0
- p1929: 0
- p1568: 0
- p0860: 0; = p0672*1000/p0856
- p4264: 2.55167e-8; = p1915*p3479
- p1280: 0; = IF(p1277=p1263;0;IF(p1277+p1278>p1263;p1263-p1277;p1278))
- p3646: 0; = p1915*p3476
- p1220: 0; = IF(p1218<0.5;-SQRT(p1214*EXP(p1219^2*p1215)-p1214);SQRT(p1214*EXP(p1219^2*p1215)-p1214))
- p3043: 3.58874e-5; = p2262*p1082
- p0834: 0.00059
- p2260: 2.64696e-5; = p2226*p2206
- p2589: 0; = p2393*p1014
- p1188: 951.446; = p1187*p0801
- p1669: 0
- p2926: 0; = p2340*(p1079+p1081)
- p1068: 0.0252084; = IF(p1012=0;p1054/(p1061*p0818);0)
- p3301: 0; = if(and(p1232=0;p3252<>0);p3257*p3277*(p3297*p3290+(1-p3297)*p3294);0)
- p2246: 7.86992e-5; = p2222*p2191
- p3091: 0; = p2310*p1082
- p3149: 0; = p2368*p1023
- p2256: 0.000158488; = p2222*p2202
- p2152: 1.28017e-6; = p2015*p2080*p2114/(p0818*1000)
- p2126: 4.47239e-5; = p2015*p2054*p2088/(p0818*1000)
- p1304: 0; = p1300*p1252/p0818
- p0978: 0
- p2531: 0.000357484; = p2335*p1014
- p2183: 0.00170535; = p1064-p2182
- p0775: 0
- p5261: 4.04093e-9; = p1882*p3484
- p3129: 3.90807e-6; = p2348*p1082
- p3073: 0; = p2292*p1023
- p0189: 21.514
- p2840: 0.000342389; = p2254*(p1020+p1022)
- p1616: 0
- p0964: 0; = 56/90000
- p0140: 7.419
- p2779: 0; = p2388*(p1078+p1080)
- p2851: 0; = p2265*(p1079+p1081)
- p4543: 1.0769e-5; = p1782*p3481
- p1010: 102935; = p0890
- p2463: 9.52155e-7; = p2267*p1073
- p1057: 0.82
- p3056: 2.97014e-5; = p2275*p1132
- p1620: 0
- p0311: 0.5
- p2980: 0; = p2394*(p1020+p1022)
- p0016: 291.938
- p0832: 1.06533e9; = p0831*p0830/(1-p0831)
- p3224: 0.501945; = IF(p3216=0;0;1-p3221-p3222-p3223)
- p1846: 0
- p2745: 0.000169779; = p2354*(p1019+p1021)
- p0844: 0.834472
- p0244: 20.113
- p3253: 0; = p1252*(p1277*(1-p3247)+p1280*(1-p3248)+p1281*(1-p3249)+p1282*(1-p3250))
- p0585: 0; = IF(p0321<0.5;-SQRT(p0007*EXP(p0453^2*p0008)-p0007);SQRT(p0007*EXP(p0453^2*p0008)-p0007))
- p1050: 4.51027e7; = IF(p1012=0;p1037*p1036;0)
- p3202: 0; = p2421*p1082
- p0702: 1698.24; = p0042*(1+p0570*p0174/100)
- p3454: 0; = p3378*p1240
- p1036: 1.30012e8; = IF(p1012=0;p0795*p0702*1000*p0796/100;0)
- p3343: 0; = if(and(p1232=0;p3254<>0);IF((p3339+p3340+p3341+p3342)+(p3254*(p3269*(1-p3277))/p3338)>p3254;p3254-(p3339+p3340+p3341+p3342);p3254*(p3269*(1-p3277))/p3338);0)
- p2578: 9.34534e-5; = p2382*p1073
- p0955: 0; = if(and(p0683>0;or(p0807=56;p0807=100;and(p0807=60;p0901>0.06)));p0937;0)
- p2040: 0.44
- p5030: 0; = p1857*p3483
- p0882: 2217; = p0869*p0856
- p3182: 0; = p2401*p1023
- p3396: 0; = p3377*p1234
- p1912: 0
- p2879: 0.000206894; = p2293*(p1020+p1022)
- p0542: 0; = IF(p0278<0.5;-SQRT(p0007*EXP(p0410^2*p0008)-p0007);SQRT(p0007*EXP(p0410^2*p0008)-p0007))
- p3457: 0; = p3362*p1241
- p2715: 3.36511e-6; = p2324*(p1019+p1021)
- p2102: 0.922577
- p0412: 0; = SQRT(2)*(IF((2*p0280-1)<0;-1;IF((2*p0280-1)>0;1;0))*SQRT(SQRT((2/(pi()*0.140012289)+LN(1-(2*p0280-1)^2)/2)^2-LN(1-(2*p0280-1)^2)/0.140012289)-(2/(pi()*0.140012289)+LN(1-(2*p0280-1)^2)/2)))
- p3058: 0; = p2277*p1023
- p3291: 0
- p1091: 0; = IF(p1071=0;p1085*p0001/(p0818*p0002);0)
- p1244: 0; = if(p1232>0;0;p1239*(p0725/100)*p0723*1000)
- p3158: 3.98732e-6; = p2377*p1082
- p2083: 2.17294
- p2240: 0.000366357; = p2222*p2185
- p1966: 1.64e6; = if(p0814=0;p0802;0)
- p3367: 0; = if(p1232=0;p3244*p3361/p0818;0)
- p1060: 0.21
- p0817: 0
- p2891: 0; = p2305*(p1079+p1081)
- p1289: 0
- p1618: 0
- p0929: 1.37704e6; = p0801*p0923
- p1116: 4.73106e-6; = IF(p1071=0;p1106/(p1111*p0818);0)
- p3264: 0
- p0795: 76.557; = p0135*(1+p0663*p0267/100)
- p3271: 0
- p2027: 0.428799
- p0854: 1.39095e6; = p0801*((1-p0853)*p0846+p0853*p0852)
- p0998: 0; = if(p0888=0;0;if((p0699*p0698*1000*p0700/100)/p0888>1;1;(p0699*p0698*1000*p0700/100)/p0888))
- p1811: 0
- p4608: 8.97416e-7; = p1847*p3481
- p2148: 3.00269e-6; = p2015*p2076*p2110/(p0818*1000)
- p2043: 0.636483
- p0432: 0; = SQRT(2)*(IF((2*p0300-1)<0;-1;IF((2*p0300-1)>0;1;0))*SQRT(SQRT((2/(pi()*0.140012289)+LN(1-(2*p0300-1)^2)/2)^2-LN(1-(2*p0300-1)^2)/0.140012289)-(2/(pi()*0.140012289)+LN(1-(2*p0300-1)^2)/2)))
- p3219: 0.00653823; = p3215*p1228
- p1373: 47
- p3105: 0; = p2324*p1023
- p2516: 7.7486e-6; = p2320*p1014
- p2572: 2.64465e-5; = p2376*p1073
- p2304: 0; = p2227*p2211
- p2088: 0.798875
- p2724: 4.70865e-5; = p2333*(p1019+p1021)
- p2294: 0.000665418; = p2223*p2201
- p2264: 2.20569e-5; = p2226*p2210
- p2503: 0; = p2307*p1073
- p1231: 0.00744316; = IF(p1221=0;0;p1230*(p1228+p1229))
- p1782: 2.27367e-5; = p1374*1000/p0818
- p1224: 0.44; = IF(p1221=0;0;IF(p1193=0;1-p1223;0))
- p0879: 0.330005; = p0878*p0001*p0003/(p0818*p0002)
- p2929: 0; = p2343*(p1079+p1081)
- p0945: 0; = if(and(p0683=0;p0951=0);p0939;0)
- p1286: 0; = p1282*p1252/p0818
- p2585: 0; = p2389*p1123
- p1585: 0
- p0154: 0.027
- p3155: 0; = p2374*p1023
- p2667: 0.000331689; = p2276*(p1019+p1021)
- p0798: 27.366; = p0138*(1+p0666*p0270/100)
- p1652: 0
- p4858: 0; = p1891*p3482
- p3393: 0; = p3374*p1234
- p3228: 0.000191959; = p3224*p1229
- p0195: 0.02
- p3007: 0; = p2421*(p1079+p1081)
- p0733: 0
- p2638: 9.85452e-5; = p2247*(p1019+p1021)
- p1613: 0
- p2918: 9.46181e-5; = p2332*(p1020+p1022)
- p2337: 0.000132436; = p2228*p2205
- p1017: 0; = IF(p1012=0;p0708/100;0)
- p0906: 0.00392517
- p2194: 0.214362
- p2730: 0; = p2339*(p1078+p1080)
- p3196: 0; = p2415*p1082
- p1607: 0
- p1314: 0; = p1310*p1252/p0818
- p3106: 0; = p2325*p1023
- p4652: 8.15833e-8; = p1891*p3481
- p1249: 0; = if(p1232>0;0;p1244*p0001/(p0818*p0002))
- p2012: 0.109717
- p3512: 0; = p1781*p3476
- p0278: 0.5
- p3148: 0; = p2367*p1023
- p2150: 6.16342e-6; = p2015*p2078*p2112/(p0818*1000)
- p3424: 0; = p3367*p1239
- p1626: 0
- p1599: 0
- p0851: 0
- p3237: 0.854735
- p1061: 0.3
- p4828: 0; = p1861*p3482
- p1660: 0
- p3366: 0; = if(p1232=0;p3244*p3360/p0818;0)
- p3363: 0; = if(p1232=0;p3244*p3357/p0818;0)
- p3385: 0; = p3366*p1234
- p2839: 1.5527e-6; = p2253*(p1020+p1022)
- p2582: 4.26713e-6; = p2386*p1073
- p3588: 0; = p1857*p3476
- p1826: 0
- p3111: 0; = p2330*p1023
- p1788: 0
- p1735: 0
- p1632: 0
- p2610: 0; = p2414*p1073
- p1646: 0
- p1643: 0.801155
- p1453: 5
- p1685: 0
- p3062: 0; = p2281*p1023
- p3276: 0
- p1569: 0
- p2659: 0; = p2268*(p1078+p1080)
- p0884: 92.285; = IF(p0689=100;0;IF(p0689+p0688>100;100-p0689;p0688))
- p0386: 0.5
- p3059: 0; = p2278*p1023
- p2701: 0; = p2310*(p1078+p1080)
- p2422: 0; = p2235*p2212
- p3513: 0; = p1782*p3476
- p1689: 0
- p3019: 0; = p2238*p1023
- p2094: 0.922577
- p1770: 0
- p2230: 1; = if(p0783*p0787+p0784*p0788+p0785*p0789+p0786*p0790=0;0;p0787*p0783/(p0783*p0787+p0784*p0788+p0785*p0789+p0786*p0790))
- p0794: 0
- p0966: 0.79647; = if(p0683=0;0;IF(p0684/100+p0965=1;0;1-(p0684/100+p0965)))
- p3130: 3.5026e-5; = p2349*p1082
- p1242: 0; = if(p1232>0;0;p1234*(p0725/100)*p0723*1000)
- p1026: 96816.6; = IF(p1012=0;p1020*(p0704/100)*p0703*1000;0)
- p1262: 0; = if(p1232>0;0;p0733/100)
- p1317: 0
- p2016: 0.00976628; = (p2014-p2015)/(p0818)
- p1327a: 0.0256358; = (p0745*1000/p0801)*(1-(p0746+p0747+p0748+p0749+p0750+p0751+p0752+p0753)/100)+(p0754*1000/p0801)*(1-(p0755+p0756+p0757+p0758+p0759+p0760+p0761+p0762)/100)
- p2216: 2.34951e-5; = p1108/p0818
- p3164: 2.01027e-8; = p2383*p1082
- p4675: 4.895e-7; = p1914*p3481
- p0968: 2.32625e7; = p0965*p0683*p0682*1000
- p2791: 0; = p2400*(p1019+p1021)
- p1698: 0
- p2783: 0; = p2392*(p1128+p1130)
- p2607: 0; = p2411*p1014
- p2618: 0; = p2422*p1073
- p1927: 0
- p2622: 0; = p2426*p1073
- p1675: 0
- p2691: 0; = p2300*(p1078+p1080)
- p3094: 0; = p2313*p1132
- p2158: 9.09655e-6; = p2015*p2082*p2120/(p0818*1000)
- p0760: 0
- p1211: 0.6
- p0862: 0.126318; = p0674*1000/p0856
- p0990: 0; = p0986*p0886
- p2461: 0.000197084; = p2265*p1073
- p4292: 1.70112e-8; = p1943*p3479
- p3334: 0; = IF(or(p3254=0;p1232>0);0;p3269*p3277*(p3300*p3292+(1-p3300)*p3296))
- p2159: 0.000109945; = p2015*p2083*p2121/(p0818*1000)
- p2658: 0; = p2267*(p1078+p1080)
- p2407: 0; = p2234*p2197
- p2594: 0; = p2398*p1014
- p1073: 0.68232; = IF(p1071=0;p0711/100;0)
- p3470: 0; = p3375*p1241
- p1295: 0; = p1291*p1252/p0818
- p4436: 0; = p1881*p3480
- p0445: 0; = SQRT(2)*(IF((2*p0313-1)<0;-1;IF((2*p0313-1)>0;1;0))*SQRT(SQRT((2/(pi()*0.140012289)+LN(1-(2*p0313-1)^2)/2)^2-LN(1-(2*p0313-1)^2)/0.140012289)-(2/(pi()*0.140012289)+LN(1-(2*p0313-1)^2)/2)))
- p0648: 0; = IF(p0384<0.5;-SQRT(p0007*EXP(p0516^2*p0008)-p0007);SQRT(p0007*EXP(p0516^2*p0008)-p0007))
- p2648: 0.000281135; = p2257*(p1019+p1021)
- p0890: 102935; = p0686*1000*p0687*p0885/100
- p2052: 7.5777e-5; = p2015*p2049*(1-p2050)/(p0818*1000)
- p2134: 0.000112689; = p2015*p2062*p2096/(p0818*1000)
- p0419: 0; = SQRT(2)*(IF((2*p0287-1)<0;-1;IF((2*p0287-1)>0;1;0))*SQRT(SQRT((2/(pi()*0.140012289)+LN(1-(2*p0287-1)^2)/2)^2-LN(1-(2*p0287-1)^2)/0.140012289)-(2/(pi()*0.140012289)+LN(1-(2*p0287-1)^2)/2)))
- p1806: 0
- p3006: 0; = p2420*(p1079+p1081)
- p1727: 0
- p3387: 0; = p3368*p1234
- p1671: 0.46617
- p2803: 0; = p2412*(p1019+p1021)
- p1161: 1.7e6; = p0801
- p2488: 5.01126e-6; = p2292*p1014
- p4231: 1.27584e-8; = p1882*p3479
- p0942: 0; = if(and(p0683=0;p0948=0);p0936;0)
- p0909: 3.42569e7
- p0270: 19.151
- p1641: 0
- p3214: 0.376406; = p1222*40.078/100.0869
- p3435: 0; = p3378*p1239
- p0421: 0; = SQRT(2)*(IF((2*p0289-1)<0;-1;IF((2*p0289-1)>0;1;0))*SQRT(SQRT((2/(pi()*0.140012289)+LN(1-(2*p0289-1)^2)/2)^2-LN(1-(2*p0289-1)^2)/0.140012289)-(2/(pi()*0.140012289)+LN(1-(2*p0289-1)^2)/2)))
- p2292: 7.03859e-6; = p2223*p2199
- p3119: 1.3624e-5; = p2338*p1082
- p1631: 0
- p1261: 0; = if(p1232>0;0;p0732/100)
- p0223: 18.889
- p0249: 52.046
- p3112: 0; = p2331*p1023
- p2986: 0; = p2400*(p1020+p1022)
- p2000: 4000
- p4722: 0; = p1755*p3482
- p1828: 0
- p2760: 2.53551e-7; = p2369*(p1019+p1021)
- p1156: 0.0569695; = p1064+p1065+p1066+p1067+p1068+p1069+p1070+p1116+p1117+p1118+p1119+p1120+p1154+p1155
- p0735: 0
- p2649: 0; = p2258*(p1078+p1080)
- p2988: 0; = p2402*(p1020+p1022)
- p2343: 0.000467985; = p2228*p2211
- p1860: 0
- p2464: 2.38466e-6; = p2268*p1073
- p3211: 0; = p2430*p1132
- p3305: 0; = if(and(p1232=0;p3252<>0);1-(p3301+p3302+p3303+p3304);0)
- p1746: 0.615605
- p1714: 0
- p2054: 0.91
- p2714: 1.33815e-5; = p2323*(p1019+p1021)
- p2004: 30
- p1765: 0
- p1954: 0
- p1644: 0
- p1600: 0
- p1718: 0
- p0368: 0.5
- p1720: 0
- p4849: 0; = p1882*p3482
- p0918: 0; = p0680*1000/p0801
- p2266: 1.3345e-7; = p2226*p2212
- p3171: 0; = p2390*p1132
- p1840: 0
- p2075: 0.072
- p0973: 1.14295e8; = p0967+p0968+p0969
- p4101: 9.82371e-6; = p1962*p3478
- p0211: 16.659
- p0770: 36.955; = p0110*(1+p0638*p0242/100)
- p2747: 5.09026e-6; = p2356*(p1019+p1021)
- p1053: 3.47604e6; = IF(p1012=0;p1046*p1036;0)
- p2437: 0.000194823; = p2241*p1014
- p1883: 0
- p3139: 0; = p2358*p1023
- p0615: 0; = IF(p0351<0.5;-SQRT(p0007*EXP(p0483^2*p0008)-p0007);SQRT(p0007*EXP(p0483^2*p0008)-p0007))
- p3184: 0; = p2403*p1023
- p2384: 6.61704e-7; = p2229*p2213
- p1636: 0
- p1982: 750
- p2841: 0.00014679; = p2255*(p1020+p1022)
- p4881: 0; = p1914*p3482
- p2144: 7.05896e-6; = p2015*p2072*p2106/(p0818*1000)
- p2695: 0; = p2304*(p1078+p1080)
- p2171: 0.0838636; = p2165*p0831
- p2281: 2.37977e-5; = p2223*p2187
- p1176: 394.432; = p1175*p0801
- p0443: 0; = SQRT(2)*(IF((2*p0311-1)<0;-1;IF((2*p0311-1)>0;1;0))*SQRT(SQRT((2/(pi()*0.140012289)+LN(1-(2*p0311-1)^2)/2)^2-LN(1-(2*p0311-1)^2)/0.140012289)-(2/(pi()*0.140012289)+LN(1-(2*p0311-1)^2)/2)))
- p0080: 97.651
- p2992: 0; = p2406*(p1020+p1022)
- p0922: 0; = p0677*1000/p0801
- p2181: 52.0796; = p0887+p0889+p0893+p2180
- p4437: 0; = p1882*p3480
- p0051: 68.232
- p0025: 20.353
- p2771: 0; = p2380*(p1078+p1080)
- p1680: 0
- p0327: 0.5
- p4307: 9.10054e-7; = p1962*p3479
- p2353: 0; = p2232*p2221
- p1215: 0.0739645; = IF(p1214=0;0;(p1214-1.5)/(p1214-1)^2)
- p1157: 0.187228
- p2079: 0.02
- p2151: 1.02414e-6; = p2015*p2079*p2113/(p0818*1000)
- p4025: 1.37722e-7; = p1882*p3478
- p1473: 3
- p1273: 0; = p1267*p1252/p0818
- p2908: 1.00715e-5; = p2322*(p1020+p1022)
- p2843: 0.000242198; = p2257*(p1020+p1022)
- p2768: 0; = p2377*(p1078+p1080)
- p3063: 0; = p2282*p1023
- p2612: 0; = p2416*p1073
- p1265: 0; = if(p1232>0;0;IF(p1259+p1263+p1264=1;0;IF(p1259+p1263+p1264+p1262>1;1-(p1259+p1263+p1264);p1262)))
- p3275: 0
- p3459: 0; = p3364*p1241
- p1301: 0; = IF(p1297+p1300=p1265;0;IF(p1297+p1300+p1299>p1265;p1265-(p1297+p1300);p1299))
- p2605: 0; = p2409*p1014
- p2849: 0; = p2263*(p1079+p1081)
- p3104: 0; = p2323*p1023
- p0391: 0.5
- p1129: 0; = if(p1121=0;IF(p1123+p1128=1;0;IF(p1123+p1128+p1125>1;1-(p1123+p1128);p1125));0)
- p4929: 0; = p1756*p3483
- p3448: 0; = p3372*p1240
- p3273: 0
- p1328: 0; = p1319*p0801
- p3475: 0; = p3380*p1241
- p2377: 1.25514e-5; = p2229*p2206
- p3005: 0; = p2419*(p1079+p1081)
- p2949: 3.24475e-6; = p2363*(p1020+p1022)
- p3622: 0; = p1891*p3476
- p1851: 0
- p2044: 2.74097e-6; = p2015*p2042*p2043/(p0818*1000)
- p2365: 0.00106812; = p2225*p2193
- p0861: 0.183025; = p0673*1000/p0856
- p3060: 0; = p2279*p1023
- p0676: 291.938; = p0016*(1+p0544*p0148/100)
- p2984: 0; = p2398*(p1020+p1022)
- p0992: 0; = p0988*p0001*p0004/(p0818*p0002)
- p1970: 1.7e6; = p0801
- p2844: 0; = p2258*(p1079+p1081)
- p3198: 0; = p2417*p1082
- p0452: 0; = SQRT(2)*(IF((2*p0320-1)<0;-1;IF((2*p0320-1)>0;1;0))*SQRT(SQRT((2/(pi()*0.140012289)+LN(1-(2*p0320-1)^2)/2)^2-LN(1-(2*p0320-1)^2)/0.140012289)-(2/(pi()*0.140012289)+LN(1-(2*p0320-1)^2)/2)))
- p2977: 0; = p2391*(p1129+p1131)
- p3197: 0; = p2416*p1082
- p2071: 0.151
- p2795: 0; = p2404*(p1019+p1021)
- p2153: 1.0009e-7; = p2015*p2081*p2115/(p0818*1000)
- p3354: 0; = IF((p3350+p3351+p3352+p3353)+IF(p3349=0;0;(p3256*(p3273*(1-p3277))/p3349))>p3256;p3256-(p3350+p3351+p3352+p3353);IF(p3349=0;0;p3256*(p3273*(1-p3277))/p3349))
- p2101: 0.620397
- p0934: 0; = p0928*p0001/(p0818*p0002)
- p1997: 7.92912e6; = (if(p1152=0;0;p1150/p1152)+if(p1153=0;0;p1151/p1153))*(1+p1157)
- p1760: 0
- p1013: 0; = p1012*p0001/(p0818*p0002)
- p2291: 3.20139e-6; = p2223*p2198
- p2796: 0; = p2405*(p1019+p1021)

- p1974: 0; = p1969*p0001/(p0818*p0002)
- p0680: 0
- p0669: 29.4127; = p0009*(1+p0537*p0141/100)
- p1269: 0
- p3322: 0; = if(and(p1232=0;p3253<>0);p3253-(p3317+p3318+p3319+p3320+p3321);0)
- p3402: 0; = p3364*p1238
- p1305: 0; = p1301*p1252/p0818
- p2930: 0; = p2344*(p1079+p1081)
- p1825: 0
- p0484: 0; = SQRT(2)*(IF((2*p0352-1)<0;-1;IF((2*p0352-1)>0;1;0))*SQRT(SQRT((2/(pi()*0.140012289)+LN(1-(2*p0352-1)^2)/2)^2-LN(1-(2*p0352-1)^2)/0.140012289)-(2/(pi()*0.140012289)+LN(1-(2*p0352-1)^2)/2)))
- p1100: 0.52649
- p2520: 1.54841e-5; = p2324*p1014
- p2842: 2.11264e-5; = p2256*(p1020+p1022)
- p0901: 0.0206965
- p2129: 7.58218e-5; = p2015*p2057*p2091/(p0818*1000)
- p0111: 20.173
- p1693: 0
- p1687: 0.556632
- p2573: 8.56405e-6; = p2377*p1073
- p2560: 0.00014025; = p2364*p1014
- p1208: 0; = p1205*p0818*p0822/p0801
- p3092: 0; = p2311*p1132
- p2565: 1.16668e-6; = p2369*p1014
- p1590: 0
- p0182: 19.151
- p2941: 3.21069e-5; = p2355*(p1020+p1022)
- p0948: 0; = if(and(p0683=0;or(p0807=480;p0807=32;p0807=1;and(p0807=60;p0901<0.03)));p0936;0)
- p0845: 0.5
- p1766: 0
- p1202: 0.7
- p1584: 0
- p2167: 0.242296; = p2166*(p0898)
- p3818: 1.17471e-7; = p1881*p3477
- p0773: 27.366; = p0113*(1+p0641*p0245/100)
- p0610: 0; = IF(p0346<0.5;-SQRT(p0007*EXP(p0478^2*p0008)-p0007);SQRT(p0007*EXP(p0478^2*p0008)-p0007))
- p1953: 0
- p1233: 0.000261249; = p1232*p0001/(p0818*p0002)
- p1898: 0
- p1575: 0
- p2070: 0.282
- p0351: 0.5
- p2809: 0; = p2418*(p1078+p1080)
- p2674: 2.55631e-5; = p2283*(p1019+p1021)
- p2168: 0.00683598; = p2166*(p0903)
- p0006: 30
- p2096: 0.486404
- p2155: 7.55968e-6; = p2015*p2084*p2117/(p0818*1000)
- p3255: 0; = p1252*(p1297*(1-p3247)+p1300*(1-p3248)+p1301*(1-p3249)+p1302*(1-p3250))
- p3400: 0; = p3362*p1238
- p0857: 2.61249; = p0856*p0001*p0003/(p0818*p0002)
- p1076: 0; = IF(p1071=0;p0714/100;0)
- p1894: 0
- p2403: 0; = p2234*p2192
- p1251: 0; = if(p1232>0;0;p1246*p0001/(p0818*p0002))
- p2382: 0.000136964; = p2229*p2211
- p0315: 0.5
- p1873: 0
- p0001: 0.404686
- p2087: 0.856281
- p2278: 6.42706e-5; = p2223*p2184
- p2295: 9.57686e-5; = p2223*p2202
- p3468: 0; = p3373*p1241
- p3079: 0; = p2298*p1082
- p2273: 0.000563021; = p2230*p2219
- p2547: 0; = p2351*p1123
- p2575: 3.65498e-5; = p2379*p1073
- p2510: 0; = p2314*p1123
- p4928: 0; = p1755*p3483
- p3692: 1.25302e-5; = p1755*p3477
- p2762: 0.000122926; = p2371*(p1019+p1021)
- p2392: 0; = p2233*p2221
- p2636: 4.8423e-5; = p2245*(p1019+p1021)
- p0253: 52.007
- p2263: 5.10851e-5; = p2226*p2209
- p2067: 0.446471
- p2431: 0; = p2236*p2221
- p2477: 1.69432e-5; = p2281*p1014
- p1296: 0; = p1292*p1252/p0818
- p2017: 1.63813e8; = p2015*p0898
- p2456: 1.80607e-5; = p2260*p1073
- p0342: 0.5
- p0856: 1.7e6; = p0801
- p2324: 2.17483e-5; = p2224*p2191
- p3851: 2.34942e-7; = p1914*p3477
- p0553: 0; = IF(p0289<0.5;-SQRT(p0007*EXP(p0421^2*p0008)-p0007);SQRT(p0007*EXP(p0421^2*p0008)-p0007))
- p2381: 1.0459e-5; = p2229*p2210
- p2820: 0; = p2429*(p1128+p1130)
- p0878: 214741; = p0867*p0856
- p0531: 0; = SQRT(2)*(IF((2*p0399-1)<0;-1;IF((2*p0399-1)>0;1;0))*SQRT(SQRT((2/(pi()*0.140012289)+LN(1-(2*p0399-1)^2)/2)^2-LN(1-(2*p0399-1)^2)/0.140012289)-(2/(pi()*0.140012289)+LN(1-(2*p0399-1)^2)/2)))
- p1187: 0.000559674
- p1743: 0
- p2259: 8.17401e-5; = p2226*p2205
- p2008: 0.0372975; = ((p1982*p1985+p1988*p1991+p1994*p1997+p2002*p2005)/p0818)*p0005*p0002/1000
- p4093: 1.37722e-7; = p1950*p3478
- p0440: 0; = SQRT(2)*(IF((2*p0308-1)<0;-1;IF((2*p0308-1)>0;1;0))*SQRT(SQRT((2/(pi()*0.140012289)+LN(1-(2*p0308-1)^2)/2)^2-LN(1-(2*p0308-1)^2)/0.140012289)-(2/(pi()*0.140012289)+LN(1-(2*p0308-1)^2)/2)))
- p2521: 0.000125307; = p2325*p1014
- p0286: 0.5
- p1577: 0.6832
- p3439: 0; = p3363*p1240
- p1872: 0
- p4210: 2.1264e-8; = p1861*p3479
- p1849: 0
- p2229: 0.153239; = if(p0774*p0778+p0775*p0779+p0776*p0780+p0777*p0781=0;0;p0781*p0777/(p0774*p0778+p0775*p0779+p0776*p0780+p0777*p0781))
- p2865: 2.95095e-5; = p2279*(p1020+p1022)
- p3087: 0; = p2306*p1082
- p0079: 1.037
- p3880: 1.56628e-7; = p1943*p3477
- p3032: 0; = p2251*p1023
- p2122: 0.341195
- p2900: 0; = p2314*(p1129+p1131)
- p2113: 0.832356
- p1713: 0
- p2634: 7.79547e-5; = p2243*(p1019+p1021)
- p1121: 0
- p2066: 0.109412
- p1330: 1.26691e6; = p1320*p0801
- p2753: 1.49772e-5; = p2362*(p1019+p1021)
- p5054: 0; = p1881*p3483
- p3132: 0; = p2351*p1132
- p2011: 0.0626144
- p0734: 0
- p3049: 1.11027e-6; = p2268*p1082
- p2284: 0.000189106; = p2223*p2190
- p0217: 9.143
- p2293: 0.00155209; = p2223*p2200
- p3319: 0; = if(and(p1232=0;p3253<>0);p3253*(p3263-p3314)/p3316;0)
- p0113: 27.366
- p0912: 0
- p1731: 0
- p1628: 0
- p1266: 0; = if(p1232>0;0;IF(p1259+p1263+p1264+p1265=1;0;1-(p1259+p1263+p1264+p1265)))
- p0940: 0; = if(and(p0683=0;p0946=0);p0934;0)
- p3464: 0; = p3369*p1241
- p1799: 0
- p0345: 0.5
- p1921: 0
- p3134: 0; = p2353*p1132
- p1292: 0; = IF(p1287+p1290+p1291=p1261;0;p1261-(p1287+p1290+p1291))
- p3142: 0; = p2361*p1023
- p1217: 31.7856
- p0475: 0; = SQRT(2)*(IF((2*p0343-1)<0;-1;IF((2*p0343-1)>0;1;0))*SQRT(SQRT((2/(pi()*0.140012289)+LN(1-(2*p0343-1)^2)/2)^2-LN(1-(2*p0343-1)^2)/0.140012289)-(2/(pi()*0.140012289)+LN(1-(2*p0343-1)^2)/2)))
- p2223: 0.275931; = if(p0765*p0769+p0766*p0770+p0767*p0771+p0768*p0772=0;0;p0770*p0766/(p0765*p0769+p0766*p0770+p0767*p0771+p0768*p0772))
- p0533: 0; = SQRT(2)*(IF((2*p0401-1)<0;-1;IF((2*p0401-1)>0;1;0))*SQRT(SQRT((2/(pi()*0.140012289)+LN(1-(2*p0401-1)^2)/2)^2-LN(1-(2*p0401-1)^2)/0.140012289)-(2/(pi()*0.140012289)+LN(1-(2*p0401-1)^2)/2)))
- p1965: 0.000340429; = p1963+p1959*p1964*1000/p0818
- p2838: 7.06222e-7; = p2252*(p1020+p1022)
- p2245: 0.000312951; = p2222*p2190
- p0516: 0; = SQRT(2)*(IF((2*p0384-1)<0;-1;IF((2*p0384-1)>0;1;0))*SQRT(SQRT((2/(pi()*0.140012289)+LN(1-(2*p0384-1)^2)/2)^2-LN(1-(2*p0384-1)^2)/0.140012289)-(2/(pi()*0.140012289)+LN(1-(2*p0384-1)^2)/2)))
- p3415: 0; = p3377*p1238
- p0105: 71.113
- p2555: 8.67259e-6; = p2359*p1014
- p3282: 0
- p2624: 0; = p2428*p1123
- p2340: 0.00018303; = p2228*p2208
- p0784: 0
- p0373: 0.5
- p2009: 0.0154846; = ((p1983*p1985+p1989*p1991+p1995*p1997+p2003*p2005+p1976*p1977+p1978*p1979+p1998*p1999)/p0818)*p0005*p0002/1000
- p2989: 0; = p2403*(p1020+p1022)
- p0983: 0; = if(p0886=0;0;min(1;(p0695*p0694*1000*p0697/100)/p0886))
- p0410: 0; = SQRT(2)*(IF((2*p0278-1)<0;-1;IF((2*p0278-1)>0;1;0))*SQRT(SQRT((2/(pi()*0.140012289)+LN(1-(2*p0278-1)^2)/2)^2-LN(1-(2*p0278-1)^2)/0.140012289)-(2/(pi()*0.140012289)+LN(1-(2*p0278-1)^2)/2)))
- p2586: 0; = p2390*p1123
- p3458: 0; = p3363*p1241
- p2238: 0.000778731; = p2222*p2183
- p3002: 0; = p2416*(p1079+p1081)
- p1991: 2.10547e7; = (if(p1111=0;0;p1106/p1111)+if(p1112=0;0;p1107/p1112)+if(p1113=0;0;p1108/p1113)+if(p1114=0;0;p1109/p1114)+if(p1115=0;0;p1110/p1115))*(1+p1157)
- p0243: 31.74
- p1948: 0
- p0799: 25.985; = p0139*(1+p0667*p0271/100)
- p2074: 0.025
- p3480: 0; = if(p1328+p1330+p1332+p1334+p1336+p1338+p1340+p1342+p1344=0;0;p1336/(p1328+p1330+p1332+p1334+p1336+p1338+p1340+p1342+p1344))
- p3138: 0; = p2357*p1023
- p2112: 0.856281
- p0766: 57.163; = p0106*(1+p0634*p0238/100)
- p0716: 7.419; = p0056*(1+p0584*p0188/100)
- p0944: 0; = if(and(p0683=0;p0950=0);p0938;0)
- p0550: 0; = IF(p0286<0.5;-SQRT(p0007*EXP(p0418^2*p0008)-p0007);SQRT(p0007*EXP(p0418^2*p0008)-p0007))
- p2509: 0; = p2313*p1123
- p2476: 0.000117725; = p2280*p1014
- p2979: 0; = p2393*(p1020+p1022)
- p2415: 0; = p2235*p2205
- p1133: 94605.1; = if(p1121=0;p1123*(p0716/100)*p0703*1000;0)
- p0977: 0; = IF(p0687=0;IF(OR(p0686=0;p0688=0);0;p0686*1000*p0688/100);0)
- p1012: 0
- p1609: 0
- p3041: 8.40885e-6; = p2260*p1082
- p2312: 0; = p2231*p2219
- p0836: 1.59325e8; = p0831*p0835*p0801/(1-p0831)
- p2433: 0.00252575; = p2237*p1014
- p0018: 1377.04
- p4130: 1.99881e-7; = p1781*p3479
- p0414: 0; = SQRT(2)*(IF((2*p0282-1)<0;-1;IF((2*p0282-1)>0;1;0))*SQRT(SQRT((2/(pi()*0.140012289)+LN(1-(2*p0282-1)^2)/2)^2-LN(1-(2*p0282-1)^2)/0.140012289)-(2/(pi()*0.140012289)+LN(1-(2*p0282-1)^2)/2)))
- p2889: 0; = p2303*(p1079+p1081)
- p2125: 7.67251e-5; = p2015*p2053*p2087/(p0818*1000)
- p2863: 6.27256e-5; = p2277*(p1020+p1022)
- p2241: 0.000273639; = p2222*p2186
- p3194: 0; = p2413*p1023
- p3169: 1.0251e-5; = p2388*p1082
- p0109: 49.16
- p2960: 7.49118e-5; = p2374*(p1020+p1022)
- p2086: 0.0617647
- p2224: 0.126191; = if(p0765*p0769+p0766*p0770+p0767*p0771+p0768*p0772=0;0;p0771*p0767/(p0765*p0769+p0766*p0770+p0767*p0771+p0768*p0772))
- p2234: 0; = 1-(p2222+p2223+p2224+p2225)
- p2511: 0.000697983; = p2315*p1014
- p2179: 0.019687; = p0970+p0971+p0972
- p0235: 0.024
- p2154: 7.80027e-6; = p2015*p2082*p2116/(p0818*1000)
- p1163: 0.00438079
- p1554: 0
- p1792: 0
- p2020: 9.25827e6; = p2015*p2018*p2019
- p2554: 6.02587e-5; = p2358*p1014
- p1135: 0; = if(p1121=0;p1129*(p0716/100)*p0703*1000;0)
- p2548: 0; = p2352*p1123
- p2994: 0; = p2408*(p1020+p1022)
- p0764: 100; = p0104*(1+p0632*p0236/100)
- p1761: 0
- p3819: 1.17471e-7; = p1882*p3477
- p2985: 0; = p2399*(p1020+p1022)
- p2399: 0; = p2234*p2188
- p2756: 0.00016527; = p2365*(p1019+p1021)
- p0078: 1698.52
- p1246: 0; = if(p1232>0;0;p1241*(p0725/100)*p0723*1000)
- p3373: 0; = if(p1232=0;p3245*p3361/p0818;0)
- p2268: 3.49493e-6; = p2226*p2214
- p2197: 7.06869e-6; = p1055/p0818
- p2680: 0.000684175; = p2289*(p1019+p1021)
- p3067: 0; = p2286*p1023
- p1064: 0.00947418; = IF(p1012=0;p1050/(p1057*p0818);0)
- p2106: 0.856281
- p3356: 0; = if(p1232=0;p3306+p3317+p3328+p3339+p3350;0)
- p4925: 0; = p1962*p3482
- p2689: 0; = p2298*(p1078+p1080)
- p1791: 0
- p3245: 0; = IF(p3244=1;0;if(p3244+p0792/100>1;1-p3244;p0792/100))
- p2315: 0.000980355; = p2224*p2182
- p3347: 0; = if(and(p1232=0;p3256<>0);p3275*p3289;0)
- p1794: 0
- p2003: 50
- p2394: 0; = p2234*p2183
- p0754: 0
- p2440: 0.000194658; = p2244*p1014
- p1949: 0
- p2872: 5.13001e-5; = p2286*(p1020+p1022)
- p1684: 0
- p0269: 15.319
- p0483: 0; = SQRT(2)*(IF((2*p0351-1)<0;-1;IF((2*p0351-1)>0;1;0))*SQRT(SQRT((2/(pi()*0.140012289)+LN(1-(2*p0351-1)^2)/2)^2-LN(1-(2*p0351-1)^2)/0.140012289)-(2/(pi()*0.140012289)+LN(1-(2*p0351-1)^2)/2)))
- p0982: 0; = if(p0886=0;0;min(1;(p0691*p0690*1000*p0693/100)/p0886))
- p3852: 2.34942e-7; = p1915*p3477
- p0827: 0; = p0818*p0819*p0823
- p1079: 0; = IF(p1071=0;IF(p1073+p1078=1;0;IF(p1073+p1078+p1075>1;1-(p1073+p1078);p1075));0)
- p0883: 0.00340699; = p0882*p0001*p0003/(p0818*p0002)
- p3294: 0
- p0141: 92.9145
- p1690: 0
- p1875: 3.37605e-5; = p1467*1000/p0818
- p2319: 7.56193e-5; = p2224*p2186
- p3340: 0; = if(and(p1232=0;p3254<>0);p3254*(p3270-p3335)/p3338;0)
- p2360: 0.000155829; = p2225*p2188
- p1285: 0; = p1281*p1252/p0818
- p3310: 0; = if(and(p1232=0;p3252<>0);IF((p3306+p3307+p3308+p3309)+(p3252*(p3257*(1-p3277))/p3305)>p3252;p3252-(p3306+p3307+p3308+p3309);p3252*(p3257*(1-p3277))/p3305);0)
- p0933: 31027; = p0801*p0927
- p1336: 0; = p1323*p0801
- p1681: 0
- p3174: 0; = p2393*p1023
- p2847: 0; = p2261*(p1079+p1081)
- p0499: 0; = SQRT(2)*(IF((2*p0367-1)<0;-1;IF((2*p0367-1)>0;1;0))*SQRT(SQRT((2/(pi()*0.140012289)+LN(1-(2*p0367-1)^2)/2)^2-LN(1-(2*p0367-1)^2)/0.140012289)-(2/(pi()*0.140012289)+LN(1-(2*p0367-1)^2)/2)))
- p0855: 2.13756; = p0854*p0001*p0003/(p0818*p0002)
- p1972: 0; = if(p0807=480;p1967*p0001/(p0818*p0002);0)
- p1930: 0
- p2862: 0.00028575; = p2276*(p1020+p1022)
- p2448: 3.77201e-6; = p2252*p1014
- p2571: 2.92413e-5; = p2375*p1073
- p2426: 0; = p2235*p2216
- p0732: 0
- p1303: 0; = p1297*p1252/p0818
- p1740: 0
- p1306: 0; = p1302*p1252/p0818
- p1483: 1
- p2336: 0.000146431; = p2228*p2204
- p2469: 0.000422761; = p2273*p1123
- p0821: 1.51364
- p0987: 1; = if(p0978>0;0;if(and(p0687=0;p0691=0;p0695=0;p0699=0);0;IF(p0982+p0985+p0986=1;0;1-(p0982+p0985+p0986))))
- p1555: 0
- p4024: 1.37722e-7; = p1881*p3478
- p0313: 0.5
- p1779: 0
- p1070: 0.0123625; = IF(p1012=0;p1056/(p1063*p0818);0)
- p3126: 7.18256e-7; = p2345*p1082
- p2953: 0.0003017; = p2367*(p1020+p1022)
- p1159: 0.5
- p1592: 0
- p4336: 0; = p1781*p3480
- p2180: 9.89762e-8; = p3233*p1188/(p0818)
- p1919: 0
- p1062: 0.16
- p2597: 0; = p2401*p1014
- p2443: 0.000453443; = p2247*p1014
- p1662: 0
- p2913: 2.72692e-5; = p2327*(p1020+p1022)
- p2116: 0.444424
- p2458: 7.70797e-5; = p2262*p1073
- p2423: 0; = p2235*p2213
- p2065: 0.0758824
- p1234: 0; = if(p1232>0;0;p0726/100)
- p2038: 0.304457
- p2629: 0.000120493; = p2238*(p1019+p1021)
- p0943: 0; = if(and(p0683=0;p0949=0);p0937;0)
- p1635: 0
- p2652: 0; = p2261*(p1078+p1080)
- p2742: 0; = p2351*(p1128+p1130)
- p1106: 2397.4; = IF(p1071=0;p1105*p1096*p1095;0)
- p2909: 1.15282e-5; = p2323*(p1020+p1022)
- p0803: 0
- p0282: 0.5
- p2280: 0.00016535; = p2223*p2186
- p2923: 0; = p2337*(p1079+p1081)
- p1985: 3.63682e8; = (if(p1057=0;0;p1050/p1057)+if(p1058=0;0;p1051/p1058)+if(p1059=0;0;p1052/p1059)+if(p1060=0;0;p1053/p1060)+if(p1061=0;0;p1054/p1061)+if(p1062=0;0;p1055/p1062)+if(p1063=0;0;p1056/p1063))*(1+p1157)
- p0401: 0.5
- p5055: 0; = p1882*p3483
- p3307: 0; = if(and(p1232=0;p3252<>0);p3252*(p3258-p3302)/p3305;0)
- p0641: 0; = IF(p0377<0.5;-SQRT(p0007*EXP(p0509^2*p0008)-p0007);SQRT(p0007*EXP(p0509^2*p0008)-p0007))
- p3296: 0
- p2653: 0; = p2262*(p1078+p1080)
- p3689: 0; = p1962*p3476
- p4102: 5.12509e-5; = p1963*p3478
- p4004: 2.29537e-7; = p1861*p3478
- p2073: 0.377647
- p2871: 6.3391e-6; = p2285*(p1020+p1022)
- p2878: 9.38244e-7; = p2292*(p1020+p1022)
- p2931: 0; = p2345*(p1079+p1081)
- p3108: 0; = p2327*p1023
- p3453: 0; = p3377*p1240
- p3425: 0; = p3368*p1239
- p0789: 41.418; = p0129*(1+p0657*p0261/100)
- p1148: 0.146558; = if(p1121=0;IF(p1146=1;0;1-p1146);0)
- p2060: 0.272353
- p0898: 0.45865
- p0168: 273.854
- p3051: 2.41209e-6; = p2270*p1082
- p1758: 0
- p1291: 0; = IF(p1287+p1290=p1264;0;IF(p1287+p1290+p1289>p1264;p1264-(p1287+p1290);p1289))
- p3136: 0; = p2355*p1023
- p0167: 183.154
- p2306: 0; = p2227*p2213
- p0743: 0
- p3047: 4.23945e-8; = p2266*p1082
- p1893: 0
- p3070: 0; = p2289*p1023
- p3168: 1.14377e-6; = p2387*p1082
- p1222: 0.94
- p2993: 0; = p2407*(p1020+p1022)
- p1712: 0.60504
- p2662: 0; = p2271*(p1078+p1080)
- p2410: 0; = p2234*p2200
- p3416: 0; = p3378*p1238
- p1655: 0
- p1175: 0.000232019
- p3309: 0; = if(and(p1232=0;p3252<>0);p3252*(p3260-p3304)/p3305;0)
- p2917: 4.29084e-7; = p2331*(p1020+p1022)
- p0121: 18.22
- p2318: 0.000101242; = p2224*p2185
- p1824: 0
- p0719: 0
- p2330: 1.46408e-6; = p2224*p2198
- p3401: 0; = p3363*p1238
- p3025: 0; = p2244*p1023
- p2220: 6.86095e-5; = p1151/p0818
- p2207: 0.000680068; = p1119-p2205-p2204-p2206
- p1194: 1.48
- p0640: 0; = IF(p0376<0.5;-SQRT(p0007*EXP(p0508^2*p0008)-p0007);SQRT(p0007*EXP(p0508^2*p0008)-p0007))
- p1853: 0
- p2885: 0; = p2299*(p1079+p1081)
- p0959: 0.000211617; = if(and(p0683>0;or(p0807=480;p0807=32;p0807=1;and(p0807=60;p0901<0.03)));p0935;0)
- p2013: 0.85
- p0726: 0
- p2270: 7.59283e-6; = p2226*p2216
- p0846: 0.818208; = p0841*p0845^3+p0842*p0845^2+p0843*p0845+p0844
- p2363: 2.43417e-5; = p2225*p2191
- p1857: 0.000106621; = p1449*1000/p0818
- p0722: 0
- p3323: 0; = if(and(p1232=0;p3255<>0);p3265*p3277*(p3299*p3291+(1-p3299)*p3295);0)
- p1729: 0
- p0150: 6.765
- p3350: 0; = if(and(p1232=0;p3256<>0);p3256*(p3273*p3277-p3345)/p3349;0)
- p0997: 1; = if(p0888=0;0;if((p0695*p0694*1000*p0696/100)/p0888>1;1;(p0695*p0694*1000*p0696/100)/p0888))
- p0005: 1.60934
- p2698: 0; = p2307*(p1078+p1080)
- p1980: 3521.6
- p3248: 0
- p0022: 1698.52
- p2120: 0.51828
- p0715: 0
- p1995: 50
- p2015: 3.57163e8; = p0830*p2011*p2013
- p0176: 0
- p2632: 4.23402e-5; = p2241*(p1019+p1021)
- p3028: 0; = p2247*p1023
- p0686: 60.721; = p0026*(1+p0554*p0158/100)
- p3370: 0; = if(p1232=0;p3245*p3358/p0818;0)
- p1624: 0
- p2529: 0.000216662; = p2333*p1014
- p2493: 0; = p2297*p1073
- p2688: 0; = p2297*(p1078+p1080)
- p0476: 0; = SQRT(2)*(IF((2*p0344-1)<0;-1;IF((2*p0344-1)>0;1;0))*SQRT(SQRT((2/(pi()*0.140012289)+LN(1-(2*p0344-1)^2)/2)^2-LN(1-(2*p0344-1)^2)/0.140012289)-(2/(pi()*0.140012289)+LN(1-(2*p0344-1)^2)/2)))
- p2748: 1.75331e-5; = p2357*(p1019+p1021)
- p2895: 0; = p2309*(p1079+p1081)
- p0370: 0.5
- p1732: 0
- p1218: 0.5
- p1219: 0; = if(p1218=0;0;SQRT(2)*(IF((2*p1218-1)<0;-1;IF((2*p1218-1)>0;1;0))*SQRT(SQRT((2/(pi()*0.140012289)+LN(1-(2*p1218-1)^2)/2)^2-LN(1-(2*p1218-1)^2)/0.140012289)-(2/(pi()*0.140012289)+LN(1-(2*p1218-1)^2)/2))))
- p0961: 0; = if(and(p0683>0;or(p0807=480;p0807=32;p0807=1;and(p0807=60;p0901<0.03)));p0937;0)
- p0502: 0; = SQRT(2)*(IF((2*p0370-1)<0;-1;IF((2*p0370-1)>0;1;0))*SQRT(SQRT((2/(pi()*0.140012289)+LN(1-(2*p0370-1)^2)/2)^2-LN(1-(2*p0370-1)^2)/0.140012289)-(2/(pi()*0.140012289)+LN(1-(2*p0370-1)^2)/2)))
- p1101: 0.0162883; = IF(p1071=0;IF(p1096=1;0;IF(p1096+p1097>1;1-p1096;p1097));0)
- p1665: 0
- p2417: 0; = p2235*p2207
- p3386: 0; = p3367*p1234
- p2551: 0.000171486; = p2355*p1014
- p0091: 47.364
- p2515: 5.38386e-5; = p2319*p1014
- p3645: 0; = p1914*p3476
- p2451: 0.000784023; = p2255*p1014
- p1691: 0
- p2249: 0.000740265; = p2222*p2195
- p3376: 0; = if(p1232=0;p3246*p3358/p0818;0)
- p2558: 6.89158e-5; = p2362*p1014
- p4926: 0; = p1963*p3482
- p4542: 3.83442e-6; = p1781*p3481
- p2062: 3.76588
- p2685: 0.00010296; = p2294*(p1019+p1021)
- p4498: 0; = p1943*p3480
- p2927: 0; = p2341*(p1079+p1081)
- p2187: 8.62449e-5; = 4*1.00794*p2186/(2*14.0067)
- p1858: 0
- p1204: 0.980791
- p0512: 0; = SQRT(2)*(IF((2*p0380-1)<0;-1;IF((2*p0380-1)>0;1;0))*SQRT(SQRT((2/(pi()*0.140012289)+LN(1-(2*p0380-1)^2)/2)^2-LN(1-(2*p0380-1)^2)/0.140012289)-(2/(pi()*0.140012289)+LN(1-(2*p0380-1)^2)/2)))
- p1752: 0
- p1196: 0.59
- p2499: 0; = p2303*p1073
- p3285: 0
- p2902: 2.86861e-5; = p2316*(p1020+p1022)
- p2590: 0; = p2394*p1014
- p0089: 2.469
- p2818: 0; = p2427*(p1078+p1080)
- p2370: 3.60279e-6; = p2225*p2199
- p2145: 2.04827e-5; = p2015*p2073*p2107/(p0818*1000)
- p2556: 0.000110945; = p2360*p1014
- p1889: 0
- p3375: 0; = if(p1232=0;p3246*p3357/p0818;0)
- p0346: 0.5
- p2310: 0; = p2227*p2217
- p1886: 0
- p1979: 1.14295e8; = p0973
- p2709: 1.56651e-5; = p2318*(p1019+p1021)
- p1707: 0
- p1001: 0; = if(p0978>0;0;if(and(p0687=0;p0691=0;p0695=0;p0699=0);0;IF(p0996+p0999+p1000=1;0;1-(p0996+p0999+p1000))))
- p1136: 0; = if(p1121=0;p1130*(p0716/100)*p0703*1000;0)
- p0424: 0; = SQRT(2)*(IF((2*p0292-1)<0;-1;IF((2*p0292-1)>0;1;0))*SQRT(SQRT((2/(pi()*0.140012289)+LN(1-(2*p0292-1)^2)/2)^2-LN(1-(2*p0292-1)^2)/0.140012289)-(2/(pi()*0.140012289)+LN(1-(2*p0292-1)^2)/2)))
- p0767: 47.89; = p0107*(1+p0635*p0239/100)
- p1908: 0
- p0970: 0; = p0967/p0818
- p4059: 4.59074e-8; = p1916*p3478
- p0314: 0.5
- p5337: 2.88239e-7; = p1962*p3484
- p1268: 0
- p2928: 0; = p2342*(p1079+p1081)
- p0951: 0; = if(and(p0683=0;or(p0807=480;p0807=32;p0807=1;and(p0807=60;p0901<0.03)));p0939;0)
- p2789: 0; = p2398*(p1019+p1021)
- p1861: 8.61237e-7; = p1453*1000/p0818
- p0591: 0; = IF(p0327<0.5;-SQRT(p0007*EXP(p0459^2*p0008)-p0007);SQRT(p0007*EXP(p0459^2*p0008)-p0007))
- p3359: 0; = if(p1232=0;p3309+p3320+p3331+p3342+p3353;0)
- p3146: 0; = p2365*p1023
- p1581: 0
- p0633: 0; = IF(p0369<0.5;-SQRT(p0007*EXP(p0501^2*p0008)-p0007);SQRT(p0007*EXP(p0501^2*p0008)-p0007))
- p3249: 0
- p3331: 0; = if(and(p1232=0;p3255<>0);p3255*(p3268-p3326)/p3327;0)
- p1868: 0
- p2705: 0; = p2314*(p1128+p1130)
- p2026: 55.14
- p1944: 0
- p1214: 14; = IF(p1213=0;0;p1213-1)
- p0138: 27.366
- p1816: 0
- p1606: 0
- p3612: 0; = p1881*p3476
- p1178: 6.79399e-8; = p1176/p0818
- p2746: 3.72685e-5; = p2355*(p1019+p1021)
- p0792: 0
- p0380: 0.5
- p2533: 9.03635e-5; = p2337*p1073
- p3004: 0; = p2418*(p1079+p1081)
- p1094: 2.26885e-5; = IF(p1071=0;p1088*p0001/(p0818*p0002);0)
- p2830: 3.64453e-5; = p2244*(p1020+p1022)
- p1167: 0.5
- p0320: 0.5
- p1695: 0
- p3114: 0; = p2333*p1023
- p3107: 0; = p2326*p1023
- p2958: 4.54023e-5; = p2372*(p1020+p1022)
- p0917: 1.27956
- p1708: 0
- p1593: 0
- p0868: 0.689353; = IF(p0858+p0864+p0865+p0866+p0867=1;0;IF(p0858+p0864+p0865+p0866+p0867+p0863>1;1-(p0858+p0864+p0865+p0866+p0867);p0863))
- p0400: 0.5
- p1124: 0; = if(p1121=0;p0718/100;0)
- p2077: 0.043
- p1008: 0; = p1004*p0001*p0004/(p0818*p0002)
- p0214: 1.148
- p2419: 0; = p2235*p2209
- p2142: 1.41763e-5; = p2015*p2070*p2104/(p0818*1000)
- p1734: 0
- p2782: 0; = p2391*(p1128+p1130)
- p1271: 0; = IF(p1267+p1270=p1259;0;IF(p1267+p1270+p1269>p1259;p1259-(p1267+p1270);p1269))
- p1716: 0
- p2997: 0; = p2411*(p1020+p1022)
- p3078: 0; = p2297*p1082
- p0575: 0; = IF(p0311<0.5;-SQRT(p0007*EXP(p0443^2*p0008)-p0007);SQRT(p0007*EXP(p0443^2*p0008)-p0007))
- p1961: 0.5
- p3465: 0; = p3370*p1241
- p2475: 0.000157613; = p2279*p1014
- p0759: 0
- p3410: 0; = p3372*p1238
- p0841: -0.151962
- p0994: 0; = p0990*p0001*p0004/(p0818*p0002)
- p1237: 0; = if(p1232>0;0;p0729/100)
- p2164: 0.0221056; = (p2015/p0818)-(p2022)-(p2035+p2036+p2052)-(p2017/p0818)-(p2039+p2041+p2044+p2158+p2159+p2160+p2161+p2162)
- p2496: 0; = p2300*p1073
- p0657: 0; = IF(p0393<0.5;-SQRT(p0007*EXP(p0525^2*p0008)-p0007);SQRT(p0007*EXP(p0525^2*p0008)-p0007))
- p2925: 0; = p2339*(p1079+p1081)
- p0691: 0
- p2821: 0; = p2430*(p1128+p1130)
- p3069: 0; = p2288*p1023
- p3178: 0; = p2397*p1023
- p1938: 0
- p3272: 0
- p2665: 0; = p2274*(p1128+p1130)
- p2486: 1.38868e-6; = p2290*p1014
- p2472: 0.00152622; = p2276*p1014
- p3048: 4.43312e-7; = p2267*p1082
- p3113: 0; = p2332*p1023
- p0772: 27.018; = p0112*(1+p0640*p0244/100)
- p2251: 3.22784e-6; = p2222*p2197
- p1099: 0.421213
- p3098: 0; = p2317*p1023
- p1299: 0
- p2787: 0; = p2396*(p1019+p1021)
- p0730: 0
- p3120: 0.000113119; = p2339*p1082
- p1563: 0
- p1267: 0
- p0757: 0
- p0698: 0
- p3297: 0; = if(p1273+p1274+p1275+p1276=0;0;p1273/(p1273+p1274+p1275+p1276))
- p1078: 0; = IF(p1071=0;IF(p1073=1;0;IF(p1073+p1074>1;1-p1073;p1074));0)
- p3143: 0; = p2362*p1023
- p0664: 0; = IF(p0400<0.5;-SQRT(p0007*EXP(p0532^2*p0008)-p0007);SQRT(p0007*EXP(p0532^2*p0008)-p0007))
- p0307: 0.5
- p1293: 0; = p1287*p1252/p0818
- p0752: 0
- p3167: 1.98672e-6; = p2386*p1082
- p3086: 0; = p2305*p1082
- p2704: 0; = p2313*(p1128+p1130)
- p2109: 0.826583
- p3411: 0; = p3373*p1238
- p0532: 0; = SQRT(2)*(IF((2*p0400-1)<0;-1;IF((2*p0400-1)>0;1;0))*SQRT(SQRT((2/(pi()*0.140012289)+LN(1-(2*p0400-1)^2)/2)^2-LN(1-(2*p0400-1)^2)/0.140012289)-(2/(pi()*0.140012289)+LN(1-(2*p0400-1)^2)/2)))
- p1785: 0
- p0703: 1698.24; = p0043*(1+p0571*p0175/100)
- p1843: 0
- p2810: 0; = p2419*(p1078+p1080)
- p2182: 0.00776883; = p1050/p0818
- p2184: 0.000232923; = p1051/p0818
- p0763: 1698.24; = p0103*(1+p0631*p0235/100)
- p0403: 0.5
- p3449: 0; = p3373*p1240

## Reference product
- winter wheat; at harvest in 2009; at farm; 86%-90% moisture: 1 kg

## Inputs from technosphere
- CUTOFF nitrogenous fertilizer, aqueous ammonia; at point-of-sale: 0.00103521 kg; = p1065
- CUTOFF limestone, high-grade, pulverized; at point-of-sale: 0.0145039 kg; = p1228
- CUTOFF regional or national trucking; class 8, average fuel: 0.0154846 metric ton*km; = p2009
- CUTOFF N inhibitor appl svc; unspec rate & type, 2009 winter wheat: 0.000292821 ha; = p1162
- CUTOFF sewage sludge; at point-of-sale: 1.63884e-7 kg; = p1190
- CUTOFF international vessel transport; average fuel: 0.177473 metric ton*km; = p2006
- CUTOFF apply liming materials; unspecified method: 0.000261249 ha; = p1227
- CUTOFF nitrogenous fertilizer, urea; at point-of-sale: 0.0123625 kg; = p1070
- CUTOFF prepare soil; for no-till, wheat: 4.48638e-5 ha; = p0936
- CUTOFF apply single or mixed P fertilizer; unspec. method: 2.26885e-5 ha; = p1094
- CUTOFF sulfur storage: 7.08044e-8 kg*a; = p1174
- CUTOFF wheat seeds; unspec. type; at point-of-sale: 0.0156801 kg; = p0972
- CUTOFF sewage sludge storage: 8.19421e-8 kg*a; = p1192
- CUTOFF apply pesticide; as foliar or directed spray: 0.000405642 ha; = p1339
- CUTOFF nitrogenous fertilizer, sodium nitrate; at point-of-sale: 4.41793e-5 kg; = p1069
- CUTOFF phosphatic fertilizer, monoammonium phosphate; at point-of-sale: 0.00146969 kg; = p1120
- CUTOFF pesticide formulation balance; at point-of-sale: 0.000192297 kg; = p1963
- CUTOFF apply N fertilizer; broadcast without incorporation: 1.48784e-5 ha; = p1032
- CUTOFF apply gypsum; unspecified method: 0.000261249 ha; = p1165
- CUTOFF phosphatic fertilizer, diammonium phosphate; at point-of-sale: 0.00129458 kg; = p1119
- CUTOFF local area trucking; class 6, average fuel: 0.0014919 metric ton*km; = p2010
- CUTOFF pesticide, Tribenuron-methyl; at point-of-sale; kg AI: 5.16742e-7 kg; = p1950
- CUTOFF zinc compounds storage: 1.43063e-8 kg*a; = p1186
- CUTOFF apply pesticide; unspecified application methods: 6.69732e-6 ha; = p1345
- CUTOFF pesticide, 2,4-D, dimethylamine salt; at point-of-sale; kg AI: 2.56649e-5 kg; = p1756
- CUTOFF apply sulfur; unspecified method: 0.000261249 ha; = p1171
- CUTOFF harvest; winter wheat residue management: 0.000261249 ha; = p1975
- CUTOFF bulk cargo rail transport; diesel: 0.0372975 metric ton*km; = p2008
- CUTOFF pesticide, Propiconazole; at point-of-sale; kg AI: 1.03348e-6 kg; = p1914
- CUTOFF phosphatic fertilizer, superphos. grades 22% and under; at point-of-sale: 4.73106e-6 kg; = p1116
- CUTOFF pesticide, Bromoxynil heptanoate; at point-of-sale; kg AI: 8.09563e-6 kg; = p1781
- CUTOFF apply zinc compounds; unspecified method: 0.000261249 ha; = p1183
- CUTOFF sulfur; at point-of-sale: 1.41609e-7 kg; = p1172
- CUTOFF pesticide, Metsulfuron-methyl; at point-of-sale; kg AI: 1.72247e-7 kg; = p1891
- CUTOFF apply N fertilizer; no broadcast application: 0.000185809 ha; = p1030
- CUTOFF apply pesticide; broadcast with incorporation: 0.000228257 ha; = p1333
- CUTOFF manure appl svc; unspec rate, 2009 winter wheat: 0.000261249 ha; = p1233
- CUTOFF apply pesticide; broadcast by air: 0.000194693 ha; = p1331
- CUTOFF potassic fertilizer, potassium chloride; at point-of-sale: 0.000962551 kg; = p1154
- CUTOFF pesticide, 2,4-D, 2-ethylhexyl ester; at point-of-sale; kg AI: 5.51192e-5 kg; = p1755
- CUTOFF apply P fertilizer; no broadcast application: 4.87308e-5 ha; = p1089
- CUTOFF sowing; for unspec. till, wheat: 4.7681e-6 ha; = p0963
- CUTOFF harvest; winter: 0.000252028 ha; = p1971
- CUTOFF pesticide, Prosulfuron; at point-of-sale; kg AI: 1.72247e-7 kg; = p1916
- CUTOFF sulfuric acid; at point-of-sale: 6.79399e-8 kg; = p1178
- CUTOFF liming materials storage: 0.00744316 kg*a; = p1231
- CUTOFF pesticide, Propoxycarbazone-sodium; at point-of-sale; kg AI: 1.03348e-6 kg; = p1915
- CUTOFF apply pesticide; broadcast without incorporation: 2.11454e-5 ha; = p1335
- CUTOFF nitrogenous fertilizer, ammonium nitrate; at point-of-sale: 0.00178879 kg; = p1066
- CUTOFF sulfuric acid storage: 3.397e-8 kg*a; = p1180
- CUTOFF dolomite, pulverized; at point-of-sale: 0.000382429 kg; = p1229
- CUTOFF apply mixed N fertilizer; without incorporation: 1.991e-5 ha; = p1034
- CUTOFF pesticide storage: 0.000340429 kg*a; = p1965
- CUTOFF irrigate; pressure, surface water source, in 2009: 4.80617e-6 ha-m; = p1007
- CUTOFF gypsum storage: 6.41393e-7 kg*a; = p1168
- CUTOFF phosphatic fertilizer, superphosphate grades over 22%; at point-of-sale: 5.16257e-5 kg; = p1117
- CUTOFF pesticide, Bromoxynil octanoate; at point-of-sale; kg AI: 2.27367e-5 kg; = p1782
- CUTOFF seed storage; wheat: 0.00984352 kg*a; = p0975
- CUTOFF pesticide, Imazamox; at point-of-sale; kg AI: 8.61237e-7 kg; = p1861
- CUTOFF irrigate; unspec. irrigation method, unspec. water source, in 2009: 4.01794e-7 ha-m; = p1011
- winter wheat residue; at harvest in 2009; at farm; 83%-90% moisture: 0.655987 kg; = p0839
- CUTOFF apply single or mixed K fertilizer; unspec. method: 4.82346e-6 ha; = p1144
- CUTOFF phosphatic fertilizer, other single phosphates; at point-of-sale: 0.000234069 kg; = p1118
- CUTOFF zinc compounds; at point-of-sale: 2.86125e-8 kg; = p1184
- CUTOFF apply sewage sludge; unspecified method: 0.000261249 ha; = p1189
- CUTOFF apply K fertilizer; no broadcast application: 1.45385e-5 ha; = p1139
- CUTOFF prepare soil; for unspec. till, wheat: 4.7681e-6 ha; = p0939
- CUTOFF domestic barge transport; average fuel: 0.019892 metric ton*km; = p2007
- CUTOFF apply N fertilizer; broadcast with incorporation: 4.03812e-5 ha; = p1031
- CUTOFF pesticide, Fluroxypyr-meptyl; at point-of-sale; kg AI: 1.89472e-6 kg; = p1847
- CUTOFF pesticide, Pyrasulfotole; at point-of-sale; kg AI: 5.16742e-7 kg; = p1882
- CUTOFF nitrogenous fertilizer, nitrogen solutions; at point-of-sale: 0.0252084 kg; = p1068
- CUTOFF gypsum; at point-of-sale: 1.28279e-6 kg; = p1166
- CUTOFF pesticide, Thifensulfuron methyl; at point-of-sale; kg AI: 6.8899e-7 kg; = p1943
- CUTOFF apply sulfuric acid; unspecified method: 0.000261249 ha; = p1177
- CUTOFF nitrogenous fertilizer, ammonium sulfate; at point-of-sale: 0.00285114 kg; = p1067
- CUTOFF fertilizer filler materials; at point-of-sale: 0.0106663 kg; = p1158
- CUTOFF pesticide, Mesosulfuron-methyl; at point-of-sale; kg AI: 5.16742e-7 kg; = p1881
- CUTOFF potassic fertilizer, other single nutrients; at point-of-sale: 0.000187835 kg; = p1155
- CUTOFF pesticide, Glyphosate-isopropylammonium; at point-of-sale; kg AI: 0.000106621 kg; = p1857
- CUTOFF wheat seeds; nonGMO herbicide resistant; at point-of-sale: 0.0040069 kg; = p0971
- CUTOFF pesticide, MCPA-2-ethylhexyl; at point-of-sale; kg AI: 3.37605e-5 kg; = p1875
- CUTOFF nitrogenous fertilizer, anhydrous ammonia; at point-of-sale: 0.00947418 kg; = p1064
- CUTOFF fertilizer storage: 0.0338179 kg*a; = p1160
- CUTOFF sowing; for mulch till, wheat: 0.000211617 ha; = p0959
- CUTOFF pesticide, unspecified type; at point-of-sale; kg AI: 3.68592e-5 kg; = p1962
- CUTOFF prepare soil; for mulch till, wheat: 0.000211617 ha; = p0935
- CUTOFF sowing; for no-till, wheat: 4.48638e-5 ha; = p0960

## Inputs from nature
- Dry matter except CNPK; from plant uptake: 1.27956 kg; = p0917
- Occupation, annual crop [natural resource, land]: 2.13756 m2*year; = 1.0 * (p0855)
- Carbon dioxide: 3.5495 kg; = p0900*3.6666666667
- Transformation, from annual crop [natural resource, land]: 2.61249 m2; = 1.0 * (p0879+p0883+p0881+p0877)
- Nitrogen: 0.0341917 kg; = p0905
- Water, surface: 48.0617 kg; = p0889
- Transformation, to annual crop [natural resource, land]: 2.61249 m2; = 1.0 * (p0857)
- Water, unspecified origin: 0.00435875 m3; = p0916*0.001+p0893*0.001
- Phosphorus: 0.00590066 kg; = p0910
- Potassium; from plant uptake; biogenic: 0.0189815 kg; = p0915

## Emissions to nature
- Furan [air, non-urban air or from high stacks]: 6.72974e-6 kg; = 1.0 * (p2138*1.4166666667)
- Superphosphate, grades<= 22%; no broadcast in fert. in fall bef. plant.; kg P: 9.10558e-8 kg; = p2462
- Nitrogen solution; no broadcast in fert. at plant.; no broadcast in fert. at plant.; kg N: 0.000679448 kg; = p2522
- Monoammonium phosphate; unspec. appl. method in fert. after plant.: 6.32118e-5 kg; = p3161*8.2142857143
- Urea; broadcast w/ incorp. in fert. at plant.: 0.000235432 kg; = p2724*5
- Bromoxynil heptanoate; foliar or directed spray: 3.83442e-6 kg; = p4542
- Pesticide formulation balance; broadcast without incorporation: 4.7478e-6 kg; = p4308
- 1-Butene: 8.23545e-6 kg; = p2144*1.1666666667
- Phosphorous; applied in sewage sludge: 9.15042e-10 kg; = p3241
- Sodium nitrate; broadcast w/o incorp. in fert. at plant.: 7.21918e-7 kg; = p2915*6.0714285714
- cis-2-Butene: 2.64272e-6 kg; = p2149*1.1666666667
- MCPA-2-ethylhexyl; broadcast without incorporation: 8.33547e-7 kg; = p4224
- Carbon dioxide, in air: 0.0823263 kg; = p2163*3.6666666667
- Nitrogen solution; no broadcast in fert. in fall bef. plant.; no broadcast in fert. in fall bef. plant.; kg N: 0.00245868 kg; = p2444
- Monoammonium phosphate; no broadcast in fert. in fall bef. plant.: 0.00028632 kg; = p2459*8.2142857143
- Sodium nitrate; no broadcast in fert. in fall bef. plant.: 1.39529e-5 kg; = p2447*6.0714285714
- Pesticide formulation balance; unspec. appl. method: 1.50376e-6 kg; = p5338
- Acetol; from residue burning: 0.000231639 kg; = p2134*2.0555555556
- Tribenuron-methyl: 1.17471e-7 kg; = p3887
- Superphosphate, grades<= 22%; unspec. appl. method in fert. in fall bef. plant.; kg P: 4.23945e-8 kg; = p3047
- Other single phosphates; unspec. appl. method in fert. at plant.; kg P: 3.90807e-6 kg; = p3129
- Ammonium nitrate; broadcast w/ incorp. in fert. in spr. bef. plant.: 0.000120613 kg; = p2671*4.7142857143
- Anhydrous ammonia; broadcast w/o incorp. in fert. at plant.: 0.000158684 kg; = p2901*1.2142857143
- Monoammonium phosphate; unspec. appl. method in fert. in fall bef. plant.: 0.000133307 kg; = p3044*8.2142857143
- Sewage sludge dry matter; applied in sewage sludge: 8.4861e-10 kg; = p3243
- Pesticide formulation balance; broadcast by air: 4.37148e-5 kg; = p3896
- Sodium nitrate; broadcast w/o incorp. in fert. in spr. bef. plant.: 1.57856e-6 kg; = p2876*6.0714285714
- Nitrogen solution; broadcast w/ incorp. in fert. at plant.; broadcast w/ incorp. in fert. at plant.; kg N: 0.000147662 kg; = p2717
- Pesticides, unspecified [soil, agricultural]: 2.848e-5 kg; = 1.0 * (p4307+p5337+p4101+p4719)
- Superphosphate, grades>22%; unspec. appl. method in fert. in fall bef. plant.; kg P: 1.11027e-6 kg; = p3049
- Other single phosphates; no broadcast in fert. at plant.; kg P: 8.39385e-6 kg; = p2544
- Superphosphate, grades<= 22%; no broadcast in fert. at plant.; kg P: 1.47529e-7 kg; = p2540
- Sodium nitrate; no broadcast in fert. at plant.: 3.85584e-6 kg; = p2525*6.0714285714
- Thifensulfuron methyl; broadcast without incorporation: 1.70112e-8 kg; = p4292
- MCPA-2-ethylhexyl; broadcast by air: 7.67478e-6 kg; = p3812
- Starane [soil, agricultural]: 1.464e-6 kg; = 1.0 * (p4608+p4196+p5226+p3990)
- Anhydrous ammonia; broadcast w/ incorp. in fert. in spr. bef. plant.: 0.000402765 kg; = p2667*1.2142857143
- Nitrogen dioxide: 0.00012247 kg; = p2039*3.2857142857
- Aqueous ammonia; broadcast w/o incorp. in fert. in fall bef. plant.: 1.72161e-5 kg; = p2825*1.2142857143
- Potassium chloride; unspec. appl. method in fert. in fall bef. plant.: 0.000220627 kg; = p3053*2.2166666667
- Ammonium nitrate; broadcast w/o incorp. in fert. in spr. bef. plant.: 0.000103909 kg; = p2866*4.7142857143
- Ammonium sulfate; broadcast w/o incorp. in fert. in fall bef. plant.: 0.000171814 kg; = p2830*4.7142857143
- Nitrogen; in below-ground residue: 0.00344026 kg; = p2174
- 2,4-D, dimethylamine salt: 1.98305e-5 kg; = p4105+p5135+p4517+p3899
- 2,4-D, 2-ethylhexyl ester: 4.25889e-5 kg; = p4104+p4516+p5134+p3898
- Ammonium sulfate; broadcast w/o incorp. in fert. in spr. bef. plant.: 0.000103821 kg; = p2869*4.7142857143
- Benzene [air, non-urban air or from high stacks]: 9.44008e-6 kg; = 1.0 * (p2140*1.0833333333)
- Plant dry matter; from residue burning: 0.0221056 kg; = p2164
- Other single phosphates; unspec. appl. method in fert. in fall bef. plant.; kg P: 2.41209e-6 kg; = p3051
- Pentane [air, non-urban air or from high stacks]: 1.30151e-6 kg; = 1.0 * (p2152*1.0166666667)
- Toluene [air, non-urban air or from high stacks]: 1.17179e-5 kg; = 1.0 * (p2141*1.0952380952)
- Thifensulfuron methyl; unspec. appl. method: 5.3879e-9 kg; = p5322
- Ammonium nitrate; broadcast w/ incorp. in fert. at plant.: 5.51598e-5 kg; = p2710*4.7142857143
- Ammonium nitrate; no broadcast in fert. in spr. bef. plant.: 0.000554987 kg; = p2476*4.7142857143
- Urea; no broadcast in fert. in spr. bef. plant.: 0.00236879 kg; = p2490*5
- Other single phosphates; no broadcast in fert. after plant.; kg P: 2.45661e-6 kg; = p2583
- Ammonia [air, non-urban air or from high stacks]: 0.000133505 kg; = 1.0 * (p2159*1.2142857143)
- Nitrogen solution; broadcast w/ incorp. in fert. after plant.; broadcast w/ incorp. in fert. after plant.; kg N: 0.00016527 kg; = p2756
- Carbon monoxide, fossil [air, non-urban air or from high stacks]: 0.00339404 kg; = 1.0 * (p2028*2.3333333333)
- Ethyne [air, non-urban air or from high stacks]: 1.67462e-5 kg; = 1.0 * (p2132*1.0833333333)
- Monoammonium phosphate; unspec. appl. method in fert. at plant.: 0.000215985 kg; = p3122*8.2142857143
- Sulfur [soil, agricultural]: 1.41609e-7 kg; = 1.0 * (p3230)
- isobutene: 7.19066e-6 kg; = p2150*1.1666666667
- Ammonium sulfate; broadcast w/ incorp. in fert. at plant.: 5.51133e-5 kg; = p2713*4.7142857143
- Ammonium nitrate; no broadcast in fert. in fall bef. plant.: 0.00091845 kg; = p2437*4.7142857143
- Sodium nitrate; broadcast w/o incorp. in fert. in fall bef. plant.: 2.61236e-6 kg; = p2837*6.0714285714
- Superphosphate, grades<= 22%; unspec. appl. method in fert. after plant.; kg P: 2.01027e-8 kg; = p3164
- Aqueous ammonia; broadcast w/o incorp. in fert. in spr. bef. plant.: 1.04031e-5 kg; = p2864*1.2142857143
- Acetic acid [air, non-urban air or from high stacks]: 0.000344198 kg; = 1.0 * (p2127*2.5)
- Superphosphate, grades<= 22%; unspec. appl. method in fert. at plant.; kg P: 6.86877e-8 kg; = p3125
- Propiconazole [air, non-urban air or from high stacks]: 2.34942e-7 kg; = 1.0 * (p3851)
- Diammonium phosphate; unspec. appl. method in fert. after plant.: 5.80478e-5 kg; = p3157*4.7142857143
- Aqueous ammonia; no broadcast in fert. in spr. bef. plant.: 5.55642e-5 kg; = p2474*1.2142857143
- Oxygen; applied in limestone: 0.00653823 kg; = p3219
- Metsulfuron-methyl [soil, agricultural]: 1.3309e-7 kg; = 1.0 * (p4652+p5270+p4034+p4240)
- Imazamox [air, non-urban air or from high stacks]: 1.95785e-7 kg; = 1.0 * (p3798)
- Water [air, non-urban air or from high stacks]: 9.76628e-6 m3; = 0.001 * (p2016)
- Anhydrous ammonia; no broadcast in fert. after plant.: 0.000948619 kg; = p2550*1.2142857143
- Superphosphate, grades>22%; no broadcast in fert. after plant.; kg P: 1.13076e-6 kg; = p2581
- cyclopentane: 1.01758e-7 kg; = p2153*1.0166666667
- Propanenitrile: 3.94204e-6 kg; = p2157*1.5277777778
- Anhydrous ammonia; broadcast w/ incorp. in fert. in fall bef. plant.: 0.000666537 kg; = p2628*1.2142857143
- Aqueous ammonia; no broadcast in fert. after plant.: 2.84412e-5 kg; = p2552*1.2142857143
- Nitrogen solution; broadcast w/ incorp. in fert. in fall bef. plant.; broadcast w/ incorp. in fert. in fall bef. plan...: 0.000534336 kg; = p2639
- Mesosulfuron-methyl (prop) [soil, agricultural]: 3.99271e-7 kg; = 1.0 * (p4230+p4024+p5260+p4642)
- Potassium; in below-ground residue; biogenic: 0.00320104 kg; = p2176
- Pesticide formulation balance; broadcast with incorporation: 5.12509e-5 kg; = p4102
- MCPA-2-ethylhexyl; unspec. appl. method: 2.64007e-7 kg; = p5254
- Ammonium nitrate; broadcast w/o incorp. in fert. at plant.: 4.75202e-5 kg; = p2905*4.7142857143
- Nitrogen solution; no broadcast in fert. after plant.; no broadcast in fert. after plant.; kg N: 0.00076047 kg; = p2561
- Bromoxynil heptanoate; broadcast without incorporation: 1.99881e-7 kg; = p4130
- Potassium chloride; no broadcast in fert. in fall bef. plant.: 0.000664998 kg; = p2468*2.2166666667
- Urea; broadcast w/o incorp. in fert. in fall bef. plant.: 0.000733951 kg; = p2841*5
- Other limestone constituents; applied in limestone: 0.000870234 kg; = p3220
- Propene [air, non-urban air or from high stacks]: 4.15894e-5 kg; = 1.0 * (p2136*1.1666666667)
- Methanol [air, non-urban air or from high stacks]: 0.000202191 kg; = 1.0 * (p2129*2.6666666667)
- Anhydrous ammonia; broadcast w/ incorp. in fert. at plant.: 0.000184195 kg; = p2706*1.2142857143
- Sodium nitrate; broadcast w/o incorp. in fert. after plant.: 8.08004e-7 kg; = p2954*6.0714285714
- Sodium nitrate; broadcast w/ incorp. in fert. after plant.: 9.37903e-7 kg; = p2759*6.0714285714
- Methane: 0.000130194 kg; = p2025*1.3333333333
- Monoammonium phosphate; no broadcast in fert. after plant.: 0.000135768 kg; = p2576*8.2142857143
- Ethane [air, non-urban air or from high stacks]: 5.59049e-5 kg; = 1.0 * (p2126*1.25)
- Bromoxynil heptanoate; broadcast by air: 1.84038e-6 kg; = p3718
- Sodium nitrate; no broadcast in fert. after plant.: 4.31564e-6 kg; = p2564*6.0714285714
- Aqueous ammonia; no broadcast in fert. in fall bef. plant.: 9.19534e-5 kg; = p2435*1.2142857143
- Phosphorous; in below-ground residue: 0.000525934 kg; = p2175
- Pyrasulfotole; broadcast by air: 1.17471e-7 kg; = p3819
- Nitrogen solution; broadcast w/o incorp. in fert. at plant.; broadcast w/o incorp. in fert. at plant.; kg N: 0.000127211 kg; = p2912
- Acrylonitrile: 2.06215e-6 kg; = p2156*1.4722222222
- Diammonium phosphate; no broadcast in fert. in fall bef. plant.: 0.00026293 kg; = p2455*4.7142857143
- Propiconazole [soil, agricultural]: 7.98543e-7 kg; = 1.0 * (p4057+p4263+p4675+p5293)
- Thifensulfuron methyl; foliar or directed spray: 3.26333e-7 kg; = p4704
- Glyphosate-isopropylammonium: 2.42382e-5 kg; = p3794
- Ammonium nitrate; no broadcast in fert. after plant.: 0.000284077 kg; = p2554*4.7142857143
- Diammonium phosphate; unspec. appl. method in fert. in fall bef. plant.: 0.000122417 kg; = p3040*4.7142857143
- Oxygen; applied in dolomite: 0.000191959 kg; = p3228
- Nitrogen; in above-ground residue left on field: 0.00683598 kg; = p2168
- Anhydrous ammonia; no broadcast in fert. at plant.: 0.000847551 kg; = p2511*1.2142857143
- Zinc compounds: 2.86125e-8 kg; = p3232
- Tribenuron-methyl [soil, agricultural]: 3.99271e-7 kg; = 1.0 * (p4299+p4711+p4093+p5329)
- 2,4-D, dimethylamine salt; broadcast by air: 5.8344e-6 kg; = p3693
- Other single phosphates; no broadcast in fert. in fall bef. plant.; kg P: 5.18074e-6 kg; = p2466
- Nitrogen solution; broadcast w/o incorp. in fert. in fall bef. plant.; broadcast w/o incorp. in fert. in fall bef. pl...: 0.000460331 kg; = p2834
- Aqueous ammonia; broadcast w/o incorp. in fert. after plant.: 5.32496e-6 kg; = p2942*1.2142857143
- Anhydrous ammonia; broadcast w/o incorp. in fert. in spr. bef. plant.: 0.000346982 kg; = p2862*1.2142857143
- Hydrocyanic acid: 1.75506e-5 kg; = p2154*2.25
- Pyrasulfotole; broadcast with incorporation: 1.37722e-7 kg; = p4025
- Ammonium sulfate; broadcast w/ incorp. in fert. in fall bef. plant.: 0.000199435 kg; = p2635*4.7142857143
- Monoammonium phosphate; no broadcast in fert. at plant.: 0.000463897 kg; = p2537*8.2142857143
- Bromoxynil heptanoate; broadcast with incorporation: 2.15765e-6 kg; = p3924
- 2,4-D, 2-ethylhexyl ester: 1.25302e-5 kg; = p3692
- Particulates, < 2.5 um [air, non-urban air or from high stacks]: 0.000247927 kg; = 1.0 * (p2035+p2033)
- Diammonium phosphate; no broadcast in fert. at plant.: 0.000425999 kg; = p2533*4.7142857143
- Sodium nitrate; broadcast w/ incorp. in fert. at plant.: 8.37977e-7 kg; = p2720*6.0714285714
- Formic acid [air, non-urban air or from high stacks]: 6.16448e-5 kg; = 1.0 * (p2131*3.8333333333)
- Pyrasulfotole; foliar or directed spray: 2.4475e-7 kg; = p4643
- Ammonium nitrate; broadcast w/o incorp. in fert. after plant.: 5.31869e-5 kg; = p2944*4.7142857143
- I butane; from residue burning: 1.29778e-6 kg; = p2146*1.0208333333
- Sodium nitrate; no broadcast in fert. in spr. bef. plant.: 8.43126e-6 kg; = p2486*6.0714285714
- Gypsum: 1.28279e-6 kg; = p3229
- Bromoxynil heptanoate; unspec. appl. method: 6.33078e-8 kg; = p5160
- Aqueous ammonia; broadcast w/ incorp. in fert. in fall bef. plant.: 1.99839e-5 kg; = p2630*1.2142857143
- Urea; broadcast w/ incorp. in fert. in fall bef. plant.: 0.000851945 kg; = p2646*5
- Ammonium sulfate; no broadcast in fert. in fall bef. plant.: 0.000917675 kg; = p2440*4.7142857143
- Nitrogen solution; broadcast w/o incorp. in fert. in spr. bef. plant.; broadcast w/o incorp. in fert. in spr. bef. pl...: 0.000278162 kg; = p2873
- Pesticides, unspecified: 8.3792e-6 kg; = p3895
- MCPA-2-ethylhexyl; broadcast with incorporation: 8.99785e-6 kg; = p4018
- Starane: 4.30727e-7 kg; = p3784
- Pesticide formulation balance; foliar or directed spray: 9.10794e-5 kg; = p4720
- Acetonitrile [air, non-urban air or from high stacks]: 1.29145e-5 kg; = 1.0 * (p2155*1.7083333333)
- Other single phosphates; unspec. appl. method in fert. after plant.; kg P: 1.14377e-6 kg; = p3168
- Magnesium [soil, agricultural]: 4.85065e-5 kg; = 1.0 * (p3227)
- Ammonium sulfate; broadcast w/ incorp. in fert. after plant.: 6.16854e-5 kg; = p2752*4.7142857143
- Carbon [soil, agricultural]: 0.365925 kg; = 1.0 * (p3225+p3217+p3242+p2173+p2167)
- Imazamox [soil, agricultural]: 6.65452e-7 kg; = 1.0 * (p4210+p4004+p5240+p4622)
- Ammonium nitrate; broadcast w/ incorp. in fert. after plant.: 6.17375e-5 kg; = p2749*4.7142857143
- Prosulfuron [soil, agricultural]: 1.3309e-7 kg; = 1.0 * (p4059+p4677+p5295+p4265)
- Aqueous ammonia; broadcast w/ incorp. in fert. at plant.: 5.52249e-6 kg; = p2708*1.2142857143
- Ammonium nitrate; no broadcast in fert. at plant.: 0.000253811 kg; = p2515*4.7142857143
- Aqueous ammonia; broadcast w/o incorp. in fert. at plant.: 4.75763e-6 kg; = p2903*1.2142857143
- Ash: 0.0121687 kg; = p2021+p2022
- Anhydrous ammonia; no broadcast in fert. in spr. bef. plant.: 0.00185327 kg; = p2472*1.2142857143
- Ammonium sulfate; broadcast w/o incorp. in fert. after plant.: 5.3142e-5 kg; = p2947*4.7142857143
- Butadiene [air, non-urban air or from high stacks]: 9.28232e-6 kg; = 1.0 * (p2143*1.125)
- Other single K nutrients; unspec. appl. method in fert. in fall bef. plant.; kg K: 1.7092e-5 kg; = p3055
- Glyphosate-isopropylammonium: 8.2383e-5 kg; = p4618+p5236+p4000+p4206
- Diammonium phosphate; unspec. appl. method in fert. at plant.: 0.00019834 kg; = p3118*4.7142857143
- Aqueous ammonia; broadcast w/ incorp. in fert. after plant.: 6.18103e-6 kg; = p2747*1.2142857143
- Nitrogen solution; broadcast w/ incorp. in fert. in spr. bef. plant.; broadcast w/ incorp. in fert. in spr. bef. plan...: 0.000322881 kg; = p2678
- Ammonium nitrate; broadcast w/o incorp. in fert. in fall bef. plant.: 0.000171959 kg; = p2827*4.7142857143
- Butane [air, non-urban air or from high stacks]: 3.7376e-6 kg; = 1.0 * (p2147*1.0208333333)
- Superphosphate, grades<= 22%; no broadcast in fert. after plant.; kg P: 4.31769e-8 kg; = p2579
- Urea; broadcast w/ incorp. in fert. in spr. bef. plant.: 0.0005148 kg; = p2685*5
- Methyl vinyl ether; from residue burning: 4.66611e-6 kg; = p2137*1.6111111111
- Ammonium sulfate; broadcast w/ incorp. in fert. in spr. bef. plant.: 0.000120512 kg; = p2674*4.7142857143
- Acetone [air, non-urban air or from high stacks]: 2.74541e-5 kg; = 1.0 * (p2139*1.6111111111)
- Urea; broadcast w/o incorp. in fert. in spr. bef. plant.: 0.000443501 kg; = p2880*5
- Filler materials, applied with synthetic fertilizer: 0.0106663 kg; = p2432
- Nitrogen solution; no broadcast in fert. in spr. bef. plant.; no broadcast in fert. in spr. bef. plant.; kg N: 0.00148569 kg; = p2483
- Pyrasulfotole; broadcast without incorporation: 1.27584e-8 kg; = p4231
- Urea; no broadcast in fert. after plant.: 0.00121249 kg; = p2568*5
- Thifensulfuron methyl; broadcast by air: 1.56628e-7 kg; = p3880
- Urea; broadcast w/o incorp. in fert. after plant.: 0.000227011 kg; = p2958*5
- Glycolaldehyde; from residue burning: 0.000123947 kg; = p2135*2.5
- Plant dry matter; in below-ground residue: 0.136757 kg; = p2177
- Other single K nutrients; no broadcast in fert. in fall bef. plant.; kg K: 5.15175e-5 kg; = p2470
- Urea; broadcast w/ incorp. in fert. after plant.: 0.000263507 kg; = p2763*5
- Prosulfuron: 3.9157e-8 kg; = p3853
- Plant dry matter; in aboveground residue left on field: 0.271743 kg; = p2172
- Bromoxynil octanoate: 1.75679e-5 kg; = p4131+p3925+p4543+p5161
- Nitrogen solution; broadcast w/o incorp. in fert. after plant.; broadcast w/o incorp. in fert. after plant.; kg N: 0.000142381 kg; = p2951
- Nitrogen; applied in sewage sludge: 7.66518e-9 kg; = p3240
- Thifensulfuron methyl; broadcast with incorporation: 1.8363e-7 kg; = p4086
- Dioxins and furans (PCDD/F); from residue burning: 1.84561e-12 kg TEQ; = p2047
- Phosphorous; in above-ground residue left on field: 0.00104506 kg; = p2169
- Mesosulfuron-methyl: 1.17471e-7 kg; = p3818
- Anhydrous ammonia; broadcast w/o incorp. in fert. after plant.: 0.000177607 kg; = p2940*1.2142857143
- Superphosphate, grades>22%; no broadcast in fert. in fall bef. plant.; kg P: 2.38466e-6 kg; = p2464
- Anhydrous ammonia; no broadcast in fert. in fall bef. plant.: 0.00306698 kg; = p2433*1.2142857143
- Seeds; used in planting and sowing: 0.019687 kg; = p2179
- Metsulfuron-methyl: 3.9157e-8 kg; = p3828
- Ammonium nitrate; broadcast w/ incorp. in fert. in fall bef. plant.: 0.000199604 kg; = p2632*4.7142857143
- Propane [air, non-urban air or from high stacks]: 1.73266e-5 kg; = 1.0 * (p2142*1.2222222222)
- trans-2-Butene: 3.50314e-6 kg; = p2148*1.1666666667
- Ethene [air, non-urban air or from high stacks]: 8.95127e-5 kg; = 1.0 * (p2125*1.1666666667)
- Dinitrogen monoxide [air, non-urban air or from high stacks]: 4.30724e-6 kg; = 1.0 * (p2044*1.5714285714)
- Phenol [air, non-urban air or from high stacks]: 3.19089e-5 kg; = 1.0 * (p2133*1.3055555556)
- Formaldehyde [air, non-urban air or from high stacks]: 0.000127893 kg; = 1.0 * (p2128*2.5)
- Acetaldehyde [air, non-urban air or from high stacks]: 7.65155e-5 kg; = 1.0 * (p2130*1.8333333333)
- Calcium [soil, agricultural]: 0.00554511 kg; = 1.0 * (p3226+p3218)
- Superphosphate, grades>22%; unspec. appl. method in fert. at plant.; kg P: 1.79886e-6 kg; = p3127
- Isoprene [air, non-urban air or from high stacks]: 2.32138e-5 kg; = 1.0 * (p2145*1.1333333333)
- Superphosphate, grades>22%; unspec. appl. method in fert. after plant.; kg P: 5.26468e-7 kg; = p3166
- Water: 52.2057 kg; = p2171+p2178+p2181
- Urea; no broadcast in fert. at plant.: 0.00108331 kg; = p2529*5
- Sulfuric acid [soil, agricultural]: 6.79399e-8 kg; = 1.0 * (p3231)
- Pyrasulfotole; unspec. appl. method: 4.04093e-9 kg; = p5261
- MCPA-2-ethylhexyl; foliar or directed spray: 1.59903e-5 kg; = p4636
- Ammonium sulfate; no broadcast in fert. at plant.: 0.000253597 kg; = p2518*4.7142857143
- Sulfur dioxide [air, non-urban air or from high stacks]: 2.7069e-5 kg; = 1.0 * (p2041)
- Superphosphate, grades>22%; no broadcast in fert. at plant.; kg P: 3.86363e-6 kg; = p2542
- Anhydrous ammonia; broadcast w/ incorp. in fert. after plant.: 0.00020616 kg; = p2745*1.2142857143
- Aqueous ammonia; no broadcast in fert. at plant.: 2.5411e-5 kg; = p2513*1.2142857143
- Ammonium sulfate; broadcast w/o incorp. in fert. at plant.: 4.74801e-5 kg; = p2908*4.7142857143
- NMVOC, non-methane volatile organic compounds, unspecified origin [air, non-urban air or from high stacks]: 0.00158072 kg; = 1.0 * (p2051+p2052)
- Anhydrous ammonia; broadcast w/o incorp. in fert. in fall bef. plant.: 0.000574222 kg; = p2823*1.2142857143
- Urea; no broadcast in fert. in fall bef. plant.: 0.00392011 kg; = p2451*5
- Potassium; in above-ground residue left on field; biogenic: 0.00636063 kg; = p2170
- Sodium nitrate; broadcast w/ incorp. in fert. in spr. bef. plant.: 1.83234e-6 kg; = p2681*6.0714285714
- Ammonium sulfate; no broadcast in fert. in spr. bef. plant.: 0.000554519 kg; = p2479*4.7142857143
- Diammonium phosphate; no broadcast in fert. after plant.: 0.000124676 kg; = p2572*4.7142857143
- Bromoxynil octanoate: 5.16873e-6 kg; = p3719
- Urea; broadcast w/o incorp. in fert. at plant.: 0.000202825 kg; = p2919*5
- Propoxycarbazone-sodium: 2.34942e-7 kg; = p3852
- Sodium nitrate; broadcast w/ incorp. in fert. in fall bef. plant.: 3.03234e-6 kg; = p2642*6.0714285714
- isopentane: 1.04121e-6 kg; = p2151*1.0166666667
- Aqueous ammonia; broadcast w/ incorp. in fert. in spr. bef. plant.: 1.20756e-5 kg; = p2669*1.2142857143
- Particulates, < 10 um: 0.00040665 kg; = p2034+p2036
- Ammonium sulfate; no broadcast in fert. after plant.: 0.000283837 kg; = p2557*4.7142857143
- Propoxycarbazone-sodium (prop) [soil, agricultural]: 7.98543e-7 kg; = 1.0 * (p5294+p4676+p4264+p4058)

## Sampling procedure
A delete-a-group jackknife is used by the USDA to estimate the ARMS sample means and RSEs, based on a 30 sample delete-a-group jackknife. Because of this relatively small sample size, a Students t distribution is used to represent ARMS data probability density functions. Other representations of uncertainty are described in Cooper, J.S., Kahn, E., Noon, M. (2012). LCA Digital Commons Unit Process Data: field crop production Version 1. Prepared for the US Department of Agriculture National Agricultural Library. Retrieved from https://www.lcacommons.gov/discovery/docs/LCA%20Digital%20Commons%20Unit%20Process%20Data%20final%20updated.pdf

## Extrapolations
Data represent an aggregation of processes applied in Washington in 2009. Data development is demonstrated by parameterization (exlicitly presents all raw and uncertainty data and all calculations). Flow data quality according to the LCADC convention is provided for all flows.
