# cotton lint; at harvest in 2003; at farm; 90%-93% moisture

Dataset: EcoSpold 2, unit process
Geography: GLO
Time period: 2003-01-02 to 2004-01-01
Scenario: Business-as-Usual
System model: Allocation, ecoinvent default
Generated by: cooperjs@u.washington.edu
isCopyrightProtected: false

## General comment
This unit process/ gate-to-gate dataset represents the production of 1 kg cotton coproduced with cottonseed and residue. The process technologies are an aggregation of those applied in California in 2003. Applicable classifications include ISIC 0116, NAIC 111920, UNSPSC 11121802; this dataset was prepared in ILCD format using the UWDFE Lab Excel to ILCD File Generator (beta version, August 2013)

Exchange "S,S,S-tributyl phosphorotrithioate-soil agricultural" is the result of combining the following original LCA Commons flows: "Tribufos; unspec. appl. method; kg AI", "Tribufos; broadcast without incorporation; kg AI", "Tribufos; foliar or directed spray; kg AI", "Tribufos; broadcast with incorporation; kg AI", "Tribufos; banded or side-dressed; kg AI", "Tribufos; in seed furrow; kg AI", "Tribufos; chiseled or injected/knifed in; kg AI".
Exchange "Ethephon-soil agricultural" is the result of combining the following original LCA Commons flows: "Ethephon; broadcast with incorporation; kg AI", "Ethephon; chiseled or injected/knifed in; kg AI", "Ethephon; banded or side-dressed; kg AI", "Ethephon; in seed furrow; kg AI", "Ethephon; broadcast without incorporation; kg AI", "Ethephon; unspec. appl. method; kg AI", "Ethephon; foliar or directed spray; kg AI".
Exchange "Imidacloprid-soil agricultural" is the result of combining the following original LCA Commons flows: "Imidacloprid; banded or side-dressed; kg AI", "Imidacloprid; chiseled or injected/knifed in; kg AI", "Imidacloprid; foliar or directed spray; kg AI", "Imidacloprid; broadcast without incorporation; kg AI", "Imidacloprid; unspec. appl. method; kg AI", "Imidacloprid; in seed furrow; kg AI", "Imidacloprid; broadcast with incorporation; kg AI".
Exchange "Oxyfluorfen-soil agricultural" is the result of combining the following original LCA Commons flows: "Oxyfluorfen; chiseled or injected/knifed in; kg AI", "Oxyfluorfen; in seed furrow; kg AI", "Oxyfluorfen; foliar or directed spray; kg AI", "Oxyfluorfen; broadcast with incorporation; kg AI", "Oxyfluorfen; banded or side-dressed; kg AI", "Oxyfluorfen; broadcast without incorporation; kg AI", "Oxyfluorfen; unspec. appl. method; kg AI".
Exchange "Sodium chlorate-soil agricultural" is the result of combining the following original LCA Commons flows: "Sodium chlorate; in seed furrow; kg AI", "Sodium chlorate; chiseled or injected/knifed in; kg AI", "Sodium chlorate; banded or side-dressed; kg AI", "Sodium chlorate; broadcast with incorporation; kg AI", "Sodium chlorate; foliar or directed spray; kg AI", "Sodium chlorate; unspec. appl. method; kg AI", "Sodium chlorate; broadcast without incorporation; kg AI".
Exchange "Phorate-soil agricultural" is the result of combining the following original LCA Commons flows: "Phorate; chiseled or injected/knifed in; kg AI", "Phorate; unspec. appl. method; kg AI", "Phorate; broadcast without incorporation; kg AI", "Phorate; in seed furrow; kg AI", "Phorate; broadcast with incorporation; kg AI", "Phorate; banded or side-dressed; kg AI", "Phorate; foliar or directed spray; kg AI".
Exchange "Dimethoate-soil agricultural" is the result of combining the following original LCA Commons flows: "Dimethoate; in seed furrow; kg AI", "Dimethoate; broadcast without incorporation; kg AI", "Dimethoate; foliar or directed spray; kg AI", "Dimethoate; broadcast with incorporation; kg AI", "Dimethoate; chiseled or injected/knifed in; kg AI", "Dimethoate; banded or side-dressed; kg AI", "Dimethoate; unspec. appl. method; kg AI".
Exchange "S-Metolachlor-soil agricultural" is the result of combining the following original LCA Commons flows: "S-Metolachlor; in seed furrow; kg AI", "S-Metolachlor; foliar or directed spray; kg AI", "S-Metolachlor; chiseled or injected/knifed in; kg AI", "S-Metolachlor; broadcast without incorporation; kg AI", "S-Metolachlor; banded or side-dressed; kg AI", "S-Metolachlor; broadcast with incorporation; kg AI", "S-Metolachlor; unspec. appl. method; kg AI".
Exchange "Abamectin-soil agricultural" is the result of combining the following original LCA Commons flows: "Abamectin; foliar or directed spray; kg AI", "Abamectin; broadcast without incorporation; kg AI", "Abamectin; banded or side-dressed; kg AI", "Abamectin; in seed furrow; kg AI", "Abamectin; broadcast with incorporation; kg AI", "Abamectin; chiseled or injected/knifed in; kg AI", "Abamectin; unspec. appl. method; kg AI".
Exchange "NMVOC, non-methane volatile organic compounds, unspecified origin-air low population density" is the result of combining the following original LCA Commons flows: "NMVOCs; from residue burning; kg C, biogenic", "NMVOCs; from residue burning; kg except C, biogenic".
Exchange "Cyclanilide-soil agricultural" is the result of combining the following original LCA Commons flows: "Cyclanilide; in seed furrow; kg AI", "Cyclanilide; chiseled or injected/knifed in; kg AI", "Cyclanilide; banded or side-dressed; kg AI", "Cyclanilide; broadcast without incorporation; kg AI", "Cyclanilide; broadcast with incorporation; kg AI", "Cyclanilide; unspec. appl. method; kg AI", "Cyclanilide; foliar or directed spray; kg AI".
Exchange "Glyphosate-soil agricultural" is the result of combining the following original LCA Commons flows: "Glyphosate; broadcast without incorporation; kg AI", "Glyphosate; unspec. appl. method; kg AI", "Glyphosate; in seed furrow; kg AI", "Glyphosate; foliar or directed spray; kg AI", "Glyphosate; broadcast with incorporation; kg AI", "Glyphosate; banded or side-dressed; kg AI", "Glyphosate; chiseled or injected/knifed in; kg AI".
Exchange "Mepiquat chloride-soil agricultural" is the result of combining the following original LCA Commons flows: "1,1-Dimethylpiperidinium chloride; broadcast without incorporation; kg AI", "1,1-Dimethylpiperidinium chloride; chiseled or injected/knifed in; kg AI", "1,1-Dimethylpiperidinium chloride; in seed furrow; kg AI", "1,1-Dimethylpiperidinium chloride; broadcast with incorporation; kg AI", "1,1-Dimethylpiperidinium chloride; banded or side-dressed; kg AI", "1,1-Dimethylpiperidinium chloride; foliar or directed spray; kg AI", "1,1-Dimethylpiperidinium chloride; unspec. appl. method; kg AI".
Exchange "Carbon-soil agricultural" is the result of combining the following original LCA Commons flows: "Carbon; in above-ground residue left on field; biogenic", "Carbon; broadcast w/ incorp. in manure in fall before planting; biogenic", "Carbon; applied in sewage sludge", "Carbon; using unspec. method in manure at an unknown time", "Carbon; broadcast w/o incorp. in manure in fall before planting; biogenic", "Carbon; applied in limestone", "Carbon; using unspec. method in manure in fall before planting; biogenic", "Carbon; in below-ground residue; biogenic", "Carbon; broadcast w/o incorp. in manure at an unknown time", "Carbon; broadcast w/ incorp. in manure at an unknown time", "Carbon; applied in dolomite".
Exchange "Particulates, < 2.5 um-air low population density" is the result of combining the following original LCA Commons flows: "PM2.5; from residue burning; kg C, biogenic", "PM2.5; from residue burning; kg except C, biogenic".
Exchange "Thidiazuron-soil agricultural" is the result of combining the following original LCA Commons flows: "Thidiazuron; banded or side-dressed; kg AI", "Thidiazuron; chiseled or injected/knifed in; kg AI", "Thidiazuron; in seed furrow; kg AI", "Thidiazuron; broadcast with incorporation; kg AI", "Thidiazuron; unspec. appl. method; kg AI", "Thidiazuron; broadcast without incorporation; kg AI", "Thidiazuron; foliar or directed spray; kg AI".
Exchange "Propargite-soil agricultural" is the result of combining the following original LCA Commons flows: "Propargite; unspec. appl. method; kg AI", "Propargite; in seed furrow; kg AI", "Propargite; banded or side-dressed; kg AI", "Propargite; foliar or directed spray; kg AI", "Propargite; broadcast without incorporation; kg AI", "Propargite; chiseled or injected/knifed in; kg AI", "Propargite; broadcast with incorporation; kg AI".
Exchange "Prometryn-soil agricultural" is the result of combining the following original LCA Commons flows: "Prometryn; chiseled or injected/knifed in; kg AI", "Prometryn; banded or side-dressed; kg AI", "Prometryn; in seed furrow; kg AI", "Prometryn; foliar or directed spray; kg AI", "Prometryn; broadcast with incorporation; kg AI", "Prometryn; unspec. appl. method; kg AI", "Prometryn; broadcast without incorporation; kg AI".
Exchange "Chlorpyrifos-soil agricultural" is the result of combining the following original LCA Commons flows: "Chlorpyrifos; broadcast with incorporation; kg AI", "Chlorpyrifos; banded or side-dressed; kg AI", "Chlorpyrifos; broadcast without incorporation; kg AI", "Chlorpyrifos; unspec. appl. method; kg AI", "Chlorpyrifos; chiseled or injected/knifed in; kg AI", "Chlorpyrifos; in seed furrow; kg AI", "Chlorpyrifos; foliar or directed spray; kg AI".
Exchange "Pesticides, unspecified-soil agricultural" is the result of combining the following original LCA Commons flows: "Unspecified pesticide; in seed furrow; kg AI", "Unspecified pesticide; foliar or directed spray; kg AI", "Unspecified pesticide; banded or side-dressed; kg AI", "Unspecified pesticide; chiseled or injected/knifed in; kg AI", "Unspecified pesticide; broadcast with incorporation; kg AI", "Unspecified pesticide; unspec. appl. method; kg AI", "Unspecified pesticide; broadcast without incorporation; kg AI".
Exchange "Dicofol-soil agricultural" is the result of combining the following original LCA Commons flows: "Dicofol; unspec. appl. method; kg AI", "Dicofol; broadcast with incorporation; kg AI", "Dicofol; banded or side-dressed; kg AI", "Dicofol; in seed furrow; kg AI", "Dicofol; foliar or directed spray; kg AI", "Dicofol; broadcast without incorporation; kg AI", "Dicofol; chiseled or injected/knifed in; kg AI".
Exchange "Ash-soil agricultural" is the result of combining the following original LCA Commons flows: "Ash; from residue burning; kg except C, biogenic", "Ash; from residue burning; kg C, biogenic".
Exchange "Trifluralin-soil agricultural" is the result of combining the following original LCA Commons flows: "Trifluralin; unspec. appl. method; kg AI", "Trifluralin; in seed furrow; kg AI", "Trifluralin; banded or side-dressed; kg AI", "Trifluralin; broadcast without incorporation; kg AI", "Trifluralin; broadcast with incorporation; kg AI", "Trifluralin; chiseled or injected/knifed in; kg AI", "Trifluralin; foliar or directed spray; kg AI".
Exchange "Diuron-soil agricultural" is the result of combining the following original LCA Commons flows: "Diuron; chiseled or injected/knifed in; kg AI", "Diuron; broadcast without incorporation; kg AI", "Diuron; foliar or directed spray; kg AI", "Diuron; in seed furrow; kg AI", "Diuron; broadcast with incorporation; kg AI", "Diuron; banded or side-dressed; kg AI", "Diuron; unspec. appl. method; kg AI".
Exchange "Water-soil agricultural" is the result of combining the following original LCA Commons flows: "Water; using unspec. method in manure", "Water; in below-ground residue; biogenic", "Water; broadcast w/o incorp. in manure", "Water; in above-ground residue left on field; biogenic", "Water; from irrigation and applied with manure and sewage sludge", "Water; broadcast w/ incorp. in manure".
Exchange "Endothall-soil agricultural" is the result of combining the following original LCA Commons flows: "Endothall; broadcast with incorporation; kg AI", "Endothall; unspec. appl. method; kg AI", "Endothall; foliar or directed spray; kg AI", "Endothall; broadcast without incorporation; kg AI", "Endothall; chiseled or injected/knifed in; kg AI", "Endothall; banded or side-dressed; kg AI", "Endothall; in seed furrow; kg AI".
Exchange "Thiamethoxam-soil agricultural" is the result of combining the following original LCA Commons flows: "Thiamethoxam; broadcast without incorporation; kg AI", "Thiamethoxam; in seed furrow; kg AI", "Thiamethoxam; broadcast with incorporation; kg AI", "Thiamethoxam; unspec. appl. method; kg AI", "Thiamethoxam; chiseled or injected/knifed in; kg AI", "Thiamethoxam; banded or side-dressed; kg AI", "Thiamethoxam; foliar or directed spray; kg AI".
Exchange "Pendimethalin-soil agricultural" is the result of combining the following original LCA Commons flows: "Pendimethalin; unspec. appl. method; kg AI", "Pendimethalin; broadcast without incorporation; kg AI", "Pendimethalin; banded or side-dressed; kg AI", "Pendimethalin; broadcast with incorporation; kg AI", "Pendimethalin; chiseled or injected/knifed in; kg AI", "Pendimethalin; in seed furrow; kg AI", "Pendimethalin; foliar or directed spray; kg AI".
Exchange "Oxamyl-soil agricultural" is the result of combining the following original LCA Commons flows: "Oxamyl; banded or side-dressed; kg AI", "Oxamyl; broadcast with incorporation; kg AI", "Oxamyl; broadcast without incorporation; kg AI", "Oxamyl; unspec. appl. method; kg AI", "Oxamyl; foliar or directed spray; kg AI", "Oxamyl; in seed furrow; kg AI", "Oxamyl; chiseled or injected/knifed in; kg AI".
Exchange "Pyriproxyfen-soil agricultural" is the result of combining the following original LCA Commons flows: "Pyriproxyfen; broadcast with incorporation; kg AI", "Pyriproxyfen; foliar or directed spray; kg AI", "Pyriproxyfen; chiseled or injected/knifed in; kg AI", "Pyriproxyfen; broadcast without incorporation; kg AI", "Pyriproxyfen; banded or side-dressed; kg AI", "Pyriproxyfen; unspec. appl. method; kg AI", "Pyriproxyfen; in seed furrow; kg AI".
Exchange "Water, unspecified origin-resource in water" is the result of combining the following original LCA Commons flows: "Water; withdrawal from unspec. source, for cotton, in 2003", "Water; from plant uptake; biogenic".
Exchange "Pyrithiobac sodium salt-soil agricultural" is the result of combining the following original LCA Commons flows: "Pyrithiobac-sodium; chiseled or injected/knifed in; kg AI", "Pyrithiobac-sodium; unspec. appl. method; kg AI", "Pyrithiobac-sodium; broadcast with incorporation; kg AI", "Pyrithiobac-sodium; broadcast without incorporation; kg AI", "Pyrithiobac-sodium; foliar or directed spray; kg AI", "Pyrithiobac-sodium; in seed furrow; kg AI", "Pyrithiobac-sodium; banded or side-dressed; kg AI".
Exchange "Carfentrazone ethyl ester-soil agricultural" is the result of combining the following original LCA Commons flows: "Carfentrazone-ethyl; banded or side-dressed; kg AI", "Carfentrazone-ethyl; broadcast with incorporation; kg AI", "Carfentrazone-ethyl; chiseled or injected/knifed in; kg AI", "Carfentrazone-ethyl; in seed furrow; kg AI", "Carfentrazone-ethyl; foliar or directed spray; kg AI", "Carfentrazone-ethyl; unspec. appl. method; kg AI", "Carfentrazone-ethyl; broadcast without incorporation; kg AI".
Exchange "Particulates, < 10 um-air low population density" is the result of combining the following original LCA Commons flows: "PM10; from residue burning; kg C, biogenic", "PM10; from residue burning; kg except C, biogenic".
Exchange "Cyfluthrin-soil agricultural" is the result of combining the following original LCA Commons flows: "Beta-Cyfluthrin; foliar or directed spray; kg AI", "Beta-Cyfluthrin; broadcast with incorporation; kg AI", "Beta-Cyfluthrin; in seed furrow; kg AI", "Beta-Cyfluthrin; broadcast without incorporation; kg AI", "Beta-Cyfluthrin; banded or side-dressed; kg AI", "Beta-Cyfluthrin; chiseled or injected/knifed in; kg AI", "Beta-Cyfluthrin; unspec. appl. method; kg AI".
Exchange "Acetamiprid-soil agricultural" is the result of combining the following original LCA Commons flows: "Acetamiprid; unspec. appl. method; kg AI", "Acetamiprid; foliar or directed spray; kg AI", "Acetamiprid; chiseled or injected/knifed in; kg AI", "Acetamiprid; banded or side-dressed; kg AI", "Acetamiprid; in seed furrow; kg AI", "Acetamiprid; broadcast without incorporation; kg AI", "Acetamiprid; broadcast with incorporation; kg AI".
Exchange "Transformation, from arable-resource land" is the result of combining the following original LCA Commons flows: "Transformation; from arable, from fallow to cotton", "Transformation; from arable, from small grains to cotton", "Transformation; from arable, from unspec. use to cotton", "Transformation; from arable, from corn to cotton", "Transformation; from arable, from cotton to cotton", "Transformation; from arable, from other to cotton".
Exchange "Calcium-soil agricultural" is the result of combining the following original LCA Commons flows: "Calcium; applied in limestone", "Calcium; applied in dolomite".
Exchange "Tebufenozide-soil agricultural" is the result of combining the following original LCA Commons flows: "Tebufenozide; broadcast with incorporation; kg AI", "Tebufenozide; broadcast without incorporation; kg AI", "Tebufenozide; banded or side-dressed; kg AI", "Tebufenozide; in seed furrow; kg AI", "Tebufenozide; unspec. appl. method; kg AI", "Tebufenozide; foliar or directed spray; kg AI", "Tebufenozide; chiseled or injected/knifed in; kg AI".
Exchange "Indoxacarb-soil agricultural" is the result of combining the following original LCA Commons flows: "Indoxacarb; broadcast with incorporation; kg AI", "Indoxacarb; chiseled or injected/knifed in; kg AI", "Indoxacarb; unspec. appl. method; kg AI", "Indoxacarb; in seed furrow; kg AI", "Indoxacarb; banded or side-dressed; kg AI", "Indoxacarb; foliar or directed spray; kg AI", "Indoxacarb; broadcast without incorporation; kg AI".
Exchange "Paraquat dichloride-soil unspecified" is the result of combining the following original LCA Commons flows: "Paraquat dichloride; broadcast with incorporation; kg AI", "Paraquat dichloride; in seed furrow; kg AI", "Paraquat dichloride; chiseled or injected/knifed in; kg AI", "Paraquat dichloride; banded or side-dressed; kg AI", "Paraquat dichloride; foliar or directed spray; kg AI", "Paraquat dichloride; broadcast without incorporation; kg AI", "Paraquat dichloride; unspec. appl. method; kg AI".
Exchange "Aldicarb-soil agricultural" is the result of combining the following original LCA Commons flows: "Aldicarb; unspec. appl. method; kg AI", "Aldicarb; banded or side-dressed; kg AI", "Aldicarb; chiseled or injected/knifed in; kg AI", "Aldicarb; broadcast with incorporation; kg AI", "Aldicarb; broadcast without incorporation; kg AI", "Aldicarb; foliar or directed spray; kg AI", "Aldicarb; in seed furrow; kg AI".
Exchange "Propane-2bdf9967-6dae-4183-88d1-8f612548c51e low population density" was originally named: "Propane; from residue burning; kg C, biogenic" in this dataset.
Exchange "Formic acid-2bdf9967-6dae-4183-88d1-8f612548c51e low population density" was originally named: "Formic acid; from residue burning; kg C, biogenic" in this dataset.
Exchange "Propene-2bdf9967-6dae-4183-88d1-8f612548c51e low population density" was originally named: "Propylene; from residue burning; kg C, biogenic" in this dataset.
Exchange "Dicofol-2bdf9967-6dae-4183-88d1-8f612548c51e low population density" was originally named: "Dicofol; broadcast by air; kg AI" in this dataset.
Exchange "trans-2-Butene-2bdf9967-6dae-4183-88d1-8f612548c51e low population density" was originally named: "Trans 2 butene; from residue burning; kg C, biogenic" in this dataset.
Exchange "S-Metolachlor-2bdf9967-6dae-4183-88d1-8f612548c51e low population density" was originally named: "S-Metolachlor; broadcast by air; kg AI" in this dataset.
Exchange "Abamectin-2bdf9967-6dae-4183-88d1-8f612548c51e low population density" was originally named: "Abamectin; broadcast by air; kg AI" in this dataset.
Exchange "Acetaldehyde-2bdf9967-6dae-4183-88d1-8f612548c51e low population density" was originally named: "Acetaldehyde; from residue burning; kg C, biogenic" in this dataset.
Exchange "Diuron-2bdf9967-6dae-4183-88d1-8f612548c51e low population density" was originally named: "Diuron; broadcast by air; kg AI" in this dataset.
Exchange "Acetonitrile-2bdf9967-6dae-4183-88d1-8f612548c51e low population density" was originally named: "Acetonitrile; from residue burning; kg C, biogenic" in this dataset.
Exchange "Glyphosate-2bdf9967-6dae-4183-88d1-8f612548c51e low population density" was originally named: "Glyphosate; broadcast by air; kg AI" in this dataset.
Exchange "Carbon dioxide, in air-2bdf9967-6dae-4183-88d1-8f612548c51e low population density" was originally named: "Carbon dioxide; from residue burning; kg C, biogenic" in this dataset.
Exchange "Occupation, arable-c19fb2d9-98eb-4cd3-8761-81b71d8a9a1b land" was originally named: "Occupation; arable, as cotton" in this dataset.
Exchange "Sodium chlorate-2bdf9967-6dae-4183-88d1-8f612548c51e low population density" was originally named: "Sodium chlorate; broadcast by air; kg AI" in this dataset.
Exchange "Acrylonitrile-2bdf9967-6dae-4183-88d1-8f612548c51e low population density" was originally named: "Propenenitrile; from residue burning; kg C, biogenic" in this dataset.
Exchange "isopentane-2bdf9967-6dae-4183-88d1-8f612548c51e low population density" was originally named: "I pentane; from residue burning; kg C, biogenic" in this dataset.
Exchange "Pyriproxyfen-2bdf9967-6dae-4183-88d1-8f612548c51e low population density" was originally named: "Pyriproxyfen; broadcast by air; kg AI" in this dataset.
Exchange "Oxamyl-2bdf9967-6dae-4183-88d1-8f612548c51e low population density" was originally named: "Oxamyl; broadcast by air; kg AI" in this dataset.
Exchange "Acetone-2bdf9967-6dae-4183-88d1-8f612548c51e low population density" was originally named: "Acetone; from residue burning; kg C, biogenic" in this dataset.
Exchange "cis-2-Butene-2bdf9967-6dae-4183-88d1-8f612548c51e low population density" was originally named: "Cis 2 butene; from residue burning; kg C, biogenic" in this dataset.
Exchange "isobutene-2bdf9967-6dae-4183-88d1-8f612548c51e low population density" was originally named: "I butene; from residue burning; kg C, biogenic" in this dataset.
Exchange "Thidiazuron-2bdf9967-6dae-4183-88d1-8f612548c51e low population density" was originally named: "Thidiazuron; broadcast by air; kg AI" in this dataset.
Exchange "Ethene-2bdf9967-6dae-4183-88d1-8f612548c51e low population density" was originally named: "Ethylene; from residue burning; kg C, biogenic" in this dataset.
Exchange "Acetic acid-2bdf9967-6dae-4183-88d1-8f612548c51e low population density" was originally named: "Acetic acid; from residue burning; kg C, biogenic" in this dataset.
Exchange "Water, ground-c19fb2d9-98eb-4cd3-8761-81b71d8a9a1b in water" was originally named: "Water; withdrawal from groundwater, for cotton, in 2003" in this dataset.
Exchange "Dimethoate-2bdf9967-6dae-4183-88d1-8f612548c51e low population density" was originally named: "Dimethoate; broadcast by air; kg AI" in this dataset.
Exchange "Aldicarb-2bdf9967-6dae-4183-88d1-8f612548c51e low population density" was originally named: "Aldicarb; broadcast by air; kg AI" in this dataset.
Exchange "Phosphorus-c19fb2d9-98eb-4cd3-8761-81b71d8a9a1b unspecified" was originally named: "Phosphorous; from plant uptake; biogenic" in this dataset.
Exchange "Sulfur-be1c0329-f1a8-4524-8420-a86d2a8dd358 agricultural" was originally named: "Sulfur; as secondary application" in this dataset.
Exchange "Methane-2bdf9967-6dae-4183-88d1-8f612548c51e low population density" was originally named: "Methane; from residue burning; kg C, biogenic" in this dataset.
Exchange "Nitrogen dioxide-2bdf9967-6dae-4183-88d1-8f612548c51e low population density" was originally named: "Nitrogen dioxide; from residue burning; kg N, biogenic" in this dataset.
Exchange "Endothall-2bdf9967-6dae-4183-88d1-8f612548c51e low population density" was originally named: "Endothall; broadcast by air; kg AI" in this dataset.
Exchange "Tribufos-2bdf9967-6dae-4183-88d1-8f612548c51e low population density" was originally named: "Tribufos; broadcast by air; kg AI" in this dataset.
Exchange "Benzene-2bdf9967-6dae-4183-88d1-8f612548c51e low population density" was originally named: "Benzene; from residue burning; kg C, biogenic" in this dataset.
Exchange "Transformation, to arable-c19fb2d9-98eb-4cd3-8761-81b71d8a9a1b land" was originally named: "Transformation; to arable, to cotton" in this dataset.
Exchange "Butadiene-2bdf9967-6dae-4183-88d1-8f612548c51e low population density" was originally named: "1,3 butadiene; from residue burning; kg C, biogenic" in this dataset.
Exchange "Formaldehyde-2bdf9967-6dae-4183-88d1-8f612548c51e low population density" was originally named: "Formaldehyde; from residue burning; kg C, biogenic" in this dataset.
Exchange "Indoxacarb-2bdf9967-6dae-4183-88d1-8f612548c51e low population density" was originally named: "Indoxacarb; broadcast by air; kg AI" in this dataset.
Exchange "Oxyfluorfen-2bdf9967-6dae-4183-88d1-8f612548c51e low population density" was originally named: "Oxyfluorfen; broadcast by air; kg AI" in this dataset.
Exchange "Ethephon-2bdf9967-6dae-4183-88d1-8f612548c51e low population density" was originally named: "Ethephon; broadcast by air; kg AI" in this dataset.
Exchange "Tebufenozide-2bdf9967-6dae-4183-88d1-8f612548c51e low population density" was originally named: "Tebufenozide; broadcast by air; kg AI" in this dataset.
Exchange "Furan-2bdf9967-6dae-4183-88d1-8f612548c51e low population density" was originally named: "Furan; from residue burning; kg C, biogenic" in this dataset.
Exchange "Cyfluthrin-2bdf9967-6dae-4183-88d1-8f612548c51e low population density" was originally named: "Beta-Cyfluthrin; broadcast by air; kg AI" in this dataset.
Exchange "Imidacloprid-2bdf9967-6dae-4183-88d1-8f612548c51e low population density" was originally named: "Imidacloprid; broadcast by air; kg AI" in this dataset.
Exchange "Trifluralin-2bdf9967-6dae-4183-88d1-8f612548c51e low population density" was originally named: "Trifluralin; broadcast by air; kg AI" in this dataset.
Exchange "Toluene-2bdf9967-6dae-4183-88d1-8f612548c51e low population density" was originally named: "Toluene; from residue burning; kg C, biogenic" in this dataset.
Exchange "Magnesium-be1c0329-f1a8-4524-8420-a86d2a8dd358 agricultural" was originally named: "Magnesium; applied in dolomite" in this dataset.
Exchange "Pentane-2bdf9967-6dae-4183-88d1-8f612548c51e low population density" was originally named: "N pentane; from residue burning; kg C, biogenic" in this dataset.
Exchange "Carbon dioxide-c19fb2d9-98eb-4cd3-8761-81b71d8a9a1b unspecified" was originally named: "Carbon dioxide; from plant uptake; kg C, biogenic" in this dataset.
Exchange "Methanol-2bdf9967-6dae-4183-88d1-8f612548c51e low population density" was originally named: "Methanol; from residue burning; kg C, biogenic" in this dataset.
Exchange "Isoprene-2bdf9967-6dae-4183-88d1-8f612548c51e low population density" was originally named: "Isoprene; from residue burning; kg C, biogenic" in this dataset.
Exchange "Pendimethalin-2bdf9967-6dae-4183-88d1-8f612548c51e low population density" was originally named: "Pendimethalin; broadcast by air; kg AI" in this dataset.
Exchange "Hydrocyanic acid-2bdf9967-6dae-4183-88d1-8f612548c51e low population density" was originally named: "Hydrogen cyanide; from residue burning; kg C, biogenic" in this dataset.
Exchange "Water-2bdf9967-6dae-4183-88d1-8f612548c51e low population density" was originally named: "Water; from residue burning; biogenic" in this dataset.
Exchange "Ethyne-2bdf9967-6dae-4183-88d1-8f612548c51e low population density" was originally named: "Acetylene; from residue burning; kg C, biogenic" in this dataset.
Exchange "Prometryn-2bdf9967-6dae-4183-88d1-8f612548c51e low population density" was originally named: "Prometryn; broadcast by air; kg AI" in this dataset.
Exchange "Mepiquat chloride-2bdf9967-6dae-4183-88d1-8f612548c51e low population density" was originally named: "1,1-Dimethylpiperidinium chloride; broadcast by air; kg AI" in this dataset.
Exchange "Dinitrogen monoxide-2bdf9967-6dae-4183-88d1-8f612548c51e low population density" was originally named: "Dinitrogen monoxide; from residue burning; kg N, biogenic" in this dataset.
Exchange "Propargite-2bdf9967-6dae-4183-88d1-8f612548c51e low population density" was originally named: "Propargite; broadcast by air; kg AI" in this dataset.
Exchange "1-Butene-2bdf9967-6dae-4183-88d1-8f612548c51e low population density" was originally named: "1 butene; from residue burning; kg C, biogenic" in this dataset.
Exchange "Cyclanilide-2bdf9967-6dae-4183-88d1-8f612548c51e low population density" was originally named: "Cyclanilide; broadcast by air; kg AI" in this dataset.
Exchange "Zinc compounds-be1c0329-f1a8-4524-8420-a86d2a8dd358 agricultural" was originally named: "Zinc compounds; as secondary application" in this dataset.
Exchange "Phenol-2bdf9967-6dae-4183-88d1-8f612548c51e low population density" was originally named: "Phenol; from residue burning; kg C, biogenic" in this dataset.
Exchange "Water, surface-c19fb2d9-98eb-4cd3-8761-81b71d8a9a1b in water" was originally named: "Water; withdrawal from surface water, for cotton, in 2003" in this dataset.
Exchange "Carbon monoxide, fossil-2bdf9967-6dae-4183-88d1-8f612548c51e low population density" was originally named: "Carbon monoxide; from residue burning; kg C, biogenic" in this dataset.
Exchange "Pyrithiobac sodium salt-2bdf9967-6dae-4183-88d1-8f612548c51e low population density" was originally named: "Pyrithiobac-sodium; broadcast by air; kg AI" in this dataset.
Exchange "Chlorpyrifos-2bdf9967-6dae-4183-88d1-8f612548c51e low population density" was originally named: "Chlorpyrifos; broadcast by air; kg AI" in this dataset.
Exchange "Sulfuric acid-be1c0329-f1a8-4524-8420-a86d2a8dd358 agricultural" was originally named: "Sulfuric acid; as secondary application" in this dataset.
Exchange "Carfentrazone ethyl ester-2bdf9967-6dae-4183-88d1-8f612548c51e low population density" was originally named: "Carfentrazone-ethyl; broadcast by air; kg AI" in this dataset.
Exchange "Butane-2bdf9967-6dae-4183-88d1-8f612548c51e low population density" was originally named: "N butane; from residue burning; kg C, biogenic" in this dataset.
Exchange "Phorate-2bdf9967-6dae-4183-88d1-8f612548c51e low population density" was originally named: "Phorate; broadcast by air; kg AI" in this dataset.
Exchange "Ammonia-2bdf9967-6dae-4183-88d1-8f612548c51e low population density" was originally named: "Ammonia; from residue burning; kg N, biogenic" in this dataset.
Exchange "Ethane-2bdf9967-6dae-4183-88d1-8f612548c51e low population density" was originally named: "Ethane; from residue burning; kg C, biogenic" in this dataset.

## Geography
The unit process is assumed to represent production in California (US State).

## Technology
This process produces cotton lint; at harvest in 2003; at farm; 90%-93% moisture. The process is assumed to represent production in California (US State). Yields and related inputs and outputs represent a single year of operation, in 2003. This dataset includes consideration of residue burning; soil preparation; planting or sowing; irrigation; application, storage, and transport of fertilizers, manures, liming materials, secondary materials, and pesticides; and harvest. Fate and transport of applications are not included as described in Cooper, J.S., Kahn, E., Noon, M. (2012) LCA Digital Commons Unit Process Data: field crop production Version 1 which is available at https://www.lcacommons.gov/discovery/docs/LCA%20Digital%20Commons%20Unit%20Process%20Data%20final%20updated.pdf

## Time period
Start and end dates match the underlying data obtained from the USDA Agricultural Resource Management Survey (ARMS).
## Parameters
- p2352: 0; = p2232*p2220
- p4781: 0; = p1814*p3482
- p1848: 0
- p0784: 129.638; = p0124*(1+p0652*p0256/100)
- p0750: 0
- p1618: 0.660002
- p3864: 3.96696e-5; = p1927*p3477
- p1338: 1.66309e6; = p1324*p0801
- p1001: 0.0363014; = if(p0978>0;0;if(and(p0687=0;p0691=0;p0695=0;p0699=0);0;IF(p0996+p0999+p1000=1;0;1-(p0996+p0999+p1000))))
- p2945: 6.00157e-5; = p2359*(p1020+p1022)
- p2383: 1.58232e-6; = p2229*p2212
- p4866: 0; = p1899*p3482
- p1217: 31.7856
- p3408: 0; = p3370*p1238
- p0831: 0.1385; = 1-p0824
- p3040: 0; = p2259*p1082
- p1982: 750
- p2953: 0.00494163; = p2367*(p1020+p1022)
- p0916: 0.80279; = p0826+p0828+p0829+(p0832*(1+p0894))/p0818
- p2957: 0.00198979; = p2371*(p1020+p1022)
- p1261: 0; = if(p1232>0;0;p0732/100)
- p2367: 0.0534; = p2225*p2196
- p3381: 0.0286415; = p3362*p1234
- p2271: 0.000494538; = p2226*p2217
- p2665: 0.000113411; = p2274*(p1128+p1130)
- p3401: 0.00893594; = p3363*p1238
- p3115: 6.62179e-7; = p2334*p1023
- p1211: 0.6
- p0630: 0; = IF(p0366<0.5;-SQRT(p0007*EXP(p0498^2*p0008)-p0007);SQRT(p0007*EXP(p0498^2*p0008)-p0007))
- p3122: 0; = p2341*p1082
- p1846: 0
- p0637: 0; = IF(p0373<0.5;-SQRT(p0007*EXP(p0505^2*p0008)-p0007);SQRT(p0007*EXP(p0505^2*p0008)-p0007))
- p1117: 0.0018551; = IF(p1071=0;p1107/(p1112*p0818);0)
- p1717: 0
- p2547: 0; = p2351*p1123
- p2136: 9.51274e-6; = p2015*p2064*p2098/(p0818*1000)
- p3453: 0; = p3377*p1240
- p2769: 0.000455909; = p2378*(p1078+p1080)
- p4085: 3.87985e-6; = p1942*p3478
- p2066: 0.109412
- p2512: 0.000154737; = p2316*p1014
- p1970: 700000; = p0801
- p0733: 47.951; = p0073*(1+p0601*p0205/100)
- p2854: 1.78892e-5; = p2268*(p1079+p1081)
- p5201: 1.25158e-7; = p1822*p3484
- p0508: 0; = SQRT(2)*(IF((2*p0376-1)<0;-1;IF((2*p0376-1)>0;1;0))*SQRT(SQRT((2/(pi()*0.140012289)+LN(1-(2*p0376-1)^2)/2)^2-LN(1-(2*p0376-1)^2)/0.140012289)-(2/(pi()*0.140012289)+LN(1-(2*p0376-1)^2)/2)))
- p1574: 0
- p0250: 20.203
- p1835: 0
- p2272: 0.00536609; = p2230*p2218
- p1099: 0.575709
- p0779: 38.785; = p0119*(1+p0647*p0251/100)
- p2737: 1.48803e-5; = p2346*(p1078+p1080)
- p0991: 3.68953e6; = p0987*p0886
- p2221: 0.00241979; = p1155-p2220
- p2552: 0.000568999; = p2356*p1014
- p0424: 0; = SQRT(2)*(IF((2*p0292-1)<0;-1;IF((2*p0292-1)>0;1;0))*SQRT(SQRT((2/(pi()*0.140012289)+LN(1-(2*p0292-1)^2)/2)^2-LN(1-(2*p0292-1)^2)/0.140012289)-(2/(pi()*0.140012289)+LN(1-(2*p0292-1)^2)/2)))
- p0554: 0; = IF(p0290<0.5;-SQRT(p0007*EXP(p0422^2*p0008)-p0007);SQRT(p0007*EXP(p0422^2*p0008)-p0007))
- p3016: 0; = p2430*(p1129+p1131)
- p2872: 7.76764e-5; = p2286*(p1020+p1022)
- p2176: 0.000909728; = p0895*p0913/p0818
- p2812: 0; = p2421*(p1078+p1080)
- p0558: 0; = IF(p0294<0.5;-SQRT(p0007*EXP(p0426^2*p0008)-p0007);SQRT(p0007*EXP(p0426^2*p0008)-p0007))
- p3895: 0.000293249; = p1962*p3477
- p2674: 5.53299e-5; = p2283*(p1019+p1021)
- p3377: 0.00467727; = if(p1232=0;p3246*p3359/p0818;0)
- p3158: 0; = p2377*p1082
- p3892: 7.49689e-5; = p1955*p3477
- p1806: 0
- p0536: 0; = SQRT(2)*(IF((2*p0404-1)<0;-1;IF((2*p0404-1)>0;1;0))*SQRT(SQRT((2/(pi()*0.140012289)+LN(1-(2*p0404-1)^2)/2)^2-LN(1-(2*p0404-1)^2)/0.140012289)-(2/(pi()*0.140012289)+LN(1-(2*p0404-1)^2)/2)))
- p0612: 0; = IF(p0348<0.5;-SQRT(p0007*EXP(p0480^2*p0008)-p0007);SQRT(p0007*EXP(p0480^2*p0008)-p0007))
- p2874: 8.61918e-5; = p2288*(p1020+p1022)
- p1818: 0
- p0824: 0.8615
- p0127: 19.188
- p0929: 0; = p0801*p0923
- p3838: 4.74018e-5; = p1901*p3477
- p1963d: 0.000107264; = p1608*p1812+p1609*p1813+p1610*p1814+p1611*p1815+p1612*p1816+p1613*p1817+p1614*p1818+p1615*p1819+p1616*p1820+p1617*p1821+p1618*p1822+p1619*p1823+p1620*p1824+p1621*p1825+p1622*p1826+p1623*p1827+p1624*p1828+p1625*p1829+p1626*p1830+p1627*p1831
- p1337: 5.42317e-5; = p1336*p0001/(p0818*p0002)
- p1342: 244664; = p1326*p0801
- p0213: 16.024
- p4995: 9.77455e-7; = p1822*p3483
- p1985: 2.6269e8; = (if(p1057=0;0;p1050/p1057)+if(p1058=0;0;p1051/p1058)+if(p1059=0;0;p1052/p1059)+if(p1060=0;0;p1053/p1060)+if(p1061=0;0;p1054/p1061)+if(p1062=0;0;p1055/p1062)+if(p1063=0;0;p1056/p1063))*(1+p1157)
- p2972: 2.04899e-5; = p2386*(p1079+p1081)
- p1341: 0; = p1340*p0001/(p0818*p0002)
- p3480: 0.0114538; = if(p1328+p1330+p1332+p1334+p1336+p1338+p1340+p1342+p1344=0;0;p1336/(p1328+p1330+p1332+p1334+p1336+p1338+p1340+p1342+p1344))
- p0361: 0.5
- p1734: 0
- p3046: 0; = p2265*p1082
- p1353: 3
- p1610: 0.889688
- p4977: 1.14995e-7; = p1804*p3483
- p1631: 0
- p1769: 0
- p2597: 0; = p2401*p1014
- p1593: 0
- p2702: 0.00133348; = p2311*(p1128+p1130)
- p1016: 0; = IF(p1012=0;p0707/100;0)
- p5258: 1.69332e-7; = p1879*p3484
- p4702: 1.56334e-6; = p1941*p3481
- p1503: 169
- p0180: 28.619
- p2895: 6.61023e-6; = p2309*(p1079+p1081)
- p1899: 4.91379e-5; = p1491*1000/p0818
- p3288: 0.505
- p2573: 9.74245e-5; = p2377*p1073
- p0665: 0; = IF(p0401<0.5;-SQRT(p0007*EXP(p0533^2*p0008)-p0007);SQRT(p0007*EXP(p0533^2*p0008)-p0007))
- p1163: 0.00403661
- p0362: 0.5
- p1649: 0
- p0096: 41.955
- p2506: 0.00027691; = p2310*p1073
- p2809: 0; = p2418*(p1078+p1080)
- p4878: 0; = p1911*p3482
- p0540: 0; = IF(p0276<0.5;-SQRT(p0007*EXP(p0408^2*p0008)-p0007);SQRT(p0007*EXP(p0408^2*p0008)-p0007))
- p3383: 0.00209455; = p3364*p1234
- p1921: 0
- p2345: 1.72131e-5; = p2228*p2213
- p3302: 0; = if(and(p1232=0;p3252<>0);p3258*(p3278*(p3282*p1256+p3286*(p1253+p1257)+p1258*p3288+p3297*p3287));0)
- p3896: 0.000861668; = p1963*p3477
- p1237: 0; = if(p1232>0;0;p0729/100)
- p3332: 5.23955e7; = if(and(p1232=0;p3255<>0);IF((p3328+p3329+p3330+p3331)+(p3255*(p3265*(1-p3277))/p3327)>p3255;p3255-(p3328+p3329+p3330+p3331);p3255*(p3265*(1-p3277))/p3327);0)
- p3146: 0.000365161; = p2365*p1023
- p2522: 0.000641844; = p2326*p1014
- p2740: 4.95109e-5; = p2349*(p1078+p1080)
- p0937: 0; = p0931*p0001/(p0818*p0002)
- p2526: 1.03711e-6; = p2330*p1014
- p1829: 0
- p2729: 5.7123e-5; = p2338*(p1078+p1080)
- p2349: 0.000156151; = p2228*p2217
- p4822: 0; = p1855*p3482
- p3975: 4.11055e-5; = p1832*p3478
- p1875: 0
- p0097: 4.924
- p2155: 2.01731e-6; = p2015*p2084*p2117/(p0818*1000)
- p3458: 0.000981962; = p3363*p1241
- p0036: 63.263
- p3036: 6.71034e-6; = p2255*p1023
- p0787: 19.188; = p0127*(1+p0655*p0259/100)
- p0723: 700.271; = p0063*(1+p0591*p0195/100)
- p2722: 4.73512e-7; = p2331*(p1019+p1021)
- p3000: 0; = p2414*(p1079+p1081)
- p0550: 0; = IF(p0286<0.5;-SQRT(p0007*EXP(p0418^2*p0008)-p0007);SQRT(p0007*EXP(p0418^2*p0008)-p0007))
- p3221: 0.146975; = IF(p3216=0;0;p1223*12.0107/100.0869+(1-p1224)*12.0107/84.3139)
- p2441: 8.88615e-5; = p2245*p1014
- p2663: 0.00101258; = p2272*(p1128+p1130)
- p1724: 0
- p2570: 0.0112466; = p2374*p1014
- p0855: 3.27572; = p0854*p0001*p0003/(p0818*p0002)
- p1799: 0
- p0114: 65.813
- p0671: 0
- p1576: 0
- p4348: 1.71403e-6; = p1793*p3480
- p1872: 0
- p1710: 0
- p1308: 0.09806
- p0938: 0; = p0932*p0001/(p0818*p0002)
- p4525: 5.08087e-6; = p1764*p3481
- p3630: 3.72099e-6; = p1899*p3476
- p2443: 0.000180841; = p2247*p1014
- p2761: 1.3747e-5; = p2370*(p1019+p1021)
- p1137: 0; = if(p1121=0;p1131*(p0716/100)*p0703*1000;0)
- p2186: 0.00566467; = p1052/p0818
- p0124: 129.638
- p2824: 2.82443e-5; = p2238*(p1020+p1022)
- p0888: 2.97131e8; = p0686*1000*p0687*p0884/100
- p3534: 5.91976e-7; = p1803*p3476
- p0662: 0; = IF(p0398<0.5;-SQRT(p0007*EXP(p0530^2*p0008)-p0007);SQRT(p0007*EXP(p0530^2*p0008)-p0007))
- p3156: 0; = p2375*p1082
- p1755: 0
- p2412: 0; = p2234*p2202
- p1914: 0
- p1763: 0
- p3081: 0; = p2300*p1082
- p1250: 0; = if(p1232>0;0;p1245*p0001/(p0818*p0002))
- p1142: 0; = if(p1121=0;p1136*p0001/(p0818*p0002);0)
- p2147: 9.7703e-7; = p2015*p2075*p2109/(p0818*1000)
- p2397: 0; = p2234*p2186
- p3047: 0; = p2266*p1082
- p3206: 0; = p2425*p1082
- p0913: 0.0016675
- p2758: 0.00819956; = p2367*(p1019+p1021)
- p2044: 7.31432e-7; = p2015*p2042*p2043/(p0818*1000)
- p1609: 0
- p2855: 6.75083e-5; = p2269*(p1079+p1081)
- p4522: 1.17251e-6; = p1761*p3481
- p0713: 12.036; = p0053*(1+p0581*p0185/100)
- p0992: 0.00485425; = p0988*p0001*p0004/(p0818*p0002)
- p1716: 0
- p2146: 3.39247e-7; = p2015*p2074*p2108/(p0818*1000)
- p0640: 0; = IF(p0376<0.5;-SQRT(p0007*EXP(p0508^2*p0008)-p0007);SQRT(p0007*EXP(p0508^2*p0008)-p0007))
- p2315: 0.000953333; = p2224*p2182
- p0742: 98.004; = p0082*(1+p0610*p0214/100)
- p1152: 0.415074
- p3176: 0; = p2395*p1023
- p1534: 37
- p4922: 0; = p1955*p3482
- p2162: 2.67656e-7; = p2015*p2086*p2124/(p0818*1000)
- p0043: 700.229
- p2521: 0.000123994; = p2325*p1014
- p2699: 0.000177008; = p2308*(p1078+p1080)
- p2317: 2.65059e-5; = p2224*p2184
- p2219: 0.0175204; = p1154-p2218
- p1225: 1.088; = IF(p1221=0;0;p1223+1.2*p1224)
- p0675: 16.527; = p0015*(1+p0543*p0147/100)
- p2566: 6.61988e-5; = p2370*p1014
- p3469: 0.0013031; = p3374*p1241
- p0430: 0; = SQRT(2)*(IF((2*p0298-1)<0;-1;IF((2*p0298-1)>0;1;0))*SQRT(SQRT((2/(pi()*0.140012289)+LN(1-(2*p0298-1)^2)/2)^2-LN(1-(2*p0298-1)^2)/0.140012289)-(2/(pi()*0.140012289)+LN(1-(2*p0298-1)^2)/2)))
- p0024: 41.521
- p1866: 2.34522e-5; = p1458*1000/p0818
- p1293: 0; = p1287*p1252/p0818
- p2590: 0; = p2394*p1014
- p0833: 2.7197e9; = p0830+p0832
- p3230: 4.16145e-7; = p1170/p0818
- p2491: 0.000169141; = p2295*p1014
- p0785: 0
- p1963h: 0.000469991; = p1686*p1890+p1687*p1891+p1688*p1892+p1689*p1893+p1690*p1894+p1691*p1895+p1692*p1896+p1693*p1897+p1694*p1898+p1695*p1899+p1696*p1900+p1697*p1901+p1698*p1902+p1699*p1903+p1700*p1904+p1701*p1905+p1702*p1906+p1703*p1907+p1704*p1908+p1705*p1909
- p1086: 0; = IF(p1071=0;p1080*(p0710/100)*p0703*1000;0)
- p0930: 0; = p0801*p0924
- p2023: 3.3
- p0771: 8.887; = p0111*(1+p0639*p0243/100)
- p2286: 0.000839382; = p2223*p2192
- p1095: 1.81534e7; = IF(p1071=0;p0797*p0702*1000*p0798/100;0)
- p1070: 0.0594067; = IF(p1012=0;p1056/(p1063*p0818);0)
- p0839: 1.51864; = p0838/p0818
- p4455: 8.95391e-8; = p1900*p3480
- p2144: 1.88369e-6; = p2015*p2072*p2106/(p0818*1000)
- p1208: 0; = p1205*p0818*p0822/p0801
- p0057: 68.176
- p1492: 7
- p1757: 0
- p2682: 1.07804e-6; = p2291*(p1019+p1021)
- p3107: 1.25779e-5; = p2326*p1023
- p4410: 4.16996e-6; = p1855*p3480
- p0710: 46.9; = p0050*(1+p0578*p0182/100)
- p3239: 0.013074; = IF(p3238+p3235+p3236=1;0;1-(p3238+p3235+p3236))
- p3422: 0; = p3365*p1239
- p1774: 0
- p2827: 2.09487e-5; = p2241*(p1020+p1022)
- p0641: 0; = IF(p0377<0.5;-SQRT(p0007*EXP(p0509^2*p0008)-p0007);SQRT(p0007*EXP(p0509^2*p0008)-p0007))
- p2684: 0.000569248; = p2293*(p1019+p1021)
- p3319: 2.73942e6; = if(and(p1232=0;p3253<>0);p3253*(p3263-p3314)/p3316;0)
- p0738: 700.627; = p0078*(1+p0606*p0210/100)
- p2815: 0; = p2424*(p1078+p1080)
- p1310: 0.09806; = IF(p1307=p1266;0;IF(p1307+p1308>p1266;p1266-p1307;p1308))
- p1715: 0
- p0556: 0; = IF(p0292<0.5;-SQRT(p0007*EXP(p0424^2*p0008)-p0007);SQRT(p0007*EXP(p0424^2*p0008)-p0007))
- p2118: 0.679049
- p2696: 1.64524e-6; = p2305*(p1078+p1080)
- p2770: 0.000118058; = p2379*(p1078+p1080)
- p2572: 0.000300855; = p2376*p1073
- p1271: 0; = IF(p1267+p1270=p1259;0;IF(p1267+p1270+p1269>p1259;p1259-(p1267+p1270);p1269))
- p2578: 0.000535582; = p2382*p1073
- p4674: 5.04179e-5; = p1913*p3481
- p2258: 0.00194817; = p2226*p2204
- p4043: 7.34026e-7; = p1900*p3478
- p2805: 0; = p2414*(p1078+p1080)
- p1634: 0
- p2115: 0.856281
- p2917: 2.85372e-7; = p2331*(p1020+p1022)
- p2151: 2.73293e-7; = p2015*p2079*p2113/(p0818*1000)
- p0532: 0; = SQRT(2)*(IF((2*p0400-1)<0;-1;IF((2*p0400-1)>0;1;0))*SQRT(SQRT((2/(pi()*0.140012289)+LN(1-(2*p0400-1)^2)/2)^2-LN(1-(2*p0400-1)^2)/0.140012289)-(2/(pi()*0.140012289)+LN(1-(2*p0400-1)^2)/2)))
- p2045: 30
- p2361: 0.00208995; = p2225*p2189
- p0123: 152.971
- p1963: 0.00286238; = p1963a+p1963b+p1963c+p1963d+p1963e+p1963f+p1963g+p1963h+p1963i+p1963j+p1963k
- p1104: 0.362521; = IF(p1071=0;IF(p1096+p1101+p1102+p1103=1;0;1-(p1096+p1101+p1102+p1103));0)
- p2355: 0.00607548; = p2225*p2183
- p1323: 0.0777569; = IF(((p0745*1000*p0750/100)+(p0754*1000*p0759/100))/p0801<0;0;((p0745*1000*p0750/100)+(p0754*1000*p0759/100))/p0801)
- p2389: 0; = p2233*p2218
- p1860: 0
- p0232: 19.418
- p4720: 0.00100175; = p1963*p3481
- p1736: 0
- p2617: 0; = p2421*p1073
- p0027: 756.345
- p3392: 0; = p3373*p1234
- p0105: 29.284
- p3450: 0; = p3374*p1240
- p0184: 20.756
- p2550: 0.0204651; = p2354*p1014
- p1952: 0
- p2577: 4.08985e-5; = p2381*p1073
- p1027: 99885.2; = IF(p1012=0;p1021*(p0704/100)*p0703*1000;0)
- p2990: 0; = p2404*(p1020+p1022)
- p4770: 0; = p1803*p3482
- p0638: 0; = IF(p0374<0.5;-SQRT(p0007*EXP(p0506^2*p0008)-p0007);SQRT(p0007*EXP(p0506^2*p0008)-p0007))
- p2851: 0.000377528; = p2265*(p1079+p1081)
- p2808: 0; = p2417*(p1078+p1080)
- p0063: 700.271
- p1105: 0.436421
- p1344: 31328; = IF(p1318=0;p1327*p0801;0)
- p4860: 0; = p1893*p3482
- p3257: 0.849747
- p2078: 0.117
- p2888: 6.64574e-5; = p2302*(p1079+p1081)
- p2628: 0.000213497; = p2237*(p1019+p1021)
- p1975: 0.000697452; = p1970*p0001/(p0818*p0002)
- p1317: 0
- p1279: 0
- p1673: 0
- p0830: 2.34302e9; = p0825*(p0821-p0814)*p0824
- p0537: 0; = IF(p0273<0.5;-SQRT(p0007*EXP(p0405^2*p0008)-p0007);SQRT(p0007*EXP(p0405^2*p0008)-p0007))
- p2636: 1.84532e-5; = p2245*(p1019+p1021)
- p2752: 0.000320913; = p2361*(p1019+p1021)
- p3070: 0.000133408; = p2289*p1023
- p2920: 4.22899e-6; = p2334*(p1020+p1022)
- p0445: 0; = SQRT(2)*(IF((2*p0313-1)<0;-1;IF((2*p0313-1)>0;1;0))*SQRT(SQRT((2/(pi()*0.140012289)+LN(1-(2*p0313-1)^2)/2)^2-LN(1-(2*p0313-1)^2)/0.140012289)-(2/(pi()*0.140012289)+LN(1-(2*p0313-1)^2)/2)))
- p1335: 0.000520089; = p1334*p0001/(p0818*p0002)
- p2019: 0.13105
- p3161: 0; = p2380*p1082
- p5211: 2.886e-6; = p1832*p3484
- p2072: 0.134
- p1320: 2.04362; = IF(((p0745*1000*p0747/100)+(p0754*1000*p0756/100))/p0801<0;0;((p0745*1000*p0747/100)+(p0754*1000*p0756/100))/p0801)
- p1078: 0.31707; = IF(p1071=0;IF(p1073=1;0;IF(p1073+p1074>1;1-p1073;p1074));0)
- p0031: 841.137
- p2423: 0; = p2235*p2213
- p0274: 0.5
- p1202: 0.7
- p2995: 0; = p2409*(p1020+p1022)
- p3128: 0; = p2347*p1082
- p3232: 9.17032e-8; = p1182/p0818
- p2768: 5.49094e-5; = p2377*(p1078+p1080)
- p2038: 0.304457
- p2833: 2.26327e-5; = p2247*(p1020+p1022)
- p2987: 0; = p2401*(p1020+p1022)
- p3672: 3.38272e-7; = p1941*p3476
- p2281: 0.000111817; = p2223*p2187
- p1189: 0.000697452; = p0801*p0001/(p0818*p0002)
- p2122: 0.341195
- p3470: 0.000304069; = p3375*p1241
- p2883: 0.000233384; = p2297*(p1079+p1081)
- p1067: 0.0125108; = IF(p1012=0;p1053/(p1060*p0818);0)
- p1739: 0
- p2424: 0; = p2235*p2214
- p4966: 7.70464e-6; = p1793*p3483
- p2250: 0.00268263; = p2222*p2196
- p0176: 2.972
- p2881: 2.11684e-5; = p2295*(p1020+p1022)
- p0717: 68.176; = p0057*(1+p0585*p0189/100)
- p0737: 0
- p1053: 2.35257e6; = IF(p1012=0;p1046*p1036;0)
- p0774: 65.813; = p0114*(1+p0642*p0246/100)
- p0915: 0.02544; = p0914/p0818
- p0924: 0; = IF(p0918+p0923=1;0;IF(p0918+p0923+p0920>1;1-(p0918+p0923);p0920))
- p1554: 0
- p5245: 1.54607e-7; = p1866*p3484
- p0961: 0; = if(and(p0683>0;or(p0807=480;p0807=32;p0807=1;and(p0807=60;p0901<0.03)));p0937;0)
- p1594: 0
- p1543: 120
- p3836: 1.47921e-5; = p1899*p3477
- p4260: 2.07313e-5; = p1911*p3479
- p0348: 0.5
- p3021: 1.92943e-6; = p2240*p1023
- p1578: 0
- p2087: 0.856281
- p4279: 8.34158e-5; = p1930*p3479
- p0615: 0; = IF(p0351<0.5;-SQRT(p0007*EXP(p0483^2*p0008)-p0007);SQRT(p0007*EXP(p0483^2*p0008)-p0007))
- p4506: 1.53496e-6; = p1951*p3480
- p2697: 1.7204e-5; = p2306*(p1078+p1080)
- p1591: 0
- p1950: 0
- p2705: 0.000259536; = p2314*(p1128+p1130)
- p1262: 0.47951; = if(p1232>0;0;p0733/100)
- p1018: 0.09254; = IF(p1012=0;p0709/100;0)
- p2762: 0.00330163; = p2371*(p1019+p1021)
- p0564: 0; = IF(p0300<0.5;-SQRT(p0007*EXP(p0432^2*p0008)-p0007);SQRT(p0007*EXP(p0432^2*p0008)-p0007))
- p3848: 5.6815e-5; = p1911*p3477
- p0578: 0; = IF(p0314<0.5;-SQRT(p0007*EXP(p0446^2*p0008)-p0007);SQRT(p0007*EXP(p0446^2*p0008)-p0007))
- p2692: 0.000387146; = p2301*(p1078+p1080)
- p0245: 12.665
- p3339: 0; = if(and(p1232=0;p3254<>0);p3254*(p3269*p3277-p3334)/p3338;0)
- p2425: 0; = p2235*p2215
- p0243: 40.34
- p0306: 0.5
- p0108: 85.859
- p2197: 3.11875e-5; = p1055/p0818
- p2834: 0.000117156; = p2248*(p1020+p1022)
- p1049: 0.262955; = IF(p1012=0;IF(p1037+p1044+p1045+p1046+p1047+p1048=1;0;1-(p1037+p1044+p1045+p1046+p1047+p1048));0)
- p2129: 2.02332e-5; = p2015*p2057*p2091/(p0818*1000)
- p3191: 0; = p2410*p1023
- p3850: 4.33676e-5; = p1913*p3477
- p1447: 326
- p0841: 0.222722
- p3213: 0.112803; = p1222*12.0107/100.0869
- p3254: 0; = p1252*(p1287*(1-p3247)+p1290*(1-p3248)+p1291*(1-p3249)+p1292*(1-p3250))
- p4056: 1.3527e-5; = p1913*p3478
- p2455: 0.000991231; = p2259*p1073
- p3435: 0; = p3378*p1239
- p3264: 0.0887032
- p2523: 0.000137587; = p2327*p1014
- p0894: 0.2085
- p1957: 0
- p2217: 0.00129301; = p1118-p2216
- p3553: 1.43766e-6; = p1822*p3476
- p1069: 0.000194922; = IF(p1012=0;p1055/(p1062*p0818);0)
- p1565: 0
- p2873: 0.000402086; = p2287*(p1020+p1022)
- p0951: 0; = if(and(p0683=0;or(p0807=480;p0807=32;p0807=1;and(p0807=60;p0901<0.03)));p0939;0)
- p0136: 92.899
- p0725: 18.227; = p0065*(1+p0593*p0197/100)
- p3725: 3.36183e-7; = p1788*p3477
- p0221: 21.614
- p0714: 0
- p2742: 0; = p2351*(p1128+p1130)
- p5074: 8.10712e-6; = p1901*p3483
- p0363: 0.5
- p3274: 0.0768939
- p0444: 0; = SQRT(2)*(IF((2*p0312-1)<0;-1;IF((2*p0312-1)>0;1;0))*SQRT(SQRT((2/(pi()*0.140012289)+LN(1-(2*p0312-1)^2)/2)^2-LN(1-(2*p0312-1)^2)/0.140012289)-(2/(pi()*0.140012289)+LN(1-(2*p0312-1)^2)/2)))
- p2801: 0; = p2410*(p1019+p1021)
- p2520: 1.53218e-5; = p2324*p1014
- p2618: 0; = p2422*p1073
- p0321: 0.5
- p0755: 6.897; = p0095*(1+p0623*p0227/100)
- p2255: 0.000463101; = p2222*p2201
- p3134: 0; = p2353*p1132
- p3140: 9.39731e-6; = p2359*p1023
- p3460: 0.000893447; = p3365*p1241
- p2071: 0.151
- p1201: 0.65
- p0560: 0; = IF(p0296<0.5;-SQRT(p0007*EXP(p0428^2*p0008)-p0007);SQRT(p0007*EXP(p0428^2*p0008)-p0007))
- p2976: 0; = p2390*(p1129+p1131)
- p0538: 0; = IF(p0274<0.5;-SQRT(p0007*EXP(p0406^2*p0008)-p0007);SQRT(p0007*EXP(p0406^2*p0008)-p0007))
- p2755: 0.000747543; = p2364*(p1019+p1021)
- p2994: 0; = p2408*(p1020+p1022)
- p3946: 7.34026e-7; = p1803*p3478
- p0977: 0; = IF(p0687=0;IF(OR(p0686=0;p0688=0);0;p0686*1000*p0688/100);0)
- p3416: 0.0149383; = p3378*p1238
- p5193: 5.59531e-7; = p1814*p3484
- p3168: 0; = p2387*p1082
- p1248: 6.84538e-5; = if(p1232>0;0;p1243*p0001/(p0818*p0002))
- p1140: 3.32527e-5; = if(p1121=0;p1134*p0001/(p0818*p0002);0)
- p2977: 0; = p2391*(p1129+p1131)
- p0373: 0.5
- p0246: 15.531
- p0682: 700.627; = p0022*(1+p0550*p0154/100)
- p1854: 0
- p0227: 54.562
- p4008: 4.19443e-7; = p1865*p3478
- p0104: 92.899
- p1275: 0; = p1271*p1252/p0818
- p0933: 171912; = p0801*p0927
- p3379: 0.00972047; = if(p1232=0;p3246*p3361/p0818;0)
- p0469: 0; = SQRT(2)*(IF((2*p0337-1)<0;-1;IF((2*p0337-1)>0;1;0))*SQRT(SQRT((2/(pi()*0.140012289)+LN(1-(2*p0337-1)^2)/2)^2-LN(1-(2*p0337-1)^2)/0.140012289)-(2/(pi()*0.140012289)+LN(1-(2*p0337-1)^2)/2)))
- p4304: 2.73555e-5; = p1955*p3479
- p3223: 0.126838; = IF(p3216=0;0;(1-p1223)*24.3050/84.3139)
- p1999: 6.46238e7; = (p1228+p1229)*p0818+p1164
- p3658: 9.97903e-6; = p1927*p3476
- p1122: 0; = p1121*p0001/(p0818*p0002)
- p2901: 8.82215e-5; = p2315*(p1020+p1022)
- p2282: 0.00143044; = p2223*p2188
- p2536: 0.000217911; = p2340*p1073
- p0633: 0; = IF(p0369<0.5;-SQRT(p0007*EXP(p0501^2*p0008)-p0007);SQRT(p0007*EXP(p0501^2*p0008)-p0007))
- p2394: 0; = p2234*p2183
- p2922: 7.4038e-5; = p2336*(p1079+p1081)
- p0686: 691.067; = p0026*(1+p0554*p0158/100)
- p3009: 0; = p2423*(p1079+p1081)
- p0845: 0.5
- p4308: 0.000314415; = p1963*p3479
- p0870: 50516; = p0858*p0856
- p3759: 5.71512e-6; = p1822*p3477
- p2437: 0.000167386; = p2241*p1014
- p0908: 0.0022
- p2802: 0; = p2411*(p1019+p1021)
- p0064: 6.577
- p4036: 7.24588e-5; = p1893*p3478
- p2649: 0.000617706; = p2258*(p1078+p1080)
- p1758: 0
- p2535: 0.000841518; = p2339*p1073
- p0826: 0.084; = 1-p0825/p0818
- p2741: 0; = p2350*(p1128+p1130)
- p1110: 2.87208e6; = IF(p1071=0;p1105*p1104*p1095;0)
- p3413: 0.00276706; = p3375*p1238
- p1132: 0.12954; = if(p1121=0;IF(p1123+p1128+p1129+p1130+p1131=1;0;1-(p1123+p1128+p1129+p1130+p1131));0)
- p3284: 0.275
- p3290: 0.195
- p3751: 2.55499e-5; = p1814*p3477
- p3701: 4.37038e-6; = p1764*p3477
- p0672: 288.368; = p0012*(1+p0540*p0144/100)
- p1139: 0.00012014; = if(p1121=0;p1133*p0001/(p0818*p0002);0)
- p3211: 0; = p2430*p1132
- p2528: 0.000547637; = p2332*p1014
- p2091: 0.374844
- p3096: 1.38138e-5; = p2315*p1023
- p1733: 0.46
- p2085: 0.0335294
- p3258: 0.0491162
- p4789: 0; = p1822*p3482
- p1037: 0.338474
- p4832: 0; = p1865*p3482
- p2119: 0.679049
- p1149: 0.830148
- p0763: 700.229; = p0103*(1+p0631*p0235/100)
- p0804: 1.495e6
- p1777: 0
- p1138: 22910.9; = if(p1121=0;p1132*(p0716/100)*p0703*1000;0)
- p2145: 5.46585e-6; = p2015*p2073*p2107/(p0818*1000)
- p2214: 0.000388609; = p1107/p0818
- p2012: 0.0165939
- p2059: 1.00168
- p1701: 0
- p3410: 0; = p3372*p1238
- p4492: 8.95391e-8; = p1937*p3480
- p0499: 0; = SQRT(2)*(IF((2*p0367-1)<0;-1;IF((2*p0367-1)>0;1;0))*SQRT(SQRT((2/(pi()*0.140012289)+LN(1-(2*p0367-1)^2)/2)^2-LN(1-(2*p0367-1)^2)/0.140012289)-(2/(pi()*0.140012289)+LN(1-(2*p0367-1)^2)/2)))
- p2172: 0.678607; = p2166-(p2167+p2168+p2169+p2170)
- p1301: 0; = IF(p1297+p1300=p1265;0;IF(p1297+p1300+p1299>p1265;p1265-(p1297+p1300);p1299))
- p1223: 0.56
- p1605: 0
- p2947: 0.000193404; = p2361*(p1020+p1022)
- p3038: 1.10718e-5; = p2257*p1023
- p2401: 0; = p2234*p2190
- p5084: 9.71705e-6; = p1911*p3483
- p3436: 0; = p3379*p1239
- p2180: 1.53683e-7; = p3233*p1188/(p0818)
- p0007: 14; = p0006-1
- p2620: 0; = p2424*p1073
- p1156: 0.315629; = p1064+p1065+p1066+p1067+p1068+p1069+p1070+p1116+p1117+p1118+p1119+p1120+p1154+p1155
- p4791: 0; = p1824*p3482
- p1917: 0
- p1007: 0; = p1003*p0001*p0004/(p0818*p0002)
- p1967: 520500; = if(p0807=480;p0802*p0810;0)
- p2548: 0; = p2352*p1123
- p1091: 3.93832e-5; = IF(p1071=0;p1085*p0001/(p0818*p0002);0)
- p2858: 0; = p2272*(p1129+p1131)
- p3283: 0.3
- p3467: 0; = p3372*p1241
- p0709: 9.254; = p0049*(1+p0577*p0181/100)
- p2988: 0; = p2402*(p1020+p1022)
- p2376: 0.000534786; = p2229*p2205
- p0439: 0; = SQRT(2)*(IF((2*p0307-1)<0;-1;IF((2*p0307-1)>0;1;0))*SQRT(SQRT((2/(pi()*0.140012289)+LN(1-(2*p0307-1)^2)/2)^2-LN(1-(2*p0307-1)^2)/0.140012289)-(2/(pi()*0.140012289)+LN(1-(2*p0307-1)^2)/2)))
- p0552: 0; = IF(p0288<0.5;-SQRT(p0007*EXP(p0420^2*p0008)-p0007);SQRT(p0007*EXP(p0420^2*p0008)-p0007))
- p1251: 7.52233e-6; = if(p1232>0;0;p1246*p0001/(p0818*p0002))
- p2386: 0.000170238; = p2229*p2215
- p4369: 9.72139e-7; = p1814*p3480
- p3089: 0; = p2308*p1082
- p3092: 0.000915417; = p2311*p1132
- p2181: 132280; = p0887+p0889+p0893+p2180
- p4640: 8.98923e-6; = p1879*p3481
- p2670: 7.01718e-5; = p2279*(p1019+p1021)
- p2848: 0.000147652; = p2262*(p1079+p1081)
- p2545: 8.7846e-5; = p2349*p1073
- p2447: 9.21562e-7; = p2251*p1014
- p4323: 3.22341e-6; = p1768*p3480
- p3080: 0; = p2299*p1082
- p3012: 0; = p2426*(p1079+p1081)
- p3253: 1.13479e8; = p1252*(p1277*(1-p3247)+p1280*(1-p3248)+p1281*(1-p3249)+p1282*(1-p3250))
- p2245: 0.000120177; = p2222*p2190
- p2417: 0; = p2235*p2207
- p3188: 0; = p2407*p1023
- p1038: 0.00941074
- p0561: 0; = IF(p0297<0.5;-SQRT(p0007*EXP(p0429^2*p0008)-p0007);SQRT(p0007*EXP(p0429^2*p0008)-p0007))
- p1924: 0
- p4276: 1.44751e-5; = p1927*p3479
- p2067: 0.446471
- p3765: 3.36183e-7; = p1828*p3477
- p2554: 0.00333194; = p2358*p1014
- p2562: 0.00399442; = p2366*p1014
- p3148: 0.000773765; = p2367*p1023
- p3475: 0.0931616; = p3380*p1241
- p2327: 0.000186074; = p2224*p2195
- p0949: 0; = if(and(p0683=0;or(p0807=480;p0807=32;p0807=1;and(p0807=60;p0901<0.03)));p0937;0)
- p3524: 1.13321e-5; = p1793*p3476
- p2296: 0.00262242; = p2223*p2203
- p3050: 0; = p2269*p1082
- p0650: 0; = IF(p0386<0.5;-SQRT(p0007*EXP(p0518^2*p0008)-p0007);SQRT(p0007*EXP(p0518^2*p0008)-p0007))
- p2771: 5.33871e-5; = p2380*(p1078+p1080)
- p0049: 9.254
- p2159: 2.9339e-5; = p2015*p2083*p2121/(p0818*1000)
- p5052: 1.32244e-6; = p1879*p3483
- p2585: 0; = p2389*p1123
- p3238: 0.854735; = IF(p3237+p3235+p3236>1;1-(p3235+p3236);p3237)
- p2986: 0; = p2400*(p1020+p1022)
- p2728: 0.0001764; = p2337*(p1078+p1080)
- p3434: 0; = p3377*p1239
- p1727: 0
- p1031: 0; = IF(p1012=0;p1025*p0001/(p0818*p0002);0)
- p2889: 2.86941e-5; = p2303*(p1079+p1081)
- p0116: 57.747
- p4468: 1.65008e-6; = p1913*p3480
- p1904: 0
- p0592: 0; = IF(p0328<0.5;-SQRT(p0007*EXP(p0460^2*p0008)-p0007);SQRT(p0007*EXP(p0460^2*p0008)-p0007))
- p0084: 86.214
- p1529: 7
- p2108: 0.826583
- p0998: 0; = if(p0888=0;0;if((p0699*p0698*1000*p0700/100)/p0888>1;1;(p0699*p0698*1000*p0700/100)/p0888))
- p0153: 0
- p4022: 2.4118e-6; = p1879*p3478
- p2641: 0.000411918; = p2250*(p1019+p1021)
- p1181: 0.000117307
- p1567: 0
- p3342: 0; = if(and(p1232=0;p3254<>0);p3254*(p3272-p3337)/p3338;0)
- p2886: 0.000567526; = p2300*(p1079+p1081)
- p2825: 3.57742e-6; = p2239*(p1020+p1022)
- p1183: 0.000697452; = p0801*p0001/(p0818*p0002)
- p1766: 0
- p1274: 0; = p1270*p1252/p0818
- p2887: 0.000146961; = p2301*(p1079+p1081)
- p1061: 0.3
- p0840: 0.210331; = p0839*p0831
- p1566: 0
- p1265: 0.47951; = if(p1232>0;0;IF(p1259+p1263+p1264=1;0;IF(p1259+p1263+p1264+p1262>1;1-(p1259+p1263+p1264);p1262)))
- p2996: 0; = p2410*(p1020+p1022)
- p4889: 0; = p1922*p3482
- p2232: 0; = if(p0783*p0787+p0784*p0788+p0785*p0789+p0786*p0790=0;0;p0789*p0785/(p0783*p0787+p0784*p0788+p0785*p0789+p0786*p0790))
- p0898: 0.45335
- p0491: 0; = SQRT(2)*(IF((2*p0359-1)<0;-1;IF((2*p0359-1)>0;1;0))*SQRT(SQRT((2/(pi()*0.140012289)+LN(1-(2*p0359-1)^2)/2)^2-LN(1-(2*p0359-1)^2)/0.140012289)-(2/(pi()*0.140012289)+LN(1-(2*p0359-1)^2)/2)))
- p2776: 1.43036e-5; = p2385*(p1078+p1080)
- p0789: 0
- p2160: 1.17628e-6; = p2015*p2084*p2122/(p0818*1000)
- p3112: 4.46838e-8; = p2331*p1023
- p0032: 55.973
- p0728: 0
- p2967: 8.7501e-6; = p2381*(p1079+p1081)
- p4153: 2.4534e-7; = p1804*p3479
- p2348: 1.74228e-5; = p2228*p2216
- p1064: 0.0424303; = IF(p1012=0;p1050/(p1057*p0818);0)
- p2254: 0.00108019; = p2222*p2200
- p2340: 0.000387349; = p2228*p2208
- p0726: 40.258; = p0066*(1+p0594*p0198/100)
- p0137: 55.277
- p0535: 0; = SQRT(2)*(IF((2*p0403-1)<0;-1;IF((2*p0403-1)>0;1;0))*SQRT(SQRT((2/(pi()*0.140012289)+LN(1-(2*p0403-1)^2)/2)^2-LN(1-(2*p0403-1)^2)/0.140012289)-(2/(pi()*0.140012289)+LN(1-(2*p0403-1)^2)/2)))
- p1498: 39
- p0990: 0; = p0986*p0886
- p0897: 0.49875
- p2865: 4.22905e-5; = p2279*(p1020+p1022)
- p0268: 2.972
- p2182: 0.0347929; = p1050/p0818
- p3682: 1.01482e-5; = p1951*p3476
- p0287: 0.5
- p3597: 1.77593e-6; = p1866*p3476
- p0001: 0.404686
- p1264: 0; = if(p1232>0;0;IF(p1259+p1263=1;0;IF(p1259+p1263+p1261>1;1-(p1259+p1263);p1261)))
- p0241: 22.384
- p4102: 0.000268768; = p1963*p3478
- p2275: 0.0010444; = p2230*p2221
- p3331: 3.69318e6; = if(and(p1232=0;p3255<>0);p3255*(p3268-p3326)/p3327;0)
- p1339: 0.00165704; = p1338*p0001/(p0818*p0002)
- p0987: 0.0188723; = if(p0978>0;0;if(and(p0687=0;p0691=0;p0695=0;p0699=0);0;IF(p0982+p0985+p0986=1;0;1-(p0982+p0985+p0986))))
- p1121: 0
- p2780: 0; = p2389*(p1128+p1130)
- p2525: 6.31869e-7; = p2329*p1014
- p2743: 0; = p2352*(p1128+p1130)
- p1586: 0
- p3316: 0.844229; = if(and(p1232=0;p3253<>0);1-(p3312+p3313+p3314+p3315);0)
- p1741: 0
- p3370: 0; = if(p1232=0;p3245*p3358/p0818;0)
- p0433: 0; = SQRT(2)*(IF((2*p0301-1)<0;-1;IF((2*p0301-1)>0;1;0))*SQRT(SQRT((2/(pi()*0.140012289)+LN(1-(2*p0301-1)^2)/2)^2-LN(1-(2*p0301-1)^2)/0.140012289)-(2/(pi()*0.140012289)+LN(1-(2*p0301-1)^2)/2)))
- p3386: 0.0126375; = p3367*p1234
- p1633: 0
- p0820: 0.600863; = if(p0807=480;p0814;0)
- p1604: 0
- p3101: 3.23688e-7; = p2320*p1023
- p1664: 0
- p3369: 0; = if(p1232=0;p3245*p3357/p0818;0)
- p2653: 0.000388966; = p2262*(p1078+p1080)
- p2658: 1.72849e-5; = p2267*(p1078+p1080)
- p1867: 0
- p1648: 0
- p0229: 55.446
- p5279: 5.15358e-8; = p1900*p3484
- p2660: 0.00017784; = p2269*(p1078+p1080)
- p3127: 0; = p2346*p1082
- p0066: 40.258
- p1621: 0
- p0119: 38.785
- p0704: 92.899; = p0044*(1+p0572*p0176/100)
- p5280: 1.03808e-6; = p1901*p3484
- p3120: 0; = p2339*p1082
- p3296: 0.514
- p0722: 0
- p2589: 0; = p2393*p1014
- p0371: 0.5
- p1127: 0; = if(p1121=0;p0721/100;0)
- p1159: 0.5
- p2427: 0; = p2235*p2217
- p2777: 5.39774e-5; = p2386*(p1078+p1080)
- p4228: 2.82142e-6; = p1879*p3479
- p3039: 0; = p2258*p1082
- p1808: 0
- p3244: 0.76356; = p0791/100
- p3321: 4.1869e7; = if(and(p1232=0;p3253<>0);IF((p3317+p3318+p3319+p3320)+(p3253*(p3261*(1-p3277))/p3316)>p3253;p3253-(p3317+p3318+p3319+p3320);p3253*(p3261*(1-p3277))/p3316);0)
- p1812: 0
- p1965: 0.00547076; = p1963+p1959*p1964*1000/p0818
- p2054: 0.91
- p1072: 0; = p1071*p0001/(p0818*p0002)
- p2431: 0; = p2236*p2221
- p2191: 0.000756248; = 8*1.00794*p2189/(2*14.0067)
- p2732: 5.55392e-5; = p2341*(p1078+p1080)
- p1611: 0
- p2095: 0.765734
- p1162: 0.000781739; = p1161/p0818
- p1895: 0
- p2675: 6.33323e-5; = p2284*(p1019+p1021)
- p1547: 223
- p0705: 73.942; = p0045*(1+p0573*p0177/100)
- p1213: 15
- p0911: 0.0049
- p1840: 0
- p1850: 0
- p0871: 0.503321; = p0870*p0001*p0003/(p0818*p0002)
- p2937: 0; = p2351*(p1129+p1131)
- p2646: 7.11092e-5; = p2255*(p1019+p1021)
- p2603: 0; = p2407*p1014
- p3187: 0; = p2406*p1023
- p5066: 3.97307e-5; = p1893*p3483
- p2004: 30
- p0942: 0; = if(and(p0683=0;p0948=0);p0936;0)
- p4359: 2.55826e-8; = p1804*p3480
- p0791: 76.356; = p0131*(1+p0659*p0263/100)
- p1343: 0.000243773; = p1342*p0001/(p0818*p0002)
- p3001: 0; = p2415*(p1079+p1081)
- p2655: 7.59458e-5; = p2264*(p1078+p1080)
- p1984: 30
- p0395: 0.5
- p2260: 0.000570571; = p2226*p2206
- p2561: 0.018634; = p2365*p1014
- p0266: 28.517
- p2316: 0.000209268; = p2224*p2183
- p2251: 1.24633e-6; = p2222*p2197
- p5110: 4.02481e-7; = p1937*p3483
- p0328: 0.5
- p2480: 0.000304977; = p2284*p1014
- p0624: 0; = IF(p0360<0.5;-SQRT(p0007*EXP(p0492^2*p0008)-p0007);SQRT(p0007*EXP(p0492^2*p0008)-p0007))
- p0030: 608.196
- p0278: 0.5
- p0009: 0.568
- p1581: 0
- p3482: 0; = if(p1328+p1330+p1332+p1334+p1336+p1338+p1340+p1342+p1344=0;0;p1340/(p1328+p1330+p1332+p1334+p1336+p1338+p1340+p1342+p1344))
- p3209: 0; = p2428*p1132
- p2007: 0.114383; = ((p1981*p1985+p1987*p1991+p1993*p1997+p2001*p2005)/p0818)*p0005*p0002/1000
- p1693: 0
- p4918: 0; = p1951*p3482
- p2794: 0; = p2403*(p1019+p1021)
- p1212: 0.0435639; = if(p1211=0;0;if(p1193>0;0;(p1207+p1208+p1209)*p1210/(2000*p1211)))
- p2013: 0.65
- p0320: 0.5
- p1767: 0
- p3384: 0.00608088; = p3365*p1234
- p1692: 0
- p1124: 0.1887; = if(p1121=0;p0718/100;0)
- p0095: 6.897
- p0626: 0; = IF(p0362<0.5;-SQRT(p0007*EXP(p0494^2*p0008)-p0007);SQRT(p0007*EXP(p0494^2*p0008)-p0007))
- p0182: 12.665
- p0014: 239.787
- p2598: 0; = p2402*p1014
- p0131: 76.356
- p2396: 0; = p2234*p2185
- p2783: 0; = p2392*(p1128+p1130)
- p0534: 0; = SQRT(2)*(IF((2*p0402-1)<0;-1;IF((2*p0402-1)>0;1;0))*SQRT(SQRT((2/(pi()*0.140012289)+LN(1-(2*p0402-1)^2)/2)^2-LN(1-(2*p0402-1)^2)/0.140012289)-(2/(pi()*0.140012289)+LN(1-(2*p0402-1)^2)/2)))
- p2109: 0.826583
- p3247: 0
- p3198: 0; = p2417*p1082
- p3154: 1.92244e-5; = p2373*p1023
- p0798: 46.9; = p0138*(1+p0666*p0270/100)
- p2643: 3.1411e-7; = p2252*(p1019+p1021)
- p0297: 0.5
- p4477: 3.83739e-8; = p1922*p3480
- p1819: 0
- p2017: 6.66437e6; = p2015*p0898
- p2890: 0.000375761; = p2304*(p1079+p1081)
- p2237: 0.00139041; = p2222*p2182
- p2779: 4.75923e-5; = p2388*(p1078+p1080)
- p0921: 0; = p0679*1000/p0801
- p0684: 41.521; = p0024*(1+p0552*p0156/100)
- p3837: 2.35328e-6; = p1900*p3477
- p1910: 0
- p2432: 0.0680199; = p1158
- p3301: 0; = if(and(p1232=0;p3252<>0);p3257*p3277*(p3297*p3290+(1-p3297)*p3294);0)
- p2461: 0.00176459; = p2265*p1073
- p1164: 2825.63; = p1163*p0801
- p1688: 0
- p5321: 2.72403e-7; = p1942*p3484
- p0868: 0.0232229; = IF(p0858+p0864+p0865+p0866+p0867=1;0;IF(p0858+p0864+p0865+p0866+p0867+p0863>1;1-(p0858+p0864+p0865+p0866+p0867);p0863))
- p1772: 0
- p0939: 0.000171286; = p0933*p0001/(p0818*p0002)
- p0195: 0
- p0048: 15.355
- p3741: 6.72367e-7; = p1804*p3477
- p1640: 0
- p0423: 0; = SQRT(2)*(IF((2*p0291-1)<0;-1;IF((2*p0291-1)>0;1;0))*SQRT(SQRT((2/(pi()*0.140012289)+LN(1-(2*p0291-1)^2)/2)^2-LN(1-(2*p0291-1)^2)/0.140012289)-(2/(pi()*0.140012289)+LN(1-(2*p0291-1)^2)/2)))
- p2823: 0.000128668; = p2237*(p1020+p1022)
- p1785: 0
- p2621: 0; = p2425*p1073
- p1694: 0
- p0968: 0
- p1930: 0.000759403; = p1522*1000/p0818
- p1173: 0.5
- p2084: 0.21
- p3123: 0; = p2342*p1082
- p0294: 0.5
- p4387: 5.01419e-6; = p1832*p3480
- p3414: 0.000867194; = p3376*p1238
- p2721: 2.15369e-7; = p2330*(p1019+p1021)
- p3337: 0; = IF(or(p3254=0;p1232>0);0;p3272*p3289)
- p0023: 13.938
- p3686: 1.88587e-5; = p1955*p3476
- p1160: 0.191825; = (p1156+p1158)*p1159
- p0872: 0; = p0864*p0856
- p3411: 0; = p3373*p1238
- p1925: 0
- p3769: 0.000131784; = p1832*p3477
- p0286: 0.5
- p3405: 0.016897; = p3367*p1238
- p3242: 8.61441e-8; = p3234*p1188*p3238/p0818
- p1994: 750
- p1901: 0.000157464; = p1493*1000/p0818
- p2326: 0.000868038; = p2224*p2193
- p0166: 20.067
- p0957: 0; = if(and(p0683>0;or(p0807=56;p0807=100;and(p0807=60;p0901>0.06)));p0939;0)
- p1718: 0.97262
- p0780: 11.56; = p0120*(1+p0648*p0252/100)
- p0475: 0; = SQRT(2)*(IF((2*p0343-1)<0;-1;IF((2*p0343-1)>0;1;0))*SQRT(SQRT((2/(pi()*0.140012289)+LN(1-(2*p0343-1)^2)/2)^2-LN(1-(2*p0343-1)^2)/0.140012289)-(2/(pi()*0.140012289)+LN(1-(2*p0343-1)^2)/2)))
- p2510: 0.000937685; = p2314*p1123
- p2477: 8.26799e-5; = p2281*p1014
- p5292: 9.49731e-7; = p1913*p3484
- p0428: 0; = SQRT(2)*(IF((2*p0296-1)<0;-1;IF((2*p0296-1)>0;1;0))*SQRT(SQRT((2/(pi()*0.140012289)+LN(1-(2*p0296-1)^2)/2)^2-LN(1-(2*p0296-1)^2)/0.140012289)-(2/(pi()*0.140012289)+LN(1-(2*p0296-1)^2)/2)))
- p3091: 0; = p2310*p1082
- p2264: 0.000239524; = p2226*p2210
- p1420: 1
- p2859: 0; = p2273*(p1129+p1131)
- p2372: 0.0092184; = p2225*p2201
- p1890: 0
- p2836: 0.000248251; = p2250*(p1020+p1022)
- p1697: 0.705252
- p2024: 0.748682
- p1753: 0
- p1698: 0
- p4937: 7.47465e-7; = p1764*p3483
- p2200: 0.02703; = p1056/p0818
- p2178: 0.0877082; = (p0895*p0831/(1-p0831))/(p0818)
- p1881: 0
- p0984: 0; = if(p0886=0;0;min(1;(p0699*p0698*1000*p0701/100)/p0886))
- p2140: 2.32532e-6; = p2015*p2068*p2102/(p0818*1000)
- p1803: 7.81739e-6; = p1395*1000/p0818
- p1765: 0
- p1167: 0.5
- p0788: 29.817; = p0128*(1+p0656*p0260/100)
- p0078: 700.627
- p1107: 347976; = IF(p1071=0;p1105*p1101*p1095;0)
- p2518: 5.32293e-5; = p2322*p1014
- p2208: 0.00320745; = p1110/p0818
- p0849: 0
- p3121: 0; = p2340*p1082
- p3492: 2.53704e-7; = p1761*p3476
- p2514: 6.75078e-5; = p2318*p1014
- p1178: 2.48102e-7; = p1176/p0818
- p2301: 0.00122101; = p2227*p2208
- p2053: 1.45647
- p2451: 0.000342426; = p2255*p1014
- p1682: 0
- p2212: 1.36306e-5; = p1106/p0818
- p1042: 0.0003034
- p0146: 0
- p3830: 0.000232303; = p1893*p3477
- p3478: 0.0938966; = if(p1328+p1330+p1332+p1334+p1336+p1338+p1340+p1342+p1344=0;0;p1332/(p1328+p1330+p1332+p1334+p1336+p1338+p1340+p1342+p1344))
- p2538: 4.25472e-5; = p2342*p1073
- p0860: 0.411954; = p0672*1000/p0856
- p3931: 1.04861e-7; = p1788*p3478
- p0386: 0.5
- p2201: 0.0115884; = 12.01*p2200/(2*14.0067)
- p2860: 0; = p2274*(p1129+p1131)
- p2421: 0; = p2235*p2211
- p1068: 0.1056; = IF(p1012=0;p1054/(p1061*p0818);0)
- p1263: 0.42243; = if(p1232>0;0;IF(p1259=1;0;IF(p1259+p1260>1;1-p1259;p1260)))
- p1197: 1.806
- p3668: 5.91976e-7; = p1937*p3476
- p3233: 0.60394
- p2908: 6.66176e-6; = p2322*(p1020+p1022)
- p1172: 4.16145e-7; = p1170/p0818
- p4925: 0; = p1962*p3482
- p1746: 0
- p4110: 3.68011e-7; = p1761*p3479
- p0965: 0; = IF(p0684/100=1;0;IF(p0684/100+p0685/100>1;1-p0684/100;p0685/100))
- p1962: 0.000974147; = p1960*1000/p0818
- p1090: 0.000103749; = IF(p1071=0;p1084*p0001/(p0818*p0002);0)
- p1298: 0.47951
- p0028: 56.847
- p4101: 9.1469e-5; = p1962*p3478
- p5028: 1.87441e-5; = p1855*p3483
- p1882: 0
- p2955: 3.76826e-6; = p2369*(p1020+p1022)
- p2420: 0; = p2235*p2210
- p2398: 0; = p2234*p2187
- p0931: 0; = p0801*p0925
- p0645: 0; = IF(p0381<0.5;-SQRT(p0007*EXP(p0513^2*p0008)-p0007);SQRT(p0007*EXP(p0513^2*p0008)-p0007))
- p4654: 0.000270068; = p1893*p3481
- p5100: 6.78469e-6; = p1927*p3483
- p0271: 42.265
- p2111: 0.856281
- p1046: 0.0255588; = IF(p1012=0;IF(p1037+p1044+p1045=1;0;IF(p1037+p1044+p1045+p1040>1;1-(p1037+p1044+p1045);p1040));0)
- p1617: 0
- p3250: 0
- p1306: 0; = p1302*p1252/p0818
- p2892: 6.53065e-6; = p2306*(p1079+p1081)
- p0042: 700.229
- p0551: 0; = IF(p0287<0.5;-SQRT(p0007*EXP(p0419^2*p0008)-p0007);SQRT(p0007*EXP(p0419^2*p0008)-p0007))
- p2804: 0; = p2413*(p1019+p1021)
- p2639: 0.000194395; = p2248*(p1019+p1021)
- p0518: 0; = SQRT(2)*(IF((2*p0386-1)<0;-1;IF((2*p0386-1)>0;1;0))*SQRT(SQRT((2/(pi()*0.140012289)+LN(1-(2*p0386-1)^2)/2)^2-LN(1-(2*p0386-1)^2)/0.140012289)-(2/(pi()*0.140012289)+LN(1-(2*p0386-1)^2)/2)))
- p1637: 0
- p1295: 0; = p1291*p1252/p0818
- p3347: 0.00107264; = if(and(p1232=0;p3256<>0);p3275*p3289;0)
- p1063: 0.455
- p2430: 0; = p2236*p2220
- p4454: 5.62817e-7; = p1899*p3480
- p4926: 0; = p1963*p3482
- p0330: 0.5
- p2239: 3.86581e-5; = p2222*p2184
- p2028: 0.000514307; = p2015*p2026*p2027/(p0818*1000)
- p0384: 0.5
- p2164: 0.00594648; = (p2015/p0818)-(p2022)-(p2035+p2036+p2052)-(p2017/p0818)-(p2039+p2041+p2044+p2158+p2159+p2160+p2161+p2162)
- p0767: 43.275; = p0107*(1+p0635*p0239/100)
- p2042: 0.07
- p3097: 3.0323e-6; = p2316*p1023
- p2036: 8.02517e-5; = p2015*p2030*(1-p2032)/(p0818*1000)
- p1627: 0
- p1830: 0
- p1820: 0
- p3055: 7.78551e-5; = p2274*p1132
- p1424: 392
- p1968: 173500; = if(p0807=480;p0802*p0811;0)
- p1161: 700000; = p0801
- p2767: 0.000169565; = p2376*(p1078+p1080)
- p0989: 0; = p0985*p0886
- p3327: 0.770312; = if(and(p1232=0;p3255<>0);1-(p3323+p3324+p3325+p3326);0)
- p0950: 0; = if(and(p0683=0;or(p0807=480;p0807=32;p0807=1;and(p0807=60;p0901<0.03)));p0938;0)
- p0799: 84.317; = p0139*(1+p0667*p0271/100)
- p0811: 0.25; = if(p0807=480;1-p0810;0)
- p1168: 1.57779e-6; = p1164*p1167/p0818
- p1314: 0.183863; = p1310*p1252/p0818
- p2287: 0.00434499; = p2223*p2193
- p3219: 0.0316964; = p3215*p1228
- p2384: 1.6546e-5; = p2229*p2213
- p3229: 3.15558e-6; = p1164/p0818
- p1522: 680
- p3220: 0.00421877; = p3216*p1228
- p1598: 0
- p4117: 3.09129e-5; = p1768*p3479
- p1828: 1.11677e-6; = p1420*1000/p0818
- p1786: 0
- p0276: 0.5
- p1874: 0
- p0015: 16.527
- p3407: 0; = p3369*p1238
- p2950: 0.000450522; = p2364*(p1020+p1022)
- p3559: 8.4568e-8; = p1828*p3476
- p1146: 0.899279
- p3192: 0; = p2411*p1023
- p1887: 0
- p0296: 0.5
- p0711: 56.257; = p0051*(1+p0579*p0183/100)
- p0762: 11.768; = p0102*(1+p0630*p0234/100)
- p2399: 0; = p2234*p2188
- p2765: 0.00233549; = p2374*(p1019+p1021)
- p1356: 13
- p3064: 5.2213e-6; = p2283*p1023
- p0760: 29.637; = p0100*(1+p0628*p0232/100)
- p0081: 3.608
- p1395: 7
- p1336: 54429.8; = p1323*p0801
- p1986: 4200
- p1822: 1.89851e-5; = p1414*1000/p0818
- p2294: 0.00158938; = p2223*p2201
- p2704: 0.000149353; = p2313*(p1128+p1130)
- p2179: 0.0109056; = p0970+p0971+p0972
- p1267: 0
- p1782: 0
- p3285: 0.275
- p0416: 0; = SQRT(2)*(IF((2*p0284-1)<0;-1;IF((2*p0284-1)>0;1;0))*SQRT(SQRT((2/(pi()*0.140012289)+LN(1-(2*p0284-1)^2)/2)^2-LN(1-(2*p0284-1)^2)/0.140012289)-(2/(pi()*0.140012289)+LN(1-(2*p0284-1)^2)/2)))
- p4514: 3.27853e-5; = p1963*p3480
- p0267: 6.365
- p2635: 1.61216e-5; = p2244*(p1019+p1021)
- p1555: 0
- p1129: 0; = if(p1121=0;IF(p1123+p1128=1;0;IF(p1123+p1128+p1125>1;1-(p1123+p1128);p1125));0)
- p2560: 0.00359979; = p2364*p1014
- p1893: 0.000771688; = p1485*1000/p0818
- p2305: 5.18888e-6; = p2227*p2212
- p2694: 7.55903e-5; = p2303*(p1078+p1080)
- p2713: 1.10537e-5; = p2322*(p1019+p1021)
- p3291: 0.437
- p1119: 0.0235787; = IF(p1071=0;p1109/(p1114*p0818);0)
- p3174: 0; = p2393*p1023
- p1976: 0.164
- p3343: 0; = if(and(p1232=0;p3254<>0);IF((p3339+p3340+p3341+p3342)+(p3254*(p3269*(1-p3277))/p3338)>p3254;p3254-(p3339+p3340+p3341+p3342);p3254*(p3269*(1-p3277))/p3338);0)
- p2320: 2.23387e-5; = p2224*p2187
- p2669: 2.03725e-5; = p2278*(p1019+p1021)
- p2751: 0.00127393; = p2360*(p1019+p1021)
- p2537: 9.8542e-5; = p2341*p1073
- p3266: 0.0545989
- p1626: 0
- p1076: 0; = IF(p1071=0;p0714/100;0)
- p2156: 3.7378e-7; = p2015*p2085*p2118/(p0818*1000)
- p0677: 0
- p2683: 2.37018e-6; = p2292*(p1019+p1021)
- p3634: 7.01915e-6; = p1903*p3476
- p2183: 0.00763746; = p1064-p2182
- p1814: 8.48745e-5; = p1406*1000/p0818
- p0796: 92.899; = p0136*(1+p0664*p0268/100)
- p1194: 1.48
- p2715: 3.18177e-6; = p2324*(p1019+p1021)
- p0010: 50.516
- p0524: 0; = SQRT(2)*(IF((2*p0392-1)<0;-1;IF((2*p0392-1)>0;1;0))*SQRT(SQRT((2/(pi()*0.140012289)+LN(1-(2*p0392-1)^2)/2)^2-LN(1-(2*p0392-1)^2)/0.140012289)-(2/(pi()*0.140012289)+LN(1-(2*p0392-1)^2)/2)))
- p2125: 2.04742e-5; = p2015*p2053*p2087/(p0818*1000)
- p0652: 0; = IF(p0388<0.5;-SQRT(p0007*EXP(p0520^2*p0008)-p0007);SQRT(p0007*EXP(p0520^2*p0008)-p0007))
- p0269: 6.386
- p4456: 1.80357e-6; = p1901*p3480
- p1620: 0.633063
- p0388: 0.5
- p0793: 0
- p1876: 0
- p2189: 0.00262727; = p1053/p0818
- p0696: 63.263; = p0036*(1+p0564*p0168/100)
- p1647: 0
- p0293: 0.5
- p3034: 6.517e-8; = p2253*p1023
- p0914: 2.278e7; = p0825*p0911+p0827*p0912+(p0830+p0895)*p0824*p0913
- p0109: 19.154
- p5038: 2.29989e-7; = p1865*p3483
- p1768: 0.000281426; = p1360*1000/p0818
- p2288: 0.0009314; = p2223*p2195
- p2539: 0.000557173; = p2343*p1073
- p2098: 0.856281
- p4664: 3.24394e-5; = p1903*p3481
- p1751: 0.791173
- p2069: 0.190588
- p1491: 44
- p0764: 92.899; = p0104*(1+p0632*p0236/100)
- p0425: 0; = SQRT(2)*(IF((2*p0293-1)<0;-1;IF((2*p0293-1)>0;1;0))*SQRT(SQRT((2/(pi()*0.140012289)+LN(1-(2*p0293-1)^2)/2)^2-LN(1-(2*p0293-1)^2)/0.140012289)-(2/(pi()*0.140012289)+LN(1-(2*p0293-1)^2)/2)))
- p2274: 0.000601012; = p2230*p2220
- p1322: 0.745698; = IF(((p0745*1000*p0749/100)+(p0754*1000*p0758/100))/p0801<0;0;((p0745*1000*p0749/100)+(p0754*1000*p0758/100))/p0801)
- p3816: 7.73222e-6; = p1879*p3477
- p0177: 8.319
- p2021: 0.000425552; = p2020/p0818
- p2841: 4.28554e-5; = p2255*(p1020+p1022)
- p1187: 0.000325515
- p0912: 0.0117914
- p1613: 0
- p2556: 0.00613462; = p2360*p1014
- p2820: 0; = p2429*(p1128+p1130)
- p2434: 0.00022568; = p2238*p1014
- p2289: 0.00920692; = p2223*p2196
- p2910: 1.91756e-6; = p2324*(p1020+p1022)
- p2532: 0.000346058; = p2336*p1073
- p5167: 7.36226e-9; = p1788*p3484
- p0925: 0; = IF(p0918+p0923+p0924=1;0;IF(p0918+p0923+p0924+p0921>1;1-(p0918+p0923+p0924);p0921))
- p0359: 0.5
- p3389: 0; = p3370*p1234
- p0687: 756.345; = p0027*(1+p0555*p0159/100)
- p3328: 2.68963e7; = if(and(p1232=0;p3255<>0);p3255*(p3265*p3277-p3323)/p3327;0)
- p2216: 0.00014427; = p1108/p0818
- p0234: 41.184
- p0507: 0; = SQRT(2)*(IF((2*p0375-1)<0;-1;IF((2*p0375-1)>0;1;0))*SQRT(SQRT((2/(pi()*0.140012289)+LN(1-(2*p0375-1)^2)/2)^2-LN(1-(2*p0375-1)^2)/0.140012289)-(2/(pi()*0.140012289)+LN(1-(2*p0375-1)^2)/2)))
- p1229: 0.00185396; = IF(p1221=0;0;p1228*p1221)
- p1024: 480997; = IF(p1012=0;p1014*(p0704/100)*p0703*1000;0)
- p1032: 0; = IF(p1012=0;p1026*p0001/(p0818*p0002);0)
- p4098: 2.3384e-5; = p1955*p3478
- p2498: 0.000310626; = p2302*p1073
- p1273: 0; = p1267*p1252/p0818
- p0441: 0; = SQRT(2)*(IF((2*p0309-1)<0;-1;IF((2*p0309-1)>0;1;0))*SQRT(SQRT((2/(pi()*0.140012289)+LN(1-(2*p0309-1)^2)/2)^2-LN(1-(2*p0309-1)^2)/0.140012289)-(2/(pi()*0.140012289)+LN(1-(2*p0309-1)^2)/2)))
- p0426: 0; = SQRT(2)*(IF((2*p0294-1)<0;-1;IF((2*p0294-1)>0;1;0))*SQRT(SQRT((2/(pi()*0.140012289)+LN(1-(2*p0294-1)^2)/2)^2-LN(1-(2*p0294-1)^2)/0.140012289)-(2/(pi()*0.140012289)+LN(1-(2*p0294-1)^2)/2)))
- p5115: 2.1274e-6; = p1942*p3483
- p4987: 4.3698e-6; = p1814*p3483
- p2222: 0.0399624; = if(p0765*p0769+p0766*p0770+p0767*p0771+p0768*p0772=0;0;p0769*p0765/(p0765*p0769+p0766*p0770+p0767*p0771+p0768*p0772))
- p0866: 0.150104; = IF(p0858+p0864+p0865=1;0;IF(p0858+p0864+p0865+p0861>1;1-(p0858+p0864+p0865);p0861))
- p1934: 0
- p1603: 0
- p3025: 1.52134e-6; = p2244*p1023
- p2880: 0.000147082; = p2294*(p1020+p1022)
- p4214: 4.90681e-7; = p1865*p3479
- p0795: 141.498; = p0135*(1+p0663*p0267/100)
- p2321: 0.000285772; = p2224*p2188
- p1143: 0; = if(p1121=0;p1137*p0001/(p0818*p0002);0)
- p1643: 0
- p1879: 2.56857e-5; = p1471*1000/p0818
- p4204: 3.99905e-5; = p1855*p3479
- p2946: 0.00076776; = p2360*(p1020+p1022)
- p3180: 0; = p2399*p1023
- p4716: 8.71565e-5; = p1955*p3481
- p0504: 0; = SQRT(2)*(IF((2*p0372-1)<0;-1;IF((2*p0372-1)>0;1;0))*SQRT(SQRT((2/(pi()*0.140012289)+LN(1-(2*p0372-1)^2)/2)^2-LN(1-(2*p0372-1)^2)/0.140012289)-(2/(pi()*0.140012289)+LN(1-(2*p0372-1)^2)/2)))
- p5103: 3.90982e-5; = p1930*p3483
- p0743: 1.325; = p0083*(1+p0611*p0215/100)
- p2033: 4.72951e-5; = p2015*p2029*p2031/(p0818*1000)
- p1862: 0
- p2006: 1.04557; = ((p1980*p1985+p1986*p1991+p1992*p1997+p2000*p2005)/p0818)*p0005*p0002/1000
- p0102: 11.768
- p1041: 0.30819
- p1668: 0
- p2131: 4.29131e-6; = p2015*p2059*p2093/(p0818*1000)
- p0909: 1.78823e7; = p0825*p0906+p0827*p0907+(p0830+p0895)*p0824*p0908
- p3644: 1.09093e-5; = p1913*p3476
- p2453: 0.000564989; = p2257*p1014
- p3305: 0; = if(and(p1232=0;p3252<>0);1-(p3301+p3302+p3303+p3304);0)
- p2229: 0.116086; = if(p0774*p0778+p0775*p0779+p0776*p0780+p0777*p0781=0;0;p0781*p0777/(p0774*p0778+p0775*p0779+p0776*p0780+p0777*p0781))
- p2408: 0; = p2234*p2198
- p2652: 0.00150209; = p2261*(p1078+p1080)
- p0107: 43.275
- p2369: 4.07204e-5; = p2225*p2198
- p0438: 0; = SQRT(2)*(IF((2*p0306-1)<0;-1;IF((2*p0306-1)>0;1;0))*SQRT(SQRT((2/(pi()*0.140012289)+LN(1-(2*p0306-1)^2)/2)^2-LN(1-(2*p0306-1)^2)/0.140012289)-(2/(pi()*0.140012289)+LN(1-(2*p0306-1)^2)/2)))
- p2866: 7.18968e-5; = p2280*(p1020+p1022)
- p4065: 3.14583e-7; = p1922*p3478
- p1906: 4.3554e-5; = p1498*1000/p0818
- p3464: 0; = p3369*p1241
- p0270: 12.665
- p3431: 0; = p3374*p1239
- p0993: 0; = p0989*p0001*p0004/(p0818*p0002)
- p2463: 3.06682e-5; = p2267*p1073
- p3093: 0.00129001; = p2312*p1132
- p2540: 9.26049e-7; = p2344*p1073
- p3355: 1.89771e6; = if(and(p1232=0;p3256<>0);p3256-(p3350+p3351+p3352+p3353+p3354);0)
- p0955: 0; = if(and(p0683>0;or(p0807=56;p0807=100;and(p0807=60;p0901>0.06)));p0937;0)
- p0891: 226512; = IF(p3251=0;0;62.4*6272640/(12*12*12))
- p2959: 0.000122776; = p2373*(p1020+p1022)
- p2819: 0; = p2428*(p1128+p1130)
- p1709: 0.533793
- p0509: 0; = SQRT(2)*(IF((2*p0377-1)<0;-1;IF((2*p0377-1)>0;1;0))*SQRT(SQRT((2/(pi()*0.140012289)+LN(1-(2*p0377-1)^2)/2)^2-LN(1-(2*p0377-1)^2)/0.140012289)-(2/(pi()*0.140012289)+LN(1-(2*p0377-1)^2)/2)))
- p0382: 0.5
- p0599: 0; = IF(p0335<0.5;-SQRT(p0007*EXP(p0467^2*p0008)-p0007);SQRT(p0007*EXP(p0467^2*p0008)-p0007))
- p1215: 0.0739645; = IF(p1214=0;0;(p1214-1.5)/(p1214-1)^2)
- p2300: 0.00471523; = p2227*p2207
- p3118: 0; = p2337*p1082
- p3382: 0.00668332; = p3363*p1234
- p1077: 0; = IF(p1071=0;p0715/100;0)
- p3251: 1.41032e9; = p1252-(p3252+p3253+p3254+p3255+p3256)
- p1714: 0
- p5306: 8.68746e-7; = p1927*p3484
- p0405: 0; = SQRT(2)*(IF((2*p0273-1)<0;-1;IF((2*p0273-1)>0;1;0))*SQRT(SQRT((2/(pi()*0.140012289)+LN(1-(2*p0273-1)^2)/2)^2-LN(1-(2*p0273-1)^2)/0.140012289)-(2/(pi()*0.140012289)+LN(1-(2*p0273-1)^2)/2)))
- p2493: 0.00109085; = p2297*p1073
- p1873: 0
- p2798: 0; = p2407*(p1019+p1021)
- p2068: 0.153529
- p4215: 2.57607e-6; = p1866*p3479
- p3008: 0; = p2422*(p1079+p1081)
- p4094: 1.25833e-5; = p1951*p3478
- p3335: 0; = IF(or(p3254=0;p1232>0);0;p3270*(p3280*(p3283*p1256+p3286*(p1253+p1257)+p1258*p3288+p3300*p3287)))
- p0034: 82.871
- p3879: 1.24388e-5; = p1942*p3477
- p2297: 0.00193905; = p2227*p2204
- p2444: 0.000936111; = p2248*p1014
- p0203: 42.664
- p1285: 0; = p1281*p1252/p0818
- p1679: 0
- p3330: 2.71061e6; = if(and(p1232=0;p3255<>0);p3255*(p3267-p3325)/p3327;0)
- p1723: 0.507159
- p2490: 0.00117522; = p2294*p1014
- p4799: 0; = p1832*p3482
- p1601: 0
- p0122: 25.258
- p3378: 0.0277524; = if(p1232=0;p3246*p3360/p0818;0)
- p3119: 0; = p2338*p1082
- p3449: 0; = p3373*p1240
- p1003: 0; = p0999*p0888
- p2497: 0.000686903; = p2301*p1073
- p1622: 0
- p2030: 8.87
- p3085: 0; = p2304*p1082
- p0627: 0; = IF(p0363<0.5;-SQRT(p0007*EXP(p0495^2*p0008)-p0007);SQRT(p0007*EXP(p0495^2*p0008)-p0007))
- p0312: 0.5
- p1744: 0
- p2322: 7.19879e-5; = p2224*p2189
- p1141: 0; = if(p1121=0;p1135*p0001/(p0818*p0002);0)
- p2001: 400
- p0549: 0; = IF(p0285<0.5;-SQRT(p0007*EXP(p0417^2*p0008)-p0007);SQRT(p0007*EXP(p0417^2*p0008)-p0007))
- p0625: 0; = IF(p0361<0.5;-SQRT(p0007*EXP(p0493^2*p0008)-p0007);SQRT(p0007*EXP(p0493^2*p0008)-p0007))
- p2733: 2.398e-5; = p2342*(p1078+p1080)
- p1800: 0
- p2624: 0; = p2428*p1123
- p0272: 28.237
- p1257: 0; = if(p1232>0;0;IF(p1253+p1256=1;0;IF(p1253+p1256+p1255>1;1-(p1253+p1256);p1255)))
- p1927: 0.000131779; = p1519*1000/p0818
- p2080: 0.025
- p1597: 0
- p0768: 85.859; = p0108*(1+p0636*p0240/100)
- p0981: 0; = p0978*p0001/(p0818*p0002)
- p0449: 0; = SQRT(2)*(IF((2*p0317-1)<0;-1;IF((2*p0317-1)>0;1;0))*SQRT(SQRT((2/(pi()*0.140012289)+LN(1-(2*p0317-1)^2)/2)^2-LN(1-(2*p0317-1)^2)/0.140012289)-(2/(pi()*0.140012289)+LN(1-(2*p0317-1)^2)/2)))
- p1321: 0.637437; = IF(((p0745*1000*p0748/100)+(p0754*1000*p0757/100))/p0801<0;0;((p0745*1000*p0748/100)+(p0754*1000*p0757/100))/p0801)
- p2495: 0.000319484; = p2299*p1073
- p3084: 0; = p2303*p1082
- p1185: 0.5
- p1981: 400
- p2571: 0.000332648; = p2375*p1073
- p0859: 0; = p0671*1000/p0856
- p3390: 0; = p3371*p1234
- p2215: 0.00146649; = p1117-p2214
- p0485: 0; = SQRT(2)*(IF((2*p0353-1)<0;-1;IF((2*p0353-1)>0;1;0))*SQRT(SQRT((2/(pi()*0.140012289)+LN(1-(2*p0353-1)^2)/2)^2-LN(1-(2*p0353-1)^2)/0.140012289)-(2/(pi()*0.140012289)+LN(1-(2*p0353-1)^2)/2)))
- p4585: 1.01617e-5; = p1824*p3481
- p1039: 0.0551074
- p1560: 0.813359
- p0340: 0.5
- p0088: 12.863
- p0404: 0.5
- p3286: 0.185
- p0307: 0.5
- p2323: 8.23996e-5; = p2224*p2190
- p0487: 0; = SQRT(2)*(IF((2*p0355-1)<0;-1;IF((2*p0355-1)>0;1;0))*SQRT(SQRT((2/(pi()*0.140012289)+LN(1-(2*p0355-1)^2)/2)^2-LN(1-(2*p0355-1)^2)/0.140012289)-(2/(pi()*0.140012289)+LN(1-(2*p0355-1)^2)/2)))
- p2726: 8.04454e-5; = p2335*(p1019+p1021)
- p5183: 1.47245e-8; = p1804*p3484
- p2677: 0.000128887; = p2286*(p1019+p1021)
- p0766: 57.607; = p0106*(1+p0634*p0238/100)
- p0844: 0.516951
- p0920: 0; = p0676*1000/p0801
- p2173: 0.247331; = p0895*p0898/p0818
- p0376: 0.5
- p2374: 0.01521; = p2225*p2203
- p1205: 0
- p2604: 0; = p2408*p1014
- p3216: 0.06; = IF(OR(p1226=0;p1228=0);0;1-p3213-p3214-p3215)
- p0168: 19.197
- p2868: 0.000132373; = p2282*(p1020+p1022)
- p0239: 35.767
- p0158: 17.432
- p1515: 6
- p2096: 0.486404
- p0247: 13.743
- p2450: 0.000798712; = p2254*p1014
- p3314: 0.00107264; = if(and(p1232=0;p3253<>0);p3263*p3289;0)
- p2870: 3.81685e-5; = p2284*(p1020+p1022)
- p1176: 222.161; = p1175*p0801
- p1791: 0
- p4343: 1.27913e-8; = p1788*p3480
- p2954: 2.29584e-6; = p2368*(p1020+p1022)
- p1040: 0.0255588
- p1998: 217
- p3417: 0.00523224; = p3379*p1238
- p3334: 0; = IF(or(p3254=0;p1232>0);0;p3269*p3277*(p3300*p3292+(1-p3300)*p3296))
- p2949: 5.56705e-5; = p2363*(p1020+p1022)
- p4181: 4.80867e-5; = p1832*p3479
- p0744: 86.214; = p0084*(1+p0612*p0216/100)
- p5147: 1.85529e-6; = p1768*p3484
- p2877: 6.49702e-7; = p2291*(p1020+p1022)
- p1106: 12205.4; = IF(p1071=0;p1105*p1096*p1095;0)
- p0279: 0.5
- p0461: 0; = SQRT(2)*(IF((2*p0329-1)<0;-1;IF((2*p0329-1)>0;1;0))*SQRT(SQRT((2/(pi()*0.140012289)+LN(1-(2*p0329-1)^2)/2)^2-LN(1-(2*p0329-1)^2)/0.140012289)-(2/(pi()*0.140012289)+LN(1-(2*p0329-1)^2)/2)))
- p4242: 8.47651e-5; = p1893*p3479
- p2882: 0.000242679; = p2296*(p1020+p1022)
- p4731: 0; = p1764*p3482
- p3446: 0; = p3370*p1240
- p0639: 0; = IF(p0375<0.5;-SQRT(p0007*EXP(p0507^2*p0008)-p0007);SQRT(p0007*EXP(p0507^2*p0008)-p0007))
- p0976: 0; = IF(p0687=0;IF(OR(p0686=0;p0689=0);0;p0686*1000*p0689/100);0)
- p1933: 0
- p1240: 0; = if(p1232>0;0;IF(p1234+p1238+p1239=1;0;IF(p1234+p1238+p1239+p1237>1;1-(p1234+p1238+p1239);p1237)))
- p0446: 0; = SQRT(2)*(IF((2*p0314-1)<0;-1;IF((2*p0314-1)>0;1;0))*SQRT(SQRT((2/(pi()*0.140012289)+LN(1-(2*p0314-1)^2)/2)^2-LN(1-(2*p0314-1)^2)/0.140012289)-(2/(pi()*0.140012289)+LN(1-(2*p0314-1)^2)/2)))
- p3068: 6.29589e-5; = p2287*p1023
- p0715: 0
- p3329: 8.20109e6; = if(and(p1232=0;p3255<>0);p3255*(p3266-p3324)/p3327;0)
- p1816: 0
- p0506: 0; = SQRT(2)*(IF((2*p0374-1)<0;-1;IF((2*p0374-1)>0;1;0))*SQRT(SQRT((2/(pi()*0.140012289)+LN(1-(2*p0374-1)^2)/2)^2-LN(1-(2*p0374-1)^2)/0.140012289)-(2/(pi()*0.140012289)+LN(1-(2*p0374-1)^2)/2)))
- p2014: 1.70636e7; = p0833*p2011*p2013
- p2124: 0.263965
- p2810: 0; = p2419*(p1078+p1080)
- p0196: 29.894
- p3245: 0; = IF(p3244=1;0;if(p3244+p0792/100>1;1-p3244;p0792/100))
- p1655: 0
- p4046: 8.70345e-6; = p1903*p3478
- p1568: 0
- p0656: 0; = IF(p0392<0.5;-SQRT(p0007*EXP(p0524^2*p0008)-p0007);SQRT(p0007*EXP(p0524^2*p0008)-p0007))
- p2828: 3.01499e-6; = p2242*(p1020+p1022)
- p0205: 36.519
- p0836: 29.1376; = p0831*p0835*p0801/(1-p0831)
- p3555: 2.19877e-6; = p1824*p3476
- p3409: 0; = p3371*p1238
- p2246: 3.02215e-5; = p2222*p2191
- p1703: 0
- p2867: 1.03476e-5; = p2281*(p1020+p1022)
- p1669: 0
- p2261: 0.00473741; = p2226*p2207
- p2689: 0.000556052; = p2298*(p1078+p1080)
- p0401: 0.5
- p0385: 0.5
- p2688: 0.000614814; = p2297*(p1078+p1080)
- p2479: 0.000266441; = p2283*p1014
- p2863: 9.69356e-5; = p2277*(p1020+p1022)
- p1569: 0
- p0885: 5.75; = IF(p0689+p0884=100;0;100-(p0689+p0884))
- p3499: 2.13111e-5; = p1768*p3476
- p5095: 1.72492e-7; = p1922*p3483
- p2919: 2.93838e-5; = p2333*(p1020+p1022)
- p1327: 0.0447543; = if(p1318=0;if(p1327a=0;1;if(p1327a<0;0;p1327a));0)
- p0331: 0.5
- p1870: 0
- p3387: 0; = p3368*p1234
- p1748: 0
- p0890: 3.00544e7; = p0686*1000*p0687*p0885/100
- p1333: 0.000444582; = p1332*p0001/(p0818*p0002)
- p4662: 5.51079e-5; = p1901*p3481
- p0482: 0; = SQRT(2)*(IF((2*p0350-1)<0;-1;IF((2*p0350-1)>0;1;0))*SQRT(SQRT((2/(pi()*0.140012289)+LN(1-(2*p0350-1)^2)/2)^2-LN(1-(2*p0350-1)^2)/0.140012289)-(2/(pi()*0.140012289)+LN(1-(2*p0350-1)^2)/2)))
- p3432: 0; = p3375*p1239
- p3426: 0; = p3369*p1239
- p1214: 14; = IF(p1213=0;0;p1213-1)
- p1297: 0
- p1228: 0.0703128; = IF(p1221=0;0;p0801*p1212*2000/(p1222+p1221*p1225)/p0818)
- p3397: 0.0111726; = p3378*p1234
- p2319: 0.000155213; = p2224*p2186
- p5207: 7.36226e-9; = p1828*p3484
- p1580: 0
- p3295: 0.58
- p1932: 0
- p3365: 0.0151048; = if(p1232=0;p3244*p3359/p0818;0)
- p0880: 16256; = p0868*p0856
- p0212: 0.46
- p2213: 0.000142533; = p1116-p2212
- p3373: 0; = if(p1232=0;p3245*p3361/p0818;0)
- p2849: 6.67699e-5; = p2263*(p1079+p1081)
- p2807: 0; = p2416*(p1078+p1080)
- p0156: 11.765
- p0907: 0.00734516
- p3028: 3.54385e-6; = p2247*p1023
- p3309: 0; = if(and(p1232=0;p3252<>0);p3252*(p3260-p3304)/p3305;0)
- p2362: 0.00239223; = p2225*p2190
- p1891: 0
- p2838: 1.89305e-7; = p2252*(p1020+p1022)
- p0367: 0.5
- p0285: 0.5
- p2342: 7.56301e-5; = p2228*p2210
- p3454: 0; = p3378*p1240
- p0440: 0; = SQRT(2)*(IF((2*p0308-1)<0;-1;IF((2*p0308-1)>0;1;0))*SQRT(SQRT((2/(pi()*0.140012289)+LN(1-(2*p0308-1)^2)/2)^2-LN(1-(2*p0308-1)^2)/0.140012289)-(2/(pi()*0.140012289)+LN(1-(2*p0308-1)^2)/2)))
- p2335: 0.000523904; = p2224*p2203
- p0517: 0; = SQRT(2)*(IF((2*p0385-1)<0;-1;IF((2*p0385-1)>0;1;0))*SQRT(SQRT((2/(pi()*0.140012289)+LN(1-(2*p0385-1)^2)/2)^2-LN(1-(2*p0385-1)^2)/0.140012289)-(2/(pi()*0.140012289)+LN(1-(2*p0385-1)^2)/2)))
- p0783: 152.971; = p0123*(1+p0651*p0255/100)
- p1773: 0
- p2273: 0.00756194; = p2230*p2219
- p3420: 0; = p3363*p1239
- p1062: 0.16
- p2744: 0; = p2353*(p1128+p1130)
- p0189: 28.121
- p1650: 0
- p2505: 3.08966e-5; = p2309*p1073
- p3167: 0; = p2386*p1082
- p2198: 5.11894e-5; = 22.98976928*p2197/14.0067
- p0688: 56.847; = p0028*(1+p0556*p0160/100)
- p1884: 0
- p1596: 0
- p2052: 2.02212e-5; = p2015*p2049*(1-p2050)/(p0818*1000)
- p2152: 3.41616e-7; = p2015*p2080*p2114/(p0818*1000)
- p2157: 6.88542e-7; = p2015*p2086*p2119/(p0818*1000)
- p1909: 0
- p2238: 0.000305212; = p2222*p2183
- p2278: 0.000132676; = p2223*p2184
- p0483: 0; = SQRT(2)*(IF((2*p0351-1)<0;-1;IF((2*p0351-1)>0;1;0))*SQRT(SQRT((2/(pi()*0.140012289)+LN(1-(2*p0351-1)^2)/2)^2-LN(1-(2*p0351-1)^2)/0.140012289)-(2/(pi()*0.140012289)+LN(1-(2*p0351-1)^2)/2)))
- p3637: 3.29815e-6; = p1906*p3476
- p1148: 0.100721; = if(p1121=0;IF(p1146=1;0;1-p1146);0)
- p2470: 0.000409746; = p2274*p1123
- p2619: 0; = p2423*p1073
- p1186: 4.58516e-8; = p1182*p1185/p0818
- p3189: 0; = p2408*p1023
- p4377: 2.17452e-7; = p1822*p3480
- p2942: 7.12115e-5; = p2356*(p1020+p1022)
- p2031: 0.465411
- p0837: 0.5
- p0969: 5.71067e6; = p0966*p0683*p0682*1000
- p0236: 2.972
- p3024: 6.03928e-6; = p2243*p1023
- p2905: 1.43635e-5; = p2319*(p1020+p1022)
- p0251: 21.152
- p1641: 0
- p0838: 1.35985e9; = (p0833-p0836)*p0837
- p0867: 0.342553; = IF(p0858+p0864+p0865+p0866=1;0;IF(p0858+p0864+p0865+p0866+p0862>1;1-(p0858+p0864+p0865+p0866);p0862))
- p2549: 0; = p2353*p1123
- p1180: 1.24051e-7; = p1176*p1179/p0818
- p1963e: 0.000263537; = p1628*p1832+p1629*p1833+p1630*p1834+p1631*p1835+p1632*p1836+p1633*p1837+p1634*p1838+p1635*p1839+p1636*p1840+p1637*p1841+p1638*p1842+p1639*p1843+p1640*p1844+p1641*p1845+p1642*p1846+p1643*p1847+p1644*p1848+p1645*p1849+p1646*p1850
- p1244: 0; = if(p1232>0;0;p1239*(p0725/100)*p0723*1000)
- p2730: 0.000474288; = p2339*(p1078+p1080)
- p0288: 0.5
- p3171: 0; = p2390*p1132
- p3380: 1.57501; = p3251/p0818
- p2602: 0; = p2406*p1014
- p2240: 0.000133156; = p2222*p2185
- p0953: 0; = if(and(p0683>0;or(p0807=56;p0807=100;and(p0807=60;p0901>0.06)));p0935;0)
- p2789: 0; = p2398*(p1019+p1021)
- p2325: 0.000167691; = p2224*p2192
- p0087: 20.885
- p3874: 2.35328e-6; = p1937*p3477
- p2894: 6.71923e-5; = p2308*(p1079+p1081)
- p3010: 0; = p2424*(p1079+p1081)
- p2003: 50
- p3366: 0.0896237; = if(p1232=0;p3244*p3360/p0818;0)
- p2123: 0.263965
- p1905: 0
- p2701: 0.000156069; = p2310*(p1078+p1080)
- p0398: 0.5
- p0514: 0; = SQRT(2)*(IF((2*p0382-1)<0;-1;IF((2*p0382-1)>0;1;0))*SQRT(SQRT((2/(pi()*0.140012289)+LN(1-(2*p0382-1)^2)/2)^2-LN(1-(2*p0382-1)^2)/0.140012289)-(2/(pi()*0.140012289)+LN(1-(2*p0382-1)^2)/2)))
- p2336: 0.000615138; = p2228*p2204
- p5128: 1.28219e-5; = p1955*p3483
- p0816: 0
- p0169: 17.158
- p3465: 0; = p3370*p1241
- p2141: 2.85503e-6; = p2015*p2069*p2103/(p0818*1000)
- p3004: 0; = p2418*(p1079+p1081)
- p2703: 0.00187915; = p2312*(p1128+p1130)
- p3225: 0.000272486; = p3221*p1229
- p2531: 0.000387385; = p2335*p1014
- p4564: 2.73585e-6; = p1803*p3481
- p2599: 0; = p2403*p1014
- p2551: 0.00449233; = p2355*p1014
- p0997: 0; = if(p0888=0;0;if((p0695*p0694*1000*p0696/100)/p0888>1;1;(p0695*p0694*1000*p0696/100)/p0888))
- p3267: 0.0170629
- p1495: 83
- p3348: 0.00443516; = if(and(p1232=0;p3256<>0);p3276*p3289;0)
- p2672: 1.71695e-5; = p2281*(p1019+p1021)
- p0454: 0; = SQRT(2)*(IF((2*p0322-1)<0;-1;IF((2*p0322-1)>0;1;0))*SQRT(SQRT((2/(pi()*0.140012289)+LN(1-(2*p0322-1)^2)/2)^2-LN(1-(2*p0322-1)^2)/0.140012289)-(2/(pi()*0.140012289)+LN(1-(2*p0322-1)^2)/2)))
- p3466: 0; = p3371*p1241
- p3338: 0; = if(and(p1232=0;p3254<>0);1-(p3334+p3335+p3336+p3337);0)
- p2120: 0.51828
- p2410: 0; = p2234*p2200
- p1963f: 0.000133449; = p1647*p1851+p1648*p1852+p1649*p1853+p1650*p1854+p1651*p1855+p1652*p1856+p1653*p1857+p1654*p1858+p1655*p1859+p1656*p1860+p1657*p1861+p1658*p1862+p1659*p1863+p1660*p1864+p1661*p1865+p1662*p1866+p1663*p1867+p1664*p1868+p1665*p1869+p1666*p1870
- p1296: 0; = p1292*p1252/p0818
- p5309: 5.00633e-6; = p1930*p3484
- p2891: 6.24534e-7; = p2305*(p1079+p1081)
- p0467: 0; = SQRT(2)*(IF((2*p0335-1)<0;-1;IF((2*p0335-1)>0;1;0))*SQRT(SQRT((2/(pi()*0.140012289)+LN(1-(2*p0335-1)^2)/2)^2-LN(1-(2*p0335-1)^2)/0.140012289)-(2/(pi()*0.140012289)+LN(1-(2*p0335-1)^2)/2)))
- p2530: 3.37908e-5; = p2334*p1014
- p0448: 0; = SQRT(2)*(IF((2*p0316-1)<0;-1;IF((2*p0316-1)>0;1;0))*SQRT(SQRT((2/(pi()*0.140012289)+LN(1-(2*p0316-1)^2)/2)^2-LN(1-(2*p0316-1)^2)/0.140012289)-(2/(pi()*0.140012289)+LN(1-(2*p0316-1)^2)/2)))
- p0756: 41.955; = p0096*(1+p0624*p0228/100)
- p3150: 5.90038e-7; = p2369*p1023
- p1029: 9425.83; = IF(p1012=0;IF(p0801<p1023*(p0704/100)*p0703*1000;p0801;p1023*(p0704/100)*p0703*1000);0)
- p1632: 0
- p2980: 0; = p2394*(p1020+p1022)
- p2786: 0; = p2395*(p1019+p1021)
- p0291: 0.5
- p1414: 17
- p1219: 0; = if(p1218=0;0;SQRT(2)*(IF((2*p1218-1)<0;-1;IF((2*p1218-1)>0;1;0))*SQRT(SQRT((2/(pi()*0.140012289)+LN(1-(2*p1218-1)^2)/2)^2-LN(1-(2*p1218-1)^2)/0.140012289)-(2/(pi()*0.140012289)+LN(1-(2*p1218-1)^2)/2))))
- p0121: 17.531
- p2002: 750
- p1817: 0
- p2328: 0.00183935; = p2224*p2196
- p1612: 0
- p0970: 0.00452813; = p0967/p0818
- p2247: 0.000244572; = p2222*p2192
- p0565: 0; = IF(p0301<0.5;-SQRT(p0007*EXP(p0433^2*p0008)-p0007);SQRT(p0007*EXP(p0433^2*p0008)-p0007))
- p2339: 0.00149585; = p2228*p2207
- p0782: 25.258; = p0122*(1+p0650*p0254/100)
- p0089: 17.816
- p3185: 0; = p2404*p1023
- p1629: 0
- p2419: 0; = p2235*p2209
- p3033: 2.96415e-8; = p2252*p1023
- p0794: 0.164; = p0134*(1+p0662*p0266/100)
- p1964: 0.5
- p0622: 0; = IF(p0358<0.5;-SQRT(p0007*EXP(p0490^2*p0008)-p0007);SQRT(p0007*EXP(p0490^2*p0008)-p0007))
- p3313: 0.0108628; = if(and(p1232=0;p3253<>0);p3262*(p3278*(p3282*p1256+p3286*(p1253+p1257)+p1258*p3288+p3298*p3287));0)
- p0080: 99.201
- p4660: 1.71968e-5; = p1899*p3481
- p0576: 0; = IF(p0312<0.5;-SQRT(p0007*EXP(p0444^2*p0008)-p0007);SQRT(p0007*EXP(p0444^2*p0008)-p0007))
- p1804: 2.23354e-6; = p1396*1000/p0818
- p1471: 23
- p0967: 4.05467e6; = (p0684/100)*p0683*p0682*1000
- p0142: 0
- p1098: 0.0163061
- p0541: 0; = IF(p0277<0.5;-SQRT(p0007*EXP(p0409^2*p0008)-p0007);SQRT(p0007*EXP(p0409^2*p0008)-p0007))
- p2503: 8.3224e-5; = p2307*p1073
- p1231: 0.0360834; = IF(p1221=0;0;p1230*(p1228+p1229))
- p2350: 0; = p2232*p2218
- p2829: 3.85697e-5; = p2243*(p1020+p1022)
- p1760: 0
- p1750: 0
- p2445: 0.000200666; = p2249*p1014
- p1662: 0.891164
- p4358: 8.95391e-8; = p1803*p3480
- p0190: 61.148
- p3318: 9.12063e6; = if(and(p1232=0;p3253<>0);p3253*(p3262-p3313)/p3316;0)
- p0905: 0.116142; = p0904/p0818
- p0655: 0; = IF(p0391<0.5;-SQRT(p0007*EXP(p0523^2*p0008)-p0007);SQRT(p0007*EXP(p0523^2*p0008)-p0007))
- p2057: 3.28794
- p3069: 1.3496e-5; = p2288*p1023
- p2508: 0.00678926; = p2312*p1123
- p3471: 9.52952e-5; = p3376*p1241
- p1277: 0
- p0724: 6.577; = p0064*(1+p0592*p0196/100)
- p1931: 0
- p2211: 0.00820107; = p1120-p2209-p2208-p2210
- p1645: 0
- p2234: 0; = 1-(p2222+p2223+p2224+p2225)
- p2252: 2.04565e-6; = p2222*p2198
- p5172: 9.86542e-7; = p1793*p3484
- p0020: 528.088
- p0380: 0.5
- p2482: 0.000620656; = p2286*p1014
- p0701: 0
- p3350: 8.11403e6; = if(and(p1232=0;p3256<>0);p3256*(p3273*p3277-p3345)/p3349;0)
- p0353: 0.5
- p2469: 0.00515543; = p2273*p1123
- p3263: 0.0214527
- p1084: 104128; = IF(p1071=0;p1078*(p0710/100)*p0703*1000;0)
- p3690: 0.000216755; = p1963*p3476
- p2884: 0.000211078; = p2298*(p1079+p1081)
- p0698: 0
- p3740: 2.35328e-6; = p1803*p3477
- p3403: 0.00813045; = p3365*p1238
- p3344: 0; = if(and(p1232=0;p3254<>0);p3254-(p3339+p3340+p3341+p3342+p3343);0)
- p3349: 0.824159; = if(and(p1232=0;p3256<>0);1-(p3345+p3346+p3347+p3348);0)
- p0875: 2.87318; = p0874*p0001*p0003/(p0818*p0002)
- p2962: 6.43669e-5; = p2376*(p1079+p1081)
- p2695: 0.000989885; = p2304*(p1078+p1080)
- p1272: 0; = IF(p1267+p1270+p1271=p1259;0;p1259-(p1267+p1270+p1271))
- p3519: 8.4568e-8; = p1788*p3476
- p4113: 1.59471e-6; = p1764*p3479
- p2306: 5.42593e-5; = p2227*p2213
- p1328: 359856; = p1319*p0801
- p0006: 15
- p0085: 2673.04
- p2446: 0.00198359; = p2250*p1014
- p1253: 0; = if(p1232>0;0;p0735/100)
- p1179: 0.5
- p4482: 1.50937e-6; = p1927*p3480
- p0985: 0; = IF(p0982=1;0;IF(p0982+p0983>1;1-p0982;p0983))
- p2943: 0.000245284; = p2357*(p1020+p1022)
- p0500: 0; = SQRT(2)*(IF((2*p0368-1)<0;-1;IF((2*p0368-1)>0;1;0))*SQRT(SQRT((2/(pi()*0.140012289)+LN(1-(2*p0368-1)^2)/2)^2-LN(1-(2*p0368-1)^2)/0.140012289)-(2/(pi()*0.140012289)+LN(1-(2*p0368-1)^2)/2)))
- p5282: 6.11067e-7; = p1903*p3484
- p4300: 1.47204e-5; = p1951*p3479
- p2185: 0.00333202; = p1065-p2184
- p0530: 0; = SQRT(2)*(IF((2*p0398-1)<0;-1;IF((2*p0398-1)>0;1;0))*SQRT(SQRT((2/(pi()*0.140012289)+LN(1-(2*p0398-1)^2)/2)^2-LN(1-(2*p0398-1)^2)/0.140012289)-(2/(pi()*0.140012289)+LN(1-(2*p0398-1)^2)/2)))
- p4084: 4.19443e-7; = p1941*p3478
- p2835: 2.51138e-5; = p2249*(p1020+p1022)
- p1652: 0
- p0163: 53.145
- p1759: 0
- p0263: 15.772
- p2778: 5.31018e-6; = p2387*(p1078+p1080)
- p3082: 0; = p2301*p1082
- p2137: 7.72857e-7; = p2015*p2065*p2099/(p0818*1000)
- p2904: 8.44874e-6; = p2318*(p1020+p1022)
- p3131: 0; = p2350*p1132
- p0408: 0; = SQRT(2)*(IF((2*p0276-1)<0;-1;IF((2*p0276-1)>0;1;0))*SQRT(SQRT((2/(pi()*0.140012289)+LN(1-(2*p0276-1)^2)/2)^2-LN(1-(2*p0276-1)^2)/0.140012289)-(2/(pi()*0.140012289)+LN(1-(2*p0276-1)^2)/2)))
- p1292: 0; = IF(p1287+p1290+p1291=p1261;0;p1261-(p1287+p1290+p1291))
- p4771: 0; = p1804*p3482
- p3249: 0
- p1021: 0.15355; = IF(p1012=0;IF(p1014+p1019+p1020=1;0;IF(p1014+p1019+p1020+p1017>1;1-(p1014+p1019+p1020);p1017));0)
- p1192: 1.27234e-7; = p1188*p1191/p0818
- p0617: 0; = IF(p0353<0.5;-SQRT(p0007*EXP(p0485^2*p0008)-p0007);SQRT(p0007*EXP(p0485^2*p0008)-p0007))
- p1847: 0
- p3394: 0.00206952; = p3375*p1234
- p1416: 26
- p1182: 82.1148; = p1181*p0801
- p1093: 0; = IF(p1071=0;p1087*p0001/(p0818*p0002);0)
- p0344: 0.5
- p2985: 0; = p2399*(p1020+p1022)
- p2263: 0.000554752; = p2226*p2209
- p3442: 0; = p3366*p1240
- p0877: 1.04691; = p0876*p0001*p0003/(p0818*p0002)
- p2037: 3.44
- p5073: 4.02481e-7; = p1900*p3483
- p2464: 8.36154e-5; = p2268*p1073
- p0375: 0.5
- p3172: 0; = p2391*p1132
- p2388: 0.0001501; = p2229*p2217
- p1779: 0
- p2142: 3.78297e-6; = p2015*p2070*p2104/(p0818*1000)
- p5124: 6.89968e-6; = p1951*p3483
- p1002: 2.86345e8; = p0996*p0888
- p0903: 0.0175
- p0609: 0; = IF(p0345<0.5;-SQRT(p0007*EXP(p0477^2*p0008)-p0007);SQRT(p0007*EXP(p0477^2*p0008)-p0007))
- p3324: 0.00555544; = if(and(p1232=0;p3255<>0);p3266*(p3279*(p3284*p1256+p3286*(p1253+p1257)+p1258*p3288+p3299*p3287));0)
- p0419: 0; = SQRT(2)*(IF((2*p0287-1)<0;-1;IF((2*p0287-1)>0;1;0))*SQRT(SQRT((2/(pi()*0.140012289)+LN(1-(2*p0287-1)^2)/2)^2-LN(1-(2*p0287-1)^2)/0.140012289)-(2/(pi()*0.140012289)+LN(1-(2*p0287-1)^2)/2)))
- p1583: 0
- p2466: 3.10419e-5; = p2270*p1073
- p1345: 3.1214e-5; = IF(p1318=0;p1344*p0001/(p0818*p0002);0)
- p1195: 0.45
- p0732: 0
- p0432: 0; = SQRT(2)*(IF((2*p0300-1)<0;-1;IF((2*p0300-1)>0;1;0))*SQRT(SQRT((2/(pi()*0.140012289)+LN(1-(2*p0300-1)^2)/2)^2-LN(1-(2*p0300-1)^2)/0.140012289)-(2/(pi()*0.140012289)+LN(1-(2*p0300-1)^2)/2)))
- p3147: 7.82765e-5; = p2366*p1023
- p2311: 0.00706667; = p2231*p2218
- p0242: 20.467
- p2379: 0.000372339; = p2229*p2208
- p1623: 0
- p0273: 0.5
- p2472: 0.00352847; = p2276*p1014
- p3428: 0; = p3371*p1239
- p4383: 1.27913e-8; = p1828*p3480
- p2565: 3.01094e-5; = p2369*p1014
- p3207: 0; = p2426*p1082
- p1666: 0
- p0685: 0
- p4448: 8.83879e-6; = p1893*p3480
- p0512: 0; = SQRT(2)*(IF((2*p0380-1)<0;-1;IF((2*p0380-1)>0;1;0))*SQRT(SQRT((2/(pi()*0.140012289)+LN(1-(2*p0380-1)^2)/2)^2-LN(1-(2*p0380-1)^2)/0.140012289)-(2/(pi()*0.140012289)+LN(1-(2*p0380-1)^2)/2)))
- p2192: 0.00612004; = p1067-p2189-p2190-p2191
- p1230: 0.5
- p3323: 0.222117; = if(and(p1232=0;p3255<>0);p3265*p3277*(p3299*p3291+(1-p3299)*p3295);0)
- p2654: 0.000175895; = p2263*(p1078+p1080)
- p1834: 0
- p2158: 2.42743e-6; = p2015*p2082*p2120/(p0818*1000)
- p1030: 0.000479246; = IF(p1012=0;p1024*p0001/(p0818*p0002);0)
- p2686: 3.51243e-5; = p2295*(p1019+p1021)
- p1687: 0
- p2114: 0.832356
- p2473: 0.000774542; = p2277*p1014
- p4909: 0; = p1942*p3482
- p3395: 0.000648587; = p3376*p1234
- p2465: 0.000315538; = p2269*p1073
- p3063: 2.07271e-5; = p2282*p1023
- p2055: 5.59471
- p3022: 3.28016e-6; = p2241*p1023
- p3145: 7.05431e-5; = p2364*p1023
- p4080: 7.34026e-7; = p1937*p3478
- p2276: 0.00477194; = p2223*p2182
- p3175: 0; = p2394*p1023
- p2047: 4.92505e-13; = p2015*p2045/(p0818*1000000000000)
- p1702: 0.853515
- p3859: 1.00855e-6; = p1922*p3477
- p0409: 0; = SQRT(2)*(IF((2*p0277-1)<0;-1;IF((2*p0277-1)>0;1;0))*SQRT(SQRT((2/(pi()*0.140012289)+LN(1-(2*p0277-1)^2)/2)^2-LN(1-(2*p0277-1)^2)/0.140012289)-(2/(pi()*0.140012289)+LN(1-(2*p0277-1)^2)/2)))
- p2494: 0.000986591; = p2298*p1073
- p1254: 1; = if(p1232>0;0;p0736/100)
- p3315: 0.00443516; = if(and(p1232=0;p3253<>0);p3264*p3289;0)
- p3061: 1.12577e-5; = p2280*p1023
- p1752: 0
- p2638: 3.7554e-5; = p2247*(p1019+p1021)
- p3495: 1.09938e-6; = p1764*p3476
- p3262: 0.0787162
- p3031: 3.88714e-5; = p2250*p1023
- p1945: 0
- p3195: 0; = p2414*p1082
- p0943: 0; = if(and(p0683=0;p0949=0);p0937;0)
- p1256: 1; = if(p1232>0;0;IF(p1253=1;0;IF(p1253+p1254>1;1-p1253;p1254)))
- p2202: 0.00166783; = 4*1.00794*p2201/(2*14.0067)
- p2622: 0; = p2426*p1073
- p2005: 7.23506e6; = p1963*p0818+p1959*1000+p1170+p1176+p1182
- p2611: 0; = p2415*p1073
- p0757: 4.924; = p0097*(1+p0625*p0229/100)
- p1485: 691
- p3936: 1.40514e-5; = p1793*p3478
- p1015: 0; = IF(p1012=0;p0706/100;0)
- p3214: 0.376406; = p1222*40.078/100.0869
- p2690: 0.000180064; = p2299*(p1078+p1080)
- p1316: 0; = p1312*p1252/p0818
- p2659: 4.71265e-5; = p2268*(p1078+p1080)
- p0211: 12.465
- p3412: 0.0118583; = p3374*p1238
- p2107: 0.881623
- p2235: 0; = 1-(p2226+p2227+p2228+p2229)
- p0966: 0.58479; = if(p0683=0;0;IF(p0684/100+p0965=1;0;1-(p0684/100+p0965)))
- p2459: 0.000312087; = p2263*p1073
- p2756: 0.0038696; = p2365*(p1019+p1021)
- p2927: 2.10827e-5; = p2341*(p1079+p1081)
- p3463: 0; = p3368*p1241
- p4529: 9.84907e-5; = p1768*p3481
- p0501: 0; = SQRT(2)*(IF((2*p0369-1)<0;-1;IF((2*p0369-1)>0;1;0))*SQRT(SQRT((2/(pi()*0.140012289)+LN(1-(2*p0369-1)^2)/2)^2-LN(1-(2*p0369-1)^2)/0.140012289)-(2/(pi()*0.140012289)+LN(1-(2*p0369-1)^2)/2)))
- p2852: 6.27471e-7; = p2266*(p1079+p1081)
- p1102: 0.0163061; = IF(p1071=0;IF(p1096+p1101=1;0;IF(p1096+p1101+p1098>1;1-(p1096+p1101);p1098));0)
- p2586: 0; = p2390*p1123
- p2368: 2.48092e-5; = p2225*p2197
- p5338: 1.88701e-5; = p1963*p3484
- p1290: 0; = IF(p1287=p1264;0;IF(p1287+p1288>p1264;p1264-p1287;p1288))
- p0152: 0
- p1599: 0.806571
- p0322: 0.5
- p1628: 0.601994
- p1123: 0.68176; = if(p1121=0;p0717/100;0)
- p1630: 0
- p2010: 0.00857869; = ((p1984*p1985+p1990*p1991+p1996*p1997+p2004*p2005)/p0818)*p0005*p0002/1000
- p3433: 0; = p3376*p1239
- p2456: 0.000320986; = p2260*p1073
- p4894: 0; = p1927*p3482
- p2249: 0.000271383; = p2222*p2195
- p2911: 1.55181e-5; = p2325*(p1020+p1022)
- p2516: 1.65177e-5; = p2320*p1014
- p0736: 100; = p0076*(1+p0604*p0208/100)
- p4009: 2.20208e-6; = p1866*p3478
- p1787: 0
- p2970: 1.99148e-6; = p2384*(p1079+p1081)
- p0952: 0; = if(and(p0683>0;or(p0807=56;p0807=100;and(p0807=60;p0901>0.06)));p0934;0)
- p1034: 5.99787e-5; = IF(p1012=0;p1028*p0001/(p0818*p0002);0)
- p1331: 0.00142533; = p1330*p0001/(p0818*p0002)
- p0228: 25.863
- p0327: 0.5
- p0606: 0; = IF(p0342<0.5;-SQRT(p0007*EXP(p0474^2*p0008)-p0007);SQRT(p0007*EXP(p0474^2*p0008)-p0007))
- p5334: 1.64178e-6; = p1955*p3484
- p1923: 6.70062e-6; = p1515*1000/p0818
- p1802: 0
- p1944: 0
- p1831: 0
- p1801: 0
- p4627: 8.20756e-6; = p1866*p3481
- p2341: 0.000175164; = p2228*p2209
- p2978: 0; = p2392*(p1129+p1131)
- p1756: 0
- p1147: 0.100721
- p0730: 0
- p2766: 0.000187484; = p2375*(p1078+p1080)
- p2029: 6.19
- p2405: 0; = p2234*p2195
- p0940: 0; = if(and(p0683=0;p0946=0);p0934;0)
- p1017: 0.15355; = IF(p1012=0;p0708/100;0)
- p3059: 1.92248e-6; = p2278*p1023
- p4291: 4.5388e-6; = p1942*p3479
- p1795: 0
- p2248: 0.00126601; = p2222*p2193
- p0255: 17.463
- p2925: 0.00018004; = p2339*(p1079+p1081)
- p3005: 0; = p2419*(p1079+p1081)
- p2170: 0.00215423; = p2166*(p0913)
- p3164: 0; = p2383*p1082
- p2656: 0.000994541; = p2265*(p1078+p1080)
- p0237: 20.268
- p1085: 39527.1; = IF(p1071=0;p1079*(p0710/100)*p0703*1000;0)
- p3141: 0.000120217; = p2360*p1023
- p2489: 0.00274121; = p2293*p1014
- p2404: 0; = p2234*p2193
- p3018: 2.0147e-5; = p2237*p1023
- p1311: 0; = IF(p1307+p1310=p1266;0;IF(p1307+p1310+p1309>p1266;p1266-(p1307+p1310);p1309))
- p0317: 0.5
- p1057: 0.82
- p0231: 35.931
- p1721: 0
- p1330: 1.43053e6; = p1320*p0801
- p2717: 0.000133287; = p2326*(p1019+p1021)
- p0674: 239.787; = p0014*(1+p0542*p0146/100)
- p2377: 0.000173178; = p2229*p2206
- p2914: 0.000170213; = p2328*(p1020+p1022)
- p1896: 0
- p1131: 0; = if(p1121=0;IF(p1123+p1128+p1129+p1130=1;0;IF(p1123+p1128+p1129+p1130+p1127>1;1-(p1123+p1128+p1129+p1130);p1127));0)
- p2847: 0.000570195; = p2261*(p1079+p1081)
- p1190: 2.54468e-7; = p1188/p0818
- p1268: 0
- p2579: 8.90165e-7; = p2383*p1073
- p2433: 0.0010281; = p2237*p1014
- p2773: 0.000301859; = p2382*(p1078+p1080)
- p3415: 0.00251763; = p3377*p1238
- p0082: 98.004
- p1360: 252
- p3067: 1.21626e-5; = p2286*p1023
- p0410: 0; = SQRT(2)*(IF((2*p0278-1)<0;-1;IF((2*p0278-1)>0;1;0))*SQRT(SQRT((2/(pi()*0.140012289)+LN(1-(2*p0278-1)^2)/2)^2-LN(1-(2*p0278-1)^2)/0.140012289)-(2/(pi()*0.140012289)+LN(1-(2*p0278-1)^2)/2)))
- p0154: 0
- p3210: 0; = p2429*p1132
- p2612: 0; = p2416*p1073
- p0400: 0.5
- p2857: 5.95226e-5; = p2271*(p1079+p1081)
- p0928: 528088; = p0801*p0918
- p2608: 0; = p2412*p1014
- p1639: 0
- p0691: 841.137; = p0031*(1+p0559*p0163/100)
- p0648: 0; = IF(p0384<0.5;-SQRT(p0007*EXP(p0516^2*p0008)-p0007);SQRT(p0007*EXP(p0516^2*p0008)-p0007))
- p2944: 0.000417; = p2358*(p1020+p1022)
- p1013: 0; = p1012*p0001/(p0818*p0002)
- p3351: 2.14682e6; = if(and(p1232=0;p3256<>0);p3256*(p3274-p3346)/p3349;0)
- p4976: 4.02481e-7; = p1803*p3483
- p0628: 0; = IF(p0364<0.5;-SQRT(p0007*EXP(p0496^2*p0008)-p0007);SQRT(p0007*EXP(p0496^2*p0008)-p0007))
- p0223: 10.783
- p1260: 0.42243; = if(p1232>0;0;p0731/100)
- p2233: 0; = if(p0783*p0787+p0784*p0788+p0785*p0789+p0786*p0790=0;0;p0790*p0786/(p0783*p0787+p0784*p0788+p0785*p0789+p0786*p0790))
- p2679: 0.000143016; = p2288*(p1019+p1021)
- p3439: 0; = p3363*p1240
- p1977: 1.67896e9; = p1252+p1188
- p2719: 0.000282432; = p2328*(p1019+p1021)
- p0847: 0
- p0851: 0
- p0480: 0; = SQRT(2)*(IF((2*p0348-1)<0;-1;IF((2*p0348-1)>0;1;0))*SQRT(SQRT((2/(pi()*0.140012289)+LN(1-(2*p0348-1)^2)/2)^2-LN(1-(2*p0348-1)^2)/0.140012289)-(2/(pi()*0.140012289)+LN(1-(2*p0348-1)^2)/2)))
- p3642: 1.4292e-5; = p1911*p3476
- p1245: 0; = if(p1232>0;0;p1240*(p0725/100)*p0723*1000)
- p3631: 5.91976e-7; = p1900*p3476
- p0823: 0.91625
- p2924: 2.16839e-5; = p2338*(p1079+p1081)
- p2642: 1.91374e-7; = p2251*(p1019+p1021)
- p2048: 1.64168e-13; = p2015*p2046/(p0818*1000000000000)
- p1997: 3.67507e7; = (if(p1152=0;0;p1150/p1152)+if(p1153=0;0;p1151/p1153))*(1+p1157)
- p3444: 0; = p3368*p1240
- p0505: 0; = SQRT(2)*(IF((2*p0373-1)<0;-1;IF((2*p0373-1)>0;1;0))*SQRT(SQRT((2/(pi()*0.140012289)+LN(1-(2*p0373-1)^2)/2)^2-LN(1-(2*p0373-1)^2)/0.140012289)-(2/(pi()*0.140012289)+LN(1-(2*p0373-1)^2)/2)))
- p2607: 0; = p2411*p1014
- p1100: 0.362521
- p0906: 0.0041
- p0406: 0; = SQRT(2)*(IF((2*p0274-1)<0;-1;IF((2*p0274-1)>0;1;0))*SQRT(SQRT((2/(pi()*0.140012289)+LN(1-(2*p0274-1)^2)/2)^2-LN(1-(2*p0274-1)^2)/0.140012289)-(2/(pi()*0.140012289)+LN(1-(2*p0274-1)^2)/2)))
- p2661: 1.74955e-5; = p2270*(p1078+p1080)
- p0729: 0
- p3947: 2.09722e-7; = p1804*p3478
- p1243: 68703.9; = if(p1232>0;0;p1238*(p0725/100)*p0723*1000)
- p5039: 1.20744e-6; = p1866*p3483
- p2298: 0.00175372; = p2227*p2205
- p2382: 0.000952028; = p2229*p2211
- p3281: 0.46
- p2632: 3.47598e-5; = p2241*(p1019+p1021)
- p0842: -0.111633
- p2309: 5.49205e-5; = p2227*p2216
- p1595: 0
- p1570: 0
- p3357: 1.94685e7; = if(p1232=0;p3307+p3318+p3329+p3340+p3351;0)
- p2515: 0.000114768; = p2319*p1014
- p2154: 2.08151e-6; = p2015*p2082*p2116/(p0818*1000)
- p1677: 0
- p2075: 0.072
- p3398: 0.00391327; = p3379*p1234
- p0402: 0.5
- p0199: 40.299
- p2478: 0.0010577; = p2282*p1014
- p0610: 0; = IF(p0346<0.5;-SQRT(p0007*EXP(p0478^2*p0008)-p0007);SQRT(p0007*EXP(p0478^2*p0008)-p0007))
- p1094: 0; = IF(p1071=0;p1088*p0001/(p0818*p0002);0)
- p2077: 0.043
- p3032: 1.80593e-8; = p2251*p1023
- p1990: 30
- p2861: 0; = p2275*(p1129+p1131)
- p0664: 0; = IF(p0400<0.5;-SQRT(p0007*EXP(p0532^2*p0008)-p0007);SQRT(p0007*EXP(p0532^2*p0008)-p0007))
- p0769: 19.154; = p0109*(1+p0637*p0241/100)
- p1023: 0.01449; = IF(p1012=0;IF(p1014+p1019+p1020+p1021+p1022=1;0;1-(p1014+p1019+p1020+p1021+p1022));0)
- p2898: 0; = p2312*(p1129+p1131)
- p2601: 0; = p2405*p1014
- p3222: 0.224242; = IF(p3216=0;0;p1223*40.078/100.0869)
- p0941: 0; = if(and(p0683=0;p0947=0);p0935;0)
- p3362: 0.0711449; = if(p1232=0;p3244*p3356/p0818;0)
- p2280: 0.000776926; = p2223*p2186
- p2784: 0; = p2393*(p1019+p1021)
- p3152: 0.000311564; = p2371*p1023
- p3197: 0; = p2416*p1082
- p0668: 0; = IF(p0404<0.5;-SQRT(p0007*EXP(p0536^2*p0008)-p0007);SQRT(p0007*EXP(p0536^2*p0008)-p0007))
- p0919: 0; = p0678*1000/p0801
- p3360: 1.05103e8; = if(p1232=0;p3310+p3321+p3332+p3343+p3354;0)
- p1958: 3799
- p3073: 2.23666e-7; = p2292*p1023
- p1577: 0
- p0029: 37.403
- p0498: 0; = SQRT(2)*(IF((2*p0366-1)<0;-1;IF((2*p0366-1)>0;1;0))*SQRT(SQRT((2/(pi()*0.140012289)+LN(1-(2*p0366-1)^2)/2)^2-LN(1-(2*p0366-1)^2)/0.140012289)-(2/(pi()*0.140012289)+LN(1-(2*p0366-1)^2)/2)))
- p0759: 2.618; = p0099*(1+p0627*p0231/100)
- p1035: 9.39152e-6; = IF(p1012=0;p1029*p0001/(p0818*p0002);0)
- p0309: 0.5
- p2583: 9.42173e-6; = p2387*p1073
- p2244: 0.000104992; = p2222*p2189
- p0584: 0; = IF(p0320<0.5;-SQRT(p0007*EXP(p0452^2*p0008)-p0007);SQRT(p0007*EXP(p0452^2*p0008)-p0007))
- p1249: 0; = if(p1232>0;0;p1244*p0001/(p0818*p0002))
- p2008: 0.214467; = ((p1982*p1985+p1988*p1991+p1994*p1997+p2002*p2005)/p0818)*p0005*p0002/1000
- p0022: 700.627
- p1136: 0; = if(p1121=0;p1130*(p0716/100)*p0703*1000;0)
- p4290: 4.90681e-7; = p1941*p3479
- p1805: 0
- p3125: 0; = p2344*p1082
- p0349: 0.5
- p2428: 0; = p2236*p2218
- p2613: 0; = p2417*p1073
- p0463: 0; = SQRT(2)*(IF((2*p0331-1)<0;-1;IF((2*p0331-1)>0;1;0))*SQRT(SQRT((2/(pi()*0.140012289)+LN(1-(2*p0331-1)^2)/2)^2-LN(1-(2*p0331-1)^2)/0.140012289)-(2/(pi()*0.140012289)+LN(1-(2*p0331-1)^2)/2)))
- p2193: 0.0316799; = p1054/p0818
- p2935: 1.87944e-5; = p2349*(p1079+p1081)
- p2918: 6.85379e-5; = p2332*(p1020+p1022)
- p3153: 0.000133575; = p2372*p1023
- p3045: 0; = p2264*p1082
- p0185: 48.507
- p3044: 0; = p2263*p1082
- p3423: 0; = p3366*p1239
- p0893: 7607.6; = 1000*(p0890+p0892)*p0001*p0003*p0004/(p0818*p0002)
- p2292: 1.54359e-5; = p2223*p2199
- p2630: 5.93596e-6; = p2239*(p1019+p1021)
- p0350: 0.5
- p2803: 0; = p2412*(p1019+p1021)
- p1740: 0
- p4661: 2.73585e-6; = p1900*p3481
- p1663: 0
- p4698: 2.73585e-6; = p1937*p3481
- p3265: 0.696292
- p2312: 0.00995842; = p2231*p2219
- p1289: 0
- p0927: 0.245589; = IF(p0918+p0923+p0924+p0925+p0926=1;0;1-(p0918+p0923+p0924+p0925+p0926))
- p0647: 0; = IF(p0383<0.5;-SQRT(p0007*EXP(p0515^2*p0008)-p0007);SQRT(p0007*EXP(p0515^2*p0008)-p0007))
- p2106: 0.856281
- p2454: 0.00109598; = p2258*p1073
- p3104: 1.19397e-6; = p2323*p1023
- p3441: 0; = p3365*p1240
- p2557: 0.00154535; = p2361*p1014
- p2161: 1.45299e-7; = p2015*p2085*p2123/(p0818*1000)
- p0165: 14.464
- p3418: 0.847778; = p3380*p1238
- p2169: 0.00284216; = p2166*(p0908)
- p2534: 0.000101352; = p2338*p1073
- p1778: 0
- p1493: 141
- p2220: 0.00139249; = p1151/p0818
- p3473: 0.00164155; = p3378*p1241
- p2700: 1.74136e-5; = p2309*(p1078+p1080)
- p3345: 0.160606; = if(and(p1232=0;p3256<>0);p3273*p3277*p3293;0)
- p0527: 0; = SQRT(2)*(IF((2*p0395-1)<0;-1;IF((2*p0395-1)>0;1;0))*SQRT(SQRT((2/(pi()*0.140012289)+LN(1-(2*p0395-1)^2)/2)^2-LN(1-(2*p0395-1)^2)/0.140012289)-(2/(pi()*0.140012289)+LN(1-(2*p0395-1)^2)/2)))
- p3840: 2.79032e-5; = p1903*p3477
- p2932: 5.64856e-6; = p2346*(p1079+p1081)
- p2956: 8.28492e-6; = p2370*(p1020+p1022)
- p2609: 0; = p2413*p1014
- p1730: 0
- p3965: 1.78263e-6; = p1822*p3478
- p2285: 0.000103722; = p2223*p2191
- p2184: 0.000967362; = p1051/p0818
- p3317: 4.84225e7; = if(and(p1232=0;p3253<>0);p3253*(p3261*p3277-p3312)/p3316;0)
- p0887: 49476.2; = 1000*p0886*p0001*p0003*p0004/(p0818*p0002)
- p2772: 2.30508e-5; = p2381*(p1078+p1080)
- p1135: 0; = if(p1121=0;p1129*(p0716/100)*p0703*1000;0)
- p0579: 0; = IF(p0315<0.5;-SQRT(p0007*EXP(p0447^2*p0008)-p0007);SQRT(p0007*EXP(p0447^2*p0008)-p0007))
- p2627: 0; = p2431*p1123
- p2969: 1.90448e-7; = p2383*(p1079+p1081)
- p2826: 1.23222e-5; = p2240*(p1020+p1022)
- p2657: 1.65298e-6; = p2266*(p1078+p1080)
- p1821: 0
- p1912: 0
- p1305: 0; = p1301*p1252/p0818
- p3457: 0.00420822; = p3362*p1241
- p4248: 5.39749e-6; = p1899*p3479
- p0481: 0; = SQRT(2)*(IF((2*p0349-1)<0;-1;IF((2*p0349-1)>0;1;0))*SQRT(SQRT((2/(pi()*0.140012289)+LN(1-(2*p0349-1)^2)/2)^2-LN(1-(2*p0349-1)^2)/0.140012289)-(2/(pi()*0.140012289)+LN(1-(2*p0349-1)^2)/2)))
- p3106: 2.42984e-6; = p2325*p1023
- p3361: 3.68131e7; = if(p1232=0;p3311+p3322+p3333+p3344+p3355;0)
- p1953: 0
- p2387: 1.67477e-5; = p2229*p2216
- p2501: 2.91911e-6; = p2305*p1073
- p0954: 0; = if(and(p0683>0;or(p0807=56;p0807=100;and(p0807=60;p0901>0.06)));p0936;0)
- p1266: 0.09806; = if(p1232>0;0;IF(p1259+p1263+p1264+p1265=1;0;1-(p1259+p1263+p1264+p1265)))
- p3103: 1.0431e-6; = p2322*p1023
- p2041: 0; = p2015*p2040/(p0818*1000)
- p2616: 0; = p2420*p1073
- p0797: 55.277; = p0137*(1+p0665*p0269/100)
- p1973: 0.000172868; = if(p0807=480;p1968*p0001/(p0818*p0002);0)
- p2243: 0.000416789; = p2222*p2188
- p0616: 0; = IF(p0352<0.5;-SQRT(p0007*EXP(p0484^2*p0008)-p0007);SQRT(p0007*EXP(p0484^2*p0008)-p0007))
- p3298: 0; = if(p1283+p1284+p1285+p1286=0;0;p1283/(p1283+p1284+p1285+p1286))
- p2968: 0.000114586; = p2382*(p1079+p1081)
- p2592: 0; = p2396*p1014
- p2739: 5.52425e-6; = p2348*(p1078+p1080)
- p1055: 27926.6; = IF(p1012=0;p1048*p1036;0)
- p4173: 3.18943e-6; = p1824*p3479
- p1505: 129
- p2640: 4.16709e-5; = p2249*(p1019+p1021)
- p2018: 0.1978
- p1883: 0
- p2295: 0.000228748; = p2223*p2202
- p2365: 0.0252009; = p2225*p2193
- p0256: 39.874
- p1678: 0
- p1987: 400
- p1209: 11.1668; = p1206*p0818*p0822/p0801
- p2083: 2.17294
- p2402: 0; = p2234*p2191
- p0183: 13.982
- p0091: 39.166
- p2961: 7.1169e-5; = p2375*(p1079+p1081)
- p3030: 3.93235e-6; = p2249*p1023
- p0936: 0; = p0930*p0001/(p0818*p0002)
- p3058: 1.51783e-5; = p2277*p1023
- p3052: 0; = p2271*p1082
- p1000: 0; = IF(p0996+p0999=1;0;IF(p0996+p0999+p0998>1;1-(p0996+p0999);p0998))
- p2165: 1.49958; = (p0833-p2014)/p0818-p0839
- p2206: 0.00149181; = 9*1.00794*p2204/30.973762
- p2097: 0.40001
- p1892: 0
- p3459: 0.000307747; = p3364*p1241
- p1784: 0
- p1708: 0
- p2149: 6.04469e-7; = p2015*p2077*p2111/(p0818*1000)
- p0869: 0; = IF(p0858+p0864+p0865+p0866+p0867+p0868=1;0;1-(p0858+p0864+p0865+p0866+p0867+p0868))
- p2555: 0.000479542; = p2359*p1014
- p3218: 0.0264662; = p3214*p1228
- p1913: 0.000144063; = p1505*1000/p0818
- p1680: 0
- p1720: 0
- p2332: 0.00074063; = p2224*p2200
- p0420: 0; = SQRT(2)*(IF((2*p0288-1)<0;-1;IF((2*p0288-1)>0;1;0))*SQRT(SQRT((2/(pi()*0.140012289)+LN(1-(2*p0288-1)^2)/2)^2-LN(1-(2*p0288-1)^2)/0.140012289)-(2/(pi()*0.140012289)+LN(1-(2*p0288-1)^2)/2)))
- p2049: 25.6942
- p0298: 0.5
- p2035: 5.43251e-5; = p2015*p2029*(1-p2031)/(p0818*1000)
- p1073: 0.56257; = IF(p1071=0;p0711/100;0)
- p3133: 0; = p2352*p1132
- p5132: 0.000147371; = p1963*p3483
- p3371: 0; = if(p1232=0;p3245*p3359/p0818;0)
- p0746: 8.098; = p0086*(1+p0614*p0218/100)
- p0857: 6.97452; = p0856*p0001*p0003/(p0818*p0002)
- p2411: 0; = p2234*p2201
- p3083: 0; = p2302*p1082
- p2546: 0; = p2350*p1123
- p4496: 5.11652e-8; = p1941*p3480
- p1562: 0
- p3374: 0.0220304; = if(p1232=0;p3246*p3356/p0818;0)
- p0679: 0
- p0776: 57.747; = p0116*(1+p0644*p0248/100)
- p0198: 49.253
- p4319: 1.66287e-7; = p1764*p3480
- p3002: 0; = p2416*(p1079+p1081)
- p1737: 0.786618
- p0115: 54.255
- p3182: 0; = p2401*p1023
- p0098: 2.201
- p2262: 0.00122675; = p2226*p2208
- p2241: 0.000226374; = p2222*p2186
- p2440: 7.76334e-5; = p2244*p1014
- p0607: 0; = IF(p0343<0.5;-SQRT(p0007*EXP(p0475^2*p0008)-p0007);SQRT(p0007*EXP(p0475^2*p0008)-p0007))
- p0895: 4.8852e8; = p0894*p0830
- p2668: 0.000160844; = p2277*(p1019+p1021)
- p0372: 0.5
- p2268: 0.000148631; = p2226*p2214
- p2148: 8.01273e-7; = p2015*p2076*p2110/(p0818*1000)
- p3137: 1.11504e-5; = p2356*p1023
- p1742: 0
- p3163: 0; = p2382*p1082
- p4044: 1.47854e-5; = p1901*p3478
- p2923: 6.69617e-5; = p2337*(p1079+p1081)
- p3730: 4.50486e-5; = p1793*p3477
- p1991: 4.40942e7; = (if(p1111=0;0;p1106/p1111)+if(p1112=0;0;p1107/p1112)+if(p1113=0;0;p1108/p1113)+if(p1114=0;0;p1109/p1114)+if(p1115=0;0;p1110/p1115))*(1+p1157)
- p2100: 0.705744
- p1088: 0; = IF(p1071=0;p1082*(p0710/100)*p0703*1000;0)
- p0472: 0; = SQRT(2)*(IF((2*p0340-1)<0;-1;IF((2*p0340-1)>0;1;0))*SQRT(SQRT((2/(pi()*0.140012289)+LN(1-(2*p0340-1)^2)/2)^2-LN(1-(2*p0340-1)^2)/0.140012289)-(2/(pi()*0.140012289)+LN(1-(2*p0340-1)^2)/2)))
- p4513: 1.11577e-5; = p1962*p3480
- p0352: 0.5
- p2736: 5.45774e-6; = p2345*(p1078+p1080)
- p1171: 0.000697452; = p0801*p0001/(p0818*p0002)
- p3860: 2.0171e-6; = p1923*p3477
- p2390: 0; = p2233*p2219
- p3476: 0.0757256; = if(p1328+p1330+p1332+p1334+p1336+p1338+p1340+p1342+p1344=0;0;p1328/(p1328+p1330+p1332+p1334+p1336+p1338+p1340+p1342+p1344))
- p0523: 0; = SQRT(2)*(IF((2*p0391-1)<0;-1;IF((2*p0391-1)>0;1;0))*SQRT(SQRT((2/(pi()*0.140012289)+LN(1-(2*p0391-1)^2)/2)^2-LN(1-(2*p0391-1)^2)/0.140012289)-(2/(pi()*0.140012289)+LN(1-(2*p0391-1)^2)/2)))
- p1028: 60197.8; = IF(p1012=0;p1022*(p0704/100)*p0703*1000;0)
- p2070: 0.282
- p0613: 0; = IF(p0349<0.5;-SQRT(p0007*EXP(p0481^2*p0008)-p0007);SQRT(p0007*EXP(p0481^2*p0008)-p0007))
- p2792: 0; = p2401*(p1019+p1021)
- p2869: 3.33457e-5; = p2283*(p1020+p1022)
- p1660: 0
- p2223: 0.137153; = if(p0765*p0769+p0766*p0770+p0767*p0771+p0768*p0772=0;0;p0770*p0766/(p0765*p0769+p0766*p0770+p0767*p0771+p0768*p0772))
- p1607: 0
- p1144: 2.28275e-5; = if(p1121=0;p1138*p0001/(p0818*p0002);0)
- p1614: 0
- p2452: 4.92829e-5; = p2256*p1014
- p0604: 0; = IF(p0340<0.5;-SQRT(p0007*EXP(p0472^2*p0008)-p0007);SQRT(p0007*EXP(p0472^2*p0008)-p0007))
- p0502: 0; = SQRT(2)*(IF((2*p0370-1)<0;-1;IF((2*p0370-1)>0;1;0))*SQRT(SQRT((2/(pi()*0.140012289)+LN(1-(2*p0370-1)^2)/2)^2-LN(1-(2*p0370-1)^2)/0.140012289)-(2/(pi()*0.140012289)+LN(1-(2*p0370-1)^2)/2)))
- p1948: 0
- p3157: 0; = p2376*p1082
- p0403: 0.5
- p0516: 0; = SQRT(2)*(IF((2*p0384-1)<0;-1;IF((2*p0384-1)>0;1;0))*SQRT(SQRT((2/(pi()*0.140012289)+LN(1-(2*p0384-1)^2)/2)^2-LN(1-(2*p0384-1)^2)/0.140012289)-(2/(pi()*0.140012289)+LN(1-(2*p0384-1)^2)/2)))
- p2983: 0; = p2397*(p1020+p1022)
- p4897: 0; = p1930*p3482
- p0739: 6.721; = p0079*(1+p0607*p0211/100)
- p1657: 0
- p1318: 0; = p1317*p0001/(p0818*p0002)
- p1700: 0
- p3160: 0; = p2379*p1082
- p3364: 0.00520282; = if(p1232=0;p3244*p3358/p0818;0)
- p1592: 0
- p4703: 1.44609e-5; = p1942*p3481
- p0809: 2000
- p1636: 0
- p4485: 8.69808e-6; = p1930*p3480
- p0786: 0
- p3306: 0; = if(and(p1232=0;p3252<>0);p3252*(p3257*p3277-p3301)/p3305;0)
- p0593: 0; = IF(p0329<0.5;-SQRT(p0007*EXP(p0461^2*p0008)-p0007);SQRT(p0007*EXP(p0461^2*p0008)-p0007))
- p2413: 0; = p2234*p2203
- p3111: 2.03237e-8; = p2330*p1023
- p2714: 1.26525e-5; = p2323*(p1019+p1021)
- p2371: 0.021502; = p2225*p2200
- p1242: 51384.7; = if(p1232>0;0;p1234*(p0725/100)*p0723*1000)
- p1696: 0.752785
- p3279: 0.37
- p2415: 0; = p2235*p2205
- p1691: 0
- p0358: 0.5
- p0899: 2.15089e9; = p0825*p0896+p0827*p0897+(p0830+p0895)*p0824*p0898
- p3194: 0; = p2413*p1023
- p4880: 0; = p1913*p3482
- p2082: 0.285294
- p0452: 0; = SQRT(2)*(IF((2*p0320-1)<0;-1;IF((2*p0320-1)>0;1;0))*SQRT(SQRT((2/(pi()*0.140012289)+LN(1-(2*p0320-1)^2)/2)^2-LN(1-(2*p0320-1)^2)/0.140012289)-(2/(pi()*0.140012289)+LN(1-(2*p0320-1)^2)/2)))
- p3341: 0; = if(and(p1232=0;p3254<>0);p3254*(p3271-p3336)/p3338;0)
- p1656: 0
- p2839: 4.16206e-7; = p2253*(p1020+p1022)
- p4262: 1.58245e-5; = p1913*p3479
- p1575: 0
- p2757: 0.000829493; = p2366*(p1019+p1021)
- p4691: 0.000265769; = p1930*p3481
- p0216: 4.39
- p2582: 9.57709e-5; = p2386*p1073
- p1071: 0
- p4510: 2.85246e-6; = p1955*p3480
- p0752: 0
- p2811: 0; = p2420*(p1078+p1080)
- p0580: 0; = IF(p0316<0.5;-SQRT(p0007*EXP(p0448^2*p0008)-p0007);SQRT(p0007*EXP(p0448^2*p0008)-p0007))
- p3100: 2.24904e-6; = p2319*p1023
- p2843: 7.07096e-5; = p2257*(p1020+p1022)
- p0718: 18.87; = p0058*(1+p0586*p0190/100)
- p3138: 3.84068e-5; = p2357*p1023
- p1865: 4.46708e-6; = p1457*1000/p0818
- p3438: 0; = p3362*p1240
- p3088: 0; = p2307*p1082
- p3474: 0.000574966; = p3379*p1241
- p3142: 3.02834e-5; = p2361*p1023
- p1963j: 0.000551133; = p1725*p1929+p1726*p1930+p1727*p1931+p1728*p1932+p1729*p1933+p1730*p1934+p1731*p1935+p1732*p1936+p1733*p1937+p1734*p1938+p1735*p1939+p1736*p1940+p1737*p1941+p1738*p1942+p1739*p1943+p1740*p1944+p1741*p1945+p1742*p1946+p1743*p1947
- p2879: 0.000343069; = p2293*(p1020+p1022)
- p3402: 0.00280052; = p3364*p1238
- p1839: 0
- p1056: 2.42038e7; = IF(p1012=0;p1049*p1036;0)
- p4073: 7.13054e-5; = p1930*p3478
- p1457: 4
- p0447: 0; = SQRT(2)*(IF((2*p0315-1)<0;-1;IF((2*p0315-1)>0;1;0))*SQRT(SQRT((2/(pi()*0.140012289)+LN(1-(2*p0315-1)^2)/2)^2-LN(1-(2*p0315-1)^2)/0.140012289)-(2/(pi()*0.140012289)+LN(1-(2*p0315-1)^2)/2)))
- p2912: 8.03282e-5; = p2326*(p1020+p1022)
- p3170: 0; = p2389*p1132
- p0829: 0.0832195; = if(p0807=480;p0814*(1-p0824);0)
- p0238: 19.021
- p3007: 0; = p2421*(p1079+p1081)
- p2457: 0.00266512; = p2261*p1073
- p0459: 0; = SQRT(2)*(IF((2*p0327-1)<0;-1;IF((2*p0327-1)>0;1;0))*SQRT(SQRT((2/(pi()*0.140012289)+LN(1-(2*p0327-1)^2)/2)^2-LN(1-(2*p0327-1)^2)/0.140012289)-(2/(pi()*0.140012289)+LN(1-(2*p0327-1)^2)/2)))
- p3586: 2.75692e-5; = p1855*p3476
- p0974: 0.5
- p0721: 0
- p3308: 0; = if(and(p1232=0;p3252<>0);p3252*(p3259-p3303)/p3305;0)
- p1811: 0
- p3967: 2.72638e-6; = p1824*p3478
- p0999: 0; = IF(p0996=1;0;IF(p0996+p0997>1;1-p0996;p0997))
- p0983: 0; = if(p0886=0;0;min(1;(p0695*p0694*1000*p0697/100)/p0886))
- p0979: 0; = IF(p0976=0;0;p0976*p0001/(p0818*p0002))
- p1116: 0.000156163; = IF(p1071=0;p1106/(p1111*p0818);0)
- p1235: 0.53827; = if(p1232>0;0;p0727/100)
- p1045: 0.0551074; = IF(p1012=0;IF(p1037+p1044=1;0;IF(p1037+p1044+p1039>1;1-(p1037+p1044);p1039));0)
- p1120: 0.0134852; = IF(p1071=0;p1110/(p1115*p0818);0)
- p1145: 1.49126e7; = if(p1121=0;p0799*p0702*1000*p0800/100;0)
- p1406: 76
- p1226: 700000; = IF(p1221=0;0;IF(p1193=0;p0801;0))
- p2132: 4.125e-6; = p2015*p2060*p2094/(p0818*1000)
- p2199: 0.000112545; = p1069-p2197-p2198
- p0815: 0
- p3166: 0; = p2385*p1082
- p1246: 7549.81; = if(p1232>0;0;p1241*(p0725/100)*p0723*1000)
- p0595: 0; = IF(p0331<0.5;-SQRT(p0007*EXP(p0463^2*p0008)-p0007);SQRT(p0007*EXP(p0463^2*p0008)-p0007))
- p0079: 6.721
- p2270: 5.51788e-5; = p2226*p2216
- p2112: 0.856281
- p2226: 0.38247; = if(p0774*p0778+p0775*p0779+p0776*p0780+p0777*p0781=0;0;p0778*p0774/(p0774*p0778+p0775*p0779+p0776*p0780+p0777*p0781))
- p3376: 0.00161108; = if(p1232=0;p3246*p3358/p0818;0)
- p0073: 47.951
- p0805: 370500
- p2718: 2.85717e-5; = p2327*(p1019+p1021)
- p2936: 0; = p2350*(p1129+p1131)
- p1125: 0; = if(p1121=0;p0719/100;0)
- p3086: 0; = p2305*p1082
- p3278: 0.46
- p3261: 0.908439
- p2050: 0.952062
- p2485: 0.00680778; = p2289*p1014
- p1128: 0.1887; = if(p1121=0;IF(p1123=1;0;IF(p1123+p1124>1;1-p1123;p1124));0)
- p1286: 0; = p1282*p1252/p0818
- p3078: 0; = p2297*p1082
- p1165: 0.000697452; = p0801*p0001/(p0818*p0002)
- p1011: 0.000760603; = p1010*p0001*p0004/(p0818*p0002)
- p2734: 0.000314028; = p2343*(p1078+p1080)
- p0807: 480
- p2153: 2.67091e-8; = p2015*p2081*p2115/(p0818*1000)
- p2058: 1.24412
- p0946: 0; = if(and(p0683=0;or(p0807=480;p0807=32;p0807=1;and(p0807=60;p0901<0.03)));p0934;0)
- p2716: 2.57489e-5; = p2325*(p1019+p1021)
- p1081: 0; = IF(p1071=0;IF(p1073+p1078+p1079+p1080=1;0;IF(p1073+p1078+p1079+p1080+p1077>1;1-(p1073+p1078+p1079+p1080);p1077));0)
- p1911: 0.000188734; = p1503*1000/p0818
- p1661: 0.776933
- p2671: 0.000119297; = p2280*(p1019+p1021)
- p0873: 0; = p0872*p0001*p0003/(p0818*p0002)
- p1900: 7.81739e-6; = p1492*1000/p0818
- p0519: 0; = SQRT(2)*(IF((2*p0387-1)<0;-1;IF((2*p0387-1)>0;1;0))*SQRT(SQRT((2/(pi()*0.140012289)+LN(1-(2*p0387-1)^2)/2)^2-LN(1-(2*p0387-1)^2)/0.140012289)-(2/(pi()*0.140012289)+LN(1-(2*p0387-1)^2)/2)))
- p0775: 54.255; = p0115*(1+p0643*p0247/100)
- p0614: 0; = IF(p0350<0.5;-SQRT(p0007*EXP(p0482^2*p0008)-p0007);SQRT(p0007*EXP(p0482^2*p0008)-p0007))
- p0874: 288368; = p0865*p0856
- p1588: 0
- p3336: 0; = IF(or(p3254=0;p1232>0);0;p3271*p3289)
- p0067: 53.827
- p3023: 4.72089e-7; = p2242*p1023
- p2113: 0.832356
- p0071: 42.243
- p2563: 0.039485; = p2367*p1014
- p3200: 0; = p2419*p1082
- p3325: 0.000853147; = if(and(p1232=0;p3255<>0);p3267*p3289;0)
- p1955: 0.00024904; = p1547*1000/p0818
- p0369: 0.5
- p3312: 0.1394; = if(and(p1232=0;p3253<>0);p3261*p3277*(p3298*p3290+(1-p3298)*p3294);0)
- p0646: 0; = IF(p0382<0.5;-SQRT(p0007*EXP(p0514^2*p0008)-p0007);SQRT(p0007*EXP(p0514^2*p0008)-p0007))
- p1926: 0
- p2392: 0; = p2233*p2221
- p0484: 0; = SQRT(2)*(IF((2*p0352-1)<0;-1;IF((2*p0352-1)>0;1;0))*SQRT(SQRT((2/(pi()*0.140012289)+LN(1-(2*p0352-1)^2)/2)^2-LN(1-(2*p0352-1)^2)/0.140012289)-(2/(pi()*0.140012289)+LN(1-(2*p0352-1)^2)/2)))
- p1101: 0.0439224; = IF(p1071=0;IF(p1096=1;0;IF(p1096+p1097>1;1-p1096;p1097));0)
- p3484: 0.00659246; = IF(p1344=0;0;p1344/(p1328+p1330+p1332+p1334+p1336+p1338+p1340+p1342+p1344))
- p1747: 0.217583
- p2900: 0; = p2314*(p1129+p1131)
- p3205: 0; = p2424*p1082
- p0843: -0.094426
- p5086: 7.41716e-6; = p1913*p3483
- p1241: 0.05915; = if(p1232>0;0;IF(p1234+p1238+p1239+p1240=1;0;1-(p1234+p1238+p1239+p1240)))
- p2360: 0.00829652; = p2225*p2188
- p1184: 9.17032e-8; = p1182/p0818
- p1902: 0
- p0161: 13.138
- p0689: 37.403; = p0029*(1+p0557*p0161/100)
- p3803: 7.05985e-6; = p1866*p3477
- p3294: 0.279
- p1065: 0.00429939; = IF(p1012=0;p1051/(p1058*p0818);0)
- p1654: 0
- p3116: 7.59137e-6; = p2335*p1023
- p2187: 0.000815274; = 4*1.00794*p2186/(2*14.0067)
- p0531: 0; = SQRT(2)*(IF((2*p0399-1)<0;-1;IF((2*p0399-1)>0;1;0))*SQRT(SQRT((2/(pi()*0.140012289)+LN(1-(2*p0399-1)^2)/2)^2-LN(1-(2*p0399-1)^2)/0.140012289)-(2/(pi()*0.140012289)+LN(1-(2*p0399-1)^2)/2)))
- p2416: 0; = p2235*p2206
- p0377: 0.5
- p0065: 18.227
- p3143: 3.46634e-5; = p2362*p1023
- p3419: 0; = p3362*p1239
- p4728: 0; = p1761*p3482
- p0853: 0; = p0803/(p0802+p0803)
- p2138: 1.26765e-6; = p2015*p2066*p2100/(p0818*1000)
- p1907: 0
- p0982: 0.981128; = if(p0886=0;0;min(1;(p0691*p0690*1000*p0693/100)/p0886))
- p2357: 0.00265057; = p2225*p2185
- p5302: 4.41735e-8; = p1923*p3484
- p1877: 0
- p1616: 0
- p2471: 0.000712032; = p2275*p1123
- p0052: 31.707
- p0134: 0.164
- p1686: 0
- p3043: 0; = p2262*p1082
- p1781: 0
- p0803: 0
- p3003: 0; = p2417*(p1079+p1081)
- p1974: 0; = p1969*p0001/(p0818*p0002)
- p2364: 0.0048684; = p2225*p2192
- p3075: 2.30302e-5; = p2294*p1023
- p1134: 33374.2; = if(p1121=0;p1128*(p0716/100)*p0703*1000;0)
- p0313: 0.5
- p4904: 0; = p1937*p3482
- p0858: 0.0721657; = p0670*1000/p0856
- p5143: 9.57093e-8; = p1764*p3484
- p2605: 0; = p2409*p1014
- p2637: 4.64051e-6; = p2246*(p1019+p1021)
- p3661: 5.75062e-5; = p1930*p3476
- p1326: 0.34952; = IF(((p0745*1000*p0753/100)+(p0754*1000*p0762/100))/p0801<0;0;((p0745*1000*p0753/100)+(p0754*1000*p0762/100))/p0801)
- p1198: 0.44
- p3307: 0; = if(and(p1232=0;p3252<>0);p3252*(p3258-p3302)/p3305;0)
- p3252: 0; = p1252*(p1267*(1-p3247)+p1270*(1-p3248)+p1271*(1-p3249)+p1272*(1-p3250))
- p2134: 3.00714e-5; = p2015*p2062*p2096/(p0818*1000)
- p1051: 866214; = IF(p1012=0;p1044*p1036;0)
- p0493: 0; = SQRT(2)*(IF((2*p0361-1)<0;-1;IF((2*p0361-1)>0;1;0))*SQRT(SQRT((2/(pi()*0.140012289)+LN(1-(2*p0361-1)^2)/2)^2-LN(1-(2*p0361-1)^2)/0.140012289)-(2/(pi()*0.140012289)+LN(1-(2*p0361-1)^2)/2)))
- p0956: 0; = if(and(p0683>0;or(p0807=56;p0807=100;and(p0807=60;p0901>0.06)));p0938;0)
- p4461: 4.98861e-7; = p1906*p3480
- p1396: 2
- p1960: 872.29; = IF(p1959-p1958<0;0;p1959-p1958)
- p1281: 0; = IF(p1277+p1280=p1263;0;IF(p1277+p1280+p1279>p1263;p1263-(p1277+p1280);p1279))
- p2676: 1.59264e-5; = p2285*(p1019+p1021)
- p3208: 0; = p2427*p1082
- p3241: 1.42081e-9; = p3234*p1188*p3236/p0818
- p2930: 1.98125e-7; = p2344*(p1079+p1081)
- p3190: 0; = p2409*p1023
- p0694: 82.871; = p0034*(1+p0562*p0166/100)
- p3099: 1.32291e-6; = p2318*p1023
- p4042: 4.61388e-6; = p1899*p3478
- p3006: 0; = p2420*(p1079+p1081)
- p3311: 0; = if(and(p1232=0;p3252<>0);p3252-(p3306+p3307+p3308+p3309+p3310);0)
- p4873: 0; = p1906*p3482
- p2693: 0.000175072; = p2302*(p1078+p1080)
- p0801: 700000
- p3340: 0; = if(and(p1232=0;p3254<>0);p3254*(p3270-p3335)/p3338;0)
- p2903: 2.45286e-6; = p2317*(p1020+p1022)
- p0634: 0; = IF(p0370<0.5;-SQRT(p0007*EXP(p0502^2*p0008)-p0007);SQRT(p0007*EXP(p0502^2*p0008)-p0007))
- p3226: 0.000415736; = p3222*p1229
- p3385: 0.0360807; = p3366*p1234
- p2818: 0; = p2427*(p1078+p1080)
- p0754: 2079.06; = p0094*(1+p0622*p0226/100)
- p2878: 1.42844e-6; = p2292*(p1020+p1022)
- p1670: 0
- p1022: 0.09254; = IF(p1012=0;IF(p1014+p1019+p1020+p1021=1;0;IF(p1014+p1019+p1020+p1021+p1018>1;1-(p1014+p1019+p1020+p1021);p1018));0)
- p2795: 0; = p2404*(p1019+p1021)
- p3051: 0; = p2270*p1082
- p2782: 0; = p2391*(p1128+p1130)
- p3037: 9.65769e-7; = p2256*p1023
- p4142: 1.64378e-5; = p1793*p3479
- p2906: 2.06722e-6; = p2320*(p1020+p1022)
- p1276: 0; = p1272*p1252/p0818
- p2698: 4.69059e-5; = p2307*(p1078+p1080)
- p0573: 0; = IF(p0309<0.5;-SQRT(p0007*EXP(p0441^2*p0008)-p0007);SQRT(p0007*EXP(p0441^2*p0008)-p0007))
- p2633: 5.00271e-6; = p2242*(p1019+p1021)
- p1940: 0
- p1380: 1
- p1853: 0
- p1224: 0.44; = IF(p1221=0;0;IF(p1193=0;1-p1223;0))
- p0883: 0; = p0882*p0001*p0003/(p0818*p0002)
- p0548: 0; = IF(p0284<0.5;-SQRT(p0007*EXP(p0416^2*p0008)-p0007);SQRT(p0007*EXP(p0416^2*p0008)-p0007))
- p3322: 0; = if(and(p1232=0;p3253<>0);p3253-(p3317+p3318+p3319+p3320+p3321);0)
- p2664: 0.00142694; = p2273*(p1128+p1130)
- p3259: 0.00796296
- p3060: 6.62188e-6; = p2279*p1023
- p1216: 0.0263674
- p1255: 0; = if(p1232>0;0;p0737/100)
- p4307: 0.000107004; = p1962*p3479
- p3287: 0.745
- p0226: 28.033
- p2065: 0.0758824
- p3802: 1.34473e-6; = p1865*p3477
- p0904: 1.03999e8; = p0825*p0901+(p0830+p0895)*p0824*p0903
- p1227: 0.000697452; = IF(p1221=0;0;p1226*p0001/(p0818*p0002))
- p0747: 20.885; = p0087*(1+p0615*p0219/100)
- p2334: 4.56991e-5; = p2224*p2202
- p0145: 0
- p2625: 0; = p2429*p1123
- p2862: 0.000441596; = p2276*(p1020+p1022)
- p2032: 0.448886
- p3011: 0; = p2425*(p1079+p1081)
- p1939: 0
- p0140: 25.258
- p2484: 0.000688696; = p2288*p1014
- p0100: 29.637
- p3027: 4.3791e-7; = p2246*p1023
- p0632: 0; = IF(p0368<0.5;-SQRT(p0007*EXP(p0500^2*p0008)-p0007);SQRT(p0007*EXP(p0500^2*p0008)-p0007))
- p0850: 0
- p2092: 0.54529
- p2626: 0; = p2430*p1123
- p2227: 0.380679; = if(p0774*p0778+p0775*p0779+p0776*p0780+p0777*p0781=0;0;p0779*p0775/(p0774*p0778+p0775*p0779+p0776*p0780+p0777*p0781))
- p2524: 0.00136005; = p2328*p1014
- p1573: 0
- p1036: 9.20453e7; = IF(p1012=0;p0795*p0702*1000*p0796/100;0)
- p3181: 0; = p2400*p1023
- p0947: 0; = if(and(p0683=0;or(p0807=480;p0807=32;p0807=1;and(p0807=60;p0901<0.03)));p0935;0)
- p2999: 0; = p2413*(p1020+p1022)
- p1087: 0; = IF(p1071=0;p1081*(p0710/100)*p0703*1000;0)
- p1291: 0; = IF(p1287+p1290=p1264;0;IF(p1287+p1290+p1289>p1264;p1264-(p1287+p1290);p1289))
- p3326: 0.0011624; = if(and(p1232=0;p3255<>0);p3268*p3289;0)
- p0345: 0.5
- p1608: 0
- p3705: 8.47182e-5; = p1768*p3477
- p0383: 0.5
- p3113: 1.07317e-5; = p2332*p1023
- p0235: 0
- p0160: 10.035
- p3289: 0.05
- p3077: 3.79988e-5; = p2296*p1023
- p0503: 0; = SQRT(2)*(IF((2*p0371-1)<0;-1;IF((2*p0371-1)>0;1;0))*SQRT(SQRT((2/(pi()*0.140012289)+LN(1-(2*p0371-1)^2)/2)^2-LN(1-(2*p0371-1)^2)/0.140012289)-(2/(pi()*0.140012289)+LN(1-(2*p0371-1)^2)/2)))
- p2864: 1.22779e-5; = p2278*(p1020+p1022)
- p1735: 0
- p0882: 0; = p0869*p0856
- p1284: 0.792059; = p1280*p1252/p0818
- p1329: 0.000358546; = p1328*p0001/(p0818*p0002)
- p1916: 0
- p4868: 0; = p1901*p3482
- p1221: 0.0263674; = p1216*(1+p1220*p1217/100)
- p2941: 0.000562225; = p2355*(p1020+p1022)
- p3310: 0; = if(and(p1232=0;p3252<>0);IF((p3306+p3307+p3308+p3309)+(p3252*(p3257*(1-p3277))/p3305)>p3252;p3252-(p3306+p3307+p3308+p3309);p3252*(p3257*(1-p3277))/p3305);0)
- p2735: 5.21931e-7; = p2344*(p1078+p1080)
- p3448: 0; = p3372*p1240
- p2500: 0.00175633; = p2304*p1073
- p0360: 0.5
- p0175: 0
- p3359: 1.77136e7; = if(p1232=0;p3309+p3320+p3331+p3342+p3353;0)
- p1109: 4.56106e6; = IF(p1071=0;p1105*p1103*p1095;0)
- p0995: 9.3373e-5; = p0991*p0001*p0004/(p0818*p0002)
- p1685: 0
- p4667: 1.52426e-5; = p1906*p3481
- p1283: 0; = p1277*p1252/p0818
- p3452: 0; = p3376*p1240
- p3126: 0; = p2345*p1082
- p1878: 0
- p2511: 0.000704914; = p2315*p1014
- p1096: 0.0015406
- p1868: 0
- p3144: 8.71694e-6; = p2363*p1023
- p0214: 1.394
- p0846: 0.46967; = p0841*p0845^3+p0842*p0845^2+p0843*p0845+p0844
- p1659: 0
- p1047: 0.30819; = IF(p1012=0;IF(p1037+p1044+p1045+p1046=1;0;IF(p1037+p1044+p1045+p1046+p1041>1;1-(p1037+p1044+p1045+p1046);p1041));0)
- p0513: 0; = SQRT(2)*(IF((2*p0381-1)<0;-1;IF((2*p0381-1)>0;1;0))*SQRT(SQRT((2/(pi()*0.140012289)+LN(1-(2*p0381-1)^2)/2)^2-LN(1-(2*p0381-1)^2)/0.140012289)-(2/(pi()*0.140012289)+LN(1-(2*p0381-1)^2)/2)))
- p1922: 3.35031e-6; = p1514*1000/p0818
- p0693: 37.494; = p0033*(1+p0561*p0165/100)
- p0210: 0
- p4593: 0.000153208; = p1832*p3481
- p0690: 608.196; = p0030*(1+p0558*p0162/100)
- p0110: 33.417
- p1563: 0
- p3173: 0; = p2392*p1132
- p1674: 0
- p0555: 0; = IF(p0291<0.5;-SQRT(p0007*EXP(p0423^2*p0008)-p0007);SQRT(p0007*EXP(p0423^2*p0008)-p0007))
- p2596: 0; = p2400*p1014
- p1852: 0
- p1300: 0.47951; = IF(p1297=p1265;0;IF(p1297+p1298>p1265;p1265-p1297;p1298))
- p3042: 0; = p2261*p1082
- p4833: 0; = p1866*p3482
- p5316: 5.15358e-8; = p1937*p3484
- p0642: 0; = IF(p0378<0.5;-SQRT(p0007*EXP(p0510^2*p0008)-p0007);SQRT(p0007*EXP(p0510^2*p0008)-p0007))
- p2418: 0; = p2235*p2208
- p2314: 0.00137539; = p2231*p2221
- p2103: 0.912485
- p4255: 4.78414e-6; = p1906*p3479
- p2016: 0.00263927; = (p2014-p2015)/(p0818)
- p2310: 0.000492223; = p2227*p2217
- p0379: 0.5
- p1797: 0
- p3065: 5.97646e-6; = p2284*p1023

- p0834: 22
- p0817: 0
- p0008: 0.0739645; = (p0007-1.5)/(p0007-1)^2
- p5096: 3.44984e-7; = p1923*p3483
- p1770: 0
- p0962: 0; = if(and(p0683>0;or(p0807=480;p0807=32;p0807=1;and(p0807=60;p0901<0.03)));p0938;0)
- p1843: 0
- p3320: 1.1327e7; = if(and(p1232=0;p3253<>0);p3253*(p3264-p3315)/p3316;0)
- p0295: 0.5
- p1259: 0; = if(p1232>0;0;p0730/100)
- p0511: 0; = SQRT(2)*(IF((2*p0379-1)<0;-1;IF((2*p0379-1)>0;1;0))*SQRT(SQRT((2/(pi()*0.140012289)+LN(1-(2*p0379-1)^2)/2)^2-LN(1-(2*p0379-1)^2)/0.140012289)-(2/(pi()*0.140012289)+LN(1-(2*p0379-1)^2)/2)))
- p2631: 2.04461e-5; = p2240*(p1019+p1021)
- p3149: 3.59485e-7; = p2368*p1023
- p1066: 0.0169095; = IF(p1012=0;p1052/(p1059*p0818);0)
- p2284: 0.000412454; = p2223*p2190
- p0702: 700.229; = p0042*(1+p0570*p0174/100)
- p1625: 0
- p1908: 0
- p2893: 1.78055e-5; = p2307*(p1079+p1081)
- p1841: 0
- p0902: 0.0377084
- p2204: 0.00509366; = p1109/p0818
- p0699: 0
- p3653: 2.53704e-7; = p1922*p3476
- p1642: 0
- p0770: 33.417; = p0110*(1+p0638*p0242/100)
- p0681: 163.241; = p0021*(1+p0549*p0153/100)
- p2000: 4000
- p1313: 0; = p1307*p1252/p0818
- p2351: 0; = p2232*p2219
- p1844: 0
- p2720: 1.31216e-7; = p2329*(p1019+p1021)
- p4846: 0; = p1879*p3482
- p1794: 0
- p3479: 0.109844; = if(p1328+p1330+p1332+p1334+p1336+p1338+p1340+p1342+p1344=0;0;p1334/(p1328+p1330+p1332+p1334+p1336+p1338+p1340+p1342+p1344))
- p1684: 0
- p1845: 0
- p2875: 0.000852008; = p2289*(p1020+p1022)
- p1557: 0.872068
- p3124: 0; = p2343*p1082
- p0719: 0
- p1996: 30
- p0832: 3.76678e8; = p0831*p0830/(1-p0831)
- p1624: 0.752571
- p0244: 15.751
- p3356: 8.34329e7; = if(p1232=0;p3306+p3317+p3328+p3339+p3350;0)
- p0103: 700.229
- p1936: 0
- p5272: 5.08732e-6; = p1893*p3484
- p0572: 0; = IF(p0308<0.5;-SQRT(p0007*EXP(p0440^2*p0008)-p0007);SQRT(p0007*EXP(p0440^2*p0008)-p0007))
- p3227: 0.000235153; = p3223*p1229
- p0542: 0; = IF(p0278<0.5;-SQRT(p0007*EXP(p0410^2*p0008)-p0007);SQRT(p0007*EXP(p0410^2*p0008)-p0007))
- p3761: 8.74077e-6; = p1824*p3477
- p0381: 0.5
- p1704: 0
- p1949: 0
- p2998: 0; = p2412*(p1020+p1022)
- p0215: 28.612
- p0144: 0
- p0188: 28.237
- p4941: 1.44893e-5; = p1768*p3483
- p0346: 0.5
- p5072: 2.52988e-6; = p1899*p3483
- p3477: 0.301032; = if(p1328+p1330+p1332+p1334+p1336+p1338+p1340+p1342+p1344=0;0;p1330/(p1328+p1330+p1332+p1334+p1336+p1338+p1340+p1342+p1344))
- p2438: 2.40906e-5; = p2242*p1014
- p0335: 0.5
- p2813: 0; = p2422*(p1078+p1080)
- p2102: 0.922577
- p2011: 0.00965242
- p1966: 0; = if(p0814=0;p0802;0)
- p1979: 9.76534e6; = p0973
- p0948: 0; = if(and(p0683=0;or(p0807=480;p0807=32;p0807=1;and(p0807=60;p0901<0.03)));p0936;0)
- p3455: 0; = p3379*p1240
- p0971: 0; = p0968/p0818
- p2645: 0.000165863; = p2254*(p1019+p1021)
- p3105: 3.00253e-7; = p2324*p1023
- p1941: 4.46708e-6; = p1533*1000/p0818
- p1299: 0
- p0697: 36.737; = p0037*(1+p0565*p0169/100)
- p2787: 0; = p2396*(p1019+p1021)
- p2973: 2.01575e-6; = p2387*(p1079+p1081)
- p2816: 0; = p2425*(p1078+p1080)
- p0706: 0
- p5330: 8.83471e-7; = p1951*p3484
- p2581: 2.53786e-5; = p2385*p1073
- p1009: 0.000272974; = p1005*p0001*p0004/(p0818*p0002)
- p1220: 0; = IF(p1218<0.5;-SQRT(p1214*EXP(p1219^2*p1215)-p1214);SQRT(p1214*EXP(p1219^2*p1215)-p1214))
- p3545: 6.42717e-6; = p1814*p3476
- p2462: 2.93284e-6; = p2266*p1073
- p1589: 0.897233
- p0308: 0.5
- p2356: 0.000769521; = p2225*p2184
- p0862: 0.342553; = p0674*1000/p0856
- p0749: 17.816; = p0089*(1+p0617*p0221/100)
- p0253: 35.897
- p3424: 0; = p3367*p1239
- p2117: 0.585147
- p3204: 0; = p2423*p1082
- p0745: 2673.04; = p0085*(1+p0613*p0217/100)
- p1858: 0
- p3388: 0; = p3369*p1234
- p1869: 0
- p0462: 0; = SQRT(2)*(IF((2*p0330-1)<0;-1;IF((2*p0330-1)>0;1;0))*SQRT(SQRT((2/(pi()*0.140012289)+LN(1-(2*p0330-1)^2)/2)^2-LN(1-(2*p0330-1)^2)/0.140012289)-(2/(pi()*0.140012289)+LN(1-(2*p0330-1)^2)/2)))
- p2499: 0.000134118; = p2303*p1073
- p2422: 0; = p2235*p2212
- p4420: 5.11652e-8; = p1865*p3480
- p2347: 0.000177101; = p2228*p2215
- p1270: 0; = IF(p1267=p1259;0;IF(p1267+p1268>p1259;p1259-p1267;p1268))
- p1971: 0; = p1966*p0001/(p0818*p0002)
- p4575: 2.97035e-5; = p1814*p3481
- p1177: 0.000697452; = p0801*p0001/(p0818*p0002)
- p2040: 0
- p2902: 1.93657e-5; = p2316*(p1020+p1022)
- p1130: 0; = if(p1121=0;IF(p1123+p1128+p1129=1;0;IF(p1123+p1128+p1129+p1126>1;1-(p1123+p1128+p1129);p1126));0)
- p2266: 5.21329e-6; = p2226*p2212
- p0099: 2.618
- p2414: 0; = p2235*p2204
- p3358: 6.10143e6; = if(p1232=0;p3308+p3319+p3330+p3341+p3352;0)
- p1118: 0.00143728; = IF(p1071=0;p1108/(p1113*p0818);0)
- p1204: 0.980791
- p2385: 4.5112e-5; = p2229*p2214
- p2541: 9.68355e-6; = p2345*p1073
- p2960: 0.00140753; = p2374*(p1020+p1022)
- p2242: 3.25804e-5; = p2222*p2187
- p2400: 0; = p2234*p2189
- p1719: 0.4576
- p1043: 0.262955
- p1234: 0.40258; = if(p1232>0;0;p0726/100)
- p0800: 25.258; = p0140*(1+p0668*p0272/100)
- p2507: 0.00481778; = p2311*p1123
- p3109: 2.66521e-5; = p2328*p1023
- p1653: 0
- p1191: 0.5
- p4549: 3.90836e-7; = p1788*p3481
- p3079: 0; = p2298*p1082
- p3270: 0.0747083
- p2329: 8.54546e-7; = p2224*p2197
- p1972: 0.000518605; = if(p0807=480;p1967*p0001/(p0818*p0002);0)
- p0828: 0.1272; = if(p0827=0;0;p0819-p0827/p0818)
- p0343: 0.5
- p2993: 0; = p2407*(p1020+p1022)
- p0496: 0; = SQRT(2)*(IF((2*p0364-1)<0;-1;IF((2*p0364-1)>0;1;0))*SQRT(SQRT((2/(pi()*0.140012289)+LN(1-(2*p0364-1)^2)/2)^2-LN(1-(2*p0364-1)^2)/0.140012289)-(2/(pi()*0.140012289)+LN(1-(2*p0364-1)^2)/2)))
- p2346: 4.69305e-5; = p2228*p2214
- p0139: 84.317
- p1780: 0
- p1915: 0
- p2940: 0.00256125; = p2354*(p1020+p1022)
- p0411: 0; = SQRT(2)*(IF((2*p0279-1)<0;-1;IF((2*p0279-1)>0;1;0))*SQRT(SQRT((2/(pi()*0.140012289)+LN(1-(2*p0279-1)^2)/2)^2-LN(1-(2*p0279-1)^2)/0.140012289)-(2/(pi()*0.140012289)+LN(1-(2*p0279-1)^2)/2)))
- p2593: 0; = p2397*p1014
- p2564: 1.83444e-5; = p2368*p1014
- p2793: 0; = p2402*(p1019+p1021)
- p1825: 0
- p2587: 0; = p2391*p1123
- p1111: 0.0872841
- p3391: 0; = p3372*p1234
- p1304: 0.899084; = p1300*p1252/p0818
- p3282: 0.3
- p0477: 0; = SQRT(2)*(IF((2*p0345-1)<0;-1;IF((2*p0345-1)>0;1;0))*SQRT(SQRT((2/(pi()*0.140012289)+LN(1-(2*p0345-1)^2)/2)^2-LN(1-(2*p0345-1)^2)/0.140012289)-(2/(pi()*0.140012289)+LN(1-(2*p0345-1)^2)/2)))
- p1762: 0
- p0094: 2079.06
- p4688: 4.61187e-5; = p1927*p3481
- p0515: 0; = SQRT(2)*(IF((2*p0383-1)<0;-1;IF((2*p0383-1)>0;1;0))*SQRT(SQRT((2/(pi()*0.140012289)+LN(1-(2*p0383-1)^2)/2)^2-LN(1-(2*p0383-1)^2)/0.140012289)-(2/(pi()*0.140012289)+LN(1-(2*p0383-1)^2)/2)))
- p3698: 1.00855e-6; = p1761*p3477
- p0881: 0.161968; = p0880*p0001*p0003/(p0818*p0002)
- p2304: 0.00312198; = p2227*p2211
- p2814: 0; = p2423*(p1078+p1080)
- p2079: 0.02
- p3535: 1.69136e-7; = p1804*p3476
- p2331: 3.08377e-6; = p2224*p2199
- p0076: 100
- p2533: 0.000312983; = p2337*p1073
- p3057: 6.91454e-5; = p2276*p1023
- p1658: 0
- p3447: 0; = p3371*p1240
- p3268: 0.0232481
- p0978: 0
- p2259: 0.00176197; = p2226*p2205
- p2056: 2.07882
- p3352: 651397; = if(and(p1232=0;p3256<>0);p3256*(p3275-p3347)/p3349;0)
- p2958: 0.000853071; = p2372*(p1020+p1022)
- p2163: 0.0057307; = (p2017-p2020)/p0818-(p2025+p2028+p2033+p2034+p2051+p2125+p2126+p2127+p2128+p2129+p2130+p2131+p2132+p2133+p2134+p2135+p2136+p2137+p2138+p2139+p2140+p2141+p2142+p2143+p2144+p2145+p2146+p2147+p2148+p2149+p2150+p2151+p2152+p2153+p2154+p2155+p2156+p2157)
- p1937: 7.81739e-6; = p1529*1000/p0818
- p2088: 0.798875
- p2126: 1.19346e-5; = p2015*p2054*p2088/(p0818*1000)
- p2629: 4.68652e-5; = p2238*(p1019+p1021)
- p0005: 1.60934
- p1315: 0; = p1311*p1252/p0818
- p1150: 1.11328e7; = if(p1121=0;p1149*p1146*p1145;0)
- p1771: 0
- p1114: 0.216028
- p1319: 0.514079; = IF(((p0745*1000*p0746/100)+(p0754*1000*p0755/100))/p0801<0;0;((p0745*1000*p0746/100)+(p0754*1000*p0755/100))/p0801)
- p2575: 0.000209467; = p2379*p1073
- p2796: 0; = p2405*(p1019+p1021)
- p0342: 0.5
- p3363: 0.0166012; = if(p1232=0;p3244*p3357/p0818;0)
- p1019: 0; = IF(p1012=0;IF(p1014=1;0;IF(p1014+p1015>1;1-p1014;p1015));0)
- p2724: 4.8756e-5; = p2333*(p1019+p1021)
- p0399: 0.5
- p1995: 50
- p3186: 0; = p2405*p1023
- p3237: 0.854735
- p2236: 0; = 1-(p2230+p2231+p2232+p2233)
- p0479: 0; = SQRT(2)*(IF((2*p0347-1)<0;-1;IF((2*p0347-1)>0;1;0))*SQRT(SQRT((2/(pi()*0.140012289)+LN(1-(2*p0347-1)^2)/2)^2-LN(1-(2*p0347-1)^2)/0.140012289)-(2/(pi()*0.140012289)+LN(1-(2*p0347-1)^2)/2)))
- p0492: 0; = SQRT(2)*(IF((2*p0360-1)<0;-1;IF((2*p0360-1)>0;1;0))*SQRT(SQRT((2/(pi()*0.140012289)+LN(1-(2*p0360-1)^2)/2)^2-LN(1-(2*p0360-1)^2)/0.140012289)-(2/(pi()*0.140012289)+LN(1-(2*p0360-1)^2)/2)))
- p0155: 5.185
- p0892: 6226.26; = if(p0891=0;0;(1-p1240)*p3251/p0891)
- p2020: 381056; = p2015*p2018*p2019
- p0208: 0
- p2439: 0.000308182; = p2243*p1014
- p2167: 0.585678; = p2166*(p0898)
- p2934: 2.09701e-6; = p2348*(p1079+p1081)
- p2293: 0.00370725; = p2223*p2200
- p0623: 0; = IF(p0359<0.5;-SQRT(p0007*EXP(p0491^2*p0008)-p0007);SQRT(p0007*EXP(p0491^2*p0008)-p0007))
- p0864: 0; = IF(p0858=1;0;IF(p0858+p0859>1;1-p0858;p0859))
- p3076: 3.31456e-6; = p2295*p1023
- p0013: 105.073
- p4890: 0; = p1923*p3482
- p0259: 67.364
- p1089: 0.00018408; = IF(p1071=0;p1083*p0001/(p0818*p0002);0)
- p5182: 5.15358e-8; = p1803*p3484
- p3183: 0; = p2402*p1023
- p3260: 0.0343561
- p1324: 2.37585; = IF(((p0745*1000*p0751/100)+(p0754*1000*p0760/100))/p0801<0;0;((p0745*1000*p0751/100)+(p0754*1000*p0760/100))/p0801)
- p2750: 9.9583e-5; = p2359*(p1019+p1021)
- p2074: 0.025
- p1947: 0
- p1888: 0
- p4421: 2.68617e-7; = p1866*p3480
- p3074: 5.3718e-5; = p2293*p1023
- p2989: 0; = p2403*(p1020+p1022)
- p1796: 0
- p0886: 1.955e8; = p0686*1000*p0687*p0689/100
- p3231: 2.48102e-7; = p1176/p0818
- p0118: 32.124
- p1993: 400
- p2965: 4.48148e-5; = p2379*(p1079+p1081)
- p1020: 0; = IF(p1012=0;IF(p1014+p1019=1;0;IF(p1014+p1019+p1016>1;1-(p1014+p1019);p1016));0)
- p0731: 42.243; = p0071*(1+p0599*p0203/100)
- p3201: 0; = p2420*p1082
- p1638: 0
- p1807: 0
- p2076: 0.057
- p2143: 2.20178e-6; = p2015*p2071*p2105/(p0818*1000)
- p1776: 0
- p1153: 0.365265
- p1556: 0
- p3159: 0; = p2378*p1082
- p0585: 0; = IF(p0321<0.5;-SQRT(p0007*EXP(p0453^2*p0008)-p0007);SQRT(p0007*EXP(p0453^2*p0008)-p0007))
- p3184: 0; = p2403*p1023
- p2358: 0.00450616; = p2225*p2186
- p1012: 0
- p3375: 0.00514065; = if(p1232=0;p3246*p3357/p0818;0)
- p1247: 5.11976e-5; = if(p1232>0;0;p1242*p0001/(p0818*p0002))
- p0284: 0.5
- p2830: 9.71598e-6; = p2244*(p1020+p1022)
- p4137: 1.2267e-7; = p1788*p3479
- p1092: 0; = IF(p1071=0;p1086*p0001/(p0818*p0002);0)
- p2130: 1.11372e-5; = p2015*p2058*p2092/(p0818*1000)
- p4870: 0; = p1903*p3482
- p1963g: 1.68297e-5; = p1667*p1871+p1668*p1872+p1669*p1873+p1670*p1874+p1671*p1875+p1672*p1876+p1673*p1877+p1674*p1878+p1675*p1879+p1676*p1880+p1677*p1881+p1678*p1882+p1679*p1883+p1680*p1884+p1681*p1885+p1682*p1886+p1683*p1887+p1684*p1888+p1685*p1889
- p2474: 9.81036e-5; = p2278*p1014
- p3300: 0; = if(p1293+p1294+p1295+p1296=0;0;p1293/(p1293+p1294+p1295+p1296))
- p2580: 9.3083e-6; = p2384*p1073
- p1646: 0
- p0417: 0; = SQRT(2)*(IF((2*p0285-1)<0;-1;IF((2*p0285-1)>0;1;0))*SQRT(SQRT((2/(pi()*0.140012289)+LN(1-(2*p0285-1)^2)/2)^2-LN(1-(2*p0285-1)^2)/0.140012289)-(2/(pi()*0.140012289)+LN(1-(2*p0285-1)^2)/2)))
- p2785: 0; = p2394*(p1019+p1021)
- p2760: 6.25261e-6; = p2369*(p1019+p1021)
- p2981: 0; = p2395*(p1020+p1022)
- p0878: 239787; = p0867*p0856
- p0959: 0; = if(and(p0683>0;or(p0807=480;p0807=32;p0807=1;and(p0807=60;p0901<0.03)));p0935;0)
- p0960: 0; = if(and(p0683>0;or(p0807=480;p0807=32;p0807=1;and(p0807=60;p0901<0.03)));p0936;0)
- p2966: 2.02658e-5; = p2380*(p1079+p1081)
- p2460: 0.000134749; = p2264*p1073
- p2128: 1.36514e-5; = p2015*p2056*p2090/(p0818*1000)
- p1749: 0
- p0619: 0; = IF(p0355<0.5;-SQRT(p0007*EXP(p0487^2*p0008)-p0007);SQRT(p0007*EXP(p0487^2*p0008)-p0007))
- p5320: 2.9449e-8; = p1941*p3484
- p1113: 0.100377
- p2797: 0; = p2406*(p1019+p1021)
- p1564: 0.822
- p1514: 3
- p1961: 0.5
- p2313: 0.000791482; = p2231*p2220
- p1988: 750
- p3066: 1.50293e-6; = p2285*p1023
- p5301: 2.20868e-8; = p1922*p3484
- p4177: 1.2267e-7; = p1828*p3479
- p1112: 0.209482
- p3013: 0; = p2427*(p1079+p1081)
- p5337: 6.42202e-6; = p1962*p3484
- p1859: 0
- p0972: 0.0063775; = p0969/p0818
- p0577: 0; = IF(p0313<0.5;-SQRT(p0007*EXP(p0445^2*p0008)-p0007);SQRT(p0007*EXP(p0445^2*p0008)-p0007))
- p3396: 0.00188297; = p3377*p1234
- p2915: 7.90797e-8; = p2329*(p1020+p1022)
- p1783: 0
- p2840: 9.99605e-5; = p2254*(p1020+p1022)
- p0026: 691.067
- p0045: 73.942
- p0740: 99.201; = p0080*(1+p0608*p0212/100)
- p0218: 37.294
- p3462: 0.0018568; = p3367*p1241
- p3353: 2.69341e6; = if(and(p1232=0;p3256<>0);p3256*(p3276-p3348)/p3349;0)
- p0113: 46.9
- p1619: 0
- p0765: 29.284; = p0105*(1+p0633*p0237/100)
- p3139: 6.52942e-5; = p2358*p1023
- p0644: 0; = IF(p0380<0.5;-SQRT(p0007*EXP(p0512^2*p0008)-p0007);SQRT(p0007*EXP(p0512^2*p0008)-p0007))
- p3094: 0.000102529; = p2313*p1132
- p5114: 2.29989e-7; = p1941*p3483
- p3367: 0.0313913; = if(p1232=0;p3244*p3361/p0818;0)
- p0861: 0.150104; = p0673*1000/p0856
- p3292: 0.258
- p0044: 92.899
- p0848: 0
- p2791: 0; = p2400*(p1019+p1021)
- p1590: 0
- p0716: 25.258; = p0056*(1+p0584*p0188/100)
- p1832: 0.000437774; = p1424*1000/p0818
- p4171: 2.08539e-6; = p1822*p3479
- p1550: 0
- p2062: 3.76588
- p1761: 3.35031e-6; = p1353*1000/p0818
- p1571: 0
- p2496: 0.00265265; = p2300*p1073
- p0643: 0; = IF(p0379<0.5;-SQRT(p0007*EXP(p0511^2*p0008)-p0007);SQRT(p0007*EXP(p0511^2*p0008)-p0007))
- p2574: 0.000808909; = p2378*p1073
- p3240: 1.19019e-8; = p3234*p1188*p3235/p0818
- p4434: 2.942e-7; = p1879*p3480
- p2104: 0.817136
- p2190: 0.00300726; = 32.065*p2189/(2*14.0067)
- p2175: 0.00120024; = p0895*p0908/p0818
- p3136: 8.80337e-5; = p2355*p1023
- p2228: 0.120765; = if(p0774*p0778+p0775*p0779+p0776*p0780+p0777*p0781=0;0;p0780*p0776/(p0774*p0778+p0775*p0779+p0776*p0780+p0777*p0781))
- p0856: 700000; = p0801
- p2775: 5.24625e-6; = p2384*(p1078+p1080)
- p3041: 0; = p2260*p1082
- p4286: 8.58692e-7; = p1937*p3479
- p1889: 0
- p2504: 0.000314061; = p2308*p1073
- p3440: 0; = p3364*p1240
- p3303: 0; = if(and(p1232=0;p3252<>0);p3259*p3289;0)
- p0141: 15.491
- p3867: 0.000228605; = p1930*p3477
- p2731: 0.000122817; = p2340*(p1078+p1080)
- p3443: 0; = p3367*p1240
- p1764: 1.4518e-5; = p1356*1000/p0818
- p2407: 0; = p2234*p2197
- p0975: 0.00545282; = p0973*p0974/p0818
- p3132: 0; = p2351*p1132
- p1302: 0; = IF(p1297+p1300+p1301=p1262;0;p1262-(p1297+p1300+p1301))
- p2606: 0; = p2410*p1014
- p2559: 0.000444823; = p2363*p1014
- p2168: 0.0226081; = p2166*(p0903)
- p0680: 528.088; = p0020*(1+p0548*p0152/100)
- p1683: 0
- p2207: 0.0123864; = p1119-p2205-p2204-p2206
- p1851: 0
- p2373: 0.00132674; = p2225*p2202
- p4466: 2.16173e-6; = p1911*p3480
- p2475: 0.000337912; = p2279*p1014
- p0932: 0; = p0801*p0926
- p2116: 0.444424
- p1058: 0.225
- p2856: 6.64132e-6; = p2270*(p1079+p1081)
- p1676: 0
- p3199: 0; = p2418*p1082
- p1236: 0; = if(p1232>0;0;p0728/100)
- p0994: 0; = p0990*p0001*p0004/(p0818*p0002)
- p2039: 1.71939e-5; = p2015*p2037*p2038/(p0818*1000)
- p3346: 0.00972708; = if(and(p1232=0;p3256<>0);p3274*(p3281*(p3285*p1256+p3286*(p1253+p1257)+p1258*p3288));0)
- p0720: 0
- p3904: 3.14583e-7; = p1761*p3478
- p0314: 0.5
- p1325: 0; = IF(((p0745*1000*p0752/100)+(p0754*1000*p0761/100))/p0801<0;0;((p0745*1000*p0752/100)+(p0754*1000*p0761/100))/p0801)
- p3689: 7.37678e-5; = p1962*p3476
- p0159: 53.975
- p0926: 0; = IF(p0918+p0923+p0924+p0925=1;0;IF(p0918+p0923+p0924+p0925+p0922>1;1-(p0918+p0923+p0924+p0925);p0922))
- p0351: 0.5
- p0673: 105.073; = p0013*(1+p0541*p0145/100)
- p2916: 1.29797e-7; = p2330*(p1020+p1022)
- p2476: 0.000574475; = p2280*p1014
- p2099: 0.620397
- p1726: 0.686898
- p0418: 0; = SQRT(2)*(IF((2*p0286-1)<0;-1;IF((2*p0286-1)>0;1;0))*SQRT(SQRT((2/(pi()*0.140012289)+LN(1-(2*p0286-1)^2)/2)^2-LN(1-(2*p0286-1)^2)/0.140012289)-(2/(pi()*0.140012289)+LN(1-(2*p0286-1)^2)/2)))
- p2502: 3.05247e-5; = p2306*p1073
- p1327a: 0.0447543; = (p0745*1000/p0801)*(1-(p0746+p0747+p0748+p0749+p0750+p0751+p0752+p0753)/100)+(p0754*1000/p0801)*(1-(p0755+p0756+p0757+p0758+p0759+p0760+p0761+p0762)/100)
- p0495: 0; = SQRT(2)*(IF((2*p0363-1)<0;-1;IF((2*p0363-1)>0;1;0))*SQRT(SQRT((2/(pi()*0.140012289)+LN(1-(2*p0363-1)^2)/2)^2-LN(1-(2*p0363-1)^2)/0.140012289)-(2/(pi()*0.140012289)+LN(1-(2*p0363-1)^2)/2)))
- p0825: 8.20223e8; = p0818*p0822
- p0958: 0.000526166; = if(and(p0683>0;or(p0807=480;p0807=32;p0807=1;and(p0807=60;p0901<0.03)));p0934;0)
- p2680: 0.00141372; = p2289*(p1019+p1021)
- p2600: 0; = p2404*p1014
- p2984: 0; = p2398*(p1020+p1022)
- p2277: 0.0010475; = p2223*p2183
- p1196: 0.59
- p2712: 4.38802e-5; = p2321*(p1019+p1021)
- p4554: 5.2372e-5; = p1793*p3481
- p1824: 2.9036e-5; = p1416*1000/p0818
- p1743: 0
- p2337: 0.000556345; = p2228*p2205
- p1334: 521989; = p1322*p0801
- p2299: 0.0005679; = p2227*p2206
- p0174: 0
- p0050: 46.9
- p1963b: 9.90543e-7; = p1569*p1773+p1570*p1774+p1571*p1775+p1572*p1776+p1573*p1777+p1574*p1778+p1575*p1779+p1576*p1780+p1577*p1781+p1578*p1782+p1579*p1783+p1580*p1784+p1581*p1785+p1582*p1786+p1583*p1787+p1584*p1788+p1585*p1789+p1586*p1790+p1587*p1791
- p0292: 0.5
- p2488: 1.14136e-5; = p2292*p1014
- p2610: 0; = p2414*p1073
- p2763: 0.00141549; = p2372*(p1019+p1021)
- p0366: 0.5
- p0002: 0.453592
- p0252: 56.561
- p0520: 0; = SQRT(2)*(IF((2*p0388-1)<0;-1;IF((2*p0388-1)>0;1;0))*SQRT(SQRT((2/(pi()*0.140012289)+LN(1-(2*p0388-1)^2)/2)^2-LN(1-(2*p0388-1)^2)/0.140012289)-(2/(pi()*0.140012289)+LN(1-(2*p0388-1)^2)/2)))
- p1004: 0; = p1000*p0888
- p1809: 0
- p1928: 0
- p0703: 700.229; = p0043*(1+p0571*p0175/100)
- p1108: 129185; = IF(p1071=0;p1105*p1102*p1095;0)
- p2483: 0.00321277; = p2287*p1014
- p2964: 0.000173063; = p2378*(p1079+p1081)
- p2576: 9.47234e-5; = p2380*p1073
- p1193: 0; = IF(OR(p1036=0;p1095=0);0.0001*p0857;0)
- p2975: 0; = p2389*(p1129+p1131)
- p2710: 2.3833e-5; = p2319*(p1019+p1021)
- p2885: 6.83525e-5; = p2299*(p1079+p1081)
- p1871: 0
- p2517: 0.000211305; = p2321*p1014
- p2150: 1.64472e-6; = p2015*p2078*p2112/(p0818*1000)
- p2928: 9.10284e-6; = p2342*(p1079+p1081)
- p4070: 1.23736e-5; = p1927*p3478
- p0138: 46.9
- p0240: 12.133
- p2553: 0.00195989; = p2357*p1014
- p2850: 2.88291e-5; = p2264*(p1079+p1081)
- p1332: 446206; = p1321*p0801
- p0355: 0.5
- p2667: 0.000732732; = p2276*(p1019+p1021)
- p2754: 9.23731e-5; = p2363*(p1019+p1021)
- p1026: 0; = IF(p1012=0;p1020*(p0704/100)*p0703*1000;0)
- p2513: 1.9599e-5; = p2317*p1014
- p0329: 0.5
- p2781: 0; = p2390*(p1128+p1130)
- p1833: 0
- p2747: 0.00011816; = p2356*(p1019+p1021)
- p0608: 0; = IF(p0344<0.5;-SQRT(p0007*EXP(p0476^2*p0008)-p0007);SQRT(p0007*EXP(p0476^2*p0008)-p0007))
- p2094: 0.922577
- p1050: 3.11549e7; = IF(p1012=0;p1037*p1036;0)
- p1918: 0
- p2257: 0.000764098; = p2222*p2203
- p2623: 0; = p2427*p1073
- p0663: 0; = IF(p0399<0.5;-SQRT(p0007*EXP(p0531^2*p0008)-p0007);SQRT(p0007*EXP(p0531^2*p0008)-p0007))
- p1826: 0
- p2806: 0; = p2415*(p1078+p1080)
- p5131: 5.01543e-5; = p1962*p3483
- p2992: 0; = p2406*(p1020+p1022)
- p2218: 0.0124328; = p1150/p0818
- p2799: 0; = p2408*(p1019+p1021)
- p3246: 0.23644; = IF(p3244+p3245=1;0;1-(p3244+p3245))
- p2842: 6.16786e-6; = p2256*(p1020+p1022)
- p1303: 0; = p1297*p1252/p0818
- p0918: 0.754411; = p0680*1000/p0801
- p0910: 0.0199705; = p0909/p0818
- p0712: 31.707; = p0052*(1+p0580*p0184/100)
- p2034: 6.53655e-5; = p2015*p2030*p2032/(p0818*1000)
- p0427: 0; = SQRT(2)*(IF((2*p0295-1)<0;-1;IF((2*p0295-1)>0;1;0))*SQRT(SQRT((2/(pi()*0.140012289)+LN(1-(2*p0295-1)^2)/2)^2-LN(1-(2*p0295-1)^2)/0.140012289)-(2/(pi()*0.140012289)+LN(1-(2*p0295-1)^2)/2)))
- p3304: 0; = if(and(p1232=0;p3252<>0);p3260*p3289;0)
- p1552: 0
- p1170: 372.633; = p1169*p0801
- p1946: 0
- p1792: 0
- p0474: 0; = SQRT(2)*(IF((2*p0342-1)<0;-1;IF((2*p0342-1)>0;1;0))*SQRT(SQRT((2/(pi()*0.140012289)+LN(1-(2*p0342-1)^2)/2)^2-LN(1-(2*p0342-1)^2)/0.140012289)-(2/(pi()*0.140012289)+LN(1-(2*p0342-1)^2)/2)))
- p2542: 2.64017e-5; = p2346*p1073
- p3053: 0.000695123; = p2272*p1132
- p1810: 0
- p1553: 0
- p3276: 0.0887032
- p2749: 0.000691921; = p2358*(p1019+p1021)
- p5005: 2.2539e-5; = p1832*p3483
- p0591: 0; = IF(p0327<0.5;-SQRT(p0007*EXP(p0459^2*p0008)-p0007);SQRT(p0007*EXP(p0459^2*p0008)-p0007))
- p2673: 0.000219644; = p2282*(p1019+p1021)
- p2354: 0.0276772; = p2225*p2182
- p2951: 0.00233209; = p2365*(p1020+p1022)
- p3217: 0.00793146; = p3213*p1228
- p0562: 0; = IF(p0298<0.5;-SQRT(p0007*EXP(p0430^2*p0008)-p0007);SQRT(p0007*EXP(p0430^2*p0008)-p0007))
- p2727: 0.000195042; = p2336*(p1078+p1080)
- p0821: 3.91667
- p2409: 0; = p2234*p2199
- p3193: 0; = p2412*p1023
- p2210: 0.000626256; = 6*1.00794*p2208/30.973762
- p0581: 0; = IF(p0317<0.5;-SQRT(p0007*EXP(p0449^2*p0008)-p0007);SQRT(p0007*EXP(p0449^2*p0008)-p0007))
- p0460: 0; = SQRT(2)*(IF((2*p0328-1)<0;-1;IF((2*p0328-1)>0;1;0))*SQRT(SQRT((2/(pi()*0.140012289)+LN(1-(2*p0328-1)^2)/2)^2-LN(1-(2*p0328-1)^2)/0.140012289)-(2/(pi()*0.140012289)+LN(1-(2*p0328-1)^2)/2)))
- p3624: 5.84365e-5; = p1893*p3476
- p2253: 4.49758e-6; = p2222*p2199
- p1745: 0
- p0944: 0; = if(and(p0683=0;p0950=0);p0938;0)
- p0051: 56.257
- p0635: 0; = IF(p0371<0.5;-SQRT(p0007*EXP(p0503^2*p0008)-p0007);SQRT(p0007*EXP(p0503^2*p0008)-p0007))
- p0533: 0; = SQRT(2)*(IF((2*p0401-1)<0;-1;IF((2*p0401-1)>0;1;0))*SQRT(SQRT((2/(pi()*0.140012289)+LN(1-(2*p0401-1)^2)/2)^2-LN(1-(2*p0401-1)^2)/0.140012289)-(2/(pi()*0.140012289)+LN(1-(2*p0401-1)^2)/2)))
- p2442: 2.23464e-5; = p2246*p1014
- p0316: 0.5
- p3368: 0; = if(p1232=0;p3245*p3356/p0818;0)
- p2194: 0.214362
- p2209: 0.00145045; = 14.0067*p2208/30.973762
- p0117: 36.603
- p1790: 0
- p4252: 1.01816e-5; = p1903*p3479
- p1798: 0
- p1963k: 0.000713266; = p1744*p1948+p1745*p1949+p1746*p1950+p1747*p1951+p1748*p1952+p1749*p1953+p1750*p1954+p1751*p1955+p1752*p1956+p1753*p1957+p1961*p1962
- p1864: 0
- p2375: 0.000591301; = p2229*p2204
- p4272: 7.36021e-7; = p1923*p3479
- p2022: 0.0028217; = p2018*p2015/p0818-p2021
- p1006: 0.00724668; = p1002*p0001*p0004/(p0818*p0002)
- p3087: 0; = p2306*p1082
- p1731: 0
- p0863: 0.02361; = p0675*1000/p0856
- p0631: 0; = IF(p0367<0.5;-SQRT(p0007*EXP(p0499^2*p0008)-p0007);SQRT(p0007*EXP(p0499^2*p0008)-p0007))
- p0162: 21.317
- p0301: 0.5
- p4867: 0; = p1900*p3482
- p2093: 0.260958
- p2588: 0; = p2392*p1123
- p1232: 0
- p3049: 0; = p2268*p1082
- p3151: 1.29726e-6; = p2370*p1023
- p0557: 0; = IF(p0293<0.5;-SQRT(p0007*EXP(p0425^2*p0008)-p0007);SQRT(p0007*EXP(p0425^2*p0008)-p0007))
- p0751: 39.166; = p0091*(1+p0619*p0223/100)
- p1729: 0
- p1200: 0.84
- p2393: 0; = p2234*p2182
- p2544: 9.80154e-6; = p2348*p1073
- p3236: 0.0140975
- p2009: 0.027682; = ((p1983*p1985+p1989*p1991+p1995*p1997+p2003*p2005+p1976*p1977+p1978*p1979+p1998*p1999)/p0818)*p0005*p0002/1000
- p3203: 0; = p2422*p1082
- p0120: 11.56
- p2063: 2.01468
- p0758: 2.201; = p0098*(1+p0626*p0230/100)
- p2318: 9.12983e-5; = p2224*p2185
- p2330: 1.4026e-6; = p2224*p2198
- p2543: 9.96317e-5; = p2347*p1073
- p0700: 0
- p0814: 0.600863; = if(p0807=480;p0810*p0812+p0811*p0813;0)
- p2429: 0; = p2236*p2219
- p3430: 0; = p3373*p1239
- p0478: 0; = SQRT(2)*(IF((2*p0346-1)<0;-1;IF((2*p0346-1)>0;1;0))*SQRT(SQRT((2/(pi()*0.140012289)+LN(1-(2*p0346-1)^2)/2)^2-LN(1-(2*p0346-1)^2)/0.140012289)-(2/(pi()*0.140012289)+LN(1-(2*p0346-1)^2)/2)))
- p1671: 0
- p1681: 0
- p4712: 4.69003e-5; = p1951*p3481
- p2081: 0.0019
- p4795: 0; = p1828*p3482
- p5001: 5.74973e-8; = p1828*p3483
- p0818: 8.9544e8; = p0806*p0807
- p0879: 2.38914; = p0878*p0001*p0003/(p0818*p0002)
- p2025: 4.05602e-5; = p2015*p2023*p2024/(p0818*1000)
- p0852: 0; = p0847*p0851^3+p0848*p0851^2+p0849*p0851+p0850
- p2269: 0.000560886; = p2226*p2215
- p1008: 0; = p1004*p0001*p0004/(p0818*p0002)
- p2519: 6.09279e-5; = p2323*p1014
- p3035: 1.56519e-5; = p2254*p1023
- p2707: 3.21331e-5; = p2316*(p1019+p1021)
- p3456: 0; = p3380*p1240
- p2764: 0.00020372; = p2373*(p1019+p1021)
- p0033: 37.494
- p0392: 0.5
- p1725: 0
- p3228: 0.000930587; = p3224*p1229
- p3421: 0; = p3364*p1239
- p3129: 0; = p2348*p1082
- p1992: 3900
- p3277: 0.55
- p2706: 0.000146384; = p2315*(p1019+p1021)
- p0692: 55.973; = p0032*(1+p0560*p0164/100)
- p0708: 15.355; = p0048*(1+p0576*p0180/100)
- p0315: 0.5
- p2027: 0.428799
- p2344: 1.64611e-6; = p2228*p2212
- p0260: 46.07
- p0822: 0.916
- p1233: 0; = p1232*p0001/(p0818*p0002)
- p1080: 0; = IF(p1071=0;IF(p1073+p1078+p1079=1;0;IF(p1073+p1078+p1079+p1076>1;1-(p1073+p1078+p1079);p1076));0)
- p2338: 0.000180159; = p2228*p2206
- p1025: 0; = IF(p1012=0;p1019*(p0704/100)*p0703*1000;0)
- p1166: 3.15558e-6; = p1164/p0818
- p2380: 0.000168376; = p2229*p2209
- p1980: 3521.6
- p0741: 3.608; = p0081*(1+p0609*p0213/100)
- p0813: 1.56522; = if(p0807=480;1.56521739130435;0)
- p3372: 0; = if(p1232=0;p3245*p3360/p0818;0)
- p1789: 0
- p2745: 0.00424983; = p2354*(p1019+p1021)
- p1079: 0.12036; = IF(p1071=0;IF(p1073+p1078=1;0;IF(p1073+p1078+p1075>1;1-(p1073+p1078);p1075));0)
- p3468: 0; = p3373*p1241
- p4672: 6.60513e-5; = p1911*p3481
- p4054: 1.77215e-5; = p1911*p3478
- p1838: 0
- p2121: 0.822447
- p0249: 23.043
- p2467: 0.000278212; = p2271*p1073
- p4066: 6.29165e-7; = p1923*p3478
- p2133: 6.52209e-6; = p2015*p2061*p2095/(p0818*1000)
- p1695: 0.8025
- p0429: 0; = SQRT(2)*(IF((2*p0297-1)<0;-1;IF((2*p0297-1)>0;1;0))*SQRT(SQRT((2/(pi()*0.140012289)+LN(1-(2*p0297-1)^2)/2)^2-LN(1-(2*p0297-1)^2)/0.140012289)-(2/(pi()*0.140012289)+LN(1-(2*p0297-1)^2)/2)))
- p0748: 12.863; = p0088*(1+p0616*p0220/100)
- p1158: 0.0680199; = p1156*p1157
- p0277: 0.5
- p2090: 0.40001
- p2089: 0.40001
- p2971: 5.42968e-6; = p2385*(p1079+p1081)
- p4735: 0; = p1768*p3482
- p0934: 0.000526166; = p0928*p0001/(p0818*p0002)
- p3654: 5.07408e-7; = p1923*p3476
- p1706: 0
- p2267: 5.45145e-5; = p2226*p2213
- p3177: 0; = p2396*p1023
- p2921: 4.84821e-5; = p2335*(p1020+p1022)
- p2800: 0; = p2409*(p1019+p1021)
- p3451: 0; = p3375*p1240
- p5278: 3.23939e-7; = p1899*p3484
- p1815: 0
- p3224: 0.501945; = IF(p3216=0;0;1-p3221-p3222-p3223)
- p1207: 279.259; = if(p1193>0;0;(p1194*p1050/p1057+p1195*p1051/p1058+p1196*p1052/p1059+p1197*p1053/p1060+p1198*p1054/p1061+p1199*p1055/p1062+p1200*p1056/p1063)/(p0702*1000)+(p1201*p1109/p1114+p1202*p1110/p1115)/(p0702*1000)+p1203*p1170/p0801+p1204*p1176/p0801)
- p2647: 1.02342e-5; = p2256*(p1019+p1021)
- p3404: 0.0482417; = p3366*p1238
- p3155: 0.000220393; = p2374*p1023
- p1699: 0.762907
- p3090: 0; = p2309*p1082
- p3596: 3.38272e-7; = p1865*p3476
- p2110: 0.856281
- p2897: 0; = p2311*(p1129+p1131)
- p0370: 0.5
- p3048: 0; = p2267*p1082
- p0980: 0; = IF(p0977=0;0;p0977*p0001/(p0818*p0002))
- p1897: 0
- p0374: 0.5
- p1635: 0
- p3234: 0.39606; = 1-p3233
- p0973: 9.76534e6; = p0967+p0968+p0969
- p0106: 57.607
- p1052: 5.07237e6; = IF(p1012=0;p1045*p1036;0)
- p4760: 0; = p1793*p3482
- p3017: 0; = p2431*(p1129+p1131)
- p1963c: 0.000142574; = p1588*p1792+p1589*p1793+p1590*p1794+p1591*p1795+p1592*p1796+p1593*p1797+p1594*p1798+p1595*p1799+p1596*p1800+p1597*p1801+p1598*p1802+p1599*p1803+p1600*p1804+p1601*p1805+p1602*p1806+p1603*p1807+p1604*p1808+p1605*p1809+p1606*p1810+p1607*p1811
- p0917: 3.50704; = ((p0825+p0827+((p0830+p0895)+p0814*p0818))/p0818)-(p0900+p0905+p0910+p0915)
- p3297: 0; = if(p1273+p1274+p1275+p1276=0;0;p1273/(p1273+p1274+p1275+p1276))
- p2685: 0.00024405; = p2294*(p1019+p1021)
- p1014: 0.73942; = IF(p1012=0;p0705/100;0)
- p3071: 6.19804e-8; = p2290*p1023
- p0901: 0.01746
- p0678: 0
- p2363: 0.000601583; = p2225*p2191
- p1103: 0.575709; = IF(p1071=0;IF(p1096+p1101+p1102=1;0;IF(p1096+p1101+p1102+p1099>1;1-(p1096+p1101+p1102);p1099));0)
- p1174: 2.08072e-7; = p1170*p1173/p0818
- p0781: 17.531; = p0121*(1+p0649*p0253/100)
- p1074: 0.31707; = IF(p1071=0;p0712/100;0)
- p0378: 0.5
- p2929: 0.000119205; = p2343*(p1079+p1081)
- p1943: 0
- p4163: 9.32294e-6; = p1814*p3479
- p2591: 0; = p2395*p1014
- p1579: 0
- p0164: 11.093
- p2594: 0; = p2398*p1014
- p0290: 0.5
- p0570: 0; = IF(p0306<0.5;-SQRT(p0007*EXP(p0438^2*p0008)-p0007);SQRT(p0007*EXP(p0438^2*p0008)-p0007))
- p1836: 0
- p1951: 0.000134012; = p1543*1000/p0818
- p1728: 0
- p2343: 0.000990406; = p2228*p2211
- p1898: 0
- p0884: 56.847; = IF(p0689=100;0;IF(p0689+p0688>100;100-p0689;p0688))
- p0003: 10000
- p1903: 9.26919e-5; = p1495*1000/p0818
- p2753: 0.000367326; = p2362*(p1019+p1021)
- p4997: 1.49493e-6; = p1824*p3483
- p2333: 0.000317525; = p2224*p2201
- p0777: 36.603; = p0117*(1+p0645*p0249/100)
- p2822: 0; = p2431*(p1128+p1130)
- p5203: 1.91419e-7; = p1824*p3484
- p2135: 1.32302e-5; = p2015*p2063*p2097/(p0818*1000)
- p3293: 0.3875
- p4250: 1.72965e-5; = p1901*p3479
- p0649: 0; = IF(p0385<0.5;-SQRT(p0007*EXP(p0517^2*p0008)-p0007);SQRT(p0007*EXP(p0517^2*p0008)-p0007))
- p1788: 1.11677e-6; = p1380*1000/p0818
- p0669: 0.568; = p0009*(1+p0537*p0141/100)
- p0923: 0; = IF(p0918=1;0;IF(p0918+p0919>1;1-p0918;p0919))
- p2177: 0.286575; = p0895/p0818-(p2173+p2174+p2175+p2176)
- p0128: 29.817
- p0734: 0
- p2291: 7.02077e-6; = p2223*p2198
- p2395: 0; = p2234*p2184
- p2435: 2.85846e-5; = p2239*p1014
- p0220: 26.754
- p1559: 0
- p1010: 3.00544e7; = p0890
- p1675: 0.655218
- p0790: 0
- p5079: 2.2424e-6; = p1906*p3483
- p1175: 0.000317372
- p1959: 4671.29; = if(p0738*p0740*p0739>0;p0738*1000*(p0740/100)*p0739/1000;p1958)
- p3248: 0.84
- p1307: 0
- p1169: 0.000532333
- p0827: 1.2461e9; = p0818*p0819*p0823
- p1954: 0
- p0963: 0.000171286; = if(and(p0683>0;or(p0807=480;p0807=32;p0807=1;and(p0807=60;p0901<0.03)));p0939;0)
- p1239: 0; = if(p1232>0;0;IF(p1234+p1238=1;0;IF(p1234+p1238+p1236>1;1-(p1234+p1238);p1236)))
- p3280: 0.375
- p0812: 0.279412; = if(p0807=480;0.095/0.34;0)
- p0670: 50.516; = p0010*(1+p0538*p0142/100)
- p1238: 0.53827; = if(p1232>0;0;IF(p1234=1;0;IF(p1234+p1235>1;1-p1234;p1235)))
- p0083: 1.325
- p1288: 0
- p1713: 0
- p1582: 0
- p0896: 0.516338
- p1738: 0.54188
- p1558: 0
- p0586: 0; = IF(p0322<0.5;-SQRT(p0007*EXP(p0454^2*p0008)-p0007);SQRT(p0007*EXP(p0454^2*p0008)-p0007))
- p0476: 0; = SQRT(2)*(IF((2*p0344-1)<0;-1;IF((2*p0344-1)>0;1;0))*SQRT(SQRT((2/(pi()*0.140012289)+LN(1-(2*p0344-1)^2)/2)^2-LN(1-(2*p0344-1)^2)/0.140012289)-(2/(pi()*0.140012289)+LN(1-(2*p0344-1)^2)/2)))
- p1863: 0
- p0683: 13.938; = p0023*(1+p0551*p0155/100)
- p2196: 0.0671289; = p1068-p2193-p2195
- p2938: 0; = p2352*(p1129+p1131)
- p2105: 0.888194
- p2595: 0; = p2399*p1014
- p3178: 0; = p2397*p1023
- p1258: 0; = if(p1232>0;0;IF(p1253+p1256+p1257=1;0;1-(p1253+p1256+p1257)))
- p5285: 2.87128e-7; = p1906*p3484
- p0727: 53.827; = p0067*(1+p0595*p0199/100)
- p1827: 0
- p0037: 36.737
- p3014: 0; = p2428*(p1129+p1131)
- p2188: 0.0104295; = p1066-p2186-p2187
- p1033: 9.95216e-5; = IF(p1012=0;p1027*p0001/(p0818*p0002);0)
- p3165: 0; = p2384*p1082
- p1252: 1.67896e9; = if(p1232>0;0;p0724*2000*p0723*1000*p0725/100)
- p0876: 105073; = p0866*p0856
- p1711: 0
- p2449: 3.3256e-6; = p2253*p1014
- p2982: 0; = p2396*(p1020+p1022)
- p1989: 50
- p2174: 0.00954737; = p0895*p0903/p0818
- p2567: 0.015899; = p2371*p1014
- p0347: 0.5
- p2913: 1.72193e-5; = p2327*(p1020+p1022)
- p1282: 0; = IF(p1277+p1280+p1281=p1260;0;p1260-(p1277+p1280+p1281))
- p0676: 0
- p3117: 0; = p2336*p1082
- p1340: 0; = p1325*p0801
- p2139: 4.54728e-6; = p2015*p2067*p2101/(p0818*1000)
- p3673: 3.12902e-6; = p1942*p3476
- p2073: 0.377647
- p2939: 0; = p2353*(p1129+p1131)
- p2307: 0.000147935; = p2227*p2214
- p2487: 5.1913e-6; = p2291*p1014
- p0753: 0
- p0988: 1.9181e8; = p0982*p0886
- p2974: 1.80661e-5; = p2388*(p1079+p1081)
- p1287: 0
- p0806: 1.8655e6; = p0804+p0805
- p1722: 0
- p3461: 0.00530124; = p3366*p1241
- p1519: 118
- p1385: 134
- p1793: 0.000149647; = p1385*1000/p0818
- p2265: 0.00313666; = p2226*p2211
- p4684: 2.34502e-6; = p1923*p3481
- p2844: 0.000234482; = p2258*(p1079+p1081)
- p2205: 0.00460682; = 2*14.0067*p2204/30.973762
- p1097: 0.0439224
- p0494: 0; = SQRT(2)*(IF((2*p0362-1)<0;-1;IF((2*p0362-1)>0;1;0))*SQRT(SQRT((2/(pi()*0.140012289)+LN(1-(2*p0362-1)^2)/2)^2-LN(1-(2*p0362-1)^2)/0.140012289)-(2/(pi()*0.140012289)+LN(1-(2*p0362-1)^2)/2)))
- p4755: 0; = p1788*p3482
- p1837: 0
- p1551: 0
- p3015: 0; = p2429*(p1129+p1131)
- p1083: 184752; = IF(p1071=0;p1073*(p0710/100)*p0703*1000;0)
- p3212: 0; = p2431*p1132
- p0368: 0.5
- p2846: 6.86739e-5; = p2260*(p1079+p1081)
- p0021: 163.241
- p0773: 46.9; = p0113*(1+p0641*p0245/100)
- p2527: 2.2802e-6; = p2331*p1014
- p2426: 0; = p2235*p2216
- p2279: 0.000456997; = p2223*p2185
- p1894: 0
- p2896: 5.92439e-5; = p2310*(p1079+p1081)
- p1651: 0.299611
- p1920: 0
- p2569: 0.000981015; = p2373*p1014
- p3563: 3.31507e-5; = p1832*p3476
- p2991: 0; = p2405*(p1020+p1022)
- p1885: 0
- p2708: 4.06999e-6; = p2317*(p1019+p1021)
- p3215: 0.450791; = p1222*3*15.9994/100.0869
- p3472: 0.00027666; = p3377*p1241
- p3610: 1.94506e-6; = p1879*p3476
- p2845: 0.000212071; = p2259*(p1079+p1081)
- p0510: 0; = SQRT(2)*(IF((2*p0378-1)<0;-1;IF((2*p0378-1)>0;1;0))*SQRT(SQRT((2/(pi()*0.140012289)+LN(1-(2*p0378-1)^2)/2)^2-LN(1-(2*p0378-1)^2)/0.140012289)-(2/(pi()*0.140012289)+LN(1-(2*p0378-1)^2)/2)))
- p2723: 0.000113724; = p2332*(p1019+p1021)
- p2436: 9.84581e-5; = p2240*p1014
- p0778: 32.124; = p0118*(1+p0646*p0250/100)
- p4719: 0.000340922; = p1962*p3481
- p0695: 0
- p2871: 9.59839e-6; = p2285*(p1020+p1022)
- p1886: 0
- p0012: 288.368
- p1929: 0
- p0611: 0; = IF(p0347<0.5;-SQRT(p0007*EXP(p0479^2*p0008)-p0007);SQRT(p0007*EXP(p0479^2*p0008)-p0007))
- p0667: 0; = IF(p0403<0.5;-SQRT(p0007*EXP(p0535^2*p0008)-p0007);SQRT(p0007*EXP(p0535^2*p0008)-p0007))
- p3235: 0.118093
- p3169: 0; = p2388*p1082
- p1690: 0
- p1983: 50
- p0300: 0.5
- p1278: 0.42243
- p2171: 0.207692; = p2165*p0831
- p3888: 4.0342e-5; = p1951*p3477
- p1689: 0.2666
- p2224: 0.0274002; = if(p0765*p0769+p0766*p0770+p0767*p0771+p0768*p0772=0;0;p0771*p0767/(p0765*p0769+p0766*p0770+p0767*p0771+p0768*p0772))
- p2166: 1.29189; = p2165*p0824
- p2026: 73.06
- p2907: 2.64453e-5; = p2321*(p1020+p1022)
- p1458: 21
- p4249: 8.58692e-7; = p1900*p3479
- p4589: 3.90836e-7; = p1828*p3481
- p0735: 0
- p2615: 0; = p2419*p1073
- p1861: 0
- p2529: 0.000234785; = p2333*p1014
- p0056: 25.258
- p3971: 1.04861e-7; = p1828*p3478
- p1942: 4.13205e-5; = p1534*1000/p0818
- p1054: 2.83675e7; = IF(p1012=0;p1047*p1036;0)
- p0248: 17.421
- p0808: 680000
- p3072: 1.01731e-7; = p2291*p1023
- p3406: 0; = p3368*p1238
- p2051: 0.000401596; = p2015*p2049*p2050/(p0818*1000)
- p2709: 1.40188e-5; = p2318*(p1019+p1021)
- p3425: 0; = p3368*p1239
- p1203: 3
- p2225: 0.795484; = if(p0765*p0769+p0766*p0770+p0767*p0771+p0768*p0772=0;0;p0772*p0768/(p0765*p0769+p0766*p0770+p0767*p0771+p0768*p0772))
- p0601: 0; = IF(p0337<0.5;-SQRT(p0007*EXP(p0469^2*p0008)-p0007);SQRT(p0007*EXP(p0469^2*p0008)-p0007))
- p4583: 6.64421e-6; = p1822*p3481
- p2853: 6.56136e-6; = p2267*(p1079+p1081)
- p0996: 0.963699; = if(p0888=0;0;if((p0691*p0690*1000*p0692/100)/p0888>1;1;(p0691*p0690*1000*p0692/100)/p0888))
- p3110: 1.23824e-8; = p2329*p1023
- p2302: 0.000552155; = p2227*p2209
- p2406: 0; = p2234*p2196
- p3196: 0; = p2415*p1082
- p0197: 29.17
- p3400: 0.0382952; = p3362*p1238
- p2738: 5.61534e-5; = p2347*(p1078+p1080)
- p2952: 0.000499911; = p2366*(p1020+p1022)
- p3957: 7.96942e-6; = p1814*p3478
- p0490: 0; = SQRT(2)*(IF((2*p0358-1)<0;-1;IF((2*p0358-1)>0;1;0))*SQRT(SQRT((2/(pi()*0.140012289)+LN(1-(2*p0358-1)^2)/2)^2-LN(1-(2*p0358-1)^2)/0.140012289)-(2/(pi()*0.140012289)+LN(1-(2*p0358-1)^2)/2)))
- p2378: 0.00143788; = p2229*p2207
- p0761: 0
- p2127: 3.67399e-5; = p2015*p2055*p2089/(p0818*1000)
- p0453: 0; = SQRT(2)*(IF((2*p0321-1)<0;-1;IF((2*p0321-1)>0;1;0))*SQRT(SQRT((2/(pi()*0.140012289)+LN(1-(2*p0321-1)^2)/2)^2-LN(1-(2*p0321-1)^2)/0.140012289)-(2/(pi()*0.140012289)+LN(1-(2*p0321-1)^2)/2)))
- p3843: 1.31111e-5; = p1906*p3477
- p3054: 0.000979574; = p2273*p1132
- p1665: 0
- p4316: 3.83739e-8; = p1761*p3480
- p1963a: 0.000246062; = p1550*p1754+p1551*p1755+p1552*p1756+p1553*p1757+p1554*p1758+p1555*p1759+p1556*p1760+p1557*p1761+p1558*p1762+p1559*p1763+p1560*p1764+p1561*p1765+p1562*p1766+p1563*p1767+p1564*p1768+p1565*p1769+p1566*p1770+p1567*p1771+p1568*p1772
- p1732: 0
- p2086: 0.0617647
- p2711: 3.43011e-6; = p2320*(p1019+p1021)
- p1606: 0
- p5234: 2.4001e-6; = p1855*p3484
- p1956: 0
- p0364: 0.5
- p3202: 0; = p2421*p1082
- p0986: 0; = IF(p0982+p0985=1;0;IF(p0982+p0985+p0984>1;1-(p0982+p0985);p0984))
- p3632: 1.19241e-5; = p1901*p3476
- p2231: 0.568391; = if(p0783*p0787+p0784*p0788+p0785*p0789+p0786*p0790=0;0;p0788*p0784/(p0783*p0787+p0784*p0788+p0785*p0789+p0786*p0790))
- p1667: 0
- p2195: 0.00679096; = p2194*p2193
- p2909: 7.62526e-6; = p2323*(p1020+p1022)
- p1842: 0
- p2290: 4.27746e-6; = p2223*p2197
- p2821: 0; = p2430*(p1128+p1130)
- p2662: 0.000156803; = p2271*(p1078+p1080)
- p3108: 2.69621e-6; = p2327*p1023
- p1133: 120579; = if(p1121=0;p1123*(p0716/100)*p0703*1000;0)
- p0945: 0; = if(and(p0683=0;p0951=0);p0939;0)
- p0707: 0
- p2832: 2.7967e-6; = p2246*(p1020+p1022)
- p1705: 0
- p2926: 4.66214e-5; = p2340*(p1079+p1081)
- p1849: 0
- p3062: 1.62023e-6; = p2281*p1023
- p1533: 4
- p4961: 5.74973e-8; = p1788*p3483
- p1075: 0.12036; = IF(p1071=0;p0713/100;0)
- p0889: 75196.5; = 1000*p0888*p0001*p0003*p0004/(p0818*p0002)
- p3020: 5.60156e-7; = p2239*p1023
- p1060: 0.21
- p1919: 0
- p0230: 55.333
- p3399: 0.634066; = p3380*p1234
- p3429: 0; = p3372*p1239
- p5244: 2.9449e-8; = p1865*p3484
- p1082: 0; = IF(p1071=0;IF(p1073+p1078+p1079+p1080+p1081=1;0;1-(p1073+p1078+p1079+p1080+p1081));0)
- p3095: 0.000178168; = p2314*p1132
- p3911: 2.64249e-5; = p1768*p3478
- p2015: 1.47003e7; = p0830*p2011*p2013
- p2303: 0.000238403; = p2227*p2210
- p2644: 6.90604e-7; = p2253*(p1019+p1021)
- p2324: 2.07214e-5; = p2224*p2191
- p0865: 0.411954; = IF(p0858+p0864=1;0;IF(p0858+p0864+p0860>1;1-(p0858+p0864);p0860))
- p2283: 0.000360338; = p2223*p2189
- p1707: 0.356204
- p4616: 0.000127413; = p1855*p3481
- p1857: 0
- p1880: 0
- p0772: 130.042; = p0112*(1+p0640*p0244/100)
- p1855: 0.000364067; = p1447*1000/p0818
- p0922: 0; = p0677*1000/p0801
- p0217: 15.807
- p3056: 0.000135292; = p2275*p1132
- p1969: 0; = p0803
- p1157: 0.215506
- p1672: 0
- p1775: 0
- p2725: 7.01709e-6; = p2334*(p1019+p1021)
- p2931: 2.07176e-6; = p2345*(p1079+p1081)
- p2558: 0.00176886; = p2362*p1014
- p4379: 3.32574e-7; = p1824*p3480
- p3427: 0; = p3370*p1239
- p2391: 0; = p2233*p2220
- p3907: 1.36319e-6; = p1764*p3478
- p2837: 1.15335e-7; = p2251*(p1020+p1022)
- p3792: 0.000109596; = p1855*p3477
- p3483: 0.0514854; = if(p1328+p1330+p1332+p1334+p1336+p1338+p1340+p1342+p1344=0;0;p1342/(p1328+p1330+p1332+p1334+p1336+p1338+p1340+p1342+p1344))
- p2899: 0; = p2313*(p1129+p1131)
- p1600: 0.895638
- p4049: 4.08957e-6; = p1906*p3478
- p1210: 0.18
- p2060: 0.272353
- p0900: 2.40205; = p0899/p0818
- p2681: 6.56804e-7; = p2290*(p1019+p1021)
- p0391: 0.5
- p2666: 0.000197079; = p2275*(p1128+p1130)
- p2101: 0.620397
- p1561: 0
- p1754: 0
- p1615: 0
- p1199: -0.29
- p0053: 12.036
- p0254: 28.237
- p0559: 0; = IF(p0295<0.5;-SQRT(p0007*EXP(p0427^2*p0008)-p0007);SQRT(p0007*EXP(p0427^2*p0008)-p0007))
- p1044: 0.00941074; = IF(p1012=0;IF(p1037=1;0;IF(p1037+p1038>1;1-p1037;p1038));0)
- p1963i: 0.000217285; = p1706*p1910+p1707*p1911+p1708*p1912+p1709*p1913+p1710*p1914+p1711*p1915+p1712*p1916+p1713*p1917+p1714*p1918+p1715*p1919+p1716*p1920+p1717*p1921+p1718*p1922+p1719*p1923+p1720*p1924+p1721*p1925+p1722*p1926+p1723*p1927+p1724*p1928
- p2774: 5.01706e-7; = p2383*(p1078+p1080)
- p3481: 0.34997; = if(p1328+p1330+p1332+p1334+p1336+p1338+p1340+p1342+p1344=0;0;p1338/(p1328+p1330+p1332+p1334+p1336+p1338+p1340+p1342+p1344))
- p3272: 0.0398246
- p0571: 0; = IF(p0307<0.5;-SQRT(p0007*EXP(p0439^2*p0008)-p0007);SQRT(p0007*EXP(p0439^2*p0008)-p0007))
- p2064: 0.676706
- p0594: 0; = IF(p0330<0.5;-SQRT(p0007*EXP(p0462^2*p0008)-p0007);SQRT(p0007*EXP(p0462^2*p0008)-p0007))
- p0337: 0.5
- p0387: 0.5
- p0111: 8.887
- p4152: 8.58692e-7; = p1803*p3479
- p0543: 0; = IF(p0279<0.5;-SQRT(p0007*EXP(p0411^2*p0008)-p0007);SQRT(p0007*EXP(p0411^2*p0008)-p0007))
- p2933: 2.13159e-5; = p2347*(p1079+p1081)
- p0058: 18.87
- p2366: 0.0054021; = p2225*p2195
- p3271: 0.0195489
- p3114: 4.60094e-6; = p2333*p1023
- p0854: 328769; = p0801*((1-p0853)*p0846+p0853*p0852)
- p5076: 4.77228e-6; = p1903*p3483
- p2876: 3.95836e-7; = p2290*(p1020+p1022)
- p2046: 10
- p3393: 0.00886898; = p3374*p1234
- p0666: 0; = IF(p0402<0.5;-SQRT(p0007*EXP(p0534^2*p0008)-p0007);SQRT(p0007*EXP(p0534^2*p0008)-p0007))
- p2256: 6.66507e-5; = p2222*p2202
- p2788: 0; = p2397*(p1019+p1021)
- p1572: 0
- p3135: 0.000401042; = p2354*p1023
- p2403: 0; = p2234*p2192
- p0636: 0; = IF(p0372<0.5;-SQRT(p0007*EXP(p0504^2*p0008)-p0007);SQRT(p0007*EXP(p0504^2*p0008)-p0007))
- p3354: 1.08388e7; = IF((p3350+p3351+p3352+p3353)+IF(p3349=0;0;(p3256*(p3273*(1-p3277))/p3349))>p3256;p3256-(p3350+p3351+p3352+p3353);IF(p3349=0;0;p3256*(p3273*(1-p3277))/p3349))
- p0835: 0.000258918; = -LN(1-p0669/100)/p0834
- p1188: 227.861; = p1187*p0801
- p2948: 0.000221377; = p2362*(p1020+p1022)
- p0792: 0
- p4565: 7.81672e-7; = p1804*p3481
- p2748: 0.000406995; = p2357*(p1019+p1021)
- p4934: 1.72492e-7; = p1761*p3483
- p2353: 0; = p2232*p2221
- p1856: 0
- p3998: 3.41846e-5; = p1855*p3478
- p1644: 0
- p0147: 0
- p2061: 0.518824
- p4458: 1.06168e-6; = p1903*p3480
- p1280: 0.42243; = IF(p1277=p1263;0;IF(p1277+p1278>p1263;p1263-p1277;p1278))
- p1813: 0
- p0810: 0.75
- p4908: 0; = p1941*p3482
- p3102: 4.14083e-6; = p2321*p1023
- p1935: 0
- p3179: 0; = p2398*p1023
- p2817: 0; = p2426*(p1078+p1080)
- p4626: 1.56334e-6; = p1865*p3481
- p0935: 0; = p0929*p0001/(p0818*p0002)
- p1151: 1.24689e6; = if(p1121=0;p1149*p1148*p1145;0)
- p0651: 0; = IF(p0387<0.5;-SQRT(p0007*EXP(p0519^2*p0008)-p0007);SQRT(p0007*EXP(p0519^2*p0008)-p0007))
- p1126: 0; = if(p1121=0;p0720/100;0)
- p0219: 15.317
- p2759: 3.80945e-6; = p2368*(p1019+p1021)
- p2370: 8.95279e-5; = p2225*p2199
- p1154: 0.0299531; = if(p1152*p0818=0;0;p1150/(p1152*p0818))
- p0004: 0.0254
- p2831: 1.11212e-5; = p2245*(p1020+p1022)
- p3019: 4.42252e-6; = p2238*p1023
- p3269: 0.851786
- p0135: 141.498
- p0112: 130.042
- p0422: 0; = SQRT(2)*(IF((2*p0290-1)<0;-1;IF((2*p0290-1)>0;1;0))*SQRT(SQRT((2/(pi()*0.140012289)+LN(1-(2*p0290-1)^2)/2)^2-LN(1-(2*p0290-1)^2)/0.140012289)-(2/(pi()*0.140012289)+LN(1-(2*p0290-1)^2)/2)))
- p2979: 0; = p2393*(p1020+p1022)
- p4478: 7.67478e-8; = p1923*p3480
- p1309: 0
- p3098: 3.84071e-7; = p2317*p1023
- p2468: 0.00365838; = p2272*p1123
- p0802: 694000
- p2687: 0.000402672; = p2296*(p1019+p1021)
- p3878: 1.34473e-6; = p1941*p3477
- p1585: 0
- p3162: 0; = p2381*p1082
- p2650: 0.000558668; = p2259*(p1078+p1080)
- p0181: 41.797
- p2481: 7.66938e-5; = p2285*p1014
- p1059: 0.335
- p1294: 0; = p1290*p1252/p0818
- p3255: 1.28812e8; = p1252*(p1297*(1-p3247)+p1300*(1-p3248)+p1301*(1-p3249)+p1302*(1-p3250))
- p2634: 6.3998e-5; = p2243*(p1019+p1021)
- p1978: 217
- p2678: 0.000667174; = p2287*(p1019+p1021)
- p2448: 1.5126e-6; = p2252*p1014
- p1218: 0.5
- p5290: 1.24422e-6; = p1911*p3484
- p4683: 1.17251e-6; = p1922*p3481
- p1584: 0.886972
- p1269: 0
- p2568: 0.00681627; = p2372*p1014
- p4271: 3.68011e-7; = p1922*p3479
- p2997: 0; = p2411*(p1020+p1022)
- p2308: 0.000558261; = p2227*p2215
- p3243: 1.31766e-9; = p3234*p1188*p3239/p0818
- p3333: 3.49154e7; = if(and(p1232=0;p3255<>0);p3255-(p3328+p3329+p3330+p3331+p3332);0)
- p3130: 0; = p2349*p1082
- p1602: 0
- p2963: 2.08437e-5; = p2377*(p1079+p1081)
- p3299: 0; = if(p1303+p1304+p1305+p1306=0;0;p1303/(p1303+p1304+p1305+p1306))
- p1938: 0
- p2381: 7.26994e-5; = p2229*p2210
- p2486: 3.16284e-6; = p2290*p1014
- p2458: 0.000690134; = p2262*p1073
- p2614: 0; = p2418*p1073
- p2492: 0.00193907; = p2296*p1014
- p5140: 2.20868e-8; = p1761*p3484
- p1155: 0.00381228; = if(p1153*p0818=0;0;p1151/(p1153*p0818))
- p1048: 0.0003034; = IF(p1012=0;IF(p1037+p1044+p1045+p1046+p1047=1;0;IF(p1037+p1044+p1045+p1046+p1047+p1042>1;1-(p1037+p1044+p1045+p1046+p1047);p1042));0)
- p1312: 0; = IF(p1307+p1310+p1311=p1266;0;p1266-(p1307+p1310+p1311))
- p3273: 0.753577
- p4497: 4.73278e-7; = p1942*p3480
- p0819: 1.51881; = p0808*p0809/p0818
- p1222: 0.94
- p3026: 1.74137e-6; = p2245*p1023
- p3029: 1.83444e-5; = p2248*p1023
- p2043: 0.636483
- p1115: 0.237849
- p0659: 0; = IF(p0395<0.5;-SQRT(p0007*EXP(p0527^2*p0008)-p0007);SQRT(p0007*EXP(p0527^2*p0008)-p0007))
- p2230: 0.431609; = if(p0783*p0787+p0784*p0788+p0785*p0789+p0786*p0790=0;0;p0787*p0783/(p0783*p0787+p0784*p0788+p0785*p0789+p0786*p0790))
- p3256: 2.63421e7; = p1252*(p1307*(1-p3247)+p1310*(1-p3248)+p1311*(1-p3249)+p1312*(1-p3250))
- p1206: 0.00953
- p3275: 0.0214527
- p2359: 0.000648538; = p2225*p2187
- p2651: 0.000180911; = p2260*(p1078+p1080)
- p2584: 8.44419e-5; = p2388*p1073
- p2691: 0.00149506; = p2300*(p1078+p1080)
- p2509: 0.000539601; = p2313*p1123
- p1823: 0
- p2203: 0.0191204; = p1070-p2200-p2201-p2202
- p2790: 0; = p2399*(p1019+p1021)
- p2648: 0.000117327; = p2257*(p1019+p1021)
- p1005: 1.07863e7; = p1001*p0888
- p3437: 0; = p3380*p1239
- p1587: 0
- p1712: 0
- p2746: 0.00093289; = p2355*(p1019+p1021)
- p3445: 0; = p3369*p1240
- p0086: 8.098
- p0964: 0; = 56/90000

## Reference product
- cotton lint; at harvest in 2003; at farm; 90%-93% moisture: 1 kg

## Inputs from technosphere
- CUTOFF sewage sludge storage: 1.27234e-7 kg*a; = p1192
- CUTOFF apply sulfuric acid; unspecified method: 0.000697452 ha; = p1177
- CUTOFF nitrogenous fertilizer, nitrogen solutions; at point-of-sale: 0.1056 kg; = p1068
- CUTOFF pesticide, Tebufenozide; at point-of-sale; kg AI: 7.81739e-6 kg; = p1937
- CUTOFF irrigate; unspecified irrigation method, surface water source, in 2003: 0.000272974 ha-m; = p1009
- CUTOFF pesticide, Chlorpyrifos; at point-of-sale; kg AI: 0.000149647 kg; = p1793
- CUTOFF sewage sludge; at point-of-sale: 2.54468e-7 kg; = p1190
- CUTOFF pesticide, Abamectin; at point-of-sale; kg AI: 3.35031e-6 kg; = p1761
- CUTOFF pesticide, Oxamyl; at point-of-sale; kg AI: 4.91379e-5 kg; = p1899
- CUTOFF zinc compounds; at point-of-sale: 9.17032e-8 kg; = p1184
- CUTOFF apply liming materials; unspecified method: 0.000697452 ha; = p1227
- CUTOFF apply mixed N fertilizer; with incorporation: 9.95216e-5 ha; = p1033
- CUTOFF potassic fertilizer, other single nutrients; at point-of-sale: 0.00381228 kg; = p1155
- CUTOFF nitrogenous fertilizer, anhydrous ammonia; at point-of-sale: 0.0424303 kg; = p1064
- CUTOFF pesticide, unspecified type; at point-of-sale; kg AI: 0.000974147 kg; = p1962
- CUTOFF irrigate; unspecified irrigation method, groundwater source, in 2003: 9.3373e-5 ha-m; = p0995
- CUTOFF pesticide, Ethephon; at point-of-sale; kg AI: 0.000437774 kg; = p1832
- CUTOFF apply pesticide; broadcast by air: 0.00142533 ha; = p1331
- CUTOFF apply N fertilizer; no broadcast application: 0.000479246 ha; = p1030
- CUTOFF nitrogenous fertilizer, ammonium sulfate; at point-of-sale: 0.0125108 kg; = p1067
- CUTOFF apply P fertilizer; broadcast without incorporation: 3.93832e-5 ha; = p1091
- CUTOFF pesticide, 1,1-Dimethylpiperidinium chloride; at point-of-sale; kg AI: 2.56857e-5 kg; = p1879
- CUTOFF international vessel transport; average fuel: 1.04557 metric ton*km; = p2006
- CUTOFF nitrogenous fertilizer, urea; at point-of-sale: 0.0594067 kg; = p1070
- CUTOFF pesticide, Sodium chlorate; at point-of-sale; kg AI: 0.000759403 kg; = p1930
- CUTOFF apply K fertilizer; broadcast with incorporation: 3.32527e-5 ha; = p1140
- CUTOFF pesticide, Thiamethoxam; at point-of-sale; kg AI: 4.46708e-6 kg; = p1941
- CUTOFF pesticide, Indoxacarb; at point-of-sale; kg AI: 2.34522e-5 kg; = p1866
- CUTOFF apply zinc compounds; unspecified method: 0.000697452 ha; = p1183
- CUTOFF prepare soil; for conventional till, cotton; <15% residue: 0.000526166 ha; = p0934
- CUTOFF fertilizer filler materials; at point-of-sale: 0.0680199 kg; = p1158
- CUTOFF harvest; cotton, stripper harvested: 0.000172868 ha; = p1973
- CUTOFF apply pesticide; broadcast without incorporation: 0.000520089 ha; = p1335
- CUTOFF seed storage; cotton: 0.00545282 kg*a; = p0975
- CUTOFF apply manure; broadcast without incorporation: 6.84538e-5 ha; = p1248
- CUTOFF pesticide, Paraquat dichloride; at point-of-sale; kg AI: 0.000157464 kg; = p1901
- CUTOFF phosphatic fertilizer, superphosphate grades over 22%; at point-of-sale: 0.0018551 kg; = p1117
- CUTOFF fertilizer storage: 0.191825 kg*a; = p1160
- CUTOFF apply pesticide; banded or side-dressed: 0.000358546 ha; = p1329
- CUTOFF apply pesticide; as foliar or directed spray: 0.00165704 ha; = p1339
- CUTOFF potassic fertilizer, potassium chloride; at point-of-sale: 0.0299531 kg; = p1154
- CUTOFF dairy manure; from semi-solid to solid storage; at point-of-sale: 0.792059 kg; = p1284
- CUTOFF gypsum storage: 1.57779e-6 kg*a; = p1168
- CUTOFF pesticide, Thidiazuron; at point-of-sale; kg AI: 4.13205e-5 kg; = p1942
- CUTOFF phosphatic fertilizer, diammonium phosphate; at point-of-sale: 0.0235787 kg; = p1119
- CUTOFF sowing; for unspec. till, cotton: 0.000171286 ha; = p0963
- CUTOFF local area trucking; class 6, average fuel: 0.00857869 metric ton*km; = p2010
- CUTOFF dolomite, pulverized; at point-of-sale: 0.00185396 kg; = p1229
- CUTOFF apply pesticide; chiseled or injected/knifed in: 5.42317e-5 ha; = p1337
- CUTOFF pesticide, Cyclanilide; at point-of-sale; kg AI: 7.81739e-6 kg; = p1803
- CUTOFF irrigate; gravity, groundwater source, in 2003: 0.00485425 ha-m; = p0992
- CUTOFF phosphatic fertilizer, other single phosphates; at point-of-sale: 0.00143728 kg; = p1118
- CUTOFF cotton seeds; seed, unspec. type; at point-of-sale: 0.0063775 kg; = p0972
- CUTOFF pesticide, Diuron; at point-of-sale; kg AI: 2.9036e-5 kg; = p1824
- CUTOFF pesticide, Aldicarb; at point-of-sale; kg AI: 0.000281426 kg; = p1768
- CUTOFF sowing; for conventional till, cotton; <15% residue: 0.000526166 ha; = p0958
- CUTOFF domestic barge transport; average fuel: 0.114383 metric ton*km; = p2007
- CUTOFF pesticide, Urea, sulfate; at point-of-sale; kg AI: 0.000771688 kg; = p1893
- CUTOFF nitrogenous fertilizer, sodium nitrate; at point-of-sale: 0.000194922 kg; = p1069
- CUTOFF sulfur; at point-of-sale: 4.16145e-7 kg; = p1172
- CUTOFF pesticide, S-Metolachlor; at point-of-sale; kg AI: 0.000131779 kg; = p1927
- CUTOFF prepare soil; for unspec. till, cotton: 0.000171286 ha; = p0939
- CUTOFF pesticide, beta-Cyfluthrin; at point-of-sale; kg AI: 2.23354e-6 kg; = p1804
- CUTOFF pesticide, Dicofol; at point-of-sale; kg AI: 8.48745e-5 kg; = p1814
- CUTOFF pesticide, Glyphosate; at point-of-sale; kg AI: 0.000364067 kg; = p1855
- CUTOFF irrigate; unspec. irrigation method, unspec. water source, in 2003: 0.000760603 ha-m; = p1011
- CUTOFF pesticide, Pyrithiobac-sodium; at point-of-sale; kg AI: 6.70062e-6 kg; = p1923
- CUTOFF zinc compounds storage: 4.58516e-8 kg*a; = p1186
- CUTOFF apply K fertilizer; no broadcast application: 0.00012014 ha; = p1139
- CUTOFF apply single or mixed N fertilizer; unspec. method: 9.39152e-6 ha; = p1035
- CUTOFF phosphatic fertilizer, superphos. grades 22% and under; at point-of-sale: 0.000156163 kg; = p1116
- CUTOFF pesticide, Phorate; at point-of-sale; kg AI: 4.3554e-5 kg; = p1906
- CUTOFF apply pesticide; unspecified application methods: 3.1214e-5 ha; = p1345
- cotton residue; at harvest in 2003; at farm; 80%-92% moisture: 1.51864 kg; = p0839
- CUTOFF harvest; cotton, spindle picked: 0.000518605 ha; = p1972
- CUTOFF apply sulfur; unspecified method: 0.000697452 ha; = p1171
- CUTOFF pesticide, Propargite; at point-of-sale; kg AI: 0.000144063 kg; = p1913
- CUTOFF liming materials storage: 0.0360834 kg*a; = p1231
- CUTOFF sulfur storage: 2.08072e-7 kg*a; = p1174
- CUTOFF gypsum; at point-of-sale: 3.15558e-6 kg; = p1166
- CUTOFF nitrogenous fertilizer, aqueous ammonia; at point-of-sale: 0.00429939 kg; = p1065
- CUTOFF pesticide, Prometryn; at point-of-sale; kg AI: 0.000188734 kg; = p1911
- CUTOFF apply single or mixed K fertilizer; unspec. method: 2.28275e-5 ha; = p1144
- cottonseed; at harvest in 2003; at farm; 90%-93% moisture: 1.51881 kg; = p0819
- CUTOFF unspecified manure; from semi-solid to solid storage; at point-of-sale: 0.183863 kg; = p1314
- CUTOFF pesticide, Endothall; at point-of-sale; kg AI: 1.11677e-6 kg; = p1828
- CUTOFF N inhibitor appl svc; unspec rate & type, 2003 cotton: 0.000781739 ha; = p1162
- CUTOFF pesticide formulation balance; at point-of-sale: 0.00286238 kg; = p1963
- CUTOFF apply mixed N fertilizer; without incorporation: 5.99787e-5 ha; = p1034
- CUTOFF apply pesticide; in seed furrow: 0.000243773 ha; = p1343
- CUTOFF cotton seeds; GMO herbicide resistant seed; at point-of-sale: 0.00452813 kg; = p0970
- CUTOFF poultry manure; from semi-solid to solid storage; at point-of-sale: 0.899084 kg; = p1304
- CUTOFF apply manure; unspec. method: 7.52233e-6 ha; = p1251
- CUTOFF apply P fertilizer; no broadcast application: 0.00018408 ha; = p1089
- CUTOFF pesticide, Pendimethalin; at point-of-sale; kg AI: 9.26919e-5 kg; = p1903
- CUTOFF regional or national trucking; class 8, average fuel: 0.027682 metric ton*km; = p2009
- CUTOFF harvest; cotton residue management: 0.000697452 ha; = p1975
- CUTOFF pesticide, Carfentrazone-ethyl; at point-of-sale; kg AI: 1.11677e-6 kg; = p1788
- CUTOFF pesticide, Tribufos; at point-of-sale; kg AI: 0.000134012 kg; = p1951
- CUTOFF pesticide, Imidacloprid; at point-of-sale; kg AI: 4.46708e-6 kg; = p1865
- CUTOFF pesticide, Pyriproxyfen; at point-of-sale; kg AI: 3.35031e-6 kg; = p1922
- CUTOFF apply pesticide; broadcast with incorporation: 0.000444582 ha; = p1333
- CUTOFF sulfuric acid; at point-of-sale: 2.48102e-7 kg; = p1178
- CUTOFF pesticide storage: 0.00547076 kg*a; = p1965
- CUTOFF phosphatic fertilizer, monoammonium phosphate; at point-of-sale: 0.0134852 kg; = p1120
- CUTOFF nitrogenous fertilizer, ammonium nitrate; at point-of-sale: 0.0169095 kg; = p1066
- CUTOFF pesticide, Acetamiprid; at point-of-sale; kg AI: 1.4518e-5 kg; = p1764
- CUTOFF limestone, high-grade, pulverized; at point-of-sale: 0.0703128 kg; = p1228
- CUTOFF apply manure; broadcast or spray with incorporation: 5.11976e-5 ha; = p1247
- CUTOFF apply P fertilizer; broadcast with incorporation: 0.000103749 ha; = p1090
- CUTOFF sulfuric acid storage: 1.24051e-7 kg*a; = p1180
- CUTOFF pesticide, Oxyfluorfen; at point-of-sale; kg AI: 7.81739e-6 kg; = p1900
- CUTOFF pesticide, Trifluralin; at point-of-sale; kg AI: 0.00024904 kg; = p1955
- CUTOFF bulk cargo rail transport; diesel: 0.214467 metric ton*km; = p2008
- CUTOFF apply gypsum; unspecified method: 0.000697452 ha; = p1165
- CUTOFF apply sewage sludge; unspecified method: 0.000697452 ha; = p1189
- CUTOFF irrigate; gravity, surface water source, in 2003: 0.00724668 ha-m; = p1006
- CUTOFF pesticide, Dimethoate; at point-of-sale; kg AI: 1.89851e-5 kg; = p1822

## Inputs from nature
- Dry matter except CNPK; from plant uptake: 3.50704 kg; = p0917
- Phosphorus: 0.0199705 kg; = p0910
- Transformation, from annual crop [natural resource, land]: 6.97452 m2; = 1.0 * (p0881+p0877+p0883+p0871+p0875+p0879)
- Occupation, annual crop [natural resource, land]: 3.27572 m2*year; = 1.0 * (p0855)
- Potassium; from plant uptake; biogenic: 0.02544 kg; = p0915
- Water, ground: 49476.2 kg; = p0887
- Water, unspecified origin: 7.60841 m3; = p0893*0.001+p0916*0.001
- Transformation, to annual crop [natural resource, land]: 6.97452 m2; = 1.0 * (p0857)
- Nitrogen: 0.116142 kg; = p0905
- Carbon dioxide: 8.80752 kg; = p0900*3.6666666667
- Water, surface: 75196.5 kg; = p0889

## Emissions to nature
- Monoammonium phosphate; broadcast w/o incorp. in fert. in spr. bef. plant.: 0.0005459 kg; = p2888*8.2142857143
- Nitrogen solution; unspec. appl. method in fert. at plant.; unspec. appl. method in fert. at plant.; kg N: 1.25779e-5 kg; = p3107
- Water [air, non-urban air or from high stacks]: 2.63927e-6 m3; = 0.001 * (p2016)
- Cyfluthrin [soil, agricultural]: 1.56117e-6 kg; = 1.0 * (p4565+p3947+p4977+p4153+p3535+p4359+p5183)
- Pyrithiobac sodium salt [soil, agricultural]: 4.68352e-6 kg; = 1.0 * (p4478+p5302+p4066+p4272+p4684+p5096+p3654)
- Other single K nutrients; broadcast w/ incorp. in fert. in spr. bef. plant.; kg K: 0.000149353 kg; = p2704
- Pesticide formulation balance; broadcast without incorporation: 0.000314415 kg; = p4308
- Potassium chloride; no broadcast in fert. in spr. bef. plant.: 0.0106794 kg; = p2507*2.2166666667
- isopentane: 2.77848e-7 kg; = p2151*1.0166666667
- Aqueous ammonia; broadcast w/o incorp. in fert. at plant.: 2.97847e-6 kg; = p2903*1.2142857143
- Aqueous ammonia; broadcast w/ incorp. in fert. in fall bef. plant.: 7.20795e-6 kg; = p2630*1.2142857143
- Dimethoate: 5.71512e-6 kg; = p3759
- Trifluralin [air, non-urban air or from high stacks]: 7.49689e-5 kg; = 1.0 * (p3892)
- Nitrogen; broadcast w/o incorp. in manure at an unknown time: 0.00276706 kg; = p3413
- Ammonium sulfate; no broadcast in fert. in spr. bef. plant.: 0.00125608 kg; = p2479*4.7142857143
- Superphosphate, grades<= 22%; broadcast w/o incorp. in fert. in fall bef. plant.; kg P: 6.27471e-7 kg; = p2852
- Urea; unspec. appl. method in fert. after plant.: 0.000667873 kg; = p3153*5
- Superphosphate, grades>22%; broadcast w/ incorp. in fert. in fall bef. plant.; kg P: 4.71265e-5 kg; = p2659
- Pesticide formulation balance; unspec. appl. method: 1.88701e-5 kg; = p5338
- Thiamethoxam: 1.34473e-6 kg; = p3878
- Ammonium nitrate; unspec. appl. method in fert. at plant.: 1.06026e-5 kg; = p3100*4.7142857143
- Sodium chlorate [air, non-urban air or from high stacks]: 0.000228605 kg; = 1.0 * (p3867)
- Acetonitrile [air, non-urban air or from high stacks]: 3.44624e-6 kg; = 1.0 * (p2155*1.7083333333)
- Ethyne [air, non-urban air or from high stacks]: 4.46875e-6 kg; = 1.0 * (p2132*1.0833333333)
- Superphosphate, grades<= 22%; no broadcast in fert. at plant.; kg P: 9.26049e-7 kg; = p2540
- Nitrogen; in above-ground residue left on field: 0.0226081 kg; = p2168
- Glyphosate [soil, agricultural]: 0.000254471 kg; = 1.0 * (p4204+p5234+p5028+p4616+p3998+p3586+p4410)
- Propargite: 4.33676e-5 kg; = p3850
- Ammonium nitrate; broadcast w/ incorp. in fert. at plant.: 0.000112356 kg; = p2710*4.7142857143
- Nitrogen solution; no broadcast in fert. in fall bef. plant.; no broadcast in fert. in fall bef. plant.; kg N: 0.000936111 kg; = p2444
- Nitrogen solution; unspec. appl. method in fert. in fall bef. plant.; unspec. appl. method in fert. in fall bef. plan...: 1.83444e-5 kg; = p3029
- Superphosphate, grades>22%; broadcast w/o incorp. in fert. in spr. bef. plant.; kg P: 1.78055e-5 kg; = p2893
- Potassium chloride; unspec. appl. method in fert. in fall bef. plant.: 0.00154086 kg; = p3053*2.2166666667
- Carfentrazone ethyl ester [soil, agricultural]: 7.80586e-7 kg; = 1.0 * (p3519+p3931+p4343+p4961+p4549+p5167+p4137)
- Diammonium phosphate; broadcast w/o incorp. in fert. in spr. bef. plant.: 0.000995081 kg; = p2884*4.7142857143
- Nitrogen solution; broadcast w/ incorp. in fert. in spr. bef. plant.; broadcast w/ incorp. in fert. in spr. bef. plan...: 0.000667174 kg; = p2678
- Tebufenozide [soil, agricultural]: 5.4641e-6 kg; = 1.0 * (p4080+p4286+p3668+p5110+p5316+p4698+p4492)
- Acetic acid [air, non-urban air or from high stacks]: 9.18497e-5 kg; = 1.0 * (p2127*2.5)
- Mepiquat chloride: 7.73222e-6 kg; = p3816
- Endothall [soil, agricultural]: 7.80586e-7 kg; = 1.0 * (p3971+p5207+p4589+p4177+p4383+p3559+p5001)
- Other limestone constituents; applied in limestone: 0.00421877 kg; = p3220
- Potassium chloride; broadcast w/ incorp. in fert. in spr. bef. plant.: 0.00295588 kg; = p2702*2.2166666667
- Particulates, < 10 um: 0.000145617 kg; = p2034+p2036
- Other single phosphates; broadcast w/ incorp. in fert. after plant.; kg P: 5.31018e-6 kg; = p2778
- Nonvolatile constituents; broadcast w/incorp. in man. in fal.bef.plant; exc.CNPK,biogenic: 0.0126375 kg; = p3386
- Ethephon: 0.000131784 kg; = p3769
- Chlorpyrifos [air, non-urban air or from high stacks]: 4.50486e-5 kg; = 1.0 * (p3730)
- Acetaldehyde [air, non-urban air or from high stacks]: 2.04183e-5 kg; = 1.0 * (p2130*1.8333333333)
- Sodium nitrate; no broadcast in fert. in fall bef. plant.: 5.5952e-6 kg; = p2447*6.0714285714
- Ammonium nitrate; broadcast w/o incorp. in fert. at plant.: 6.77134e-5 kg; = p2905*4.7142857143
- Sodium nitrate; broadcast w/o incorp. in fert. at plant.: 4.80127e-7 kg; = p2915*6.0714285714
- Pesticide formulation balance; banded or side-dressed: 0.000216755 kg; = p3690
- Urea; no broadcast in fert. at plant.: 0.00117392 kg; = p2529*5
- Other single phosphates; no broadcast in fert. in fall bef. plant.; kg P: 3.10419e-5 kg; = p2466
- Sodium nitrate; unspec. appl. method in fert. at plant.: 7.51787e-8 kg; = p3110*6.0714285714
- Superphosphate, grades<= 22%; broadcast w/ incorp. in fert. after plant.; kg P: 5.01706e-7 kg; = p2774
- Diuron [soil, agricultural]: 2.02952e-5 kg; = 1.0 * (p4379+p4173+p4585+p4997+p3967+p3555+p5203)
- Other single phosphates; no broadcast in fert. at plant.; kg P: 9.80154e-6 kg; = p2544
- Ammonium nitrate; unspec. appl. method in fert. in fall bef. plant.: 1.54636e-5 kg; = p3022*4.7142857143
- Oxamyl: 1.47921e-5 kg; = p3836
- Ammonium sulfate; unspec. appl. method in fert. at plant.: 4.91749e-6 kg; = p3103*4.7142857143
- I butane; from residue burning: 3.46314e-7 kg; = p2146*1.0208333333
- Monoammonium phosphate; broadcast w/o incorp. in fert. after plant.: 0.000166469 kg; = p2966*8.2142857143
- Potassium; in below-ground residue; biogenic: 0.000909728 kg; = p2176
- Aldicarb: 8.47182e-5 kg; = p3705
- Aqueous ammonia; broadcast w/ incorp. in fert. after plant.: 0.00014348 kg; = p2747*1.2142857143
- Anhydrous ammonia; broadcast w/o incorp. in fert. in spr. bef. plant.: 0.000536223 kg; = p2862*1.2142857143
- Urea; broadcast w/o incorp. in fert. in spr. bef. plant.: 0.000735408 kg; = p2880*5
- Carbon monoxide, fossil [air, non-urban air or from high stacks]: 0.00120005 kg; = 1.0 * (p2028*2.3333333333)
- Propargite [soil, agricultural]: 0.000100696 kg; = 1.0 * (p5292+p5086+p3644+p4674+p4262+p4468+p4056)
- Ammonium sulfate; broadcast w/ incorp. in fert. after plant.: 0.00151287 kg; = p2752*4.7142857143
- Anhydrous ammonia; unspec. appl. method in fert. in spr. bef. plant.: 8.39623e-5 kg; = p3057*1.2142857143
- Superphosphate, grades>22%; broadcast w/ incorp. in fert. in spr. bef. plant.; kg P: 4.69059e-5 kg; = p2698
- Other single phosphates; broadcast w/o incorp. in fert. after plant.; kg P: 2.01575e-6 kg; = p2973
- Urea, sulfate; broadcast with incorporation; kg AI: 7.24588e-5 kg; = p4036
- Other single K nutrients; broadcast w/ incorp. in fert. in fall bef. plant.; kg K: 0.000113411 kg; = p2665
- Other single phosphates; no broadcast in fert. after plant.; kg P: 9.42173e-6 kg; = p2583
- Oxygen; applied in dolomite: 0.000930587 kg; = p3228
- Superphosphate, grades<= 22%; broadcast w/ incorp. in fert. in fall bef. plant.; kg P: 1.65298e-6 kg; = p2657
- Nitrogen; broadcast w/o incorp. in manure in fall before planting: 0.00893594 kg; = p3401
- Diammonium phosphate; broadcast w/o incorp. in fert. after plant.: 0.000303444 kg; = p2962*4.7142857143
- Nitrogen solution; broadcast w/ incorp. in fert. after plant.; broadcast w/ incorp. in fert. after plant.; kg N: 0.0038696 kg; = p2756
- Urea; no broadcast in fert. in fall bef. plant.: 0.00171213 kg; = p2451*5
- Potassium chloride; unspec. appl. method in fert. in spr. bef. plant.: 0.00202917 kg; = p3092*2.2166666667
- Diammonium phosphate; no broadcast in fert. after plant.: 0.00141832 kg; = p2572*4.7142857143
- Ammonium nitrate; broadcast w/ incorp. in fert. after plant.: 0.00326191 kg; = p2749*4.7142857143
- Endothall: 3.36183e-7 kg; = p3765
- Other single K nutrients; unspec. appl. method in fert. in spr. bef. plant.; kg K: 0.000102529 kg; = p3094
- Other single phosphates; broadcast w/ incorp. in fert. at plant.; kg P: 5.52425e-6 kg; = p2739
- Paraquat dichloride: 4.74018e-5 kg; = p3838
- Prometryn: 5.6815e-5 kg; = p3848
- Plant dry matter; in aboveground residue left on field: 0.678607 kg; = p2172
- Acetone [air, non-urban air or from high stacks]: 7.32617e-6 kg; = 1.0 * (p2139*1.6111111111)
- Plant dry matter; in below-ground residue: 0.286575 kg; = p2177
- Other single phosphates; broadcast w/ incorp. in fert. in spr. bef. plant.; kg P: 1.74136e-5 kg; = p2700
- Ammonium nitrate; no broadcast in fert. in fall bef. plant.: 0.000789104 kg; = p2437*4.7142857143
- Other single phosphates; broadcast w/o incorp. in fert. in fall bef. plant.; kg P: 6.64132e-6 kg; = p2856
- Ammonium sulfate; unspec. appl. method in fert. in spr. bef. plant.: 2.46147e-5 kg; = p3064*4.7142857143
- Gypsum: 3.15558e-6 kg; = p3229
- Volatile constituents; using unspec. method in man. in fal.bef.plant: 0.00530124 kg; = p3461
- Potassium; using unspec. method in manure at an unknown time: 0.00027666 kg; = p3472
- Nonvolatile constituents;broadcast w/o incorp. in man. in fal.bef.plant; exc.CNPK,biogenic: 0.016897 kg; = p3405
- Superphosphate, grades>22%; broadcast w/o incorp. in fert. at plant.; kg P: 5.64856e-6 kg; = p2932
- Indoxacarb: 7.05985e-6 kg; = p3803
- S-Metolachlor: 9.21092e-5 kg; = p5100+p4688+p4482+p4276+p3658+p4070+p5306
- Aqueous ammonia; no broadcast in fert. in spr. bef. plant.: 0.000119126 kg; = p2474*1.2142857143
- Nonvolatile constituents; broadcast w/ incorp. in man. at unknown time; exc.CNPK,biogenic: 0.00391327 kg; = p3398
- Diammonium phosphate; broadcast w/o incorp. in fert. at plant.: 0.000315677 kg; = p2923*4.7142857143
- Thidiazuron [soil, agricultural]: 2.88817e-5 kg; = 1.0 * (p3673+p4497+p5115+p4085+p5321+p4291+p4703)
- Nitrogen solution; unspec. appl. method in fert. in spr. bef. plant.; unspec. appl. method in fert. in spr. bef. plan...: 6.29589e-5 kg; = p3068
- Nitrogen solution; no broadcast in fert. in spr. bef. plant.; no broadcast in fert. in spr. bef. plant.; kg N: 0.00321277 kg; = p2483
- Ammonium sulfate; no broadcast in fert. at plant.: 0.000250938 kg; = p2518*4.7142857143
- Pentane [air, non-urban air or from high stacks]: 3.4731e-7 kg; = 1.0 * (p2152*1.0166666667)
- Sodium chlorate: 0.000530799 kg; = p5103+p4485+p3661+p4073+p4691+p5309+p4279
- Volatile constituents; broadcast w/ incorp. in man. at unknown time: 0.0111726 kg; = p3397
- Nitrogen solution; no broadcast in fert. at plant.; no broadcast in fert. at plant.; kg N: 0.000641844 kg; = p2522
- Monoammonium phosphate; no broadcast in fert. after plant.: 0.000778085 kg; = p2576*8.2142857143
- Aqueous ammonia; broadcast w/ incorp. in fert. in spr. bef. plant.: 2.4738e-5 kg; = p2669*1.2142857143
- Phosphorous; applied in sewage sludge: 1.42081e-9 kg; = p3241
- Superphosphate, grades<= 22%; broadcast w/o incorp. in fert. at plant.; kg P: 1.98125e-7 kg; = p2930
- Cyfluthrin [air, non-urban air or from high stacks]: 6.72367e-7 kg; = 1.0 * (p3741)
- Sodium nitrate; no broadcast in fert. after plant.: 0.000111377 kg; = p2564*6.0714285714
- Superphosphate, grades>22%; broadcast w/ incorp. in fert. at plant.; kg P: 1.48803e-5 kg; = p2737
- Ammonium sulfate; broadcast w/ incorp. in fert. in spr. bef. plant.: 0.000260841 kg; = p2674*4.7142857143
- Dicofol [soil, agricultural]: 5.93245e-5 kg; = 1.0 * (p5193+p3957+p3545+p4987+p4575+p4163+p4369)
- Nitrogen; broadcast w/ incorp. in manure in fall before planting: 0.00668332 kg; = p3382
- Acetamiprid: 4.37038e-6 kg; = p3701
- Phosphorous; broadcast w/ incorp. in manure at an unknown time: 0.000648587 kg; = p3395
- Pesticides, unspecified [soil, agricultural]: 0.000680897 kg; = 1.0 * (p5131+p4719+p3689+p4513+p4101+p5337+p4307)
- Monoammonium phosphate; broadcast w/o incorp. in fert. in fall bef. plant.: 0.000548467 kg; = p2849*8.2142857143
- Sodium nitrate; broadcast w/ incorp. in fert. in spr. bef. plant.: 3.98774e-6 kg; = p2681*6.0714285714
- Acrylonitrile: 5.50287e-7 kg; = p2156*1.4722222222
- Diammonium phosphate; no broadcast in fert. at plant.: 0.00147549 kg; = p2533*4.7142857143
- cis-2-Butene: 7.05214e-7 kg; = p2149*1.1666666667
- Phenol [air, non-urban air or from high stacks]: 8.51495e-6 kg; = 1.0 * (p2133*1.3055555556)
- Aqueous ammonia; no broadcast in fert. in fall bef. plant.: 3.47099e-5 kg; = p2435*1.2142857143
- Monoammonium phosphate; broadcast w/o incorp. in fert. at plant.: 0.00017318 kg; = p2927*8.2142857143
- Nitrogen; applied in sewage sludge: 1.19019e-8 kg; = p3240
- Sodium nitrate; broadcast w/o incorp. in fert. in fall bef. plant.: 7.00251e-7 kg; = p2837*6.0714285714
- S,S,S-tributyl phosphorotrithioate: 9.36703e-5 kg; = p5330+p4300+p4712+p4094+p3682+p5124+p4506
- Cyclanilide: 2.35328e-6 kg; = p3740
- Dimethoate [soil, agricultural]: 1.327e-5 kg; = 1.0 * (p4995+p4171+p4583+p3965+p4377+p3553+p5201)
- Abamectin: 1.00855e-6 kg; = p3698
- Superphosphate, grades>22%; broadcast w/ incorp. in fert. after plant.; kg P: 1.43036e-5 kg; = p2776
- Diammonium phosphate; no broadcast in fert. in fall bef. plant.: 0.00467295 kg; = p2455*4.7142857143
- Diammonium phosphate; broadcast w/ incorp. in fert. in fall bef. plant.: 0.00263372 kg; = p2650*4.7142857143
- Nitrogen solution; broadcast w/ incorp. in fert. in fall bef. plant.; broadcast w/ incorp. in fert. in fall bef. plan...: 0.000194395 kg; = p2639
- Ammonium sulfate; unspec. appl. method in fert. after plant.: 0.000142765 kg; = p3142*4.7142857143
- Sodium nitrate; unspec. appl. method in fert. in spr. bef. plant.: 3.7631e-7 kg; = p3071*6.0714285714
- Diammonium phosphate; broadcast w/ incorp. in fert. at plant.: 0.000831602 kg; = p2728*4.7142857143
- Nitrogen solution; no broadcast in fert. after plant.; no broadcast in fert. after plant.; kg N: 0.018634 kg; = p2561
- Particulates, < 2.5 um [air, non-urban air or from high stacks]: 0.00010162 kg; = 1.0 * (p2033+p2035)
- Ammonium nitrate; broadcast w/o incorp. in fert. in spr. bef. plant.: 0.000338942 kg; = p2866*4.7142857143
- Ammonium nitrate; unspec. appl. method in fert. in spr. bef. plant.: 5.30718e-5 kg; = p3061*4.7142857143
- Anhydrous ammonia; broadcast w/ incorp. in fert. in fall bef. plant.: 0.000259247 kg; = p2628*1.2142857143
- Superphosphate, grades>22%; broadcast w/o incorp. in fert. in fall bef. plant.; kg P: 1.78892e-5 kg; = p2854
- Aqueous ammonia; no broadcast in fert. at plant.: 2.37988e-5 kg; = p2513*1.2142857143
- Pesticide formulation balance; broadcast by air: 0.000861668 kg; = p3896
- Ammonium nitrate; no broadcast in fert. at plant.: 0.000541049 kg; = p2515*4.7142857143
- Nonvolatile constituents; broadcast w/o incorp. in man. at unknown time; exc.CNPK,biogenic: 0.00523224 kg; = p3417
- Methyl vinyl ether; from residue burning: 1.24516e-6 kg; = p2137*1.6111111111
- Urea, sulfate; foliar or directed spray; kg AI: 0.000270068 kg; = p4654
- Chlorpyrifos [soil, agricultural]: 0.000104599 kg; = 1.0 * (p3936+p3524+p4142+p5172+p4348+p4966+p4554)
- 1-Butene: 2.19764e-6 kg; = p2144*1.1666666667
- Other single phosphates; broadcast w/o incorp. in fert. at plant.; kg P: 2.09701e-6 kg; = p2934
- Anhydrous ammonia; broadcast w/ incorp. in fert. in spr. bef. plant.: 0.000889746 kg; = p2667*1.2142857143
- Superphosphate, grades<= 22%; no broadcast in fert. in spr. bef. plant.; kg P: 2.91911e-6 kg; = p2501
- Anhydrous ammonia; broadcast w/ incorp. in fert. at plant.: 0.000177752 kg; = p2706*1.2142857143
- Nitrogen solution; unspec. appl. method in fert. after plant.; unspec. appl. method in fert. after plant.; kg N: 0.000365161 kg; = p3146
- Aqueous ammonia; broadcast w/o incorp. in fert. after plant.: 8.64711e-5 kg; = p2942*1.2142857143
- Diammonium phosphate; no broadcast in fert. in spr. bef. plant.: 0.00465107 kg; = p2494*4.7142857143
- Urea; broadcast w/o incorp. in fert. at plant.: 0.000146919 kg; = p2919*5
- Urea; broadcast w/ incorp. in fert. after plant.: 0.00707743 kg; = p2763*5
- Anhydrous ammonia; unspec. appl. method in fert. after plant.: 0.00048698 kg; = p3135*1.2142857143
- Propane [air, non-urban air or from high stacks]: 4.62363e-6 kg; = 1.0 * (p2142*1.2222222222)
- Monoammonium phosphate; broadcast w/ incorp. in fert. in fall bef. plant.: 0.00144485 kg; = p2654*8.2142857143
- Potassium; in above-ground residue left on field; biogenic: 0.00215423 kg; = p2170
- Ammonium sulfate; no broadcast in fert. in fall bef. plant.: 0.000365986 kg; = p2440*4.7142857143
- Thidiazuron: 1.24388e-5 kg; = p3879
- Hydrocyanic acid: 4.6834e-6 kg; = p2154*2.25
- Urea; broadcast w/o incorp. in fert. in fall bef. plant.: 0.000214277 kg; = p2841*5
- Ammonium sulfate; broadcast w/o incorp. in fert. in spr. bef. plant.: 0.000157201 kg; = p2869*4.7142857143
- Ammonium nitrate; unspec. appl. method in fert. after plant.: 0.000307816 kg; = p3139*4.7142857143
- Nitrogen solution; broadcast w/ incorp. in fert. at plant.; broadcast w/ incorp. in fert. at plant.; kg N: 0.000133287 kg; = p2717
- Imidacloprid: 1.34473e-6 kg; = p3802
- Diammonium phosphate; broadcast w/o incorp. in fert. in fall bef. plant.: 0.000999761 kg; = p2845*4.7142857143
- Pesticide formulation balance; foliar or directed spray: 0.00100175 kg; = p4720
- cyclopentane: 2.71543e-8 kg; = p2153*1.0166666667
- S-Metolachlor: 3.96696e-5 kg; = p3864
- Diuron: 8.74077e-6 kg; = p3761
- Ammonium nitrate; broadcast w/ incorp. in fert. in fall bef. plant.: 0.000163867 kg; = p2632*4.7142857143
- Diammonium phosphate; broadcast w/ incorp. in fert. in spr. bef. plant.: 0.00262139 kg; = p2689*4.7142857143
- Trifluralin [soil, agricultural]: 0.000174071 kg; = 1.0 * (p5334+p5128+p3686+p4304+p4098+p4510+p4716)
- Toluene [air, non-urban air or from high stacks]: 3.12694e-6 kg; = 1.0 * (p2141*1.0952380952)
- Volatile constituents; broadcast w/ incorp. in man. in fal.bef.plant: 0.0360807 kg; = p3385
- Imidacloprid [soil, agricultural]: 3.12234e-6 kg; = 1.0 * (p3596+p4420+p4626+p4214+p5244+p5038+p4008)
- Urea; broadcast w/o incorp. in fert. after plant.: 0.00426535 kg; = p2958*5
- Ammonium sulfate; no broadcast in fert. after plant.: 0.00728524 kg; = p2557*4.7142857143
- Dioxins and furans (PCDD/F); from residue burning: 4.92505e-13 kg TEQ; = p2047
- Other single K nutrients; unspec. appl. method in fert. in fall bef. plant.; kg K: 7.78551e-5 kg; = p3055
- trans-2-Butene: 9.34819e-7 kg; = p2148*1.1666666667
- Anhydrous ammonia; broadcast w/o incorp. in fert. at plant.: 0.000107126 kg; = p2901*1.2142857143
- Zinc compounds: 9.17032e-8 kg; = p3232
- Formaldehyde [air, non-urban air or from high stacks]: 3.41286e-5 kg; = 1.0 * (p2128*2.5)
- Superphosphate, grades<= 22%; broadcast w/ incorp. in fert. in spr. bef. plant.; kg P: 1.64524e-6 kg; = p2696
- Phosphorous; in above-ground residue left on field: 0.00284216 kg; = p2169
- Dinitrogen monoxide [air, non-urban air or from high stacks]: 1.14939e-6 kg; = 1.0 * (p2044*1.5714285714)
- Phosphorous; broadcast w/o incorp. in manure at an unknown time: 0.000867194 kg; = p3414
- Butane [air, non-urban air or from high stacks]: 9.97385e-7 kg; = 1.0 * (p2147*1.0208333333)
- Sodium nitrate; broadcast w/o incorp. in fert. in spr. bef. plant.: 2.40329e-6 kg; = p2876*6.0714285714
- Other single K nutrients; no broadcast in fert. in fall bef. plant.; kg K: 0.000409746 kg; = p2470
- Urea; no broadcast in fert. in spr. bef. plant.: 0.00587611 kg; = p2490*5
- Urea, sulfate; chiseled or injected/knifed in; kg AI: 8.83879e-6 kg; = p4448
- Pesticide formulation balance; chiseled or injected/knifed in: 3.27853e-5 kg; = p4514
- Monoammonium phosphate; broadcast w/ incorp. in fert. at plant.: 0.000456215 kg; = p2732*8.2142857143
- Carbon [soil, agricultural]: 0.934389 kg; = 1.0 * (p2167+p3381+p3242+p3469+p3400+p3217+p3457+p2173+p3412+p3393+p3225)
- Nitrogen; in below-ground residue: 0.00954737 kg; = p2174
- Superphosphate, grades<= 22%; no broadcast in fert. in fall bef. plant.; kg P: 2.93284e-6 kg; = p2462
- Superphosphate, grades>22%; no broadcast in fert. at plant.; kg P: 2.64017e-5 kg; = p2542
- Aqueous ammonia; broadcast w/o incorp. in fert. in fall bef. plant.: 4.34402e-6 kg; = p2825*1.2142857143
- Butadiene [air, non-urban air or from high stacks]: 2.477e-6 kg; = 1.0 * (p2143*1.125)
- Glyphosate [air, non-urban air or from high stacks]: 0.000109596 kg; = 1.0 * (p3792)
- Superphosphate, grades>22%; no broadcast in fert. in spr. bef. plant.; kg P: 8.3224e-5 kg; = p2503
- Superphosphate, grades<= 22%; broadcast w/ incorp. in fert. at plant.; kg P: 5.21931e-7 kg; = p2735
- Potassium; broadcast w/ incorp. in manure in fall before planting; biogenic: 0.00608088 kg; = p3384
- Pyriproxyfen [soil, agricultural]: 2.34176e-6 kg; = 1.0 * (p4065+p4683+p4477+p4271+p3653+p5301+p5095)
- Tebufenozide: 2.35328e-6 kg; = p3874
- Urea, sulfate; in seed furrow; kg AI: 3.97307e-5 kg; = p5066
- Benzene [air, non-urban air or from high stacks]: 2.5191e-6 kg; = 1.0 * (p2140*1.0833333333)
- Sodium nitrate; unspec. appl. method in fert. after plant.: 2.18259e-6 kg; = p3149*6.0714285714
- Aldicarb [soil, agricultural]: 0.000196708 kg; = 1.0 * (p5147+p3499+p4323+p3911+p4117+p4529+p4941)
- Urea, sulfate; broadcast by air; kg AI: 0.000232303 kg; = p3830
- Superphosphate, grades>22%; no broadcast in fert. in fall bef. plant.; kg P: 8.36154e-5 kg; = p2464
- Phosphorous; using unspec. method in manure at an unknown time: 9.52952e-5 kg; = p3471
- Urea; unspec. appl. method in fert. at plant.: 2.30047e-5 kg; = p3114*5
- Pendimethalin [soil, agricultural]: 6.47886e-5 kg; = 1.0 * (p5282+p4252+p3634+p4046+p4458+p5076+p4664)
- Nitrogen; using unspec. method in manure in fall before planting: 0.000981962 kg; = p3458
- Paraquat dichloride: 0.000110063 kg; = p4044+p5074+p4456+p3632+p4662+p4250+p5280
- Nitrogen dioxide: 5.64942e-5 kg; = p2039*3.2857142857
- Ammonium sulfate; broadcast w/o incorp. in fert. after plant.: 0.000911764 kg; = p2947*4.7142857143
- Carfentrazone-ethyl [air, non-urban air or from high stacks]: 3.36183e-7 kg; = 1.0 * (p3725)
- Ammonium nitrate; broadcast w/o incorp. in fert. after plant.: 0.00196586 kg; = p2944*4.7142857143
- Seeds; used in planting and sowing: 0.0109056 kg; = p2179
- Anhydrous ammonia; broadcast w/ incorp. in fert. after plant.: 0.00516051 kg; = p2745*1.2142857143
- Magnesium [soil, agricultural]: 0.000235153 kg; = 1.0 * (p3227)
- Pyrithiobac sodium salt: 2.0171e-6 kg; = p3860
- Furan [air, non-urban air or from high stacks]: 1.79584e-6 kg; = 1.0 * (p2138*1.4166666667)
- Glycolaldehyde; from residue burning: 3.30754e-5 kg; = p2135*2.5
- Nitrogen; using unspec. method in manure at an unknown time: 0.000304069 kg; = p3470
- Acetamiprid: 1.01476e-5 kg; = p5143+p4525+p4319+p3495+p4937+p4113+p3907
- Nitrogen solution; broadcast w/o incorp. in fert. in fall bef. plant.; broadcast w/o incorp. in fert. in fall bef. pl...: 0.000117156 kg; = p2834
- Anhydrous ammonia; broadcast w/o incorp. in fert. in fall bef. plant.: 0.00015624 kg; = p2823*1.2142857143
- Ammonia [air, non-urban air or from high stacks]: 3.56259e-5 kg; = 1.0 * (p2159*1.2142857143)
- Ammonium sulfate; unspec. appl. method in fert. in fall bef. plant.: 7.17202e-6 kg; = p3025*4.7142857143
- Sodium nitrate; no broadcast in fert. at plant.: 3.83634e-6 kg; = p2525*6.0714285714
- Urea; broadcast w/ incorp. in fert. at plant.: 0.00024378 kg; = p2724*5
- Potassium; broadcast w/ incorp. in manure at an unknown time: 0.00188297 kg; = p3396
- Abamectin [soil, agricultural]: 2.34176e-6 kg; = 1.0 * (p4522+p4110+p3492+p4934+p3904+p4316+p5140)
- Monoammonium phosphate; no broadcast in fert. in fall bef. plant.: 0.00256357 kg; = p2459*8.2142857143
- Aqueous ammonia; unspec. appl. method in fert. after plant.: 1.35397e-5 kg; = p3137*1.2142857143
- Urea; unspec. appl. method in fert. in fall bef. plant.: 3.35517e-5 kg; = p3036*5
- Other single phosphates; broadcast w/ incorp. in fert. in fall bef. plant.; kg P: 1.74955e-5 kg; = p2661
- Anhydrous ammonia; no broadcast in fert. in fall bef. plant.: 0.0012484 kg; = p2433*1.2142857143
- Thiamethoxam [soil, agricultural]: 3.12234e-6 kg; = 1.0 * (p4290+p5114+p4084+p5320+p4496+p3672+p4702)
- Monoammonium phosphate; no broadcast in fert. in spr. bef. plant.: 0.00255157 kg; = p2498*8.2142857143
- Propene [air, non-urban air or from high stacks]: 1.10982e-5 kg; = 1.0 * (p2136*1.1666666667)
- Oxyfluorfen: 2.35328e-6 kg; = p3837
- Volatile constituents; broadcast w/o incorp. in man. at unknown time: 0.0149383 kg; = p3416
- Oxamyl [soil, agricultural]: 3.43458e-5 kg; = 1.0 * (p3630+p4042+p4248+p5278+p4660+p5072+p4454)
- Oxyfluorfen [soil, agricultural]: 5.4641e-6 kg; = 1.0 * (p4455+p5073+p4661+p4043+p3631+p4249+p5279)
- Aqueous ammonia; no broadcast in fert. after plant.: 0.000690928 kg; = p2552*1.2142857143
- Plant dry matter; from residue burning: 0.00594648 kg; = p2164
- Aqueous ammonia; unspec. appl. method in fert. in fall bef. plant.: 6.8019e-7 kg; = p3020*1.2142857143
- Ammonium sulfate; broadcast w/o incorp. in fert. at plant.: 3.14054e-5 kg; = p2908*4.7142857143
- Potassium chloride; broadcast w/ incorp. in fert. in fall bef. plant.: 0.00224455 kg; = p2663*2.2166666667
- Formic acid [air, non-urban air or from high stacks]: 1.645e-5 kg; = 1.0 * (p2131*3.8333333333)
- NMVOC, non-methane volatile organic compounds, unspecified origin [air, non-urban air or from high stacks]: 0.000421817 kg; = 1.0 * (p2051+p2052)
- Volatile constituents; broadcast w/o incorp. in man. in fal.bef.plant: 0.0482417 kg; = p3404
- Sodium nitrate; no broadcast in fert. in spr. bef. plant.: 1.9203e-5 kg; = p2486*6.0714285714
- Phosphorous; in below-ground residue: 0.00120024 kg; = p2175
- Ammonium sulfate; broadcast w/o incorp. in fert. in fall bef. plant.: 4.58039e-5 kg; = p2830*4.7142857143
- Anhydrous ammonia; unspec. appl. method in fert. at plant.: 1.67739e-5 kg; = p3096*1.2142857143
- Oxygen; applied in limestone: 0.0316964 kg; = p3219
- Urea; unspec. appl. method in fert. in spr. bef. plant.: 0.000115151 kg; = p3075*5
- Superphosphate, grades>22%; broadcast w/o incorp. in fert. after plant.; kg P: 5.42968e-6 kg; = p2971
- Anhydrous ammonia; broadcast w/o incorp. in fert. after plant.: 0.00311009 kg; = p2940*1.2142857143
- Calcium [soil, agricultural]: 0.0268819 kg; = 1.0 * (p3218+p3226)
- Dicofol: 2.55499e-5 kg; = p3751
- Pesticides, unspecified: 0.000293249 kg; = p3895
- Pendimethalin [air, non-urban air or from high stacks]: 2.79032e-5 kg; = 1.0 * (p3840)
- Ammonium sulfate; broadcast w/ incorp. in fert. in fall bef. plant.: 7.60016e-5 kg; = p2635*4.7142857143
- Methane: 5.40803e-5 kg; = p2025*1.3333333333
- Nitrogen solution; broadcast w/o incorp. in fert. after plant.; broadcast w/o incorp. in fert. after plant.; kg N: 0.00233209 kg; = p2951
- Potassium; using unspec. method in manure in fall before planting; biogenic: 0.000893447 kg; = p3460
- Phosphorous; broadcast w/o incorp. in manure in fall before planting: 0.00280052 kg; = p3402
- Sodium nitrate; broadcast w/ incorp. in fert. in fall bef. plant.: 1.16191e-6 kg; = p2642*6.0714285714
- Carbon dioxide, in air: 0.0210126 kg; = p2163*3.6666666667
- Mepiquat chloride [soil, agricultural]: 1.79535e-5 kg; = 1.0 * (p4228+p4434+p5052+p4022+p3610+p4640+p5258)
- Ethane [air, non-urban air or from high stacks]: 1.49183e-5 kg; = 1.0 * (p2126*1.25)
- Phosphorous; using unspec. method in manure in fall before planting: 0.000307747 kg; = p3459
- Nitrogen solution; broadcast w/o incorp. in fert. at plant.; broadcast w/o incorp. in fert. at plant.; kg N: 8.03282e-5 kg; = p2912
- Monoammonium phosphate; broadcast w/ incorp. in fert. after plant.: 0.000438537 kg; = p2771*8.2142857143
- Urea, sulfate; broadcast without incorporation; kg AI: 8.47651e-5 kg; = p4242
- Urea; no broadcast in fert. after plant.: 0.0340814 kg; = p2568*5
- Water: 132282 kg; = p3475+p2178+p3418+p2171+p2181+p3399
- Ethene [air, non-urban air or from high stacks]: 2.38866e-5 kg; = 1.0 * (p2125*1.1666666667)
- Urea; broadcast w/ incorp. in fert. in fall bef. plant.: 0.000355546 kg; = p2646*5
- Aqueous ammonia; unspec. appl. method in fert. in spr. bef. plant.: 2.33444e-6 kg; = p3059*1.2142857143
- Nitrogen; broadcast w/ incorp. in manure at an unknown time: 0.00206952 kg; = p3394
- Ammonium nitrate; broadcast w/o incorp. in fert. in fall bef. plant.: 9.8758e-5 kg; = p2827*4.7142857143
- Ammonium nitrate; no broadcast in fert. in spr. bef. plant.: 0.00270824 kg; = p2476*4.7142857143
- Potassium chloride; no broadcast in fert. in fall bef. plant.: 0.00810941 kg; = p2468*2.2166666667
- Propanenitrile: 1.05194e-6 kg; = p2157*1.5277777778
- Potassium; broadcast w/o incorp. in manure at an unknown time: 0.00251763 kg; = p3415
- Superphosphate, grades<= 22%; broadcast w/o incorp. in fert. after plant.; kg P: 1.90448e-7 kg; = p2969
- Ammonium sulfate; broadcast w/ incorp. in fert. at plant.: 5.21105e-5 kg; = p2713*4.7142857143
- Ammonium nitrate; no broadcast in fert. after plant.: 0.0157077 kg; = p2554*4.7142857143
- Indoxacarb [soil, agricultural]: 1.63923e-5 kg; = 1.0 * (p4009+p4421+p5245+p5039+p3597+p4627+p4215)
- Pesticide formulation balance; broadcast with incorporation: 0.000268768 kg; = p4102
- Cyclanilide [soil, agricultural]: 5.4641e-6 kg; = 1.0 * (p4976+p4358+p3534+p4152+p3946+p5182+p4564)
- Pyriproxyfen: 1.00855e-6 kg; = p3859
- Ammonium nitrate; broadcast w/ incorp. in fert. in spr. bef. plant.: 0.0005624 kg; = p2671*4.7142857143
- Superphosphate, grades>22%; no broadcast in fert. after plant.; kg P: 2.53786e-5 kg; = p2581
- Sodium nitrate; unspec. appl. method in fert. in fall bef. plant.: 1.09646e-7 kg; = p3032*6.0714285714
- Other single K nutrients; no broadcast in fert. in spr. bef. plant.; kg K: 0.000539601 kg; = p2509
- Volatile constituents; using unspec. method in man. at unknown time: 0.00164155 kg; = p3473
- Nitrogen solution; broadcast w/o incorp. in fert. in spr. bef. plant.; broadcast w/o incorp. in fert. in spr. bef. pl...: 0.000402086 kg; = p2873
- Other single phosphates; no broadcast in fert. in spr. bef. plant.; kg P: 3.08966e-5 kg; = p2505
- Anhydrous ammonia; no broadcast in fert. at plant.: 0.000855967 kg; = p2511*1.2142857143
- Anhydrous ammonia; no broadcast in fert. after plant.: 0.0248504 kg; = p2550*1.2142857143
- Phorate [soil, agricultural]: 3.04429e-5 kg; = 1.0 * (p4461+p5285+p4255+p5079+p4049+p3637+p4667)
- Filler materials, applied with synthetic fertilizer: 0.0680199 kg; = p2432
- Urea, sulfate; banded or side-dressed; kg AI: 5.84365e-5 kg; = p3624
- Sulfuric acid [soil, agricultural]: 2.48102e-7 kg; = 1.0 * (p3231)
- Monoammonium phosphate; no broadcast in fert. at plant.: 0.000809452 kg; = p2537*8.2142857143
- Potassium; broadcast w/o incorp. in manure in fall before planting; biogenic: 0.00813045 kg; = p3403
- Aqueous ammonia; broadcast w/o incorp. in fert. in spr. bef. plant.: 1.49089e-5 kg; = p2864*1.2142857143
- Diammonium phosphate; broadcast w/ incorp. in fert. after plant.: 0.000799377 kg; = p2767*4.7142857143
- Phorate: 1.31111e-5 kg; = p3843
- Sodium nitrate; broadcast w/ incorp. in fert. at plant.: 7.96666e-7 kg; = p2720*6.0714285714
- Nonvolatile constituents; using unspec. method in man. at unknown time; exc.CNPK,biogenic: 0.000574966 kg; = p3474
- Phosphorous; broadcast w/ incorp. in manure in fall before planting: 0.00209455 kg; = p3383
- Aqueous ammonia; broadcast w/ incorp. in fert. at plant.: 4.94213e-6 kg; = p2708*1.2142857143
- Sulfur [soil, agricultural]: 4.16145e-7 kg; = 1.0 * (p3230)
- Isoprene [air, non-urban air or from high stacks]: 6.19463e-6 kg; = 1.0 * (p2145*1.1333333333)
- Prometryn [soil, agricultural]: 0.000131919 kg; = 1.0 * (p4466+p3642+p5084+p4672+p4054+p5290+p4260)
- Sewage sludge dry matter; applied in sewage sludge: 1.31766e-9 kg; = p3243
- Urea; broadcast w/ incorp. in fert. in spr. bef. plant.: 0.00122025 kg; = p2685*5
- isobutene: 1.91884e-6 kg; = p2150*1.1666666667
- Anhydrous ammonia; no broadcast in fert. in spr. bef. plant.: 0.00428457 kg; = p2472*1.2142857143
- Urea, sulfate; unspec. appl. method; kg AI: 5.08732e-6 kg; = p5272
- Monoammonium phosphate; broadcast w/ incorp. in fert. in spr. bef. plant.: 0.00143809 kg; = p2693*8.2142857143
- Tribufos: 4.0342e-5 kg; = p3888
- Other single phosphates; broadcast w/o incorp. in fert. in spr. bef. plant.; kg P: 6.61023e-6 kg; = p2895
- Superphosphate, grades<= 22%; no broadcast in fert. after plant.; kg P: 8.90165e-7 kg; = p2579
- Methanol [air, non-urban air or from high stacks]: 5.39551e-5 kg; = 1.0 * (p2129*2.6666666667)
- Pesticide formulation balance; in seed furrow: 0.000147371 kg; = p5132
- Ash: 0.00324725 kg; = p2022+p2021
- Anhydrous ammonia; unspec. appl. method in fert. in fall bef. plant.: 2.44642e-5 kg; = p3018*1.2142857143
- Sodium nitrate; broadcast w/o incorp. in fert. after plant.: 1.3939e-5 kg; = p2954*6.0714285714
- Sodium nitrate; broadcast w/ incorp. in fert. after plant.: 2.31288e-5 kg; = p2759*6.0714285714
- Ethephon [soil, agricultural]: 0.00030599 kg; = 1.0 * (p3975+p4387+p3563+p5005+p4181+p5211+p4593)
- Acetol; from residue burning: 6.18134e-5 kg; = p2134*2.0555555556
- Superphosphate, grades<= 22%; broadcast w/o incorp. in fert. in spr. bef. plant.; kg P: 6.24534e-7 kg; = p2891
- Aqueous ammonia; unspec. appl. method in fert. at plant.: 4.66372e-7 kg; = p3098*1.2142857143

## Sampling procedure
A delete-a-group jackknife is used by the USDA to estimate the ARMS sample means and RSEs, based on a 15 sample delete-a-group jackknife. Because of this relatively small sample size, a Students t distribution is used to represent ARMS data probability density functions. Other representations of uncertainty are described in Cooper, J.S., Kahn, E., Noon, M. (2012). LCA Digital Commons Unit Process Data: field crop production Version 1. Prepared for the US Department of Agriculture National Agricultural Library. Retrieved from https://www.lcacommons.gov/discovery/docs/LCA%20Digital%20Commons%20Unit%20Process%20Data%20final%20updated.pdf

## Extrapolations
Data represent an aggregation of processes applied in California in 2003. Data development is demonstrated by parameterization (exlicitly presents all raw and uncertainty data and all calculations). Flow data quality according to the LCADC convention is provided for all flows.
