# corn grain; at harvest in 1997; at farm; 85%-91% moisture

Dataset: EcoSpold 2, unit process
Geography: GLO
Time period: 1997-01-02 to 1998-01-01
Scenario: Business-as-Usual
System model: Allocation, ecoinvent default
Generated by: cooperjs@u.washington.edu
isCopyrightProtected: false

## General comment
This unit process/ gate-to-gate dataset represents the production of 1 kg corn coproduced with silage and residue. The process technologies are an aggregation of those applied in Nebraska in 1997. Applicable classifications include ISIC 0111, NAIC 111150, UNSPSC 50403200; this dataset was prepared in ILCD format using the UWDFE Lab Excel to ILCD File Generator (beta version, August 2013)

Exchange "Prosulfuron-soil agricultural" is the result of combining the following original LCA Commons flows: "Prosulfuron; broadcast with incorporation; kg AI", "Prosulfuron; broadcast without incorporation; kg AI", "Prosulfuron; unspec. appl. method; kg AI", "Prosulfuron; banded or side-dressed; kg AI", "Prosulfuron; in seed furrow; kg AI", "Prosulfuron; foliar or directed spray; kg AI".
Exchange "Cyanazine-soil agricultural" is the result of combining the following original LCA Commons flows: "Cyanazine; unspec. appl. method; kg AI", "Cyanazine; in seed furrow; kg AI", "Cyanazine; broadcast with incorporation; kg AI", "Cyanazine; banded or side-dressed; kg AI", "Cyanazine; broadcast without incorporation; kg AI", "Cyanazine; foliar or directed spray; kg AI".
Exchange "Terbufos-soil agricultural" is the result of combining the following original LCA Commons flows: "Terbufos; broadcast with incorporation; kg AI", "Terbufos; broadcast without incorporation; kg AI", "Terbufos; foliar or directed spray; kg AI", "Terbufos; unspec. appl. method; kg AI", "Terbufos; in seed furrow; kg AI", "Terbufos; banded or side-dressed; kg AI".
Exchange "Tefluthrin-soil agricultural" is the result of combining the following original LCA Commons flows: "Tefluthrin; unspec. appl. method; kg AI", "Tefluthrin; broadcast with incorporation; kg AI", "Tefluthrin; in seed furrow; kg AI", "Tefluthrin; foliar or directed spray; kg AI", "Tefluthrin; banded or side-dressed; kg AI", "Tefluthrin; broadcast without incorporation; kg AI".
Exchange "NMVOC, non-methane volatile organic compounds, unspecified origin-air low population density" is the result of combining the following original LCA Commons flows: "NMVOCs; from residue burning; kg C, biogenic", "NMVOCs; from residue burning; kg except C, biogenic".
Exchange "Glyphosate-soil agricultural" is the result of combining the following original LCA Commons flows: "Glyphosate; broadcast without incorporation; kg AI", "Glyphosate; banded or side-dressed; kg AI", "Glyphosate; foliar or directed spray; kg AI", "Glyphosate; broadcast with incorporation; kg AI", "Glyphosate; unspec. appl. method; kg AI", "Glyphosate; in seed furrow; kg AI".
Exchange "Carbofuran-soil agricultural" is the result of combining the following original LCA Commons flows: "Carbofuran; broadcast without incorporation; kg AI", "Carbofuran; broadcast with incorporation; kg AI", "Carbofuran; foliar or directed spray; kg AI", "Carbofuran; in seed furrow; kg AI", "Carbofuran; unspec. appl. method; kg AI", "Carbofuran; banded or side-dressed; kg AI".
Exchange "Dicamba-soil agricultural" is the result of combining the following original LCA Commons flows: "Dicamba; banded or side-dressed; kg AI", "Dicamba; in seed furrow; kg AI", "Dicamba; unspec. appl. method; kg AI", "Dicamba; broadcast with incorporation; kg AI", "Dicamba; broadcast without incorporation; kg AI", "Dicamba; foliar or directed spray; kg AI".
Exchange "Nicosulfuron-soil agricultural" is the result of combining the following original LCA Commons flows: "Nicosulfuron; in seed furrow; kg AI", "Nicosulfuron; banded or side-dressed; kg AI", "Nicosulfuron; broadcast with incorporation; kg AI", "Nicosulfuron; unspec. appl. method; kg AI", "Nicosulfuron; foliar or directed spray; kg AI", "Nicosulfuron; broadcast without incorporation; kg AI".
Exchange "Permethrin-soil agricultural" is the result of combining the following original LCA Commons flows: "Permethrin, mixed cis,trans; banded or side-dressed; kg AI", "Permethrin, mixed cis,trans; in seed furrow; kg AI", "Permethrin, mixed cis,trans; broadcast without incorporation; kg AI", "Permethrin, mixed cis,trans; foliar or directed spray; kg AI", "Permethrin, mixed cis,trans; unspec. appl. method; kg AI", "Permethrin, mixed cis,trans; broadcast with incorporation; kg AI".
Exchange "Carbon-soil agricultural" is the result of combining the following original LCA Commons flows: "Carbon; in above-ground residue left on field; biogenic", "Carbon; in below-ground residue; biogenic", "Carbon; applied in sewage sludge", "Carbon; applied in limestone", "Carbon; applied in dolomite".
Exchange "Particulates, < 2.5 um-air low population density" is the result of combining the following original LCA Commons flows: "PM2.5; from residue burning; kg except C, biogenic", "PM2.5; from residue burning; kg C, biogenic".
Exchange "Dimethenamid-soil agricultural" is the result of combining the following original LCA Commons flows: "Dimethenamid; broadcast with incorporation; kg AI", "Dimethenamid; in seed furrow; kg AI", "Dimethenamid; unspec. appl. method; kg AI", "Dimethenamid; broadcast without incorporation; kg AI", "Dimethenamid; foliar or directed spray; kg AI", "Dimethenamid; banded or side-dressed; kg AI".
Exchange "Chlorpyrifos-soil agricultural" is the result of combining the following original LCA Commons flows: "Chlorpyrifos; broadcast with incorporation; kg AI", "Chlorpyrifos; in seed furrow; kg AI", "Chlorpyrifos; foliar or directed spray; kg AI", "Chlorpyrifos; unspec. appl. method; kg AI", "Chlorpyrifos; banded or side-dressed; kg AI", "Chlorpyrifos; broadcast without incorporation; kg AI".
Exchange "Pesticides, unspecified-soil agricultural" is the result of combining the following original LCA Commons flows: "Unspecified pesticide; in seed furrow; kg AI", "Unspecified pesticide; unspec. appl. method; kg AI", "Unspecified pesticide; broadcast with incorporation; kg AI", "Unspecified pesticide; banded or side-dressed; kg AI", "Unspecified pesticide; broadcast without incorporation; kg AI", "Unspecified pesticide; foliar or directed spray; kg AI".
Exchange "Rimsulfuron-soil agricultural" is the result of combining the following original LCA Commons flows: "Rimsulfuron; unspec. appl. method; kg AI", "Rimsulfuron; banded or side-dressed; kg AI", "Rimsulfuron; in seed furrow; kg AI", "Rimsulfuron; broadcast without incorporation; kg AI", "Rimsulfuron; broadcast with incorporation; kg AI", "Rimsulfuron; foliar or directed spray; kg AI".
Exchange "Ash-soil agricultural" is the result of combining the following original LCA Commons flows: "Ash; from residue burning; kg except C, biogenic", "Ash; from residue burning; kg C, biogenic".
Exchange "Acetochlor-soil agricultural" is the result of combining the following original LCA Commons flows: "Acetochlor; in seed furrow; kg AI", "Acetochlor; broadcast without incorporation; kg AI", "Acetochlor; broadcast with incorporation; kg AI", "Acetochlor; banded or side-dressed; kg AI", "Acetochlor; unspec. appl. method; kg AI", "Acetochlor; foliar or directed spray; kg AI".
Exchange "Water-soil agricultural" is the result of combining the following original LCA Commons flows: "Water; in above-ground residue left on field; biogenic", "Water; from irrigation and applied with manure and sewage sludge", "Water; in below-ground residue; biogenic".
Exchange "Primisulfuron-soil agricultural" is the result of combining the following original LCA Commons flows: "Primisulfuron-methyl; foliar or directed spray; kg AI", "Primisulfuron-methyl; broadcast with incorporation; kg AI", "Primisulfuron-methyl; in seed furrow; kg AI", "Primisulfuron-methyl; unspec. appl. method; kg AI", "Primisulfuron-methyl; broadcast without incorporation; kg AI", "Primisulfuron-methyl; banded or side-dressed; kg AI".
Exchange "Halosulfuron-methyl-soil agricultural" is the result of combining the following original LCA Commons flows: "Halosulfuron-methyl; in seed furrow; kg AI", "Halosulfuron-methyl; banded or side-dressed; kg AI", "Halosulfuron-methyl; unspec. appl. method; kg AI", "Halosulfuron-methyl; broadcast with incorporation; kg AI", "Halosulfuron-methyl; foliar or directed spray; kg AI", "Halosulfuron-methyl; broadcast without incorporation; kg AI".
Exchange "Metolachlor-soil agricultural" is the result of combining the following original LCA Commons flows: "Propazine; banded or side-dressed; kg AI", "Propazine; broadcast with incorporation; kg AI", "Propazine; broadcast without incorporation; kg AI", "Propazine; in seed furrow; kg AI", "Propazine; unspec. appl. method; kg AI", "Propazine; foliar or directed spray; kg AI".
Exchange "Particulates, < 10 um-air low population density" is the result of combining the following original LCA Commons flows: "PM10; from residue burning; kg C, biogenic", "PM10; from residue burning; kg except C, biogenic".
Exchange "Bromoxynil-soil agricultural" is the result of combining the following original LCA Commons flows: "Bromoxynil; in seed furrow; kg AI", "Bromoxynil; unspec. appl. method; kg AI", "Bromoxynil; broadcast without incorporation; kg AI", "Bromoxynil; banded or side-dressed; kg AI", "Bromoxynil; broadcast with incorporation; kg AI", "Bromoxynil; foliar or directed spray; kg AI".
Exchange "Atrazine-soil agricultural" is the result of combining the following original LCA Commons flows: "Atrazine; foliar or directed spray; kg AI", "Atrazine; broadcast without incorporation; kg AI", "Atrazine; in seed furrow; kg AI", "Atrazine; broadcast with incorporation; kg AI", "Atrazine; banded or side-dressed; kg AI", "Atrazine; unspec. appl. method; kg AI".
Exchange "Transformation, from arable-resource land" is the result of combining the following original LCA Commons flows: "Transformation; from arable, from fallow to corn", "Transformation; from arable, from corn to corn", "Transformation; from arable, from unspec. use to corn", "Transformation; from arable, from small grains to corn", "Transformation; from arable, from soy to corn", "Transformation; from arable, from other to corn".
Exchange "Calcium-soil agricultural" is the result of combining the following original LCA Commons flows: "Calcium; applied in limestone", "Calcium; applied in dolomite".
Exchange "2,4-D-soil agricultural" is the result of combining the following original LCA Commons flows: "2,4-D; in seed furrow; kg AI", "2,4-D; foliar or directed spray; kg AI", "2,4-D; banded or side-dressed; kg AI", "2,4-D; broadcast with incorporation; kg AI", "2,4-D; unspec. appl. method; kg AI", "2,4-D; broadcast without incorporation; kg AI".
Exchange "Alachlor-soil agricultural" is the result of combining the following original LCA Commons flows: "Alachlor; broadcast without incorporation; kg AI", "Alachlor; banded or side-dressed; kg AI", "Alachlor; in seed furrow; kg AI", "Alachlor; unspec. appl. method; kg AI", "Alachlor; broadcast with incorporation; kg AI", "Alachlor; foliar or directed spray; kg AI".
Exchange "Paraquat dichloride-soil unspecified" is the result of combining the following original LCA Commons flows: "Paraquat dichloride; broadcast without incorporation; kg AI", "Paraquat dichloride; broadcast with incorporation; kg AI", "Paraquat dichloride; unspec. appl. method; kg AI", "Paraquat dichloride; banded or side-dressed; kg AI", "Paraquat dichloride; in seed furrow; kg AI", "Paraquat dichloride; foliar or directed spray; kg AI".
Exchange "Butane-2bdf9967-6dae-4183-88d1-8f612548c51e low population density" was originally named: "N butane; from residue burning; kg C, biogenic" in this dataset.
Exchange "isobutene-2bdf9967-6dae-4183-88d1-8f612548c51e low population density" was originally named: "I butene; from residue burning; kg C, biogenic" in this dataset.
Exchange "Formic acid-2bdf9967-6dae-4183-88d1-8f612548c51e low population density" was originally named: "Formic acid; from residue burning; kg C, biogenic" in this dataset.
Exchange "Prosulfuron-2bdf9967-6dae-4183-88d1-8f612548c51e low population density" was originally named: "Prosulfuron; broadcast by air; kg AI" in this dataset.
Exchange "Acetonitrile-2bdf9967-6dae-4183-88d1-8f612548c51e low population density" was originally named: "Acetonitrile; from residue burning; kg C, biogenic" in this dataset.
Exchange "Ethyne-2bdf9967-6dae-4183-88d1-8f612548c51e low population density" was originally named: "Acetylene; from residue burning; kg C, biogenic" in this dataset.
Exchange "Butadiene-2bdf9967-6dae-4183-88d1-8f612548c51e low population density" was originally named: "1,3 butadiene; from residue burning; kg C, biogenic" in this dataset.
Exchange "Phenol-2bdf9967-6dae-4183-88d1-8f612548c51e low population density" was originally named: "Phenol; from residue burning; kg C, biogenic" in this dataset.
Exchange "isopentane-2bdf9967-6dae-4183-88d1-8f612548c51e low population density" was originally named: "I pentane; from residue burning; kg C, biogenic" in this dataset.
Exchange "Ethane-2bdf9967-6dae-4183-88d1-8f612548c51e low population density" was originally named: "Ethane; from residue burning; kg C, biogenic" in this dataset.
Exchange "Hydrocyanic acid-2bdf9967-6dae-4183-88d1-8f612548c51e low population density" was originally named: "Hydrogen cyanide; from residue burning; kg C, biogenic" in this dataset.
Exchange "Water, ground-c19fb2d9-98eb-4cd3-8761-81b71d8a9a1b in water" was originally named: "Water; withdrawal from groundwater, for corn, in 1997" in this dataset.
Exchange "Isoprene-2bdf9967-6dae-4183-88d1-8f612548c51e low population density" was originally named: "Isoprene; from residue burning; kg C, biogenic" in this dataset.
Exchange "Toluene-2bdf9967-6dae-4183-88d1-8f612548c51e low population density" was originally named: "Toluene; from residue burning; kg C, biogenic" in this dataset.
Exchange "Pentane-2bdf9967-6dae-4183-88d1-8f612548c51e low population density" was originally named: "N pentane; from residue burning; kg C, biogenic" in this dataset.
Exchange "cis-2-Butene-2bdf9967-6dae-4183-88d1-8f612548c51e low population density" was originally named: "Cis 2 butene; from residue burning; kg C, biogenic" in this dataset.
Exchange "Furan-2bdf9967-6dae-4183-88d1-8f612548c51e low population density" was originally named: "Furan; from residue burning; kg C, biogenic" in this dataset.
Exchange "Carbofuran-2bdf9967-6dae-4183-88d1-8f612548c51e low population density" was originally named: "Carbofuran; broadcast by air; kg AI" in this dataset.
Exchange "Propene-2bdf9967-6dae-4183-88d1-8f612548c51e low population density" was originally named: "Propylene; from residue burning; kg C, biogenic" in this dataset.
Exchange "Dinitrogen monoxide-2bdf9967-6dae-4183-88d1-8f612548c51e low population density" was originally named: "Dinitrogen monoxide; from residue burning; kg N, biogenic" in this dataset.
Exchange "Alachlor-2bdf9967-6dae-4183-88d1-8f612548c51e low population density" was originally named: "Alachlor; broadcast by air; kg AI" in this dataset.
Exchange "Nicosulfuron-2bdf9967-6dae-4183-88d1-8f612548c51e low population density" was originally named: "Nicosulfuron; broadcast by air; kg AI" in this dataset.
Exchange "Acetochlor-2bdf9967-6dae-4183-88d1-8f612548c51e low population density" was originally named: "Acetochlor; broadcast by air; kg AI" in this dataset.
Exchange "2,4-D-2bdf9967-6dae-4183-88d1-8f612548c51e low population density" was originally named: "2,4-D; broadcast by air; kg AI" in this dataset.
Exchange "Occupation, arable-c19fb2d9-98eb-4cd3-8761-81b71d8a9a1b land" was originally named: "Occupation; arable, as corn" in this dataset.
Exchange "Bromoxynil-2bdf9967-6dae-4183-88d1-8f612548c51e low population density" was originally named: "Bromoxynil; broadcast by air; kg AI" in this dataset.
Exchange "trans-2-Butene-2bdf9967-6dae-4183-88d1-8f612548c51e low population density" was originally named: "Trans 2 butene; from residue burning; kg C, biogenic" in this dataset.
Exchange "Water-2bdf9967-6dae-4183-88d1-8f612548c51e low population density" was originally named: "Water; from residue burning; biogenic" in this dataset.
Exchange "Cyanazine-2bdf9967-6dae-4183-88d1-8f612548c51e low population density" was originally named: "Cyanazine; broadcast by air; kg AI" in this dataset.
Exchange "Formaldehyde-2bdf9967-6dae-4183-88d1-8f612548c51e low population density" was originally named: "Formaldehyde; from residue burning; kg C, biogenic" in this dataset.
Exchange "Sulfur dioxide-2bdf9967-6dae-4183-88d1-8f612548c51e low population density" was originally named: "Sulfur dioxide; from residue burning; biogenic" in this dataset.
Exchange "Terbufos-2bdf9967-6dae-4183-88d1-8f612548c51e low population density" was originally named: "Terbufos; broadcast by air; kg AI" in this dataset.
Exchange "Methanol-2bdf9967-6dae-4183-88d1-8f612548c51e low population density" was originally named: "Methanol; from residue burning; kg C, biogenic" in this dataset.
Exchange "Carbon dioxide-c19fb2d9-98eb-4cd3-8761-81b71d8a9a1b unspecified" was originally named: "Carbon dioxide; from plant uptake; kg C, biogenic" in this dataset.
Exchange "Rimsulfuron-2bdf9967-6dae-4183-88d1-8f612548c51e low population density" was originally named: "Rimsulfuron; broadcast by air; kg AI" in this dataset.
Exchange "Zinc compounds-be1c0329-f1a8-4524-8420-a86d2a8dd358 agricultural" was originally named: "Zinc compounds; as secondary application" in this dataset.
Exchange "Water, surface-c19fb2d9-98eb-4cd3-8761-81b71d8a9a1b in water" was originally named: "Water; withdrawal from surface water, for corn, in 1997" in this dataset.
Exchange "Permethrin-2bdf9967-6dae-4183-88d1-8f612548c51e low population density" was originally named: "Permethrin, mixed cis,trans; broadcast by air; kg AI" in this dataset.
Exchange "Magnesium-be1c0329-f1a8-4524-8420-a86d2a8dd358 agricultural" was originally named: "Magnesium; applied in dolomite" in this dataset.
Exchange "Phosphorus-c19fb2d9-98eb-4cd3-8761-81b71d8a9a1b unspecified" was originally named: "Phosphorous; from plant uptake; biogenic" in this dataset.
Exchange "Glyphosate-2bdf9967-6dae-4183-88d1-8f612548c51e low population density" was originally named: "Glyphosate; broadcast by air; kg AI" in this dataset.
Exchange "Carbon dioxide, in air-2bdf9967-6dae-4183-88d1-8f612548c51e low population density" was originally named: "Carbon dioxide; from residue burning; kg C, biogenic" in this dataset.
Exchange "Sulfur-be1c0329-f1a8-4524-8420-a86d2a8dd358 agricultural" was originally named: "Sulfur; as secondary application" in this dataset.
Exchange "Water, unspecified origin-c19fb2d9-98eb-4cd3-8761-81b71d8a9a1b in water" was originally named: "Water; from plant uptake; biogenic" in this dataset.
Exchange "Chlorpyrifos-2bdf9967-6dae-4183-88d1-8f612548c51e low population density" was originally named: "Chlorpyrifos; broadcast by air; kg AI" in this dataset.
Exchange "Dimethenamid-2bdf9967-6dae-4183-88d1-8f612548c51e low population density" was originally named: "Dimethenamid; broadcast by air; kg AI" in this dataset.
Exchange "Methane-2bdf9967-6dae-4183-88d1-8f612548c51e low population density" was originally named: "Methane; from residue burning; kg C, biogenic" in this dataset.
Exchange "Ethene-2bdf9967-6dae-4183-88d1-8f612548c51e low population density" was originally named: "Ethylene; from residue burning; kg C, biogenic" in this dataset.
Exchange "Acetic acid-2bdf9967-6dae-4183-88d1-8f612548c51e low population density" was originally named: "Acetic acid; from residue burning; kg C, biogenic" in this dataset.
Exchange "Transformation, to arable-c19fb2d9-98eb-4cd3-8761-81b71d8a9a1b land" was originally named: "Transformation; to arable, to corn" in this dataset.
Exchange "Benzene-2bdf9967-6dae-4183-88d1-8f612548c51e low population density" was originally named: "Benzene; from residue burning; kg C, biogenic" in this dataset.
Exchange "1-Butene-2bdf9967-6dae-4183-88d1-8f612548c51e low population density" was originally named: "1 butene; from residue burning; kg C, biogenic" in this dataset.
Exchange "Metolachlor-2bdf9967-6dae-4183-88d1-8f612548c51e low population density" was originally named: "Propazine; broadcast by air; kg AI" in this dataset.
Exchange "Sulfuric acid-be1c0329-f1a8-4524-8420-a86d2a8dd358 agricultural" was originally named: "Sulfuric acid; as secondary application" in this dataset.
Exchange "Dicamba-2bdf9967-6dae-4183-88d1-8f612548c51e low population density" was originally named: "Dicamba; broadcast by air; kg AI" in this dataset.
Exchange "Carbon monoxide, fossil-2bdf9967-6dae-4183-88d1-8f612548c51e low population density" was originally named: "Carbon monoxide; from residue burning; kg C, biogenic" in this dataset.
Exchange "Ammonia-2bdf9967-6dae-4183-88d1-8f612548c51e low population density" was originally named: "Ammonia; from residue burning; kg N, biogenic" in this dataset.
Exchange "Atrazine-2bdf9967-6dae-4183-88d1-8f612548c51e low population density" was originally named: "Atrazine; broadcast by air; kg AI" in this dataset.
Exchange "Acetone-2bdf9967-6dae-4183-88d1-8f612548c51e low population density" was originally named: "Acetone; from residue burning; kg C, biogenic" in this dataset.
Exchange "Tefluthrin-2bdf9967-6dae-4183-88d1-8f612548c51e low population density" was originally named: "Tefluthrin; broadcast by air; kg AI" in this dataset.
Exchange "Halosulfuron-methyl-2bdf9967-6dae-4183-88d1-8f612548c51e low population density" was originally named: "Halosulfuron-methyl; broadcast by air; kg AI" in this dataset.
Exchange "Nitrogen dioxide-2bdf9967-6dae-4183-88d1-8f612548c51e low population density" was originally named: "Nitrogen dioxide; from residue burning; kg N, biogenic" in this dataset.
Exchange "Acetaldehyde-2bdf9967-6dae-4183-88d1-8f612548c51e low population density" was originally named: "Acetaldehyde; from residue burning; kg C, biogenic" in this dataset.
Exchange "Acrylonitrile-2bdf9967-6dae-4183-88d1-8f612548c51e low population density" was originally named: "Propenenitrile; from residue burning; kg C, biogenic" in this dataset.
Exchange "Propane-2bdf9967-6dae-4183-88d1-8f612548c51e low population density" was originally named: "Propane; from residue burning; kg C, biogenic" in this dataset.

## Geography
The unit process is assumed to represent production in Nebraska (US State).

## Technology
This process produces corn grain; at harvest in 1997; at farm; 85%-91% moisture. The process is assumed to represent production in Nebraska (US State). Yields and related inputs and outputs represent a single year of operation, in 1997. This dataset includes consideration of residue burning; soil preparation; planting or sowing; irrigation; application, storage, and transport of fertilizers, manures, liming materials, secondary materials, and pesticides; and harvest. Fate and transport of applications are not included as described in Cooper, J.S., Kahn, E., Noon, M. (2012) LCA Digital Commons Unit Process Data: field crop production Version 1 which is available at https://www.lcacommons.gov/discovery/docs/LCA%20Digital%20Commons%20Unit%20Process%20Data%20final%20updated.pdf

## Time period
Start and end dates match the underlying data obtained from the USDA Agricultural Resource Management Survey (ARMS).
## Parameters
- p2721: 1.82642e-7; = p2330*(p1019+p1021)
- p2011: 0.00226032
- p1759: 0
- p2894: 5.52599e-6; = p2308*(p1079+p1081)
- p3451: 0; = p3375*p1240
- p3201: 0; = p2420*p1082
- p2524: 0.0010202; = p2328*p1014
- p2405: 0; = p2234*p2195
- p0091: 3.536
- p0478: 0; = SQRT(2)*(IF((2*p0346-1)<0;-1;IF((2*p0346-1)>0;1;0))*SQRT(SQRT((2/(pi()*0.140012289)+LN(1-(2*p0346-1)^2)/2)^2-LN(1-(2*p0346-1)^2)/0.140012289)-(2/(pi()*0.140012289)+LN(1-(2*p0346-1)^2)/2)))
- p1181: 0.000135898
- p2313: 0; = p2231*p2220
- p1908: 0
- p3324: 0; = if(and(p1232=0;p3255<>0);p3266*(p3279*(p3284*p1256+p3286*(p1253+p1257)+p1258*p3288+p3299*p3287));0)
- p3175: 0; = p2394*p1023
- p2033: 2.22603e-6; = p2015*p2029*p2031/(p0818*1000)
- p0446: 0; = SQRT(2)*(IF((2*p0314-1)<0;-1;IF((2*p0314-1)>0;1;0))*SQRT(SQRT((2/(pi()*0.140012289)+LN(1-(2*p0314-1)^2)/2)^2-LN(1-(2*p0314-1)^2)/0.140012289)-(2/(pi()*0.140012289)+LN(1-(2*p0314-1)^2)/2)))
- p2298: 0.000128644; = p2227*p2205
- p1553: 0
- p0359: 0.5
- p0848: -0.1224
- p1635: 0
- p2924: 2.24101e-5; = p2338*(p1079+p1081)
- p0736: 0
- p0247: 12.184
- p0996: 1; = if(p0888=0;0;if((p0691*p0690*1000*p0692/100)/p0888>1;1;(p0691*p0690*1000*p0692/100)/p0888))
- p2161: 8.5175e-9; = p2015*p2085*p2123/(p0818*1000)
- p2676: 6.25898e-6; = p2285*(p1019+p1021)
- p2701: 2.94815e-6; = p2310*(p1078+p1080)
- p0096: 41.161
- p3936: 2.67391e-6; = p1793*p3478
- p3236: 0.0140975
- p0008: 0.0739645; = (p0007-1.5)/(p0007-1)^2
- p1806: 0
- p1980: 3521.6
- p3403: 0; = p3365*p1238
- p2876: 1.25401e-6; = p2290*(p1020+p1022)
- p1887: 0
- p2484: 0.000417945; = p2288*p1014
- p2538: 4.65653e-5; = p2342*p1073
- p4151: 5.98627e-7; = p1802*p3479
- p0355: 0.5
- p0711: 82.034; = p0051*(1+p0579*p0183/100)
- p1876: 0
- p0155: 1.143
- p4701: 3.02321e-7; = p1940*p3481
- p3518: 3.91205e-6; = p1787*p3476
- p0476: 0; = SQRT(2)*(IF((2*p0344-1)<0;-1;IF((2*p0344-1)>0;1;0))*SQRT(SQRT((2/(pi()*0.140012289)+LN(1-(2*p0344-1)^2)/2)^2-LN(1-(2*p0344-1)^2)/0.140012289)-(2/(pi()*0.140012289)+LN(1-(2*p0344-1)^2)/2)))
- p2677: 5.06517e-5; = p2286*(p1019+p1021)
- p3234: 0.39606; = 1-p3233
- p0797: 28.537; = p0137*(1+p0665*p0269/100)
- p0234: 24.37
- p1682: 0
- p1000: 0; = IF(p0996+p0999=1;0;IF(p0996+p0999+p0998>1;1-(p0996+p0999);p0998))
- p3276: 0
- p3207: 0; = p2426*p1082
- p0709: 13.531; = p0049*(1+p0577*p0181/100)
- p2636: 6.25484e-6; = p2245*(p1019+p1021)
- p3038: 0; = p2257*p1023
- p1271: 0; = IF(p1267+p1270=p1259;0;IF(p1267+p1270+p1269>p1259;p1259-(p1267+p1270);p1269))
- p0492: 0; = SQRT(2)*(IF((2*p0360-1)<0;-1;IF((2*p0360-1)>0;1;0))*SQRT(SQRT((2/(pi()*0.140012289)+LN(1-(2*p0360-1)^2)/2)^2-LN(1-(2*p0360-1)^2)/0.140012289)-(2/(pi()*0.140012289)+LN(1-(2*p0360-1)^2)/2)))
- p0808: 3.488e6
- p0913: 0.0151931
- p1087: 0; = IF(p1071=0;p1081*(p0710/100)*p0703*1000;0)
- p2024: 0.748682
- p3846: 4.248e-8; = p1909*p3477
- p2916: 5.0826e-7; = p2330*(p1020+p1022)
- p0308: 0.5
- p0922: 0.191374; = p0677*1000/p0801
- p2696: 5.30156e-8; = p2305*(p1078+p1080)
- p3084: 4.94485e-8; = p2303*p1082
- p2000: 4000
- p3362: 0; = if(p1232=0;p3244*p3356/p0818;0)
- p2006: 0.180569; = ((p1980*p1985+p1986*p1991+p1992*p1997+p2000*p2005)/p0818)*p0005*p0002/1000
- p1763: 0
- p1639: 0
- p1327a: 0.172178; = (p0745*1000/p0801)*(1-(p0746+p0747+p0748+p0749+p0750+p0751+p0752+p0753)/100)+(p0754*1000/p0801)*(1-(p0755+p0756+p0757+p0758+p0759+p0760+p0761+p0762)/100)
- p2200: 0.0036978; = p1056/p0818
- p2122: 0.341195
- p2069: 0.190588
- p3171: 9.14561e-6; = p2390*p1132
- p3011: 0; = p2425*(p1079+p1081)
- p0405: 0; = SQRT(2)*(IF((2*p0273-1)<0;-1;IF((2*p0273-1)>0;1;0))*SQRT(SQRT((2/(pi()*0.140012289)+LN(1-(2*p0273-1)^2)/2)^2-LN(1-(2*p0273-1)^2)/0.140012289)-(2/(pi()*0.140012289)+LN(1-(2*p0273-1)^2)/2)))
- p0746: 30.603; = p0086*(1+p0614*p0218/100)
- p3153: 0; = p2372*p1023
- p3297: 0; = if(p1273+p1274+p1275+p1276=0;0;p1273/(p1273+p1274+p1275+p1276))
- p1749: 0
- p0950: 0; = if(and(p0683=0;or(p0807=480;p0807=32;p0807=1;and(p0807=60;p0901<0.03)));p0938;0)
- p0555: 0; = IF(p0291<0.5;-SQRT(p0007*EXP(p0423^2*p0008)-p0007);SQRT(p0007*EXP(p0423^2*p0008)-p0007))
- p1250: 0; = if(p1232>0;0;p1245*p0001/(p0818*p0002))
- p1808: 6.5753e-6; = p1400*1000/p0818
- p0836: 7.10772e9; = p0831*p0835*p0801/(1-p0831)
- p1076: 0; = IF(p1071=0;p0714/100;0)
- p0260: 32.807
- p2373: 7.39095e-5; = p2225*p2202
- p0912: 0.0117949
- p2656: 0; = p2265*(p1078+p1080)
- p1003: 0; = p0999*p0888
- p5099: 1.67578e-9; = p1926*p3483
- p2837: 3.15142e-7; = p2251*(p1020+p1022)
- p3189: 0; = p2408*p1023
- p0512: 0; = SQRT(2)*(IF((2*p0380-1)<0;-1;IF((2*p0380-1)>0;1;0))*SQRT(SQRT((2/(pi()*0.140012289)+LN(1-(2*p0380-1)^2)/2)^2-LN(1-(2*p0380-1)^2)/0.140012289)-(2/(pi()*0.140012289)+LN(1-(2*p0380-1)^2)/2)))
- p1291: 0; = IF(p1287+p1290=p1264;0;IF(p1287+p1290+p1289>p1264;p1264-(p1287+p1290);p1289))
- p2897: 0; = p2311*(p1129+p1131)
- p1241: 0; = if(p1232>0;0;IF(p1234+p1238+p1239+p1240=1;0;1-(p1234+p1238+p1239+p1240)))
- p2341: 0.000131467; = p2228*p2209
- p0820: 0; = if(p0807=480;p0814;0)
- p1835: 0
- p4204: 1.16167e-7; = p1855*p3479
- p3056: 0; = p2275*p1132
- p0685: 0
- p2857: 0; = p2271*(p1079+p1081)
- p1256: 0; = if(p1232>0;0;IF(p1253=1;0;IF(p1253+p1254>1;1-p1253;p1254)))
- p2436: 2.83582e-5; = p2240*p1014
- p5268: 3.36761e-6; = p1889*p3484
- p3017: 0; = p2431*(p1129+p1131)
- p3377: 0; = if(p1232=0;p3246*p3359/p0818;0)
- p0877: 0.0690435; = p0876*p0001*p0003/(p0818*p0002)
- p2670: 1.49767e-5; = p2279*(p1019+p1021)
- p0360: 0.5
- p1134: 189801; = if(p1121=0;p1128*(p0716/100)*p0703*1000;0)
- p1663: 0
- p1518: 2
- p0049: 13.531
- p2990: 0; = p2404*(p1020+p1022)
- p1670: 0
- p2256: 2.5874e-5; = p2222*p2202
- p1501: 24
- p2325: 0.000141555; = p2224*p2192
- p3230: 6.75149e-8; = p1170/p0818
- p2366: 0.000450662; = p2225*p2195
- p0440: 0; = SQRT(2)*(IF((2*p0308-1)<0;-1;IF((2*p0308-1)>0;1;0))*SQRT(SQRT((2/(pi()*0.140012289)+LN(1-(2*p0308-1)^2)/2)^2-LN(1-(2*p0308-1)^2)/0.140012289)-(2/(pi()*0.140012289)+LN(1-(2*p0308-1)^2)/2)))
- p2528: 0.000274315; = p2332*p1014
- p2556: 0.000547536; = p2360*p1014
- p3273: 0
- p1800: 0
- p1888: 0
- p1613: 0
- p3270: 0
- p1531: 270
- p0988: 1.87445e7; = p0982*p0886
- p4129: 3.55827e-8; = p1780*p3479
- p2564: 2.43732e-6; = p2368*p1014
- p2209: 0.000162272; = 14.0067*p2208/30.973762
- p2078: 0.117
- p1780: 1.06967e-6; = p1372*1000/p0818
- p3194: 0; = p2413*p1023
- p1754: 6.55957e-6; = p1346*1000/p0818
- p3254: 0; = p1252*(p1287*(1-p3247)+p1290*(1-p3248)+p1291*(1-p3249)+p1292*(1-p3250))
- p2155: 1.18256e-7; = p2015*p2084*p2117/(p0818*1000)
- p1673: 0
- p0044: 99.239
- p2072: 0.134
- p2479: 0.000163833; = p2283*p1014
- p0291: 0.5
- p3340: 0; = if(and(p1232=0;p3254<>0);p3254*(p3270-p3335)/p3338;0)
- p1626: 0
- p3397: 0; = p3378*p1234
- p2218: 0.000394944; = p1150/p0818
- p0320: 0.5
- p3322: 0; = if(and(p1232=0;p3253<>0);p3253-(p3317+p3318+p3319+p3320+p3321);0)
- p0034: 3829.84
- p0716: 26.151; = p0056*(1+p0584*p0188/100)
- p0644: 0; = IF(p0380<0.5;-SQRT(p0007*EXP(p0512^2*p0008)-p0007);SQRT(p0007*EXP(p0512^2*p0008)-p0007))
- p0778: 0
- p2906: 5.43783e-6; = p2320*(p1020+p1022)
- p2182: 0.00843036; = p1050/p0818
- p3412: 0; = p3374*p1238
- p2503: 1.17403e-5; = p2307*p1073
- p0322: 0.5
- p0311: 0.5
- p0680: 943.345; = p0020*(1+p0548*p0152/100)
- p1164: 66092.4; = p1163*p0801
- p2294: 0.000715367; = p2223*p2201
- p3446: 0; = p3370*p1240
- p1274: 0; = p1270*p1252/p0818
- p2814: 0; = p2423*(p1078+p1080)
- p2184: 0.000109052; = p1051/p0818
- p1330: 3.64207e6; = p1320*p0801
- p1303: 0; = p1297*p1252/p0818
- p0915: 0.0102586; = p0914/p0818
- p0257: 19.627
- p2342: 5.67634e-5; = p2228*p2210
- p0706: 4.686; = p0046*(1+p0574*p0178/100)
- p2776: 2.41487e-7; = p2385*(p1078+p1080)
- p2508: 0; = p2312*p1123
- p2330: 2.06702e-6; = p2224*p2198
- p1767: 1.81843e-5; = p1359*1000/p0818
- p0831: 0.356071; = 1-p0824
- p0085: 23519.6
- p2671: 5.49825e-5; = p2280*(p1019+p1021)
- p2930: 3.9197e-7; = p2344*(p1079+p1081)
- p2858: 0; = p2272*(p1129+p1131)
- p1654: 0
- p1918: 0
- p5181: 8.51956e-7; = p1802*p3484
- p0056: 26.151
- p0985: 0.663248; = IF(p0982=1;0;IF(p0982+p0983>1;1-p0982;p0983))
- p1885: 0
- p2403: 0; = p2234*p2192
- p3188: 0; = p2407*p1023
- p1757: 0
- p3147: 0; = p2366*p1023
- p0940: 0; = if(and(p0683=0;p0946=0);p0934;0)
- p4620: 4.04172e-9; = p1859*p3481
- p1625: 0
- p2319: 0.000153658; = p2224*p2186
- p0771: 76.224; = p0111*(1+p0639*p0243/100)
- p0916: 0.574633; = p0826+p0828+(p0832*(1+p0894))/p0818
- p1314: 0; = p1310*p1252/p0818
- p3442: 0; = p3366*p1240
- p2273: 0; = p2230*p2219
- p2376: 2.98337e-5; = p2229*p2205
- p2082: 0.285294
- p5074: 4.77598e-8; = p1901*p3483
- p0032: 37.141
- p0764: 99.239; = p0104*(1+p0632*p0236/100)
- p3717: 1.2036e-7; = p1780*p3477
- p2693: 1.81941e-6; = p2302*(p1078+p1080)
- p1317: 0
- p2157: 4.03627e-8; = p2015*p2086*p2119/(p0818*1000)
- p3212: 0; = p2431*p1132
- p2038: 0.304457
- p0190: 37.559
- p3250: 0
- p0110: 50.432
- p4747: 0; = p1780*p3482
- p2840: 0.00010311; = p2254*(p1020+p1022)
- p1235: 0; = if(p1232>0;0;p0727/100)
- p1191: 0.5
- p0297: 0.5
- p2076: 0.057
- p1212: 0.0899143; = if(p1211=0;0;if(p1193>0;0;(p1207+p1208+p1209)*p1210/(2000*p1211)))
- p2338: 0.00021902; = p2228*p2206
- p3028: 0; = p2247*p1023
- p0159: 6.571
- p1855: 3.49215e-6; = p1447*1000/p0818
- p1895: 0
- p2432: 0.0129406; = p1158
- p1043: 0.178958
- p1083: 5.89929e6; = IF(p1071=0;p1073*(p0710/100)*p0703*1000;0)
- p3008: 0; = p2422*(p1079+p1081)
- p1220: 0; = IF(p1218<0.5;-SQRT(p1214*EXP(p1219^2*p1215)-p1214);SQRT(p1214*EXP(p1219^2*p1215)-p1214))
- p2608: 0; = p2412*p1014
- p0858: 0.626199; = p0670*1000/p0856
- p1886: 0
- p1218: 0
- p2306: 7.61924e-6; = p2227*p2213
- p2340: 0.000290721; = p2228*p2208
- p3073: 0; = p2292*p1023
- p3009: 0; = p2423*(p1079+p1081)
- p3093: 0; = p2312*p1132
- p2791: 0; = p2400*(p1019+p1021)
- p1071: 0
- p1611: 0
- p2365: 0.00210234; = p2225*p2193
- p3070: 0; = p2289*p1023
- p2045: 30
- p1119: 0.00427282; = IF(p1071=0;p1109/(p1114*p0818);0)
- p3671: 3.32902e-6; = p1940*p3476
- p2316: 0.000206205; = p2224*p2183
- p2084: 0.21
- p1136: 0; = if(p1121=0;p1130*(p0716/100)*p0703*1000;0)
- p2642: 1.13246e-7; = p2251*(p1019+p1021)
- p0215: 6.8
- p1068: 0.0216337; = IF(p1012=0;p1054/(p1061*p0818);0)
- p1629: 0
- p3160: 5.87323e-8; = p2379*p1082
- p2281: 8.95567e-5; = p2223*p2187
- p0212: 1.269
- p2834: 0.000180971; = p2248*(p1020+p1022)
- p2879: 0.000410292; = p2293*(p1020+p1022)
- p4528: 4.67223e-7; = p1767*p3481
- p2820: 0; = p2429*(p1128+p1130)
- p1942: 0
- p1615: 0.445163
- p2214: 9.28733e-5; = p1107/p0818
- p3054: 0; = p2273*p1132
- p2009: 0.00402118; = ((p1983*p1985+p1989*p1991+p1995*p1997+p2003*p2005+p1976*p1977+p1978*p1979+p1998*p1999)/p0818)*p0005*p0002/1000
- p1009: 0; = p1005*p0001*p0004/(p0818*p0002)
- p3359: 0; = if(p1232=0;p3309+p3320+p3331+p3342+p3353;0)
- p1683: 0
- p3311: 0; = if(and(p1232=0;p3252<>0);p3252-(p3306+p3307+p3308+p3309+p3310);0)
- p0393: 0.5
- p0278: 0.5
- p0228: 11.388
- p3257: 0
- p2421: 0; = p2235*p2211
- p0955: 3.58489e-5; = if(and(p0683>0;or(p0807=56;p0807=100;and(p0807=60;p0901>0.06)));p0937;0)
- p0699: 0
- p0533: 0; = SQRT(2)*(IF((2*p0401-1)<0;-1;IF((2*p0401-1)>0;1;0))*SQRT(SQRT((2/(pi()*0.140012289)+LN(1-(2*p0401-1)^2)/2)^2-LN(1-(2*p0401-1)^2)/0.140012289)-(2/(pi()*0.140012289)+LN(1-(2*p0401-1)^2)/2)))
- p3095: 0; = p2314*p1132
- p1952: 0
- p1963k: 9.95667e-6; = p1744*p1948+p1745*p1949+p1746*p1950+p1747*p1951+p1748*p1952+p1749*p1953+p1750*p1954+p1751*p1955+p1752*p1956+p1753*p1957+p1961*p1962
- p3647: 8.90113e-8; = p1916*p3476
- p1264: 0; = if(p1232>0;0;IF(p1259+p1263=1;0;IF(p1259+p1263+p1261>1;1-(p1259+p1263);p1261)))
- p2960: 0.000208346; = p2374*(p1020+p1022)
- p5337: 9.42748e-7; = p1962*p3484
- p1357: 4083
- p2261: 0; = p2226*p2207
- p1589: 0.897233
- p1230: 0.5
- p2559: 3.38534e-5; = p2363*p1014
- p1958: 21738
- p1634: 0
- p3142: 0; = p2361*p1023
- p1019: 0.04686; = IF(p1012=0;IF(p1014=1;0;IF(p1014+p1015>1;1-p1014;p1015));0)
- p3163: 1.50172e-7; = p2382*p1082
- p0610: 0; = IF(p0346<0.5;-SQRT(p0007*EXP(p0478^2*p0008)-p0007);SQRT(p0007*EXP(p0478^2*p0008)-p0007))
- p1702: 0
- p2003: 50
- p1556: 0
- p3426: 0; = p3369*p1239
- p1021: 0.0415; = IF(p1012=0;IF(p1014+p1019+p1020=1;0;IF(p1014+p1019+p1020+p1017>1;1-(p1014+p1019+p1020);p1017));0)
- p3242: 8.11202e-9; = p3234*p1188*p3238/p0818
- p4925: 0; = p1962*p3482
- p0424: 0; = SQRT(2)*(IF((2*p0292-1)<0;-1;IF((2*p0292-1)>0;1;0))*SQRT(SQRT((2/(pi()*0.140012289)+LN(1-(2*p0292-1)^2)/2)^2-LN(1-(2*p0292-1)^2)/0.140012289)-(2/(pi()*0.140012289)+LN(1-(2*p0292-1)^2)/2)))
- p0894: 0.22
- p2228: 0.810167; = if(p0774*p0778+p0775*p0779+p0776*p0780+p0777*p0781=0;0;p0780*p0776/(p0774*p0778+p0775*p0779+p0776*p0780+p0777*p0781))
- p4871: 0; = p1904*p3482
- p1568: 0
- p3195: 0; = p2414*p1082
- p3498: 5.14485e-6; = p1767*p3476
- p3434: 0; = p3377*p1239
- p1108: 1.86508e6; = IF(p1071=0;p1105*p1102*p1095;0)
- p1086: 0; = IF(p1071=0;p1080*(p0710/100)*p0703*1000;0)
- p3524: 1.70012e-6; = p1793*p3476
- p2467: 0; = p2271*p1073
- p0688: 16.121; = p0028*(1+p0556*p0160/100)
- p0229: 46.801
- p2812: 0; = p2421*(p1078+p1080)
- p2867: 2.20211e-5; = p2281*(p1020+p1022)
- p1873: 0
- p2420: 0; = p2235*p2210
- p2890: 1.44666e-5; = p2304*(p1079+p1081)
- p1196: 0.59
- p3044: 0; = p2263*p1082
- p3128: 1.30046e-6; = p2347*p1082
- p3197: 0; = p2416*p1082
- p0018: 1960.4
- p2707: 1.82203e-5; = p2316*(p1019+p1021)
- p2379: 1.28236e-5; = p2229*p2208
- p2735: 2.78731e-7; = p2344*(p1078+p1080)
- p2993: 0; = p2407*(p1020+p1022)
- p2681: 4.50625e-7; = p2290*(p1019+p1021)
- p1562: 0
- p1764: 0
- p4734: 0; = p1767*p3482
- p0926: 0.180567; = IF(p0918+p0923+p0924+p0925=1;0;IF(p0918+p0923+p0924+p0925+p0922>1;1-(p0918+p0923+p0924+p0925);p0922))
- p1050: 5.35928e8; = IF(p1012=0;p1037*p1036;0)
- p2457: 0; = p2261*p1073
- p2422: 0; = p2235*p2212
- p0327: 0.5
- p0609: 0; = IF(p0345<0.5;-SQRT(p0007*EXP(p0477^2*p0008)-p0007);SQRT(p0007*EXP(p0477^2*p0008)-p0007))
- p2451: 0.000119687; = p2255*p1014
- p3590: 4.45056e-8; = p1859*p3476
- p2794: 0; = p2403*(p1019+p1021)
- p3657: 8.90113e-9; = p1926*p3476
- p2481: 4.71584e-5; = p2285*p1014
- p0617: 0; = IF(p0353<0.5;-SQRT(p0007*EXP(p0485^2*p0008)-p0007);SQRT(p0007*EXP(p0485^2*p0008)-p0007))
- p2137: 4.53053e-8; = p2015*p2065*p2099/(p0818*1000)
- p1205: 0
- p3083: 1.14526e-7; = p2302*p1082
- p2575: 1.05198e-5; = p2379*p1073
- p1731: 0
- p1551: 0
- p2704: 0; = p2313*(p1128+p1130)
- p2008: 0.0374798; = ((p1982*p1985+p1988*p1991+p1994*p1997+p2002*p2005)/p0818)*p0005*p0002/1000
- p3266: 0
- p0645: 0; = IF(p0381<0.5;-SQRT(p0007*EXP(p0513^2*p0008)-p0007);SQRT(p0007*EXP(p0513^2*p0008)-p0007))
- p3133: 3.4112e-6; = p2352*p1132
- p1662: 0
- p1583: 0.806008
- p2133: 3.82329e-7; = p2015*p2061*p2095/(p0818*1000)
- p3336: 0; = IF(or(p3254=0;p1232>0);0;p3271*p3289)
- p1069: 7.06368e-5; = IF(p1012=0;p1055/(p1062*p0818);0)
- p3708: 1.2351e-5; = p1771*p3477
- p1941: 0
- p4481: 0; = p1926*p3480
- p0137: 28.537
- p3036: 0; = p2255*p1023
- p2787: 0; = p2396*(p1019+p1021)
- p0681: 0
- p3099: 0; = p2318*p1023
- p2121: 0.822447
- p2920: 6.25151e-6; = p2334*(p1020+p1022)
- p3109: 0; = p2328*p1023
- p0083: 0.596
- p3131: 3.33876e-5; = p2350*p1132
- p3393: 0; = p3374*p1234
- p1716: 0
- p1096: 0.00335628
- p2956: 3.24855e-6; = p2370*(p1020+p1022)
- p3108: 0; = p2327*p1023
- p0949: 0; = if(and(p0683=0;or(p0807=480;p0807=32;p0807=1;and(p0807=60;p0901<0.03)));p0937;0)
- p3238: 0.854735; = IF(p3237+p3235+p3236>1;1-(p3235+p3236);p3237)
- p4616: 8.97262e-8; = p1855*p3481
- p2616: 0; = p2420*p1073
- p1550: 0.783979
- p3392: 0; = p3373*p1234
- p0298: 0.5
- p1278: 0
- p0277: 0.5
- p0973: 1.53471e8; = p0967+p0968+p0969
- p3277: 0
- p2550: 0.00181806; = p2354*p1014
- p3440: 0; = p3364*p1240
- p2110: 0.856281
- p3472: 0; = p3377*p1241
- p3082: 2.53257e-7; = p2301*p1082
- p1242: 0; = if(p1232>0;0;p1234*(p0725/100)*p0723*1000)
- p0886: 5.74607e7; = p0686*1000*p0687*p0689/100
- p0794: 0
- p0058: 8.062
- p1318: 0; = p1317*p0001/(p0818*p0002)
- p1044: 0.00527766; = IF(p1012=0;IF(p1037=1;0;IF(p1037+p1038>1;1-p1037;p1038));0)
- p1926: 3.14608e-8; = p1518*1000/p0818
- p1341: 0; = p1340*p0001/(p0818*p0002)
- p2734: 5.40854e-5; = p2343*(p1078+p1080)
- p2362: 0.000202207; = p2225*p2190
- p2087: 0.856281
- p3287: 0
- p1261: 0; = if(p1232>0;0;p0732/100)
- p2888: 2.55857e-6; = p2302*(p1079+p1081)
- p1328: 9.15778e6; = p1319*p0801
- p1703: 0
- p0505: 0; = SQRT(2)*(IF((2*p0373-1)<0;-1;IF((2*p0373-1)>0;1;0))*SQRT(SQRT((2/(pi()*0.140012289)+LN(1-(2*p0373-1)^2)/2)^2-LN(1-(2*p0373-1)^2)/0.140012289)-(2/(pi()*0.140012289)+LN(1-(2*p0373-1)^2)/2)))
- p0766: 131.068; = p0106*(1+p0634*p0238/100)
- p2618: 0; = p2422*p1073
- p0869: 0; = IF(p0858+p0864+p0865+p0866+p0867+p0868=1;0;1-(p0858+p0864+p0865+p0866+p0867+p0868))
- p2350: 0.000330668; = p2232*p2218
- p2911: 3.4807e-5; = p2325*(p1020+p1022)
- p3167: 5.73629e-8; = p2386*p1082
- p3143: 0; = p2362*p1023
- p2380: 5.79901e-6; = p2229*p2209
- p3123: 2.59976e-7; = p2342*p1082
- p0937: 3.58489e-5; = p0931*p0001/(p0818*p0002)
- p1560: 0
- p2567: 0.000797454; = p2371*p1014
- p3018: 0; = p2237*p1023
- p1316: 0; = p1312*p1252/p0818
- p1943: 1.57304e-8; = p1535*1000/p0818
- p0960: 0; = if(and(p0683>0;or(p0807=480;p0807=32;p0807=1;and(p0807=60;p0901<0.03)));p0936;0)
- p3280: 0
- p2300: 0.000345886; = p2227*p2207
- p5069: 7.54101e-9; = p1896*p3483
- p2392: 1.14117e-5; = p2233*p2221
- p2004: 30
- p0674: 314.505; = p0014*(1+p0542*p0146/100)
- p2904: 1.02918e-5; = p2318*(p1020+p1022)
- p0640: 0; = IF(p0376<0.5;-SQRT(p0007*EXP(p0508^2*p0008)-p0007);SQRT(p0007*EXP(p0508^2*p0008)-p0007))
- p2358: 0.000446696; = p2225*p2186
- p1156: 0.0549436; = p1064+p1065+p1066+p1067+p1068+p1069+p1070+p1116+p1117+p1118+p1119+p1120+p1154+p1155
- p2194: 0.214362
- p1321: 1.61834; = IF(((p0745*1000*p0748/100)+(p0754*1000*p0757/100))/p0801<0;0;((p0745*1000*p0748/100)+(p0754*1000*p0757/100))/p0801)
- p1987: 400
- p2766: 2.40009e-6; = p2375*(p1078+p1080)
- p2159: 1.71987e-6; = p2015*p2083*p2121/(p0818*1000)
- p0666: 0; = IF(p0402<0.5;-SQRT(p0007*EXP(p0534^2*p0008)-p0007);SQRT(p0007*EXP(p0534^2*p0008)-p0007))
- p3246: 1; = IF(p3244+p3245=1;0;1-(p3244+p3245))
- p3262: 0
- p5062: 3.78894e-6; = p1889*p3483
- p1585: 0
- p3430: 0; = p3373*p1239
- p2240: 4.25959e-5; = p2222*p2185
- p2367: 0.0044548; = p2225*p2196
- p2063: 2.01468
- p2093: 0.260958
- p1836: 0
- p1730: 0
- p2652: 0; = p2261*(p1078+p1080)
- p1605: 0
- p1162: 0.000140001; = p1161/p0818
- p3482: 0; = if(p1328+p1330+p1332+p1334+p1336+p1338+p1340+p1342+p1344=0;0;p1340/(p1328+p1330+p1332+p1334+p1336+p1338+p1340+p1342+p1344))
- p2378: 8.02139e-5; = p2229*p2207
- p0577: 0; = IF(p0313<0.5;-SQRT(p0007*EXP(p0445^2*p0008)-p0007);SQRT(p0007*EXP(p0445^2*p0008)-p0007))
- p2959: 1.81736e-5; = p2373*(p1020+p1022)
- p1850: 0
- p2702: 0; = p2311*(p1128+p1130)
- p2612: 0; = p2416*p1073
- p1793: 6.00901e-6; = p1385*1000/p0818
- p0445: 0; = SQRT(2)*(IF((2*p0313-1)<0;-1;IF((2*p0313-1)>0;1;0))*SQRT(SQRT((2/(pi()*0.140012289)+LN(1-(2*p0313-1)^2)/2)^2-LN(1-(2*p0313-1)^2)/0.140012289)-(2/(pi()*0.140012289)+LN(1-(2*p0313-1)^2)/2)))
- p3833: 1.593e-8; = p1896*p3477
- p2413: 0; = p2234*p2203
- p3060: 0; = p2279*p1023
- p1280: 0; = IF(p1277=p1263;0;IF(p1277+p1278>p1263;p1263-p1277;p1278))
- p1963i: 2.13278e-7; = p1706*p1910+p1707*p1911+p1708*p1912+p1709*p1913+p1710*p1914+p1711*p1915+p1712*p1916+p1713*p1917+p1714*p1918+p1715*p1919+p1716*p1920+p1717*p1921+p1718*p1922+p1719*p1923+p1720*p1924+p1721*p1925+p1722*p1926+p1723*p1927+p1724*p1928
- p5166: 6.54606e-7; = p1787*p3484
- p2688: 1.03493e-5; = p2297*(p1078+p1080)
- p1248: 0; = if(p1232>0;0;p1243*p0001/(p0818*p0002))
- p2697: 5.54376e-7; = p2306*(p1078+p1080)
- p3361: 0; = if(p1232=0;p3311+p3322+p3333+p3344+p3355;0)
- p3260: 0
- p3112: 0; = p2331*p1023
- p2176: 0.00189747; = p0895*p0913/p0818
- p3294: 0
- p0145: 0
- p1055: 718475; = IF(p1012=0;p1048*p1036;0)
- p0103: 9002.59
- p2703: 0; = p2312*(p1128+p1130)
- p1898: 0
- p3152: 0; = p2371*p1023
- p2854: 0; = p2268*(p1079+p1081)
- p0115: 41.835
- p2125: 1.20021e-6; = p2015*p2053*p2087/(p0818*1000)
- p1111: 0.0872841
- p0953: 2.75129e-5; = if(and(p0683>0;or(p0807=56;p0807=100;and(p0807=60;p0901>0.06)));p0935;0)
- p3245: 0; = IF(p3244=1;0;if(p3244+p0792/100>1;1-p3244;p0792/100))
- p2280: 0.000622256; = p2223*p2186
- p3421: 0; = p3364*p1239
- p1234: 0; = if(p1232>0;0;p0726/100)
- p1090: 7.34329e-6; = IF(p1071=0;p1084*p0001/(p0818*p0002);0)
- p3074: 0; = p2293*p1023
- p0347: 0.5
- p0035: 10.101
- p0274: 0.5
- p2056: 2.07882
- p0125: 10.231
- p0805: 0
- p2792: 0; = p2401*(p1019+p1021)
- p0480: 0; = SQRT(2)*(IF((2*p0348-1)<0;-1;IF((2*p0348-1)>0;1;0))*SQRT(SQRT((2/(pi()*0.140012289)+LN(1-(2*p0348-1)^2)/2)^2-LN(1-(2*p0348-1)^2)/0.140012289)-(2/(pi()*0.140012289)+LN(1-(2*p0348-1)^2)/2)))
- p1861: 0
- p2655: 0; = p2264*(p1078+p1080)
- p3149: 0; = p2368*p1023
- p3043: 0; = p2262*p1082
- p1289: 0
- p1871: 0
- p1900: 0
- p2114: 0.832356
- p3145: 0; = p2364*p1023
- p3853: 3.54e-8; = p1916*p3477
- p1103: 0.655189; = IF(p1071=0;IF(p1096+p1101+p1102=1;0;IF(p1096+p1101+p1102+p1099>1;1-(p1096+p1101+p1102);p1099));0)
- p3478: 0.444984; = if(p1328+p1330+p1332+p1334+p1336+p1338+p1340+p1342+p1344=0;0;p1332/(p1328+p1330+p1332+p1334+p1336+p1338+p1340+p1342+p1344))
- p2774: 1.22948e-8; = p2383*(p1078+p1080)
- p0346: 0.5
- p3476: 0.282928; = if(p1328+p1330+p1332+p1334+p1336+p1338+p1340+p1342+p1344=0;0;p1328/(p1328+p1330+p1332+p1334+p1336+p1338+p1340+p1342+p1344))
- p1878: 0
- p1215: 0; = IF(p1214=0;0;(p1214-1.5)/(p1214-1)^2)
- p2798: 0; = p2407*(p1019+p1021)
- p1962: 1.99133e-5; = p1960*1000/p0818
- p0670: 5573.17; = p0010*(1+p0538*p0142/100)
- p0030: 2666.54
- p1344: 1.53238e6; = IF(p1318=0;p1327*p0801;0)
- p3218: 0.00944384; = p3214*p1228
- p3302: 0; = if(and(p1232=0;p3252<>0);p3258*(p3278*(p3282*p1256+p3286*(p1253+p1257)+p1258*p3288+p3297*p3287));0)
- p3286: 0
- p2682: 7.39629e-7; = p2291*(p1019+p1021)
- p2634: 2.54402e-5; = p2243*(p1019+p1021)
- p1126: 0; = if(p1121=0;p0720/100;0)
- p2395: 0; = p2234*p2184
- p1190: 2.39627e-8; = p1188/p0818
- p2970: 1.80796e-7; = p2384*(p1079+p1081)
- p1671: 0
- p0183: 5.29
- p4142: 1.99891e-7; = p1793*p3479
- p2247: 0.00014406; = p2222*p2192
- p2059: 1.00168
- p4102: 9.41114e-5; = p1963*p3478
- p1266: 0; = if(p1232>0;0;IF(p1259+p1263+p1264+p1265=1;0;1-(p1259+p1263+p1264+p1265)))
- p1061: 0.3
- p1859: 1.57304e-7; = p1451*1000/p0818
- p3877: 1.32396e-6; = p1940*p3477
- p1216: 0
- p0481: 0; = SQRT(2)*(IF((2*p0349-1)<0;-1;IF((2*p0349-1)>0;1;0))*SQRT(SQRT((2/(pi()*0.140012289)+LN(1-(2*p0349-1)^2)/2)^2-LN(1-(2*p0349-1)^2)/0.140012289)-(2/(pi()*0.140012289)+LN(1-(2*p0349-1)^2)/2)))
- p1677: 0
- p3432: 0; = p3375*p1239
- p2789: 0; = p2398*(p1019+p1021)
- p0889: 39.3673; = 1000*p0888*p0001*p0003*p0004/(p0818*p0002)
- p2257: 0.000296625; = p2222*p2203
- p0295: 0.5
- p1109: 5.86794e7; = IF(p1071=0;p1105*p1103*p1095;0)
- p2732: 9.56557e-6; = p2341*(p1078+p1080)
- p3295: 0
- p2968: 3.35492e-6; = p2382*(p1079+p1081)
- p2202: 0.000228165; = 4*1.00794*p2201/(2*14.0067)
- p1659: 0
- p2434: 0.000139711; = p2238*p1014
- p0031: 11.183
- p0372: 0.5
- p2651: 0; = p2260*(p1078+p1080)
- p1901: 8.96632e-7; = p1493*1000/p0818
- p3225: 0.000215055; = p3221*p1229
- p2071: 0.151
- p0653: 0; = IF(p0389<0.5;-SQRT(p0007*EXP(p0521^2*p0008)-p0007);SQRT(p0007*EXP(p0521^2*p0008)-p0007))
- p1656: 0
- p2615: 0; = p2419*p1073
- p0750: 0
- p2148: 4.69711e-8; = p2015*p2076*p2110/(p0818*1000)
- p1532: 748
- p0109: 12.603
- p0872: 2.59068e6; = p0864*p0856
- p1745: 0
- p2100: 0.705744
- p1990: 30
- p4114: 2.13653e-6; = p1765*p3479
- p3191: 0; = p2410*p1023
- p1727: 0
- p3371: 0; = if(p1232=0;p3245*p3359/p0818;0)
- p2715: 1.54558e-6; = p2324*(p1019+p1021)
- p1400: 418
- p1803: 0
- p1293: 0; = p1287*p1252/p0818
- p2462: 0; = p2266*p1073
- p1856: 0
- p3281: 0
- p4721: 0; = p1754*p3482
- p3358: 0; = if(p1232=0;p3308+p3319+p3330+p3341+p3352;0)
- p0943: 0; = if(and(p0683=0;p0949=0);p0937;0)
- p3274: 0
- p2177: 0.0642478; = p0895/p0818-(p2173+p2174+p2175+p2176)
- p1852: 0
- p1247: 0; = if(p1232>0;0;p1242*p0001/(p0818*p0002))
- p1027: 370764; = IF(p1012=0;p1021*(p0704/100)*p0703*1000;0)
- p2952: 0.000110813; = p2366*(p1020+p1022)
- p1074: 0.07276; = IF(p1071=0;p0712/100;0)
- p3258: 0
- p2574: 6.58027e-5; = p2378*p1073
- p3414: 0; = p3376*p1238
- p1939: 4.24721e-6; = p1531*1000/p0818
- p0812: 0; = if(p0807=480;0.095/0.34;0)
- p3632: 2.53682e-7; = p1901*p3476
- p1586: 0
- p0128: 11.584
- p1928: 0
- p2918: 0.000101316; = p2332*(p1020+p1022)
- p0113: 79.88
- p2745: 0.000241298; = p2354*(p1019+p1021)
- p1002: 1.10436e7; = p0996*p0888
- p1221: 0.0583196
- p2242: 2.25063e-5; = p2222*p2187
- p3187: 0; = p2406*p1023
- p1281: 0; = IF(p1277+p1280=p1263;0;IF(p1277+p1280+p1279>p1263;p1263-(p1277+p1280);p1279))
- p0637: 0; = IF(p0373<0.5;-SQRT(p0007*EXP(p0505^2*p0008)-p0007);SQRT(p0007*EXP(p0505^2*p0008)-p0007))
- p3468: 0; = p3373*p1241
- p1802: 1.79956e-5; = p1394*1000/p0818
- p0551: 0; = IF(p0287<0.5;-SQRT(p0007*EXP(p0419^2*p0008)-p0007);SQRT(p0007*EXP(p0419^2*p0008)-p0007))
- p0849: 0.133628
- p2473: 0.000555936; = p2277*p1014
- p2252: 2.10361e-6; = p2222*p2198
- p3227: 0.000185591; = p3223*p1229
- p2606: 0; = p2410*p1014
- p0050: 79.88
- p2788: 0; = p2397*(p1019+p1021)
- p1963h: 2.00969e-6; = p1686*p1890+p1687*p1891+p1688*p1892+p1689*p1893+p1690*p1894+p1691*p1895+p1692*p1896+p1693*p1897+p1694*p1898+p1695*p1899+p1696*p1900+p1697*p1901+p1698*p1902+p1699*p1903+p1700*p1904+p1701*p1905+p1702*p1906+p1703*p1907+p1704*p1908+p1705*p1909
- p0254: 24.476
- p2689: 9.36016e-6; = p2298*(p1078+p1080)
- p2314: 0; = p2231*p2221
- p2915: 3.09662e-7; = p2329*(p1020+p1022)
- p0890: 0; = p0686*1000*p0687*p0885/100
- p3465: 0; = p3370*p1241
- p1149: 0.830148
- p1618: 0
- p2408: 0; = p2234*p2198
- p2809: 0; = p2418*(p1078+p1080)
- p2673: 0.000101231; = p2282*(p1019+p1021)
- p1232: 8.9e6; = p0801
- p2562: 0.000300028; = p2366*p1014
- p5187: 3.11292e-7; = p1808*p3484
- p1101: 0.0659222; = IF(p1071=0;IF(p1096=1;0;IF(p1096+p1097>1;1-p1096;p1097));0)
- p3115: 0; = p2334*p1023
- p3352: 0; = if(and(p1232=0;p3256<>0);p3256*(p3275-p3347)/p3349;0)
- p3208: 0; = p2427*p1082
- p2846: 0; = p2260*(p1079+p1081)
- p1133: 1.92676e6; = if(p1121=0;p1123*(p0716/100)*p0703*1000;0)
- p1363: 6978
- p1075: 0.10232; = IF(p1071=0;p0713/100;0)
- p2516: 1.4723e-5; = p2320*p1014
- p1603: 0
- p2577: 2.05399e-6; = p2381*p1073
- p1217: 0
- p1956: 0
- p2149: 3.54343e-8; = p2015*p2077*p2111/(p0818*1000)
- p2581: 2.72267e-6; = p2385*p1073
- p2718: 1.36978e-5; = p2327*(p1019+p1021)
- p2131: 2.51559e-7; = p2015*p2059*p2093/(p0818*1000)
- p0506: 0; = SQRT(2)*(IF((2*p0374-1)<0;-1;IF((2*p0374-1)>0;1;0))*SQRT(SQRT((2/(pi()*0.140012289)+LN(1-(2*p0374-1)^2)/2)^2-LN(1-(2*p0374-1)^2)/0.140012289)-(2/(pi()*0.140012289)+LN(1-(2*p0374-1)^2)/2)))
- p3293: 0
- p0676: 1834.84; = p0016*(1+p0544*p0148/100)
- p0966: 1; = if(p0683=0;0;IF(p0684/100+p0965=1;0;1-(p0684/100+p0965)))
- p1042: 0.000546963
- p0350: 0.5
- p3051: 0; = p2270*p1082
- p2669: 4.34809e-6; = p2278*(p1019+p1021)
- p2848: 0; = p2262*(p1079+p1081)
- p1150: 2.5107e7; = if(p1121=0;p1149*p1146*p1145;0)
- p0459: 0; = SQRT(2)*(IF((2*p0327-1)<0;-1;IF((2*p0327-1)>0;1;0))*SQRT(SQRT((2/(pi()*0.140012289)+LN(1-(2*p0327-1)^2)/2)^2-LN(1-(2*p0327-1)^2)/0.140012289)-(2/(pi()*0.140012289)+LN(1-(2*p0327-1)^2)/2)))
- p2872: 0.000140955; = p2286*(p1020+p1022)
- p0759: 0
- p1868: 0
- p3308: 0; = if(and(p1232=0;p3252<>0);p3252*(p3259-p3303)/p3305;0)
- p2216: 2.93384e-5; = p1108/p0818
- p0380: 0.5
- p0962: 0; = if(and(p0683>0;or(p0807=480;p0807=32;p0807=1;and(p0807=60;p0901<0.03)));p0938;0)
- p2469: 0; = p2273*p1123
- p1652: 0
- p3356: 0; = if(p1232=0;p3306+p3317+p3328+p3339+p3350;0)
- p3383: 0; = p3364*p1234
- p0010: 5573.17
- p1121: 0
- p2712: 2.49978e-5; = p2321*(p1019+p1021)
- p0875: 0; = p0874*p0001*p0003/(p0818*p0002)
- p0762: 19.485; = p0102*(1+p0630*p0234/100)
- p2692: 4.02335e-6; = p2301*(p1078+p1080)
- p4541: 2.74837e-8; = p1780*p3481
- p3448: 0; = p3372*p1240
- p3880: 1.77e-9; = p1943*p3477
- p3003: 0; = p2417*(p1079+p1081)
- p0504: 0; = SQRT(2)*(IF((2*p0372-1)<0;-1;IF((2*p0372-1)>0;1;0))*SQRT(SQRT((2/(pi()*0.140012289)+LN(1-(2*p0372-1)^2)/2)^2-LN(1-(2*p0372-1)^2)/0.140012289)-(2/(pi()*0.140012289)+LN(1-(2*p0372-1)^2)/2)))
- p4975: 9.58547e-7; = p1802*p3483
- p1774: 0
- p2627: 0; = p2431*p1123
- p2327: 0.000155023; = p2224*p2195
- p2165: 0.495207; = (p0833-p2014)/p0818-p0839
- p2124: 0.263965
- p2435: 8.23304e-6; = p2239*p1014
- p0169: 1.036
- p1995: 50
- p1333: 0.00020214; = p1332*p0001/(p0818*p0002)
- p4670: 9.70013e-9; = p1909*p3481
- p4120: 3.65141e-6; = p1771*p3479
- p1301: 0; = IF(p1297+p1300=p1265;0;IF(p1297+p1300+p1299>p1265;p1265-(p1297+p1300);p1299))
- p1744: 0
- p0442: 0; = SQRT(2)*(IF((2*p0310-1)<0;-1;IF((2*p0310-1)>0;1;0))*SQRT(SQRT((2/(pi()*0.140012289)+LN(1-(2*p0310-1)^2)/2)^2-LN(1-(2*p0310-1)^2)/0.140012289)-(2/(pi()*0.140012289)+LN(1-(2*p0310-1)^2)/2)))
- p0773: 79.88; = p0113*(1+p0641*p0245/100)
- p0818: 6.35712e10; = p0806*p0807
- p0852: 0.363111; = p0847*p0851^3+p0848*p0851^2+p0849*p0851+p0850
- p3301: 0; = if(and(p1232=0;p3252<>0);p3257*p3277*(p3297*p3290+(1-p3297)*p3294);0)
- p1159: 0.5
- p2349: 0.000213029; = p2228*p2217
- p2659: 0; = p2268*(p1078+p1080)
- p2384: 1.76696e-6; = p2229*p2213
- p2286: 0.000573243; = p2223*p2192
- p0517: 0; = SQRT(2)*(IF((2*p0385-1)<0;-1;IF((2*p0385-1)>0;1;0))*SQRT(SQRT((2/(pi()*0.140012289)+LN(1-(2*p0385-1)^2)/2)^2-LN(1-(2*p0385-1)^2)/0.140012289)-(2/(pi()*0.140012289)+LN(1-(2*p0385-1)^2)/2)))
- p2485: 0.0041314; = p2289*p1014
- p3739: 2.02488e-6; = p1802*p3477
- p2107: 0.881623
- p2174: 0.00133079; = p0895*p0903/p0818
- p1845: 0
- p0677: 1703.23; = p0017*(1+p0545*p0149/100)
- p2845: 0; = p2259*(p1079+p1081)
- p1967: 0; = if(p0807=480;p0802*p0810;0)
- p0647: 0; = IF(p0383<0.5;-SQRT(p0007*EXP(p0515^2*p0008)-p0007);SQRT(p0007*EXP(p0515^2*p0008)-p0007))
- p0161: 5.714
- p2237: 0.000956007; = p2222*p2182
- p3181: 0; = p2400*p1023
- p1665: 0
- p1772: 0
- p0439: 0; = SQRT(2)*(IF((2*p0307-1)<0;-1;IF((2*p0307-1)>0;1;0))*SQRT(SQRT((2/(pi()*0.140012289)+LN(1-(2*p0307-1)^2)/2)^2-LN(1-(2*p0307-1)^2)/0.140012289)-(2/(pi()*0.140012289)+LN(1-(2*p0307-1)^2)/2)))
- p2466: 0; = p2270*p1073
- p3177: 0; = p2396*p1023
- p1794: 0
- p1669: 0
- p3159: 3.6738e-7; = p2378*p1082
- p2621: 0; = p2425*p1073
- p5238: 7.44717e-9; = p1859*p3484
- p2552: 2.35178e-5; = p2356*p1014
- p3388: 0; = p3369*p1234
- p1066: 0.00411638; = IF(p1012=0;p1052/(p1059*p0818);0)
- p0150: 0
- p2471: 0; = p2275*p1123
- p1981: 400
- p1379: 879
- p0550: 0; = IF(p0286<0.5;-SQRT(p0007*EXP(p0418^2*p0008)-p0007);SQRT(p0007*EXP(p0418^2*p0008)-p0007))
- p2926: 2.97466e-5; = p2340*(p1079+p1081)
- p3161: 2.65594e-8; = p2380*p1082
- p0545: 0; = IF(p0281<0.5;-SQRT(p0007*EXP(p0413^2*p0008)-p0007);SQRT(p0007*EXP(p0413^2*p0008)-p0007))
- p0182: 4.332
- p3470: 0; = p3375*p1241
- p3268: 0
- p1292: 0; = IF(p1287+p1290+p1291=p1261;0;p1261-(p1287+p1290+p1291))
- p4515: 1.6854e-7; = p1754*p3481
- p1896: 1.41574e-7; = p1488*1000/p0818
- p5172: 2.84482e-7; = p1793*p3484
- p2005: 3.64555e7; = p1963*p0818+p1959*1000+p1170+p1176+p1182
- p0084: 61.554
- p0611: 0; = IF(p0347<0.5;-SQRT(p0007*EXP(p0479^2*p0008)-p0007);SQRT(p0007*EXP(p0479^2*p0008)-p0007))
- p0972: 0.00241416; = p0969/p0818
- p2007: 0.0199892; = ((p1981*p1985+p1987*p1991+p1993*p1997+p2001*p2005)/p0818)*p0005*p0002/1000
- p3349: 0; = if(and(p1232=0;p3256<>0);1-(p3345+p3346+p3347+p3348);0)
- p2085: 0.0335294
- p3415: 0; = p3377*p1238
- p0763: 9002.59; = p0103*(1+p0631*p0235/100)
- p2364: 0.000411511; = p2225*p2192
- p3496: 1.81717e-5; = p1765*p3476
- p1964: 0.5
- p1825: 0
- p0375: 0.5
- p2372: 0.000513537; = p2225*p2201
- p2425: 0; = p2235*p2215
- p1296: 0; = p1292*p1252/p0818
- p2207: 0.0022446; = p1119-p2205-p2204-p2206
- p0269: 4.568
- p0376: 0.5
- p0423: 0; = SQRT(2)*(IF((2*p0291-1)<0;-1;IF((2*p0291-1)>0;1;0))*SQRT(SQRT((2/(pi()*0.140012289)+LN(1-(2*p0291-1)^2)/2)^2-LN(1-(2*p0291-1)^2)/0.140012289)-(2/(pi()*0.140012289)+LN(1-(2*p0291-1)^2)/2)))
- p2520: 1.16452e-5; = p2324*p1014
- p1597: 0
- p0612: 0; = IF(p0348<0.5;-SQRT(p0007*EXP(p0480^2*p0008)-p0007);SQRT(p0007*EXP(p0480^2*p0008)-p0007))
- p4548: 3.55267e-7; = p1787*p3481
- p0892: 0; = if(p0891=0;0;(1-p1240)*p3251/p0891)
- p1758: 0
- p0828: 0.0713279; = if(p0827=0;0;p0819-p0827/p0818)
- p3327: 0; = if(and(p1232=0;p3255<>0);1-(p3323+p3324+p3325+p3326);0)
- p2482: 0.000381636; = p2286*p1014
- p3730: 6.76139e-7; = p1793*p3477
- p3838: 1.0089e-7; = p1901*p3477
- p2067: 0.446471
- p1974: 3.15773e-6; = p1969*p0001/(p0818*p0002)
- p2737: 5.47467e-6; = p2346*(p1078+p1080)
- p1319: 1.02896; = IF(((p0745*1000*p0746/100)+(p0754*1000*p0755/100))/p0801<0;0;((p0745*1000*p0746/100)+(p0754*1000*p0755/100))/p0801)
- p0280: 0.5
- p0702: 9002.59; = p0042*(1+p0570*p0174/100)
- p0240: 12.256
- p1093: 0; = IF(p1071=0;p1087*p0001/(p0818*p0002);0)
- p3485: 1.85589e-6; = p1754*p3476
- p2991: 0; = p2405*(p1020+p1022)
- p4494: 0; = p1939*p3480
- p1195: 0.45
- p3396: 0; = p3377*p1234
- p1257: 0; = if(p1232>0;0;IF(p1253+p1256=1;0;IF(p1253+p1256+p1255>1;1-(p1253+p1256);p1255)))
- p0970: 0; = p0967/p0818
- p2285: 7.0835e-5; = p2223*p2191
- p1997: 8.34115e7; = (if(p1152=0;0;p1150/p1152)+if(p1153=0;0;p1151/p1153))*(1+p1157)
- p1761: 0
- p4414: 0; = p1859*p3480
- p1685: 0.491852
- p3272: 0
- p3382: 0; = p3363*p1234
- p2195: 0.00139123; = p2194*p2193
- p2354: 0.00273085; = p2225*p2182
- p1172: 6.75149e-8; = p1170/p0818
- p2893: 1.46435e-6; = p2307*(p1079+p1081)
- p2028: 2.18916e-5; = p2015*p2026*p2027/(p0818*1000)
- p0664: 0; = IF(p0400<0.5;-SQRT(p0007*EXP(p0532^2*p0008)-p0007);SQRT(p0007*EXP(p0532^2*p0008)-p0007))
- p1188: 1523.34; = p1187*p0801
- p3962: 1.74294e-6; = p1819*p3478
- p1930: 0
- p1828: 0
- p2603: 0; = p2407*p1014
- p1024: 5.94787e6; = IF(p1012=0;p1014*(p0704/100)*p0703*1000;0)
- p2633: 1.98866e-6; = p2242*(p1019+p1021)
- p0739: 2.701; = p0079*(1+p0607*p0211/100)
- p1642: 0
- p1699: 0
- p1252: 0; = if(p1232>0;0;p0724*2000*p0723*1000*p0725/100)
- p0743: 0.596; = p0083*(1+p0611*p0215/100)
- p3069: 0; = p2288*p1023
- p3050: 0; = p2269*p1082
- p2578: 2.68978e-5; = p2382*p1073
- p0761: 0
- p0126: 11.975
- p2708: 1.0737e-6; = p2317*(p1019+p1021)
- p0226: 11.196
- p2739: 1.72943e-6; = p2348*(p1078+p1080)
- p1588: 0
- p2521: 9.42403e-5; = p2325*p1014
- p2001: 400
- p1714: 0
- p1048: 0.000546963; = IF(p1012=0;IF(p1037+p1044+p1045+p1046+p1047=1;0;IF(p1037+p1044+p1045+p1046+p1047+p1042>1;1-(p1037+p1044+p1045+p1046+p1047);p1042));0)
- p2191: 0.000156978; = 8*1.00794*p2189/(2*14.0067)
- p2626: 0; = p2430*p1123
- p0668: 0; = IF(p0404<0.5;-SQRT(p0007*EXP(p0536^2*p0008)-p0007);SQRT(p0007*EXP(p0536^2*p0008)-p0007))
- p1078: 0.07276; = IF(p1071=0;IF(p1073=1;0;IF(p1073+p1074>1;1-p1073;p1074));0)
- p0453: 0; = SQRT(2)*(IF((2*p0321-1)<0;-1;IF((2*p0321-1)>0;1;0))*SQRT(SQRT((2/(pi()*0.140012289)+LN(1-(2*p0321-1)^2)/2)^2-LN(1-(2*p0321-1)^2)/0.140012289)-(2/(pi()*0.140012289)+LN(1-(2*p0321-1)^2)/2)))
- p0536: 0; = SQRT(2)*(IF((2*p0404-1)<0;-1;IF((2*p0404-1)>0;1;0))*SQRT(SQRT((2/(pi()*0.140012289)+LN(1-(2*p0404-1)^2)/2)^2-LN(1-(2*p0404-1)^2)/0.140012289)-(2/(pi()*0.140012289)+LN(1-(2*p0404-1)^2)/2)))
- p1624: 0
- p0578: 0; = IF(p0314<0.5;-SQRT(p0007*EXP(p0446^2*p0008)-p0007);SQRT(p0007*EXP(p0446^2*p0008)-p0007))
- p4992: 2.08635e-7; = p1819*p3483
- p0576: 0; = IF(p0312<0.5;-SQRT(p0007*EXP(p0444^2*p0008)-p0007);SQRT(p0007*EXP(p0444^2*p0008)-p0007))
- p1295: 0; = p1291*p1252/p0818
- p1769: 0
- p0691: 11.183; = p0031*(1+p0559*p0163/100)
- p3223: 0.126838; = IF(p3216=0;0;(1-p1223)*24.3050/84.3139)
- p2507: 0; = p2311*p1123
- p0406: 0; = SQRT(2)*(IF((2*p0274-1)<0;-1;IF((2*p0274-1)>0;1;0))*SQRT(SQRT((2/(pi()*0.140012289)+LN(1-(2*p0274-1)^2)/2)^2-LN(1-(2*p0274-1)^2)/0.140012289)-(2/(pi()*0.140012289)+LN(1-(2*p0274-1)^2)/2)))
- p2308: 5.4007e-5; = p2227*p2215
- p1447: 222
- p2773: 2.38569e-6; = p2382*(p1078+p1080)
- p3363: 0; = if(p1232=0;p3244*p3357/p0818;0)
- p2859: 0; = p2273*(p1129+p1131)
- p0738: 9002.59; = p0078*(1+p0606*p0210/100)
- p2151: 1.60206e-8; = p2015*p2079*p2113/(p0818*1000)
- p0366: 0.5
- p2296: 0.00118033; = p2223*p2203
- p2175: 0.000124615; = p0895*p0908/p0818
- p2188: 0.00253893; = p1066-p2186-p2187
- p2750: 5.68063e-6; = p2359*(p1019+p1021)
- p1826: 0
- p0707: 11.058; = p0047*(1+p0575*p0179/100)
- p3998: 1.55395e-6; = p1855*p3478
- p2220: 4.03513e-5; = p1151/p0818
- p0586: 0; = IF(p0322<0.5;-SQRT(p0007*EXP(p0454^2*p0008)-p0007);SQRT(p0007*EXP(p0454^2*p0008)-p0007))
- p2030: 10.68
- p4580: 1.00639e-7; = p1819*p3481
- p0309: 0.5
- p2844: 0; = p2258*(p1079+p1081)
- p2232: 0.837254; = if(p0783*p0787+p0784*p0788+p0785*p0789+p0786*p0790=0;0;p0789*p0785/(p0783*p0787+p0784*p0788+p0785*p0789+p0786*p0790))
- p0273: 0.5
- p0918: 0.105994; = p0680*1000/p0801
- p1209: 129.986; = p1206*p0818*p0822/p0801
- p2360: 0.000822434; = p2225*p2188
- p1798: 0
- p4208: 5.23275e-9; = p1859*p3479
- p2546: 0.000270622; = p2350*p1123
- p2741: 2.66585e-5; = p2350*(p1128+p1130)
- p0854: 4.02004e6; = p0801*((1-p0853)*p0846+p0853*p0852)
- p0104: 99.239
- p1607: 0
- p0262: 24.111
- p1927: 0
- p3106: 0; = p2325*p1023
- p3401: 0; = p3363*p1238
- p2347: 0.000283943; = p2228*p2215
- p2105: 0.888194
- p2065: 0.0758824
- p2607: 0; = p2411*p1014
- p1028: 1.20887e6; = IF(p1012=0;p1022*(p0704/100)*p0703*1000;0)
- p3447: 0; = p3371*p1240
- p2476: 0.000414267; = p2280*p1014
- p0992: 6.68189e-6; = p0988*p0001*p0004/(p0818*p0002)
- p3479: 0.0332652; = if(p1328+p1330+p1332+p1334+p1336+p1338+p1340+p1342+p1344=0;0;p1334/(p1328+p1330+p1332+p1334+p1336+p1338+p1340+p1342+p1344))
- p1302: 0; = IF(p1297+p1300+p1301=p1262;0;p1262-(p1297+p1300+p1301))
- p2579: 1.38618e-7; = p2383*p1073
- p0345: 0.5
- p2596: 0; = p2400*p1014
- p2880: 0.000175902; = p2294*(p1020+p1022)
- p1813: 0
- p2337: 0.00067635; = p2228*p2205
- p1198: 0.44
- p2687: 0.000104294; = p2296*(p1019+p1021)
- p3316: 0; = if(and(p1232=0;p3253<>0);1-(p3312+p3313+p3314+p3315);0)
- p1600: 0
- p3016: 0; = p2430*(p1129+p1131)
- p1154: 0.000951502; = if(p1152*p0818=0;0;p1150/(p1152*p0818))
- p0379: 0.5
- p4238: 2.36625e-6; = p1889*p3479
- p2258: 0; = p2226*p2204
- p0353: 0.5
- p3023: 0; = p2242*p1023
- p3315: 0; = if(and(p1232=0;p3253<>0);p3264*p3289;0)
- p1719: 0
- p2213: 4.94445e-5; = p1116-p2212
- p0389: 0.5
- p3313: 0; = if(and(p1232=0;p3253<>0);p3262*(p3278*(p3282*p1256+p3286*(p1253+p1257)+p1258*p3288+p3298*p3287));0)
- p3330: 0; = if(and(p1232=0;p3255<>0);p3255*(p3267-p3325)/p3327;0)
- p2763: 4.53761e-5; = p2372*(p1019+p1021)
- p1779: 0
- p2762: 0.00010584; = p2371*(p1019+p1021)
- p0242: 10.175
- p1326: 0.193719; = IF(((p0745*1000*p0753/100)+(p0754*1000*p0762/100))/p0801<0;0;((p0745*1000*p0753/100)+(p0754*1000*p0762/100))/p0801)
- p0830: 3.60884e10; = p0825*p0821*p0824
- p0554: 0; = IF(p0290<0.5;-SQRT(p0007*EXP(p0422^2*p0008)-p0007);SQRT(p0007*EXP(p0422^2*p0008)-p0007))
- p2385: 3.31895e-6; = p2229*p2214
- p2572: 2.44738e-5; = p2376*p1073
- p0011: 2590.68
- p2558: 0.00013462; = p2362*p1014
- p3087: 3.48961e-8; = p2306*p1082
- p0840: 0.13705; = p0839*p0831
- p1661: 0
- p3466: 0; = p3371*p1241
- p4044: 3.98987e-7; = p1901*p3478
- p0689: 83.879; = p0029*(1+p0557*p0161/100)
- p1213: 0
- p2411: 0; = p2234*p2201
- p2927: 1.34518e-5; = p2341*(p1079+p1081)
- p2506: 3.32393e-5; = p2310*p1073
- p2382: 3.27885e-5; = p2229*p2211
- p2882: 0.00029023; = p2296*(p1020+p1022)
- p1091: 1.03266e-5; = IF(p1071=0;p1085*p0001/(p0818*p0002);0)
- p1088: 32936; = IF(p1071=0;p1082*(p0710/100)*p0703*1000;0)
- p1894: 0
- p2046: 10
- p3386: 0; = p3367*p1234
- p3140: 0; = p2359*p1023
- p1138: 237710; = if(p1121=0;p1132*(p0716/100)*p0703*1000;0)
- p1841: 0
- p3046: 0; = p2265*p1082
- p4526: 1.65024e-6; = p1765*p3481
- p3408: 0; = p3370*p1238
- p2591: 0; = p2395*p1014
- p0130: 14.042
- p2224: 0.111428; = if(p0765*p0769+p0766*p0770+p0767*p0771+p0768*p0772=0;0;p0771*p0767/(p0765*p0769+p0766*p0770+p0767*p0771+p0768*p0772))
- p2246: 1.78014e-5; = p2222*p2191
- p3314: 0; = if(and(p1232=0;p3253<>0);p3263*p3289;0)
- p0108: 83.812
- p2075: 0.072
- p0509: 0; = SQRT(2)*(IF((2*p0377-1)<0;-1;IF((2*p0377-1)>0;1;0))*SQRT(SQRT((2/(pi()*0.140012289)+LN(1-(2*p0377-1)^2)/2)^2-LN(1-(2*p0377-1)^2)/0.140012289)-(2/(pi()*0.140012289)+LN(1-(2*p0377-1)^2)/2)))
- p0502: 0; = SQRT(2)*(IF((2*p0370-1)<0;-1;IF((2*p0370-1)>0;1;0))*SQRT(SQRT((2/(pi()*0.140012289)+LN(1-(2*p0370-1)^2)/2)^2-LN(1-(2*p0370-1)^2)/0.140012289)-(2/(pi()*0.140012289)+LN(1-(2*p0370-1)^2)/2)))
- p1623: 0
- p1732: 0
- p2332: 0.000412039; = p2224*p2200
- p0752: 0
- p3449: 0; = p3373*p1240
- p2143: 1.2907e-7; = p2015*p2071*p2105/(p0818*1000)
- p2543: 0.00023293; = p2347*p1073
- p4856: 0; = p1889*p3482
- p0614: 0; = IF(p0350<0.5;-SQRT(p0007*EXP(p0482^2*p0008)-p0007);SQRT(p0007*EXP(p0482^2*p0008)-p0007))
- p1725: 0
- p1320: 0.409221; = IF(((p0745*1000*p0747/100)+(p0754*1000*p0756/100))/p0801<0;0;((p0745*1000*p0747/100)+(p0754*1000*p0756/100))/p0801)
- p1174: 3.37575e-8; = p1170*p1173/p0818
- p1655: 0.483107
- p2943: 2.99189e-5; = p2357*(p1020+p1022)
- p0004: 0.0254
- p2958: 0.000126274; = p2372*(p1020+p1022)
- p1651: 0.299611
- p2816: 0; = p2425*(p1078+p1080)
- p5131: 1.0607e-6; = p1962*p3483
- p2039: 6.73896e-7; = p2015*p2037*p2038/(p0818*1000)
- p3059: 0; = p2278*p1023
- p1557: 0
- p1963a: 0.000120507; = p1550*p1754+p1551*p1755+p1552*p1756+p1553*p1757+p1554*p1758+p1555*p1759+p1556*p1760+p1557*p1761+p1558*p1762+p1559*p1763+p1560*p1764+p1561*p1765+p1562*p1766+p1563*p1767+p1564*p1768+p1565*p1769+p1566*p1770+p1567*p1771+p1568*p1772
- p2622: 0; = p2426*p1073
- p3319: 0; = if(and(p1232=0;p3253<>0);p3253*(p3263-p3314)/p3316;0)
- p2164: 0.000342274; = (p2015/p0818)-(p2022)-(p2035+p2036+p2052)-(p2017/p0818)-(p2039+p2041+p2044+p2158+p2159+p2160+p2161+p2162)
- p1199: -0.29
- p1853: 0
- p2813: 0; = p2422*(p1078+p1080)
- p1259: 0; = if(p1232>0;0;p0730/100)
- p1966: 8.6e6; = if(p0814=0;p0802;0)
- p2448: 1.40048e-6; = p2252*p1014
- p2648: 2.62098e-5; = p2257*(p1019+p1021)
- p0874: 0; = p0865*p0856
- p0080: 94.604
- p3081: 1.58416e-6; = p2300*p1082
- p2387: 1.04845e-6; = p2229*p2216
- p3378: 0; = if(p1232=0;p3246*p3360/p0818;0)
- p3137: 0; = p2356*p1023
- p2962: 3.05258e-6; = p2376*(p1079+p1081)
- p1664: 0
- p0995: 2.15844e-7; = p0991*p0001*p0004/(p0818*p0002)
- p1298: 0
- p2152: 2.00257e-8; = p2015*p2080*p2114/(p0818*1000)
- p0179: 26.626
- p2582: 1.02745e-5; = p2386*p1073
- p2730: 0.000132314; = p2339*(p1078+p1080)
- p1740: 0
- p2483: 0.00194972; = p2287*p1014
- p3086: 3.33716e-9; = p2305*p1082
- p0868: 0; = IF(p0858+p0864+p0865+p0866+p0867=1;0;IF(p0858+p0864+p0865+p0866+p0867+p0863>1;1-(p0858+p0864+p0865+p0866+p0867);p0863))
- p0361: 0.5
- p2465: 0; = p2269*p1073
- p1346: 417
- p2940: 0.000671488; = p2354*(p1020+p1022)
- p3373: 0; = if(p1232=0;p3245*p3361/p0818;0)
- p2409: 0; = p2234*p2199
- p2640: 1.39402e-5; = p2249*(p1019+p1021)
- p1099: 0.655189
- p1675: 0
- p3895: 2.24067e-6; = p1962*p3477
- p3103: 0; = p2322*p1023
- p1283: 0; = p1277*p1252/p0818
- p0829: 0; = if(p0807=480;p0814*(1-p0824);0)
- p0081: 2.361
- p0733: 0
- p0312: 0.5
- p1723: 0
- p2691: 2.51667e-5; = p2300*(p1078+p1080)
- p2440: 4.11724e-5; = p2244*p1014
- p0581: 0; = IF(p0317<0.5;-SQRT(p0007*EXP(p0449^2*p0008)-p0007);SQRT(p0007*EXP(p0449^2*p0008)-p0007))
- p4157: 2.18729e-7; = p1808*p3479
- p0448: 0; = SQRT(2)*(IF((2*p0316-1)<0;-1;IF((2*p0316-1)>0;1;0))*SQRT(SQRT((2/(pi()*0.140012289)+LN(1-(2*p0316-1)^2)/2)^2-LN(1-(2*p0316-1)^2)/0.140012289)-(2/(pi()*0.140012289)+LN(1-(2*p0316-1)^2)/2)))
- p2630: 1.09271e-6; = p2239*(p1019+p1021)
- p2980: 0; = p2394*(p1020+p1022)
- p3435: 0; = p3378*p1239
- p1743: 0
- p2328: 0.0015324; = p2224*p2196
- p2699: 3.92955e-6; = p2308*(p1078+p1080)
- p3460: 0; = p3365*p1241
- p2230: 0; = if(p0783*p0787+p0784*p0788+p0785*p0789+p0786*p0790=0;0;p0787*p0783/(p0783*p0787+p0784*p0788+p0785*p0789+p0786*p0790))
- p3284: 0
- p1781: 0
- p1599: 0
- p0094: 8848.35
- p3156: 1.51078e-7; = p2375*p1082
- p2917: 1.11746e-6; = p2331*(p1020+p1022)
- p1107: 5.90407e6; = IF(p1071=0;p1105*p1101*p1095;0)
- p1267: 0
- p2138: 7.43105e-8; = p2015*p2066*p2100/(p0818*1000)
- p0286: 0.5
- p1182: 1209.49; = p1181*p0801
- p2549: 4.80474e-5; = p2353*p1123
- p0007: 14; = p0006-1
- p0370: 0.5
- p2856: 0; = p2270*(p1079+p1081)
- p1035: 0; = IF(p1012=0;p1029*p0001/(p0818*p0002);0)
- p2987: 0; = p2401*(p1020+p1022)
- p0834: 0.00038
- p3229: 1.03966e-6; = p1164/p0818
- p2348: 2.3769e-5; = p2228*p2216
- p2013: 0.75
- p2235: 0; = 1-(p2226+p2227+p2228+p2229)
- p2953: 0.00109539; = p2367*(p1020+p1022)
- p3375: 0; = if(p1232=0;p3246*p3357/p0818;0)
- p2785: 0; = p2394*(p1019+p1021)
- p1832: 0
- p0928: 943345; = p0801*p0918
- p2838: 5.17256e-7; = p2252*(p1020+p1022)
- p3344: 0; = if(and(p1232=0;p3254<>0);p3254-(p3339+p3340+p3341+p3342+p3343);0)
- p1571: 0
- p1187: 0.000171162
- p1657: 0
- p3047: 0; = p2266*p1082
- p1735: 0.749667
- p3452: 0; = p3376*p1240
- p0415: 0; = SQRT(2)*(IF((2*p0283-1)<0;-1;IF((2*p0283-1)>0;1;0))*SQRT(SQRT((2/(pi()*0.140012289)+LN(1-(2*p0283-1)^2)/2)^2-LN(1-(2*p0283-1)^2)/0.140012289)-(2/(pi()*0.140012289)+LN(1-(2*p0283-1)^2)/2)))
- p0792: 0
- p2883: 1.45539e-5; = p2297*(p1079+p1081)
- p0088: 58.637
- p1053: 3.4669e7; = IF(p1012=0;p1046*p1036;0)
- p3365: 0; = if(p1232=0;p3244*p3359/p0818;0)
- p2772: 1.82178e-7; = p2381*(p1078+p1080)
- p3364: 0; = if(p1232=0;p3244*p3358/p0818;0)
- p2518: 4.04564e-5; = p2322*p1014
- p3278: 0
- p3896: 2.37975e-5; = p1963*p3477
- p2333: 0.000176651; = p2224*p2201
- p2221: 7.012e-5; = p1155-p2220
- p2042: 0.07
- p1148: 0.0926988; = if(p1121=0;IF(p1146=1;0;1-p1146);0)
- p3098: 0; = p2317*p1023
- p2068: 0.153529
- p2804: 0; = p2413*(p1019+p1021)
- p1054: 4.12584e8; = IF(p1012=0;p1047*p1036;0)
- p0863: 0; = p0675*1000/p0856
- p1309: 0
- p1975: 0.000124906; = p1970*p0001/(p0818*p0002)
- p1062: 0.16
- p2226: 0; = if(p0774*p0778+p0775*p0779+p0776*p0780+p0777*p0781=0;0;p0778*p0774/(p0774*p0778+p0775*p0779+p0776*p0780+p0777*p0781))
- p2196: 0.0137524; = p1068-p2193-p2195
- p2192: 0.00127037; = p1067-p2189-p2190-p2191
- p1985: 3.71593e9; = (if(p1057=0;0;p1050/p1057)+if(p1058=0;0;p1051/p1058)+if(p1059=0;0;p1052/p1059)+if(p1060=0;0;p1053/p1060)+if(p1061=0;0;p1054/p1061)+if(p1062=0;0;p1055/p1062)+if(p1063=0;0;p1056/p1063))*(1+p1157)
- p0045: 66.575
- p1946: 0
- p3001: 0; = p2415*(p1079+p1081)
- p2097: 0.40001
- p2307: 1.43115e-5; = p2227*p2214
- p2638: 1.27292e-5; = p2247*(p1019+p1021)
- p2566: 8.79547e-6; = p2370*p1014
- p2997: 0; = p2411*(p1020+p1022)
- p1983: 50
- p3539: 1.86034e-6; = p1808*p3476
- p0871: 0.782159; = p0870*p0001*p0003/(p0818*p0002)
- p2801: 0; = p2410*(p1019+p1021)
- p2041: 1.14521e-6; = p2015*p2040/(p0818*1000)
- p1750: 0
- p1067: 0.00259694; = IF(p1012=0;p1053/(p1060*p0818);0)
- p1219: 0; = if(p1218=0;0;SQRT(2)*(IF((2*p1218-1)<0;-1;IF((2*p1218-1)>0;1;0))*SQRT(SQRT((2/(pi()*0.140012289)+LN(1-(2*p1218-1)^2)/2)^2-LN(1-(2*p1218-1)^2)/0.140012289)-(2/(pi()*0.140012289)+LN(1-(2*p1218-1)^2)/2))))
- p3021: 0; = p2240*p1023
- p0772: 56.616; = p0112*(1+p0640*p0244/100)
- p1282: 0; = IF(p1277+p1280+p1281=p1260;0;p1260-(p1277+p1280+p1281))
- p0712: 7.276; = p0052*(1+p0580*p0184/100)
- p4410: 0; = p1855*p3480
- p1991: 5.16137e8; = (if(p1111=0;0;p1106/p1111)+if(p1112=0;0;p1107/p1112)+if(p1113=0;0;p1108/p1113)+if(p1114=0;0;p1109/p1114)+if(p1115=0;0;p1110/p1115))*(1+p1157)
- p1258: 0; = if(p1232>0;0;IF(p1253+p1256+p1257=1;0;1-(p1253+p1256+p1257)))
- p2410: 0; = p2234*p2200
- p1208: 0; = p1205*p0818*p0822/p0801
- p3007: 0; = p2421*(p1079+p1081)
- p2913: 3.81185e-5; = p2327*(p1020+p1022)
- p1082: 0.00458; = IF(p1071=0;IF(p1073+p1078+p1079+p1080+p1081=1;0;1-(p1073+p1078+p1079+p1080+p1081));0)
- p1968: 0; = if(p0807=480;p0802*p0811;0)
- p0971: 0; = p0968/p0818
- p1143: 0; = if(p1121=0;p1137*p0001/(p0818*p0002);0)
- p1161: 8.9e6; = p0801
- p2553: 8.10057e-5; = p2357*p1014
- p2935: 2.17971e-5; = p2349*(p1079+p1081)
- p2374: 0.000847314; = p2225*p2203
- p2727: 5.44117e-5; = p2336*(p1078+p1080)
- p4307: 6.62422e-7; = p1962*p3479
- p2517: 0.000188346; = p2321*p1014
- p2233: 0.162746; = if(p0783*p0787+p0784*p0788+p0785*p0789+p0786*p0790=0;0;p0790*p0786/(p0783*p0787+p0784*p0788+p0785*p0789+p0786*p0790))
- p1287: 0
- p0726: 0
- p0965: 0; = IF(p0684/100=1;0;IF(p0684/100+p0685/100>1;1-p0684/100;p0685/100))
- p2204: 0.00092305; = p1109/p0818
- p4322: 0; = p1767*p3480
- p1272: 0; = IF(p1267+p1270+p1271=p1259;0;p1259-(p1267+p1270+p1271))
- p1594: 0
- p0701: 0
- p0799: 14.159; = p0139*(1+p0667*p0271/100)
- p1022: 0.13531; = IF(p1012=0;IF(p1014+p1019+p1020+p1021=1;0;IF(p1014+p1019+p1020+p1021+p1018>1;1-(p1014+p1019+p1020+p1021);p1018));0)
- p0945: 0; = if(and(p0683=0;p0951=0);p0939;0)
- p1729: 0
- p2903: 2.98793e-6; = p2317*(p1020+p1022)
- p2819: 0; = p2428*(p1128+p1130)
- p1734: 0
- p1194: 1.48
- p0184: 35.898
- p0608: 0; = IF(p0344<0.5;-SQRT(p0007*EXP(p0476^2*p0008)-p0007);SQRT(p0007*EXP(p0476^2*p0008)-p0007))
- p3055: 0; = p2274*p1132
- p1329: 0.000128524; = p1328*p0001/(p0818*p0002)
- p1175: 0.000132435
- p1933: 0
- p1935: 0
- p2886: 3.53911e-5; = p2300*(p1079+p1081)
- p0418: 0; = SQRT(2)*(IF((2*p0286-1)<0;-1;IF((2*p0286-1)>0;1;0))*SQRT(SQRT((2/(pi()*0.140012289)+LN(1-(2*p0286-1)^2)/2)^2-LN(1-(2*p0286-1)^2)/0.140012289)-(2/(pi()*0.140012289)+LN(1-(2*p0286-1)^2)/2)))
- p0807: 56
- p0630: 0; = IF(p0366<0.5;-SQRT(p0007*EXP(p0498^2*p0008)-p0007);SQRT(p0007*EXP(p0498^2*p0008)-p0007))
- p2657: 0; = p2266*(p1078+p1080)
- p4136: 4.59959e-7; = p1787*p3479
- p1262: 0; = if(p1232>0;0;p0733/100)
- p1097: 0.0659222
- p0245: 4.332
- p2931: 4.09876e-6; = p2345*(p1079+p1081)
- p0802: 8.6e6
- p3162: 1.14675e-8; = p2381*p1082
- p5146: 8.60893e-7; = p1767*p3484
- p1193: 0; = IF(OR(p1036=0;p1095=0);0.0001*p0857;0)
- p3320: 0; = if(and(p1232=0;p3253<>0);p3253*(p3264-p3315)/p3316;0)
- p0866: 0.0552765; = IF(p0858+p0864+p0865=1;0;IF(p0858+p0864+p0865+p0861>1;1-(p0858+p0864+p0865);p0861))
- p1753: 0
- p1614: 0
- p2335: 0.000291466; = p2224*p2203
- p3292: 0
- p3200: 0; = p2419*p1082
- p0639: 0; = IF(p0375<0.5;-SQRT(p0007*EXP(p0507^2*p0008)-p0007);SQRT(p0007*EXP(p0507^2*p0008)-p0007))
- p4826: 0; = p1859*p3482
- p0654: 0; = IF(p0390<0.5;-SQRT(p0007*EXP(p0522^2*p0008)-p0007);SQRT(p0007*EXP(p0522^2*p0008)-p0007))
- p2245: 7.07882e-5; = p2222*p2190
- p2025: 1.61393e-6; = p2015*p2023*p2024/(p0818*1000)
- p1129: 0; = if(p1121=0;IF(p1123+p1128=1;0;IF(p1123+p1128+p1125>1;1-(p1123+p1128);p1125));0)
- p1602: 0
- p2955: 1.47755e-6; = p2369*(p1020+p1022)
- p2400: 0; = p2234*p2189
- p3464: 0; = p3369*p1241
- p1239: 0; = if(p1232>0;0;IF(p1234+p1238=1;0;IF(p1234+p1238+p1236>1;1-(p1234+p1238);p1236)))
- p2908: 1.49423e-5; = p2322*(p1020+p1022)
- p3127: 3.44612e-7; = p2346*p1082
- p3305: 0; = if(and(p1232=0;p3252<>0);1-(p3301+p3302+p3303+p3304);0)
- p2768: 7.02928e-7; = p2377*(p1078+p1080)
- p1679: 0
- p2443: 9.59083e-5; = p2247*p1014
- p0635: 0; = IF(p0371<0.5;-SQRT(p0007*EXP(p0503^2*p0008)-p0007);SQRT(p0007*EXP(p0503^2*p0008)-p0007))
- p2312: 0; = p2231*p2219
- p1114: 0.216028
- p2339: 0.0018185; = p2228*p2207
- p3097: 0; = p2316*p1023
- p2128: 8.00254e-7; = p2015*p2056*p2090/(p0818*1000)
- p0151: 0
- p2551: 0.000399087; = p2355*p1014
- p2881: 2.53162e-5; = p2295*(p1020+p1022)
- p3231: 1.8541e-8; = p1176/p0818
- p2871: 1.74176e-5; = p2285*(p1020+p1022)
- p0631: 0; = IF(p0367<0.5;-SQRT(p0007*EXP(p0499^2*p0008)-p0007);SQRT(p0007*EXP(p0499^2*p0008)-p0007))
- p2212: 4.72844e-6; = p1106/p0818
- p0819: 0.109735; = p0808*p0809/p0818
- p1226: 8.9e6; = IF(p1221=0;0;IF(p1193=0;p0801;0))
- p2982: 0; = p2396*(p1020+p1022)
- p0859: 0.291088; = p0671*1000/p0856
- p2396: 0; = p2234*p2185
- p3945: 8.00774e-6; = p1802*p3478
- p1072: 0; = p1071*p0001/(p0818*p0002)
- p0507: 0; = SQRT(2)*(IF((2*p0375-1)<0;-1;IF((2*p0375-1)>0;1;0))*SQRT(SQRT((2/(pi()*0.140012289)+LN(1-(2*p0375-1)^2)/2)^2-LN(1-(2*p0375-1)^2)/0.140012289)-(2/(pi()*0.140012289)+LN(1-(2*p0375-1)^2)/2)))
- p1711: 0
- p0897: 0.458721
- p3350: 0; = if(and(p1232=0;p3256<>0);p3256*(p3273*p3277-p3345)/p3349;0)
- p1999: 1.68805e9; = (p1228+p1229)*p0818+p1164
- p2431: 0; = p2236*p2221
- p0983: 0.663248; = if(p0886=0;0;min(1;(p0695*p0694*1000*p0697/100)/p0886))
- p2667: 0.000336132; = p2276*(p1019+p1021)
- p0891: 0; = IF(p3251=0;0;62.4*6272640/(12*12*12))
- p0349: 0.5
- p1726: 0
- p2587: 5.3745e-6; = p2391*p1123
- p4326: 0; = p1771*p3480
- p1037: 0.407994
- p1838: 0
- p2526: 1.37612e-6; = p2330*p1014
- p2932: 7.69885e-6; = p2346*(p1079+p1081)
- p1829: 0
- p1488: 9
- p0899: 3.89281e10; = p0825*p0896+p0827*p0897+(p0830+p0895)*p0824*p0898
- p2625: 0; = p2429*p1123
- p1105: 0.436421
- p1255: 0; = if(p1232>0;0;p0737/100)
- p1085: 735811; = IF(p1071=0;p1079*(p0710/100)*p0703*1000;0)
- p3395: 0; = p3376*p1234
- p1676: 0
- p4308: 7.03539e-6; = p1963*p3479
- p1891: 0
- p1233: 0.000124906; = p1232*p0001/(p0818*p0002)
- p2527: 3.02554e-6; = p2331*p1014
- p1948: 0
- p0293: 0.5
- p0776: 25.001; = p0116*(1+p0644*p0248/100)
- p2695: 1.02872e-5; = p2304*(p1078+p1080)
- p2049: 25.6942
- p2260: 0; = p2226*p2206
- p0419: 0; = SQRT(2)*(IF((2*p0287-1)<0;-1;IF((2*p0287-1)>0;1;0))*SQRT(SQRT((2/(pi()*0.140012289)+LN(1-(2*p0287-1)^2)/2)^2-LN(1-(2*p0287-1)^2)/0.140012289)-(2/(pi()*0.140012289)+LN(1-(2*p0287-1)^2)/2)))
- p0957: 0; = if(and(p0683>0;or(p0807=56;p0807=100;and(p0807=60;p0901>0.06)));p0939;0)
- p2098: 0.856281
- p0237: 35.504
- p0850: 0.32549
- p2641: 0.0001378; = p2250*(p1019+p1021)
- p4253: 4.13387e-8; = p1904*p3479
- p3215: 0.450791; = p1222*3*15.9994/100.0869
- p0981: 0; = p0978*p0001/(p0818*p0002)
- p0777: 17.772; = p0117*(1+p0645*p0249/100)
- p1799: 0
- p1094: 4.62236e-7; = IF(p1071=0;p1088*p0001/(p0818*p0002);0)
- p2036: 5.66437e-6; = p2015*p2030*(1-p2032)/(p0818*1000)
- p1372: 68
- p0431: 0; = SQRT(2)*(IF((2*p0299-1)<0;-1;IF((2*p0299-1)>0;1;0))*SQRT(SQRT((2/(pi()*0.140012289)+LN(1-(2*p0299-1)^2)/2)^2-LN(1-(2*p0299-1)^2)/0.140012289)-(2/(pi()*0.140012289)+LN(1-(2*p0299-1)^2)/2)))
- p2495: 3.4174e-5; = p2299*p1073
- p1064: 0.0102809; = IF(p1012=0;p1050/(p1057*p0818);0)
- p1801: 0
- p2158: 1.42297e-7; = p2015*p2082*p2120/(p0818*1000)
- p0106: 131.068
- p1040: 0.0263929
- p5089: 1.67578e-8; = p1916*p3483
- p3298: 0; = if(p1283+p1284+p1285+p1286=0;0;p1283/(p1283+p1284+p1285+p1286))
- p4456: 0; = p1901*p3480
- p1034: 1.69657e-5; = IF(p1012=0;p1028*p0001/(p0818*p0002);0)
- p0920: 0.206162; = p0676*1000/p0801
- p3062: 0; = p2281*p1023
- p0482: 0; = SQRT(2)*(IF((2*p0350-1)<0;-1;IF((2*p0350-1)>0;1;0))*SQRT(SQRT((2/(pi()*0.140012289)+LN(1-(2*p0350-1)^2)/2)^2-LN(1-(2*p0350-1)^2)/0.140012289)-(2/(pi()*0.140012289)+LN(1-(2*p0350-1)^2)/2)))
- p0963: 0; = if(and(p0683>0;or(p0807=480;p0807=32;p0807=1;and(p0807=60;p0901<0.03)));p0939;0)
- p1029: 0; = IF(p1012=0;IF(p0801<p1023*(p0704/100)*p0703*1000;p0801;p1023*(p0704/100)*p0703*1000);0)
- p1001: 0; = if(p0978>0;0;if(and(p0687=0;p0691=0;p0695=0;p0699=0);0;IF(p0996+p0999+p1000=1;0;1-(p0996+p0999+p1000))))
- p0906: 0.00342907
- p3423: 0; = p3366*p1239
- p0939: 0; = p0933*p0001/(p0818*p0002)
- p2796: 0; = p2405*(p1019+p1021)
- p2973: 1.07277e-7; = p2387*(p1079+p1081)
- p2150: 9.64143e-8; = p2015*p2078*p2112/(p0818*1000)
- p2099: 0.620397
- p1950: 0
- p2264: 0; = p2226*p2210
- p0648: 0; = IF(p0384<0.5;-SQRT(p0007*EXP(p0516^2*p0008)-p0007);SQRT(p0007*EXP(p0516^2*p0008)-p0007))
- p1994: 750
- p0287: 0.5
- p1186: 9.51291e-9; = p1182*p1185/p0818
- p0835: 1444.24; = -LN(1-p0669/100)/p0834
- p2534: 0.000179671; = p2338*p1073
- p1236: 0; = if(p1232>0;0;p0728/100)
- p2852: 0; = p2266*(p1079+p1081)
- p1648: 0
- p3360: 0; = if(p1232=0;p3310+p3321+p3332+p3343+p3354;0)
- p0607: 0; = IF(p0343<0.5;-SQRT(p0007*EXP(p0475^2*p0008)-p0007);SQRT(p0007*EXP(p0475^2*p0008)-p0007))
- p2419: 0; = p2235*p2209
- p2793: 0; = p2402*(p1019+p1021)
- p2172: 0.164041; = p2166-(p2167+p2168+p2169+p2170)
- p2775: 1.28564e-7; = p2384*(p1078+p1080)
- p0306: 0.5
- p2815: 0; = p2424*(p1078+p1080)
- p3072: 0; = p2291*p1023
- p1906: 0
- p0541: 0; = IF(p0277<0.5;-SQRT(p0007*EXP(p0409^2*p0008)-p0007);SQRT(p0007*EXP(p0409^2*p0008)-p0007))
- p1646: 0
- p2663: 0; = p2272*(p1128+p1130)
- p0028: 16.121
- p3333: 0; = if(and(p1232=0;p3255<>0);p3255-(p3328+p3329+p3330+p3331+p3332);0)
- p1030: 8.34745e-5; = IF(p1012=0;p1024*p0001/(p0818*p0002);0)
- p0009: 42.2365
- p0316: 0.5
- p2502: 6.25036e-6; = p2306*p1073
- p3015: 0; = p2429*(p1129+p1131)
- p3252: 0; = p1252*(p1267*(1-p3247)+p1270*(1-p3248)+p1271*(1-p3249)+p1272*(1-p3250))
- p4775: 0; = p1808*p3482
- p1297: 0
- p2914: 0.000376802; = p2328*(p1020+p1022)
- p2052: 1.18538e-6; = p2015*p2049*(1-p2050)/(p0818*1000)
- p2672: 7.91323e-6; = p2281*(p1019+p1021)
- p1947: 0
- p3908: 2.85801e-5; = p1765*p3478
- p3089: 2.47352e-7; = p2308*p1082
- p2967: 2.56191e-7; = p2381*(p1079+p1081)
- p2643: 1.85875e-7; = p2252*(p1019+p1021)
- p0399: 0.5
- p0683: 27397.7; = p0023*(1+p0551*p0155/100)
- p3462: 0; = p3367*p1241
- p2141: 1.67363e-7; = p2015*p2069*p2103/(p0818*1000)
- p2790: 0; = p2399*(p1019+p1021)
- p0724: 0
- p0404: 0.5
- p1892: 0
- p0979: 0; = IF(p0976=0;0;p0976*p0001/(p0818*p0002))
- p0508: 0; = SQRT(2)*(IF((2*p0376-1)<0;-1;IF((2*p0376-1)>0;1;0))*SQRT(SQRT((2/(pi()*0.140012289)+LN(1-(2*p0376-1)^2)/2)^2-LN(1-(2*p0376-1)^2)/0.140012289)-(2/(pi()*0.140012289)+LN(1-(2*p0376-1)^2)/2)))
- p0394: 0.5
- p0788: 11.584; = p0128*(1+p0656*p0260/100)
- p1146: 0.907301
- p2713: 5.36947e-6; = p2322*(p1019+p1021)
- p0837: 0.5
- p2277: 0.000835052; = p2223*p2183
- p2989: 0; = p2403*(p1020+p1022)
- p3296: 0
- p1944: 0
- p2162: 1.56901e-8; = p2015*p2086*p2124/(p0818*1000)
- p2388: 9.39666e-6; = p2229*p2217
- p0795: 147.029; = p0135*(1+p0663*p0267/100)
- p1938: 0
- p2095: 0.765734
- p2617: 0; = p2421*p1073
- p4868: 0; = p1901*p3482
- p1630: 0
- p1092: 0; = IF(p1071=0;p1086*p0001/(p0818*p0002);0)
- p3120: 8.32875e-6; = p2339*p1082
- p1200: 0.84
- p1692: 0.454882
- p0165: 20.124
- p0053: 10.232
- p0932: 1.60705e6; = p0801*p0926
- p0532: 0; = SQRT(2)*(IF((2*p0400-1)<0;-1;IF((2*p0400-1)>0;1;0))*SQRT(SQRT((2/(pi()*0.140012289)+LN(1-(2*p0400-1)^2)/2)^2-LN(1-(2*p0400-1)^2)/0.140012289)-(2/(pi()*0.140012289)+LN(1-(2*p0400-1)^2)/2)))
- p0175: 0
- p3910: 8.09174e-6; = p1767*p3478
- p0870: 5.57317e6; = p0858*p0856
- p0873: 0.363585; = p0872*p0001*p0003/(p0818*p0002)
- p2505: 3.70872e-6; = p2309*p1073
- p3202: 0; = p2421*p1082
- p1819: 3.91687e-6; = p1411*1000/p0818
- p3461: 0; = p3366*p1241
- p0893: 0; = 1000*(p0890+p0892)*p0001*p0003*p0004/(p0818*p0002)
- p1578: 0
- p0178: 21.22
- p3454: 0; = p3378*p1240
- p1310: 0; = IF(p1307=p1266;0;IF(p1307+p1308>p1266;p1266-p1307;p1308))
- p5234: 1.65327e-7; = p1855*p3484
- p3310: 0; = if(and(p1232=0;p3252<>0);IF((p3306+p3307+p3308+p3309)+(p3252*(p3257*(1-p3277))/p3305)>p3252;p3252-(p3306+p3307+p3308+p3309);p3252*(p3257*(1-p3277))/p3305);0)
- p2454: 0; = p2258*p1073
- p2720: 1.11276e-7; = p2329*(p1019+p1021)
- p2511: 0.000625392; = p2315*p1014
- p0129: 84.554
- p2231: 0; = if(p0783*p0787+p0784*p0788+p0785*p0789+p0786*p0790=0;0;p0788*p0784/(p0783*p0787+p0784*p0788+p0785*p0789+p0786*p0790))
- p0526: 0; = SQRT(2)*(IF((2*p0394-1)<0;-1;IF((2*p0394-1)>0;1;0))*SQRT(SQRT((2/(pi()*0.140012289)+LN(1-(2*p0394-1)^2)/2)^2-LN(1-(2*p0394-1)^2)/0.140012289)-(2/(pi()*0.140012289)+LN(1-(2*p0394-1)^2)/2)))
- p2126: 6.99615e-7; = p2015*p2054*p2088/(p0818*1000)
- p3337: 0; = IF(or(p3254=0;p1232>0);0;p3272*p3289)
- p2877: 2.05826e-6; = p2291*(p1020+p1022)
- p1695: 0
- p2057: 3.28794
- p3061: 0; = p2280*p1023
- p0951: 0; = if(and(p0683=0;or(p0807=480;p0807=32;p0807=1;and(p0807=60;p0901<0.03)));p0939;0)
- p0400: 0.5
- p2588: 9.33947e-6; = p2392*p1123
- p2048: 9.62363e-15; = p2015*p2046/(p0818*1000000000000)
- p1595: 0
- p2602: 0; = p2406*p1014
- p3283: 0
- p2786: 0; = p2395*(p1019+p1021)
- p0815: 0
- p0251: 21.979
- p2453: 0.000197478; = p2257*p1014
- p1204: 0.980791
- p1984: 30
- p2961: 3.37517e-6; = p2375*(p1079+p1081)
- p1976: 0.089
- p0102: 19.485
- p1026: 987931; = IF(p1012=0;p1020*(p0704/100)*p0703*1000;0)
- p3269: 0
- p3064: 0; = p2283*p1023
- p0790: 14.042; = p0130*(1+p0658*p0262/100)
- p2047: 2.88709e-14; = p2015*p2045/(p0818*1000000000000)
- p2979: 0; = p2393*(p1020+p1022)
- p2836: 0.000383472; = p2250*(p1020+p1022)
- p0944: 0; = if(and(p0683=0;p0950=0);p0938;0)
- p3367: 0; = if(p1232=0;p3244*p3361/p0818;0)
- p2824: 5.16013e-5; = p2238*(p1020+p1022)
- p0978: 0
- p2310: 4.05189e-5; = p2227*p2217
- p1579: 0
- p0991: 605501; = p0987*p0886
- p1153: 0.365265
- p2116: 0.444424
- p4563: 4.62373e-7; = p1802*p3481
- p0649: 0; = IF(p0385<0.5;-SQRT(p0007*EXP(p0517^2*p0008)-p0007);SQRT(p0007*EXP(p0517^2*p0008)-p0007))
- p1940: 1.17663e-5; = p1532*1000/p0818
- p1084: 523237; = IF(p1071=0;p1078*(p0710/100)*p0703*1000;0)
- p3170: 6.48989e-6; = p2389*p1132
- p1721: 0
- p2035: 2.55691e-6; = p2015*p2029*(1-p2031)/(p0818*1000)
- p1810: 0
- p1922: 0
- p1638: 0
- p2178: 0.0690604; = (p0895*p0831/(1-p0831))/(p0818)
- p2807: 0; = p2416*(p1078+p1080)
- p0846: 0.454008; = p0841*p0845^3+p0842*p0845^2+p0843*p0845+p0844
- p2407: 0; = p2234*p2197
- p3049: 0; = p2268*p1082
- p1167: 0.5
- p2795: 0; = p2404*(p1019+p1021)
- p3429: 0; = p3372*p1239
- p2120: 0.51828
- p0769: 12.603; = p0109*(1+p0637*p0241/100)
- p1025: 418651; = IF(p1012=0;p1019*(p0704/100)*p0703*1000;0)
- p4953: 5.69766e-8; = p1780*p3483
- p1014: 0.66575; = IF(p1012=0;p0705/100;0)
- p2519: 4.63076e-5; = p2323*p1014
- p2066: 0.109412
- p2415: 0; = p2235*p2205
- p0022: 9002.59
- p2907: 6.95643e-5; = p2321*(p1020+p1022)
- p0557: 0; = IF(p0293<0.5;-SQRT(p0007*EXP(p0425^2*p0008)-p0007);SQRT(p0007*EXP(p0425^2*p0008)-p0007))
- p3332: 0; = if(and(p1232=0;p3255<>0);IF((p3328+p3329+p3330+p3331)+(p3255*(p3265*(1-p3277))/p3327)>p3255;p3255-(p3328+p3329+p3330+p3331);p3255*(p3265*(1-p3277))/p3327);0)
- p2412: 0; = p2234*p2202
- p2034: 4.61367e-6; = p2015*p2030*p2032/(p0818*1000)
- p1124: 0.08062; = if(p1121=0;p0718/100;0)
- p0575: 0; = IF(p0311<0.5;-SQRT(p0007*EXP(p0443^2*p0008)-p0007);SQRT(p0007*EXP(p0443^2*p0008)-p0007))
- p3091: 1.85577e-7; = p2310*p1082
- p2478: 0.000762728; = p2282*p1014
- p1612: 0
- p4245: 4.70948e-9; = p1896*p3479
- p4086: 6.99978e-9; = p1943*p3478
- p2964: 8.20748e-6; = p2378*(p1079+p1081)
- p2193: 0.00649011; = p1054/p0818
- p2031: 0.465411
- p1955: 0
- p3335: 0; = IF(or(p3254=0;p1232>0);0;p3270*(p3280*(p3283*p1256+p3286*(p1253+p1257)+p1258*p3288+p3300*p3287)))
- p2614: 0; = p2418*p1073
- p2909: 1.71034e-5; = p2323*(p1020+p1022)
- p0181: 27.216
- p1982: 750
- p2573: 7.92523e-6; = p2377*p1073
- p3420: 0; = p3363*p1239
- p1902: 0
- p0803: 225000
- p1849: 0
- p1338: 831652; = p1324*p0801
- p2628: 8.44728e-5; = p2237*(p1019+p1021)
- p1914: 0
- p3173: 1.15224e-6; = p2392*p1132
- p0832: 1.99557e10; = p0831*p0830/(1-p0831)
- p3303: 0; = if(and(p1232=0;p3252<>0);p3259*p3289;0)
- p0271: 22.22
- p1680: 0
- p0734: 0
- p2181: 244.199; = p0887+p0889+p0893+p2180
- p0694: 3829.84; = p0034*(1+p0562*p0166/100)
- p2010: 0.00149919; = ((p1984*p1985+p1990*p1991+p1996*p1997+p2004*p2005)/p0818)*p0005*p0002/1000
- p1919: 0
- p2740: 1.55e-5; = p2349*(p1078+p1080)
- p2433: 0.000636462; = p2237*p1014
- p2324: 1.74918e-5; = p2224*p2191
- p0755: 22.152; = p0095*(1+p0623*p0227/100)
- p0444: 0; = SQRT(2)*(IF((2*p0312-1)<0;-1;IF((2*p0312-1)>0;1;0))*SQRT(SQRT((2/(pi()*0.140012289)+LN(1-(2*p0312-1)^2)/2)^2-LN(1-(2*p0312-1)^2)/0.140012289)-(2/(pi()*0.140012289)+LN(1-(2*p0312-1)^2)/2)))
- p0078: 9002.59
- p0880: 0; = p0868*p0856
- p0623: 0; = IF(p0359<0.5;-SQRT(p0007*EXP(p0491^2*p0008)-p0007);SQRT(p0007*EXP(p0491^2*p0008)-p0007))
- p5132: 1.12654e-5; = p1963*p3483
- p2831: 1.74061e-5; = p2245*(p1020+p1022)
- p2764: 6.53064e-6; = p2373*(p1019+p1021)
- p3100: 0; = p2319*p1023
- p2725: 2.24647e-6; = p2334*(p1019+p1021)
- p0358: 0.5
- p2352: 3.37843e-5; = p2232*p2220
- p2690: 3.03106e-6; = p2299*(p1078+p1080)
- p1322: 0.120981; = IF(((p0745*1000*p0749/100)+(p0754*1000*p0758/100))/p0801<0;0;((p0745*1000*p0749/100)+(p0754*1000*p0758/100))/p0801)
- p1992: 3900
- p0452: 0; = SQRT(2)*(IF((2*p0320-1)<0;-1;IF((2*p0320-1)>0;1;0))*SQRT(SQRT((2/(pi()*0.140012289)+LN(1-(2*p0320-1)^2)/2)^2-LN(1-(2*p0320-1)^2)/0.140012289)-(2/(pi()*0.140012289)+LN(1-(2*p0320-1)^2)/2)))
- p0449: 0; = SQRT(2)*(IF((2*p0317-1)<0;-1;IF((2*p0317-1)>0;1;0))*SQRT(SQRT((2/(pi()*0.140012289)+LN(1-(2*p0317-1)^2)/2)^2-LN(1-(2*p0317-1)^2)/0.140012289)-(2/(pi()*0.140012289)+LN(1-(2*p0317-1)^2)/2)))
- p2190: 0.000624232; = 32.065*p2189/(2*14.0067)
- p0374: 0.5
- p2714: 6.14606e-6; = p2323*(p1019+p1021)
- p0745: 23519.6; = p0085*(1+p0613*p0217/100)
- p3467: 0; = p3372*p1241
- p1998: 72
- p3080: 1.90795e-7; = p2299*p1082
- p1815: 0
- p2229: 0.0357363; = if(p0774*p0778+p0775*p0779+p0776*p0780+p0777*p0781=0;0;p0781*p0777/(p0774*p0778+p0775*p0779+p0776*p0780+p0777*p0781))
- p1789: 0
- p2637: 1.57293e-6; = p2246*(p1019+p1021)
- p2722: 4.01558e-7; = p2331*(p1019+p1021)
- p2555: 4.28008e-5; = p2359*p1014
- p1704: 0
- p0779: 9.421; = p0119*(1+p0647*p0251/100)
- p2096: 0.486404
- p2472: 0.0025326; = p2276*p1014
- p2769: 5.83636e-6; = p2378*(p1078+p1080)
- p2359: 6.42896e-5; = p2225*p2187
- p2833: 3.5423e-5; = p2247*(p1020+p1022)
- p3354: 0; = IF((p3350+p3351+p3352+p3353)+IF(p3349=0;0;(p3256*(p3273*(1-p3277))/p3349))>p3256;p3256-(p3350+p3351+p3352+p3353);IF(p3349=0;0;p3256*(p3273*(1-p3277))/p3349))
- p0907: 0.00295453
- p1890: 0
- p2497: 4.53617e-5; = p2301*p1073
- p2758: 0.000393627; = p2367*(p1019+p1021)
- p0227: 20.253
- p2996: 0; = p2410*(p1020+p1022)
- p2051: 2.35418e-5; = p2015*p2049*p2050/(p0818*1000)
- p0216: 7.465
- p2292: 1.84037e-5; = p2223*p2199
- p3370: 0; = if(p1232=0;p3245*p3358/p0818;0)
- p1666: 0
- p1300: 0; = IF(p1297=p1265;0;IF(p1297+p1298>p1265;p1265-p1297;p1298))
- p1632: 0
- p3037: 0; = p2256*p1023
- p1766: 0
- p0713: 10.232; = p0053*(1+p0581*p0185/100)
- p0948: 0; = if(and(p0683=0;or(p0807=480;p0807=32;p0807=1;and(p0807=60;p0901<0.03)));p0936;0)
- p2586: 7.41295e-5; = p2390*p1123
- p1722: 0.728757
- p2803: 0; = p2412*(p1019+p1021)
- p3198: 0; = p2417*p1082
- p2353: 5.87083e-5; = p2232*p2221
- p2998: 0; = p2412*(p1020+p1022)
- p3249: 0
- p3039: 0; = p2258*p1082
- p2613: 0; = p2417*p1073
- p2166: 0.318878; = p2165*p0824
- p0693: 62.859; = p0033*(1+p0561*p0165/100)
- p0781: 5.143; = p0121*(1+p0649*p0253/100)
- p2770: 9.33049e-7; = p2379*(p1078+p1080)
- p0020: 943.345
- p0531: 0; = SQRT(2)*(IF((2*p0399-1)<0;-1;IF((2*p0399-1)>0;1;0))*SQRT(SQRT((2/(pi()*0.140012289)+LN(1-(2*p0399-1)^2)/2)^2-LN(1-(2*p0399-1)^2)/0.140012289)-(2/(pi()*0.140012289)+LN(1-(2*p0399-1)^2)/2)))
- p3439: 0; = p3363*p1240
- p1211: 0.6
- p0006: 15
- p0111: 76.224
- p2489: 0.00111087; = p2293*p1014
- p3923: 4.75985e-7; = p1780*p3478
- p1925: 0
- p1058: 0.225
- p2377: 9.66091e-6; = p2229*p2206
- p3190: 0; = p2409*p1023
- p2055: 5.59471
- p3042: 0; = p2261*p1082
- p3474: 0; = p3379*p1241
- p0720: 0
- p4650: 1.82767e-6; = p1889*p3481
- p2828: 5.53408e-6; = p2242*(p1020+p1022)
- p0474: 0; = SQRT(2)*(IF((2*p0342-1)<0;-1;IF((2*p0342-1)>0;1;0))*SQRT(SQRT((2/(pi()*0.140012289)+LN(1-(2*p0342-1)^2)/2)^2-LN(1-(2*p0342-1)^2)/0.140012289)-(2/(pi()*0.140012289)+LN(1-(2*p0342-1)^2)/2)))
- p0558: 0; = IF(p0294<0.5;-SQRT(p0007*EXP(p0426^2*p0008)-p0007);SQRT(p0007*EXP(p0426^2*p0008)-p0007))
- p3291: 0
- p1277: 0
- p5028: 1.86012e-7; = p1855*p3483
- p2346: 7.52429e-5; = p2228*p2214
- p1104: 0.254708; = IF(p1071=0;IF(p1096+p1101+p1102+p1103=1;0;1-(p1096+p1101+p1102+p1103));0)
- p1742: 0
- p2475: 0.000112843; = p2279*p1014
- p3180: 0; = p2399*p1023
- p3174: 0; = p2393*p1023
- p0043: 9002.59
- p0565: 0; = IF(p0301<0.5;-SQRT(p0007*EXP(p0433^2*p0008)-p0007);SQRT(p0007*EXP(p0433^2*p0008)-p0007))
- p1879: 0
- p4910: 0; = p1943*p3482
- p1696: 0
- p3132: 4.70501e-5; = p2351*p1132
- p1214: 0; = IF(p1213=0;0;p1213-1)
- p0002: 0.453592
- p0903: 0.0106556
- p1173: 0.5
- p1751: 0
- p1263: 0; = if(p1232>0;0;IF(p1259=1;0;IF(p1259+p1260>1;1-p1259;p1260)))
- p2860: 0; = p2274*(p1129+p1131)
- p2492: 0.000785802; = p2296*p1014
- p0843: 0.200228
- p3029: 0; = p2248*p1023
- p1937: 0
- p0881: 0; = p0880*p0001*p0003/(p0818*p0002)
- p1049: 0.178958; = IF(p1012=0;IF(p1037+p1044+p1045+p1046+p1047+p1048=1;0;1-(p1037+p1044+p1045+p1046+p1047+p1048));0)
- p0883: 0; = p0882*p0001*p0003/(p0818*p0002)
- p3004: 0; = p2418*(p1079+p1081)
- p1717: 0
- p3221: 0.146975; = IF(p3216=0;0;p1223*12.0107/100.0869+(1-p1224)*12.0107/84.3139)
- p0663: 0; = IF(p0399<0.5;-SQRT(p0007*EXP(p0531^2*p0008)-p0007);SQRT(p0007*EXP(p0531^2*p0008)-p0007))
- p2994: 0; = p2408*(p1020+p1022)
- p4906: 0; = p1939*p3482
- p3022: 0; = p2241*p1023
- p3348: 0; = if(and(p1232=0;p3256<>0);p3276*p3289;0)
- p0853: 0.0254958; = p0803/(p0802+p0803)
- p1893: 0
- p2941: 0.0001474; = p2355*(p1020+p1022)
- p0244: 14.426
- p1867: 0
- p0816: 0
- p5112: 2.2623e-7; = p1939*p3483
- p3256: 0; = p1252*(p1307*(1-p3247)+p1310*(1-p3248)+p1311*(1-p3249)+p1312*(1-p3250))
- p2029: 4.97
- p0884: 16.121; = IF(p0689=100;0;IF(p0689+p0688>100;100-p0689;p0688))
- p0135: 147.029
- p1115: 0.237849
- p1728: 0
- p2053: 1.45647
- p3151: 0; = p2370*p1023
- p3299: 0; = if(p1303+p1304+p1305+p1306=0;0;p1303/(p1303+p1304+p1305+p1306))
- p0729: 0
- p1157: 0.235526
- p0633: 0; = IF(p0369<0.5;-SQRT(p0007*EXP(p0501^2*p0008)-p0007);SQRT(p0007*EXP(p0501^2*p0008)-p0007))
- p1834: 0
- p3002: 0; = p2416*(p1079+p1081)
- p2146: 1.98868e-8; = p2015*p2074*p2108/(p0818*1000)
- p1285: 0; = p1281*p1252/p0818
- p2542: 6.17247e-5; = p2346*p1073
- p2323: 6.95571e-5; = p2224*p2190
- p0839: 0.384894; = p0838/p0818
- p3179: 0; = p2398*p1023
- p2021: 2.49461e-5; = p2020/p0818
- p0163: 12.548
- p2639: 6.50314e-5; = p2248*(p1019+p1021)
- p0479: 0; = SQRT(2)*(IF((2*p0347-1)<0;-1;IF((2*p0347-1)>0;1;0))*SQRT(SQRT((2/(pi()*0.140012289)+LN(1-(2*p0347-1)^2)/2)^2-LN(1-(2*p0347-1)^2)/0.140012289)-(2/(pi()*0.140012289)+LN(1-(2*p0347-1)^2)/2)))
- p1245: 0; = if(p1232>0;0;p1240*(p0725/100)*p0723*1000)
- p2811: 0; = p2420*(p1078+p1080)
- p4471: 0; = p1916*p3480
- p2018: 0.1978
- p1752: 0
- p3030: 0; = p2249*p1023
- p1229: 0.00146321; = IF(p1221=0;0;p1228*p1221)
- p1306: 0; = p1302*p1252/p0818
- p0902: 0.0130121
- p3241: 1.33795e-10; = p3234*p1188*p3236/p0818
- p1284: 0; = p1280*p1252/p0818
- p2487: 5.57275e-6; = p2291*p1014
- p0516: 0; = SQRT(2)*(IF((2*p0384-1)<0;-1;IF((2*p0384-1)>0;1;0))*SQRT(SQRT((2/(pi()*0.140012289)+LN(1-(2*p0384-1)^2)/2)^2-LN(1-(2*p0384-1)^2)/0.140012289)-(2/(pi()*0.140012289)+LN(1-(2*p0384-1)^2)/2)))
- p1633: 0
- p1251: 0; = if(p1232>0;0;p1246*p0001/(p0818*p0002))
- p0878: 244185; = p0867*p0856
- p2680: 0.00054833; = p2289*(p1019+p1021)
- p2464: 0; = p2268*p1073
- p1112: 0.209482
- p2560: 0.000273963; = p2364*p1014
- p0547: 0; = IF(p0283<0.5;-SQRT(p0007*EXP(p0415^2*p0008)-p0007);SQRT(p0007*EXP(p0415^2*p0008)-p0007))
- p3203: 0; = p2422*p1082
- p1843: 0
- p1805: 0
- p2978: 0; = p2392*(p1129+p1131)
- p3031: 0; = p2250*p1023
- p1601: 0
- p2928: 5.80803e-6; = p2342*(p1079+p1081)
- p2868: 0.000281708; = p2282*(p1020+p1022)
- p2414: 0; = p2235*p2204
- p3209: 0; = p2428*p1132
- p3224: 0.501945; = IF(p3216=0;0;1-p3221-p3222-p3223)
- p1643: 0
- p0097: 6.917
- p3876: 4.77899e-7; = p1939*p3477
- p2446: 0.00103825; = p2250*p1014
- p2919: 4.34367e-5; = p2333*(p1020+p1022)
- p2830: 1.52067e-5; = p2244*(p1020+p1022)
- p2799: 0; = p2408*(p1019+p1021)
- p3034: 0; = p2253*p1023
- p0019: 2554.37
- p2171: 0.176329; = p2165*p0831
- p2254: 0.000419332; = p2222*p2200
- p2406: 0; = p2234*p2196
- p3405: 0; = p3367*p1238
- p0990: 0; = p0986*p0886
- p0865: 0; = IF(p0858+p0864=1;0;IF(p0858+p0864+p0860>1;1-(p0858+p0864);p0860))
- p2777: 9.11294e-7; = p2386*(p1078+p1080)
- p0477: 0; = SQRT(2)*(IF((2*p0345-1)<0;-1;IF((2*p0345-1)>0;1;0))*SQRT(SQRT((2/(pi()*0.140012289)+LN(1-(2*p0345-1)^2)/2)^2-LN(1-(2*p0345-1)^2)/0.140012289)-(2/(pi()*0.140012289)+LN(1-(2*p0345-1)^2)/2)))
- p1770: 0
- p0684: 0
- p2357: 0.000121676; = p2225*p2185
- p5275: 6.70245e-9; = p1896*p3484
- p1963g: 3.49868e-5; = p1667*p1871+p1668*p1872+p1669*p1873+p1670*p1874+p1671*p1875+p1672*p1876+p1673*p1877+p1674*p1878+p1675*p1879+p1676*p1880+p1677*p1881+p1678*p1882+p1679*p1883+p1680*p1884+p1681*p1885+p1682*p1886+p1683*p1887+p1684*p1888+p1685*p1889
- p2539: 0.000609791; = p2343*p1073
- p0591: 0; = IF(p0327<0.5;-SQRT(p0007*EXP(p0459^2*p0008)-p0007);SQRT(p0007*EXP(p0459^2*p0008)-p0007))
- p3114: 0; = p2333*p1023
- p0658: 0; = IF(p0394<0.5;-SQRT(p0007*EXP(p0526^2*p0008)-p0007);SQRT(p0007*EXP(p0526^2*p0008)-p0007))
- p2255: 0.000179777; = p2222*p2201
- p2302: 2.50056e-5; = p2227*p2209
- p3205: 0; = p2424*p1082
- p0542: 0; = IF(p0278<0.5;-SQRT(p0007*EXP(p0410^2*p0008)-p0007);SQRT(p0007*EXP(p0410^2*p0008)-p0007))
- p2401: 0; = p2234*p2190
- p2499: 8.85689e-6; = p2303*p1073
- p5198: 1.85435e-7; = p1819*p3484
- p0905: 0.0208687; = p0904/p0818
- p2456: 0; = p2260*p1073
- p3413: 0; = p3375*p1238
- p0657: 0; = IF(p0393<0.5;-SQRT(p0007*EXP(p0525^2*p0008)-p0007);SQRT(p0007*EXP(p0525^2*p0008)-p0007))
- p3704: 2.04612e-6; = p1767*p3477
- p1823: 0
- p2590: 0; = p2394*p1014
- p0930: 1.83484e6; = p0801*p0924
- p3484: 0.0473426; = IF(p1344=0;0;p1344/(p1328+p1330+p1332+p1334+p1336+p1338+p1340+p1342+p1344))
- p2929: 7.60585e-5; = p2343*(p1079+p1081)
- p2870: 6.92621e-5; = p2284*(p1020+p1022)
- p0236: 0.503
- p3033: 0; = p2252*p1023
- p3139: 0; = p2358*p1023
- p2304: 0.000141386; = p2227*p2211
- p0258: 4.696
- p0392: 0.5
- p1343: 2.41966e-5; = p1342*p0001/(p0818*p0002)
- p2945: 1.58082e-5; = p2359*(p1020+p1022)
- p1889: 7.11328e-5; = p1481*1000/p0818
- p2070: 0.282
- p1345: 2.1506e-5; = IF(p1318=0;p1344*p0001/(p0818*p0002);0)
- p2160: 6.89542e-8; = p2015*p2084*p2122/(p0818*1000)
- p1046: 0.0263929; = IF(p1012=0;IF(p1037+p1044+p1045=1;0;IF(p1037+p1044+p1045+p1040>1;1-(p1037+p1044+p1045);p1040));0)
- p0998: 0; = if(p0888=0;0;if((p0699*p0698*1000*p0700/100)/p0888>1;1;(p0699*p0698*1000*p0700/100)/p0888))
- p2112: 0.856281
- p3792: 3.9294e-7; = p1855*p3477
- p3129: 1.08862e-7; = p2348*p1082
- p2726: 2.5754e-5; = p2335*(p1019+p1021)
- p2724: 1.56089e-5; = p2333*(p1019+p1021)
- p2512: 0.000137281; = p2316*p1014
- p1165: 0.000124906; = p0801*p0001/(p0818*p0002)
- p1973: 0; = if(p0807=480;p1968*p0001/(p0818*p0002);0)
- p0961: 0; = if(and(p0683>0;or(p0807=480;p0807=32;p0807=1;and(p0807=60;p0901<0.03)));p0937;0)
- p1011: 0; = p1010*p0001*p0004/(p0818*p0002)
- p2709: 3.69832e-6; = p2318*(p1019+p1021)
- p3334: 0; = IF(or(p3254=0;p1232>0);0;p3269*p3277*(p3300*p3292+(1-p3300)*p3296))
- p0895: 7.93945e9; = p0894*p0830
- p1809: 0
- p5133: 3.10547e-7; = p1754*p3484
- p0152: 0
- p4719: 5.11648e-7; = p1962*p3481
- p2073: 0.377647
- p1903: 0
- p4320: 0; = p1765*p3480
- p0584: 0; = IF(p0320<0.5;-SQRT(p0007*EXP(p0452^2*p0008)-p0007);SQRT(p0007*EXP(p0452^2*p0008)-p0007))
- p2136: 5.57642e-7; = p2015*p2064*p2098/(p0818*1000)
- p2597: 0; = p2401*p1014
- p4822: 0; = p1855*p3482
- p1128: 0.08062; = if(p1121=0;IF(p1123=1;0;IF(p1123+p1124>1;1-p1123;p1124));0)
- p1286: 0; = p1282*p1252/p0818
- p0727: 0
- p0026: 6496.37
- p3550: 1.10819e-6; = p1819*p3476
- p3196: 0; = p2415*p1082
- p3048: 0; = p2267*p1082
- p1311: 0; = IF(p1307+p1310=p1266;0;IF(p1307+p1310+p1309>p1266;p1266-(p1307+p1310);p1309))
- p5032: 8.37891e-9; = p1859*p3483
- p0845: 0.5
- p1644: 0
- p2266: 0; = p2226*p2212
- p0679: 2554.37; = p0019*(1+p0547*p0151/100)
- p3357: 0; = if(p1232=0;p3307+p3318+p3329+p3340+p3351;0)
- p2650: 0; = p2259*(p1078+p1080)
- p3158: 4.4247e-8; = p2377*p1082
- p1713: 0
- p2287: 0.00292861; = p2223*p2193
- p2605: 0; = p2409*p1014
- p2500: 0.000115985; = p2304*p1073
- p1965: 0.000392424; = p1963+p1959*p1964*1000/p0818
- p2272: 0; = p2230*p2218
- p2144: 1.10423e-7; = p2015*p2072*p2106/(p0818*1000)
- p1621: 0
- p0914: 6.52153e8; = p0825*p0911+p0827*p0912+(p0830+p0895)*p0824*p0913
- p1963j: 1.07354e-5; = p1725*p1929+p1726*p1930+p1727*p1931+p1728*p1932+p1729*p1933+p1730*p1934+p1731*p1935+p1732*p1936+p1733*p1937+p1734*p1938+p1735*p1939+p1736*p1940+p1737*p1941+p1738*p1942+p1739*p1943+p1740*p1944+p1741*p1945+p1742*p1946+p1743*p1947
- p3092: 0; = p2311*p1132
- p0301: 0.5
- p1033: 5.20344e-6; = IF(p1012=0;p1027*p0001/(p0818*p0002);0)
- p0518: 0; = SQRT(2)*(IF((2*p0386-1)<0;-1;IF((2*p0386-1)>0;1;0))*SQRT(SQRT((2/(pi()*0.140012289)+LN(1-(2*p0386-1)^2)/2)^2-LN(1-(2*p0386-1)^2)/0.140012289)-(2/(pi()*0.140012289)+LN(1-(2*p0386-1)^2)/2)))
- p2219: 0.000556558; = p1154-p2218
- p2884: 1.31629e-5; = p2298*(p1079+p1081)
- p1883: 0
- p2610: 0; = p2414*p1073
- p3346: 0; = if(and(p1232=0;p3256<>0);p3274*(p3281*(p3285*p1256+p3286*(p1253+p1257)+p1258*p3288));0)
- p0847: 0.0112525
- p2416: 0; = p2235*p2206
- p2765: 7.48687e-5; = p2374*(p1019+p1021)
- p3107: 0; = p2326*p1023
- p1273: 0; = p1267*p1252/p0818
- p0294: 0.5
- p0780: 82.882; = p0120*(1+p0648*p0252/100)
- p0046: 4.686
- p1620: 0
- p2698: 1.0413e-6; = p2307*(p1078+p1080)
- p4082: 1.88994e-6; = p1939*p3478
- p1304: 0; = p1300*p1252/p0818
- p0561: 0; = IF(p0297<0.5;-SQRT(p0007*EXP(p0429^2*p0008)-p0007);SQRT(p0007*EXP(p0429^2*p0008)-p0007))
- p2757: 3.98205e-5; = p2366*(p1019+p1021)
- p4760: 0; = p1793*p3482
- p1709: 0
- p2458: 0; = p2262*p1073
- p3404: 0; = p3366*p1238
- p1120: 0.00150869; = IF(p1071=0;p1110/(p1115*p0818);0)
- p1797: 0
- p3041: 0; = p2260*p1082
- p1039: 0.0667372
- p0856: 8.9e6; = p0801
- p0606: 0; = IF(p0342<0.5;-SQRT(p0007*EXP(p0474^2*p0008)-p0007);SQRT(p0007*EXP(p0474^2*p0008)-p0007))
- p1628: 0
- p0283: 0.5
- p2262: 0; = p2226*p2208
- p0900: 0.612354; = p0899/p0818
- p0475: 0; = SQRT(2)*(IF((2*p0343-1)<0;-1;IF((2*p0343-1)>0;1;0))*SQRT(SQRT((2/(pi()*0.140012289)+LN(1-(2*p0343-1)^2)/2)^2-LN(1-(2*p0343-1)^2)/0.140012289)-(2/(pi()*0.140012289)+LN(1-(2*p0343-1)^2)/2)))
- p3457: 0; = p3362*p1241
- p3116: 0; = p2335*p1023
- p1240: 0; = if(p1232>0;0;IF(p1234+p1238+p1239=1;0;IF(p1234+p1238+p1239+p1237>1;1-(p1234+p1238+p1239);p1237)))
- p3094: 0; = p2313*p1132
- p2910: 4.30106e-6; = p2324*(p1020+p1022)
- p2206: 0.000270339; = 9*1.00794*p2204/30.973762
- p0003: 10000
- p0719: 0
- p2113: 0.832356
- p1576: 0.47191
- p0443: 0; = SQRT(2)*(IF((2*p0311-1)<0;-1;IF((2*p0311-1)>0;1;0))*SQRT(SQRT((2/(pi()*0.140012289)+LN(1-(2*p0311-1)^2)/2)^2-LN(1-(2*p0311-1)^2)/0.140012289)-(2/(pi()*0.140012289)+LN(1-(2*p0311-1)^2)/2)))
- p1986: 4200
- p3035: 0; = p2254*p1023
- p0422: 0; = SQRT(2)*(IF((2*p0290-1)<0;-1;IF((2*p0290-1)>0;1;0))*SQRT(SQRT((2/(pi()*0.140012289)+LN(1-(2*p0290-1)^2)/2)^2-LN(1-(2*p0290-1)^2)/0.140012289)-(2/(pi()*0.140012289)+LN(1-(2*p0290-1)^2)/2)))
- p1912: 0
- p0195: 0
- p3318: 0; = if(and(p1232=0;p3253<>0);p3253*(p3262-p3313)/p3316;0)
- p1715: 0
- p0385: 0.5
- p0082: 92.693
- p2594: 0; = p2398*p1014
- p2189: 0.000545356; = p1053/p0818
- p1840: 0
- p5322: 7.44717e-10; = p1943*p3484
- p1739: 0.583082
- p0381: 0.5
- p2900: 0; = p2314*(p1129+p1131)
- p2442: 1.18513e-5; = p2246*p1014
- p0560: 0; = IF(p0296<0.5;-SQRT(p0007*EXP(p0428^2*p0008)-p0007);SQRT(p0007*EXP(p0428^2*p0008)-p0007))
- p0882: 0; = p0869*p0856
- p2369: 6.00898e-6; = p2225*p2198
- p2684: 0.000147437; = p2293*(p1019+p1021)
- p3409: 0; = p3371*p1238
- p0321: 0.5
- p4687: 8.08345e-10; = p1926*p3481
- p0718: 8.062; = p0058*(1+p0586*p0190/100)
- p0105: 131.806
- p0770: 50.432; = p0110*(1+p0638*p0242/100)
- p2493: 0.000116684; = p2297*p1073
- p0851: 0.5
- p2275: 0; = p2230*p2221
- p2537: 0.000107848; = p2341*p1073
- p3124: 3.40449e-6; = p2343*p1082
- p4258: 1.25586e-8; = p1909*p3479
- p1684: 0
- p0095: 22.152
- p1822: 0
- p1821: 0
- p5150: 5.19664e-6; = p1771*p3484
- p2797: 0; = p2406*(p1019+p1021)
- p0857: 1.24906; = p0856*p0001*p0003/(p0818*p0002)
- p0052: 7.276
- p3433: 0; = p3376*p1239
- p3248: 0
- p0811: 0; = if(p0807=480;1-p0810;0)
- p2823: 0.000235073; = p2237*(p1020+p1022)
- p2139: 2.66564e-7; = p2015*p2067*p2101/(p0818*1000)
- p2501: 5.9773e-7; = p2305*p1073
- p1866: 0
- p4289: 3.9141e-7; = p1940*p3479
- p2599: 0; = p2403*p1014
- p2595: 0; = p2399*p1014
- p3385: 0; = p3366*p1234
- p0112: 56.616
- p3067: 0; = p2286*p1023
- p0825: 5.59215e10; = p0818*p0822
- p2083: 2.17294
- p1720: 0
- p4032: 3.1653e-5; = p1889*p3478
- p0885: 0; = IF(p0689+p0884=100;0;100-(p0689+p0884))
- p2119: 0.679049
- p2173: 0.0572899; = p0895*p0898/p0818
- p2933: 2.9053e-5; = p2347*(p1079+p1081)
- p2747: 3.12134e-6; = p2356*(p1019+p1021)
- p2170: 0.00484474; = p2166*(p0913)
- p4738: 0; = p1771*p3482
- p2756: 0.000185763; = p2365*(p1019+p1021)
- p1637: 0
- p4002: 6.99978e-8; = p1859*p3478
- p3032: 0; = p2251*p1023
- p1747: 0
- p2183: 0.00185057; = p1064-p2182
- p2223: 0.451241; = if(p0765*p0769+p0766*p0770+p0767*p0771+p0768*p0772=0;0;p0770*p0766/(p0765*p0769+p0766*p0770+p0767*p0771+p0768*p0772))
- p4069: 1.39996e-8; = p1926*p3478
- p2729: 1.59359e-5; = p2338*(p1078+p1080)
- p3380: 0; = p3251/p0818
- p4342: 0; = p1787*p3480
- p0248: 6.548
- p3134: 5.92777e-6; = p2353*p1132
- p4907: 0; = p1940*p3482
- p0650: 0; = IF(p0386<0.5;-SQRT(p0007*EXP(p0518^2*p0008)-p0007);SQRT(p0007*EXP(p0518^2*p0008)-p0007))
- p2902: 5.07038e-5; = p2316*(p1020+p1022)
- p0136: 99.239
- p2064: 0.676706
- p0686: 6496.37; = p0026*(1+p0554*p0158/100)
- p1144: 3.33611e-6; = if(p1121=0;p1138*p0001/(p0818*p0002);0)
- p1147: 0.0926988
- p1791: 0
- p0919: 0.22027; = p0678*1000/p0801
- p2892: 7.796e-7; = p2306*(p1079+p1081)
- p2981: 0; = p2395*(p1020+p1022)
- p3391: 0; = p3372*p1234
- p2017: 2.80639e7; = p2015*p0898
- p3329: 0; = if(and(p1232=0;p3255<>0);p3255*(p3266-p3324)/p3327;0)
- p3477: 0.112521; = if(p1328+p1330+p1332+p1334+p1336+p1338+p1340+p1342+p1344=0;0;p1330/(p1328+p1330+p1332+p1334+p1336+p1338+p1340+p1342+p1344))
- p3012: 0; = p2426*(p1079+p1081)
- p0239: 19.08
- p1100: 0.254708
- p1917: 0
- p1653: 0
- p2568: 0.000341887; = p2372*p1014
- p1554: 0
- p3104: 0; = p2323*p1023
- p1563: 0.693253
- p2839: 1.13724e-6; = p2253*(p1020+p1022)
- p1707: 0
- p0896: 0.443532
- p4514: 0; = p1963*p3480
- p1493: 57
- p3186: 0; = p2405*p1023
- p0927: 0; = IF(p0918+p0923+p0924+p0925+p0926=1;0;1-(p0918+p0923+p0924+p0925+p0926))
- p4981: 3.50238e-7; = p1808*p3483
- p0180: 39.137
- p2103: 0.912485
- p3306: 0; = if(and(p1232=0;p3252<>0);p3252*(p3257*p3277-p3301)/p3305;0)
- p2984: 0; = p2398*(p1020+p1022)
- p1192: 1.19814e-8; = p1188*p1191/p0818
- p0188: 24.476
- p1332: 1.44032e7; = p1321*p0801
- p2827: 3.84518e-5; = p2241*(p1020+p1022)
- p3469: 0; = p3374*p1241
- p2259: 0; = p2226*p2205
- p2531: 0.000194044; = p2335*p1014
- p2044: 4.28769e-8; = p2015*p2042*p2043/(p0818*1000)
- p1969: 225000; = p0803
- p2598: 0; = p2402*p1014
- p4047: 5.52982e-7; = p1904*p3478
- p1705: 0.453667
- p2810: 0; = p2419*(p1078+p1080)
- p1786: 0
- p0369: 0.5
- p2580: 1.44951e-6; = p2384*p1073
- p0622: 0; = IF(p0358<0.5;-SQRT(p0007*EXP(p0490^2*p0008)-p0007);SQRT(p0007*EXP(p0490^2*p0008)-p0007))
- p0412: 0; = SQRT(2)*(IF((2*p0280-1)<0;-1;IF((2*p0280-1)>0;1;0))*SQRT(SQRT((2/(pi()*0.140012289)+LN(1-(2*p0280-1)^2)/2)^2-LN(1-(2*p0280-1)^2)/0.140012289)-(2/(pi()*0.140012289)+LN(1-(2*p0280-1)^2)/2)))
- p3416: 0; = p3378*p1238
- p0270: 4.332
- p0116: 25.001
- p0368: 0.5
- p4309: 0; = p1754*p3480
- p3897: 2.91891e-6; = p1754*p3478
- p2660: 0; = p2269*(p1078+p1080)
- p2210: 7.00638e-5; = 6*1.00794*p2208/30.973762
- p1863: 0
- p2363: 5.085e-5; = p2225*p2191
- p2428: 0; = p2236*p2218
- p0901: 0.0177532
- p0428: 0; = SQRT(2)*(IF((2*p0296-1)<0;-1;IF((2*p0296-1)>0;1;0))*SQRT(SQRT((2/(pi()*0.140012289)+LN(1-(2*p0296-1)^2)/2)^2-LN(1-(2*p0296-1)^2)/0.140012289)-(2/(pi()*0.140012289)+LN(1-(2*p0296-1)^2)/2)))
- p2864: 1.20999e-5; = p2278*(p1020+p1022)
- p2808: 0; = p2417*(p1078+p1080)
- p1783: 0
- p0484: 0; = SQRT(2)*(IF((2*p0352-1)<0;-1;IF((2*p0352-1)>0;1;0))*SQRT(SQRT((2/(pi()*0.140012289)+LN(1-(2*p0352-1)^2)/2)^2-LN(1-(2*p0352-1)^2)/0.140012289)-(2/(pi()*0.140012289)+LN(1-(2*p0352-1)^2)/2)))
- p0218: 14.273
- p4720: 5.43406e-6; = p1963*p3481
- p2898: 0; = p2312*(p1129+p1131)
- p2167: 0.146276; = p2166*(p0898)
- p2733: 4.1301e-6; = p2342*(p1078+p1080)
- p3243: 1.24082e-10; = p3234*p1188*p3239/p0818
- p0016: 1834.84
- p0687: 10.545; = p0027*(1+p0555*p0159/100)
- p0430: 0; = SQRT(2)*(IF((2*p0298-1)<0;-1;IF((2*p0298-1)>0;1;0))*SQRT(SQRT((2/(pi()*0.140012289)+LN(1-(2*p0298-1)^2)/2)^2-LN(1-(2*p0298-1)^2)/0.140012289)-(2/(pi()*0.140012289)+LN(1-(2*p0298-1)^2)/2)))
- p0634: 0; = IF(p0370<0.5;-SQRT(p0007*EXP(p0502^2*p0008)-p0007);SQRT(p0007*EXP(p0502^2*p0008)-p0007))
- p2878: 4.52529e-6; = p2292*(p1020+p1022)
- p1045: 0.0667372; = IF(p1012=0;IF(p1037+p1044=1;0;IF(p1037+p1044+p1039>1;1-(p1037+p1044);p1039));0)
- p2822: 0; = p2431*(p1128+p1130)
- p0167: 5.721
- p0122: 26.151
- p1231: 0.0132764; = IF(p1221=0;0;p1230*(p1228+p1229))
- p1080: 0; = IF(p1071=0;IF(p1073+p1078+p1079=1;0;IF(p1073+p1078+p1079+p1076>1;1-(p1073+p1078+p1079);p1076));0)
- p1017: 0.0415; = IF(p1012=0;p0708/100;0)
- p0741: 2.361; = p0081*(1+p0609*p0213/100)
- p2540: 3.14258e-6; = p2344*p1073
- p0723: 9002.59; = p0063*(1+p0591*p0195/100)
- p2510: 0; = p2314*p1123
- p0121: 5.143
- p0001: 0.404686
- p1385: 382
- p3267: 0
- p1691: 0
- p2305: 7.28637e-7; = p2227*p2212
- p0425: 0; = SQRT(2)*(IF((2*p0293-1)<0;-1;IF((2*p0293-1)>0;1;0))*SQRT(SQRT((2/(pi()*0.140012289)+LN(1-(2*p0293-1)^2)/2)^2-LN(1-(2*p0293-1)^2)/0.140012289)-(2/(pi()*0.140012289)+LN(1-(2*p0293-1)^2)/2)))
- p1561: 0.52337
- p0029: 83.879
- p3219: 0.0113101; = p3215*p1228
- p2480: 0.000187528; = p2284*p1014
- p3796: 1.77e-8; = p1859*p3477
- p3146: 0; = p2365*p1023
- p0758: 0
- p2054: 0.91
- p1755: 0
- p0344: 0.5
- p0563: 0; = IF(p0299<0.5;-SQRT(p0007*EXP(p0431^2*p0008)-p0007);SQRT(p0007*EXP(p0431^2*p0008)-p0007))
- p1949: 0
- p3182: 0; = p2401*p1023
- p3323: 0; = if(and(p1232=0;p3255<>0);p3265*p3277*(p3299*p3291+(1-p3299)*p3295);0)
- p3019: 0; = p2238*p1023
- p2092: 0.54529
- p2835: 3.87932e-5; = p2249*(p1020+p1022)
- p3471: 0; = p3376*p1241
- p2386: 1.25247e-5; = p2229*p2215
- p2104: 0.817136
- p1916: 3.14608e-7; = p1508*1000/p0818
- p1724: 0
- p0292: 0.5
- p3368: 0; = if(p1232=0;p3245*p3356/p0818;0)
- p3024: 0; = p2243*p1023
- p0925: 0.287008; = IF(p0918+p0923+p0924=1;0;IF(p0918+p0923+p0924+p0921>1;1-(p0918+p0923+p0924);p0921))
- p1155: 0.000110471; = if(p1153*p0818=0;0;p1151/(p1153*p0818))
- p3620: 2.01255e-5; = p1889*p3476
- p3169: 4.30367e-8; = p2388*p1082
- p2514: 2.7865e-5; = p2318*p1014
- p0638: 0; = IF(p0374<0.5;-SQRT(p0007*EXP(p0506^2*p0008)-p0007);SQRT(p0007*EXP(p0506^2*p0008)-p0007))
- p0860: 0; = p0672*1000/p0856
- p0675: 0
- p1299: 0
- p1141: 0; = if(p1121=0;p1135*p0001/(p0818*p0002);0)
- p0817: 0
- p0809: 2000
- p0977: 0; = IF(p0687=0;IF(OR(p0686=0;p0688=0);0;p0686*1000*p0688/100);0)
- p1681: 0
- p2461: 0; = p2265*p1073
- p1008: 0; = p1004*p0001*p0004/(p0818*p0002)
- p2818: 0; = p2427*(p1078+p1080)
- p2986: 0; = p2400*(p1020+p1022)
- p3379: 0; = if(p1232=0;p3246*p3361/p0818;0)
- p2449: 3.07909e-6; = p2253*p1014
- p0241: 32.228
- p0454: 0; = SQRT(2)*(IF((2*p0322-1)<0;-1;IF((2*p0322-1)>0;1;0))*SQRT(SQRT((2/(pi()*0.140012289)+LN(1-(2*p0322-1)^2)/2)^2-LN(1-(2*p0322-1)^2)/0.140012289)-(2/(pi()*0.140012289)+LN(1-(2*p0322-1)^2)/2)))
- p5159: 5.06408e-8; = p1780*p3484
- p3079: 5.89191e-7; = p2298*p1082
- p2975: 0; = p2389*(p1129+p1131)
- p2322: 6.07681e-5; = p2224*p2189
- p1736: 0.641
- p1270: 0; = IF(p1267=p1259;0;IF(p1267+p1268>p1259;p1259-p1267;p1268))
- p3444: 0; = p3368*p1240
- p3155: 0; = p2374*p1023
- p2753: 1.7867e-5; = p2362*(p1019+p1021)
- p0384: 0.5
- p2134: 1.7628e-6; = p2015*p2062*p2096/(p0818*1000)
- p2241: 0.000156378; = p2222*p2186
- p2755: 3.63611e-5; = p2364*(p1019+p1021)
- p2783: 9.20014e-7; = p2392*(p1128+p1130)
- p2565: 4.00048e-6; = p2369*p1014
- p2780: 5.18188e-6; = p2389*(p1128+p1130)
- p0958: 0; = if(and(p0683>0;or(p0807=480;p0807=32;p0807=1;and(p0807=60;p0901<0.03)));p0934;0)
- p2700: 3.28945e-7; = p2309*(p1078+p1080)
- p2583: 8.60082e-7; = p2387*p1073
- p4292: 5.23275e-10; = p1943*p3479
- p2197: 1.13019e-5; = p1055/p0818
- p0826: 0.120333; = 1-p0825/p0818
- p3674: 4.45056e-9; = p1943*p3476
- p2604: 0; = p2408*p1014
- p0559: 0; = IF(p0295<0.5;-SQRT(p0007*EXP(p0427^2*p0008)-p0007);SQRT(p0007*EXP(p0427^2*p0008)-p0007))
- p0997: 0; = if(p0888=0;0;if((p0695*p0694*1000*p0696/100)/p0888>1;1;(p0695*p0694*1000*p0696/100)/p0888))
- p0669: 42.2365; = p0009*(1+p0537*p0141/100)
- p0737: 0
- p2243: 0.000287916; = p2222*p2188
- p3222: 0.224242; = IF(p3216=0;0;p1223*40.078/100.0869)
- p1631: 0
- p2284: 0.000281679; = p2223*p2190
- p2236: 0; = 1-(p2230+p2231+p2232+p2233)
- p1163: 0.00742611
- p0033: 62.859
- p2140: 1.36312e-7; = p2015*p2068*p2102/(p0818*1000)
- p1777: 0
- p3425: 0; = p3368*p1239
- p2291: 8.37064e-6; = p2223*p2198
- p1610: 0
- p1837: 0
- p3437: 0; = p3380*p1239
- p0935: 2.75129e-5; = p0929*p0001/(p0818*p0002)
- p3014: 0; = p2428*(p1129+p1131)
- p1342: 1.7241e6; = p1326*p0801
- p0721: 0
- p1778: 0
- p0574: 0; = IF(p0310<0.5;-SQRT(p0007*EXP(p0442^2*p0008)-p0007);SQRT(p0007*EXP(p0442^2*p0008)-p0007))
- p3000: 0; = p2414*(p1079+p1081)
- p0986: 0; = IF(p0982+p0985=1;0;IF(p0982+p0985+p0984>1;1-(p0982+p0985);p0984))
- p2649: 0; = p2258*(p1078+p1080)
- p0079: 2.701
- p1604: 0.92902
- p1057: 0.82
- p2355: 0.000599454; = p2225*p2183
- p1963: 0.000211494; = p1963a+p1963b+p1963c+p1963d+p1963e+p1963f+p1963g+p1963h+p1963i+p1963j+p1963k
- p2169: 0.000318174; = p2166*(p0908)
- p3135: 0; = p2354*p1023
- p2561: 0.00139963; = p2365*p1014
- p3402: 0; = p3364*p1238
- p2402: 0; = p2234*p2191
- p1710: 0
- p2861: 0; = p2275*(p1129+p1131)
- p2947: 4.34383e-5; = p2361*(p1020+p1022)
- p0220: 6.608
- p1152: 0.415074
- p2624: 0; = p2428*p1123
- p1564: 0
- p1184: 1.90258e-8; = p1182/p0818
- p0367: 0.5
- p2665: 0; = p2274*(p1128+p1130)
- p1627: 0
- p2185: 0.000375624; = p1065-p2184
- p2225: 0.32393; = if(p0765*p0769+p0766*p0770+p0767*p0771+p0768*p0772=0;0;p0772*p0768/(p0765*p0769+p0766*p0770+p0767*p0771+p0768*p0772))
- p2544: 1.94987e-5; = p2348*p1073
- p3239: 0.013074; = IF(p3238+p3235+p3236=1;0;1-(p3238+p3235+p3236))
- p3456: 0; = p3380*p1240
- p1118: 0.000292283; = IF(p1071=0;p1108/(p1113*p0818);0)
- p2289: 0.00620563; = p2223*p2196
- p1481: 4522
- p4732: 0; = p1765*p3482
- p3235: 0.118093
- p0142: 0
- p0138: 79.88
- p2088: 0.798875
- p2547: 0.000381363; = p2351*p1123
- p0748: 58.637; = p0088*(1+p0616*p0220/100)
- p3930: 6.1528e-6; = p1787*p3478
- p2826: 1.04739e-5; = p2240*(p1020+p1022)
- p2593: 0; = p2397*p1014
- p0539: 0; = IF(p0275<0.5;-SQRT(p0007*EXP(p0407^2*p0008)-p0007);SQRT(p0007*EXP(p0407^2*p0008)-p0007))
- p3345: 0; = if(and(p1232=0;p3256<>0);p3273*p3277*p3293;0)
- p0500: 0; = SQRT(2)*(IF((2*p0368-1)<0;-1;IF((2*p0368-1)>0;1;0))*SQRT(SQRT((2/(pi()*0.140012289)+LN(1-(2*p0368-1)^2)/2)^2-LN(1-(2*p0368-1)^2)/0.140012289)-(2/(pi()*0.140012289)+LN(1-(2*p0368-1)^2)/2)))
- p0571: 0; = IF(p0307<0.5;-SQRT(p0007*EXP(p0439^2*p0008)-p0007);SQRT(p0007*EXP(p0439^2*p0008)-p0007))
- p0987: 0.0105377; = if(p0978>0;0;if(and(p0687=0;p0691=0;p0695=0;p0699=0);0;IF(p0982+p0985+p0986=1;0;1-(p0982+p0985+p0986))))
- p0999: 0; = IF(p0996=1;0;IF(p0996+p0997>1;1-p0996;p0997))
- p2922: 7.65174e-5; = p2336*(p1079+p1081)
- p2227: 0.154097; = if(p0774*p0778+p0775*p0779+p0776*p0780+p0777*p0781=0;0;p0779*p0775/(p0774*p0778+p0775*p0779+p0776*p0780+p0777*p0781))
- p3101: 0; = p2320*p1023
- p2016: 0.000532155; = (p2014-p2015)/(p0818)
- p4786: 0; = p1819*p3482
- p0861: 0.0552765; = p0673*1000/p0856
- p1795: 0
- p3045: 0; = p2264*p1082
- p2509: 0; = p2313*p1123
- p3185: 0; = p2404*p1023
- p2271: 0; = p2226*p2217
- p0261: 6.797
- p4532: 2.82031e-6; = p1771*p3481
- p3417: 0; = p3379*p1238
- p5144: 3.04068e-6; = p1765*p3484
- p0042: 9002.59
- p1132: 0.10097; = if(p1121=0;IF(p1123+p1128+p1129+p1130+p1131=1;0;1-(p1123+p1128+p1129+p1130+p1131));0)
- p2752: 1.56094e-5; = p2361*(p1019+p1021)
- p2743: 2.72369e-6; = p2352*(p1128+p1130)
- p0975: 0.00120708; = p0973*p0974/p0818
- p3422: 0; = p3365*p1239
- p2645: 3.70522e-5; = p2254*(p1019+p1021)
- p1237: 0; = if(p1232>0;0;p0729/100)
- p2019: 0.13105
- p0887: 204.832; = 1000*p0886*p0001*p0003*p0004/(p0818*p0002)
- p2331: 4.54456e-6; = p2224*p2199
- p2869: 6.05104e-5; = p2283*(p1020+p1022)
- p1970: 8.9e6; = p0801
- p2954: 9.00208e-7; = p2368*(p1020+p1022)
- p3438: 0; = p3362*p1240
- p1036: 1.31357e9; = IF(p1012=0;p0795*p0702*1000*p0796/100;0)
- p0402: 0.5
- p1584: 0
- p2771: 4.21936e-7; = p2380*(p1078+p1080)
- p1106: 300592; = IF(p1071=0;p1105*p1096*p1095;0)
- p2800: 0; = p2409*(p1019+p1021)
- p2215: 0.000350474; = p1117-p2214
- p0625: 0; = IF(p0361<0.5;-SQRT(p0007*EXP(p0493^2*p0008)-p0007);SQRT(p0007*EXP(p0493^2*p0008)-p0007))
- p1065: 0.000484676; = IF(p1012=0;p1051/(p1058*p0818);0)
- p1222: 0.94
- p2728: 4.92112e-5; = p2337*(p1078+p1080)
- p2496: 0.000283744; = p2300*p1073
- p3058: 0; = p2277*p1023
- p1580: 0
- p3226: 0.000328113; = p3222*p1229
- p3431: 0; = p3374*p1239
- p1225: 1.088; = IF(p1221=0;0;p1223+1.2*p1224)
- p0867: 0.0274365; = IF(p0858+p0864+p0865+p0866=1;0;IF(p0858+p0864+p0865+p0866+p0862>1;1-(p0858+p0864+p0865+p0866);p0862))
- p1686: 0
- p2685: 6.32098e-5; = p2294*(p1019+p1021)
- p3264: 0
- p0980: 0; = IF(p0977=0;0;p0977*p0001/(p0818*p0002))
- p3166: 1.52008e-8; = p2385*p1082
- p0149: 0
- p2629: 1.85428e-5; = p2238*(p1019+p1021)
- p3192: 0; = p2411*p1023
- p0314: 0.5
- p2263: 0; = p2226*p2209
- p3343: 0; = if(and(p1232=0;p3254<>0);IF((p3339+p3340+p3341+p3342)+(p3254*(p3269*(1-p3277))/p3338)>p3254;p3254-(p3339+p3340+p3341+p3342);p3254*(p3269*(1-p3277))/p3338);0)
- p1672: 0
- p2248: 0.000735982; = p2222*p2193
- p2744: 4.73306e-6; = p2353*(p1128+p1130)
- p1931: 0
- p3006: 0; = p2420*(p1079+p1081)
- p0089: 4.578
- p0697: 98.515; = p0037*(1+p0565*p0169/100)
- p2748: 1.07513e-5; = p2357*(p1019+p1021)
- p1824: 0
- p4876: 0; = p1909*p3482
- p2532: 0.00061347; = p2336*p1073
- p3400: 0; = p3362*p1238
- p1015: 0.04686; = IF(p1012=0;p0706/100;0)
- p2315: 0.00093938; = p2224*p2182
- p2371: 0.00119783; = p2225*p2200
- p4769: 0; = p1802*p3482
- p2738: 2.06597e-5; = p2347*(p1078+p1080)
- p0570: 0; = IF(p0306<0.5;-SQRT(p0007*EXP(p0438^2*p0008)-p0007);SQRT(p0007*EXP(p0438^2*p0008)-p0007))
- p1667: 0
- p1640: 0
- p2944: 0.000109838; = p2358*(p1020+p1022)
- p2444: 0.00048998; = p2248*p1014
- p0667: 0; = IF(p0403<0.5;-SQRT(p0007*EXP(p0535^2*p0008)-p0007);SQRT(p0007*EXP(p0535^2*p0008)-p0007))
- p0313: 0.5
- p0556: 0; = IF(p0292<0.5;-SQRT(p0007*EXP(p0424^2*p0008)-p0007);SQRT(p0007*EXP(p0424^2*p0008)-p0007))
- p3263: 0
- p1718: 0
- p0993: 1.35854e-5; = p0989*p0001*p0004/(p0818*p0002)
- p2934: 2.43204e-6; = p2348*(p1079+p1081)
- p2563: 0.00296579; = p2367*p1014
- p2108: 0.826583
- p0427: 0; = SQRT(2)*(IF((2*p0295-1)<0;-1;IF((2*p0295-1)>0;1;0))*SQRT(SQRT((2/(pi()*0.140012289)+LN(1-(2*p0295-1)^2)/2)^2-LN(1-(2*p0295-1)^2)/0.140012289)-(2/(pi()*0.140012289)+LN(1-(2*p0295-1)^2)/2)))
- p0176: 0.503
- p3390: 0; = p3371*p1234
- p3443: 0; = p3367*p1240
- p1127: 0; = if(p1121=0;p0721/100;0)
- p3389: 0; = p3370*p1234
- p0429: 0; = SQRT(2)*(IF((2*p0297-1)<0;-1;IF((2*p0297-1)>0;1;0))*SQRT(SQRT((2/(pi()*0.140012289)+LN(1-(2*p0297-1)^2)/2)^2-LN(1-(2*p0297-1)^2)/0.140012289)-(2/(pi()*0.140012289)+LN(1-(2*p0297-1)^2)/2)))
- p1323: 0; = IF(((p0745*1000*p0750/100)+(p0754*1000*p0759/100))/p0801<0;0;((p0745*1000*p0750/100)+(p0754*1000*p0759/100))/p0801)
- p2866: 0.000153007; = p2280*(p1020+p1022)
- p1265: 0; = if(p1232>0;0;IF(p1259+p1263+p1264=1;0;IF(p1259+p1263+p1264+p1262>1;1-(p1259+p1263+p1264);p1262)))
- p2463: 0; = p2267*p1073
- p1650: 0
- p0904: 1.32665e9; = p0825*p0901+p0827*p0902+(p0830+p0895)*p0824*p0903
- p2760: 5.30954e-7; = p2369*(p1019+p1021)
- p2832: 4.37719e-6; = p2246*(p1020+p1022)
- p0515: 0; = SQRT(2)*(IF((2*p0383-1)<0;-1;IF((2*p0383-1)>0;1;0))*SQRT(SQRT((2/(pi()*0.140012289)+LN(1-(2*p0383-1)^2)/2)^2-LN(1-(2*p0383-1)^2)/0.140012289)-(2/(pi()*0.140012289)+LN(1-(2*p0383-1)^2)/2)))
- p3027: 0; = p2246*p1023
- p1290: 0; = IF(p1287=p1264;0;IF(p1287+p1288>p1264;p1264-p1287;p1288))
- p3483: 0.0532657; = if(p1328+p1330+p1332+p1334+p1336+p1338+p1340+p1342+p1344=0;0;p1342/(p1328+p1330+p1332+p1334+p1336+p1338+p1340+p1342+p1344))
- p3307: 0; = if(and(p1232=0;p3252<>0);p3252*(p3258-p3302)/p3305;0)
- p3110: 0; = p2329*p1023
- p3085: 6.47547e-7; = p2304*p1082
- p1168: 5.1983e-7; = p1164*p1167/p0818
- p2290: 5.09988e-6; = p2223*p2197
- p0806: 1.1352e9
- p4265: 1.04655e-8; = p1916*p3479
- p1593: 0
- p3105: 0; = p2324*p1023
- p2746: 5.29678e-5; = p2355*(p1019+p1021)
- p2891: 7.45541e-8; = p2305*(p1079+p1081)
- p1741: 0
- p2841: 4.42055e-5; = p2255*(p1020+p1022)
- p2525: 8.38412e-7; = p2329*p1014
- p1335: 1.51112e-5; = p1334*p0001/(p0818*p0002)
- p1331: 5.11141e-5; = p1330*p0001/(p0818*p0002)
- p2211: 0.000917514; = p1120-p2209-p2208-p2210
- p1581: 0
- p2995: 0; = p2409*(p1020+p1022)
- p1269: 0
- p2132: 2.4181e-7; = p2015*p2060*p2094/(p0818*1000)
- p2825: 3.04081e-6; = p2239*(p1020+p1022)
- p1359: 1156
- p4938: 3.42111e-6; = p1765*p3483
- p0023: 27397.7
- p2026: 53.05
- p1909: 3.77529e-7; = p1501*1000/p0818
- p2522: 0.000481458; = p2326*p1014
- p1870: 0
- p1018: 0.13531; = IF(p1012=0;p0709/100;0)
- p1996: 30
- p1784: 0
- p1905: 0
- p2145: 3.20411e-7; = p2015*p2073*p2107/(p0818*1000)
- p2351: 0.000465981; = p2232*p2219
- p0785: 10.231; = p0125*(1+p0653*p0257/100)
- p0969: 1.53471e8; = p0966*p0964*p0683*p0682*1000
- p0700: 0
- p1693: 0
- p2939: 0; = p2353*(p1129+p1131)
- p3374: 0; = if(p1232=0;p3246*p3356/p0818;0)
- p2802: 0; = p2411*(p1019+p1021)
- p0678: 1960.4; = p0018*(1+p0546*p0150/100)
- p4554: 1.54394e-7; = p1793*p3481
- p2439: 0.00019168; = p2243*p1014
- p2874: 0.000154365; = p2288*(p1020+p1022)
- p1577: 0
- p2817: 0; = p2426*(p1078+p1080)
- p2716: 1.25078e-5; = p2325*(p1019+p1021)
- p1911: 0
- p0177: 7.13
- p0310: 0.5
- p2759: 3.23488e-7; = p2368*(p1019+p1021)
- p2806: 0; = p2415*(p1078+p1080)
- p0048: 4.15
- p0696: 0
- p2477: 5.96224e-5; = p2281*p1014
- p0548: 0; = IF(p0284<0.5;-SQRT(p0007*EXP(p0416^2*p0008)-p0007);SQRT(p0007*EXP(p0416^2*p0008)-p0007))
- p0616: 0; = IF(p0352<0.5;-SQRT(p0007*EXP(p0484^2*p0008)-p0007);SQRT(p0007*EXP(p0484^2*p0008)-p0007))
- p1706: 0
- p0754: 8848.35; = p0094*(1+p0622*p0226/100)
- p2441: 4.71272e-5; = p2245*p1014
- p2383: 1.68977e-7; = p2229*p2212
- p2037: 2.3
- p0117: 17.772
- p0984: 0; = if(p0886=0;0;min(1;(p0699*p0698*1000*p0701/100)/p0886))
- p3247: 0
- p4926: 0; = p1963*p3482
- p1842: 0
- p2270: 0; = p2226*p2216
- p0243: 5.417
- p3372: 0; = if(p1232=0;p3245*p3360/p0818;0)
- p1647: 0
- p2106: 0.856281
- p0665: 0; = IF(p0401<0.5;-SQRT(p0007*EXP(p0533^2*p0008)-p0007);SQRT(p0007*EXP(p0533^2*p0008)-p0007))
- p2060: 0.272353
- p0942: 0; = if(and(p0683=0;p0948=0);p0936;0)
- p2664: 0; = p2273*(p1128+p1130)
- p2849: 0; = p2263*(p1079+p1081)
- p2375: 3.29864e-5; = p2229*p2204
- p1176: 1178.67; = p1175*p0801
- p0160: 29.729
- p2778: 7.62849e-8; = p2387*(p1078+p1080)
- p2321: 0.000282908; = p2224*p2188
- p0537: 0; = IF(p0273<0.5;-SQRT(p0007*EXP(p0405^2*p0008)-p0007);SQRT(p0007*EXP(p0405^2*p0008)-p0007))
- p2282: 0.00114567; = p2223*p2188
- p1963b: 1.16495e-5; = p1569*p1773+p1570*p1774+p1571*p1775+p1572*p1776+p1573*p1777+p1574*p1778+p1575*p1779+p1576*p1780+p1577*p1781+p1578*p1782+p1579*p1783+p1580*p1784+p1581*p1785+p1582*p1786+p1583*p1787+p1584*p1788+p1585*p1789+p1586*p1790+p1587*p1791
- p2418: 0; = p2235*p2208
- p1202: 0.7
- p1004: 0; = p1000*p0888
- p0281: 0.5
- p3119: 1.00311e-6; = p2338*p1082
- p0409: 0; = SQRT(2)*(IF((2*p0277-1)<0;-1;IF((2*p0277-1)>0;1;0))*SQRT(SQRT((2/(pi()*0.140012289)+LN(1-(2*p0277-1)^2)/2)^2-LN(1-(2*p0277-1)^2)/0.140012289)-(2/(pi()*0.140012289)+LN(1-(2*p0277-1)^2)/2)))
- p2244: 6.18437e-5; = p2222*p2189
- p0789: 84.554; = p0129*(1+p0657*p0261/100)
- p2490: 0.000476256; = p2294*p1014
- p1185: 0.5
- p3338: 0; = if(and(p1232=0;p3254<>0);1-(p3334+p3335+p3336+p3337);0)
- p3136: 0; = p2355*p1023
- p0005: 1.60934
- p1308: 0
- p1904: 1.2427e-6; = p1496*1000/p0818
- p3826: 8.00393e-6; = p1889*p3477
- p0185: 31.273
- p3481: 0.0256937; = if(p1328+p1330+p1332+p1334+p1336+p1338+p1340+p1342+p1344=0;0;p1338/(p1328+p1330+p1332+p1334+p1336+p1338+p1340+p1342+p1344))
- p1223: 0.56
- p3347: 0; = if(and(p1232=0;p3256<>0);p3275*p3289;0)
- p3411: 0; = p3373*p1238
- p2889: 1.10471e-6; = p2303*(p1079+p1081)
- p2269: 0; = p2226*p2215
- p1005: 0; = p1001*p0888
- p3068: 0; = p2287*p1023
- p0401: 0.5
- p1907: 0
- p1160: 0.0339421; = (p1156+p1158)*p1159
- p0027: 10.545
- p1748: 0
- p1007: 0; = p1003*p0001*p0004/(p0818*p0002)
- p0911: 0.00344444
- p0162: 14.023
- p3088: 6.55466e-8; = p2307*p1082
- p2971: 3.39595e-7; = p2385*(p1079+p1081)
- p2050: 0.952062
- p3458: 0; = p3363*p1241
- p0501: 0; = SQRT(2)*(IF((2*p0369-1)<0;-1;IF((2*p0369-1)>0;1;0))*SQRT(SQRT((2/(pi()*0.140012289)+LN(1-(2*p0369-1)^2)/2)^2-LN(1-(2*p0369-1)^2)/0.140012289)-(2/(pi()*0.140012289)+LN(1-(2*p0369-1)^2)/2)))
- p3052: 0; = p2271*p1082
- p0936: 2.57508e-5; = p0930*p0001/(p0818*p0002)
- p2450: 0.00027917; = p2254*p1014
- p2576: 4.75716e-6; = p2380*p1073
- p2855: 0; = p2269*(p1079+p1081)
- p4168: 1.30295e-7; = p1819*p3479
- p3369: 0; = if(p1232=0;p3245*p3357/p0818;0)
- p1660: 0
- p0214: 2.456
- p2644: 4.08665e-7; = p2253*(p1019+p1021)
- p2438: 1.49836e-5; = p2242*p1014
- p4059: 1.39996e-7; = p1916*p3478
- p3398: 0; = p3379*p1234
- p2863: 0.000205331; = p2277*(p1020+p1022)

- p0487: 0; = SQRT(2)*(IF((2*p0355-1)<0;-1;IF((2*p0355-1)>0;1;0))*SQRT(SQRT((2/(pi()*0.140012289)+LN(1-(2*p0355-1)^2)/2)^2-LN(1-(2*p0355-1)^2)/0.140012289)-(2/(pi()*0.140012289)+LN(1-(2*p0355-1)^2)/2)))
- p3206: 0; = p2425*p1082
- p2014: 9.50083e7; = p0833*p2011*p2013
- p1775: 0
- p1569: 0
- p2842: 6.36216e-6; = p2256*(p1020+p1022)
- p2873: 0.000720115; = p2287*(p1020+p1022)
- p2937: 0; = p2351*(p1129+p1131)
- p0624: 0; = IF(p0360<0.5;-SQRT(p0007*EXP(p0492^2*p0008)-p0007);SQRT(p0007*EXP(p0492^2*p0008)-p0007))
- p2393: 0; = p2234*p2182
- p0952: 1.32392e-5; = if(and(p0683>0;or(p0807=56;p0807=100;and(p0807=60;p0901>0.06)));p0934;0)
- p2032: 0.448886
- p1971: 0.000120695; = p1966*p0001/(p0818*p0002)
- p0787: 0
- p3290: 0
- p1140: 2.66374e-6; = if(p1121=0;p1134*p0001/(p0818*p0002);0)
- p1340: 0; = p1325*p0801
- p2343: 0.000743339; = p2228*p2211
- p3511: 3.02638e-7; = p1780*p3476
- p1788: 0
- p2090: 0.40001
- p1771: 0.000109767; = p1363*1000/p0818
- p0267: 5.598
- p0824: 0.643929
- p4348: 0; = p1793*p3480
- p4116: 6.04906e-7; = p1767*p3479
- p0051: 82.034
- p1238: 0; = if(p1232>0;0;IF(p1234=1;0;IF(p1234+p1235>1;1-p1234;p1235)))
- p0438: 0; = SQRT(2)*(IF((2*p0306-1)<0;-1;IF((2*p0306-1)>0;1;0))*SQRT(SQRT((2/(pi()*0.140012289)+LN(1-(2*p0306-1)^2)/2)^2-LN(1-(2*p0306-1)^2)/0.140012289)-(2/(pi()*0.140012289)+LN(1-(2*p0306-1)^2)/2)))
- p0855: 0.564187; = p0854*p0001*p0003/(p0818*p0002)
- p1854: 0
- p2686: 9.09732e-6; = p2295*(p1019+p1021)
- p3312: 0; = if(and(p1232=0;p3253<>0);p3261*p3277*(p3298*p3290+(1-p3298)*p3294);0)
- p2589: 0; = p2393*p1014
- p3141: 0; = p2360*p1023
- p2847: 0; = p2261*(p1079+p1081)
- p0959: 0; = if(and(p0683>0;or(p0807=480;p0807=32;p0807=1;and(p0807=60;p0901<0.03)));p0935;0)
- p1609: 0
- p0695: 10.101; = p0035*(1+p0563*p0167/100)
- p0938: 2.25539e-5; = p0932*p0001/(p0818*p0002)
- p1932: 0
- p2187: 0.000198467; = 4*1.00794*p2186/(2*14.0067)
- p3228: 0.000734451; = p3224*p1229
- p0842: -0.303052
- p0715: 0
- p2494: 0.000105532; = p2298*p1073
- p2899: 0; = p2313*(p1129+p1131)
- p1031: 5.8755e-6; = IF(p1012=0;p1025*p0001/(p0818*p0002);0)
- p0426: 0; = SQRT(2)*(IF((2*p0294-1)<0;-1;IF((2*p0294-1)>0;1;0))*SQRT(SQRT((2/(pi()*0.140012289)+LN(1-(2*p0294-1)^2)/2)^2-LN(1-(2*p0294-1)^2)/0.140012289)-(2/(pi()*0.140012289)+LN(1-(2*p0294-1)^2)/2)))
- p4657: 3.63755e-9; = p1896*p3481
- p2850: 0; = p2264*(p1079+p1081)
- p0403: 0.5
- p1279: 0
- p0211: 3.368
- p0742: 92.693; = p0082*(1+p0610*p0214/100)
- p2027: 0.428799
- p4498: 0; = p1943*p3480
- p0037: 98.515
- p3756: 4.4073e-7; = p1819*p3477
- p0407: 0; = SQRT(2)*(IF((2*p0275-1)<0;-1;IF((2*p0275-1)>0;1;0))*SQRT(SQRT((2/(pi()*0.140012289)+LN(1-(2*p0275-1)^2)/2)^2-LN(1-(2*p0275-1)^2)/0.140012289)-(2/(pi()*0.140012289)+LN(1-(2*p0275-1)^2)/2)))
- p1337: 0; = p1336*p0001/(p0818*p0002)
- p2130: 6.52871e-7; = p2015*p2058*p2092/(p0818*1000)
- p0390: 0.5
- p1756: 0
- p0141: 85.949
- p0433: 0; = SQRT(2)*(IF((2*p0301-1)<0;-1;IF((2*p0301-1)>0;1;0))*SQRT(SQRT((2/(pi()*0.140012289)+LN(1-(2*p0301-1)^2)/2)^2-LN(1-(2*p0301-1)^2)/0.140012289)-(2/(pi()*0.140012289)+LN(1-(2*p0301-1)^2)/2)))
- p1846: 0
- p2062: 3.76588
- p2654: 0; = p2263*(p1078+p1080)
- p3211: 0; = p2430*p1132
- p4883: 0; = p1916*p3482
- p0307: 0.5
- p0747: 0
- p2592: 0; = p2396*p1014
- p2498: 2.05131e-5; = p2302*p1073
- p3178: 0; = p2397*p1023
- p2548: 2.76494e-5; = p2352*p1123
- p3075: 0; = p2294*p1023
- p2394: 0; = p2234*p2183
- p2936: 0; = p2350*(p1129+p1131)
- p2022: 0.000165409; = p2018*p2015/p0818-p2021
- p1954: 0
- p0976: 0; = IF(p0687=0;IF(OR(p0686=0;p0689=0);0;p0686*1000*p0689/100);0)
- p0120: 82.882
- p2805: 0; = p2414*(p1078+p1080)
- p1276: 0; = p1272*p1252/p0818
- p2102: 0.922577
- p1394: 1144
- p1307: 0
- p2619: 0; = p2423*p1073
- p0166: 10.014
- p1622: 0
- p3427: 0; = p3370*p1239
- p3020: 0; = p2239*p1023
- p0513: 0; = SQRT(2)*(IF((2*p0381-1)<0;-1;IF((2*p0381-1)>0;1;0))*SQRT(SQRT((2/(pi()*0.140012289)+LN(1-(2*p0381-1)^2)/2)^2-LN(1-(2*p0381-1)^2)/0.140012289)-(2/(pi()*0.140012289)+LN(1-(2*p0381-1)^2)/2)))
- p3394: 0; = p3375*p1234
- p2427: 0; = p2235*p2217
- p1574: 0
- p1989: 50
- p2238: 0.000209855; = p2222*p2183
- p0534: 0; = SQRT(2)*(IF((2*p0402-1)<0;-1;IF((2*p0402-1)>0;1;0))*SQRT(SQRT((2/(pi()*0.140012289)+LN(1-(2*p0402-1)^2)/2)^2-LN(1-(2*p0402-1)^2)/0.140012289)-(2/(pi()*0.140012289)+LN(1-(2*p0402-1)^2)/2)))
- p2957: 0.000294534; = p2371*(p1020+p1022)
- p0982: 0.326214; = if(p0886=0;0;min(1;(p0691*p0690*1000*p0693/100)/p0886))
- p2417: 0; = p2235*p2207
- p5318: 2.01074e-7; = p1939*p3484
- p4101: 8.86112e-6; = p1962*p3478
- p1979: 1.53471e8; = p0973
- p1012: 0
- p3265: 0
- p4052: 1.67995e-7; = p1909*p3478
- p2694: 7.85562e-7; = p2303*(p1078+p1080)
- p0956: 2.25539e-5; = if(and(p0683>0;or(p0807=56;p0807=100;and(p0807=60;p0901>0.06)));p0938;0)
- p0538: 0; = IF(p0274<0.5;-SQRT(p0007*EXP(p0406^2*p0008)-p0007);SQRT(p0007*EXP(p0406^2*p0008)-p0007))
- p0235: 0
- p3125: 1.75452e-8; = p2344*p1082
- p2179: 0.00241416; = p0970+p0971+p0972
- p2234: 0; = 1-(p2222+p2223+p2224+p2225)
- p4363: 0; = p1808*p3480
- p2706: 8.30036e-5; = p2315*(p1019+p1021)
- p0383: 0.5
- p2180: 1.4472e-8; = p3233*p1188/(p0818)
- p3213: 0.112803; = p1222*12.0107/100.0869
- p0732: 0
- p1567: 0.629912
- p0213: 4.51
- p2222: 0.113401; = if(p0765*p0769+p0766*p0770+p0767*p0771+p0768*p0772=0;0;p0769*p0765/(p0765*p0769+p0766*p0770+p0767*p0771+p0768*p0772))
- p0731: 0
- p1023: 0; = IF(p1012=0;IF(p1014+p1019+p1020+p1021+p1022=1;0;1-(p1014+p1019+p1020+p1021+p1022));0)
- p0844: 0.405295
- p1139: 2.70408e-5; = if(p1121=0;p1133*p0001/(p0818*p0002);0)
- p3102: 0; = p2321*p1023
- p1158: 0.0129406; = p1156*p1157
- p1056: 2.35073e8; = IF(p1012=0;p1049*p1036;0)
- p3122: 6.02121e-7; = p2341*p1082
- p2504: 4.43041e-5; = p2308*p1073
- p2080: 0.025
- p1041: 0.314094
- p2491: 6.85439e-5; = p2295*p1014
- p2118: 0.679049
- p2361: 0.000176657; = p2225*p2189
- p2345: 4.00583e-5; = p2228*p2213
- p2569: 4.92052e-5; = p2373*p1014
- p0511: 0; = SQRT(2)*(IF((2*p0379-1)<0;-1;IF((2*p0379-1)>0;1;0))*SQRT(SQRT((2/(pi()*0.140012289)+LN(1-(2*p0379-1)^2)/2)^2-LN(1-(2*p0379-1)^2)/0.140012289)-(2/(pi()*0.140012289)+LN(1-(2*p0379-1)^2)/2)))
- p2430: 0; = p2236*p2220
- p1897: 0
- p0544: 0; = IF(p0280<0.5;-SQRT(p0007*EXP(p0412^2*p0008)-p0007);SQRT(p0007*EXP(p0412^2*p0008)-p0007))
- p2468: 0; = p2272*p1123
- p2115: 0.856281
- p3063: 0; = p2282*p1023
- p1616: 0
- p3691: 7.38089e-7; = p1754*p3477
- p0823: 0.35
- p1687: 0
- p3233: 0.60394
- p1145: 3.33341e7; = if(p1121=0;p0799*p0702*1000*p0800/100;0)
- p1790: 0
- p2513: 8.08985e-6; = p2317*p1014
- p5338: 1.00127e-5; = p1963*p3484
- p1860: 0
- p2389: 6.42754e-5; = p2233*p2218
- p0673: 491.961; = p0013*(1+p0541*p0145/100)
- p1170: 4292.01; = p1169*p0801
- p2711: 1.95407e-6; = p2320*(p1019+p1021)
- p1814: 0
- p2015: 6.11786e7; = p0830*p2011*p2013
- p2079: 0.02
- p1098: 0.0208246
- p1073: 0.82034; = IF(p1071=0;p0711/100;0)
- p3328: 0; = if(and(p1232=0;p3255<>0);p3255*(p3265*p3277-p3323)/p3327;0)
- p2925: 0.000186069; = p2339*(p1079+p1081)
- p1787: 1.3827e-5; = p1379*1000/p0818
- p0158: 5.974
- p1244: 0; = if(p1232>0;0;p1239*(p0725/100)*p0723*1000)
- p2647: 2.28623e-6; = p2256*(p1019+p1021)
- p2653: 0; = p2262*(p1078+p1080)
- p1785: 0
- p0730: 0
- p0967: 0
- p2437: 0.000104109; = p2241*p1014
- p0909: 2.2726e8; = p0825*p0906+p0827*p0907+(p0830+p0895)*p0824*p0908
- p0641: 0; = IF(p0377<0.5;-SQRT(p0007*EXP(p0509^2*p0008)-p0007);SQRT(p0007*EXP(p0509^2*p0008)-p0007))
- p0373: 0.5
- p0253: 42.373
- p1827: 0
- p2156: 2.19112e-8; = p2015*p2085*p2118/(p0818*1000)
- p5113: 6.26742e-7; = p1940*p3483
- p3841: 1.3983e-7; = p1904*p3477
- p0810: 0
- p2020: 1.58585e6; = p2015*p2018*p2019
- p1591: 0
- p1746: 0
- p1135: 0; = if(p1121=0;p1129*(p0716/100)*p0703*1000;0)
- p2620: 0; = p2424*p1073
- p3690: 5.98375e-5; = p1963*p3476
- p0535: 0; = SQRT(2)*(IF((2*p0403-1)<0;-1;IF((2*p0403-1)>0;1;0))*SQRT(SQRT((2/(pi()*0.140012289)+LN(1-(2*p0403-1)^2)/2)^2-LN(1-(2*p0403-1)^2)/0.140012289)-(2/(pi()*0.140012289)+LN(1-(2*p0403-1)^2)/2)))
- p0290: 0.5
- p0299: 0.5
- p1079: 0.10232; = IF(p1071=0;IF(p1073+p1078=1;0;IF(p1073+p1078+p1075>1;1-(p1073+p1078);p1075));0)
- p2089: 0.40001
- p1592: 0
- p0063: 9002.59
- p4677: 8.08345e-9; = p1916*p3481
- p3300: 0; = if(p1293+p1294+p1295+p1296=0;0;p1293/(p1293+p1294+p1295+p1296))
- p1921: 0
- p2460: 0; = p2264*p1073
- p0735: 0
- p0447: 0; = SQRT(2)*(IF((2*p0315-1)<0;-1;IF((2*p0315-1)>0;1;0))*SQRT(SQRT((2/(pi()*0.140012289)+LN(1-(2*p0315-1)^2)/2)^2-LN(1-(2*p0315-1)^2)/0.140012289)-(2/(pi()*0.140012289)+LN(1-(2*p0315-1)^2)/2)))
- p2147: 5.7274e-8; = p2015*p2075*p2109/(p0818*1000)
- p2623: 0; = p2427*p1073
- p2875: 0.0015259; = p2289*(p1020+p1022)
- p4495: 0; = p1940*p3480
- p2381: 2.50382e-6; = p2229*p2210
- p1169: 0.000482248
- p2751: 7.26703e-5; = p2360*(p1019+p1021)
- p0164: 34.058
- p3473: 0; = p3378*p1241
- p1934: 0
- p0613: 0; = IF(p0349<0.5;-SQRT(p0007*EXP(p0481^2*p0008)-p0007);SQRT(p0007*EXP(p0481^2*p0008)-p0007))
- p1116: 5.41729e-5; = IF(p1071=0;p1106/(p1111*p0818);0)
- p1558: 0
- p4444: 0; = p1889*p3480
- p0014: 314.505
- p2999: 0; = p2413*(p1020+p1022)
- p1782: 0
- p1765: 6.42272e-5; = p1357*1000/p0818
- p1324: 0.0934441; = IF(((p0745*1000*p0751/100)+(p0754*1000*p0760/100))/p0801<0;0;((p0745*1000*p0751/100)+(p0754*1000*p0760/100))/p0801)
- p0908: 0.000997792
- p1862: 0
- p2488: 1.22523e-5; = p2292*p1014
- p3275: 0
- p1924: 0
- p1738: 0
- p1804: 0
- p0174: 0
- p2985: 0; = p2399*(p1020+p1022)
- p4039: 6.2998e-8; = p1896*p3478
- p0221: 27.896
- p3406: 0; = p3368*p1238
- p2288: 0.000627781; = p2223*p2195
- p2719: 0.000135403; = p2328*(p1019+p1021)
- p1117: 0.000443348; = IF(p1071=0;p1107/(p1112*p0818);0)
- p0775: 41.835; = p0115*(1+p0643*p0247/100)
- p2404: 0; = p2234*p2193
- p3251: 0; = p1252-(p3252+p3253+p3254+p3255+p3256)
- p0888: 1.10436e7; = p0686*1000*p0687*p0884/100
- p2923: 6.92042e-5; = p2337*(p1079+p1081)
- p1957: 0
- p2205: 0.000834828; = 2*14.0067*p2204/30.973762
- p1113: 0.100377
- p1260: 0; = if(p1232>0;0;p0731/100)
- p3013: 0; = p2427*(p1079+p1081)
- p1552: 0
- p2043: 0.636483
- p0348: 0.5
- p0929: 1.9604e6; = p0801*p0923
- p0974: 0.5
- p3702: 7.2269e-6; = p1765*p3477
- p0833: 5.60441e10; = p0830+p0832
- p1877: 0
- p2101: 0.620397
- p3279: 0
- p2571: 2.70601e-5; = p2375*p1073
- p2299: 4.16584e-5; = p2227*p2206
- p2253: 4.625e-6; = p2222*p2199
- p2279: 0.000169497; = p2223*p2185
- p0503: 0; = SQRT(2)*(IF((2*p0371-1)<0;-1;IF((2*p0371-1)>0;1;0))*SQRT(SQRT((2/(pi()*0.140012289)+LN(1-(2*p0371-1)^2)/2)^2-LN(1-(2*p0371-1)^2)/0.140012289)-(2/(pi()*0.140012289)+LN(1-(2*p0371-1)^2)/2)))
- p2781: 7.30236e-6; = p2390*(p1128+p1130)
- p2601: 0; = p2405*p1014
- p1249: 0; = if(p1232>0;0;p1244*p0001/(p0818*p0002))
- p1816: 0
- p0864: 0.291088; = IF(p0858=1;0;IF(p0858+p0859>1;1-p0858;p0859))
- p3640: 1.06814e-7; = p1909*p3476
- p1700: 0.918695
- p5082: 2.01094e-8; = p1909*p3483
- p2710: 1.35772e-5; = p2319*(p1019+p1021)
- p0656: 0; = IF(p0392<0.5;-SQRT(p0007*EXP(p0524^2*p0008)-p0007);SQRT(p0007*EXP(p0524^2*p0008)-p0007))
- p0139: 14.159
- p2609: 0; = p2413*p1014
- p1831: 0
- p2658: 0; = p2267*(p1078+p1080)
- p2611: 0; = p2415*p1073
- p4374: 0; = p1819*p3480
- p1674: 0
- p2541: 3.28614e-5; = p2345*p1073
- p2535: 0.00149179; = p2339*p1073
- p3366: 0; = if(p1232=0;p3244*p3360/p0818;0)
- p3025: 0; = p2244*p1023
- p2249: 0.000157766; = p2222*p2195
- p0154: 0
- p1339: 1.16717e-5; = p1338*p0001/(p0818*p0002)
- p0921: 0.287008; = p0679*1000/p0801
- p2470: 0; = p2274*p1123
- p0107: 21.414
- p3355: 0; = if(and(p1232=0;p3256<>0);p3256-(p3350+p3351+p3352+p3353+p3354);0)
- p1570: 0
- p3126: 1.83467e-7; = p2345*p1082
- p1189: 0.000124906; = p0801*p0001/(p0818*p0002)
- p4250: 2.98267e-8; = p1901*p3479
- p3689: 5.63403e-6; = p1962*p3476
- p0140: 26.151
- p0793: 0
- p4103: 2.18206e-7; = p1754*p3479
- p2186: 0.00137899; = p1052/p0818
- p3445: 0; = p3369*p1240
- p1977: 1523.34; = p1252+p1188
- p0786: 11.975; = p0126*(1+p0654*p0258/100)
- p0580: 0; = IF(p0316<0.5;-SQRT(p0007*EXP(p0448^2*p0008)-p0007);SQRT(p0007*EXP(p0448^2*p0008)-p0007))
- p2963: 9.88505e-7; = p2377*(p1079+p1081)
- p1059: 0.335
- p1411: 249
- p3353: 0; = if(and(p1232=0;p3256<>0);p3256*(p3276-p3348)/p3349;0)
- p0343: 0.5
- p3214: 0.376406; = p1222*40.078/100.0869
- p1961: 0.5
- p2905: 3.7783e-5; = p2319*(p1020+p1022)
- p1818: 0
- p1508: 20
- p1833: 0
- p1882: 0
- p0352: 0.5
- p4927: 3.494e-7; = p1754*p3483
- p0522: 0; = SQRT(2)*(IF((2*p0390-1)<0;-1;IF((2*p0390-1)>0;1;0))*SQRT(SQRT((2/(pi()*0.140012289)+LN(1-(2*p0390-1)^2)/2)^2-LN(1-(2*p0390-1)^2)/0.140012289)-(2/(pi()*0.140012289)+LN(1-(2*p0390-1)^2)/2)))
- p3066: 0; = p2285*p1023
- p1913: 0
- p1110: 2.28119e7; = IF(p1071=0;p1105*p1104*p1095;0)
- p2399: 0; = p2234*p2188
- p1959: 23003.9; = if(p0738*p0740*p0739>0;p0738*1000*(p0740/100)*p0739/1000;p1958)
- p3172: 6.6307e-7; = p2391*p1132
- p3138: 0; = p2357*p1023
- p1180: 9.27049e-9; = p1176*p1179/p0818
- p3096: 0; = p2315*p1023
- p3216: 0.06; = IF(OR(p1226=0;p1228=0);0;1-p3213-p3214-p3215)
- p2429: 0; = p2236*p2219
- p1032: 1.3865e-5; = IF(p1012=0;p1026*p0001/(p0818*p0002);0)
- p1565: 0
- p0490: 0; = SQRT(2)*(IF((2*p0358-1)<0;-1;IF((2*p0358-1)>0;1;0))*SQRT(SQRT((2/(pi()*0.140012289)+LN(1-(2*p0358-1)^2)/2)^2-LN(1-(2*p0358-1)^2)/0.140012289)-(2/(pi()*0.140012289)+LN(1-(2*p0358-1)^2)/2)))
- p1776: 0
- p1617: 0
- p4863: 0; = p1896*p3482
- p1227: 0.000124906; = IF(p1221=0;0;p1226*p0001/(p0818*p0002))
- p5116: 8.37891e-10; = p1943*p3483
- p1915: 0
- p1268: 0
- p1963d: 1.74364e-6; = p1608*p1812+p1609*p1813+p1610*p1814+p1611*p1815+p1612*p1816+p1613*p1817+p1614*p1818+p1615*p1819+p1616*p1820+p1617*p1821+p1618*p1822+p1619*p1823+p1620*p1824+p1621*p1825+p1622*p1826+p1623*p1827+p1624*p1828+p1625*p1829+p1626*p1830+p1627*p1831
- p0989: 3.81107e7; = p0985*p0886
- p2530: 1.6926e-5; = p2334*p1014
- p1243: 0; = if(p1232>0;0;p1238*(p0725/100)*p0723*1000)
- p1228: 0.0250895; = IF(p1221=0;0;p0801*p1212*2000/(p1222+p1221*p1225)/p0818)
- p1598: 0.392863
- p2074: 0.025
- p4335: 0; = p1780*p3480
- p0923: 0.22027; = IF(p0918=1;0;IF(p0918+p0919>1;1-p0918;p0919))
- p2951: 0.000516945; = p2365*(p1020+p1022)
- p4459: 0; = p1904*p3480
- p1929: 0
- p1178: 1.8541e-8; = p1176/p0818
- p2199: 4.07847e-5; = p1069-p2197-p2198
- p3586: 9.88025e-7; = p1855*p3476
- p1658: 0
- p2851: 0; = p2265*(p1079+p1081)
- p2631: 3.76378e-6; = p2240*(p1019+p1021)
- p0671: 2590.68; = p0011*(1+p0539*p0143/100)
- p1006: 3.93673e-6; = p1002*p0001*p0004/(p0818*p0002)
- p3463: 0; = p3368*p1241
- p1179: 0.5
- p2397: 0; = p2234*p2186
- p3635: 3.51595e-7; = p1904*p3476
- p4357: 0; = p1802*p3480
- p4944: 5.8468e-6; = p1771*p3483
- p2309: 4.52095e-6; = p2227*p2216
- p2896: 4.14589e-6; = p2310*(p1079+p1081)
- p1587: 0
- p2459: 0; = p2263*p1073
- p1305: 0; = p1301*p1252/p0818
- p2061: 0.518824
- p3165: 8.09269e-9; = p2384*p1082
- p3259: 0
- p2398: 0; = p2234*p2187
- p2767: 2.1707e-6; = p2376*(p1078+p1080)
- p0757: 6.917; = p0097*(1+p0625*p0229/100)
- p3118: 3.09768e-6; = p2337*p1082
- p3450: 0; = p3374*p1240
- p2445: 0.000105033; = p2249*p1014
- p0579: 0; = IF(p0315<0.5;-SQRT(p0007*EXP(p0447^2*p0008)-p0007);SQRT(p0007*EXP(p0447^2*p0008)-p0007))
- p2584: 7.70846e-6; = p2388*p1073
- p1963e: 0; = p1628*p1832+p1629*p1833+p1630*p1834+p1631*p1835+p1632*p1836+p1633*p1837+p1634*p1838+p1635*p1839+p1636*p1840+p1637*p1841+p1638*p1842+p1639*p1843+p1640*p1844+p1641*p1845+p1642*p1846+p1643*p1847+p1644*p1848+p1645*p1849+p1646*p1850
- p3065: 0; = p2284*p1023
- p0728: 0
- p2293: 0.0016686; = p2223*p2200
- p0796: 99.239; = p0136*(1+p0664*p0268/100)
- p0876: 491961; = p0866*p0856
- p3326: 0; = if(and(p1232=0;p3255<>0);p3268*p3289;0)
- p3010: 0; = p2424*(p1079+p1081)
- p2311: 0; = p2231*p2218
- p2002: 750
- p0521: 0; = SQRT(2)*(IF((2*p0389-1)<0;-1;IF((2*p0389-1)>0;1;0))*SQRT(SQRT((2/(pi()*0.140012289)+LN(1-(2*p0389-1)^2)/2)^2-LN(1-(2*p0389-1)^2)/0.140012289)-(2/(pi()*0.140012289)+LN(1-(2*p0389-1)^2)/2)))
- p1760: 0
- p1151: 2.56518e6; = if(p1121=0;p1149*p1148*p1145;0)
- p0525: 0; = SQRT(2)*(IF((2*p0393-1)<0;-1;IF((2*p0393-1)>0;1;0))*SQRT(SQRT((2/(pi()*0.140012289)+LN(1-(2*p0393-1)^2)/2)^2-LN(1-(2*p0393-1)^2)/0.140012289)-(2/(pi()*0.140012289)+LN(1-(2*p0393-1)^2)/2)))
- p0703: 9002.59; = p0043*(1+p0571*p0175/100)
- p2129: 1.18608e-6; = p2015*p2057*p2091/(p0818*1000)
- p1694: 0
- p1796: 0
- p0238: 6.67
- p2297: 0.000142239; = p2227*p2204
- p1951: 0
- p2865: 4.16776e-5; = p2279*(p1020+p1022)
- p3381: 0; = p3362*p1234
- p0013: 491.961
- p1668: 0
- p2529: 0.000117605; = p2333*p1014
- p2742: 3.75674e-5; = p2351*(p1128+p1130)
- p4662: 2.30378e-8; = p1901*p3481
- p0910: 0.0035749; = p0909/p0818
- p2356: 3.53252e-5; = p2225*p2184
- p2426: 0; = p2235*p2216
- p1865: 0
- p0838: 2.44682e10; = (p0833-p0836)*p0837
- p2674: 2.17443e-5; = p2283*(p1019+p1021)
- p3071: 0; = p2290*p1023
- p0774: 0
- p0491: 0; = SQRT(2)*(IF((2*p0359-1)<0;-1;IF((2*p0359-1)>0;1;0))*SQRT(SQRT((2/(pi()*0.140012289)+LN(1-(2*p0359-1)^2)/2)^2-LN(1-(2*p0359-1)^2)/0.140012289)-(2/(pi()*0.140012289)+LN(1-(2*p0359-1)^2)/2)))
- p0782: 26.151; = p0122*(1+p0650*p0254/100)
- p2921: 7.16687e-5; = p2335*(p1020+p1022)
- p1313: 0; = p1307*p1252/p0818
- p2862: 0.000935396; = p2276*(p1020+p1022)
- p2142: 2.2176e-7; = p2015*p2070*p2104/(p0818*1000)
- p1210: 0.25
- p2370: 1.32114e-5; = p2225*p2199
- p2094: 0.922577
- p3455: 0; = p3379*p1240
- p2086: 0.0617647
- p1102: 0.0208246; = IF(p1071=0;IF(p1096+p1101=1;0;IF(p1096+p1101+p1098>1;1-(p1096+p1101);p1098));0)
- p1869: 0
- p0753: 0
- p3078: 6.51455e-7; = p2297*p1082
- p2782: 5.29432e-7; = p2391*(p1128+p1130)
- p1253: 0; = if(p1232>0;0;p0735/100)
- p1820: 0
- p2938: 0; = p2352*(p1129+p1131)
- p3193: 0; = p2412*p1023
- p0783: 0
- p2058: 1.24412
- p1047: 0.314094; = IF(p1012=0;IF(p1037+p1044+p1045+p1046=1;0;IF(p1037+p1044+p1045+p1046+p1041>1;1-(p1037+p1044+p1045+p1046);p1041));0)
- p2988: 0; = p2402*(p1020+p1022)
- p1858: 0
- p1848: 0
- p3148: 0; = p2367*p1023
- p1183: 0.000124906; = p0801*p0001/(p0818*p0002)
- p3384: 0; = p3365*p1234
- p1762: 0
- p1203: 3
- p3157: 1.36638e-7; = p2376*p1082
- p1864: 0
- p0619: 0; = IF(p0355<0.5;-SQRT(p0007*EXP(p0487^2*p0008)-p0007);SQRT(p0007*EXP(p0487^2*p0008)-p0007))
- p1573: 0
- p2895: 4.62584e-7; = p2309*(p1079+p1081)
- p0725: 0
- p2203: 0.00261573; = p1070-p2200-p2201-p2202
- p0879: 0.0342698; = p0878*p0001*p0003/(p0818*p0002)
- p1555: 0
- p2946: 0.000202228; = p2360*(p1020+p1022)
- p0047: 11.058
- p3164: 7.73914e-10; = p2383*p1082
- p1807: 0
- p1910: 0
- p1851: 0
- p2557: 0.00011761; = p2361*p1014
- p0917: 0.963593; = (p0825+p0827+(p0830+p0895))/p0818-(p0900+p0905+p0910+p0915)
- p3113: 0; = p2332*p1023
- p1920: 0
- p4569: 1.68944e-7; = p1808*p3481
- p3436: 0; = p3379*p1239
- p1844: 0
- p2972: 1.28152e-6; = p2386*(p1079+p1081)
- p2731: 2.11529e-5; = p2340*(p1078+p1080)
- p0740: 94.604; = p0080*(1+p0608*p0212/100)
- p3309: 0; = if(and(p1232=0;p3252<>0);p3252*(p3260-p3304)/p3305;0)
- p0416: 0; = SQRT(2)*(IF((2*p0284-1)<0;-1;IF((2*p0284-1)>0;1;0))*SQRT(SQRT((2/(pi()*0.140012289)+LN(1-(2*p0284-1)^2)/2)^2-LN(1-(2*p0284-1)^2)/0.140012289)-(2/(pi()*0.140012289)+LN(1-(2*p0284-1)^2)/2)))
- p0410: 0; = SQRT(2)*(IF((2*p0278-1)<0;-1;IF((2*p0278-1)>0;1;0))*SQRT(SQRT((2/(pi()*0.140012289)+LN(1-(2*p0278-1)^2)/2)^2-LN(1-(2*p0278-1)^2)/0.140012289)-(2/(pi()*0.140012289)+LN(1-(2*p0278-1)^2)/2)))
- p3255: 0; = p1252*(p1297*(1-p3247)+p1300*(1-p3248)+p1301*(1-p3249)+p1302*(1-p3250))
- p0414: 0; = SQRT(2)*(IF((2*p0282-1)<0;-1;IF((2*p0282-1)>0;1;0))*SQRT(SQRT((2/(pi()*0.140012289)+LN(1-(2*p0282-1)^2)/2)^2-LN(1-(2*p0282-1)^2)/0.140012289)-(2/(pi()*0.140012289)+LN(1-(2*p0282-1)^2)/2)))
- p2391: 6.567e-6; = p2233*p2220
- p2217: 0.000262944; = p1118-p2216
- p1590: 0
- p3410: 0; = p3372*p1238
- p1010: 0; = p0890
- p3376: 0; = if(p1232=0;p3246*p3358/p0818;0)
- p1207: 301.603; = if(p1193>0;0;(p1194*p1050/p1057+p1195*p1051/p1058+p1196*p1052/p1059+p1197*p1053/p1060+p1198*p1054/p1061+p1199*p1055/p1062+p1200*p1056/p1063)/(p0702*1000)+(p1201*p1109/p1114+p1202*p1110/p1115)/(p0702*1000)+p1203*p1170/p0801+p1204*p1176/p0801)
- p1137: 0; = if(p1121=0;p1131*(p0716/100)*p0703*1000;0)
- p1177: 0.000124906; = p0801*p0001/(p0818*p0002)
- p1131: 0; = if(p1121=0;IF(p1123+p1128+p1129+p1130=1;0;IF(p1123+p1128+p1129+p1130+p1127>1;1-(p1123+p1128+p1129+p1130);p1127));0)
- p3232: 1.90258e-8; = p1182/p0818
- p4966: 3.20074e-7; = p1793*p3483
- p1606: 0
- p3271: 0
- p0296: 0.5
- p1051: 6.93257e6; = IF(p1012=0;p1044*p1036;0)
- p3317: 0; = if(and(p1232=0;p3253<>0);p3253*(p3261*p3277-p3312)/p3316;0)
- p3090: 2.0706e-8; = p2309*p1082
- p2632: 1.38176e-5; = p2241*(p1019+p1021)
- p1737: 0
- p0086: 30.603
- p1254: 0; = if(p1232>0;0;p0736/100)
- p2966: 5.93354e-7; = p2380*(p1079+p1081)
- p2853: 0; = p2267*(p1079+p1081)
- p2536: 0.00023849; = p2340*p1073
- p0119: 9.421
- p0931: 2.55437e6; = p0801*p0925
- p3057: 0; = p2276*p1023
- p2077: 0.043
- p1142: 0; = if(p1121=0;p1136*p0001/(p0818*p0002);0)
- p0682: 9002.59; = p0022*(1+p0550*p0154/100)
- p1063: 0.455
- p2948: 4.97208e-5; = p2362*(p1020+p1022)
- p1689: 0
- p0765: 131.806; = p0105*(1+p0633*p0237/100)
- p3253: 0; = p1252*(p1277*(1-p3247)+p1280*(1-p3248)+p1281*(1-p3249)+p1282*(1-p3250))
- p1125: 0; = if(p1121=0;p0719/100;0)
- p3399: 0; = p3380*p1234
- p3217: 0.00283016; = p3213*p1228
- p1334: 1.07673e6; = p1322*p0801
- p0791: 0
- p1708: 0
- p2198: 1.85502e-5; = 22.98976928*p2197/14.0067
- p3121: 1.3315e-6; = p2340*p1082
- p1884: 0
- p1847: 0
- p2983: 0; = p2397*(p1020+p1022)
- p3210: 0; = p2429*p1132
- p1451: 10
- p2117: 0.585147
- p2974: 9.61467e-7; = p2388*(p1079+p1081)
- p3339: 0; = if(and(p1232=0;p3254<>0);p3254*(p3269*p3277-p3334)/p3338;0)
- p3670: 1.20165e-6; = p1939*p3476
- p1566: 0
- p1993: 400
- p3453: 0; = p3377*p1240
- p2276: 0.00380412; = p2223*p2182
- p3459: 0; = p3364*p1241
- p0485: 0; = SQRT(2)*(IF((2*p0353-1)<0;-1;IF((2*p0353-1)>0;1;0))*SQRT(SQRT((2/(pi()*0.140012289)+LN(1-(2*p0353-1)^2)/2)^2-LN(1-(2*p0353-1)^2)/0.140012289)-(2/(pi()*0.140012289)+LN(1-(2*p0353-1)^2)/2)))
- p2600: 0; = p2404*p1014
- p1899: 0
- p0814: 0; = if(p0807=480;p0810*p0812+p0811*p0813;0)
- p1171: 0.000124906; = p0801*p0001/(p0818*p0002)
- p0968: 0
- p2901: 0.000230984; = p2315*(p1020+p1022)
- p0692: 37.141; = p0032*(1+p0560*p0164/100)
- p2736: 2.91464e-6; = p2345*(p1078+p1080)
- p3053: 0; = p2272*p1132
- p2040: 1.19
- p0498: 0; = SQRT(2)*(IF((2*p0366-1)<0;-1;IF((2*p0366-1)>0;1;0))*SQRT(SQRT((2/(pi()*0.140012289)+LN(1-(2*p0366-1)^2)/2)^2-LN(1-(2*p0366-1)^2)/0.140012289)-(2/(pi()*0.140012289)+LN(1-(2*p0366-1)^2)/2)))
- p1575: 0
- p2977: 0; = p2391*(p1129+p1131)
- p4754: 0; = p1787*p3482
- p1559: 0
- p3387: 0; = p3368*p1234
- p3111: 0; = p2330*p1023
- p0705: 66.575; = p0045*(1+p0573*p0177/100)
- p1246: 0; = if(p1232>0;0;p1241*(p0725/100)*p0723*1000)
- p0954: 2.57508e-5; = if(and(p0683>0;or(p0807=56;p0807=100;and(p0807=60;p0901>0.06)));p0936;0)
- p2885: 4.26248e-6; = p2299*(p1079+p1081)
- p0934: 1.32392e-5; = p0928*p0001/(p0818*p0002)
- p2283: 0.000246087; = p2223*p2189
- p0708: 4.15; = p0048*(1+p0576*p0180/100)
- p2135: 7.7556e-7; = p2015*p2063*p2097/(p0818*1000)
- p1197: 1.806
- p1972: 0; = if(p0807=480;p1967*p0001/(p0818*p0002);0)
- p0268: 0.503
- p1596: 0
- p0284: 0.5
- p2091: 0.374844
- p3304: 0; = if(and(p1232=0;p3252<>0);p3260*p3289;0)
- p3351: 0; = if(and(p1232=0;p3256<>0);p3256*(p3274-p3346)/p3349;0)
- p4665: 3.19296e-8; = p1904*p3481
- p3418: 0; = p3380*p1238
- p3040: 0; = p2259*p1082
- p1960: 1265.91; = IF(p1959-p1958<0;0;p1959-p1958)
- p2723: 3.64078e-5; = p2332*(p1019+p1021)
- p0546: 0; = IF(p0282<0.5;-SQRT(p0007*EXP(p0414^2*p0008)-p0007);SQRT(p0007*EXP(p0414^2*p0008)-p0007))
- p0898: 0.458721
- p2344: 3.83082e-6; = p2228*p2212
- p2081: 0.0019
- p3475: 0; = p3380*p1241
- p0767: 21.414; = p0107*(1+p0635*p0239/100)
- p2317: 1.21515e-5; = p2224*p2184
- p0994: 0; = p0990*p0001*p0004/(p0818*p0002)
- p0249: 39.015
- p3240: 1.12078e-9; = p3234*p1188*p3235/p0818
- p2239: 1.23666e-5; = p2222*p2184
- p2251: 1.28164e-6; = p2222*p2197
- p1201: 0.65
- p3244: 0; = p0791/100
- p1166: 1.03966e-6; = p1164/p0818
- p1016: 0.11058; = IF(p1012=0;p0707/100;0)
- p1089: 8.27927e-5; = IF(p1071=0;p1083*p0001/(p0818*p0002);0)
- p3176: 0; = p2395*p1023
- p1123: 0.81841; = if(p1121=0;p0717/100;0)
- p3076: 0; = p2295*p1023
- p1077: 0; = IF(p1071=0;p0715/100;0)
- p3204: 0; = p2423*p1082
- p4083: 5.23583e-6; = p1940*p3478
- p3220: 0.00150537; = p3216*p1228
- p0499: 0; = SQRT(2)*(IF((2*p0367-1)<0;-1;IF((2*p0367-1)>0;1;0))*SQRT(SQRT((2/(pi()*0.140012289)+LN(1-(2*p0367-1)^2)/2)^2-LN(1-(2*p0367-1)^2)/0.140012289)-(2/(pi()*0.140012289)+LN(1-(2*p0367-1)^2)/2)))
- p0813: 0; = if(p0807=480;1.56521739130435;0)
- p1945: 0
- p1582: 0
- p3724: 1.55583e-6; = p1787*p3477
- p1963f: 1.12228e-6; = p1647*p1851+p1648*p1852+p1649*p1853+p1650*p1854+p1651*p1855+p1652*p1856+p1653*p1857+p1654*p1858+p1655*p1859+p1656*p1860+p1657*p1861+p1658*p1862+p1659*p1863+p1660*p1864+p1661*p1865+p1662*p1866+p1663*p1867+p1664*p1868+p1665*p1869+p1666*p1870
- p3282: 0
- p3331: 0; = if(and(p1232=0;p3255<>0);p3255*(p3268-p3326)/p3327;0)
- p0148: 0
- p2912: 0.000177823; = p2326*(p1020+p1022)
- p1535: 1
- p0801: 8.9e6
- p1206: 0.0206875
- p1963c: 1.85699e-5; = p1588*p1792+p1589*p1793+p1590*p1794+p1591*p1795+p1592*p1796+p1593*p1797+p1594*p1798+p1595*p1799+p1596*p1800+p1597*p1801+p1598*p1802+p1599*p1803+p1600*p1804+p1601*p1805+p1602*p1806+p1603*p1807+p1604*p1808+p1605*p1809+p1606*p1810+p1607*p1811
- p2267: 0; = p2226*p2213
- p1678: 0
- p2423: 0; = p2235*p2213
- p0562: 0; = IF(p0298<0.5;-SQRT(p0007*EXP(p0430^2*p0008)-p0007);SQRT(p0007*EXP(p0430^2*p0008)-p0007))
- p1641: 0
- p2646: 1.58851e-5; = p2255*(p1019+p1021)
- p4288: 1.41284e-7; = p1939*p3479
- p2208: 0.000358841; = p1110/p0818
- p1081: 0; = IF(p1071=0;IF(p1073+p1078+p1079+p1080=1;0;IF(p1073+p1078+p1079+p1080+p1077>1;1-(p1073+p1078+p1079+p1080);p1077));0)
- p2153: 1.5657e-9; = p2015*p2081*p2115/(p0818*1000)
- p4275: 1.04655e-9; = p1926*p3479
- p3745: 7.39859e-7; = p1808*p3477
- p4513: 0; = p1962*p3480
- p2570: 0.000564099; = p2374*p1014
- p0749: 4.578; = p0089*(1+p0617*p0221/100)
- p1496: 79
- p1095: 2.05217e8; = IF(p1071=0;p0797*p0702*1000*p0798/100;0)
- p3117: 3.42504e-6; = p2336*p1082
- p2515: 0.000102298; = p2319*p1014
- p2661: 0; = p2270*(p1078+p1080)
- p2784: 0; = p2393*(p1019+p1021)
- p2843: 7.29372e-5; = p2257*(p1020+p1022)
- p2679: 5.54707e-5; = p2288*(p1019+p1021)
- p2779: 6.83701e-7; = p2388*(p1078+p1080)
- p0710: 79.88; = p0050*(1+p0578*p0182/100)
- p2326: 0.000723182; = p2224*p2193
- p0371: 0.5
- p2455: 0; = p2259*p1073
- p2474: 3.27607e-5; = p2278*p1014
- p1288: 0
- p2012: 0.00341157
- p2303: 1.07966e-5; = p2227*p2210
- p2965: 1.31212e-6; = p2379*(p1079+p1081)
- p0146: 0
- p0252: 5.459
- p0315: 0.5
- p1978: 72
- p0804: 0
- p3150: 0; = p2369*p1023
- p3154: 0; = p2373*p1023
- p1839: 0
- p1817: 0
- p2635: 5.46451e-6; = p2244*(p1019+p1021)
- p3428: 0; = p3371*p1239
- p1645: 0
- p1312: 0; = IF(p1307+p1310+p1311=p1266;0;p1266-(p1307+p1310+p1311))
- p2109: 0.826583
- p2123: 0.263965
- p0223: 30.696
- p3325: 0; = if(and(p1232=0;p3255<>0);p3267*p3289;0)
- p1224: 0.44; = IF(p1221=0;0;IF(p1193=0;1-p1223;0))
- p2666: 0; = p2275*(p1128+p1130)
- p1690: 0
- p3288: 0
- p0189: 9.187
- p0822: 0.879667
- p0841: 0.194891
- p3951: 2.92591e-6; = p1808*p3478
- p2023: 2.24
- p1608: 0
- p3480: 0; = if(p1328+p1330+p1332+p1334+p1336+p1338+p1340+p1342+p1344=0;0;p1336/(p1328+p1330+p1332+p1334+p1336+p1338+p1340+p1342+p1344))
- p3407: 0; = p3369*p1238
- p2274: 0; = p2230*p2220
- p1872: 0
- p1697: 0.705252
- p1619: 0
- p0573: 0; = IF(p0309<0.5;-SQRT(p0007*EXP(p0441^2*p0008)-p0007);SQRT(p0007*EXP(p0441^2*p0008)-p0007))
- p3424: 0; = p3367*p1239
- p1698: 0
- p0572: 0; = IF(p0308<0.5;-SQRT(p0007*EXP(p0440^2*p0008)-p0007);SQRT(p0007*EXP(p0440^2*p0008)-p0007))
- p0941: 0; = if(and(p0683=0;p0947=0);p0935;0)
- p0800: 26.151; = p0140*(1+p0668*p0272/100)
- p0768: 83.812; = p0108*(1+p0636*p0240/100)
- p0722: 0
- p3005: 0; = p2419*(p1079+p1081)
- p2447: 8.53252e-7; = p2251*p1014
- p4451: 0; = p1896*p3480
- p1880: 0
- p1275: 0; = p1271*p1252/p0818
- p3341: 0; = if(and(p1232=0;p3254<>0);p3254*(p3271-p3336)/p3338;0)
- p3199: 0; = p2418*p1082
- p1636: 0
- p2942: 8.68612e-6; = p2356*(p1020+p1022)
- p0377: 0.5
- p0827: 2.4416e9; = p0818*p0819*p0823
- p2301: 5.52962e-5; = p2227*p2208
- p1020: 0.11058; = IF(p1012=0;IF(p1014+p1019=1;0;IF(p1014+p1019+p1016>1;1-(p1014+p1019);p1016));0)
- p2295: 0.000102957; = p2223*p2202
- p2127: 2.15371e-6; = p2015*p2055*p2089/(p0818*1000)
- p3285: 0
- p2969: 1.72897e-8; = p2383*(p1079+p1081)
- p1649: 0
- p2201: 0.00158533; = 12.01*p2200/(2*14.0067)
- p3261: 0
- p2829: 7.07955e-5; = p2243*(p1020+p1022)
- p0672: 0
- p0643: 0; = IF(p0379<0.5;-SQRT(p0007*EXP(p0511^2*p0008)-p0007);SQRT(p0007*EXP(p0511^2*p0008)-p0007))
- p3914: 4.88444e-5; = p1771*p3478
- p2749: 3.947e-5; = p2358*(p1019+p1021)
- p0342: 0.5
- p2111: 0.856281
- p3026: 0; = p2245*p1023
- p2585: 5.26036e-5; = p2389*p1123
- p1830: 0
- p1875: 0
- p2717: 6.39004e-5; = p2326*(p1019+p1021)
- p2154: 1.22019e-7; = p2015*p2082*p2116/(p0818*1000)
- p4464: 0; = p1909*p3480
- p2705: 0; = p2314*(p1128+p1130)
- p1792: 0
- p1768: 0
- p2334: 2.5424e-5; = p2224*p2202
- p5305: 1.48943e-9; = p1926*p3484
- p1294: 0; = p1290*p1252/p0818
- p3144: 0; = p2363*p1023
- p0057: 81.841
- p2761: 1.16736e-6; = p2370*(p1019+p1021)
- p3419: 0; = p3362*p1239
- p3502: 3.1056e-5; = p1771*p3476
- p2950: 0.000101186; = p2364*(p1020+p1022)
- p1857: 0
- p2554: 0.000297388; = p2358*p1014
- p0751: 3.536; = p0091*(1+p0619*p0223/100)
- p1812: 0
- p4700: 1.09127e-7; = p1939*p3481
- p0636: 0; = IF(p0372<0.5;-SQRT(p0007*EXP(p0504^2*p0008)-p0007);SQRT(p0007*EXP(p0504^2*p0008)-p0007))
- p0282: 0.5
- p1953: 0
- p0756: 41.161; = p0096*(1+p0624*p0228/100)
- p0798: 79.88; = p0138*(1+p0666*p0270/100)
- p0964: 0.000622222; = 56/90000
- p1701: 0
- p0947: 0; = if(and(p0683=0;or(p0807=480;p0807=32;p0807=1;and(p0807=60;p0901<0.03)));p0935;0)
- p4893: 0; = p1926*p3482
- p1936: 0
- p1811: 0
- p4940: 9.68601e-7; = p1767*p3483
- p0698: 0
- p1336: 0; = p1323*p0801
- p5280: 4.24489e-8; = p1901*p3484
- p2336: 0.000747825; = p2228*p2204
- p1070: 0.00812702; = IF(p1012=0;p1056/(p1063*p0818);0)
- p1060: 0.21
- p2163: 0.000349891; = (p2017-p2020)/p0818-(p2025+p2028+p2033+p2034+p2051+p2125+p2126+p2127+p2128+p2129+p2130+p2131+p2132+p2133+p2134+p2135+p2136+p2137+p2138+p2139+p2140+p2141+p2142+p2143+p2144+p2145+p2146+p2147+p2148+p2149+p2150+p2151+p2152+p2153+p2154+p2155+p2156+p2157)
- p1688: 0
- p3077: 0; = p2296*p1023
- p3627: 4.00551e-8; = p1896*p3476
- p0210: 0
- p2533: 0.000554837; = p2337*p1073
- p1923: 0
- p2949: 1.25035e-5; = p2363*(p1020+p1022)
- p0714: 0
- p1325: 0; = IF(((p0745*1000*p0752/100)+(p0754*1000*p0761/100))/p0801<0;0;((p0745*1000*p0752/100)+(p0754*1000*p0761/100))/p0801)
- p2683: 1.62615e-6; = p2292*(p1019+p1021)
- p1122: 0; = p1121*p0001/(p0818*p0002)
- p2318: 4.18551e-5; = p2224*p2185
- p2452: 1.72256e-5; = p2256*p1014
- p0386: 0.5
- p0704: 99.239; = p0044*(1+p0572*p0176/100)
- p1130: 0; = if(p1121=0;IF(p1123+p1128+p1129=1;0;IF(p1123+p1128+p1129+p1126>1;1-(p1123+p1128+p1129);p1126));0)
- p5319: 5.57048e-7; = p1940*p3484
- p5077: 6.61933e-8; = p1904*p3483
- p3237: 0.854735
- p2368: 3.66102e-6; = p2225*p2197
- p0143: 0
- p1773: 0
- p2250: 0.00155953; = p2222*p2196
- p0585: 0; = IF(p0321<0.5;-SQRT(p0007*EXP(p0453^2*p0008)-p0007);SQRT(p0007*EXP(p0453^2*p0008)-p0007))
- p0275: 0.5
- p0493: 0; = SQRT(2)*(IF((2*p0361-1)<0;-1;IF((2*p0361-1)>0;1;0))*SQRT(SQRT((2/(pi()*0.140012289)+LN(1-(2*p0361-1)^2)/2)^2-LN(1-(2*p0361-1)^2)/0.140012289)-(2/(pi()*0.140012289)+LN(1-(2*p0361-1)^2)/2)))
- p2675: 2.48892e-5; = p2284*(p1019+p1021)
- p0933: 0; = p0801*p0927
- p2265: 0; = p2226*p2211
- p0441: 0; = SQRT(2)*(IF((2*p0309-1)<0;-1;IF((2*p0309-1)>0;1;0))*SQRT(SQRT((2/(pi()*0.140012289)+LN(1-(2*p0309-1)^2)/2)^2-LN(1-(2*p0309-1)^2)/0.140012289)-(2/(pi()*0.140012289)+LN(1-(2*p0309-1)^2)/2)))
- p1712: 0.60504
- p0272: 24.476
- p3533: 5.09145e-6; = p1802*p3476
- p3183: 0; = p2402*p1023
- p1988: 750
- p2523: 0.000103206; = p2327*p1014
- p2678: 0.000258772; = p2287*(p1019+p1021)
- p1038: 0.00527766
- p2320: 2.21149e-5; = p2224*p2187
- p2887: 5.65791e-6; = p2301*(p1079+p1081)
- p2168: 0.00339785; = p2166*(p0903)
- p3130: 9.75672e-7; = p2349*p1082
- p3321: 0; = if(and(p1232=0;p3253<>0);IF((p3317+p3318+p3319+p3320)+(p3253*(p3261*(1-p3277))/p3316)>p3253;p3253-(p3317+p3318+p3319+p3320);p3253*(p3261*(1-p3277))/p3316);0)
- p2754: 4.4931e-6; = p2363*(p1019+p1021)
- p3342: 0; = if(and(p1232=0;p3254<>0);p3254*(p3272-p3337)/p3338;0)
- p0413: 0; = SQRT(2)*(IF((2*p0281-1)<0;-1;IF((2*p0281-1)>0;1;0))*SQRT(SQRT((2/(pi()*0.140012289)+LN(1-(2*p0281-1)^2)/2)^2-LN(1-(2*p0281-1)^2)/0.140012289)-(2/(pi()*0.140012289)+LN(1-(2*p0281-1)^2)/2)))
- p2278: 4.92088e-5; = p2223*p2184
- p2668: 7.37852e-5; = p2277*(p1019+p1021)
- p2545: 0.000174756; = p2349*p1073
- p3289: 0
- p2662: 0; = p2271*(p1078+p1080)
- p0784: 0
- p2976: 0; = p2390*(p1129+p1131)
- p0017: 1703.23
- p1572: 0
- p1874: 0
- p2821: 0; = p2430*(p1128+p1130)
- p1052: 8.76639e7; = IF(p1012=0;p1045*p1036;0)
- p1013: 0; = p1012*p0001/(p0818*p0002)
- p0717: 81.841; = p0057*(1+p0585*p0189/100)
- p1327: 0.172178; = if(p1318=0;if(p1327a=0;1;if(p1327a<0;0;p1327a));0)
- p5295: 1.48943e-8; = p1916*p3484
- p2486: 3.39524e-6; = p2290*p1014
- p0924: 0.206162; = IF(p0918+p0923=1;0;IF(p0918+p0923+p0920>1;1-(p0918+p0923);p0920))
- p0946: 0; = if(and(p0683=0;or(p0807=480;p0807=32;p0807=1;and(p0807=60;p0901<0.03)));p0934;0)
- p5288: 1.78732e-8; = p1909*p3484
- p2329: 1.25935e-6; = p2224*p2197
- p0760: 0
- p2268: 0; = p2226*p2214
- p5283: 5.88327e-8; = p1904*p3484
- p2992: 0; = p2406*(p1020+p1022)
- p0862: 0.0353376; = p0674*1000/p0856
- p0690: 2666.54; = p0030*(1+p0558*p0162/100)
- p0821: 1.00219
- p4960: 7.36506e-7; = p1787*p3483
- p1315: 0; = p1311*p1252/p0818
- p1881: 0
- p3441: 0; = p3365*p1240
- p0317: 0.5
- p3184: 0; = p2403*p1023
- p0632: 0; = IF(p0368<0.5;-SQRT(p0007*EXP(p0500^2*p0008)-p0007);SQRT(p0007*EXP(p0500^2*p0008)-p0007))
- p0744: 61.554; = p0084*(1+p0612*p0216/100)
- p1733: 0
- p0217: 5.764
- p0524: 0; = SQRT(2)*(IF((2*p0392-1)<0;-1;IF((2*p0392-1)>0;1;0))*SQRT(SQRT((2/(pi()*0.140012289)+LN(1-(2*p0392-1)^2)/2)^2-LN(1-(2*p0392-1)^2)/0.140012289)-(2/(pi()*0.140012289)+LN(1-(2*p0392-1)^2)/2)))
- p2390: 9.05775e-5; = p2233*p2219
- p2424: 0; = p2235*p2214
- p4704: 4.04172e-10; = p1943*p3481
- p3863: 3.54e-9; = p1926*p3477
- p3168: 4.80188e-9; = p2387*p1082

## Reference product
- corn grain; at harvest in 1997; at farm; 85%-91% moisture: 1 kg

## Inputs from technosphere
- CUTOFF corn seeds; seed, unspec. type; at point-of-sale: 0.00241416 kg; = p0972
- CUTOFF sulfuric acid storage: 9.27049e-9 kg*a; = p1180
- CUTOFF potassic fertilizer, potassium chloride; at point-of-sale: 0.000951502 kg; = p1154
- CUTOFF apply gypsum; unspecified method: 0.000124906 ha; = p1165
- CUTOFF sewage sludge storage: 1.19814e-8 kg*a; = p1192
- CUTOFF nitrogenous fertilizer, nitrogen solutions; at point-of-sale: 0.0216337 kg; = p1068
- CUTOFF apply sulfur; unspecified method: 0.000124906 ha; = p1171
- CUTOFF apply pesticide; as foliar or directed spray: 1.16717e-5 ha; = p1339
- CUTOFF limestone, high-grade, pulverized; at point-of-sale: 0.0250895 kg; = p1228
- CUTOFF apply sulfuric acid; unspecified method: 0.000124906 ha; = p1177
- CUTOFF apply single or mixed K fertilizer; unspec. method: 3.33611e-6 ha; = p1144
- CUTOFF phosphatic fertilizer, superphos. grades 22% and under; at point-of-sale: 5.41729e-5 kg; = p1116
- CUTOFF apply K fertilizer; no broadcast application: 2.70408e-5 ha; = p1139
- CUTOFF pesticide, Tefluthrin; at point-of-sale; kg AI: 4.24721e-6 kg; = p1939
- CUTOFF harvest; corn residue management: 0.000124906 ha; = p1975
- CUTOFF pesticide, Dicamba; at point-of-sale; kg AI: 6.5753e-6 kg; = p1808
- CUTOFF seed storage; corn: 0.00120708 kg*a; = p0975
- CUTOFF apply P fertilizer; broadcast without incorporation: 1.03266e-5 ha; = p1091
- CUTOFF phosphatic fertilizer, other single phosphates; at point-of-sale: 0.000292283 kg; = p1118
- CUTOFF pesticide, Glyphosate; at point-of-sale; kg AI: 3.49215e-6 kg; = p1855
- CUTOFF apply P fertilizer; broadcast with incorporation: 7.34329e-6 ha; = p1090
- CUTOFF apply pesticide; unspecified application methods: 2.1506e-5 ha; = p1345
- CUTOFF planting; for no-till, corn: 2.57508e-5 ha; = p0954
- CUTOFF prepare soil; for ridge till, corn: 2.25539e-5 ha; = p0938
- CUTOFF pesticide, Permethrin, mixed cis,trans; at point-of-sale; kg AI: 1.2427e-6 kg; = p1904
- CUTOFF N inhibitor appl svc; unspec rate & type, 1997 corn: 0.000140001 ha; = p1162
- CUTOFF apply N fertilizer; broadcast with incorporation: 5.8755e-6 ha; = p1031
- CUTOFF apply single or mixed P fertilizer; unspec. method: 4.62236e-7 ha; = p1094
- CUTOFF nitrogenous fertilizer, sodium nitrate; at point-of-sale: 7.06368e-5 kg; = p1069
- CUTOFF nitrogenous fertilizer, aqueous ammonia; at point-of-sale: 0.000484676 kg; = p1065
- corn residue; at harvest in 1997; at farm; 22%-91% moisture: 0.384894 kg; = p0839
- CUTOFF liming materials storage: 0.0132764 kg*a; = p1231
- CUTOFF irrigate; unspecified irrigation method, groundwater source, in 1997: 2.15844e-7 ha-m; = p0995
- CUTOFF pesticide, Rimsulfuron; at point-of-sale; kg AI: 3.14608e-8 kg; = p1926
- CUTOFF phosphatic fertilizer, monoammonium phosphate; at point-of-sale: 0.00150869 kg; = p1120
- CUTOFF apply pesticide; broadcast by air: 5.11141e-5 ha; = p1331
- CUTOFF irrigate; gravity, groundwater source, in 1997: 6.68189e-6 ha-m; = p0992
- CUTOFF pesticide, 2,4-D; at point-of-sale; kg AI: 6.55957e-6 kg; = p1754
- CUTOFF pesticide, Nicosulfuron; at point-of-sale; kg AI: 1.41574e-7 kg; = p1896
- CUTOFF pesticide, Chlorpyrifos; at point-of-sale; kg AI: 6.00901e-6 kg; = p1793
- CUTOFF pesticide, Alachlor; at point-of-sale; kg AI: 1.81843e-5 kg; = p1767
- CUTOFF apply pesticide; broadcast with incorporation: 0.00020214 ha; = p1333
- CUTOFF apply pesticide; banded or side-dressed: 0.000128524 ha; = p1329
- CUTOFF sulfuric acid; at point-of-sale: 1.8541e-8 kg; = p1178
- CUTOFF pesticide, Primisulfuron-methyl; at point-of-sale; kg AI: 3.77529e-7 kg; = p1909
- CUTOFF planting; for mulch till, corn: 2.75129e-5 ha; = p0953
- CUTOFF prepare soil; for reduced till, corn; 15-30% residue: 3.58489e-5 ha; = p0937
- CUTOFF pesticide storage: 0.000392424 kg*a; = p1965
- CUTOFF apply pesticide; in seed furrow: 2.41966e-5 ha; = p1343
- CUTOFF fertilizer storage: 0.0339421 kg*a; = p1160
- CUTOFF apply sewage sludge; unspecified method: 0.000124906 ha; = p1189
- CUTOFF pesticide, Acetochlor; at point-of-sale; kg AI: 6.42272e-5 kg; = p1765
- CUTOFF nitrogenous fertilizer, anhydrous ammonia; at point-of-sale: 0.0102809 kg; = p1064
- CUTOFF sewage sludge; at point-of-sale: 2.39627e-8 kg; = p1190
- CUTOFF pesticide, Bromoxynil; at point-of-sale; kg AI: 1.06967e-6 kg; = p1780
- CUTOFF nitrogenous fertilizer, urea; at point-of-sale: 0.00812702 kg; = p1070
- CUTOFF pesticide, Halosulfuron-methyl; at point-of-sale; kg AI: 1.57304e-7 kg; = p1859
- corn silage; at harvest in 1997; at farm; 28%-40% moisture: 0.109735 kg; = p0819
- CUTOFF harvest; corn silage: 3.15773e-6 ha; = p1974
- CUTOFF gypsum; at point-of-sale: 1.03966e-6 kg; = p1166
- CUTOFF sulfur; at point-of-sale: 6.75149e-8 kg; = p1172
- CUTOFF pesticide, Propazine; at point-of-sale; kg AI: 7.11328e-5 kg; = p1889
- CUTOFF irrigate; pressure, groundwater source, in 1997: 1.35854e-5 ha-m; = p0993
- CUTOFF apply mixed N fertilizer; without incorporation: 1.69657e-5 ha; = p1034
- CUTOFF planting; for ridge till, corn: 2.25539e-5 ha; = p0956
- CUTOFF pesticide, unspecified type; at point-of-sale; kg AI: 1.99133e-5 kg; = p1962
- CUTOFF sulfur storage: 3.37575e-8 kg*a; = p1174
- CUTOFF prepare soil; for mulch till, corn: 2.75129e-5 ha; = p0935
- CUTOFF local area trucking; class 6, average fuel: 0.00149919 metric ton*km; = p2010
- CUTOFF phosphatic fertilizer, diammonium phosphate; at point-of-sale: 0.00427282 kg; = p1119
- CUTOFF potassic fertilizer, other single nutrients; at point-of-sale: 0.000110471 kg; = p1155
- CUTOFF regional or national trucking; class 8, average fuel: 0.00402118 metric ton*km; = p2009
- CUTOFF planting; for reduced till, corn; 15-30% residue: 3.58489e-5 ha; = p0955
- CUTOFF zinc compounds storage: 9.51291e-9 kg*a; = p1186
- CUTOFF zinc compounds; at point-of-sale: 1.90258e-8 kg; = p1184
- CUTOFF apply pesticide; broadcast without incorporation: 1.51112e-5 ha; = p1335
- CUTOFF pesticide, Cyanazine; at point-of-sale; kg AI: 1.79956e-5 kg; = p1802
- CUTOFF pesticide, Carbofuran; at point-of-sale; kg AI: 1.3827e-5 kg; = p1787
- CUTOFF apply K fertilizer; broadcast with incorporation: 2.66374e-6 ha; = p1140
- CUTOFF pesticide, Atrazine; at point-of-sale; kg AI: 0.000109767 kg; = p1771
- CUTOFF apply zinc compounds; unspecified method: 0.000124906 ha; = p1183
- CUTOFF international vessel transport; average fuel: 0.180569 metric ton*km; = p2006
- CUTOFF prepare soil; for conventional till, corn; <15% residue: 1.32392e-5 ha; = p0934
- CUTOFF pesticide, Thifensulfuron methyl; at point-of-sale; kg AI: 1.57304e-8 kg; = p1943
- CUTOFF planting; for conventional till, corn; <15% residue: 1.32392e-5 ha; = p0952
- CUTOFF irrigate; gravity, surface water source, in 1997: 3.93673e-6 ha-m; = p1006
- CUTOFF nitrogenous fertilizer, ammonium nitrate; at point-of-sale: 0.00411638 kg; = p1066
- CUTOFF apply liming materials; unspecified method: 0.000124906 ha; = p1227
- CUTOFF bulk cargo rail transport; diesel: 0.0374798 metric ton*km; = p2008
- CUTOFF apply mixed N fertilizer; with incorporation: 5.20344e-6 ha; = p1033
- CUTOFF pesticide, Prosulfuron; at point-of-sale; kg AI: 3.14608e-7 kg; = p1916
- CUTOFF gypsum storage: 5.1983e-7 kg*a; = p1168
- CUTOFF nitrogenous fertilizer, ammonium sulfate; at point-of-sale: 0.00259694 kg; = p1067
- CUTOFF apply N fertilizer; no broadcast application: 8.34745e-5 ha; = p1030
- CUTOFF harvest; corn: 0.000120695 ha; = p1971
- CUTOFF apply N fertilizer; broadcast without incorporation: 1.3865e-5 ha; = p1032
- CUTOFF dolomite, pulverized; at point-of-sale: 0.00146321 kg; = p1229
- CUTOFF apply P fertilizer; no broadcast application: 8.27927e-5 ha; = p1089
- CUTOFF pesticide formulation balance; at point-of-sale: 0.000211494 kg; = p1963
- CUTOFF pesticide, Paraquat dichloride; at point-of-sale; kg AI: 8.96632e-7 kg; = p1901
- CUTOFF phosphatic fertilizer, superphosphate grades over 22%; at point-of-sale: 0.000443348 kg; = p1117
- CUTOFF pesticide, Dimethenamid; at point-of-sale; kg AI: 3.91687e-6 kg; = p1819
- CUTOFF domestic barge transport; average fuel: 0.0199892 metric ton*km; = p2007
- CUTOFF manure appl svc; unspec rate, 1997 corn: 0.000124906 ha; = p1233
- CUTOFF fertilizer filler materials; at point-of-sale: 0.0129406 kg; = p1158
- CUTOFF prepare soil; for no-till, corn: 2.57508e-5 ha; = p0936
- CUTOFF pesticide, Terbufos; at point-of-sale; kg AI: 1.17663e-5 kg; = p1940

## Inputs from nature
- Water, surface: 39.3673 kg; = p0889
- Phosphorus: 0.0035749 kg; = p0910
- Nitrogen: 0.0208687 kg; = p0905
- Dry matter except CNPK; from plant uptake: 0.963593 kg; = p0917
- Occupation, annual crop [natural resource, land]: 0.564187 m2*year; = 1.0 * (p0855)
- Water, ground: 204.832 kg; = p0887
- Potassium; from plant uptake; biogenic: 0.0102586 kg; = p0915
- Transformation, from annual crop [natural resource, land]: 1.24906 m2; = 1.0 * (p0881+p0871+p0883+p0877+p0873+p0879)
- Carbon dioxide: 2.2453 kg; = p0900*3.6666666667
- Water, unspecified origin: 0.000574633 m3; = p0916*0.001
- Transformation, to annual crop [natural resource, land]: 1.24906 m2; = 1.0 * (p0857)

## Emissions to nature
- isopentane: 1.62876e-8 kg; = p2151*1.0166666667
- cis-2-Butene: 4.134e-8 kg; = p2149*1.1666666667
- Potassium chloride; broadcast w/ incorp. in fert. at plant.: 5.90929e-5 kg; = p2741*2.2166666667
- Sodium nitrate; no broadcast in fert. after plant.: 1.4798e-5 kg; = p2564*6.0714285714
- Phenol [air, non-urban air or from high stacks]: 4.99151e-7 kg; = 1.0 * (p2133*1.3055555556)
- Potassium; in above-ground residue left on field; biogenic: 0.00484474 kg; = p2170
- Potassium chloride; unspec. appl. method in fert. at plant.: 7.40091e-5 kg; = p3131*2.2166666667
- Halosulfuron-methyl: 1.77e-8 kg; = p3796
- Pesticide formulation balance; in seed furrow: 1.12654e-5 kg; = p5132
- Nicosulfuron [soil, agricultural]: 1.25644e-7 kg; = 1.0 * (p5069+p3627+p4039+p5275+p4657+p4245)
- Diammonium phosphate; no broadcast in fert. after plant.: 0.000115376 kg; = p2572*4.7142857143
- Isoprene [air, non-urban air or from high stacks]: 3.63133e-7 kg; = 1.0 * (p2145*1.1333333333)
- cyclopentane: 1.5918e-9 kg; = p2153*1.0166666667
- Urea; broadcast w/ incorp. in fert. at plant.: 7.80443e-5 kg; = p2724*5
- Superphosphate, grades<= 22%; unspec. appl. method in fert. in spr. bef. plant.; kg P: 3.33716e-9 kg; = p3086
- Benzene [air, non-urban air or from high stacks]: 1.47671e-7 kg; = 1.0 * (p2140*1.0833333333)
- Potassium chloride; broadcast w/ incorp. in fert. after plant.: 1.14865e-5 kg; = p2780*2.2166666667
- Ammonium nitrate; no broadcast in fert. after plant.: 0.00140197 kg; = p2554*4.7142857143
- Butane [air, non-urban air or from high stacks]: 5.84672e-8 kg; = 1.0 * (p2147*1.0208333333)
- Superphosphate, grades>22%; no broadcast in fert. in spr. bef. plant.; kg P: 1.17403e-5 kg; = p2503
- Gypsum: 1.03966e-6 kg; = p3229
- Potassium; in below-ground residue; biogenic: 0.00189747 kg; = p2176
- Monoammonium phosphate; broadcast w/ incorp. in fert. in spr. bef. plant.: 1.49451e-5 kg; = p2693*8.2142857143
- Glyphosate [air, non-urban air or from high stacks]: 3.9294e-7 kg; = 1.0 * (p3792)
- Other single phosphates; broadcast w/o incorp. in fert. at plant.; kg P: 2.43204e-6 kg; = p2934
- Potassium chloride; no broadcast in fert. after plant.: 0.000116605 kg; = p2585*2.2166666667
- Dimethenamid: 4.4073e-7 kg; = p3756
- Urea; no broadcast in fert. at plant.: 0.000588026 kg; = p2529*5
- Ammonium nitrate; broadcast w/ incorp. in fert. in fall bef. plant.: 6.51399e-5 kg; = p2632*4.7142857143
- Permethrin [soil, agricultural]: 1.10287e-6 kg; = 1.0 * (p3635+p5077+p4253+p4665+p5283+p4047)
- Pentane [air, non-urban air or from high stacks]: 2.03595e-8 kg; = 1.0 * (p2152*1.0166666667)
- Pesticide formulation balance; unspec. appl. method: 1.00127e-5 kg; = p5338
- Ammonium nitrate; broadcast w/o incorp. in fert. at plant.: 0.00017812 kg; = p2905*4.7142857143
- Nitrogen solution; broadcast w/o incorp. in fert. in fall bef. plant.; broadcast w/o incorp. in fert. in fall bef. pl...: 0.000180971 kg; = p2834
- Ammonium nitrate; no broadcast in fert. at plant.: 0.000482262 kg; = p2515*4.7142857143
- Pesticide formulation balance; banded or side-dressed: 5.98375e-5 kg; = p3690
- Aqueous ammonia; broadcast w/o incorp. in fert. after plant.: 1.05474e-5 kg; = p2942*1.2142857143
- NMVOC, non-methane volatile organic compounds, unspecified origin [air, non-urban air or from high stacks]: 2.47272e-5 kg; = 1.0 * (p2051+p2052)
- Pesticide formulation balance; foliar or directed spray: 5.43406e-6 kg; = p4720
- Superphosphate, grades<= 22%; broadcast w/o incorp. in fert. in spr. bef. plant.; kg P: 7.45541e-8 kg; = p2891
- Nitrogen; in above-ground residue left on field: 0.00339785 kg; = p2168
- Cyanazine: 2.02488e-6 kg; = p3739
- Monoammonium phosphate; unspec. appl. method in fert. in spr. bef. plant.: 9.40747e-7 kg; = p3083*8.2142857143
- Butadiene [air, non-urban air or from high stacks]: 1.45203e-7 kg; = 1.0 * (p2143*1.125)
- Propanenitrile: 6.16652e-8 kg; = p2157*1.5277777778
- Diammonium phosphate; broadcast w/ incorp. in fert. after plant.: 1.02333e-5 kg; = p2767*4.7142857143
- Ethane [air, non-urban air or from high stacks]: 8.74519e-7 kg; = 1.0 * (p2126*1.25)
- Urea; no broadcast in fert. after plant.: 0.00170943 kg; = p2568*5
- Paraquat dichloride: 7.95743e-7 kg; = p4250+p4044+p5280+p3632+p5074+p4662
- Anhydrous ammonia; broadcast w/ incorp. in fert. at plant.: 0.00010079 kg; = p2706*1.2142857143
- Acrylonitrile: 3.22581e-8 kg; = p2156*1.4722222222
- Anhydrous ammonia; broadcast w/o incorp. in fert. at plant.: 0.000280481 kg; = p2901*1.2142857143
- Other single K nutrients; no broadcast in fert. after plant.; kg K: 5.3745e-6 kg; = p2587
- Sodium nitrate; broadcast w/o incorp. in fert. in fall bef. plant.: 1.91336e-6 kg; = p2837*6.0714285714
- Anhydrous ammonia; no broadcast in fert. at plant.: 0.000759405 kg; = p2511*1.2142857143
- Carbon dioxide, in air: 0.00128293 kg; = p2163*3.6666666667
- Anhydrous ammonia; broadcast w/ incorp. in fert. in fall bef. plant.: 0.000102574 kg; = p2628*1.2142857143
- Superphosphate, grades>22%; broadcast w/o incorp. in fert. at plant.; kg P: 7.69885e-6 kg; = p2932
- Atrazine [air, non-urban air or from high stacks]: 1.2351e-5 kg; = 1.0 * (p3708)
- Particulates, < 2.5 um [air, non-urban air or from high stacks]: 4.78295e-6 kg; = 1.0 * (p2035+p2033)
- Superphosphate, grades>22%; broadcast w/ incorp. in fert. after plant.; kg P: 2.41487e-7 kg; = p2776
- Aqueous ammonia; no broadcast in fert. in fall bef. plant.: 9.99726e-6 kg; = p2435*1.2142857143
- Acetic acid [air, non-urban air or from high stacks]: 5.38428e-6 kg; = 1.0 * (p2127*2.5)
- Ammonium sulfate; broadcast w/ incorp. in fert. at plant.: 2.53132e-5 kg; = p2713*4.7142857143
- Monoammonium phosphate; unspec. appl. method in fert. at plant.: 4.94599e-6 kg; = p3122*8.2142857143
- Ammonium sulfate; broadcast w/o incorp. in fert. after plant.: 0.00020478 kg; = p2947*4.7142857143
- Water [air, non-urban air or from high stacks]: 5.32155e-7 m3; = 0.001 * (p2016)
- Aqueous ammonia; no broadcast in fert. after plant.: 2.85573e-5 kg; = p2552*1.2142857143
- Acetonitrile [air, non-urban air or from high stacks]: 2.02021e-7 kg; = 1.0 * (p2155*1.7083333333)
- Urea; broadcast w/o incorp. in fert. in spr. bef. plant.: 0.000879508 kg; = p2880*5
- Ammonium nitrate; broadcast w/ incorp. in fert. after plant.: 0.000186073 kg; = p2749*4.7142857143
- Pesticides, unspecified [soil, agricultural]: 1.76727e-5 kg; = 1.0 * (p5131+p5337+p4101+p3689+p4307+p4719)
- Metolachlor [air, non-urban air or from high stacks]: 8.00393e-6 kg; = 1.0 * (p3826)
- Acetone [air, non-urban air or from high stacks]: 4.29464e-7 kg; = 1.0 * (p2139*1.6111111111)
- Thifensulfuron methyl; broadcast with incorporation: 6.99978e-9 kg; = p4086
- Methanol [air, non-urban air or from high stacks]: 3.16288e-6 kg; = 1.0 * (p2129*2.6666666667)
- Ash: 0.000190355 kg; = p2022+p2021
- Halosulfuron-methyl [soil, agricultural]: 1.39604e-7 kg; = 1.0 * (p5032+p3590+p5238+p4002+p4620+p4208)
- Seeds; used in planting and sowing: 0.00241416 kg; = p2179
- Monoammonium phosphate; broadcast w/o incorp. in fert. at plant.: 0.000110497 kg; = p2927*8.2142857143
- Plant dry matter; in aboveground residue left on field: 0.164041 kg; = p2172
- Nitrogen solution; broadcast w/ incorp. in fert. in fall bef. plant.; broadcast w/ incorp. in fert. in fall bef. plan...: 6.50314e-5 kg; = p2639
- Diammonium phosphate; broadcast w/o incorp. in fert. after plant.: 1.43907e-5 kg; = p2962*4.7142857143
- Plant dry matter; in below-ground residue: 0.0642478 kg; = p2177
- Carbon monoxide, fossil [air, non-urban air or from high stacks]: 5.10805e-5 kg; = 1.0 * (p2028*2.3333333333)
- Urea; broadcast w/o incorp. in fert. at plant.: 0.000217183 kg; = p2919*5
- Diammonium phosphate; broadcast w/o incorp. in fert. in spr. bef. plant.: 6.20536e-5 kg; = p2884*4.7142857143
- Superphosphate, grades<= 22%; broadcast w/ incorp. in fert. after plant.; kg P: 1.22948e-8 kg; = p2774
- Diammonium phosphate; broadcast w/ incorp. in fert. at plant.: 0.000231996 kg; = p2728*4.7142857143
- Anhydrous ammonia; no broadcast in fert. in fall bef. plant.: 0.000772846 kg; = p2433*1.2142857143
- Nitrogen solution; broadcast w/ incorp. in fert. in spr. bef. plant.; broadcast w/ incorp. in fert. in spr. bef. plan...: 0.000258772 kg; = p2678
- Other single K nutrients; unspec. appl. method in fert. after plant.; kg K: 6.6307e-7 kg; = p3172
- 2,4-D [soil, agricultural]: 5.82148e-6 kg; = 1.0 * (p4927+p4515+p3485+p3897+p5133+p4103)
- Anhydrous ammonia; broadcast w/o incorp. in fert. after plant.: 0.000815378 kg; = p2940*1.2142857143
- Dicamba [soil, agricultural]: 5.83545e-6 kg; = 1.0 * (p3539+p4981+p5187+p3951+p4157+p4569)
- Pesticide formulation balance; broadcast with incorporation: 9.41114e-5 kg; = p4102
- Acetaldehyde [air, non-urban air or from high stacks]: 1.19693e-6 kg; = 1.0 * (p2130*1.8333333333)
- Superphosphate, grades>22%; broadcast w/o incorp. in fert. in spr. bef. plant.; kg P: 1.46435e-6 kg; = p2893
- Monoammonium phosphate; broadcast w/o incorp. in fert. in spr. bef. plant.: 2.10169e-5 kg; = p2888*8.2142857143
- Sodium nitrate; no broadcast in fert. in spr. bef. plant.: 2.0614e-5 kg; = p2486*6.0714285714
- Ammonium sulfate; broadcast w/o incorp. in fert. at plant.: 7.04421e-5 kg; = p2908*4.7142857143
- Diammonium phosphate; unspec. appl. method in fert. at plant.: 1.46034e-5 kg; = p3118*4.7142857143
- 1-Butene: 1.28827e-7 kg; = p2144*1.1666666667
- Monoammonium phosphate; no broadcast in fert. in spr. bef. plant.: 0.0001685 kg; = p2498*8.2142857143
- Other single K nutrients; no broadcast in fert. at plant.; kg K: 2.76494e-5 kg; = p2548
- Sodium nitrate; broadcast w/o incorp. in fert. in spr. bef. plant.: 7.61362e-6 kg; = p2876*6.0714285714
- Paraquat dichloride: 1.0089e-7 kg; = p3838
- Carbofuran: 1.55583e-6 kg; = p3724
- Aqueous ammonia; broadcast w/ incorp. in fert. after plant.: 3.7902e-6 kg; = p2747*1.2142857143
- Prosulfuron: 3.54e-8 kg; = p3853
- Methyl vinyl ether; from residue burning: 7.29919e-8 kg; = p2137*1.6111111111
- Other single phosphates; unspec. appl. method in fert. in spr. bef. plant.; kg P: 2.0706e-8 kg; = p3090
- Superphosphate, grades>22%; unspec. appl. method in fert. in spr. bef. plant.; kg P: 6.55466e-8 kg; = p3088
- Anhydrous ammonia; broadcast w/ incorp. in fert. after plant.: 0.000293004 kg; = p2745*1.2142857143
- Terbufos: 1.32396e-6 kg; = p3877
- Other single phosphates; broadcast w/ incorp. in fert. after plant.; kg P: 7.62849e-8 kg; = p2778
- I butane; from residue burning: 2.03011e-8 kg; = p2146*1.0208333333
- Propene [air, non-urban air or from high stacks]: 6.50582e-7 kg; = 1.0 * (p2136*1.1666666667)
- Furan [air, non-urban air or from high stacks]: 1.05273e-7 kg; = 1.0 * (p2138*1.4166666667)
- Superphosphate, grades>22%; broadcast w/o incorp. in fert. after plant.; kg P: 3.39595e-7 kg; = p2971
- Dimethenamid [soil, agricultural]: 3.47614e-6 kg; = 1.0 * (p3962+p4992+p5198+p4168+p4580+p3550)
- Ammonium sulfate; broadcast w/ incorp. in fert. in fall bef. plant.: 2.57613e-5 kg; = p2635*4.7142857143
- Other single K nutrients; broadcast w/ incorp. in fert. after plant.; kg K: 5.29432e-7 kg; = p2782
- Ammonium nitrate; broadcast w/o incorp. in fert. in fall bef. plant.: 0.000181273 kg; = p2827*4.7142857143
- Bromoxynil [soil, agricultural]: 9.49307e-7 kg; = 1.0 * (p4953+p5159+p4129+p3511+p3923+p4541)
- Tefluthrin: 4.77899e-7 kg; = p3876
- Other single phosphates; broadcast w/ incorp. in fert. in spr. bef. plant.; kg P: 3.28945e-7 kg; = p2700
- Ammonium nitrate; broadcast w/ incorp. in fert. in spr. bef. plant.: 0.000259203 kg; = p2671*4.7142857143
- Sewage sludge dry matter; applied in sewage sludge: 1.24082e-10 kg; = p3243
- Potassium chloride; no broadcast in fert. at plant.: 0.000599879 kg; = p2546*2.2166666667
- Other single phosphates; no broadcast in fert. in spr. bef. plant.; kg P: 3.70872e-6 kg; = p2505
- Water: 244.444 kg; = p2171+p2181+p2178
- Sulfuric acid [soil, agricultural]: 1.8541e-8 kg; = 1.0 * (p3231)
- Formaldehyde [air, non-urban air or from high stacks]: 2.00063e-6 kg; = 1.0 * (p2128*2.5)
- Aqueous ammonia; broadcast w/o incorp. in fert. in spr. bef. plant.: 1.46928e-5 kg; = p2864*1.2142857143
- Urea; broadcast w/ incorp. in fert. in fall bef. plant.: 7.94257e-5 kg; = p2646*5
- Aqueous ammonia; broadcast w/ incorp. in fert. in spr. bef. plant.: 5.27982e-6 kg; = p2669*1.2142857143
- Other single phosphates; broadcast w/ incorp. in fert. at plant.; kg P: 1.72943e-6 kg; = p2739
- Other single phosphates; no broadcast in fert. after plant.; kg P: 8.60082e-7 kg; = p2583
- Nitrogen solution; broadcast w/o incorp. in fert. after plant.; broadcast w/o incorp. in fert. after plant.; kg N: 0.000516945 kg; = p2951
- Acetol; from residue burning: 3.62353e-6 kg; = p2134*2.0555555556
- Diammonium phosphate; unspec. appl. method in fert. in spr. bef. plant.: 2.77762e-6 kg; = p3079*4.7142857143
- Anhydrous ammonia; broadcast w/o incorp. in fert. in spr. bef. plant.: 0.00113584 kg; = p2862*1.2142857143
- Formic acid [air, non-urban air or from high stacks]: 9.64308e-7 kg; = 1.0 * (p2131*3.8333333333)
- Nitrogen solution; no broadcast in fert. at plant.; no broadcast in fert. at plant.; kg N: 0.000481458 kg; = p2522
- Pesticide formulation balance; broadcast without incorporation: 7.03539e-6 kg; = p4308
- Monoammonium phosphate; unspec. appl. method in fert. after plant.: 2.18167e-7 kg; = p3161*8.2142857143
- Glycolaldehyde; from residue burning: 1.9389e-6 kg; = p2135*2.5
- Dicamba [air, non-urban air or from high stacks]: 7.39859e-7 kg; = 1.0 * (p3745)
- Ammonium sulfate; broadcast w/o incorp. in fert. in spr. bef. plant.: 0.000285263 kg; = p2869*4.7142857143
- Carbofuran [soil, agricultural]: 1.22712e-5 kg; = 1.0 * (p4136+p3930+p4548+p4960+p5166+p3518)
- Ethyne [air, non-urban air or from high stacks]: 2.61961e-7 kg; = 1.0 * (p2132*1.0833333333)
- Superphosphate, grades<= 22%; broadcast w/ incorp. in fert. in spr. bef. plant.; kg P: 5.30156e-8 kg; = p2696
- Nitrogen solution; broadcast w/ incorp. in fert. at plant.; broadcast w/ incorp. in fert. at plant.; kg N: 6.39004e-5 kg; = p2717
- Ammonium nitrate; broadcast w/o incorp. in fert. after plant.: 0.000517808 kg; = p2944*4.7142857143
- Ammonium sulfate; no broadcast in fert. after plant.: 0.000554445 kg; = p2557*4.7142857143
- Ammonium sulfate; broadcast w/o incorp. in fert. in fall bef. plant.: 7.16889e-5 kg; = p2830*4.7142857143
- isobutene: 1.12483e-7 kg; = p2150*1.1666666667
- Oxygen; applied in dolomite: 0.000734451 kg; = p3228
- Sodium nitrate; broadcast w/o incorp. in fert. at plant.: 1.88009e-6 kg; = p2915*6.0714285714
- Sodium nitrate; broadcast w/ incorp. in fert. at plant.: 6.75605e-7 kg; = p2720*6.0714285714
- 2,4-D [air, non-urban air or from high stacks]: 7.38089e-7 kg; = 1.0 * (p3691)
- Dioxins and furans (PCDD/F); from residue burning: 2.88709e-14 kg TEQ; = p2047
- Alachlor [soil, agricultural]: 1.61382e-5 kg; = 1.0 * (p4116+p3498+p4940+p5146+p3910+p4528)
- Other single K nutrients; broadcast w/ incorp. in fert. at plant.; kg K: 2.72369e-6 kg; = p2743
- Superphosphate, grades>22%; unspec. appl. method in fert. at plant.; kg P: 3.44612e-7 kg; = p3127
- Thifensulfuron methyl; in seed furrow: 8.37891e-10 kg; = p5116
- Oxygen; applied in limestone: 0.0113101 kg; = p3219
- Phosphorous; in below-ground residue: 0.000124615 kg; = p2175
- Aqueous ammonia; no broadcast in fert. at plant.: 9.82339e-6 kg; = p2513*1.2142857143
- Rimsulfuron [soil, agricultural]: 2.79208e-8 kg; = 1.0 * (p5305+p3657+p5099+p4275+p4069+p4687)
- Nitrogen solution; broadcast w/ incorp. in fert. after plant.; broadcast w/ incorp. in fert. after plant.; kg N: 0.000185763 kg; = p2756
- Nitrogen solution; no broadcast in fert. in spr. bef. plant.; no broadcast in fert. in spr. bef. plant.; kg N: 0.00194972 kg; = p2483
- Ammonium nitrate; broadcast w/o incorp. in fert. in spr. bef. plant.: 0.000721317 kg; = p2866*4.7142857143
- Diammonium phosphate; broadcast w/ incorp. in fert. in spr. bef. plant.: 4.41265e-5 kg; = p2689*4.7142857143
- Phosphorous; in above-ground residue left on field: 0.000318174 kg; = p2169
- Aqueous ammonia; broadcast w/ incorp. in fert. in fall bef. plant.: 1.32686e-6 kg; = p2630*1.2142857143
- Thifensulfuron methyl; banded or side-dressed: 4.45056e-9 kg; = p3674
- Methane: 2.15191e-6 kg; = p2025*1.3333333333
- Sodium nitrate; no broadcast in fert. at plant.: 5.09036e-6 kg; = p2525*6.0714285714
- Other single K nutrients; unspec. appl. method in fert. at plant.; kg K: 3.4112e-6 kg; = p3133
- Chlorpyrifos [air, non-urban air or from high stacks]: 6.76139e-7 kg; = 1.0 * (p3730)
- Ammonium sulfate; broadcast w/ incorp. in fert. after plant.: 7.35874e-5 kg; = p2752*4.7142857143
- Potassium chloride; unspec. appl. method in fert. after plant.: 1.43859e-5 kg; = p3170*2.2166666667
- Other single phosphates; broadcast w/o incorp. in fert. in spr. bef. plant.; kg P: 4.62584e-7 kg; = p2895
- Terbufos [soil, agricultural]: 1.04424e-5 kg; = 1.0 * (p4083+p4289+p4701+p5319+p5113+p3671)
- Carbon [soil, agricultural]: 0.206611 kg; = 1.0 * (p2167+p2173+p3242+p3217+p3225)
- Filler materials, applied with synthetic fertilizer: 0.0129406 kg; = p2432
- Urea; no broadcast in fert. in fall bef. plant.: 0.000598434 kg; = p2451*5
- Diammonium phosphate; unspec. appl. method in fert. after plant.: 6.44152e-7 kg; = p3157*4.7142857143
- Metolachlor [soil, agricultural]: 6.31289e-5 kg; = 1.0 * (p3620+p4032+p4238+p5062+p5268+p4650)
- Nitrogen solution; broadcast w/o incorp. in fert. in spr. bef. plant.; broadcast w/o incorp. in fert. in spr. bef. pl...: 0.000720115 kg; = p2873
- Superphosphate, grades>22%; broadcast w/ incorp. in fert. at plant.; kg P: 5.47467e-6 kg; = p2737
- Thifensulfuron methyl; broadcast by air: 1.77e-9 kg; = p3880
- Permethrin [air, non-urban air or from high stacks]: 1.3983e-7 kg; = 1.0 * (p3841)
- Other single phosphates; no broadcast in fert. at plant.; kg P: 1.94987e-5 kg; = p2544
- Ammonium sulfate; no broadcast in fert. in fall bef. plant.: 0.000194099 kg; = p2440*4.7142857143
- Pesticides, unspecified: 2.24067e-6 kg; = p3895
- Superphosphate, grades>22%; unspec. appl. method in fert. after plant.; kg P: 1.52008e-8 kg; = p3166
- Ammonium nitrate; no broadcast in fert. in spr. bef. plant.: 0.00195297 kg; = p2476*4.7142857143
- Hydrocyanic acid: 2.74544e-7 kg; = p2154*2.25
- Glyphosate [soil, agricultural]: 3.09921e-6 kg; = 1.0 * (p4204+p3586+p4616+p3998+p5234+p5028)
- Superphosphate, grades>22%; no broadcast in fert. at plant.; kg P: 6.17247e-5 kg; = p2542
- Superphosphate, grades>22%; broadcast w/ incorp. in fert. in spr. bef. plant.; kg P: 1.0413e-6 kg; = p2698
- Other limestone constituents; applied in limestone: 0.00150537 kg; = p3220
- Ammonium nitrate; broadcast w/ incorp. in fert. at plant.: 6.4007e-5 kg; = p2710*4.7142857143
- Anhydrous ammonia; broadcast w/ incorp. in fert. in spr. bef. plant.: 0.000408161 kg; = p2667*1.2142857143
- Other single phosphates; unspec. appl. method in fert. at plant.; kg P: 1.08862e-7 kg; = p3129
- Diammonium phosphate; no broadcast in fert. at plant.: 0.00261566 kg; = p2533*4.7142857143
- Aqueous ammonia; broadcast w/o incorp. in fert. at plant.: 3.6282e-6 kg; = p2903*1.2142857143
- Cyanazine [soil, agricultural]: 1.59707e-5 kg; = 1.0 * (p5181+p4975+p3945+p3533+p4151+p4563)
- Superphosphate, grades<= 22%; broadcast w/ incorp. in fert. at plant.; kg P: 2.78731e-7 kg; = p2735
- Ammonium sulfate; no broadcast in fert. at plant.: 0.000190723 kg; = p2518*4.7142857143
- Monoammonium phosphate; no broadcast in fert. at plant.: 0.000885894 kg; = p2537*8.2142857143
- Primisulfuron [soil, agricultural]: 3.35049e-7 kg; = 1.0 * (p4670+p4052+p5082+p5288+p4258+p3640)
- Sulfur [soil, agricultural]: 6.75149e-8 kg; = 1.0 * (p3230)
- Sodium nitrate; no broadcast in fert. in fall bef. plant.: 5.18046e-6 kg; = p2447*6.0714285714
- Sulfur dioxide [air, non-urban air or from high stacks]: 1.14521e-6 kg; = 1.0 * (p2041)
- Sodium nitrate; broadcast w/ incorp. in fert. in fall bef. plant.: 6.87563e-7 kg; = p2642*6.0714285714
- Superphosphate, grades<= 22%; broadcast w/o incorp. in fert. at plant.; kg P: 3.9197e-7 kg; = p2930
- Other single phosphates; unspec. appl. method in fert. after plant.; kg P: 4.80188e-9 kg; = p3168
- Anhydrous ammonia; broadcast w/o incorp. in fert. in fall bef. plant.: 0.000285445 kg; = p2823*1.2142857143
- Ethene [air, non-urban air or from high stacks]: 1.40025e-6 kg; = 1.0 * (p2125*1.1666666667)
- Superphosphate, grades>22%; no broadcast in fert. after plant.; kg P: 2.72267e-6 kg; = p2581
- Nicosulfuron: 1.593e-8 kg; = p3833
- Atrazine [soil, agricultural]: 9.74156e-5 kg; = 1.0 * (p4532+p4120+p4944+p3914+p3502+p5150)
- Diammonium phosphate; broadcast w/o incorp. in fert. at plant.: 0.000326248 kg; = p2923*4.7142857143
- Superphosphate, grades<= 22%; broadcast w/o incorp. in fert. after plant.; kg P: 1.72897e-8 kg; = p2969
- Nitrogen dioxide: 2.21423e-6 kg; = p2039*3.2857142857
- Urea; broadcast w/o incorp. in fert. in fall bef. plant.: 0.000221027 kg; = p2841*5
- Tefluthrin [soil, agricultural]: 3.76931e-6 kg; = 1.0 * (p5318+p4082+p5112+p4700+p3670+p4288)
- Ammonium sulfate; no broadcast in fert. in spr. bef. plant.: 0.000772354 kg; = p2479*4.7142857143
- Urea; broadcast w/ incorp. in fert. after plant.: 0.00022688 kg; = p2763*5
- Anhydrous ammonia; no broadcast in fert. in spr. bef. plant.: 0.00307529 kg; = p2472*1.2142857143
- Particulates, < 10 um: 1.0278e-5 kg; = p2034+p2036
- Calcium [soil, agricultural]: 0.00977196 kg; = 1.0 * (p3218+p3226)
- Sodium nitrate; broadcast w/o incorp. in fert. after plant.: 5.46555e-6 kg; = p2954*6.0714285714
- Aqueous ammonia; no broadcast in fert. in spr. bef. plant.: 3.97809e-5 kg; = p2474*1.2142857143
- Acetochlor [soil, agricultural]: 5.70003e-5 kg; = 1.0 * (p4938+p4114+p3908+p3496+p5144+p4526)
- Urea; no broadcast in fert. in spr. bef. plant.: 0.00238128 kg; = p2490*5
- Bromoxynil: 1.2036e-7 kg; = p3717
- Alachlor [air, non-urban air or from high stacks]: 2.04612e-6 kg; = 1.0 * (p3704)
- Urea; broadcast w/ incorp. in fert. in spr. bef. plant.: 0.000316049 kg; = p2685*5
- Chlorpyrifos [soil, agricultural]: 5.33287e-6 kg; = 1.0 * (p3936+p4966+p4554+p5172+p3524+p4142)
- Acetochlor: 7.2269e-6 kg; = p3702
- Nitrogen solution; no broadcast in fert. after plant.; no broadcast in fert. after plant.; kg N: 0.00139963 kg; = p2561
- Zinc compounds: 1.90258e-8 kg; = p3232
- Phosphorous; applied in sewage sludge: 1.33795e-10 kg; = p3241
- Monoammonium phosphate; broadcast w/ incorp. in fert. after plant.: 3.4659e-6 kg; = p2771*8.2142857143
- Nitrogen; applied in sewage sludge: 1.12078e-9 kg; = p3240
- Primisulfuron-methyl: 4.248e-8 kg; = p3846
- Monoammonium phosphate; broadcast w/ incorp. in fert. at plant.: 7.85743e-5 kg; = p2732*8.2142857143
- Nitrogen; in below-ground residue: 0.00133079 kg; = p2174
- Rimsulfuron: 3.54e-9 kg; = p3863
- Magnesium [soil, agricultural]: 0.000185591 kg; = 1.0 * (p3227)
- Other single phosphates; broadcast w/o incorp. in fert. after plant.; kg P: 1.07277e-7 kg; = p2973
- Propane [air, non-urban air or from high stacks]: 2.71039e-7 kg; = 1.0 * (p2142*1.2222222222)
- Superphosphate, grades<= 22%; no broadcast in fert. in spr. bef. plant.; kg P: 5.9773e-7 kg; = p2501
- Thifensulfuron methyl; unspec. appl. method: 7.44717e-10 kg; = p5322
- Toluene [air, non-urban air or from high stacks]: 1.83303e-7 kg; = 1.0 * (p2141*1.0952380952)
- Superphosphate, grades<= 22%; no broadcast in fert. at plant.; kg P: 3.14258e-6 kg; = p2540
- Ammonia [air, non-urban air or from high stacks]: 2.08841e-6 kg; = 1.0 * (p2159*1.2142857143)
- Thifensulfuron methyl; foliar or directed spray: 4.04172e-10 kg; = p4704
- Sodium nitrate; broadcast w/ incorp. in fert. in spr. bef. plant.: 2.73594e-6 kg; = p2681*6.0714285714
- Ammonium nitrate; no broadcast in fert. in fall bef. plant.: 0.000490798 kg; = p2437*4.7142857143
- Anhydrous ammonia; no broadcast in fert. after plant.: 0.00220765 kg; = p2550*1.2142857143
- Plant dry matter; from residue burning: 0.000342274 kg; = p2164
- Nitrogen solution; broadcast w/o incorp. in fert. at plant.; broadcast w/o incorp. in fert. at plant.; kg N: 0.000177823 kg; = p2912
- Diammonium phosphate; no broadcast in fert. in spr. bef. plant.: 0.000497509 kg; = p2494*4.7142857143
- Superphosphate, grades<= 22%; no broadcast in fert. after plant.; kg P: 1.38618e-7 kg; = p2579
- Monoammonium phosphate; no broadcast in fert. after plant.: 3.90766e-5 kg; = p2576*8.2142857143
- Superphosphate, grades<= 22%; unspec. appl. method in fert. at plant.; kg P: 1.75452e-8 kg; = p3125
- Thifensulfuron methyl; broadcast without incorporation: 5.23275e-10 kg; = p4292
- Aqueous ammonia; broadcast w/o incorp. in fert. in fall bef. plant.: 3.69242e-6 kg; = p2825*1.2142857143
- Prosulfuron [soil, agricultural]: 2.79208e-7 kg; = 1.0 * (p4059+p4265+p5295+p3647+p5089+p4677)
- Sodium nitrate; broadcast w/ incorp. in fert. after plant.: 1.96403e-6 kg; = p2759*6.0714285714
- Urea; broadcast w/o incorp. in fert. after plant.: 0.000631368 kg; = p2958*5
- Monoammonium phosphate; broadcast w/o incorp. in fert. after plant.: 4.87398e-6 kg; = p2966*8.2142857143
- Superphosphate, grades<= 22%; unspec. appl. method in fert. after plant.; kg P: 7.73914e-10 kg; = p3164
- Aqueous ammonia; broadcast w/ incorp. in fert. at plant.: 1.30378e-6 kg; = p2708*1.2142857143
- Pesticide formulation balance; broadcast by air: 2.37975e-5 kg; = p3896
- Ammonium sulfate; broadcast w/ incorp. in fert. in spr. bef. plant.: 0.000102509 kg; = p2674*4.7142857143
- Nitrogen solution; no broadcast in fert. in fall bef. plant.; no broadcast in fert. in fall bef. plant.; kg N: 0.00048998 kg; = p2444
- trans-2-Butene: 5.47996e-8 kg; = p2148*1.1666666667
- Dinitrogen monoxide [air, non-urban air or from high stacks]: 6.73781e-8 kg; = 1.0 * (p2044*1.5714285714)

## Sampling procedure
A delete-a-group jackknife is used by the USDA to estimate the ARMS sample means and RSEs, based on a 15 sample delete-a-group jackknife. Because of this relatively small sample size, a Students t distribution is used to represent ARMS data probability density functions. Other representations of uncertainty are described in Cooper, J.S., Kahn, E., Noon, M. (2012). LCA Digital Commons Unit Process Data: field crop production Version 1. Prepared for the US Department of Agriculture National Agricultural Library. Retrieved from https://www.lcacommons.gov/discovery/docs/LCA%20Digital%20Commons%20Unit%20Process%20Data%20final%20updated.pdf

## Extrapolations
Data represent an aggregation of processes applied in Nebraska in 1997. Data development is demonstrated by parameterization (exlicitly presents all raw and uncertainty data and all calculations). Flow data quality according to the LCADC convention is provided for all flows.
