# soybeans; at harvest in 1997; at farm; 85%-92% moisture

Dataset: EcoSpold 2, unit process
Geography: GLO
Time period: 1997-01-02 to 1998-01-01
Scenario: Business-as-Usual
System model: Allocation, ecoinvent default
Generated by: cooperjs@u.washington.edu
isCopyrightProtected: false

## General comment
This unit process/ gate-to-gate dataset represents the production of 1 kg soybeans coproduced with residue. The process technologies are an aggregation of those applied in Nebraska in 1997. Applicable classifications include ISIC 0111, NAIC 111110, UNSPSC 50407053; this dataset was prepared in ILCD format using the UWDFE Lab Excel to ILCD File Generator (beta version, August 2013)

Exchange "Metribuzin-soil agricultural" is the result of combining the following original LCA Commons flows: "Metribuzin; broadcast with incorporation; kg AI", "Metribuzin; unspec. appl. method; kg AI", "Metribuzin; broadcast without incorporation; kg AI", "Metribuzin; foliar or directed spray; kg AI", "Metribuzin; banded or side-dressed; kg AI".
Exchange "Bentazone-soil agricultural" is the result of combining the following original LCA Commons flows: "Bentazon; banded or side-dressed; kg AI", "Bentazon; broadcast without incorporation; kg AI", "Bentazon; broadcast with incorporation; kg AI", "Bentazon; unspec. appl. method; kg AI", "Bentazon; foliar or directed spray; kg AI".
Exchange "NMVOC, non-methane volatile organic compounds, unspecified origin-air low population density" is the result of combining the following original LCA Commons flows: "NMVOCs; from residue burning; kg except C, biogenic", "NMVOCs; from residue burning; kg C, biogenic".
Exchange "Glyphosate-soil agricultural" is the result of combining the following original LCA Commons flows: "Glyphosate; foliar or directed spray; kg AI", "Glyphosate; banded or side-dressed; kg AI", "Glyphosate; broadcast with incorporation; kg AI", "Glyphosate; broadcast without incorporation; kg AI", "Glyphosate; unspec. appl. method; kg AI".
Exchange "Imazethapyr-soil agricultural" is the result of combining the following original LCA Commons flows: "Imazethapyr; foliar or directed spray; kg AI", "Imazethapyr; broadcast with incorporation; kg AI", "Imazethapyr; unspec. appl. method; kg AI", "Imazethapyr; banded or side-dressed; kg AI", "Imazethapyr; broadcast without incorporation; kg AI".
Exchange "Carbon-soil agricultural" is the result of combining the following original LCA Commons flows: "Carbon; in above-ground residue left on field; biogenic", "Carbon; applied in dolomite", "Carbon; applied in limestone", "Carbon; in below-ground residue; biogenic", "Carbon; applied in sewage sludge".
Exchange "Particulates, < 2.5 um-air low population density" is the result of combining the following original LCA Commons flows: "PM2.5; from residue burning; kg C, biogenic", "PM2.5; from residue burning; kg except C, biogenic".
Exchange "Clomazone-soil agricultural" is the result of combining the following original LCA Commons flows: "Clomazone; broadcast with incorporation; kg AI", "Clomazone; broadcast without incorporation; kg AI", "Clomazone; unspec. appl. method; kg AI", "Clomazone; foliar or directed spray; kg AI", "Clomazone; banded or side-dressed; kg AI".
Exchange "Imazaquin-soil agricultural" is the result of combining the following original LCA Commons flows: "Imazaquin; unspec. appl. method; kg AI", "Imazaquin; banded or side-dressed; kg AI", "Imazaquin; foliar or directed spray; kg AI", "Imazaquin; broadcast without incorporation; kg AI", "Imazaquin; broadcast with incorporation; kg AI".
Exchange "Sethoxydim-soil agricultural" is the result of combining the following original LCA Commons flows: "Sethoxydim; broadcast with incorporation; kg AI", "Sethoxydim; broadcast without incorporation; kg AI", "Sethoxydim; banded or side-dressed; kg AI", "Sethoxydim; unspec. appl. method; kg AI", "Sethoxydim; foliar or directed spray; kg AI".
Exchange "Fluazifop-P-butyl-soil agricultural" is the result of combining the following original LCA Commons flows: "Fluazifop-p-butyl; unspec. appl. method; kg AI", "Fluazifop-p-butyl; broadcast without incorporation; kg AI", "Fluazifop-p-butyl; foliar or directed spray; kg AI", "Fluazifop-p-butyl; banded or side-dressed; kg AI", "Fluazifop-p-butyl; broadcast with incorporation; kg AI".
Exchange "Clethodim-soil agricultural" is the result of combining the following original LCA Commons flows: "Clethodim; broadcast with incorporation; kg AI", "Clethodim; broadcast without incorporation; kg AI", "Clethodim; banded or side-dressed; kg AI", "Clethodim; unspec. appl. method; kg AI", "Clethodim; foliar or directed spray; kg AI".
Exchange "Ash-soil agricultural" is the result of combining the following original LCA Commons flows: "Ash; from residue burning; kg C, biogenic", "Ash; from residue burning; kg except C, biogenic".
Exchange "Trifluralin-soil agricultural" is the result of combining the following original LCA Commons flows: "Trifluralin; foliar or directed spray; kg AI", "Trifluralin; banded or side-dressed; kg AI", "Trifluralin; broadcast without incorporation; kg AI", "Trifluralin; broadcast with incorporation; kg AI", "Trifluralin; unspec. appl. method; kg AI".
Exchange "Water-soil agricultural" is the result of combining the following original LCA Commons flows: "Water; in above-ground residue left on field; biogenic", "Water; from irrigation and applied with manure and sewage sludge", "Water; in below-ground residue; biogenic".
Exchange "Pendimethalin-soil agricultural" is the result of combining the following original LCA Commons flows: "Pendimethalin; broadcast without incorporation; kg AI", "Pendimethalin; foliar or directed spray; kg AI", "Pendimethalin; unspec. appl. method; kg AI", "Pendimethalin; banded or side-dressed; kg AI", "Pendimethalin; broadcast with incorporation; kg AI".
Exchange "Chlorimuron-ethyl-soil agricultural" is the result of combining the following original LCA Commons flows: "Chlorimuron-ethyl; foliar or directed spray; kg AI", "Chlorimuron-ethyl; broadcast without incorporation; kg AI", "Chlorimuron-ethyl; banded or side-dressed; kg AI", "Chlorimuron-ethyl; unspec. appl. method; kg AI", "Chlorimuron-ethyl; broadcast with incorporation; kg AI".
Exchange "Metolachlor-soil agricultural" is the result of combining the following original LCA Commons flows: "Propazine; broadcast with incorporation; kg AI", "Propazine; foliar or directed spray; kg AI", "Propazine; banded or side-dressed; kg AI", "Propazine; broadcast without incorporation; kg AI", "Propazine; unspec. appl. method; kg AI".
Exchange "Particulates, < 10 um-air low population density" is the result of combining the following original LCA Commons flows: "PM10; from residue burning; kg C, biogenic", "PM10; from residue burning; kg except C, biogenic".
Exchange "Flumetsulam-soil agricultural" is the result of combining the following original LCA Commons flows: "Flumetsulam; broadcast without incorporation; kg AI", "Flumetsulam; broadcast with incorporation; kg AI", "Flumetsulam; unspec. appl. method; kg AI", "Flumetsulam; banded or side-dressed; kg AI", "Flumetsulam; foliar or directed spray; kg AI".
Exchange "Transformation, from arable-resource land" is the result of combining the following original LCA Commons flows: "Transformation; from arable, from soy to soybeans", "Transformation; from arable, from other to soybeans", "Transformation; from arable, from corn to soybeans", "Transformation; from arable, from unspec. use to soybeans", "Transformation; from arable, from small grains to soybeans".
Exchange "Calcium-soil agricultural" is the result of combining the following original LCA Commons flows: "Calcium; applied in dolomite", "Calcium; applied in limestone".
Exchange "Alachlor-soil agricultural" is the result of combining the following original LCA Commons flows: "Alachlor; broadcast with incorporation; kg AI", "Alachlor; broadcast without incorporation; kg AI", "Alachlor; banded or side-dressed; kg AI", "Alachlor; foliar or directed spray; kg AI", "Alachlor; unspec. appl. method; kg AI".
Exchange "Quizalofop ethyl ester-soil agricultural" is the result of combining the following original LCA Commons flows: "Quizalofop, ethyl ; broadcast without incorporation; kg AI", "Quizalofop, ethyl ; unspec. appl. method; kg AI", "Quizalofop, ethyl ; broadcast with incorporation; kg AI", "Quizalofop, ethyl ; foliar or directed spray; kg AI", "Quizalofop, ethyl ; banded or side-dressed; kg AI".
Exchange "Butadiene-2bdf9967-6dae-4183-88d1-8f612548c51e low population density" was originally named: "1,3 butadiene; from residue burning; kg C, biogenic" in this dataset.
Exchange "Ammonia-2bdf9967-6dae-4183-88d1-8f612548c51e low population density" was originally named: "Ammonia; from residue burning; kg N, biogenic" in this dataset.
Exchange "Magnesium-be1c0329-f1a8-4524-8420-a86d2a8dd358 agricultural" was originally named: "Magnesium; applied in dolomite" in this dataset.
Exchange "Carbon dioxide, in air-2bdf9967-6dae-4183-88d1-8f612548c51e low population density" was originally named: "Carbon dioxide; from residue burning; kg C, biogenic" in this dataset.
Exchange "Water, surface-c19fb2d9-98eb-4cd3-8761-81b71d8a9a1b in water" was originally named: "Water; withdrawal from surface water, for soybeans, in 1997" in this dataset.
Exchange "Benzene-2bdf9967-6dae-4183-88d1-8f612548c51e low population density" was originally named: "Benzene; from residue burning; kg C, biogenic" in this dataset.
Exchange "Hydrocyanic acid-2bdf9967-6dae-4183-88d1-8f612548c51e low population density" was originally named: "Hydrogen cyanide; from residue burning; kg C, biogenic" in this dataset.
Exchange "1-Butene-2bdf9967-6dae-4183-88d1-8f612548c51e low population density" was originally named: "1 butene; from residue burning; kg C, biogenic" in this dataset.
Exchange "Zinc compounds-be1c0329-f1a8-4524-8420-a86d2a8dd358 agricultural" was originally named: "Zinc compounds; as secondary application" in this dataset.
Exchange "Carbon monoxide, fossil-2bdf9967-6dae-4183-88d1-8f612548c51e low population density" was originally named: "Carbon monoxide; from residue burning; kg C, biogenic" in this dataset.
Exchange "Acetone-2bdf9967-6dae-4183-88d1-8f612548c51e low population density" was originally named: "Acetone; from residue burning; kg C, biogenic" in this dataset.
Exchange "Acetaldehyde-2bdf9967-6dae-4183-88d1-8f612548c51e low population density" was originally named: "Acetaldehyde; from residue burning; kg C, biogenic" in this dataset.
Exchange "trans-2-Butene-2bdf9967-6dae-4183-88d1-8f612548c51e low population density" was originally named: "Trans 2 butene; from residue burning; kg C, biogenic" in this dataset.
Exchange "Propene-2bdf9967-6dae-4183-88d1-8f612548c51e low population density" was originally named: "Propylene; from residue burning; kg C, biogenic" in this dataset.
Exchange "Acrylonitrile-2bdf9967-6dae-4183-88d1-8f612548c51e low population density" was originally named: "Propenenitrile; from residue burning; kg C, biogenic" in this dataset.
Exchange "Formic acid-2bdf9967-6dae-4183-88d1-8f612548c51e low population density" was originally named: "Formic acid; from residue burning; kg C, biogenic" in this dataset.
Exchange "Ethane-2bdf9967-6dae-4183-88d1-8f612548c51e low population density" was originally named: "Ethane; from residue burning; kg C, biogenic" in this dataset.
Exchange "Sulfuric acid-be1c0329-f1a8-4524-8420-a86d2a8dd358 agricultural" was originally named: "Sulfuric acid; as secondary application" in this dataset.
Exchange "Water, unspecified origin-c19fb2d9-98eb-4cd3-8761-81b71d8a9a1b in water" was originally named: "Water; from plant uptake; biogenic" in this dataset.
Exchange "Methanol-2bdf9967-6dae-4183-88d1-8f612548c51e low population density" was originally named: "Methanol; from residue burning; kg C, biogenic" in this dataset.
Exchange "Sulfur-be1c0329-f1a8-4524-8420-a86d2a8dd358 agricultural" was originally named: "Sulfur; as secondary application" in this dataset.
Exchange "Methane-2bdf9967-6dae-4183-88d1-8f612548c51e low population density" was originally named: "Methane; from residue burning; kg C, biogenic" in this dataset.
Exchange "Dinitrogen monoxide-2bdf9967-6dae-4183-88d1-8f612548c51e low population density" was originally named: "Dinitrogen monoxide; from residue burning; kg N, biogenic" in this dataset.
Exchange "Transformation, to arable-c19fb2d9-98eb-4cd3-8761-81b71d8a9a1b land" was originally named: "Transformation; to arable, to soybeans" in this dataset.
Exchange "Occupation, arable-c19fb2d9-98eb-4cd3-8761-81b71d8a9a1b land" was originally named: "Occupation; arable, as soybeans" in this dataset.
Exchange "Toluene-2bdf9967-6dae-4183-88d1-8f612548c51e low population density" was originally named: "Toluene; from residue burning; kg C, biogenic" in this dataset.
Exchange "Carbon dioxide-c19fb2d9-98eb-4cd3-8761-81b71d8a9a1b unspecified" was originally named: "Carbon dioxide; from plant uptake; kg C, biogenic" in this dataset.
Exchange "Ethene-2bdf9967-6dae-4183-88d1-8f612548c51e low population density" was originally named: "Ethylene; from residue burning; kg C, biogenic" in this dataset.
Exchange "Water, ground-c19fb2d9-98eb-4cd3-8761-81b71d8a9a1b in water" was originally named: "Water; withdrawal from groundwater, for soybeans, in 1997" in this dataset.
Exchange "isopentane-2bdf9967-6dae-4183-88d1-8f612548c51e low population density" was originally named: "I pentane; from residue burning; kg C, biogenic" in this dataset.
Exchange "Acetic acid-2bdf9967-6dae-4183-88d1-8f612548c51e low population density" was originally named: "Acetic acid; from residue burning; kg C, biogenic" in this dataset.
Exchange "Water-2bdf9967-6dae-4183-88d1-8f612548c51e low population density" was originally named: "Water; from residue burning; biogenic" in this dataset.
Exchange "Sulfur dioxide-2bdf9967-6dae-4183-88d1-8f612548c51e low population density" was originally named: "Sulfur dioxide; from residue burning; biogenic" in this dataset.
Exchange "Phenol-2bdf9967-6dae-4183-88d1-8f612548c51e low population density" was originally named: "Phenol; from residue burning; kg C, biogenic" in this dataset.
Exchange "Propane-2bdf9967-6dae-4183-88d1-8f612548c51e low population density" was originally named: "Propane; from residue burning; kg C, biogenic" in this dataset.
Exchange "Isoprene-2bdf9967-6dae-4183-88d1-8f612548c51e low population density" was originally named: "Isoprene; from residue burning; kg C, biogenic" in this dataset.
Exchange "Ethyne-2bdf9967-6dae-4183-88d1-8f612548c51e low population density" was originally named: "Acetylene; from residue burning; kg C, biogenic" in this dataset.
Exchange "isobutene-2bdf9967-6dae-4183-88d1-8f612548c51e low population density" was originally named: "I butene; from residue burning; kg C, biogenic" in this dataset.
Exchange "Phosphorus-c19fb2d9-98eb-4cd3-8761-81b71d8a9a1b unspecified" was originally named: "Phosphorous; from plant uptake; biogenic" in this dataset.
Exchange "Acetonitrile-2bdf9967-6dae-4183-88d1-8f612548c51e low population density" was originally named: "Acetonitrile; from residue burning; kg C, biogenic" in this dataset.
Exchange "Butane-2bdf9967-6dae-4183-88d1-8f612548c51e low population density" was originally named: "N butane; from residue burning; kg C, biogenic" in this dataset.
Exchange "cis-2-Butene-2bdf9967-6dae-4183-88d1-8f612548c51e low population density" was originally named: "Cis 2 butene; from residue burning; kg C, biogenic" in this dataset.
Exchange "Nitrogen dioxide-2bdf9967-6dae-4183-88d1-8f612548c51e low population density" was originally named: "Nitrogen dioxide; from residue burning; kg N, biogenic" in this dataset.
Exchange "Pentane-2bdf9967-6dae-4183-88d1-8f612548c51e low population density" was originally named: "N pentane; from residue burning; kg C, biogenic" in this dataset.
Exchange "Furan-2bdf9967-6dae-4183-88d1-8f612548c51e low population density" was originally named: "Furan; from residue burning; kg C, biogenic" in this dataset.
Exchange "Formaldehyde-2bdf9967-6dae-4183-88d1-8f612548c51e low population density" was originally named: "Formaldehyde; from residue burning; kg C, biogenic" in this dataset.

## Geography
The unit process is assumed to represent production in Nebraska (US State).

## Technology
This process produces soybeans; at harvest in 1997; at farm; 85%-92% moisture. The process is assumed to represent production in Nebraska (US State). Yields and related inputs and outputs represent a single year of operation, in 1997. This dataset includes consideration of residue burning; soil preparation; planting or sowing; irrigation; application, storage, and transport of fertilizers, manures, liming materials, secondary materials, and pesticides; and harvest. Fate and transport of applications are not included as described in Cooper, J.S., Kahn, E., Noon, M. (2012) LCA Digital Commons Unit Process Data: field crop production Version 1 which is available at https://www.lcacommons.gov/discovery/docs/LCA%20Digital%20Commons%20Unit%20Process%20Data%20final%20updated.pdf

## Time period
Start and end dates match the underlying data obtained from the USDA Agricultural Resource Management Survey (ARMS).
## Parameters
- p3458: 0; = p3363*p1241
- p0679: 640.402; = p0019*(1+p0547*p0151/100)
- p0816: 0
- p1639: 0
- p0804: 0
- p0283: 0.5
- p3269: 0
- p1001: 0.0319168; = if(p0978>0;0;if(and(p0687=0;p0691=0;p0695=0;p0699=0);0;IF(p0996+p0999+p1000=1;0;1-(p0996+p0999+p1000))))
- p2043: 0.636483
- p0833: 1.37806e10; = p0830+p0832
- p2928: 2.95494e-6; = p2342*(p1079+p1081)
- p0248: 16.203
- p0044: 31.202
- p1838: 0
- p0149: 0
- p1746: 0
- p0950: 0; = if(and(p0683=0;or(p0807=480;p0807=32;p0807=1;and(p0807=60;p0901<0.03)));p0938;0)
- p4146: 3.97739e-6; = p1797*p3479
- p3419: 0; = p3362*p1239
- p1596: 0
- p0309: 0.5
- p1804: 0
- p0238: 18.061
- p0995: 2.13479e-7; = p0991*p0001*p0004/(p0818*p0002)
- p2048: 1.79439e-14; = p2015*p2046/(p0818*1000000000000)
- p0152: 0
- p1978: 296
- p1171: 0.000372324; = p0801*p0001/(p0818*p0002)
- p1712: 0
- p2275: 0; = p2230*p2221
- p1818: 0
- p2296: 0.000207322; = p2223*p2203
- p2846: 4.528e-5; = p2260*(p1079+p1081)
- p1252: 0; = if(p1232>0;0;p0724*2000*p0723*1000*p0725/100)
- p2527: 7.73883e-8; = p2331*p1014
- p2104: 0.817136
- p1580: 0
- p2213: 8.16126e-5; = p1116-p2212
- p0746: 6.977; = p0086*(1+p0614*p0218/100)
- p0762: 0
- p1851: 0
- p3098: 1.47748e-8; = p2317*p1023
- p0425: 0; = SQRT(2)*(IF((2*p0293-1)<0;-1;IF((2*p0293-1)>0;1;0))*SQRT(SQRT((2/(pi()*0.140012289)+LN(1-(2*p0293-1)^2)/2)^2-LN(1-(2*p0293-1)^2)/0.140012289)-(2/(pi()*0.140012289)+LN(1-(2*p0293-1)^2)/2)))
- p2092: 0.54529
- p2735: 2.66237e-7; = p2344*(p1078+p1080)
- p4212: 7.78185e-7; = p1863*p3479
- p2610: 0; = p2414*p1073
- p0799: 20.761; = p0139*(1+p0667*p0271/100)
- p2726: 1.49359e-5; = p2335*(p1019+p1021)
- p2072: 0.134
- p3470: 0; = p3375*p1241
- p0179: 23.48
- p1989: 50
- p1733: 0
- p3059: 9.87081e-8; = p2278*p1023
- p2189: 5.98295e-5; = p1053/p0818
- p1081: 0; = IF(p1071=0;IF(p1073+p1078+p1079+p1080=1;0;IF(p1073+p1078+p1079+p1080+p1077>1;1-(p1073+p1078+p1079+p1080);p1077));0)
- p3306: 0; = if(and(p1232=0;p3252<>0);p3252*(p3257*p3277-p3301)/p3305;0)
- p2322: 6.46996e-6; = p2224*p2189
- p1233: 0.000372324; = p1232*p0001/(p0818*p0002)
- p3310: 0; = if(and(p1232=0;p3252<>0);IF((p3306+p3307+p3308+p3309)+(p3252*(p3257*(1-p3277))/p3305)>p3252;p3252-(p3306+p3307+p3308+p3309);p3252*(p3257*(1-p3277))/p3305);0)
- p2449: 1.21224e-7; = p2253*p1014
- p3270: 0
- p3003: 0; = p2417*(p1079+p1081)
- p5334: 1.10366e-6; = p1955*p3484
- p1967: 0; = if(p0807=480;p0802*p0810;0)
- p2338: 3.09766e-5; = p2228*p2206
- p1209: 82.4701; = p1206*p0818*p0822/p0801
- p2783: 0; = p2392*(p1128+p1130)
- p3109: 1.86322e-6; = p2328*p1023
- p2901: 3.47394e-5; = p2315*(p1020+p1022)
- p2847: 0.000375956; = p2261*(p1079+p1081)
- p2346: 1.06418e-5; = p2228*p2214
- p2964: 0; = p2378*(p1079+p1081)
- p3317: 0; = if(and(p1232=0;p3253<>0);p3253*(p3261*p3277-p3312)/p3316;0)
- p5116: 0; = p1943*p3483
- p2633: 1.77516e-6; = p2242*(p1019+p1021)
- p3232: 5.67129e-8; = p1182/p0818
- p2918: 1.52377e-5; = p2332*(p1020+p1022)
- p1059: 0.335
- p1067: 0.000284903; = IF(p1012=0;p1053/(p1060*p0818);0)
- p2810: 0; = p2419*(p1078+p1080)
- p0694: 873.014; = p0034*(1+p0562*p0166/100)
- p0555: 0; = IF(p0291<0.5;-SQRT(p0007*EXP(p0423^2*p0008)-p0007);SQRT(p0007*EXP(p0423^2*p0008)-p0007))
- p1772: 0
- p2532: 1.48645e-5; = p2336*p1073
- p2936: 4.92382e-5; = p2350*(p1129+p1131)
- p1495: 815
- p3910: 5.15821e-5; = p1767*p3478
- p0614: 0; = IF(p0350<0.5;-SQRT(p0007*EXP(p0482^2*p0008)-p0007);SQRT(p0007*EXP(p0482^2*p0008)-p0007))
- p0956: 1.19607e-5; = if(and(p0683>0;or(p0807=56;p0807=100;and(p0807=60;p0901>0.06)));p0938;0)
- p2776: 0; = p2385*(p1078+p1080)
- p1951: 0
- p3002: 0; = p2416*(p1079+p1081)
- p1689: 0
- p3734: 0; = p1797*p3477
- p2635: 4.87786e-6; = p2244*(p1019+p1021)
- p1911: 0
- p0987: 0.0114235; = if(p0978>0;0;if(and(p0687=0;p0691=0;p0695=0;p0699=0);0;IF(p0982+p0985+p0986=1;0;1-(p0982+p0985+p0986))))
- p1047: 0.314094; = IF(p1012=0;IF(p1037+p1044+p1045+p1046=1;0;IF(p1037+p1044+p1045+p1046+p1041>1;1-(p1037+p1044+p1045+p1046);p1041));0)
- p2033: 5.16945e-6; = p2015*p2029*p2031/(p0818*1000)
- p2162: 2.92553e-8; = p2015*p2086*p2124/(p0818*1000)
- p1113: 0.100377
- p3374: 0; = if(p1232=0;p3246*p3356/p0818;0)
- p3112: 5.52566e-9; = p2331*p1023
- p0893: 0; = 1000*(p0890+p0892)*p0001*p0003*p0004/(p0818*p0002)
- p0136: 31.202
- p1062: 0.16
- p2101: 0.620397
- p0683: 67.737; = p0023*(1+p0551*p0155/100)
- p2669: 4.16009e-6; = p2278*(p1019+p1021)
- p1991: 1.15605e8; = (if(p1111=0;0;p1106/p1111)+if(p1112=0;0;p1107/p1112)+if(p1113=0;0;p1108/p1113)+if(p1114=0;0;p1109/p1114)+if(p1115=0;0;p1110/p1115))*(1+p1157)
- p0874: 0; = p0865*p0856
- p1717: 0
- p1138: 12482.3; = if(p1121=0;p1132*(p0716/100)*p0703*1000;0)
- p2184: 1.19638e-5; = p1051/p0818
- p3103: 7.3887e-8; = p2322*p1023
- p0275: 0.5
- p3108: 1.88489e-7; = p2327*p1023
- p2305: 5.11119e-6; = p2227*p2212
- p1985: 5.53194e7; = (if(p1057=0;0;p1050/p1057)+if(p1058=0;0;p1051/p1058)+if(p1059=0;0;p1052/p1059)+if(p1060=0;0;p1053/p1060)+if(p1061=0;0;p1054/p1061)+if(p1062=0;0;p1055/p1062)+if(p1063=0;0;p1056/p1063))*(1+p1157)
- p3460: 0; = p3365*p1241
- p0938: 1.19607e-5; = p0932*p0001/(p0818*p0002)
- p2385: 0; = p2229*p2214
- p2278: 8.64344e-6; = p2223*p2184
- p2465: 2.24142e-5; = p2269*p1073
- p2081: 0.0019
- p2246: 2.91724e-6; = p2222*p2191
- p2789: 0; = p2398*(p1019+p1021)
- p2963: 0; = p2377*(p1079+p1081)
- p1312: 0; = IF(p1307+p1310+p1311=p1266;0;p1266-(p1307+p1310+p1311))
- p0151: 0
- p2832: 1.01327e-6; = p2246*(p1020+p1022)
- p2304: 0.000991785; = p2227*p2211
- p0610: 0; = IF(p0346<0.5;-SQRT(p0007*EXP(p0478^2*p0008)-p0007);SQRT(p0007*EXP(p0478^2*p0008)-p0007))
- p2478: 3.21855e-5; = p2282*p1014
- p0539: 0; = IF(p0275<0.5;-SQRT(p0007*EXP(p0407^2*p0008)-p0007);SQRT(p0007*EXP(p0407^2*p0008)-p0007))
- p1802: 0
- p1194: 1.48
- p1618: 0
- p0413: 0; = SQRT(2)*(IF((2*p0281-1)<0;-1;IF((2*p0281-1)>0;1;0))*SQRT(SQRT((2/(pi()*0.140012289)+LN(1-(2*p0281-1)^2)/2)^2-LN(1-(2*p0281-1)^2)/0.140012289)-(2/(pi()*0.140012289)+LN(1-(2*p0281-1)^2)/2)))
- p2208: 0.000592299; = p1110/p0818
- p1224: 0.44; = IF(p1221=0;0;IF(p1193=0;1-p1223;0))
- p2256: 4.24016e-6; = p2222*p2202
- p1555: 0
- p3223: 0.126838; = IF(p3216=0;0;(1-p1223)*24.3050/84.3139)
- p0575: 0; = IF(p0311<0.5;-SQRT(p0007*EXP(p0443^2*p0008)-p0007);SQRT(p0007*EXP(p0443^2*p0008)-p0007))
- p0003: 10000
- p0905: 0.0983707; = p0904/p0818
- p2989: 0; = p2403*(p1020+p1022)
- p2621: 0; = p2425*p1073
- p0826: 0.101167; = 1-p0825/p0818
- p1669: 0
- p3378: 0; = if(p1232=0;p3246*p3360/p0818;0)
- p2459: 1.03779e-5; = p2263*p1073
- p2572: 0; = p2376*p1073
- p2980: 0; = p2394*(p1020+p1022)
- p2873: 0.000178673; = p2287*(p1020+p1022)
- p3388: 0; = p3369*p1234
- p3011: 0; = p2425*(p1079+p1081)
- p2144: 2.05892e-7; = p2015*p2072*p2106/(p0818*1000)
- p4719: 0; = p1962*p3481
- p2919: 6.53275e-6; = p2333*(p1020+p1022)
- p3036: 3.36449e-7; = p2255*p1023
- p2718: 7.94395e-6; = p2327*(p1019+p1021)
- p3216: 0.06; = IF(OR(p1226=0;p1228=0);0;1-p3213-p3214-p3215)
- p2412: 0; = p2234*p2202
- p3327: 0; = if(and(p1232=0;p3255<>0);1-(p3323+p3324+p3325+p3326);0)
- p0247: 7.989
- p2167: 0.332577; = p2166*(p0898)
- p2188: 0.000278539; = p1066-p2186-p2187
- p1246: 0; = if(p1232>0;0;p1241*(p0725/100)*p0723*1000)
- p2904: 1.54785e-6; = p2318*(p1020+p1022)
- p0871: 2.87381; = p0870*p0001*p0003/(p0818*p0002)
- p1872: 0
- p2034: 7.14458e-6; = p2015*p2030*p2032/(p0818*1000)
- p0633: 0; = IF(p0369<0.5;-SQRT(p0007*EXP(p0501^2*p0008)-p0007);SQRT(p0007*EXP(p0501^2*p0008)-p0007))
- p2126: 1.30448e-6; = p2015*p2054*p2088/(p0818*1000)
- p3392: 0; = p3373*p1234
- p1870: 0
- p4444: 0; = p1889*p3480
- p3338: 0; = if(and(p1232=0;p3254<>0);1-(p3334+p3335+p3336+p3337);0)
- p3041: 0; = p2260*p1082
- p1834: 0
- p2004: 30
- p1751: 0.791173
- p0723: 3498.94; = p0063*(1+p0591*p0195/100)
- p0512: 0; = SQRT(2)*(IF((2*p0380-1)<0;-1;IF((2*p0380-1)>0;1;0))*SQRT(SQRT((2/(pi()*0.140012289)+LN(1-(2*p0380-1)^2)/2)^2-LN(1-(2*p0380-1)^2)/0.140012289)-(2/(pi()*0.140012289)+LN(1-(2*p0380-1)^2)/2)))
- p0848: 0
- p4144: 3.17038e-7; = p1795*p3479
- p0994: 0; = p0990*p0001*p0004/(p0818*p0002)
- p3121: 0; = p2340*p1082
- p2059: 1.00168
- p2622: 0; = p2426*p1073
- p2012: 0.00327758
- p3478: 0.59015; = if(p1328+p1330+p1332+p1334+p1336+p1338+p1340+p1342+p1344=0;0;p1332/(p1328+p1330+p1332+p1334+p1336+p1338+p1340+p1342+p1344))
- p2708: 6.22689e-7; = p2317*(p1019+p1021)
- p1750: 0
- p2022: 0.000308417; = p2018*p2015/p0818-p2021
- p1961: 0
- p0010: 2778.68
- p0996: 0.968083; = if(p0888=0;0;if((p0691*p0690*1000*p0692/100)/p0888>1;1;(p0691*p0690*1000*p0692/100)/p0888))
- p1225: 1.088; = IF(p1221=0;0;p1223+1.2*p1224)
- p3248: 0
- p0740: 97.317; = p0080*(1+p0608*p0212/100)
- p1281: 0; = IF(p1277+p1280=p1263;0;IF(p1277+p1280+p1279>p1263;p1263-(p1277+p1280);p1279))
- p2037: 3.16
- p2521: 2.41051e-6; = p2325*p1014
- p0657: 0; = IF(p0393<0.5;-SQRT(p0007*EXP(p0525^2*p0008)-p0007);SQRT(p0007*EXP(p0525^2*p0008)-p0007))
- p2238: 3.43904e-5; = p2222*p2183
- p2142: 4.13486e-7; = p2015*p2070*p2104/(p0818*1000)
- p0634: 0; = IF(p0370<0.5;-SQRT(p0007*EXP(p0502^2*p0008)-p0007);SQRT(p0007*EXP(p0502^2*p0008)-p0007))
- p0721: 0
- p4331: 0; = p1776*p3480
- p2267: 2.25001e-5; = p2226*p2213
- p2820: 0; = p2429*(p1128+p1130)
- p0798: 31.532; = p0138*(1+p0666*p0270/100)
- p2260: 0.00012302; = p2226*p2206
- p0888: 701590; = p0686*1000*p0687*p0884/100
- p0452: 0; = SQRT(2)*(IF((2*p0320-1)<0;-1;IF((2*p0320-1)>0;1;0))*SQRT(SQRT((2/(pi()*0.140012289)+LN(1-(2*p0320-1)^2)/2)^2-LN(1-(2*p0320-1)^2)/0.140012289)-(2/(pi()*0.140012289)+LN(1-(2*p0320-1)^2)/2)))
- p0345: 0.5
- p2282: 0.000201235; = p2223*p2188
- p2885: 0.000107558; = p2299*(p1079+p1081)
- p3227: 0.000496131; = p3223*p1229
- p2450: 1.09909e-5; = p2254*p1014
- p0278: 0.5
- p1248: 0; = if(p1232>0;0;p1243*p0001/(p0818*p0002))
- p2498: 2.46518e-5; = p2302*p1073
- p1049: 0.178958; = IF(p1012=0;IF(p1037+p1044+p1045+p1046+p1047+p1048=1;0;1-(p1037+p1044+p1045+p1046+p1047+p1048));0)
- p1737: 0
- p1874: 0
- p1226: 3.6e6; = IF(p1221=0;0;IF(p1193=0;p0801;0))
- p0945: 0; = if(and(p0683=0;p0951=0);p0939;0)
- p2806: 0; = p2415*(p1078+p1080)
- p4970: 0; = p1797*p3483
- p3253: 0; = p1252*(p1277*(1-p3247)+p1280*(1-p3248)+p1281*(1-p3249)+p1282*(1-p3250))
- p1858: 0
- p3344: 0; = if(and(p1232=0;p3254<>0);p3254-(p3339+p3340+p3341+p3342+p3343);0)
- p2146: 3.70803e-8; = p2015*p2074*p2108/(p0818*1000)
- p2568: 0; = p2372*p1014
- p3111: 2.51326e-9; = p2330*p1023
- p2402: 0; = p2234*p2191
- p3148: 0; = p2367*p1023
- p4102: 0.000165018; = p1963*p3478
- p1929: 0
- p0481: 0; = SQRT(2)*(IF((2*p0349-1)<0;-1;IF((2*p0349-1)>0;1;0))*SQRT(SQRT((2/(pi()*0.140012289)+LN(1-(2*p0349-1)^2)/2)^2-LN(1-(2*p0349-1)^2)/0.140012289)-(2/(pi()*0.140012289)+LN(1-(2*p0349-1)^2)/2)))
- p1205: 0.04725
- p0161: 5.089
- p0204: 201.557
- p0676: 781.659; = p0016*(1+p0544*p0148/100)
- p4445: 0; = p1890*p3480
- p0778: 24.628; = p0118*(1+p0646*p0250/100)
- p1022: 0; = IF(p1012=0;IF(p1014+p1019+p1020+p1021=1;0;IF(p1014+p1019+p1020+p1021+p1018>1;1-(p1014+p1019+p1020+p1021);p1018));0)
- p0515: 0; = SQRT(2)*(IF((2*p0383-1)<0;-1;IF((2*p0383-1)>0;1;0))*SQRT(SQRT((2/(pi()*0.140012289)+LN(1-(2*p0383-1)^2)/2)^2-LN(1-(2*p0383-1)^2)/0.140012289)-(2/(pi()*0.140012289)+LN(1-(2*p0383-1)^2)/2)))
- p0820: 0; = if(p0807=480;p0814;0)
- p3445: 0; = p3369*p1240
- p1261: 0; = if(p1232>0;0;p0732/100)
- p1808: 0
- p1255: 0; = if(p1232>0;0;p0737/100)
- p2926: 1.51341e-5; = p2340*(p1079+p1081)
- p1309: 0
- p2773: 0; = p2382*(p1078+p1080)
- p3276: 0
- p0298: 0.5
- p2234: 0; = 1-(p2222+p2223+p2224+p2225)
- p1888: 0
- p2171: 0.0842917; = p2165*p0831
- p1825: 0
- p0766: 18.17; = p0106*(1+p0634*p0238/100)
- p2492: 3.31591e-5; = p2296*p1014
- p0751: 7.839; = p0091*(1+p0619*p0223/100)
- p1744: 0
- p2349: 3.01293e-5; = p2228*p2217
- p0022: 3499.51
- p2073: 0.377647
- p2326: 7.69969e-5; = p2224*p2193
- p0631: 0; = IF(p0367<0.5;-SQRT(p0007*EXP(p0499^2*p0008)-p0007);SQRT(p0007*EXP(p0499^2*p0008)-p0007))
- p0418: 0; = SQRT(2)*(IF((2*p0286-1)<0;-1;IF((2*p0286-1)>0;1;0))*SQRT(SQRT((2/(pi()*0.140012289)+LN(1-(2*p0286-1)^2)/2)^2-LN(1-(2*p0286-1)^2)/0.140012289)-(2/(pi()*0.140012289)+LN(1-(2*p0286-1)^2)/2)))
- p2958: 0; = p2372*(p1020+p1022)
- p2156: 4.08549e-8; = p2015*p2085*p2118/(p0818*1000)
- p2816: 0; = p2425*(p1078+p1080)
- p2761: 0; = p2370*(p1019+p1021)
- p0743: 0
- p2451: 4.71205e-6; = p2255*p1014
- p2197: 1.2399e-6; = p1055/p0818
- p3159: 0; = p2378*p1082
- p2883: 0.000367249; = p2297*(p1079+p1081)
- p1589: 0
- p3075: 1.43496e-6; = p2294*p1023
- p3287: 0
- p0274: 0.5
- p0005: 1.60934
- p2506: 3.99456e-5; = p2310*p1073
- p0499: 0; = SQRT(2)*(IF((2*p0367-1)<0;-1;IF((2*p0367-1)>0;1;0))*SQRT(SQRT((2/(pi()*0.140012289)+LN(1-(2*p0367-1)^2)/2)^2-LN(1-(2*p0367-1)^2)/0.140012289)-(2/(pi()*0.140012289)+LN(1-(2*p0367-1)^2)/2)))
- p1756: 0
- p2604: 0; = p2408*p1014
- p2113: 0.832356
- p0745: 9053.28; = p0085*(1+p0613*p0217/100)
- p0441: 0; = SQRT(2)*(IF((2*p0309-1)<0;-1;IF((2*p0309-1)>0;1;0))*SQRT(SQRT((2/(pi()*0.140012289)+LN(1-(2*p0309-1)^2)/2)^2-LN(1-(2*p0309-1)^2)/0.140012289)-(2/(pi()*0.140012289)+LN(1-(2*p0309-1)^2)/2)))
- p2851: 0.000153677; = p2265*(p1079+p1081)
- p1998: 296
- p0772: 15.445; = p0112*(1+p0640*p0244/100)
- p0343: 0.5
- p1234: 0; = if(p1232>0;0;p0726/100)
- p3299: 0; = if(p1303+p1304+p1305+p1306=0;0;p1303/(p1303+p1304+p1305+p1306))
- p2557: 0; = p2361*p1014
- p3068: 5.8745e-6; = p2287*p1023
- p1574: 0
- p2510: 2.71328e-5; = p2314*p1123
- p4007: 4.72038e-6; = p1864*p3478
- p2497: 5.45138e-5; = p2301*p1073
- p2311: 0.000865411; = p2231*p2218
- p2890: 0.000365046; = p2304*(p1079+p1081)
- p1427: 12
- p1071: 0
- p1591: 0.677771
- p2616: 0; = p2420*p1073
- p2893: 3.6951e-5; = p2307*(p1079+p1081)
- p2540: 7.61451e-8; = p2344*p1073
- p3260: 0
- p2409: 0; = p2234*p2199
- p0336: 0.5
- p2794: 0; = p2403*(p1019+p1021)
- p1089: 1.60364e-5; = IF(p1071=0;p1083*p0001/(p0818*p0002);0)
- p2549: 3.95365e-6; = p2353*p1123
- p1066: 0.000451597; = IF(p1012=0;p1052/(p1059*p0818);0)
- p2682: 7.0765e-7; = p2291*(p1019+p1021)
- p0897: 0
- p3033: 3.93685e-9; = p2252*p1023
- p2442: 4.66584e-7; = p2246*p1014
- p1269: 0
- p2187: 2.17733e-5; = 4*1.00794*p2186/(2*14.0067)
- p2781: 0; = p2390*(p1128+p1130)
- p3440: 0; = p3364*p1240
- p2627: 0; = p2431*p1123
- p1565: 0
- p2052: 2.21022e-6; = p2015*p2049*(1-p2050)/(p0818*1000)
- p0544: 0; = IF(p0280<0.5;-SQRT(p0007*EXP(p0412^2*p0008)-p0007);SQRT(p0007*EXP(p0412^2*p0008)-p0007))
- p0722: 0
- p4764: 0; = p1797*p3482
- p0443: 0; = SQRT(2)*(IF((2*p0311-1)<0;-1;IF((2*p0311-1)>0;1;0))*SQRT(SQRT((2/(pi()*0.140012289)+LN(1-(2*p0311-1)^2)/2)^2-LN(1-(2*p0311-1)^2)/0.140012289)-(2/(pi()*0.140012289)+LN(1-(2*p0311-1)^2)/2)))
- p3349: 0; = if(and(p1232=0;p3256<>0);1-(p3345+p3346+p3347+p3348);0)
- p1843: 0
- p5098: 0; = p1925*p3483
- p2433: 2.50574e-5; = p2237*p1014
- p0619: 0; = IF(p0355<0.5;-SQRT(p0007*EXP(p0487^2*p0008)-p0007);SQRT(p0007*EXP(p0487^2*p0008)-p0007))
- p3998: 5.28819e-5; = p1855*p3478
- p3476: 0.06977; = if(p1328+p1330+p1332+p1334+p1336+p1338+p1340+p1342+p1344=0;0;p1328/(p1328+p1330+p1332+p1334+p1336+p1338+p1340+p1342+p1344))
- p2040: 1.56
- p1301: 0; = IF(p1297+p1300=p1265;0;IF(p1297+p1300+p1299>p1265;p1265-(p1297+p1300);p1299))
- p2970: 0; = p2384*(p1079+p1081)
- p2977: 0; = p2391*(p1129+p1131)
- p3097: 2.50722e-7; = p2316*p1023
- p2176: 0.00269353; = p0895*p0913/p0818
- p2233: 0; = if(p0783*p0787+p0784*p0788+p0785*p0789+p0786*p0790=0;0;p0790*p0786/(p0783*p0787+p0784*p0788+p0785*p0789+p0786*p0790))
- p0873: 0.103215; = p0872*p0001*p0003/(p0818*p0002)
- p0886: 7.11383e6; = p0686*1000*p0687*p0689/100
- p1629: 0
- p2809: 0; = p2418*(p1078+p1080)
- p3382: 0; = p3363*p1234
- p2634: 2.27091e-5; = p2243*(p1019+p1021)
- p1231: 0.0354911; = IF(p1221=0;0;p1230*(p1228+p1229))
- p0023: 67.737
- p2054: 0.91
- p1325: 0; = IF(((p0745*1000*p0752/100)+(p0754*1000*p0761/100))/p0801<0;0;((p0745*1000*p0752/100)+(p0754*1000*p0761/100))/p0801)
- p3095: 3.50627e-6; = p2314*p1132
- p0293: 0.5
- p3354: 0; = IF((p3350+p3351+p3352+p3353)+IF(p3349=0;0;(p3256*(p3273*(1-p3277))/p3349))>p3256;p3256-(p3350+p3351+p3352+p3353);IF(p3349=0;0;p3256*(p3273*(1-p3277))/p3349))
- p1026: 379204; = IF(p1012=0;p1020*(p0704/100)*p0703*1000;0)
- p1012: 0
- p2088: 0.798875
- p2360: 0; = p2225*p2188
- p1657: 0
- p1674: 0
- p2591: 0; = p2395*p1014
- p1259: 0; = if(p1232>0;0;p0730/100)
- p0346: 0.5
- p1456: 69
- p2268: 4.22628e-5; = p2226*p2214
- p1324: 0.197135; = IF(((p0745*1000*p0751/100)+(p0754*1000*p0760/100))/p0801<0;0;((p0745*1000*p0751/100)+(p0754*1000*p0760/100))/p0801)
- p2764: 0; = p2373*(p1019+p1021)
- p1819: 0
- p2196: 0.00150873; = p1068-p2193-p2195
- p2284: 4.94765e-5; = p2223*p2190
- p2180: 4.31388e-8; = p3233*p1188/(p0818)
- p3455: 0; = p3379*p1240
- p1650: 0
- p1778: 0
- p0176: 21.565
- p2649: 0.000206404; = p2258*(p1078+p1080)
- p1152: 0.415074
- p3235: 0.118093
- p2922: 3.89296e-5; = p2336*(p1079+p1081)
- p3359: 0; = if(p1232=0;p3309+p3320+p3331+p3342+p3353;0)
- p1038: 0.00527766
- p2865: 1.0341e-5; = p2279*(p1020+p1022)
- p2656: 0.000205166; = p2265*(p1078+p1080)
- p1115: 0.237849
- p1642: 0
- p1600: 0
- p4624: 2.45352e-7; = p1863*p3481
- p3233: 0.60394
- p1605: 0
- p2912: 2.67441e-5; = p2326*(p1020+p1022)
- p2661: 6.56039e-6; = p2270*(p1078+p1080)
- p0273: 0.5
- p3156: 0; = p2375*p1082
- p3792: 0; = p1855*p3477
- p2224: 0.10814; = if(p0765*p0769+p0766*p0770+p0767*p0771+p0768*p0772=0;0;p0771*p0767/(p0765*p0769+p0766*p0770+p0767*p0771+p0768*p0772))
- p2325: 1.50713e-5; = p2224*p2192
- p2243: 4.71827e-5; = p2222*p2188
- p0998: 0; = if(p0888=0;0;if((p0699*p0698*1000*p0700/100)/p0888>1;1;(p0699*p0698*1000*p0700/100)/p0888))
- p2122: 0.341195
- p4664: 7.406e-6; = p1903*p3481
- p0988: 897691; = p0982*p0886
- p1288: 0
- p3357: 0; = if(p1232=0;p3307+p3318+p3329+p3340+p3351;0)
- p0058: 41.013
- p2251: 2.10031e-7; = p2222*p2197
- p1925: 8.11453e-7; = p1517*1000/p0818
- p3018: 1.78914e-6; = p2237*p1023
- p2757: 0; = p2366*(p1019+p1021)
- p2771: 0; = p2380*(p1078+p1080)
- p3573: 7.27908e-8; = p1842*p3476
- p1831: 0
- p0167: 12.839
- p1958: 3964
- p3155: 0; = p2374*p1023
- p1163: 0.00742611
- p3106: 1.72114e-7; = p2325*p1023
- p4125: 4.38089e-6; = p1776*p3479
- p2273: 0; = p2230*p2219
- p0342: 0.5
- p2882: 7.20113e-5; = p2296*(p1020+p1022)
- p3566: 9.70544e-8; = p1835*p3476
- p2878: 1.12281e-6; = p2292*(p1020+p1022)
- p2748: 0; = p2357*(p1019+p1021)
- p2763: 0; = p2372*(p1019+p1021)
- p0579: 0; = IF(p0315<0.5;-SQRT(p0007*EXP(p0447^2*p0008)-p0007);SQRT(p0007*EXP(p0447^2*p0008)-p0007))
- p1251: 0; = if(p1232>0;0;p1246*p0001/(p0818*p0002))
- p0139: 20.761
- p0757: 0
- p2482: 1.61042e-5; = p2286*p1014
- p1695: 0
- p2317: 1.29376e-6; = p2224*p2184
- p0053: 36.807
- p2792: 0; = p2401*(p1019+p1021)
- p1132: 0.02282; = if(p1121=0;IF(p1123+p1128+p1129+p1130+p1131=1;0;1-(p1123+p1128+p1129+p1130+p1131));0)
- p0438: 0; = SQRT(2)*(IF((2*p0306-1)<0;-1;IF((2*p0306-1)>0;1;0))*SQRT(SQRT((2/(pi()*0.140012289)+LN(1-(2*p0306-1)^2)/2)^2-LN(1-(2*p0306-1)^2)/0.140012289)-(2/(pi()*0.140012289)+LN(1-(2*p0306-1)^2)/2)))
- p3479: 0.24863; = if(p1328+p1330+p1332+p1334+p1336+p1338+p1340+p1342+p1344=0;0;p1334/(p1328+p1330+p1332+p1334+p1336+p1338+p1340+p1342+p1344))
- p5128: 0; = p1955*p3483
- p2308: 0.000378845; = p2227*p2215
- p2511: 1.59965e-5; = p2315*p1014
- p1651: 0.299611
- p2100: 0.705744
- p1581: 0
- p2543: 5.64392e-6; = p2347*p1073
- p2945: 0; = p2359*(p1020+p1022)
- p3258: 0
- p2949: 0; = p2363*(p1020+p1022)
- p1122: 0; = p1121*p0001/(p0818*p0002)
- p3021: 7.97172e-8; = p2240*p1023
- p2799: 0; = p2408*(p1019+p1021)
- p0050: 31.532
- p0910: 0.0105884; = p0909/p0818
- p2078: 0.117
- p0982: 0.12619; = if(p0886=0;0;min(1;(p0691*p0690*1000*p0693/100)/p0886))
- p3408: 0; = p3370*p1238
- p1342: 0; = p1326*p0801
- p3224: 0.501945; = IF(p3216=0;0;1-p3221-p3222-p3223)
- p2504: 5.32428e-5; = p2308*p1073
- p1302: 0; = IF(p1297+p1300+p1301=p1262;0;p1262-(p1297+p1300+p1301))
- p1807: 0
- p2044: 7.9947e-8; = p2015*p2042*p2043/(p0818*1000)
- p2819: 0; = p2428*(p1128+p1130)
- p2487: 2.35158e-7; = p2291*p1014
- p1315: 0; = p1311*p1252/p0818
- p0573: 0; = IF(p0309<0.5;-SQRT(p0007*EXP(p0441^2*p0008)-p0007);SQRT(p0007*EXP(p0441^2*p0008)-p0007))
- p2876: 3.11142e-7; = p2290*(p1020+p1022)
- p0881: 0; = p0880*p0001*p0003/(p0818*p0002)
- p3439: 0; = p3363*p1240
- p3365: 0; = if(p1232=0;p3244*p3359/p0818;0)
- p1028: 0; = IF(p1012=0;p1022*(p0704/100)*p0703*1000;0)
- p0072: 14.301
- p2254: 6.87189e-5; = p2222*p2200
- p3336: 0; = IF(or(p3254=0;p1232>0);0;p3271*p3289)
- p1887: 0
- p2334: 2.70689e-6; = p2224*p2202
- p2808: 0; = p2417*(p1078+p1080)
- p2175: 0.00080889; = p0895*p0908/p0818
- p2667: 0.000321599; = p2276*(p1019+p1021)
- p3045: 0; = p2264*p1082
- p0644: 0; = IF(p0380<0.5;-SQRT(p0007*EXP(p0512^2*p0008)-p0007);SQRT(p0007*EXP(p0512^2*p0008)-p0007))
- p2201: 0.000173922; = 12.01*p2200/(2*14.0067)
- p1559: 0
- p2756: 0; = p2365*(p1019+p1021)
- p0965: 0; = IF(p0684/100=1;0;IF(p0684/100+p0685/100>1;1-p0684/100;p0685/100))
- p2287: 0.000514405; = p2223*p2193
- p1715: 0
- p3318: 0; = if(and(p1232=0;p3253<>0);p3253*(p3262-p3313)/p3316;0)
- p1928: 1.15922e-5; = p1520*1000/p0818
- p4650: 2.62618e-6; = p1889*p3481
- p4184: 3.4586e-7; = p1835*p3479
- p2877: 5.1069e-7; = p2291*(p1020+p1022)
- p1632: 0
- p2932: 3.91693e-6; = p2346*(p1079+p1081)
- p0684: 19.483; = p0024*(1+p0552*p0156/100)
- p2309: 3.17133e-5; = p2227*p2216
- p0322: 0.5
- p1241: 0; = if(p1232>0;0;IF(p1234+p1238+p1239+p1240=1;0;1-(p1234+p1238+p1239+p1240)))
- p2131: 4.69048e-7; = p2015*p2059*p2093/(p0818*1000)
- p2130: 1.21732e-6; = p2015*p2058*p2092/(p0818*1000)
- p2692: 0.000190604; = p2301*(p1078+p1080)
- p1842: 1.0433e-6; = p1434*1000/p0818
- p0898: 0.456
- p0638: 0; = IF(p0374<0.5;-SQRT(p0007*EXP(p0506^2*p0008)-p0007);SQRT(p0007*EXP(p0506^2*p0008)-p0007))
- p1892: 0
- p2780: 0; = p2389*(p1128+p1130)
- p0169: 1.43
- p2930: 1.99422e-7; = p2344*(p1079+p1081)
- p2629: 1.65521e-5; = p2238*(p1019+p1021)
- p0889: 18.4304; = 1000*p0888*p0001*p0003*p0004/(p0818*p0002)
- p1389: 138
- p0406: 0; = SQRT(2)*(IF((2*p0274-1)<0;-1;IF((2*p0274-1)>0;1;0))*SQRT(SQRT((2/(pi()*0.140012289)+LN(1-(2*p0274-1)^2)/2)^2-LN(1-(2*p0274-1)^2)/0.140012289)-(2/(pi()*0.140012289)+LN(1-(2*p0274-1)^2)/2)))
- p3042: 0; = p2261*p1082
- p2624: 0; = p2428*p1123
- p1332: 5.34279e6; = p1321*p0801
- p1897: 0
- p2053: 1.45647
- p0166: 20.034
- p3393: 0; = p3374*p1234
- p1788: 0
- p1621: 0
- p0949: 0; = if(and(p0683=0;or(p0807=480;p0807=32;p0807=1;and(p0807=60;p0901<0.03)));p0937;0)
- p2453: 7.7747e-6; = p2257*p1014
- p2852: 7.91981e-7; = p2266*(p1079+p1081)
- p1562: 0
- p1613: 0
- p2229: 0; = if(p0774*p0778+p0775*p0779+p0776*p0780+p0777*p0781=0;0;p0781*p0777/(p0774*p0778+p0775*p0779+p0776*p0780+p0777*p0781))
- p1178: 5.52677e-8; = p1176/p0818
- p2571: 0; = p2375*p1073
- p0824: 0.8964
- p2939: 8.74196e-6; = p2353*(p1129+p1131)
- p3353: 0; = if(and(p1232=0;p3256<>0);p3256*(p3276-p3348)/p3349;0)
- p2015: 1.54793e7; = p0830*p2011*p2013
- p2725: 1.30283e-6; = p2334*(p1019+p1021)
- p0755: 0
- p0891: 0; = IF(p3251=0;0;62.4*6272640/(12*12*12))
- p0936: 8.08417e-5; = p0930*p0001/(p0818*p0002)
- p2096: 0.486404
- p1223: 0.56
- p4925: 0; = p1962*p3482
- p1017: 0; = IF(p1012=0;p0708/100;0)
- p0870: 2.77868e6; = p0858*p0856
- p0410: 0; = SQRT(2)*(IF((2*p0278-1)<0;-1;IF((2*p0278-1)>0;1;0))*SQRT(SQRT((2/(pi()*0.140012289)+LN(1-(2*p0278-1)^2)/2)^2-LN(1-(2*p0278-1)^2)/0.140012289)-(2/(pi()*0.140012289)+LN(1-(2*p0278-1)^2)/2)))
- p1023: 0.01142; = IF(p1012=0;IF(p1014+p1019+p1020+p1021+p1022=1;0;1-(p1014+p1019+p1020+p1021+p1022));0)
- p5076: 0; = p1903*p3483
- p0414: 0; = SQRT(2)*(IF((2*p0282-1)<0;-1;IF((2*p0282-1)>0;1;0))*SQRT(SQRT((2/(pi()*0.140012289)+LN(1-(2*p0282-1)^2)/2)^2-LN(1-(2*p0282-1)^2)/0.140012289)-(2/(pi()*0.140012289)+LN(1-(2*p0282-1)^2)/2)))
- p2164: 0.000642561; = (p2015/p0818)-(p2022)-(p2035+p2036+p2052)-(p2017/p0818)-(p2039+p2041+p2044+p2158+p2159+p2160+p2161+p2162)
- p3389: 0; = p3370*p1234
- p0963: 0; = if(and(p0683>0;or(p0807=480;p0807=32;p0807=1;and(p0807=60;p0901<0.03)));p0939;0)
- p1455: 27
- p2835: 8.98023e-6; = p2249*(p1020+p1022)
- p0561: 0; = IF(p0297<0.5;-SQRT(p0007*EXP(p0429^2*p0008)-p0007);SQRT(p0007*EXP(p0429^2*p0008)-p0007))
- p4802: 0; = p1835*p3482
- p2381: 0; = p2229*p2210
- p3507: 1.22936e-6; = p1776*p3476
- p1169: 0.000482248
- p3053: 0; = p2272*p1132
- p2173: 0.124066; = p0895*p0898/p0818
- p1996: 30
- p2353: 2.23889e-5; = p2232*p2221
- p1109: 1.31431e7; = IF(p1071=0;p1105*p1103*p1095;0)
- p1238: 0; = if(p1232>0;0;IF(p1234=1;0;IF(p1234+p1235>1;1-p1234;p1235)))
- p1648: 0
- p0484: 0; = SQRT(2)*(IF((2*p0352-1)<0;-1;IF((2*p0352-1)>0;1;0))*SQRT(SQRT((2/(pi()*0.140012289)+LN(1-(2*p0352-1)^2)/2)^2-LN(1-(2*p0352-1)^2)/0.140012289)-(2/(pi()*0.140012289)+LN(1-(2*p0352-1)^2)/2)))
- p3346: 0; = if(and(p1232=0;p3256<>0);p3274*(p3281*(p3285*p1256+p3286*(p1253+p1257)+p1258*p3288));0)
- p2691: 0.00119226; = p2300*(p1078+p1080)
- p0485: 0; = SQRT(2)*(IF((2*p0353-1)<0;-1;IF((2*p0353-1)>0;1;0))*SQRT(SQRT((2/(pi()*0.140012289)+LN(1-(2*p0353-1)^2)/2)^2-LN(1-(2*p0353-1)^2)/0.140012289)-(2/(pi()*0.140012289)+LN(1-(2*p0353-1)^2)/2)))
- p1820: 0
- p3129: 0; = p2348*p1082
- p2804: 0; = p2413*(p1019+p1021)
- p1963h: 7.55307e-5; = p1686*p1890+p1687*p1891+p1688*p1892+p1689*p1893+p1690*p1894+p1691*p1895+p1692*p1896+p1693*p1897+p1694*p1898+p1695*p1899+p1696*p1900+p1697*p1901+p1698*p1902+p1699*p1903+p1700*p1904+p1701*p1905+p1702*p1906+p1703*p1907+p1704*p1908+p1705*p1909
- p3438: 0; = p3362*p1240
- p3267: 0
- p2472: 0.00010687; = p2276*p1014
- p1344: 118236; = IF(p1318=0;p1327*p0801;0)
- p5269: 8.93224e-8; = p1890*p3484
- p1313: 0; = p1307*p1252/p0818
- p0839: 0.781844; = p0838/p0818
- p2098: 0.856281
- p1676: 0
- p0137: 41.662
- p2168: 0.0187824; = p2166*(p0903)
- p2396: 0; = p2234*p2185
- p4528: 6.85168e-6; = p1767*p3481
- p1310: 0; = IF(p1307=p1266;0;IF(p1307+p1308>p1266;p1266-p1307;p1308))
- p2615: 0; = p2419*p1073
- p1126: 0; = if(p1121=0;p0720/100;0)
- p3119: 0; = p2338*p1082
- p1217: 0
- p1120: 0.00249023; = IF(p1071=0;p1110/(p1115*p0818);0)
- p3273: 0
- p3379: 0; = if(p1232=0;p3246*p3361/p0818;0)
- p0789: 18.833; = p0129*(1+p0657*p0261/100)
- p1731: 0
- p3451: 0; = p3375*p1240
- p1584: 0
- p2856: 4.91399e-6; = p2270*(p1079+p1081)
- p0909: 9.13406e7
- p0953: 0.000159673; = if(and(p0683>0;or(p0807=56;p0807=100;and(p0807=60;p0901>0.06)));p0935;0)
- p3634: 6.59161e-6; = p1903*p3476
- p3286: 0
- p4758: 0; = p1791*p3482
- p2947: 0; = p2361*(p1020+p1022)
- p2782: 0; = p2391*(p1128+p1130)
- p2250: 0.00025557; = p2222*p2196
- p3092: 1.97487e-5; = p2311*p1132
- p1535: 2
- p0355: 0.5
- p3242: 2.41806e-8; = p3234*p1188*p3238/p0818
- p1316: 0; = p1312*p1252/p0818
- p1099: 0.655189
- p2359: 0; = p2225*p2187
- p1604: 0
- p3118: 0; = p2337*p1082
- p1906: 0
- p2071: 0.151
- p2228: 0.0694201; = if(p0774*p0778+p0775*p0779+p0776*p0780+p0777*p0781=0;0;p0780*p0776/(p0774*p0778+p0775*p0779+p0776*p0780+p0777*p0781))
- p2455: 5.33905e-5; = p2259*p1073
- p3387: 0; = p3368*p1234
- p1481: 289
- p4940: 0; = p1767*p3483
- p1319: 0.175458; = IF(((p0745*1000*p0746/100)+(p0754*1000*p0755/100))/p0801<0;0;((p0745*1000*p0746/100)+(p0754*1000*p0755/100))/p0801)
- p0212: 1.318
- p3171: 0; = p2390*p1132
- p0786: 0
- p2329: 1.34083e-7; = p2224*p2197
- p2348: 3.36172e-6; = p2228*p2216
- p2371: 0; = p2225*p2200
- p1030: 1.8059e-5; = IF(p1012=0;p1024*p0001/(p0818*p0002);0)
- p3123: 0; = p2342*p1082
- p4188: 2.59395e-7; = p1839*p3479
- p2710: 7.87404e-6; = p2319*(p1019+p1021)
- p2505: 4.45699e-6; = p2309*p1073
- p5028: 0; = p1855*p3483
- p2864: 3.00221e-6; = p2278*(p1020+p1022)
- p2086: 0.0617647
- p3140: 0; = p2359*p1023
- p2438: 5.89901e-7; = p2242*p1014
- p1148: 0.0926988; = if(p1121=0;IF(p1146=1;0;1-p1146);0)
- p3164: 0; = p2383*p1082
- p2017: 7.05857e6; = p2015*p0898
- p2479: 6.91338e-6; = p2283*p1014
- p1671: 0
- p0958: 0; = if(and(p0683>0;or(p0807=480;p0807=32;p0807=1;and(p0807=60;p0901<0.03)));p0934;0)
- p1665: 0
- p3152: 0; = p2371*p1023
- p3027: 3.33149e-8; = p2246*p1023
- p0081: 1.127
- p1654: 0
- p2483: 8.22739e-5; = p2287*p1014
- p3221: 0.146975; = IF(p3216=0;0;p1223*12.0107/100.0869+(1-p1224)*12.0107/84.3139)
- p4419: 0; = p1864*p3480
- p1164: 26734; = p1163*p0801
- p2219: 0.00139725; = p1154-p2218
- p1924: 0
- p1699: 0.762907
- p2227: 0.654886; = if(p0774*p0778+p0775*p0779+p0776*p0780+p0777*p0781=0;0;p0779*p0775/(p0774*p0778+p0775*p0779+p0776*p0780+p0777*p0781))
- p5037: 0; = p1864*p3483
- p2840: 2.38688e-5; = p2254*(p1020+p1022)
- p1257: 0; = if(p1232>0;0;IF(p1253+p1256=1;0;IF(p1253+p1256+p1255>1;1-(p1253+p1256);p1255)))
- p1208: 101.768; = p1205*p0818*p0822/p0801
- p2887: 0.00014277; = p2301*(p1079+p1081)
- p1125: 0.39046; = if(p1121=0;p0719/100;0)
- p3433: 0; = p3376*p1239
- p1622: 0
- p2248: 0.000120611; = p2222*p2193
- p2399: 0; = p2234*p2188
- p0546: 0; = IF(p0282<0.5;-SQRT(p0007*EXP(p0414^2*p0008)-p0007);SQRT(p0007*EXP(p0414^2*p0008)-p0007))
- p3200: 0; = p2419*p1082
- p3279: 0
- p0106: 18.17
- p1343: 0; = p1342*p0001/(p0818*p0002)
- p1789: 0
- p2426: 0; = p2235*p2216
- p1652: 0
- p2857: 4.40414e-5; = p2271*(p1079+p1081)
- p0308: 0.5
- p0030: 187.279
- p2315: 0.000100015; = p2224*p2182
- p2076: 0.057
- p1628: 0
- p0009: 33.8523
- p1700: 0
- p1965: 0.000505832; = p1963+p1959*p1964*1000/p0818
- p0854: 1.34295e6; = p0801*((1-p0853)*p0846+p0853*p0852)
- p1597: 0
- p0794: 0
- p3189: 0; = p2408*p1023
- p0639: 0; = IF(p0375<0.5;-SQRT(p0007*EXP(p0507^2*p0008)-p0007);SQRT(p0007*EXP(p0507^2*p0008)-p0007))
- p0431: 0; = SQRT(2)*(IF((2*p0299-1)<0;-1;IF((2*p0299-1)>0;1;0))*SQRT(SQRT((2/(pi()*0.140012289)+LN(1-(2*p0299-1)^2)/2)^2-LN(1-(2*p0299-1)^2)/0.140012289)-(2/(pi()*0.140012289)+LN(1-(2*p0299-1)^2)/2)))
- p3403: 0; = p3365*p1238
- p0013: 94.987
- p0089: 24.863
- p1296: 0; = p1292*p1252/p0818
- p2833: 8.20007e-6; = p2247*(p1020+p1022)
- p2165: 0.813627; = (p0833-p2014)/p0818-p0839
- p1912: 0
- p2413: 0; = p2234*p2203
- p2341: 1.85938e-5; = p2228*p2209
- p2074: 0.025
- p1192: 3.57145e-8; = p1188*p1191/p0818
- p2445: 4.13513e-6; = p2249*p1014
- p2787: 0; = p2396*(p1019+p1021)
- p2617: 0; = p2421*p1073
- p0817: 0
- p3704: 0; = p1767*p3477
- p1849: 0
- p1980: 3521.6
- p3138: 0; = p2357*p1023
- p1900: 0
- p1215: 0; = IF(p1214=0;0;(p1214-1.5)/(p1214-1)^2)
- p2114: 0.832356
- p3194: 0; = p2413*p1023
- p0911: 0.0154167
- p2801: 0; = p2410*(p1019+p1021)
- p1644: 0
- p3362: 0; = if(p1232=0;p3244*p3356/p0818;0)
- p2155: 2.20496e-7; = p2015*p2084*p2117/(p0818*1000)
- p2190: 6.84827e-5; = 32.065*p2189/(2*14.0067)
- p0004: 0.0254
- p3015: 0; = p2429*(p1129+p1131)
- p2734: 5.16611e-5; = p2343*(p1078+p1080)
- p2639: 5.80499e-5; = p2248*(p1019+p1021)
- p2921: 1.07788e-5; = p2335*(p1020+p1022)
- p0585: 0; = IF(p0321<0.5;-SQRT(p0007*EXP(p0453^2*p0008)-p0007);SQRT(p0007*EXP(p0453^2*p0008)-p0007))
- p2910: 6.46867e-7; = p2324*(p1020+p1022)
- p1619: 0
- p1156: 0.0187029; = p1064+p1065+p1066+p1067+p1068+p1069+p1070+p1116+p1117+p1118+p1119+p1120+p1154+p1155
- p1781: 0
- p3210: 0; = p2429*p1132
- p3339: 0; = if(and(p1232=0;p3254<>0);p3254*(p3269*p3277-p3334)/p3338;0)
- p0307: 0.5
- p0379: 0.5
- p2648: 2.3396e-5; = p2257*(p1019+p1021)
- p3919: 1.03985e-5; = p1776*p3478
- p0858: 0.771857; = p0670*1000/p0856
- p3431: 0; = p3374*p1239
- p2728: 4.70054e-5; = p2337*(p1078+p1080)
- p0175: 0
- p2584: 0; = p2388*p1073
- p0880: 0; = p0868*p0856
- p0761: 0
- p1107: 1.32241e6; = IF(p1071=0;p1105*p1101*p1095;0)
- p2956: 0; = p2370*(p1020+p1022)
- p2318: 4.4563e-6; = p2224*p2185
- p1678: 0
- p2342: 8.02821e-6; = p2228*p2210
- p1827: 0
- p0401: 0.5
- p1162: 0.000417319; = p1161/p0818
- p2414: 0; = p2235*p2204
- p0506: 0; = SQRT(2)*(IF((2*p0374-1)<0;-1;IF((2*p0374-1)>0;1;0))*SQRT(SQRT((2/(pi()*0.140012289)+LN(1-(2*p0374-1)^2)/2)^2-LN(1-(2*p0374-1)^2)/0.140012289)-(2/(pi()*0.140012289)+LN(1-(2*p0374-1)^2)/2)))
- p2148: 8.75807e-8; = p2015*p2076*p2110/(p0818*1000)
- p0082: 97.317
- p2039: 1.72636e-6; = p2015*p2037*p2038/(p0818*1000)
- p2652: 0.000501918; = p2261*(p1078+p1080)
- p2480: 7.91327e-6; = p2284*p1014
- p2535: 3.61464e-5; = p2339*p1073
- p1029: 12467.6; = IF(p1012=0;IF(p0801<p1023*(p0704/100)*p0703*1000;p0801;p1023*(p0704/100)*p0703*1000);0)
- p2330: 2.20075e-7; = p2224*p2198
- p2868: 6.98969e-5; = p2282*(p1020+p1022)
- p1690: 0
- p0828: 0; = if(p0827=0;0;p0819-p0827/p0818)
- p1776: 1.76201e-5; = p1368*1000/p0818
- p2333: 1.88079e-5; = p2224*p2201
- p0550: 0; = IF(p0286<0.5;-SQRT(p0007*EXP(p0418^2*p0008)-p0007);SQRT(p0007*EXP(p0418^2*p0008)-p0007))
- p2415: 0; = p2235*p2205
- p3896: 0; = p1963*p3477
- p1520: 100
- p1284: 0; = p1280*p1252/p0818
- p1647: 0
- p2684: 0.000141063; = p2293*(p1019+p1021)
- p2620: 0; = p2424*p1073
- p0140: 15.633
- p0827: 0; = p0818*p0819*p0823
- p3281: 0
- p2303: 7.57354e-5; = p2227*p2210
- p2240: 6.98049e-6; = p2222*p2185
- p0296: 0.5
- p1915: 0
- p1848: 0
- p0524: 0; = SQRT(2)*(IF((2*p0392-1)<0;-1;IF((2*p0392-1)>0;1;0))*SQRT(SQRT((2/(pi()*0.140012289)+LN(1-(2*p0392-1)^2)/2)^2-LN(1-(2*p0392-1)^2)/0.140012289)-(2/(pi()*0.140012289)+LN(1-(2*p0392-1)^2)/2)))
- p0641: 0; = IF(p0377<0.5;-SQRT(p0007*EXP(p0509^2*p0008)-p0007);SQRT(p0007*EXP(p0509^2*p0008)-p0007))
- p1019: 0.4813; = IF(p1012=0;IF(p1014=1;0;IF(p1014+p1015>1;1-p1014;p1015));0)
- p2778: 0; = p2387*(p1078+p1080)
- p0681: 0
- p2010: 0.000522093; = ((p1984*p1985+p1990*p1991+p1996*p1997+p2004*p2005)/p0818)*p0005*p0002/1000
- p2314: 0.000153649; = p2231*p2221
- p2384: 0; = p2229*p2213
- p0047: 34.734
- p1576: 0
- p1593: 0.689607
- p3284: 0
- p1268: 0
- p0692: 43.072; = p0032*(1+p0560*p0164/100)
- p3139: 0; = p2358*p1023
- p2675: 2.3813e-5; = p2284*(p1019+p1021)
- p3180: 0; = p2399*p1023
- p2972: 0; = p2386*(p1079+p1081)
- p0977: 0; = IF(p0687=0;IF(OR(p0686=0;p0688=0);0;p0686*1000*p0688/100);0)
- p2948: 0; = p2362*(p1020+p1022)
- p0006: 15
- p1876: 0
- p2516: 3.76589e-7; = p2320*p1014
- p2818: 0; = p2427*(p1078+p1080)
- p0700: 0
- p1667: 0
- p1624: 0
- p1306: 0; = p1302*p1252/p0818
- p3245: 0; = IF(p3244=1;0;if(p3244+p0792/100>1;1-p3244;p0792/100))
- p2711: 1.13325e-6; = p2320*(p1019+p1021)
- p3257: 0
- p0714: 0
- p1741: 0
- p3071: 1.02299e-8; = p2290*p1023
- p0120: 12.835
- p0872: 99799; = p0864*p0856
- p1920: 0
- p1551: 0
- p2598: 0; = p2402*p1014
- p1990: 30
- p2508: 0.00021536; = p2312*p1123
- p0718: 41.013; = p0058*(1+p0586*p0190/100)
- p3079: 0; = p2298*p1082
- p0091: 7.839
- p3347: 0; = if(and(p1232=0;p3256<>0);p3275*p3289;0)
- p0738: 3499.51; = p0078*(1+p0606*p0210/100)
- p0843: 0.0111763
- p0533: 0; = SQRT(2)*(IF((2*p0401-1)<0;-1;IF((2*p0401-1)>0;1;0))*SQRT(SQRT((2/(pi()*0.140012289)+LN(1-(2*p0401-1)^2)/2)^2-LN(1-(2*p0401-1)^2)/0.140012289)-(2/(pi()*0.140012289)+LN(1-(2*p0401-1)^2)/2)))
- p3102: 3.43983e-7; = p2321*p1023
- p2299: 0.000292222; = p2227*p2206
- p0919: 0.428854; = p0678*1000/p0801
- p0031: 8.42
- p0932: 115648; = p0801*p0926
- p2211: 0.00151444; = p1120-p2209-p2208-p2210
- p3091: 0; = p2310*p1082
- p5218: 1.36255e-8; = p1839*p3484
- p0969: 1.90863e8; = p0966*p0683*p0682*1000
- p1950: 0
- p0913: 0.00989994
- p1685: 0.491852
- p2089: 0.40001
- p1927: 0
- p2139: 4.97026e-7; = p2015*p2067*p2101/(p0818*1000)
- p0182: 17.211
- p3107: 8.79305e-7; = p2326*p1023
- p1554: 0
- p1806: 0
- p2203: 0.000286965; = p1070-p2200-p2201-p2202
- p1801: 0
- p1963: 0.00027962; = p1963a+p1963b+p1963c+p1963d+p1963e+p1963f+p1963g+p1963h+p1963i+p1963j+p1963k
- p1620: 0
- p0663: 0; = IF(p0399<0.5;-SQRT(p0007*EXP(p0531^2*p0008)-p0007);SQRT(p0007*EXP(p0531^2*p0008)-p0007))
- p1752: 0
- p1829: 0
- p2021: 4.65136e-5; = p2020/p0818
- p2231: 0.872818; = if(p0783*p0787+p0784*p0788+p0785*p0789+p0786*p0790=0;0;p0788*p0784/(p0783*p0787+p0784*p0788+p0785*p0789+p0786*p0790))
- p2793: 0; = p2402*(p1019+p1021)
- p1794: 0
- p2209: 0.000267845; = 14.0067*p2208/30.973762
- p1995: 50
- p2654: 3.62858e-5; = p2263*(p1078+p1080)
- p4397: 0; = p1842*p3480
- p0448: 0; = SQRT(2)*(IF((2*p0316-1)<0;-1;IF((2*p0316-1)>0;1;0))*SQRT(SQRT((2/(pi()*0.140012289)+LN(1-(2*p0316-1)^2)/2)^2-LN(1-(2*p0316-1)^2)/0.140012289)-(2/(pi()*0.140012289)+LN(1-(2*p0316-1)^2)/2)))
- p2525: 2.14452e-8; = p2329*p1014
- p1582: 0
- p4510: 0; = p1955*p3480
- p3522: 7.27908e-8; = p1791*p3476
- p2093: 0.260958
- p5170: 1.36255e-8; = p1791*p3484
- p3262: 0
- p3209: 0; = p2428*p1132
- p3434: 0; = p3377*p1239
- p1260: 0; = if(p1232>0;0;p0731/100)
- p0774: 42.785; = p0114*(1+p0642*p0246/100)
- p3330: 0; = if(and(p1232=0;p3255<>0);p3255*(p3267-p3325)/p3327;0)
- p2125: 2.23787e-6; = p2015*p2053*p2087/(p0818*1000)
- p3826: 0; = p1889*p3477
- p1175: 0.000132435
- p2589: 0; = p2393*p1014
- p2380: 0; = p2229*p2209
- p3300: 0; = if(p1293+p1294+p1295+p1296=0;0;p1293/(p1293+p1294+p1295+p1296))
- p2404: 0; = p2234*p2193
- p1937: 0
- p1182: 489.234; = p1181*p0801
- p4213: 1.98869e-6; = p1864*p3479
- p2382: 0; = p2229*p2211
- p2136: 1.03976e-6; = p2015*p2064*p2098/(p0818*1000)
- p2400: 0; = p2234*p2189
- p1754: 0
- p3076: 2.06523e-7; = p2295*p1023
- p1779: 0
- p2274: 0; = p2230*p2220
- p1298: 0
- p0433: 0; = SQRT(2)*(IF((2*p0301-1)<0;-1;IF((2*p0301-1)>0;1;0))*SQRT(SQRT((2/(pi()*0.140012289)+LN(1-(2*p0301-1)^2)/2)^2-LN(1-(2*p0301-1)^2)/0.140012289)-(2/(pi()*0.140012289)+LN(1-(2*p0301-1)^2)/2)))
- p0142: 0
- p1187: 0.000171162
- p1797: 1.59972e-5; = p1389*1000/p0818
- p0164: 49.527
- p1094: 0; = IF(p1071=0;p1088*p0001/(p0818*p0002);0)
- p0791: 0
- p5322: 3.02788e-9; = p1943*p3484
- p1020: 0.34734; = IF(p1012=0;IF(p1014+p1019=1;0;IF(p1014+p1019+p1016>1;1-(p1014+p1019);p1016));0)
- p3179: 0; = p2398*p1023
- p3801: 0; = p1864*p3477
- p0311: 0.5
- p2481: 1.98998e-6; = p2285*p1014
- p1025: 525454; = IF(p1012=0;p1019*(p0704/100)*p0703*1000;0)
- p0775: 45.068; = p0115*(1+p0643*p0247/100)
- p0295: 0.5
- p3081: 0; = p2300*p1082
- p0386: 0.5
- p0511: 0; = SQRT(2)*(IF((2*p0379-1)<0;-1;IF((2*p0379-1)>0;1;0))*SQRT(SQRT((2/(pi()*0.140012289)+LN(1-(2*p0379-1)^2)/2)^2-LN(1-(2*p0379-1)^2)/0.140012289)-(2/(pi()*0.140012289)+LN(1-(2*p0379-1)^2)/2)))
- p0306: 0.5
- p2332: 4.38697e-5; = p2224*p2200
- p2880: 4.36443e-5; = p2294*(p1020+p1022)
- p3266: 0
- p2121: 0.822447
- p3127: 0; = p2346*p1082
- p0105: 9.705
- p2960: 0; = p2374*(p1020+p1022)
- p1759: 0
- p1873: 0
- p2925: 9.46662e-5; = p2339*(p1079+p1081)
- p3241: 3.98821e-10; = p3234*p1188*p3236/p0818
- p0710: 31.532; = p0050*(1+p0578*p0182/100)
- p1074: 0.49139; = IF(p1071=0;p0712/100;0)
- p2828: 1.28108e-6; = p2242*(p1020+p1022)
- p1832: 0
- p2903: 4.49376e-7; = p2317*(p1020+p1022)
- p2225: 0; = if(p0765*p0769+p0766*p0770+p0767*p0771+p0768*p0772=0;0;p0772*p0768/(p0765*p0769+p0766*p0770+p0767*p0771+p0768*p0772))
- p3435: 0; = p3378*p1239
- p1160: 0.011554; = (p1156+p1158)*p1159
- p1696: 0
- p1634: 0
- p1606: 0
- p3170: 0; = p2389*p1132
- p1725: 0
- p2582: 0; = p2386*p1073
- p2191: 1.72216e-5; = 8*1.00794*p2189/(2*14.0067)
- p2680: 0.000524621; = p2289*(p1019+p1021)
- p5304: 1.05976e-8; = p1925*p3484
- p3369: 0; = if(p1232=0;p3245*p3357/p0818;0)
- p2024: 0.748682
- p3776: 0; = p1839*p3477
- p3058: 1.67503e-6; = p2277*p1023
- p0819: 0; = p0808*p0809/p0818
- p3010: 0; = p2424*(p1079+p1081)
- p3243: 3.69867e-10; = p3234*p1188*p3239/p0818
- p2760: 0; = p2369*(p1019+p1021)
- p3074: 3.34705e-6; = p2293*p1023
- p1881: 0
- p0154: 0
- p1303: 0; = p1297*p1252/p0818
- p3186: 0; = p2405*p1023
- p2466: 1.8763e-6; = p2270*p1073
- p3862: 0; = p1925*p3477
- p1758: 0
- p0270: 17.211
- p2940: 0; = p2354*(p1020+p1022)
- p1815: 0
- p1730: 0
- p2859: 0; = p2273*(p1129+p1131)
- p2288: 0.000110269; = p2223*p2195
- p0246: 6.162
- p2266: 2.15171e-6; = p2226*p2212
- p2058: 1.24412
- p0558: 0; = IF(p0294<0.5;-SQRT(p0007*EXP(p0426^2*p0008)-p0007);SQRT(p0007*EXP(p0426^2*p0008)-p0007))
- p2690: 0.000143595; = p2299*(p1078+p1080)
- p1734: 0
- p3250: 0
- p1569: 0
- p3465: 0; = p3370*p1241
- p2845: 0.000139828; = p2259*(p1079+p1081)
- p2986: 0; = p2400*(p1020+p1022)
- p2456: 1.72892e-5; = p2260*p1073
- p3089: 0; = p2308*p1082
- p2959: 0; = p2373*(p1020+p1022)
- p0409: 0; = SQRT(2)*(IF((2*p0277-1)<0;-1;IF((2*p0277-1)>0;1;0))*SQRT(SQRT((2/(pi()*0.140012289)+LN(1-(2*p0277-1)^2)/2)^2-LN(1-(2*p0277-1)^2)/0.140012289)-(2/(pi()*0.140012289)+LN(1-(2*p0277-1)^2)/2)))
- p3528: 1.11613e-6; = p1797*p3476
- p1230: 0.5
- p0052: 49.139
- p1971: 0.000367153; = p1966*p0001/(p0818*p0002)
- p3086: 0; = p2305*p1082
- p1747: 0
- p2291: 1.47029e-6; = p2223*p2198
- p1963c: 1.1896e-5; = p1588*p1792+p1589*p1793+p1590*p1794+p1591*p1795+p1592*p1796+p1593*p1797+p1594*p1798+p1595*p1799+p1596*p1800+p1597*p1801+p1598*p1802+p1599*p1803+p1600*p1804+p1601*p1805+p1602*p1806+p1603*p1807+p1604*p1808+p1605*p1809+p1606*p1810+p1607*p1811
- p2293: 0.000293086; = p2223*p2200
- p1780: 0
- p0282: 0.5
- p2741: 5.17186e-5; = p2350*(p1128+p1130)
- p3326: 0; = if(and(p1232=0;p3255<>0);p3268*p3289;0)
- p2870: 1.71852e-5; = p2284*(p1020+p1022)
- p3329: 0; = if(and(p1232=0;p3255<>0);p3255*(p3266-p3324)/p3327;0)
- p1938: 0
- p2769: 0; = p2378*(p1078+p1080)
- p1139: 9.98993e-6; = if(p1121=0;p1133*p0001/(p0818*p0002);0)
- p2468: 0; = p2272*p1123
- p2839: 2.6326e-7; = p2253*(p1020+p1022)
- p0267: 19.695
- p0754: 0
- p3005: 0; = p2419*(p1079+p1081)
- p2140: 2.54162e-7; = p2015*p2068*p2102/(p0818*1000)
- p3030: 2.95256e-7; = p2249*p1023
- p0502: 0; = SQRT(2)*(IF((2*p0370-1)<0;-1;IF((2*p0370-1)>0;1;0))*SQRT(SQRT((2/(pi()*0.140012289)+LN(1-(2*p0370-1)^2)/2)^2-LN(1-(2*p0370-1)^2)/0.140012289)-(2/(pi()*0.140012289)+LN(1-(2*p0370-1)^2)/2)))
- p3442: 0; = p3366*p1240
- p2390: 0; = p2233*p2219
- p0271: 27.168
- p2700: 1.55836e-5; = p2309*(p1078+p1080)
- p1334: 2.25092e6; = p1322*p0801
- p0675: 0
- p1899: 0
- p2183: 0.000203021; = p1064-p2182
- p0883: 0.104524; = p0882*p0001*p0003/(p0818*p0002)
- p3292: 0
- p2664: 0; = p2273*(p1128+p1130)
- p3025: 1.15739e-7; = p2244*p1023
- p0088: 59.015
- p2038: 0.304457
- p0135: 17.912
- p2134: 3.28686e-6; = p2015*p2062*p2096/(p0818*1000)
- p3001: 0; = p2415*(p1079+p1081)
- p0925: 0.177889; = IF(p0918+p0923+p0924=1;0;IF(p0918+p0923+p0924+p0921>1;1-(p0918+p0923+p0924);p0921))
- p3244: 0; = p0791/100
- p1661: 0
- p1326: 0; = IF(((p0745*1000*p0753/100)+(p0754*1000*p0762/100))/p0801<0;0;((p0745*1000*p0753/100)+(p0754*1000*p0762/100))/p0801)
- p2632: 1.23342e-5; = p2241*(p1019+p1021)
- p2270: 1.33507e-5; = p2226*p2216
- p2952: 0; = p2366*(p1020+p1022)
- p2796: 0; = p2405*(p1019+p1021)
- p1134: 224336; = if(p1121=0;p1128*(p0716/100)*p0703*1000;0)
- p2612: 0; = p2416*p1073
- p1058: 0.225
- p2013: 0.75
- p2823: 5.44169e-5; = p2237*(p1020+p1022)
- p0606: 0; = IF(p0342<0.5;-SQRT(p0007*EXP(p0474^2*p0008)-p0007);SQRT(p0007*EXP(p0474^2*p0008)-p0007))
- p0750: 0
- p0705: 15.994; = p0045*(1+p0573*p0177/100)
- p3176: 0; = p2395*p1023
- p1168: 1.54953e-6; = p1164*p1167/p0818
- p2410: 0; = p2234*p2200
- p2553: 0; = p2357*p1014
- p0815: 0
- p1672: 0
- p0422: 0; = SQRT(2)*(IF((2*p0290-1)<0;-1;IF((2*p0290-1)>0;1;0))*SQRT(SQRT((2/(pi()*0.140012289)+LN(1-(2*p0290-1)^2)/2)^2-LN(1-(2*p0290-1)^2)/0.140012289)-(2/(pi()*0.140012289)+LN(1-(2*p0290-1)^2)/2)))
- p3067: 1.14987e-6; = p2286*p1023
- p1931: 0
- p2526: 3.51988e-8; = p2330*p1014
- p0155: 1.819
- p1994: 750
- p2407: 0; = p2234*p2197
- p0821: 1.77727
- p1034: 0; = IF(p1012=0;p1028*p0001/(p0818*p0002);0)
- p3222: 0.224242; = IF(p3216=0;0;p1223*40.078/100.0869)
- p4239: 1.70048e-6; = p1890*p3479
- p2226: 0.275694; = if(p0774*p0778+p0775*p0779+p0776*p0780+p0777*p0781=0;0;p0778*p0774/(p0774*p0778+p0775*p0779+p0776*p0780+p0777*p0781))
- p1810: 0
- p2300: 0.0024263; = p2227*p2207
- p3319: 0; = if(and(p1232=0;p3253<>0);p3253*(p3263-p3314)/p3316;0)
- p3252: 0; = p1252*(p1267*(1-p3247)+p1270*(1-p3248)+p1271*(1-p3249)+p1272*(1-p3250))
- p3130: 0; = p2349*p1082
- p2520: 2.97864e-7; = p2324*p1014
- p4304: 2.1011e-5; = p1955*p3479
- p1173: 0.5
- p3390: 0; = p3371*p1234
- p2975: 0; = p2389*(p1129+p1131)
- p1050: 7.9784e6; = IF(p1012=0;p1037*p1036;0)
- p5242: 4.08764e-8; = p1863*p3484
- p3184: 0; = p2403*p1023
- p1598: 0
- p0990: 0; = p0986*p0886
- p0548: 0; = IF(p0284<0.5;-SQRT(p0007*EXP(p0416^2*p0008)-p0007);SQRT(p0007*EXP(p0416^2*p0008)-p0007))
- p3088: 0; = p2307*p1082
- p3732: 0; = p1795*p3477
- p0652: 0; = IF(p0388<0.5;-SQRT(p0007*EXP(p0520^2*p0008)-p0007);SQRT(p0007*EXP(p0520^2*p0008)-p0007))
- p0677: 115.648; = p0017*(1+p0545*p0149/100)
- p0810: 0
- p1088: 0; = IF(p1071=0;p1082*(p0710/100)*p0703*1000;0)
- p3259: 0
- p1096: 0.00335628
- p1930: 0
- p3063: 2.2981e-6; = p2282*p1023
- p2280: 0.000109298; = p2223*p2186
- p1048: 0.000546963; = IF(p1012=0;IF(p1037+p1044+p1045+p1046+p1047=1;0;IF(p1037+p1044+p1045+p1046+p1047+p1042>1;1-(p1037+p1044+p1045+p1046+p1047);p1042));0)
- p0836: 2.91443e8; = p0831*p0835*p0801/(1-p0831)
- p0942: 0; = if(and(p0683=0;p0948=0);p0936;0)
- p0383: 0.5
- p2544: 4.72456e-7; = p2348*p1073
- p3441: 0; = p3365*p1240
- p0547: 0; = IF(p0283<0.5;-SQRT(p0007*EXP(p0415^2*p0008)-p0007);SQRT(p0007*EXP(p0415^2*p0008)-p0007))
- p1129: 0.39046; = if(p1121=0;IF(p1123+p1128=1;0;IF(p1123+p1128+p1125>1;1-(p1123+p1128);p1125));0)
- p2827: 8.90119e-6; = p2241*(p1020+p1022)
- p3096: 1.14218e-6; = p2315*p1023
- p2493: 0.000140226; = p2297*p1073
- p2500: 0.000139385; = p2304*p1073
- p0352: 0.5
- p0779: 55.538; = p0119*(1+p0647*p0251/100)
- p3275: 0
- p0454: 0; = SQRT(2)*(IF((2*p0322-1)<0;-1;IF((2*p0322-1)>0;1;0))*SQRT(SQRT((2/(pi()*0.140012289)+LN(1-(2*p0322-1)^2)/2)^2-LN(1-(2*p0322-1)^2)/0.140012289)-(2/(pi()*0.140012289)+LN(1-(2*p0322-1)^2)/2)))
- p1079: 0.36807; = IF(p1071=0;IF(p1073+p1078=1;0;IF(p1073+p1078+p1075>1;1-(p1073+p1078);p1075));0)
- p2032: 0.448886
- p3204: 0; = p2423*p1082
- p2435: 3.24134e-7; = p2239*p1014
- p1167: 0.5
- p3195: 0; = p2414*p1082
- p0968: 0
- p1570: 0
- p2973: 0; = p2387*(p1079+p1081)
- p2307: 0.000100391; = p2227*p2214
- p0979: 0; = IF(p0976=0;0;p0976*p0001/(p0818*p0002))
- p1880: 0
- p0029: 91.023
- p2561: 0; = p2365*p1014
- p0059: 39.046
- p0034: 873.014
- p3196: 0; = p2415*p1082
- p1910: 0
- p0711: 14.054; = p0051*(1+p0579*p0183/100)
- p2428: 0; = p2236*p2218
- p2695: 0.000487353; = p2304*(p1078+p1080)
- p2755: 0; = p2364*(p1019+p1021)
- p2064: 0.676706
- p1761: 0
- p0869: 0.0280733; = IF(p0858+p0864+p0865+p0866+p0867+p0868=1;0;1-(p0858+p0864+p0865+p0866+p0867+p0868))
- p1201: 0.65
- p2935: 1.10897e-5; = p2349*(p1079+p1081)
- p2357: 0; = p2225*p2185
- p0906: 0.00672763
- p1547: 729
- p0114: 42.785
- p2984: 0; = p2398*(p1020+p1022)
- p2417: 0; = p2235*p2207
- p0690: 187.279; = p0030*(1+p0558*p0162/100)
- p2061: 0.518824
- p1668: 0
- p2753: 0; = p2362*(p1019+p1021)
- p2530: 4.3294e-7; = p2334*p1014
- p2860: 0; = p2274*(p1129+p1131)
- p2257: 4.86101e-5; = p2222*p2203
- p0846: 0.373043; = p0841*p0845^3+p0842*p0845^2+p0843*p0845+p0844
- p0032: 43.072
- p1119: 0.00705268; = IF(p1071=0;p1109/(p1114*p0818);0)
- p1670: 0
- p0119: 55.538
- p2247: 2.36082e-5; = p2222*p2192
- p3297: 0; = if(p1273+p1274+p1275+p1276=0;0;p1273/(p1273+p1274+p1275+p1276))
- p2619: 0; = p2423*p1073
- p1063: 0.455
- p1896: 0
- p0349: 0.5
- p1677: 0
- p2643: 1.6592e-7; = p2252*(p1019+p1021)
- p2509: 1.56139e-5; = p2313*p1123
- p1767: 8.74051e-5; = p1359*1000/p0818
- p3415: 0; = p3377*p1238
- p1024: 174613; = IF(p1012=0;p1014*(p0704/100)*p0703*1000;0)
- p2655: 1.56671e-5; = p2264*(p1078+p1080)
- p0442: 0; = SQRT(2)*(IF((2*p0310-1)<0;-1;IF((2*p0310-1)>0;1;0))*SQRT(SQRT((2/(pi()*0.140012289)+LN(1-(2*p0310-1)^2)/2)^2-LN(1-(2*p0310-1)^2)/0.140012289)-(2/(pi()*0.140012289)+LN(1-(2*p0310-1)^2)/2)))
- p2518: 1.03481e-6; = p2322*p1014
- p1653: 0
- p2467: 1.68163e-5; = p2271*p1073
- p0725: 0
- p1091: 4.19987e-5; = IF(p1071=0;p1085*p0001/(p0818*p0002);0)
- p1027: 0; = IF(p1012=0;p1021*(p0704/100)*p0703*1000;0)
- p1195: 0.45
- p3322: 0; = if(and(p1232=0;p3253<>0);p3253-(p3317+p3318+p3319+p3320+p3321);0)
- p1698: 0
- p2083: 2.17294
- p3231: 5.52677e-8; = p1176/p0818
- p3409: 0; = p3371*p1238
- p0635: 0; = IF(p0371<0.5;-SQRT(p0007*EXP(p0503^2*p0008)-p0007);SQRT(p0007*EXP(p0503^2*p0008)-p0007))
- p2631: 3.35971e-6; = p2240*(p1019+p1021)
- p1133: 96592.7; = if(p1121=0;p1123*(p0716/100)*p0703*1000;0)
- p2027: 0.428799
- p2236: 0; = 1-(p2230+p2231+p2232+p2233)
- p0689: 91.023; = p0029*(1+p0557*p0161/100)
- p1262: 0; = if(p1232>0;0;p0733/100)
- p2265: 0.000417522; = p2226*p2211
- p1183: 0.000372324; = p0801*p0001/(p0818*p0002)
- p0885: 0; = IF(p0689+p0884=100;0;100-(p0689+p0884))
- p0918: 0.11609; = p0680*1000/p0801
- p1714: 0
- p5063: 0; = p1890*p3483
- p2950: 0; = p2364*(p1020+p1022)
- p3237: 0.854735
- p1121: 0
- p0557: 0; = IF(p0293<0.5;-SQRT(p0007*EXP(p0425^2*p0008)-p0007);SQRT(p0007*EXP(p0425^2*p0008)-p0007))
- p1267: 0
- p2337: 9.56581e-5; = p2228*p2205
- p2644: 3.64792e-7; = p2253*(p1019+p1021)
- p2988: 0; = p2402*(p1020+p1022)
- p0587: 0; = IF(p0323<0.5;-SQRT(p0007*EXP(p0455^2*p0008)-p0007);SQRT(p0007*EXP(p0455^2*p0008)-p0007))
- p0955: 6.62325e-5; = if(and(p0683>0;or(p0807=56;p0807=100;and(p0807=60;p0901>0.06)));p0937;0)
- p3246: 1; = IF(p3244+p3245=1;0;1-(p3244+p3245))
- p4307: 0; = p1962*p3479
- p3377: 0; = if(p1232=0;p3246*p3359/p0818;0)
- p3940: 9.44076e-6; = p1797*p3478
- p2473: 2.34593e-5; = p2277*p1014
- p2386: 0; = p2229*p2215
- p0107: 11.616
- p0109: 24.889
- p3426: 0; = p3369*p1239
- p2791: 0; = p2400*(p1019+p1021)
- p0415: 0; = SQRT(2)*(IF((2*p0283-1)<0;-1;IF((2*p0283-1)>0;1;0))*SQRT(SQRT((2/(pi()*0.140012289)+LN(1-(2*p0283-1)^2)/2)^2-LN(1-(2*p0283-1)^2)/0.140012289)-(2/(pi()*0.140012289)+LN(1-(2*p0283-1)^2)/2)))
- p2419: 0; = p2235*p2209
- p2186: 0.000151285; = p1052/p0818
- p3212: 0; = p2431*p1132
- p1783: 0
- p1311: 0; = IF(p1307+p1310=p1266;0;IF(p1307+p1310+p1309>p1266;p1266-(p1307+p1310);p1309))
- p2137: 8.44748e-8; = p2015*p2065*p2099/(p0818*1000)
- p0475: 0; = SQRT(2)*(IF((2*p0343-1)<0;-1;IF((2*p0343-1)>0;1;0))*SQRT(SQRT((2/(pi()*0.140012289)+LN(1-(2*p0343-1)^2)/2)^2-LN(1-(2*p0343-1)^2)/0.140012289)-(2/(pi()*0.140012289)+LN(1-(2*p0343-1)^2)/2)))
- p2152: 3.73393e-8; = p2015*p2080*p2114/(p0818*1000)
- p1127: 0; = if(p1121=0;p0721/100;0)
- p2159: 3.20681e-6; = p2015*p2083*p2121/(p0818*1000)
- p1005: 22392.5; = p1001*p0888
- p1000: 0; = IF(p0996+p0999=1;0;IF(p0996+p0999+p0998>1;1-(p0996+p0999);p0998))
- p4651: 5.3614e-7; = p1890*p3481
- p1864: 7.99861e-6; = p1456*1000/p0818
- p3226: 0.000877129; = p3222*p1229
- p1895: 0
- p0892: 0; = if(p0891=0;0;(1-p1240)*p3251/p0891)
- p1045: 0.0667372; = IF(p1012=0;IF(p1037+p1044=1;0;IF(p1037+p1044+p1039>1;1-(p1037+p1044);p1039));0)
- p2915: 4.65722e-8; = p2329*(p1020+p1022)
- p2439: 7.54641e-6; = p2243*p1014
- p0268: 21.565
- p1633: 0
- p2897: 0.000337908; = p2311*(p1129+p1131)
- p2366: 0; = p2225*p2195
- p2370: 0; = p2225*p2199
- p2739: 1.65191e-6; = p2348*(p1078+p1080)
- p2302: 0.000175408; = p2227*p2209
- p2344: 5.41804e-7; = p2228*p2212
- p3411: 0; = p3373*p1238
- p1154: 0.00238877; = if(p1152*p0818=0;0;p1150/(p1152*p0818))
- p3316: 0; = if(and(p1232=0;p3253<>0);1-(p3312+p3313+p3314+p3315);0)
- p3320: 0; = if(and(p1232=0;p3253<>0);p3253*(p3264-p3315)/p3316;0)
- p1775: 0
- p2056: 2.07882
- p3022: 2.92657e-7; = p2241*p1023
- p3375: 0; = if(p1232=0;p3246*p3357/p0818;0)
- p3345: 0; = if(and(p1232=0;p3256<>0);p3273*p3277*p3293;0)
- p2080: 0.025
- p0239: 16.019
- p0020: 417.924
- p0165: 37.472
- p0148: 0
- p0695: 7.146; = p0035*(1+p0563*p0167/100)
- p1936: 0
- p1857: 0
- p4346: 0; = p1791*p3480
- p2606: 0; = p2410*p1014
- p1105: 0.436421
- p2665: 0; = p2274*(p1128+p1130)
- p0078: 3499.51
- p2327: 1.65052e-5; = p2224*p2195
- p2488: 5.17019e-7; = p2292*p1014
- p2324: 1.86235e-6; = p2224*p2191
- p1304: 0; = p1300*p1252/p0818
- p2579: 0; = p2383*p1073
- p1097: 0.0659222
- p3469: 0; = p3374*p1241
- p1854: 0
- p1256: 0; = if(p1232>0;0;IF(p1253=1;0;IF(p1253+p1254>1;1-p1253;p1254)))
- p1840: 0
- p0946: 0; = if(and(p0683=0;or(p0807=480;p0807=32;p0807=1;and(p0807=60;p0901<0.03)));p0934;0)
- p5132: 0; = p1963*p3483
- p0428: 0; = SQRT(2)*(IF((2*p0296-1)<0;-1;IF((2*p0296-1)>0;1;0))*SQRT(SQRT((2/(pi()*0.140012289)+LN(1-(2*p0296-1)^2)/2)^2-LN(1-(2*p0296-1)^2)/0.140012289)-(2/(pi()*0.140012289)+LN(1-(2*p0296-1)^2)/2)))
- p0653: 0; = IF(p0389<0.5;-SQRT(p0007*EXP(p0521^2*p0008)-p0007);SQRT(p0007*EXP(p0521^2*p0008)-p0007))
- p1608: 0
- p0744: 0
- p1190: 7.1429e-8; = p1188/p0818
- p2813: 0; = p2422*(p1078+p1080)
- p0673: 94.987; = p0013*(1+p0541*p0145/100)
- p2670: 1.43292e-5; = p2279*(p1019+p1021)
- p1617: 0
- p1561: 0
- p2485: 0.000174336; = p2289*p1014
- p2067: 0.446471
- p1852: 0
- p3038: 5.55127e-7; = p2257*p1023
- p2712: 1.44973e-5; = p2321*(p1019+p1021)
- p2448: 5.51366e-8; = p2252*p1014
- p3880: 0; = p1943*p3477
- p0678: 1543.88; = p0018*(1+p0546*p0150/100)
- p2503: 1.4109e-5; = p2307*p1073
- p0115: 45.068
- p0280: 0.5
- p1166: 3.09906e-6; = p1164/p0818
- p3031: 2.91861e-6; = p2250*p1023
- p0449: 0; = SQRT(2)*(IF((2*p0317-1)<0;-1;IF((2*p0317-1)>0;1;0))*SQRT(SQRT((2/(pi()*0.140012289)+LN(1-(2*p0317-1)^2)/2)^2-LN(1-(2*p0317-1)^2)/0.140012289)-(2/(pi()*0.140012289)+LN(1-(2*p0317-1)^2)/2)))
- p2641: 0.000123006; = p2250*(p1019+p1021)
- p4071: 6.84113e-6; = p1928*p3478
- p3208: 0; = p2427*p1082
- p3188: 0; = p2407*p1023
- p3000: 0; = p2414*(p1079+p1081)
- p3473: 0; = p3378*p1241
- p0183: 36.737
- p3406: 0; = p3368*p1238
- p2586: 0; = p2390*p1123
- p2161: 1.58815e-8; = p2015*p2085*p2123/(p0818*1000)
- p0844: 0.375898
- p1172: 2.01251e-7; = p1170/p0818
- p2597: 0; = p2401*p1014
- p0177: 30.793
- p2205: 0.00137796; = 2*14.0067*p2204/30.973762
- p1594: 0
- p2486: 1.43272e-7; = p2290*p1014
- p2625: 0; = p2429*p1123
- p0210: 0
- p1968: 0; = if(p0807=480;p0802*p0811;0)
- p0616: 0; = IF(p0352<0.5;-SQRT(p0007*EXP(p0484^2*p0008)-p0007);SQRT(p0007*EXP(p0484^2*p0008)-p0007))
- p2347: 4.01588e-5; = p2228*p2215
- p1036: 1.95552e7; = IF(p1012=0;p0795*p0702*1000*p0796/100;0)
- p1826: 0
- p2475: 4.76171e-6; = p2279*p1014
- p3087: 0; = p2306*p1082
- p1055: 10696; = IF(p1012=0;p1048*p1036;0)
- p3014: 0; = p2428*(p1129+p1131)
- p4498: 0; = p1943*p3480
- p1803: 0
- p0534: 0; = SQRT(2)*(IF((2*p0402-1)<0;-1;IF((2*p0402-1)>0;1;0))*SQRT(SQRT((2/(pi()*0.140012289)+LN(1-(2*p0402-1)^2)/2)^2-LN(1-(2*p0402-1)^2)/0.140012289)-(2/(pi()*0.140012289)+LN(1-(2*p0402-1)^2)/2)))
- p3229: 3.09906e-6; = p1164/p0818
- p1086: 0; = IF(p1071=0;p1080*(p0710/100)*p0703*1000;0)
- p1228: 0.0670706; = IF(p1221=0;0;p0801*p1212*2000/(p1222+p1221*p1225)/p0818)
- p3116: 3.54389e-7; = p2335*p1023
- p2174: 0.00700667; = p0895*p0903/p0818
- p2772: 0; = p2381*(p1078+p1080)
- p1447: 773
- p0856: 3.6e6; = p0801
- p3026: 1.32478e-7; = p2245*p1023
- p0556: 0; = IF(p0292<0.5;-SQRT(p0007*EXP(p0424^2*p0008)-p0007);SQRT(p0007*EXP(p0424^2*p0008)-p0007))
- p1240: 0; = if(p1232>0;0;IF(p1234+p1238+p1239=1;0;IF(p1234+p1238+p1239+p1237>1;1-(p1234+p1238+p1239);p1237)))
- p0315: 0.5
- p0405: 0; = SQRT(2)*(IF((2*p0273-1)<0;-1;IF((2*p0273-1)>0;1;0))*SQRT(SQRT((2/(pi()*0.140012289)+LN(1-(2*p0273-1)^2)/2)^2-LN(1-(2*p0273-1)^2)/0.140012289)-(2/(pi()*0.140012289)+LN(1-(2*p0273-1)^2)/2)))
- p0985: 0.862387; = IF(p0982=1;0;IF(p0982+p0983>1;1-p0982;p0983))
- p2077: 0.043
- p0832: 1.42767e9; = p0831*p0830/(1-p0831)
- p1963d: 0; = p1608*p1812+p1609*p1813+p1610*p1814+p1611*p1815+p1612*p1816+p1613*p1817+p1614*p1818+p1615*p1819+p1616*p1820+p1617*p1821+p1618*p1822+p1619*p1823+p1620*p1824+p1621*p1825+p1622*p1826+p1623*p1827+p1624*p1828+p1625*p1829+p1626*p1830+p1627*p1831
- p3169: 0; = p2388*p1082
- p1235: 0; = if(p1232>0;0;p0727/100)
- p2758: 0; = p2367*(p1019+p1021)
- p2660: 7.83699e-5; = p2269*(p1078+p1080)
- p2377: 0; = p2229*p2206
- p2378: 0; = p2229*p2207
- p0851: 0
- p0251: 22.038
- p1963k: 6.68597e-5; = p1744*p1948+p1745*p1949+p1746*p1950+p1747*p1951+p1748*p1952+p1749*p1953+p1750*p1954+p1751*p1955+p1752*p1956+p1753*p1957+p1961*p1962
- p3351: 0; = if(and(p1232=0;p3256<>0);p3256*(p3274-p3346)/p3349;0)
- p0975: 0.0137394; = p0973*p0974/p0818
- p2803: 0; = p2412*(p1019+p1021)
- p2676: 5.98836e-6; = p2285*(p1019+p1021)
- p2028: 5.29755e-5; = p2015*p2026*p2027/(p0818*1000)
- p2075: 0.072
- p2924: 1.14015e-5; = p2338*(p1079+p1081)
- p3405: 0; = p3367*p1238
- p1331: 0; = p1330*p0001/(p0818*p0002)
- p1919: 0
- p3380: 0; = p3251/p0818
- p1588: 0
- p2193: 0.000712012; = p1054/p0818
- p3215: 0.450791; = p1222*3*15.9994/100.0869
- p1687: 0
- p2576: 0; = p2380*p1073
- p2743: 5.28408e-6; = p2352*(p1128+p1130)
- p2987: 0; = p2401*(p1020+p1022)
- p0749: 24.863; = p0089*(1+p0617*p0221/100)
- p2666: 0; = p2275*(p1128+p1130)
- p2120: 0.51828
- p0011: 99.799
- p3247: 0
- p3331: 0; = if(and(p1232=0;p3255<>0);p3255*(p3268-p3326)/p3327;0)
- p2974: 0; = p2388*(p1079+p1081)
- p0829: 0; = if(p0807=480;p0814*(1-p0824);0)
- p0787: 0
- p2150: 1.79771e-7; = p2015*p2078*p2112/(p0818*1000)
- p3301: 0; = if(and(p1232=0;p3252<>0);p3257*p3277*(p3297*p3290+(1-p3297)*p3294);0)
- p2583: 0; = p2387*p1073
- p0103: 3498.94
- p1905: 0
- p2978: 0; = p2392*(p1129+p1131)
- p1180: 2.76338e-8; = p1176*p1179/p0818
- p3772: 0; = p1835*p3477
- p0118: 24.628
- p2372: 0; = p2225*p2201
- p3167: 0; = p2386*p1082
- p1975: 0.000372324; = p1970*p0001/(p0818*p0002)
- p0647: 0; = IF(p0383<0.5;-SQRT(p0007*EXP(p0515^2*p0008)-p0007);SQRT(p0007*EXP(p0515^2*p0008)-p0007))
- p0728: 0
- p0964: 0; = 56/90000
- p0191: 33.172
- p2995: 0; = p2409*(p1020+p1022)
- p1755: 0
- p1614: 0
- p3437: 0; = p3380*p1239
- p5268: 4.37529e-7; = p1889*p3484
- p0213: 10.127
- p1680: 0
- p4625: 6.27011e-7; = p1864*p3481
- p3361: 0; = if(p1232=0;p3311+p3322+p3333+p3344+p3355;0)
- p0992: 2.35819e-6; = p0988*p0001*p0004/(p0818*p0002)
- p1550: 0
- p0501: 0; = SQRT(2)*(IF((2*p0369-1)<0;-1;IF((2*p0369-1)>0;1;0))*SQRT(SQRT((2/(pi()*0.140012289)+LN(1-(2*p0369-1)^2)/2)^2-LN(1-(2*p0369-1)^2)/0.140012289)-(2/(pi()*0.140012289)+LN(1-(2*p0369-1)^2)/2)))
- p0563: 0; = IF(p0299<0.5;-SQRT(p0007*EXP(p0431^2*p0008)-p0007);SQRT(p0007*EXP(p0431^2*p0008)-p0007))
- p2896: 0.000104616; = p2310*(p1079+p1081)
- p2269: 0.000159486; = p2226*p2215
- p0565: 0; = IF(p0301<0.5;-SQRT(p0007*EXP(p0433^2*p0008)-p0007);SQRT(p0007*EXP(p0433^2*p0008)-p0007))
- p1065: 5.31724e-5; = IF(p1012=0;p1051/(p1058*p0818);0)
- p0369: 0.5
- p0244: 60.813
- p2259: 0.000379896; = p2226*p2205
- p0242: 20.137
- p2042: 0.07
- p1571: 0
- p3199: 0; = p2418*p1082
- p2297: 0.000997769; = p2227*p2204
- p2441: 1.85539e-6; = p2245*p1014
- p1738: 0
- p3865: 0; = p1928*p3477
- p1877: 0
- p0989: 6.13487e6; = p0985*p0886
- p1553: 0
- p2916: 7.64409e-8; = p2330*(p1020+p1022)
- p3056: 0; = p2275*p1132
- p1787: 0
- p2706: 4.81375e-5; = p2315*(p1019+p1021)
- p2362: 0; = p2225*p2190
- p1607: 0
- p1213: 0
- p1341: 0; = p1340*p0001/(p0818*p0002)
- p2709: 2.14482e-6; = p2318*(p1019+p1021)
- p0399: 0.5
- p0419: 0; = SQRT(2)*(IF((2*p0287-1)<0;-1;IF((2*p0287-1)>0;1;0))*SQRT(SQRT((2/(pi()*0.140012289)+LN(1-(2*p0287-1)^2)/2)^2-LN(1-(2*p0287-1)^2)/0.140012289)-(2/(pi()*0.140012289)+LN(1-(2*p0287-1)^2)/2)))
- p2477: 2.51593e-6; = p2281*p1014
- p2255: 2.94614e-5; = p2222*p2201
- p1673: 0
- p3895: 0; = p1962*p3477
- p2982: 0; = p2396*(p1020+p1022)
- p0447: 0; = SQRT(2)*(IF((2*p0315-1)<0;-1;IF((2*p0315-1)>0;1;0))*SQRT(SQRT((2/(pi()*0.140012289)+LN(1-(2*p0315-1)^2)/2)^2-LN(1-(2*p0315-1)^2)/0.140012289)-(2/(pi()*0.140012289)+LN(1-(2*p0315-1)^2)/2)))
- p2934: 1.23735e-6; = p2348*(p1079+p1081)
- p4537: 1.38124e-6; = p1776*p3481
- p3101: 2.68891e-8; = p2320*p1023
- p2082: 0.285294
- p0218: 23.513
- p0116: 20.672
- p0188: 24.011
- p2182: 0.000924871; = p1050/p0818
- p1220: 0; = IF(p1218<0.5;-SQRT(p1214*EXP(p1219^2*p1215)-p1214);SQRT(p1214*EXP(p1219^2*p1215)-p1214))
- p3012: 0; = p2426*(p1079+p1081)
- p2730: 0.000126384; = p2339*(p1078+p1080)
- p1189: 0.000372324; = p0801*p0001/(p0818*p0002)
- p3277: 0
- p0777: 0
- p1307: 0
- p1286: 0; = p1282*p1252/p0818
- p1159: 0.5
- p3082: 0; = p2301*p1082
- p0847: 0
- p1280: 0; = IF(p1277=p1263;0;IF(p1277+p1278>p1263;p1263-p1277;p1278))
- p1188: 616.182; = p1187*p0801
- p1862: 0
- p1222: 0.94
- p3324: 0; = if(and(p1232=0;p3255<>0);p3266*(p3279*(p3284*p1256+p3286*(p1253+p1257)+p1258*p3288+p3299*p3287));0)
- p2770: 0; = p2379*(p1078+p1080)
- p0143: 0
- p3132: 4.05524e-6; = p2351*p1132
- p1830: 0
- p2614: 0; = p2418*p1073
- p0608: 0; = IF(p0344<0.5;-SQRT(p0007*EXP(p0476^2*p0008)-p0007);SQRT(p0007*EXP(p0476^2*p0008)-p0007))
- p3019: 3.92739e-7; = p2238*p1023
- p3477: 0; = if(p1328+p1330+p1332+p1334+p1336+p1338+p1340+p1342+p1344=0;0;p1330/(p1328+p1330+p1332+p1334+p1336+p1338+p1340+p1342+p1344))
- p3656: 5.66151e-8; = p1925*p3476
- p1285: 0; = p1281*p1252/p0818
- p1853: 0
- p1567: 0
- p0769: 24.889; = p0109*(1+p0637*p0241/100)
- p1795: 1.27514e-6; = p1387*1000/p0818
- p2942: 0; = p2356*(p1020+p1022)
- p3228: 0.00196338; = p3224*p1229
- p4892: 0; = p1925*p3482
- p0277: 0.5
- p2850: 1.17352e-5; = p2264*(p1079+p1081)
- p2701: 0.000139667; = p2310*(p1078+p1080)
- p0514: 0; = SQRT(2)*(IF((2*p0382-1)<0;-1;IF((2*p0382-1)>0;1;0))*SQRT(SQRT((2/(pi()*0.140012289)+LN(1-(2*p0382-1)^2)/2)^2-LN(1-(2*p0382-1)^2)/0.140012289)-(2/(pi()*0.140012289)+LN(1-(2*p0382-1)^2)/2)))
- p2495: 4.10689e-5; = p2299*p1073
- p1882: 0
- p0830: 1.23529e10; = p0825*p0821*p0824
- p1073: 0.14054; = IF(p1071=0;p0711/100;0)
- p2917: 1.68063e-7; = p2331*(p1020+p1022)
- p2957: 0; = p2371*(p1020+p1022)
- p0027: 7.371
- p1889: 3.35014e-5; = p1481*1000/p0818
- p2068: 0.153529
- p3481: 0.07839; = if(p1328+p1330+p1332+p1334+p1336+p1338+p1340+p1342+p1344=0;0;p1338/(p1328+p1330+p1332+p1334+p1336+p1338+p1340+p1342+p1344))
- p1434: 9
- p2401: 0; = p2234*p2190
- p2638: 1.13626e-5; = p2247*(p1019+p1021)
- p2749: 0; = p2358*(p1019+p1021)
- p3035: 7.8477e-7; = p2254*p1023
- p1102: 0.0208246; = IF(p1071=0;IF(p1096+p1101=1;0;IF(p1096+p1101+p1098>1;1-(p1096+p1101);p1098));0)
- p1688: 0
- p0737: 0
- p4352: 0; = p1797*p3480
- p2640: 1.24437e-5; = p2249*(p1019+p1021)
- p2822: 0; = p2431*(p1128+p1130)
- p2671: 5.26052e-5; = p2280*(p1019+p1021)
- p0237: 9.856
- p2891: 1.88128e-6; = p2305*(p1079+p1081)
- p2063: 2.01468
- p2123: 0.263965
- p2899: 3.4524e-5; = p2313*(p1129+p1131)
- p0320: 0.5
- p1064: 0.00112789; = IF(p1012=0;p1050/(p1057*p0818);0)
- p2507: 0.000152823; = p2311*p1123
- p5101: 0; = p1928*p3483
- p3157: 0; = p2376*p1082
- p1941: 0
- p4191: 2.59395e-7; = p1842*p3479
- p3085: 0; = p2304*p1082
- p3126: 0; = p2345*p1082
- p1716: 0
- p0784: 25.25; = p0124*(1+p0652*p0256/100)
- p1615: 0
- p0591: 0; = IF(p0327<0.5;-SQRT(p0007*EXP(p0459^2*p0008)-p0007);SQRT(p0007*EXP(p0459^2*p0008)-p0007))
- p0867: 0.145962; = IF(p0858+p0864+p0865+p0866=1;0;IF(p0858+p0864+p0865+p0866+p0862>1;1-(p0858+p0864+p0865+p0866);p0862))
- p0693: 56.928; = p0033*(1+p0561*p0165/100)
- p2223: 0.722466; = if(p0765*p0769+p0766*p0770+p0767*p0771+p0768*p0772=0;0;p0770*p0766/(p0765*p0769+p0766*p0770+p0767*p0771+p0768*p0772))
- p2955: 0; = p2369*(p1020+p1022)
- p0252: 35.617
- p1891: 0
- p2368: 0; = p2225*p2197
- p3466: 0; = p3371*p1241
- p2490: 2.00969e-5; = p2294*p1014
- p1482: 59
- p0150: 0
- p2023: 3.15
- p4762: 0; = p1795*p3482
- p2566: 0; = p2370*p1014
- p2340: 4.11175e-5; = p2228*p2208
- p2678: 0.000247583; = p2287*(p1019+p1021)
- p2999: 0; = p2413*(p1020+p1022)
- p1117: 0.000731785; = IF(p1071=0;p1107/(p1112*p0818);0)
- p0368: 0.5
- p0323: 0.5
- p1768: 0
- p1662: 0
- p0299: 0.5
- p1773: 0
- p1742: 0
- p2398: 0; = p2234*p2187
- p0712: 49.139; = p0052*(1+p0580*p0184/100)
- p0045: 15.994
- p2914: 5.667e-5; = p2328*(p1020+p1022)
- p0825: 7.75379e9; = p0818*p0822
- p0967: 4.61837e7; = (p0684/100)*p0683*p0682*1000
- p1242: 0; = if(p1232>0;0;p1234*(p0725/100)*p0723*1000)
- p1944: 0
- p0670: 2778.68; = p0010*(1+p0538*p0142/100)
- p2395: 0; = p2234*p2184
- p3039: 0; = p2258*p1082
- p0907: 0
- p2849: 2.71795e-5; = p2263*(p1079+p1081)
- p1728: 0
- p1631: 0.5
- p3302: 0; = if(and(p1232=0;p3252<>0);p3258*(p3278*(p3282*p1256+p3286*(p1253+p1257)+p1258*p3288+p3297*p3287));0)
- p0895: 2.34706e9; = p0894*p0830
- p0507: 0; = SQRT(2)*(IF((2*p0375-1)<0;-1;IF((2*p0375-1)>0;1;0))*SQRT(SQRT((2/(pi()*0.140012289)+LN(1-(2*p0375-1)^2)/2)^2-LN(1-(2*p0375-1)^2)/0.140012289)-(2/(pi()*0.140012289)+LN(1-(2*p0375-1)^2)/2)))
- p1722: 0
- p3268: 0
- p3133: 2.94011e-7; = p2352*p1132
- p2185: 4.12086e-5; = p1065-p2184
- p3429: 0; = p3372*p1239
- p0221: 11.993
- p0510: 0; = SQRT(2)*(IF((2*p0378-1)<0;-1;IF((2*p0378-1)>0;1;0))*SQRT(SQRT((2/(pi()*0.140012289)+LN(1-(2*p0378-1)^2)/2)^2-LN(1-(2*p0378-1)^2)/0.140012289)-(2/(pi()*0.140012289)+LN(1-(2*p0378-1)^2)/2)))
- p3307: 0; = if(and(p1232=0;p3252<>0);p3252*(p3258-p3302)/p3305;0)
- p2871: 4.32162e-6; = p2285*(p1020+p1022)
- p2720: 6.45339e-8; = p2329*(p1019+p1021)
- p1943: 2.31844e-7; = p1535*1000/p0818
- p3239: 0.013074; = IF(p3238+p3235+p3236=1;0;1-(p3238+p3235+p3236))
- p0236: 21.565
- p0951: 0; = if(and(p0683=0;or(p0807=480;p0807=32;p0807=1;and(p0807=60;p0901<0.03)));p0939;0)
- p0730: 0
- p2848: 6.01034e-5; = p2262*(p1079+p1081)
- p3113: 5.00991e-7; = p2332*p1023
- p2350: 0.000126103; = p2232*p2218
- p0057: 17.659
- p1137: 0; = if(p1121=0;p1131*(p0716/100)*p0703*1000;0)
- p3366: 0; = if(p1232=0;p3244*p3360/p0818;0)
- p2020: 401250; = p2015*p2018*p2019
- p2285: 1.24421e-5; = p2223*p2191
- p0706: 48.13; = p0046*(1+p0574*p0178/100)
- p0760: 0
- p0017: 115.648
- p1021: 0; = IF(p1012=0;IF(p1014+p1019+p1020=1;0;IF(p1014+p1019+p1020+p1017>1;1-(p1014+p1019+p1020);p1017));0)
- p2800: 0; = p2409*(p1019+p1021)
- p1981: 400
- p1623: 0
- p3183: 0; = p2402*p1023
- p0525: 0; = SQRT(2)*(IF((2*p0393-1)<0;-1;IF((2*p0393-1)>0;1;0))*SQRT(SQRT((2/(pi()*0.140012289)+LN(1-(2*p0393-1)^2)/2)^2-LN(1-(2*p0393-1)^2)/0.140012289)-(2/(pi()*0.140012289)+LN(1-(2*p0393-1)^2)/2)))
- p1845: 0
- p1044: 0.00527766; = IF(p1012=0;IF(p1037=1;0;IF(p1037+p1038>1;1-p1037;p1038));0)
- p2653: 8.02408e-5; = p2262*(p1078+p1080)
- p4480: 0; = p1925*p3480
- p1706: 0
- p2200: 0.000405675; = p1056/p0818
- p1837: 0
- p0520: 0; = SQRT(2)*(IF((2*p0388-1)<0;-1;IF((2*p0388-1)>0;1;0))*SQRT(SQRT((2/(pi()*0.140012289)+LN(1-(2*p0388-1)^2)/2)^2-LN(1-(2*p0388-1)^2)/0.140012289)-(2/(pi()*0.140012289)+LN(1-(2*p0388-1)^2)/2)))
- p1697: 0
- p1616: 0
- p0948: 0; = if(and(p0683=0;or(p0807=480;p0807=32;p0807=1;and(p0807=60;p0901<0.03)));p0936;0)
- p1112: 0.209482
- p2447: 3.35924e-8; = p2251*p1014
- p2797: 0; = p2406*(p1019+p1021)
- p3468: 0; = p3373*p1241
- p4616: 7.02434e-6; = p1855*p3481
- p2095: 0.765734
- p2714: 3.56437e-6; = p2323*(p1019+p1021)
- p2744: 9.18235e-6; = p2353*(p1128+p1130)
- p0214: 1.318
- p1031: 5.43441e-5; = IF(p1012=0;p1025*p0001/(p0818*p0002);0)
- p3840: 0; = p1903*p3477
- p1791: 1.0433e-6; = p1383*1000/p0818
- p0521: 0; = SQRT(2)*(IF((2*p0389-1)<0;-1;IF((2*p0389-1)>0;1;0))*SQRT(SQRT((2/(pi()*0.140012289)+LN(1-(2*p0389-1)^2)/2)^2-LN(1-(2*p0389-1)^2)/0.140012289)-(2/(pi()*0.140012289)+LN(1-(2*p0389-1)^2)/2)))
- p1704: 0
- p1813: 0
- p2272: 0; = p2230*p2218
- p1663: 0
- p2842: 1.47278e-6; = p2256*(p1020+p1022)
- p3154: 0; = p2373*p1023
- p1986: 4200
- p3372: 0; = if(p1232=0;p3245*p3360/p0818;0)
- p1691: 0
- p2434: 5.50041e-6; = p2238*p1014
- p1753: 0
- p4926: 0; = p1963*p3482
- p2111: 0.856281
- p1956: 0
- p2007: 0.00696124; = ((p1981*p1985+p1987*p1991+p1993*p1997+p2001*p2005)/p0818)*p0005*p0002/1000
- p0014: 525.465
- p2462: 3.02402e-7; = p2266*p1073
- p1894: 0
- p1935: 0
- p2301: 0.000387888; = p2227*p2208
- p1963i: 9.64905e-6; = p1706*p1910+p1707*p1911+p1708*p1912+p1709*p1913+p1710*p1914+p1711*p1915+p1712*p1916+p1713*p1917+p1714*p1918+p1715*p1919+p1716*p1920+p1717*p1921+p1718*p1922+p1719*p1923+p1720*p1924+p1721*p1925+p1722*p1926+p1723*p1927+p1724*p1928
- p3413: 0; = p3375*p1238
- p0771: 13.275; = p0111*(1+p0639*p0243/100)
- p1278: 0
- p1955: 8.4507e-5; = p1547*1000/p0818
- p2869: 1.50137e-5; = p2283*(p1020+p1022)
- p3251: 0; = p1252-(p3252+p3253+p3254+p3255+p3256)
- p3178: 0; = p2397*p1023
- p1095: 4.5965e7; = IF(p1071=0;p0797*p0702*1000*p0798/100;0)
- p0835: 700.476; = -LN(1-p0669/100)/p0834
- p0788: 50.434; = p0128*(1+p0656*p0260/100)
- p2158: 2.65323e-7; = p2015*p2082*p2120/(p0818*1000)
- p2335: 3.10323e-5; = p2224*p2203
- p2295: 1.80843e-5; = p2223*p2202
- p1765: 0
- p3308: 0; = if(and(p1232=0;p3252<>0);p3252*(p3259-p3303)/p3305;0)
- p0801: 3.6e6
- p0978: 0
- p1850: 0
- p0966: 0.80517; = if(p0683=0;0;IF(p0684/100+p0965=1;0;1-(p0684/100+p0965)))
- p2841: 1.02331e-5; = p2255*(p1020+p1022)
- p3432: 0; = p3375*p1239
- p1308: 0
- p4910: 0; = p1943*p3482
- p2699: 0.00018616; = p2308*(p1078+p1080)
- p2751: 0; = p2360*(p1019+p1021)
- p2163: 0.000634572; = (p2017-p2020)/p0818-(p2025+p2028+p2033+p2034+p2051+p2125+p2126+p2127+p2128+p2129+p2130+p2131+p2132+p2133+p2134+p2135+p2136+p2137+p2138+p2139+p2140+p2141+p2142+p2143+p2144+p2145+p2146+p2147+p2148+p2149+p2150+p2151+p2152+p2153+p2154+p2155+p2156+p2157)
- p2519: 1.18447e-6; = p2323*p1014
- p0056: 15.633
- p3037: 4.84226e-8; = p2256*p1023
- p0758: 0
- p1383: 9
- p2339: 0.000257196; = p2228*p2207
- p1793: 0
- p3137: 0; = p2356*p1023
- p2981: 0; = p2395*(p1020+p1022)
- p2258: 0.000420042; = p2226*p2204
- p1855: 8.96076e-5; = p1447*1000/p0818
- p2698: 4.93313e-5; = p2307*(p1078+p1080)
- p3072: 1.67907e-8; = p2291*p1023
- p2805: 0; = p2414*(p1078+p1080)
- p3384: 0; = p3365*p1234
- p1340: 0; = p1325*p0801
- p2881: 6.2814e-6; = p2295*(p1020+p1022)
- p1740: 0
- p0773: 31.532; = p0113*(1+p0641*p0245/100)
- p0287: 0.5
- p0747: 0
- p3383: 0; = p3364*p1234
- p4716: 6.62451e-6; = p1955*p3481
- p4720: 2.19194e-5; = p1963*p3481
- p2127: 4.01574e-6; = p2015*p2055*p2089/(p0818*1000)
- p1963b: 1.05426e-6; = p1569*p1773+p1570*p1774+p1571*p1775+p1572*p1776+p1573*p1777+p1574*p1778+p1575*p1779+p1576*p1780+p1577*p1781+p1578*p1782+p1579*p1783+p1580*p1784+p1581*p1785+p1582*p1786+p1583*p1787+p1584*p1788+p1585*p1789+p1586*p1790+p1587*p1791
- p0970: 0.0053537; = p0967/p0818
- p1963f: 3.50023e-5; = p1647*p1851+p1648*p1852+p1649*p1853+p1650*p1854+p1651*p1855+p1652*p1856+p1653*p1857+p1654*p1858+p1655*p1859+p1656*p1860+p1657*p1861+p1658*p1862+p1659*p1863+p1660*p1864+p1661*p1865+p1662*p1866+p1663*p1867+p1664*p1868+p1665*p1869+p1666*p1870
- p2968: 0; = p2382*(p1079+p1081)
- p1701: 0
- p1106: 67327.3; = IF(p1071=0;p1105*p1096*p1095;0)
- p2458: 2.29493e-5; = p2262*p1073
- p1236: 0; = if(p1232>0;0;p0728/100)
- p1749: 0
- p0900: 1.14331; = p0899/p0818
- p3073: 3.69161e-8; = p2292*p1023
- p1229: 0.00391153; = IF(p1221=0;0;p1228*p1221)
- p1595: 0
- p2276: 0.000668188; = p2223*p2182
- p1143: 0; = if(p1121=0;p1137*p0001/(p0818*p0002);0)
- p0291: 0.5
- p0920: 0.217128; = p0676*1000/p0801
- p1136: 0; = if(p1121=0;p1130*(p0716/100)*p0703*1000;0)
- p0665: 0; = IF(p0401<0.5;-SQRT(p0007*EXP(p0533^2*p0008)-p0007);SQRT(p0007*EXP(p0533^2*p0008)-p0007))
- p2546: 2.22685e-5; = p2350*p1123
- p3043: 0; = p2262*p1082
- p3450: 0; = p3374*p1240
- p1658: 0
- p4870: 0; = p1903*p3482
- p0551: 0; = IF(p0287<0.5;-SQRT(p0007*EXP(p0419^2*p0008)-p0007);SQRT(p0007*EXP(p0419^2*p0008)-p0007))
- p1337: 0; = p1336*p0001/(p0818*p0002)
- p0814: 0; = if(p0807=480;p0810*p0812+p0811*p0813;0)
- p1784: 0
- p3150: 0; = p2369*p1023
- p1610: 0
- p2515: 2.61661e-6; = p2319*p1014
- p5214: 1.81673e-8; = p1835*p3484
- p0782: 15.633; = p0122*(1+p0650*p0254/100)
- p0768: 0
- p3414: 0; = p3376*p1238
- p1602: 0
- p0104: 31.202
- p1264: 0; = if(p1232>0;0;IF(p1259+p1263=1;0;IF(p1259+p1263+p1261>1;1-(p1259+p1263);p1261)))
- p1693: 0
- p2065: 0.0758824
- p1890: 6.83939e-6; = p1482*1000/p0818
- p2499: 1.06438e-5; = p2303*p1073
- p2424: 0; = p2235*p2214
- p0927: 0.0279144; = IF(p0918+p0923+p0924+p0925+p0926=1;0;1-(p0918+p0923+p0924+p0925+p0926))
- p0560: 0; = IF(p0296<0.5;-SQRT(p0007*EXP(p0428^2*p0008)-p0007);SQRT(p0007*EXP(p0428^2*p0008)-p0007))
- p2745: 0; = p2354*(p1019+p1021)
- p1276: 0; = p1272*p1252/p0818
- p2645: 3.30744e-5; = p2254*(p1019+p1021)
- p2889: 2.78759e-5; = p2303*(p1079+p1081)
- p2962: 0; = p2376*(p1079+p1081)
- p1823: 0
- p2545: 4.23437e-6; = p2349*p1073
- p3160: 0; = p2379*p1082
- p2331: 4.83858e-7; = p2224*p2199
- p2738: 1.97336e-5; = p2347*(p1078+p1080)
- p2902: 7.62572e-6; = p2316*(p1020+p1022)
- p1952: 0
- p1822: 0
- p1932: 0
- p1908: 0
- p0882: 101064; = p0869*p0856
- p3343: 0; = if(and(p1232=0;p3254<>0);IF((p3339+p3340+p3341+p3342)+(p3254*(p3269*(1-p3277))/p3338)>p3254;p3254-(p3339+p3340+p3341+p3342);p3254*(p3269*(1-p3277))/p3338);0)
- p4809: 0; = p1842*p3482
- p1903: 9.44763e-5; = p1495*1000/p0818
- p2030: 8.87
- p2996: 0; = p2410*(p1020+p1022)
- p0080: 97.317
- p3202: 0; = p2421*p1082
- p1266: 0; = if(p1232>0;0;IF(p1259+p1263+p1264+p1265=1;0;1-(p1259+p1263+p1264+p1265)))
- p2195: 0.000152628; = p2194*p2193
- p3425: 0; = p3368*p1239
- p1867: 0
- p0933: 100492; = p0801*p0927
- p3060: 3.39995e-7; = p2279*p1023
- p0934: 4.32231e-5; = p0928*p0001/(p0818*p0002)
- p1972: 0; = if(p0807=480;p1967*p0001/(p0818*p0002);0)
- p3309: 0; = if(and(p1232=0;p3252<>0);p3252*(p3260-p3304)/p3305;0)
- p0554: 0; = IF(p0290<0.5;-SQRT(p0007*EXP(p0422^2*p0008)-p0007);SQRT(p0007*EXP(p0422^2*p0008)-p0007))
- p2811: 0; = p2420*(p1078+p1080)
- p1204: 0.980791
- p0376: 0.5
- p0607: 0; = IF(p0343<0.5;-SQRT(p0007*EXP(p0475^2*p0008)-p0007);SQRT(p0007*EXP(p0475^2*p0008)-p0007))
- p3422: 0; = p3365*p1239
- p0111: 13.275
- p1592: 0
- p0803: 0
- p2785: 0; = p2394*(p1019+p1021)
- p0808: 0
- p0703: 3498.94; = p0043*(1+p0571*p0175/100)
- p2888: 6.45623e-5; = p2302*(p1079+p1081)
- p3313: 0; = if(and(p1232=0;p3253<>0);p3262*(p3278*(p3282*p1256+p3286*(p1253+p1257)+p1258*p3288+p3298*p3287));0)
- p1866: 0
- p2379: 0; = p2229*p2208
- p2444: 1.92905e-5; = p2248*p1014
- p4704: 1.81742e-8; = p1943*p3481
- p2222: 0.169394; = if(p0765*p0769+p0766*p0770+p0767*p0771+p0768*p0772=0;0;p0769*p0765/(p0765*p0769+p0766*p0770+p0767*p0771+p0768*p0772))
- p2767: 0; = p2376*(p1078+p1080)
- p1056: 3.49956e6; = IF(p1012=0;p1049*p1036;0)
- p2687: 9.97842e-5; = p2296*(p1019+p1021)
- p0552: 0; = IF(p0288<0.5;-SQRT(p0007*EXP(p0420^2*p0008)-p0007);SQRT(p0007*EXP(p0420^2*p0008)-p0007))
- p3621: 4.77184e-7; = p1890*p3476
- p2563: 0; = p2367*p1014
- p0245: 17.211
- p4308: 6.9522e-5; = p1963*p3479
- p2534: 4.35345e-6; = p2338*p1073
- p1345: 1.22283e-5; = IF(p1318=0;p1344*p0001/(p0818*p0002);0)
- p3049: 0; = p2268*p1082
- p2085: 0.0335294
- p2762: 0; = p2371*(p1019+p1021)
- p1046: 0.0263929; = IF(p1012=0;IF(p1037+p1044+p1045=1;0;IF(p1037+p1044+p1045+p1040>1;1-(p1037+p1044+p1045);p1040));0)
- p1387: 11
- p0310: 0.5
- p5337: 0; = p1962*p3484
- p4394: 0; = p1839*p3480
- p1638: 0.732906
- p2560: 0; = p2364*p1014
- p0914: 2.4999e8; = p0825*p0911+(p0830+p0895)*p0824*p0913
- p1009: 5.8824e-8; = p1005*p0001*p0004/(p0818*p0002)
- p2421: 0; = p2235*p2211
- p3193: 0; = p2412*p1023
- p0637: 0; = IF(p0373<0.5;-SQRT(p0007*EXP(p0505^2*p0008)-p0007);SQRT(p0007*EXP(p0505^2*p0008)-p0007))
- p2151: 2.98715e-8; = p2015*p2079*p2113/(p0818*1000)
- p3315: 0; = if(and(p1232=0;p3253<>0);p3264*p3289;0)
- p1317: 0
- p0921: 0.177889; = p0679*1000/p0801
- p0640: 0; = IF(p0376<0.5;-SQRT(p0007*EXP(p0508^2*p0008)-p0007);SQRT(p0007*EXP(p0508^2*p0008)-p0007))
- p0866: 0.0263853; = IF(p0858+p0864+p0865=1;0;IF(p0858+p0864+p0865+p0861>1;1-(p0858+p0864+p0865);p0861))
- p1585: 0
- p2541: 7.96237e-7; = p2345*p1073
- p0195: 0
- p3047: 0; = p2266*p1082
- p1323: 0; = IF(((p0745*1000*p0750/100)+(p0754*1000*p0759/100))/p0801<0;0;((p0745*1000*p0750/100)+(p0754*1000*p0759/100))/p0801)
- p2642: 1.01088e-7; = p2251*(p1019+p1021)
- p2423: 0; = p2235*p2213
- p1216: 0
- p3115: 3.09127e-8; = p2334*p1023
- p0643: 0; = IF(p0379<0.5;-SQRT(p0007*EXP(p0511^2*p0008)-p0007);SQRT(p0007*EXP(p0511^2*p0008)-p0007))
- p0917: 1.32164
- p1708: 0
- p2826: 2.4246e-6; = p2240*(p1020+p1022)
- p3214: 0.376406; = p1222*40.078/100.0869
- p2927: 6.84383e-6; = p2341*(p1079+p1081)
- p2194: 0.214362
- p2802: 0; = p2411*(p1019+p1021)
- p3261: 0
- p1812: 0
- p2724: 9.05226e-6; = p2333*(p1019+p1021)
- p2696: 2.51159e-6; = p2305*(p1078+p1080)
- p3162: 0; = p2381*p1082
- p3263: 0
- p2681: 4.31141e-7; = p2290*(p1019+p1021)
- p2595: 0; = p2399*p1014
- p1844: 0
- p1612: 0
- p4552: 8.1784e-8; = p1791*p3481
- p0792: 0
- p2821: 0; = p2430*(p1128+p1130)
- p1103: 0.655189; = IF(p1071=0;IF(p1096+p1101+p1102=1;0;IF(p1096+p1101+p1102+p1099>1;1-(p1096+p1101+p1102);p1099));0)
- p1556: 0
- p3004: 0; = p2418*(p1079+p1081)
- p2375: 0; = p2229*p2204
- p0316: 0.5
- p1817: 0
- p3114: 2.14787e-7; = p2333*p1023
- p2298: 0.000902406; = p2227*p2205
- p3407: 0; = p3369*p1238
- p3482: 0; = if(p1328+p1330+p1332+p1334+p1336+p1338+p1340+p1342+p1344=0;0;p1340/(p1328+p1330+p1332+p1334+p1336+p1338+p1340+p1342+p1344))
- p0389: 0.5
- p2512: 3.51142e-6; = p2316*p1014
- p2688: 0.000490294; = p2297*(p1078+p1080)
- p0423: 0; = SQRT(2)*(IF((2*p0291-1)<0;-1;IF((2*p0291-1)>0;1;0))*SQRT(SQRT((2/(pi()*0.140012289)+LN(1-(2*p0291-1)^2)/2)^2-LN(1-(2*p0291-1)^2)/0.140012289)-(2/(pi()*0.140012289)+LN(1-(2*p0291-1)^2)/2)))
- p1611: 0
- p2630: 9.754e-7; = p2239*(p1019+p1021)
- p2116: 0.444424
- p2128: 1.49213e-6; = p2015*p2056*p2090/(p0818*1000)
- p0113: 31.532
- p1792: 0
- p3314: 0; = if(and(p1232=0;p3253<>0);p3263*p3289;0)
- p4830: 0; = p1863*p3482
- p0617: 0; = IF(p0353<0.5;-SQRT(p0007*EXP(p0485^2*p0008)-p0007);SQRT(p0007*EXP(p0485^2*p0008)-p0007))
- p0578: 0; = IF(p0314<0.5;-SQRT(p0007*EXP(p0446^2*p0008)-p0007);SQRT(p0007*EXP(p0446^2*p0008)-p0007))
- p0353: 0.5
- p2460: 4.48085e-6; = p2264*p1073
- p1760: 0
- p3161: 0; = p2380*p1082
- p1517: 7
- p3100: 1.8683e-7; = p2319*p1023
- p2929: 3.86961e-5; = p2343*(p1079+p1081)
- p1123: 0.17659; = if(p1121=0;p0717/100;0)
- p3052: 0; = p2271*p1082
- p0035: 7.146
- p1809: 0
- p0079: 1.146
- p3471: 0; = p3376*p1241
- p0776: 20.672; = p0116*(1+p0644*p0248/100)
- p2983: 0; = p2397*(p1020+p1022)
- p2115: 0.856281
- p2663: 0; = p2272*(p1128+p1130)
- p3046: 0; = p2265*p1082
- p3254: 0; = p1252*(p1287*(1-p3247)+p1290*(1-p3248)+p1291*(1-p3249)+p1292*(1-p3250))
- p1953: 0
- p0478: 0; = SQRT(2)*(IF((2*p0346-1)<0;-1;IF((2*p0346-1)>0;1;0))*SQRT(SQRT((2/(pi()*0.140012289)+LN(1-(2*p0346-1)^2)/2)^2-LN(1-(2*p0346-1)^2)/0.140012289)-(2/(pi()*0.140012289)+LN(1-(2*p0346-1)^2)/2)))
- p5176: 2.08924e-7; = p1797*p3484
- p2202: 2.50313e-5; = 4*1.00794*p2201/(2*14.0067)
- p2831: 4.02934e-6; = p2245*(p1020+p1022)
- p2524: 2.60949e-5; = p2328*p1014
- p5282: 1.23386e-6; = p1903*p3484
- p2099: 0.620397
- p0500: 0; = SQRT(2)*(IF((2*p0368-1)<0;-1;IF((2*p0368-1)>0;1;0))*SQRT(SQRT((2/(pi()*0.140012289)+LN(1-(2*p0368-1)^2)/2)^2-LN(1-(2*p0368-1)^2)/0.140012289)-(2/(pi()*0.140012289)+LN(1-(2*p0368-1)^2)/2)))
- p0393: 0.5
- p2405: 0; = p2234*p2195
- p2587: 0; = p2391*p1123
- p3404: 0; = p3366*p1238
- p0288: 0.5
- p0972: 0.0221251; = p0969/p0818
- p2702: 0.000354931; = p2311*(p1128+p1130)
- p2160: 1.2857e-7; = p2015*p2084*p2122/(p0818*1000)
- p4390: 0; = p1835*p3480
- p0845: 0.5
- p2230: 0; = if(p0783*p0787+p0784*p0788+p0785*p0789+p0786*p0790=0;0;p0787*p0783/(p0783*p0787+p0784*p0788+p0785*p0789+p0786*p0790))
- p0780: 12.835; = p0120*(1+p0648*p0252/100)
- p3151: 0; = p2370*p1023
- p2623: 0; = p2427*p1073
- p3453: 0; = p3377*p1240
- p4410: 0; = p1855*p3480
- p3298: 0; = if(p1283+p1284+p1285+p1286=0;0;p1283/(p1283+p1284+p1285+p1286))
- p2556: 0; = p2360*p1014
- p3290: 0
- p1146: 0.907301
- p0701: 0
- p3249: 0
- p0254: 24.011
- p2418: 0; = p2235*p2208
- p2853: 8.28162e-6; = p2267*(p1079+p1081)
- p2166: 0.729335; = p2165*p0824
- p3055: 0; = p2274*p1132
- p0986: 0; = IF(p0982+p0985=1;0;IF(p0982+p0985+p0984>1;1-(p0982+p0985);p0984))
- p2035: 5.93784e-6; = p2015*p2029*(1-p2031)/(p0818*1000)
- p3016: 0; = p2430*(p1129+p1131)
- p3084: 0; = p2303*p1082
- p2672: 7.57108e-6; = p2281*(p1019+p1021)
- p0344: 0.5
- p2759: 0; = p2368*(p1019+p1021)
- p0211: 9.775
- p2858: 0; = p2272*(p1129+p1131)
- p0876: 94987; = p0866*p0856
- p2830: 3.52021e-6; = p2244*(p1020+p1022)
- p1275: 0; = p1271*p1252/p0818
- p2683: 1.55584e-6; = p2292*(p1019+p1021)
- p0756: 0
- p4006: 1.8471e-6; = p1863*p3478
- p1098: 0.0208246
- p0685: 0
- p0028: 8.977
- p2192: 0.000139369; = p1067-p2189-p2190-p2191
- p3080: 0; = p2299*p1082
- p3305: 0; = if(and(p1232=0;p3252<>0);1-(p3301+p3302+p3303+p3304);0)
- p1748: 0
- p0455: 0; = SQRT(2)*(IF((2*p0323-1)<0;-1;IF((2*p0323-1)>0;1;0))*SQRT(SQRT((2/(pi()*0.140012289)+LN(1-(2*p0323-1)^2)/2)^2-LN(1-(2*p0323-1)^2)/0.140012289)-(2/(pi()*0.140012289)+LN(1-(2*p0323-1)^2)/2)))
- p1221: 0.0583196
- p3177: 0; = p2396*p1023
- p1564: 0
- p2599: 0; = p2403*p1014
- p3689: 0; = p1962*p3476
- p1782: 0
- p4596: 1.09045e-7; = p1835*p3481
- p1640: 0
- p2807: 0; = p2416*(p1078+p1080)
- p3457: 0; = p3362*p1241
- p1227: 0.000372324; = IF(p1221=0;0;p1226*p0001/(p0818*p0002))
- p0796: 31.202; = p0136*(1+p0664*p0268/100)
- p1868: 0
- p1033: 0; = IF(p1012=0;p1027*p0001/(p0818*p0002);0)
- p5243: 1.04462e-7; = p1864*p3484
- p2476: 1.74812e-5; = p2280*p1014
- p0518: 0; = SQRT(2)*(IF((2*p0386-1)<0;-1;IF((2*p0386-1)>0;1;0))*SQRT(SQRT((2/(pi()*0.140012289)+LN(1-(2*p0386-1)^2)/2)^2-LN(1-(2*p0386-1)^2)/0.140012289)-(2/(pi()*0.140012289)+LN(1-(2*p0386-1)^2)/2)))
- p1199: -0.29
- p0688: 8.977; = p0028*(1+p0556*p0160/100)
- p0943: 0; = if(and(p0683=0;p0949=0);p0937;0)
- p1575: 0
- p3424: 0; = p3367*p1239
- p2321: 3.01211e-5; = p2224*p2188
- p0156: 34.511
- p0063: 3498.94
- p3444: 0; = p3368*p1240
- p0178: 15.846
- p4458: 0; = p1903*p3480
- p0559: 0; = IF(p0295<0.5;-SQRT(p0007*EXP(p0427^2*p0008)-p0007);SQRT(p0007*EXP(p0427^2*p0008)-p0007))
- p3325: 0; = if(and(p1232=0;p3255<>0);p3267*p3289;0)
- p1942: 0
- p3291: 0
- p2286: 0.000100689; = p2223*p2192
- p4418: 0; = p1863*p3480
- p2041: 2.79925e-6; = p2015*p2040/(p0818*1000)
- p2731: 2.02047e-5; = p2340*(p1078+p1080)
- p4033: 4.03627e-6; = p1890*p3478
- p4964: 0; = p1791*p3483
- p0085: 9053.28
- p0915: 0.0289793; = p0914/p0818
- p1016: 0.34734; = IF(p1012=0;p0707/100;0)
- p1147: 0.0926988
- p0572: 0; = IF(p0308<0.5;-SQRT(p0007*EXP(p0440^2*p0008)-p0007);SQRT(p0007*EXP(p0440^2*p0008)-p0007))
- p1011: 0; = p1010*p0001*p0004/(p0818*p0002)
- p0487: 0; = SQRT(2)*(IF((2*p0355-1)<0;-1;IF((2*p0355-1)>0;1;0))*SQRT(SQRT((2/(pi()*0.140012289)+LN(1-(2*p0355-1)^2)/2)^2-LN(1-(2*p0355-1)^2)/0.140012289)-(2/(pi()*0.140012289)+LN(1-(2*p0355-1)^2)/2)))
- p3061: 1.24819e-6; = p2280*p1023
- p1560: 0
- p2002: 750
- p2713: 3.11399e-6; = p2322*(p1019+p1021)
- p3040: 0; = p2259*p1082
- p2389: 0; = p2233*p2218
- p1006: 1.78422e-6; = p1002*p0001*p0004/(p0818*p0002)
- p1883: 0
- p2931: 2.08532e-6; = p2345*(p1079+p1081)
- p1949: 0
- p3464: 0; = p3369*p1241
- p1800: 0
- p1879: 0
- p0983: 0.862387; = if(p0886=0;0;min(1;(p0695*p0694*1000*p0697/100)/p0886))
- p3456: 0; = p3380*p1240
- p2310: 0.000284229; = p2227*p2217
- p0957: 1.03932e-5; = if(and(p0683>0;or(p0807=56;p0807=100;and(p0807=60;p0901>0.06)));p0939;0)
- p0446: 0; = SQRT(2)*(IF((2*p0314-1)<0;-1;IF((2*p0314-1)>0;1;0))*SQRT(SQRT((2/(pi()*0.140012289)+LN(1-(2*p0314-1)^2)/2)^2-LN(1-(2*p0314-1)^2)/0.140012289)-(2/(pi()*0.140012289)+LN(1-(2*p0314-1)^2)/2)))
- p1705: 0
- p2920: 9.4021e-7; = p2334*(p1020+p1022)
- p1145: 1.1356e7; = if(p1121=0;p0799*p0702*1000*p0800/100;0)
- p0508: 0; = SQRT(2)*(IF((2*p0376-1)<0;-1;IF((2*p0376-1)>0;1;0))*SQRT(SQRT((2/(pi()*0.140012289)+LN(1-(2*p0376-1)^2)/2)^2-LN(1-(2*p0376-1)^2)/0.140012289)-(2/(pi()*0.140012289)+LN(1-(2*p0376-1)^2)/2)))
- p2752: 0; = p2361*(p1019+p1021)
- p2283: 4.32248e-5; = p2223*p2189
- p2961: 0; = p2375*(p1079+p1081)
- p0931: 640402; = p0801*p0925
- p0709: 0
- p0717: 17.659; = p0057*(1+p0585*p0189/100)
- p2533: 1.34438e-5; = p2337*p1073
- p1244: 0; = if(p1232>0;0;p1239*(p0725/100)*p0723*1000)
- p2431: 0; = p2236*p2221
- p0642: 0; = IF(p0378<0.5;-SQRT(p0007*EXP(p0510^2*p0008)-p0007);SQRT(p0007*EXP(p0510^2*p0008)-p0007))
- p3690: 1.95091e-5; = p1963*p3476
- p1976: 0.089
- p2798: 0; = p2407*(p1019+p1021)
- p2313: 8.84189e-5; = p2231*p2220
- p2879: 0.000101801; = p2293*(p1020+p1022)
- p0669: 33.8523; = p0009*(1+p0537*p0141/100)
- p2965: 0; = p2379*(p1079+p1081)
- p0962: 0; = if(and(p0683>0;or(p0807=480;p0807=32;p0807=1;and(p0807=60;p0901<0.03)));p0938;0)
- p0002: 0.453592
- p2057: 3.28794
- p2107: 0.881623
- p2129: 2.21152e-6; = p2015*p2057*p2091/(p0818*1000)
- p0656: 0; = IF(p0392<0.5;-SQRT(p0007*EXP(p0524^2*p0008)-p0007);SQRT(p0007*EXP(p0524^2*p0008)-p0007))
- p2923: 3.52089e-5; = p2337*(p1079+p1081)
- p0290: 0.5
- p2218: 0.000991514; = p1150/p0818
- p1265: 0; = if(p1232>0;0;IF(p1259+p1263+p1264=1;0;IF(p1259+p1263+p1264+p1262>1;1-(p1259+p1263+p1264);p1262)))
- p3066: 1.42088e-7; = p2285*p1023
- p3402: 0; = p3364*p1238
- p5174: 1.66533e-8; = p1795*p3484
- p2387: 0; = p2229*p2216
- p2249: 2.58543e-5; = p2222*p2195
- p2464: 5.93961e-6; = p2268*p1073
- p2047: 5.38317e-14; = p2015*p2045/(p0818*1000000000000)
- p3674: 1.61757e-8; = p1943*p3476
- p3034: 8.65558e-9; = p2253*p1023
- p0806: 1.43775e8
- p1833: 0
- p3570: 7.27908e-8; = p1839*p3476
- p3145: 0; = p2364*p1023
- p0138: 31.532
- p0482: 0; = SQRT(2)*(IF((2*p0350-1)<0;-1;IF((2*p0350-1)>0;1;0))*SQRT(SQRT((2/(pi()*0.140012289)+LN(1-(2*p0350-1)^2)/2)^2-LN(1-(2*p0350-1)^2)/0.140012289)-(2/(pi()*0.140012289)+LN(1-(2*p0350-1)^2)/2)))
- p0468: 0; = SQRT(2)*(IF((2*p0336-1)<0;-1;IF((2*p0336-1)>0;1;0))*SQRT(SQRT((2/(pi()*0.140012289)+LN(1-(2*p0336-1)^2)/2)^2-LN(1-(2*p0336-1)^2)/0.140012289)-(2/(pi()*0.140012289)+LN(1-(2*p0336-1)^2)/2)))
- p1679: 0
- p2316: 2.19546e-5; = p2224*p2183
- p3093: 2.783e-5; = p2312*p1132
- p2513: 2.06925e-7; = p2317*p1014
- p2994: 0; = p2408*(p1020+p1022)
- p1327: 0.0328433; = if(p1318=0;if(p1327a=0;1;if(p1327a<0;0;p1327a));0)
- p3312: 0; = if(and(p1232=0;p3253<>0);p3261*p3277*(p3298*p3290+(1-p3298)*p3294);0)
- p2494: 0.000126824; = p2298*p1073
- p0272: 24.011
- p1660: 0.731714
- p1694: 0
- p4686: 6.36098e-8; = p1925*p3481
- p3452: 0; = p3376*p1240
- p5307: 1.51394e-7; = p1928*p3484
- p1913: 0
- p0878: 525465; = p0867*p0856
- p2394: 0; = p2234*p2183
- p1368: 152
- p3006: 0; = p2420*(p1079+p1081)
- p2084: 0.21
- p3340: 0; = if(and(p1232=0;p3254<>0);p3254*(p3270-p3335)/p3338;0)
- p1860: 0
- p0865: 0; = IF(p0858+p0864=1;0;IF(p0858+p0864+p0860>1;1-(p0858+p0864);p0860))
- p3498: 6.09825e-6; = p1767*p3476
- p2603: 0; = p2407*p1014
- p0902: 0
- p1984: 30
- p0935: 0.000159673; = p0929*p0001/(p0818*p0002)
- p2707: 1.05668e-5; = p2316*(p1019+p1021)
- p2149: 6.60697e-8; = p2015*p2077*p2111/(p0818*1000)
- p1004: 0; = p1000*p0888
- p1970: 3.6e6; = p0801
- p4922: 0; = p1955*p3482
- p2941: 0; = p2355*(p1020+p1022)
- p0367: 0.5
- p0947: 0; = if(and(p0683=0;or(p0807=480;p0807=32;p0807=1;and(p0807=60;p0901<0.03)));p0935;0)
- p2742: 7.28824e-5; = p2351*(p1128+p1130)
- p2536: 5.77865e-6; = p2340*p1073
- p1210: 0.46
- p1191: 0.5
- p3168: 0; = p2387*p1082
- p1846: 0
- p3397: 0; = p3378*p1234
- p2596: 0; = p2400*p1014
- p1039: 0.0667372
- p1917: 0
- p1158: 0.00440503; = p1156*p1157
- p0373: 0.5
- p3364: 0; = if(p1232=0;p3244*p3358/p0818;0)
- p1630: 0
- p0912: 0
- p3401: 0; = p3363*p1238
- p0952: 4.32231e-5; = if(and(p0683>0;or(p0807=56;p0807=100;and(p0807=60;p0901>0.06)));p0934;0)
- p1718: 0
- p0453: 0; = SQRT(2)*(IF((2*p0321-1)<0;-1;IF((2*p0321-1)>0;1;0))*SQRT(SQRT((2/(pi()*0.140012289)+LN(1-(2*p0321-1)^2)/2)^2-LN(1-(2*p0321-1)^2)/0.140012289)-(2/(pi()*0.140012289)+LN(1-(2*p0321-1)^2)/2)))
- p4204: 2.22791e-5; = p1855*p3479
- p3125: 0; = p2344*p1082
- p0412: 0; = SQRT(2)*(IF((2*p0280-1)<0;-1;IF((2*p0280-1)>0;1;0))*SQRT(SQRT((2/(pi()*0.140012289)+LN(1-(2*p0280-1)^2)/2)^2-LN(1-(2*p0280-1)^2)/0.140012289)-(2/(pi()*0.140012289)+LN(1-(2*p0280-1)^2)/2)))
- p3147: 0; = p2366*p1023
- p0377: 0.5
- p0145: 0
- p2569: 0; = p2373*p1014
- p3143: 0; = p2362*p1023
- p0939: 1.03932e-5; = p0933*p0001/(p0818*p0002)
- p1018: 0; = IF(p1012=0;p0709/100;0)
- p0159: 10.497
- p0823: 0
- p3219: 0.0302349; = p3215*p1228
- p1898: 0
- p0908: 0.00297304
- p2938: 5.03066e-6; = p2352*(p1129+p1131)
- p0726: 0
- p0868: 0; = IF(p0858+p0864+p0865+p0866+p0867=1;0;IF(p0858+p0864+p0865+p0866+p0867+p0863>1;1-(p0858+p0864+p0865+p0866+p0867);p0863))
- p1165: 0.000372324; = p0801*p0001/(p0818*p0002)
- p2235: 0; = 1-(p2226+p2227+p2228+p2229)
- p2602: 0; = p2406*p1014
- p2141: 3.1206e-7; = p2015*p2069*p2103/(p0818*1000)
- p2570: 0; = p2374*p1014
- p3078: 0; = p2297*p1082
- p0537: 0; = IF(p0273<0.5;-SQRT(p0007*EXP(p0405^2*p0008)-p0007);SQRT(p0007*EXP(p0405^2*p0008)-p0007))
- p0790: 0
- p2005: 6.31768e6; = p1963*p0818+p1959*1000+p1170+p1176+p1182
- p0128: 50.434
- p1084: 542143; = IF(p1071=0;p1078*(p0710/100)*p0703*1000;0)
- p2376: 0; = p2229*p2205
- p3779: 0; = p1842*p3477
- p3484: 0.01306; = IF(p1344=0;0;p1344/(p1328+p1330+p1332+p1334+p1336+p1338+p1340+p1342+p1344))
- p0752: 0
- p3255: 0; = p1252*(p1297*(1-p3247)+p1300*(1-p3248)+p1301*(1-p3249)+p1302*(1-p3250))
- p0863: 0; = p0675*1000/p0856
- p5338: 3.65184e-6; = p1963*p3484
- p2244: 1.01348e-5; = p2222*p2189
- p0904: 8.48595e8; = p0825*p0901+(p0830+p0895)*p0824*p0903
- p2825: 7.03917e-7; = p2239*(p1020+p1022)
- p3065: 5.65021e-7; = p2284*p1023
- p1070: 0.000891593; = IF(p1012=0;p1056/(p1063*p0818);0)
- p0375: 0.5
- p2432: 0.00440503; = p1158
- p0400: 0.5
- p1785: 0
- p0538: 0; = IF(p0274<0.5;-SQRT(p0007*EXP(p0406^2*p0008)-p0007);SQRT(p0007*EXP(p0406^2*p0008)-p0007))
- p0388: 0.5
- p2863: 5.09462e-5; = p2277*(p1020+p1022)
- p3274: 0
- p0243: 38.554
- p2991: 0; = p2405*(p1020+p1022)
- p2391: 0; = p2233*p2220
- p3054: 0; = p2273*p1132
- p1197: 1.806
- p3480: 0; = if(p1328+p1330+p1332+p1334+p1336+p1338+p1340+p1342+p1344=0;0;p1336/(p1328+p1330+p1332+p1334+p1336+p1338+p1340+p1342+p1344))
- p2592: 0; = p2396*p1014
- p1572: 0.0125
- p1258: 0; = if(p1232>0;0;IF(p1253+p1256+p1257=1;0;1-(p1253+p1256+p1257)))
- p3385: 0; = p3366*p1234
- p1993: 400
- p1577: 0
- p2463: 3.16217e-6; = p2267*p1073
- p3070: 1.24479e-5; = p2289*p1023
- p2336: 0.000105767; = p2228*p2204
- p2070: 0.282
- p2647: 2.04079e-6; = p2256*(p1019+p1021)
- p2913: 5.73291e-6; = p2327*(p1020+p1022)
- p1875: 0
- p2997: 0; = p2411*(p1020+p1022)
- p1557: 0
- p3713: 0; = p1776*p3477
- p2689: 0.000443433; = p2298*(p1078+p1080)
- p3416: 0; = p3378*p1238
- p1983: 50
- p0742: 97.317; = p0082*(1+p0610*p0214/100)
- p3205: 0; = p2424*p1082
- p2567: 0; = p2371*p1014
- p2979: 0; = p2393*(p1020+p1022)
- p2716: 7.25382e-6; = p2325*(p1019+p1021)
- p3373: 0; = if(p1232=0;p3245*p3361/p0818;0)
- p0439: 0; = SQRT(2)*(IF((2*p0307-1)<0;-1;IF((2*p0307-1)>0;1;0))*SQRT(SQRT((2/(pi()*0.140012289)+LN(1-(2*p0307-1)^2)/2)^2-LN(1-(2*p0307-1)^2)/0.140012289)-(2/(pi()*0.140012289)+LN(1-(2*p0307-1)^2)/2)))
- p3117: 0; = p2336*p1082
- p3371: 0; = if(p1232=0;p3245*p3359/p0818;0)
- p1263: 0; = if(p1232>0;0;IF(p1259=1;0;IF(p1259+p1260>1;1-p1259;p1260)))
- p2245: 1.16006e-5; = p2222*p2190
- p4514: 0; = p1963*p3480
- p1052: 1.30506e6; = IF(p1012=0;p1045*p1036;0)
- p0699: 0
- p2908: 2.24728e-6; = p2322*(p1020+p1022)
- p2953: 0; = p2367*(p1020+p1022)
- p1709: 0
- p1211: 0.6
- p5234: 1.17028e-6; = p1855*p3484
- p4277: 2.88217e-6; = p1928*p3479
- p2966: 0; = p2380*(p1079+p1081)
- p2693: 8.61936e-5; = p2302*(p1078+p1080)
- p0859: 0.0277219; = p0671*1000/p0856
- p2118: 0.679049
- p1727: 0
- p1054: 6.14217e6; = IF(p1012=0;p1047*p1036;0)
- p1118: 0.000482439; = IF(p1071=0;p1108/(p1113*p0818);0)
- p1904: 0
- p1177: 0.000372324; = p0801*p0001/(p0818*p0002)
- p3410: 0; = p3372*p1238
- p0708: 0
- p0392: 0.5
- p3427: 0; = p3370*p1239
- p0314: 0.5
- p3131: 2.87767e-6; = p2350*p1132
- p0664: 0; = IF(p0400<0.5;-SQRT(p0007*EXP(p0532^2*p0008)-p0007);SQRT(p0007*EXP(p0532^2*p0008)-p0007))
- p2594: 0; = p2398*p1014
- p0051: 14.054
- p4968: 0; = p1795*p3483
- p2736: 2.784e-6; = p2345*(p1078+p1080)
- p2933: 1.47813e-5; = p2347*(p1079+p1081)
- p3420: 0; = p3363*p1239
- p0350: 0.5
- p1279: 0
- p1878: 0
- p0691: 8.42; = p0031*(1+p0559*p0163/100)
- p2593: 0; = p2397*p1014
- p3686: 5.89606e-6; = p1955*p3476
- p0890: 0; = p0686*1000*p0687*p0885/100
- p2198: 2.0351e-6; = 22.98976928*p2197/14.0067
- p2577: 0; = p2381*p1073
- p0570: 0; = IF(p0306<0.5;-SQRT(p0007*EXP(p0438^2*p0008)-p0007);SQRT(p0007*EXP(p0438^2*p0008)-p0007))
- p1988: 750
- p1322: 0.625255; = IF(((p0745*1000*p0749/100)+(p0754*1000*p0758/100))/p0801<0;0;((p0745*1000*p0749/100)+(p0754*1000*p0758/100))/p0801)
- p3978: 8.20935e-7; = p1835*p3478
- p2091: 0.374844
- p2373: 0; = p2225*p2202
- p3206: 0; = p2425*p1082
- p2443: 3.7759e-6; = p2247*p1014
- p2722: 2.32881e-7; = p2331*(p1019+p1021)
- p0600: 0; = IF(p0336<0.5;-SQRT(p0007*EXP(p0468^2*p0008)-p0007);SQRT(p0007*EXP(p0468^2*p0008)-p0007))
- p1963g: 1.64777e-5; = p1667*p1871+p1668*p1872+p1669*p1873+p1670*p1874+p1671*p1875+p1672*p1876+p1673*p1877+p1674*p1878+p1675*p1879+p1676*p1880+p1677*p1881+p1678*p1882+p1679*p1883+p1680*p1884+p1681*p1885+p1682*p1886+p1683*p1887+p1684*p1888+p1685*p1889
- p3009: 0; = p2423*(p1079+p1081)
- p1724: 0.797375
- p3446: 0; = p3370*p1240
- p3240: 3.34087e-9; = p3234*p1188*p3235/p0818
- p2352: 1.28839e-5; = p2232*p2220
- p2351: 0.000177706; = p2232*p2219
- p2181: 205.307; = p0887+p0889+p0893+p2180
- p1885: 0
- p2036: 8.77167e-6; = p2015*p2030*(1-p2032)/(p0818*1000)
- p2502: 7.51143e-6; = p2306*p1073
- p2951: 0; = p2365*(p1020+p1022)
- p0841: 0.0788022
- p0687: 7.371; = p0027*(1+p0555*p0159/100)
- p0609: 0; = IF(p0345<0.5;-SQRT(p0007*EXP(p0477^2*p0008)-p0007);SQRT(p0007*EXP(p0477^2*p0008)-p0007))
- p1664: 0
- p0672: 0
- p0707: 34.734; = p0047*(1+p0575*p0179/100)
- p1282: 0; = IF(p1277+p1280+p1281=p1260;0;p1260-(p1277+p1280+p1281))
- p2361: 0; = p2225*p2189
- p2843: 1.68842e-5; = p2257*(p1020+p1022)
- p0269: 5.502
- p3368: 0; = if(p1232=0;p3245*p3356/p0818;0)
- p1835: 1.39106e-6; = p1427*1000/p0818
- p0046: 48.13
- p2894: 0.000139441; = p2308*(p1079+p1081)
- p2875: 0.000378604; = p2289*(p1020+p1022)
- p2529: 3.00814e-6; = p2333*p1014
- p3288: 0
- p1206: 0.03829
- p1886: 0
- p0696: 0
- p1270: 0; = IF(p1267=p1259;0;IF(p1267+p1268>p1259;p1259-p1267;p1268))
- p0297: 0.5
- p0976: 0; = IF(p0687=0;IF(OR(p0686=0;p0689=0);0;p0686*1000*p0689/100);0)
- p2277: 0.000146675; = p2223*p2183
- p2029: 6.19
- p0973: 2.37046e8; = p0967+p0968+p0969
- p0852: 0; = p0847*p0851^3+p0848*p0851^2+p0849*p0851+p0850
- p0834: 0.00059
- p2872: 3.49734e-5; = p2286*(p1020+p1022)
- p2967: 0; = p2381*(p1079+p1081)
- p5015: 0; = p1842*p3483
- p1289: 0
- p3341: 0; = if(and(p1232=0;p3254<>0);p3254*(p3271-p3336)/p3338;0)
- p2221: 0.000176038; = p1155-p2220
- p2715: 8.96347e-7; = p2324*(p1019+p1021)
- p1212: 0.0806364; = if(p1211=0;0;if(p1193>0;0;(p1207+p1208+p1209)*p1210/(2000*p1211)))
- p2411: 0; = p2234*p2201
- p2320: 2.35456e-6; = p2224*p2187
- p2992: 0; = p2406*(p1020+p1022)
- p1338: 709686; = p1324*p0801
- p3217: 0.00756574; = p3213*p1228
- p2907: 1.04623e-5; = p2321*(p1020+p1022)
- p3264: 0
- p2674: 2.08041e-5; = p2283*(p1019+p1021)
- p1828: 0
- p0416: 0; = SQRT(2)*(IF((2*p0284-1)<0;-1;IF((2*p0284-1)>0;1;0))*SQRT(SQRT((2/(pi()*0.140012289)+LN(1-(2*p0284-1)^2)/2)^2-LN(1-(2*p0284-1)^2)/0.140012289)-(2/(pi()*0.140012289)+LN(1-(2*p0284-1)^2)/2)))
- p2766: 0; = p2375*(p1078+p1080)
- p1292: 0; = IF(p1287+p1290+p1291=p1261;0;p1261-(p1287+p1290+p1291))
- p2135: 1.44608e-6; = p2015*p2063*p2097/(p0818*1000)
- p2721: 1.05922e-7; = p2330*(p1019+p1021)
- p0783: 0
- p2777: 0; = p2386*(p1078+p1080)
- p1253: 0; = if(p1232>0;0;p0735/100)
- p0731: 0
- p0720: 0
- p2866: 3.79637e-5; = p2280*(p1020+p1022)
- p2206: 0.000446219; = 9*1.00794*p2204/30.973762
- p1080: 0; = IF(p1071=0;IF(p1073+p1078+p1079=1;0;IF(p1073+p1078+p1079+p1076>1;1-(p1073+p1078+p1079);p1076));0)
- p1861: 0
- p1723: 0
- p2874: 3.83007e-5; = p2288*(p1020+p1022)
- p1711: 0
- p5062: 0; = p1889*p3483
- p1110: 5.10947e6; = IF(p1071=0;p1105*p1104*p1095;0)
- p2138: 1.38557e-7; = p2015*p2066*p2100/(p0818*1000)
- p1320: 0; = IF(((p0745*1000*p0747/100)+(p0754*1000*p0756/100))/p0801<0;0;((p0745*1000*p0747/100)+(p0754*1000*p0756/100))/p0801)
- p1681: 0
- p1318: 0; = p1317*p0001/(p0818*p0002)
- p3146: 0; = p2365*p1023
- p2574: 0; = p2378*p1073
- p2437: 4.09874e-6; = p2241*p1014
- p2573: 0; = p2377*p1073
- p1926: 0
- p0926: 0.0321244; = IF(p0918+p0923+p0924+p0925=1;0;IF(p0918+p0923+p0924+p0925+p0922>1;1-(p0918+p0923+p0924+p0925);p0922))
- p2837: 7.29523e-8; = p2251*(p1020+p1022)
- p0427: 0; = SQRT(2)*(IF((2*p0295-1)<0;-1;IF((2*p0295-1)>0;1;0))*SQRT(SQRT((2/(pi()*0.140012289)+LN(1-(2*p0295-1)^2)/2)^2-LN(1-(2*p0295-1)^2)/0.140012289)-(2/(pi()*0.140012289)+LN(1-(2*p0295-1)^2)/2)))
- p1859: 0
- p0887: 186.877; = 1000*p0886*p0001*p0003*p0004/(p0818*p0002)
- p2031: 0.465411
- p2217: 0.000434014; = p1118-p2216
- p1002: 679198; = p0996*p0888
- p2697: 2.62633e-5; = p2306*(p1078+p1080)
- p2905: 5.68246e-6; = p2319*(p1020+p1022)
- p3165: 0; = p2384*p1082
- p3400: 0; = p3362*p1238
- p5146: 1.14151e-6; = p1767*p3484
- p5131: 0; = p1962*p3483
- p2765: 0; = p2374*(p1019+p1021)
- p3201: 0; = p2420*p1082
- p0163: 10.694
- p2124: 0.263965
- p3094: 2.01772e-6; = p2313*p1132
- p0426: 0; = SQRT(2)*(IF((2*p0294-1)<0;-1;IF((2*p0294-1)>0;1;0))*SQRT(SQRT((2/(pi()*0.140012289)+LN(1-(2*p0294-1)^2)/2)^2-LN(1-(2*p0294-1)^2)/0.140012289)-(2/(pi()*0.140012289)+LN(1-(2*p0294-1)^2)/2)))
- p2356: 0; = p2225*p2184
- p2343: 0.000105133; = p2228*p2211
- p0124: 25.25
- p2440: 1.62095e-6; = p2244*p1014
- p3023: 4.212e-8; = p2242*p1023
- p2750: 0; = p2359*(p1019+p1021)
- p2393: 0; = p2234*p2182
- p1272: 0; = IF(p1267+p1270+p1271=p1259;0;p1259-(p1267+p1270+p1271))
- p2740: 1.48052e-5; = p2349*(p1078+p1080)
- p1035: 1.28944e-6; = IF(p1012=0;p1029*p0001/(p0818*p0002);0)
- p2011: 0.00167079
- p0748: 59.015; = p0088*(1+p0616*p0220/100)
- p3304: 0; = if(and(p1232=0;p3252<>0);p3260*p3289;0)
- p3333: 0; = if(and(p1232=0;p3255<>0);p3255-(p3328+p3329+p3330+p3331+p3332);0)
- p1769: 0
- p1637: 0
- p3190: 0; = p2409*p1023
- p2452: 6.78171e-7; = p2256*p1014
- p3595: 5.58063e-7; = p1864*p3476
- p2392: 0; = p2233*p2221
- p1583: 0
- p0896: 0.497045
- p3594: 2.18372e-7; = p1863*p3476
- p3398: 0; = p3379*p1234
- p1957: 0
- p0981: 0; = p0978*p0001/(p0818*p0002)
- p1726: 0
- p1979: 2.37046e8; = p0973
- p1237: 0; = if(p1232>0;0;p0729/100)
- p1757: 0
- p1330: 0; = p1320*p0801
- p1763: 0
- p1060: 0.21
- p2651: 6.04508e-5; = p2260*(p1078+p1080)
- p3892: 0; = p1955*p3477
- p1871: 0
- p0223: 32.973
- p1745: 0
- p2786: 0; = p2395*(p1019+p1021)
- p0008: 0.0739645; = (p0007-1.5)/(p0007-1)^2
- p2906: 8.17834e-7; = p2320*(p1020+p1022)
- p3135: 0; = p2354*p1023
- p0991: 81264.8; = p0987*p0886
- p2046: 10
- p0112: 15.445
- p0984: 0; = if(p0886=0;0;min(1;(p0699*p0698*1000*p0701/100)/p0886))
- p2559: 0; = p2363*p1014
- p2746: 0; = p2355*(p1019+p1021)
- p1200: 0.84
- p1161: 3.6e6; = p0801
- p2795: 0; = p2404*(p1019+p1021)
- p2768: 0; = p2377*(p1078+p1080)
- p3443: 0; = p3367*p1240
- p2172: 0.368587; = p2166-(p2167+p2168+p2169+p2170)
- p1287: 0
- p3321: 0; = if(and(p1232=0;p3253<>0);IF((p3317+p3318+p3319+p3320)+(p3253*(p3261*(1-p3277))/p3316)>p3253;p3253-(p3317+p3318+p3319+p3320);p3253*(p3261*(1-p3277))/p3316);0)
- p2119: 0.679049
- p2522: 1.23149e-5; = p2326*p1014
- p1336: 0; = p1323*p0801
- p2685: 6.04768e-5; = p2294*(p1019+p1021)
- p2523: 2.63984e-6; = p2327*p1014
- p1805: 0
- p3024: 5.38827e-7; = p2243*p1023
- p2565: 0; = p2369*p1014
- p0680: 417.924; = p0020*(1+p0548*p0152/100)
- p2066: 0.109412
- p3220: 0.00402424; = p3216*p1228
- p2319: 1.63599e-5; = p2224*p2186
- p0294: 0.5
- p2014: 1.72683e7; = p0833*p2011*p2013
- p1934: 0
- p2271: 0.000119655; = p2226*p2217
- p2784: 0; = p2393*(p1019+p1021)
- p2628: 7.54041e-5; = p2237*(p1019+p1021)
- p0719: 39.046; = p0059*(1+p0587*p0191/100)
- p3105: 2.1268e-8; = p2324*p1023
- p1856: 0
- p2345: 5.66556e-6; = p2228*p2213
- p2264: 3.18831e-5; = p2226*p2210
- p1140: 2.32016e-5; = if(p1121=0;p1134*p0001/(p0818*p0002);0)
- p4895: 0; = p1928*p3482
- p0174: 0
- p1743: 0
- p1130: 0; = if(p1121=0;IF(p1123+p1128+p1129=1;0;IF(p1123+p1128+p1129+p1126>1;1-(p1123+p1128+p1129);p1126));0)
- p2427: 0; = p2235*p2217
- p1305: 0; = p1301*p1252/p0818
- p2892: 1.96722e-5; = p2306*(p1079+p1081)
- p1719: 0
- p2108: 0.826583
- p0033: 56.928
- p2406: 0; = p2234*p2196
- p3396: 0; = p3377*p1234
- p1069: 7.74937e-6; = IF(p1012=0;p1055/(p1062*p0818);0)
- p1114: 0.216028
- p2253: 7.57931e-7; = p2222*p2199
- p2898: 0.000476184; = p2312*(p1129+p1131)
- p2539: 1.47753e-5; = p2343*p1073
- p1893: 0
- p2383: 0; = p2229*p2212
- p2686: 8.70398e-6; = p2295*(p1019+p1021)
- p2153: 2.91936e-9; = p2015*p2081*p2115/(p0818*1000)
- p3077: 2.36762e-6; = p2296*p1023
- p0286: 0.5
- p1922: 0
- p4949: 0; = p1776*p3483
- p3459: 0; = p3364*p1241
- p2103: 0.912485
- p2232: 0.127182; = if(p0783*p0787+p0784*p0788+p0785*p0789+p0786*p0790=0;0;p0789*p0785/(p0783*p0787+p0784*p0788+p0785*p0789+p0786*p0790))
- p2090: 0.40001
- p2551: 0; = p2355*p1014
- p0292: 0.5
- p3360: 0; = if(p1232=0;p3310+p3321+p3332+p3343+p3354;0)
- p3293: 0
- p1796: 0
- p2747: 0; = p2356*(p1019+p1021)
- p1076: 0; = IF(p1071=0;p0714/100;0)
- p4689: 9.08712e-7; = p1928*p3481
- p2026: 68.85
- p2446: 4.08759e-5; = p2250*p1014
- p1327a: 0.0328433; = (p0745*1000/p0801)*(1-(p0746+p0747+p0748+p0749+p0750+p0751+p0752+p0753)/100)+(p0754*1000/p0801)*(1-(p0755+p0756+p0757+p0758+p0759+p0760+p0761+p0762)/100)
- p1082: 0; = IF(p1071=0;IF(p1073+p1078+p1079+p1080+p1081=1;0;1-(p1073+p1078+p1079+p1080+p1081));0)
- p1155: 0.000277341; = if(p1153*p0818=0;0;p1151/(p1153*p0818))
- p0407: 0; = SQRT(2)*(IF((2*p0275-1)<0;-1;IF((2*p0275-1)>0;1;0))*SQRT(SQRT((2/(pi()*0.140012289)+LN(1-(2*p0275-1)^2)/2)^2-LN(1-(2*p0275-1)^2)/0.140012289)-(2/(pi()*0.140012289)+LN(1-(2*p0275-1)^2)/2)))
- p3421: 0; = p3364*p1239
- p1627: 0
- p0753: 0

- p1176: 476.766; = p1175*p0801
- p2212: 7.80471e-6; = p1106/p0818
- p3436: 0; = p3379*p1239
- p0837: 0.5
- p3412: 0; = p3374*p1238
- p2169: 0.00216834; = p2166*(p0908)
- p2471: 0; = p2275*p1123
- p3191: 0; = p2410*p1023
- p0861: 0.0263853; = p0673*1000/p0856
- p2374: 0; = p2225*p2203
- p2220: 0.000101303; = p1151/p0818
- p3363: 0; = if(p1232=0;p3244*p3357/p0818;0)
- p3381: 0; = p3362*p1234
- p1149: 0.830148
- p0812: 0; = if(p0807=480;0.095/0.34;0)
- p4734: 0; = p1767*p3482
- p0042: 3498.94
- p2214: 0.000153296; = p1107/p0818
- p0503: 0; = SQRT(2)*(IF((2*p0371-1)<0;-1;IF((2*p0371-1)>0;1;0))*SQRT(SQRT((2/(pi()*0.140012289)+LN(1-(2*p0371-1)^2)/2)^2-LN(1-(2*p0371-1)^2)/0.140012289)-(2/(pi()*0.140012289)+LN(1-(2*p0371-1)^2)/2)))
- p2601: 0; = p2405*p1014
- p1902: 0
- p3342: 0; = if(and(p1232=0;p3254<>0);p3254*(p3272-p3337)/p3338;0)
- p1051: 103206; = IF(p1012=0;p1044*p1036;0)
- p1111: 0.0872841
- p1170: 1736.09; = p1169*p0801
- p0424: 0; = SQRT(2)*(IF((2*p0292-1)<0;-1;IF((2*p0292-1)>0;1;0))*SQRT(SQRT((2/(pi()*0.140012289)+LN(1-(2*p0292-1)^2)/2)^2-LN(1-(2*p0292-1)^2)/0.140012289)-(2/(pi()*0.140012289)+LN(1-(2*p0292-1)^2)/2)))
- p2003: 50
- p1964: 0.5
- p2328: 0.000163154; = p2224*p2196
- p1940: 0
- p1219: 0; = if(p1218=0;0;SQRT(2)*(IF((2*p1218-1)<0;-1;IF((2*p1218-1)>0;1;0))*SQRT(SQRT((2/(pi()*0.140012289)+LN(1-(2*p1218-1)^2)/2)^2-LN(1-(2*p1218-1)^2)/0.140012289)-(2/(pi()*0.140012289)+LN(1-(2*p1218-1)^2)/2))))
- p1603: 0
- p0001: 0.404686
- p2611: 0; = p2415*p1073
- p4600: 8.1784e-8; = p1839*p3481
- p0735: 0
- p0281: 0.5
- p2578: 0; = p2382*p1073
- p2637: 1.40407e-6; = p2246*(p1019+p1021)
- p1007: 0; = p1003*p0001*p0004/(p0818*p0002)
- p3448: 0; = p3372*p1240
- p2704: 3.62632e-5; = p2313*(p1128+p1130)
- p0862: 0.145962; = p0674*1000/p0856
- p2618: 0; = p2422*p1073
- p0940: 0; = if(and(p0683=0;p0946=0);p0934;0)
- p2662: 5.87973e-5; = p2271*(p1078+p1080)
- p2199: 4.47437e-6; = p1069-p2197-p2198
- p2812: 0; = p2421*(p1078+p1080)
- p2861: 0; = p2275*(p1129+p1131)
- p1068: 0.00237337; = IF(p1012=0;p1054/(p1061*p0818);0)
- p2365: 0; = p2225*p2193
- p0158: 16.586
- p2775: 0; = p2384*(p1078+p1080)
- p0850: 0
- p0241: 29.872
- p1869: 0
- p1032: 3.92185e-5; = IF(p1012=0;p1026*p0001/(p0818*p0002);0)
- p1563: 0.693253
- p1764: 0
- p1057: 0.82
- p1777: 0
- p1739: 0.583082
- p0440: 0; = SQRT(2)*(IF((2*p0308-1)<0;-1;IF((2*p0308-1)>0;1;0))*SQRT(SQRT((2/(pi()*0.140012289)+LN(1-(2*p0308-1)^2)/2)^2-LN(1-(2*p0308-1)^2)/0.140012289)-(2/(pi()*0.140012289)+LN(1-(2*p0308-1)^2)/2)))
- p0763: 3498.94; = p0103*(1+p0631*p0235/100)
- p1245: 0; = if(p1232>0;0;p1240*(p0725/100)*p0723*1000)
- p2659: 2.07675e-5; = p2268*(p1078+p1080)
- p2900: 5.99937e-5; = p2314*(p1129+p1131)
- p3265: 0
- p0125: 9.853
- p2157: 7.5259e-8; = p2015*p2086*p2119/(p0818*1000)
- p3141: 0; = p2360*p1023
- p4046: 5.57552e-5; = p1903*p3478
- p0800: 15.633; = p0140*(1+p0668*p0272/100)
- p1214: 0; = IF(p1213=0;0;p1213-1)
- p4101: 0; = p1962*p3478
- p1736: 0
- p1359: 754
- p0877: 0.0982386; = p0876*p0001*p0003/(p0818*p0002)
- p2025: 4.2318e-6; = p2015*p2023*p2024/(p0818*1000)
- p3017: 0; = p2431*(p1129+p1131)
- p3192: 0; = p2411*p1023
- p0429: 0; = SQRT(2)*(IF((2*p0297-1)<0;-1;IF((2*p0297-1)>0;1;0))*SQRT(SQRT((2/(pi()*0.140012289)+LN(1-(2*p0297-1)^2)/2)^2-LN(1-(2*p0297-1)^2)/0.140012289)-(2/(pi()*0.140012289)+LN(1-(2*p0297-1)^2)/2)))
- p1721: 0.5
- p2279: 2.97718e-5; = p2223*p2185
- p0141: 79.2972
- p1239: 0; = if(p1232>0;0;IF(p1234+p1238=1;0;IF(p1234+p1238+p1236>1;1-(p1234+p1238);p1236)))
- p3586: 6.25192e-6; = p1855*p3476
- p1141: 2.20888e-5; = if(p1121=0;p1135*p0001/(p0818*p0002);0)
- p2496: 0.000340992; = p2300*p1073
- p2588: 0; = p2392*p1123
- p0256: 42.611
- p2008: 0.0130523; = ((p1982*p1985+p1988*p1991+p1994*p1997+p2002*p2005)/p0818)*p0005*p0002/1000
- p2489: 4.68762e-5; = p2293*p1014
- p2461: 5.86786e-5; = p2265*p1073
- p3475: 0; = p3380*p1241
- p0459: 0; = SQRT(2)*(IF((2*p0327-1)<0;-1;IF((2*p0327-1)>0;1;0))*SQRT(SQRT((2/(pi()*0.140012289)+LN(1-(2*p0327-1)^2)/2)^2-LN(1-(2*p0327-1)^2)/0.140012289)-(2/(pi()*0.140012289)+LN(1-(2*p0327-1)^2)/2)))
- p5036: 0; = p1863*p3483
- p3007: 0; = p2421*(p1079+p1081)
- p3175: 0; = p2394*p1023
- p3173: 0; = p2392*p1132
- p3064: 4.93627e-7; = p2283*p1023
- p0586: 0; = IF(p0322<0.5;-SQRT(p0007*EXP(p0454^2*p0008)-p0007);SQRT(p0007*EXP(p0454^2*p0008)-p0007))
- p0371: 0.5
- p2355: 0; = p2225*p2183
- p1786: 0
- p0928: 417924; = p0801*p0918
- p1157: 0.235526
- p1014: 0.15994; = IF(p1012=0;p0705/100;0)
- p2636: 5.58335e-6; = p2245*(p1019+p1021)
- p2292: 3.23258e-6; = p2223*p2199
- p1558: 0
- p1010: 0; = p0890
- p0857: 3.72324; = p0856*p0001*p0003/(p0818*p0002)
- p0767: 11.616; = p0107*(1+p0635*p0239/100)
- p1291: 0; = IF(p1287+p1290=p1264;0;IF(p1287+p1290+p1289>p1264;p1264-(p1287+p1290);p1289))
- p3203: 0; = p2422*p1082
- p2590: 0; = p2394*p1014
- p1203: 3
- p0941: 0; = if(and(p0683=0;p0947=0);p0935;0)
- p1720: 0
- p0781: 0
- p3090: 0; = p2309*p1082
- p2733: 3.94498e-6; = p2342*(p1078+p1080)
- p3236: 0.0140975
- p1277: 0
- p1999: 6.12354e8; = (p1228+p1229)*p0818+p1164
- p1923: 0
- p0370: 0.5
- p0736: 0
- p1078: 0.49139; = IF(p1071=0;IF(p1073=1;0;IF(p1073+p1074>1;1-p1073;p1074));0)
- p1293: 0; = p1287*p1252/p0818
- p3032: 2.39856e-9; = p2251*p1023
- p4098: 4.98718e-5; = p1955*p3478
- p0086: 6.977
- p2911: 5.23487e-6; = p2325*(p1020+p1022)
- p0505: 0; = SQRT(2)*(IF((2*p0373-1)<0;-1;IF((2*p0373-1)>0;1;0))*SQRT(SQRT((2/(pi()*0.140012289)+LN(1-(2*p0373-1)^2)/2)^2-LN(1-(2*p0373-1)^2)/0.140012289)-(2/(pi()*0.140012289)+LN(1-(2*p0373-1)^2)/2)))
- p0217: 6.121
- p0122: 15.633
- p1909: 0
- p1124: 0.41013; = if(p1121=0;p0718/100;0)
- p0477: 0; = SQRT(2)*(IF((2*p0345-1)<0;-1;IF((2*p0345-1)>0;1;0))*SQRT(SQRT((2/(pi()*0.140012289)+LN(1-(2*p0345-1)^2)/2)^2-LN(1-(2*p0345-1)^2)/0.140012289)-(2/(pi()*0.140012289)+LN(1-(2*p0345-1)^2)/2)))
- p2474: 1.38243e-6; = p2278*p1014
- p2106: 0.856281
- p1933: 0
- p2844: 0.000154605; = p2258*(p1079+p1081)
- p0879: 0.543453; = p0878*p0001*p0003/(p0818*p0002)
- p0807: 60
- p2717: 3.70586e-5; = p2326*(p1019+p1021)
- p0795: 17.912; = p0135*(1+p0663*p0267/100)
- p2454: 5.90326e-5; = p2258*p1073
- p3376: 0; = if(p1232=0;p3246*p3358/p0818;0)
- p2581: 0; = p2385*p1073
- p1579: 0
- p2679: 5.30723e-5; = p2288*(p1019+p1021)
- p2605: 0; = p2409*p1014
- p2097: 0.40001
- p3423: 0; = p3366*p1239
- p3934: 6.15702e-7; = p1791*p3478
- p1601: 0
- p1013: 0; = p1012*p0001/(p0818*p0002)
- p0704: 31.202; = p0044*(1+p0572*p0176/100)
- p2408: 0; = p2234*p2198
- p3069: 1.25927e-6; = p2288*p1023
- p5221: 1.36255e-8; = p1842*p3484
- p3296: 0
- p0162: 34.098
- p0146: 0
- p0959: 0; = if(and(p0683>0;or(p0807=480;p0807=32;p0807=1;and(p0807=60;p0901<0.03)));p0935;0)
- p1328: 631647; = p1319*p0801
- p0765: 9.705; = p0105*(1+p0633*p0237/100)
- p2290: 8.95785e-7; = p2223*p2197
- p3295: 0
- p1684: 0
- p2018: 0.1978
- p2133: 7.12877e-7; = p2015*p2061*p2095/(p0818*1000)
- p2774: 0; = p2383*(p1078+p1080)
- p3417: 0; = p3379*p1238
- p3062: 1.79642e-7; = p2281*p1023
- p0922: 0.0321244; = p0677*1000/p0801
- p0220: 7.24
- p2210: 0.000115647; = 6*1.00794*p2208/30.973762
- p0809: 0
- p1987: 400
- p2252: 3.44733e-7; = p2222*p2198
- p0864: 0.0277219; = IF(p0858=1;0;IF(p0858+p0859>1;1-p0858;p0859))
- p1042: 0.000546963
- p2790: 0; = p2399*(p1019+p1021)
- p3050: 0; = p2269*p1082
- p0805: 0
- p2306: 5.34469e-5; = p2227*p2213
- p3294: 0
- p2542: 1.4956e-6; = p2346*p1073
- p1193: 0; = IF(OR(p1036=0;p1095=0);0.0001*p0857;0)
- p0284: 0.5
- p0671: 99.799; = p0011*(1+p0539*p0143/100)
- p1092: 0; = IF(p1071=0;p1086*p0001/(p0818*p0002);0)
- p0536: 0; = SQRT(2)*(IF((2*p0404-1)<0;-1;IF((2*p0404-1)>0;1;0))*SQRT(SQRT((2/(pi()*0.140012289)+LN(1-(2*p0404-1)^2)/2)^2-LN(1-(2*p0404-1)^2)/0.140012289)-(2/(pi()*0.140012289)+LN(1-(2*p0404-1)^2)/2)))
- p1329: 6.5327e-5; = p1328*p0001/(p0818*p0002)
- p2369: 0; = p2225*p2198
- p2779: 0; = p2388*(p1078+p1080)
- p0770: 56.698; = p0110*(1+p0638*p0242/100)
- p1040: 0.0263929
- p4856: 0; = p1889*p3482
- p3391: 0; = p3372*p1234
- p1656: 0
- p3352: 0; = if(and(p1232=0;p3256<>0);p3256*(p3275-p3347)/p3349;0)
- p0380: 0.5
- p0855: 1.38893; = p0854*p0001*p0003/(p0818*p0002)
- p1578: 0
- p2132: 4.50871e-7; = p2015*p2060*p2094/(p0818*1000)
- p0764: 31.202; = p0104*(1+p0632*p0236/100)
- p1682: 0
- p0574: 0; = IF(p0310<0.5;-SQRT(p0007*EXP(p0442^2*p0008)-p0007);SQRT(p0007*EXP(p0442^2*p0008)-p0007))
- p2457: 0.000143551; = p2261*p1073
- p2109: 0.826583
- p4513: 0; = p1962*p3480
- p2178: 0.0314446; = (p0895*p0831/(1-p0831))/(p0818)
- p4238: 8.32946e-6; = p1889*p3479
- p2694: 3.72156e-5; = p2303*(p1078+p1080)
- p4292: 5.76433e-8; = p1943*p3479
- p3207: 0; = p2426*p1082
- p0250: 30.393
- p0818: 8.6265e9; = p0806*p0807
- p2312: 0.00121955; = p2231*p2219
- p2531: 4.96331e-6; = p2335*p1014
- p1041: 0.314094
- p1290: 0; = IF(p1287=p1264;0;IF(p1287+p1288>p1264;p1264-p1287;p1288))
- p2367: 0; = p2225*p2196
- p3182: 0; = p2401*p1023
- p0713: 36.807; = p0053*(1+p0581*p0185/100)
- p3303: 0; = if(and(p1232=0;p3252<>0);p3259*p3289;0)
- p0971: 0; = p0968/p0818
- p1339: 7.33981e-5; = p1338*p0001/(p0818*p0002)
- p0724: 0
- p2547: 3.1381e-5; = p2351*p1123
- p2650: 0.000186677; = p2259*(p1078+p1080)
- p0797: 41.662; = p0137*(1+p0665*p0269/100)
- p1945: 0
- p0562: 0; = IF(p0298<0.5;-SQRT(p0007*EXP(p0430^2*p0008)-p0007);SQRT(p0007*EXP(p0430^2*p0008)-p0007))
- p1061: 0.3
- p1645: 0
- p3474: 0; = p3379*p1241
- p1008: 0; = p1004*p0001*p0004/(p0818*p0002)
- p2055: 5.59471
- p3048: 0; = p2267*p1082
- p2514: 7.1274e-7; = p2318*p1014
- p2470: 0; = p2274*p1123
- p0531: 0; = SQRT(2)*(IF((2*p0399-1)<0;-1;IF((2*p0399-1)>0;1;0))*SQRT(SQRT((2/(pi()*0.140012289)+LN(1-(2*p0399-1)^2)/2)^2-LN(1-(2*p0399-1)^2)/0.140012289)-(2/(pi()*0.140012289)+LN(1-(2*p0399-1)^2)/2)))
- p1811: 0
- p0916: 0.298109; = p0826+(p0832*(1+p0894))/p0818
- p0894: 0.19
- p2564: 0; = p2368*p1014
- p2239: 2.02659e-6; = p2222*p2184
- p0944: 0; = if(and(p0683=0;p0950=0);p0938;0)
- p2323: 7.40572e-6; = p2224*p2190
- p2990: 0; = p2404*(p1020+p1022)
- p2143: 2.40659e-7; = p2015*p2071*p2105/(p0818*1000)
- p2657: 1.05733e-6; = p2266*(p1078+p1080)
- p1218: 0
- p2049: 25.6942
- p3289: 0
- p0650: 0; = IF(p0386<0.5;-SQRT(p0007*EXP(p0518^2*p0008)-p0007);SQRT(p0007*EXP(p0518^2*p0008)-p0007))
- p3256: 0; = p1252*(p1307*(1-p3247)+p1310*(1-p3248)+p1311*(1-p3249)+p1312*(1-p3250))
- p1566: 0
- p2788: 0; = p2397*(p1019+p1021)
- p0698: 0
- p2884: 0.000332149; = p2298*(p1079+p1081)
- p1839: 1.0433e-6; = p1431*1000/p0818
- p0648: 0; = IF(p0384<0.5;-SQRT(p0007*EXP(p0516^2*p0008)-p0007);SQRT(p0007*EXP(p0516^2*p0008)-p0007))
- p1963j: 1.35184e-7; = p1725*p1929+p1726*p1930+p1727*p1931+p1728*p1932+p1729*p1933+p1730*p1934+p1731*p1935+p1732*p1936+p1733*p1937+p1734*p1938+p1735*p1939+p1736*p1940+p1737*p1941+p1738*p1942+p1739*p1943+p1740*p1944+p1741*p1945+p1742*p1946+p1743*p1947
- p2550: 0; = p2354*p1014
- p1116: 8.94173e-5; = IF(p1071=0;p1106/(p1111*p0818);0)
- p3418: 0; = p3380*p1238
- p2430: 0; = p2236*p2220
- p2179: 0.0274788; = p0970+p0971+p0972
- p0667: 0; = IF(p0403<0.5;-SQRT(p0007*EXP(p0535^2*p0008)-p0007);SQRT(p0007*EXP(p0535^2*p0008)-p0007))
- p1053: 516120; = IF(p1012=0;p1046*p1036;0)
- p4086: 1.36823e-7; = p1943*p3478
- p1960: 0; = IF(p1959-p1958<0;0;p1959-p1958)
- p1299: 0
- p2204: 0.00152358; = p1109/p0818
- p0813: 0; = if(p0807=480;1.56521739130435;0)
- p1599: 0
- p2552: 0; = p2356*p1014
- p3083: 0; = p2302*p1082
- p1836: 0
- p1314: 0; = p1310*p1252/p0818
- p1087: 0; = IF(p1071=0;p1081*(p0710/100)*p0703*1000;0)
- p0822: 0.898833
- p0802: 3.55e6
- p1732: 0
- p1626: 0
- p0682: 3499.51; = p0022*(1+p0550*p0154/100)
- p2548: 2.27517e-6; = p2352*p1123
- p2609: 0; = p2413*p1014
- p1847: 0
- p0327: 0.5
- p3174: 0; = p2393*p1023
- p4068: 4.78879e-7; = p1925*p3478
- p1075: 0.36807; = IF(p1071=0;p0713/100;0)
- p2216: 4.84257e-5; = p1108/p0818
- p2703: 0.000500172; = p2312*(p1128+p1130)
- p2079: 0.02
- p0674: 525.465; = p0014*(1+p0542*p0146/100)
- p3013: 0; = p2427*(p1079+p1081)
- p2998: 0; = p2412*(p1020+p1022)
- p0838: 6.74457e9; = (p0833-p0836)*p0837
- p1198: 0.44
- p0903: 0.0257527
- p2815: 0; = p2424*(p1078+p1080)
- p3827: 0; = p1890*p3477
- p3163: 0; = p2382*p1082
- p1142: 0; = if(p1121=0;p1136*p0001/(p0818*p0002);0)
- p3234: 0.39606; = 1-p3233
- p2000: 4000
- p1707: 0
- p1072: 0; = p1071*p0001/(p0818*p0002)
- p1735: 0
- p0954: 8.08417e-5; = if(and(p0683>0;or(p0807=56;p0807=100;and(p0807=60;p0901>0.06)));p0936;0)
- p3187: 0; = p2406*p1023
- p0420: 0; = SQRT(2)*(IF((2*p0288-1)<0;-1;IF((2*p0288-1)>0;1;0))*SQRT(SQRT((2/(pi()*0.140012289)+LN(1-(2*p0288-1)^2)/2)^2-LN(1-(2*p0288-1)^2)/0.140012289)-(2/(pi()*0.140012289)+LN(1-(2*p0288-1)^2)/2)))
- p0732: 14.301; = p0072*(1+p0600*p0204/100)
- p0793: 0
- p0404: 0.5
- p2705: 6.3016e-5; = p2314*(p1128+p1130)
- p1003: 0; = p0999*p0888
- p2045: 30
- p1771: 0
- p3213: 0.112803; = p1222*12.0107/100.0869
- p3985: 6.15702e-7; = p1842*p3478
- p1153: 0.365265
- p0729: 0
- p2836: 8.87698e-5; = p2250*(p1020+p1022)
- p1625: 0
- p2613: 0; = p2417*p1073
- p1635: 0.921542
- p1790: 0
- p2069: 0.190588
- p3394: 0; = p3375*p1234
- p0542: 0; = IF(p0278<0.5;-SQRT(p0007*EXP(p0410^2*p0008)-p0007);SQRT(p0007*EXP(p0410^2*p0008)-p0007))
- p1884: 0
- p1586: 0
- p2814: 0; = p2423*(p1078+p1080)
- p3218: 0.0252458; = p3214*p1228
- p1946: 0
- p2051: 4.38952e-5; = p2015*p2049*p2050/(p0818*1000)
- p2154: 2.27513e-7; = p2015*p2082*p2116/(p0818*1000)
- p0378: 0.5
- p0785: 9.853; = p0125*(1+p0653*p0257/100)
- p3428: 0; = p3371*p1239
- p1295: 0; = p1291*p1252/p0818
- p2358: 0; = p2225*p2186
- p1686: 0.505026
- p1959: 3902.84; = if(p0738*p0740*p0739>0;p0738*1000*(p0740/100)*p0739/1000;p1958)
- p0853: 0; = p0803/(p0802+p0803)
- p1090: 5.60702e-5; = IF(p1071=0;p1084*p0001/(p0818*p0002);0)
- p1294: 0; = p1290*p1252/p0818
- p1675: 0
- p3449: 0; = p3373*p1240
- p0937: 6.62325e-5; = p0931*p0001/(p0818*p0002)
- p0189: 47.021
- p1962: 0; = p1960*1000/p0818
- p2094: 0.922577
- p3367: 0; = if(p1232=0;p3244*p3361/p0818;0)
- p3467: 0; = p3372*p1241
- p2719: 7.85262e-5; = p2328*(p1019+p1021)
- p3982: 6.15702e-7; = p1839*p3478
- p1963a: 6.05938e-5; = p1550*p1754+p1551*p1755+p1552*p1756+p1553*p1757+p1554*p1758+p1555*p1759+p1556*p1760+p1557*p1761+p1558*p1762+p1559*p1763+p1560*p1764+p1561*p1765+p1562*p1766+p1563*p1767+p1564*p1768+p1565*p1769+p1566*p1770+p1567*p1771+p1568*p1772
- p3158: 0; = p2377*p1082
- p3348: 0; = if(and(p1232=0;p3256<>0);p3276*p3289;0)
- p1104: 0.254708; = IF(p1071=0;IF(p1096+p1101+p1102+p1103=1;0;1-(p1096+p1101+p1102+p1103));0)
- p0321: 0.5
- p3128: 0; = p2347*p1082
- p3144: 0; = p2363*p1023
- p3335: 0; = IF(or(p3254=0;p1232>0);0;p3270*(p3280*(p3283*p1256+p3286*(p1253+p1257)+p1258*p3288+p3300*p3287)))
- p1703: 0
- p1655: 0
- p1015: 0.4813; = IF(p1012=0;p0706/100;0)
- p1865: 0
- p0739: 1.146; = p0079*(1+p0607*p0211/100)
- p2754: 0; = p2363*(p1019+p1021)
- p0716: 15.633; = p0056*(1+p0584*p0188/100)
- p0037: 98.338
- p1587: 0.799395
- p2436: 1.11646e-6; = p2240*p1014
- p3172: 0; = p2391*p1132
- p0741: 1.127; = p0081*(1+p0609*p0213/100)
- p0584: 0; = IF(p0320<0.5;-SQRT(p0007*EXP(p0452^2*p0008)-p0007);SQRT(p0007*EXP(p0452^2*p0008)-p0007))
- p1083: 155056; = IF(p1071=0;p1073*(p0710/100)*p0703*1000;0)
- p2397: 0; = p2234*p2186
- p1297: 0
- p1710: 0
- p1590: 0
- p1254: 0; = if(p1232>0;0;p0736/100)
- p2575: 0; = p2379*p1073
- p1702: 0
- p0733: 0
- p4822: 0; = p1855*p3482
- p0532: 0; = SQRT(2)*(IF((2*p0400-1)<0;-1;IF((2*p0400-1)>0;1;0))*SQRT(SQRT((2/(pi()*0.140012289)+LN(1-(2*p0400-1)^2)/2)^2-LN(1-(2*p0400-1)^2)/0.140012289)-(2/(pi()*0.140012289)+LN(1-(2*p0400-1)^2)/2)))
- p1659: 0.735543
- p0929: 1.54388e6; = p0801*p0923
- p1713: 0
- p1636: 0
- p0668: 0; = IF(p0404<0.5;-SQRT(p0007*EXP(p0536^2*p0008)-p0007);SQRT(p0007*EXP(p0536^2*p0008)-p0007))
- p1300: 0; = IF(p1297=p1265;0;IF(p1297+p1298>p1265;p1265-p1297;p1298))
- p2060: 0.272353
- p0382: 0.5
- p0261: 44.424
- p3122: 0; = p2341*p1082
- p0961: 0; = if(and(p0683>0;or(p0807=480;p0807=32;p0807=1;and(p0807=60;p0901<0.03)));p0937;0)
- p0374: 0.5
- p5012: 0; = p1839*p3483
- p1666: 0
- p3430: 0; = p3373*p1239
- p1174: 1.00626e-7; = p1170*p1173/p0818
- p3328: 0; = if(and(p1232=0;p3255<>0);p3255*(p3265*p3277-p3323)/p3327;0)
- p5008: 0; = p1835*p3483
- p1966: 3.55e6; = if(p0814=0;p0802;0)
- p3230: 2.01251e-7; = p1170/p0818
- p0980: 0; = IF(p0977=0;0;p0977*p0001/(p0818*p0002))
- p0541: 0; = IF(p0277<0.5;-SQRT(p0007*EXP(p0409^2*p0008)-p0007);SQRT(p0007*EXP(p0409^2*p0008)-p0007))
- p1729: 0
- p0474: 0; = SQRT(2)*(IF((2*p0342-1)<0;-1;IF((2*p0342-1)>0;1;0))*SQRT(SQRT((2/(pi()*0.140012289)+LN(1-(2*p0342-1)^2)/2)^2-LN(1-(2*p0342-1)^2)/0.140012289)-(2/(pi()*0.140012289)+LN(1-(2*p0342-1)^2)/2)))
- p3185: 0; = p2404*p1023
- p1144: 1.29096e-6; = if(p1121=0;p1138*p0001/(p0818*p0002);0)
- p2001: 400
- p2422: 0; = p2235*p2212
- p4743: 0; = p1776*p3482
- p1982: 750
- p2087: 0.856281
- p3136: 0; = p2355*p1023
- p0923: 0.428854; = IF(p0918=1;0;IF(p0918+p0919>1;1-p0918;p0919))
- p3051: 0; = p2270*p1082
- p1179: 0.5
- p2943: 0; = p2357*(p1020+p1022)
- p3938: 7.52524e-7; = p1795*p3478
- p1997: 2.84161e7; = (if(p1152=0;0;p1150/p1152)+if(p1153=0;0;p1151/p1153))*(1+p1157)
- p1683: 0
- p0535: 0; = SQRT(2)*(IF((2*p0403-1)<0;-1;IF((2*p0403-1)>0;1;0))*SQRT(SQRT((2/(pi()*0.140012289)+LN(1-(2*p0403-1)^2)/2)^2-LN(1-(2*p0403-1)^2)/0.140012289)-(2/(pi()*0.140012289)+LN(1-(2*p0403-1)^2)/2)))
- p2062: 3.76588
- p0734: 0
- p1037: 0.407994
- p2580: 0; = p2384*p1073
- p1774: 0
- p1321: 1.48411; = IF(((p0745*1000*p0748/100)+(p0754*1000*p0757/100))/p0801<0;0;((p0745*1000*p0748/100)+(p0754*1000*p0757/100))/p0801)
- p0697: 98.338; = p0037*(1+p0565*p0169/100)
- p2944: 0; = p2358*(p1020+p1022)
- p2817: 0; = p2426*(p1078+p1080)
- p1283: 0; = p1277*p1252/p0818
- p3311: 0; = if(and(p1232=0;p3252<>0);p3252-(p3306+p3307+p3308+p3309+p3310);0)
- p1918: 0
- p3211: 0; = p2430*p1132
- p1766: 0
- p0715: 0
- p1335: 0.000232797; = p1334*p0001/(p0818*p0002)
- p2207: 0.00370492; = p1119-p2205-p2204-p2206
- p1954: 0
- p1186: 2.83564e-8; = p1182*p1185/p0818
- p3282: 0
- p1077: 0; = IF(p1071=0;p0715/100;0)
- p2829: 1.63885e-5; = p2243*(p1020+p1022)
- p0026: 1060.29
- p0842: -0.073175
- p1921: 0
- p1573: 0
- p3350: 0; = if(and(p1232=0;p3256<>0);p3256*(p3273*p3277-p3345)/p3349;0)
- p0317: 0.5
- p1128: 0.41013; = if(p1121=0;IF(p1123=1;0;IF(p1123+p1124>1;1-p1123;p1124));0)
- p3110: 1.53122e-9; = p2329*p1023
- p0260: 25.616
- p2177: 0.1375; = p0895/p0818-(p2173+p2174+p2175+p2176)
- p1085: 406086; = IF(p1071=0;p1079*(p0710/100)*p0703*1000;0)
- p1568: 0
- p0901: 0.0656776
- p2019: 0.13105
- p3134: 5.10914e-7; = p2353*p1132
- p1131: 0; = if(p1121=0;IF(p1123+p1128+p1129+p1130=1;0;IF(p1123+p1128+p1129+p1130+p1127>1;1-(p1123+p1128+p1129+p1130);p1127));0)
- p0632: 0; = IF(p0368<0.5;-SQRT(p0007*EXP(p0500^2*p0008)-p0007);SQRT(p0007*EXP(p0500^2*p0008)-p0007))
- p2626: 0; = p2430*p1123
- p2954: 0; = p2368*(p1020+p1022)
- p1185: 0.5
- p1799: 0
- p0019: 640.402
- p2969: 0; = p2383*(p1079+p1081)
- p1333: 0.000552569; = p1332*p0001/(p0818*p0002)
- p2723: 2.11145e-5; = p2332*(p1019+p1021)
- p1649: 0
- p3166: 0; = p2385*p1082
- p2555: 0; = p2359*p1014
- p2985: 0; = p2399*(p1020+p1022)
- p1692: 0
- p2262: 0.000163294; = p2226*p2208
- p0860: 0; = p0672*1000/p0856
- p1798: 0
- p2403: 0; = p2234*p2192
- p1977: 616.182; = p1252+p1188
- p1196: 0.59
- p0999: 0; = IF(p0996=1;0;IF(p0996+p0997>1;1-p0996;p0997))
- p2009: 0.0221459; = ((p1983*p1985+p1989*p1991+p1995*p1997+p2003*p2005+p1976*p1977+p1978*p1979+p1998*p1999)/p0818)*p0005*p0002/1000
- p0974: 0.5
- p4252: 2.34896e-5; = p1903*p3479
- p1969: 0; = p0803
- p1901: 0
- p0686: 1060.29; = p0026*(1+p0554*p0158/100)
- p0430: 0; = SQRT(2)*(IF((2*p0298-1)<0;-1;IF((2*p0298-1)>0;1;0))*SQRT(SQRT((2/(pi()*0.140012289)+LN(1-(2*p0298-1)^2)/2)^2-LN(1-(2*p0298-1)^2)/0.140012289)-(2/(pi()*0.140012289)+LN(1-(2*p0298-1)^2)/2)))
- p1093: 0; = IF(p1071=0;p1087*p0001/(p0818*p0002);0)
- p3280: 0
- p2242: 3.68827e-6; = p2222*p2187
- p2558: 0; = p2362*p1014
- p3356: 0; = if(p1232=0;p3306+p3317+p3328+p3339+p3350;0)
- p1643: 0
- p2976: 0; = p2390*(p1129+p1131)
- p2416: 0; = p2235*p2206
- p1151: 873889; = if(p1121=0;p1149*p1148*p1145;0)
- p0235: 0
- p1101: 0.0659222; = IF(p1071=0;IF(p1096=1;0;IF(p1096+p1097>1;1-p1096;p1097));0)
- p2677: 4.84617e-5; = p2286*(p1019+p1021)
- p2491: 2.8924e-6; = p2295*p1014
- p3028: 2.69606e-7; = p2247*p1023
- p0702: 3498.94; = p0042*(1+p0570*p0174/100)
- p3153: 0; = p2372*p1023
- p4032: 1.97709e-5; = p1889*p3478
- p2886: 0.000893049; = p2300*(p1079+p1081)
- p2909: 2.5723e-6; = p2323*(p1020+p1022)
- p2006: 0.069089; = ((p1980*p1985+p1986*p1991+p1992*p1997+p2000*p2005)/p0818)*p0005*p0002/1000
- p0403: 0.5
- p2668: 7.05949e-5; = p2277*(p1019+p1021)
- p2537: 2.61317e-6; = p2341*p1073
- p2016: 0.000207384; = (p2014-p2015)/(p0818)
- p2420: 0; = p2235*p2210
- p0727: 0
- p1907: 0
- p2562: 0; = p2366*p1014
- p2971: 0; = p2385*(p1079+p1081)
- p0613: 0; = IF(p0349<0.5;-SQRT(p0007*EXP(p0481^2*p0008)-p0007);SQRT(p0007*EXP(p0481^2*p0008)-p0007))
- p3447: 0; = p3371*p1240
- p4350: 0; = p1795*p3480
- p3454: 0; = p3378*p1240
- p0301: 0.5
- p3225: 0.000574896; = p3221*p1229
- p0759: 0
- p0646: 0; = IF(p0382<0.5;-SQRT(p0007*EXP(p0514^2*p0008)-p0007);SQRT(p0007*EXP(p0514^2*p0008)-p0007))
- p2993: 0; = p2407*(p1020+p1022)
- p2281: 1.57305e-5; = p2223*p2187
- p3332: 0; = if(and(p1232=0;p3255<>0);IF((p3328+p3329+p3330+p3331)+(p3255*(p3265*(1-p3277))/p3327)>p3255;p3255-(p3328+p3329+p3330+p3331);p3255*(p3265*(1-p3277))/p3327);0)
- p4140: 2.59395e-7; = p1791*p3479
- p3149: 0; = p2368*p1023
- p3124: 0; = p2343*p1082
- p0257: 40.28
- p2469: 0; = p2273*p1123
- p3463: 0; = p3368*p1241
- p3099: 5.08909e-8; = p2318*p1023
- p4483: 0; = p1928*p3480
- p4558: 1.25402e-6; = p1797*p3481
- p3323: 0; = if(and(p1232=0;p3255<>0);p3265*p3277*(p3299*p3291+(1-p3299)*p3295);0)
- p0666: 0; = IF(p0402<0.5;-SQRT(p0007*EXP(p0534^2*p0008)-p0007);SQRT(p0007*EXP(p0534^2*p0008)-p0007))
- p0184: 18.425
- p2429: 0; = p2236*p2219
- p1814: 0
- p3142: 0; = p2361*p1023
- p1207: 26.1172; = if(p1193>0;0;(p1194*p1050/p1057+p1195*p1051/p1058+p1196*p1052/p1059+p1197*p1053/p1060+p1198*p1054/p1061+p1199*p1055/p1062+p1200*p1056/p1063)/(p0702*1000)+(p1201*p1109/p1114+p1202*p1110/p1115)/(p0702*1000)+p1203*p1170/p0801+p1204*p1176/p0801)
- p2937: 6.93869e-5; = p2351*(p1129+p1131)
- p0930: 781659; = p0801*p0924
- p2517: 4.81757e-6; = p2321*p1014
- p2854: 1.55557e-5; = p2268*(p1079+p1081)
- p0129: 18.833
- p3104: 8.45733e-8; = p2323*p1023
- p2607: 0; = p2411*p1014
- p3526: 8.89666e-8; = p1795*p3476
- p1247: 0; = if(p1232>0;0;p1242*p0001/(p0818*p0002))
- p0018: 1543.88
- p2834: 4.18929e-5; = p2248*(p1020+p1022)
- p3272: 0
- p0811: 0; = if(p0807=480;1-p0810;0)
- p3337: 0; = IF(or(p3254=0;p1232>0);0;p3272*p3289)
- p3198: 0; = p2417*p1082
- p0993: 1.6116e-5; = p0989*p0001*p0004/(p0818*p0002)
- p0960: 0; = if(and(p0683>0;or(p0807=480;p0807=32;p0807=1;and(p0807=60;p0901<0.03)));p0936;0)
- p1431: 9
- p2501: 7.18327e-7; = p2305*p1073
- p3181: 0; = p2400*p1023
- p2673: 9.68543e-5; = p2282*(p1019+p1021)
- p2658: 1.10563e-5; = p2267*(p1078+p1080)
- p1150: 8.5533e6; = if(p1121=0;p1149*p1146*p1145;0)
- p2528: 7.01651e-6; = p2332*p1014
- p2289: 0.00109001; = p2223*p2196
- p0899: 9.86272e9; = p0825*p0896+(p0830+p0895)*p0824*p0898
- p2363: 0; = p2225*p2191
- p0007: 14; = p0006-1
- p0875: 0; = p0874*p0001*p0003/(p0818*p0002)
- p1947: 0
- p3355: 0; = if(and(p1232=0;p3256<>0);p3256-(p3350+p3351+p3352+p3353+p3354);0)
- p3800: 0; = p1863*p3477
- p3358: 0; = if(p1232=0;p3308+p3319+p3330+p3341+p3352;0)
- p2727: 5.19728e-5; = p2336*(p1078+p1080)
- p3283: 0
- p0516: 0; = SQRT(2)*(IF((2*p0384-1)<0;-1;IF((2*p0384-1)>0;1;0))*SQRT(SQRT((2/(pi()*0.140012289)+LN(1-(2*p0384-1)^2)/2)^2-LN(1-(2*p0384-1)^2)/0.140012289)-(2/(pi()*0.140012289)+LN(1-(2*p0384-1)^2)/2)))
- p2867: 5.46383e-6; = p2281*(p1020+p1022)
- p0160: 51.607
- p1762: 0
- p1939: 0
- p1243: 0; = if(p1232>0;0;p1238*(p0725/100)*p0723*1000)
- p2117: 0.585147
- p3020: 2.31437e-8; = p2239*p1023
- p1963e: 2.42161e-6; = p1628*p1832+p1629*p1833+p1630*p1834+p1631*p1835+p1632*p1836+p1633*p1837+p1634*p1838+p1635*p1839+p1636*p1840+p1637*p1841+p1638*p1842+p1639*p1843+p1640*p1844+p1641*p1845+p1642*p1846+p1643*p1847+p1644*p1848+p1645*p1849+p1646*p1850
- p4116: 2.17315e-5; = p1767*p3479
- p1821: 0
- p3462: 0; = p3367*p1241
- p1100: 0.254708
- p2737: 5.22928e-6; = p2346*(p1078+p1080)
- p2241: 2.56267e-5; = p2222*p2186
- p3461: 0; = p3366*p1241
- p2484: 1.76364e-5; = p2288*p1014
- p2946: 0; = p2360*(p1020+p1022)
- p2237: 0.000156668; = p2222*p2182
- p2585: 0; = p2389*p1123
- p0580: 0; = IF(p0316<0.5;-SQRT(p0007*EXP(p0448^2*p0008)-p0007);SQRT(p0007*EXP(p0448^2*p0008)-p0007))
- p1552: 0
- p0016: 781.659
- p2112: 0.856281
- p2608: 0; = p2412*p1014
- p3057: 7.63071e-6; = p2276*p1023
- p2732: 9.13681e-6; = p2341*(p1078+p1080)
- p2554: 0; = p2358*p1014
- p1250: 0; = if(p1232>0;0;p1245*p0001/(p0818*p0002))
- p1824: 0
- p3285: 0
- p2824: 1.19452e-5; = p2238*(p1020+p1022)
- p1249: 0; = if(p1232>0;0;p1244*p0001/(p0818*p0002))
- p0043: 3498.94
- p1641: 0
- p0581: 0; = IF(p0317<0.5;-SQRT(p0007*EXP(p0449^2*p0008)-p0007);SQRT(p0007*EXP(p0449^2*p0008)-p0007))
- p0402: 0.5
- p1992: 3900
- p2729: 1.52216e-5; = p2338*(p1078+p1080)
- p0840: 0.080999; = p0839*p0831
- p1973: 0; = if(p0807=480;p1968*p0001/(p0818*p0002);0)
- p0884: 8.977; = IF(p0689=100;0;IF(p0689+p0688>100;100-p0689;p0688))
- p2538: 1.12828e-6; = p2342*p1073
- p2862: 0.000232088; = p2276*(p1020+p1022)
- p2105: 0.888194
- p1841: 0
- p1609: 0
- p2110: 0.856281
- p1202: 0.7
- p3197: 0; = p2416*p1082
- p3386: 0; = p3367*p1234
- p0476: 0; = SQRT(2)*(IF((2*p0344-1)<0;-1;IF((2*p0344-1)>0;1;0))*SQRT(SQRT((2/(pi()*0.140012289)+LN(1-(2*p0344-1)^2)/2)^2-LN(1-(2*p0344-1)^2)/0.140012289)-(2/(pi()*0.140012289)+LN(1-(2*p0344-1)^2)/2)))
- p3120: 0; = p2339*p1082
- p0831: 0.1036; = 1-p0824
- p4322: 0; = p1767*p3480
- p4603: 8.1784e-8; = p1842*p3481
- p2895: 1.16727e-5; = p2309*(p1079+p1081)
- p2261: 0.00102143; = p2226*p2207
- p5155: 2.30119e-7; = p1776*p3484
- p2425: 0; = p2235*p2215
- p2294: 0.000125653; = p2223*p2201
- p4806: 0; = p1839*p3482
- p3620: 2.33739e-6; = p1889*p3476
- p2855: 5.87021e-5; = p2269*(p1079+p1081)
- p3271: 0
- p3472: 0; = p3377*p1241
- p4857: 0; = p1890*p3482
- p3008: 0; = p2422*(p1079+p1081)
- p0924: 0.217128; = IF(p0918+p0923=1;0;IF(p0918+p0923+p0920>1;1-(p0918+p0923);p0920))
- p4274: 2.01752e-7; = p1925*p3479
- p0024: 19.483
- p3278: 0
- p0571: 0; = IF(p0307<0.5;-SQRT(p0007*EXP(p0439^2*p0008)-p0007);SQRT(p0007*EXP(p0439^2*p0008)-p0007))
- p0545: 0; = IF(p0281<0.5;-SQRT(p0007*EXP(p0413^2*p0008)-p0007);SQRT(p0007*EXP(p0413^2*p0008)-p0007))
- p2050: 0.952062
- p3728: 0; = p1791*p3477
- p1863: 3.12989e-6; = p1455*1000/p0818
- p0384: 0.5
- p3483: 0; = if(p1328+p1330+p1332+p1334+p1336+p1338+p1340+p1342+p1344=0;0;p1342/(p1328+p1330+p1332+p1334+p1336+p1338+p1340+p1342+p1344))
- p1646: 0
- p2215: 0.00057849; = p1117-p2214
- p1184: 5.67129e-8; = p1182/p0818
- p0509: 0; = SQRT(2)*(IF((2*p0377-1)<0;-1;IF((2*p0377-1)>0;1;0))*SQRT(SQRT((2/(pi()*0.140012289)+LN(1-(2*p0377-1)^2)/2)^2-LN(1-(2*p0377-1)^2)/0.140012289)-(2/(pi()*0.140012289)+LN(1-(2*p0377-1)^2)/2)))
- p2388: 0; = p2229*p2217
- p3334: 0; = IF(or(p3254=0;p1232>0);0;p3269*p3277*(p3300*p3292+(1-p3300)*p3296))
- p4831: 0; = p1864*p3482
- p1135: 213577; = if(p1121=0;p1129*(p0716/100)*p0703*1000;0)
- p2145: 5.97428e-7; = p2015*p2073*p2107/(p0818*1000)
- p0997: 0; = if(p0888=0;0;if((p0695*p0694*1000*p0696/100)/p0888>1;1;(p0695*p0694*1000*p0696/100)/p0888))
- p3238: 0.854735; = IF(p3237+p3235+p3236>1;1-(p3235+p3236);p3237)
- p2263: 7.38433e-5; = p2226*p2209
- p2170: 0.00722037; = p2166*(p0913)
- p0185: 22.753
- p1181: 0.000135898
- p1770: 0
- p2364: 0; = p2225*p2192
- p3370: 0; = if(p1232=0;p3245*p3358/p0818;0)
- p1108: 417744; = IF(p1071=0;p1105*p1102*p1095;0)
- p2147: 1.06791e-7; = p2015*p2075*p2109/(p0818*1000)
- p1816: 0
- p1914: 0
- p1043: 0.178958
- p0190: 33.298
- p2646: 1.41798e-5; = p2255*(p1019+p1021)
- p3029: 1.37737e-6; = p2248*p1023
- p2600: 0; = p2404*p1014
- p1273: 0; = p1267*p1252/p0818
- p0849: 0
- p4556: 9.99583e-8; = p1795*p3481
- p2838: 1.1974e-7; = p2252*(p1020+p1022)
- p2102: 0.922577
- p3044: 0; = p2263*p1082
- p1948: 0
- p3399: 0; = p3380*p1234
- p3659: 8.08787e-7; = p1928*p3476
- p0110: 56.698
- p1271: 0; = IF(p1267+p1270=p1259;0;IF(p1267+p1270+p1269>p1259;p1259-(p1267+p1270);p1269))
- p1232: 3.6e6; = p0801
- p1274: 0; = p1270*p1252/p0818
- p2354: 0; = p2225*p2182
- p1916: 0
- p3395: 0; = p3376*p1234
- p1974: 0; = p1969*p0001/(p0818*p0002)

## Reference product
- soybeans; at harvest in 1997; at farm; 85%-92% moisture: 1 kg

## Inputs from technosphere
- CUTOFF apply pesticide; banded or side-dressed: 6.5327e-5 ha; = p1329
- CUTOFF sulfuric acid; at point-of-sale: 5.52677e-8 kg; = p1178
- CUTOFF apply sulfur; unspecified method: 0.000372324 ha; = p1171
- CUTOFF apply P fertilizer; no broadcast application: 1.60364e-5 ha; = p1089
- CUTOFF apply P fertilizer; broadcast without incorporation: 4.19987e-5 ha; = p1091
- CUTOFF international vessel transport; average fuel: 0.069089 metric ton*km; = p2006
- CUTOFF bulk cargo rail transport; diesel: 0.0130523 metric ton*km; = p2008
- CUTOFF irrigate; unspecified irrigation method, surface water source, in 1997: 5.8824e-8 ha-m; = p1009
- CUTOFF prepare soil; for unspec. till, soybeans: 1.03932e-5 ha; = p0939
- CUTOFF phosphatic fertilizer, superphos. grades 22% and under; at point-of-sale: 8.94173e-5 kg; = p1116
- CUTOFF zinc compounds; at point-of-sale: 5.67129e-8 kg; = p1184
- CUTOFF gypsum; at point-of-sale: 3.09906e-6 kg; = p1166
- CUTOFF phosphatic fertilizer, superphosphate grades over 22%; at point-of-sale: 0.000731785 kg; = p1117
- CUTOFF pesticide, Trifluralin; at point-of-sale; kg AI: 8.4507e-5 kg; = p1955
- CUTOFF apply single or mixed N fertilizer; unspec. method: 1.28944e-6 ha; = p1035
- CUTOFF pesticide, Imazaquin; at point-of-sale; kg AI: 3.12989e-6 kg; = p1863
- CUTOFF apply sewage sludge; unspecified method: 0.000372324 ha; = p1189
- CUTOFF apply N fertilizer; no broadcast application: 1.8059e-5 ha; = p1030
- CUTOFF potassic fertilizer, other single nutrients; at point-of-sale: 0.000277341 kg; = p1155
- CUTOFF pesticide, Clomazone; at point-of-sale; kg AI: 1.59972e-5 kg; = p1797
- CUTOFF sulfur storage: 1.00626e-7 kg*a; = p1174
- CUTOFF pesticide, Thifensulfuron methyl; at point-of-sale; kg AI: 2.31844e-7 kg; = p1943
- CUTOFF pesticide, Pendimethalin; at point-of-sale; kg AI: 9.44763e-5 kg; = p1903
- CUTOFF apply K fertilizer; broadcast with incorporation: 2.32016e-5 ha; = p1140
- CUTOFF phosphatic fertilizer, other single phosphates; at point-of-sale: 0.000482439 kg; = p1118
- CUTOFF manure appl svc; unspec rate, 1997 soybeans: 0.000372324 ha; = p1233
- CUTOFF nitrogenous fertilizer, nitrogen solutions; at point-of-sale: 0.00237337 kg; = p1068
- CUTOFF irrigate; unspecified irrigation method, groundwater source, in 1997: 2.13479e-7 ha-m; = p0995
- CUTOFF dolomite, pulverized; at point-of-sale: 0.00391153 kg; = p1229
- CUTOFF apply pesticide; as foliar or directed spray: 7.33981e-5 ha; = p1339
- CUTOFF fertilizer filler materials; at point-of-sale: 0.00440503 kg; = p1158
- CUTOFF apply liming materials; unspecified method: 0.000372324 ha; = p1227
- CUTOFF prepare soil; for conventional till, soybeans; <15% residue: 4.32231e-5 ha; = p0934
- CUTOFF irrigate; gravity, groundwater source, in 1997: 2.35819e-6 ha-m; = p0992
- CUTOFF pesticide, Quizalofop, ethyl ; at point-of-sale; kg AI: 8.11453e-7 kg; = p1925
- CUTOFF apply pesticide; unspecified application methods: 1.22283e-5 ha; = p1345
- CUTOFF pesticide storage: 0.000505832 kg*a; = p1965
- CUTOFF domestic barge transport; average fuel: 0.00696124 metric ton*km; = p2007
- CUTOFF apply single or mixed K fertilizer; unspec. method: 1.29096e-6 ha; = p1144
- CUTOFF sewage sludge storage: 3.57145e-8 kg*a; = p1192
- CUTOFF nitrogenous fertilizer, sodium nitrate; at point-of-sale: 7.74937e-6 kg; = p1069
- CUTOFF local area trucking; class 6, average fuel: 0.000522093 metric ton*km; = p2010
- soybean residue; at harvest in 1997; at farm; 88%-94% moisture: 0.781844 kg; = p0839
- CUTOFF pesticide, Imazethapyr; at point-of-sale; kg AI: 7.99861e-6 kg; = p1864
- CUTOFF irrigate; gravity, surface water source, in 1997: 1.78422e-6 ha-m; = p1006
- CUTOFF sulfuric acid storage: 2.76338e-8 kg*a; = p1180
- CUTOFF planting; for reduced till, soybeans; 15-30% residue: 6.62325e-5 ha; = p0955
- CUTOFF pesticide, Propazine; at point-of-sale; kg AI: 3.35014e-5 kg; = p1889
- CUTOFF pesticide, Chlorimuron-ethyl; at point-of-sale; kg AI: 1.0433e-6 kg; = p1791
- CUTOFF apply pesticide; broadcast with incorporation: 0.000552569 ha; = p1333
- CUTOFF fertilizer storage: 0.011554 kg*a; = p1160
- CUTOFF nitrogenous fertilizer, ammonium sulfate; at point-of-sale: 0.000284903 kg; = p1067
- CUTOFF limestone, high-grade, pulverized; at point-of-sale: 0.0670706 kg; = p1228
- CUTOFF harvest; soybeans: 0.000367153 ha; = p1971
- CUTOFF zinc compounds storage: 2.83564e-8 kg*a; = p1186
- CUTOFF planting; for no-till, soybeans: 8.08417e-5 ha; = p0954
- CUTOFF planting; for mulch till, soybeans: 0.000159673 ha; = p0953
- CUTOFF pesticide, Clethodim; at point-of-sale; kg AI: 1.27514e-6 kg; = p1795
- CUTOFF planting; for ridge till, soybeans: 1.19607e-5 ha; = p0956
- CUTOFF harvest; soybeans residue management: 0.000372324 ha; = p1975
- CUTOFF nitrogenous fertilizer, urea; at point-of-sale: 0.000891593 kg; = p1070
- CUTOFF planting; for unspec. till, soybeans: 1.03932e-5 ha; = p0957
- CUTOFF pesticide, Fluazifop-p-butyl; at point-of-sale; kg AI: 1.0433e-6 kg; = p1839
- CUTOFF sulfur; at point-of-sale: 2.01251e-7 kg; = p1172
- CUTOFF nitrogenous fertilizer, aqueous ammonia; at point-of-sale: 5.31724e-5 kg; = p1065
- CUTOFF prepare soil; for ridge till, soybeans: 1.19607e-5 ha; = p0938
- CUTOFF apply K fertilizer; no broadcast application: 9.98993e-6 ha; = p1139
- CUTOFF apply gypsum; unspecified method: 0.000372324 ha; = p1165
- CUTOFF N inhibitor appl svc; unspec rate & type, 1997 soybeans: 0.000417319 ha; = p1162
- CUTOFF pesticide, Sethoxydim; at point-of-sale; kg AI: 1.15922e-5 kg; = p1928
- CUTOFF regional or national trucking; class 8, average fuel: 0.0221459 metric ton*km; = p2009
- CUTOFF phosphatic fertilizer, diammonium phosphate; at point-of-sale: 0.00705268 kg; = p1119
- CUTOFF apply zinc compounds; unspecified method: 0.000372324 ha; = p1183
- CUTOFF pesticide, Metribuzin; at point-of-sale; kg AI: 6.83939e-6 kg; = p1890
- CUTOFF pesticide, Fenoxaprop P; at point-of-sale; kg AI: 1.39106e-6 kg; = p1835
- CUTOFF prepare soil; for mulch till, soybeans: 0.000159673 ha; = p0935
- CUTOFF liming materials storage: 0.0354911 kg*a; = p1231
- CUTOFF planting; for conventional till, soybeans; <15% residue: 4.32231e-5 ha; = p0952
- CUTOFF phosphatic fertilizer, monoammonium phosphate; at point-of-sale: 0.00249023 kg; = p1120
- CUTOFF apply pesticide; broadcast without incorporation: 0.000232797 ha; = p1335
- CUTOFF nitrogenous fertilizer, ammonium nitrate; at point-of-sale: 0.000451597 kg; = p1066
- CUTOFF irrigate; pressure, groundwater source, in 1997: 1.6116e-5 ha-m; = p0993
- CUTOFF nitrogenous fertilizer, anhydrous ammonia; at point-of-sale: 0.00112789 kg; = p1064
- CUTOFF apply P fertilizer; broadcast with incorporation: 5.60702e-5 ha; = p1090
- CUTOFF sewage sludge; at point-of-sale: 7.1429e-8 kg; = p1190
- CUTOFF pesticide, Glyphosate; at point-of-sale; kg AI: 8.96076e-5 kg; = p1855
- CUTOFF potassic fertilizer, potassium chloride; at point-of-sale: 0.00238877 kg; = p1154
- CUTOFF prepare soil; for reduced till, soybeans; 15-30% residue: 6.62325e-5 ha; = p0937
- CUTOFF soya seeds; unspec. type; at point-of-sale: 0.0221251 kg; = p0972
- CUTOFF pesticide formulation balance; at point-of-sale: 0.00027962 kg; = p1963
- CUTOFF apply K fertilizer; broadcast without incorporation: 2.20888e-5 ha; = p1141
- CUTOFF soya seeds; GMO herbicide resistant seed; at point-of-sale: 0.0053537 kg; = p0970
- CUTOFF pesticide, Flumetsulam; at point-of-sale; kg AI: 1.0433e-6 kg; = p1842
- CUTOFF prepare soil; for no-till, soybeans: 8.08417e-5 ha; = p0936
- CUTOFF pesticide, Alachlor; at point-of-sale; kg AI: 8.74051e-5 kg; = p1767
- CUTOFF seed storage; soybeans: 0.0137394 kg*a; = p0975
- CUTOFF apply N fertilizer; broadcast with incorporation: 5.43441e-5 ha; = p1031
- CUTOFF apply sulfuric acid; unspecified method: 0.000372324 ha; = p1177
- CUTOFF apply N fertilizer; broadcast without incorporation: 3.92185e-5 ha; = p1032
- CUTOFF pesticide, Bentazon; at point-of-sale; kg AI: 1.76201e-5 kg; = p1776
- CUTOFF gypsum storage: 1.54953e-6 kg*a; = p1168

## Inputs from nature
- Carbon dioxide: 4.19212 kg; = p0900*3.6666666667
- Transformation, from annual crop [natural resource, land]: 3.72324 m2; = 1.0 * (p0873+p0879+p0871+p0883+p0877)
- Transformation, to annual crop [natural resource, land]: 3.72324 m2; = 1.0 * (p0857)
- Nitrogen: 0.0983707 kg; = p0905
- Water, unspecified origin: 0.000298109 m3; = p0916*0.001
- Water, ground: 186.877 kg; = p0887
- Dry matter except CNPK; from plant uptake: 1.32164 kg; = p0917
- Water, surface: 18.4304 kg; = p0889
- Phosphorus: 0.0105884 kg; = p0910
- Occupation, annual crop [natural resource, land]: 1.38893 m2*year; = 1.0 * (p0855)
- Potassium; from plant uptake; biogenic: 0.0289793 kg; = p0915

## Emissions to nature
- Diammonium phosphate; broadcast w/o incorp. in fert. in fall bef. plant.: 0.00065919 kg; = p2845*4.7142857143
- Nitrogen solution; no broadcast in fert. in fall bef. plant.; no broadcast in fert. in fall bef. plant.; kg N: 1.92905e-5 kg; = p2444
- Urea; no broadcast in fert. in spr. bef. plant.: 0.000100485 kg; = p2490*5
- Monoammonium phosphate; broadcast w/ incorp. in fert. in fall bef. plant.: 0.000298062 kg; = p2654*8.2142857143
- Sodium nitrate; broadcast w/o incorp. in fert. in spr. bef. plant.: 1.88908e-6 kg; = p2876*6.0714285714
- Sewage sludge dry matter; applied in sewage sludge: 3.69867e-10 kg; = p3243
- Toluene [air, non-urban air or from high stacks]: 3.41781e-7 kg; = 1.0 * (p2141*1.0952380952)
- Nitrogen; in above-ground residue left on field: 0.0187824 kg; = p2168
- Sulfur [soil, agricultural]: 2.01251e-7 kg; = 1.0 * (p3230)
- Potassium chloride; unspec. appl. method in fert. in spr. bef. plant.: 4.37762e-5 kg; = p3092*2.2166666667
- Anhydrous ammonia; broadcast w/o incorp. in fert. at plant.: 4.21835e-5 kg; = p2901*1.2142857143
- Ethene [air, non-urban air or from high stacks]: 2.61085e-6 kg; = 1.0 * (p2125*1.1666666667)
- Urea; broadcast w/ incorp. in fert. at plant.: 4.52613e-5 kg; = p2724*5
- Nitrogen solution; no broadcast in fert. at plant.; no broadcast in fert. at plant.; kg N: 1.23149e-5 kg; = p2522
- Anhydrous ammonia; unspec. appl. method in fert. at plant.: 1.38693e-6 kg; = p3096*1.2142857143
- Ammonium sulfate; broadcast w/ incorp. in fert. at plant.: 1.46802e-5 kg; = p2713*4.7142857143
- Fluazifop-P-butyl [soil, agricultural]: 1.0433e-6 kg; = 1.0 * (p5218+p4188+p4600+p3570+p3982)
- Other single phosphates; broadcast w/ incorp. in fert. at plant.; kg P: 1.65191e-6 kg; = p2739
- Thifensulfuron methyl; unspec. appl. method: 3.02788e-9 kg; = p5322
- Methane: 5.6424e-6 kg; = p2025*1.3333333333
- Potassium chloride; no broadcast in fert. in spr. bef. plant.: 0.000338757 kg; = p2507*2.2166666667
- Other single phosphates; broadcast w/o incorp. in fert. in spr. bef. plant.; kg P: 1.16727e-5 kg; = p2895
- Monoammonium phosphate; no broadcast in fert. in fall bef. plant.: 8.52473e-5 kg; = p2459*8.2142857143
- Clethodim [soil, agricultural]: 1.27514e-6 kg; = 1.0 * (p3938+p4144+p3526+p5174+p4556)
- Carbon monoxide, fossil [air, non-urban air or from high stacks]: 0.000123609 kg; = 1.0 * (p2028*2.3333333333)
- Anhydrous ammonia; no broadcast in fert. in spr. bef. plant.: 0.000129771 kg; = p2472*1.2142857143
- Plant dry matter; in below-ground residue: 0.1375 kg; = p2177
- Urea; broadcast w/o incorp. in fert. at plant.: 3.26638e-5 kg; = p2919*5
- Ammonium nitrate; no broadcast in fert. in fall bef. plant.: 1.93226e-5 kg; = p2437*4.7142857143
- isobutene: 2.09733e-7 kg; = p2150*1.1666666667
- Sodium nitrate; broadcast w/o incorp. in fert. at plant.: 2.8276e-7 kg; = p2915*6.0714285714
- Anhydrous ammonia; unspec. appl. method in fert. in spr. bef. plant.: 9.26586e-6 kg; = p3057*1.2142857143
- Gypsum: 3.09906e-6 kg; = p3229
- Urea; unspec. appl. method in fert. in spr. bef. plant.: 7.17479e-6 kg; = p3075*5
- Aqueous ammonia; broadcast w/ incorp. in fert. at plant.: 7.56122e-7 kg; = p2708*1.2142857143
- Potassium chloride; broadcast w/ incorp. in fert. in spr. bef. plant.: 0.000786764 kg; = p2702*2.2166666667
- Ammonium nitrate; broadcast w/o incorp. in fert. in spr. bef. plant.: 0.000178971 kg; = p2866*4.7142857143
- Potassium; in above-ground residue left on field; biogenic: 0.00722037 kg; = p2170
- Carbon dioxide, in air: 0.00232677 kg; = p2163*3.6666666667
- Fenoxaprop P; unspec. appl. method: 1.81673e-8 kg; = p5214
- Potassium; in below-ground residue; biogenic: 0.00269353 kg; = p2176
- Superphosphate, grades<= 22%; broadcast w/o incorp. in fert. in fall bef. plant.; kg P: 7.91981e-7 kg; = p2852
- Potassium chloride; broadcast w/o incorp. in fert. in spr. bef. plant.: 0.00074903 kg; = p2897*2.2166666667
- Superphosphate, grades<= 22%; broadcast w/o incorp. in fert. at plant.; kg P: 1.99422e-7 kg; = p2930
- Superphosphate, grades>22%; no broadcast in fert. at plant.; kg P: 1.4956e-6 kg; = p2542
- Metolachlor [soil, agricultural]: 3.35014e-5 kg; = 1.0 * (p4032+p4650+p3620+p4238+p5268)
- Other single phosphates; broadcast w/o incorp. in fert. in fall bef. plant.; kg P: 4.91399e-6 kg; = p2856
- Ammonium nitrate; unspec. appl. method in fert. in spr. bef. plant.: 5.88431e-6 kg; = p3061*4.7142857143
- Trifluralin [soil, agricultural]: 8.4507e-5 kg; = 1.0 * (p4716+p3686+p4304+p4098+p5334)
- Ammonium nitrate; unspec. appl. method in fert. in fall bef. plant.: 1.37967e-6 kg; = p3022*4.7142857143
- Ammonium nitrate; unspec. appl. method in fert. at plant.: 8.80772e-7 kg; = p3100*4.7142857143
- Monoammonium phosphate; broadcast w/ incorp. in fert. at plant.: 7.50524e-5 kg; = p2732*8.2142857143
- Aqueous ammonia; broadcast w/o incorp. in fert. at plant.: 5.45671e-7 kg; = p2903*1.2142857143
- Aqueous ammonia; broadcast w/ incorp. in fert. in fall bef. plant.: 1.18441e-6 kg; = p2630*1.2142857143
- Diammonium phosphate; broadcast w/o incorp. in fert. in spr. bef. plant.: 0.00156584 kg; = p2884*4.7142857143
- isopentane: 3.03693e-8 kg; = p2151*1.0166666667
- trans-2-Butene: 1.02177e-7 kg; = p2148*1.1666666667
- Ammonium sulfate; no broadcast in fert. in spr. bef. plant.: 3.25916e-5 kg; = p2479*4.7142857143
- Filler materials, applied with synthetic fertilizer: 0.00440503 kg; = p2432
- Aqueous ammonia; unspec. appl. method in fert. in fall bef. plant.: 2.81031e-8 kg; = p3020*1.2142857143
- Other single K nutrients; no broadcast in fert. in spr. bef. plant.; kg K: 1.56139e-5 kg; = p2509
- Diammonium phosphate; no broadcast in fert. in spr. bef. plant.: 0.000597885 kg; = p2494*4.7142857143
- Aqueous ammonia; unspec. appl. method in fert. at plant.: 1.79408e-8 kg; = p3098*1.2142857143
- Acetone [air, non-urban air or from high stacks]: 8.00765e-7 kg; = 1.0 * (p2139*1.6111111111)
- Urea; unspec. appl. method in fert. in fall bef. plant.: 1.68225e-6 kg; = p3036*5
- Other single phosphates; no broadcast in fert. in spr. bef. plant.; kg P: 4.45699e-6 kg; = p2505
- Imazethapyr [soil, agricultural]: 7.99861e-6 kg; = 1.0 * (p4625+p4007+p5243+p3595+p4213)
- Plant dry matter; from residue burning: 0.000642561 kg; = p2164
- Ammonium sulfate; unspec. appl. method in fert. in fall bef. plant.: 5.45627e-7 kg; = p3025*4.7142857143
- Acetonitrile [air, non-urban air or from high stacks]: 3.76681e-7 kg; = 1.0 * (p2155*1.7083333333)
- Sodium nitrate; broadcast w/o incorp. in fert. in fall bef. plant.: 4.42925e-7 kg; = p2837*6.0714285714
- Thifensulfuron methyl; foliar or directed spray: 1.81742e-8 kg; = p4704
- Ammonium sulfate; broadcast w/o incorp. in fert. in spr. bef. plant.: 7.07789e-5 kg; = p2869*4.7142857143
- Phosphorous; in below-ground residue: 0.00080889 kg; = p2175
- Glyphosate [soil, agricultural]: 8.96076e-5 kg; = 1.0 * (p4616+p3586+p3998+p4204+p5234)
- Thifensulfuron methyl; broadcast with incorporation: 1.36823e-7 kg; = p4086
- Nitrogen solution; no broadcast in fert. in spr. bef. plant.; no broadcast in fert. in spr. bef. plant.; kg N: 8.22739e-5 kg; = p2483
- Other single K nutrients; unspec. appl. method in fert. in spr. bef. plant.; kg K: 2.01772e-6 kg; = p3094
- Water [air, non-urban air or from high stacks]: 2.07384e-7 m3; = 0.001 * (p2016)
- Phosphorous; applied in sewage sludge: 3.98821e-10 kg; = p3241
- Nitrogen dioxide: 5.67231e-6 kg; = p2039*3.2857142857
- Oxygen; applied in limestone: 0.0302349 kg; = p3219
- Sodium nitrate; unspec. appl. method in fert. in fall bef. plant.: 1.45627e-8 kg; = p3032*6.0714285714
- Other single K nutrients; broadcast w/o incorp. in fert. at plant.; kg K: 5.03066e-6 kg; = p2938
- Nitrogen; in below-ground residue: 0.00700667 kg; = p2174
- Alachlor [soil, agricultural]: 8.74051e-5 kg; = 1.0 * (p3910+p4116+p3498+p4528+p5146)
- Aqueous ammonia; no broadcast in fert. at plant.: 2.51266e-7 kg; = p2513*1.2142857143
- Isoprene [air, non-urban air or from high stacks]: 6.77086e-7 kg; = 1.0 * (p2145*1.1333333333)
- Ammonium sulfate; broadcast w/o incorp. in fert. in fall bef. plant.: 1.65953e-5 kg; = p2830*4.7142857143
- Other single phosphates; broadcast w/ incorp. in fert. in fall bef. plant.; kg P: 6.56039e-6 kg; = p2661
- Potassium chloride; no broadcast in fert. at plant.: 4.93619e-5 kg; = p2546*2.2166666667
- I butane; from residue burning: 3.78528e-8 kg; = p2146*1.0208333333
- Ammonium nitrate; broadcast w/ incorp. in fert. in fall bef. plant.: 5.81467e-5 kg; = p2632*4.7142857143
- Urea; broadcast w/ incorp. in fert. in spr. bef. plant.: 0.000302384 kg; = p2685*5
- Propanenitrile: 1.14979e-7 kg; = p2157*1.5277777778
- Diammonium phosphate; broadcast w/o incorp. in fert. at plant.: 0.000165985 kg; = p2923*4.7142857143
- Sodium nitrate; broadcast w/ incorp. in fert. in spr. bef. plant.: 2.61764e-6 kg; = p2681*6.0714285714
- Fenoxaprop P; broadcast with incorporation: 8.20935e-7 kg; = p3978
- Ammonium nitrate; broadcast w/ incorp. in fert. in spr. bef. plant.: 0.000247996 kg; = p2671*4.7142857143
- Superphosphate, grades>22%; no broadcast in fert. in spr. bef. plant.; kg P: 1.4109e-5 kg; = p2503
- Phosphorous; in above-ground residue left on field: 0.00216834 kg; = p2169
- Formaldehyde [air, non-urban air or from high stacks]: 3.73032e-6 kg; = 1.0 * (p2128*2.5)
- Anhydrous ammonia; no broadcast in fert. at plant.: 1.94243e-5 kg; = p2511*1.2142857143
- Urea; no broadcast in fert. at plant.: 1.50407e-5 kg; = p2529*5
- Butadiene [air, non-urban air or from high stacks]: 2.70741e-7 kg; = 1.0 * (p2143*1.125)
- Superphosphate, grades<= 22%; broadcast w/ incorp. in fert. in spr. bef. plant.; kg P: 2.51159e-6 kg; = p2696
- Hydrocyanic acid: 5.11905e-7 kg; = p2154*2.25
- Pentane [air, non-urban air or from high stacks]: 3.79616e-8 kg; = 1.0 * (p2152*1.0166666667)
- Potassium chloride; unspec. appl. method in fert. at plant.: 6.37884e-6 kg; = p3131*2.2166666667
- Other single phosphates; broadcast w/o incorp. in fert. at plant.; kg P: 1.23735e-6 kg; = p2934
- Aqueous ammonia; broadcast w/o incorp. in fert. in fall bef. plant.: 8.54757e-7 kg; = p2825*1.2142857143
- Potassium chloride; broadcast w/ incorp. in fert. at plant.: 0.000114643 kg; = p2741*2.2166666667
- Butane [air, non-urban air or from high stacks]: 1.09016e-7 kg; = 1.0 * (p2147*1.0208333333)
- Bentazone [soil, agricultural]: 1.76201e-5 kg; = 1.0 * (p3507+p4125+p3919+p5155+p4537)
- Monoammonium phosphate; broadcast w/o incorp. in fert. at plant.: 5.62171e-5 kg; = p2927*8.2142857143
- Superphosphate, grades>22%; broadcast w/ incorp. in fert. in fall bef. plant.; kg P: 2.07675e-5 kg; = p2659
- Superphosphate, grades<= 22%; no broadcast in fert. at plant.; kg P: 7.61451e-8 kg; = p2540
- Superphosphate, grades<= 22%; no broadcast in fert. in spr. bef. plant.; kg P: 7.18327e-7 kg; = p2501
- Nitrogen solution; broadcast w/o incorp. in fert. in spr. bef. plant.; broadcast w/o incorp. in fert. in spr. bef. pl...: 0.000178673 kg; = p2873
- Aqueous ammonia; broadcast w/o incorp. in fert. in spr. bef. plant.: 3.64554e-6 kg; = p2864*1.2142857143
- Formic acid [air, non-urban air or from high stacks]: 1.79802e-6 kg; = 1.0 * (p2131*3.8333333333)
- Anhydrous ammonia; broadcast w/o incorp. in fert. in spr. bef. plant.: 0.000281822 kg; = p2862*1.2142857143
- Urea; broadcast w/ incorp. in fert. in fall bef. plant.: 7.08988e-5 kg; = p2646*5
- Quizalofop ethyl ester [soil, agricultural]: 8.11453e-7 kg; = 1.0 * (p4274+p5304+p4068+p4686+p3656)
- Superphosphate, grades>22%; broadcast w/ incorp. in fert. in spr. bef. plant.; kg P: 4.93313e-5 kg; = p2698
- Ammonium sulfate; broadcast w/o incorp. in fert. at plant.: 1.05943e-5 kg; = p2908*4.7142857143
- Anhydrous ammonia; broadcast w/ incorp. in fert. at plant.: 5.84526e-5 kg; = p2706*1.2142857143
- Other limestone constituents; applied in limestone: 0.00402424 kg; = p3220
- Phenol [air, non-urban air or from high stacks]: 9.30701e-7 kg; = 1.0 * (p2133*1.3055555556)
- Ash: 0.000354931 kg; = p2021+p2022
- Monoammonium phosphate; no broadcast in fert. at plant.: 2.14654e-5 kg; = p2537*8.2142857143
- Ammonium sulfate; broadcast w/ incorp. in fert. in fall bef. plant.: 2.29956e-5 kg; = p2635*4.7142857143
- Sodium nitrate; no broadcast in fert. at plant.: 1.30203e-7 kg; = p2525*6.0714285714
- Ammonium nitrate; broadcast w/o incorp. in fert. at plant.: 2.67887e-5 kg; = p2905*4.7142857143
- Glycolaldehyde; from residue burning: 3.61521e-6 kg; = p2135*2.5
- Nitrogen solution; broadcast w/ incorp. in fert. in spr. bef. plant.; broadcast w/ incorp. in fert. in spr. bef. plan...: 0.000247583 kg; = p2678
- Other single K nutrients; broadcast w/ incorp. in fert. in spr. bef. plant.; kg K: 3.62632e-5 kg; = p2704
- Urea; unspec. appl. method in fert. at plant.: 1.07393e-6 kg; = p3114*5
- Propane [air, non-urban air or from high stacks]: 5.05371e-7 kg; = 1.0 * (p2142*1.2222222222)
- Pesticide formulation balance; banded or side-dressed: 1.95091e-5 kg; = p3690
- Other single phosphates; broadcast w/ incorp. in fert. in spr. bef. plant.; kg P: 1.55836e-5 kg; = p2700
- Other single K nutrients; broadcast w/o incorp. in fert. in spr. bef. plant.; kg K: 3.4524e-5 kg; = p2899
- Calcium [soil, agricultural]: 0.0261229 kg; = 1.0 * (p3226+p3218)
- Fenoxaprop P; broadcast without incorporation: 3.4586e-7 kg; = p4184
- Acetic acid [air, non-urban air or from high stacks]: 1.00393e-5 kg; = 1.0 * (p2127*2.5)
- Sodium nitrate; broadcast w/ incorp. in fert. in fall bef. plant.: 6.13749e-7 kg; = p2642*6.0714285714
- Nitrogen solution; broadcast w/o incorp. in fert. at plant.; broadcast w/o incorp. in fert. at plant.; kg N: 2.67441e-5 kg; = p2912
- Diammonium phosphate; broadcast w/ incorp. in fert. in fall bef. plant.: 0.000880048 kg; = p2650*4.7142857143
- Ammonium nitrate; broadcast w/ incorp. in fert. at plant.: 3.71205e-5 kg; = p2710*4.7142857143
- Aqueous ammonia; no broadcast in fert. in fall bef. plant.: 3.93591e-7 kg; = p2435*1.2142857143
- Clomazone [soil, agricultural]: 1.59972e-5 kg; = 1.0 * (p3940+p4146+p5176+p4558+p3528)
- Superphosphate, grades<= 22%; broadcast w/o incorp. in fert. in spr. bef. plant.; kg P: 1.88128e-6 kg; = p2891
- Ammonium sulfate; no broadcast in fert. at plant.: 4.87837e-6 kg; = p2518*4.7142857143
- Nitrogen; applied in sewage sludge: 3.34087e-9 kg; = p3240
- Sethoxydim [soil, agricultural]: 1.15922e-5 kg; = 1.0 * (p4071+p4277+p3659+p5307+p4689)
- Nitrogen solution; broadcast w/ incorp. in fert. in fall bef. plant.; broadcast w/ incorp. in fert. in fall bef. plan...: 5.80499e-5 kg; = p2639
- Monoammonium phosphate; broadcast w/o incorp. in fert. in spr. bef. plant.: 0.000530333 kg; = p2888*8.2142857143
- Nitrogen solution; broadcast w/ incorp. in fert. at plant.; broadcast w/ incorp. in fert. at plant.; kg N: 3.70586e-5 kg; = p2717
- Sodium nitrate; no broadcast in fert. in fall bef. plant.: 2.03954e-7 kg; = p2447*6.0714285714
- Anhydrous ammonia; unspec. appl. method in fert. in fall bef. plant.: 2.17253e-6 kg; = p3018*1.2142857143
- Superphosphate, grades>22%; no broadcast in fert. in fall bef. plant.; kg P: 5.93961e-6 kg; = p2464
- Urea; broadcast w/o incorp. in fert. in fall bef. plant.: 5.11656e-5 kg; = p2841*5
- Superphosphate, grades>22%; broadcast w/o incorp. in fert. in spr. bef. plant.; kg P: 3.6951e-5 kg; = p2893
- cyclopentane: 2.96801e-9 kg; = p2153*1.0166666667
- Acrylonitrile: 6.01475e-8 kg; = p2156*1.4722222222
- Superphosphate, grades>22%; broadcast w/ incorp. in fert. at plant.; kg P: 5.22928e-6 kg; = p2737
- Fenoxaprop P; banded or side-dressed: 9.70544e-8 kg; = p3566
- Acetol; from residue burning: 6.75632e-6 kg; = p2134*2.0555555556
- Other single K nutrients; broadcast w/ incorp. in fert. at plant.; kg K: 5.28408e-6 kg; = p2743
- Metribuzin [soil, agricultural]: 6.83939e-6 kg; = 1.0 * (p4033+p5269+p4239+p4651+p3621)
- Nitrogen solution; unspec. appl. method in fert. at plant.; unspec. appl. method in fert. at plant.; kg N: 8.79305e-7 kg; = p3107
- Sodium nitrate; broadcast w/ incorp. in fert. at plant.: 3.91813e-7 kg; = p2720*6.0714285714
- Anhydrous ammonia; broadcast w/o incorp. in fert. in fall bef. plant.: 6.60777e-5 kg; = p2823*1.2142857143
- Ammonium sulfate; unspec. appl. method in fert. at plant.: 3.48324e-7 kg; = p3103*4.7142857143
- Ammonium sulfate; no broadcast in fert. in fall bef. plant.: 7.64164e-6 kg; = p2440*4.7142857143
- Superphosphate, grades<= 22%; no broadcast in fert. in fall bef. plant.; kg P: 3.02402e-7 kg; = p2462
- Aqueous ammonia; unspec. appl. method in fert. in spr. bef. plant.: 1.1986e-7 kg; = p3059*1.2142857143
- Propene [air, non-urban air or from high stacks]: 1.21305e-6 kg; = 1.0 * (p2136*1.1666666667)
- Anhydrous ammonia; broadcast w/ incorp. in fert. in spr. bef. plant.: 0.000390513 kg; = p2667*1.2142857143
- Aqueous ammonia; no broadcast in fert. in spr. bef. plant.: 1.67867e-6 kg; = p2474*1.2142857143
- Acetaldehyde [air, non-urban air or from high stacks]: 2.23176e-6 kg; = 1.0 * (p2130*1.8333333333)
- Dinitrogen monoxide [air, non-urban air or from high stacks]: 1.25631e-7 kg; = 1.0 * (p2044*1.5714285714)
- Particulates, < 2.5 um [air, non-urban air or from high stacks]: 1.11073e-5 kg; = 1.0 * (p2033+p2035)
- NMVOC, non-methane volatile organic compounds, unspecified origin [air, non-urban air or from high stacks]: 4.61054e-5 kg; = 1.0 * (p2052+p2051)
- Urea; broadcast w/o incorp. in fert. in spr. bef. plant.: 0.000218222 kg; = p2880*5
- Furan [air, non-urban air or from high stacks]: 1.96289e-7 kg; = 1.0 * (p2138*1.4166666667)
- Water: 205.423 kg; = p2171+p2181+p2178
- Urea; no broadcast in fert. in fall bef. plant.: 2.35603e-5 kg; = p2451*5
- Plant dry matter; in aboveground residue left on field: 0.368587 kg; = p2172
- Imazaquin [soil, agricultural]: 3.12989e-6 kg; = 1.0 * (p5242+p3594+p4624+p4212+p4006)
- Nitrogen solution; broadcast w/o incorp. in fert. in fall bef. plant.; broadcast w/o incorp. in fert. in fall bef. pl...: 4.18929e-5 kg; = p2834
- Dioxins and furans (PCDD/F); from residue burning: 5.38317e-14 kg TEQ; = p2047
- Ammonium nitrate; no broadcast in fert. in spr. bef. plant.: 8.24112e-5 kg; = p2476*4.7142857143
- Methyl vinyl ether; from residue burning: 1.36098e-7 kg; = p2137*1.6111111111
- Pesticide formulation balance; unspec. appl. method: 3.65184e-6 kg; = p5338
- Anhydrous ammonia; broadcast w/ incorp. in fert. in fall bef. plant.: 9.15621e-5 kg; = p2628*1.2142857143
- Ammonium sulfate; broadcast w/ incorp. in fert. in spr. bef. plant.: 9.80765e-5 kg; = p2674*4.7142857143
- cis-2-Butene: 7.70813e-8 kg; = p2149*1.1666666667
- Pesticide formulation balance; foliar or directed spray: 2.19194e-5 kg; = p4720
- Ammonium nitrate; broadcast w/o incorp. in fert. in fall bef. plant.: 4.19628e-5 kg; = p2827*4.7142857143
- Magnesium [soil, agricultural]: 0.000496131 kg; = 1.0 * (p3227)
- Ammonium sulfate; unspec. appl. method in fert. in spr. bef. plant.: 2.3271e-6 kg; = p3064*4.7142857143
- Diammonium phosphate; no broadcast in fert. at plant.: 6.33779e-5 kg; = p2533*4.7142857143
- Anhydrous ammonia; no broadcast in fert. in fall bef. plant.: 3.04269e-5 kg; = p2433*1.2142857143
- Fenoxaprop P; foliar or directed spray: 1.09045e-7 kg; = p4596
- Monoammonium phosphate; broadcast w/o incorp. in fert. in fall bef. plant.: 0.00022326 kg; = p2849*8.2142857143
- Sodium nitrate; unspec. appl. method in fert. in spr. bef. plant.: 6.21099e-8 kg; = p3071*6.0714285714
- Other single phosphates; no broadcast in fert. in fall bef. plant.; kg P: 1.8763e-6 kg; = p2466
- Benzene [air, non-urban air or from high stacks]: 2.75343e-7 kg; = 1.0 * (p2140*1.0833333333)
- Sodium nitrate; unspec. appl. method in fert. at plant.: 9.29671e-9 kg; = p3110*6.0714285714
- Nitrogen solution; unspec. appl. method in fert. in fall bef. plant.; unspec. appl. method in fert. in fall bef. plan...: 1.37737e-6 kg; = p3029
- Ethyne [air, non-urban air or from high stacks]: 4.88443e-7 kg; = 1.0 * (p2132*1.0833333333)
- Nitrogen solution; unspec. appl. method in fert. in spr. bef. plant.; unspec. appl. method in fert. in spr. bef. plan...: 5.8745e-6 kg; = p3068
- Chlorimuron-ethyl [soil, agricultural]: 1.0433e-6 kg; = 1.0 * (p4552+p4140+p3522+p5170+p3934)
- Superphosphate, grades>22%; broadcast w/o incorp. in fert. in fall bef. plant.; kg P: 1.55557e-5 kg; = p2854
- Carbon [soil, agricultural]: 0.464784 kg; = 1.0 * (p2167+p3225+p3217+p2173+p3242)
- Sodium nitrate; no broadcast in fert. in spr. bef. plant.: 8.69865e-7 kg; = p2486*6.0714285714
- Monoammonium phosphate; broadcast w/ incorp. in fert. in spr. bef. plant.: 0.000708019 kg; = p2693*8.2142857143
- Flumetsulam [soil, agricultural]: 1.0433e-6 kg; = 1.0 * (p4191+p3985+p5221+p3573+p4603)
- Other single phosphates; no broadcast in fert. at plant.; kg P: 4.72456e-7 kg; = p2544
- Ammonia [air, non-urban air or from high stacks]: 3.89398e-6 kg; = 1.0 * (p2159*1.2142857143)
- Thifensulfuron methyl; broadcast without incorporation: 5.76433e-8 kg; = p4292
- Potassium chloride; broadcast w/o incorp. in fert. at plant.: 0.000109145 kg; = p2936*2.2166666667
- Ammonium nitrate; no broadcast in fert. at plant.: 1.23354e-5 kg; = p2515*4.7142857143
- Oxygen; applied in dolomite: 0.00196338 kg; = p3228
- Ethane [air, non-urban air or from high stacks]: 1.6306e-6 kg; = 1.0 * (p2126*1.25)
- Other single K nutrients; unspec. appl. method in fert. at plant.; kg K: 2.94011e-7 kg; = p3133
- Monoammonium phosphate; no broadcast in fert. in spr. bef. plant.: 0.000202497 kg; = p2498*8.2142857143
- Pesticide formulation balance; broadcast with incorporation: 0.000165018 kg; = p4102
- Superphosphate, grades<= 22%; broadcast w/ incorp. in fert. at plant.; kg P: 2.66237e-7 kg; = p2735
- 1-Butene: 2.40207e-7 kg; = p2144*1.1666666667
- Sulfuric acid [soil, agricultural]: 5.52677e-8 kg; = 1.0 * (p3231)
- Methanol [air, non-urban air or from high stacks]: 5.8974e-6 kg; = 1.0 * (p2129*2.6666666667)
- Other single K nutrients; no broadcast in fert. at plant.; kg K: 2.27517e-6 kg; = p2548
- Pendimethalin [soil, agricultural]: 9.44763e-5 kg; = 1.0 * (p4252+p4664+p5282+p3634+p4046)
- Superphosphate, grades<= 22%; broadcast w/ incorp. in fert. in fall bef. plant.; kg P: 1.05733e-6 kg; = p2657
- Zinc compounds: 5.67129e-8 kg; = p3232
- Seeds; used in planting and sowing: 0.0274788 kg; = p2179
- Pesticide formulation balance; broadcast without incorporation: 6.9522e-5 kg; = p4308
- Aqueous ammonia; broadcast w/ incorp. in fert. in spr. bef. plant.: 5.05154e-6 kg; = p2669*1.2142857143
- Sulfur dioxide [air, non-urban air or from high stacks]: 2.79925e-6 kg; = 1.0 * (p2041)
- Diammonium phosphate; broadcast w/ incorp. in fert. in spr. bef. plant.: 0.00209047 kg; = p2689*4.7142857143
- Diammonium phosphate; broadcast w/ incorp. in fert. at plant.: 0.000221597 kg; = p2728*4.7142857143
- Thifensulfuron methyl; banded or side-dressed: 1.61757e-8 kg; = p3674
- Particulates, < 10 um: 1.59162e-5 kg; = p2034+p2036
- Diammonium phosphate; no broadcast in fert. in fall bef. plant.: 0.000251698 kg; = p2455*4.7142857143
- Superphosphate, grades>22%; broadcast w/o incorp. in fert. at plant.; kg P: 3.91693e-6 kg; = p2932

## Sampling procedure
A delete-a-group jackknife is used by the USDA to estimate the ARMS sample means and RSEs, based on a 15 sample delete-a-group jackknife. Because of this relatively small sample size, a Students t distribution is used to represent ARMS data probability density functions. Other representations of uncertainty are described in Cooper, J.S., Kahn, E., Noon, M. (2012). LCA Digital Commons Unit Process Data: field crop production Version 1. Prepared for the US Department of Agriculture National Agricultural Library. Retrieved from https://www.lcacommons.gov/discovery/docs/LCA%20Digital%20Commons%20Unit%20Process%20Data%20final%20updated.pdf

## Extrapolations
Data represent an aggregation of processes applied in Nebraska in 1997. Data development is demonstrated by parameterization (exlicitly presents all raw and uncertainty data and all calculations). Flow data quality according to the LCADC convention is provided for all flows.
