# corn grain; at harvest in 2001; at farm; 85%-91% moisture

Dataset: EcoSpold 2, unit process
Geography: GLO
Time period: 2001-01-02 to 2002-01-01
Scenario: Business-as-Usual
System model: Allocation, ecoinvent default
Generated by: cooperjs@u.washington.edu
isCopyrightProtected: false

## General comment
This unit process/ gate-to-gate dataset represents the production of 1 kg corn coproduced with silage and residue. The process technologies are an aggregation of those applied in Illinois in 2001. Applicable classifications include ISIC 0111, NAIC 111150, UNSPSC 50403200; this dataset was prepared in ILCD format using the UWDFE Lab Excel to ILCD File Generator (beta version, August 2013)

Exchange "Prosulfuron-soil agricultural" is the result of combining the following original LCA Commons flows: "Prosulfuron; foliar or directed spray; kg AI", "Prosulfuron; broadcast without incorporation; kg AI", "Prosulfuron; broadcast with incorporation; kg AI", "Prosulfuron; banded or side-dressed; kg AI", "Prosulfuron; unspec. appl. method; kg AI", "Prosulfuron; in seed furrow; kg AI".
Exchange "Terbufos-soil agricultural" is the result of combining the following original LCA Commons flows: "Terbufos; broadcast without incorporation; kg AI", "Terbufos; in seed furrow; kg AI", "Terbufos; broadcast with incorporation; kg AI", "Terbufos; foliar or directed spray; kg AI", "Terbufos; unspec. appl. method; kg AI", "Terbufos; banded or side-dressed; kg AI".
Exchange "Bentazone-soil agricultural" is the result of combining the following original LCA Commons flows: "Bentazon; banded or side-dressed; kg AI", "Bentazon; broadcast with incorporation; kg AI", "Bentazon; foliar or directed spray; kg AI", "Bentazon; broadcast without incorporation; kg AI", "Bentazon; in seed furrow; kg AI", "Bentazon; unspec. appl. method; kg AI".
Exchange "Tefluthrin-soil agricultural" is the result of combining the following original LCA Commons flows: "Tefluthrin; broadcast with incorporation; kg AI", "Tefluthrin; broadcast without incorporation; kg AI", "Tefluthrin; in seed furrow; kg AI", "Tefluthrin; foliar or directed spray; kg AI", "Tefluthrin; banded or side-dressed; kg AI", "Tefluthrin; unspec. appl. method; kg AI".
Exchange "S-Metolachlor-soil agricultural" is the result of combining the following original LCA Commons flows: "S-Metolachlor; foliar or directed spray; kg AI", "S-Metolachlor; in seed furrow; kg AI", "S-Metolachlor; banded or side-dressed; kg AI", "S-Metolachlor; broadcast without incorporation; kg AI", "S-Metolachlor; unspec. appl. method; kg AI", "S-Metolachlor; broadcast with incorporation; kg AI".
Exchange "NMVOC, non-methane volatile organic compounds, unspecified origin-air low population density" is the result of combining the following original LCA Commons flows: "NMVOCs; from residue burning; kg except C, biogenic", "NMVOCs; from residue burning; kg C, biogenic".
Exchange "Glyphosate-soil agricultural" is the result of combining the following original LCA Commons flows: "Glyphosate; unspec. appl. method; kg AI", "Glyphosate; foliar or directed spray; kg AI", "Glyphosate; broadcast with incorporation; kg AI", "Glyphosate; banded or side-dressed; kg AI", "Glyphosate; broadcast without incorporation; kg AI", "Glyphosate; in seed furrow; kg AI".
Exchange "Simazine-soil agricultural" is the result of combining the following original LCA Commons flows: "Simazine; in seed furrow; kg AI", "Simazine; foliar or directed spray; kg AI", "Simazine; unspec. appl. method; kg AI", "Simazine; broadcast with incorporation; kg AI", "Simazine; broadcast without incorporation; kg AI", "Simazine; banded or side-dressed; kg AI".
Exchange "Imazethapyr-soil agricultural" is the result of combining the following original LCA Commons flows: "Imazethapyr; broadcast without incorporation; kg AI", "Imazethapyr; banded or side-dressed; kg AI", "Imazethapyr; foliar or directed spray; kg AI", "Imazethapyr; broadcast with incorporation; kg AI", "Imazethapyr; in seed furrow; kg AI", "Imazethapyr; unspec. appl. method; kg AI".
Exchange "1-Naphthaleneacetamide-soil agricultural" is the result of combining the following original LCA Commons flows: "1-Naphthaleneacetamide; unspec. appl. method; kg AI", "1-Naphthaleneacetamide; in seed furrow; kg AI", "1-Naphthaleneacetamide; broadcast without incorporation; kg AI", "1-Naphthaleneacetamide; banded or side-dressed; kg AI", "1-Naphthaleneacetamide; foliar or directed spray; kg AI", "1-Naphthaleneacetamide; broadcast with incorporation; kg AI".
Exchange "Dicamba-soil agricultural" is the result of combining the following original LCA Commons flows: "Dicamba; foliar or directed spray; kg AI", "Dicamba; broadcast with incorporation; kg AI", "Dicamba; banded or side-dressed; kg AI", "Dicamba; in seed furrow; kg AI", "Dicamba; unspec. appl. method; kg AI", "Dicamba; broadcast without incorporation; kg AI".
Exchange "Nicosulfuron-soil agricultural" is the result of combining the following original LCA Commons flows: "Nicosulfuron; broadcast without incorporation; kg AI", "Nicosulfuron; banded or side-dressed; kg AI", "Nicosulfuron; in seed furrow; kg AI", "Nicosulfuron; broadcast with incorporation; kg AI", "Nicosulfuron; foliar or directed spray; kg AI", "Nicosulfuron; unspec. appl. method; kg AI".
Exchange "Tebupirimphos-soil agricultural" is the result of combining the following original LCA Commons flows: "Tebupirimfos; broadcast with incorporation; kg AI", "Tebupirimfos; foliar or directed spray; kg AI", "Tebupirimfos; in seed furrow; kg AI", "Tebupirimfos; banded or side-dressed; kg AI", "Tebupirimfos; broadcast without incorporation; kg AI", "Tebupirimfos; unspec. appl. method; kg AI".
Exchange "Permethrin-soil agricultural" is the result of combining the following original LCA Commons flows: "Permethrin, mixed cis,trans; broadcast with incorporation; kg AI", "Permethrin, mixed cis,trans; unspec. appl. method; kg AI", "Permethrin, mixed cis,trans; in seed furrow; kg AI", "Permethrin, mixed cis,trans; foliar or directed spray; kg AI", "Permethrin, mixed cis,trans; banded or side-dressed; kg AI", "Permethrin, mixed cis,trans; broadcast without incorporation; kg AI".
Exchange "Carbon-soil agricultural" is the result of combining the following original LCA Commons flows: "Carbon; applied in dolomite", "Carbon; applied in sewage sludge", "Carbon; broadcast w/ incorp. in manure in fall before planting; biogenic", "Carbon; broadcast w/ incorp. in manure in spring before planting; biogenic", "Carbon; using unspec. method in manure in fall before planting; biogenic", "Carbon; broadcast w/o incorp. in manure in spring before planting; biogenic", "Carbon; broadcast w/o incorp. in manure in fall before planting; biogenic", "Carbon; in above-ground residue left on field; biogenic", "Carbon; applied in limestone", "Carbon; in below-ground residue; biogenic", "Carbon; using unspec. method in manure in spring before planting; biogenic".
Exchange "Particulates, < 2.5 um-air low population density" is the result of combining the following original LCA Commons flows: "PM2.5; from residue burning; kg C, biogenic", "PM2.5; from residue burning; kg except C, biogenic".
Exchange "Dimethenamid-soil agricultural" is the result of combining the following original LCA Commons flows: "Dimethenamid; broadcast with incorporation; kg AI", "Dimethenamid; broadcast without incorporation; kg AI", "Dimethenamid; in seed furrow; kg AI", "Dimethenamid; foliar or directed spray; kg AI", "Dimethenamid; unspec. appl. method; kg AI", "Dimethenamid; banded or side-dressed; kg AI".
Exchange "Chlorpyrifos-soil agricultural" is the result of combining the following original LCA Commons flows: "Chlorpyrifos; in seed furrow; kg AI", "Chlorpyrifos; broadcast without incorporation; kg AI", "Chlorpyrifos; foliar or directed spray; kg AI", "Chlorpyrifos; banded or side-dressed; kg AI", "Chlorpyrifos; unspec. appl. method; kg AI", "Chlorpyrifos; broadcast with incorporation; kg AI".
Exchange "Rimsulfuron-soil agricultural" is the result of combining the following original LCA Commons flows: "Rimsulfuron; unspec. appl. method; kg AI", "Rimsulfuron; foliar or directed spray; kg AI", "Rimsulfuron; broadcast with incorporation; kg AI", "Rimsulfuron; banded or side-dressed; kg AI", "Rimsulfuron; in seed furrow; kg AI", "Rimsulfuron; broadcast without incorporation; kg AI".
Exchange "Ash-soil agricultural" is the result of combining the following original LCA Commons flows: "Ash; from residue burning; kg except C, biogenic", "Ash; from residue burning; kg C, biogenic".
Exchange "Isoxaflutole-soil agricultural" is the result of combining the following original LCA Commons flows: "Isoxaflutole; unspec. appl. method; kg AI", "Isoxaflutole; broadcast without incorporation; kg AI", "Isoxaflutole; banded or side-dressed; kg AI", "Isoxaflutole; broadcast with incorporation; kg AI", "Isoxaflutole; foliar or directed spray; kg AI", "Isoxaflutole; in seed furrow; kg AI".
Exchange "Acetochlor-soil agricultural" is the result of combining the following original LCA Commons flows: "Acetochlor; in seed furrow; kg AI", "Acetochlor; broadcast without incorporation; kg AI", "Acetochlor; unspec. appl. method; kg AI", "Acetochlor; broadcast with incorporation; kg AI", "Acetochlor; foliar or directed spray; kg AI", "Acetochlor; banded or side-dressed; kg AI".
Exchange "Water-soil agricultural" is the result of combining the following original LCA Commons flows: "Water; from irrigation and applied with manure and sewage sludge", "Water; using unspec. method in manure", "Water; broadcast w/o incorp. in manure", "Water; in below-ground residue; biogenic", "Water; broadcast w/ incorp. in manure", "Water; in above-ground residue left on field; biogenic".
Exchange "Clopyralid-soil agricultural" is the result of combining the following original LCA Commons flows: "Clopyralid; in seed furrow; kg AI", "Clopyralid; foliar or directed spray; kg AI", "Clopyralid; broadcast without incorporation; kg AI", "Clopyralid; banded or side-dressed; kg AI", "Clopyralid; broadcast with incorporation; kg AI", "Clopyralid; unspec. appl. method; kg AI".
Exchange "Imazapyr-soil agricultural" is the result of combining the following original LCA Commons flows: "Imazapyr; banded or side-dressed; kg AI", "Imazapyr; foliar or directed spray; kg AI", "Imazapyr; broadcast with incorporation; kg AI", "Imazapyr; broadcast without incorporation; kg AI", "Imazapyr; in seed furrow; kg AI", "Imazapyr; unspec. appl. method; kg AI".
Exchange "Primisulfuron-soil agricultural" is the result of combining the following original LCA Commons flows: "Primisulfuron-methyl; broadcast without incorporation; kg AI", "Primisulfuron-methyl; unspec. appl. method; kg AI", "Primisulfuron-methyl; broadcast with incorporation; kg AI", "Primisulfuron-methyl; in seed furrow; kg AI", "Primisulfuron-methyl; banded or side-dressed; kg AI", "Primisulfuron-methyl; foliar or directed spray; kg AI".
Exchange "Water, unspecified origin-resource in water" is the result of combining the following original LCA Commons flows: "Water; from plant uptake; biogenic", "Water; withdrawal from unspec. source, for corn, in 2001".
Exchange "Diflufenzopyr-sodium-soil agricultural" is the result of combining the following original LCA Commons flows: "Diflufenzopyr-sodium; banded or side-dressed; kg AI", "Diflufenzopyr-sodium; in seed furrow; kg AI", "Diflufenzopyr-sodium; broadcast with incorporation; kg AI", "Diflufenzopyr-sodium; unspec. appl. method; kg AI", "Diflufenzopyr-sodium; foliar or directed spray; kg AI", "Diflufenzopyr-sodium; broadcast without incorporation; kg AI".
Exchange "Metolachlor-soil agricultural" is the result of combining the following original LCA Commons flows: "Propazine; in seed furrow; kg AI", "Propazine; unspec. appl. method; kg AI", "Propazine; broadcast without incorporation; kg AI", "Propazine; banded or side-dressed; kg AI", "Propazine; foliar or directed spray; kg AI", "Propazine; broadcast with incorporation; kg AI".
Exchange "Particulates, < 10 um-air low population density" is the result of combining the following original LCA Commons flows: "PM10; from residue burning; kg C, biogenic", "PM10; from residue burning; kg except C, biogenic".
Exchange "Cyfluthrin-soil agricultural" is the result of combining the following original LCA Commons flows: "Beta-Cyfluthrin; broadcast without incorporation; kg AI", "Beta-Cyfluthrin; banded or side-dressed; kg AI", "Beta-Cyfluthrin; unspec. appl. method; kg AI", "Beta-Cyfluthrin; broadcast with incorporation; kg AI", "Beta-Cyfluthrin; foliar or directed spray; kg AI", "Beta-Cyfluthrin; in seed furrow; kg AI".
Exchange "Flumetsulam-soil agricultural" is the result of combining the following original LCA Commons flows: "Flumetsulam; broadcast without incorporation; kg AI", "Flumetsulam; banded or side-dressed; kg AI", "Flumetsulam; broadcast with incorporation; kg AI", "Flumetsulam; in seed furrow; kg AI", "Flumetsulam; foliar or directed spray; kg AI", "Flumetsulam; unspec. appl. method; kg AI".
Exchange "Atrazine-soil agricultural" is the result of combining the following original LCA Commons flows: "Atrazine; in seed furrow; kg AI", "Atrazine; broadcast without incorporation; kg AI", "Atrazine; foliar or directed spray; kg AI", "Atrazine; unspec. appl. method; kg AI", "Atrazine; broadcast with incorporation; kg AI", "Atrazine; banded or side-dressed; kg AI".
Exchange "Transformation, from arable-resource land" is the result of combining the following original LCA Commons flows: "Transformation; from arable, from unspec. use to corn", "Transformation; from arable, from corn to corn", "Transformation; from arable, from soy to corn".
Exchange "Calcium-soil agricultural" is the result of combining the following original LCA Commons flows: "Calcium; applied in limestone", "Calcium; applied in dolomite".
Exchange "Lambda-cyhalothrin-soil agricultural" is the result of combining the following original LCA Commons flows: "Lambda-cyhalothrin; unspec. appl. method; kg AI", "Lambda-cyhalothrin; broadcast with incorporation; kg AI", "Lambda-cyhalothrin; foliar or directed spray; kg AI", "Lambda-cyhalothrin; in seed furrow; kg AI", "Lambda-cyhalothrin; broadcast without incorporation; kg AI", "Lambda-cyhalothrin; banded or side-dressed; kg AI".
Exchange "2,4-D-soil agricultural" is the result of combining the following original LCA Commons flows: "2,4-D; broadcast with incorporation; kg AI", "2,4-D; foliar or directed spray; kg AI", "2,4-D; broadcast without incorporation; kg AI", "2,4-D; banded or side-dressed; kg AI", "2,4-D; in seed furrow; kg AI", "2,4-D; unspec. appl. method; kg AI".
Exchange "Paraquat dichloride-soil unspecified" is the result of combining the following original LCA Commons flows: "Paraquat dichloride; unspec. appl. method; kg AI", "Paraquat dichloride; in seed furrow; kg AI", "Paraquat dichloride; broadcast with incorporation; kg AI", "Paraquat dichloride; broadcast without incorporation; kg AI", "Paraquat dichloride; banded or side-dressed; kg AI", "Paraquat dichloride; foliar or directed spray; kg AI".
Exchange "Phosphorus-c19fb2d9-98eb-4cd3-8761-81b71d8a9a1b unspecified" was originally named: "Phosphorous; from plant uptake; biogenic" in this dataset.
Exchange "Carbon dioxide-c19fb2d9-98eb-4cd3-8761-81b71d8a9a1b unspecified" was originally named: "Carbon dioxide; from plant uptake; kg C, biogenic" in this dataset.
Exchange "Nitrogen dioxide-2bdf9967-6dae-4183-88d1-8f612548c51e low population density" was originally named: "Nitrogen dioxide; from residue burning; kg N, biogenic" in this dataset.
Exchange "Carbon monoxide, fossil-2bdf9967-6dae-4183-88d1-8f612548c51e low population density" was originally named: "Carbon monoxide; from residue burning; kg C, biogenic" in this dataset.
Exchange "Ammonia-2bdf9967-6dae-4183-88d1-8f612548c51e low population density" was originally named: "Ammonia; from residue burning; kg N, biogenic" in this dataset.
Exchange "cis-2-Butene-2bdf9967-6dae-4183-88d1-8f612548c51e low population density" was originally named: "Cis 2 butene; from residue burning; kg C, biogenic" in this dataset.
Exchange "Formaldehyde-2bdf9967-6dae-4183-88d1-8f612548c51e low population density" was originally named: "Formaldehyde; from residue burning; kg C, biogenic" in this dataset.
Exchange "Zinc compounds-be1c0329-f1a8-4524-8420-a86d2a8dd358 agricultural" was originally named: "Zinc compounds; as secondary application" in this dataset.
Exchange "Butadiene-2bdf9967-6dae-4183-88d1-8f612548c51e low population density" was originally named: "1,3 butadiene; from residue burning; kg C, biogenic" in this dataset.
Exchange "Ethyne-2bdf9967-6dae-4183-88d1-8f612548c51e low population density" was originally named: "Acetylene; from residue burning; kg C, biogenic" in this dataset.
Exchange "Propane-2bdf9967-6dae-4183-88d1-8f612548c51e low population density" was originally named: "Propane; from residue burning; kg C, biogenic" in this dataset.
Exchange "Acrylonitrile-2bdf9967-6dae-4183-88d1-8f612548c51e low population density" was originally named: "Propenenitrile; from residue burning; kg C, biogenic" in this dataset.
Exchange "trans-2-Butene-2bdf9967-6dae-4183-88d1-8f612548c51e low population density" was originally named: "Trans 2 butene; from residue burning; kg C, biogenic" in this dataset.
Exchange "Butane-2bdf9967-6dae-4183-88d1-8f612548c51e low population density" was originally named: "N butane; from residue burning; kg C, biogenic" in this dataset.
Exchange "isobutene-2bdf9967-6dae-4183-88d1-8f612548c51e low population density" was originally named: "I butene; from residue burning; kg C, biogenic" in this dataset.
Exchange "Acetone-2bdf9967-6dae-4183-88d1-8f612548c51e low population density" was originally named: "Acetone; from residue burning; kg C, biogenic" in this dataset.
Exchange "Benzene-2bdf9967-6dae-4183-88d1-8f612548c51e low population density" was originally named: "Benzene; from residue burning; kg C, biogenic" in this dataset.
Exchange "Toluene-2bdf9967-6dae-4183-88d1-8f612548c51e low population density" was originally named: "Toluene; from residue burning; kg C, biogenic" in this dataset.
Exchange "Formic acid-2bdf9967-6dae-4183-88d1-8f612548c51e low population density" was originally named: "Formic acid; from residue burning; kg C, biogenic" in this dataset.
Exchange "Methane-2bdf9967-6dae-4183-88d1-8f612548c51e low population density" was originally named: "Methane; from residue burning; kg C, biogenic" in this dataset.
Exchange "Hydrocyanic acid-2bdf9967-6dae-4183-88d1-8f612548c51e low population density" was originally named: "Hydrogen cyanide; from residue burning; kg C, biogenic" in this dataset.
Exchange "Acetonitrile-2bdf9967-6dae-4183-88d1-8f612548c51e low population density" was originally named: "Acetonitrile; from residue burning; kg C, biogenic" in this dataset.
Exchange "Sulfuric acid-be1c0329-f1a8-4524-8420-a86d2a8dd358 agricultural" was originally named: "Sulfuric acid; as secondary application" in this dataset.
Exchange "Furan-2bdf9967-6dae-4183-88d1-8f612548c51e low population density" was originally named: "Furan; from residue burning; kg C, biogenic" in this dataset.
Exchange "Sulfur dioxide-2bdf9967-6dae-4183-88d1-8f612548c51e low population density" was originally named: "Sulfur dioxide; from residue burning; biogenic" in this dataset.
Exchange "Magnesium-be1c0329-f1a8-4524-8420-a86d2a8dd358 agricultural" was originally named: "Magnesium; applied in dolomite" in this dataset.
Exchange "Acetic acid-2bdf9967-6dae-4183-88d1-8f612548c51e low population density" was originally named: "Acetic acid; from residue burning; kg C, biogenic" in this dataset.
Exchange "Ethene-2bdf9967-6dae-4183-88d1-8f612548c51e low population density" was originally named: "Ethylene; from residue burning; kg C, biogenic" in this dataset.
Exchange "Ethane-2bdf9967-6dae-4183-88d1-8f612548c51e low population density" was originally named: "Ethane; from residue burning; kg C, biogenic" in this dataset.
Exchange "Water-2bdf9967-6dae-4183-88d1-8f612548c51e low population density" was originally named: "Water; from residue burning; biogenic" in this dataset.
Exchange "Isoprene-2bdf9967-6dae-4183-88d1-8f612548c51e low population density" was originally named: "Isoprene; from residue burning; kg C, biogenic" in this dataset.
Exchange "Pentane-2bdf9967-6dae-4183-88d1-8f612548c51e low population density" was originally named: "N pentane; from residue burning; kg C, biogenic" in this dataset.
Exchange "Transformation, to arable-c19fb2d9-98eb-4cd3-8761-81b71d8a9a1b land" was originally named: "Transformation; to arable, to corn" in this dataset.
Exchange "Propene-2bdf9967-6dae-4183-88d1-8f612548c51e low population density" was originally named: "Propylene; from residue burning; kg C, biogenic" in this dataset.
Exchange "Occupation, arable-c19fb2d9-98eb-4cd3-8761-81b71d8a9a1b land" was originally named: "Occupation; arable, as corn" in this dataset.
Exchange "Phenol-2bdf9967-6dae-4183-88d1-8f612548c51e low population density" was originally named: "Phenol; from residue burning; kg C, biogenic" in this dataset.
Exchange "Water, ground-c19fb2d9-98eb-4cd3-8761-81b71d8a9a1b in water" was originally named: "Water; withdrawal from groundwater, for corn, in 2001" in this dataset.
Exchange "Carbon dioxide, in air-2bdf9967-6dae-4183-88d1-8f612548c51e low population density" was originally named: "Carbon dioxide; from residue burning; kg C, biogenic" in this dataset.
Exchange "Sulfur-be1c0329-f1a8-4524-8420-a86d2a8dd358 agricultural" was originally named: "Sulfur; as secondary application" in this dataset.
Exchange "isopentane-2bdf9967-6dae-4183-88d1-8f612548c51e low population density" was originally named: "I pentane; from residue burning; kg C, biogenic" in this dataset.
Exchange "Methanol-2bdf9967-6dae-4183-88d1-8f612548c51e low population density" was originally named: "Methanol; from residue burning; kg C, biogenic" in this dataset.
Exchange "Dinitrogen monoxide-2bdf9967-6dae-4183-88d1-8f612548c51e low population density" was originally named: "Dinitrogen monoxide; from residue burning; kg N, biogenic" in this dataset.
Exchange "1-Butene-2bdf9967-6dae-4183-88d1-8f612548c51e low population density" was originally named: "1 butene; from residue burning; kg C, biogenic" in this dataset.
Exchange "Acetaldehyde-2bdf9967-6dae-4183-88d1-8f612548c51e low population density" was originally named: "Acetaldehyde; from residue burning; kg C, biogenic" in this dataset.

## Geography
The unit process is assumed to represent production in Illinois (US State).

## Technology
This process produces corn grain; at harvest in 2001; at farm; 85%-91% moisture. The process is assumed to represent production in Illinois (US State). Yields and related inputs and outputs represent a single year of operation, in 2001. This dataset includes consideration of residue burning; soil preparation; planting or sowing; irrigation; application, storage, and transport of fertilizers, manures, liming materials, secondary materials, and pesticides; and harvest. Fate and transport of applications are not included as described in Cooper, J.S., Kahn, E., Noon, M. (2012) LCA Digital Commons Unit Process Data: field crop production Version 1 which is available at https://www.lcacommons.gov/discovery/docs/LCA%20Digital%20Commons%20Unit%20Process%20Data%20final%20updated.pdf

## Time period
Start and end dates match the underlying data obtained from the USDA Agricultural Resource Management Survey (ARMS).
## Parameters
- p0647: 0; = IF(p0383<0.5;-SQRT(p0007*EXP(p0515^2*p0008)-p0007);SQRT(p0007*EXP(p0515^2*p0008)-p0007))
- p0927: 0.00666409; = IF(p0918+p0923+p0924+p0925+p0926=1;0;1-(p0918+p0923+p0924+p0925+p0926))
- p4082: 1.05185e-6; = p1939*p3478
- p2732: 2.5116e-6; = p2341*(p1078+p1080)
- p0732: 0
- p2891: 1.01986e-6; = p2305*(p1079+p1081)
- p2450: 0.000249225; = p2254*p1014
- p2037: 2.3
- p1589: 0.897233
- p3539: 1.03917e-7; = p1808*p3476
- p1833: 0
- p5280: 1.15098e-8; = p1901*p3484
- p3400: 0.000644625; = p3362*p1238
- p1355: 152
- p2837: 7.65619e-7; = p2251*(p1020+p1022)
- p1802: 0
- p2597: 0; = p2401*p1014
- p1126: 0; = if(p1121=0;p0720/100;0)
- p2130: 1.98351e-7; = p2015*p2058*p2092/(p0818*1000)
- p1734: 0.7899
- p3049: 1.76992e-6; = p2268*p1082
- p0992: 0; = p0988*p0001*p0004/(p0818*p0002)
- p3191: 0; = p2410*p1023
- p5197: 3.91824e-9; = p1818*p3484
- p3482: 0; = if(p1328+p1330+p1332+p1334+p1336+p1338+p1340+p1342+p1344=0;0;p1340/(p1328+p1330+p1332+p1334+p1336+p1338+p1340+p1342+p1344))
- p0663: 0; = IF(p0399<0.5;-SQRT(p0007*EXP(p0531^2*p0008)-p0007);SQRT(p0007*EXP(p0531^2*p0008)-p0007))
- p3134: 6.69214e-8; = p2353*p1132
- p0885: 0; = IF(p0689+p0884=100;0;100-(p0689+p0884))
- p1137: 0; = if(p1121=0;p1131*(p0716/100)*p0703*1000;0)
- p2173: 0.0572899; = p0895*p0898/p0818
- p3067: 0; = p2286*p1023
- p3182: 0; = p2401*p1023
- p2332: 4.06695e-5; = p2224*p2200
- p0183: 161.719
- p1293: 0; = p1287*p1252/p0818
- p1910: 0
- p1650: 0
- p0698: 0
- p2202: 0.000278863; = 4*1.00794*p2201/(2*14.0067)
- p2229: 0; = if(p0774*p0778+p0775*p0779+p0776*p0780+p0777*p0781=0;0;p0781*p0777/(p0774*p0778+p0775*p0779+p0776*p0780+p0777*p0781))
- p0502: 0; = SQRT(2)*(IF((2*p0370-1)<0;-1;IF((2*p0370-1)>0;1;0))*SQRT(SQRT((2/(pi()*0.140012289)+LN(1-(2*p0370-1)^2)/2)^2-LN(1-(2*p0370-1)^2)/0.140012289)-(2/(pi()*0.140012289)+LN(1-(2*p0370-1)^2)/2)))
- p2592: 0; = p2396*p1014
- p2092: 0.54529
- p2775: 0; = p2384*(p1078+p1080)
- p1581: 0
- p0807: 56
- p5100: 2.23636e-6; = p1927*p3483
- p3367: 0.000577414; = if(p1232=0;p3244*p3361/p0818;0)
- p2091: 0.374844
- p1231: 0.0130701; = IF(p1221=0;0;p1230*(p1228+p1229))
- p4373: 0; = p1818*p3480
- p1936: 0
- p1184: 1.52261e-8; = p1182/p0818
- p2877: 3.19454e-6; = p2291*(p1020+p1022)
- p0751: 17.899; = p0091*(1+p0619*p0223/100)
- p2637: 1.16569e-5; = p2246*(p1019+p1021)
- p2813: 0; = p2422*(p1078+p1080)
- p3016: 0; = p2430*(p1129+p1131)
- p2529: 4.091e-6; = p2333*p1014
- p0810: 0
- p1175: 0.000135552
- p3496: 3.67308e-6; = p1765*p3476
- p2744: 9.34542e-7; = p2353*(p1128+p1130)
- p2684: 0.000977304; = p2293*(p1019+p1021)
- p0048: 18.342
- p4894: 0; = p1927*p3482
- p2809: 0; = p2418*(p1078+p1080)
- p2582: 0; = p2386*p1073
- p0988: 0; = p0982*p0886
- p1232: 0
- p0641: 0; = IF(p0377<0.5;-SQRT(p0007*EXP(p0509^2*p0008)-p0007);SQRT(p0007*EXP(p0509^2*p0008)-p0007))
- p3208: 0; = p2427*p1082
- p2587: 0; = p2391*p1123
- p2890: 0.000663055; = p2304*(p1079+p1081)
- p0395: 0.5
- p2452: 1.53779e-5; = p2256*p1014
- p3164: 0; = p2383*p1082
- p1060: 0.21
- p1573: 0
- p0551: 0; = IF(p0287<0.5;-SQRT(p0007*EXP(p0419^2*p0008)-p0007);SQRT(p0007*EXP(p0419^2*p0008)-p0007))
- p1345: 4.68588e-6; = IF(p1318=0;p1344*p0001/(p0818*p0002);0)
- p3142: 0; = p2361*p1023
- p1893: 0
- p0926: 0; = IF(p0918+p0923+p0924+p0925=1;0;IF(p0918+p0923+p0924+p0925+p0922>1;1-(p0918+p0923+p0924+p0925);p0922))
- p0534: 0; = SQRT(2)*(IF((2*p0402-1)<0;-1;IF((2*p0402-1)>0;1;0))*SQRT(SQRT((2/(pi()*0.140012289)+LN(1-(2*p0402-1)^2)/2)^2-LN(1-(2*p0402-1)^2)/0.140012289)-(2/(pi()*0.140012289)+LN(1-(2*p0402-1)^2)/2)))
- p0898: 0.458721
- p0959: 0; = if(and(p0683>0;or(p0807=480;p0807=32;p0807=1;and(p0807=60;p0901<0.03)));p0935;0)
- p3309: 2.47998e7; = if(and(p1232=0;p3252<>0);p3252*(p3260-p3304)/p3305;0)
- p3460: 0.000106665; = p3365*p1241
- p4451: 0; = p1896*p3480
- p0011: 9932.75
- p0920: 0.178249; = p0676*1000/p0801
- p3456: 0; = p3380*p1240
- p0994: 0; = p0990*p0001*p0004/(p0818*p0002)
- p0553: 0; = IF(p0289<0.5;-SQRT(p0007*EXP(p0421^2*p0008)-p0007);SQRT(p0007*EXP(p0421^2*p0008)-p0007))
- p1778: 0
- p2143: 3.92131e-8; = p2015*p2071*p2105/(p0818*1000)
- p3291: 0.437
- p0693: 0
- p2538: 1.58524e-7; = p2342*p1073
- p1178: 1.6145e-8; = p1176/p0818
- p0474: 0; = SQRT(2)*(IF((2*p0342-1)<0;-1;IF((2*p0342-1)>0;1;0))*SQRT(SQRT((2/(pi()*0.140012289)+LN(1-(2*p0342-1)^2)/2)^2-LN(1-(2*p0342-1)^2)/0.140012289)-(2/(pi()*0.140012289)+LN(1-(2*p0342-1)^2)/2)))
- p0888: 0; = p0686*1000*p0687*p0884/100
- p2305: 1.81926e-6; = p2227*p2212
- p0286: 0.5
- p2593: 0; = p2397*p1014
- p3119: 1.56952e-7; = p2338*p1082
- p2465: 1.94469e-5; = p2269*p1073
- p3170: 0; = p2389*p1132
- p1966: 1.085e7; = if(p0814=0;p0802;0)
- p2413: 0; = p2234*p2203
- p2014: 4.19344e7; = p0833*p2011*p2013
- p1110: 9.03601e7; = IF(p1071=0;p1105*p1104*p1095;0)
- p2118: 0.679049
- p2618: 0; = p2422*p1073
- p2685: 0.000418993; = p2294*(p1019+p1021)
- p2010: 0.00214605; = ((p1984*p1985+p1990*p1991+p1996*p1997+p2004*p2005)/p0818)*p0005*p0002/1000
- p2021: 7.57896e-6; = p2020/p0818
- p0104: 98.2
- p1144: 2.39268e-6; = if(p1121=0;p1138*p0001/(p0818*p0002);0)
- p1112: 0.209482
- p2434: 7.20259e-5; = p2238*p1014
- p2832: 1.29939e-5; = p2246*(p1020+p1022)
- p1856: 0
- p2241: 0.000241805; = p2222*p2186
- p2470: 2.19477e-5; = p2274*p1123
- p2158: 4.32319e-8; = p2015*p2082*p2120/(p0818*1000)
- p0904: 1.89794e9; = p0825*p0901+p0827*p0902+(p0830+p0895)*p0824*p0903
- p2485: 0.00166615; = p2289*p1014
- p2362: 8.63692e-5; = p2225*p2190
- p2309: 4.5174e-5; = p2227*p2216
- p1313: 0; = p1307*p1252/p0818
- p2759: 4.63182e-7; = p2368*(p1019+p1021)
- p2262: 0.000500688; = p2226*p2208
- p0677: 0
- p2541: 3.33892e-8; = p2345*p1073
- p1878: 0
- p2365: 0.000889; = p2225*p2193
- p0985: 1; = IF(p0982=1;0;IF(p0982+p0983>1;1-p0982;p0983))
- p2308: 0.000334645; = p2227*p2215
- p2263: 0.000226417; = p2226*p2209
- p1646: 0
- p1695: 0
- p0979: 0; = IF(p0976=0;0;p0976*p0001/(p0818*p0002))
- p3259: 0.00796296
- p2709: 1.67772e-6; = p2318*(p1019+p1021)
- p3235: 0.118093
- p2608: 0; = p2412*p1014
- p3241: 4.77308e-10; = p3234*p1188*p3236/p0818
- p3657: 5.01352e-9; = p1926*p3476
- p2194: 0.214362
- p1742: 0
- p5189: 3.61213e-8; = p1810*p3484
- p2909: 1.97836e-6; = p2323*(p1020+p1022)
- p0786: 0
- p3320: 0; = if(and(p1232=0;p3253<>0);p3253*(p3264-p3315)/p3316;0)
- p3442: 0; = p3366*p1240
- p0444: 0; = SQRT(2)*(IF((2*p0312-1)<0;-1;IF((2*p0312-1)>0;1;0))*SQRT(SQRT((2/(pi()*0.140012289)+LN(1-(2*p0312-1)^2)/2)^2-LN(1-(2*p0312-1)^2)/0.140012289)-(2/(pi()*0.140012289)+LN(1-(2*p0312-1)^2)/2)))
- p0367: 0.5
- p0871: 0.0804; = p0870*p0001*p0003/(p0818*p0002)
- p1119: 0.00870397; = IF(p1071=0;p1109/(p1114*p0818);0)
- p3586: 3.58239e-7; = p1855*p3476
- p0719: 53.813; = p0059*(1+p0587*p0191/100)
- p2935: 7.41956e-6; = p2349*(p1079+p1081)
- p1327: 0.0440968; = if(p1318=0;if(p1327a=0;1;if(p1327a<0;0;p1327a));0)
- p1813: 0
- p3144: 0; = p2363*p1023
- p1764: 0
- p0238: 8.895
- p1692: 0.454882
- p3255: 0; = p1252*(p1297*(1-p3247)+p1300*(1-p3248)+p1301*(1-p3249)+p1302*(1-p3250))
- p3106: 0; = p2325*p1023
- p5155: 1.35914e-8; = p1776*p3484
- p3914: 8.50077e-5; = p1771*p3478
- p2918: 1.64077e-5; = p2332*(p1020+p1022)
- p0166: 88.887
- p2655: 3.59051e-5; = p2264*(p1078+p1080)
- p0419: 0; = SQRT(2)*(IF((2*p0287-1)<0;-1;IF((2*p0287-1)>0;1;0))*SQRT(SQRT((2/(pi()*0.140012289)+LN(1-(2*p0287-1)^2)/2)^2-LN(1-(2*p0287-1)^2)/0.140012289)-(2/(pi()*0.140012289)+LN(1-(2*p0287-1)^2)/2)))
- p3435: 0; = p3378*p1239
- p1708: 0
- p1266: 0.4893; = if(p1232>0;0;IF(p1259+p1263+p1264+p1265=1;0;1-(p1259+p1263+p1264+p1265)))
- p2668: 0.00028244; = p2277*(p1019+p1021)
- p2243: 0.0004452; = p2222*p2188
- p0290: 0.5
- p1919: 0
- p2245: 0.000128075; = p2222*p2190
- p2747: 8.57895e-6; = p2356*(p1019+p1021)
- p3248: 0
- p0349: 0.5
- p1752: 0
- p1627: 0
- p3224: 0.501945; = IF(p3216=0;0;1-p3221-p3222-p3223)
- p0784: 112.292; = p0124*(1+p0652*p0256/100)
- p4992: 1.66117e-6; = p1819*p3483
- p1770: 0
- p1340: 0; = p1325*p0801
- p5249: 1.34689e-9; = p1870*p3484
- p1239: 0; = if(p1232>0;0;IF(p1234+p1238=1;0;IF(p1234+p1238+p1236>1;1-(p1234+p1238);p1236)))
- p0402: 0.5
- p4142: 1.88295e-6; = p1793*p3479
- p2739: 5.42379e-7; = p2348*(p1078+p1080)
- p3953: 1.77312e-6; = p1810*p3478
- p4326: 0; = p1771*p3480
- p2169: 0.000314711; = p2166*(p0908)
- p1117: 0.000895352; = IF(p1071=0;p1107/(p1112*p0818);0)
- p1224: 0.44; = IF(p1221=0;0;IF(p1193=0;1-p1223;0))
- p3477: 0; = if(p1328+p1330+p1332+p1334+p1336+p1338+p1340+p1342+p1344=0;0;p1330/(p1328+p1330+p1332+p1334+p1336+p1338+p1340+p1342+p1344))
- p1920: 0
- p0916: 0.529205; = p0826+p0828+(p0832*(1+p0894))/p0818
- p3374: 0; = if(p1232=0;p3246*p3356/p0818;0)
- p2581: 0; = p2385*p1073
- p3286: 0.185
- p0572: 0; = IF(p0308<0.5;-SQRT(p0007*EXP(p0440^2*p0008)-p0007);SQRT(p0007*EXP(p0440^2*p0008)-p0007))
- p3450: 0; = p3374*p1240
- p2550: 0.00022127; = p2354*p1014
- p1737: 0
- p2132: 7.34651e-8; = p2015*p2060*p2094/(p0818*1000)
- p5028: 5.75189e-7; = p1855*p3483
- p3310: 2.90552e8; = if(and(p1232=0;p3252<>0);IF((p3306+p3307+p3308+p3309)+(p3252*(p3257*(1-p3277))/p3305)>p3252;p3252-(p3306+p3307+p3308+p3309);p3252*(p3257*(1-p3277))/p3305);0)
- p0963: 0; = if(and(p0683>0;or(p0807=480;p0807=32;p0807=1;and(p0807=60;p0901<0.03)));p0939;0)
- p2123: 0.263965
- p0227: 136.281
- p3436: 0; = p3379*p1239
- p0064: 7.562
- p0176: 1.157
- p0463: 0; = SQRT(2)*(IF((2*p0331-1)<0;-1;IF((2*p0331-1)>0;1;0))*SQRT(SQRT((2/(pi()*0.140012289)+LN(1-(2*p0331-1)^2)/2)^2-LN(1-(2*p0331-1)^2)/0.140012289)-(2/(pi()*0.140012289)+LN(1-(2*p0331-1)^2)/2)))
- p4893: 0; = p1926*p3482
- p2986: 0; = p2400*(p1020+p1022)
- p1805: 0
- p3129: 2.72312e-8; = p2348*p1082
- p1258: 1; = if(p1232>0;0;IF(p1253+p1256+p1257=1;0;1-(p1253+p1256+p1257)))
- p1680: 0
- p3207: 0; = p2426*p1082
- p1615: 0.445163
- p2612: 0; = p2416*p1073
- p3700: 0; = p1763*p3477
- p2811: 0; = p2420*(p1078+p1080)
- p2676: 2.96333e-5; = p2285*(p1019+p1021)
- p4524: 2.56024e-7; = p1763*p3481
- p2004: 30
- p1565: 0
- p3116: 0; = p2335*p1023
- p0024: 5.169
- p0546: 0; = IF(p0282<0.5;-SQRT(p0007*EXP(p0414^2*p0008)-p0007);SQRT(p0007*EXP(p0414^2*p0008)-p0007))
- p1127: 0; = if(p1121=0;p0721/100;0)
- p3132: 5.90325e-7; = p2351*p1132
- p1310: 0; = IF(p1307=p1266;0;IF(p1307+p1308>p1266;p1266-p1307;p1308))
- p2019: 0.13105
- p3479: 0.168345; = if(p1328+p1330+p1332+p1334+p1336+p1338+p1340+p1342+p1344=0;0;p1334/(p1328+p1330+p1332+p1334+p1336+p1338+p1340+p1342+p1344))
- p2736: 2.28407e-7; = p2345*(p1078+p1080)
- p2329: 7.26598e-8; = p2224*p2197
- p3323: 0; = if(and(p1232=0;p3255<>0);p3265*p3277*(p3299*p3291+(1-p3299)*p3295);0)
- p0940: 0; = if(and(p0683=0;p0946=0);p0934;0)
- p2598: 0; = p2402*p1014
- p2431: 0; = p2236*p2221
- p1697: 0.705252
- p2976: 0; = p2390*(p1129+p1131)
- p1216: 0.155559
- p3324: 0; = if(and(p1232=0;p3255<>0);p3266*(p3279*(p3284*p1256+p3286*(p1253+p1257)+p1258*p3288+p3299*p3287));0)
- p0399: 0.5
- p1776: 1.20188e-6; = p1368*1000/p0818
- p0433: 0; = SQRT(2)*(IF((2*p0301-1)<0;-1;IF((2*p0301-1)>0;1;0))*SQRT(SQRT((2/(pi()*0.140012289)+LN(1-(2*p0301-1)^2)/2)^2-LN(1-(2*p0301-1)^2)/0.140012289)-(2/(pi()*0.140012289)+LN(1-(2*p0301-1)^2)/2)))
- p0330: 0.5
- p3027: 0; = p2246*p1023
- p1318: 0; = p1317*p0001/(p0818*p0002)
- p0607: 0; = IF(p0343<0.5;-SQRT(p0007*EXP(p0475^2*p0008)-p0007);SQRT(p0007*EXP(p0475^2*p0008)-p0007))
- p1784: 0
- p2846: 0.000157982; = p2260*(p1079+p1081)
- p0672: 0
- p4363: 0; = p1808*p3480
- p2340: 1.51221e-5; = p2228*p2208
- p2415: 0; = p2235*p2205
- p3306: 2.56041e8; = if(and(p1232=0;p3252<>0);p3252*(p3257*p3277-p3301)/p3305;0)
- p3159: 0; = p2378*p1082
- p3375: 0; = if(p1232=0;p3246*p3357/p0818;0)
- p0741: 2.768; = p0081*(1+p0609*p0213/100)
- p0890: 0; = p0686*1000*p0687*p0885/100
- p0673: 0
- p2134: 5.35563e-7; = p2015*p2062*p2096/(p0818*1000)
- p0406: 0; = SQRT(2)*(IF((2*p0274-1)<0;-1;IF((2*p0274-1)>0;1;0))*SQRT(SQRT((2/(pi()*0.140012289)+LN(1-(2*p0274-1)^2)/2)^2-LN(1-(2*p0274-1)^2)/0.140012289)-(2/(pi()*0.140012289)+LN(1-(2*p0274-1)^2)/2)))
- p2225: 0.158495; = if(p0765*p0769+p0766*p0770+p0767*p0771+p0768*p0772=0;0;p0772*p0768/(p0765*p0769+p0766*p0770+p0767*p0771+p0768*p0772))
- p2453: 0.000176296; = p2257*p1014
- p0873: 0.959536; = p0872*p0001*p0003/(p0818*p0002)
- p1909: 1.949e-7; = p1501*1000/p0818
- p2144: 3.35481e-8; = p2015*p2072*p2106/(p0818*1000)
- p2164: 0.000103988; = (p2015/p0818)-(p2022)-(p2035+p2036+p2052)-(p2017/p0818)-(p2039+p2041+p2044+p2158+p2159+p2160+p2161+p2162)
- p3441: 0; = p3365*p1240
- p3130: 2.44058e-7; = p2349*p1082
- p2324: 1.23316e-6; = p2224*p2191
- p4482: 0; = p1927*p3480
- p2290: 4.82426e-6; = p2223*p2197
- p1867: 4.43938e-7; = p1459*1000/p0818
- p3118: 4.84681e-7; = p2337*p1082
- p1621: 0
- p2712: 6.16936e-6; = p2321*(p1019+p1021)
- p1660: 0.731714
- p3936: 6.20893e-6; = p1793*p3478
- p3485: 2.88049e-7; = p1754*p3476
- p1943: 0
- p3422: 0; = p3365*p1239
- p2855: 0.00020305; = p2269*(p1079+p1081)
- p2474: 2.09651e-5; = p2278*p1014
- p1096: 0.00122322
- p0832: 2.89913e10; = p0831*p0830/(1-p0831)
- p3103: 0; = p2322*p1023
- p1213: 56
- p3338: 0; = if(and(p1232=0;p3254<>0);1-(p3334+p3335+p3336+p3337);0)
- p1889: 1.0752e-5; = p1481*1000/p0818
- p2151: 4.86728e-9; = p2015*p2079*p2113/(p0818*1000)
- p2725: 9.08237e-7; = p2334*(p1019+p1021)
- p0094: 5614.82
- p1181: 0.000127837
- p0575: 0; = IF(p0311<0.5;-SQRT(p0007*EXP(p0443^2*p0008)-p0007);SQRT(p0007*EXP(p0443^2*p0008)-p0007))
- p3476: 0.0420931; = if(p1328+p1330+p1332+p1334+p1336+p1338+p1340+p1342+p1344=0;0;p1328/(p1328+p1330+p1332+p1334+p1336+p1338+p1340+p1342+p1344))
- p2068: 0.153529
- p1154: 0.020452; = if(p1152*p0818=0;0;p1150/(p1152*p0818))
- p1323: 0; = IF(((p0745*1000*p0750/100)+(p0754*1000*p0759/100))/p0801<0;0;((p0745*1000*p0750/100)+(p0754*1000*p0759/100))/p0801)
- p0747: 0
- p2228: 0.0154559; = if(p0774*p0778+p0775*p0779+p0776*p0780+p0777*p0781=0;0;p0780*p0776/(p0774*p0778+p0775*p0779+p0776*p0780+p0777*p0781))
- p1933: 0
- p0868: 0; = IF(p0858+p0864+p0865+p0866+p0867=1;0;IF(p0858+p0864+p0865+p0866+p0867+p0863>1;1-(p0858+p0864+p0865+p0866+p0867);p0863))
- p1836: 0
- p2280: 0.000614698; = p2223*p2186
- p1336: 0; = p1323*p0801
- p1085: 4.67511e6; = IF(p1071=0;p1079*(p0710/100)*p0703*1000;0)
- p0791: 59.228; = p0131*(1+p0659*p0263/100)
- p4670: 3.03186e-8; = p1909*p3481
- p0623: 0; = IF(p0359<0.5;-SQRT(p0007*EXP(p0491^2*p0008)-p0007);SQRT(p0007*EXP(p0491^2*p0008)-p0007))
- p1944: 0
- p1243: 150521; = if(p1232>0;0;p1238*(p0725/100)*p0723*1000)
- p2124: 0.263965
- p1673: 0
- p1013: 0; = p1012*p0001/(p0818*p0002)
- p1253: 0; = if(p1232>0;0;p0735/100)
- p0950: 0; = if(and(p0683=0;or(p0807=480;p0807=32;p0807=1;and(p0807=60;p0901<0.03)));p0938;0)
- p3349: 0.816024; = if(and(p1232=0;p3256<>0);1-(p3345+p3346+p3347+p3348);0)
- p0236: 1.157
- p3090: 8.33008e-7; = p2309*p1082
- p5062: 7.2667e-7; = p1889*p3483
- p4265: 5.46839e-9; = p1916*p3479
- p4938: 5.89751e-6; = p1765*p3483
- p2862: 0.00143424; = p2276*(p1020+p1022)
- p2740: 4.86105e-6; = p2349*(p1078+p1080)
- p2640: 0.000102278; = p2249*(p1019+p1021)
- p4777: 0; = p1810*p3482
- p2176: 0.00189747; = p0895*p0913/p0818
- p1662: 0
- p2815: 0; = p2424*(p1078+p1080)
- p0229: 143.939
- p1014: 0.23463; = IF(p1012=0;p0705/100;0)
- p2398: 0; = p2234*p2187
- p0855: 0.474099; = p0854*p0001*p0003/(p0818*p0002)
- p0175: 0
- p2755: 6.36162e-5; = p2364*(p1019+p1021)
- p1590: 0
- p3227: 0.000446334; = p3223*p1229
- p2356: 2.37033e-5; = p2225*p2184
- p3076: 0; = p2295*p1023
- p4688: 5.14743e-6; = p1927*p3481
- p3317: 0; = if(and(p1232=0;p3253<>0);p3253*(p3261*p3277-p3312)/p3316;0)
- p2584: 0; = p2388*p1073
- p2337: 2.62842e-5; = p2228*p2205
- p0187: 189.501
- p1624: 0
- p2721: 4.31636e-8; = p2330*(p1019+p1021)
- p4318: 0; = p1763*p3480
- p1634: 0
- p1304: 0; = p1300*p1252/p0818
- p1194: 1.48
- p1963: 0.000209009; = p1963a+p1963b+p1963c+p1963d+p1963e+p1963f+p1963g+p1963h+p1963i+p1963j+p1963k
- p2718: 3.91598e-6; = p2327*(p1019+p1021)
- p2528: 9.54228e-6; = p2332*p1014
- p0767: 19.961; = p0107*(1+p0635*p0239/100)
- p3368: 0.00198628; = if(p1232=0;p3245*p3356/p0818;0)
- p2756: 0.000321756; = p2365*(p1019+p1021)
- p1620: 0
- p1107: 1.73221e7; = IF(p1071=0;p1105*p1101*p1095;0)
- p2017: 1.23867e7; = p2015*p0898
- p3285: 0.275
- p0739: 2.998; = p0079*(1+p0607*p0211/100)
- p3433: 0; = p3376*p1239
- p0459: 0; = SQRT(2)*(IF((2*p0327-1)<0;-1;IF((2*p0327-1)>0;1;0))*SQRT(SQRT((2/(pi()*0.140012289)+LN(1-(2*p0327-1)^2)/2)^2-LN(1-(2*p0327-1)^2)/0.140012289)-(2/(pi()*0.140012289)+LN(1-(2*p0327-1)^2)/2)))
- p1518: 11
- p1260: 0; = if(p1232>0;0;p0731/100)
- p0389: 0.5
- p1745: 0
- p2089: 0.40001
- p0772: 22.558; = p0112*(1+p0640*p0244/100)
- p3440: 0; = p3364*p1240
- p2957: 0.000288989; = p2371*(p1020+p1022)
- p1025: 1.92887e6; = IF(p1012=0;p1019*(p0704/100)*p0703*1000;0)
- p4359: 0; = p1804*p3480
- p2975: 0; = p2389*(p1129+p1131)
- p3540: 3.69177e-8; = p1809*p3476
- p0688: 0
- p3453: 0; = p3377*p1240
- p0850: 0.326261
- p0716: 81.763; = p0056*(1+p0584*p0188/100)
- p3273: 0.753577
- p0824: 0.643929
- p1550: 0.783979
- p2595: 0; = p2399*p1014
- p2672: 3.20196e-5; = p2281*(p1019+p1021)
- p1849: 0
- p1604: 0.92902
- p0084: 42.43
- p5040: 3.00035e-8; = p1867*p3483
- p2530: 5.88787e-7; = p2334*p1014
- p1576: 0
- p1978: 127
- p2833: 0.000105155; = p2247*(p1020+p1022)
- p0383: 0.5
- p1024: 2.53527e6; = IF(p1012=0;p1014*(p0704/100)*p0703*1000;0)
- p0266: 39.243
- p2012: 0.00122471
- p2077: 0.043
- p4044: 5.64995e-7; = p1901*p3478
- p0154: 0
- p3452: 0; = p3376*p1240
- p1855: 8.51062e-6; = p1447*1000/p0818
- p0142: 0
- p0376: 0.5
- p3391: 0.00143147; = p3372*p1234
- p2849: 0.000126927; = p2263*(p1079+p1081)
- p0108: 106.541
- p2870: 0.000131353; = p2284*(p1020+p1022)
- p4288: 3.18989e-7; = p1939*p3479
- p3424: 0; = p3367*p1239
- p0078: 11003.4
- p3131: 4.18905e-7; = p2350*p1132
- p2841: 0.000183724; = p2255*(p1020+p1022)
- p0996: 0; = if(p0888=0;0;if((p0691*p0690*1000*p0692/100)/p0888>1;1;(p0691*p0690*1000*p0692/100)/p0888))
- p1040: 0.0268348
- p1531: 175
- p0025: 7.93
- p0022: 11003.4
- p1702: 0
- p3297: 0; = if(p1273+p1274+p1275+p1276=0;0;p1273/(p1273+p1274+p1275+p1276))
- p2662: 0.000160948; = p2271*(p1078+p1080)
- p1003: 0; = p0999*p0888
- p4250: 1.71343e-7; = p1901*p3479
- p3243: 4.42655e-10; = p3234*p1188*p3239/p0818
- p1751: 0
- p3136: 0; = p2355*p1023
- p0789: 4.323; = p0129*(1+p0657*p0261/100)
- p2992: 0; = p2406*(p1020+p1022)
- p0453: 0; = SQRT(2)*(IF((2*p0321-1)<0;-1;IF((2*p0321-1)>0;1;0))*SQRT(SQRT((2/(pi()*0.140012289)+LN(1-(2*p0321-1)^2)/2)^2-LN(1-(2*p0321-1)^2)/0.140012289)-(2/(pi()*0.140012289)+LN(1-(2*p0321-1)^2)/2)))
- p1103: 0.597746; = IF(p1071=0;IF(p1096+p1101+p1102=1;0;IF(p1096+p1101+p1102+p1099>1;1-(p1096+p1101+p1102);p1099));0)
- p1302: 0; = IF(p1297+p1300+p1301=p1262;0;p1262-(p1297+p1300+p1301))
- p2882: 0.00077061; = p2296*(p1020+p1022)
- p2402: 0; = p2234*p2191
- p2302: 0.000209187; = p2227*p2209
- p2830: 4.51419e-5; = p2244*(p1020+p1022)
- p3250: 0.875
- p0712: 36.728; = p0052*(1+p0580*p0184/100)
- p3075: 0; = p2294*p1023
- p2679: 0.000260002; = p2288*(p1019+p1021)
- p1002: 0; = p0996*p0888
- p1357: 8059
- p2040: 1.19
- p3371: 0.000393607; = if(p1232=0;p3245*p3359/p0818;0)
- p3394: 0; = p3375*p1234
- p1248: 1.45408e-6; = if(p1232>0;0;p1243*p0001/(p0818*p0002))
- p1207: 352.83; = if(p1193>0;0;(p1194*p1050/p1057+p1195*p1051/p1058+p1196*p1052/p1059+p1197*p1053/p1060+p1198*p1054/p1061+p1199*p1055/p1062+p1200*p1056/p1063)/(p0702*1000)+(p1201*p1109/p1114+p1202*p1110/p1115)/(p0702*1000)+p1203*p1170/p0801+p1204*p1176/p0801)
- p2860: 0.000236735; = p2274*(p1129+p1131)
- p4168: 4.13775e-6; = p1819*p3479
- p3028: 0; = p2247*p1023
- p3249: 0
- p0859: 0.902978; = p0671*1000/p0856
- p0695: 7.93; = p0035*(1+p0563*p0167/100)
- p0382: 0.5
- p0420: 0; = SQRT(2)*(IF((2*p0288-1)<0;-1;IF((2*p0288-1)>0;1;0))*SQRT(SQRT((2/(pi()*0.140012289)+LN(1-(2*p0288-1)^2)/2)^2-LN(1-(2*p0288-1)^2)/0.140012289)-(2/(pi()*0.140012289)+LN(1-(2*p0288-1)^2)/2)))
- p4007: 1.20212e-8; = p1864*p3478
- p4765: 0; = p1798*p3482
- p1114: 0.216028
- p0759: 0
- p0080: 97.367
- p1818: 3.46488e-7; = p1410*1000/p0818
- p2895: 2.53241e-5; = p2309*(p1079+p1081)
- p1831: 0
- p3252: 6.50484e8; = p1252*(p1267*(1-p3247)+p1270*(1-p3248)+p1271*(1-p3249)+p1272*(1-p3250))
- p1165: 0.000106264; = p0801*p0001/(p0818*p0002)
- p0616: 0; = IF(p0352<0.5;-SQRT(p0007*EXP(p0484^2*p0008)-p0007);SQRT(p0007*EXP(p0484^2*p0008)-p0007))
- p2927: 3.83352e-6; = p2341*(p1079+p1081)
- p3234: 0.39606; = 1-p3233
- p0158: 88.887
- p2666: 0.0002939; = p2275*(p1128+p1130)
- p1097: 0.0596251
- p1932: 0
- p0257: 0
- p3183: 0; = p2402*p1023
- p5337: 0; = p1962*p3484
- p2095: 0.765734
- p2344: 5.9472e-8; = p2228*p2212
- p0392: 0.5
- p2974: 0; = p2388*(p1079+p1081)
- p3336: 0; = IF(or(p3254=0;p1232>0);0;p3271*p3289)
- p2028: 6.65098e-6; = p2015*p2026*p2027/(p0818*1000)
- p1018: 0.25962; = IF(p1012=0;p0709/100;0)
- p2403: 0; = p2234*p2192
- p2873: 0.00135202; = p2287*(p1020+p1022)
- p0989: 1.17443e6; = p0985*p0886
- p0510: 0; = SQRT(2)*(IF((2*p0378-1)<0;-1;IF((2*p0378-1)>0;1;0))*SQRT(SQRT((2/(pi()*0.140012289)+LN(1-(2*p0378-1)^2)/2)^2-LN(1-(2*p0378-1)^2)/0.140012289)-(2/(pi()*0.140012289)+LN(1-(2*p0378-1)^2)/2)))
- p1145: 1.03125e9; = if(p1121=0;p0799*p0702*1000*p0800/100;0)
- p2076: 0.057
- p1605: 0.909913
- p0312: 0.5
- p1196: 0.59
- p0826: 0.120333; = 1-p0825/p0818
- p3173: 0; = p2392*p1132
- p1851: 0
- p5177: 9.18337e-9; = p1798*p3484
- p1974: 1.11094e-6; = p1969*p0001/(p0818*p0002)
- p0388: 0.5
- p1597: 0
- p2915: 2.93139e-8; = p2329*(p1020+p1022)
- p0692: 0
- p0947: 0; = if(and(p0683=0;or(p0807=480;p0807=32;p0807=1;and(p0807=60;p0901<0.03)));p0935;0)
- p2810: 0; = p2419*(p1078+p1080)
- p1070: 0.00993284; = IF(p1012=0;p1056/(p1063*p0818);0)
- p3669: 3.60062e-8; = p1938*p3476
- p2449: 1.60681e-6; = p2253*p1014
- p2942: 9.56287e-6; = p2356*(p1020+p1022)
- p4103: 1.15201e-6; = p1754*p3479
- p2466: 2.62516e-6; = p2270*p1073
- p1240: 0; = if(p1232>0;0;IF(p1234+p1238+p1239=1;0;IF(p1234+p1238+p1239+p1237>1;1-(p1234+p1238+p1239);p1237)))
- p0874: 0; = p0865*p0856
- p2525: 1.70482e-8; = p2329*p1014
- p2924: 4.77147e-6; = p2338*(p1079+p1081)
- p3179: 0; = p2398*p1023
- p1285: 0; = p1281*p1252/p0818
- p1314: 0; = p1310*p1252/p0818
- p1199: -0.29
- p0731: 0
- p2384: 0; = p2229*p2213
- p0854: 4.9077e6; = p0801*((1-p0853)*p0846+p0853*p0852)
- p1065: 0.000664676; = IF(p1012=0;p1051/(p1058*p0818);0)
- p3908: 4.84393e-5; = p1765*p3478
- p1832: 0
- p2557: 1.77042e-5; = p2361*p1014
- p1099: 0.597746
- p3274: 0.0768939
- p0050: 78.894
- p1720: 0
- p1644: 0
- p2681: 1.74604e-6; = p2290*(p1019+p1021)
- p2921: 1.16064e-5; = p2335*(p1020+p1022)
- p2373: 4.41985e-5; = p2225*p2202
- p1170: 5355.56; = p1169*p0801
- p2371: 0.000716311; = p2225*p2200
- p0446: 0; = SQRT(2)*(IF((2*p0314-1)<0;-1;IF((2*p0314-1)>0;1;0))*SQRT(SQRT((2/(pi()*0.140012289)+LN(1-(2*p0314-1)^2)/2)^2-LN(1-(2*p0314-1)^2)/0.140012289)-(2/(pi()*0.140012289)+LN(1-(2*p0314-1)^2)/2)))
- p0177: 49.259
- p2273: 0.0067435; = p2230*p2219
- p0029: 100
- p3951: 1.37041e-6; = p1808*p3478
- p3524: 4.70815e-7; = p1793*p3476
- p0835: 1502.34; = -LN(1-p0669/100)/p0834
- p2495: 1.39792e-5; = p2299*p1073
- p2005: 5.14309e7; = p1963*p0818+p1959*1000+p1170+p1176+p1182
- p1775: 0
- p3045: 1.80269e-6; = p2264*p1082
- p2904: 1.87014e-6; = p2318*(p1020+p1022)
- p3261: 0.908439
- p2020: 699957; = p2015*p2018*p2019
- p1891: 0
- p2338: 8.51151e-6; = p2228*p2206
- p1939: 1.89486e-6; = p1531*1000/p0818
- p2966: 0; = p2380*(p1079+p1081)
- p1034: 2.71001e-5; = IF(p1012=0;p1028*p0001/(p0818*p0002);0)
- p0730: 51.07; = p0070*(1+p0598*p0202/100)
- p1669: 0
- p3084: 1.66551e-6; = p2303*p1082
- p0063: 11003.5
- p3838: 0; = p1901*p3477
- p2812: 0; = p2421*(p1078+p1080)
- p1651: 0.299611
- p2596: 0; = p2400*p1014
- p0189: 97.232
- p1726: 0
- p0525: 0; = SQRT(2)*(IF((2*p0393-1)<0;-1;IF((2*p0393-1)>0;1;0))*SQRT(SQRT((2/(pi()*0.140012289)+LN(1-(2*p0393-1)^2)/2)^2-LN(1-(2*p0393-1)^2)/0.140012289)-(2/(pi()*0.140012289)+LN(1-(2*p0393-1)^2)/2)))
- p3077: 0; = p2296*p1023
- p3302: 0.0114097; = if(and(p1232=0;p3252<>0);p3258*(p3278*(p3282*p1256+p3286*(p1253+p1257)+p1258*p3288+p3297*p3287));0)
- p0037: 100
- p1122: 0; = p1121*p0001/(p0818*p0002)
- p2297: 0.00088901; = p2227*p2204
- p2989: 0; = p2403*(p1020+p1022)
- p1866: 0
- p1616: 0
- p1864: 2.16555e-8; = p1456*1000/p0818
- p1894: 0
- p1294: 0; = p1290*p1252/p0818
- p0191: 42.177
- p0361: 0.5
- p2562: 4.47128e-5; = p2366*p1014
- p3262: 0.0787162
- p1762: 0
- p1295: 0; = p1291*p1252/p0818
- p1988: 750
- p1029: 0; = IF(p1012=0;IF(p0801<p1023*(p0704/100)*p0703*1000;p0801;p1023*(p0704/100)*p0703*1000);0)
- p1363: 14143
- p2500: 6.35035e-5; = p2304*p1073
- p2544: 7.92864e-8; = p2348*p1073
- p2939: 1.30812e-6; = p2353*(p1129+p1131)
- p0613: 0; = IF(p0349<0.5;-SQRT(p0007*EXP(p0481^2*p0008)-p0007);SQRT(p0007*EXP(p0481^2*p0008)-p0007))
- p1171: 0.000106264; = p0801*p0001/(p0818*p0002)
- p1190: 8.5486e-8; = p1188/p0818
- p0477: 0; = SQRT(2)*(IF((2*p0345-1)<0;-1;IF((2*p0345-1)>0;1;0))*SQRT(SQRT((2/(pi()*0.140012289)+LN(1-(2*p0345-1)^2)/2)^2-LN(1-(2*p0345-1)^2)/0.140012289)-(2/(pi()*0.140012289)+LN(1-(2*p0345-1)^2)/2)))
- p1721: 0
- p1678: 0
- p1887: 0
- p1635: 0
- p1296: 0; = p1292*p1252/p0818
- p2575: 0; = p2379*p1073
- p2678: 0.00121291; = p2287*(p1019+p1021)
- p2226: 0.511743; = if(p0774*p0778+p0775*p0779+p0776*p0780+p0777*p0781=0;0;p0778*p0774/(p0774*p0778+p0775*p0779+p0776*p0780+p0777*p0781))
- p2039: 2.04739e-7; = p2015*p2037*p2038/(p0818*1000)
- p0498: 0; = SQRT(2)*(IF((2*p0366-1)<0;-1;IF((2*p0366-1)>0;1;0))*SQRT(SQRT((2/(pi()*0.140012289)+LN(1-(2*p0366-1)^2)/2)^2-LN(1-(2*p0366-1)^2)/0.140012289)-(2/(pi()*0.140012289)+LN(1-(2*p0366-1)^2)/2)))
- p1282: 0; = IF(p1277+p1280+p1281=p1260;0;p1260-(p1277+p1280+p1281))
- p2769: 0; = p2378*(p1078+p1080)
- p0306: 0.5
- p3218: 0.00851476; = p3214*p1228
- p2441: 3.00503e-5; = p2245*p1014
- p2723: 1.47195e-5; = p2332*(p1019+p1021)
- p1563: 0
- p1821: 0
- p2281: 8.8469e-5; = p2223*p2187
- p1707: 0
- p1794: 0
- p1941: 0
- p2568: 7.20547e-5; = p2372*p1014
- p1652: 0
- p2162: 4.76688e-9; = p2015*p2086*p2124/(p0818*1000)
- p3318: 0; = if(and(p1232=0;p3253<>0);p3253*(p3262-p3313)/p3316;0)
- p0461: 0; = SQRT(2)*(IF((2*p0329-1)<0;-1;IF((2*p0329-1)>0;1;0))*SQRT(SQRT((2/(pi()*0.140012289)+LN(1-(2*p0329-1)^2)/2)^2-LN(1-(2*p0329-1)^2)/0.140012289)-(2/(pi()*0.140012289)+LN(1-(2*p0329-1)^2)/2)))
- p0562: 0; = IF(p0298<0.5;-SQRT(p0007*EXP(p0430^2*p0008)-p0007);SQRT(p0007*EXP(p0430^2*p0008)-p0007))
- p1172: 5.79888e-8; = p1170/p0818
- p1247: 3.84031e-6; = if(p1232>0;0;p1242*p0001/(p0818*p0002))
- p0195: 0
- p4083: 1.44855e-6; = p1940*p3478
- p2670: 0.000111393; = p2279*(p1019+p1021)
- p2639: 0.000477126; = p2248*(p1019+p1021)
- p2383: 0; = p2229*p2212
- p0742: 97.464; = p0082*(1+p0610*p0214/100)
- p1977: 1.01897e10; = p1252+p1188
- p0758: 0
- p2061: 0.518824
- p1655: 0
- p0443: 0; = SQRT(2)*(IF((2*p0311-1)<0;-1;IF((2*p0311-1)>0;1;0))*SQRT(SQRT((2/(pi()*0.140012289)+LN(1-(2*p0311-1)^2)/2)^2-LN(1-(2*p0311-1)^2)/0.140012289)-(2/(pi()*0.140012289)+LN(1-(2*p0311-1)^2)/2)))
- p2349: 1.32353e-5; = p2228*p2217
- p1263: 0; = if(p1232>0;0;IF(p1259=1;0;IF(p1259+p1260>1;1-p1259;p1260)))
- p3039: 1.77436e-5; = p2258*p1082
- p1820: 0
- p3502: 6.44601e-6; = p1771*p3476
- p0914: 9.20791e8; = p0825*p0911+p0827*p0912+(p0830+p0895)*p0824*p0913
- p2306: 1.90237e-5; = p2227*p2213
- p3031: 0; = p2250*p1023
- p2808: 0; = p2417*(p1078+p1080)
- p0823: 0.35
- p2906: 5.37568e-7; = p2320*(p1020+p1022)
- p2876: 1.9463e-6; = p2290*(p1020+p1022)
- p0451: 0; = SQRT(2)*(IF((2*p0319-1)<0;-1;IF((2*p0319-1)>0;1;0))*SQRT(SQRT((2/(pi()*0.140012289)+LN(1-(2*p0319-1)^2)/2)^2-LN(1-(2*p0319-1)^2)/0.140012289)-(2/(pi()*0.140012289)+LN(1-(2*p0319-1)^2)/2)))
- p0670: 832.271; = p0010*(1+p0538*p0142/100)
- p2210: 0.000191032; = 6*1.00794*p2208/30.973762
- p1945: 0
- p3418: 0.021568; = p3380*p1238
- p3307: 2.86509e7; = if(and(p1232=0;p3252<>0);p3252*(p3258-p3302)/p3305;0)
- p3445: 0; = p3369*p1240
- p3344: 0; = if(and(p1232=0;p3254<>0);p3254-(p3339+p3340+p3341+p3342+p3343);0)
- p2391: 0; = p2233*p2220
- p2959: 1.78315e-5; = p2373*(p1020+p1022)
- p1970: 1.1e7; = p0801
- p0878: 0; = p0867*p0856
- p1808: 2.46873e-6; = p1400*1000/p0818
- p0537: 0; = IF(p0273<0.5;-SQRT(p0007*EXP(p0405^2*p0008)-p0007);SQRT(p0007*EXP(p0405^2*p0008)-p0007))
- p4809: 0; = p1842*p3482
- p2913: 4.3651e-6; = p2327*(p1020+p1022)
- p3295: 0.58
- p2607: 0; = p2411*p1014
- p4977: 2.92717e-9; = p1804*p3483
- p4580: 3.82352e-6; = p1819*p3481
- p2705: 0.000226541; = p2314*(p1128+p1130)
- p2727: 1.06738e-5; = p2336*(p1078+p1080)
- p1561: 0.52337
- p2894: 0.000187598; = p2308*(p1079+p1081)
- p2949: 8.76257e-6; = p2363*(p1020+p1022)
- p2330: 1.19259e-7; = p2224*p2198
- p0799: 114.624; = p0139*(1+p0667*p0271/100)
- p2950: 7.09124e-5; = p2364*(p1020+p1022)
- p3313: 0; = if(and(p1232=0;p3253<>0);p3262*(p3278*(p3282*p1256+p3286*(p1253+p1257)+p1258*p3288+p3298*p3287));0)
- p3735: 0; = p1798*p3477
- p0821: 1.00219
- p0951: 0; = if(and(p0683=0;or(p0807=480;p0807=32;p0807=1;and(p0807=60;p0901<0.03)));p0939;0)
- p2238: 0.000306976; = p2222*p2183
- p0934: 3.83507e-5; = p0928*p0001/(p0818*p0002)
- p2546: 7.59141e-7; = p2350*p1123
- p0812: 0; = if(p0807=480;0.095/0.34;0)
- p2888: 0.000117268; = p2302*(p1079+p1081)
- p3402: 3.05361e-5; = p3364*p1238
- p3601: 5.01352e-9; = p1870*p3476
- p1226: 1.1e7; = IF(p1221=0;0;IF(p1193=0;p0801;0))
- p0478: 0; = SQRT(2)*(IF((2*p0346-1)<0;-1;IF((2*p0346-1)>0;1;0))*SQRT(SQRT((2/(pi()*0.140012289)+LN(1-(2*p0346-1)^2)/2)^2-LN(1-(2*p0346-1)^2)/0.140012289)-(2/(pi()*0.140012289)+LN(1-(2*p0346-1)^2)/2)))
- p4515: 1.06452e-6; = p1754*p3481
- p0528: 0; = SQRT(2)*(IF((2*p0396-1)<0;-1;IF((2*p0396-1)>0;1;0))*SQRT(SQRT((2/(pi()*0.140012289)+LN(1-(2*p0396-1)^2)/2)^2-LN(1-(2*p0396-1)^2)/0.140012289)-(2/(pi()*0.140012289)+LN(1-(2*p0396-1)^2)/2)))
- p1560: 0
- p3841: 0; = p1904*p3477
- p2100: 0.705744
- p0088: 60.262
- p0557: 0; = IF(p0293<0.5;-SQRT(p0007*EXP(p0425^2*p0008)-p0007);SQRT(p0007*EXP(p0425^2*p0008)-p0007))
- p1685: 0.491852
- p4738: 0; = p1771*p3482
- p0112: 22.558
- p3003: 0; = p2417*(p1079+p1081)
- p0140: 81.763
- p0454: 0; = SQRT(2)*(IF((2*p0322-1)<0;-1;IF((2*p0322-1)>0;1;0))*SQRT(SQRT((2/(pi()*0.140012289)+LN(1-(2*p0322-1)^2)/2)^2-LN(1-(2*p0322-1)^2)/0.140012289)-(2/(pi()*0.140012289)+LN(1-(2*p0322-1)^2)/2)))
- p4309: 0; = p1754*p3480
- p5198: 2.7795e-7; = p1819*p3484
- p2156: 6.65692e-9; = p2015*p2085*p2118/(p0818*1000)
- p0118: 50.536
- p2733: 1.08443e-6; = p2342*(p1078+p1080)
- p2642: 6.86845e-7; = p2251*(p1019+p1021)
- p1553: 0
- p3413: 0; = p3375*p1238
- p0181: 23.773
- p0226: 280.72
- p4926: 0; = p1963*p3482
- p1140: 3.34132e-5; = if(p1121=0;p1134*p0001/(p0818*p0002);0)
- p2560: 4.12408e-5; = p2364*p1014
- p0886: 1.17443e6; = p0686*1000*p0687*p0689/100
- p2375: 0; = p2229*p2204
- p2515: 2.17225e-6; = p2319*p1014
- p4537: 1.86965e-7; = p1776*p3481
- p0095: 15.764
- p3059: 0; = p2278*p1023
- p3233: 0.60394
- p1155: 0.00213657; = if(p1153*p0818=0;0;p1151/(p1153*p0818))
- p2265: 0.0012802; = p2226*p2211
- p1907: 0
- p1129: 0.53813; = if(p1121=0;IF(p1123+p1128=1;0;IF(p1123+p1128+p1125>1;1-(p1123+p1128);p1125));0)
- p2368: 1.27976e-6; = p2225*p2197
- p1840: 0
- p0518: 0; = SQRT(2)*(IF((2*p0386-1)<0;-1;IF((2*p0386-1)>0;1;0))*SQRT(SQRT((2/(pi()*0.140012289)+LN(1-(2*p0386-1)^2)/2)^2-LN(1-(2*p0386-1)^2)/0.140012289)-(2/(pi()*0.140012289)+LN(1-(2*p0386-1)^2)/2)))
- p3181: 0; = p2400*p1023
- p0640: 0; = IF(p0376<0.5;-SQRT(p0007*EXP(p0508^2*p0008)-p0007);SQRT(p0007*EXP(p0508^2*p0008)-p0007))
- p1578: 0
- p3258: 0.0491162
- p1963e: 2.46008e-7; = p1628*p1832+p1629*p1833+p1630*p1834+p1631*p1835+p1632*p1836+p1633*p1837+p1634*p1838+p1635*p1839+p1636*p1840+p1637*p1841+p1638*p1842+p1639*p1843+p1640*p1844+p1641*p1845+p1642*p1846+p1643*p1847+p1644*p1848+p1645*p1849+p1646*p1850
- p1688: 0
- p0995: 0; = p0991*p0001*p0004/(p0818*p0002)
- p1670: 0
- p2093: 0.260958
- p0346: 0.5
- p2469: 0.000336433; = p2273*p1123
- p2778: 0; = p2387*(p1078+p1080)
- p0415: 0; = SQRT(2)*(IF((2*p0283-1)<0;-1;IF((2*p0283-1)>0;1;0))*SQRT(SQRT((2/(pi()*0.140012289)+LN(1-(2*p0283-1)^2)/2)^2-LN(1-(2*p0283-1)^2)/0.140012289)-(2/(pi()*0.140012289)+LN(1-(2*p0283-1)^2)/2)))
- p0565: 0; = IF(p0301<0.5;-SQRT(p0007*EXP(p0433^2*p0008)-p0007);SQRT(p0007*EXP(p0433^2*p0008)-p0007))
- p2476: 0.000144227; = p2280*p1014
- p2623: 0; = p2427*p1073
- p1740: 0
- p1929: 2.86936e-6; = p1521*1000/p0818
- p2516: 3.12635e-7; = p2320*p1014
- p1603: 0
- p2926: 8.47727e-6; = p2340*(p1079+p1081)
- p1701: 0
- p2215: 0.000707792; = p1117-p2214
- p2056: 2.07882
- p1827: 0
- p0617: 0; = IF(p0353<0.5;-SQRT(p0007*EXP(p0485^2*p0008)-p0007);SQRT(p0007*EXP(p0485^2*p0008)-p0007))
- p1508: 3
- p0535: 0; = SQRT(2)*(IF((2*p0403-1)<0;-1;IF((2*p0403-1)>0;1;0))*SQRT(SQRT((2/(pi()*0.140012289)+LN(1-(2*p0403-1)^2)/2)^2-LN(1-(2*p0403-1)^2)/0.140012289)-(2/(pi()*0.140012289)+LN(1-(2*p0403-1)^2)/2)))
- p0636: 0; = IF(p0372<0.5;-SQRT(p0007*EXP(p0504^2*p0008)-p0007);SQRT(p0007*EXP(p0504^2*p0008)-p0007))
- p2190: 0.000544932; = 32.065*p2189/(2*14.0067)
- p0972: 0.00184559; = p0969/p0818
- p2287: 0.00335124; = p2223*p2193
- p1007: 0; = p1003*p0001*p0004/(p0818*p0002)
- p3087: 3.50797e-7; = p2306*p1082
- p2423: 0; = p2235*p2213
- p1173: 0.5
- p3620: 4.52584e-7; = p1889*p3476
- p2191: 0.000137036; = 8*1.00794*p2189/(2*14.0067)
- p3387: 0.00117198; = p3368*p1234
- p0606: 0; = IF(p0342<0.5;-SQRT(p0007*EXP(p0474^2*p0008)-p0007);SQRT(p0007*EXP(p0474^2*p0008)-p0007))
- p0783: 120.686; = p0123*(1+p0651*p0255/100)
- p0509: 0; = SQRT(2)*(IF((2*p0377-1)<0;-1;IF((2*p0377-1)>0;1;0))*SQRT(SQRT((2/(pi()*0.140012289)+LN(1-(2*p0377-1)^2)/2)^2-LN(1-(2*p0377-1)^2)/0.140012289)-(2/(pi()*0.140012289)+LN(1-(2*p0377-1)^2)/2)))
- p3469: 0; = p3374*p1241
- p0847: -0.267484
- p2063: 2.01468
- p0949: 0; = if(and(p0683=0;or(p0807=480;p0807=32;p0807=1;and(p0807=60;p0901<0.03)));p0937;0)
- p2985: 0; = p2399*(p1020+p1022)
- p1067: 0.00226703; = IF(p1012=0;p1053/(p1060*p0818);0)
- p2430: 0; = p2236*p2220
- p3055: 1.2111e-5; = p2274*p1132
- p2643: 1.12735e-6; = p2252*(p1019+p1021)
- p1916: 3.24833e-8; = p1508*1000/p0818
- p3826: 0; = p1889*p3477
- p0544: 0; = IF(p0280<0.5;-SQRT(p0007*EXP(p0412^2*p0008)-p0007);SQRT(p0007*EXP(p0412^2*p0008)-p0007))
- p1554: 0
- p0342: 0.5
- p2821: 0; = p2430*(p1128+p1130)
- p0221: 36.904
- p2422: 0; = p2235*p2212
- p2663: 0.00183971; = p2272*(p1128+p1130)
- p2411: 0; = p2234*p2201
- p3399: 0.0569625; = p3380*p1234
- p2248: 0.00131828; = p2222*p2193
- p2159: 5.22519e-7; = p2015*p2083*p2121/(p0818*1000)
- p1188: 7895.07; = p1187*p0801
- p0079: 2.998
- p0263: 32.5
- p3063: 0; = p2282*p1023
- p4147: 1.3671e-7; = p1798*p3479
- p1653: 0
- p1280: 0; = IF(p1277=p1263;0;IF(p1277+p1278>p1263;p1263-p1277;p1278))
- p0887: 2.88171; = 1000*p0886*p0001*p0003*p0004/(p0818*p0002)
- p2463: 1.10551e-6; = p2267*p1073
- p0247: 13.085
- p0862: 0; = p0674*1000/p0856
- p0610: 0; = IF(p0346<0.5;-SQRT(p0007*EXP(p0478^2*p0008)-p0007);SQRT(p0007*EXP(p0478^2*p0008)-p0007))
- p3176: 0; = p2395*p1023
- p0137: 76.682
- p2497: 2.48363e-5; = p2301*p1073
- p2620: 0; = p2424*p1073
- p3448: 0; = p3372*p1240
- p4822: 0; = p1855*p3482
- p1252: 1.01897e10; = if(p1232>0;0;p0724*2000*p0723*1000*p0725/100)
- p0002: 0.453592
- p2127: 6.54327e-7; = p2015*p2055*p2089/(p0818*1000)
- p5295: 3.67335e-10; = p1916*p3484
- p0581: 0; = IF(p0317<0.5;-SQRT(p0007*EXP(p0449^2*p0008)-p0007);SQRT(p0007*EXP(p0449^2*p0008)-p0007))
- p1666: 0.885279
- p0313: 0.5
- p0715: 2.205; = p0055*(1+p0583*p0187/100)
- p1946: 0
- p1963a: 0.000148802; = p1550*p1754+p1551*p1755+p1552*p1756+p1553*p1757+p1554*p1758+p1555*p1759+p1556*p1760+p1557*p1761+p1558*p1762+p1559*p1763+p1560*p1764+p1561*p1765+p1562*p1766+p1563*p1767+p1564*p1768+p1565*p1769+p1566*p1770+p1567*p1771+p1568*p1772
- p0964: 0.000622222; = 56/90000
- p2631: 4.38187e-5; = p2240*(p1019+p1021)
- p2753: 3.12596e-5; = p2362*(p1019+p1021)
- p0736: 0
- p3006: 0; = p2420*(p1079+p1081)
- p3348: 0.00443516; = if(and(p1232=0;p3256<>0);p3276*p3289;0)
- p2170: 0.00479201; = p2166*(p0913)
- p2129: 3.60347e-7; = p2015*p2057*p2091/(p0818*1000)
- p0421: 0; = SQRT(2)*(IF((2*p0289-1)<0;-1;IF((2*p0289-1)>0;1;0))*SQRT(SQRT((2/(pi()*0.140012289)+LN(1-(2*p0289-1)^2)/2)^2-LN(1-(2*p0289-1)^2)/0.140012289)-(2/(pi()*0.140012289)+LN(1-(2*p0289-1)^2)/2)))
- p3020: 0; = p2239*p1023
- p4052: 1.08191e-7; = p1909*p3478
- p1089: 4.50255e-6; = IF(p1071=0;p1083*p0001/(p0818*p0002);0)
- p2952: 7.68825e-5; = p2366*(p1020+p1022)
- p3383: 8.06478e-5; = p3364*p1234
- p0234: 24.198
- p3151: 0; = p2370*p1023
- p1992: 3900
- p3337: 0; = IF(or(p3254=0;p1232>0);0;p3272*p3289)
- p5187: 2.79174e-8; = p1808*p3484
- p3354: 2.5899e8; = IF((p3350+p3351+p3352+p3353)+IF(p3349=0;0;(p3256*(p3273*(1-p3277))/p3349))>p3256;p3256-(p3350+p3351+p3352+p3353);IF(p3349=0;0;p3256*(p3273*(1-p3277))/p3349))
- p1844: 0
- p4982: 5.92752e-8; = p1809*p3483
- p3088: 1.63523e-6; = p2307*p1082
- p3459: 2.5498e-5; = p3364*p1241
- p0591: 0; = IF(p0327<0.5;-SQRT(p0007*EXP(p0459^2*p0008)-p0007);SQRT(p0007*EXP(p0459^2*p0008)-p0007))
- p0876: 0; = p0866*p0856
- p2184: 0.000149552; = p1051/p0818
- p0975: 0.00106189; = p0973*p0974/p0818
- p5306: 3.74192e-7; = p1927*p3484
- p0289: 0.5
- p2694: 3.31729e-5; = p2303*(p1078+p1080)
- p3962: 1.3644e-5; = p1819*p3478
- p3195: 0; = p2414*p1082
- p0291: 0.5
- p1158: 0.0182018; = p1156*p1157
- p3451: 0; = p3375*p1240
- p2334: 2.50943e-6; = p2224*p2202
- p2212: 3.84784e-6; = p1106/p0818
- p2875: 0.0028649; = p2289*(p1020+p1022)
- p0507: 0; = SQRT(2)*(IF((2*p0375-1)<0;-1;IF((2*p0375-1)>0;1;0))*SQRT(SQRT((2/(pi()*0.140012289)+LN(1-(2*p0375-1)^2)/2)^2-LN(1-(2*p0375-1)^2)/0.140012289)-(2/(pi()*0.140012289)+LN(1-(2*p0375-1)^2)/2)))
- p2121: 0.822447
- p1858: 0
- p1963b: 1.50235e-8; = p1569*p1773+p1570*p1774+p1571*p1775+p1572*p1776+p1573*p1777+p1574*p1778+p1575*p1779+p1576*p1780+p1577*p1781+p1578*p1782+p1579*p1783+p1580*p1784+p1581*p1785+p1582*p1786+p1583*p1787+p1584*p1788+p1585*p1789+p1586*p1790+p1587*p1791
- p0762: 51.631; = p0102*(1+p0630*p0234/100)
- p0125: 4.669
- p2046: 10
- p4677: 5.05311e-9; = p1916*p3481
- p2556: 7.0442e-5; = p2360*p1014
- p2189: 0.000476077; = p1053/p0818
- p0902: 0.0130121
- p4047: 3.60635e-7; = p1904*p3478
- p3154: 0; = p2373*p1023
- p5308: 3.24479e-8; = p1929*p3484
- p1208: 0; = p1205*p0818*p0822/p0801
- p2869: 0.000114756; = p2283*(p1020+p1022)
- p0180: 132.451
- p2654: 8.31584e-5; = p2263*(p1078+p1080)
- p3052: 8.08072e-6; = p2271*p1082
- p1141: 4.67698e-5; = if(p1121=0;p1135*p0001/(p0818*p0002);0)
- p1015: 0.17851; = IF(p1012=0;p0706/100;0)
- p2885: 0.00014596; = p2299*(p1079+p1081)
- p1975: 0.000106264; = p1970*p0001/(p0818*p0002)
- p1242: 397535; = if(p1232>0;0;p1234*(p0725/100)*p0723*1000)
- p2838: 1.25664e-6; = p2252*(p1020+p1022)
- p0609: 0; = IF(p0345<0.5;-SQRT(p0007*EXP(p0477^2*p0008)-p0007);SQRT(p0007*EXP(p0477^2*p0008)-p0007))
- p0681: 0
- p1195: 0.45
- p1045: 0.0579913; = IF(p1012=0;IF(p1037+p1044=1;0;IF(p1037+p1044+p1039>1;1-(p1037+p1044);p1039));0)
- p3065: 0; = p2284*p1023
- p3423: 0; = p3366*p1239
- p1675: 0
- p0827: 1.288e9; = p0818*p0819*p0823
- p4760: 0; = p1793*p3482
- p3128: 2.01726e-7; = p2347*p1082
- p1585: 0
- p4364: 0; = p1809*p3480
- p1853: 0
- p1934: 0
- p1558: 0
- p2322: 4.28411e-6; = p2224*p2189
- p4907: 0; = p1940*p3482
- p2115: 0.856281
- p0455: 0; = SQRT(2)*(IF((2*p0323-1)<0;-1;IF((2*p0323-1)>0;1;0))*SQRT(SQRT((2/(pi()*0.140012289)+LN(1-(2*p0323-1)^2)/2)^2-LN(1-(2*p0323-1)^2)/0.140012289)-(2/(pi()*0.140012289)+LN(1-(2*p0323-1)^2)/2)))
- p3713: 0; = p1776*p3477
- p2946: 0.000121123; = p2360*(p1020+p1022)
- p0814: 0; = if(p0807=480;p0810*p0812+p0811*p0813;0)
- p3270: 0.0747083
- p2822: 0; = p2431*(p1128+p1130)
- p2523: 2.53863e-6; = p2327*p1014
- p2868: 0.000456595; = p2282*(p1020+p1022)
- p0842: -0.445511
- p1625: 0
- p3480: 0; = if(p1328+p1330+p1332+p1334+p1336+p1338+p1340+p1342+p1344=0;0;p1336/(p1328+p1330+p1332+p1334+p1336+p1338+p1340+p1342+p1344))
- p3380: 0.09654; = p3251/p0818
- p3238: 0.854735; = IF(p3237+p3235+p3236>1;1-(p3235+p3236);p3237)
- p2227: 0.472801; = if(p0774*p0778+p0775*p0779+p0776*p0780+p0777*p0781=0;0;p0779*p0775/(p0774*p0778+p0775*p0779+p0776*p0780+p0777*p0781))
- p0905: 0.0205505; = p0904/p0818
- p2181: 2.97829; = p0887+p0889+p0893+p2180
- p2409: 0; = p2234*p2199
- p0255: 26.321
- p0986: 0; = IF(p0982+p0985=1;0;IF(p0982+p0985+p0984>1;1-(p0982+p0985);p0984))
- p1837: 0
- p2427: 0; = p2235*p2217
- p0508: 0; = SQRT(2)*(IF((2*p0376-1)<0;-1;IF((2*p0376-1)>0;1;0))*SQRT(SQRT((2/(pi()*0.140012289)+LN(1-(2*p0376-1)^2)/2)^2-LN(1-(2*p0376-1)^2)/0.140012289)-(2/(pi()*0.140012289)+LN(1-(2*p0376-1)^2)/2)))
- p0705: 23.463; = p0045*(1+p0573*p0177/100)
- p1640: 0
- p3284: 0.275
- p2704: 0.000130365; = p2313*(p1128+p1130)
- p1555: 0
- p0836: 9.13818e9; = p0831*p0835*p0801/(1-p0831)
- p0057: 4.989
- p0584: 0; = IF(p0320<0.5;-SQRT(p0007*EXP(p0452^2*p0008)-p0007);SQRT(p0007*EXP(p0452^2*p0008)-p0007))
- p0697: 100; = p0037*(1+p0565*p0169/100)
- p2161: 2.58773e-9; = p2015*p2085*p2123/(p0818*1000)
- p1308: 0
- p1339: 6.44596e-5; = p1338*p0001/(p0818*p0002)
- p2304: 0.00118278; = p2227*p2211
- p3308: 5.74804e6; = if(and(p1232=0;p3252<>0);p3252*(p3259-p3303)/p3305;0)
- p2211: 0.00250165; = p1120-p2209-p2208-p2210
- p2253: 6.84825e-6; = p2222*p2199
- p1332: 2.38109e7; = p1321*p0801
- p1663: 0.69001
- p1686: 0
- p2667: 0.00128667; = p2276*(p1019+p1021)
- p2150: 2.9292e-8; = p2015*p2078*p2112/(p0818*1000)
- p4936: 1.11232e-7; = p1763*p3483
- p2116: 0.444424
- p2701: 0.000148701; = p2310*(p1078+p1080)
- p1044: 0.00842973; = IF(p1012=0;IF(p1037=1;0;IF(p1037+p1038>1;1-p1037;p1038));0)
- p0185: 38.671
- p0666: 0; = IF(p0402<0.5;-SQRT(p0007*EXP(p0534^2*p0008)-p0007);SQRT(p0007*EXP(p0534^2*p0008)-p0007))
- p2198: 1.32528e-5; = 22.98976928*p2197/14.0067
- p2242: 3.48012e-5; = p2222*p2187
- p2473: 0.000183099; = p2277*p1014
- p1268: 0
- p0921: 0.262363; = p0679*1000/p0801
- p2065: 0.0758824
- p0052: 36.728
- p2219: 0.0119629; = p1154-p2218
- p3115: 0; = p2334*p1023
- p2861: 0.000411383; = p2275*(p1129+p1131)
- p1105: 0.436421
- p3372: 0.00242606; = if(p1232=0;p3245*p3360/p0818;0)
- p1053: 4.39682e7; = IF(p1012=0;p1046*p1036;0)
- p0840: 0.13934; = p0839*p0831
- p3219: 0.0101974; = p3215*p1228
- p2478: 0.000265543; = p2282*p1014
- p2300: 0.00216183; = p2227*p2207
- p2397: 0; = p2234*p2186
- p3007: 0; = p2421*(p1079+p1081)
- p2325: 9.97953e-6; = p2224*p2192
- p2299: 0.000260369; = p2227*p2206
- p2488: 4.0847e-6; = p2292*p1014
- p3093: 0.0001431; = p2312*p1132
- p0237: 44.731
- p0858: 0.075661; = p0670*1000/p0856
- p1328: 1.80554e6; = p1319*p0801
- p0476: 0; = SQRT(2)*(IF((2*p0344-1)<0;-1;IF((2*p0344-1)>0;1;0))*SQRT(SQRT((2/(pi()*0.140012289)+LN(1-(2*p0344-1)^2)/2)^2-LN(1-(2*p0344-1)^2)/0.140012289)-(2/(pi()*0.140012289)+LN(1-(2*p0344-1)^2)/2)))
- p3042: 4.31475e-5; = p2261*p1082
- p4425: 0; = p1870*p3480
- p2266: 1.9691e-6; = p2226*p2212
- p1704: 0
- p0978: 0
- p2577: 0; = p2381*p1073
- p0924: 0.178249; = IF(p0918+p0923=1;0;IF(p0918+p0923+p0920>1;1-(p0918+p0923);p0920))
- p0611: 0; = IF(p0347<0.5;-SQRT(p0007*EXP(p0479^2*p0008)-p0007);SQRT(p0007*EXP(p0479^2*p0008)-p0007))
- p0521: 0; = SQRT(2)*(IF((2*p0389-1)<0;-1;IF((2*p0389-1)>0;1;0))*SQRT(SQRT((2/(pi()*0.140012289)+LN(1-(2*p0389-1)^2)/2)^2-LN(1-(2*p0389-1)^2)/0.140012289)-(2/(pi()*0.140012289)+LN(1-(2*p0389-1)^2)/2)))
- p1600: 0.895638
- p2512: 2.75771e-6; = p2316*p1014
- p5077: 4.39075e-8; = p1904*p3483
- p0638: 0; = IF(p0374<0.5;-SQRT(p0007*EXP(p0506^2*p0008)-p0007);SQRT(p0007*EXP(p0506^2*p0008)-p0007))
- p1161: 2.12873e6; = (p0722/100)*p0702*1000
- p3040: 1.60477e-5; = p2259*p1082
- p2047: 8.77138e-15; = p2015*p2045/(p0818*1000000000000)
- p2750: 8.494e-6; = p2359*(p1019+p1021)
- p3373: 0.000397486; = if(p1232=0;p3245*p3361/p0818;0)
- p2196: 0.0118853; = p1068-p2193-p2195
- p1859: 0
- p0573: 0; = IF(p0309<0.5;-SQRT(p0007*EXP(p0441^2*p0008)-p0007);SQRT(p0007*EXP(p0441^2*p0008)-p0007))
- p0796: 98.2; = p0136*(1+p0664*p0268/100)
- p1611: 0
- p2771: 0; = p2380*(p1078+p1080)
- p1942: 0
- p3406: 0.000443754; = p3368*p1238
- p1917: 0
- p3334: 0; = IF(or(p3254=0;p1232>0);0;p3269*p3277*(p3300*p3292+(1-p3300)*p3296))
- p0440: 0; = SQRT(2)*(IF((2*p0308-1)<0;-1;IF((2*p0308-1)>0;1;0))*SQRT(SQRT((2/(pi()*0.140012289)+LN(1-(2*p0308-1)^2)/2)^2-LN(1-(2*p0308-1)^2)/0.140012289)-(2/(pi()*0.140012289)+LN(1-(2*p0308-1)^2)/2)))
- p3000: 0; = p2414*(p1079+p1081)
- p4456: 0; = p1901*p3480
- p0922: 0; = p0677*1000/p0801
- p1022: 0.25962; = IF(p1012=0;IF(p1014+p1019+p1020+p1021=1;0;IF(p1014+p1019+p1020+p1021+p1018>1;1-(p1014+p1019+p1020+p1021);p1018));0)
- p3346: 0.0178625; = if(and(p1232=0;p3256<>0);p3274*(p3281*(p3285*p1256+p3286*(p1253+p1257)+p1258*p3288));0)
- p0366: 0.5
- p2460: 5.24871e-6; = p2264*p1073
- p1237: 0; = if(p1232>0;0;p0729/100)
- p0880: 0; = p0868*p0856
- p3135: 0; = p2354*p1023
- p1761: 0
- p1902: 0
- p0939: 7.0815e-7; = p0933*p0001/(p0818*p0002)
- p0872: 9.93275e6; = p0864*p0856
- p3301: 0.130394; = if(and(p1232=0;p3252<>0);p3257*p3277*(p3297*p3290+(1-p3297)*p3294);0)
- p0805: 0
- p0215: 68.334
- p2081: 0.0019
- p0571: 0; = IF(p0307<0.5;-SQRT(p0007*EXP(p0439^2*p0008)-p0007);SQRT(p0007*EXP(p0439^2*p0008)-p0007))
- p0809: 2000
- p0797: 76.682; = p0137*(1+p0665*p0269/100)
- p0625: 0; = IF(p0361<0.5;-SQRT(p0007*EXP(p0493^2*p0008)-p0007);SQRT(p0007*EXP(p0493^2*p0008)-p0007))
- p0045: 23.463
- p2741: 5.84991e-6; = p2350*(p1128+p1130)
- p1017: 0.18342; = IF(p1012=0;p0708/100;0)
- p0798: 78.894; = p0138*(1+p0666*p0270/100)
- p1307: 0
- p2396: 0; = p2234*p2185
- p1272: 0.5107; = IF(p1267+p1270+p1271=p1259;0;p1259-(p1267+p1270+p1271))
- p0274: 0.5
- p1456: 2
- p1898: 0
- p2902: 4.74181e-6; = p2316*(p1020+p1022)
- p3833: 0; = p1896*p3477
- p3382: 0.000279012; = p3363*p1234
- p2991: 0; = p2405*(p1020+p1022)
- p2035: 7.76825e-7; = p2015*p2029*(1-p2031)/(p0818*1000)
- p3280: 0.375
- p3420: 0; = p3363*p1239
- p2001: 400
- p5338: 2.36356e-6; = p1963*p3484
- p3180: 0; = p2399*p1023
- p0373: 0.5
- p0188: 25.473
- p3080: 4.80121e-6; = p2299*p1082
- p0479: 0; = SQRT(2)*(IF((2*p0347-1)<0;-1;IF((2*p0347-1)>0;1;0))*SQRT(SQRT((2/(pi()*0.140012289)+LN(1-(2*p0347-1)^2)/2)^2-LN(1-(2*p0347-1)^2)/0.140012289)-(2/(pi()*0.140012289)+LN(1-(2*p0347-1)^2)/2)))
- p2664: 0.00259254; = p2273*(p1128+p1130)
- p0401: 0.5
- p0957: 7.0815e-7; = if(and(p0683>0;or(p0807=56;p0807=100;and(p0807=60;p0901>0.06)));p0939;0)
- p0733: 0
- p2261: 0.00233988; = p2226*p2207
- p0308: 0.5
- p2622: 0; = p2426*p1073
- p1037: 0.335385
- p2078: 0.117
- p2192: 0.00110899; = p1067-p2189-p2190-p2191
- p1895: 0
- p3245: 0.40772; = IF(p3244=1;0;if(p3244+p0792/100>1;1-p3244;p0792/100))
- p1773: 0
- p0845: 0.5
- p2085: 0.0335294
- p2786: 0; = p2395*(p1019+p1021)
- p4785: 0; = p1818*p3482
- p3117: 5.35901e-7; = p2336*p1082
- p4493: 0; = p1938*p3480
- p1694: 0
- p3002: 0; = p2416*(p1079+p1081)
- p2323: 4.90372e-6; = p2224*p2190
- p2617: 0; = p2421*p1073
- p0493: 0; = SQRT(2)*(IF((2*p0361-1)<0;-1;IF((2*p0361-1)>0;1;0))*SQRT(SQRT((2/(pi()*0.140012289)+LN(1-(2*p0361-1)^2)/2)^2-LN(1-(2*p0361-1)^2)/0.140012289)-(2/(pi()*0.140012289)+LN(1-(2*p0361-1)^2)/2)))
- p1031: 1.86335e-5; = IF(p1012=0;p1025*p0001/(p0818*p0002);0)
- p2448: 7.3083e-7; = p2252*p1014
- p3200: 0; = p2419*p1082
- p0132: 40.772
- p0674: 0
- p4650: 1.67258e-6; = p1889*p3481
- p0785: 4.669; = p0125*(1+p0653*p0257/100)
- p3041: 5.19666e-6; = p2260*p1082
- p5317: 9.67315e-9; = p1938*p3484
- p3269: 0.851786
- p0598: 0; = IF(p0334<0.5;-SQRT(p0007*EXP(p0466^2*p0008)-p0007);SQRT(p0007*EXP(p0466^2*p0008)-p0007))
- p2650: 0.000319631; = p2259*(p1078+p1080)
- p1729: 0
- p0323: 0.5
- p1987: 400
- p3804: 0; = p1867*p3477
- p3801: 0; = p1864*p3477
- p0320: 0.5
- p1264: 0; = if(p1232>0;0;IF(p1259+p1263=1;0;IF(p1259+p1263+p1261>1;1-(p1259+p1263);p1261)))
- p4365: 0; = p1810*p3480
- p0738: 11003.4; = p0078*(1+p0606*p0210/100)
- p0838: 3.61409e10; = (p0833-p0836)*p0837
- p2141: 5.08473e-8; = p2015*p2069*p2103/(p0818*1000)
- p2294: 0.00115766; = p2223*p2201
- p2788: 0; = p2397*(p1019+p1021)
- p0418: 0; = SQRT(2)*(IF((2*p0286-1)<0;-1;IF((2*p0286-1)>0;1;0))*SQRT(SQRT((2/(pi()*0.140012289)+LN(1-(2*p0286-1)^2)/2)^2-LN(1-(2*p0286-1)^2)/0.140012289)-(2/(pi()*0.140012289)+LN(1-(2*p0286-1)^2)/2)))
- p1054: 5.1802e8; = IF(p1012=0;p1047*p1036;0)
- p3467: 0.000452582; = p3372*p1241
- p1783: 0
- p1163: 0.00443745
- p3434: 0; = p3377*p1239
- p0882: 234975; = p0869*p0856
- p0806: 1.6492e9
- p4102: 0.000116023; = p1963*p3478
- p1872: 0
- p1586: 0
- p2015: 2.70027e7; = p0830*p2011*p2013
- p1892: 0
- p1023: 0; = IF(p1012=0;IF(p1014+p1019+p1020+p1021+p1022=1;0;1-(p1014+p1019+p1020+p1021+p1022));0)
- p2407: 0; = p2234*p2197
- p0955: 2.78796e-5; = if(and(p0683>0;or(p0807=56;p0807=100;and(p0807=60;p0901>0.06)));p0937;0)
- p0358: 0.5
- p1871: 0
- p1177: 0.000106264; = p0801*p0001/(p0818*p0002)
- p0407: 0; = SQRT(2)*(IF((2*p0275-1)<0;-1;IF((2*p0275-1)>0;1;0))*SQRT(SQRT((2/(pi()*0.140012289)+LN(1-(2*p0275-1)^2)/2)^2-LN(1-(2*p0275-1)^2)/0.140012289)-(2/(pi()*0.140012289)+LN(1-(2*p0275-1)^2)/2)))
- p0416: 0; = SQRT(2)*(IF((2*p0284-1)<0;-1;IF((2*p0284-1)>0;1;0))*SQRT(SQRT((2/(pi()*0.140012289)+LN(1-(2*p0284-1)^2)/2)^2-LN(1-(2*p0284-1)^2)/0.140012289)-(2/(pi()*0.140012289)+LN(1-(2*p0284-1)^2)/2)))
- p1732: 0
- p5035: 7.31792e-10; = p1862*p3483
- p2816: 0; = p2425*(p1078+p1080)
- p2006: 0.268742; = ((p1980*p1985+p1986*p1991+p1992*p1997+p2000*p2005)/p0818)*p0005*p0002/1000
- p2656: 0.000470192; = p2265*(p1078+p1080)
- p2714: 1.7748e-6; = p2323*(p1019+p1021)
- p2251: 1.89773e-6; = p2222*p2197
- p1741: 0
- p3658: 1.39285e-6; = p1927*p3476
- p0946: 0; = if(and(p0683=0;or(p0807=480;p0807=32;p0807=1;and(p0807=60;p0901<0.03)));p0934;0)
- p0369: 0.5
- p2944: 6.57866e-5; = p2358*(p1020+p1022)
- p1128: 0.38445; = if(p1121=0;IF(p1123=1;0;IF(p1123+p1124>1;1-p1123;p1124));0)
- p2930: 3.33394e-8; = p2344*(p1079+p1081)
- p0123: 120.686
- p3206: 0; = p2425*p1082
- p0475: 0; = SQRT(2)*(IF((2*p0343-1)<0;-1;IF((2*p0343-1)>0;1;0))*SQRT(SQRT((2/(pi()*0.140012289)+LN(1-(2*p0343-1)^2)/2)^2-LN(1-(2*p0343-1)^2)/0.140012289)-(2/(pi()*0.140012289)+LN(1-(2*p0343-1)^2)/2)))
- p0633: 0; = IF(p0369<0.5;-SQRT(p0007*EXP(p0501^2*p0008)-p0007);SQRT(p0007*EXP(p0501^2*p0008)-p0007))
- p2477: 2.07575e-5; = p2281*p1014
- p1579: 0
- p3015: 0; = p2429*(p1129+p1131)
- p3145: 0; = p2364*p1023
- p1679: 0
- p2230: 0.563701; = if(p0783*p0787+p0784*p0788+p0785*p0789+p0786*p0790=0;0;p0787*p0783/(p0783*p0787+p0784*p0788+p0785*p0789+p0786*p0790))
- p3223: 0.126838; = IF(p3216=0;0;(1-p1223)*24.3050/84.3139)
- p2429: 0; = p2236*p2219
- p0828: 0.0259; = if(p0827=0;0;p0819-p0827/p0818)
- p0999: 0; = IF(p0996=1;0;IF(p0996+p0997>1;1-p0996;p0997))
- p0875: 0; = p0874*p0001*p0003/(p0818*p0002)
- p0671: 9932.75; = p0011*(1+p0539*p0143/100)
- p2399: 0; = p2234*p2188
- p0578: 0; = IF(p0314<0.5;-SQRT(p0007*EXP(p0446^2*p0008)-p0007);SQRT(p0007*EXP(p0446^2*p0008)-p0007))
- p1904: 6.49666e-7; = p1496*1000/p0818
- p2246: 3.22077e-5; = p2222*p2191
- p0711: 5.369; = p0051*(1+p0579*p0183/100)
- p1606: 0.80434
- p1838: 0
- p0740: 97.367; = p0080*(1+p0608*p0212/100)
- p0506: 0; = SQRT(2)*(IF((2*p0374-1)<0;-1;IF((2*p0374-1)>0;1;0))*SQRT(SQRT((2/(pi()*0.140012289)+LN(1-(2*p0374-1)^2)/2)^2-LN(1-(2*p0374-1)^2)/0.140012289)-(2/(pi()*0.140012289)+LN(1-(2*p0374-1)^2)/2)))
- p2286: 0.000662593; = p2223*p2192
- p2197: 8.0744e-6; = p1055/p0818
- p3535: 1.8231e-9; = p1804*p3476
- p1071: 0
- p0240: 20.302
- p3702: 0; = p1765*p3477
- p2200: 0.00451944; = p1056/p0818
- p2713: 1.55055e-6; = p2322*(p1019+p1021)
- p3430: 0; = p3373*p1239
- p3419: 0; = p3362*p1239
- p0019: 2885.99
- p4481: 0; = p1926*p3480
- p1923: 0
- p1048: 0.000455125; = IF(p1012=0;IF(p1037+p1044+p1045+p1046+p1047=1;0;IF(p1037+p1044+p1045+p1046+p1047+p1042>1;1-(p1037+p1044+p1045+p1046+p1047);p1042));0)
- p1301: 0; = IF(p1297+p1300=p1265;0;IF(p1297+p1300+p1299>p1265;p1265-(p1297+p1300);p1299))
- p0775: 76.548; = p0115*(1+p0643*p0247/100)
- p0034: 148.099
- p2854: 5.38068e-5; = p2268*(p1079+p1081)
- p2537: 3.67152e-7; = p2341*p1073
- p3214: 0.376406; = p1222*40.078/100.0869
- p4579: 5.38998e-8; = p1818*p3481
- p1667: 0
- p2363: 2.17196e-5; = p2225*p2191
- p4863: 0; = p1896*p3482
- p5188: 9.91804e-9; = p1809*p3484
- p0722: 19.346; = p0062*(1+p0590*p0194/100)
- p0214: 3.096
- p2350: 1.52163e-5; = p2232*p2218
- p2456: 1.51306e-5; = p2260*p1073
- p2406: 0; = p2234*p2196
- p0768: 106.541; = p0108*(1+p0636*p0240/100)
- p2284: 0.000325584; = p2223*p2190
- p1963c: 1.63328e-5; = p1588*p1792+p1589*p1793+p1590*p1794+p1591*p1795+p1592*p1796+p1593*p1797+p1594*p1798+p1595*p1799+p1596*p1800+p1597*p1801+p1598*p1802+p1599*p1803+p1600*p1804+p1601*p1805+p1602*p1806+p1603*p1807+p1604*p1808+p1605*p1809+p1606*p1810+p1607*p1811
- p0311: 0.5
- p5043: 8.04972e-9; = p1870*p3483
- p2730: 2.59559e-5; = p2339*(p1078+p1080)
- p3161: 0; = p2380*p1082
- p2462: 1.05721e-7; = p2266*p1073
- p1220: 0; = IF(p1218<0.5;-SQRT(p1214*EXP(p1219^2*p1215)-p1214);SQRT(p1214*EXP(p1219^2*p1215)-p1214))
- p2856: 2.74099e-5; = p2270*(p1079+p1081)
- p3140: 0; = p2359*p1023
- p0414: 0; = SQRT(2)*(IF((2*p0282-1)<0;-1;IF((2*p0282-1)>0;1;0))*SQRT(SQRT((2/(pi()*0.140012289)+LN(1-(2*p0282-1)^2)/2)^2-LN(1-(2*p0282-1)^2)/0.140012289)-(2/(pi()*0.140012289)+LN(1-(2*p0282-1)^2)/2)))
- p2157: 1.22627e-8; = p2015*p2086*p2119/(p0818*1000)
- p0830: 5.24286e10; = p0825*p0821*p0824
- p2743: 5.37792e-7; = p2352*(p1128+p1130)
- p2416: 0; = p2235*p2206
- p1967: 0; = if(p0807=480;p0802*p0810;0)
- p2899: 0.000182477; = p2313*(p1129+p1131)
- p2818: 0; = p2427*(p1078+p1080)
- p3037: 0; = p2256*p1023
- p1551: 0
- p3201: 0; = p2420*p1082
- p3327: 0; = if(and(p1232=0;p3255<>0);1-(p3323+p3324+p3325+p3326);0)
- p1759: 0
- p0923: 0.191822; = IF(p0918=1;0;IF(p0918+p0919>1;1-p0918;p0919))
- p1000: 0; = IF(p0996+p0999=1;0;IF(p0996+p0999+p0998>1;1-(p0996+p0999);p0998))
- p3316: 0; = if(and(p1232=0;p3253<>0);1-(p3312+p3313+p3314+p3315);0)
- p2999: 0; = p2413*(p1020+p1022)
- p4120: 2.57798e-5; = p1771*p3479
- p2931: 3.48625e-7; = p2345*(p1079+p1081)
- p0156: 183.307
- p0563: 0; = IF(p0299<0.5;-SQRT(p0007*EXP(p0431^2*p0008)-p0007);SQRT(p0007*EXP(p0431^2*p0008)-p0007))
- p1094: 1.54641e-6; = IF(p1071=0;p1088*p0001/(p0818*p0002);0)
- p2923: 1.47347e-5; = p2337*(p1079+p1081)
- p4258: 3.28103e-8; = p1909*p3479
- p0316: 0.5
- p1684: 0
- p2359: 2.34686e-5; = p2225*p2187
- p0113: 78.894
- p2601: 0; = p2405*p1014
- p0006: 15
- p2153: 4.75682e-10; = p2015*p2081*p2115/(p0818*1000)
- p1447: 786
- p2364: 0.000175769; = p2225*p2192
- p0928: 3.96992e6; = p0801*p0918
- p4059: 1.80318e-8; = p1916*p3478
- p2897: 0.00198492; = p2311*(p1129+p1131)
- p0844: 0.409944
- p2274: 0.000439922; = p2230*p2220
- p2008: 0.0536512; = ((p1982*p1985+p1988*p1991+p1994*p1997+p2002*p2005)/p0818)*p0005*p0002/1000
- p1861: 0
- p4699: 1.33065e-7; = p1938*p3481
- p1676: 0
- p2572: 0; = p2376*p1073
- p2201: 0.00193759; = 12.01*p2200/(2*14.0067)
- p3429: 0; = p3372*p1239
- p3325: 0; = if(and(p1232=0;p3255<>0);p3267*p3289;0)
- p2571: 0; = p2375*p1073
- p3226: 0.000789091; = p3222*p1229
- p2669: 3.23398e-5; = p2278*(p1019+p1021)
- p3053: 0.000131739; = p2272*p1132
- p2563: 0.000441988; = p2367*p1014
- p3010: 0; = p2424*(p1079+p1081)
- p0678: 2110.04; = p0018*(1+p0546*p0150/100)
- p1609: 0
- p2491: 3.90926e-5; = p2295*p1014
- p2960: 0.000204424; = p2374*(p1020+p1022)
- p1091: 4.5163e-5; = IF(p1071=0;p1085*p0001/(p0818*p0002);0)
- p3086: 3.35472e-8; = p2305*p1082
- p0813: 0; = if(p0807=480;1.56521739130435;0)
- p2722: 9.48996e-8; = p2331*(p1019+p1021)
- p2269: 0.000362207; = p2226*p2215
- p1052: 9.50174e7; = IF(p1012=0;p1045*p1036;0)
- p0896: 0.443532
- p2588: 0; = p2392*p1123
- p2122: 0.341195
- p1691: 0
- p1309: 0
- p3278: 0.46
- p1811: 0
- p1111: 0.0872841
- p1731: 0
- p5243: 2.4489e-10; = p1864*p3484
- p2239: 3.51493e-5; = p2222*p2184
- p0912: 0.0117949
- p1956: 0
- p1750: 0
- p1588: 0
- p2580: 0; = p2384*p1073
- p1962: 0; = p1960*1000/p0818
- p1566: 0
- p2922: 1.62918e-5; = p2336*(p1079+p1081)
- p2224: 0.00899878; = if(p0765*p0769+p0766*p0770+p0767*p0771+p0768*p0772=0;0;p0771*p0767/(p0765*p0769+p0766*p0770+p0767*p0771+p0768*p0772))
- p2125: 3.6464e-7; = p2015*p2053*p2087/(p0818*1000)
- p0976: 0; = IF(p0687=0;IF(OR(p0686=0;p0689=0);0;p0686*1000*p0689/100);0)
- p5288: 2.20401e-9; = p1909*p3484
- p2954: 5.16305e-7; = p2368*(p1020+p1022)
- p5112: 1.28064e-7; = p1939*p3483
- p1890: 0
- p1368: 111
- p0244: 84.447
- p0056: 81.763
- p0974: 0.5
- p4278: 4.83041e-7; = p1929*p3479
- p3083: 3.85742e-6; = p2302*p1082
- p0931: 2.88599e6; = p0801*p0925
- p5305: 1.34689e-9; = p1926*p3484
- p0252: 83.028
- p0001: 0.404686
- p2166: 0.315407; = p2165*p0824
- p2513: 3.15762e-7; = p2317*p1014
- p2145: 9.73454e-8; = p2015*p2073*p2107/(p0818*1000)
- p0387: 0.5
- p0174: 0
- p2033: 6.763e-7; = p2015*p2029*p2031/(p0818*1000)
- p1755: 0
- p1039: 0.0579913
- p0788: 43.572; = p0128*(1+p0656*p0260/100)
- p2690: 9.56284e-5; = p2299*(p1078+p1080)
- p0864: 0.902978; = IF(p0858=1;0;IF(p0858+p0859>1;1-p0858;p0859))
- p4216: 7.47347e-8; = p1867*p3479
- p2604: 0; = p2408*p1014
- p2665: 0.000169128; = p2274*(p1128+p1130)
- p2917: 1.05784e-7; = p2331*(p1020+p1022)
- p1981: 400
- p1593: 0
- p2615: 0; = p2419*p1073
- p1219: 0; = if(p1218=0;0;SQRT(2)*(IF((2*p1218-1)<0;-1;IF((2*p1218-1)>0;1;0))*SQRT(SQRT((2/(pi()*0.140012289)+LN(1-(2*p1218-1)^2)/2)^2-LN(1-(2*p1218-1)^2)/0.140012289)-(2/(pi()*0.140012289)+LN(1-(2*p1218-1)^2)/2))))
- p1608: 0
- p2508: 0.000259326; = p2312*p1123
- p2204: 0.0018803; = p1109/p0818
- p0264: 0
- p4275: 2.00508e-8; = p1926*p3479
- p0865: 0; = IF(p0858+p0864=1;0;IF(p0858+p0864+p0860>1;1-(p0858+p0864);p0860))
- p2576: 0; = p2380*p1073
- p3290: 0.195
- p1215: 0.0183471; = IF(p1214=0;0;(p1214-1.5)/(p1214-1)^2)
- p4927: 4.62493e-7; = p1754*p3483
- p3114: 0; = p2333*p1023
- p3300: 0; = if(p1293+p1294+p1295+p1296=0;0;p1293/(p1293+p1294+p1295+p1296))
- p1577: 0
- p1056: 4.17394e8; = IF(p1012=0;p1049*p1036;0)
- p1584: 0
- p3416: 0; = p3378*p1238
- p1862: 1.08278e-8; = p1454*1000/p0818
- p5133: 7.73852e-8; = p1754*p3484
- p2919: 7.03436e-6; = p2333*(p1020+p1022)
- p0321: 0.5
- p1276: 0.0563463; = p1272*p1252/p0818
- p4570: 1.36434e-7; = p1809*p3481
- p3232: 1.52261e-8; = p1182/p0818
- p2066: 0.109412
- p2742: 8.24375e-6; = p2351*(p1128+p1130)
- p2154: 3.70712e-8; = p2015*p2082*p2116/(p0818*1000)
- p2255: 0.000455392; = p2222*p2201
- p2376: 0; = p2229*p2205
- p1305: 0; = p1301*p1252/p0818
- p0161: 0
- p3276: 0.0887032
- p0197: 116.387
- p2343: 3.86653e-5; = p2228*p2211
- p1146: 0.915808
- p1234: 0.59004; = if(p1232>0;0;p0726/100)
- p2798: 0; = p2407*(p1019+p1021)
- p2055: 5.59471
- p2112: 0.856281
- p2825: 1.41806e-5; = p2239*(p1020+p1022)
- p0726: 59.004; = p0066*(1+p0594*p0198/100)
- p3211: 0; = p2430*p1132
- p2925: 3.96172e-5; = p2339*(p1079+p1081)
- p4514: 0; = p1963*p3480
- p0706: 17.851; = p0046*(1+p0574*p0178/100)
- p0687: 7.93; = p0027*(1+p0555*p0159/100)
- p2610: 0; = p2414*p1073
- p2962: 0; = p2376*(p1079+p1081)
- p1747: 0
- p4559: 1.26328e-7; = p1798*p3481
- p4730: 0; = p1763*p3482
- p5319: 2.95092e-8; = p1940*p3484
- p0966: 0.86901; = if(p0683=0;0;IF(p0684/100+p0965=1;0;1-(p0684/100+p0965)))
- p0778: 50.536; = p0118*(1+p0646*p0250/100)
- p4125: 2.0233e-7; = p1776*p3479
- p1897: 0
- p0217: 266.344
- p1806: 0
- p1647: 0
- p3481: 0.15556; = if(p1328+p1330+p1332+p1334+p1336+p1338+p1340+p1342+p1344=0;0;p1338/(p1328+p1330+p1332+p1334+p1336+p1338+p1340+p1342+p1344))
- p1274: 0; = p1270*p1252/p0818
- p0971: 0.000168416; = p0968/p0818
- p0403: 0.5
- p1235: 0.22341; = if(p1232>0;0;p0727/100)
- p0953: 2.03837e-5; = if(and(p0683>0;or(p0807=56;p0807=100;and(p0807=60;p0901>0.06)));p0935;0)
- p3573: 1.4129e-8; = p1842*p3476
- p1010: 0; = p0890
- p0907: 0.00295453
- p1020: 0.14382; = IF(p1012=0;IF(p1014+p1019=1;0;IF(p1014+p1019+p1016>1;1-(p1014+p1019);p1016));0)
- p1066: 0.00307112; = IF(p1012=0;p1052/(p1059*p0818);0)
- p1854: 0
- p0505: 0; = SQRT(2)*(IF((2*p0373-1)<0;-1;IF((2*p0373-1)>0;1;0))*SQRT(SQRT((2/(pi()*0.140012289)+LN(1-(2*p0373-1)^2)/2)^2-LN(1-(2*p0373-1)^2)/0.140012289)-(2/(pi()*0.140012289)+LN(1-(2*p0373-1)^2)/2)))
- p2394: 0; = p2234*p2183
- p2074: 0.025
- p1078: 0.36728; = IF(p1071=0;IF(p1073=1;0;IF(p1073+p1074>1;1-p1073;p1074));0)
- p1717: 0
- p0008: 0.0739645; = (p0007-1.5)/(p0007-1)^2
- p1931: 0
- p2527: 6.1521e-8; = p2331*p1014
- p2806: 0; = p2415*(p1078+p1080)
- p2062: 3.76588
- p2101: 0.620397
- p0962: 0; = if(and(p0683>0;or(p0807=480;p0807=32;p0807=1;and(p0807=60;p0901<0.03)));p0938;0)
- p2267: 2.05906e-5; = p2226*p2213
- p2106: 0.856281
- p3082: 8.53011e-6; = p2301*p1082
- p2903: 5.42944e-7; = p2317*(p1020+p1022)
- p1209: 152.79; = p1206*p0818*p0822/p0801
- p2847: 0.00131172; = p2261*(p1079+p1081)
- p3484: 0.0113084; = IF(p1344=0;0;p1344/(p1328+p1330+p1332+p1334+p1336+p1338+p1340+p1342+p1344))
- p2898: 0.00279717; = p2312*(p1129+p1131)
- p1269: 0
- p1953: 0
- p2997: 0; = p2411*(p1020+p1022)
- p1632: 0
- p2625: 0; = p2429*p1123
- p2874: 0.000289822; = p2288*(p1020+p1022)
- p1147: 0.0841918
- p0653: 0; = IF(p0389<0.5;-SQRT(p0007*EXP(p0521^2*p0008)-p0007);SQRT(p0007*EXP(p0521^2*p0008)-p0007))
- p3362: 0.00288539; = if(p1232=0;p3244*p3356/p0818;0)
- p3102: 0; = p2321*p1023
- p0049: 25.962
- p4331: 0; = p1776*p3480
- p0538: 0; = IF(p0274<0.5;-SQRT(p0007*EXP(p0406^2*p0008)-p0007);SQRT(p0007*EXP(p0406^2*p0008)-p0007))
- p1125: 0.53813; = if(p1121=0;p0719/100;0)
- p2432: 0.0182018; = p1158
- p2614: 0; = p2418*p1073
- p1626: 0
- p0754: 5614.82; = p0094*(1+p0622*p0226/100)
- p2275: 0.000764468; = p2230*p2221
- p3107: 0; = p2326*p1023
- p2748: 2.95497e-5; = p2357*(p1019+p1021)
- p0235: 0
- p0990: 0; = p0986*p0886
- p2907: 6.87692e-6; = p2321*(p1020+p1022)
- p1830: 0
- p2794: 0; = p2403*(p1019+p1021)
- p1921: 0
- p1835: 0
- p0484: 0; = SQRT(2)*(IF((2*p0352-1)<0;-1;IF((2*p0352-1)>0;1;0))*SQRT(SQRT((2/(pi()*0.140012289)+LN(1-(2*p0352-1)^2)/2)^2-LN(1-(2*p0352-1)^2)/0.140012289)-(2/(pi()*0.140012289)+LN(1-(2*p0352-1)^2)/2)))
- p0516: 0; = SQRT(2)*(IF((2*p0384-1)<0;-1;IF((2*p0384-1)>0;1;0))*SQRT(SQRT((2/(pi()*0.140012289)+LN(1-(2*p0384-1)^2)/2)^2-LN(1-(2*p0384-1)^2)/0.140012289)-(2/(pi()*0.140012289)+LN(1-(2*p0384-1)^2)/2)))
- p1245: 0; = if(p1232>0;0;p1240*(p0725/100)*p0723*1000)
- p2312: 0.00519795; = p2231*p2219
- p1225: 1.088; = IF(p1221=0;0;p1223+1.2*p1224)
- p2776: 0; = p2385*(p1078+p1080)
- p3147: 0; = p2366*p1023
- p3046: 2.36069e-5; = p2265*p1082
- p3123: 5.44457e-8; = p2342*p1082
- p0965: 0.0793; = IF(p0684/100=1;0;IF(p0684/100+p0685/100>1;1-p0684/100;p0685/100))
- p1760: 0
- p2799: 0; = p2408*(p1019+p1021)
- p3192: 0; = p2411*p1023
- p0491: 0; = SQRT(2)*(IF((2*p0359-1)<0;-1;IF((2*p0359-1)>0;1;0))*SQRT(SQRT((2/(pi()*0.140012289)+LN(1-(2*p0359-1)^2)/2)^2-LN(1-(2*p0359-1)^2)/0.140012289)-(2/(pi()*0.140012289)+LN(1-(2*p0359-1)^2)/2)))
- p0250: 32.411
- p0514: 0; = SQRT(2)*(IF((2*p0382-1)<0;-1;IF((2*p0382-1)>0;1;0))*SQRT(SQRT((2/(pi()*0.140012289)+LN(1-(2*p0382-1)^2)/2)^2-LN(1-(2*p0382-1)^2)/0.140012289)-(2/(pi()*0.140012289)+LN(1-(2*p0382-1)^2)/2)))
- p1790: 0
- p2932: 1.6251e-6; = p2346*(p1079+p1081)
- p1595: 0
- p2138: 2.25766e-8; = p2015*p2066*p2100/(p0818*1000)
- p0861: 0; = p0673*1000/p0856
- p1401: 81
- p3266: 0.0545989
- p0460: 0; = SQRT(2)*(IF((2*p0328-1)<0;-1;IF((2*p0328-1)>0;1;0))*SQRT(SQRT((2/(pi()*0.140012289)+LN(1-(2*p0328-1)^2)/2)^2-LN(1-(2*p0328-1)^2)/0.140012289)-(2/(pi()*0.140012289)+LN(1-(2*p0328-1)^2)/2)))
- p1136: 0; = if(p1121=0;p1130*(p0716/100)*p0703*1000;0)
- p0903: 0.0106556
- p0713: 53.854; = p0053*(1+p0581*p0185/100)
- p3148: 0; = p2367*p1023
- p2752: 2.73098e-5; = p2361*(p1019+p1021)
- p3071: 0; = p2290*p1023
- p0593: 0; = IF(p0329<0.5;-SQRT(p0007*EXP(p0461^2*p0008)-p0007);SQRT(p0007*EXP(p0461^2*p0008)-p0007))
- p0933: 73305; = p0801*p0927
- p3457: 0.00053827; = p3362*p1241
- p0753: 0
- p3376: 0; = if(p1232=0;p3246*p3358/p0818;0)
- p0948: 0; = if(and(p0683=0;or(p0807=480;p0807=32;p0807=1;and(p0807=60;p0901<0.03)));p0936;0)
- p1969: 115000; = p0803
- p2700: 1.65915e-5; = p2309*(p1078+p1080)
- p2414: 0; = p2235*p2204
- p2105: 0.888194
- p2370: 4.6182e-6; = p2225*p2199
- p0254: 25.473
- p1334: 7.22099e6; = p1322*p0801
- p2716: 3.61189e-6; = p2325*(p1019+p1021)
- p0710: 78.894; = p0050*(1+p0578*p0182/100)
- p0910: 0.00350262; = p0909/p0818
- p2887: 0.000259322; = p2301*(p1079+p1081)
- p2333: 1.7436e-5; = p2224*p2201
- p1214: 55; = IF(p1213=0;0;p1213-1)
- p2738: 4.01789e-6; = p2347*(p1078+p1080)
- p4687: 1.85281e-8; = p1926*p3481
- p1807: 0
- p3410: 0.000542006; = p3372*p1238
- p2972: 0; = p2386*(p1079+p1081)
- p1041: 0.316159
- p1083: 466087; = IF(p1071=0;p1073*(p0710/100)*p0703*1000;0)
- p0196: 47.833
- p0043: 11003.5
- p2636: 4.63543e-5; = p2245*(p1019+p1021)
- p1828: 0
- p2865: 0.000124168; = p2279*(p1020+p1022)
- p2867: 3.56919e-5; = p2281*(p1020+p1022)
- p2461: 6.87339e-5; = p2265*p1073
- p1335: 6.97571e-5; = p1334*p0001/(p0818*p0002)
- p0752: 0
- p2783: 0; = p2392*(p1128+p1130)
- p3198: 0; = p2417*p1082
- p1881: 0
- p3254: 0; = p1252*(p1287*(1-p3247)+p1290*(1-p3248)+p1291*(1-p3249)+p1292*(1-p3250))
- p4348: 0; = p1793*p3480
- p2378: 0; = p2229*p2207
- p0651: 0; = IF(p0387<0.5;-SQRT(p0007*EXP(p0519^2*p0008)-p0007);SQRT(p0007*EXP(p0519^2*p0008)-p0007))
- p3138: 0; = p2357*p1023
- p3351: 4.50844e7; = if(and(p1232=0;p3256<>0);p3256*(p3274-p3346)/p3349;0)
- p5150: 1.73174e-6; = p1771*p3484
- p1767: 0
- p0067: 22.341
- p1781: 0
- p3296: 0.514
- p4069: 6.61164e-8; = p1926*p3478
- p3221: 0.146975; = IF(p3216=0;0;p1223*12.0107/100.0869+(1-p1224)*12.0107/84.3139)
- p1639: 0
- p0116: 21.137
- p2009: 0.00620345; = ((p1983*p1985+p1989*p1991+p1995*p1997+p2003*p2005+p1976*p1977+p1978*p1979+p1998*p1999)/p0818)*p0005*p0002/1000
- p0639: 0; = IF(p0375<0.5;-SQRT(p0007*EXP(p0507^2*p0008)-p0007);SQRT(p0007*EXP(p0507^2*p0008)-p0007))
- p5172: 1.26486e-7; = p1793*p3484
- p2288: 0.000718377; = p2223*p2195
- p1982: 750
- p2834: 0.000531848; = p2248*(p1020+p1022)
- p1016: 0.14382; = IF(p1012=0;p0707/100;0)
- p2235: 0; = 1-(p2226+p2227+p2228+p2229)
- p0007: 14; = p0006-1
- p0380: 0.5
- p0970: 0.000109778; = p0967/p0818
- p3627: 8.20394e-9; = p1896*p3476
- p3353: 6.43585e7; = if(and(p1232=0;p3256<>0);p3256*(p3276-p3348)/p3349;0)
- p0157: 128.208
- p3919: 6.67175e-7; = p1776*p3478
- p2671: 0.000222478; = p2280*(p1019+p1021)
- p3363: 0.000472869; = if(p1232=0;p3244*p3357/p0818;0)
- p2852: 1.10386e-6; = p2266*(p1079+p1081)
- p2533: 1.4112e-6; = p2337*p1073
- p3268: 0.0232481
- p2482: 0.000155464; = p2286*p1014
- p2352: 1.39886e-6; = p2232*p2220
- p3330: 0; = if(and(p1232=0;p3255<>0);p3255*(p3267-p3325)/p3327;0)
- p1753: 0
- p1631: 0
- p2892: 1.06645e-5; = p2306*(p1079+p1081)
- p1050: 5.49521e8; = IF(p1012=0;p1037*p1036;0)
- p5142: 1.86116e-8; = p1763*p3484
- p1771: 0.000153137; = p1363*1000/p0818
- p2310: 0.00040487; = p2227*p2217
- p1787: 0
- p2317: 1.34579e-6; = p2224*p2184
- p1661: 0
- p2249: 0.000282589; = p2222*p2195
- p2715: 4.46318e-7; = p2324*(p1019+p1021)
- p0242: 19.188
- p1222: 0.94
- p2548: 6.97892e-8; = p2352*p1123
- p0370: 0.5
- p1612: 0
- p1121: 0
- p0667: 0; = IF(p0403<0.5;-SQRT(p0007*EXP(p0535^2*p0008)-p0007);SQRT(p0007*EXP(p0535^2*p0008)-p0007))
- p2426: 0; = p2235*p2216
- p1090: 3.08008e-5; = IF(p1071=0;p1084*p0001/(p0818*p0002);0)
- p2303: 9.03204e-5; = p2227*p2210
- p3197: 0; = p2416*p1082
- p0592: 0; = IF(p0328<0.5;-SQRT(p0007*EXP(p0460^2*p0008)-p0007);SQRT(p0007*EXP(p0460^2*p0008)-p0007))
- p2029: 4.97
- p3461: 0.000657449; = p3366*p1241
- p3081: 3.98641e-5; = p2300*p1082
- p0981: 0; = p0978*p0001/(p0818*p0002)
- p1947: 0
- p2984: 0; = p2398*(p1020+p1022)
- p1265: 0; = if(p1232>0;0;IF(p1259+p1263+p1264=1;0;IF(p1259+p1263+p1264+p1262>1;1-(p1259+p1263+p1264);p1262)))
- p2296: 0.0019101; = p2223*p2203
- p1746: 0
- p0327: 0.5
- p2386: 0; = p2229*p2215
- p1683: 0
- p3896: 0; = p1963*p3477
- p0776: 21.137; = p0116*(1+p0644*p0248/100)
- p1390: 75
- p0701: 0
- p0520: 0; = SQRT(2)*(IF((2*p0388-1)<0;-1;IF((2*p0388-1)>0;1;0))*SQRT(SQRT((2/(pi()*0.140012289)+LN(1-(2*p0388-1)^2)/2)^2-LN(1-(2*p0388-1)^2)/0.140012289)-(2/(pi()*0.140012289)+LN(1-(2*p0388-1)^2)/2)))
- p1730: 0
- p0683: 28648.3; = p0023*(1+p0551*p0155/100)
- p2111: 0.856281
- p4005: 6.01058e-9; = p1862*p3478
- p0849: 0.0657513
- p2096: 0.486404
- p0178: 224.56
- p0548: 0; = IF(p0284<0.5;-SQRT(p0007*EXP(p0416^2*p0008)-p0007);SQRT(p0007*EXP(p0416^2*p0008)-p0007))
- p0703: 11003.5; = p0043*(1+p0571*p0175/100)
- p3193: 0; = p2412*p1023
- p3386: 0.000340697; = p3367*p1234
- p5318: 2.14279e-8; = p1939*p3484
- p2824: 0.000123847; = p2238*(p1020+p1022)
- p1963i: 1.68881e-5; = p1706*p1910+p1707*p1911+p1708*p1912+p1709*p1913+p1710*p1914+p1711*p1915+p1712*p1916+p1713*p1917+p1714*p1918+p1715*p1919+p1716*p1920+p1717*p1921+p1718*p1922+p1719*p1923+p1720*p1924+p1721*p1925+p1722*p1926+p1723*p1927+p1724*p1928
- p0583: 0; = IF(p0319<0.5;-SQRT(p0007*EXP(p0451^2*p0008)-p0007);SQRT(p0007*EXP(p0451^2*p0008)-p0007))
- p0919: 0.191822; = p0678*1000/p0801
- p0027: 7.93
- p2772: 0; = p2381*(p1078+p1080)
- p0155: 2.286
- p0085: 37279.2
- p0310: 0.5
- p1795: 0
- p2965: 0; = p2379*(p1079+p1081)
- p2128: 2.43128e-7; = p2015*p2056*p2090/(p0818*1000)
- p1598: 0
- p1799: 0
- p3239: 0.013074; = IF(p3238+p3235+p3236=1;0;1-(p3238+p3235+p3236))
- p0150: 0
- p0065: 6.123
- p2589: 0; = p2393*p1014
- p2098: 0.856281
- p2475: 7.2213e-5; = p2279*p1014
- p2042: 0.07
- p2069: 0.190588
- p1842: 3.35661e-7; = p1434*1000/p0818
- p2424: 0; = p2235*p2214
- p1699: 0
- p4896: 0; = p1929*p3482
- p0009: 43.4977
- p2346: 2.89892e-6; = p2228*p2214
- p3494: 6.92777e-8; = p1763*p3476
- p3415: 0; = p3377*p1238
- p4983: 2.15879e-7; = p1810*p3483
- p2698: 3.25699e-5; = p2307*(p1078+p1080)
- p2451: 0.000106849; = p2255*p1014
- p4829: 0; = p1862*p3482
- p2978: 0; = p2392*(p1129+p1131)
- p2120: 0.51828
- p1346: 632
- p4444: 0; = p1889*p3480
- p1797: 0
- p1138: 247681; = if(p1121=0;p1132*(p0716/100)*p0703*1000;0)
- p2933: 6.13262e-6; = p2347*(p1079+p1081)
- p2379: 0; = p2229*p2208
- p1788: 0
- p5082: 1.31723e-8; = p1909*p3483
- p0717: 4.989; = p0057*(1+p0585*p0189/100)
- p3236: 0.0140975
- p0980: 0; = IF(p0977=0;0;p0977*p0001/(p0818*p0002))
- p2031: 0.465411
- p0982: 0; = if(p0886=0;0;min(1;(p0691*p0690*1000*p0693/100)/p0886))
- p0438: 0; = SQRT(2)*(IF((2*p0306-1)<0;-1;IF((2*p0306-1)>0;1;0))*SQRT(SQRT((2/(pi()*0.140012289)+LN(1-(2*p0306-1)^2)/2)^2-LN(1-(2*p0306-1)^2)/0.140012289)-(2/(pi()*0.140012289)+LN(1-(2*p0306-1)^2)/2)))
- p0958: 0; = if(and(p0683>0;or(p0807=480;p0807=32;p0807=1;and(p0807=60;p0901<0.03)));p0934;0)
- p2881: 6.72187e-5; = p2295*(p1020+p1022)
- p0107: 19.961
- p1200: 0.84
- p0967: 1.01386e7; = (p0684/100)*p0964*p0683*p0682*1000
- p3146: 0; = p2365*p1023
- p0763: 11003.5; = p0103*(1+p0631*p0235/100)
- p4245: 3.28103e-8; = p1896*p3479
- p2564: 3.00269e-7; = p2368*p1014
- p2682: 2.86585e-6; = p2291*(p1019+p1021)
- p3228: 0.00176631; = p3224*p1229
- p3332: 0; = if(and(p1232=0;p3255<>0);IF((p3328+p3329+p3330+p3331)+(p3255*(p3265*(1-p3277))/p3327)>p3255;p3255-(p3328+p3329+p3330+p3331);p3255*(p3265*(1-p3277))/p3327);0)
- p2969: 0; = p2383*(p1079+p1081)
- p0779: 46.128; = p0119*(1+p0647*p0251/100)
- p1714: 0
- p0660: 0; = IF(p0396<0.5;-SQRT(p0007*EXP(p0528^2*p0008)-p0007);SQRT(p0007*EXP(p0528^2*p0008)-p0007))
- p1337: 0; = p1336*p0001/(p0818*p0002)
- p0866: 0; = IF(p0858+p0864+p0865=1;0;IF(p0858+p0864+p0865+p0861>1;1-(p0858+p0864+p0865);p0861))
- p1592: 0
- p0239: 64.684
- p0891: 226512; = IF(p3251=0;0;62.4*6272640/(12*12*12))
- p3401: 0.000105644; = p3363*p1238
- p1905: 0
- p4039: 1.08191e-7; = p1896*p3478
- p2425: 0; = p2235*p2215
- p1911: 0
- p1292: 0; = IF(p1287+p1290+p1291=p1261;0;p1261-(p1287+p1290+p1291))
- p2187: 0.000148071; = 4*1.00794*p2186/(2*14.0067)
- p2025: 4.90334e-7; = p2015*p2023*p2024/(p0818*1000)
- p0906: 0.00342907
- p3357: 7.37353e7; = if(p1232=0;p3307+p3318+p3329+p3340+p3351;0)
- p1279: 0
- p3906: 9.13609e-7; = p1763*p3478
- p2097: 0.40001
- p2578: 0; = p2382*p1073
- p4211: 1.8228e-9; = p1862*p3479
- p1102: 0.0303738; = IF(p1071=0;IF(p1096+p1101=1;0;IF(p1096+p1101+p1098>1;1-(p1096+p1101);p1098));0)
- p2484: 0.000168553; = p2288*p1014
- p2027: 0.428799
- p4603: 5.22154e-8; = p1842*p3481
- p1236: 0; = if(p1232>0;0;p0728/100)
- p2168: 0.00336086; = p2166*(p0903)
- p4771: 0; = p1804*p3482
- p2707: 4.25392e-6; = p2316*(p1019+p1021)
- p1648: 0
- p1255: 0; = if(p1232>0;0;p0737/100)
- p2711: 4.82258e-7; = p2320*(p1019+p1021)
- p1733: 0
- p2160: 2.09492e-8; = p2015*p2084*p2122/(p0818*1000)
- p1410: 32
- p0213: 19.068
- p0131: 59.228
- p2045: 30
- p2135: 2.35626e-7; = p2015*p2063*p2097/(p0818*1000)
- p1079: 0.53854; = IF(p1071=0;IF(p1073+p1078=1;0;IF(p1073+p1078+p1075>1;1-(p1073+p1078);p1075));0)
- p0487: 0; = SQRT(2)*(IF((2*p0355-1)<0;-1;IF((2*p0355-1)>0;1;0))*SQRT(SQRT((2/(pi()*0.140012289)+LN(1-(2*p0355-1)^2)/2)^2-LN(1-(2*p0355-1)^2)/0.140012289)-(2/(pi()*0.140012289)+LN(1-(2*p0355-1)^2)/2)))
- p3747: 0; = p1810*p3477
- p2053: 1.45647
- p1965: 0.000382901; = p1963+p1959*p1964*1000/p0818
- p3177: 0; = p2396*p1023
- p0856: 1.1e7; = p0801
- p3411: 8.88024e-5; = p3373*p1238
- p2545: 7.10602e-7; = p2349*p1073
- p2264: 9.77595e-5; = p2226*p2210
- p1613: 0
- p3096: 0; = p2315*p1023
- p0391: 0.5
- p2754: 7.86099e-6; = p2363*(p1019+p1021)
- p4417: 0; = p1862*p3480
- p1749: 0
- p3126: 1.14676e-8; = p2345*p1082
- p1152: 0.415074
- p1657: 0
- p3018: 0; = p2237*p1023
- p0929: 2.11004e6; = p0801*p0923
- p2792: 0; = p2401*(p1019+p1021)
- p0696: 0
- p3455: 0; = p3379*p1240
- p0745: 37279.2; = p0085*(1+p0613*p0217/100)
- p3190: 0; = p2409*p1023
- p3377: 0; = if(p1232=0;p3246*p3359/p0818;0)
- p1049: 0.254745; = IF(p1012=0;IF(p1037+p1044+p1045+p1046+p1047+p1048=1;0;1-(p1037+p1044+p1045+p1046+p1047+p1048));0)
- p2133: 1.16157e-7; = p2015*p2061*p2095/(p0818*1000)
- p3094: 9.3353e-6; = p2313*p1132
- p2558: 2.02648e-5; = p2362*p1014
- p1191: 0.5
- p4719: 0; = p1962*p3481
- p1278: 0
- p0635: 0; = IF(p0371<0.5;-SQRT(p0007*EXP(p0503^2*p0008)-p0007);SQRT(p0007*EXP(p0503^2*p0008)-p0007))
- p2677: 0.000239812; = p2286*(p1019+p1021)
- p1227: 0.000106264; = IF(p1221=0;0;p1226*p0001/(p0818*p0002))
- p0612: 0; = IF(p0348<0.5;-SQRT(p0007*EXP(p0480^2*p0008)-p0007);SQRT(p0007*EXP(p0480^2*p0008)-p0007))
- p1205: 0
- p0820: 0; = if(p0807=480;p0814;0)
- p2951: 0.000358658; = p2365*(p1020+p1022)
- p3141: 0; = p2360*p1023
- p1785: 0
- p1801: 0
- p1134: 3.45881e6; = if(p1121=0;p1128*(p0716/100)*p0703*1000;0)
- p2420: 0; = p2235*p2210
- p1796: 0
- p1906: 0
- p1823: 0
- p3125: 1.09666e-9; = p2344*p1082
- p3425: 0; = p3368*p1239
- p3162: 0; = p2381*p1082
- p2405: 0; = p2234*p2195
- p2751: 0.000108661; = p2360*(p1019+p1021)
- p1273: 0; = p1267*p1252/p0818
- p2440: 2.62533e-5; = p2244*p1014
- p1642: 0
- p2259: 0.000870266; = p2226*p2205
- p0787: 52.596; = p0127*(1+p0655*p0259/100)
- p1973: 0; = if(p0807=480;p1968*p0001/(p0818*p0002);0)
- p2835: 0.000114008; = p2249*(p1020+p1022)
- p2279: 0.000307774; = p2223*p2185
- p0152: 0
- p2829: 0.000179611; = p2243*(p1020+p1022)
- p3365: 0.000571778; = if(p1232=0;p3244*p3359/p0818;0)
- p1164: 48812; = p1163*p0801
- p1779: 0
- p2766: 0; = p2375*(p1078+p1080)
- p0679: 2885.99; = p0019*(1+p0547*p0151/100)
- p2853: 1.15429e-5; = p2267*(p1079+p1081)
- p0328: 0.5
- p1202: 0.7
- p2285: 8.18759e-5; = p2223*p2191
- p0829: 0; = if(p0807=480;p0814*(1-p0824);0)
- p2072: 0.134
- p4397: 0; = p1842*p3480
- p3165: 0; = p2384*p1082
- p2049: 25.6942
- p1963h: 1.49173e-6; = p1686*p1890+p1687*p1891+p1688*p1892+p1689*p1893+p1690*p1894+p1691*p1895+p1692*p1896+p1693*p1897+p1694*p1898+p1695*p1899+p1696*p1900+p1697*p1901+p1698*p1902+p1699*p1903+p1700*p1904+p1701*p1905+p1702*p1906+p1703*p1907+p1704*p1908+p1705*p1909
- p2218: 0.00848908; = p1150/p0818
- p1069: 5.0465e-5; = IF(p1012=0;p1055/(p1062*p0818);0)
- p1159: 0.5
- p1160: 0.0487191; = (p1156+p1158)*p1159
- p0727: 22.341; = p0067*(1+p0595*p0199/100)
- p0576: 0; = IF(p0312<0.5;-SQRT(p0007*EXP(p0444^2*p0008)-p0007);SQRT(p0007*EXP(p0444^2*p0008)-p0007))
- p3384: 0.000337372; = p3365*p1234
- p3036: 0; = p2255*p1023
- p0749: 19.37; = p0089*(1+p0617*p0221/100)
- p3876: 0; = p1939*p3477
- p3961: 1.92339e-7; = p1818*p3478
- p2209: 0.000442443; = 14.0067*p2208/30.973762
- p1303: 0; = p1297*p1252/p0818
- p0182: 12.912
- p2910: 4.97506e-7; = p2324*(p1020+p1022)
- p0608: 0; = IF(p0344<0.5;-SQRT(p0007*EXP(p0476^2*p0008)-p0007);SQRT(p0007*EXP(p0476^2*p0008)-p0007))
- p1300: 0; = IF(p1297=p1265;0;IF(p1297+p1298>p1265;p1265-p1297;p1298))
- p1739: 0
- p2958: 0.000123896; = p2372*(p1020+p1022)
- p4101: 0; = p1962*p3478
- p0870: 832271; = p0858*p0856
- p3408: 2.10208e-5; = p3370*p1238
- p1006: 0; = p1002*p0001*p0004/(p0818*p0002)
- p4374: 0; = p1819*p3480
- p2199: 2.91378e-5; = p1069-p2197-p2198
- p2764: 1.59968e-5; = p2373*(p1019+p1021)
- p2964: 0; = p2378*(p1079+p1081)
- p1645: 0
- p1852: 0
- p3439: 0; = p3363*p1240
- p2234: 0; = 1-(p2222+p2223+p2224+p2225)
- p2208: 0.000978397; = p1110/p0818
- p1618: 0
- p0184: 27.997
- p2341: 6.83837e-6; = p2228*p2209
- p2831: 5.16708e-5; = p2245*(p1020+p1022)
- p1958: 33000
- p1320: 0; = IF(((p0745*1000*p0747/100)+(p0754*1000*p0756/100))/p0801<0;0;((p0745*1000*p0747/100)+(p0754*1000*p0756/100))/p0801)
- p3298: 0; = if(p1283+p1284+p1285+p1286=0;0;p1283/(p1283+p1284+p1285+p1286))
- p2551: 4.85715e-5; = p2355*p1014
- p3463: 0.00037054; = p3368*p1241
- p3242: 2.89393e-8; = p3234*p1188*p3238/p0818
- p0913: 0.0151931
- p3172: 0; = p2391*p1132
- p1104: 0.311031; = IF(p1071=0;IF(p1096+p1101+p1102+p1103=1;0;1-(p1096+p1101+p1102+p1103));0)
- p2412: 0; = p2234*p2202
- p2270: 4.88947e-5; = p2226*p2216
- p4905: 0; = p1938*p3482
- p2347: 1.09396e-5; = p2228*p2215
- p2278: 8.93538e-5; = p2223*p2184
- p3188: 0; = p2407*p1023
- p3311: 4.46917e7; = if(and(p1232=0;p3252<>0);p3252-(p3306+p3307+p3308+p3309+p3310);0)
- p2104: 0.817136
- p3756: 0; = p1819*p3477
- p2490: 0.000271623; = p2294*p1014
- p0707: 14.382; = p0047*(1+p0575*p0179/100)
- p3097: 0; = p2316*p1023
- p3155: 0; = p2374*p1023
- p1798: 8.12082e-7; = p1390*1000/p0818
- p1068: 0.0186966; = IF(p1012=0;p1054/(p1061*p0818);0)
- p1396: 4
- p2050: 0.952062
- p4732: 0; = p1765*p3482
- p4616: 1.32391e-6; = p1855*p3481
- p1915: 0
- p1583: 0
- p1638: 0.732906
- p3133: 3.85107e-8; = p2352*p1132
- p3092: 0.000101546; = p2311*p1132
- p0504: 0; = SQRT(2)*(IF((2*p0372-1)<0;-1;IF((2*p0372-1)>0;1;0))*SQRT(SQRT((2/(pi()*0.140012289)+LN(1-(2*p0372-1)^2)/2)^2-LN(1-(2*p0372-1)^2)/0.140012289)-(2/(pi()*0.140012289)+LN(1-(2*p0372-1)^2)/2)))
- p3026: 0; = p2245*p1023
- p1724: 0
- p2728: 9.65367e-6; = p2337*(p1078+p1080)
- p0128: 43.572
- p2223: 0.597476; = if(p0765*p0769+p0766*p0770+p0767*p0771+p0768*p0772=0;0;p0770*p0766/(p0765*p0769+p0766*p0770+p0767*p0771+p0768*p0772))
- p2683: 6.30088e-6; = p2292*(p1019+p1021)
- p1259: 0.5107; = if(p1232>0;0;p0730/100)
- p3013: 0; = p2427*(p1079+p1081)
- p1157: 0.229715
- p3632: 4.28428e-8; = p1901*p3476
- p3017: 0; = p2431*(p1129+p1131)
- p0652: 0; = IF(p0388<0.5;-SQRT(p0007*EXP(p0520^2*p0008)-p0007);SQRT(p0007*EXP(p0520^2*p0008)-p0007))
- p0808: 1.84e6
- p2487: 1.85786e-6; = p2291*p1014
- p1270: 0; = IF(p1267=p1259;0;IF(p1267+p1268>p1259;p1259-p1267;p1268))
- p2850: 5.4803e-5; = p2264*(p1079+p1081)
- p1229: 0.00351893; = IF(p1221=0;0;p1228*p1221)
- p3169: 0; = p2388*p1082
- p1743: 0
- p1901: 1.01781e-6; = p1493*1000/p0818
- p0737: 0
- p0293: 0.5
- p2535: 3.7943e-6; = p2339*p1073
- p0519: 0; = SQRT(2)*(IF((2*p0387-1)<0;-1;IF((2*p0387-1)>0;1;0))*SQRT(SQRT((2/(pi()*0.140012289)+LN(1-(2*p0387-1)^2)/2)^2-LN(1-(2*p0387-1)^2)/0.140012289)-(2/(pi()*0.140012289)+LN(1-(2*p0387-1)^2)/2)))
- p3178: 0; = p2397*p1023
- p1623: 0
- p2023: 2.24
- p0756: 0
- p0386: 0.5
- p3473: 0; = p3378*p1241
- p1930: 0
- p1825: 0
- p0774: 75.626; = p0114*(1+p0642*p0246/100)
- p2519: 1.15056e-6; = p2323*p1014
- p5144: 9.86784e-7; = p1765*p3484
- p0530: 0; = SQRT(2)*(IF((2*p0398-1)<0;-1;IF((2*p0398-1)>0;1;0))*SQRT(SQRT((2/(pi()*0.140012289)+LN(1-(2*p0398-1)^2)/2)^2-LN(1-(2*p0398-1)^2)/0.140012289)-(2/(pi()*0.140012289)+LN(1-(2*p0398-1)^2)/2)))
- p0867: 0; = IF(p0858+p0864+p0865+p0866=1;0;IF(p0858+p0864+p0865+p0866+p0862>1;1-(p0858+p0864+p0865+p0866);p0862))
- p1860: 0
- p0834: 0.00038
- p1777: 0
- p2301: 0.000462587; = p2227*p2208
- p2657: 7.23213e-7; = p2266*(p1078+p1080)
- p0378: 0.5
- p1580: 0
- p2801: 0; = p2410*(p1019+p1021)
- p4213: 3.64559e-9; = p1864*p3479
- p4526: 1.35743e-5; = p1765*p3481
- p1869: 0
- p2282: 0.00113175; = p2223*p2188
- p0682: 11003.4; = p0022*(1+p0550*p0154/100)
- p1574: 0
- p2526: 2.79818e-8; = p2330*p1014
- p1333: 0.000230021; = p1332*p0001/(p0818*p0002)
- p1712: 0.60504
- p1149: 0.830148
- p4571: 4.96889e-7; = p1810*p3481
- p3175: 0; = p2394*p1023
- p4471: 0; = p1916*p3480
- p0198: 108.185
- p1928: 0
- p1493: 94
- p1908: 0
- p1900: 0
- p1221: 0.155559; = p1216*(1+p1220*p1217/100)
- p0942: 0; = if(and(p0683=0;p0948=0);p0936;0)
- p3216: 0.06; = IF(OR(p1226=0;p1228=0);0;1-p3213-p3214-p3215)
- p0267: 12.548
- p1617: 0
- p3057: 0; = p2276*p1023
- p2863: 0.000314833; = p2277*(p1020+p1022)
- p2163: 0.000106302; = (p2017-p2020)/p0818-(p2025+p2028+p2033+p2034+p2051+p2125+p2126+p2127+p2128+p2129+p2130+p2131+p2132+p2133+p2134+p2135+p2136+p2137+p2138+p2139+p2140+p2141+p2142+p2143+p2144+p2145+p2146+p2147+p2148+p2149+p2150+p2151+p2152+p2153+p2154+p2155+p2156+p2157)
- p2395: 0; = p2234*p2184
- p4112: 2.77065e-7; = p1763*p3479
- p1101: 0.0596251; = IF(p1071=0;IF(p1096=1;0;IF(p1096+p1097>1;1-p1096;p1097));0)
- p2086: 0.0617647
- p1568: 0
- p2048: 2.92379e-15; = p2015*p2046/(p0818*1000000000000)
- p2131: 7.6427e-8; = p2015*p2059*p2093/(p0818*1000)
- p4289: 4.39294e-7; = p1940*p3479
- p3385: 0.00207945; = p3366*p1234
- p2536: 8.11903e-7; = p2340*p1073
- p3746: 0; = p1809*p3477
- p3124: 7.12988e-7; = p2343*p1082
- p0853: 0.0104879; = p0803/(p0802+p0803)
- p1880: 0
- p3370: 9.40905e-5; = if(p1232=0;p3245*p3358/p0818;0)
- p0818: 9.23552e10; = p0806*p0807
- p1001: 1; = if(p0978>0;0;if(and(p0687=0;p0691=0;p0695=0;p0699=0);0;IF(p0996+p0999+p1000=1;0;1-(p0996+p0999+p1000))))
- p1671: 0
- p2697: 6.98703e-6; = p2306*(p1078+p1080)
- p1633: 0
- p2295: 0.000166614; = p2223*p2202
- p2354: 0.00094306; = p2225*p2182
- p2457: 0.000125628; = p2261*p1073
- p2315: 5.35435e-5; = p2224*p2182
- p0614: 0; = IF(p0350<0.5;-SQRT(p0007*EXP(p0482^2*p0008)-p0007);SQRT(p0007*EXP(p0482^2*p0008)-p0007))
- p4114: 1.46899e-5; = p1765*p3479
- p2032: 0.448886
- p3483: 0.0675848; = if(p1328+p1330+p1332+p1334+p1336+p1338+p1340+p1342+p1344=0;0;p1342/(p1328+p1330+p1332+p1334+p1336+p1338+p1340+p1342+p1344))
- p0893: 0.0965834; = 1000*(p0890+p0892)*p0001*p0003*p0004/(p0818*p0002)
- p3447: 0; = p3371*p1240
- p1454: 1
- p3038: 0; = p2257*p1023
- p1035: 0; = IF(p1012=0;p1029*p0001/(p0818*p0002);0)
- p2802: 0; = p2411*(p1019+p1021)
- p1571: 0
- p2236: 0; = 1-(p2230+p2231+p2232+p2233)
- p3443: 0; = p3367*p1240
- p2936: 8.18835e-6; = p2350*(p1129+p1131)
- p3213: 0.112803; = p1222*12.0107/100.0869
- p2522: 1.18427e-5; = p2326*p1014
- p1186: 7.61306e-9; = p1182*p1185/p0818
- p3253: 0; = p1252*(p1277*(1-p3247)+p1280*(1-p3248)+p1281*(1-p3249)+p1282*(1-p3250))
- p4238: 1.81004e-6; = p1889*p3479
- p2071: 0.151
- p1850: 0
- p1131: 0; = if(p1121=0;IF(p1123+p1128+p1129+p1130=1;0;IF(p1123+p1128+p1129+p1130+p1127>1;1-(p1123+p1128+p1129+p1130);p1127));0)
- p4775: 0; = p1808*p3482
- p3009: 0; = p2423*(p1079+p1081)
- p0977: 0; = IF(p0687=0;IF(OR(p0686=0;p0688=0);0;p0686*1000*p0688/100);0)
- p0246: 30.856
- p1768: 0
- p1622: 0
- p4906: 0; = p1939*p3482
- p4837: 0; = p1870*p3482
- p2645: 0.000384444; = p2254*(p1019+p1021)
- p3196: 0; = p2415*p1082
- p5241: 1.22445e-10; = p1862*p3484
- p2780: 0; = p2389*(p1128+p1130)
- p0352: 0.5
- p1059: 0.335
- p3426: 0; = p3369*p1239
- p2479: 6.67391e-5; = p2283*p1014
- p3256: 6.23226e8; = p1252*(p1307*(1-p3247)+p1310*(1-p3248)+p1311*(1-p3249)+p1312*(1-p3250))
- p1757: 0
- p3339: 0; = if(and(p1232=0;p3254<>0);p3254*(p3269*p3277-p3334)/p3338;0)
- p3279: 0.37
- p0690: 0
- p1924: 0
- p3315: 0; = if(and(p1232=0;p3253<>0);p3264*p3289;0)
- p3079: 1.48265e-5; = p2298*p1082
- p0445: 0; = SQRT(2)*(IF((2*p0313-1)<0;-1;IF((2*p0313-1)>0;1;0))*SQRT(SQRT((2/(pi()*0.140012289)+LN(1-(2*p0313-1)^2)/2)^2-LN(1-(2*p0313-1)^2)/0.140012289)-(2/(pi()*0.140012289)+LN(1-(2*p0313-1)^2)/2)))
- p2455: 4.67246e-5; = p2259*p1073
- p4856: 0; = p1889*p3482
- p0344: 0.5
- p1564: 0
- p3475: 0.0180095; = p3380*p1241
- p1244: 0; = if(p1232>0;0;p1239*(p0725/100)*p0723*1000)
- p2254: 0.00106221; = p2222*p2200
- p2311: 0.00368856; = p2231*p2218
- p2502: 1.02138e-6; = p2306*p1073
- p1814: 0
- p2901: 2.16016e-5; = p2315*(p1020+p1022)
- p3089: 6.17085e-6; = p2308*p1082
- p2348: 1.47674e-6; = p2228*p2216
- p2726: 1.04122e-5; = p2335*(p1019+p1021)
- p1793: 1.11851e-5; = p1385*1000/p0818
- p4966: 7.55941e-7; = p1793*p3483
- p0714: 0
- p3202: 0; = p2421*p1082
- p0689: 100; = p0029*(1+p0557*p0161/100)
- p1786: 0
- p1912: 0
- p0151: 0
- p2142: 6.73736e-8; = p2015*p2070*p2104/(p0818*1000)
- p1950: 0
- p2292: 1.74091e-5; = p2223*p2199
- p2908: 1.72838e-6; = p2322*(p1020+p1022)
- p1212: 0.105338; = if(p1211=0;0;if(p1193>0;0;(p1207+p1208+p1209)*p1210/(2000*p1211)))
- p0802: 1.085e7
- p0212: 3.43
- p0194: 149.352
- p0026: 148.099
- p3388: 0.000192069; = p3369*p1234
- p0764: 98.2; = p0104*(1+p0632*p0236/100)
- p4662: 1.58331e-7; = p1901*p3481
- p2195: 0.00120235; = p2194*p2193
- p1189: 0.000106264; = p0801*p0001/(p0818*p0002)
- p4944: 1.03497e-5; = p1771*p3483
- p3635: 2.73465e-8; = p1904*p3476
- p1530: 79
- p2549: 1.21275e-7; = p2353*p1123
- p2768: 0; = p2377*(p1078+p1080)
- p2628: 0.00050614; = p2237*(p1019+p1021)
- p1687: 0
- p3113: 0; = p2332*p1023
- p3549: 1.45848e-8; = p1818*p3476
- p0634: 0; = IF(p0370<0.5;-SQRT(p0007*EXP(p0502^2*p0008)-p0007);SQRT(p0007*EXP(p0502^2*p0008)-p0007))
- p2298: 0.000804041; = p2227*p2205
- p0270: 12.912
- p2257: 0.000751379; = p2222*p2203
- p2217: 0.000856322; = p1118-p2216
- p0500: 0; = SQRT(2)*(IF((2*p0368-1)<0;-1;IF((2*p0368-1)>0;1;0))*SQRT(SQRT((2/(pi()*0.140012289)+LN(1-(2*p0368-1)^2)/2)^2-LN(1-(2*p0368-1)^2)/0.140012289)-(2/(pi()*0.140012289)+LN(1-(2*p0368-1)^2)/2)))
- p0359: 0.5
- p0379: 0.5
- p0734: 0
- p1021: 0.18342; = IF(p1012=0;IF(p1014+p1019+p1020=1;0;IF(p1014+p1019+p1020+p1017>1;1-(p1014+p1019+p1020);p1017));0)
- p0704: 98.2; = p0044*(1+p0572*p0176/100)
- p0046: 17.851
- p2428: 0; = p2236*p2218
- p1976: 0.079
- p2505: 2.42539e-6; = p2309*p1073
- p1179: 0.5
- p1816: 0
- p0466: 0; = SQRT(2)*(IF((2*p0334-1)<0;-1;IF((2*p0334-1)>0;1;0))*SQRT(SQRT((2/(pi()*0.140012289)+LN(1-(2*p0334-1)^2)/2)^2-LN(1-(2*p0334-1)^2)/0.140012289)-(2/(pi()*0.140012289)+LN(1-(2*p0334-1)^2)/2)))
- p1153: 0.365265
- p1062: 0.16
- p1804: 4.3311e-8; = p1396*1000/p0818
- p2351: 2.1443e-5; = p2232*p2219
- p4010: 2.46434e-7; = p1867*p3478
- p0718: 38.445; = p0058*(1+p0586*p0190/100)
- p3272: 0.0398246
- p1637: 0
- p0111: 6.836
- p1984: 30
- p1727: 0
- p0086: 2.469
- p0372: 0.5
- p3011: 0; = p2425*(p1079+p1081)
- p3220: 0.00135727; = p3216*p1228
- p0746: 2.469; = p0086*(1+p0614*p0218/100)
- p1758: 0
- p0901: 0.0177532
- p5111: 5.78116e-8; = p1938*p3483
- p3454: 0; = p3378*p1240
- p0400: 0.5
- p1299: 0
- p2559: 5.09608e-6; = p2363*p1014
- p1756: 0
- p1072: 0; = p1071*p0001/(p0818*p0002)
- p3529: 3.41831e-8; = p1798*p3476
- p4081: 4.74836e-7; = p1938*p3478
- p0857: 1.06264; = p0856*p0001*p0003/(p0818*p0002)
- p1306: 0; = p1302*p1252/p0818
- p2052: 3.60134e-7; = p2015*p2049*(1-p2050)/(p0818*1000)
- p1722: 0.728757
- p3237: 0.854735
- p3985: 1.86328e-7; = p1842*p3478
- p0894: 0.22
- p2036: 1.72091e-6; = p2015*p2030*(1-p2032)/(p0818*1000)
- p0307: 0.5
- p0371: 0.5
- p2746: 7.49243e-5; = p2355*(p1019+p1021)
- p1291: 0; = IF(p1287+p1290=p1264;0;IF(p1287+p1290+p1289>p1264;p1264-(p1287+p1290);p1289))
- p1748: 0
- p0248: 41.343
- p0780: 5.461; = p0120*(1+p0648*p0252/100)
- p1886: 0
- p3343: 0; = if(and(p1232=0;p3254<>0);IF((p3339+p3340+p3341+p3342)+(p3254*(p3269*(1-p3277))/p3338)>p3254;p3254-(p3339+p3340+p3341+p3342);p3254*(p3269*(1-p3277))/p3338);0)
- p2011: 0.000686717
- p1636: 0
- p0755: 15.764; = p0095*(1+p0623*p0227/100)
- p0482: 0; = SQRT(2)*(IF((2*p0350-1)<0;-1;IF((2*p0350-1)>0;1;0))*SQRT(SQRT((2/(pi()*0.140012289)+LN(1-(2*p0350-1)^2)/2)^2-LN(1-(2*p0350-1)^2)/0.140012289)-(2/(pi()*0.140012289)+LN(1-(2*p0350-1)^2)/2)))
- p3004: 0; = p2418*(p1079+p1081)
- p2360: 0.000300226; = p2225*p2188
- p2499: 4.8493e-6; = p2303*p1073
- p1972: 0; = if(p0807=480;p1967*p0001/(p0818*p0002);0)
- p2689: 0.000295308; = p2298*(p1078+p1080)
- p0499: 0; = SQRT(2)*(IF((2*p0367-1)<0;-1;IF((2*p0367-1)>0;1;0))*SQRT(SQRT((2/(pi()*0.140012289)+LN(1-(2*p0367-1)^2)/2)^2-LN(1-(2*p0367-1)^2)/0.140012289)-(2/(pi()*0.140012289)+LN(1-(2*p0367-1)^2)/2)))
- p1665: 0
- p1488: 18
- p2660: 0.000133032; = p2269*(p1078+p1080)
- p0792: 40.772; = p0132*(1+p0660*p0264/100)
- p3474: 0; = p3379*p1241
- p4925: 0; = p1962*p3482
- p1710: 0
- p1875: 0
- p5246: 5.02024e-9; = p1867*p3484
- p0848: 0.158241
- p1826: 0
- p1960: 0; = IF(p1959-p1958<0;0;p1959-p1958)
- p2335: 2.87686e-5; = p2224*p2203
- p1113: 0.100377
- p4786: 0; = p1819*p3482
- p0852: 0.365262; = p0847*p0851^3+p0848*p0851^2+p0849*p0851+p0850
- p3289: 0.05
- p1338: 6.67261e6; = p1324*p0801
- p2438: 8.16541e-6; = p2242*p1014
- p3414: 0; = p3376*p1238
- p1086: 0; = IF(p1071=0;p1080*(p0710/100)*p0703*1000;0)
- p3033: 0; = p2252*p1023
- p1643: 0
- p4720: 3.25134e-5; = p1963*p3481
- p4631: 1.85281e-8; = p1870*p3481
- p2446: 0.000655416; = p2250*p1014
- p3051: 9.01618e-7; = p2270*p1082
- p2480: 7.63917e-5; = p2284*p1014
- p3282: 0.3
- p0353: 0.5
- p0081: 2.768
- p0439: 0; = SQRT(2)*(IF((2*p0307-1)<0;-1;IF((2*p0307-1)>0;1;0))*SQRT(SQRT((2/(pi()*0.140012289)+LN(1-(2*p0307-1)^2)/2)^2-LN(1-(2*p0307-1)^2)/0.140012289)-(2/(pi()*0.140012289)+LN(1-(2*p0307-1)^2)/2)))
- p2509: 1.69175e-5; = p2313*p1123
- p3395: 0; = p3376*p1234
- p1937: 0
- p2326: 5.04741e-5; = p2224*p2193
- p0299: 0.5
- p0129: 4.323
- p2328: 0.000106953; = p2224*p2196
- p0676: 1960.74; = p0016*(1+p0544*p0148/100)
- p4320: 0; = p1765*p3480
- p0423: 0; = SQRT(2)*(IF((2*p0291-1)<0;-1;IF((2*p0291-1)>0;1;0))*SQRT(SQRT((2/(pi()*0.140012289)+LN(1-(2*p0291-1)^2)/2)^2-LN(1-(2*p0291-1)^2)/0.140012289)-(2/(pi()*0.140012289)+LN(1-(2*p0291-1)^2)/2)))
- p0586: 0; = IF(p0322<0.5;-SQRT(p0007*EXP(p0454^2*p0008)-p0007);SQRT(p0007*EXP(p0454^2*p0008)-p0007))
- p2419: 0; = p2235*p2209
- p2796: 0; = p2405*(p1019+p1021)
- p0105: 74.155
- p2814: 0; = p2423*(p1078+p1080)
- p3863: 0; = p1926*p3477
- p0102: 51.631
- p3204: 0; = p2423*p1082
- p2703: 0.00199835; = p2312*(p1128+p1130)
- p1115: 0.237849
- p2113: 0.832356
- p4191: 5.65067e-8; = p1842*p3479
- p3069: 0; = p2288*p1023
- p2206: 0.000550695; = 9*1.00794*p2204/30.973762
- p3025: 0; = p2244*p1023
- p0374: 0.5
- p2084: 0.21
- p1139: 4.33602e-6; = if(p1121=0;p1133*p0001/(p0818*p0002);0)
- p1217: 9.53097
- p2188: 0.00189423; = p1066-p2186-p2187
- p0574: 0; = IF(p0310<0.5;-SQRT(p0007*EXP(p0442^2*p0008)-p0007);SQRT(p0007*EXP(p0442^2*p0008)-p0007))
- p2591: 0; = p2395*p1014
- p3292: 0.258
- p1677: 0
- p3640: 8.20394e-9; = p1909*p3476
- p5221: 3.79579e-9; = p1842*p3484
- p1810: 3.19419e-6; = p1402*1000/p0818
- p1251: 1.21417e-6; = if(p1232>0;0;p1246*p0001/(p0818*p0002))
- p0998: 0; = if(p0888=0;0;if((p0699*p0698*1000*p0700/100)/p0888>1;1;(p0699*p0698*1000*p0700/100)/p0888))
- p1991: 1.67049e9; = (if(p1111=0;0;p1106/p1111)+if(p1112=0;0;p1107/p1112)+if(p1113=0;0;p1108/p1113)+if(p1114=0;0;p1109/p1114)+if(p1115=0;0;p1110/p1115))*(1+p1157)
- p0657: 0; = IF(p0393<0.5;-SQRT(p0007*EXP(p0525^2*p0008)-p0007);SQRT(p0007*EXP(p0525^2*p0008)-p0007))
- p1927: 3.30896e-5; = p1519*1000/p0818
- p1803: 0
- p3263: 0.0214527
- p2506: 2.17375e-5; = p2310*p1073
- p1959: 32119.6; = if(p0738*p0740*p0739>0;p0738*1000*(p0740/100)*p0739/1000;p1958)
- p3174: 0; = p2393*p1023
- p2531: 6.74998e-6; = p2335*p1014
- p2710: 3.35081e-6; = p2319*(p1019+p1021)
- p0570: 0; = IF(p0306<0.5;-SQRT(p0007*EXP(p0438^2*p0008)-p0007);SQRT(p0007*EXP(p0438^2*p0008)-p0007))
- p2213: 4.02362e-5; = p1116-p2212
- p5037: 1.46358e-9; = p1864*p3483
- p1169: 0.000486869
- p2648: 0.000271946; = p2257*(p1019+p1021)
- p2342: 2.95259e-6; = p2228*p2210
- p0097: 23.966
- p2686: 6.03026e-5; = p2295*(p1019+p1021)
- p2765: 0.00018339; = p2374*(p1019+p1021)
- p0348: 0.5
- p1076: 0; = IF(p1071=0;p0714/100;0)
- p0066: 59.004
- p1559: 0.792595
- p4657: 3.03186e-8; = p1896*p3481
- p2823: 0.00056419; = p2237*(p1020+p1022)
- p2183: 0.00130612; = p1064-p2182
- p1081: 0.02205; = IF(p1071=0;IF(p1073+p1078+p1079+p1080=1;0;IF(p1073+p1078+p1079+p1080+p1077>1;1-(p1073+p1078+p1079+p1080);p1077));0)
- p1723: 0.507159
- p0925: 0.262363; = IF(p0918+p0923+p0924=1;0;IF(p0918+p0923+p0924+p0921>1;1-(p0918+p0923+p0924);p0921))
- p1032: 1.50125e-5; = IF(p1012=0;p1026*p0001/(p0818*p0002);0)
- p2372: 0.000307099; = p2225*p2201
- p1822: 0
- p5268: 1.21588e-7; = p1889*p3484
- p0047: 14.382
- p1744: 0
- p1297: 0
- p0016: 1960.74
- p3507: 5.05909e-8; = p1776*p3476
- p3405: 0.000129; = p3367*p1238
- p0595: 0; = IF(p0331<0.5;-SQRT(p0007*EXP(p0463^2*p0008)-p0007);SQRT(p0007*EXP(p0463^2*p0008)-p0007))
- p3647: 1.36732e-9; = p1916*p3476
- p1812: 0
- p3417: 0; = p3379*p1238
- p2058: 1.24412
- p0298: 0.5
- p5102: 1.93925e-7; = p1929*p3483
- p4494: 0; = p1939*p3480
- p3149: 0; = p2368*p1023
- p3186: 0; = p2405*p1023
- p1619: 0
- p0700: 0
- p1738: 0
- p3671: 1.09842e-7; = p1940*p3476
- p2030: 10.68
- p3446: 0; = p3370*p1240
- p2492: 0.000448166; = p2296*p1014
- p2034: 1.4017e-6; = p2015*p2030*p2032/(p0818*1000)
- p2872: 0.000267316; = p2286*(p1020+p1022)
- p2013: 0.75
- p0035: 7.93
- p0301: 0.5
- p3299: 0; = if(p1303+p1304+p1305+p1306=0;0;p1303/(p1303+p1304+p1305+p1306))
- p3217: 0.00255173; = p3213*p1228
- p0991: 0; = p0987*p0886
- p0822: 0.879667
- p3304: 0.0017178; = if(and(p1232=0;p3252<>0);p3260*p3289;0)
- p1985: 4.76303e9; = (if(p1057=0;0;p1050/p1057)+if(p1058=0;0;p1051/p1058)+if(p1059=0;0;p1052/p1059)+if(p1060=0;0;p1053/p1060)+if(p1061=0;0;p1054/p1061)+if(p1062=0;0;p1055/p1062)+if(p1063=0;0;p1056/p1063))*(1+p1157)
- p2717: 1.82681e-5; = p2326*(p1019+p1021)
- p0091: 17.899
- p2244: 0.000111892; = p2222*p2189
- p1098: 0.0303738
- p2108: 0.826583
- p2339: 7.06705e-5; = p2228*p2207
- p3099: 0; = p2318*p1023
- p1754: 6.84314e-6; = p1346*1000/p0818
- p0331: 0.5
- p3167: 0; = p2386*p1082
- p2443: 6.11552e-5; = p2247*p1014
- p1038: 0.00842973
- p4153: 7.29119e-9; = p1804*p3479
- p0490: 0; = SQRT(2)*(IF((2*p0358-1)<0;-1;IF((2*p0358-1)>0;1;0))*SQRT(SQRT((2/(pi()*0.140012289)+LN(1-(2*p0358-1)^2)/2)^2-LN(1-(2*p0358-1)^2)/0.140012289)-(2/(pi()*0.140012289)+LN(1-(2*p0358-1)^2)/2)))
- p0743: 0.477; = p0083*(1+p0611*p0215/100)
- p1971: 0.000104814; = p1966*p0001/(p0818*p0002)
- p0837: 0.5
- p0843: 0.22008
- p1952: 0
- p3381: 0.0017025; = p3362*p1234
- p1210: 0.25
- p2504: 1.79671e-5; = p2308*p1073
- p0686: 148.099; = p0026*(1+p0554*p0158/100)
- p2993: 0; = p2407*(p1020+p1022)
- p1815: 0
- p0536: 0; = SQRT(2)*(IF((2*p0404-1)<0;-1;IF((2*p0404-1)>0;1;0))*SQRT(SQRT((2/(pi()*0.140012289)+LN(1-(2*p0404-1)^2)/2)^2-LN(1-(2*p0404-1)^2)/0.140012289)-(2/(pi()*0.140012289)+LN(1-(2*p0404-1)^2)/2)))
- p0368: 0.5
- p5113: 1.76362e-7; = p1940*p3483
- p2988: 0; = p2402*(p1020+p1022)
- p2353: 2.43085e-6; = p2232*p2221
- p3184: 0; = p2403*p1023
- p0329: 0.5
- p2307: 8.86786e-5; = p2227*p2214
- p3431: 0; = p3374*p1239
- p1719: 0
- p2094: 0.922577
- p0619: 0; = IF(p0355<0.5;-SQRT(p0007*EXP(p0487^2*p0008)-p0007);SQRT(p0007*EXP(p0487^2*p0008)-p0007))
- p2018: 0.1978
- p0138: 78.894
- p1951: 0
- p2271: 0.000438217; = p2226*p2217
- p0869: 0.0213614; = IF(p0858+p0864+p0865+p0866+p0867+p0868=1;0;1-(p0858+p0864+p0865+p0866+p0867+p0868))
- p1824: 0
- p2848: 0.000280681; = p2262*(p1079+p1081)
- p0531: 0; = SQRT(2)*(IF((2*p0399-1)<0;-1;IF((2*p0399-1)>0;1;0))*SQRT(SQRT((2/(pi()*0.140012289)+LN(1-(2*p0399-1)^2)/2)^2-LN(1-(2*p0399-1)^2)/0.140012289)-(2/(pi()*0.140012289)+LN(1-(2*p0399-1)^2)/2)))
- p0800: 81.763; = p0140*(1+p0668*p0272/100)
- p2472: 0.000834116; = p2276*p1014
- p1322: 0.656454; = IF(((p0745*1000*p0749/100)+(p0754*1000*p0758/100))/p0801<0;0;((p0745*1000*p0749/100)+(p0754*1000*p0758/100))/p0801)
- p2216: 9.55454e-5; = p1108/p0818
- p1774: 0
- p2719: 3.87096e-5; = p2328*(p1019+p1021)
- p0059: 53.813
- p1705: 0.453667
- p3108: 0; = p2327*p1023
- p2866: 0.000247994; = p2280*(p1020+p1022)
- p1100: 0.311031
- p0993: 2.88171e-7; = p0989*p0001*p0004/(p0818*p0002)
- p0594: 0; = IF(p0330<0.5;-SQRT(p0007*EXP(p0462^2*p0008)-p0007);SQRT(p0007*EXP(p0462^2*p0008)-p0007))
- p2165: 0.489817; = (p0833-p2014)/p0818-p0839
- p3012: 0; = p2426*(p1079+p1081)
- p1411: 2270
- p3157: 0; = p2376*p1082
- p0781: 0
- p2627: 0; = p2431*p1123
- p2148: 1.42705e-8; = p2015*p2076*p2110/(p0818*1000)
- p4876: 0; = p1909*p3482
- p1241: 0.18655; = if(p1232>0;0;IF(p1234+p1238+p1239+p1240=1;0;1-(p1234+p1238+p1239+p1240)))
- p0585: 0; = IF(p0321<0.5;-SQRT(p0007*EXP(p0453^2*p0008)-p0007);SQRT(p0007*EXP(p0453^2*p0008)-p0007))
- p1074: 0.36728; = IF(p1071=0;p0712/100;0)
- p0447: 0; = SQRT(2)*(IF((2*p0315-1)<0;-1;IF((2*p0315-1)>0;1;0))*SQRT(SQRT((2/(pi()*0.140012289)+LN(1-(2*p0315-1)^2)/2)^2-LN(1-(2*p0315-1)^2)/0.140012289)-(2/(pi()*0.140012289)+LN(1-(2*p0315-1)^2)/2)))
- p4464: 0; = p1909*p3480
- p4484: 0; = p1929*p3480
- p3314: 0; = if(and(p1232=0;p3253<>0);p3263*p3289;0)
- p2651: 0.000103505; = p2260*(p1078+p1080)
- p2567: 0.000168068; = p2371*p1014
- p2140: 4.14134e-8; = p2015*p2068*p2102/(p0818*1000)
- p3472: 0; = p3377*p1241
- p5283: 7.3467e-9; = p1904*p3484
- p2840: 0.000428536; = p2254*(p1020+p1022)
- p1204: 0.980791
- p0709: 25.962; = p0049*(1+p0577*p0181/100)
- p1028: 2.8053e6; = IF(p1012=0;p1022*(p0704/100)*p0703*1000;0)
- p2554: 3.82598e-5; = p2358*p1014
- p1569: 0
- p2345: 6.21889e-7; = p2228*p2213
- p0452: 0; = SQRT(2)*(IF((2*p0320-1)<0;-1;IF((2*p0320-1)>0;1;0))*SQRT(SQRT((2/(pi()*0.140012289)+LN(1-(2*p0320-1)^2)/2)^2-LN(1-(2*p0320-1)^2)/0.140012289)-(2/(pi()*0.140012289)+LN(1-(2*p0320-1)^2)/2)))
- p2090: 0.40001
- p0136: 98.2
- p0393: 0.5
- p3035: 0; = p2254*p1023
- p0334: 0.5
- p1459: 41
- p1769: 0
- p0915: 0.0099701; = p0914/p0818
- p2022: 5.02537e-5; = p2018*p2015/p0818-p2021
- p0010: 832.271
- p1690: 0
- p1964: 0.5
- p0114: 75.626
- p2393: 0; = p2234*p2182
- p3143: 0; = p2362*p1023
- p0326: 0.5
- p1735: 0.749667
- p3265: 0.696292
- p0860: 0; = p0672*1000/p0856
- p3595: 9.11548e-10; = p1864*p3476
- p1718: 0
- p0169: 0
- p0881: 0; = p0880*p0001*p0003/(p0818*p0002)
- p0750: 0
- p3541: 1.34453e-7; = p1810*p3476
- p1693: 0
- p1402: 295
- p2585: 0; = p2389*p1123
- p3166: 0; = p2385*p1082
- p2845: 0.000487862; = p2259*(p1079+p1081)
- p2616: 0; = p2420*p1073
- p0555: 0; = IF(p0291<0.5;-SQRT(p0007*EXP(p0423^2*p0008)-p0007);SQRT(p0007*EXP(p0423^2*p0008)-p0007))
- p4981: 1.66849e-7; = p1808*p3483
- p1087: 191418; = IF(p1071=0;p1081*(p0710/100)*p0703*1000;0)
- p3379: 0; = if(p1232=0;p3246*p3361/p0818;0)
- p2044: 1.30266e-8; = p2015*p2042*p2043/(p0818*1000)
- p3246: 0; = IF(p3244+p3245=1;0;1-(p3244+p3245))
- p2941: 8.35174e-5; = p2355*(p1020+p1022)
- p0167: 18.742
- p3347: 0.00107264; = if(and(p1232=0;p3256<>0);p3275*p3289;0)
- p1963k: 0; = p1744*p1948+p1745*p1949+p1746*p1950+p1747*p1951+p1748*p1952+p1749*p1953+p1750*p1954+p1751*p1955+p1752*p1956+p1753*p1957+p1961*p1962
- p2937: 1.15391e-5; = p2351*(p1129+p1131)
- p2387: 0; = p2229*p2216
- p0044: 98.2
- p1434: 31
- p2880: 0.000467048; = p2294*(p1020+p1022)
- p3741: 0; = p1804*p3477
- p0773: 78.894; = p0113*(1+p0641*p0245/100)
- p0448: 0; = SQRT(2)*(IF((2*p0316-1)<0;-1;IF((2*p0316-1)>0;1;0))*SQRT(SQRT((2/(pi()*0.140012289)+LN(1-(2*p0316-1)^2)/2)^2-LN(1-(2*p0316-1)^2)/0.140012289)-(2/(pi()*0.140012289)+LN(1-(2*p0316-1)^2)/2)))
- p2638: 9.43354e-5; = p2247*(p1019+p1021)
- p1519: 3056
- p0656: 0; = IF(p0392<0.5;-SQRT(p0007*EXP(p0524^2*p0008)-p0007);SQRT(p0007*EXP(p0524^2*p0008)-p0007))
- p1218: 0.5
- p0055: 2.205
- p3378: 0; = if(p1232=0;p3246*p3360/p0818;0)
- p0819: 0.0398462; = p0808*p0809/p0818
- p1501: 18
- p2445: 6.63039e-5; = p2249*p1014
- p0524: 0; = SQRT(2)*(IF((2*p0392-1)<0;-1;IF((2*p0392-1)>0;1;0))*SQRT(SQRT((2/(pi()*0.140012289)+LN(1-(2*p0392-1)^2)/2)^2-LN(1-(2*p0392-1)^2)/0.140012289)-(2/(pi()*0.140012289)+LN(1-(2*p0392-1)^2)/2)))
- p3034: 0; = p2253*p1023
- p2749: 5.90178e-5; = p2358*(p1019+p1021)
- p0883: 0.0226993; = p0882*p0001*p0003/(p0818*p0002)
- p1601: 0
- p1711: 0
- p2606: 0; = p2410*p1014
- p1725: 0.705252
- p2481: 1.92105e-5; = p2285*p1014
- p2114: 0.832356
- p0884: 0; = IF(p0689=100;0;IF(p0689+p0688>100;100-p0689;p0688))
- p2624: 0; = p2428*p1123
- p2633: 1.25956e-5; = p2242*(p1019+p1021)
- p0968: 1.55541e7; = p0965*p0964*p0683*p0682*1000
- p0984: 0; = if(p0886=0;0;min(1;(p0699*p0698*1000*p0701/100)/p0886))
- p2800: 0; = p2409*(p1019+p1021)
- p2041: 3.47931e-7; = p2015*p2040/(p0818*1000)
- p1610: 0
- p0261: 0
- p2392: 0; = p2233*p2221
- p2900: 0.000317098; = p2314*(p1129+p1131)
- p0748: 60.262; = p0088*(1+p0616*p0220/100)
- p2940: 0.000380468; = p2354*(p1020+p1022)

- p2220: 0.000780416; = p1151/p0818
- p1628: 0
- p1792: 0
- p2433: 0.000328118; = p2237*p1014
- p1084: 3.18839e6; = IF(p1071=0;p1078*(p0710/100)*p0703*1000;0)
- p3468: 7.4151e-5; = p3373*p1241
- p2043: 0.636483
- p0769: 48.06; = p0109*(1+p0637*p0241/100)
- p3392: 0.000234533; = p3373*p1234
- p2088: 0.798875
- p2289: 0.00710117; = p2223*p2196
- p3064: 0; = p2283*p1023
- p3396: 0; = p3377*p1234
- p0863: 0; = p0675*1000/p0856
- p2185: 0.000515124; = p1065-p2184
- p2566: 1.08357e-6; = p2370*p1014
- p2779: 0; = p2388*(p1078+p1080)
- p2760: 7.60239e-7; = p2369*(p1019+p1021)
- p2996: 0; = p2410*(p1020+p1022)
- p0766: 97.446; = p0106*(1+p0634*p0238/100)
- p3160: 0; = p2379*p1082
- p2641: 0.00101102; = p2250*(p1019+p1021)
- p0699: 0
- p1926: 1.19105e-7; = p1518*1000/p0818
- p1267: 0
- p1156: 0.0792363; = p1064+p1065+p1066+p1067+p1068+p1069+p1070+p1116+p1117+p1118+p1119+p1120+p1154+p1155
- p2543: 5.87346e-7; = p2347*p1073
- p2687: 0.000691321; = p2296*(p1019+p1021)
- p1063: 0.455
- p1868: 0
- p4495: 0; = p1940*p3480
- p2789: 0; = p2398*(p1019+p1021)
- p1995: 50
- p2943: 3.29388e-5; = p2357*(p1020+p1022)
- p2514: 1.08762e-6; = p2318*p1014
- p0442: 0; = SQRT(2)*(IF((2*p0310-1)<0;-1;IF((2*p0310-1)>0;1;0))*SQRT(SQRT((2/(pi()*0.140012289)+LN(1-(2*p0310-1)^2)/2)^2-LN(1-(2*p0310-1)^2)/0.140012289)-(2/(pi()*0.140012289)+LN(1-(2*p0310-1)^2)/2)))
- p0668: 0; = IF(p0404<0.5;-SQRT(p0007*EXP(p0536^2*p0008)-p0007);SQRT(p0007*EXP(p0536^2*p0008)-p0007))
- p2842: 2.6442e-5; = p2256*(p1020+p1022)
- p2417: 0; = p2235*p2207
- p2369: 2.10052e-6; = p2225*p2198
- p0938: 0; = p0932*p0001/(p0818*p0002)
- p1185: 0.5
- p3407: 7.27242e-5; = p3369*p1238
- p1116: 4.40841e-5; = IF(p1071=0;p1106/(p1111*p0818);0)
- p2313: 0.000339095; = p2231*p2220
- p3187: 0; = p2406*p1023
- p1918: 0
- p1321: 2.16462; = IF(((p0745*1000*p0748/100)+(p0754*1000*p0757/100))/p0801<0;0;((p0745*1000*p0748/100)+(p0754*1000*p0757/100))/p0801)
- p1284: 0; = p1280*p1252/p0818
- p4219: 2.00508e-8; = p1870*p3479
- p0480: 0; = SQRT(2)*(IF((2*p0348-1)<0;-1;IF((2*p0348-1)>0;1;0))*SQRT(SQRT((2/(pi()*0.140012289)+LN(1-(2*p0348-1)^2)/2)^2-LN(1-(2*p0348-1)^2)/0.140012289)-(2/(pi()*0.140012289)+LN(1-(2*p0348-1)^2)/2)))
- p3471: 0; = p3376*p1241
- p2489: 0.000633562; = p2293*p1014
- p4013: 6.61164e-8; = p1870*p3478
- p2886: 0.0012119; = p2300*(p1079+p1081)
- p3361: 9.00371e7; = if(p1232=0;p3311+p3322+p3333+p3344+p3355;0)
- p1829: 0
- p2912: 2.03633e-5; = p2326*(p1020+p1022)
- p2016: 0.000161676; = (p2014-p2015)/(p0818)
- p2232: 0.00179246; = if(p0783*p0787+p0784*p0788+p0785*p0789+p0786*p0790=0;0;p0789*p0785/(p0783*p0787+p0784*p0788+p0785*p0789+p0786*p0790))
- p0552: 0; = IF(p0288<0.5;-SQRT(p0007*EXP(p0420^2*p0008)-p0007);SQRT(p0007*EXP(p0420^2*p0008)-p0007))
- p2366: 0.000190567; = p2225*p2195
- p3779: 0; = p1842*p3477
- p2583: 0; = p2387*p1073
- p0771: 6.836; = p0111*(1+p0639*p0243/100)
- p0319: 0.5
- p2673: 0.000409615; = p2282*(p1019+p1021)
- p0501: 0; = SQRT(2)*(IF((2*p0369-1)<0;-1;IF((2*p0369-1)>0;1;0))*SQRT(SQRT((2/(pi()*0.140012289)+LN(1-(2*p0369-1)^2)/2)^2-LN(1-(2*p0369-1)^2)/0.140012289)-(2/(pi()*0.140012289)+LN(1-(2*p0369-1)^2)/2)))
- p1763: 1.64582e-6; = p1355*1000/p0818
- p1882: 0
- p3326: 0; = if(and(p1232=0;p3255<>0);p3268*p3289;0)
- p3121: 2.78851e-7; = p2340*p1082
- p4831: 0; = p1864*p3482
- p1713: 0
- p3139: 0; = p2358*p1023
- p0211: 15.603
- p0139: 114.624
- p3866: 0; = p1929*p3477
- p0384: 0.5
- p2680: 0.00257013; = p2289*(p1019+p1021)
- p1496: 60
- p2647: 2.37213e-5; = p2256*(p1019+p1021)
- p1596: 0
- p3104: 0; = p2323*p1023
- p1046: 0.0268348; = IF(p1012=0;IF(p1037+p1044+p1045=1;0;IF(p1037+p1044+p1045+p1040>1;1-(p1037+p1044+p1045);p1040));0)
- p1182: 1406.21; = p1181*p0801
- p2553: 1.91563e-5; = p2357*p1014
- p0425: 0; = SQRT(2)*(IF((2*p0293-1)<0;-1;IF((2*p0293-1)>0;1;0))*SQRT(SQRT((2/(pi()*0.140012289)+LN(1-(2*p0293-1)^2)/2)^2-LN(1-(2*p0293-1)^2)/0.140012289)-(2/(pi()*0.140012289)+LN(1-(2*p0293-1)^2)/2)))
- p5074: 6.87885e-8; = p1901*p3483
- p2646: 0.00016482; = p2255*(p1019+p1021)
- p3275: 0.0214527
- p2075: 0.072
- p3229: 5.28524e-7; = p1164/p0818
- p1567: 0.629912
- p4569: 3.84036e-7; = p1808*p3481
- p2436: 2.84066e-5; = p2240*p1014
- p0691: 0
- p3271: 0.0195489
- p2070: 0.282
- p3708: 0; = p1771*p3477
- p2247: 0.000260645; = p2222*p2192
- p3449: 0; = p3373*p1240
- p1197: 1.806
- p2193: 0.00560899; = p1054/p0818
- p3670: 7.97605e-8; = p1939*p3476
- p3342: 0; = if(and(p1232=0;p3254<>0);p3254*(p3272-p3337)/p3338;0)
- p2820: 0; = p2429*(p1128+p1130)
- p4700: 2.94765e-7; = p1939*p3481
- p2889: 5.06327e-5; = p2303*(p1079+p1081)
- p2757: 6.89721e-5; = p2366*(p1019+p1021)
- p4701: 4.05933e-7; = p1940*p3481
- p0801: 1.1e7
- p2117: 0.585147
- p1800: 0
- p1316: 0.0539852; = p1312*p1252/p0818
- p1026: 1.55403e6; = IF(p1012=0;p1020*(p0704/100)*p0703*1000;0)
- p3029: 0; = p2248*p1023
- p0811: 0; = if(p0807=480;1-p0810;0)
- p2467: 2.35279e-5; = p2271*p1073
- p2724: 6.3106e-6; = p2333*(p1019+p1021)
- p2231: 0.434506; = if(p0783*p0787+p0784*p0788+p0785*p0789+p0786*p0790=0;0;p0788*p0784/(p0783*p0787+p0784*p0788+p0785*p0789+p0786*p0790))
- p3941: 4.50794e-7; = p1798*p3478
- p2459: 1.21563e-5; = p2263*p1073
- p1681: 0
- p3462: 0.000107717; = p3367*p1241
- p2955: 8.47432e-7; = p2369*(p1020+p1022)
- p1873: 0
- p2773: 0; = p2382*(p1078+p1080)
- p2603: 0; = p2407*p1014
- p0315: 0.5
- p2599: 0; = p2403*p1014
- p2002: 750
- p0503: 0; = SQRT(2)*(IF((2*p0371-1)<0;-1;IF((2*p0371-1)>0;1;0))*SQRT(SQRT((2/(pi()*0.140012289)+LN(1-(2*p0371-1)^2)/2)^2-LN(1-(2*p0371-1)^2)/0.140012289)-(2/(pi()*0.140012289)+LN(1-(2*p0371-1)^2)/2)))
- p2182: 0.00595008; = p1050/p0818
- p3189: 0; = p2408*p1023
- p2421: 0; = p2235*p2211
- p2102: 0.922577
- p2745: 0.000341322; = p2354*(p1019+p1021)
- p2400: 0; = p2234*p2189
- p2763: 0.000111148; = p2372*(p1019+p1021)
- p3043: 9.23269e-6; = p2262*p1082
- p0202: 99.319
- p1575: 0
- p1668: 0
- p2611: 0; = p2415*p1073
- p0897: 0.458721
- p0960: 0; = if(and(p0683>0;or(p0807=480;p0807=32;p0807=1;and(p0807=60;p0901<0.03)));p0936;0)
- p2653: 0.000183893; = p2262*(p1078+p1080)
- p0485: 0; = SQRT(2)*(IF((2*p0353-1)<0;-1;IF((2*p0353-1)>0;1;0))*SQRT(SQRT((2/(pi()*0.140012289)+LN(1-(2*p0353-1)^2)/2)^2-LN(1-(2*p0353-1)^2)/0.140012289)-(2/(pi()*0.140012289)+LN(1-(2*p0353-1)^2)/2)))
- p1080: 0; = IF(p1071=0;IF(p1073+p1078+p1079=1;0;IF(p1073+p1078+p1079+p1076>1;1-(p1073+p1078+p1079);p1076));0)
- p1630: 0
- p0765: 74.155; = p0105*(1+p0633*p0237/100)
- p0983: 1; = if(p0886=0;0;min(1;(p0695*p0694*1000*p0697/100)/p0886))
- p2994: 0; = p2408*(p1020+p1022)
- p2501: 9.76762e-8; = p2305*p1073
- p2737: 1.06471e-6; = p2346*(p1078+p1080)
- p2758: 0.000681791; = p2367*(p1019+p1021)
- p3225: 0.000517194; = p3221*p1229
- p3853: 0; = p1916*p3477
- p2203: 0.00319695; = p1070-p2200-p2201-p2202
- p3947: 2.40423e-8; = p1804*p3478
- p2079: 0.02
- p2054: 0.91
- p5069: 1.31723e-8; = p1896*p3483
- p0728: 0
- p2080: 0.025
- p3105: 0; = p2324*p1023
- p3024: 0; = p2243*p1023
- p4868: 0; = p1901*p3482
- p2573: 0; = p2377*p1073
- p0083: 0.477
- p3137: 0; = p2356*p1023
- p1659: 0
- p2998: 0; = p2412*(p1020+p1022)
- p1047: 0.316159; = IF(p1012=0;IF(p1037+p1044+p1045+p1046=1;0;IF(p1037+p1044+p1045+p1046+p1041>1;1-(p1037+p1044+p1045+p1046);p1041));0)
- p2634: 0.000161131; = p2243*(p1019+p1021)
- p1983: 50
- p1027: 1.98193e6; = IF(p1012=0;p1021*(p0704/100)*p0703*1000;0)
- p3660: 1.2078e-7; = p1929*p3476
- p4070: 1.83683e-5; = p1927*p3478
- p2318: 4.63549e-6; = p2224*p2185
- p2026: 53.05
- p2561: 0.000208586; = p2365*p1014
- p3158: 0; = p2377*p1082
- p1344: 485064; = IF(p1318=0;p1327*p0801;0)
- p1073: 0.05369; = IF(p1071=0;p0711/100;0)
- p1791: 0
- p1888: 0
- p3689: 0; = p1962*p3476
- p3864: 0; = p1927*p3477
- p3122: 1.261e-7; = p2341*p1082
- p1940: 2.60949e-6; = p1532*1000/p0818
- p0969: 1.7045e8; = p0966*p0964*p0683*p0682*1000
- p0532: 0; = SQRT(2)*(IF((2*p0400-1)<0;-1;IF((2*p0400-1)>0;1;0))*SQRT(SQRT((2/(pi()*0.140012289)+LN(1-(2*p0400-1)^2)/2)^2-LN(1-(2*p0400-1)^2)/0.140012289)-(2/(pi()*0.140012289)+LN(1-(2*p0400-1)^2)/2)))
- p1311: 0; = IF(p1307+p1310=p1266;0;IF(p1307+p1310+p1309>p1266;p1266-(p1307+p1310);p1309))
- p2774: 0; = p2383*(p1078+p1080)
- p0644: 0; = IF(p0380<0.5;-SQRT(p0007*EXP(p0512^2*p0008)-p0007);SQRT(p0007*EXP(p0512^2*p0008)-p0007))
- p2454: 5.16623e-5; = p2258*p1073
- p0345: 0.5
- p2320: 1.33246e-6; = p2224*p2187
- p2464: 5.1533e-6; = p2268*p1073
- p0120: 5.461
- p3390: 0.000232244; = p3371*p1234
- p2110: 0.856281
- p2099: 0.620397
- p0659: 0; = IF(p0395<0.5;-SQRT(p0007*EXP(p0527^2*p0008)-p0007);SQRT(p0007*EXP(p0527^2*p0008)-p0007))
- p3404: 0.000787353; = p3366*p1238
- p3277: 0.55
- p3470: 0; = p3375*p1241
- p2171: 0.17441; = p2165*p0831
- p2277: 0.000780372; = p2223*p2183
- p1275: 0; = p1271*p1252/p0818
- p2708: 4.87081e-7; = p2317*(p1019+p1021)
- p0481: 0; = SQRT(2)*(IF((2*p0349-1)<0;-1;IF((2*p0349-1)>0;1;0))*SQRT(SQRT((2/(pi()*0.140012289)+LN(1-(2*p0349-1)^2)/2)^2-LN(1-(2*p0349-1)^2)/0.140012289)-(2/(pi()*0.140012289)+LN(1-(2*p0349-1)^2)/2)))
- p3109: 0; = p2328*p1023
- p1118: 0.000951868; = IF(p1071=0;p1108/(p1113*p0818);0)
- p0650: 0; = IF(p0386<0.5;-SQRT(p0007*EXP(p0518^2*p0008)-p0007);SQRT(p0007*EXP(p0518^2*p0008)-p0007))
- p5089: 2.19538e-9; = p1916*p3483
- p2803: 0; = p2412*(p1019+p1021)
- p2136: 1.69419e-7; = p2015*p2064*p2098/(p0818*1000)
- p1187: 0.000717734
- p3199: 0; = p2418*p1082
- p2444: 0.000309309; = p2248*p1014
- p0273: 0.5
- p0449: 0; = SQRT(2)*(IF((2*p0317-1)<0;-1;IF((2*p0317-1)>0;1;0))*SQRT(SQRT((2/(pi()*0.140012289)+LN(1-(2*p0317-1)^2)/2)^2-LN(1-(2*p0317-1)^2)/0.140012289)-(2/(pi()*0.140012289)+LN(1-(2*p0317-1)^2)/2)))
- p1124: 0.38445; = if(p1121=0;p0718/100;0)
- p1552: 0
- p0127: 52.596
- p5132: 1.41258e-5; = p1963*p3483
- p0199: 0
- p1201: 0.65
- p2119: 0.679049
- p1782: 0
- p3030: 0; = p2249*p1023
- p2483: 0.000786301; = p2287*p1014
- p0216: 25.193
- p3328: 0; = if(and(p1232=0;p3255<>0);p3255*(p3265*p3277-p3323)/p3327;0)
- p1289: 0
- p2355: 0.000207013; = p2225*p2183
- p4307: 0; = p1962*p3479
- p2790: 0; = p2399*(p1019+p1021)
- p2973: 0; = p2387*(p1079+p1081)
- p1716: 0
- p2785: 0; = p2394*(p1019+p1021)
- p0405: 0; = SQRT(2)*(IF((2*p0273-1)<0;-1;IF((2*p0273-1)>0;1;0))*SQRT(SQRT((2/(pi()*0.140012289)+LN(1-(2*p0273-1)^2)/2)^2-LN(1-(2*p0273-1)^2)/0.140012289)-(2/(pi()*0.140012289)+LN(1-(2*p0273-1)^2)/2)))
- p2729: 3.12611e-6; = p2338*(p1078+p1080)
- p0892: 39362; = if(p0891=0;0;(1-p1240)*p3251/p0891)
- p3281: 0.46
- p1963f: 2.98381e-6; = p1647*p1851+p1648*p1852+p1649*p1853+p1650*p1854+p1651*p1855+p1652*p1856+p1653*p1857+p1654*p1858+p1655*p1859+p1656*p1860+p1657*p1861+p1658*p1862+p1659*p1863+p1660*p1864+p1661*p1865+p1662*p1866+p1663*p1867+p1664*p1868+p1665*p1869+p1666*p1870
- p1572: 0.0125
- p0954: 1.89414e-5; = if(and(p0683>0;or(p0807=56;p0807=100;and(p0807=60;p0901>0.06)));p0936;0)
- p0159: 18.742
- p2782: 0; = p2391*(p1128+p1130)
- p4991: 2.34174e-8; = p1818*p3483
- p0018: 2110.04
- p1174: 2.89944e-8; = p1170*p1173/p0818
- p2574: 0; = p2378*p1073
- p2073: 0.377647
- p2795: 0; = p2404*(p1019+p1021)
- p2609: 0; = p2413*p1014
- p2602: 0; = p2406*p1014
- p1030: 2.44915e-5; = IF(p1012=0;p1024*p0001/(p0818*p0002);0)
- p3877: 0; = p1940*p3477
- p0735: 0
- p1109: 1.73656e8; = IF(p1071=0;p1105*p1103*p1095;0)
- p1819: 2.4579e-5; = p1411*1000/p0818
- p3032: 0; = p2251*p1023
- p2252: 3.11482e-6; = p2222*p2198
- p1462: 11
- p2507: 0.000184022; = p2311*p1123
- p1883: 0
- p2498: 1.12313e-5; = p2302*p1073
- p2367: 0.00188376; = p2225*p2196
- p0288: 0.5
- p1614: 0.65436
- p0005: 1.60934
- p0210: 0
- p4276: 5.57047e-6; = p1927*p3479
- p0135: 151.635
- p3215: 0.450791; = p1222*3*15.9994/100.0869
- p2388: 0; = p2229*p2217
- p2038: 0.304457
- p1290: 0; = IF(p1287=p1264;0;IF(p1287+p1288>p1264;p1264-p1287;p1288))
- p1674: 0
- p3356: 4.49924e8; = if(p1232=0;p3306+p3317+p3328+p3339+p3350;0)
- p2319: 9.25818e-6; = p2224*p2186
- p2920: 1.0124e-6; = p2334*(p1020+p1022)
- p0723: 11003.5; = p0063*(1+p0591*p0195/100)
- p1130: 0; = if(p1121=0;IF(p1123+p1128+p1129=1;0;IF(p1123+p1128+p1129+p1126>1;1-(p1123+p1128+p1129);p1126));0)
- p1696: 0
- p3085: 2.18105e-5; = p2304*p1082
- p0256: 13.523
- p1036: 1.63848e9; = IF(p1012=0;p0795*p0702*1000*p0796/100;0)
- p2237: 0.00139845; = p2222*p2182
- p1979: 1.96143e8; = p0973
- p1142: 0; = if(p1121=0;p1136*p0001/(p0818*p0002);0)
- p1206: 0.0206875
- p1772: 0
- p4167: 5.83295e-8; = p1818*p3479
- p1766: 0
- p1298: 0
- p3156: 0; = p2375*p1082
- p3066: 0; = p2285*p1023
- p0945: 0; = if(and(p0683=0;p0951=0);p0939;0)
- p4204: 1.43272e-6; = p1855*p3479
- p1228: 0.0226212; = IF(p1221=0;0;p0801*p1212*2000/(p1222+p1221*p1225)/p0818)
- p1088: 160079; = IF(p1071=0;p1082*(p0710/100)*p0703*1000;0)
- p0841: 0.307247
- p1120: 0.00411352; = IF(p1071=0;p1110/(p1115*p0818);0)
- p1325: 0; = IF(((p0745*1000*p0752/100)+(p0754*1000*p0761/100))/p0801<0;0;((p0745*1000*p0752/100)+(p0754*1000*p0761/100))/p0801)
- p3005: 0; = p2419*(p1079+p1081)
- p0241: 28.019
- p3050: 6.67911e-6; = p2269*p1082
- p1884: 0
- p3231: 1.6145e-8; = p1176/p0818
- p3846: 0; = p1909*p3477
- p1257: 0; = if(p1232>0;0;IF(p1253+p1256=1;0;IF(p1253+p1256+p1255>1;1-(p1253+p1256);p1255)))
- p2276: 0.00355503; = p2223*p2182
- p3369: 0.000325519; = if(p1232=0;p3245*p3357/p0818;0)
- p0943: 0; = if(and(p0683=0;p0949=0);p0937;0)
- p1166: 5.28524e-7; = p1164/p0818
- p1033: 1.91461e-5; = IF(p1012=0;p1027*p0001/(p0818*p0002);0)
- p1994: 750
- p1899: 0
- p1954: 0
- p3001: 0; = p2415*(p1079+p1081)
- p1996: 30
- p0375: 0.5
- p2805: 0; = p2414*(p1078+p1080)
- p2579: 0; = p2383*p1073
- p2175: 0.000124615; = p0895*p0908/p0818
- p1999: 2.41423e9; = (p1228+p1229)*p0818+p1164
- p1841: 0
- p2968: 0; = p2382*(p1079+p1081)
- p1986: 4200
- p2720: 2.62978e-8; = p2329*(p1019+p1021)
- p0110: 92.973
- p2787: 0; = p2396*(p1019+p1021)
- p0725: 6.123; = p0065*(1+p0593*p0197/100)
- p2905: 3.73512e-6; = p2319*(p1020+p1022)
- p3209: 0; = p2428*p1132
- p2486: 1.13192e-6; = p2290*p1014
- p0317: 0.5
- p0314: 0.5
- p2652: 0.000859393; = p2261*(p1078+p1080)
- p2590: 0; = p2394*p1014
- p2977: 0; = p2391*(p1129+p1131)
- p1736: 0.641
- p3360: 5.49542e8; = if(p1232=0;p3310+p3321+p3332+p3343+p3354;0)
- p2967: 0; = p2381*(p1079+p1081)
- p0877: 0; = p0876*p0001*p0003/(p0818*p0002)
- p1009: 0; = p1005*p0001*p0004/(p0818*p0002)
- p3312: 0; = if(and(p1232=0;p3253<>0);p3261*p3277*(p3298*p3290+(1-p3298)*p3294);0)
- p4158: 1.47647e-7; = p1809*p3479
- p2521: 2.3415e-6; = p2325*p1014
- p3437: 0; = p3380*p1239
- p0909: 3.23486e8; = p0825*p0906+p0827*p0907+(p0830+p0895)*p0824*p0908
- p0458: 0; = SQRT(2)*(IF((2*p0326-1)<0;-1;IF((2*p0326-1)>0;1;0))*SQRT(SQRT((2/(pi()*0.140012289)+LN(1-(2*p0326-1)^2)/2)^2-LN(1-(2*p0326-1)^2)/0.140012289)-(2/(pi()*0.140012289)+LN(1-(2*p0326-1)^2)/2)))
- p2781: 0; = p2390*(p1128+p1130)
- p1168: 2.64262e-7; = p1164*p1167/p0818
- p1809: 8.77049e-7; = p1401*1000/p0818
- p1329: 1.74421e-5; = p1328*p0001/(p0818*p0002)
- p1106: 355368; = IF(p1071=0;p1105*p1096*p1095;0)
- p1997: 2.56539e9; = (if(p1152=0;0;p1150/p1152)+if(p1153=0;0;p1151/p1153))*(1+p1157)
- p0251: 28.035
- p4157: 4.15598e-7; = p1808*p3479
- p3230: 5.79888e-8; = p1170/p0818
- p1203: 3
- p0550: 0; = IF(p0286<0.5;-SQRT(p0007*EXP(p0418^2*p0008)-p0007);SQRT(p0007*EXP(p0418^2*p0008)-p0007))
- p0350: 0.5
- p4625: 3.36874e-9; = p1864*p3481
- p0512: 0; = SQRT(2)*(IF((2*p0380-1)<0;-1;IF((2*p0380-1)>0;1;0))*SQRT(SQRT((2/(pi()*0.140012289)+LN(1-(2*p0380-1)^2)/2)^2-LN(1-(2*p0380-1)^2)/0.140012289)-(2/(pi()*0.140012289)+LN(1-(2*p0380-1)^2)/2)))
- p2357: 8.16448e-5; = p2225*p2185
- p2956: 1.86317e-6; = p2370*(p1020+p1022)
- p5131: 0; = p1962*p3483
- p3153: 0; = p2372*p1023
- p3322: 0; = if(and(p1232=0;p3253<>0);p3253-(p3317+p3318+p3319+p3320+p3321);0)
- p2380: 0; = p2229*p2209
- p2699: 0.000122908; = p2308*(p1078+p1080)
- p1876: 0
- p2827: 9.75539e-5; = p2241*(p1020+p1022)
- p1167: 0.5
- p3251: 8.91597e9; = p1252-(p3252+p3253+p3254+p3255+p3256)
- p2149: 1.07654e-8; = p2015*p2077*p2111/(p0818*1000)
- p1706: 0
- p0523: 0; = SQRT(2)*(IF((2*p0391-1)<0;-1;IF((2*p0391-1)>0;1;0))*SQRT(SQRT((2/(pi()*0.140012289)+LN(1-(2*p0391-1)^2)/2)^2-LN(1-(2*p0391-1)^2)/0.140012289)-(2/(pi()*0.140012289)+LN(1-(2*p0391-1)^2)/2)))
- p3095: 1.62223e-5; = p2314*p1132
- p3257: 0.849747
- p1556: 0
- p0462: 0; = SQRT(2)*(IF((2*p0330-1)<0;-1;IF((2*p0330-1)>0;1;0))*SQRT(SQRT((2/(pi()*0.140012289)+LN(1-(2*p0330-1)^2)/2)^2-LN(1-(2*p0330-1)^2)/0.140012289)-(2/(pi()*0.140012289)+LN(1-(2*p0330-1)^2)/2)))
- p0694: 148.099; = p0034*(1+p0562*p0166/100)
- p3331: 0; = if(and(p1232=0;p3255<>0);p3255*(p3268-p3326)/p3327;0)
- p0051: 5.369
- p0804: 0
- p1281: 0; = IF(p1277+p1280=p1263;0;IF(p1277+p1280+p1279>p1263;p1263-(p1277+p1280);p1279))
- p0122: 81.763
- p0839: 0.391325; = p0838/p0818
- p2003: 50
- p1961: 0
- p2605: 0; = p2409*p1014
- p2688: 0.000326515; = p2297*(p1078+p1080)
- p4532: 2.3822e-5; = p1771*p3481
- p3021: 0; = p2240*p1023
- p1834: 0
- p1989: 50
- p2770: 0; = p2379*(p1078+p1080)
- p3745: 0; = p1808*p3477
- p3389: 5.55172e-5; = p3370*p1234
- p4554: 1.73995e-6; = p1793*p3481
- p1095: 6.65682e8; = IF(p1071=0;p0797*p0702*1000*p0798/100;0)
- p2691: 0.000793996; = p2300*(p1078+p1080)
- p3056: 2.10458e-5; = p2275*p1132
- p1082: 0.01844; = IF(p1071=0;IF(p1073+p1078+p1079+p1080+p1081=1;0;1-(p1073+p1078+p1079+p1080+p1081));0)
- p1885: 0
- p1641: 0
- p2539: 2.07594e-6; = p2343*p1073
- p1700: 0.918695
- p2064: 0.676706
- p2928: 1.65519e-6; = p2342*(p1079+p1081)
- p1968: 0; = if(p0807=480;p0802*p0811;0)
- p4419: 0; = p1864*p3480
- p0851: 0.5
- p0580: 0; = IF(p0316<0.5;-SQRT(p0007*EXP(p0448^2*p0008)-p0007);SQRT(p0007*EXP(p0448^2*p0008)-p0007))
- p4949: 8.12289e-8; = p1776*p3483
- p2945: 9.46818e-6; = p2359*(p1020+p1022)
- p3101: 0; = p2320*p1023
- p0430: 0; = SQRT(2)*(IF((2*p0298-1)<0;-1;IF((2*p0298-1)>0;1;0))*SQRT(SQRT((2/(pi()*0.140012289)+LN(1-(2*p0298-1)^2)/2)^2-LN(1-(2*p0298-1)^2)/0.140012289)-(2/(pi()*0.140012289)+LN(1-(2*p0298-1)^2)/2)))
- p0930: 1.96074e6; = p0801*p0924
- p1400: 228
- p0889: 0; = 1000*p0888*p0001*p0003*p0004/(p0818*p0002)
- p0744: 42.43; = p0084*(1+p0612*p0216/100)
- p0020: 3969.93
- p3171: 0; = p2390*p1132
- p1728: 0
- p2953: 0.000759986; = p2367*(p1020+p1022)
- p4159: 5.37725e-7; = p1810*p3479
- p0761: 0
- p1012: 0
- p1143: 0; = if(p1121=0;p1137*p0001/(p0818*p0002);0)
- p3120: 1.30316e-6; = p2339*p1082
- p0815: 0
- p3212: 0; = p2431*p1132
- p1955: 0
- p1043: 0.254745
- p4883: 0; = p1916*p3482
- p1963g: 5.28837e-6; = p1667*p1871+p1668*p1872+p1669*p1873+p1670*p1874+p1671*p1875+p1672*p1876+p1673*p1877+p1674*p1878+p1675*p1879+p1676*p1880+p1677*p1881+p1678*p1882+p1679*p1883+p1680*p1884+p1681*p1885+p1682*p1886+p1683*p1887+p1684*p1888+p1685*p1889
- p0287: 0.5
- p2103: 0.912485
- p2661: 1.7958e-5; = p2270*(p1078+p1080)
- p2916: 4.8114e-8; = p2330*(p1020+p1022)
- p0879: 0; = p0878*p0001*p0003/(p0818*p0002)
- p2381: 0; = p2229*p2210
- p0082: 97.464
- p4690: 4.46358e-7; = p1929*p3481
- p2702: 0.00141807; = p2311*(p1128+p1130)
- p2458: 2.68819e-5; = p2262*p1073
- p2083: 2.17294
- p2518: 1.00518e-6; = p2322*p1014
- p2439: 0.000104457; = p2243*p1014
- p3550: 1.03461e-6; = p1819*p3476
- p0935: 2.03837e-5; = p0929*p0001/(p0818*p0002)
- p0260: 24.85
- p3060: 0; = p2279*p1023
- p0404: 0.5
- p2777: 0; = p2386*(p1078+p1080)
- p1846: 0
- p0042: 11003.5
- p2619: 0; = p2423*p1073
- p2520: 2.89336e-7; = p2324*p1014
- p1914: 0
- p0831: 0.356071; = 1-p0824
- p1287: 0
- p0708: 18.342; = p0048*(1+p0576*p0180/100)
- p0141: 75.5218
- p1591: 0
- p1005: 0; = p1001*p0888
- p0937: 2.78796e-5; = p0931*p0001/(p0818*p0002)
- p2644: 2.47859e-6; = p2253*(p1019+p1021)
- p0511: 0; = SQRT(2)*(IF((2*p0379-1)<0;-1;IF((2*p0379-1)>0;1;0))*SQRT(SQRT((2/(pi()*0.140012289)+LN(1-(2*p0379-1)^2)/2)^2-LN(1-(2*p0379-1)^2)/0.140012289)-(2/(pi()*0.140012289)+LN(1-(2*p0379-1)^2)/2)))
- p1582: 0
- p4072: 1.5928e-6; = p1929*p3478
- p0782: 81.763; = p0122*(1+p0650*p0254/100)
- p0908: 0.000997792
- p2447: 4.45264e-7; = p2251*p1014
- p3458: 8.82138e-5; = p3363*p1241
- p3074: 0; = p2293*p1023
- p2155: 3.59278e-8; = p2015*p2084*p2117/(p0818*1000)
- p1715: 0
- p2594: 0; = p2398*p1014
- p3044: 4.17513e-6; = p2263*p1082
- p3205: 0; = p2424*p1082
- p3355: 4.53453e7; = if(and(p1232=0;p3256<>0);p3256-(p3350+p3351+p3352+p3353+p3354);0)
- p1817: 0
- p1233: 0; = p1232*p0001/(p0818*p0002)
- p0398: 0.5
- p3068: 0; = p2287*p1023
- p2565: 4.92844e-7; = p2369*p1014
- p2552: 5.56151e-6; = p2356*p1014
- p2706: 1.9379e-5; = p2315*(p1019+p1021)
- p3047: 3.63103e-8; = p2266*p1082
- p1075: 0.53854; = IF(p1071=0;p0713/100;0)
- p3438: 0; = p3362*p1240
- p1057: 0.82
- p1903: 0
- p0917: 0.951032; = (p0825+p0827+(p0830+p0895))/p0818-(p0900+p0905+p0910+p0915)
- p0631: 0; = IF(p0367<0.5;-SQRT(p0007*EXP(p0499^2*p0008)-p0007);SQRT(p0007*EXP(p0499^2*p0008)-p0007))
- p4871: 0; = p1904*p3482
- p2695: 0.000434412; = p2304*(p1078+p1080)
- p2214: 0.00018756; = p1107/p0818
- p2496: 0.000116068; = p2300*p1073
- p1385: 1033
- p0729: 0
- p3283: 0.3
- p0941: 0; = if(and(p0683=0;p0947=0);p0935;0)
- p3127: 5.3456e-8; = p2346*p1082
- p3185: 0; = p2404*p1023
- p2179: 0.00212378; = p0970+p0971+p0972
- p1286: 0; = p1282*p1252/p0818
- p1848: 0
- p0109: 48.06
- p3203: 0; = p2422*p1082
- p0283: 0.5
- p3054: 0.000185649; = p2273*p1132
- p1587: 0
- p2547: 1.06979e-6; = p2351*p1123
- p3792: 0; = p1855*p3477
- p2152: 6.08409e-9; = p2015*p2080*p2114/(p0818*1000)
- p0284: 0.5
- p0554: 0; = IF(p0290<0.5;-SQRT(p0007*EXP(p0422^2*p0008)-p0007);SQRT(p0007*EXP(p0422^2*p0008)-p0007))
- p1870: 1.19105e-7; = p1462*1000/p0818
- p2233: 0; = if(p0783*p0787+p0784*p0788+p0785*p0789+p0786*p0790=0;0;p0790*p0786/(p0783*p0787+p0784*p0788+p0785*p0789+p0786*p0790))
- p2177: 0.0642478; = p0895/p0818-(p2173+p2174+p2175+p2176)
- p3897: 3.79869e-6; = p1754*p3478
- p2532: 1.56033e-6; = p2336*p1073
- p0243: 124.001
- p2139: 8.09858e-8; = p2015*p2067*p2101/(p0818*1000)
- p2762: 0.000259255; = p2371*(p1019+p1021)
- p2864: 3.60489e-5; = p2278*(p1020+p1022)
- p3194: 0; = p2413*p1023
- p2374: 0.000506701; = p2225*p2203
- p2283: 0.000284444; = p2223*p2189
- p1176: 1491.07; = p1175*p0801
- p0023: 28648.3
- p1223: 0.56
- p0124: 112.292
- p1148: 0.0841918; = if(p1121=0;IF(p1146=1;0;1-p1146);0)
- p0932: 0; = p0801*p0926
- p0846: 0.447012; = p0841*p0845^3+p0842*p0845^2+p0843*p0845+p0844
- p3397: 0; = p3378*p1234
- p0790: 0
- p1180: 8.07248e-9; = p1176*p1179/p0818
- p2893: 4.97123e-5; = p2307*(p1079+p1081)
- p4565: 6.73748e-9; = p1804*p3481
- p1682: 0
- p2569: 1.03703e-5; = p2373*p1014
- p4287: 1.44001e-7; = p1938*p3479
- p2172: 0.162256; = p2166-(p2167+p2168+p2169+p2170)
- p2327: 1.08197e-5; = p2224*p2195
- p0515: 0; = SQRT(2)*(IF((2*p0383-1)<0;-1;IF((2*p0383-1)>0;1;0))*SQRT(SQRT((2/(pi()*0.140012289)+LN(1-(2*p0383-1)^2)/2)^2-LN(1-(2*p0383-1)^2)/0.140012289)-(2/(pi()*0.140012289)+LN(1-(2*p0383-1)^2)/2)))
- p2510: 2.93981e-5; = p2314*p1123
- p1055: 745713; = IF(p1012=0;p1048*p1036;0)
- p1925: 0
- p2791: 0; = p2400*(p1019+p1021)
- p1198: 0.44
- p1998: 127
- p2817: 0; = p2426*(p1078+p1080)
- p0269: 14.411
- p2990: 0; = p2404*(p1020+p1022)
- p4743: 0; = p1776*p3482
- p3409: 8.79357e-5; = p3371*p1238
- p1789: 0
- p5275: 2.20401e-9; = p1896*p3484
- p1312: 0.4893; = IF(p1307+p1310+p1311=p1266;0;p1266-(p1307+p1310+p1311))
- p3240: 3.99834e-9; = p3234*p1188*p3235/p0818
- p0245: 12.912
- p0533: 0; = SQRT(2)*(IF((2*p0401-1)<0;-1;IF((2*p0401-1)>0;1;0))*SQRT(SQRT((2/(pi()*0.140012289)+LN(1-(2*p0401-1)^2)/2)^2-LN(1-(2*p0401-1)^2)/0.140012289)-(2/(pi()*0.140012289)+LN(1-(2*p0401-1)^2)/2)))
- p2390: 0; = p2233*p2219
- p0630: 0; = IF(p0366<0.5;-SQRT(p0007*EXP(p0498^2*p0008)-p0007);SQRT(p0007*EXP(p0498^2*p0008)-p0007))
- p3244: 0.59228; = p0791/100
- p1532: 241
- p0665: 0; = IF(p0401<0.5;-SQRT(p0007*EXP(p0533^2*p0008)-p0007);SQRT(p0007*EXP(p0533^2*p0008)-p0007))
- p0680: 3969.93; = p0020*(1+p0548*p0152/100)
- p2626: 0; = p2430*p1123
- p2272: 0.00478531; = p2230*p2218
- p2851: 0.000717667; = p2265*(p1079+p1081)
- p1599: 0
- p0268: 1.157
- p0655: 0; = IF(p0391<0.5;-SQRT(p0007*EXP(p0523^2*p0008)-p0007);SQRT(p0007*EXP(p0523^2*p0008)-p0007))
- p2735: 2.18429e-8; = p2344*(p1078+p1080)
- p0918: 0.360902; = p0680*1000/p0801
- p0817: 0
- p3464: 6.07255e-5; = p3369*p1241
- p3048: 3.79691e-7; = p2267*p1082
- p2221: 0.00135616; = p1155-p2220
- p0795: 151.635; = p0135*(1+p0663*p0267/100)
- p3305: 0.856081; = if(and(p1232=0;p3252<>0);1-(p3301+p3302+p3303+p3304);0)
- p3110: 0; = p2329*p1023
- p4032: 5.96851e-6; = p1889*p3478
- p0777: 0
- p0643: 0; = IF(p0379<0.5;-SQRT(p0007*EXP(p0511^2*p0008)-p0007);SQRT(p0007*EXP(p0511^2*p0008)-p0007))
- p3412: 0; = p3374*p1238
- p3294: 0.279
- p1557: 0
- p2207: 0.00457238; = p1119-p2205-p2204-p2206
- p1949: 0
- p3875: 0; = p1938*p3477
- p0956: 0; = if(and(p0683>0;or(p0807=56;p0807=100;and(p0807=60;p0901>0.06)));p0938;0)
- p1664: 0
- p1019: 0.17851; = IF(p1012=0;IF(p1014=1;0;IF(p1014+p1015>1;1-p1014;p1015));0)
- p2146: 6.04189e-9; = p2015*p2074*p2108/(p0818*1000)
- p3333: 0; = if(and(p1232=0;p3255<>0);p3255-(p3328+p3329+p3330+p3331+p3332);0)
- p2336: 2.90619e-5; = p2228*p2204
- p1896: 1.949e-7; = p1488*1000/p0818
- p1123: 0.04989; = if(p1121=0;p0717/100;0)
- p3058: 0; = p2277*p1023
- p2659: 3.52525e-5; = p2268*(p1078+p1080)
- p2971: 0; = p2385*(p1079+p1081)
- p0669: 43.4977; = p0009*(1+p0537*p0141/100)
- p1948: 0
- p0952: 3.83507e-5; = if(and(p0683>0;or(p0807=56;p0807=100;and(p0807=60;p0901>0.06)));p0934;0)
- p0684: 5.169; = p0024*(1+p0552*p0156/100)
- p1658: 0.584605
- p0622: 0; = IF(p0358<0.5;-SQRT(p0007*EXP(p0490^2*p0008)-p0007);SQRT(p0007*EXP(p0490^2*p0008)-p0007))
- p1261: 0; = if(p1232>0;0;p0732/100)
- p5234: 9.62417e-8; = p1855*p3484
- p2540: 3.19305e-9; = p2344*p1073
- p0803: 115000
- p1698: 0
- p1780: 0
- p0936: 1.89414e-5; = p0930*p0001/(p0818*p0002)
- p3465: 1.75526e-5; = p3370*p1241
- p2767: 0; = p2376*(p1078+p1080)
- p2858: 0.00257512; = p2272*(p1129+p1131)
- p1521: 265
- p2987: 0; = p2401*(p1020+p1022)
- p2839: 2.76286e-6; = p2253*(p1020+p1022)
- p0062: 19.346
- p1061: 0.3
- p1765: 8.72609e-5; = p1357*1000/p0818
- p2059: 1.00168
- p1058: 0.225
- p3799: 0; = p1862*p3477
- p3222: 0.224242; = IF(p3216=0;0;p1223*40.078/100.0869)
- p2493: 4.77309e-5; = p2297*p1073
- p5015: 2.26856e-8; = p1842*p3483
- p1607: 0
- p1938: 8.55393e-7; = p1530*1000/p0818
- p1865: 0
- p0309: 0.5
- p1238: 0.22341; = if(p1232>0;0;IF(p1234=1;0;IF(p1234+p1235>1;1-p1234;p1235)))
- p0272: 25.473
- p2382: 0; = p2229*p2211
- p1133: 448849; = if(p1121=0;p1123*(p0716/100)*p0703*1000;0)
- p2291: 7.91825e-6; = p2223*p2198
- p3393: 0; = p3374*p1234
- p2060: 0.272353
- p3260: 0.0343561
- p2205: 0.00170059; = 2*14.0067*p2204/30.973762
- p1935: 0
- p3998: 4.72432e-6; = p1855*p3478
- p0004: 0.0254
- p3061: 0; = p2280*p1023
- p2316: 1.17534e-5; = p2224*p2183
- p2793: 0; = p2402*(p1019+p1021)
- p4623: 1.68437e-9; = p1862*p3481
- p0685: 7.93; = p0025*(1+p0553*p0157/100)
- p0103: 11003.5
- p2293: 0.00270026; = p2223*p2200
- p2692: 0.000169899; = p2301*(p1078+p1080)
- p2534: 4.56983e-7; = p2338*p1073
- p3072: 0; = p2291*p1023
- p3428: 0; = p3371*p1239
- p0259: 21.079
- p1326: 0.263544; = IF(((p0745*1000*p0753/100)+(p0754*1000*p0762/100))/p0801<0;0;((p0745*1000*p0753/100)+(p0754*1000*p0762/100))/p0801)
- p1315: 0; = p1311*p1252/p0818
- p0347: 0.5
- p0911: 0.00344444
- p2871: 3.3032e-5; = p2285*(p1020+p1022)
- p3366: 0.00352425; = if(p1232=0;p3244*p3360/p0818;0)
- p1863: 0
- p1703: 0
- p0632: 0; = IF(p0368<0.5;-SQRT(p0007*EXP(p0500^2*p0008)-p0007);SQRT(p0007*EXP(p0500^2*p0008)-p0007))
- p0070: 51.07
- p2983: 0; = p2397*(p1020+p1022)
- p0547: 0; = IF(p0283<0.5;-SQRT(p0007*EXP(p0415^2*p0008)-p0007);SQRT(p0007*EXP(p0415^2*p0008)-p0007))
- p2555: 5.50644e-6; = p2359*p1014
- p2258: 0.000962232; = p2226*p2204
- p0119: 46.128
- p2934: 8.27848e-7; = p2348*(p1079+p1081)
- p1283: 0; = p1277*p1252/p0818
- p1008: 0; = p1004*p0001*p0004/(p0818*p0002)
- p2980: 0; = p2394*(p1020+p1022)
- p3100: 0; = p2319*p1023
- p1672: 0
- p1990: 30
- p3341: 0; = if(and(p1232=0;p3254<>0);p3254*(p3271-p3336)/p3338;0)
- p2696: 6.68179e-7; = p2305*(p1078+p1080)
- p0412: 0; = SQRT(2)*(IF((2*p0280-1)<0;-1;IF((2*p0280-1)>0;1;0))*SQRT(SQRT((2/(pi()*0.140012289)+LN(1-(2*p0280-1)^2)/2)^2-LN(1-(2*p0280-1)^2)/0.140012289)-(2/(pi()*0.140012289)+LN(1-(2*p0280-1)^2)/2)))
- p2051: 7.15232e-6; = p2015*p2049*p2050/(p0818*1000)
- p2784: 0; = p2393*(p1019+p1021)
- p0720: 0
- p2361: 7.5456e-5; = p2225*p2189
- p2178: 0.0690604; = (p0895*p0831/(1-p0831))/(p0818)
- p3098: 0; = p2317*p1023
- p2057: 3.28794
- p3112: 0; = p2331*p1023
- p1183: 0.000106264; = p0801*p0001/(p0818*p0002)
- p0271: 10.173
- p2878: 7.02353e-6; = p2292*(p1020+p1022)
- p3267: 0.0170629
- p1330: 0; = p1320*p0801
- p0106: 97.446
- p0987: 0; = if(p0978>0;0;if(and(p0687=0;p0691=0;p0695=0;p0699=0);0;IF(p0982+p0985+p0986=1;0;1-(p0982+p0985+p0986))))
- p3008: 0; = p2422*(p1079+p1081)
- p2797: 0; = p2406*(p1019+p1021)
- p3398: 0; = p3379*p1234
- p1331: 0; = p1330*p0001/(p0818*p0002)
- p0760: 0
- p1277: 0
- p2896: 0.000226966; = p2310*(p1079+p1081)
- p2630: 1.27216e-5; = p2239*(p1019+p1021)
- p0721: 0
- p0900: 0.601133; = p0899/p0818
- p0343: 0.5
- p3019: 0; = p2238*p1023
- p3466: 7.34273e-5; = p3371*p1241
- p1093: 1.84916e-6; = IF(p1071=0;p1087*p0001/(p0818*p0002);0)
- p2613: 0; = p2417*p1073
- p3478: 0.555109; = if(p1328+p1330+p1332+p1334+p1336+p1338+p1340+p1342+p1344=0;0;p1332/(p1328+p1330+p1332+p1334+p1336+p1338+p1340+p1342+p1344))
- p3345: 0.160606; = if(and(p1232=0;p3256<>0);p3273*p3277*p3293;0)
- p2938: 7.52769e-7; = p2352*(p1129+p1131)
- p4459: 0; = p1904*p3480
- p1963j: 5.79249e-6; = p1725*p1929+p1726*p1930+p1727*p1931+p1728*p1932+p1729*p1933+p1730*p1934+p1731*p1935+p1732*p1936+p1733*p1937+p1734*p1938+p1735*p1939+p1736*p1940+p1737*p1941+p1738*p1942+p1739*p1943+p1740*p1944+p1741*p1945+p1742*p1946+p1743*p1947
- p3168: 0; = p2387*p1082
- p4776: 0; = p1809*p3482
- p2109: 0.826583
- p4253: 1.09368e-7; = p1904*p3479
- p0396: 0.5
- p1319: 0.16414; = IF(((p0745*1000*p0746/100)+(p0754*1000*p0755/100))/p0801<0;0;((p0745*1000*p0746/100)+(p0754*1000*p0755/100))/p0801)
- p2961: 0; = p2375*(p1079+p1081)
- p2385: 0; = p2229*p2214
- p2358: 0.000163064; = p2225*p2186
- p2859: 0.00362888; = p2273*(p1129+p1131)
- p1193: 0; = IF(OR(p1036=0;p1095=0);0.0001*p0857;0)
- p0944: 0; = if(and(p0683=0;p0950=0);p0938;0)
- p3287: 0.745
- p4628: 6.90591e-8; = p1867*p3481
- p4665: 1.01062e-7; = p1904*p3481
- p2087: 0.856281
- p0422: 0; = SQRT(2)*(IF((2*p0290-1)<0;-1;IF((2*p0290-1)>0;1;0))*SQRT(SQRT((2/(pi()*0.140012289)+LN(1-(2*p0290-1)^2)/2)^2-LN(1-(2*p0290-1)^2)/0.140012289)-(2/(pi()*0.140012289)+LN(1-(2*p0290-1)^2)/2)))
- p3321: 0; = if(and(p1232=0;p3253<>0);IF((p3317+p3318+p3319+p3320)+(p3253*(p3261*(1-p3277))/p3316)>p3253;p3253-(p3317+p3318+p3319+p3320);p3253*(p3261*(1-p3277))/p3316);0)
- p0816: 0
- p1162: 2.30494e-5; = p1161/p0818
- p2649: 0.000353409; = p2258*(p1078+p1080)
- p1108: 8.82411e6; = IF(p1071=0;p1105*p1102*p1095;0)
- p3163: 0; = p2382*p1082
- p3319: 0; = if(and(p1232=0;p3253<>0);p3253*(p3263-p3314)/p3316;0)
- p0143: 0
- p3329: 0; = if(and(p1232=0;p3255<>0);p3255*(p3266-p3324)/p3327;0)
- p3403: 0.000127741; = p3365*p1238
- p1341: 0; = p1340*p0001/(p0818*p0002)
- p2256: 6.55412e-5; = p2222*p2202
- p3150: 0; = p2369*p1023
- p2331: 2.62204e-7; = p2224*p2199
- p1570: 0
- p0441: 0; = SQRT(2)*(IF((2*p0309-1)<0;-1;IF((2*p0309-1)>0;1;0))*SQRT(SQRT((2/(pi()*0.140012289)+LN(1-(2*p0309-1)^2)/2)^2-LN(1-(2*p0309-1)^2)/0.140012289)-(2/(pi()*0.140012289)+LN(1-(2*p0309-1)^2)/2)))
- p0895: 1.15343e10; = p0894*p0830
- p0148: 0
- p3895: 0; = p1962*p3477
- p2807: 0; = p2416*(p1078+p1080)
- p2632: 8.75165e-5; = p2241*(p1019+p1021)
- p3364: 0.000136682; = if(p1232=0;p3244*p3358/p0818;0)
- p4422: 0; = p1867*p3480
- p0702: 11003.5; = p0042*(1+p0570*p0174/100)
- p3070: 0; = p2289*p1023
- p4353: 0; = p1798*p3480
- p2321: 1.70457e-5; = p2224*p2188
- p2948: 3.48448e-5; = p2362*(p1020+p1022)
- p2981: 0; = p2395*(p1020+p1022)
- p3264: 0.0887032
- p1839: 0
- p2995: 0; = p2409*(p1020+p1022)
- p3421: 0; = p3364*p1239
- p1132: 0.02753; = if(p1121=0;IF(p1123+p1128+p1129+p1130+p1131=1;0;1-(p1123+p1128+p1129+p1130+p1131));0)
- p1957: 0
- p0590: 0; = IF(p0326<0.5;-SQRT(p0007*EXP(p0458^2*p0008)-p0007);SQRT(p0007*EXP(p0458^2*p0008)-p0007))
- p1877: 0
- p0431: 0; = SQRT(2)*(IF((2*p0299-1)<0;-1;IF((2*p0299-1)>0;1;0))*SQRT(SQRT((2/(pi()*0.140012289)+LN(1-(2*p0299-1)^2)/2)^2-LN(1-(2*p0299-1)^2)/0.140012289)-(2/(pi()*0.140012289)+LN(1-(2*p0299-1)^2)/2)))
- p0579: 0; = IF(p0315<0.5;-SQRT(p0007*EXP(p0447^2*p0008)-p0007);SQRT(p0007*EXP(p0447^2*p0008)-p0007))
- p2222: 0.23503; = if(p0765*p0769+p0766*p0770+p0767*p0771+p0768*p0772=0;0;p0769*p0765/(p0765*p0769+p0766*p0770+p0767*p0771+p0768*p0772))
- p0218: 70.594
- p0355: 0.5
- p2843: 0.000303136; = p2257*(p1020+p1022)
- p3352: 1.5565e7; = if(and(p1232=0;p3256<>0);p3256*(p3275-p3347)/p3349;0)
- p1192: 4.2743e-8; = p1188*p1191/p0818
- p2240: 0.00012107; = p2222*p2185
- p2570: 0.000118887; = p2374*p1014
- p2389: 0; = p2233*p2218
- p0973: 1.96143e8; = p0967+p0968+p0969
- p1847: 0
- p1963d: 1.11684e-5; = p1608*p1812+p1609*p1813+p1610*p1814+p1611*p1815+p1612*p1816+p1613*p1817+p1614*p1818+p1615*p1819+p1616*p1820+p1617*p1821+p1618*p1822+p1619*p1823+p1620*p1824+p1621*p1825+p1622*p1826+p1623*p1827+p1624*p1828+p1625*p1829+p1626*p1830+p1627*p1831
- p2914: 4.31492e-5; = p2328*(p1020+p1022)
- p0190: 44.913
- p1004: 0; = p1000*p0888
- p2542: 1.55643e-7; = p2346*p1073
- p0089: 19.37
- p3730: 0; = p1793*p3477
- p2314: 0.000589259; = p2231*p2221
- p2844: 0.000539418; = p2258*(p1079+p1081)
- p0833: 8.142e10; = p0830+p0832
- p1993: 400
- p2007: 0.028614; = ((p1981*p1985+p1987*p1991+p1993*p1997+p2001*p2005)/p0818)*p0005*p0002/1000
- p3432: 0; = p3375*p1239
- p1562: 0
- p0587: 0; = IF(p0323<0.5;-SQRT(p0007*EXP(p0455^2*p0008)-p0007);SQRT(p0007*EXP(p0455^2*p0008)-p0007))
- p3111: 0; = p2330*p1023
- p2268: 9.59825e-5; = p2226*p2214
- p1051: 1.38119e7; = IF(p1012=0;p1044*p1036;0)
- p3293: 0.3875
- p0825: 8.12418e10; = p0818*p0822
- p2884: 0.000450737; = p2298*(p1079+p1081)
- p4721: 0; = p1754*p3482
- p5183: 4.8978e-10; = p1804*p3484
- p0003: 10000
- p2879: 0.00108939; = p2293*(p1020+p1022)
- p2067: 0.446471
- p0899: 5.55177e10; = p0825*p0896+p0827*p0897+(p0830+p0895)*p0824*p0898
- p0058: 38.445
- p2836: 0.00112697; = p2250*(p1020+p1022)
- p0757: 23.966; = p0097*(1+p0625*p0229/100)
- p1042: 0.000455125
- p2167: 0.144684; = p2166*(p0898)
- p2947: 3.0442e-5; = p2361*(p1020+p1022)
- p2511: 1.25629e-5; = p2315*p1014
- p3022: 0; = p2241*p1023
- p3078: 1.63933e-5; = p2297*p1082
- p3152: 0; = p2371*p1023
- p0662: 0; = IF(p0398<0.5;-SQRT(p0007*EXP(p0530^2*p0008)-p0007);SQRT(p0007*EXP(p0530^2*p0008)-p0007))
- p3593: 4.55774e-10; = p1862*p3476
- p3358: 2.1313e7; = if(p1232=0;p3308+p3319+p3330+p3341+p3352;0)
- p1288: 0
- p2186: 0.00102883; = p1052/p0818
- p2401: 0; = p2234*p2190
- p2435: 8.24707e-6; = p2239*p1014
- p2174: 0.00133079; = p0895*p0903/p0818
- p1980: 3521.6
- p4513: 0; = p1962*p3480
- p0961: 0; = if(and(p0683>0;or(p0807=480;p0807=32;p0807=1;and(p0807=60;p0901<0.03)));p0937;0)
- p4834: 0; = p1867*p3482
- p3210: 0; = p2429*p1132
- p2693: 7.68304e-5; = p2302*(p1078+p1080)
- p1879: 0
- p2635: 4.04972e-5; = p2244*(p1019+p1021)
- p1211: 0.6
- p5099: 8.04972e-9; = p1926*p3483
- p1064: 0.0072562; = IF(p1012=0;p1050/(p1057*p0818);0)
- p1602: 0
- p0675: 0
- p2804: 0; = p2413*(p1019+p1021)
- p3444: 0; = p3368*p1240
- p2468: 0.000238739; = p2272*p1123
- p1342: 2.89899e6; = p1326*p0801
- p1874: 0
- p2586: 0; = p2390*p1123
- p2674: 0.000102949; = p2283*(p1019+p1021)
- p1250: 0; = if(p1232>0;0;p1245*p0001/(p0818*p0002))
- p2137: 1.37644e-8; = p2015*p2065*p2099/(p0818*1000)
- p0794: 0.079; = p0134*(1+p0662*p0266/100)
- p1230: 0.5
- p3014: 0; = p2428*(p1129+p1131)
- p0220: 31.095
- p3062: 0; = p2281*p1023
- p1481: 993
- p3952: 4.86857e-7; = p1809*p3478
- p2107: 0.881623
- p1913: 0
- p1151: 7.20755e7; = if(p1121=0;p1149*p1148*p1145;0)
- p0134: 0.079
- p1594: 0.735896
- p0724: 7.562; = p0064*(1+p0592*p0196/100)
- p1843: 0
- p1656: 0
- p2828: 1.40402e-5; = p2242*(p1020+p1022)
- p0527: 0; = SQRT(2)*(IF((2*p0395-1)<0;-1;IF((2*p0395-1)>0;1;0))*SQRT(SQRT((2/(pi()*0.140012289)+LN(1-(2*p0395-1)^2)/2)^2-LN(1-(2*p0395-1)^2)/0.140012289)-(2/(pi()*0.140012289)+LN(1-(2*p0395-1)^2)/2)))
- p1262: 0; = if(p1232>0;0;p0733/100)
- p2494: 4.3169e-5; = p2298*p1073
- p2979: 0; = p2393*(p1020+p1022)
- p0793: 0
- p1011: 0; = p1010*p0001*p0004/(p0818*p0002)
- p3690: 8.79783e-6; = p1963*p3476
- p1649: 0
- p2819: 0; = p2428*(p1128+p1130)
- p2517: 3.99944e-6; = p2321*p1014
- p2503: 4.76115e-6; = p2307*p1073
- p3359: 8.91583e7; = if(p1232=0;p3309+p3320+p3331+p3342+p3353;0)
- p0322: 0.5
- p1077: 0.02205; = IF(p1071=0;p0715/100;0)
- p0637: 0; = IF(p0373<0.5;-SQRT(p0007*EXP(p0505^2*p0008)-p0007);SQRT(p0007*EXP(p0505^2*p0008)-p0007))
- p1922: 0
- p2524: 2.50944e-5; = p2328*p1014
- p2250: 0.0027934; = p2222*p2196
- p1135: 4.84143e6; = if(p1121=0;p1129*(p0716/100)*p0703*1000;0)
- p1654: 0
- p3598: 1.86867e-8; = p1867*p3476
- p2377: 0; = p2229*p2206
- p2883: 0.00049837; = p2297*(p1079+p1081)
- p1150: 7.84011e8; = if(p1121=0;p1149*p1146*p1145;0)
- p1271: 0; = IF(p1267+p1270=p1259;0;IF(p1267+p1270+p1269>p1259;p1259-(p1267+p1270);p1269))
- p3073: 0; = p2292*p1023
- p2675: 0.000117838; = p2284*(p1019+p1021)
- p2437: 5.67347e-5; = p2241*p1014
- p3303: 0.000398148; = if(and(p1232=0;p3252<>0);p3259*p3289;0)
- p2982: 0; = p2396*(p1020+p1022)
- p0642: 0; = IF(p0378<0.5;-SQRT(p0007*EXP(p0510^2*p0008)-p0007);SQRT(p0007*EXP(p0510^2*p0008)-p0007))
- p2418: 0; = p2235*p2208
- p1324: 0.606601; = IF(((p0745*1000*p0751/100)+(p0754*1000*p0760/100))/p0801<0;0;((p0745*1000*p0751/100)+(p0754*1000*p0760/100))/p0801)
- p2911: 4.02614e-6; = p2325*(p1020+p1022)
- p1327a: 0.0440968; = (p0745*1000/p0801)*(1-(p0746+p0747+p0748+p0749+p0750+p0751+p0752+p0753)/100)+(p0754*1000/p0801)*(1-(p0755+p0756+p0757+p0758+p0759+p0760+p0761+p0762)/100)
- p1845: 0
- p3807: 0; = p1870*p3477
- p2621: 0; = p2425*p1073
- p1709: 0
- p0577: 0; = IF(p0313<0.5;-SQRT(p0007*EXP(p0445^2*p0008)-p0007);SQRT(p0007*EXP(p0445^2*p0008)-p0007))
- p1092: 0; = IF(p1071=0;p1086*p0001/(p0818*p0002);0)
- p2963: 0; = p2377*(p1079+p1081)
- p1857: 0
- p2734: 1.4201e-5; = p2343*(p1078+p1080)
- p0377: 0.5
- p3023: 0; = p2242*p1023
- p2970: 0; = p2384*(p1079+p1081)
- p2629: 0.000111104; = p2238*(p1019+p1021)
- p3288: 0.505
- p0664: 0; = IF(p0400<0.5;-SQRT(p0007*EXP(p0532^2*p0008)-p0007);SQRT(p0007*EXP(p0532^2*p0008)-p0007))
- p2404: 0; = p2234*p2193
- p2000: 4000
- p3691: 0; = p1754*p3477
- p1246: 125687; = if(p1232>0;0;p1241*(p0725/100)*p0723*1000)
- p2761: 1.67147e-6; = p2370*(p1019+p1021)
- p4308: 3.51855e-5; = p1963*p3479
- p3427: 0; = p3370*p1239
- p0648: 0; = IF(p0384<0.5;-SQRT(p0007*EXP(p0516^2*p0008)-p0007);SQRT(p0007*EXP(p0516^2*p0008)-p0007))
- p0280: 0.5
- p4410: 0; = p1855*p3480
- p0997: 0; = if(p0888=0;0;if((p0695*p0694*1000*p0696/100)/p0888>1;1;(p0695*p0694*1000*p0696/100)/p0888))
- p2658: 7.56252e-6; = p2267*(p1078+p1080)
- p2180: 5.16284e-8; = p3233*p1188/(p0818)
- p0115: 76.548
- p3755: 0; = p1818*p3477
- p3340: 0; = if(and(p1232=0;p3254<>0);p3254*(p3270-p3335)/p3338;0)
- p3335: 0; = IF(or(p3254=0;p1232>0);0;p3270*(p3280*(p3283*p1256+p3286*(p1253+p1257)+p1258*p3288+p3300*p3287)))
- p2082: 0.285294
- p2408: 0; = p2234*p2198
- p1689: 0
- p2260: 0.000281814; = p2226*p2206
- p2929: 2.16754e-5; = p2343*(p1079+p1081)
- p2126: 2.12553e-7; = p2015*p2054*p2088/(p0818*1000)
- p2410: 0; = p2234*p2200
- p3091: 7.4658e-6; = p2310*p1082
- p1629: 0
- p2826: 4.88444e-5; = p2240*(p1020+p1022)
- p0646: 0; = IF(p0382<0.5;-SQRT(p0007*EXP(p0514^2*p0008)-p0007);SQRT(p0007*EXP(p0514^2*p0008)-p0007))
- p4971: 5.48844e-8; = p1798*p3483
- p0179: 55.322
- p0053: 53.854
- p1254: 0; = if(p1232>0;0;p0736/100)
- p1249: 0; = if(p1232>0;0;p1244*p0001/(p0818*p0002))
- p0275: 0.5
- p2731: 5.55403e-6; = p2340*(p1078+p1080)
- p2442: 7.55689e-6; = p2246*p1014
- p2600: 0; = p2404*p1014
- p2471: 3.81393e-5; = p2275*p1123
- p2024: 0.748682
- p1317: 0
- p0282: 0.5
- p2147: 1.74006e-8; = p2015*p2075*p2109/(p0818*1000)
- p1256: 0; = if(p1232>0;0;IF(p1253=1;0;IF(p1253+p1254>1;1-p1253;p1254)))
- p0223: 96.204
- p3350: 1.93883e8; = if(and(p1232=0;p3256<>0);p3256*(p3273*p3277-p3345)/p3349;0)
- p3247: 0
- p2857: 0.00024566; = p2271*(p1079+p1081)
- p1343: 2.80051e-5; = p1342*p0001/(p0818*p0002)
- p0539: 0; = IF(p0275<0.5;-SQRT(p0007*EXP(p0407^2*p0008)-p0007);SQRT(p0007*EXP(p0407^2*p0008)-p0007))
- p0770: 92.973; = p0110*(1+p0638*p0242/100)

## Reference product
- corn grain; at harvest in 2001; at farm; 85%-91% moisture: 1 kg

## Inputs from technosphere
- CUTOFF fertilizer storage: 0.0487191 kg*a; = p1160
- CUTOFF apply manure; unspec. method: 1.21417e-6 ha; = p1251
- CUTOFF planting; for reduced till, corn; 15-30% residue: 2.78796e-5 ha; = p0955
- CUTOFF beef manure; from unspecified storage; at point-of-sale: 0.0563463 kg; = p1276
- CUTOFF apply manure; broadcast or spray with incorporation: 3.84031e-6 ha; = p1247
- CUTOFF pesticide formulation balance; at point-of-sale: 0.000209009 kg; = p1963
- CUTOFF phosphatic fertilizer, diammonium phosphate; at point-of-sale: 0.00870397 kg; = p1119
- CUTOFF apply P fertilizer; broadcast with incorporation: 3.08008e-5 ha; = p1090
- CUTOFF apply mixed N fertilizer; without incorporation: 2.71001e-5 ha; = p1034
- CUTOFF harvest; corn silage: 1.11094e-6 ha; = p1974
- CUTOFF planting; for no-till, corn: 1.89414e-5 ha; = p0954
- CUTOFF apply pesticide; unspecified application methods: 4.68588e-6 ha; = p1345
- CUTOFF pesticide, Dimethenamid; at point-of-sale; kg AI: 2.4579e-5 kg; = p1819
- CUTOFF sulfuric acid; at point-of-sale: 1.6145e-8 kg; = p1178
- CUTOFF prepare soil; for conventional till, corn; <15% residue: 3.83507e-5 ha; = p0934
- CUTOFF pesticide, Acetochlor; at point-of-sale; kg AI: 8.72609e-5 kg; = p1765
- CUTOFF nitrogenous fertilizer, aqueous ammonia; at point-of-sale: 0.000664676 kg; = p1065
- CUTOFF potassic fertilizer, potassium chloride; at point-of-sale: 0.020452 kg; = p1154
- CUTOFF nitrogenous fertilizer, ammonium nitrate; at point-of-sale: 0.00307112 kg; = p1066
- CUTOFF apply N fertilizer; broadcast with incorporation: 1.86335e-5 ha; = p1031
- CUTOFF apply N fertilizer; broadcast without incorporation: 1.50125e-5 ha; = p1032
- CUTOFF zinc compounds; at point-of-sale: 1.52261e-8 kg; = p1184
- CUTOFF zinc compounds storage: 7.61306e-9 kg*a; = p1186
- CUTOFF apply P fertilizer; broadcast without incorporation: 4.5163e-5 ha; = p1091
- CUTOFF pesticide, Nicosulfuron; at point-of-sale; kg AI: 1.949e-7 kg; = p1896
- CUTOFF phosphatic fertilizer, superphosphate grades over 22%; at point-of-sale: 0.000895352 kg; = p1117
- CUTOFF apply K fertilizer; broadcast without incorporation: 4.67698e-5 ha; = p1141
- CUTOFF fertilizer filler materials; at point-of-sale: 0.0182018 kg; = p1158
- CUTOFF apply pesticide; in seed furrow: 2.80051e-5 ha; = p1343
- CUTOFF apply pesticide; broadcast without incorporation: 6.97571e-5 ha; = p1335
- CUTOFF pesticide, Dimethylamine 3,6-dichloro-o-anisate; at point-of-sale; kg AI: 8.77049e-7 kg; = p1809
- CUTOFF pesticide, Bentazon; at point-of-sale; kg AI: 1.20188e-6 kg; = p1776
- CUTOFF pesticide, Chlorpyrifos; at point-of-sale; kg AI: 1.11851e-5 kg; = p1793
- CUTOFF nitrogenous fertilizer, anhydrous ammonia; at point-of-sale: 0.0072562 kg; = p1064
- CUTOFF pesticide, Lambda-cyhalothrin; at point-of-sale; kg AI: 1.19105e-7 kg; = p1870
- CUTOFF pesticide, Clopyralid; at point-of-sale; kg AI: 8.12082e-7 kg; = p1798
- CUTOFF apply K fertilizer; no broadcast application: 4.33602e-6 ha; = p1139
- CUTOFF pesticide, Isoxaflutole; at point-of-sale; kg AI: 4.43938e-7 kg; = p1867
- CUTOFF local area trucking; class 6, average fuel: 0.00214605 metric ton*km; = p2010
- CUTOFF pesticide, Prosulfuron; at point-of-sale; kg AI: 3.24833e-8 kg; = p1916
- CUTOFF prepare soil; for mulch till, corn: 2.03837e-5 ha; = p0935
- CUTOFF phosphatic fertilizer, monoammonium phosphate; at point-of-sale: 0.00411352 kg; = p1120
- CUTOFF nitrogenous fertilizer, nitrogen solutions; at point-of-sale: 0.0186966 kg; = p1068
- CUTOFF pesticide, Simazine; at point-of-sale; kg AI: 2.86936e-6 kg; = p1929
- CUTOFF gypsum; at point-of-sale: 5.28524e-7 kg; = p1166
- CUTOFF harvest; corn: 0.000104814 ha; = p1971
- CUTOFF bulk cargo rail transport; diesel: 0.0536512 metric ton*km; = p2008
- CUTOFF liming materials storage: 0.0130701 kg*a; = p1231
- CUTOFF pesticide, Diflufenzopyr-sodium; at point-of-sale; kg AI: 3.46488e-7 kg; = p1818
- CUTOFF apply single or mixed P fertilizer; unspec. method: 1.54641e-6 ha; = p1094
- CUTOFF planting; for conventional till, corn; <15% residue: 3.83507e-5 ha; = p0952
- CUTOFF pesticide, Dicamba-potassium; at point-of-sale; kg AI: 3.19419e-6 kg; = p1810
- CUTOFF prepare soil; for reduced till, corn; 15-30% residue: 2.78796e-5 ha; = p0937
- CUTOFF planting; for unspec. till, corn: 7.0815e-7 ha; = p0957
- CUTOFF apply mixed P fertilizer; without incorporation: 1.84916e-6 ha; = p1093
- CUTOFF apply pesticide; banded or side-dressed: 1.74421e-5 ha; = p1329
- CUTOFF pesticide, Terbufos; at point-of-sale; kg AI: 2.60949e-6 kg; = p1940
- CUTOFF corn seeds; GMO herbicide resistant seed; at point-of-sale: 0.000109778 kg; = p0970
- CUTOFF gypsum storage: 2.64262e-7 kg*a; = p1168
- CUTOFF phosphatic fertilizer, other single phosphates; at point-of-sale: 0.000951868 kg; = p1118
- CUTOFF apply N fertilizer; no broadcast application: 2.44915e-5 ha; = p1030
- CUTOFF pesticide, Dicamba; at point-of-sale; kg AI: 2.46873e-6 kg; = p1808
- CUTOFF apply P fertilizer; no broadcast application: 4.50255e-6 ha; = p1089
- CUTOFF domestic barge transport; average fuel: 0.028614 metric ton*km; = p2007
- CUTOFF prepare soil; for no-till, corn: 1.89414e-5 ha; = p0936
- CUTOFF regional or national trucking; class 8, average fuel: 0.00620345 metric ton*km; = p2009
- CUTOFF apply manure; broadcast without incorporation: 1.45408e-6 ha; = p1248
- CUTOFF sewage sludge storage: 4.2743e-8 kg*a; = p1192
- CUTOFF pesticide, Flumetsulam; at point-of-sale; kg AI: 3.35661e-7 kg; = p1842
- CUTOFF pesticide, Tefluthrin; at point-of-sale; kg AI: 1.89486e-6 kg; = p1939
- CUTOFF pesticide, Permethrin, mixed cis,trans; at point-of-sale; kg AI: 6.49666e-7 kg; = p1904
- CUTOFF corn seeds; nonGMO herbicide resistant seed; at point-of-sale: 0.000168416 kg; = p0971
- CUTOFF prepare soil; for unspec. till, corn: 7.0815e-7 ha; = p0939
- CUTOFF pesticide, Imazethapyr; at point-of-sale; kg AI: 2.16555e-8 kg; = p1864
- CUTOFF limestone, high-grade, pulverized; at point-of-sale: 0.0226212 kg; = p1228
- CUTOFF unspecified animal manure; from unspecified storage; at point-of-sale: 0.0539852 kg; = p1316
- CUTOFF corn seeds; seed, unspec. type; at point-of-sale: 0.00184559 kg; = p0972
- CUTOFF apply pesticide; broadcast with incorporation: 0.000230021 ha; = p1333
- CUTOFF pesticide, 1-Naphthaleneacetamide; at point-of-sale; kg AI: 1.64582e-6 kg; = p1763
- CUTOFF pesticide, Tebupirimfos; at point-of-sale; kg AI: 8.55393e-7 kg; = p1938
- CUTOFF pesticide, Glyphosate; at point-of-sale; kg AI: 8.51062e-6 kg; = p1855
- CUTOFF sulfur storage: 2.89944e-8 kg*a; = p1174
- CUTOFF pesticide, Imazapyr; at point-of-sale; kg AI: 1.08278e-8 kg; = p1862
- CUTOFF pesticide, S-Metolachlor; at point-of-sale; kg AI: 3.30896e-5 kg; = p1927
- CUTOFF international vessel transport; average fuel: 0.268742 metric ton*km; = p2006
- CUTOFF apply mixed N fertilizer; with incorporation: 1.91461e-5 ha; = p1033
- CUTOFF nitrogenous fertilizer, urea; at point-of-sale: 0.00993284 kg; = p1070
- CUTOFF nitrogenous fertilizer, ammonium sulfate; at point-of-sale: 0.00226703 kg; = p1067
- CUTOFF harvest; corn residue management: 0.000106264 ha; = p1975
- CUTOFF sulfuric acid storage: 8.07248e-9 kg*a; = p1180
- CUTOFF potassic fertilizer, other single nutrients; at point-of-sale: 0.00213657 kg; = p1155
- CUTOFF pesticide, Paraquat dichloride; at point-of-sale; kg AI: 1.01781e-6 kg; = p1901
- CUTOFF apply pesticide; as foliar or directed spray: 6.44596e-5 ha; = p1339
- CUTOFF apply sulfur; unspecified method: 0.000106264 ha; = p1171
- CUTOFF pesticide, Atrazine; at point-of-sale; kg AI: 0.000153137 kg; = p1771
- CUTOFF pesticide, Rimsulfuron; at point-of-sale; kg AI: 1.19105e-7 kg; = p1926
- CUTOFF planting; for mulch till, corn: 2.03837e-5 ha; = p0953
- CUTOFF irrigate; pressure, groundwater source, in 2001: 2.88171e-7 ha-m; = p0993
- CUTOFF apply liming materials; unspecified method: 0.000106264 ha; = p1227
- CUTOFF apply gypsum; unspecified method: 0.000106264 ha; = p1165
- CUTOFF seed storage; corn: 0.00106189 kg*a; = p0975
- CUTOFF dolomite, pulverized; at point-of-sale: 0.00351893 kg; = p1229
- CUTOFF pesticide storage: 0.000382901 kg*a; = p1965
- CUTOFF sulfur; at point-of-sale: 5.79888e-8 kg; = p1172
- CUTOFF N inhibitor appl svc; unspec rate & type, 2001 corn: 2.30494e-5 ha; = p1162
- CUTOFF pesticide, 2,4-D; at point-of-sale; kg AI: 6.84314e-6 kg; = p1754
- CUTOFF apply sewage sludge; unspecified method: 0.000106264 ha; = p1189
- CUTOFF pesticide, Propazine; at point-of-sale; kg AI: 1.0752e-5 kg; = p1889
- corn residue; at harvest in 2001; at farm; 22%-91% moisture: 0.391325 kg; = p0839
- CUTOFF nitrogenous fertilizer, sodium nitrate; at point-of-sale: 5.0465e-5 kg; = p1069
- CUTOFF pesticide, Primisulfuron-methyl; at point-of-sale; kg AI: 1.949e-7 kg; = p1909
- CUTOFF apply K fertilizer; broadcast with incorporation: 3.34132e-5 ha; = p1140
- CUTOFF apply sulfuric acid; unspecified method: 0.000106264 ha; = p1177
- CUTOFF phosphatic fertilizer, superphos. grades 22% and under; at point-of-sale: 4.40841e-5 kg; = p1116
- CUTOFF apply zinc compounds; unspecified method: 0.000106264 ha; = p1183
- CUTOFF pesticide, beta-Cyfluthrin; at point-of-sale; kg AI: 4.3311e-8 kg; = p1804
- corn silage; at harvest in 2001; at farm; 28%-40% moisture: 0.0398462 kg; = p0819
- CUTOFF sewage sludge; at point-of-sale: 8.5486e-8 kg; = p1190
- CUTOFF apply single or mixed K fertilizer; unspec. method: 2.39268e-6 ha; = p1144

## Inputs from nature
- Nitrogen: 0.0205505 kg; = p0905
- Water, ground: 2.88171 kg; = p0887
- Occupation, annual crop [natural resource, land]: 0.474099 m2*year; = 1.0 * (p0855)
- Dry matter except CNPK; from plant uptake: 0.951032 kg; = p0917
- Phosphorus: 0.00350262 kg; = p0910
- Transformation, from annual crop [natural resource, land]: 1.06264 m2; = 1.0 * (p0883+p0871+p0873)
- Transformation, to annual crop [natural resource, land]: 1.06264 m2; = 1.0 * (p0857)
- Carbon dioxide: 2.20415 kg; = p0900*3.6666666667
- Water, unspecified origin: 0.000625788 m3; = p0916*0.001+p0893*0.001
- Potassium; from plant uptake; biogenic: 0.0099701 kg; = p0915

## Emissions to nature
- Phosphorous; broadcast w/ incorp. in manure in spring before planting: 5.55172e-5 kg; = p3389
- Potassium chloride; no broadcast in fert. in fall bef. plant.: 0.000529205 kg; = p2468*2.2166666667
- Ethane [air, non-urban air or from high stacks]: 2.65691e-7 kg; = 1.0 * (p2126*1.25)
- Diammonium phosphate; unspec. appl. method in fert. at plant.: 2.28493e-6 kg; = p3118*4.7142857143
- Pesticide formulation balance; unspec. appl. method: 2.36356e-6 kg; = p5338
- Ammonium nitrate; broadcast w/o incorp. in fert. in fall bef. plant.: 0.000459897 kg; = p2827*4.7142857143
- Ammonium sulfate; broadcast w/o incorp. in fert. after plant.: 0.000143512 kg; = p2947*4.7142857143
- Potassium; broadcast w/ incorp. in manure in fall before planting; biogenic: 0.000337372 kg; = p3384
- Other single K nutrients; unspec. appl. method in fert. in spr. bef. plant.; kg K: 9.3353e-6 kg; = p3094
- Pentane [air, non-urban air or from high stacks]: 6.1855e-9 kg; = 1.0 * (p2152*1.0166666667)
- Phosphorous; broadcast w/o incorp. in manure in spring before planting: 2.10208e-5 kg; = p3408
- Nitrogen solution; broadcast w/ incorp. in fert. in fall bef. plant.; broadcast w/ incorp. in fert. in fall bef. plan...: 0.000477126 kg; = p2639
- Other single K nutrients; broadcast w/o incorp. in fert. in spr. bef. plant.; kg K: 0.000182477 kg; = p2899
- Aqueous ammonia; no broadcast in fert. in fall bef. plant.: 1.00143e-5 kg; = p2435*1.2142857143
- Potassium chloride; no broadcast in fert. at plant.: 1.68276e-6 kg; = p2546*2.2166666667
- Sodium nitrate; broadcast w/o incorp. in fert. at plant.: 1.77977e-7 kg; = p2915*6.0714285714
- isobutene: 3.4174e-8 kg; = p2150*1.1666666667
- Ammonium sulfate; broadcast w/ incorp. in fert. in spr. bef. plant.: 0.00048533 kg; = p2674*4.7142857143
- Gypsum: 5.28524e-7 kg; = p3229
- Superphosphate, grades<= 22%; no broadcast in fert. in spr. bef. plant.; kg P: 9.76762e-8 kg; = p2501
- Ammonium sulfate; broadcast w/ incorp. in fert. after plant.: 0.000128746 kg; = p2752*4.7142857143
- Monoammonium phosphate; broadcast w/ incorp. in fert. in fall bef. plant.: 0.000683087 kg; = p2654*8.2142857143
- Dioxins and furans (PCDD/F); from residue burning: 8.77138e-15 kg TEQ; = p2047
- Diammonium phosphate; no broadcast in fert. in spr. bef. plant.: 0.000203511 kg; = p2494*4.7142857143
- Potassium; broadcast w/o incorp. in manure in fall before planting; biogenic: 0.000127741 kg; = p3403
- Superphosphate, grades<= 22%; unspec. appl. method in fert. in spr. bef. plant.; kg P: 3.35472e-8 kg; = p3086
- Monoammonium phosphate; unspec. appl. method in fert. in fall bef. plant.: 3.42957e-5 kg; = p3044*8.2142857143
- Seeds; used in planting and sowing: 0.00212378 kg; = p2179
- Diammonium phosphate; broadcast w/o incorp. in fert. at plant.: 6.94635e-5 kg; = p2923*4.7142857143
- Aqueous ammonia; broadcast w/o incorp. in fert. at plant.: 6.5929e-7 kg; = p2903*1.2142857143
- Sodium nitrate; no broadcast in fert. after plant.: 1.82306e-6 kg; = p2564*6.0714285714
- Other single phosphates; unspec. appl. method in fert. at plant.; kg P: 2.72312e-8 kg; = p3129
- Dimethenamid [soil, agricultural]: 2.4579e-5 kg; = 1.0 * (p3962+p4168+p4992+p4580+p5198+p3550)
- Diammonium phosphate; no broadcast in fert. at plant.: 6.6528e-6 kg; = p2533*4.7142857143
- Anhydrous ammonia; no broadcast in fert. after plant.: 0.000268685 kg; = p2550*1.2142857143
- Nonvolatile constituents;broadcast w/o incorp. in man. in spr.bef.plant; exc.CNPK,biogenic: 8.88024e-5 kg; = p3411
- Diammonium phosphate; unspec. appl. method in fert. in fall bef. plant.: 7.56534e-5 kg; = p3040*4.7142857143
- Other single phosphates; broadcast w/ incorp. in fert. in fall bef. plant.; kg P: 1.7958e-5 kg; = p2661
- Atrazine [soil, agricultural]: 0.000153137 kg; = 1.0 * (p4944+p4120+p4532+p5150+p3914+p3502)
- Other single K nutrients; unspec. appl. method in fert. in fall bef. plant.; kg K: 1.2111e-5 kg; = p3055
- Sodium nitrate; broadcast w/o incorp. in fert. in fall bef. plant.: 4.6484e-6 kg; = p2837*6.0714285714
- Ammonium nitrate; no broadcast in fert. in spr. bef. plant.: 0.000679926 kg; = p2476*4.7142857143
- Ammonium nitrate; no broadcast in fert. in fall bef. plant.: 0.000267464 kg; = p2437*4.7142857143
- Nicosulfuron [soil, agricultural]: 1.949e-7 kg; = 1.0 * (p4245+p3627+p5069+p4039+p4657+p5275)
- Other single K nutrients; no broadcast in fert. in fall bef. plant.; kg K: 2.19477e-5 kg; = p2470
- Anhydrous ammonia; no broadcast in fert. in fall bef. plant.: 0.000398429 kg; = p2433*1.2142857143
- Toluene [air, non-urban air or from high stacks]: 5.56899e-8 kg; = 1.0 * (p2141*1.0952380952)
- Dicamba [soil, agricultural]: 2.46873e-6 kg; = 1.0 * (p4569+p3951+p3539+p4981+p5187+p4157)
- Aqueous ammonia; broadcast w/o incorp. in fert. after plant.: 1.16121e-5 kg; = p2942*1.2142857143
- Superphosphate, grades<= 22%; broadcast w/ incorp. in fert. in fall bef. plant.; kg P: 7.23213e-7 kg; = p2657
- Potassium; broadcast w/o incorp. in manure in spring before planting; biogenic: 8.79357e-5 kg; = p3409
- Potassium chloride; no broadcast in fert. in spr. bef. plant.: 0.000407916 kg; = p2507*2.2166666667
- Magnesium [soil, agricultural]: 0.000446334 kg; = 1.0 * (p3227)
- Nitrogen; in below-ground residue: 0.00133079 kg; = p2174
- Primisulfuron [soil, agricultural]: 1.949e-7 kg; = 1.0 * (p4258+p5288+p4052+p5082+p3640+p4670)
- Volatile constituents; using unspec. method in man. in spr.bef.plant.: 0.000452582 kg; = p3467
- Tebupirimphos [soil, agricultural]: 8.55393e-7 kg; = 1.0 * (p4081+p4699+p5111+p3669+p4287+p5317)
- Metolachlor [soil, agricultural]: 1.0752e-5 kg; = 1.0 * (p5062+p5268+p4238+p3620+p4650+p4032)
- Potassium; broadcast w/ incorp. in manure in spring before planting; biogenic: 0.000232244 kg; = p3390
- Glycolaldehyde; from residue burning: 5.89065e-7 kg; = p2135*2.5
- Superphosphate, grades<= 22%; unspec. appl. method in fert. at plant.; kg P: 1.09666e-9 kg; = p3125
- Other single K nutrients; unspec. appl. method in fert. at plant.; kg K: 3.85107e-8 kg; = p3133
- Ammonium sulfate; broadcast w/o incorp. in fert. in fall bef. plant.: 0.000212812 kg; = p2830*4.7142857143
- Dinitrogen monoxide [air, non-urban air or from high stacks]: 2.04704e-8 kg; = 1.0 * (p2044*1.5714285714)
- Diammonium phosphate; broadcast w/o incorp. in fert. in fall bef. plant.: 0.00229992 kg; = p2845*4.7142857143
- Formaldehyde [air, non-urban air or from high stacks]: 6.0782e-7 kg; = 1.0 * (p2128*2.5)
- Butadiene [air, non-urban air or from high stacks]: 4.41148e-8 kg; = 1.0 * (p2143*1.125)
- Diammonium phosphate; broadcast w/ incorp. in fert. in fall bef. plant.: 0.00150683 kg; = p2650*4.7142857143
- Potassium chloride; unspec. appl. method in fert. in spr. bef. plant.: 0.000225094 kg; = p3092*2.2166666667
- Dimethylamine 3,6-dichloro-o-anisate; unspec. appl. method: 9.91804e-9 kg; = p5188
- Other single phosphates; unspec. appl. method in fert. in spr. bef. plant.; kg P: 8.33008e-7 kg; = p3090
- Pesticide formulation balance; broadcast with incorporation: 0.000116023 kg; = p4102
- Monoammonium phosphate; broadcast w/o incorp. in fert. in fall bef. plant.: 0.00104262 kg; = p2849*8.2142857143
- Monoammonium phosphate; no broadcast in fert. in spr. bef. plant.: 9.22569e-5 kg; = p2498*8.2142857143
- Calcium [soil, agricultural]: 0.00930385 kg; = 1.0 * (p3218+p3226)
- Sewage sludge dry matter; applied in sewage sludge: 4.42655e-10 kg; = p3243
- Potassium chloride; broadcast w/o incorp. in fert. in spr. bef. plant.: 0.00439991 kg; = p2897*2.2166666667
- Superphosphate, grades>22%; no broadcast in fert. in spr. bef. plant.; kg P: 4.76115e-6 kg; = p2503
- Anhydrous ammonia; broadcast w/ incorp. in fert. after plant.: 0.000414462 kg; = p2745*1.2142857143
- Monoammonium phosphate; broadcast w/ incorp. in fert. at plant.: 2.0631e-5 kg; = p2732*8.2142857143
- Propane [air, non-urban air or from high stacks]: 8.23455e-8 kg; = 1.0 * (p2142*1.2222222222)
- Prosulfuron [soil, agricultural]: 3.24833e-8 kg; = 1.0 * (p4677+p4265+p4059+p3647+p5295+p5089)
- Potassium chloride; broadcast w/ incorp. in fert. in spr. bef. plant.: 0.00314338 kg; = p2702*2.2166666667
- Dicamba-potassium; broadcast with incorporation: 1.77312e-6 kg; = p3953
- Oxygen; applied in dolomite: 0.00176631 kg; = p3228
- Glyphosate [soil, agricultural]: 8.51062e-6 kg; = 1.0 * (p5234+p4616+p3998+p3586+p4204+p5028)
- Methane: 6.53779e-7 kg; = p2025*1.3333333333
- Water [air, non-urban air or from high stacks]: 1.61676e-7 m3; = 0.001 * (p2016)
- Superphosphate, grades>22%; no broadcast in fert. at plant.; kg P: 1.55643e-7 kg; = p2542
- Rimsulfuron [soil, agricultural]: 1.19105e-7 kg; = 1.0 * (p5305+p4687+p4069+p3657+p5099+p4275)
- Ammonium nitrate; broadcast w/ incorp. in fert. at plant.: 1.57967e-5 kg; = p2710*4.7142857143
- NMVOC, non-methane volatile organic compounds, unspecified origin [air, non-urban air or from high stacks]: 7.51245e-6 kg; = 1.0 * (p2052+p2051)
- Aqueous ammonia; no broadcast in fert. after plant.: 6.75326e-6 kg; = p2552*1.2142857143
- Aqueous ammonia; broadcast w/ incorp. in fert. in spr. bef. plant.: 3.92698e-5 kg; = p2669*1.2142857143
- Nitrogen solution; broadcast w/ incorp. in fert. after plant.; broadcast w/ incorp. in fert. after plant.; kg N: 0.000321756 kg; = p2756
- Diflufenzopyr-sodium [soil, agricultural]: 3.46488e-7 kg; = 1.0 * (p3549+p4991+p3961+p5197+p4579+p4167)
- Phosphorous; broadcast w/o incorp. in manure in fall before planting: 3.05361e-5 kg; = p3402
- Anhydrous ammonia; broadcast w/o incorp. in fert. after plant.: 0.000461997 kg; = p2940*1.2142857143
- Dicamba-potassium; unspec. appl. method: 3.61213e-8 kg; = p5189
- Sulfur [soil, agricultural]: 5.79888e-8 kg; = 1.0 * (p3230)
- Nitrogen; broadcast w/o incorp. in manure in fall before planting: 0.000105644 kg; = p3401
- Nitrogen solution; no broadcast in fert. in spr. bef. plant.; no broadcast in fert. in spr. bef. plant.; kg N: 0.000786301 kg; = p2483
- Potassium; in below-ground residue; biogenic: 0.00189747 kg; = p2176
- Pesticide formulation balance; banded or side-dressed: 8.79783e-6 kg; = p3690
- Anhydrous ammonia; no broadcast in fert. at plant.: 1.5255e-5 kg; = p2511*1.2142857143
- Oxygen; applied in limestone: 0.0101974 kg; = p3219
- Ammonium nitrate; broadcast w/ incorp. in fert. in spr. bef. plant.: 0.00104882 kg; = p2671*4.7142857143
- Ammonium nitrate; broadcast w/o incorp. in fert. in spr. bef. plant.: 0.00116911 kg; = p2866*4.7142857143
- Superphosphate, grades<= 22%; broadcast w/ incorp. in fert. in spr. bef. plant.; kg P: 6.68179e-7 kg; = p2696
- Formic acid [air, non-urban air or from high stacks]: 2.9297e-7 kg; = 1.0 * (p2131*3.8333333333)
- Other single phosphates; broadcast w/ incorp. in fert. in spr. bef. plant.; kg P: 1.65915e-5 kg; = p2700
- Clopyralid [soil, agricultural]: 8.12082e-7 kg; = 1.0 * (p4971+p4559+p4147+p3529+p3941+p5177)
- Butane [air, non-urban air or from high stacks]: 1.77632e-8 kg; = 1.0 * (p2147*1.0208333333)
- Cyfluthrin [soil, agricultural]: 4.3311e-8 kg; = 1.0 * (p4153+p3535+p5183+p3947+p4565+p4977)
- Furan [air, non-urban air or from high stacks]: 3.19835e-8 kg; = 1.0 * (p2138*1.4166666667)
- Permethrin [soil, agricultural]: 6.49666e-7 kg; = 1.0 * (p4047+p5283+p5077+p4665+p3635+p4253)
- Sulfur dioxide [air, non-urban air or from high stacks]: 3.47931e-7 kg; = 1.0 * (p2041)
- Other single phosphates; broadcast w/ incorp. in fert. at plant.; kg P: 5.42379e-7 kg; = p2739
- Zinc compounds: 1.52261e-8 kg; = p3232
- Acetochlor [soil, agricultural]: 8.72609e-5 kg; = 1.0 * (p4938+p4114+p5144+p3908+p4526+p3496)
- Volatile constituents; broadcast w/o incorp. in man. in spr.bef.plant.: 0.000542006 kg; = p3410
- Nitrogen solution; broadcast w/o incorp. in fert. after plant.; broadcast w/o incorp. in fert. after plant.; kg N: 0.000358658 kg; = p2951
- Urea; broadcast w/o incorp. in fert. in fall bef. plant.: 0.000918618 kg; = p2841*5
- Nitrogen; applied in sewage sludge: 3.99834e-9 kg; = p3240
- Other single K nutrients; broadcast w/ incorp. in fert. at plant.; kg K: 5.37792e-7 kg; = p2743
- Other limestone constituents; applied in limestone: 0.00135727 kg; = p3220
- Ammonium nitrate; broadcast w/o incorp. in fert. after plant.: 0.000310137 kg; = p2944*4.7142857143
- Ammonium sulfate; no broadcast in fert. in fall bef. plant.: 0.000123766 kg; = p2440*4.7142857143
- Superphosphate, grades>22%; broadcast w/o incorp. in fert. at plant.; kg P: 1.6251e-6 kg; = p2932
- Plant dry matter; from residue burning: 0.000103988 kg; = p2164
- Propanenitrile: 1.87348e-8 kg; = p2157*1.5277777778
- Dimethylamine 3,6-dichloro-o-anisate; broadcast without incorporation: 1.47647e-7 kg; = p4158
- Phenol [air, non-urban air or from high stacks]: 1.51649e-7 kg; = 1.0 * (p2133*1.3055555556)
- Pesticide formulation balance; broadcast without incorporation: 3.51855e-5 kg; = p4308
- Urea; broadcast w/o incorp. in fert. in spr. bef. plant.: 0.00233524 kg; = p2880*5
- Urea; no broadcast in fert. after plant.: 0.000360274 kg; = p2568*5
- Particulates, < 2.5 um [air, non-urban air or from high stacks]: 1.45312e-6 kg; = 1.0 * (p2033+p2035)
- Anhydrous ammonia; broadcast w/ incorp. in fert. in spr. bef. plant.: 0.00156239 kg; = p2667*1.2142857143
- Anhydrous ammonia; broadcast w/o incorp. in fert. in spr. bef. plant.: 0.00174158 kg; = p2862*1.2142857143
- Carbon monoxide, fossil [air, non-urban air or from high stacks]: 1.5519e-5 kg; = 1.0 * (p2028*2.3333333333)
- Other single K nutrients; no broadcast in fert. in spr. bef. plant.; kg K: 1.69175e-5 kg; = p2509
- Sodium nitrate; broadcast w/ incorp. in fert. after plant.: 2.81218e-6 kg; = p2759*6.0714285714
- Volatile constituents; broadcast w/ incorp. in man. in fal.bef.plant: 0.00207945 kg; = p3385
- Phosphorous; using unspec. method in manure in fall before planting: 2.5498e-5 kg; = p3459
- Ammonia [air, non-urban air or from high stacks]: 6.34488e-7 kg; = 1.0 * (p2159*1.2142857143)
- trans-2-Butene: 1.66489e-8 kg; = p2148*1.1666666667
- Acrylonitrile: 9.80047e-9 kg; = p2156*1.4722222222
- Ethene [air, non-urban air or from high stacks]: 4.25414e-7 kg; = 1.0 * (p2125*1.1666666667)
- Sodium nitrate; broadcast w/o incorp. in fert. after plant.: 3.13471e-6 kg; = p2954*6.0714285714
- Superphosphate, grades<= 22%; broadcast w/ incorp. in fert. at plant.; kg P: 2.18429e-8 kg; = p2735
- Sodium nitrate; broadcast w/ incorp. in fert. at plant.: 1.59665e-7 kg; = p2720*6.0714285714
- Diammonium phosphate; broadcast w/ incorp. in fert. in spr. bef. plant.: 0.00139217 kg; = p2689*4.7142857143
- Carbon dioxide, in air: 0.000389773 kg; = p2163*3.6666666667
- Nitrogen; using unspec. method in manure in fall before planting: 8.82138e-5 kg; = p3458
- Superphosphate, grades<= 22%; no broadcast in fert. at plant.; kg P: 3.19305e-9 kg; = p2540
- Nitrogen solution; no broadcast in fert. after plant.; no broadcast in fert. after plant.; kg N: 0.000208586 kg; = p2561
- Dimethylamine 3,6-dichloro-o-anisate; banded or side-dressed: 3.69177e-8 kg; = p3540
- Nitrogen; broadcast w/o incorp. in manure in spring before planting: 7.27242e-5 kg; = p3407
- Superphosphate, grades<= 22%; broadcast w/o incorp. in fert. at plant.; kg P: 3.33394e-8 kg; = p2930
- Potassium; using unspec. method in manure in spring before planting; biogenic: 7.34273e-5 kg; = p3466
- Benzene [air, non-urban air or from high stacks]: 4.48645e-8 kg; = 1.0 * (p2140*1.0833333333)
- Pesticide formulation balance; in seed furrow: 1.41258e-5 kg; = p5132
- Aqueous ammonia; broadcast w/ incorp. in fert. after plant.: 1.04173e-5 kg; = p2747*1.2142857143
- Imazethapyr [soil, agricultural]: 2.16555e-8 kg; = 1.0 * (p4213+p3595+p4625+p4007+p5037+p5243)
- Potassium chloride; broadcast w/o incorp. in fert. at plant.: 1.81508e-5 kg; = p2936*2.2166666667
- Flumetsulam [soil, agricultural]: 3.35661e-7 kg; = 1.0 * (p4191+p3573+p3985+p5015+p4603+p5221)
- Nitrogen solution; broadcast w/ incorp. in fert. at plant.; broadcast w/ incorp. in fert. at plant.; kg N: 1.82681e-5 kg; = p2717
- Nitrogen solution; broadcast w/ incorp. in fert. in spr. bef. plant.; broadcast w/ incorp. in fert. in spr. bef. plan...: 0.00121291 kg; = p2678
- Dicamba-potassium; in seed furrow: 2.15879e-7 kg; = p4983
- Lambda-cyhalothrin [soil, agricultural]: 1.19105e-7 kg; = 1.0 * (p5249+p4013+p4631+p5043+p4219+p3601)
- Plant dry matter; in aboveground residue left on field: 0.162256 kg; = p2172
- Superphosphate, grades>22%; broadcast w/o incorp. in fert. in spr. bef. plant.; kg P: 4.97123e-5 kg; = p2893
- Aqueous ammonia; broadcast w/ incorp. in fert. in fall bef. plant.: 1.54476e-5 kg; = p2630*1.2142857143
- Potassium chloride; unspec. appl. method in fert. at plant.: 9.28573e-7 kg; = p3131*2.2166666667
- Potassium chloride; broadcast w/ incorp. in fert. in fall bef. plant.: 0.00407803 kg; = p2663*2.2166666667
- Ammonium sulfate; no broadcast in fert. after plant.: 8.34628e-5 kg; = p2557*4.7142857143
- Paraquat dichloride: 1.01781e-6 kg; = p5280+p5074+p4044+p4250+p3632+p4662
- Ammonium sulfate; no broadcast in fert. in spr. bef. plant.: 0.000314627 kg; = p2479*4.7142857143
- Pesticide formulation balance; foliar or directed spray: 3.25134e-5 kg; = p4720
- Volatile constituents; using unspec. method in man. in fal.bef.plant: 0.000657449 kg; = p3461
- Urea; broadcast w/ incorp. in fert. in spr. bef. plant.: 0.00209497 kg; = p2685*5
- Urea; no broadcast in fert. in spr. bef. plant.: 0.00135811 kg; = p2490*5
- Dicamba-potassium; foliar or directed spray: 4.96889e-7 kg; = p4571
- Propene [air, non-urban air or from high stacks]: 1.97656e-7 kg; = 1.0 * (p2136*1.1666666667)
- Superphosphate, grades>22%; unspec. appl. method in fert. at plant.; kg P: 5.3456e-8 kg; = p3127
- Anhydrous ammonia; broadcast w/ incorp. in fert. at plant.: 2.35316e-5 kg; = p2706*1.2142857143
- Methanol [air, non-urban air or from high stacks]: 9.60926e-7 kg; = 1.0 * (p2129*2.6666666667)
- Other single phosphates; no broadcast in fert. in spr. bef. plant.; kg P: 2.42539e-6 kg; = p2505
- Superphosphate, grades>22%; unspec. appl. method in fert. in spr. bef. plant.; kg P: 1.63523e-6 kg; = p3088
- Superphosphate, grades<= 22%; no broadcast in fert. in fall bef. plant.; kg P: 1.05721e-7 kg; = p2462
- S-Metolachlor: 3.30896e-5 kg; = p4688+p5100+p3658+p4276+p5306+p4070
- Volatile constituents; broadcast w/ incorp. in man. in spr.bef.plant.: 0.00143147 kg; = p3391
- Superphosphate, grades>22%; broadcast w/ incorp. in fert. at plant.; kg P: 1.06471e-6 kg; = p2737
- Sodium nitrate; no broadcast in fert. at plant.: 1.03507e-7 kg; = p2525*6.0714285714
- Diammonium phosphate; broadcast w/o incorp. in fert. in spr. bef. plant.: 0.00212491 kg; = p2884*4.7142857143
- Nonvolatile constituents;broadcast w/o incorp. in man. in fal.bef.plant; exc.CNPK,biogenic: 0.000129 kg; = p3405
- Nitrogen; using unspec. method in manure in spring before planting: 6.07255e-5 kg; = p3464
- Phosphorous; using unspec. method in manure in spring before planting: 1.75526e-5 kg; = p3465
- Nitrogen solution; no broadcast in fert. at plant.; no broadcast in fert. at plant.; kg N: 1.18427e-5 kg; = p2522
- Acetone [air, non-urban air or from high stacks]: 1.30477e-7 kg; = 1.0 * (p2139*1.6111111111)
- Urea; broadcast w/ incorp. in fert. at plant.: 3.1553e-5 kg; = p2724*5
- Superphosphate, grades<= 22%; unspec. appl. method in fert. in fall bef. plant.; kg P: 3.63103e-8 kg; = p3047
- Isoprene [air, non-urban air or from high stacks]: 1.10325e-7 kg; = 1.0 * (p2145*1.1333333333)
- Monoammonium phosphate; broadcast w/o incorp. in fert. in spr. bef. plant.: 0.000963276 kg; = p2888*8.2142857143
- Ethyne [air, non-urban air or from high stacks]: 7.95872e-8 kg; = 1.0 * (p2132*1.0833333333)
- Ash: 5.78326e-5 kg; = p2022+p2021
- Terbufos [soil, agricultural]: 2.60949e-6 kg; = 1.0 * (p4289+p5113+p4083+p4701+p5319+p3671)
- Urea; broadcast w/ incorp. in fert. in fall bef. plant.: 0.000824101 kg; = p2646*5
- Imazapyr [soil, agricultural]: 1.08278e-8 kg; = 1.0 * (p3593+p4623+p4005+p4211+p5035+p5241)
- Plant dry matter; in below-ground residue: 0.0642478 kg; = p2177
- Diammonium phosphate; broadcast w/ incorp. in fert. at plant.: 4.55102e-5 kg; = p2728*4.7142857143
- Phosphorous; applied in sewage sludge: 4.77308e-10 kg; = p3241
- Other single phosphates; broadcast w/o incorp. in fert. in fall bef. plant.; kg P: 2.74099e-5 kg; = p2856
- Nitrogen solution; no broadcast in fert. in fall bef. plant.; no broadcast in fert. in fall bef. plant.; kg N: 0.000309309 kg; = p2444
- Sodium nitrate; broadcast w/o incorp. in fert. in spr. bef. plant.: 1.18168e-5 kg; = p2876*6.0714285714
- Monoammonium phosphate; no broadcast in fert. in fall bef. plant.: 9.98556e-5 kg; = p2459*8.2142857143
- Nitrogen; broadcast w/ incorp. in manure in fall before planting: 0.000279012 kg; = p3382
- Sodium nitrate; no broadcast in fert. in fall bef. plant.: 2.70339e-6 kg; = p2447*6.0714285714
- Potassium chloride; broadcast w/ incorp. in fert. at plant.: 1.29673e-5 kg; = p2741*2.2166666667
- Nitrogen; broadcast w/ incorp. in manure in spring before planting: 0.000192069 kg; = p3388
- Particulates, < 10 um: 3.12261e-6 kg; = p2034+p2036
- Nitrogen solution; broadcast w/o incorp. in fert. at plant.; broadcast w/o incorp. in fert. at plant.; kg N: 2.03633e-5 kg; = p2912
- Urea; broadcast w/o incorp. in fert. after plant.: 0.000619481 kg; = p2958*5
- I butane; from residue burning: 6.16776e-9 kg; = p2146*1.0208333333
- Diammonium phosphate; no broadcast in fert. in fall bef. plant.: 0.000220273 kg; = p2455*4.7142857143
- Nitrogen solution; broadcast w/o incorp. in fert. in fall bef. plant.; broadcast w/o incorp. in fert. in fall bef. pl...: 0.000531848 kg; = p2834
- Ammonium sulfate; broadcast w/o incorp. in fert. in spr. bef. plant.: 0.000540993 kg; = p2869*4.7142857143
- Dimethylamine 3,6-dichloro-o-anisate; foliar or directed spray: 1.36434e-7 kg; = p4570
- Ammonium sulfate; broadcast w/ incorp. in fert. in fall bef. plant.: 0.000190915 kg; = p2635*4.7142857143
- Phosphorous; in above-ground residue left on field: 0.000314711 kg; = p2169
- Aqueous ammonia; broadcast w/o incorp. in fert. in fall bef. plant.: 1.72193e-5 kg; = p2825*1.2142857143
- Filler materials, applied with synthetic fertilizer: 0.0182018 kg; = p2432
- 1-Naphthaleneacetamide: 1.64582e-6 kg; = p5142+p4936+p4112+p3494+p4524+p3906
- Other single K nutrients; broadcast w/o incorp. in fert. in fall bef. plant.; kg K: 0.000236735 kg; = p2860
- Ammonium sulfate; broadcast w/o incorp. in fert. at plant.: 8.14808e-6 kg; = p2908*4.7142857143
- Acetol; from residue burning: 1.10088e-6 kg; = p2134*2.0555555556
- Nitrogen; in above-ground residue left on field: 0.00336086 kg; = p2168
- Monoammonium phosphate; unspec. appl. method in fert. at plant.: 1.03582e-6 kg; = p3122*8.2142857143
- Nitrogen solution; broadcast w/o incorp. in fert. in spr. bef. plant.; broadcast w/o incorp. in fert. in spr. bef. pl...: 0.00135202 kg; = p2873
- Other single K nutrients; no broadcast in fert. at plant.; kg K: 6.97892e-8 kg; = p2548
- Superphosphate, grades<= 22%; broadcast w/o incorp. in fert. in spr. bef. plant.; kg P: 1.01986e-6 kg; = p2891
- Anhydrous ammonia; broadcast w/o incorp. in fert. at plant.: 2.62305e-5 kg; = p2901*1.2142857143
- Acetaldehyde [air, non-urban air or from high stacks]: 3.63644e-7 kg; = 1.0 * (p2130*1.8333333333)
- Ammonium nitrate; no broadcast in fert. after plant.: 0.000180367 kg; = p2554*4.7142857143
- cis-2-Butene: 1.25597e-8 kg; = p2149*1.1666666667
- Other single K nutrients; broadcast w/ incorp. in fert. in spr. bef. plant.; kg K: 0.000130365 kg; = p2704
- Ammonium sulfate; no broadcast in fert. at plant.: 4.73871e-6 kg; = p2518*4.7142857143
- Nonvolatile constituents; broadcast w/incorp. in man. in spr.bef.plant; exc.CNPK,biogenic: 0.000234533 kg; = p3392
- Other single K nutrients; broadcast w/o incorp. in fert. at plant.; kg K: 7.52769e-7 kg; = p2938
- Aqueous ammonia; broadcast w/ incorp. in fert. at plant.: 5.91455e-7 kg; = p2708*1.2142857143
- Anhydrous ammonia; no broadcast in fert. in spr. bef. plant.: 0.00101286 kg; = p2472*1.2142857143
- Other single phosphates; no broadcast in fert. at plant.; kg P: 7.92864e-8 kg; = p2544
- Acetonitrile [air, non-urban air or from high stacks]: 6.13767e-8 kg; = 1.0 * (p2155*1.7083333333)
- Monoammonium phosphate; broadcast w/ incorp. in fert. in spr. bef. plant.: 0.000631106 kg; = p2693*8.2142857143
- Superphosphate, grades>22%; broadcast w/ incorp. in fert. in spr. bef. plant.; kg P: 3.25699e-5 kg; = p2698
- Water: 3.3183 kg; = p2181+p3475+p3418+p2178+p3399+p2171
- Methyl vinyl ether; from residue burning: 2.2176e-8 kg; = p2137*1.6111111111
- Diammonium phosphate; unspec. appl. method in fert. in spr. bef. plant.: 6.98964e-5 kg; = p3079*4.7142857143
- Acetic acid [air, non-urban air or from high stacks]: 1.63582e-6 kg; = 1.0 * (p2127*2.5)
- Nonvolatile constituents; broadcast w/incorp. in man. in fal.bef.plant; exc.CNPK,biogenic: 0.000340697 kg; = p3386
- Urea; no broadcast in fert. at plant.: 2.0455e-5 kg; = p2529*5
- Other single phosphates; broadcast w/o incorp. in fert. in spr. bef. plant.; kg P: 2.53241e-5 kg; = p2895
- Nitrogen dioxide: 6.72714e-7 kg; = p2039*3.2857142857
- Bentazone [soil, agricultural]: 1.20188e-6 kg; = 1.0 * (p3507+p3919+p4537+p4125+p4949+p5155)
- Phosphorous; broadcast w/ incorp. in manure in fall before planting: 8.06478e-5 kg; = p3383
- Other single phosphates; no broadcast in fert. in fall bef. plant.; kg P: 2.62516e-6 kg; = p2466
- Aqueous ammonia; broadcast w/o incorp. in fert. in spr. bef. plant.: 4.37736e-5 kg; = p2864*1.2142857143
- cyclopentane: 4.8361e-10 kg; = p2153*1.0166666667
- Potassium chloride; unspec. appl. method in fert. in fall bef. plant.: 0.000292023 kg; = p3053*2.2166666667
- Volatile constituents; broadcast w/o incorp. in man. in fal.bef.plant: 0.000787353 kg; = p3404
- Aqueous ammonia; no broadcast in fert. in spr. bef. plant.: 2.54576e-5 kg; = p2474*1.2142857143
- Tefluthrin [soil, agricultural]: 1.89486e-6 kg; = 1.0 * (p4082+p4288+p5112+p4700+p3670+p5318)
- Potassium; in above-ground residue left on field; biogenic: 0.00479201 kg; = p2170
- Monoammonium phosphate; no broadcast in fert. at plant.: 3.01589e-6 kg; = p2537*8.2142857143
- Carbon [soil, agricultural]: 0.209914 kg; = 1.0 * (p3225+p3242+p3381+p3387+p3457+p3406+p3400+p2167+p3217+p2173+p3463)
- Monoammonium phosphate; broadcast w/o incorp. in fert. at plant.: 3.14896e-5 kg; = p2927*8.2142857143
- Simazine [soil, agricultural]: 2.86936e-6 kg; = 1.0 * (p5102+p4690+p5308+p4072+p4278+p3660)
- Aqueous ammonia; no broadcast in fert. at plant.: 3.83425e-7 kg; = p2513*1.2142857143
- Isoxaflutole [soil, agricultural]: 4.43938e-7 kg; = 1.0 * (p5246+p4216+p3598+p4010+p4628+p5040)
- Other single phosphates; broadcast w/o incorp. in fert. at plant.; kg P: 8.27848e-7 kg; = p2934
- Ammonium nitrate; broadcast w/ incorp. in fert. in fall bef. plant.: 0.000412578 kg; = p2632*4.7142857143
- Ammonium sulfate; broadcast w/ incorp. in fert. at plant.: 7.30973e-6 kg; = p2713*4.7142857143
- Anhydrous ammonia; broadcast w/o incorp. in fert. in fall bef. plant.: 0.000685088 kg; = p2823*1.2142857143
- Sodium nitrate; broadcast w/ incorp. in fert. in fall bef. plant.: 4.17013e-6 kg; = p2642*6.0714285714
- Superphosphate, grades>22%; broadcast w/o incorp. in fert. in fall bef. plant.; kg P: 5.38068e-5 kg; = p2854
- Potassium chloride; broadcast w/o incorp. in fert. in fall bef. plant.: 0.00570818 kg; = p2858*2.2166666667
- Monoammonium phosphate; unspec. appl. method in fert. in spr. bef. plant.: 3.16859e-5 kg; = p3083*8.2142857143
- Superphosphate, grades>22%; broadcast w/ incorp. in fert. in fall bef. plant.; kg P: 3.52525e-5 kg; = p2659
- Superphosphate, grades<= 22%; broadcast w/o incorp. in fert. in fall bef. plant.; kg P: 1.10386e-6 kg; = p2852
- Sodium nitrate; broadcast w/ incorp. in fert. in spr. bef. plant.: 1.0601e-5 kg; = p2681*6.0714285714
- Sodium nitrate; no broadcast in fert. in spr. bef. plant.: 6.87235e-6 kg; = p2486*6.0714285714
- Urea; no broadcast in fert. in fall bef. plant.: 0.000534244 kg; = p2451*5
- Dimethylamine 3,6-dichloro-o-anisate; in seed furrow: 5.92752e-8 kg; = p4982
- Urea; broadcast w/ incorp. in fert. after plant.: 0.000555742 kg; = p2763*5
- Ammonium nitrate; no broadcast in fert. at plant.: 1.02406e-5 kg; = p2515*4.7142857143
- Ammonium nitrate; broadcast w/o incorp. in fert. at plant.: 1.76084e-5 kg; = p2905*4.7142857143
- isopentane: 4.9484e-9 kg; = p2151*1.0166666667
- Other single phosphates; unspec. appl. method in fert. in fall bef. plant.; kg P: 9.01618e-7 kg; = p3051
- Potassium; using unspec. method in manure in fall before planting; biogenic: 0.000106665 kg; = p3460
- Chlorpyrifos [soil, agricultural]: 1.11851e-5 kg; = 1.0 * (p4966+p4142+p4554+p3524+p5172+p3936)
- 1-Butene: 3.91394e-8 kg; = p2144*1.1666666667
- Dicamba-potassium; broadcast without incorporation: 5.37725e-7 kg; = p4159
- Hydrocyanic acid: 8.34102e-8 kg; = p2154*2.25
- Phosphorous; in below-ground residue: 0.000124615 kg; = p2175
- Superphosphate, grades>22%; no broadcast in fert. in fall bef. plant.; kg P: 5.1533e-6 kg; = p2464
- Superphosphate, grades>22%; unspec. appl. method in fert. in fall bef. plant.; kg P: 1.76992e-6 kg; = p3049
- Other single K nutrients; broadcast w/ incorp. in fert. in fall bef. plant.; kg K: 0.000169128 kg; = p2665
- 2,4-D [soil, agricultural]: 6.84314e-6 kg; = 1.0 * (p3897+p4515+p4103+p3485+p4927+p5133)
- Sulfuric acid [soil, agricultural]: 1.6145e-8 kg; = 1.0 * (p3231)
- Urea; broadcast w/o incorp. in fert. at plant.: 3.51718e-5 kg; = p2919*5
- Ammonium nitrate; broadcast w/ incorp. in fert. after plant.: 0.000278227 kg; = p2749*4.7142857143
- Anhydrous ammonia; broadcast w/ incorp. in fert. in fall bef. plant.: 0.000614599 kg; = p2628*1.2142857143
- Dimethylamine 3,6-dichloro-o-anisate; broadcast with incorporation: 4.86857e-7 kg; = p3952
- Dicamba-potassium; banded or side-dressed: 1.34453e-7 kg; = p3541

## Sampling procedure
A delete-a-group jackknife is used by the USDA to estimate the ARMS sample means and RSEs, based on a 15 sample delete-a-group jackknife. Because of this relatively small sample size, a Students t distribution is used to represent ARMS data probability density functions. Other representations of uncertainty are described in Cooper, J.S., Kahn, E., Noon, M. (2012). LCA Digital Commons Unit Process Data: field crop production Version 1. Prepared for the US Department of Agriculture National Agricultural Library. Retrieved from https://www.lcacommons.gov/discovery/docs/LCA%20Digital%20Commons%20Unit%20Process%20Data%20final%20updated.pdf

## Extrapolations
Data represent an aggregation of processes applied in Illinois in 2001. Data development is demonstrated by parameterization (exlicitly presents all raw and uncertainty data and all calculations). Flow data quality according to the LCADC convention is provided for all flows.
