# oats; at harvest in 2005; at farm; 86%-92% moisture

Dataset: EcoSpold 2, unit process
Geography: GLO
Time period: 2005-01-02 to 2006-01-01
Scenario: Business-as-Usual
System model: Allocation, ecoinvent default
Generated by: cooperjs@u.washington.edu
isCopyrightProtected: false

## General comment
This unit process/ gate-to-gate dataset represents the production of 1 kg oats coproduced with residue. The process technologies are an aggregation of those applied in North Dakota in 2005. Applicable classifications include ISIC 0111, NAIC 111199, UNSPSC 50221101; this dataset was prepared in ILCD format using the UWDFE Lab Excel to ILCD File Generator (beta version, August 2013)

Exchange "Bromoxynil octanoate-soil unspecified" is the result of combining the following original LCA Commons flows: "Bromoxynil octanoate; foliar or directed spray; kg AI", "Bromoxynil octanoate; unspec. appl. method; kg AI", "Bromoxynil octanoate; broadcast with incorporation; kg AI".
Exchange "NMVOC, non-methane volatile organic compounds, unspecified origin-air low population density" is the result of combining the following original LCA Commons flows: "NMVOCs; from residue burning; kg C, biogenic", "NMVOCs; from residue burning; kg except C, biogenic".
Exchange "Glyphosate-soil agricultural" is the result of combining the following original LCA Commons flows: "Glyphosate; unspec. appl. method; kg AI", "Glyphosate; foliar or directed spray; kg AI", "Glyphosate; broadcast with incorporation; kg AI".
Exchange "Carbon-soil agricultural" is the result of combining the following original LCA Commons flows: "Carbon; applied in sewage sludge", "Carbon; broadcast w/o incorp. in manure at an unknown time", "Carbon; in below-ground residue; biogenic", "Carbon; broadcast w/o incorp. in manure in fall before planting; biogenic", "Carbon; using unspec. method in manure at an unknown time", "Carbon; in above-ground residue left on field; biogenic", "Carbon; applied in limestone", "Carbon; applied in dolomite", "Carbon; using unspec. method in manure in fall before planting; biogenic".
Exchange "Particulates, < 2.5 um-air low population density" is the result of combining the following original LCA Commons flows: "PM2.5; from residue burning; kg except C, biogenic", "PM2.5; from residue burning; kg C, biogenic".
Exchange "Pesticides, unspecified-soil agricultural" is the result of combining the following original LCA Commons flows: "Unspecified pesticide; broadcast with incorporation; kg AI", "Unspecified pesticide; unspec. appl. method; kg AI", "Unspecified pesticide; foliar or directed spray; kg AI".
Exchange "Ash-soil agricultural" is the result of combining the following original LCA Commons flows: "Ash; from residue burning; kg C, biogenic", "Ash; from residue burning; kg except C, biogenic".
Exchange "Water-soil agricultural" is the result of combining the following original LCA Commons flows: "Water; from irrigation and applied with manure and sewage sludge", "Water; in above-ground residue left on field; biogenic", "Water; broadcast w/o incorp. in manure", "Water; in below-ground residue; biogenic", "Water; using unspec. method in manure".
Exchange "2,4-D, dimethylamine salt-soil agricultural" is the result of combining the following original LCA Commons flows: "2,4-D, dimethylamine salt; foliar or directed spray; kg AI", "2,4-D, dimethylamine salt; unspec. appl. method; kg AI", "2,4-D, dimethylamine salt; broadcast with incorporation; kg AI".
Exchange "Clopyralid-soil agricultural" is the result of combining the following original LCA Commons flows: "Clopyralid; unspec. appl. method; kg AI", "Clopyralid; foliar or directed spray; kg AI", "Clopyralid; broadcast with incorporation; kg AI".
Exchange "Water, unspecified origin-resource in water" is the result of combining the following original LCA Commons flows: "Water; withdrawal from unspec. source, for oats, in 2005", "Water; from plant uptake; biogenic".
Exchange "Particulates, < 10 um-air low population density" is the result of combining the following original LCA Commons flows: "PM10; from residue burning; kg except C, biogenic", "PM10; from residue burning; kg C, biogenic".
Exchange "Calcium-soil agricultural" is the result of combining the following original LCA Commons flows: "Calcium; applied in dolomite", "Calcium; applied in limestone".
Exchange "2,4-D-soil agricultural" is the result of combining the following original LCA Commons flows: "2,4-D; foliar or directed spray; kg AI", "2,4-D; broadcast with incorporation; kg AI", "2,4-D; unspec. appl. method; kg AI".
Exchange "Carbon monoxide, fossil-2bdf9967-6dae-4183-88d1-8f612548c51e low population density" was originally named: "Carbon monoxide; from residue burning; kg C, biogenic" in this dataset.
Exchange "Magnesium-be1c0329-f1a8-4524-8420-a86d2a8dd358 agricultural" was originally named: "Magnesium; applied in dolomite" in this dataset.
Exchange "Methane-2bdf9967-6dae-4183-88d1-8f612548c51e low population density" was originally named: "Methane; from residue burning; kg C, biogenic" in this dataset.
Exchange "Propane-2bdf9967-6dae-4183-88d1-8f612548c51e low population density" was originally named: "Propane; from residue burning; kg C, biogenic" in this dataset.
Exchange "Sulfur-be1c0329-f1a8-4524-8420-a86d2a8dd358 agricultural" was originally named: "Sulfur; as secondary application" in this dataset.
Exchange "Zinc compounds-be1c0329-f1a8-4524-8420-a86d2a8dd358 agricultural" was originally named: "Zinc compounds; as secondary application" in this dataset.
Exchange "Water-2bdf9967-6dae-4183-88d1-8f612548c51e low population density" was originally named: "Water; from residue burning; biogenic" in this dataset.
Exchange "isobutene-2bdf9967-6dae-4183-88d1-8f612548c51e low population density" was originally named: "I butene; from residue burning; kg C, biogenic" in this dataset.
Exchange "Occupation, arable-c19fb2d9-98eb-4cd3-8761-81b71d8a9a1b land" was originally named: "Occupation; arable, as oats" in this dataset.
Exchange "Furan-2bdf9967-6dae-4183-88d1-8f612548c51e low population density" was originally named: "Furan; from residue burning; kg C, biogenic" in this dataset.
Exchange "Pentane-2bdf9967-6dae-4183-88d1-8f612548c51e low population density" was originally named: "N pentane; from residue burning; kg C, biogenic" in this dataset.
Exchange "Toluene-2bdf9967-6dae-4183-88d1-8f612548c51e low population density" was originally named: "Toluene; from residue burning; kg C, biogenic" in this dataset.
Exchange "cis-2-Butene-2bdf9967-6dae-4183-88d1-8f612548c51e low population density" was originally named: "Cis 2 butene; from residue burning; kg C, biogenic" in this dataset.
Exchange "trans-2-Butene-2bdf9967-6dae-4183-88d1-8f612548c51e low population density" was originally named: "Trans 2 butene; from residue burning; kg C, biogenic" in this dataset.
Exchange "Ethene-2bdf9967-6dae-4183-88d1-8f612548c51e low population density" was originally named: "Ethylene; from residue burning; kg C, biogenic" in this dataset.
Exchange "Transformation, from arable-c19fb2d9-98eb-4cd3-8761-81b71d8a9a1b land" was originally named: "Transformation; from arable, from unspec. use to oats" in this dataset.
Exchange "Ethyne-2bdf9967-6dae-4183-88d1-8f612548c51e low population density" was originally named: "Acetylene; from residue burning; kg C, biogenic" in this dataset.
Exchange "Acetonitrile-2bdf9967-6dae-4183-88d1-8f612548c51e low population density" was originally named: "Acetonitrile; from residue burning; kg C, biogenic" in this dataset.
Exchange "Nitrogen dioxide-2bdf9967-6dae-4183-88d1-8f612548c51e low population density" was originally named: "Nitrogen dioxide; from residue burning; kg N, biogenic" in this dataset.
Exchange "Sulfuric acid-be1c0329-f1a8-4524-8420-a86d2a8dd358 agricultural" was originally named: "Sulfuric acid; as secondary application" in this dataset.
Exchange "Acetaldehyde-2bdf9967-6dae-4183-88d1-8f612548c51e low population density" was originally named: "Acetaldehyde; from residue burning; kg C, biogenic" in this dataset.
Exchange "Isoprene-2bdf9967-6dae-4183-88d1-8f612548c51e low population density" was originally named: "Isoprene; from residue burning; kg C, biogenic" in this dataset.
Exchange "1-Butene-2bdf9967-6dae-4183-88d1-8f612548c51e low population density" was originally named: "1 butene; from residue burning; kg C, biogenic" in this dataset.
Exchange "Acrylonitrile-2bdf9967-6dae-4183-88d1-8f612548c51e low population density" was originally named: "Propenenitrile; from residue burning; kg C, biogenic" in this dataset.
Exchange "Acetone-2bdf9967-6dae-4183-88d1-8f612548c51e low population density" was originally named: "Acetone; from residue burning; kg C, biogenic" in this dataset.
Exchange "Acetic acid-2bdf9967-6dae-4183-88d1-8f612548c51e low population density" was originally named: "Acetic acid; from residue burning; kg C, biogenic" in this dataset.
Exchange "Formic acid-2bdf9967-6dae-4183-88d1-8f612548c51e low population density" was originally named: "Formic acid; from residue burning; kg C, biogenic" in this dataset.
Exchange "Phenol-2bdf9967-6dae-4183-88d1-8f612548c51e low population density" was originally named: "Phenol; from residue burning; kg C, biogenic" in this dataset.
Exchange "Butadiene-2bdf9967-6dae-4183-88d1-8f612548c51e low population density" was originally named: "1,3 butadiene; from residue burning; kg C, biogenic" in this dataset.
Exchange "Formaldehyde-2bdf9967-6dae-4183-88d1-8f612548c51e low population density" was originally named: "Formaldehyde; from residue burning; kg C, biogenic" in this dataset.
Exchange "Benzene-2bdf9967-6dae-4183-88d1-8f612548c51e low population density" was originally named: "Benzene; from residue burning; kg C, biogenic" in this dataset.
Exchange "Ethane-2bdf9967-6dae-4183-88d1-8f612548c51e low population density" was originally named: "Ethane; from residue burning; kg C, biogenic" in this dataset.
Exchange "Carbon dioxide, in air-2bdf9967-6dae-4183-88d1-8f612548c51e low population density" was originally named: "Carbon dioxide; from residue burning; kg C, biogenic" in this dataset.
Exchange "Hydrocyanic acid-2bdf9967-6dae-4183-88d1-8f612548c51e low population density" was originally named: "Hydrogen cyanide; from residue burning; kg C, biogenic" in this dataset.
Exchange "Dinitrogen monoxide-2bdf9967-6dae-4183-88d1-8f612548c51e low population density" was originally named: "Dinitrogen monoxide; from residue burning; kg N, biogenic" in this dataset.
Exchange "Transformation, to arable-c19fb2d9-98eb-4cd3-8761-81b71d8a9a1b land" was originally named: "Transformation; to arable, to oats" in this dataset.
Exchange "Phosphorus-c19fb2d9-98eb-4cd3-8761-81b71d8a9a1b unspecified" was originally named: "Phosphorous; from plant uptake; biogenic" in this dataset.
Exchange "Propene-2bdf9967-6dae-4183-88d1-8f612548c51e low population density" was originally named: "Propylene; from residue burning; kg C, biogenic" in this dataset.
Exchange "Carbon dioxide-c19fb2d9-98eb-4cd3-8761-81b71d8a9a1b unspecified" was originally named: "Carbon dioxide; from plant uptake; kg C, biogenic" in this dataset.
Exchange "Methanol-2bdf9967-6dae-4183-88d1-8f612548c51e low population density" was originally named: "Methanol; from residue burning; kg C, biogenic" in this dataset.
Exchange "Butane-2bdf9967-6dae-4183-88d1-8f612548c51e low population density" was originally named: "N butane; from residue burning; kg C, biogenic" in this dataset.
Exchange "Sulfur dioxide-2bdf9967-6dae-4183-88d1-8f612548c51e low population density" was originally named: "Sulfur dioxide; from residue burning; biogenic" in this dataset.
Exchange "Ammonia-2bdf9967-6dae-4183-88d1-8f612548c51e low population density" was originally named: "Ammonia; from residue burning; kg N, biogenic" in this dataset.
Exchange "isopentane-2bdf9967-6dae-4183-88d1-8f612548c51e low population density" was originally named: "I pentane; from residue burning; kg C, biogenic" in this dataset.

## Geography
The unit process is assumed to represent production in North Dakota (US State).

## Technology
This process produces oats; at harvest in 2005; at farm; 86%-92% moisture. The process is assumed to represent production in North Dakota (US State). Yields and related inputs and outputs represent a single year of operation, in 2005. This dataset includes consideration of residue burning; soil preparation; planting or sowing; irrigation; application, storage, and transport of fertilizers, manures, liming materials, secondary materials, and pesticides; and harvest. Fate and transport of applications are not included as described in Cooper, J.S., Kahn, E., Noon, M. (2012) LCA Digital Commons Unit Process Data: field crop production Version 1 which is available at https://www.lcacommons.gov/discovery/docs/LCA%20Digital%20Commons%20Unit%20Process%20Data%20final%20updated.pdf

## Time period
Start and end dates match the underlying data obtained from the USDA Agricultural Resource Management Survey (ARMS).
## Parameters
- p5028: 0; = p1855*p3483
- p1779: 0
- p0439: 0; = SQRT(2)*(IF((2*p0307-1)<0;-1;IF((2*p0307-1)>0;1;0))*SQRT(SQRT((2/(pi()*0.140012289)+LN(1-(2*p0307-1)^2)/2)^2-LN(1-(2*p0307-1)^2)/0.140012289)-(2/(pi()*0.140012289)+LN(1-(2*p0307-1)^2)/2)))
- p2471: 0; = p2275*p1123
- p1989: 50
- p3404: 0.00376972; = p3366*p1238
- p2801: 0; = p2410*(p1019+p1021)
- p3352: 83741.6; = if(and(p1232=0;p3256<>0);p3256*(p3275-p3347)/p3349;0)
- p3244: 0.59957; = p0791/100
- p1241: 0.40701; = if(p1232>0;0;IF(p1234+p1238+p1239+p1240=1;0;1-(p1234+p1238+p1239+p1240)))
- p0331: 0.5
- p1774: 0
- p3401: 0.000511337; = p3363*p1238
- p3168: 0; = p2387*p1082
- p1021: 0.04078; = IF(p1012=0;IF(p1014+p1019+p1020=1;0;IF(p1014+p1019+p1020+p1017>1;1-(p1014+p1019+p1020);p1017));0)
- p2139: 2.08426e-6; = p2015*p2067*p2101/(p0818*1000)
- p1138: 19633.8; = if(p1121=0;p1132*(p0716/100)*p0703*1000;0)
- p1140: 0; = if(p1121=0;p1134*p0001/(p0818*p0002);0)
- p1660: 0
- p1077: 0; = IF(p1071=0;p0715/100;0)
- p3122: 3.99105e-5; = p2341*p1082
- p1641: 0
- p1301: 0; = IF(p1297+p1300=p1265;0;IF(p1297+p1300+p1299>p1265;p1265-(p1297+p1300);p1299))
- p1721: 0
- p2623: 0; = p2427*p1073
- p3136: 0; = p2355*p1023
- p0739: 0.591; = p0079*(1+p0607*p0211/100)
- p2453: 0; = p2257*p1014
- p3735: 0; = p1798*p3477
- p2997: 0; = p2411*(p1020+p1022)
- p0344: 0.5
- p3344: 0; = if(and(p1232=0;p3254<>0);p3254-(p3339+p3340+p3341+p3342+p3343);0)
- p3069: 3.85931e-5; = p2288*p1023
- p2748: 0; = p2357*(p1019+p1021)
- p2585: 0; = p2389*p1123
- p3009: 0; = p2423*(p1079+p1081)
- p2444: 0; = p2248*p1014
- p2048: 7.52471e-14; = p2015*p2046/(p0818*1000000000000)
- p2286: 0.00118284; = p2223*p2192
- p4929: 0; = p1756*p3483
- p2292: 2.52295e-5; = p2223*p2199
- p1327: 0.0452847; = if(p1318=0;if(p1327a=0;1;if(p1327a<0;0;p1327a));0)
- p1204: 0.980791
- p3318: 0; = if(and(p1232=0;p3253<>0);p3253*(p3262-p3313)/p3316;0)
- p3250: 0.875
- p2358: 0; = p2225*p2186
- p1574: 0
- p2678: 0.00122732; = p2287*(p1019+p1021)
- p2905: 9.73947e-5; = p2319*(p1020+p1022)
- p2150: 7.53862e-7; = p2015*p2078*p2112/(p0818*1000)
- p2309: 3.01417e-5; = p2227*p2216
- p0956: 0; = if(and(p0683>0;or(p0807=56;p0807=100;and(p0807=60;p0901>0.06)));p0938;0)
- p1201: 0.65
- p3423: 0; = p3366*p1239
- p0139: 17.547
- p2528: 0.00276523; = p2332*p1014
- p0895: 1.56048e8; = p0894*p0830
- p2588: 0; = p2392*p1123
- p0481: 0; = SQRT(2)*(IF((2*p0349-1)<0;-1;IF((2*p0349-1)>0;1;0))*SQRT(SQRT((2/(pi()*0.140012289)+LN(1-(2*p0349-1)^2)/2)^2-LN(1-(2*p0349-1)^2)/0.140012289)-(2/(pi()*0.140012289)+LN(1-(2*p0349-1)^2)/2)))
- p3351: 275106; = if(and(p1232=0;p3256<>0);p3256*(p3274-p3346)/p3349;0)
- p0877: 0; = p0876*p0001*p0003/(p0818*p0002)
- p1331: 0; = p1330*p0001/(p0818*p0002)
- p1312: 0.00807972; = IF(p1307+p1310+p1311=p1266;0;p1266-(p1307+p1310+p1311))
- p2338: 0.000596257; = p2228*p2206
- p2312: 0; = p2231*p2219
- p0179: 36.539
- p2198: 2.13169e-5; = 22.98976928*p2197/14.0067
- p3364: 0.000200096; = if(p1232=0;p3244*p3358/p0818;0)
- p3195: 0; = p2414*p1082
- p1866: 0
- p1315: 0; = p1311*p1252/p0818
- p1908: 0
- p2188: 0.00332963; = p1066-p2186-p2187
- p1051: 162633; = IF(p1012=0;p1044*p1036;0)
- p0855: 2.72008; = p0854*p0001*p0003/(p0818*p0002)
- p0131: 59.957
- p1695: 0
- p1988: 750
- p2161: 6.65982e-8; = p2015*p2085*p2123/(p0818*1000)
- p3403: 0.00050013; = p3365*p1238
- p3415: 0.000334018; = p3377*p1238
- p1155: 0.00047892; = if(p1153*p0818=0;0;p1151/(p1153*p0818))
- p2666: 0; = p2275*(p1128+p1130)
- p2691: 0.000344426; = p2300*(p1078+p1080)
- p2595: 0; = p2399*p1014
- p3098: 4.63648e-6; = p2317*p1023
- p2181: 0.129115; = p0887+p0889+p0893+p2180
- p1853: 0
- p1841: 0
- p1971: 0.000472553; = p1966*p0001/(p0818*p0002)
- p0374: 0.5
- p2245: 0; = p2222*p2190
- p2824: 0; = p2238*(p1020+p1022)
- p1289: 0
- p0461: 0; = SQRT(2)*(IF((2*p0329-1)<0;-1;IF((2*p0329-1)>0;1;0))*SQRT(SQRT((2/(pi()*0.140012289)+LN(1-(2*p0329-1)^2)/2)^2-LN(1-(2*p0329-1)^2)/0.140012289)-(2/(pi()*0.140012289)+LN(1-(2*p0329-1)^2)/2)))
- p0792: 0
- p1015: 0.14996; = IF(p1012=0;p0706/100;0)
- p2091: 0.374844
- p1028: 0; = IF(p1012=0;p1022*(p0704/100)*p0703*1000;0)
- p2990: 0; = p2404*(p1020+p1022)
- p1300: 0; = IF(p1297=p1265;0;IF(p1297+p1298>p1265;p1265-p1297;p1298))
- p2928: 0; = p2342*(p1079+p1081)
- p2763: 0; = p2372*(p1019+p1021)
- p1211: 0.6
- p2502: 1.31383e-5; = p2306*p1073
- p0309: 0.5
- p0368: 0.5
- p3447: 0; = p3371*p1240
- p2919: 0.000208072; = p2333*(p1020+p1022)
- p1834: 0
- p0949: 5.65646e-5; = if(and(p0683=0;or(p0807=480;p0807=32;p0807=1;and(p0807=60;p0901<0.03)));p0937;0)
- p2225: 0; = if(p0765*p0769+p0766*p0770+p0767*p0771+p0768*p0772=0;0;p0772*p0768/(p0765*p0769+p0766*p0770+p0767*p0771+p0768*p0772))
- p1751: 0
- p3215: 0.450791; = p1222*3*15.9994/100.0869
- p1322: 0; = IF(((p0745*1000*p0749/100)+(p0754*1000*p0758/100))/p0801<0;0;((p0745*1000*p0749/100)+(p0754*1000*p0758/100))/p0801)
- p2343: 0.00375663; = p2228*p2211
- p0981: 0.000964796; = p0978*p0001/(p0818*p0002)
- p1637: 0
- p1741: 0
- p3440: 0; = p3364*p1240
- p2868: 0.000209083; = p2282*(p1020+p1022)
- p3331: 0; = if(and(p1232=0;p3255<>0);p3255*(p3268-p3326)/p3327;0)
- p3442: 0; = p3366*p1240
- p1176: 171.295; = p1175*p0801
- p0254: 32.281
- p2970: 0; = p2384*(p1079+p1081)
- p3021: 0; = p2240*p1023
- p0634: 0; = IF(p0370<0.5;-SQRT(p0007*EXP(p0502^2*p0008)-p0007);SQRT(p0007*EXP(p0502^2*p0008)-p0007))
- p2242: 0; = p2222*p2187
- p3282: 0.3
- p3163: 0; = p2382*p1082
- p2787: 0; = p2396*(p1019+p1021)
- p3262: 0.0787162
- p1283: 0; = p1277*p1252/p0818
- p1565: 0
- p2774: 0; = p2383*(p1078+p1080)
- p3941: 4.16755e-7; = p1798*p3478
- p3039: 0; = p2258*p1082
- p0045: 66.463
- p2469: 0; = p2273*p1123
- p1867: 0
- p2572: 0; = p2376*p1073
- p1963: 0.00019439; = p1963a+p1963b+p1963c+p1963d+p1963e+p1963f+p1963g+p1963h+p1963i+p1963j+p1963k
- p0937: 5.65646e-5; = p0931*p0001/(p0818*p0002)
- p0988: 0; = p0982*p0886
- p0115: 30.077
- p2519: 0.000331306; = p2323*p1014
- p3120: 0.000297387; = p2339*p1082
- p1220: 0; = IF(p1218<0.5;-SQRT(p1214*EXP(p1219^2*p1215)-p1214);SQRT(p1214*EXP(p1219^2*p1215)-p1214))
- p2261: 0; = p2226*p2207
- p2496: 0.00164547; = p2300*p1073
- p2668: 0.000271049; = p2277*(p1019+p1021)
- p0236: 11.292
- p2308: 0.000179926; = p2227*p2215
- p1128: 0; = if(p1121=0;IF(p1123=1;0;IF(p1123+p1124>1;1-p1123;p1124));0)
- p2254: 0; = p2222*p2200
- p1813: 0
- p2164: 0.00278274; = (p2015/p0818)-(p2022)-(p2035+p2036+p2052)-(p2017/p0818)-(p2039+p2041+p2044+p2158+p2159+p2160+p2161+p2162)
- p0616: 0; = IF(p0352<0.5;-SQRT(p0007*EXP(p0484^2*p0008)-p0007);SQRT(p0007*EXP(p0484^2*p0008)-p0007))
- p2008: 0.0761914; = ((p1982*p1985+p1988*p1991+p1994*p1997+p2002*p2005)/p0818)*p0005*p0002/1000
- p2187: 0.000260276; = 4*1.00794*p2186/(2*14.0067)
- p2931: 0; = p2345*(p1079+p1081)
- p1639: 0
- p0999: 0; = IF(p0996=1;0;IF(p0996+p0997>1;1-p0996;p0997))
- p0776: 21.895; = p0116*(1+p0644*p0248/100)
- p2191: 0.000271518; = 8*1.00794*p2189/(2*14.0067)
- p1013: 0; = p1012*p0001/(p0818*p0002)
- p1309: 0
- p0755: 0
- p2094: 0.922577
- p2377: 0; = p2229*p2206
- p0537: 0; = IF(p0273<0.5;-SQRT(p0007*EXP(p0405^2*p0008)-p0007);SQRT(p0007*EXP(p0405^2*p0008)-p0007))
- p3171: 0; = p2390*p1132
- p3131: 0; = p2350*p1132
- p3036: 0; = p2255*p1023
- p1940: 0
- p3266: 0.0545989
- p2886: 0; = p2300*(p1079+p1081)
- p3302: 0.00690031; = if(and(p1232=0;p3252<>0);p3258*(p3278*(p3282*p1256+p3286*(p1253+p1257)+p1258*p3288+p3297*p3287));0)
- p2044: 3.35254e-7; = p2015*p2042*p2043/(p0818*1000)
- p1065: 0.0015952; = IF(p1012=0;p1051/(p1058*p0818);0)
- p1154: 0.00320074; = if(p1152*p0818=0;0;p1150/(p1152*p0818))
- p3283: 0.3
- p0478: 0; = SQRT(2)*(IF((2*p0346-1)<0;-1;IF((2*p0346-1)>0;1;0))*SQRT(SQRT((2/(pi()*0.140012289)+LN(1-(2*p0346-1)^2)/2)^2-LN(1-(2*p0346-1)^2)/0.140012289)-(2/(pi()*0.140012289)+LN(1-(2*p0346-1)^2)/2)))
- p3468: 0; = p3373*p1241
- p2118: 0.679049
- p0177: 8.719
- p1113: 0.100377
- p1551: 0
- p2535: 0.00384786; = p2339*p1073
- p1648: 0
- p3475: 0.0525273; = p3380*p1241
- p0772: 0
- p3485: 0; = p1754*p3476
- p1786: 0
- p2734: 0.000611165; = p2343*(p1078+p1080)
- p2629: 0; = p2238*(p1019+p1021)
- p1749: 0
- p3189: 0; = p2408*p1023
- p1963b: 1.80932e-5; = p1569*p1773+p1570*p1774+p1571*p1775+p1572*p1776+p1573*p1777+p1574*p1778+p1575*p1779+p1576*p1780+p1577*p1781+p1578*p1782+p1579*p1783+p1580*p1784+p1581*p1785+p1582*p1786+p1583*p1787+p1584*p1788+p1585*p1789+p1586*p1790+p1587*p1791
- p3339: 0; = if(and(p1232=0;p3254<>0);p3254*(p3269*p3277-p3334)/p3338;0)
- p1635: 0
- p0687: 0
- p1554: 0
- p2815: 0; = p2424*(p1078+p1080)
- p2315: 0.00555206; = p2224*p2182
- p3075: 5.81928e-5; = p2294*p1023
- p3407: 0; = p3369*p1238
- p0984: 0; = if(p0886=0;0;min(1;(p0699*p0698*1000*p0701/100)/p0886))
- p2076: 0.057
- p3058: 3.97607e-5; = p2277*p1023
- p2549: 0; = p2353*p1123
- p1039: 0.050076
- p1796: 0
- p2909: 5.81479e-5; = p2323*(p1020+p1022)
- p1613: 0
- p2272: 0; = p2230*p2218
- p1052: 819444; = IF(p1012=0;p1045*p1036;0)
- p2328: 0.0116936; = p2224*p2196
- p0883: 9.64796; = p0882*p0001*p0003/(p0818*p0002)
- p1638: 0
- p1849: 0
- p0699: 0
- p0856: 490000; = p0801
- p1272: 0.0183203; = IF(p1267+p1270+p1271=p1259;0;p1259-(p1267+p1270+p1271))
- p3436: 0; = p3379*p1239
- p2844: 0; = p2258*(p1079+p1081)
- p0280: 0.5
- p0850: 0
- p2115: 0.856281
- p2552: 0; = p2356*p1014
- p0715: 0
- p1668: 0
- p2288: 0.00137931; = p2223*p2195
- p0532: 0; = SQRT(2)*(IF((2*p0400-1)<0;-1;IF((2*p0400-1)>0;1;0))*SQRT(SQRT((2/(pi()*0.140012289)+LN(1-(2*p0400-1)^2)/2)^2-LN(1-(2*p0400-1)^2)/0.140012289)-(2/(pi()*0.140012289)+LN(1-(2*p0400-1)^2)/2)))
- p1975: 0.000964796; = p1970*p0001/(p0818*p0002)
- p2244: 0; = p2222*p2189
- p1146: 0.883648
- p1087: 0; = IF(p1071=0;p1081*(p0710/100)*p0703*1000;0)
- p2673: 0.000341881; = p2282*(p1019+p1021)
- p0751: 85.774; = p0091*(1+p0619*p0223/100)
- p1604: 0
- p3105: 3.50744e-6; = p2324*p1023
- p1038: 0.00993849
- p1821: 0
- p1205: 0
- p2680: 0.00260065; = p2289*(p1019+p1021)
- p2848: 0; = p2262*(p1079+p1081)
- p2762: 0; = p2371*(p1019+p1021)
- p1190: 3.98777e-7; = p1188/p0818
- p0512: 0; = SQRT(2)*(IF((2*p0380-1)<0;-1;IF((2*p0380-1)>0;1;0))*SQRT(SQRT((2/(pi()*0.140012289)+LN(1-(2*p0380-1)^2)/2)^2-LN(1-(2*p0380-1)^2)/0.140012289)-(2/(pi()*0.140012289)+LN(1-(2*p0380-1)^2)/2)))
- p2500: 0.0012486; = p2304*p1073
- p2215: 0.000600676; = p1117-p2214
- p1960: 9.71338; = IF(p1959-p1958<0;0;p1959-p1958)
- p0367: 0.5
- p0885: 100; = IF(p0689+p0884=100;0;100-(p0689+p0884))
- p1266: 0.30605; = if(p1232>0;0;IF(p1259+p1263+p1264+p1265=1;0;1-(p1259+p1263+p1264+p1265)))
- p3444: 0; = p3368*p1240
- p0091: 85.774
- p1252: 6.95403e7; = if(p1232>0;0;p0724*2000*p0723*1000*p0725/100)
- p2459: 0; = p2263*p1073
- p0712: 16.269; = p0052*(1+p0580*p0184/100)
- p2818: 0; = p2427*(p1078+p1080)
- p1601: 0
- p1732: 0
- p3428: 0; = p3371*p1239
- p2325: 0.00101446; = p2224*p2192
- p2504: 0.000139846; = p2308*p1073
- p0896: 0.4485
- p2400: 0; = p2234*p2189
- p2206: 0.000851236; = 9*1.00794*p2204/30.973762
- p2375: 0; = p2229*p2204
- p0692: 0
- p4204: 0; = p1855*p3479
- p1014: 0.66463; = IF(p1012=0;p0705/100;0)
- p0282: 0.5
- p3998: 1.1044e-5; = p1855*p3478
- p0779: 23.931; = p0119*(1+p0647*p0251/100)
- p3384: 0; = p3365*p1234
- p2929: 0; = p2343*(p1079+p1081)
- p3349: 0.823944; = if(and(p1232=0;p3256<>0);1-(p3345+p3346+p3347+p3348);0)
- p1963c: 3.24813e-6; = p1588*p1792+p1589*p1793+p1590*p1794+p1591*p1795+p1592*p1796+p1593*p1797+p1594*p1798+p1595*p1799+p1596*p1800+p1597*p1801+p1598*p1802+p1599*p1803+p1600*p1804+p1601*p1805+p1602*p1806+p1603*p1807+p1604*p1808+p1605*p1809+p1606*p1810+p1607*p1811
- p2317: 0.000165707; = p2224*p2184
- p0576: 0; = IF(p0312<0.5;-SQRT(p0007*EXP(p0444^2*p0008)-p0007);SQRT(p0007*EXP(p0444^2*p0008)-p0007))
- p2611: 0; = p2415*p1073
- p2574: 0; = p2378*p1073
- p1828: 0
- p1817: 0
- p0668: 0; = IF(p0404<0.5;-SQRT(p0007*EXP(p0536^2*p0008)-p0007);SQRT(p0007*EXP(p0536^2*p0008)-p0007))
- p2407: 0; = p2234*p2197
- p0891: 226512; = IF(p3251=0;0;62.4*6272640/(12*12*12))
- p0743: 0
- p2257: 0; = p2222*p2203
- p1909: 0
- p5161: 9.50212e-7; = p1782*p3484
- p1053: 427418; = IF(p1012=0;p1046*p1036;0)
- p2670: 0.000126939; = p2279*(p1019+p1021)
- p1390: 2
- p2135: 6.0641e-6; = p2015*p2063*p2097/(p0818*1000)
- p2371: 0; = p2225*p2200
- p2124: 0.263965
- p2613: 0; = p2417*p1073
- p3377: 0.000563277; = if(p1232=0;p3246*p3359/p0818;0)
- p2004: 30
- p3063: 5.01511e-5; = p2282*p1023
- p1073: 0.77724; = IF(p1071=0;p0711/100;0)
- p2872: 0.000137978; = p2286*(p1020+p1022)
- p1927: 0
- p1003: 0; = p0999*p0888
- p3066: 4.08962e-6; = p2285*p1023
- p1862: 0
- p1806: 0
- p2625: 0.00108623; = p2429*p1123
- p1772: 0
- p2562: 0; = p2366*p1014
- p0834: 0.00059
- p2015: 3.4096e6; = p0830*p2011*p2013
- p3268: 0.0232481
- p2380: 0; = p2229*p2209
- p0993: 0; = p0989*p0001*p0004/(p0818*p0002)
- p3437: 0; = p3380*p1239
- p0284: 0.5
- p3272: 0.0398246
- p3924: 6.25132e-7; = p1781*p3478
- p3221: 0.146975; = IF(p3216=0;0;p1223*12.0107/100.0869+(1-p1224)*12.0107/84.3139)
- p0670: 0
- p2769: 0; = p2378*(p1078+p1080)
- p1959: 165.713; = if(p0738*p0740*p0739>0;p0738*1000*(p0740/100)*p0739/1000;p1958)
- p2569: 0; = p2373*p1014
- p1285: 0; = p1281*p1252/p0818
- p2927: 0; = p2341*(p1079+p1081)
- p1240: 0; = if(p1232>0;0;IF(p1234+p1238+p1239=1;0;IF(p1234+p1238+p1239+p1237>1;1-(p1234+p1238+p1239);p1237)))
- p1983: 50
- p3308: 67479.4; = if(and(p1232=0;p3252<>0);p3252*(p3259-p3303)/p3305;0)
- p1141: 0; = if(p1121=0;p1135*p0001/(p0818*p0002);0)
- p3347: 0.00107264; = if(and(p1232=0;p3256<>0);p3275*p3289;0)
- p1207: 76.7106; = if(p1193>0;0;(p1194*p1050/p1057+p1195*p1051/p1058+p1196*p1052/p1059+p1197*p1053/p1060+p1198*p1054/p1061+p1199*p1055/p1062+p1200*p1056/p1063)/(p0702*1000)+(p1201*p1109/p1114+p1202*p1110/p1115)/(p0702*1000)+p1203*p1170/p0801+p1204*p1176/p0801)
- p2030: 8.5
- p0793: 0
- p1281: 0; = IF(p1277+p1280=p1263;0;IF(p1277+p1280+p1279>p1263;p1263-(p1277+p1280);p1279))
- p3236: 0.0140975
- p1818: 0
- p1963j: 0; = p1725*p1929+p1726*p1930+p1727*p1931+p1728*p1932+p1729*p1933+p1730*p1934+p1731*p1935+p1732*p1936+p1733*p1937+p1734*p1938+p1735*p1939+p1736*p1940+p1737*p1941+p1738*p1942+p1739*p1943+p1740*p1944+p1741*p1945+p1742*p1946+p1743*p1947
- p2838: 0; = p2252*(p1020+p1022)
- p4616: 0.000100327; = p1855*p3481
- p1585: 0
- p1838: 0
- p2085: 0.0335294
- p3483: 0; = if(p1328+p1330+p1332+p1334+p1336+p1338+p1340+p1342+p1344=0;0;p1342/(p1328+p1330+p1332+p1334+p1336+p1338+p1340+p1342+p1344))
- p1572: 0
- p2258: 0; = p2226*p2204
- p0239: 14.177
- p1291: 0; = IF(p1287+p1290=p1264;0;IF(p1287+p1290+p1289>p1264;p1264-(p1287+p1290);p1289))
- p2479: 0.000337487; = p2283*p1014
- p3220: 0.00131218; = p3216*p1228
- p1825: 0
- p2842: 0; = p2256*(p1020+p1022)
- p2398: 0; = p2234*p2187
- p2558: 0; = p2362*p1014
- p3449: 0; = p3373*p1240
- p1615: 0
- p1669: 0
- p4017: 1.66702e-6; = p1874*p3478
- p2070: 0.282
- p2289: 0.0136345; = p2223*p2196
- p2696: 2.62994e-7; = p2305*(p1078+p1080)
- p1690: 0
- p1275: 0; = p1271*p1252/p0818
- p1980: 3521.6
- p2879: 0.000565886; = p2293*(p1020+p1022)
- p2638: 0; = p2247*(p1019+p1021)
- p3224: 0.501945; = IF(p3216=0;0;1-p3221-p3222-p3223)
- p3203: 0; = p2422*p1082
- p0785: 0
- p2706: 0.001059; = p2315*(p1019+p1021)
- p1018: 0; = IF(p1012=0;p0709/100;0)
- p2546: 0; = p2350*p1123
- p0440: 0; = SQRT(2)*(IF((2*p0308-1)<0;-1;IF((2*p0308-1)>0;1;0))*SQRT(SQRT((2/(pi()*0.140012289)+LN(1-(2*p0308-1)^2)/2)^2-LN(1-(2*p0308-1)^2)/0.140012289)-(2/(pi()*0.140012289)+LN(1-(2*p0308-1)^2)/2)))
- p1776: 0
- p3132: 0; = p2351*p1132
- p3054: 0; = p2273*p1132
- p1929: 0
- p0673: 0
- p2684: 0.000925307; = p2293*(p1019+p1021)
- p1826: 0
- p1024: 224999; = IF(p1012=0;p1014*(p0704/100)*p0703*1000;0)
- p2235: 0; = 1-(p2226+p2227+p2228+p2229)
- p0183: 9.788
- p3387: 0; = p3368*p1234
- p2147: 4.47825e-7; = p2015*p2075*p2109/(p0818*1000)
- p4513: 0; = p1962*p3480
- p1595: 0
- p3086: 9.71051e-8; = p2305*p1082
- p1843: 0
- p1767: 0
- p0195: 0
- p1934: 0
- p2911: 0.000118336; = p2325*(p1020+p1022)
- p3115: 7.18298e-6; = p2334*p1023
- p2410: 0; = p2234*p2200
- p1292: 0; = IF(p1287+p1290+p1291=p1261;0;p1261-(p1287+p1290+p1291))
- p2173: 0.153251; = p0895*p0898/p0818
- p1242: 0; = if(p1232>0;0;p1234*(p0725/100)*p0723*1000)
- p0808: 0
- p0534: 0; = SQRT(2)*(IF((2*p0402-1)<0;-1;IF((2*p0402-1)>0;1;0))*SQRT(SQRT((2/(pi()*0.140012289)+LN(1-(2*p0402-1)^2)/2)^2-LN(1-(2*p0402-1)^2)/0.140012289)-(2/(pi()*0.140012289)+LN(1-(2*p0402-1)^2)/2)))
- p1777: 0
- p0447: 0; = SQRT(2)*(IF((2*p0315-1)<0;-1;IF((2*p0315-1)>0;1;0))*SQRT(SQRT((2/(pi()*0.140012289)+LN(1-(2*p0315-1)^2)/2)^2-LN(1-(2*p0315-1)^2)/0.140012289)-(2/(pi()*0.140012289)+LN(1-(2*p0315-1)^2)/2)))
- p2087: 0.856281
- p3015: 0; = p2429*(p1129+p1131)
- p1104: 0.398071; = IF(p1071=0;IF(p1096+p1101+p1102+p1103=1;0;1-(p1096+p1101+p1102+p1103));0)
- p0763: 489.004; = p0103*(1+p0631*p0235/100)
- p2256: 0; = p2222*p2202
- p0252: 10.076
- p1600: 0
- p2162: 1.22681e-7; = p2015*p2086*p2124/(p0818*1000)
- p0664: 0; = IF(p0400<0.5;-SQRT(p0007*EXP(p0532^2*p0008)-p0007);SQRT(p0007*EXP(p0532^2*p0008)-p0007))
- p1973: 0; = if(p0807=480;p1968*p0001/(p0818*p0002);0)
- p3693: 0; = p1756*p3477
- p2365: 0; = p2225*p2193
- p2131: 1.96693e-6; = p2015*p2059*p2093/(p0818*1000)
- p2260: 0; = p2226*p2206
- p2171: 0.0864785; = p2165*p0831
- p1809: 0
- p2373: 0; = p2225*p2202
- p0832: 7.36624e7; = p0831*p0830/(1-p0831)
- p2458: 0; = p2262*p1073
- p1808: 0
- p0865: 0; = IF(p0858+p0864=1;0;IF(p0858+p0864+p0860>1;1-(p0858+p0864);p0860))
- p3068: 0.000180037; = p2287*p1023
- p1586: 0
- p0886: 0; = p0686*1000*p0687*p0689/100
- p0835: 903.139; = -LN(1-p0669/100)/p0834
- p3111: 2.7537e-7; = p2330*p1023
- p0759: 0
- p1653: 0
- p2516: 7.98655e-5; = p2320*p1014
- p0851: 0
- p0604: 0; = IF(p0340<0.5;-SQRT(p0007*EXP(p0472^2*p0008)-p0007);SQRT(p0007*EXP(p0472^2*p0008)-p0007))
- p0260: 49.206
- p0847: 0
- p0675: 0
- p3256: 3.38558e6; = p1252*(p1307*(1-p3247)+p1310*(1-p3248)+p1311*(1-p3249)+p1312*(1-p3250))
- p1916: 0
- p2554: 0; = p2358*p1014
- p1684: 0
- p0671: 0
- p1876: 0
- p3246: 0.40043; = IF(p3244+p3245=1;0;1-(p3244+p3245))
- p3186: 0; = p2405*p1023
- p0709: 0
- p0943: 0; = if(and(p0683=0;p0949=0);p0937;0)
- p2386: 0; = p2229*p2215
- p2938: 0; = p2352*(p1129+p1131)
- p2043: 0.636483
- p0048: 4.078
- p3156: 0; = p2375*p1082
- p0506: 0; = SQRT(2)*(IF((2*p0374-1)<0;-1;IF((2*p0374-1)>0;1;0))*SQRT(SQRT((2/(pi()*0.140012289)+LN(1-(2*p0374-1)^2)/2)^2-LN(1-(2*p0374-1)^2)/0.140012289)-(2/(pi()*0.140012289)+LN(1-(2*p0374-1)^2)/2)))
- p2861: 0; = p2275*(p1129+p1131)
- p2072: 0.134
- p2644: 0; = p2253*(p1019+p1021)
- p1019: 0.14996; = IF(p1012=0;IF(p1014=1;0;IF(p1014+p1015>1;1-p1014;p1015));0)
- p2538: 0.000222964; = p2342*p1073
- p2580: 0; = p2384*p1073
- p2717: 0.0010526; = p2326*(p1019+p1021)
- p3476: 0; = if(p1328+p1330+p1332+p1334+p1336+p1338+p1340+p1342+p1344=0;0;p1328/(p1328+p1330+p1332+p1334+p1336+p1338+p1340+p1342+p1344))
- p1742: 0
- p1163: 0.00468806
- p2110: 0.856281
- p2600: 0; = p2404*p1014
- p2587: 0; = p2391*p1123
- p1991: 1.33153e7; = (if(p1111=0;0;p1106/p1111)+if(p1112=0;0;p1107/p1112)+if(p1113=0;0;p1108/p1113)+if(p1114=0;0;p1109/p1114)+if(p1115=0;0;p1110/p1115))*(1+p1157)
- p2268: 0; = p2226*p2214
- p2635: 0; = p2244*(p1019+p1021)
- p1733: 0
- p1599: 0
- p2149: 2.7706e-7; = p2015*p2077*p2111/(p0818*1000)
- p2061: 0.518824
- p0110: 48.961
- p2637: 0; = p2246*(p1019+p1021)
- p1581: 0
- p2058: 1.24412
- p0571: 0; = IF(p0307<0.5;-SQRT(p0007*EXP(p0439^2*p0008)-p0007);SQRT(p0007*EXP(p0439^2*p0008)-p0007))
- p3445: 0; = p3369*p1240
- p1254: 0.9736; = if(p1232>0;0;p0736/100)
- p0570: 0; = IF(p0306<0.5;-SQRT(p0007*EXP(p0438^2*p0008)-p0007);SQRT(p0007*EXP(p0438^2*p0008)-p0007))
- p1736: 0
- p2923: 0; = p2337*(p1079+p1081)
- p3811: 0; = p1874*p3477
- p1952: 0
- p1692: 0
- p3264: 0.0887032
- p0507: 0; = SQRT(2)*(IF((2*p0375-1)<0;-1;IF((2*p0375-1)>0;1;0))*SQRT(SQRT((2/(pi()*0.140012289)+LN(1-(2*p0375-1)^2)/2)^2-LN(1-(2*p0375-1)^2)/0.140012289)-(2/(pi()*0.140012289)+LN(1-(2*p0375-1)^2)/2)))
- p1999: 1.04898e7; = (p1228+p1229)*p0818+p1164
- p2411: 0; = p2234*p2201
- p0951: 1.95913e-6; = if(and(p0683=0;or(p0807=480;p0807=32;p0807=1;and(p0807=60;p0901<0.03)));p0939;0)
- p3174: 0; = p2393*p1023
- p4971: 0; = p1798*p3483
- p1925: 0
- p2280: 0.000973517; = p2223*p2186
- p3194: 0; = p2413*p1023
- p0998: 0; = if(p0888=0;0;if((p0699*p0698*1000*p0700/100)/p0888>1;1;(p0699*p0698*1000*p0700/100)/p0888))
- p2035: 2.47794e-5; = p2015*p2029*(1-p2031)/(p0818*1000)
- p2570: 0; = p2374*p1014
- p2439: 0; = p2243*p1014
- p1094: 2.69274e-5; = IF(p1071=0;p1088*p0001/(p0818*p0002);0)
- p2339: 0.00495068; = p2228*p2207
- p2307: 4.76792e-5; = p2227*p2214
- p1914: 0
- p0689: 0
- p2436: 0; = p2240*p1014
- p2402: 0; = p2234*p2191
- p0950: 0; = if(and(p0683=0;or(p0807=480;p0807=32;p0807=1;and(p0807=60;p0901<0.03)));p0938;0)
- p1236: 0; = if(p1232>0;0;p0728/100)
- p0632: 0; = IF(p0368<0.5;-SQRT(p0007*EXP(p0500^2*p0008)-p0007);SQRT(p0007*EXP(p0500^2*p0008)-p0007))
- p1184: 1.41162e-7; = p1182/p0818
- p0220: 42.483
- p1568: 0
- p1854: 0
- p2025: 1.58868e-5; = p2015*p2023*p2024/(p0818*1000)
- p2159: 1.34476e-5; = p2015*p2083*p2121/(p0818*1000)
- p3314: 0; = if(and(p1232=0;p3253<>0);p3263*p3289;0)
- p0064: 1.101
- p1005: 0; = p1001*p0888
- p1875: 8.82768e-5; = p1467*1000/p0818
- p1001: 0; = if(p0978>0;0;if(and(p0687=0;p0691=0;p0695=0;p0699=0);0;IF(p0996+p0999+p1000=1;0;1-(p0996+p0999+p1000))))
- p1328: 0; = p1319*p0801
- p2603: 0; = p2407*p1014
- p2435: 0; = p2239*p1014
- p0442: 0; = SQRT(2)*(IF((2*p0310-1)<0;-1;IF((2*p0310-1)>0;1;0))*SQRT(SQRT((2/(pi()*0.140012289)+LN(1-(2*p0310-1)^2)/2)^2-LN(1-(2*p0310-1)^2)/0.140012289)-(2/(pi()*0.140012289)+LN(1-(2*p0310-1)^2)/2)))
- p2415: 0; = p2235*p2205
- p0267: 11.171
- p0079: 0.591
- p2346: 0.000111496; = p2228*p2214
- p2218: 0.00132855; = p1150/p0818
- p1905: 0
- p2220: 0.000174933; = p1151/p0818
- p2269: 0; = p2226*p2215
- p2492: 0.00228073; = p2296*p1014
- p3395: 0; = p3376*p1234
- p2276: 0.00647362; = p2223*p2182
- p0592: 0; = IF(p0328<0.5;-SQRT(p0007*EXP(p0460^2*p0008)-p0007);SQRT(p0007*EXP(p0460^2*p0008)-p0007))
- p3359: 637395; = if(p1232=0;p3309+p3320+p3331+p3342+p3353;0)
- p1987: 400
- p2895: 0; = p2309*(p1079+p1081)
- p2001: 400
- p2984: 0; = p2398*(p1020+p1022)
- p1327a: 0.0452847; = (p0745*1000/p0801)*(1-(p0746+p0747+p0748+p0749+p0750+p0751+p0752+p0753)/100)+(p0754*1000/p0801)*(1-(p0755+p0756+p0757+p0758+p0759+p0760+p0761+p0762)/100)
- p2885: 0; = p2299*(p1079+p1081)
- p0214: 13.511
- p2475: 0.000442316; = p2279*p1014
- p3394: 0; = p3375*p1234
- p4410: 0; = p1855*p3480
- p2074: 0.025
- p0635: 0; = IF(p0371<0.5;-SQRT(p0007*EXP(p0503^2*p0008)-p0007);SQRT(p0007*EXP(p0503^2*p0008)-p0007))
- p1282: 0; = IF(p1277+p1280+p1281=p1260;0;p1260-(p1277+p1280+p1281))
- p0575: 0; = IF(p0311<0.5;-SQRT(p0007*EXP(p0443^2*p0008)-p0007);SQRT(p0007*EXP(p0443^2*p0008)-p0007))
- p3172: 0; = p2391*p1132
- p3198: 0; = p2417*p1082
- p2319: 0.000834931; = p2224*p2186
- p0987: 0; = if(p0978>0;0;if(and(p0687=0;p0691=0;p0695=0;p0699=0);0;IF(p0982+p0985+p0986=1;0;1-(p0982+p0985+p0986))))
- p2431: 0.000303987; = p2236*p2221
- p0844: 0.28772
- p2422: 0; = p2235*p2212
- p1646: 0
- p3187: 0; = p2406*p1023
- p2737: 1.81392e-5; = p2346*(p1078+p1080)
- p2708: 3.1607e-5; = p2317*(p1019+p1021)
- p2203: 0.00637466; = p1070-p2200-p2201-p2202
- p1466: 8
- p0986: 0; = IF(p0982+p0985=1;0;IF(p0982+p0985+p0984>1;1-(p0982+p0985);p0984))
- p1608: 0
- p1256: 0.9736; = if(p1232>0;0;IF(p1253=1;0;IF(p1253+p1254>1;1-p1253;p1254)))
- p2081: 0.0019
- p0762: 0
- p2915: 6.99446e-7; = p2329*(p1020+p1022)
- p3072: 3.21077e-7; = p2291*p1023
- p1199: -0.29
- p1023: 0.02798; = IF(p1012=0;IF(p1014+p1019+p1020+p1021+p1022=1;0;1-(p1014+p1019+p1020+p1021+p1022));0)
- p0680: 109.115; = p0020*(1+p0548*p0152/100)
- p1231: 0.0115726; = IF(p1221=0;0;p1230*(p1228+p1229))
- p2874: 0.000160897; = p2288*(p1020+p1022)
- p1162: 0.00108139; = p1161/p0818
- p1621: 0
- p2887: 0; = p2301*(p1079+p1081)
- p0985: 0; = IF(p0982=1;0;IF(p0982+p0983>1;1-p0982;p0983))
- p3137: 0; = p2356*p1023
- p2934: 0; = p2348*(p1079+p1081)
- p0593: 0; = IF(p0329<0.5;-SQRT(p0007*EXP(p0461^2*p0008)-p0007);SQRT(p0007*EXP(p0461^2*p0008)-p0007))
- p0412: 0; = SQRT(2)*(IF((2*p0280-1)<0;-1;IF((2*p0280-1)>0;1;0))*SQRT(SQRT((2/(pi()*0.140012289)+LN(1-(2*p0280-1)^2)/2)^2-LN(1-(2*p0280-1)^2)/0.140012289)-(2/(pi()*0.140012289)+LN(1-(2*p0280-1)^2)/2)))
- p0731: 0
- p0769: 0
- p0802: 240000
- p1556: 0
- p1631: 0
- p2743: 0; = p2352*(p1128+p1130)
- p1715: 0
- p1132: 0.41981; = if(p1121=0;IF(p1123+p1128+p1129+p1130+p1131=1;0;1-(p1123+p1128+p1129+p1130+p1131));0)
- p0817: 0
- p2476: 0.000647028; = p2280*p1014
- p3310: 3.41095e6; = if(and(p1232=0;p3252<>0);IF((p3306+p3307+p3308+p3309)+(p3252*(p3257*(1-p3277))/p3305)>p3252;p3252-(p3306+p3307+p3308+p3309);p3252*(p3257*(1-p3277))/p3305);0)
- p3340: 0; = if(and(p1232=0;p3254<>0);p3254*(p3270-p3335)/p3338;0)
- p1276: 0.00281161; = p1272*p1252/p0818
- p1270: 0.67563; = IF(p1267=p1259;0;IF(p1267+p1268>p1259;p1259-p1267;p1268))
- p2121: 0.822447
- p2016: 0.000888009; = (p2014-p2015)/(p0818)
- p2323: 0.000498482; = p2224*p2190
- p0678: 149.359; = p0018*(1+p0546*p0150/100)
- p0833: 6.97854e8; = p0830+p0832
- p0189: 33.19
- p2645: 0; = p2254*(p1019+p1021)
- p3464: 0; = p3369*p1241
- p3409: 0; = p3371*p1238
- p4102: 1.83543e-5; = p1963*p3478
- p1657: 0
- p1656: 0
- p0783: 0
- p2901: 0.000647648; = p2315*(p1020+p1022)
- p3249: 0
- p0766: 51.217; = p0106*(1+p0634*p0238/100)
- p4147: 0; = p1798*p3479
- p3165: 0; = p2384*p1082
- p2127: 1.68398e-5; = p2015*p2055*p2089/(p0818*1000)
- p2322: 0.000435496; = p2224*p2189
- p2765: 0; = p2374*(p1019+p1021)
- p2177: 0.179536; = p0895/p0818-(p2173+p2174+p2175+p2176)
- p0866: 0; = IF(p0858+p0864+p0865=1;0;IF(p0858+p0864+p0865+p0861>1;1-(p0858+p0864+p0865);p0861))
- p0693: 0
- p2583: 0; = p2387*p1073
- p2799: 0; = p2408*(p1019+p1021)
- p3315: 0; = if(and(p1232=0;p3253<>0);p3264*p3289;0)
- p0767: 25.987; = p0107*(1+p0635*p0239/100)
- p3718: 0; = p1781*p3477
- p2153: 1.22422e-8; = p2015*p2081*p2115/(p0818*1000)
- p2134: 1.37833e-5; = p2015*p2062*p2096/(p0818*1000)
- p2480: 0.000386298; = p2284*p1014
- p2069: 0.190588
- p4543: 1.70367e-5; = p1782*p3481
- p1192: 1.99389e-7; = p1188*p1191/p0818
- p2821: 0; = p2430*(p1128+p1130)
- p1313: 0; = p1307*p1252/p0818
- p2374: 0; = p2225*p2203
- p0644: 0; = IF(p0380<0.5;-SQRT(p0007*EXP(p0512^2*p0008)-p0007);SQRT(p0007*EXP(p0512^2*p0008)-p0007))
- p0085: 463.827
- p2910: 1.46227e-5; = p2324*(p1020+p1022)
- p3232: 1.41162e-7; = p1182/p0818
- p1594: 0.735896
- p1149: 0.830148
- p2555: 0; = p2359*p1014
- p1092: 0; = IF(p1071=0;p1086*p0001/(p0818*p0002);0)
- p2992: 0; = p2406*(p1020+p1022)
- p2922: 0; = p2336*(p1079+p1081)
- p0903: 0.0148897
- p0320: 0.5
- p1998: 254
- p1994: 750
- p2465: 0; = p2269*p1073
- p2876: 8.15544e-7; = p2290*(p1020+p1022)
- p1950: 0
- p3471: 5.43914e-5; = p3376*p1241
- p2999: 0; = p2413*(p1020+p1022)
- p3074: 0.000135735; = p2293*p1023
- p3382: 0; = p3363*p1234
- p1008: 0; = p1004*p0001*p0004/(p0818*p0002)
- p1686: 0
- p1083: 176951; = IF(p1071=0;p1073*(p0710/100)*p0703*1000;0)
- p0849: 0
- p2378: 0; = p2229*p2207
- p3393: 0; = p3374*p1234
- p3328: 0; = if(and(p1232=0;p3255<>0);p3255*(p3265*p3277-p3323)/p3327;0)
- p3233: 0.60394
- p2987: 0; = p2401*(p1020+p1022)
- p2419: 0; = p2235*p2209
- p2285: 0.000146162; = p2223*p2191
- p1592: 0
- p2264: 0; = p2226*p2210
- p0774: 0
- p1195: 0.45
- p2379: 0; = p2229*p2208
- p2581: 0; = p2385*p1073
- p1085: 0; = IF(p1071=0;p1079*(p0710/100)*p0703*1000;0)
- p2682: 2.18878e-6; = p2291*(p1019+p1021)
- p1922: 0
- p2809: 0; = p2418*(p1078+p1080)
- p2548: 0; = p2352*p1123
- p4841: 0; = p1874*p3482
- p2551: 0; = p2355*p1014
- p1126: 0; = if(p1121=0;p0720/100;0)
- p2599: 0; = p2403*p1014
- p2017: 1.51727e6; = p2015*p0898
- p2802: 0; = p2411*(p1019+p1021)
- p1928: 0
- p3298: 0; = if(p1283+p1284+p1285+p1286=0;0;p1283/(p1283+p1284+p1285+p1286))
- p3358: 151221; = if(p1232=0;p3308+p3319+p3330+p3341+p3352;0)
- p2655: 0; = p2264*(p1078+p1080)
- p2318: 0.000570769; = p2224*p2185
- p3223: 0.126838; = IF(p3216=0;0;(1-p1223)*24.3050/84.3139)
- p2199: 4.68674e-5; = p1069-p2197-p2198
- p3304: 0.0017178; = if(and(p1232=0;p3252<>0);p3260*p3289;0)
- p3020: 0; = p2239*p1023
- p1096: 0.0010242
- p2713: 8.30664e-5; = p2322*(p1019+p1021)
- p0052: 16.269
- p3070: 0.000381494; = p2289*p1023
- p2279: 0.000665508; = p2223*p2185
- p0662: 0; = IF(p0398<0.5;-SQRT(p0007*EXP(p0530^2*p0008)-p0007);SQRT(p0007*EXP(p0530^2*p0008)-p0007))
- p0690: 0
- p3432: 0; = p3375*p1239
- p3897: 4.16755e-7; = p1754*p3478
- p3338: 0; = if(and(p1232=0;p3254<>0);1-(p3334+p3335+p3336+p3337);0)
- p0007: 14; = p0006-1
- p1057: 0.82
- p0530: 0; = SQRT(2)*(IF((2*p0398-1)<0;-1;IF((2*p0398-1)>0;1;0))*SQRT(SQRT((2/(pi()*0.140012289)+LN(1-(2*p0398-1)^2)/2)^2-LN(1-(2*p0398-1)^2)/0.140012289)-(2/(pi()*0.140012289)+LN(1-(2*p0398-1)^2)/2)))
- p2618: 0; = p2422*p1073
- p1724: 0
- p3088: 2.86409e-6; = p2307*p1082
- p1056: 4.08338e6; = IF(p1012=0;p1049*p1036;0)
- p0893: 0.129115; = 1000*(p0890+p0892)*p0001*p0003*p0004/(p0818*p0002)
- p2598: 0; = p2402*p1014
- p3385: 0; = p3366*p1234
- p3046: 0; = p2265*p1082
- p0757: 0
- p1153: 0.365265
- p3261: 0.908439
- p1308: 0.29797
- p2751: 0; = p2360*(p1019+p1021)
- p2811: 0; = p2420*(p1078+p1080)
- p1562: 0
- p3292: 0.258
- p0076: 97.36
- p1564: 0
- p2648: 0; = p2257*(p1019+p1021)
- p0889: 0; = 1000*p0888*p0001*p0003*p0004/(p0818*p0002)
- p2926: 0; = p2340*(p1079+p1081)
- p0860: 0; = p0672*1000/p0856
- p0546: 0; = IF(p0282<0.5;-SQRT(p0007*EXP(p0414^2*p0008)-p0007);SQRT(p0007*EXP(p0414^2*p0008)-p0007))
- p1935: 0
- p2563: 0; = p2367*p1014
- p2559: 0; = p2363*p1014
- p0750: 0
- p0924: 0.411843; = IF(p0918+p0923=1;0;IF(p0918+p0923+p0920>1;1-(p0918+p0923);p0920))
- p3138: 0; = p2357*p1023
- p0154: 0
- p0208: 2.325
- p0175: 0
- p1171: 0.000964796; = p0801*p0001/(p0818*p0002)
- p1864: 0
- p3441: 0; = p3365*p1240
- p1924: 0
- p2540: 2.93811e-6; = p2344*p1073
- p3336: 0; = IF(or(p3254=0;p1232>0);0;p3271*p3289)
- p1650: 0
- p0119: 23.931
- p2829: 0; = p2243*(p1020+p1022)
- p2628: 0; = p2237*(p1019+p1021)
- p2526: 6.54106e-6; = p2330*p1014
- p1120: 0.00881865; = IF(p1071=0;p1110/(p1115*p0818);0)
- p2896: 0; = p2310*(p1079+p1081)
- p1075: 0; = IF(p1071=0;p0713/100;0)
- p1576: 0
- p1863: 0
- p0745: 463.827; = p0085*(1+p0613*p0217/100)
- p2903: 1.93297e-5; = p2317*(p1020+p1022)
- p3381: 0; = p3362*p1234
- p2247: 0; = p2222*p2192
- p2715: 2.39103e-5; = p2324*(p1019+p1021)
- p0788: 40.943; = p0128*(1+p0656*p0260/100)
- p0944: 0; = if(and(p0683=0;p0950=0);p0938;0)
- p0721: 0
- p3192: 0; = p2411*p1023
- p0753: 0
- p1219: 0; = if(p1218=0;0;SQRT(2)*(IF((2*p1218-1)<0;-1;IF((2*p1218-1)>0;1;0))*SQRT(SQRT((2/(pi()*0.140012289)+LN(1-(2*p1218-1)^2)/2)^2-LN(1-(2*p1218-1)^2)/0.140012289)-(2/(pi()*0.140012289)+LN(1-(2*p1218-1)^2)/2))))
- p2727: 0.000331216; = p2336*(p1078+p1080)
- p3479: 0; = if(p1328+p1330+p1332+p1334+p1336+p1338+p1340+p1342+p1344=0;0;p1334/(p1328+p1330+p1332+p1334+p1336+p1338+p1340+p1342+p1344))
- p1198: 0.44
- p2158: 1.11262e-6; = p2015*p2082*p2120/(p0818*1000)
- p1200: 0.84
- p2236: 1; = 1-(p2230+p2231+p2232+p2233)
- p0106: 51.217
- p1831: 0
- p1117: 0.000759851; = IF(p1071=0;p1107/(p1112*p0818);0)
- p0399: 0.5
- p3480: 0; = if(p1328+p1330+p1332+p1334+p1336+p1338+p1340+p1342+p1344=0;0;p1336/(p1328+p1330+p1332+p1334+p1336+p1338+p1340+p1342+p1344))
- p2694: 1.99577e-5; = p2303*(p1078+p1080)
- p1993: 400
- p2764: 0; = p2373*(p1019+p1021)
- p4542: 5.67889e-6; = p1781*p3481
- p0777: 0
- p2427: 0; = p2235*p2217
- p0977: 0; = IF(p0687=0;IF(OR(p0686=0;p0688=0);0;p0686*1000*p0688/100);0)
- p2190: 0.0010797; = 32.065*p2189/(2*14.0067)
- p3191: 0; = p2410*p1023
- p2702: 0; = p2311*(p1128+p1130)
- p3038: 0; = p2257*p1023
- p2943: 0; = p2357*(p1020+p1022)
- p3257: 0.849747
- p1340: 0; = p1325*p0801
- p1311: 0; = IF(p1307+p1310=p1266;0;IF(p1307+p1310+p1309>p1266;p1266-(p1307+p1310);p1309))
- p2354: 0; = p2225*p2182
- p1244: 0; = if(p1232>0;0;p1239*(p0725/100)*p0723*1000)
- p1293: 0; = p1287*p1252/p0818
- p1837: 0
- p2849: 0; = p2263*(p1079+p1081)
- p2752: 0; = p2361*(p1019+p1021)
- p2447: 0; = p2251*p1014
- p4131: 0; = p1782*p3479
- p2490: 0.0013823; = p2294*p1014
- p0862: 0; = p0674*1000/p0856
- p0748: 9.442; = p0088*(1+p0616*p0220/100)
- p0080: 57.34
- p1775: 0
- p1255: 0; = if(p1232>0;0;p0737/100)
- p1142: 0; = if(p1121=0;p1136*p0001/(p0818*p0002);0)
- p1896: 0
- p3457: 0.00218057; = p3362*p1241
- p2287: 0.0064345; = p2223*p2193
- p2064: 0.676706
- p2686: 5.70942e-5; = p2295*(p1019+p1021)
- p2103: 0.912485
- p2034: 2.87108e-5; = p2015*p2030*p2032/(p0818*1000)
- p2679: 0.00026309; = p2288*(p1019+p1021)
- p1965: 0.000377248; = p1963+p1959*p1964*1000/p0818
- p0484: 0; = SQRT(2)*(IF((2*p0352-1)<0;-1;IF((2*p0352-1)>0;1;0))*SQRT(SQRT((2/(pi()*0.140012289)+LN(1-(2*p0352-1)^2)/2)^2-LN(1-(2*p0352-1)^2)/0.140012289)-(2/(pi()*0.140012289)+LN(1-(2*p0352-1)^2)/2)))
- p0720: 0
- p1917: 0
- p0460: 0; = SQRT(2)*(IF((2*p0328-1)<0;-1;IF((2*p0328-1)>0;1;0))*SQRT(SQRT((2/(pi()*0.140012289)+LN(1-(2*p0328-1)^2)/2)^2-LN(1-(2*p0328-1)^2)/0.140012289)-(2/(pi()*0.140012289)+LN(1-(2*p0328-1)^2)/2)))
- p2329: 5.99611e-6; = p2224*p2197
- p1958: 156
- p3108: 3.30991e-5; = p2327*p1023
- p1894: 0
- p2080: 0.025
- p1844: 0
- p3279: 0.37
- p1337: 0; = p1336*p0001/(p0818*p0002)
- p1699: 0
- p2293: 0.00485114; = p2223*p2200
- p2021: 0.000195053; = p2020/p0818
- p0804: 0
- p2607: 0; = p2411*p1014
- p3030: 0; = p2249*p1023
- p2324: 0.000125355; = p2224*p2191
- p0857: 9.64796; = p0856*p0001*p0003/(p0818*p0002)
- p2097: 0.40001
- p2036: 3.52493e-5; = p2015*p2030*(1-p2032)/(p0818*1000)
- p1059: 0.335
- p1645: 0
- p3035: 0; = p2254*p1023
- p1944: 0
- p1945: 0
- p4130: 0; = p1781*p3479
- p1217: 0
- p1320: 0; = IF(((p0745*1000*p0747/100)+(p0754*1000*p0756/100))/p0801<0;0;((p0745*1000*p0747/100)+(p0754*1000*p0756/100))/p0801)
- p1250: 0; = if(p1232>0;0;p1245*p0001/(p0818*p0002))
- p0806: 1.416e7
- p0370: 0.5
- p0088: 9.442
- p2100: 0.705744
- p2095: 0.765734
- p4954: 0; = p1781*p3483
- p2248: 0; = p2222*p2193
- p3019: 0; = p2238*p1023
- p2298: 0.000787395; = p2227*p2205
- p3350: 1.04311e6; = if(and(p1232=0;p3256<>0);p3256*(p3273*p3277-p3345)/p3349;0)
- p3472: 0.00022926; = p3377*p1241
- p2859: 0; = p2273*(p1129+p1131)
- p0202: 44.932
- p2773: 0; = p2382*(p1078+p1080)
- p2652: 0; = p2261*(p1078+p1080)
- p0723: 490; = p0063*(1+p0591*p0195/100)
- p3090: 1.81061e-6; = p2309*p1082
- p1612: 0
- p2032: 0.448886
- p4103: 0; = p1754*p3479
- p1257: 0; = if(p1232>0;0;IF(p1253+p1256=1;0;IF(p1253+p1256+p1255>1;1-(p1253+p1256);p1255)))
- p1150: 601990; = if(p1121=0;p1149*p1146*p1145;0)
- p3467: 0; = p3372*p1241
- p3007: 0; = p2421*(p1079+p1081)
- p2243: 0; = p2222*p2188
- p2129: 9.27394e-6; = p2015*p2057*p2091/(p0818*1000)
- p0665: 0; = IF(p0401<0.5;-SQRT(p0007*EXP(p0533^2*p0008)-p0007);SQRT(p0007*EXP(p0533^2*p0008)-p0007))
- p0887: 0; = 1000*p0886*p0001*p0003*p0004/(p0818*p0002)
- p1865: 0
- p1122: 0; = p1121*p0001/(p0818*p0002)
- p4720: 0.000166736; = p1963*p3481
- p3014: 0; = p2428*(p1129+p1131)
- p3405: 0.000603098; = p3367*p1238
- p3419: 0; = p3362*p1239
- p3101: 3.36223e-6; = p2320*p1023
- p2624: 0.000770809; = p2428*p1123
- p2912: 0.000643734; = p2326*(p1020+p1022)
- p1912: 0
- p1164: 2297.15; = p1163*p0801
- p1830: 0
- p3037: 0; = p2256*p1023
- p1978: 254
- p3450: 0; = p3374*p1240
- p2839: 0; = p2253*(p1020+p1022)
- p2066: 0.109412
- p2227: 0.29954; = if(p0774*p0778+p0775*p0779+p0776*p0780+p0777*p0781=0;0;p0779*p0775/(p0774*p0778+p0775*p0779+p0776*p0780+p0777*p0781))
- p0697: 0
- p2394: 0; = p2234*p2183
- p2654: 0; = p2263*(p1078+p1080)
- p2205: 0.00262868; = 2*14.0067*p2204/30.973762
- p1762: 0
- p0683: 0
- p2781: 0; = p2390*(p1128+p1130)
- p2906: 1.40173e-5; = p2320*(p1020+p1022)
- p2586: 0; = p2390*p1123
- p0044: 69.229
- p1788: 0
- p1824: 0
- p2725: 4.89665e-5; = p2334*(p1019+p1021)
- p2697: 2.75008e-6; = p2306*(p1078+p1080)
- p1284: 0; = p1280*p1252/p0818
- p1784: 0
- p1025: 50766.3; = IF(p1012=0;p1019*(p0704/100)*p0703*1000;0)
- p0725: 6.445; = p0065*(1+p0593*p0197/100)
- p2119: 0.679049
- p1923: 0
- p1932: 0
- p1961: 0.5
- p1112: 0.209482
- p3719: 0; = p1782*p3477
- p0700: 0
- p2348: 7.0485e-5; = p2228*p2216
- p2620: 0; = p2424*p1073
- p2281: 0.000140111; = p2223*p2187
- p1583: 0
- p3413: 0.000341502; = p3375*p1238
- p0733: 0
- p2524: 0.0077719; = p2328*p1014
- p2978: 0; = p2392*(p1129+p1131)
- p2265: 0; = p2226*p2211
- p3390: 0; = p3371*p1234
- p2376: 0; = p2229*p2205
- p2452: 0; = p2256*p1014
- p0955: 0; = if(and(p0683>0;or(p0807=56;p0807=100;and(p0807=60;p0901>0.06)));p0937;0)
- p1187: 0.000368763
- p3099: 1.59701e-5; = p2318*p1023
- p1835: 0
- p2182: 0.0120257; = p1050/p0818
- p2467: 0; = p2271*p1073
- p2137: 3.54242e-7; = p2015*p2065*p2099/(p0818*1000)
- p0135: 48.338
- p1673: 0
- p2973: 0; = p2387*(p1079+p1081)
- p3153: 0; = p2372*p1023
- p1873: 0
- p2594: 0; = p2398*p1014
- p3284: 0.275
- p3239: 0.013074; = IF(p3238+p3235+p3236=1;0;1-(p3238+p3235+p3236))
- p2337: 0.00184129; = p2228*p2205
- p0174: 0
- p3426: 0; = p3369*p1239
- p2202: 0.000556048; = 4*1.00794*p2201/(2*14.0067)
- p1607: 0
- p0749: 0
- p1933: 0
- p0573: 0; = IF(p0309<0.5;-SQRT(p0007*EXP(p0441^2*p0008)-p0007);SQRT(p0007*EXP(p0441^2*p0008)-p0007))
- p2606: 0; = p2410*p1014
- p2470: 0; = p2274*p1123
- p0019: 28.728
- p2347: 0.00042075; = p2228*p2215
- p1814: 0
- p1135: 0; = if(p1121=0;p1129*(p0716/100)*p0703*1000;0)
- p2663: 0; = p2272*(p1128+p1130)
- p2796: 0; = p2405*(p1019+p1021)
- p0714: 0
- p1344: 22189.5; = IF(p1318=0;p1327*p0801;0)
- p1602: 0
- p0781: 0
- p2520: 8.33149e-5; = p2324*p1014
- p2767: 0; = p2376*(p1078+p1080)
- p0711: 77.724; = p0051*(1+p0579*p0183/100)
- p5253: 8.44633e-7; = p1874*p3484
- p1714: 0
- p3451: 0; = p3375*p1240
- p2099: 0.620397
- p2233: 0; = if(p0783*p0787+p0784*p0788+p0785*p0789+p0786*p0790=0;0;p0790*p0786/(p0783*p0787+p0784*p0788+p0785*p0789+p0786*p0790))
- p0803: 0
- p0235: 0
- p2889: 0; = p2303*(p1079+p1081)
- p3333: 0; = if(and(p1232=0;p3255<>0);p3255-(p3328+p3329+p3330+p3331+p3332);0)
- p2283: 0.000507781; = p2223*p2189
- p2550: 0; = p2354*p1014
- p3095: 0; = p2314*p1132
- p1990: 30
- p3295: 0.58
- p2111: 0.856281
- p2506: 0.000209967; = p2310*p1073
- p1810: 0
- p2023: 2.82
- p1963g: 5.42542e-5; = p1667*p1871+p1668*p1872+p1669*p1873+p1670*p1874+p1671*p1875+p1672*p1876+p1673*p1877+p1674*p1878+p1675*p1879+p1676*p1880+p1677*p1881+p1678*p1882+p1679*p1883+p1680*p1884+p1681*p1885+p1682*p1886+p1683*p1887+p1684*p1888+p1685*p1889
- p1026: 39489.8; = IF(p1012=0;p1020*(p0704/100)*p0703*1000;0)
- p3812: 0; = p1875*p3477
- p3216: 0.06; = IF(OR(p1226=0;p1228=0);0;1-p3213-p3214-p3215)
- p3456: 0; = p3380*p1240
- p3103: 1.21852e-5; = p2322*p1023
- p1795: 0
- p1759: 0
- p2224: 0.461684; = if(p0765*p0769+p0766*p0770+p0767*p0771+p0768*p0772=0;0;p0771*p0767/(p0765*p0769+p0766*p0770+p0767*p0771+p0768*p0772))
- p1055: 5884.89; = IF(p1012=0;p1048*p1036;0)
- p3253: 0; = p1252*(p1277*(1-p3247)+p1280*(1-p3248)+p1281*(1-p3249)+p1282*(1-p3250))
- p1095: 5.4708e6; = IF(p1071=0;p0797*p0702*1000*p0798/100;0)
- p0401: 0.5
- p2833: 0; = p2247*(p1020+p1022)
- p0742: 57.34; = p0082*(1+p0610*p0214/100)
- p2350: 0; = p2232*p2218
- p2014: 3.81197e6; = p0833*p2011*p2013
- p1185: 0.5
- p2263: 0; = p2226*p2209
- p0897: 0
- p1754: 4.41384e-6; = p1346*1000/p0818
- p0342: 0.5
- p2965: 0; = p2379*(p1079+p1081)
- p2776: 0; = p2385*(p1078+p1080)
- p2349: 0.00063172; = p2228*p2217
- p2786: 0; = p2395*(p1019+p1021)
- p2825: 0; = p2239*(p1020+p1022)
- p3023: 0; = p2242*p1023
- p3462: 0.000413948; = p3367*p1241
- p3116: 8.23472e-5; = p2335*p1023
- p2403: 0; = p2234*p2192
- p0864: 0; = IF(p0858=1;0;IF(p0858+p0859>1;1-p0858;p0859))
- p3452: 0; = p3376*p1240
- p2846: 0; = p2260*(p1079+p1081)
- p2699: 2.92722e-5; = p2308*(p1078+p1080)
- p2996: 0; = p2410*(p1020+p1022)
- p0346: 0.5
- p3067: 3.30959e-5; = p2286*p1023
- p1938: 0
- p2485: 0.00906191; = p2289*p1014
- p3143: 0; = p2362*p1023
- p0729: 0
- p2178: 0.0406417; = (p0895*p0831/(1-p0831))/(p0818)
- p0477: 0; = SQRT(2)*(IF((2*p0345-1)<0;-1;IF((2*p0345-1)>0;1;0))*SQRT(SQRT((2/(pi()*0.140012289)+LN(1-(2*p0345-1)^2)/2)^2-LN(1-(2*p0345-1)^2)/0.140012289)-(2/(pi()*0.140012289)+LN(1-(2*p0345-1)^2)/2)))
- p1208: 0; = p1205*p0818*p0822/p0801
- p3431: 0; = p3374*p1239
- p0801: 490000
- p2612: 0; = p2416*p1073
- p1718: 0
- p3303: 0.000398148; = if(and(p1232=0;p3252<>0);p3259*p3289;0)
- p1652: 0
- p0547: 0; = IF(p0283<0.5;-SQRT(p0007*EXP(p0415^2*p0008)-p0007);SQRT(p0007*EXP(p0415^2*p0008)-p0007))
- p3129: 4.23404e-6; = p2348*p1082
- p2154: 9.54069e-7; = p2015*p2082*p2116/(p0818*1000)
- p2980: 0; = p2394*(p1020+p1022)
- p0705: 66.463; = p0045*(1+p0573*p0177/100)
- p2790: 0; = p2399*(p1019+p1021)
- p0923: 0.304814; = IF(p0918=1;0;IF(p0918+p0919>1;1-p0918;p0919))
- p1846: 0
- p2657: 0; = p2266*(p1078+p1080)
- p2499: 9.53466e-5; = p2303*p1073
- p2826: 0; = p2240*(p1020+p1022)
- p0063: 490
- p1058: 0.225
- p2778: 0; = p2387*(p1078+p1080)
- p2993: 0; = p2407*(p1020+p1022)
- p2831: 0; = p2245*(p1020+p1022)
- p2184: 0.000358919; = p1051/p0818
- p2517: 0.00102169; = p2321*p1014
- p0463: 0; = SQRT(2)*(IF((2*p0331-1)<0;-1;IF((2*p0331-1)>0;1;0))*SQRT(SQRT((2/(pi()*0.140012289)+LN(1-(2*p0331-1)^2)/2)^2-LN(1-(2*p0331-1)^2)/0.140012289)-(2/(pi()*0.140012289)+LN(1-(2*p0331-1)^2)/2)))
- p0018: 149.359
- p3241: 2.22656e-9; = p3234*p1188*p3236/p0818
- p3379: 0.000679246; = if(p1232=0;p3246*p3361/p0818;0)
- p2151: 1.25265e-7; = p2015*p2079*p2113/(p0818*1000)
- p2086: 0.0617647
- p0283: 0.5
- p2012: 0.0102252
- p2731: 0.000239028; = p2340*(p1078+p1080)
- p2062: 3.76588
- p2047: 2.25741e-13; = p2015*p2045/(p0818*1000000000000)
- p0730: 69.395; = p0070*(1+p0598*p0202/100)
- p2209: 0.000948518; = 14.0067*p2208/30.973762
- p5133: 2.11158e-7; = p1754*p3484
- p3033: 0; = p2252*p1023
- p2994: 0; = p2408*(p1020+p1022)
- p2277: 0.00142104; = p2223*p2183
- p2819: 0; = p2428*(p1128+p1130)
- p1119: 0.0134541; = IF(p1071=0;p1109/(p1114*p0818);0)
- p1175: 0.000349581
- p1239: 0; = if(p1232>0;0;IF(p1234+p1238=1;0;IF(p1234+p1238+p1236>1;1-(p1234+p1238);p1236)))
- p2897: 0; = p2311*(p1129+p1131)
- p0140: 9.564
- p1063: 0.455
- p1904: 0
- p1969: 0; = p0803
- p1694: 0
- p1750: 0
- p1735: 0
- p2854: 0; = p2268*(p1079+p1081)
- p2133: 2.98942e-6; = p2015*p2061*p2095/(p0818*1000)
- p0688: 0
- p1029: 9472.14; = IF(p1012=0;IF(p0801<p1023*(p0704/100)*p0703*1000;p0801;p1023*(p0704/100)*p0703*1000);0)
- p1567: 0
- p1251: 2.53083e-5; = if(p1232>0;0;p1246*p0001/(p0818*p0002))
- p4748: 0; = p1781*p3482
- p2054: 0.91
- p2961: 0; = p2375*(p1079+p1081)
- p1605: 0
- p3022: 0; = p2241*p1023
- p0997: 0; = if(p0888=0;0;if((p0695*p0694*1000*p0696/100)/p0888>1;1;(p0695*p0694*1000*p0696/100)/p0888))
- p2514: 0.00037935; = p2318*p1014
- p2560: 0; = p2364*p1014
- p3152: 0; = p2371*p1023
- p1302: 0; = IF(p1297+p1300+p1301=p1262;0;p1262-(p1297+p1300+p1301))
- p1152: 0.415074
- p3434: 0; = p3377*p1239
- p0443: 0; = SQRT(2)*(IF((2*p0311-1)<0;-1;IF((2*p0311-1)>0;1;0))*SQRT(SQRT((2/(pi()*0.140012289)+LN(1-(2*p0311-1)^2)/2)^2-LN(1-(2*p0311-1)^2)/0.140012289)-(2/(pi()*0.140012289)+LN(1-(2*p0311-1)^2)/2)))
- p3373: 0; = if(p1232=0;p3245*p3361/p0818;0)
- p1061: 0.3
- p1265: 0; = if(p1232>0;0;IF(p1259+p1263+p1264=1;0;IF(p1259+p1263+p1264+p1262>1;1-(p1259+p1263+p1264);p1262)))
- p1919: 0
- p1181: 0.000130538
- p0784: 0
- p0770: 48.961; = p0110*(1+p0638*p0242/100)
- p0746: 0
- p2890: 0; = p2304*(p1079+p1081)
- p2894: 0; = p2308*(p1079+p1081)
- p2221: 0.000303987; = p1155-p2220
- p3465: 0; = p3370*p1241
- p2936: 0; = p2350*(p1129+p1131)
- p2758: 0; = p2367*(p1019+p1021)
- p1588: 0
- p0199: 41.005
- p1193: 0; = IF(OR(p1036=0;p1095=0);0.0001*p0857;0)
- p1962: 2.14367e-5; = p1960*1000/p0818
- p2543: 0.000327023; = p2347*p1073
- p2282: 0.00179239; = p2223*p2188
- p0698: 0
- p1060: 0.21
- p3040: 0; = p2259*p1082
- p2687: 0.00065454; = p2296*(p1019+p1021)
- p4842: 0; = p1875*p3482
- p2709: 0.000108868; = p2318*(p1019+p1021)
- p2899: 0; = p2313*(p1129+p1131)
- p0663: 0; = IF(p0399<0.5;-SQRT(p0007*EXP(p0531^2*p0008)-p0007);SQRT(p0007*EXP(p0531^2*p0008)-p0007))
- p3162: 0; = p2381*p1082
- p2332: 0.00416055; = p2224*p2200
- p1963h: 0; = p1686*p1890+p1687*p1891+p1688*p1892+p1689*p1893+p1690*p1894+p1691*p1895+p1692*p1896+p1693*p1897+p1694*p1898+p1695*p1899+p1696*p1900+p1697*p1901+p1698*p1902+p1699*p1903+p1700*p1904+p1701*p1905+p1702*p1906+p1703*p1907+p1704*p1908+p1705*p1909
- p0717: 58.019; = p0057*(1+p0585*p0189/100)
- p3400: 0.00317697; = p3362*p1238
- p0150: 0
- p2714: 9.50804e-5; = p2323*(p1019+p1021)
- p3330: 0; = if(and(p1232=0;p3255<>0);p3255*(p3267-p3325)/p3327;0)
- p3141: 0; = p2360*p1023
- p2822: 0; = p2431*(p1128+p1130)
- p0270: 17.861
- p1298: 0
- p1093: 0; = IF(p1071=0;p1087*p0001/(p0818*p0002);0)
- p2172: 0.382021; = p2166-(p2167+p2168+p2169+p2170)
- p2213: 5.64326e-5; = p1116-p2212
- p3320: 0; = if(and(p1232=0;p3253<>0);p3253*(p3264-p3315)/p3316;0)
- p2893: 0; = p2307*(p1079+p1081)
- p2891: 0; = p2305*(p1079+p1081)
- p1246: 12853.6; = if(p1232>0;0;p1241*(p0725/100)*p0723*1000)
- p1701: 0
- p2179: 0; = p0970+p0971+p0972
- p1860: 0
- p2974: 0; = p2388*(p1079+p1081)
- p2364: 0; = p2225*p2192
- p1708: 0
- p2977: 0; = p2391*(p1129+p1131)
- p2397: 0; = p2234*p2186
- p1580: 0
- p1997: 2.03328e6; = (if(p1152=0;0;p1150/p1152)+if(p1153=0;0;p1151/p1153))*(1+p1157)
- p1330: 0; = p1320*p0801
- p2852: 0; = p2266*(p1079+p1081)
- p2484: 0.000916731; = p2288*p1014
- p2940: 0; = p2354*(p1020+p1022)
- p1676: 0
- p2742: 0; = p2351*(p1128+p1130)
- p1892: 0
- p4927: 0; = p1754*p3483
- p1295: 0; = p1291*p1252/p0818
- p0782: 9.564; = p0122*(1+p0650*p0254/100)
- p0107: 25.987
- p0355: 0.5
- p0631: 0; = IF(p0367<0.5;-SQRT(p0007*EXP(p0499^2*p0008)-p0007);SQRT(p0007*EXP(p0499^2*p0008)-p0007))
- p1885: 0
- p3466: 0; = p3371*p1241
- p3225: 0.000187456; = p3221*p1229
- p1260: 0; = if(p1232>0;0;p0731/100)
- p2783: 0; = p2392*(p1128+p1130)
- p0918: 0.222684; = p0680*1000/p0801
- p2052: 9.26846e-6; = p2015*p2049*(1-p2050)/(p0818*1000)
- p1963i: 0; = p1706*p1910+p1707*p1911+p1708*p1912+p1709*p1913+p1710*p1914+p1711*p1915+p1712*p1916+p1713*p1917+p1714*p1918+p1715*p1919+p1716*p1920+p1717*p1921+p1718*p1922+p1719*p1923+p1720*p1924+p1721*p1925+p1722*p1926+p1723*p1927+p1724*p1928
- p1768: 0
- p1210: 0.13
- p1918: 0
- p2073: 0.377647
- p2541: 3.07234e-5; = p2345*p1073
- p2760: 0; = p2369*(p1019+p1021)
- p0499: 0; = SQRT(2)*(IF((2*p0367-1)<0;-1;IF((2*p0367-1)>0;1;0))*SQRT(SQRT((2/(pi()*0.140012289)+LN(1-(2*p0367-1)^2)/2)^2-LN(1-(2*p0367-1)^2)/0.140012289)-(2/(pi()*0.140012289)+LN(1-(2*p0367-1)^2)/2)))
- p3161: 0; = p2380*p1082
- p2921: 0.00034331; = p2335*(p1020+p1022)
- p1020: 0.11665; = IF(p1012=0;IF(p1014+p1019=1;0;IF(p1014+p1019+p1016>1;1-(p1014+p1019);p1016));0)
- p0929: 149359; = p0801*p0923
- p2488: 1.67683e-5; = p2292*p1014
- p1634: 0
- p2395: 0; = p2234*p2184
- p0500: 0; = SQRT(2)*(IF((2*p0368-1)<0;-1;IF((2*p0368-1)>0;1;0))*SQRT(SQRT((2/(pi()*0.140012289)+LN(1-(2*p0368-1)^2)/2)^2-LN(1-(2*p0368-1)^2)/0.140012289)-(2/(pi()*0.140012289)+LN(1-(2*p0368-1)^2)/2)))
- p0308: 0.5
- p3212: 0.000127617; = p2431*p1132
- p2930: 0; = p2344*(p1079+p1081)
- p1804: 0
- p2018: 0.1978
- p0452: 0; = SQRT(2)*(IF((2*p0320-1)<0;-1;IF((2*p0320-1)>0;1;0))*SQRT(SQRT((2/(pi()*0.140012289)+LN(1-(2*p0320-1)^2)/2)^2-LN(1-(2*p0320-1)^2)/0.140012289)-(2/(pi()*0.140012289)+LN(1-(2*p0320-1)^2)/2)))
- p1216: 0
- p2579: 0; = p2383*p1073
- p3319: 0; = if(and(p1232=0;p3253<>0);p3253*(p3263-p3314)/p3316;0)
- p1127: 0; = if(p1121=0;p0721/100;0)
- p2140: 1.06582e-6; = p2015*p2068*p2102/(p0818*1000)
- p2461: 0; = p2265*p1073
- p1827: 0
- p1632: 0
- p3478: 0.09442; = if(p1328+p1330+p1332+p1334+p1336+p1338+p1340+p1342+p1344=0;0;p1332/(p1328+p1330+p1332+p1334+p1336+p1338+p1340+p1342+p1344))
- p2430: 0.000174933; = p2236*p2220
- p3073: 7.05921e-7; = p2292*p1023
- p1010: 0; = p0890
- p3529: 0; = p1798*p3476
- p2195: 0.00256227; = p2194*p2193
- p3366: 0.00635713; = if(p1232=0;p3244*p3360/p0818;0)
- p2756: 0; = p2365*(p1019+p1021)
- p3017: 0; = p2431*(p1129+p1131)
- p3470: 0.000234397; = p3375*p1241
- p0741: 0.588; = p0081*(1+p0609*p0213/100)
- p0926: 0; = IF(p0918+p0923+p0924+p0925=1;0;IF(p0918+p0923+p0924+p0925+p0922>1;1-(p0918+p0923+p0924+p0925);p0922))
- p1633: 0
- p2320: 0.000120165; = p2224*p2187
- p0837: 0.5
- p2515: 0.00055492; = p2319*p1014
- p1956: 0
- p0403: 0.5
- p1889: 0
- p5132: 0; = p1963*p3483
- p1898: 0
- p3363: 0.000862303; = if(p1232=0;p3244*p3357/p0818;0)
- p1348: 39
- p3357: 651678; = if(p1232=0;p3307+p3318+p3329+p3340+p3351;0)
- p1102: 0.0190972; = IF(p1071=0;IF(p1096+p1101=1;0;IF(p1096+p1101+p1098>1;1-(p1096+p1101);p1098));0)
- p2533: 0.00143112; = p2337*p1073
- p3182: 0; = p2401*p1023
- p1143: 0; = if(p1121=0;p1137*p0001/(p0818*p0002);0)
- p2641: 0; = p2250*(p1019+p1021)
- p0938: 0; = p0932*p0001/(p0818*p0002)
- p3085: 9.64998e-5; = p2304*p1082
- p2005: 254397; = p1963*p0818+p1959*1000+p1170+p1176+p1182
- p0959: 0; = if(and(p0683>0;or(p0807=480;p0807=32;p0807=1;and(p0807=60;p0901<0.03)));p0935;0)
- p1129: 0; = if(p1121=0;IF(p1123+p1128=1;0;IF(p1123+p1128+p1125>1;1-(p1123+p1128);p1125));0)
- p1979: 0; = p0973
- p2425: 0; = p2235*p2215
- p0134: 0.071
- p1011: 0; = p1010*p0001*p0004/(p0818*p0002)
- p2949: 0; = p2363*(p1020+p1022)
- p3265: 0.696292
- p2534: 0.000463435; = p2338*p1073
- p1819: 0
- p2255: 0; = p2222*p2201
- p1253: 0; = if(p1232>0;0;p0735/100)
- p3792: 0; = p1855*p3477
- p3218: 0.00823188; = p3214*p1228
- p1785: 0
- p1629: 0
- p1758: 0
- p4018: 8.3351e-6; = p1875*p3478
- p3427: 0; = p3370*p1239
- p3119: 3.58171e-5; = p2338*p1082
- p3300: 0; = if(p1293+p1294+p1295+p1296=0;0;p1293/(p1293+p1294+p1295+p1296))
- p2123: 0.263965
- p1770: 0
- p2677: 0.000225615; = p2286*(p1019+p1021)
- p1161: 490000; = p0801
- p1674: 0
- p1589: 0
- p0180: 38.011
- p2855: 0; = p2269*(p1079+p1081)
- p1868: 0
- p2900: 0; = p2314*(p1129+p1131)
- p1262: 0; = if(p1232>0;0;p0733/100)
- p3087: 1.01541e-6; = p2306*p1082
- p1766: 0
- p1677: 0
- p3342: 0; = if(and(p1232=0;p3254<>0);p3254*(p3272-p3337)/p3338;0)
- p0816: 0
- p0340: 0.5
- p3439: 0; = p3363*p1240
- p3204: 0; = p2423*p1082
- p1622: 0
- p3325: 0; = if(and(p1232=0;p3255<>0);p3267*p3289;0)
- p2160: 5.39152e-7; = p2015*p2084*p2122/(p0818*1000)
- p1107: 72125.4; = IF(p1071=0;p1105*p1101*p1095;0)
- p1820: 0
- p0400: 0.5
- p2605: 0; = p2409*p1014
- p0853: 0; = p0803/(p0802+p0803)
- p1221: 0.0583196
- p0352: 0.5
- p0210: 0
- p0475: 0; = SQRT(2)*(IF((2*p0343-1)<0;-1;IF((2*p0343-1)>0;1;0))*SQRT(SQRT((2/(pi()*0.140012289)+LN(1-(2*p0343-1)^2)/2)^2-LN(1-(2*p0343-1)^2)/0.140012289)-(2/(pi()*0.140012289)+LN(1-(2*p0343-1)^2)/2)))
- p1620: 0
- p2275: 0; = p2230*p2221
- p2712: 0.000293212; = p2321*(p1019+p1021)
- p3274: 0.0768939
- p3305: 0.86059; = if(and(p1232=0;p3252<>0);1-(p3301+p3302+p3303+p3304);0)
- p0813: 0; = if(p0807=480;1.56521739130435;0)
- p1725: 0
- p2075: 0.072
- p1680: 0
- p2884: 0; = p2298*(p1079+p1081)
- p3060: 1.86209e-5; = p2279*p1023
- p1902: 0
- p2803: 0; = p2412*(p1019+p1021)
- p0846: 0.281933; = p0841*p0845^3+p0842*p0845^2+p0843*p0845+p0844
- p1081: 0; = IF(p1071=0;IF(p1073+p1078+p1079+p1080=1;0;IF(p1073+p1078+p1079+p1080+p1077>1;1-(p1073+p1078+p1079+p1080);p1077));0)
- p3211: 7.34385e-5; = p2430*p1132
- p2026: 63.9
- p4224: 0; = p1875*p3479
- p2145: 2.50529e-6; = p2015*p2073*p2107/(p0818*1000)
- p0799: 17.547; = p0139*(1+p0667*p0271/100)
- p1799: 0
- p1687: 0
- p0819: 0; = p0808*p0809/p0818
- p1082: 0.06007; = IF(p1071=0;IF(p1073+p1078+p1079+p1080+p1081=1;0;1-(p1073+p1078+p1079+p1080+p1081));0)
- p2454: 0; = p2258*p1073
- p3425: 0; = p3368*p1239
- p1017: 0.04078; = IF(p1012=0;p0708/100;0)
- p0676: 201.803; = p0016*(1+p0544*p0148/100)
- p2545: 0.000490998; = p2349*p1073
- p0775: 30.077; = p0115*(1+p0643*p0247/100)
- p2232: 0; = if(p0783*p0787+p0784*p0788+p0785*p0789+p0786*p0790=0;0;p0789*p0785/(p0783*p0787+p0784*p0788+p0785*p0789+p0786*p0790))
- p2089: 0.40001
- p2881: 3.49168e-5; = p2295*(p1020+p1022)
- p1374: 9
- p0273: 0.5
- p1235: 0.59299; = if(p1232>0;0;p0727/100)
- p1577: 0.6832
- p2169: 0.00193049; = p2166*(p0908)
- p2847: 0; = p2261*(p1079+p1081)
- p1323: 0; = IF(((p0745*1000*p0750/100)+(p0754*1000*p0759/100))/p0801<0;0;((p0745*1000*p0750/100)+(p0754*1000*p0759/100))/p0801)
- p0003: 10000
- p2967: 0; = p2381*(p1079+p1081)
- p4822: 0; = p1855*p3482
- p0752: 0
- p1984: 30
- p2823: 0; = p2237*(p1020+p1022)
- p3205: 0; = p2424*p1082
- p1858: 0
- p1953: 0
- p0078: 489.004
- p0607: 0; = IF(p0343<0.5;-SQRT(p0007*EXP(p0475^2*p0008)-p0007);SQRT(p0007*EXP(p0475^2*p0008)-p0007))
- p1845: 0
- p2832: 0; = p2246*(p1020+p1022)
- p3512: 0; = p1781*p3476
- p3438: 0; = p3362*p1240
- p3219: 0.00985867; = p3215*p1228
- p2739: 1.14672e-5; = p2348*(p1078+p1080)
- p1614: 0
- p1121: 0
- p3443: 0; = p3367*p1240
- p2437: 0; = p2241*p1014
- p1040: 0.0261194
- p0057: 58.019
- p2472: 0.00430256; = p2276*p1014
- p0321: 0.5
- p3288: 0.505
- p1106: 2445.36; = IF(p1071=0;p1105*p1096*p1095;0)
- p1280: 0; = IF(p1277=p1263;0;IF(p1277+p1278>p1263;p1263-p1277;p1278))
- p2675: 0.000110862; = p2284*(p1019+p1021)
- p1296: 0; = p1292*p1252/p0818
- p1007: 0; = p1003*p0001*p0004/(p0818*p0002)
- p3112: 6.05429e-7; = p2331*p1023
- p1335: 0; = p1334*p0001/(p0818*p0002)
- p0990: 0; = p0986*p0886
- p5338: 9.29961e-6; = p1963*p3484
- p0703: 489.004; = p0043*(1+p0571*p0175/100)
- p3348: 0.00443516; = if(and(p1232=0;p3256<>0);p3276*p3289;0)
- p0404: 0.5
- p0912: 0
- p0713: 0
- p0441: 0; = SQRT(2)*(IF((2*p0309-1)<0;-1;IF((2*p0309-1)>0;1;0))*SQRT(SQRT((2/(pi()*0.140012289)+LN(1-(2*p0309-1)^2)/2)^2-LN(1-(2*p0309-1)^2)/0.140012289)-(2/(pi()*0.140012289)+LN(1-(2*p0309-1)^2)/2)))
- p1109: 1.31698e6; = IF(p1071=0;p1105*p1103*p1095;0)
- p3062: 3.92031e-6; = p2281*p1023
- p2210: 0.00040954; = 6*1.00794*p2208/30.973762
- p0178: 32.142
- p1069: 8.11718e-5; = IF(p1012=0;p1055/(p1062*p0818);0)
- p1034: 0; = IF(p1012=0;p1028*p0001/(p0818*p0002);0)
- p0884: 0; = IF(p0689=100;0;IF(p0689+p0688>100;100-p0689;p0688))
- p2432: 0.0249458; = p1158
- p0882: 490000; = p0869*p0856
- p3188: 0; = p2407*p1023
- p4515: 3.78593e-6; = p1754*p3481
- p2771: 0; = p2380*(p1078+p1080)
- p1752: 0
- p3004: 0; = p2418*(p1079+p1081)
- p3005: 0; = p2419*(p1079+p1081)
- p3185: 0; = p2404*p1023
- p1326: 0; = IF(((p0745*1000*p0753/100)+(p0754*1000*p0762/100))/p0801<0;0;((p0745*1000*p0753/100)+(p0754*1000*p0762/100))/p0801)
- p2784: 0; = p2393*(p1019+p1021)
- p2614: 0; = p2418*p1073
- p1277: 0
- p1306: 0; = p1302*p1252/p0818
- p1174: 4.04802e-7; = p1170*p1173/p0818
- p1226: 490000; = IF(p1221=0;0;IF(p1193=0;p0801;0))
- p2056: 2.07882
- p1158: 0.0249458; = p1156*p1157
- p2355: 0; = p2225*p2183
- p0531: 0; = SQRT(2)*(IF((2*p0399-1)<0;-1;IF((2*p0399-1)>0;1;0))*SQRT(SQRT((2/(pi()*0.140012289)+LN(1-(2*p0399-1)^2)/2)^2-LN(1-(2*p0399-1)^2)/0.140012289)-(2/(pi()*0.140012289)+LN(1-(2*p0399-1)^2)/2)))
- p2924: 0; = p2338*(p1079+p1081)
- p2945: 0; = p2359*(p1020+p1022)
- p2204: 0.00290647; = p1109/p0818
- p2568: 0; = p2372*p1014
- p2351: 0; = p2232*p2219
- p1618: 0
- p4749: 0; = p1782*p3482
- p0702: 489.004; = p0042*(1+p0570*p0174/100)
- p2007: 0.0406354; = ((p1981*p1985+p1987*p1991+p1993*p1997+p2001*p2005)/p0818)*p0005*p0002/1000
- p2962: 0; = p2376*(p1079+p1081)
- p1871: 0
- p3345: 0.160606; = if(and(p1232=0;p3256<>0);p3273*p3277*p3293;0)
- p2779: 0; = p2388*(p1078+p1080)
- p4223: 0; = p1874*p3479
- p1258: 0.0264; = if(p1232>0;0;IF(p1253+p1256+p1257=1;0;1-(p1253+p1256+p1257)))
- p2597: 0; = p2401*p1014
- p0682: 489.004; = p0022*(1+p0550*p0154/100)
- p1569: 0
- p2582: 0; = p2386*p1073
- p2071: 0.151
- p1626: 0
- p1936: 0
- p3118: 0.000110606; = p2337*p1082
- p2138: 5.81033e-7; = p2015*p2066*p2100/(p0818*1000)
- p1883: 0
- p1593: 0
- p2711: 2.29203e-5; = p2320*(p1019+p1021)
- p1963e: 0; = p1628*p1832+p1629*p1833+p1630*p1834+p1631*p1835+p1632*p1836+p1633*p1837+p1634*p1838+p1635*p1839+p1636*p1840+p1637*p1841+p1638*p1842+p1639*p1843+p1640*p1844+p1641*p1845+p1642*p1846+p1643*p1847+p1644*p1848+p1645*p1849+p1646*p1850
- p2857: 0; = p2271*(p1079+p1081)
- p1099: 0.551599
- p3231: 3.78034e-7; = p1176/p0818
- p2155: 9.24642e-7; = p2015*p2084*p2117/(p0818*1000)
- p3064: 1.42077e-5; = p2283*p1023
- p1074: 0.16269; = IF(p1071=0;p0712/100;0)
- p0151: 0
- p1887: 0
- p2105: 0.888194
- p1097: 0.0302087
- p0910: 0.00737116; = p0909/p0818
- p3055: 0; = p2274*p1132
- p3031: 0; = p2250*p1023
- p1931: 0
- p2880: 0.000242609; = p2294*(p1020+p1022)
- p2211: 0.00536308; = p1120-p2209-p2208-p2210
- p2966: 0; = p2380*(p1079+p1081)
- p2873: 0.000750585; = p2287*(p1020+p1022)
- p2792: 0; = p2401*(p1019+p1021)
- p0271: 22.234
- p2335: 0.00294308; = p2224*p2203
- p4311: 0; = p1756*p3480
- p1738: 0
- p1855: 0.000116967; = p1447*1000/p0818
- p1976: 0.071
- p2326: 0.00551851; = p2224*p2193
- p2039: 6.41466e-6; = p2015*p2037*p2038/(p0818*1000)
- p2728: 0.000299559; = p2337*(p1078+p1080)
- p2547: 0; = p2351*p1123
- p0610: 0; = IF(p0346<0.5;-SQRT(p0007*EXP(p0478^2*p0008)-p0007);SQRT(p0007*EXP(p0478^2*p0008)-p0007))
- p4636: 7.57186e-5; = p1875*p3481
- p2720: 1.1437e-6; = p2329*(p1019+p1021)
- p1587: 0
- p0963: 0; = if(and(p0683>0;or(p0807=480;p0807=32;p0807=1;and(p0807=60;p0901<0.03)));p0939;0)
- p2353: 0; = p2232*p2221
- p1228: 0.0218697; = IF(p1221=0;0;p0801*p1212*2000/(p1222+p1221*p1225)/p0818)
- p0345: 0.5
- p1765: 0
- p2252: 0; = p2222*p2198
- p0315: 0.5
- p1271: 0; = IF(p1267+p1270=p1259;0;IF(p1267+p1270+p1269>p1259;p1259-(p1267+p1270);p1269))
- p2083: 2.17294
- p3242: 1.34997e-7; = p3234*p1188*p3238/p0818
- p0659: 0; = IF(p0395<0.5;-SQRT(p0007*EXP(p0527^2*p0008)-p0007);SQRT(p0007*EXP(p0527^2*p0008)-p0007))
- p2529: 0.00118552; = p2333*p1014
- p2486: 4.64668e-6; = p2290*p1014
- p0946: 0.000214844; = if(and(p0683=0;or(p0807=480;p0807=32;p0807=1;and(p0807=60;p0901<0.03)));p0934;0)
- p2237: 0; = p2222*p2182
- p2719: 0.00223043; = p2328*(p1019+p1021)
- p0809: 0
- p2019: 0.13105
- p2571: 0; = p2375*p1073
- p2795: 0; = p2404*(p1019+p1021)
- p2507: 0; = p2311*p1123
- p2096: 0.486404
- p3147: 0; = p2366*p1023
- p2664: 0; = p2273*(p1128+p1130)
- p3251: 5.84781e7; = p1252-(p3252+p3253+p3254+p3255+p3256)
- p1101: 0.0302087; = IF(p1071=0;IF(p1096=1;0;IF(p1096+p1097>1;1-p1096;p1097));0)
- p3280: 0.375
- p5177: 2.11158e-7; = p1798*p3484
- p1049: 0.249535; = IF(p1012=0;IF(p1037+p1044+p1045+p1046+p1047+p1048=1;0;1-(p1037+p1044+p1045+p1046+p1047+p1048));0)
- p2359: 0; = p2225*p2187
- p2313: 0; = p2231*p2220
- p2544: 5.47838e-5; = p2348*p1073
- p1027: 13805.4; = IF(p1012=0;p1021*(p0704/100)*p0703*1000;0)
- p1870: 0
- p2114: 0.832356
- p2991: 0; = p2405*(p1020+p1022)
- p3273: 0.753577
- p3376: 0.000133637; = if(p1232=0;p3246*p3358/p0818;0)
- p1070: 0.0198059; = IF(p1012=0;p1056/(p1063*p0818);0)
- p3281: 0.46
- p1299: 0
- p0787: 0
- p2745: 0; = p2354*(p1019+p1021)
- p0760: 0
- p0764: 69.229; = p0104*(1+p0632*p0236/100)
- p3013: 0; = p2427*(p1079+p1081)
- p2316: 0.00121875; = p2224*p2183
- p0878: 0; = p0867*p0856
- p0251: 33.021
- p0843: -0.00776641
- p2631: 0; = p2240*(p1019+p1021)
- p3374: 0.0035781; = if(p1232=0;p3246*p3356/p0818;0)
- p3145: 0; = p2364*p1023
- p1801: 0
- p2388: 0; = p2229*p2217
- p1729: 0
- p1287: 0
- p2746: 0; = p2355*(p1019+p1021)
- p3380: 0.129056; = p3251/p0818
- p2806: 0; = p2415*(p1078+p1080)
- p1877: 0
- p1145: 820644; = if(p1121=0;p0799*p0702*1000*p0800/100;0)
- p2102: 0.922577
- p1755: 0
- p2165: 0.81927; = (p0833-p2014)/p0818-p0839
- p2416: 0; = p2235*p2206
- p2610: 0; = p2414*p1073
- p3209: 0.000557737; = p2428*p1132
- p0686: 0
- p3346: 0.00994186; = if(and(p1232=0;p3256<>0);p3274*(p3281*(p3285*p1256+p3286*(p1253+p1257)+p1258*p3288));0)
- p1339: 0.000783342; = p1338*p0001/(p0818*p0002)
- p2381: 0; = p2229*p2210
- p2297: 0.000870605; = p2227*p2204
- p0940: 0; = if(and(p0683=0;p0946=0);p0934;0)
- p3190: 0; = p2409*p1023
- p3386: 0; = p3367*p1234
- p1050: 5.44908e6; = IF(p1012=0;p1037*p1036;0)
- p1169: 0.000748668
- p1071: 0
- p3378: 0.00424569; = if(p1232=0;p3246*p3360/p0818;0)
- p0992: 0; = p0988*p0001*p0004/(p0818*p0002)
- p1822: 0
- p2995: 0; = p2409*(p1020+p1022)
- p0980: 0; = IF(p0977=0;0;p0977*p0001/(p0818*p0002))
- p0780: 76.874; = p0120*(1+p0648*p0252/100)
- p2370: 0; = p2225*p2199
- p1182: 63.9635; = p1181*p0801
- p0736: 97.36; = p0076*(1+p0604*p0208/100)
- p1888: 0
- p0942: 0; = if(and(p0683=0;p0948=0);p0936;0)
- p3245: 0; = IF(p3244=1;0;if(p3244+p0792/100>1;1-p3244;p0792/100))
- p1016: 0.11665; = IF(p1012=0;p0707/100;0)
- p3371: 0; = if(p1232=0;p3245*p3359/p0818;0)
- p1166: 5.06963e-6; = p1164/p0818
- p2975: 0; = p2389*(p1129+p1131)
- p0113: 46.557
- p3050: 0; = p2269*p1082
- p1227: 0.000964796; = IF(p1221=0;0;p1226*p0001/(p0818*p0002))
- p2193: 0.011953; = p1054/p0818
- p1848: 0
- p2174: 0.00512781; = p0895*p0903/p0818
- p3175: 0; = p2394*p1023
- p3255: 0; = p1252*(p1297*(1-p3247)+p1300*(1-p3248)+p1301*(1-p3249)+p1302*(1-p3250))
- p1832: 0
- p0989: 0; = p0985*p0886
- p2214: 0.000159175; = p1107/p0818
- p3689: 0; = p1962*p3476
- p1553: 0
- p3433: 0; = p3376*p1239
- p0527: 0; = SQRT(2)*(IF((2*p0395-1)<0;-1;IF((2*p0395-1)>0;1;0))*SQRT(SQRT((2/(pi()*0.140012289)+LN(1-(2*p0395-1)^2)/2)^2-LN(1-(2*p0395-1)^2)/0.140012289)-(2/(pi()*0.140012289)+LN(1-(2*p0395-1)^2)/2)))
- p2917: 2.52406e-6; = p2331*(p1020+p1022)
- p2509: 0; = p2313*p1123
- p0791: 59.957; = p0131*(1+p0659*p0263/100)
- p0768: 0
- p3306: 3.0058e6; = if(and(p1232=0;p3252<>0);p3252*(p3257*p3277-p3301)/p3305;0)
- p3335: 0; = IF(or(p3254=0;p1232>0);0;p3270*(p3280*(p3283*p1256+p3286*(p1253+p1257)+p1258*p3288+p3300*p3287)))
- p2750: 0; = p2359*(p1019+p1021)
- p1781: 6.62076e-6; = p1373*1000/p0818
- p2971: 0; = p2385*(p1079+p1081)
- p2710: 0.000159255; = p2319*(p1019+p1021)
- p2045: 30
- p1663: 0
- p1248: 3.68728e-5; = if(p1232>0;0;p1243*p0001/(p0818*p0002))
- p5234: 5.59569e-6; = p1855*p3484
- p2511: 0.00369007; = p2315*p1014
- p1850: 0
- p2002: 750
- p1833: 0
- p3414: 7.92452e-5; = p3376*p1238
- p3042: 0; = p2261*p1082
- p3127: 6.69755e-6; = p2346*p1082
- p0672: 0
- p0761: 0
- p2828: 0; = p2242*(p1020+p1022)
- p1054: 5.41615e6; = IF(p1012=0;p1047*p1036;0)
- p2455: 0; = p2259*p1073
- p2736: 6.43094e-6; = p2345*(p1078+p1080)
- p0386: 0.5
- p3179: 0; = p2398*p1023
- p0719: 0
- p2229: 0; = if(p0774*p0778+p0775*p0779+p0776*p0780+p0777*p0781=0;0;p0781*p0777/(p0774*p0778+p0775*p0779+p0776*p0780+p0777*p0781))
- p1261: 0; = if(p1232>0;0;p0732/100)
- p2732: 0.000108091; = p2341*(p1078+p1080)
- p1654: 0
- p2982: 0; = p2396*(p1020+p1022)
- p0921: 0.0586286; = p0679*1000/p0801
- p1769: 0
- p3078: 5.22972e-5; = p2297*p1082
- p3418: 0.0765292; = p3380*p1238
- p1689: 0
- p1566: 0
- p2390: 0; = p2233*p2219
- p2024: 0.748682
- p2389: 0; = p2233*p2218
- p0392: 0.5
- p3048: 0; = p2267*p1082
- p0859: 0; = p0671*1000/p0856
- p0415: 0; = SQRT(2)*(IF((2*p0283-1)<0;-1;IF((2*p0283-1)>0;1;0))*SQRT(SQRT((2/(pi()*0.140012289)+LN(1-(2*p0283-1)^2)/2)^2-LN(1-(2*p0283-1)^2)/0.140012289)-(2/(pi()*0.140012289)+LN(1-(2*p0283-1)^2)/2)))
- p2246: 0; = p2222*p2191
- p3291: 0.437
- p1893: 0
- p0137: 24.03
- p2508: 0; = p2312*p1123
- p2888: 0; = p2302*(p1079+p1081)
- p3399: 0; = p3380*p1234
- p3896: 0; = p1963*p3477
- p1591: 0
- p2336: 0.00203587; = p2228*p2204
- p2920: 2.99462e-5; = p2334*(p1020+p1022)
- p2302: 0.000284119; = p2227*p2209
- p2726: 0.000561362; = p2335*(p1019+p1021)
- p3027: 0; = p2246*p1023
- p1957: 0
- p2503: 3.70582e-5; = p2307*p1073
- p2798: 0; = p2407*(p1019+p1021)
- p2321: 0.00153723; = p2224*p2188
- p1911: 0
- p3140: 0; = p2359*p1023
- p0585: 0; = IF(p0321<0.5;-SQRT(p0007*EXP(p0453^2*p0008)-p0007);SQRT(p0007*EXP(p0453^2*p0008)-p0007))
- p3199: 0; = p2418*p1082
- p2084: 0.21
- p2723: 0.000793584; = p2332*(p1019+p1021)
- p0148: 0
- p5135: 4.11758e-6; = p1756*p3484
- p1041: 0.33098
- p0734: 0
- p1325: 0; = IF(((p0745*1000*p0752/100)+(p0754*1000*p0761/100))/p0801<0;0;((p0745*1000*p0752/100)+(p0754*1000*p0761/100))/p0801)
- p2489: 0.00322422; = p2293*p1014
- p2836: 0; = p2250*(p1020+p1022)
- p2262: 0; = p2226*p2208
- p2449: 0; = p2253*p1014
- p0212: 13.511
- p2079: 0.02
- p2584: 0; = p2388*p1073
- p2830: 0; = p2244*(p1020+p1022)
- p0242: 16.528
- p3313: 0; = if(and(p1232=0;p3253<>0);p3262*(p3278*(p3282*p1256+p3286*(p1253+p1257)+p1258*p3288+p3298*p3287));0)
- p2807: 0; = p2416*(p1078+p1080)
- p2621: 0; = p2425*p1073
- p3093: 0; = p2312*p1132
- p2707: 0.000232464; = p2316*(p1019+p1021)
- p0945: 0; = if(and(p0683=0;p0951=0);p0939;0)
- p1125: 0; = if(p1121=0;p0719/100;0)
- p0867: 0; = IF(p0858+p0864+p0865+p0866=1;0;IF(p0858+p0864+p0865+p0866+p0862>1;1-(p0858+p0864+p0865+p0866);p0862))
- p2295: 0.00029933; = p2223*p2202
- p3047: 0; = p2266*p1082
- p2239: 0; = p2222*p2184
- p1297: 0
- p3089: 1.08082e-5; = p2308*p1082
- p0128: 40.943
- p3417: 0.000402786; = p3379*p1238
- p4723: 0; = p1756*p3482
- p1906: 0
- p3235: 0.118093
- p2601: 0; = p2405*p1014
- p1710: 0
- p2418: 0; = p2235*p2208
- p0852: 0; = p0847*p0851^3+p0848*p0851^2+p0849*p0851+p0850
- p1273: 0; = p1267*p1252/p0818
- p0919: 0.304814; = p0678*1000/p0801
- p0674: 0
- p1079: 0; = IF(p1071=0;IF(p1073+p1078=1;0;IF(p1073+p1078+p1075>1;1-(p1073+p1078);p1075));0)
- p3271: 0.0195489
- p2038: 0.304457
- p1811: 0
- p2451: 0; = p2255*p1014
- p2640: 0; = p2249*(p1019+p1021)
- p3267: 0.0170629
- p0854: 138147; = p0801*((1-p0853)*p0846+p0853*p0852)
- p0969: 0
- p1571: 0
- p0286: 0.5
- p0839: 0.712426; = p0838/p0818
- p0756: 0
- p3065: 1.62626e-5; = p2284*p1023
- p0598: 0; = IF(p0334<0.5;-SQRT(p0007*EXP(p0466^2*p0008)-p0007);SQRT(p0007*EXP(p0466^2*p0008)-p0007))
- p2564: 0; = p2368*p1014
- p0996: 0; = if(p0888=0;0;if((p0691*p0690*1000*p0692/100)/p0888>1;1;(p0691*p0690*1000*p0692/100)/p0888))
- p0915: 0.0289728; = p0914/p0818
- p2414: 0; = p2235*p2204
- p1274: 0.103689; = p1270*p1252/p0818
- p2693: 4.62233e-5; = p2302*(p1078+p1080)
- p2793: 0; = p2402*(p1019+p1021)
- p3154: 0; = p2373*p1023
- p2440: 0; = p2244*p1014
- p0818: 4.5312e8; = p0806*p0807
- p0067: 59.299
- p2170: 0.0118365; = p2166*(p0913)
- p1555: 0
- p1573: 0
- p0211: 8.771
- p1748: 0
- p1563: 0
- p3388: 0; = p3369*p1234
- p1191: 0.5
- p0870: 0; = p0858*p0856
- p0238: 11.577
- p2136: 4.3602e-6; = p2015*p2064*p2098/(p0818*1000)
- p2948: 0; = p2362*(p1020+p1022)
- p0306: 0.5
- p2870: 6.77996e-5; = p2284*(p1020+p1022)
- p1147: 0.116352
- p3158: 0; = p2377*p1082
- p3149: 0; = p2368*p1023
- p0453: 0; = SQRT(2)*(IF((2*p0321-1)<0;-1;IF((2*p0321-1)>0;1;0))*SQRT(SQRT((2/(pi()*0.140012289)+LN(1-(2*p0321-1)^2)/2)^2-LN(1-(2*p0321-1)^2)/0.140012289)-(2/(pi()*0.140012289)+LN(1-(2*p0321-1)^2)/2)))
- p0704: 69.229; = p0044*(1+p0572*p0176/100)
- p3026: 0; = p2245*p1023
- p0647: 0; = IF(p0383<0.5;-SQRT(p0007*EXP(p0515^2*p0008)-p0007);SQRT(p0007*EXP(p0515^2*p0008)-p0007))
- p1982: 750
- p0008: 0.0739645; = (p0007-1.5)/(p0007-1)^2
- p0550: 0; = IF(p0286<0.5;-SQRT(p0007*EXP(p0418^2*p0008)-p0007);SQRT(p0007*EXP(p0418^2*p0008)-p0007))
- p1333: 8.62302e-5; = p1332*p0001/(p0818*p0002)
- p3316: 0; = if(and(p1232=0;p3253<>0);1-(p3312+p3313+p3314+p3315);0)
- p0051: 77.724
- p1992: 3900
- p3222: 0.224242; = IF(p3216=0;0;p1223*40.078/100.0869)
- p3201: 0; = p2420*p1082
- p0933: 995; = p0801*p0927
- p1659: 0
- p2310: 0.000270144; = p2227*p2217
- p3029: 0; = p2248*p1023
- p2698: 7.75694e-6; = p2307*(p1078+p1080)
- p0732: 0
- p2417: 0; = p2235*p2207
- p0328: 0.5
- p4101: 2.02405e-6; = p1962*p3478
- p2853: 0; = p2267*(p1079+p1081)
- p2497: 0.00048833; = p2301*p1073
- p3435: 0; = p3378*p1239
- p1642: 0
- p0965: 0; = IF(p0684/100=1;0;IF(p0684/100+p0685/100>1;1-p0684/100;p0685/100))
- p3124: 0.000225661; = p2343*p1082
- p0964: 0; = 56/90000
- p1072: 0; = p1071*p0001/(p0818*p0002)
- p1880: 0
- p2200: 0.0090117; = p1056/p0818
- p0728: 0
- p3353: 346257; = if(and(p1232=0;p3256<>0);p3256*(p3276-p3348)/p3349;0)
- p2557: 0; = p2361*p1014
- p2284: 0.000581222; = p2223*p2190
- p2754: 0; = p2363*(p1019+p1021)
- p1156: 0.113658; = p1064+p1065+p1066+p1067+p1068+p1069+p1070+p1116+p1117+p1118+p1119+p1120+p1154+p1155
- p2735: 6.14999e-7; = p2344*(p1078+p1080)
- p2106: 0.856281
- p1836: 0
- p1341: 0; = p1340*p0001/(p0818*p0002)
- p0765: 0
- p1939: 0
- p2304: 0.00160646; = p2227*p2211
- p0932: 0; = p0801*p0926
- p0459: 0; = SQRT(2)*(IF((2*p0327-1)<0;-1;IF((2*p0327-1)>0;1;0))*SQRT(SQRT((2/(pi()*0.140012289)+LN(1-(2*p0327-1)^2)/2)^2-LN(1-(2*p0327-1)^2)/0.140012289)-(2/(pi()*0.140012289)+LN(1-(2*p0327-1)^2)/2)))
- p2808: 0; = p2417*(p1078+p1080)
- p1937: 0
- p0871: 0; = p0870*p0001*p0003/(p0818*p0002)
- p2421: 0; = p2235*p2211
- p0880: 0; = p0868*p0856
- p1103: 0.551599; = IF(p1071=0;IF(p1096+p1101+p1102=1;0;IF(p1096+p1101+p1102+p1099>1;1-(p1096+p1101+p1102);p1099));0)
- p1658: 0
- p1907: 0
- p0349: 0.5
- p1878: 0
- p2658: 0; = p2267*(p1078+p1080)
- p1842: 0
- p1662: 0
- p1655: 0
- p2168: 0.0109111; = p2166*(p0903)
- p0800: 9.564; = p0140*(1+p0668*p0272/100)
- p4337: 0; = p1782*p3480
- p2340: 0.00146922; = p2228*p2208
- p2387: 0; = p2229*p2216
- p2871: 1.70498e-5; = p2285*(p1020+p1022)
- p1189: 0.000964796; = p0801*p0001/(p0818*p0002)
- p3051: 0; = p2270*p1082
- p1218: 0
- p1222: 0.94
- p2512: 0.000810015; = p2316*p1014
- p3398: 0; = p3379*p1234
- p1238: 0.59299; = if(p1232>0;0;IF(p1234=1;0;IF(p1234+p1235>1;1-p1234;p1235)))
- p0952: 0; = if(and(p0683>0;or(p0807=56;p0807=100;and(p0807=60;p0901>0.06)));p0934;0)
- p3071: 1.95619e-7; = p2290*p1023
- p3263: 0.0214527
- p1224: 0.44; = IF(p1221=0;0;IF(p1193=0;1-p1223;0))
- p0005: 1.60934
- p3144: 0; = p2363*p1023
- p2963: 0; = p2377*(p1079+p1081)
- p0311: 0.5
- p3148: 0; = p2367*p1023
- p0908: 0.00263444
- p2573: 0; = p2377*p1073
- p2820: 0; = p2429*(p1128+p1130)
- p2273: 0; = p2230*p2219
- p2053: 1.45647
- p3455: 0; = p3379*p1240
- p2383: 0; = p2229*p2212
- p2042: 0.07
- p2933: 0; = p2347*(p1079+p1081)
- p2022: 0.00129333; = p2018*p2015/p0818-p2021
- p2642: 0; = p2251*(p1019+p1021)
- p3895: 0; = p1962*p3477
- p2729: 9.7005e-5; = p2338*(p1078+p1080)
- p2689: 0.000128101; = p2298*(p1078+p1080)
- p0820: 0; = if(p0807=480;p0814;0)
- p1290: 0; = IF(p1287=p1264;0;IF(p1287+p1288>p1264;p1264-p1287;p1288))
- p1180: 1.89017e-7; = p1176*p1179/p0818
- p2291: 1.14752e-5; = p2223*p2198
- p3254: 0; = p1252*(p1287*(1-p3247)+p1290*(1-p3248)+p1291*(1-p3249)+p1292*(1-p3250))
- p3375: 0.000575899; = if(p1232=0;p3246*p3357/p0818;0)
- p2878: 2.94302e-6; = p2292*(p1020+p1022)
- p3899: 8.12672e-6; = p1756*p3478
- p2695: 0.000261354; = p2304*(p1078+p1080)
- p0771: 82.759; = p0111*(1+p0639*p0243/100)
- p1899: 0
- p1890: 0
- p3290: 0.195
- p1617: 0
- p1745: 0
- p3076: 8.37525e-6; = p2295*p1023
- p1100: 0.398071
- p3368: 0; = if(p1232=0;p3245*p3356/p0818;0)
- p2816: 0; = p2425*(p1078+p1080)
- p1202: 0.7
- p0533: 0; = SQRT(2)*(IF((2*p0401-1)<0;-1;IF((2*p0401-1)>0;1;0))*SQRT(SQRT((2/(pi()*0.140012289)+LN(1-(2*p0401-1)^2)/2)^2-LN(1-(2*p0401-1)^2)/0.140012289)-(2/(pi()*0.140012289)+LN(1-(2*p0401-1)^2)/2)))
- p1294: 0; = p1290*p1252/p0818
- p2077: 0.043
- p3206: 0; = p2425*p1082
- p0016: 201.803
- p0735: 0
- p3193: 0; = p2412*p1023
- p0911: 0.00455344
- p2882: 0.000400294; = p2296*(p1020+p1022)
- p1707: 0
- p2869: 5.92327e-5; = p2283*(p1020+p1022)
- p0848: 0
- p0845: 0.5
- p1720: 0
- p1267: 0
- p1884: 0
- p2267: 0; = p2226*p2213
- p1447: 53
- p0983: 0; = if(p0886=0;0;min(1;(p0695*p0694*1000*p0697/100)/p0886))
- p0904: 1.82346e7; = p0825*p0901+(p0830+p0895)*p0824*p0903
- p3159: 0; = p2378*p1082
- p3024: 0; = p2243*p1023
- p3061: 2.7239e-5; = p2280*p1023
- p0503: 0; = SQRT(2)*(IF((2*p0371-1)<0;-1;IF((2*p0371-1)>0;1;0))*SQRT(SQRT((2/(pi()*0.140012289)+LN(1-(2*p0371-1)^2)/2)^2-LN(1-(2*p0371-1)^2)/0.140012289)-(2/(pi()*0.140012289)+LN(1-(2*p0371-1)^2)/2)))
- p2222: 0; = if(p0765*p0769+p0766*p0770+p0767*p0771+p0768*p0772=0;0;p0769*p0765/(p0765*p0769+p0766*p0770+p0767*p0771+p0768*p0772))
- p1332: 43794.5; = p1321*p0801
- p3238: 0.854735; = IF(p3237+p3235+p3236>1;1-(p3235+p3236);p3237)
- p2443: 0; = p2247*p1014
- p2521: 0.000674238; = p2325*p1014
- p3278: 0.46
- p3247: 0
- p0006: 15
- p2303: 0.000122673; = p2227*p2210
- p0976: 0; = IF(p0687=0;IF(OR(p0686=0;p0689=0);0;p0686*1000*p0689/100);0)
- p1268: 0.67563
- p0790: 0
- p1032: 7.77544e-5; = IF(p1012=0;p1026*p0001/(p0818*p0002);0)
- p3082: 3.77412e-5; = p2301*p1082
- p2518: 0.000289443; = p2322*p1014
- p3299: 0; = if(p1303+p1304+p1305+p1306=0;0;p1303/(p1303+p1304+p1305+p1306))
- p1037: 0.332992
- p1857: 0
- p0269: 5.492
- p2357: 0; = p2225*p2185
- p0807: 32
- p1004: 0; = p1000*p0888
- p1090: 7.29286e-5; = IF(p1071=0;p1084*p0001/(p0818*p0002);0)
- p2290: 6.99137e-6; = p2223*p2197
- p2367: 0; = p2225*p2196
- p1209: 16.9516; = p1206*p0818*p0822/p0801
- p3369: 0; = if(p1232=0;p3245*p3357/p0818;0)
- p2029: 6.16
- p2331: 2.16379e-5; = p2224*p2199
- p1319: 0; = IF(((p0745*1000*p0746/100)+(p0754*1000*p0755/100))/p0801<0;0;((p0745*1000*p0746/100)+(p0754*1000*p0755/100))/p0801)
- p2981: 0; = p2395*(p1020+p1022)
- p1722: 0
- p2660: 0; = p2269*(p1078+p1080)
- p2128: 6.25718e-6; = p2015*p2056*p2090/(p0818*1000)
- p0116: 21.895
- p0974: 0
- p3208: 0; = p2427*p1082
- p0796: 69.229; = p0136*(1+p0664*p0268/100)
- p0797: 24.03; = p0137*(1+p0665*p0269/100)
- p2369: 0; = p2225*p2198
- p1223: 0.56
- p0416: 0; = SQRT(2)*(IF((2*p0284-1)<0;-1;IF((2*p0284-1)>0;1;0))*SQRT(SQRT((2/(pi()*0.140012289)+LN(1-(2*p0284-1)^2)/2)^2-LN(1-(2*p0284-1)^2)/0.140012289)-(2/(pi()*0.140012289)+LN(1-(2*p0284-1)^2)/2)))
- p1963d: 0; = p1608*p1812+p1609*p1813+p1610*p1814+p1611*p1815+p1612*p1816+p1613*p1817+p1614*p1818+p1615*p1819+p1616*p1820+p1617*p1821+p1618*p1822+p1619*p1823+p1620*p1824+p1621*p1825+p1622*p1826+p1623*p1827+p1624*p1828+p1625*p1829+p1626*p1830+p1627*p1831
- p1963k: 1.07183e-5; = p1744*p1948+p1745*p1949+p1746*p1950+p1747*p1951+p1748*p1952+p1749*p1953+p1750*p1954+p1751*p1955+p1752*p1956+p1753*p1957+p1961*p1962
- p0872: 0; = p0864*p0856
- p0446: 0; = SQRT(2)*(IF((2*p0314-1)<0;-1;IF((2*p0314-1)>0;1;0))*SQRT(SQRT((2/(pi()*0.140012289)+LN(1-(2*p0314-1)^2)/2)^2-LN(1-(2*p0314-1)^2)/0.140012289)-(2/(pi()*0.140012289)+LN(1-(2*p0314-1)^2)/2)))
- p0595: 0; = IF(p0331<0.5;-SQRT(p0007*EXP(p0463^2*p0008)-p0007);SQRT(p0007*EXP(p0463^2*p0008)-p0007))
- p0152: 0
- p2450: 0; = p2254*p1014
- p1941: 0
- p1232: 0
- p2466: 0; = p2270*p1073
- p0972: 0; = p0969/p0818
- p2616: 0; = p2420*p1073
- p3057: 0.000181132; = p2276*p1023
- p2448: 0; = p2252*p1014
- p2986: 0; = p2400*(p1020+p1022)
- p1318: 0; = p1317*p0001/(p0818*p0002)
- p0961: 0; = if(and(p0683>0;or(p0807=480;p0807=32;p0807=1;and(p0807=60;p0901<0.03)));p0937;0)
- p0939: 1.95913e-6; = p0933*p0001/(p0818*p0002)
- p2003: 50
- p2653: 0; = p2262*(p1078+p1080)
- p2366: 0; = p2225*p2195
- p2010: 0.00304766; = ((p1984*p1985+p1990*p1991+p1996*p1997+p2004*p2005)/p0818)*p0005*p0002/1000
- p0794: 0.071; = p0134*(1+p0662*p0266/100)
- p2797: 0; = p2406*(p1019+p1021)
- p3025: 0; = p2244*p1023
- p3230: 8.09603e-7; = p1170/p0818
- p1178: 3.78034e-7; = p1176/p0818
- p2063: 2.01468
- p3324: 0; = if(and(p1232=0;p3255<>0);p3266*(p3279*(p3284*p1256+p3286*(p1253+p1257)+p1258*p3288+p3299*p3287));0)
- p4517: 7.38256e-5; = p1756*p3481
- p2542: 8.6659e-5; = p2346*p1073
- p2363: 0; = p2225*p2191
- p3332: 0; = if(and(p1232=0;p3255<>0);IF((p3328+p3329+p3330+p3331)+(p3255*(p3265*(1-p3277))/p3327)>p3255;p3255-(p3328+p3329+p3330+p3331);p3255*(p3265*(1-p3277))/p3327);0)
- p0580: 0; = IF(p0316<0.5;-SQRT(p0007*EXP(p0448^2*p0008)-p0007);SQRT(p0007*EXP(p0448^2*p0008)-p0007))
- p2759: 0; = p2368*(p1019+p1021)
- p0679: 28.728; = p0019*(1+p0547*p0151/100)
- p1172: 8.09603e-7; = p1170/p0818
- p0009: 41.3071
- p0650: 0; = IF(p0386<0.5;-SQRT(p0007*EXP(p0518^2*p0008)-p0007);SQRT(p0007*EXP(p0518^2*p0008)-p0007))
- p1920: 0
- p1756: 8.60699e-5; = p1348*1000/p0818
- p2935: 0; = p2349*(p1079+p1081)
- p0639: 0; = IF(p0375<0.5;-SQRT(p0007*EXP(p0507^2*p0008)-p0007);SQRT(p0007*EXP(p0507^2*p0008)-p0007))
- p0789: 0
- p0824: 0.894444
- p0836: 5.2225e7; = p0831*p0835*p0801/(1-p0831)
- p1324: 0.811924; = IF(((p0745*1000*p0751/100)+(p0754*1000*p0760/100))/p0801<0;0;((p0745*1000*p0751/100)+(p0754*1000*p0760/100))/p0801)
- p0656: 0; = IF(p0392<0.5;-SQRT(p0007*EXP(p0524^2*p0008)-p0007);SQRT(p0007*EXP(p0524^2*p0008)-p0007))
- p2730: 0.000805426; = p2339*(p1078+p1080)
- p1560: 0
- p3690: 0; = p1963*p3476
- p2142: 1.73394e-6; = p2015*p2070*p2104/(p0818*1000)
- p3312: 0; = if(and(p1232=0;p3253<>0);p3261*p3277*(p3298*p3290+(1-p3298)*p3294);0)
- p1064: 0.0146655; = IF(p1012=0;p1050/(p1057*p0818);0)
- p2067: 0.446471
- p2068: 0.153529
- p4430: 0; = p1875*p3480
- p2050: 0.952062
- p1740: 0
- p1802: 0
- p2259: 0; = p2226*p2205
- p1757: 0
- p3091: 1.62275e-5; = p2310*p1082
- p0535: 0; = SQRT(2)*(IF((2*p0403-1)<0;-1;IF((2*p0403-1)>0;1;0))*SQRT(SQRT((2/(pi()*0.140012289)+LN(1-(2*p0403-1)^2)/2)^2-LN(1-(2*p0403-1)^2)/0.140012289)-(2/(pi()*0.140012289)+LN(1-(2*p0403-1)^2)/2)))
- p1212: 0.0101467; = if(p1211=0;0;if(p1193>0;0;(p1207+p1208+p1209)*p1210/(2000*p1211)))
- p2487: 7.62678e-6; = p2291*p1014
- p0898: 0.445
- p2107: 0.881623
- p1598: 0
- p2738: 6.84517e-5; = p2347*(p1078+p1080)
- p0518: 0; = SQRT(2)*(IF((2*p0386-1)<0;-1;IF((2*p0386-1)>0;1;0))*SQRT(SQRT((2/(pi()*0.140012289)+LN(1-(2*p0386-1)^2)/2)^2-LN(1-(2*p0386-1)^2)/0.140012289)-(2/(pi()*0.140012289)+LN(1-(2*p0386-1)^2)/2)))
- p0379: 0.5
- p3243: 2.06491e-9; = p3234*p1188*p3239/p0818
- p3473: 0.00172804; = p3378*p1241
- p1578: 0.6832
- p1067: 0.00449179; = IF(p1012=0;p1053/(p1060*p0818);0)
- p2051: 0.000184073; = p2015*p2049*p2050/(p0818*1000)
- p0138: 46.557
- p0920: 0.411843; = p0676*1000/p0801
- p3059: 5.40607e-6; = p2278*p1023
- p0681: 0
- p1977: 6.95404e7; = p1252+p1188
- p0247: 7.553
- p0384: 0.5
- p4353: 0; = p1798*p3480
- p3389: 0; = p3370*p1234
- p1760: 0
- p1753: 0
- p2604: 0; = p2408*p1014
- p3411: 0; = p3373*p1238
- p2372: 0; = p2225*p2201
- p1342: 0; = p1326*p0801
- p1951: 0
- p0343: 0.5
- p3469: 0.00145632; = p3374*p1241
- p2462: 0; = p2266*p1073
- p1661: 0
- p1679: 0
- p2942: 0; = p2356*(p1020+p1022)
- p1623: 0
- p0103: 489.004
- p2438: 0; = p2242*p1014
- p2234: 0; = 1-(p2222+p2223+p2224+p2225)
- p3130: 3.79474e-5; = p2349*p1082
- p0707: 11.665; = p0047*(1+p0575*p0179/100)
- p0931: 28728; = p0801*p0925
- p2216: 0.000100627; = p1108/p0818
- p1972: 0; = if(p0807=480;p1967*p0001/(p0818*p0002);0)
- p3202: 0; = p2421*p1082
- p1703: 0
- p2591: 0; = p2395*p1014
- p2344: 3.78019e-6; = p2228*p2212
- p3200: 0; = p2419*p1082
- p3276: 0.0887032
- p3107: 0.000154408; = p2326*p1023
- p3133: 0; = p2352*p1132
- p0316: 0.5
- p0196: 31.61
- p0966: 0; = if(p0683=0;0;IF(p0684/100+p0965=1;0;1-(p0684/100+p0965)))
- p1098: 0.0190972
- p3117: 0.000122295; = p2336*p1082
- p0263: 54.048
- p1773: 0
- p3248: 0.84
- p2775: 0; = p2384*(p1078+p1080)
- p1628: 0
- p2907: 0.000179318; = p2321*(p1020+p1022)
- p2703: 0; = p2312*(p1128+p1130)
- p2468: 0; = p2272*p1123
- p1995: 50
- p3297: 0; = if(p1273+p1274+p1275+p1276=0;0;p1273/(p1273+p1274+p1275+p1276))
- p2157: 3.15596e-7; = p2015*p2086*p2119/(p0818*1000)
- p3113: 0.000116412; = p2332*p1023
- p1110: 950423; = IF(p1071=0;p1105*p1104*p1095;0)
- p2565: 0; = p2369*p1014
- p0684: 0
- p3214: 0.376406; = p1222*40.078/100.0869
- p2692: 0.000102216; = p2301*(p1078+p1080)
- p1124: 0; = if(p1121=0;p0718/100;0)
- p1700: 0
- p0307: 0.5
- p2770: 0; = p2379*(p1078+p1080)
- p0046: 14.996
- p1711: 0
- p2420: 0; = p2235*p2210
- p0892: 258.168; = if(p0891=0;0;(1-p1240)*p3251/p0891)
- p1705: 0
- p3002: 0; = p2416*(p1079+p1081)
- p2863: 0.000165764; = p2277*(p1020+p1022)
- p0916: 0.303875; = p0826+(p0832*(1+p0894))/p0818
- p2116: 0.444424
- p1089: 0.000348411; = IF(p1071=0;p1083*p0001/(p0818*p0002);0)
- p1812: 0
- p3157: 0; = p2376*p1082
- p3003: 0; = p2417*(p1079+p1081)
- p1839: 0
- p0188: 32.281
- p2747: 0; = p2356*(p1019+p1021)
- p1664: 0
- p0579: 0; = IF(p0315<0.5;-SQRT(p0007*EXP(p0447^2*p0008)-p0007);SQRT(p0007*EXP(p0447^2*p0008)-p0007))
- p3454: 0; = p3378*p1240
- p1249: 0; = if(p1232>0;0;p1244*p0001/(p0818*p0002))
- p0754: 0
- p3392: 0; = p3373*p1234
- p2180: 2.40838e-7; = p3233*p1188/(p0818)
- p0979: 0; = IF(p0976=0;0;p0976*p0001/(p0818*p0002))
- p2405: 0; = p2234*p2195
- p2027: 0.428799
- p0913: 0.0161526
- p2391: 0; = p2233*p2220
- p1550: 0.783979
- p1278: 0
- p0371: 0.5
- p2814: 0; = p2423*(p1078+p1080)
- p1702: 0
- p1091: 0; = IF(p1071=0;p1085*p0001/(p0818*p0002);0)
- p3337: 0; = IF(or(p3254=0;p1232>0);0;p3272*p3289)
- p0917: 1.45595
- p2031: 0.465411
- p0312: 0.5
- p1644: 0
- p4925: 0; = p1962*p3482
- p1269: 0
- p2782: 0; = p2391*(p1128+p1130)
- p3421: 0; = p3364*p1239
- p0828: 0; = if(p0827=0;0;p0819-p0827/p0818)
- p2646: 0; = p2255*(p1019+p1021)
- p4721: 0; = p1754*p3482
- p0823: 0
- p3301: 0.130394; = if(and(p1232=0;p3252<>0);p3257*p3277*(p3297*p3290+(1-p3297)*p3294);0)
- p1314: 0.0457295; = p1310*p1252/p0818
- p0694: 0
- p3094: 0; = p2313*p1132
- p1726: 0
- p3397: 0; = p3378*p1234
- p2385: 0; = p2229*p2214
- p2704: 0; = p2313*(p1128+p1130)
- p3234: 0.39606; = 1-p3233
- p0042: 489.004
- p3606: 0; = p1875*p3476
- p3080: 1.53166e-5; = p2299*p1082
- p0814: 0; = if(p0807=480;p0810*p0812+p0811*p0813;0)
- p3083: 1.7067e-5; = p2302*p1082
- p0894: 0.25
- p1557: 0
- p1683: 0
- p2020: 88382.5; = p2015*p2018*p2019
- p1373: 3
- p1123: 0.58019; = if(p1121=0;p0717/100;0)
- p0638: 0; = IF(p0374<0.5;-SQRT(p0007*EXP(p0506^2*p0008)-p0007);SQRT(p0007*EXP(p0506^2*p0008)-p0007))
- p2617: 0; = p2421*p1073
- p2201: 0.00386353; = 12.01*p2200/(2*14.0067)
- p2785: 0; = p2394*(p1019+p1021)
- p2740: 0.000102774; = p2349*(p1078+p1080)
- p2953: 0; = p2367*(p1020+p1022)
- p1286: 0; = p1282*p1252/p0818
- p1139: 5.34271e-5; = if(p1121=0;p1133*p0001/(p0818*p0002);0)
- p1002: 0; = p0996*p0888
- p3126: 2.37449e-6; = p2345*p1082
- p2223: 0.538316; = if(p0765*p0769+p0766*p0770+p0767*p0771+p0768*p0772=0;0;p0770*p0766/(p0765*p0769+p0766*p0770+p0767*p0771+p0768*p0772))
- p3460: 0.000343274; = p3365*p1241
- p2757: 0; = p2366*(p1019+p1021)
- p2082: 0.285294
- p2167: 0.326092; = p2166*(p0898)
- p0685: 0
- p1609: 0
- p2858: 0; = p2272*(p1129+p1131)
- p1903: 0
- p0947: 0.000294084; = if(and(p0683=0;or(p0807=480;p0807=32;p0807=1;and(p0807=60;p0901<0.03)));p0935;0)
- p0648: 0; = IF(p0384<0.5;-SQRT(p0007*EXP(p0516^2*p0008)-p0007);SQRT(p0007*EXP(p0516^2*p0008)-p0007))
- p1552: 0.80831
- p0991: 0; = p0987*p0886
- p2843: 0; = p2257*(p1020+p1022)
- p0666: 0; = IF(p0402<0.5;-SQRT(p0007*EXP(p0534^2*p0008)-p0007);SQRT(p0007*EXP(p0534^2*p0008)-p0007))
- p0840: 0.0752005; = p0839*p0831
- p3237: 0.854735
- p0043: 489.004
- p1996: 30
- p2531: 0.00195606; = p2335*p1014
- p1625: 0
- p2985: 0; = p2399*(p1020+p1022)
- p2908: 5.08006e-5; = p2322*(p1020+p1022)
- p2360: 0; = p2225*p2188
- p2639: 0; = p2248*(p1019+p1021)
- p1215: 0; = IF(p1214=0;0;(p1214-1.5)/(p1214-1)^2)
- p1597: 0
- p2561: 0; = p2365*p1014
- p2877: 1.33859e-6; = p2291*(p1020+p1022)
- p2230: 0; = if(p0783*p0787+p0784*p0788+p0785*p0789+p0786*p0790=0;0;p0787*p0783/(p0783*p0787+p0784*p0788+p0785*p0789+p0786*p0790))
- p2875: 0.00159047; = p2289*(p1020+p1022)
- p1783: 0
- p1782: 1.98623e-5; = p1374*1000/p0818
- p0122: 9.564
- p1926: 0
- p0619: 0; = IF(p0355<0.5;-SQRT(p0007*EXP(p0487^2*p0008)-p0007);SQRT(p0007*EXP(p0487^2*p0008)-p0007))
- p2156: 1.71323e-7; = p2015*p2085*p2118/(p0818*1000)
- p1915: 0
- p2408: 0; = p2234*p2198
- p2636: 0; = p2245*(p1019+p1021)
- p4336: 0; = p1781*p3480
- p1829: 0
- p0825: 4.07506e8; = p0818*p0822
- p1159: 0.5
- p0899: 4.93323e8; = p0825*p0896+(p0830+p0895)*p0824*p0898
- p1803: 0
- p2662: 0; = p2271*(p1078+p1080)
- p2401: 0; = p2234*p2190
- p1088: 13675.9; = IF(p1071=0;p1082*(p0710/100)*p0703*1000;0)
- p2593: 0; = p2397*p1014
- p1558: 0
- p2428: 0.00132855; = p2236*p2218
- p0001: 0.404686
- p3355: 243964; = if(and(p1232=0;p3256<>0);p3256-(p3350+p3351+p3352+p3353+p3354);0)
- p2270: 0; = p2226*p2216
- p2794: 0; = p2403*(p1019+p1021)
- p0922: 0; = p0677*1000/p0801
- p0795: 48.338; = p0135*(1+p0663*p0267/100)
- p1245: 0; = if(p1232>0;0;p1240*(p0725/100)*p0723*1000)
- p3481: 0.85774; = if(p1328+p1330+p1332+p1334+p1336+p1338+p1340+p1342+p1344=0;0;p1338/(p1328+p1330+p1332+p1334+p1336+p1338+p1340+p1342+p1344))
- p2690: 4.14825e-5; = p2299*(p1078+p1080)
- p1869: 0
- p2122: 0.341195
- p2194: 0.214362
- p2011: 0.00728322
- p2649: 0; = p2258*(p1078+p1080)
- p1891: 0
- p1787: 0
- p1611: 0
- p1930: 0
- p3326: 0; = if(and(p1232=0;p3255<>0);p3268*p3289;0)
- p0606: 0; = IF(p0342<0.5;-SQRT(p0007*EXP(p0474^2*p0008)-p0007);SQRT(p0007*EXP(p0474^2*p0008)-p0007))
- p0744: 0
- p1321: 0.0893766; = IF(((p0745*1000*p0748/100)+(p0754*1000*p0757/100))/p0801<0;0;((p0745*1000*p0748/100)+(p0754*1000*p0757/100))/p0801)
- p1851: 0
- p2671: 0.000185689; = p2280*(p1019+p1021)
- p2491: 0.000198944; = p2295*p1014
- p0004: 0.0254
- p3104: 1.39475e-5; = p2323*p1023
- p2049: 25.6942
- p2718: 0.000225637; = p2327*(p1019+p1021)
- p0643: 0; = IF(p0379<0.5;-SQRT(p0007*EXP(p0511^2*p0008)-p0007);SQRT(p0007*EXP(p0511^2*p0008)-p0007))
- p1746: 0
- p2033: 2.15728e-5; = p2015*p2029*p2031/(p0818*1000)
- p2197: 1.29875e-5; = p1055/p0818
- p0438: 0; = SQRT(2)*(IF((2*p0306-1)<0;-1;IF((2*p0306-1)>0;1;0))*SQRT(SQRT((2/(pi()*0.140012289)+LN(1-(2*p0306-1)^2)/2)^2-LN(1-(2*p0306-1)^2)/0.140012289)-(2/(pi()*0.140012289)+LN(1-(2*p0306-1)^2)/2)))
- p2918: 0.000485329; = p2332*(p1020+p1022)
- p3006: 0; = p2420*(p1079+p1081)
- p1303: 0; = p1297*p1252/p0818
- p3430: 0; = p3373*p1239
- p3210: 0.000785968; = p2429*p1132
- p3043: 0; = p2262*p1082
- p0861: 0; = p0673*1000/p0856
- p2755: 0; = p2364*(p1019+p1021)
- p0444: 0; = SQRT(2)*(IF((2*p0312-1)<0;-1;IF((2*p0312-1)>0;1;0))*SQRT(SQRT((2/(pi()*0.140012289)+LN(1-(2*p0312-1)^2)/2)^2-LN(1-(2*p0312-1)^2)/0.140012289)-(2/(pi()*0.140012289)+LN(1-(2*p0312-1)^2)/2)))
- p3408: 0; = p3370*p1238
- p0584: 0; = IF(p0320<0.5;-SQRT(p0007*EXP(p0452^2*p0008)-p0007);SQRT(p0007*EXP(p0452^2*p0008)-p0007))
- p2700: 4.90375e-6; = p2309*(p1078+p1080)
- p0380: 0.5
- p2575: 0; = p2379*p1073
- p3106: 2.83845e-5; = p2325*p1023
- p3044: 0; = p2263*p1082
- p2092: 0.54529
- p1230: 0.5
- p2126: 5.47028e-6; = p2015*p2054*p2088/(p0818*1000)
- p3096: 0.000155347; = p2315*p1023
- p2109: 0.826583
- p1947: 0
- p2862: 0.000755148; = p2276*(p1020+p1022)
- p2141: 1.30861e-6; = p2015*p2069*p2103/(p0818*1000)
- p3422: 0; = p3365*p1239
- p2132: 1.89071e-6; = p2015*p2060*p2094/(p0818*1000)
- p2482: 0.000786151; = p2286*p1014
- p3391: 0; = p3372*p1234
- p3173: 0; = p2392*p1132
- p0395: 0.5
- p2176: 0.00556273; = p0895*p0913/p0818
- p2409: 0; = p2234*p2199
- p1649: 0
- p0609: 0; = IF(p0345<0.5;-SQRT(p0007*EXP(p0477^2*p0008)-p0007);SQRT(p0007*EXP(p0477^2*p0008)-p0007))
- p1136: 0; = if(p1121=0;p1130*(p0716/100)*p0703*1000;0)
- p2464: 0; = p2268*p1073
- p3269: 0.851786
- p1035: 1.86504e-5; = IF(p1012=0;p1029*p0001/(p0818*p0002);0)
- p1672: 0
- p3482: 0; = if(p1328+p1330+p1332+p1334+p1336+p1338+p1340+p1342+p1344=0;0;p1340/(p1328+p1330+p1332+p1334+p1336+p1338+p1340+p1342+p1344))
- p2951: 0; = p2365*(p1020+p1022)
- p1790: 0
- p3453: 0; = p3377*p1240
- p2345: 3.95288e-5; = p2228*p2213
- p0402: 0.5
- p0509: 0; = SQRT(2)*(IF((2*p0377-1)<0;-1;IF((2*p0377-1)>0;1;0))*SQRT(SQRT((2/(pi()*0.140012289)+LN(1-(2*p0377-1)^2)/2)^2-LN(1-(2*p0377-1)^2)/0.140012289)-(2/(pi()*0.140012289)+LN(1-(2*p0377-1)^2)/2)))
- p3100: 2.33614e-5; = p2319*p1023
- p3448: 0; = p3372*p1240
- p1316: 0.00123999; = p1312*p1252/p0818
- p0474: 0; = SQRT(2)*(IF((2*p0342-1)<0;-1;IF((2*p0342-1)>0;1;0))*SQRT(SQRT((2/(pi()*0.140012289)+LN(1-(2*p0342-1)^2)/2)^2-LN(1-(2*p0342-1)^2)/0.140012289)-(2/(pi()*0.140012289)+LN(1-(2*p0342-1)^2)/2)))
- p2946: 0; = p2360*(p1020+p1022)
- p0677: 0
- p0047: 11.665
- p1948: 0
- p1579: 0
- p2501: 1.25643e-6; = p2305*p1073
- p3322: 0; = if(and(p1232=0;p3253<>0);p3253-(p3317+p3318+p3319+p3320+p3321);0)
- p3160: 0; = p2379*p1082
- p1949: 0
- p2368: 0; = p2225*p2197
- p1670: 0.74211
- p2840: 0; = p2254*(p1020+p1022)
- p1716: 0
- p1131: 0; = if(p1121=0;IF(p1123+p1128+p1129+p1130=1;0;IF(p1123+p1128+p1129+p1130+p1127>1;1-(p1123+p1128+p1129+p1130);p1127));0)
- p2341: 0.000664399; = p2228*p2209
- p3402: 0.000118655; = p3364*p1238
- p1881: 0
- p1731: 0
- p2189: 0.000943277; = p1053/p0818
- p0266: 51.188
- p0701: 0
- p0879: 0; = p0878*p0001*p0003/(p0818*p0002)
- p2311: 0; = p2231*p2218
- p2630: 0; = p2239*(p1019+p1021)
- p0141: 89.3458
- p3166: 0; = p2385*p1082
- p0405: 0; = SQRT(2)*(IF((2*p0273-1)<0;-1;IF((2*p0273-1)>0;1;0))*SQRT(SQRT((2/(pi()*0.140012289)+LN(1-(2*p0273-1)^2)/2)^2-LN(1-(2*p0273-1)^2)/0.140012289)-(2/(pi()*0.140012289)+LN(1-(2*p0273-1)^2)/2)))
- p1173: 0.5
- p0245: 17.861
- p2219: 0.0018722; = p1154-p2218
- p1606: 0
- p2813: 0; = p2422*(p1078+p1080)
- p3151: 0; = p2370*p1023
- p1183: 0.000964796; = p0801*p0001/(p0818*p0002)
- p2093: 0.260958
- p2212: 5.39672e-6; = p1106/p0818
- p0810: 0
- p0953: 0; = if(and(p0683>0;or(p0807=56;p0807=100;and(p0807=60;p0901>0.06)));p0935;0)
- p2841: 0; = p2255*(p1020+p1022)
- p0081: 0.588
- p1197: 1.806
- p1046: 0.0261194; = IF(p1012=0;IF(p1037+p1044+p1045=1;0;IF(p1037+p1044+p1045+p1040>1;1-(p1037+p1044+p1045);p1040));0)
- p2669: 3.68532e-5; = p2278*(p1019+p1021)
- p0786: 0
- p2305: 1.61653e-6; = p2227*p2212
- p1800: 0
- p2006: 0.373742; = ((p1980*p1985+p1986*p1991+p1992*p1997+p2000*p2005)/p0818)*p0005*p0002/1000
- p1968: 0; = if(p0807=480;p0802*p0811;0)
- p2902: 0.000142167; = p2316*(p1020+p1022)
- p0826: 0.100667; = 1-p0825/p0818
- p0738: 489.004; = p0078*(1+p0606*p0210/100)
- p1130: 0; = if(p1121=0;IF(p1123+p1128+p1129=1;0;IF(p1123+p1128+p1129+p1126>1;1-(p1123+p1128+p1129);p1126));0)
- p2000: 4000
- p0383: 0.5
- p1022: 0; = IF(p1012=0;IF(p1014+p1019+p1020+p1021=1;0;IF(p1014+p1019+p1020+p1021+p1018>1;1-(p1014+p1019+p1020+p1021);p1018));0)
- p1279: 0
- p1743: 0
- p2460: 0; = p2264*p1073
- p1886: 0
- p1151: 79265.5; = if(p1121=0;p1149*p1148*p1145;0)
- p1640: 0
- p0873: 0; = p0872*p0001*p0003/(p0818*p0002)
- p1651: 0.299611
- p0111: 82.759
- p0272: 32.281
- p2525: 3.98519e-6; = p2329*p1014
- p2865: 7.76315e-5; = p2279*(p1020+p1022)
- p0970: 0; = p0967/p0818
- p2522: 0.00366777; = p2326*p1014
- p0578: 0; = IF(p0314<0.5;-SQRT(p0007*EXP(p0446^2*p0008)-p0007);SQRT(p0007*EXP(p0446^2*p0008)-p0007))
- p5160: 3.16737e-7; = p1781*p3484
- p2556: 0; = p2360*p1014
- p2939: 0; = p2353*(p1129+p1131)
- p3323: 0; = if(and(p1232=0;p3255<>0);p3265*p3277*(p3299*p3291+(1-p3299)*p3295);0)
- p3474: 0.00027646; = p3379*p1241
- p3259: 0.00796296
- p1847: 0
- p1047: 0.33098; = IF(p1012=0;IF(p1037+p1044+p1045+p1046=1;0;IF(p1037+p1044+p1045+p1046+p1041>1;1-(p1037+p1044+p1045+p1046);p1041));0)
- p0223: 9.075
- p2494: 0.000611995; = p2298*p1073
- p1688: 0
- p3217: 0.00246696; = p3213*p1228
- p2117: 0.585147
- p2057: 3.28794
- p2144: 8.63398e-7; = p2015*p2072*p2106/(p0818*1000)
- p0104: 69.229
- p1792: 0
- p3285: 0.275
- p3028: 0; = p2247*p1023
- p2478: 0.00119128; = p2282*p1014
- p1706: 0
- p1345: 4.36905e-5; = IF(p1318=0;p1344*p0001/(p0818*p0002);0)
- p2228: 0.70046; = if(p0774*p0778+p0775*p0779+p0776*p0780+p0777*p0781=0;0;p0780*p0776/(p0774*p0778+p0775*p0779+p0776*p0780+p0777*p0781))
- p3167: 0; = p2386*p1082
- p2834: 0; = p2248*(p1020+p1022)
- p0934: 0.000214844; = p0928*p0001/(p0818*p0002)
- p2424: 0; = p2235*p2214
- p2513: 0.000110134; = p2317*p1014
- p3184: 0; = p2403*p1023
- p0641: 0; = IF(p0377<0.5;-SQRT(p0007*EXP(p0509^2*p0008)-p0007);SQRT(p0007*EXP(p0509^2*p0008)-p0007))
- p2356: 0; = p2225*p2184
- p1165: 0.000964796; = p0801*p0001/(p0818*p0002)
- p2954: 0; = p2368*(p1020+p1022)
- p2539: 0.0029198; = p2343*p1073
- p3142: 0; = p2361*p1023
- p3018: 0; = p2237*p1023
- p1856: 0
- p0827: 0; = p0818*p0819*p0823
- p1942: 0
- p3420: 0; = p3363*p1239
- p0868: 0; = IF(p0858+p0864+p0865+p0866+p0867=1;0;IF(p0858+p0864+p0865+p0866+p0867+p0863>1;1-(p0858+p0864+p0865+p0866+p0867);p0863))
- p2672: 2.67248e-5; = p2281*(p1019+p1021)
- p0268: 11.292
- p2958: 0; = p2372*(p1020+p1022)
- p1264: 0; = if(p1232>0;0;IF(p1259+p1263=1;0;IF(p1259+p1263+p1261>1;1-(p1259+p1263);p1261)))
- p2148: 3.67266e-7; = p2015*p2076*p2110/(p0818*1000)
- p3367: 0.00101705; = if(p1232=0;p3244*p3361/p0818;0)
- p0334: 0.5
- p0971: 0; = p0968/p0818
- p1214: 0; = IF(p1213=0;0;p1213-1)
- p1168: 2.53481e-6; = p1164*p1167/p0818
- p0327: 0.5
- p0740: 57.34; = p0080*(1+p0608*p0212/100)
- p2088: 0.798875
- p1009: 0; = p1005*p0001*p0004/(p0818*p0002)
- p1043: 0.249535
- p2530: 0.000170623; = p2334*p1014
- p3164: 0; = p2383*p1082
- p2163: 0.00259747; = (p2017-p2020)/p0818-(p2025+p2028+p2033+p2034+p2051+p2125+p2126+p2127+p2128+p2129+p2130+p2131+p2132+p2133+p2134+p2135+p2136+p2137+p2138+p2139+p2140+p2141+p2142+p2143+p2144+p2145+p2146+p2147+p2148+p2149+p2150+p2151+p2152+p2153+p2154+p2155+p2156+p2157)
- p0329: 0.5
- p0962: 0; = if(and(p0683>0;or(p0807=480;p0807=32;p0807=1;and(p0807=60;p0901<0.03)));p0938;0)
- p3356: 4.04892e6; = if(p1232=0;p3306+p3317+p3328+p3339+p3350;0)
- p1086: 0; = IF(p1071=0;p1080*(p0710/100)*p0703*1000;0)
- p2650: 0; = p2259*(p1078+p1080)
- p2788: 0; = p2397*(p1019+p1021)
- p1671: 0.46617
- p1852: 0
- p0982: 0; = if(p0886=0;0;min(1;(p0691*p0690*1000*p0693/100)/p0886))
- p2892: 0; = p2306*(p1079+p1081)
- p2250: 0; = p2222*p2196
- p1974: 0; = p1969*p0001/(p0818*p0002)
- p1815: 0
- p0050: 46.557
- p1137: 0; = if(p1121=0;p1131*(p0716/100)*p0703*1000;0)
- p3150: 0; = p2369*p1023
- p1840: 0
- p4926: 0; = p1963*p3482
- p1596: 0
- p3077: 9.60157e-5; = p2296*p1023
- p3416: 0.00251765; = p3378*p1238
- p2393: 0; = p2234*p2182
- p1105: 0.436421
- p1723: 0
- p3463: 0; = p3368*p1241
- p2845: 0; = p2259*(p1079+p1081)
- p2413: 0; = p2234*p2203
- p4307: 0; = p1962*p3479
- p1682: 0
- p2805: 0; = p2414*(p1078+p1080)
- p1584: 0
- p2952: 0; = p2366*(p1020+p1022)
- p2457: 0; = p2261*p1073
- p1946: 0
- p2166: 0.732791; = p2165*p0824
- p0876: 0; = p0866*p0856
- p2609: 0; = p2413*p1014
- p0002: 0.453592
- p0377: 0.5
- p2208: 0.00209751; = p1110/p0818
- p3197: 0; = p2416*p1082
- p2362: 0; = p2225*p2190
- p2334: 0.000256718; = p2224*p2202
- p2665: 0; = p2274*(p1128+p1130)
- p2361: 0; = p2225*p2189
- p1771: 0
- p0536: 0; = SQRT(2)*(IF((2*p0404-1)<0;-1;IF((2*p0404-1)>0;1;0))*SQRT(SQRT((2/(pi()*0.140012289)+LN(1-(2*p0404-1)^2)/2)^2-LN(1-(2*p0404-1)^2)/0.140012289)-(2/(pi()*0.140012289)+LN(1-(2*p0404-1)^2)/2)))
- p1964: 0.5
- p2104: 0.817136
- p2998: 0; = p2412*(p1020+p1022)
- p3011: 0; = p2425*(p1079+p1081)
- p2959: 0; = p2373*(p1020+p1022)
- p0572: 0; = IF(p0308<0.5;-SQRT(p0007*EXP(p0440^2*p0008)-p0007);SQRT(p0007*EXP(p0440^2*p0008)-p0007))
- p1744: 0
- p2979: 0; = p2393*(p1020+p1022)
- p0511: 0; = SQRT(2)*(IF((2*p0379-1)<0;-1;IF((2*p0379-1)>0;1;0))*SQRT(SQRT((2/(pi()*0.140012289)+LN(1-(2*p0379-1)^2)/2)^2-LN(1-(2*p0379-1)^2)/0.140012289)-(2/(pi()*0.140012289)+LN(1-(2*p0379-1)^2)/2)))
- p3487: 0; = p1756*p3476
- p1986: 4200
- p1970: 490000; = p0801
- p1747: 0
- p3586: 0; = p1855*p3476
- p2474: 0.000128414; = p2278*p1014
- p2850: 0; = p2264*(p1079+p1081)
- p1116: 6.18293e-5; = IF(p1071=0;p1106/(p1111*p0818);0)
- p2578: 0; = p2382*p1073
- p1794: 0
- p1697: 0
- p0936: 0.000397344; = p0930*p0001/(p0818*p0002)
- p2804: 0; = p2413*(p1019+p1021)
- p2183: 0.00263978; = p1064-p2182
- p4308: 0; = p1963*p3479
- p2567: 0; = p2371*p1014
- p2749: 0; = p2358*(p1019+p1021)
- p2810: 0; = p2419*(p1078+p1080)
- p2633: 0; = p2242*(p1019+p1021)
- p0941: 0; = if(and(p0683=0;p0947=0);p0935;0)
- p1791: 0
- p0954: 0; = if(and(p0683>0;or(p0807=56;p0807=100;and(p0807=60;p0901>0.06)));p0936;0)
- p2445: 0; = p2249*p1014
- p3260: 0.0343561
- p0548: 0; = IF(p0284<0.5;-SQRT(p0007*EXP(p0416^2*p0008)-p0007);SQRT(p0007*EXP(p0416^2*p0008)-p0007))
- p3052: 0; = p2271*p1082
- p0184: 39.681
- p0805: 0
- p1727: 0
- p0968: 0
- p2768: 0; = p2377*(p1078+p1080)
- p3183: 0; = p2402*p1023
- p1148: 0.116352; = if(p1121=0;IF(p1146=1;0;1-p1146);0)
- p2676: 2.7879e-5; = p2285*(p1019+p1021)
- p3001: 0; = p2415*(p1079+p1081)
- p2274: 0; = p2230*p2220
- p3228: 0.000640197; = p3224*p1229
- p2780: 0; = p2389*(p1128+p1130)
- p1954: 0
- p5254: 4.22316e-6; = p1875*p3484
- p0815: 0
- p2231: 0; = if(p0783*p0787+p0784*p0788+p0785*p0789+p0786*p0790=0;0;p0788*p0784/(p0783*p0787+p0784*p0788+p0785*p0789+p0786*p0790))
- p2238: 0; = p2222*p2183
- p2721: 1.8772e-6; = p2330*(p1019+p1021)
- p1943: 0
- p1691: 0
- p2527: 1.43812e-5; = p2331*p1014
- p1895: 0
- p2627: 0.00017637; = p2431*p1123
- p0197: 37.048
- p1610: 0
- p3343: 0; = if(and(p1232=0;p3254<>0);IF((p3339+p3340+p3341+p3342)+(p3254*(p3269*(1-p3277))/p3338)>p3254;p3254-(p3339+p3340+p3341+p3342);p3254*(p3269*(1-p3277))/p3338);0)
- p1188: 180.694; = p1187*p0801
- p2143: 1.00919e-6; = p2015*p2071*p2105/(p0818*1000)
- p1247: 0; = if(p1232>0;0;p1242*p0001/(p0818*p0002))
- p2028: 0.000206179; = p2015*p2026*p2027/(p0818*1000)
- p2498: 0.000220829; = p2302*p1073
- p1667: 0
- p5047: 0; = p1874*p3483
- p2592: 0; = p2396*p1014
- p1144: 3.86584e-5; = if(p1121=0;p1138*p0001/(p0818*p0002);0)
- p2988: 0; = p2402*(p1020+p1022)
- p2904: 6.65801e-5; = p2318*(p1020+p1022)
- p3034: 0; = p2253*p1023
- p1603: 0
- p3275: 0.0214527
- p0708: 4.078; = p0048*(1+p0576*p0180/100)
- p1310: 0.29797; = IF(p1307=p1266;0;IF(p1307+p1308>p1266;p1266-p1307;p1308))
- p1713: 0
- p1739: 0
- p1879: 0
- p3293: 0.3875
- p0863: 0; = p0675*1000/p0856
- p1734: 0
- p2716: 0.000193497; = p2325*(p1019+p1021)
- p0695: 0
- p0516: 0; = SQRT(2)*(IF((2*p0384-1)<0;-1;IF((2*p0384-1)>0;1;0))*SQRT(SQRT((2/(pi()*0.140012289)+LN(1-(2*p0384-1)^2)/2)^2-LN(1-(2*p0384-1)^2)/0.140012289)-(2/(pi()*0.140012289)+LN(1-(2*p0384-1)^2)/2)))
- p2473: 0.000944465; = p2277*p1014
- p2837: 0; = p2251*(p1020+p1022)
- p1630: 0
- p1570: 0
- p3341: 0; = if(and(p1232=0;p3254<>0);p3254*(p3271-p3336)/p3338;0)
- p1861: 0
- p2761: 0; = p2370*(p1019+p1021)
- p2705: 0; = p2314*(p1128+p1130)
- p2481: 9.71439e-5; = p2285*p1014
- p1167: 0.5
- p2589: 0; = p2393*p1014
- p3370: 0; = if(p1232=0;p3245*p3358/p0818;0)
- p0691: 0
- p0905: 0.0402423; = p0904/p0818
- p1206: 0.0203832
- p3010: 0; = p2424*(p1079+p1081)
- p1921: 0
- p3605: 0; = p1874*p3476
- p1196: 0.59
- p0613: 0; = IF(p0349<0.5;-SQRT(p0007*EXP(p0481^2*p0008)-p0007);SQRT(p0007*EXP(p0481^2*p0008)-p0007))
- p1179: 0.5
- p1665: 0
- p1263: 0; = if(p1232>0;0;IF(p1259=1;0;IF(p1259+p1260>1;1-p1259;p1260)))
- p3365: 0.000843404; = if(p1232=0;p3244*p3359/p0818;0)
- p3270: 0.0747083
- p3084: 7.36899e-6; = p2303*p1082
- p2866: 0.000113561; = p2280*(p1020+p1022)
- p1338: 397843; = p1324*p0801
- p0243: 12.703
- p2626: 0.000101494; = p2430*p1123
- p0724: 1.101; = p0064*(1+p0592*p0196/100)
- p2733: 4.66703e-5; = p2342*(p1078+p1080)
- p3008: 0; = p2422*(p1079+p1081)
- p2914: 0.00136405; = p2328*(p1020+p1022)
- p0831: 0.105556; = 1-p0824
- p3180: 0; = p2399*p1023
- p4429: 0; = p1874*p3480
- p1616: 0
- p1712: 0
- p3289: 0.05
- p2681: 1.33353e-6; = p2290*(p1019+p1021)
- p1467: 40
- p2493: 0.000676669; = p2297*p1073
- p2969: 0; = p2383*(p1079+p1081)
- p0822: 0.899333
- p3277: 0.55
- p3309: 291139; = if(and(p1232=0;p3252<>0);p3252*(p3260-p3304)/p3305;0)
- p3229: 5.06963e-6; = p1164/p0818
- p2495: 0.00019818; = p2299*p1073
- p3287: 0.745
- p2406: 0; = p2234*p2196
- p2944: 0; = p2358*(p1020+p1022)
- p0901: 0.0192471
- p3169: 0; = p2388*p1082
- p3207: 0; = p2426*p1082
- p1033: 2.71824e-5; = IF(p1012=0;p1027*p0001/(p0818*p0002);0)
- p2327: 0.00118296; = p2224*p2195
- p1068: 0.0398434; = IF(p1012=0;p1054/(p1061*p0818);0)
- p0710: 46.557; = p0050*(1+p0578*p0182/100)
- p2130: 5.10479e-6; = p2015*p2058*p2092/(p0818*1000)
- p3128: 2.52744e-5; = p2347*p1082
- p0056: 9.564
- p3372: 0; = if(p1232=0;p3245*p3360/p0818;0)
- p2333: 0.00178373; = p2224*p2201
- p0718: 0
- p2442: 0; = p2246*p1014
- p0310: 0.5
- p2741: 0; = p2350*(p1128+p1130)
- p1678: 0
- p1080: 0; = IF(p1071=0;IF(p1073+p1078+p1079=1;0;IF(p1073+p1078+p1079+p1076>1;1-(p1073+p1078+p1079);p1076));0)
- p0957: 0; = if(and(p0683>0;or(p0807=56;p0807=100;and(p0807=60;p0901>0.06)));p0939;0)
- p3045: 0; = p2264*p1082
- p1874: 1.76554e-5; = p1466*1000/p0818
- p1229: 0.00127543; = IF(p1221=0;0;p1228*p1221)
- p4765: 0; = p1798*p3482
- p2659: 0; = p2268*(p1078+p1080)
- p0727: 59.299; = p0067*(1+p0595*p0199/100)
- p2120: 0.51828
- p2596: 0; = p2400*p1014
- p2576: 0; = p2380*p1073
- p1780: 0
- p2009: 0.0093798; = ((p1983*p1985+p1989*p1991+p1995*p1997+p2003*p2005+p1976*p1977+p1978*p1979+p1998*p1999)/p0818)*p0005*p0002/1000
- p1114: 0.216028
- p1111: 0.0872841
- p3226: 0.000286005; = p3222*p1229
- p0726: 0
- p3321: 0; = if(and(p1232=0;p3253<>0);IF((p3317+p3318+p3319+p3320)+(p3253*(p3261*(1-p3277))/p3316)>p3253;p3253-(p3317+p3318+p3319+p3320);p3253*(p3261*(1-p3277))/p3316);0)
- p2941: 0; = p2355*(p1020+p1022)
- p0875: 0; = p0874*p0001*p0003/(p0818*p0002)
- p0874: 0; = p0865*p0856
- p3092: 0; = p2311*p1132
- p1203: 3
- p3155: 0; = p2374*p1023
- p1076: 0; = IF(p1071=0;p0714/100;0)
- p2957: 0; = p2371*(p1020+p1022)
- p3317: 0; = if(and(p1232=0;p3253<>0);p3253*(p3261*p3277-p3312)/p3316;0)
- p1066: 0.00539835; = IF(p1012=0;p1052/(p1059*p0818);0)
- p2146: 1.55495e-7; = p2015*p2074*p2108/(p0818*1000)
- p3123: 1.72321e-5; = p2342*p1082
- p1329: 0; = p1328*p0001/(p0818*p0002)

- p0524: 0; = SQRT(2)*(IF((2*p0392-1)<0;-1;IF((2*p0392-1)>0;1;0))*SQRT(SQRT((2/(pi()*0.140012289)+LN(1-(2*p0392-1)^2)/2)^2-LN(1-(2*p0392-1)^2)/0.140012289)-(2/(pi()*0.140012289)+LN(1-(2*p0392-1)^2)/2)))
- p0935: 0.000294084; = p0929*p0001/(p0818*p0002)
- p1048: 0.000359624; = IF(p1012=0;IF(p1037+p1044+p1045+p1046+p1047=1;0;IF(p1037+p1044+p1045+p1046+p1047+p1042>1;1-(p1037+p1044+p1045+p1046+p1047);p1042));0)
- p2634: 0; = p2243*(p1019+p1021)
- p1177: 0.000964796; = p0801*p0001/(p0818*p0002)
- p1233: 0; = p1232*p0001/(p0818*p0002)
- p3327: 0; = if(and(p1232=0;p3255<>0);1-(p3323+p3324+p3325+p3326);0)
- p2404: 0; = p2234*p2193
- p1036: 1.6364e7; = IF(p1012=0;p0795*p0702*1000*p0796/100;0)
- p2226: 0; = if(p0774*p0778+p0775*p0779+p0776*p0780+p0777*p0781=0;0;p0778*p0774/(p0774*p0778+p0775*p0779+p0776*p0780+p0777*p0781))
- p0737: 0
- p2296: 0.00343158; = p2223*p2203
- p1981: 400
- p0747: 0
- p0812: 0; = if(p0807=480;0.095/0.34;0)
- p2251: 0; = p2222*p2197
- p1000: 0; = IF(p0996+p0999=1;0;IF(p0996+p0999+p0998>1;1-(p0996+p0999);p0998))
- p3360: 4.80435e6; = if(p1232=0;p3310+p3321+p3332+p3343+p3354;0)
- p0888: 0; = p0686*1000*p0687*p0884/100
- p0070: 69.395
- p1793: 0
- p1194: 1.48
- p0960: 0; = if(and(p0683>0;or(p0807=480;p0807=32;p0807=1;and(p0807=60;p0901<0.03)));p0936;0)
- p0995: 0; = p0991*p0001*p0004/(p0818*p0002)
- p2827: 0; = p2241*(p1020+p1022)
- p0696: 0
- p0716: 9.564; = p0056*(1+p0584*p0188/100)
- p1575: 0
- p1698: 0
- p0773: 46.557; = p0113*(1+p0641*p0245/100)
- p2856: 0; = p2270*(p1079+p1081)
- p3412: 0.00212178; = p3374*p1238
- p2441: 0; = p2245*p1014
- p1816: 0
- p2947: 0; = p2361*(p1020+p1022)
- p1717: 0
- p2249: 0; = p2222*p2195
- p0448: 0; = SQRT(2)*(IF((2*p0316-1)<0;-1;IF((2*p0316-1)>0;1;0))*SQRT(SQRT((2/(pi()*0.140012289)+LN(1-(2*p0316-1)^2)/2)^2-LN(1-(2*p0316-1)^2)/0.140012289)-(2/(pi()*0.140012289)+LN(1-(2*p0316-1)^2)/2)))
- p1346: 2
- p2766: 0; = p2375*(p1078+p1080)
- p0375: 0.5
- p2972: 0; = p2386*(p1079+p1081)
- p3139: 0; = p2358*p1023
- p2108: 0.826583
- p1730: 0
- p0515: 0; = SQRT(2)*(IF((2*p0383-1)<0;-1;IF((2*p0383-1)>0;1;0))*SQRT(SQRT((2/(pi()*0.140012289)+LN(1-(2*p0383-1)^2)/2)^2-LN(1-(2*p0383-1)^2)/0.140012289)-(2/(pi()*0.140012289)+LN(1-(2*p0383-1)^2)/2)))
- p2800: 0; = p2409*(p1019+p1021)
- p1624: 0
- p2956: 0; = p2370*(p1020+p1022)
- p0020: 109.115
- p3424: 0; = p3367*p1239
- p2532: 0.00158236; = p2336*p1073
- p1728: 0
- p4955: 0; = p1782*p3483
- p2772: 0; = p2381*(p1078+p1080)
- p2098: 0.856281
- p3125: 2.27076e-7; = p2344*p1082
- p2647: 0; = p2256*(p1019+p1021)
- p3354: 1.3934e6; = IF((p3350+p3351+p3352+p3353)+IF(p3349=0;0;(p3256*(p3273*(1-p3277))/p3349))>p3256;p3256-(p3350+p3351+p3352+p3353);IF(p3349=0;0;p3256*(p3273*(1-p3277))/p3349))
- p1317: 0
- p4105: 0; = p1756*p3479
- p0829: 0; = if(p0807=480;p0814*(1-p0824);0)
- p3146: 0; = p2365*p1023
- p0994: 0; = p0990*p0001*p0004/(p0818*p0002)
- p0925: 0.0586286; = IF(p0918+p0923+p0924=1;0;IF(p0918+p0923+p0924+p0921>1;1-(p0918+p0923+p0924);p0921))
- p1963f: 3.50445e-5; = p1647*p1851+p1648*p1852+p1649*p1853+p1650*p1854+p1651*p1855+p1652*p1856+p1653*p1857+p1654*p1858+p1655*p1859+p1656*p1860+p1657*p1861+p1658*p1862+p1659*p1863+p1660*p1864+p1661*p1865+p1662*p1866+p1663*p1867+p1664*p1868+p1665*p1869+p1666*p1870
- p2643: 0; = p2252*(p1019+p1021)
- p0667: 0; = IF(p0403<0.5;-SQRT(p0007*EXP(p0535^2*p0008)-p0007);SQRT(p0007*EXP(p0535^2*p0008)-p0007))
- p2960: 0; = p2374*(p1020+p1022)
- p2041: 8.80391e-6; = p2015*p2040/(p0818*1000)
- p2753: 0; = p2362*(p1019+p1021)
- p2688: 0.000141639; = p2297*(p1078+p1080)
- p3307: 376572; = if(and(p1232=0;p3252<>0);p3252*(p3258-p3302)/p3305;0)
- p1030: 0.000443017; = IF(p1012=0;p1024*p0001/(p0818*p0002);0)
- p2955: 0; = p2369*(p1020+p1022)
- p1910: 0
- p2622: 0; = p2426*p1073
- p2724: 0.000340228; = p2333*(p1019+p1021)
- p3016: 0; = p2430*(p1129+p1131)
- p2656: 0; = p2265*(p1078+p1080)
- p1234: 0; = if(p1232>0;0;p0726/100)
- p1582: 0
- p3056: 0; = p2275*p1132
- p1805: 0
- p1259: 0.69395; = if(p1232>0;0;p0730/100)
- p2602: 0; = p2406*p1014
- p2674: 9.68542e-5; = p2283*(p1019+p1021)
- p3134: 0; = p2353*p1132
- p0082: 57.34
- p2964: 0; = p2378*(p1079+p1081)
- p2382: 0; = p2229*p2211
- p2925: 0; = p2339*(p1079+p1081)
- p2342: 0.000286866; = p2228*p2210
- p2608: 0; = p2412*p1014
- p2112: 0.856281
- p1913: 0
- p0182: 17.861
- p2078: 0.117
- p3121: 8.82562e-5; = p2340*p1082
- p4719: 1.83871e-5; = p1962*p3481
- p1133: 27134.5; = if(p1121=0;p1123*(p0716/100)*p0703*1000;0)
- p2463: 0; = p2267*p1073
- p3252: 7.6766e6; = p1252*(p1267*(1-p3247)+p1270*(1-p3248)+p1271*(1-p3249)+p1272*(1-p3250))
- p2667: 0.00123478; = p2276*(p1019+p1021)
- p3406: 0; = p3368*p1238
- p1798: 4.41384e-6; = p1390*1000/p0818
- p3000: 0; = p2414*(p1079+p1081)
- p2192: 0.0021973; = p1067-p2189-p2190-p2191
- p3178: 0; = p2397*p1023
- p1012: 0
- p3032: 0; = p2251*p1023
- p0022: 489.004
- p1963a: 7.30315e-5; = p1550*p1754+p1551*p1755+p1552*p1756+p1553*p1757+p1554*p1758+p1555*p1759+p1556*p1760+p1557*p1761+p1558*p1762+p1559*p1763+p1560*p1764+p1561*p1765+p1562*p1766+p1563*p1767+p1564*p1768+p1565*p1769+p1566*p1770+p1567*p1771+p1568*p1772
- p0930: 201803; = p0801*p0924
- p1737: 0
- p2314: 0; = p2231*p2221
- p1709: 0
- p3012: 0; = p2426*(p1079+p1081)
- p0476: 0; = SQRT(2)*(IF((2*p0344-1)<0;-1;IF((2*p0344-1)>0;1;0))*SQRT(SQRT((2/(pi()*0.140012289)+LN(1-(2*p0344-1)^2)/2)^2-LN(1-(2*p0344-1)^2)/0.140012289)-(2/(pi()*0.140012289)+LN(1-(2*p0344-1)^2)/2)))
- p2456: 0; = p2260*p1073
- p1334: 0; = p1322*p0801
- p2013: 0.75
- p2037: 2.8
- p1045: 0.050076; = IF(p1012=0;IF(p1037+p1044=1;0;IF(p1037+p1044+p1039>1;1-(p1037+p1044);p1039));0)
- p2937: 0; = p2351*(p1129+p1131)
- p0978: 490000; = p0801
- p3240: 1.86516e-8; = p3234*p1188*p3235/p0818
- p1985: 4.74555e7; = (if(p1057=0;0;p1050/p1057)+if(p1058=0;0;p1051/p1058)+if(p1059=0;0;p1052/p1059)+if(p1060=0;0;p1053/p1060)+if(p1061=0;0;p1054/p1061)+if(p1062=0;0;p1055/p1062)+if(p1063=0;0;p1056/p1063))*(1+p1157)
- p2426: 0; = p2235*p2216
- p2434: 0; = p2238*p1014
- p2433: 0; = p2237*p1014
- p1225: 1.088; = IF(p1221=0;0;p1223+1.2*p1224)
- p2384: 0; = p2229*p2213
- p2300: 0.00211707; = p2227*p2207
- p3383: 0; = p3364*p1234
- p1170: 366.847; = p1169*p0801
- p2976: 0; = p2390*(p1129+p1131)
- p1108: 45596; = IF(p1071=0;p1105*p1102*p1095;0)
- p3181: 0; = p2400*p1023
- p3334: 0; = IF(or(p3254=0;p1232>0);0;p3269*p3277*(p3300*p3292+(1-p3300)*p3296))
- p0798: 46.557; = p0138*(1+p0666*p0270/100)
- p3170: 0; = p2389*p1132
- p1636: 0
- p0176: 11.292
- p2864: 2.25382e-5; = p2278*(p1020+p1022)
- p4559: 3.78593e-6; = p1798*p3481
- p3114: 4.99087e-5; = p2333*p1023
- p2294: 0.0020798; = p2223*p2201
- p2860: 0; = p2274*(p1129+p1131)
- p3329: 0; = if(and(p1232=0;p3255<>0);p3255*(p3266-p3324)/p3327;0)
- p2429: 0.0018722; = p2236*p2219
- p2916: 1.14803e-6; = p2330*(p1020+p1022)
- p2392: 0; = p2233*p2221
- p3286: 0.185
- p2152: 1.56581e-7; = p2015*p2080*p2114/(p0818*1000)
- p0927: 0.00203061; = IF(p0918+p0923+p0924+p0925+p0926=1;0;1-(p0918+p0923+p0924+p0925+p0926))
- p3446: 0; = p3370*p1240
- p1336: 0; = p1323*p0801
- p2577: 0; = p2381*p1073
- p2241: 0; = p2222*p2186
- p0842: -0.0116878
- p1900: 0
- p1901: 0
- p1044: 0.00993849; = IF(p1012=0;IF(p1037=1;0;IF(p1037+p1038>1;1-p1037;p1038));0)
- p2423: 0; = p2235*p2213
- p3196: 0; = p2415*p1082
- p0414: 0; = SQRT(2)*(IF((2*p0282-1)<0;-1;IF((2*p0282-1)>0;1;0))*SQRT(SQRT((2/(pi()*0.140012289)+LN(1-(2*p0282-1)^2)/2)^2-LN(1-(2*p0282-1)^2)/0.140012289)-(2/(pi()*0.140012289)+LN(1-(2*p0282-1)^2)/2)))
- p0591: 0; = IF(p0327<0.5;-SQRT(p0007*EXP(p0459^2*p0008)-p0007);SQRT(p0007*EXP(p0459^2*p0008)-p0007))
- p3311: 524660; = if(and(p1232=0;p3252<>0);p3252-(p3306+p3307+p3308+p3309+p3310);0)
- p1078: 0.16269; = IF(p1071=0;IF(p1073=1;0;IF(p1073+p1074>1;1-p1073;p1074));0)
- p1619: 0
- p0574: 0; = IF(p0310<0.5;-SQRT(p0007*EXP(p0442^2*p0008)-p0007);SQRT(p0007*EXP(p0442^2*p0008)-p0007))
- p3258: 0.0491162
- p3461: 0.00258742; = p3366*p1241
- p2701: 4.39497e-5; = p2310*(p1078+p1080)
- p1084: 37038.9; = IF(p1071=0;p1078*(p0710/100)*p0703*1000;0)
- p2789: 0; = p2398*(p1019+p1021)
- p0398: 0.5
- p2744: 0; = p2353*(p1128+p1130)
- p2683: 4.81227e-6; = p2292*(p1019+p1021)
- p5131: 0; = p1962*p3483
- p1213: 0
- p3079: 4.72988e-5; = p2298*p1082
- p3396: 0; = p3377*p1234
- p1675: 0
- p2968: 0; = p2382*(p1079+p1081)
- p2306: 1.69038e-5; = p2227*p2213
- p2477: 9.3122e-5; = p2281*p1014
- p2867: 1.6344e-5; = p2281*(p1020+p1022)
- p0906: 0.0036846
- p3110: 1.67771e-7; = p2329*p1023
- p2399: 0; = p2234*p2188
- p1237: 0; = if(p1232>0;0;p0729/100)
- p2590: 0; = p2394*p1014
- p1157: 0.219481
- p3176: 0; = p2395*p1023
- p1186: 7.05812e-8; = p1182*p1185/p0818
- p2186: 0.00180845; = p1052/p0818
- p3041: 0; = p2260*p1082
- p1681: 0
- p0841: 0.00814837
- p3361: 768624; = if(p1232=0;p3311+p3322+p3333+p3344+p3355;0)
- p1006: 0; = p1002*p0001*p0004/(p0818*p0002)
- p1778: 0
- p1343: 0; = p1342*p0001/(p0818*p0002)
- p1307: 0
- p0722: 0
- p2207: 0.00706775; = p1119-p2205-p2204-p2206
- p0487: 0; = SQRT(2)*(IF((2*p0355-1)<0;-1;IF((2*p0355-1)>0;1;0))*SQRT(SQRT((2/(pi()*0.140012289)+LN(1-(2*p0355-1)^2)/2)^2-LN(1-(2*p0355-1)^2)/0.140012289)-(2/(pi()*0.140012289)+LN(1-(2*p0355-1)^2)/2)))
- p3459: 8.14411e-5; = p3364*p1241
- p2060: 0.272353
- p3429: 0; = p3372*p1239
- p4514: 0; = p1963*p3480
- p0217: 17.499
- p2101: 0.620397
- p3102: 4.30118e-5; = p2321*p1023
- p2266: 0; = p2226*p2212
- p2619: 0; = p2423*p1073
- p2566: 0; = p2370*p1014
- p3049: 0; = p2268*p1082
- p0778: 0
- p2651: 0; = p2260*(p1078+p1080)
- p2483: 0.00427656; = p2287*p1014
- p1304: 0; = p1300*p1252/p0818
- p1797: 0
- p1305: 0; = p1301*p1252/p0818
- p2301: 0.000628287; = p2227*p2208
- p1696: 0
- p1666: 0
- p2536: 0.00114194; = p2340*p1073
- p3484: 0.04784; = IF(p1344=0;0;p1344/(p1328+p1330+p1332+p1334+p1336+p1338+p1340+p1342+p1344))
- p3227: 0.000161773; = p3223*p1229
- p2271: 0; = p2226*p2217
- p1134: 0; = if(p1121=0;p1128*(p0716/100)*p0703*1000;0)
- p0821: 1.7125
- p0830: 6.24192e8; = p0825*p0821*p0824
- p2913: 0.000137992; = p2327*(p1020+p1022)
- p1897: 0
- p2446: 0; = p2250*p1014
- p0466: 0; = SQRT(2)*(IF((2*p0334-1)<0;-1;IF((2*p0334-1)>0;1;0))*SQRT(SQRT((2/(pi()*0.140012289)+LN(1-(2*p0334-1)^2)/2)^2-LN(1-(2*p0334-1)^2)/0.140012289)-(2/(pi()*0.140012289)+LN(1-(2*p0334-1)^2)/2)))
- p2196: 0.0253281; = p1068-p2193-p2195
- p2253: 0; = p2222*p2199
- p3362: 0.00535754; = if(p1232=0;p3244*p3356/p0818;0)
- p2175: 0.000907261; = p0895*p0908/p0818
- p2835: 0; = p2249*(p1020+p1022)
- p2090: 0.40001
- p2989: 0; = p2403*(p1020+p1022)
- p0544: 0; = IF(p0280<0.5;-SQRT(p0007*EXP(p0412^2*p0008)-p0007);SQRT(p0007*EXP(p0412^2*p0008)-p0007))
- p0948: 0.000397344; = if(and(p0683=0;or(p0807=480;p0807=32;p0807=1;and(p0807=60;p0901<0.03)));p0936;0)
- p0907: 0
- p2185: 0.00123628; = p1065-p2184
- p2791: 0; = p2400*(p1019+p1021)
- p0858: 0; = p0670*1000/p0856
- p1042: 0.000359624
- p1647: 0
- p1872: 0
- p3135: 0; = p2354*p1023
- p0909: 3.34002e6
- p2632: 0; = p2241*(p1019+p1021)
- p1685: 0
- p3925: 1.8754e-6; = p1782*p3478
- p2851: 0; = p2265*(p1079+p1081)
- p0669: 41.3071; = p0009*(1+p0537*p0141/100)
- p2059: 1.00168
- p2983: 0; = p2397*(p1020+p1022)
- p1966: 240000; = if(p0814=0;p0802;0)
- p2661: 0; = p2270*(p1078+p1080)
- p1062: 0.16
- p5048: 0; = p1875*p3483
- p3081: 0.000127172; = p2300*p1082
- p1761: 0
- p0914: 1.31282e7; = p0825*p0911+(p0830+p0895)*p0824*p0913
- p1115: 0.237849
- p2505: 2.34273e-5; = p2309*p1073
- p0418: 0; = SQRT(2)*(IF((2*p0286-1)<0;-1;IF((2*p0286-1)>0;1;0))*SQRT(SQRT((2/(pi()*0.140012289)+LN(1-(2*p0286-1)^2)/2)^2-LN(1-(2*p0286-1)^2)/0.140012289)-(2/(pi()*0.140012289)+LN(1-(2*p0286-1)^2)/2)))
- p3296: 0.514
- p2777: 0; = p2386*(p1078+p1080)
- p0758: 0
- p1561: 0
- p3213: 0.112803; = p1222*12.0107/100.0869
- p2722: 4.12722e-6; = p2331*(p1019+p1021)
- p2217: 0.000901864; = p1118-p2216
- p0958: 0; = if(and(p0683>0;or(p0807=480;p0807=32;p0807=1;and(p0807=60;p0901<0.03)));p0934;0)
- p2352: 0; = p2232*p2220
- p1764: 0
- p2240: 0; = p2222*p2185
- p1763: 0
- p2510: 0; = p2314*p1123
- p2113: 0.832356
- p2046: 10
- p3053: 0; = p2272*p1132
- p0900: 1.08873; = p0899/p0818
- p4635: 1.51437e-5; = p1874*p3481
- p2812: 0; = p2421*(p1078+p1080)
- p0065: 6.445
- p0838: 3.22814e8; = (p0833-p0836)*p0837
- p1704: 0
- p2523: 0.000786229; = p2327*p1014
- p3410: 0; = p3372*p1238
- p0248: 6.606
- p1789: 0
- p0902: 0
- p1643: 0
- p1627: 0
- p0120: 76.874
- p2055: 5.59471
- p0213: 8.914
- p2065: 0.0758824
- p2330: 9.84166e-6; = p2224*p2198
- p3097: 3.41005e-5; = p2316*p1023
- p0502: 0; = SQRT(2)*(IF((2*p0370-1)<0;-1;IF((2*p0370-1)>0;1;0))*SQRT(SQRT((2/(pi()*0.140012289)+LN(1-(2*p0370-1)^2)/2)^2-LN(1-(2*p0370-1)^2)/0.140012289)-(2/(pi()*0.140012289)+LN(1-(2*p0370-1)^2)/2)))
- p0890: 0; = p0686*1000*p0687*p0885/100
- p1160: 0.0693018; = (p1156+p1158)*p1159
- p0314: 0.5
- p1243: 18726.9; = if(p1232>0;0;p1238*(p0725/100)*p0723*1000)
- p2125: 9.38443e-6; = p2015*p2053*p2087/(p0818*1000)
- p0967: 0
- p2040: 1.17
- p1955: 0
- p2817: 0; = p2426*(p1078+p1080)
- p2685: 0.000396701; = p2294*(p1019+p1021)
- p0869: 1; = IF(p0858+p0864+p0865+p0866+p0867+p0868=1;0;1-(p0858+p0864+p0865+p0866+p0867+p0868))
- p5337: 1.02553e-6; = p1962*p3484
- p1882: 0
- p0136: 69.229
- p4309: 0; = p1754*p3480
- p1590: 0
- p2932: 0; = p2346*(p1079+p1081)
- p1967: 0; = if(p0807=480;p0802*p0810;0)
- p2898: 0; = p2312*(p1129+p1131)
- p1118: 0.00100249; = IF(p1071=0;p1108/(p1113*p0818);0)
- p0928: 109115; = p0801*p0918
- p2412: 0; = p2234*p2202
- p1693: 0
- p3177: 0; = p2396*p1023
- p2537: 0.000516398; = p2341*p1073
- p2299: 0.000254979; = p2227*p2206
- p3294: 0.279
- p1807: 0
- p2883: 0; = p2297*(p1079+p1081)
- p0706: 14.996; = p0046*(1+p0574*p0178/100)
- p0811: 0; = if(p0807=480;1-p0810;0)
- p1859: 0
- p3691: 0; = p1754*p3477
- p0472: 0; = SQRT(2)*(IF((2*p0340-1)<0;-1;IF((2*p0340-1)>0;1;0))*SQRT(SQRT((2/(pi()*0.140012289)+LN(1-(2*p0340-1)^2)/2)^2-LN(1-(2*p0340-1)^2)/0.140012289)-(2/(pi()*0.140012289)+LN(1-(2*p0340-1)^2)/2)))
- p0881: 0; = p0880*p0001*p0003/(p0818*p0002)
- p3109: 0.000327186; = p2328*p1023
- p3477: 0; = if(p1328+p1330+p1332+p1334+p1336+p1338+p1340+p1342+p1344=0;0;p1330/(p1328+p1330+p1332+p1334+p1336+p1338+p1340+p1342+p1344))
- p2615: 0; = p2419*p1073
- p2553: 0; = p2357*p1014
- p2278: 0.000193212; = p2223*p2184
- p1288: 0
- p0973: 0; = p0967+p0968+p0969
- p3513: 0; = p1782*p3476
- p1823: 0
- p1031: 9.99575e-5; = IF(p1012=0;p1025*p0001/(p0818*p0002);0)
- p2950: 0; = p2364*(p1020+p1022)
- p0975: 0; = p0973*p0974/p0818
- p0608: 0; = IF(p0344<0.5;-SQRT(p0007*EXP(p0476^2*p0008)-p0007);SQRT(p0007*EXP(p0476^2*p0008)-p0007))
- p2396: 0; = p2234*p2185
- p3458: 0.000350966; = p3363*p1241
- p1559: 0
- p1719: 0

## Reference product
- oats; at harvest in 2005; at farm; 86%-92% moisture: 1 kg

## Inputs from technosphere
- CUTOFF gypsum storage: 2.53481e-6 kg*a; = p1168
- CUTOFF apply zinc compounds; unspecified method: 0.000964796 ha; = p1183
- CUTOFF apply single or mixed N fertilizer; unspec. method: 1.86504e-5 ha; = p1035
- CUTOFF nitrogenous fertilizer, ammonium sulfate; at point-of-sale: 0.00449179 kg; = p1067
- CUTOFF apply pesticide; unspecified application methods: 4.36905e-5 ha; = p1345
- CUTOFF sulfuric acid; at point-of-sale: 3.78034e-7 kg; = p1178
- oat residue; at harvest in 2005; at farm; 85%-93% moisture: 0.712426 kg; = p0839
- CUTOFF irrig svc; unspec wat source & rate, 2005 oats: 0.000964796 ha; = p0981
- CUTOFF beef manure; from unspecified storage; at point-of-sale: 0.00281161 kg; = p1276
- CUTOFF phosphatic fertilizer, superphosphate grades over 22%; at point-of-sale: 0.000759851 kg; = p1117
- CUTOFF nitrogenous fertilizer, sodium nitrate; at point-of-sale: 8.11718e-5 kg; = p1069
- CUTOFF apply single or mixed K fertilizer; unspec. method: 3.86584e-5 ha; = p1144
- CUTOFF pesticide, Bromoxynil octanoate; at point-of-sale; kg AI: 1.98623e-5 kg; = p1782
- CUTOFF apply K fertilizer; no broadcast application: 5.34271e-5 ha; = p1139
- CUTOFF sowing svc; for unspec till, 2005 oats: 1.95913e-6 ha; = p0951
- CUTOFF sewage sludge; at point-of-sale: 3.98777e-7 kg; = p1190
- CUTOFF apply N fertilizer; no broadcast application: 0.000443017 ha; = p1030
- CUTOFF pesticide formulation balance; at point-of-sale: 0.00019439 kg; = p1963
- CUTOFF local area trucking; class 6, average fuel: 0.00304766 metric ton*km; = p2010
- CUTOFF nitrogenous fertilizer, aqueous ammonia; at point-of-sale: 0.0015952 kg; = p1065
- CUTOFF apply sewage sludge; unspecified method: 0.000964796 ha; = p1189
- CUTOFF sulfur; at point-of-sale: 8.09603e-7 kg; = p1172
- CUTOFF apply P fertilizer; broadcast with incorporation: 7.29286e-5 ha; = p1090
- CUTOFF phosphatic fertilizer, diammonium phosphate; at point-of-sale: 0.0134541 kg; = p1119
- CUTOFF unspecified animal manure; from unspecified storage; at point-of-sale: 0.00123999 kg; = p1316
- CUTOFF prepare soil; for reduced till, oats; 15-30% residue: 5.65646e-5 ha; = p0937
- CUTOFF apply sulfur; unspecified method: 0.000964796 ha; = p1171
- CUTOFF apply manure; broadcast without incorporation: 3.68728e-5 ha; = p1248
- CUTOFF pesticide, MCPA, dimethylamine salt; at point-of-sale; kg AI: 1.76554e-5 kg; = p1874
- CUTOFF apply N fertilizer; broadcast without incorporation: 7.77544e-5 ha; = p1032
- CUTOFF sowing svc; for conventional till, 2005 oats: 0.000214844 ha; = p0946
- CUTOFF apply P fertilizer; no broadcast application: 0.000348411 ha; = p1089
- CUTOFF nitrogenous fertilizer, urea; at point-of-sale: 0.0198059 kg; = p1070
- CUTOFF harvest; oats residue management: 0.000964796 ha; = p1975
- CUTOFF dolomite, pulverized; at point-of-sale: 0.00127543 kg; = p1229
- CUTOFF bulk cargo rail transport; diesel: 0.0761914 metric ton*km; = p2008
- CUTOFF harvest; oats: 0.000472553 ha; = p1971
- CUTOFF sulfur storage: 4.04802e-7 kg*a; = p1174
- CUTOFF gypsum; at point-of-sale: 5.06963e-6 kg; = p1166
- CUTOFF apply single or mixed P fertilizer; unspec. method: 2.69274e-5 ha; = p1094
- CUTOFF regional or national trucking; class 8, average fuel: 0.0093798 metric ton*km; = p2009
- CUTOFF nitrogenous fertilizer, nitrogen solutions; at point-of-sale: 0.0398434 kg; = p1068
- CUTOFF pesticide storage: 0.000377248 kg*a; = p1965
- CUTOFF prepare soil; for mulch till, oats: 0.000294084 ha; = p0935
- CUTOFF limestone, high-grade, pulverized; at point-of-sale: 0.0218697 kg; = p1228
- CUTOFF unspecified manure; from semi-solid to solid storage; at point-of-sale: 0.0457295 kg; = p1314
- CUTOFF domestic barge transport; average fuel: 0.0406354 metric ton*km; = p2007
- CUTOFF pesticide, unspecified type; at point-of-sale; kg AI: 2.14367e-5 kg; = p1962
- CUTOFF sowing svc; for no-till, 2005 oats: 0.000397344 ha; = p0948
- CUTOFF international vessel transport; average fuel: 0.373742 metric ton*km; = p2006
- CUTOFF sewage sludge storage: 1.99389e-7 kg*a; = p1192
- CUTOFF pesticide, 2,4-D; at point-of-sale; kg AI: 4.41384e-6 kg; = p1754
- CUTOFF potassic fertilizer, other single nutrients; at point-of-sale: 0.00047892 kg; = p1155
- CUTOFF sulfuric acid storage: 1.89017e-7 kg*a; = p1180
- CUTOFF pesticide, 2,4-D, dimethylamine salt; at point-of-sale; kg AI: 8.60699e-5 kg; = p1756
- CUTOFF pesticide, Clopyralid; at point-of-sale; kg AI: 4.41384e-6 kg; = p1798
- CUTOFF pesticide, MCPA-2-ethylhexyl; at point-of-sale; kg AI: 8.82768e-5 kg; = p1875
- CUTOFF pesticide, Bromoxynil heptanoate; at point-of-sale; kg AI: 6.62076e-6 kg; = p1781
- CUTOFF nitrogenous fertilizer, anhydrous ammonia; at point-of-sale: 0.0146655 kg; = p1064
- CUTOFF potassic fertilizer, potassium chloride; at point-of-sale: 0.00320074 kg; = p1154
- CUTOFF apply mixed N fertilizer; with incorporation: 2.71824e-5 ha; = p1033
- CUTOFF apply pesticide; broadcast with incorporation: 8.62302e-5 ha; = p1333
- CUTOFF sowing svc; for reduced till, 2005 oats: 5.65646e-5 ha; = p0949
- CUTOFF sowing svc; for mulch till, 2005 oats: 0.000294084 ha; = p0947
- CUTOFF pesticide, Glyphosate; at point-of-sale; kg AI: 0.000116967 kg; = p1855
- CUTOFF apply pesticide; as foliar or directed spray: 0.000783342 ha; = p1339
- CUTOFF N inhibitor appl svc; unspec rate & type, 2005 oats: 0.00108139 ha; = p1162
- CUTOFF prepare soil; for unspec. till, oats: 1.95913e-6 ha; = p0939
- CUTOFF beef manure; from semi-solid to solid storage; at point-of-sale: 0.103689 kg; = p1274
- CUTOFF apply gypsum; unspecified method: 0.000964796 ha; = p1165
- CUTOFF phosphatic fertilizer, superphos. grades 22% and under; at point-of-sale: 6.18293e-5 kg; = p1116
- CUTOFF phosphatic fertilizer, monoammonium phosphate; at point-of-sale: 0.00881865 kg; = p1120
- CUTOFF prepare soil; for no-till, oats: 0.000397344 ha; = p0936
- CUTOFF prepare soil; for conventional till, oats; <15% residue: 0.000214844 ha; = p0934
- CUTOFF apply liming materials; unspecified method: 0.000964796 ha; = p1227
- CUTOFF zinc compounds; at point-of-sale: 1.41162e-7 kg; = p1184
- CUTOFF fertilizer filler materials; at point-of-sale: 0.0249458 kg; = p1158
- CUTOFF phosphatic fertilizer, other single phosphates; at point-of-sale: 0.00100249 kg; = p1118
- CUTOFF apply manure; unspec. method: 2.53083e-5 ha; = p1251
- CUTOFF apply sulfuric acid; unspecified method: 0.000964796 ha; = p1177
- CUTOFF fertilizer storage: 0.0693018 kg*a; = p1160
- CUTOFF zinc compounds storage: 7.05812e-8 kg*a; = p1186
- CUTOFF apply N fertilizer; broadcast with incorporation: 9.99575e-5 ha; = p1031
- CUTOFF liming materials storage: 0.0115726 kg*a; = p1231
- CUTOFF nitrogenous fertilizer, ammonium nitrate; at point-of-sale: 0.00539835 kg; = p1066

## Inputs from nature
- Dry matter except CNPK; from plant uptake: 1.45595 kg; = p0917
- Transformation, from annual crop [natural resource, land]: 9.64796 m2; = 1.0 * (p0883)
- Carbon dioxide: 3.99199 kg; = p0900*3.6666666667
- Water, unspecified origin: 0.00043299 m3; = p0893*0.001+p0916*0.001
- Transformation, to annual crop [natural resource, land]: 9.64796 m2; = 1.0 * (p0857)
- Nitrogen: 0.0402423 kg; = p0905
- Potassium; from plant uptake; biogenic: 0.0289728 kg; = p0915
- Occupation, annual crop [natural resource, land]: 2.72008 m2*year; = 1.0 * (p0855)
- Phosphorus: 0.00737116 kg; = p0910

## Emissions to nature
- Monoammonium phosphate; broadcast w/ incorp. in fert. at plant.: 0.000887892 kg; = p2732*8.2142857143
- Magnesium [soil, agricultural]: 0.000161773 kg; = 1.0 * (p3227)
- cyclopentane: 1.24462e-8 kg; = p2153*1.0166666667
- Monoammonium phosphate; unspec. appl. method in fert. at plant.: 0.000327836 kg; = p3122*8.2142857143
- cis-2-Butene: 3.23237e-7 kg; = p2149*1.1666666667
- Nitrogen; using unspec. method in manure at an unknown time: 0.000234397 kg; = p3470
- Superphosphate, grades<= 22%; broadcast w/ incorp. in fert. in spr. bef. plant.; kg P: 2.62994e-7 kg; = p2696
- MCPA, dimethylamine salt; unspec. appl. method: 8.44633e-7 kg; = p5253
- Acrylonitrile: 2.52226e-7 kg; = p2156*1.4722222222
- Ethyne [air, non-urban air or from high stacks]: 2.04827e-6 kg; = 1.0 * (p2132*1.0833333333)
- Anhydrous ammonia; unspec. appl. method in fert. in spr. bef. plant.: 0.000219946 kg; = p3057*1.2142857143
- Phenol [air, non-urban air or from high stacks]: 3.90286e-6 kg; = 1.0 * (p2133*1.3055555556)
- Other single phosphates; no broadcast in fert. at plant.; kg P: 5.47838e-5 kg; = p2544
- Toluene [air, non-urban air or from high stacks]: 1.43324e-6 kg; = 1.0 * (p2141*1.0952380952)
- Methyl vinyl ether; from residue burning: 5.70723e-7 kg; = p2137*1.6111111111
- MCPA-2-ethylhexyl; foliar or directed spray: 7.57186e-5 kg; = p4636
- Pesticide formulation balance; broadcast with incorporation: 1.83543e-5 kg; = p4102
- Other single phosphates; broadcast w/ incorp. in fert. at plant.; kg P: 1.14672e-5 kg; = p2739
- Nitrogen solution; broadcast w/ incorp. in fert. at plant.; broadcast w/ incorp. in fert. at plant.; kg N: 0.0010526 kg; = p2717
- Potassium; in below-ground residue; biogenic: 0.00556273 kg; = p2176
- Aqueous ammonia; no broadcast in fert. in spr. bef. plant.: 0.000155932 kg; = p2474*1.2142857143
- Nitrogen solution; broadcast w/ incorp. in fert. in spr. bef. plant.; broadcast w/ incorp. in fert. in spr. bef. plan...: 0.00122732 kg; = p2678
- Phosphorous; broadcast w/o incorp. in manure at an unknown time: 7.92452e-5 kg; = p3414
- Other single phosphates; no broadcast in fert. in spr. bef. plant.; kg P: 2.34273e-5 kg; = p2505
- Diammonium phosphate; no broadcast in fert. in spr. bef. plant.: 0.00288512 kg; = p2494*4.7142857143
- Acetaldehyde [air, non-urban air or from high stacks]: 9.35879e-6 kg; = 1.0 * (p2130*1.8333333333)
- Pesticides, unspecified [soil, agricultural]: 2.14367e-5 kg; = 1.0 * (p4101+p5337+p4719)
- Ammonium sulfate; broadcast w/o incorp. in fert. at plant.: 0.000239488 kg; = p2908*4.7142857143
- 2,4-D, dimethylamine salt: 8.60699e-5 kg; = p4517+p5135+p3899
- Furan [air, non-urban air or from high stacks]: 8.2313e-7 kg; = 1.0 * (p2138*1.4166666667)
- Other single phosphates; unspec. appl. method in fert. at plant.; kg P: 4.23404e-6 kg; = p3129
- Water: 0.385291 kg; = p2181+p2171+p3418+p2178+p3475
- Butadiene [air, non-urban air or from high stacks]: 1.13534e-6 kg; = 1.0 * (p2143*1.125)
- Phosphorous; applied in sewage sludge: 2.22656e-9 kg; = p3241
- Monoammonium phosphate; broadcast w/ incorp. in fert. in spr. bef. plant.: 0.000379691 kg; = p2693*8.2142857143
- Propanenitrile: 4.8216e-7 kg; = p2157*1.5277777778
- Aqueous ammonia; broadcast w/o incorp. in fert. at plant.: 2.34718e-5 kg; = p2903*1.2142857143
- Nitrogen solution; unspec. appl. method in fert. in spr. bef. plant.; unspec. appl. method in fert. in spr. bef. plan...: 0.000180037 kg; = p3068
- Urea; no broadcast in fert. in spr. bef. plant.: 0.00691148 kg; = p2490*5
- Nitrogen solution; no broadcast in fert. at plant.; no broadcast in fert. at plant.; kg N: 0.00366777 kg; = p2522
- Urea; broadcast w/o incorp. in fert. at plant.: 0.00104036 kg; = p2919*5
- Acetol; from residue burning: 2.83324e-5 kg; = p2134*2.0555555556
- Superphosphate, grades>22%; no broadcast in fert. in spr. bef. plant.; kg P: 3.70582e-5 kg; = p2503
- Other single phosphates; broadcast w/ incorp. in fert. in spr. bef. plant.; kg P: 4.90375e-6 kg; = p2700
- Urea; broadcast w/ incorp. in fert. in spr. bef. plant.: 0.0019835 kg; = p2685*5
- Ammonium sulfate; no broadcast in fert. in spr. bef. plant.: 0.00159101 kg; = p2479*4.7142857143
- Sodium nitrate; broadcast w/ incorp. in fert. at plant.: 6.94388e-6 kg; = p2720*6.0714285714
- Superphosphate, grades>22%; unspec. appl. method in fert. at plant.; kg P: 6.69755e-6 kg; = p3127
- Urea; unspec. appl. method in fert. in spr. bef. plant.: 0.000290964 kg; = p3075*5
- Diammonium phosphate; broadcast w/ incorp. in fert. at plant.: 0.00141221 kg; = p2728*4.7142857143
- Superphosphate, grades<= 22%; no broadcast in fert. in spr. bef. plant.; kg P: 1.25643e-6 kg; = p2501
- Nitrogen solution; unspec. appl. method in fert. at plant.; unspec. appl. method in fert. at plant.; kg N: 0.000154408 kg; = p3107
- Sulfur [soil, agricultural]: 8.09603e-7 kg; = 1.0 * (p3230)
- Aqueous ammonia; no broadcast in fert. at plant.: 0.000133734 kg; = p2513*1.2142857143
- Urea; unspec. appl. method in fert. at plant.: 0.000249543 kg; = p3114*5
- Nitrogen; broadcast w/o incorp. in manure at an unknown time: 0.000341502 kg; = p3413
- Particulates, < 10 um: 6.396e-5 kg; = p2036+p2034
- Nitrogen; broadcast w/o incorp. in manure in fall before planting: 0.000511337 kg; = p3401
- Potassium; using unspec. method in manure in fall before planting; biogenic: 0.000343274 kg; = p3460
- Urea; no broadcast in fert. at plant.: 0.00592759 kg; = p2529*5
- Phosphorous; using unspec. method in manure at an unknown time: 5.43914e-5 kg; = p3471
- Nitrogen solution; no broadcast in fert. in spr. bef. plant.; no broadcast in fert. in spr. bef. plant.; kg N: 0.00427656 kg; = p2483
- Sodium nitrate; unspec. appl. method in fert. in spr. bef. plant.: 1.18768e-6 kg; = p3071*6.0714285714
- Filler materials, applied with synthetic fertilizer: 0.0249458 kg; = p2432
- Formaldehyde [air, non-urban air or from high stacks]: 1.56429e-5 kg; = 1.0 * (p2128*2.5)
- Hydrocyanic acid: 2.14665e-6 kg; = p2154*2.25
- Pentane [air, non-urban air or from high stacks]: 1.59191e-7 kg; = 1.0 * (p2152*1.0166666667)
- Other single K nutrients; unspec. appl. method in fert. unspec. timing; kg K: 7.34385e-5 kg; = p3211
- Ammonium nitrate; no broadcast in fert. in spr. bef. plant.: 0.00305028 kg; = p2476*4.7142857143
- Potassium; broadcast w/o incorp. in manure at an unknown time: 0.000334018 kg; = p3415
- Anhydrous ammonia; broadcast w/o incorp. in fert. at plant.: 0.00078643 kg; = p2901*1.2142857143
- Volatile constituents; broadcast w/o incorp. in man. in fal.bef.plant: 0.00376972 kg; = p3404
- Acetone [air, non-urban air or from high stacks]: 3.35797e-6 kg; = 1.0 * (p2139*1.6111111111)
- 2,4-D [soil, agricultural]: 4.41384e-6 kg; = 1.0 * (p4515+p3897+p5133)
- Glycolaldehyde; from residue burning: 1.51602e-5 kg; = p2135*2.5
- NMVOC, non-methane volatile organic compounds, unspecified origin [air, non-urban air or from high stacks]: 0.000193341 kg; = 1.0 * (p2051+p2052)
- Superphosphate, grades>22%; broadcast w/ incorp. in fert. at plant.; kg P: 1.81392e-5 kg; = p2737
- trans-2-Butene: 4.28477e-7 kg; = p2148*1.1666666667
- Potassium; broadcast w/o incorp. in manure in fall before planting; biogenic: 0.00050013 kg; = p3403
- Ammonium sulfate; no broadcast in fert. at plant.: 0.00136452 kg; = p2518*4.7142857143
- Ammonia [air, non-urban air or from high stacks]: 1.63293e-5 kg; = 1.0 * (p2159*1.2142857143)
- Superphosphate, grades<= 22%; no broadcast in fert. at plant.; kg P: 2.93811e-6 kg; = p2540
- Propene [air, non-urban air or from high stacks]: 5.0869e-6 kg; = 1.0 * (p2136*1.1666666667)
- Aqueous ammonia; broadcast w/ incorp. in fert. in spr. bef. plant.: 4.47504e-5 kg; = p2669*1.2142857143
- Diammonium phosphate; broadcast w/ incorp. in fert. in spr. bef. plant.: 0.000603906 kg; = p2689*4.7142857143
- Anhydrous ammonia; broadcast w/ incorp. in fert. at plant.: 0.00128593 kg; = p2706*1.2142857143
- Nitrogen; in below-ground residue: 0.00512781 kg; = p2174
- Ethene [air, non-urban air or from high stacks]: 1.09485e-5 kg; = 1.0 * (p2125*1.1666666667)
- Aqueous ammonia; unspec. appl. method in fert. at plant.: 5.63001e-6 kg; = p3098*1.2142857143
- Methane: 2.11824e-5 kg; = p2025*1.3333333333
- Other single phosphates; unspec. appl. method in fert. in spr. bef. plant.; kg P: 1.81061e-6 kg; = p3090
- Plant dry matter; from residue burning: 0.00278274 kg; = p2164
- Propane [air, non-urban air or from high stacks]: 2.11925e-6 kg; = 1.0 * (p2142*1.2222222222)
- Aqueous ammonia; broadcast w/ incorp. in fert. at plant.: 3.83799e-5 kg; = p2708*1.2142857143
- Ash: 0.00148839 kg; = p2021+p2022
- Particulates, < 2.5 um [air, non-urban air or from high stacks]: 4.63522e-5 kg; = 1.0 * (p2035+p2033)
- Phosphorous; in below-ground residue: 0.000907261 kg; = p2175
- Glyphosate [soil, agricultural]: 0.000116967 kg; = 1.0 * (p5234+p4616+p3998)
- Monoammonium phosphate; no broadcast in fert. in spr. bef. plant.: 0.00181395 kg; = p2498*8.2142857143
- Sodium nitrate; broadcast w/o incorp. in fert. in spr. bef. plant.: 4.95152e-6 kg; = p2876*6.0714285714
- Nonvolatile constituents; broadcast w/o incorp. in man. at unknown time; exc.CNPK,biogenic: 0.000402786 kg; = p3417
- Phosphorous; in above-ground residue left on field: 0.00193049 kg; = p2169
- Ammonium nitrate; broadcast w/ incorp. in fert. in spr. bef. plant.: 0.000875389 kg; = p2671*4.7142857143
- Benzene [air, non-urban air or from high stacks]: 1.15464e-6 kg; = 1.0 * (p2140*1.0833333333)
- Superphosphate, grades<= 22%; unspec. appl. method in fert. at plant.; kg P: 2.27076e-7 kg; = p3125
- Diammonium phosphate; unspec. appl. method in fert. in spr. bef. plant.: 0.00022298 kg; = p3079*4.7142857143
- Plant dry matter; in aboveground residue left on field: 0.382021 kg; = p2172
- Anhydrous ammonia; broadcast w/ incorp. in fert. in spr. bef. plant.: 0.00149937 kg; = p2667*1.2142857143
- Phosphorous; using unspec. method in manure in fall before planting: 8.14411e-5 kg; = p3459
- Ammonium nitrate; unspec. appl. method in fert. in spr. bef. plant.: 0.000128412 kg; = p3061*4.7142857143
- Acetic acid [air, non-urban air or from high stacks]: 4.20996e-5 kg; = 1.0 * (p2127*2.5)
- Superphosphate, grades>22%; unspec. appl. method in fert. in spr. bef. plant.; kg P: 2.86409e-6 kg; = p3088
- Superphosphate, grades>22%; broadcast w/ incorp. in fert. in spr. bef. plant.; kg P: 7.75694e-6 kg; = p2698
- MCPA, dimethylamine salt; foliar or directed spray: 1.51437e-5 kg; = p4635
- Anhydrous ammonia; no broadcast in fert. in spr. bef. plant.: 0.00522454 kg; = p2472*1.2142857143
- Dinitrogen monoxide [air, non-urban air or from high stacks]: 5.26828e-7 kg; = 1.0 * (p2044*1.5714285714)
- Plant dry matter; in below-ground residue: 0.179536 kg; = p2177
- Nitrogen dioxide: 2.10767e-5 kg; = p2039*3.2857142857
- Ammonium nitrate; unspec. appl. method in fert. at plant.: 0.000110132 kg; = p3100*4.7142857143
- Sulfur dioxide [air, non-urban air or from high stacks]: 8.80391e-6 kg; = 1.0 * (p2041)
- Potassium chloride; no broadcast in fert. unspec. timing: 0.00170863 kg; = p2624*2.2166666667
- Oxygen; applied in dolomite: 0.000640197 kg; = p3228
- Ammonium sulfate; unspec. appl. method in fert. at plant.: 5.74443e-5 kg; = p3103*4.7142857143
- Water [air, non-urban air or from high stacks]: 8.88009e-7 m3; = 0.001 * (p2016)
- Ammonium sulfate; broadcast w/o incorp. in fert. in spr. bef. plant.: 0.00027924 kg; = p2869*4.7142857143
- Phosphorous; broadcast w/o incorp. in manure in fall before planting: 0.000118655 kg; = p3402
- MCPA, dimethylamine salt; broadcast with incorporation: 1.66702e-6 kg; = p4017
- Potassium; using unspec. method in manure at an unknown time: 0.00022926 kg; = p3472
- Anhydrous ammonia; no broadcast in fert. at plant.: 0.0044808 kg; = p2511*1.2142857143
- Carbon dioxide, in air: 0.00952405 kg; = p2163*3.6666666667
- Nitrogen; applied in sewage sludge: 1.86516e-8 kg; = p3240
- Pesticide formulation balance; unspec. appl. method: 9.29961e-6 kg; = p5338
- Sodium nitrate; no broadcast in fert. at plant.: 2.41958e-5 kg; = p2525*6.0714285714
- Aqueous ammonia; unspec. appl. method in fert. in spr. bef. plant.: 6.56451e-6 kg; = p3059*1.2142857143
- Diammonium phosphate; no broadcast in fert. at plant.: 0.00674672 kg; = p2533*4.7142857143
- Monoammonium phosphate; unspec. appl. method in fert. in spr. bef. plant.: 0.000140193 kg; = p3083*8.2142857143
- Oxygen; applied in limestone: 0.00985867 kg; = p3219
- Superphosphate, grades<= 22%; broadcast w/ incorp. in fert. at plant.; kg P: 6.14999e-7 kg; = p2735
- Bromoxynil heptanoate; broadcast with incorporation: 6.25132e-7 kg; = p3924
- isopentane: 1.27353e-7 kg; = p2151*1.0166666667
- Ammonium nitrate; broadcast w/o incorp. in fert. at plant.: 0.000459146 kg; = p2905*4.7142857143
- Potassium; in above-ground residue left on field; biogenic: 0.0118365 kg; = p2170
- Bromoxynil octanoate: 1.98623e-5 kg; = p4543+p5161+p3925
- 1-Butene: 1.0073e-6 kg; = p2144*1.1666666667
- Other single K nutrients; no broadcast in fert. unspec. timing; kg K: 0.000101494 kg; = p2626
- Nitrogen; in above-ground residue left on field: 0.0109111 kg; = p2168
- Other limestone constituents; applied in limestone: 0.00131218 kg; = p3220
- Ammonium sulfate; broadcast w/ incorp. in fert. in spr. bef. plant.: 0.000456598 kg; = p2674*4.7142857143
- Ethane [air, non-urban air or from high stacks]: 6.83785e-6 kg; = 1.0 * (p2126*1.25)
- MCPA-2-ethylhexyl; unspec. appl. method: 4.22316e-6 kg; = p5254
- Ammonium nitrate; broadcast w/ incorp. in fert. at plant.: 0.000750772 kg; = p2710*4.7142857143
- Sodium nitrate; no broadcast in fert. in spr. bef. plant.: 2.8212e-5 kg; = p2486*6.0714285714
- Volatile constituents; broadcast w/o incorp. in man. at unknown time: 0.00251765 kg; = p3416
- Superphosphate, grades>22%; no broadcast in fert. at plant.; kg P: 8.6659e-5 kg; = p2542
- Anhydrous ammonia; broadcast w/o incorp. in fert. in spr. bef. plant.: 0.000916966 kg; = p2862*1.2142857143
- Volatile constituents; using unspec. method in man. at unknown time: 0.00172804 kg; = p3473
- Formic acid [air, non-urban air or from high stacks]: 7.53991e-6 kg; = 1.0 * (p2131*3.8333333333)
- Clopyralid [soil, agricultural]: 4.41384e-6 kg; = 1.0 * (p5177+p4559+p3941)
- Butane [air, non-urban air or from high stacks]: 4.57155e-7 kg; = 1.0 * (p2147*1.0208333333)
- Methanol [air, non-urban air or from high stacks]: 2.47305e-5 kg; = 1.0 * (p2129*2.6666666667)
- Sodium nitrate; broadcast w/ incorp. in fert. in spr. bef. plant.: 8.09646e-6 kg; = p2681*6.0714285714
- Potassium chloride; unspec. appl. method in fert. unspec. timing: 0.00123632 kg; = p3209*2.2166666667
- Isoprene [air, non-urban air or from high stacks]: 2.83933e-6 kg; = 1.0 * (p2145*1.1333333333)
- Nitrogen; using unspec. method in manure in fall before planting: 0.000350966 kg; = p3458
- Bromoxynil heptanoate; foliar or directed spray: 5.67889e-6 kg; = p4542
- Carbon [soil, agricultural]: 0.490934 kg; = 1.0 * (p3242+p3412+p2173+p3400+p3469+p2167+p3217+p3225+p3457)
- Anhydrous ammonia; unspec. appl. method in fert. at plant.: 0.000188635 kg; = p3096*1.2142857143
- I butane; from residue burning: 1.58734e-7 kg; = p2146*1.0208333333
- Bromoxynil heptanoate; unspec. appl. method: 3.16737e-7 kg; = p5160
- Nitrogen solution; broadcast w/o incorp. in fert. at plant.; broadcast w/o incorp. in fert. at plant.; kg N: 0.000643734 kg; = p2912
- Gypsum: 5.06963e-6 kg; = p3229
- Aqueous ammonia; broadcast w/o incorp. in fert. in spr. bef. plant.: 2.73678e-5 kg; = p2864*1.2142857143
- Pesticide formulation balance; foliar or directed spray: 0.000166736 kg; = p4720
- Sodium nitrate; broadcast w/o incorp. in fert. at plant.: 4.24664e-6 kg; = p2915*6.0714285714
- Sewage sludge dry matter; applied in sewage sludge: 2.06491e-9 kg; = p3243
- Monoammonium phosphate; no broadcast in fert. at plant.: 0.00424184 kg; = p2537*8.2142857143
- Nitrogen solution; broadcast w/o incorp. in fert. in spr. bef. plant.; broadcast w/o incorp. in fert. in spr. bef. pl...: 0.000750585 kg; = p2873
- Dioxins and furans (PCDD/F); from residue burning: 2.25741e-13 kg TEQ; = p2047
- Carbon monoxide, fossil [air, non-urban air or from high stacks]: 0.000481084 kg; = 1.0 * (p2028*2.3333333333)
- Nonvolatile constituents;broadcast w/o incorp. in man. in fal.bef.plant; exc.CNPK,biogenic: 0.000603098 kg; = p3405
- MCPA-2-ethylhexyl; broadcast with incorporation: 8.3351e-6 kg; = p4018
- Ammonium nitrate; no broadcast in fert. at plant.: 0.00261605 kg; = p2515*4.7142857143
- Diammonium phosphate; unspec. appl. method in fert. at plant.: 0.000521429 kg; = p3118*4.7142857143
- Ammonium nitrate; broadcast w/o incorp. in fert. in spr. bef. plant.: 0.000535358 kg; = p2866*4.7142857143
- Volatile constituents; using unspec. method in man. in fal.bef.plant: 0.00258742 kg; = p3461
- Ammonium sulfate; broadcast w/ incorp. in fert. at plant.: 0.000391599 kg; = p2713*4.7142857143
- isobutene: 8.79506e-7 kg; = p2150*1.1666666667
- Sulfuric acid [soil, agricultural]: 3.78034e-7 kg; = 1.0 * (p3231)
- Acetonitrile [air, non-urban air or from high stacks]: 1.5796e-6 kg; = 1.0 * (p2155*1.7083333333)
- Urea; broadcast w/ incorp. in fert. at plant.: 0.00170114 kg; = p2724*5
- Urea; broadcast w/o incorp. in fert. in spr. bef. plant.: 0.00121304 kg; = p2880*5
- Ammonium sulfate; unspec. appl. method in fert. in spr. bef. plant.: 6.69793e-5 kg; = p3064*4.7142857143
- Sodium nitrate; unspec. appl. method in fert. at plant.: 1.01861e-6 kg; = p3110*6.0714285714
- Zinc compounds: 1.41162e-7 kg; = p3232
- Nonvolatile constituents; using unspec. method in man. at unknown time; exc.CNPK,biogenic: 0.00027646 kg; = p3474
- Superphosphate, grades<= 22%; unspec. appl. method in fert. in spr. bef. plant.; kg P: 9.71051e-8 kg; = p3086
- Calcium [soil, agricultural]: 0.00851789 kg; = 1.0 * (p3226+p3218)

## Sampling procedure
A delete-a-group jackknife is used by the USDA to estimate the ARMS sample means and RSEs, based on a 15 sample delete-a-group jackknife. Because of this relatively small sample size, a Students t distribution is used to represent ARMS data probability density functions. Other representations of uncertainty are described in Cooper, J.S., Kahn, E., Noon, M. (2012). LCA Digital Commons Unit Process Data: field crop production Version 1. Prepared for the US Department of Agriculture National Agricultural Library. Retrieved from https://www.lcacommons.gov/discovery/docs/LCA%20Digital%20Commons%20Unit%20Process%20Data%20final%20updated.pdf

## Extrapolations
Data represent an aggregation of processes applied in North Dakota in 2005. Data development is demonstrated by parameterization (exlicitly presents all raw and uncertainty data and all calculations). Flow data quality according to the LCADC convention is provided for all flows.
