# corn grain; at harvest in 2000; at farm; 85%-91% moisture

Dataset: EcoSpold 2, unit process
Geography: GLO
Time period: 2000-01-02 to 2001-01-01
Scenario: Business-as-Usual
System model: Allocation, ecoinvent default
Generated by: cooperjs@u.washington.edu
isCopyrightProtected: false

## General comment
This unit process/ gate-to-gate dataset represents the production of 1 kg corn coproduced with silage and residue. The process technologies are an aggregation of those applied in Nebraska in 2000. Applicable classifications include ISIC 0111, NAIC 111150, UNSPSC 50403200; this dataset was prepared in ILCD format using the UWDFE Lab Excel to ILCD File Generator (beta version, August 2013)

Exchange "Prosulfuron-soil agricultural" is the result of combining the following original LCA Commons flows: "Prosulfuron; broadcast without incorporation; kg AI", "Prosulfuron; foliar or directed spray; kg AI", "Prosulfuron; unspec. appl. method; kg AI", "Prosulfuron; banded or side-dressed; kg AI", "Prosulfuron; broadcast with incorporation; kg AI", "Prosulfuron; in seed furrow; kg AI".
Exchange "Cyanazine-soil agricultural" is the result of combining the following original LCA Commons flows: "Cyanazine; in seed furrow; kg AI", "Cyanazine; broadcast without incorporation; kg AI", "Cyanazine; foliar or directed spray; kg AI", "Cyanazine; unspec. appl. method; kg AI", "Cyanazine; banded or side-dressed; kg AI", "Cyanazine; broadcast with incorporation; kg AI".
Exchange "Parathion-methyl-soil agricultural" is the result of combining the following original LCA Commons flows: "Methyl parathion; broadcast with incorporation; kg AI", "Methyl parathion; in seed furrow; kg AI", "Methyl parathion; foliar or directed spray; kg AI", "Methyl parathion; broadcast without incorporation; kg AI", "Methyl parathion; unspec. appl. method; kg AI", "Methyl parathion; banded or side-dressed; kg AI".
Exchange "Terbufos-soil agricultural" is the result of combining the following original LCA Commons flows: "Terbufos; foliar or directed spray; kg AI", "Terbufos; broadcast with incorporation; kg AI", "Terbufos; unspec. appl. method; kg AI", "Terbufos; banded or side-dressed; kg AI", "Terbufos; in seed furrow; kg AI", "Terbufos; broadcast without incorporation; kg AI".
Exchange "Metribuzin-soil agricultural" is the result of combining the following original LCA Commons flows: "Metribuzin; broadcast with incorporation; kg AI", "Metribuzin; foliar or directed spray; kg AI", "Metribuzin; unspec. appl. method; kg AI", "Metribuzin; broadcast without incorporation; kg AI", "Metribuzin; banded or side-dressed; kg AI", "Metribuzin; in seed furrow; kg AI".
Exchange "Tefluthrin-soil agricultural" is the result of combining the following original LCA Commons flows: "Tefluthrin; foliar or directed spray; kg AI", "Tefluthrin; broadcast with incorporation; kg AI", "Tefluthrin; banded or side-dressed; kg AI", "Tefluthrin; unspec. appl. method; kg AI", "Tefluthrin; in seed furrow; kg AI", "Tefluthrin; broadcast without incorporation; kg AI".
Exchange "NMVOC, non-methane volatile organic compounds, unspecified origin-air low population density" is the result of combining the following original LCA Commons flows: "NMVOCs; from residue burning; kg C, biogenic", "NMVOCs; from residue burning; kg except C, biogenic".
Exchange "Glyphosate-soil agricultural" is the result of combining the following original LCA Commons flows: "Glyphosate; foliar or directed spray; kg AI", "Glyphosate; broadcast with incorporation; kg AI", "Glyphosate; broadcast without incorporation; kg AI", "Glyphosate; in seed furrow; kg AI", "Glyphosate; unspec. appl. method; kg AI", "Glyphosate; banded or side-dressed; kg AI".
Exchange "Imazethapyr-soil agricultural" is the result of combining the following original LCA Commons flows: "Imazethapyr; broadcast without incorporation; kg AI", "Imazethapyr; in seed furrow; kg AI", "Imazethapyr; unspec. appl. method; kg AI", "Imazethapyr; banded or side-dressed; kg AI", "Imazethapyr; broadcast with incorporation; kg AI", "Imazethapyr; foliar or directed spray; kg AI".
Exchange "1-Naphthaleneacetamide-soil agricultural" is the result of combining the following original LCA Commons flows: "1-Naphthaleneacetamide; unspec. appl. method; kg AI", "1-Naphthaleneacetamide; in seed furrow; kg AI", "1-Naphthaleneacetamide; banded or side-dressed; kg AI", "1-Naphthaleneacetamide; broadcast with incorporation; kg AI", "1-Naphthaleneacetamide; broadcast without incorporation; kg AI", "1-Naphthaleneacetamide; foliar or directed spray; kg AI".
Exchange "Dicamba-soil agricultural" is the result of combining the following original LCA Commons flows: "Dicamba; foliar or directed spray; kg AI", "Dicamba; broadcast without incorporation; kg AI", "Dicamba; unspec. appl. method; kg AI", "Dicamba; banded or side-dressed; kg AI", "Dicamba; in seed furrow; kg AI", "Dicamba; broadcast with incorporation; kg AI".
Exchange "Nicosulfuron-soil agricultural" is the result of combining the following original LCA Commons flows: "Nicosulfuron; broadcast with incorporation; kg AI", "Nicosulfuron; unspec. appl. method; kg AI", "Nicosulfuron; foliar or directed spray; kg AI", "Nicosulfuron; banded or side-dressed; kg AI", "Nicosulfuron; in seed furrow; kg AI", "Nicosulfuron; broadcast without incorporation; kg AI".
Exchange "Tebupirimphos-soil agricultural" is the result of combining the following original LCA Commons flows: "Tebupirimfos; unspec. appl. method; kg AI", "Tebupirimfos; broadcast with incorporation; kg AI", "Tebupirimfos; broadcast without incorporation; kg AI", "Tebupirimfos; foliar or directed spray; kg AI", "Tebupirimfos; banded or side-dressed; kg AI", "Tebupirimfos; in seed furrow; kg AI".
Exchange "Permethrin-soil agricultural" is the result of combining the following original LCA Commons flows: "Permethrin, mixed cis,trans; broadcast with incorporation; kg AI", "Permethrin, mixed cis,trans; unspec. appl. method; kg AI", "Permethrin, mixed cis,trans; banded or side-dressed; kg AI", "Permethrin, mixed cis,trans; foliar or directed spray; kg AI", "Permethrin, mixed cis,trans; broadcast without incorporation; kg AI", "Permethrin, mixed cis,trans; in seed furrow; kg AI".
Exchange "Carbon-soil agricultural" is the result of combining the following original LCA Commons flows: "Carbon; applied in sewage sludge", "Carbon; applied in dolomite", "Carbon; using unspec. method in manure in fall before planting; biogenic", "Carbon; using unspec. method in manure in spring before planting; biogenic", "Carbon; in below-ground residue; biogenic", "Carbon; broadcast w/o incorp. in manure in fall before planting; biogenic", "Carbon; in above-ground residue left on field; biogenic", "Carbon; applied in limestone", "Carbon; broadcast w/o incorp. in manure in spring before planting; biogenic".
Exchange "Particulates, < 2.5 um-air low population density" is the result of combining the following original LCA Commons flows: "PM2.5; from residue burning; kg except C, biogenic", "PM2.5; from residue burning; kg C, biogenic".
Exchange "Dimethenamid-soil agricultural" is the result of combining the following original LCA Commons flows: "Dimethenamid; in seed furrow; kg AI", "Dimethenamid; broadcast with incorporation; kg AI", "Dimethenamid; broadcast without incorporation; kg AI", "Dimethenamid; banded or side-dressed; kg AI", "Dimethenamid; unspec. appl. method; kg AI", "Dimethenamid; foliar or directed spray; kg AI".
Exchange "Chlorpyrifos-soil agricultural" is the result of combining the following original LCA Commons flows: "Chlorpyrifos; unspec. appl. method; kg AI", "Chlorpyrifos; broadcast with incorporation; kg AI", "Chlorpyrifos; foliar or directed spray; kg AI", "Chlorpyrifos; banded or side-dressed; kg AI", "Chlorpyrifos; broadcast without incorporation; kg AI", "Chlorpyrifos; in seed furrow; kg AI".
Exchange "Pesticides, unspecified-soil agricultural" is the result of combining the following original LCA Commons flows: "Unspecified pesticide; in seed furrow; kg AI", "Unspecified pesticide; broadcast without incorporation; kg AI", "Unspecified pesticide; broadcast with incorporation; kg AI", "Unspecified pesticide; unspec. appl. method; kg AI", "Unspecified pesticide; foliar or directed spray; kg AI", "Unspecified pesticide; banded or side-dressed; kg AI".
Exchange "Rimsulfuron-soil agricultural" is the result of combining the following original LCA Commons flows: "Rimsulfuron; broadcast with incorporation; kg AI", "Rimsulfuron; foliar or directed spray; kg AI", "Rimsulfuron; banded or side-dressed; kg AI", "Rimsulfuron; broadcast without incorporation; kg AI", "Rimsulfuron; unspec. appl. method; kg AI", "Rimsulfuron; in seed furrow; kg AI".
Exchange "Ash-soil agricultural" is the result of combining the following original LCA Commons flows: "Ash; from residue burning; kg except C, biogenic", "Ash; from residue burning; kg C, biogenic".
Exchange "Isoxaflutole-soil agricultural" is the result of combining the following original LCA Commons flows: "Isoxaflutole; foliar or directed spray; kg AI", "Isoxaflutole; in seed furrow; kg AI", "Isoxaflutole; unspec. appl. method; kg AI", "Isoxaflutole; banded or side-dressed; kg AI", "Isoxaflutole; broadcast without incorporation; kg AI", "Isoxaflutole; broadcast with incorporation; kg AI".
Exchange "Acetochlor-soil agricultural" is the result of combining the following original LCA Commons flows: "Acetochlor; unspec. appl. method; kg AI", "Acetochlor; foliar or directed spray; kg AI", "Acetochlor; broadcast without incorporation; kg AI", "Acetochlor; in seed furrow; kg AI", "Acetochlor; banded or side-dressed; kg AI", "Acetochlor; broadcast with incorporation; kg AI".
Exchange "Water-soil agricultural" is the result of combining the following original LCA Commons flows: "Water; in above-ground residue left on field; biogenic", "Water; from irrigation and applied with manure and sewage sludge", "Water; using unspec. method in manure", "Water; broadcast w/o incorp. in manure", "Water; in below-ground residue; biogenic".
Exchange "Clopyralid-soil agricultural" is the result of combining the following original LCA Commons flows: "Clopyralid; broadcast without incorporation; kg AI", "Clopyralid; foliar or directed spray; kg AI", "Clopyralid; unspec. appl. method; kg AI", "Clopyralid; banded or side-dressed; kg AI", "Clopyralid; broadcast with incorporation; kg AI", "Clopyralid; in seed furrow; kg AI".
Exchange "Primisulfuron-soil agricultural" is the result of combining the following original LCA Commons flows: "Primisulfuron-methyl; banded or side-dressed; kg AI", "Primisulfuron-methyl; broadcast without incorporation; kg AI", "Primisulfuron-methyl; in seed furrow; kg AI", "Primisulfuron-methyl; foliar or directed spray; kg AI", "Primisulfuron-methyl; unspec. appl. method; kg AI", "Primisulfuron-methyl; broadcast with incorporation; kg AI".
Exchange "Halosulfuron-methyl-soil agricultural" is the result of combining the following original LCA Commons flows: "Halosulfuron-methyl; unspec. appl. method; kg AI", "Halosulfuron-methyl; in seed furrow; kg AI", "Halosulfuron-methyl; foliar or directed spray; kg AI", "Halosulfuron-methyl; broadcast with incorporation; kg AI", "Halosulfuron-methyl; broadcast without incorporation; kg AI", "Halosulfuron-methyl; banded or side-dressed; kg AI".
Exchange "Fipronil-soil agricultural" is the result of combining the following original LCA Commons flows: "Fipronil; foliar or directed spray; kg AI", "Fipronil; broadcast with incorporation; kg AI", "Fipronil; banded or side-dressed; kg AI", "Fipronil; broadcast without incorporation; kg AI", "Fipronil; unspec. appl. method; kg AI", "Fipronil; in seed furrow; kg AI".
Exchange "Water, unspecified origin-resource in water" is the result of combining the following original LCA Commons flows: "Water; withdrawal from unspec. source, for corn, in 2000", "Water; from plant uptake; biogenic".
Exchange "Diflufenzopyr-sodium-soil agricultural" is the result of combining the following original LCA Commons flows: "Diflufenzopyr-sodium; broadcast with incorporation; kg AI", "Diflufenzopyr-sodium; unspec. appl. method; kg AI", "Diflufenzopyr-sodium; in seed furrow; kg AI", "Diflufenzopyr-sodium; foliar or directed spray; kg AI", "Diflufenzopyr-sodium; broadcast without incorporation; kg AI", "Diflufenzopyr-sodium; banded or side-dressed; kg AI".
Exchange "Metolachlor-soil agricultural" is the result of combining the following original LCA Commons flows: "Propazine; broadcast without incorporation; kg AI", "Propazine; broadcast with incorporation; kg AI", "Propazine; foliar or directed spray; kg AI", "Propazine; unspec. appl. method; kg AI", "Propazine; in seed furrow; kg AI", "Propazine; banded or side-dressed; kg AI".
Exchange "Particulates, < 10 um-air low population density" is the result of combining the following original LCA Commons flows: "PM10; from residue burning; kg except C, biogenic", "PM10; from residue burning; kg C, biogenic".
Exchange "Cyfluthrin-soil agricultural" is the result of combining the following original LCA Commons flows: "Beta-Cyfluthrin; banded or side-dressed; kg AI", "Beta-Cyfluthrin; broadcast without incorporation; kg AI", "Beta-Cyfluthrin; in seed furrow; kg AI", "Beta-Cyfluthrin; broadcast with incorporation; kg AI", "Beta-Cyfluthrin; foliar or directed spray; kg AI", "Beta-Cyfluthrin; unspec. appl. method; kg AI".
Exchange "Flumetsulam-soil agricultural" is the result of combining the following original LCA Commons flows: "Flumetsulam; banded or side-dressed; kg AI", "Flumetsulam; broadcast without incorporation; kg AI", "Flumetsulam; foliar or directed spray; kg AI", "Flumetsulam; unspec. appl. method; kg AI", "Flumetsulam; broadcast with incorporation; kg AI", "Flumetsulam; in seed furrow; kg AI".
Exchange "Atrazine-soil agricultural" is the result of combining the following original LCA Commons flows: "Atrazine; banded or side-dressed; kg AI", "Atrazine; broadcast without incorporation; kg AI", "Atrazine; in seed furrow; kg AI", "Atrazine; unspec. appl. method; kg AI", "Atrazine; foliar or directed spray; kg AI", "Atrazine; broadcast with incorporation; kg AI".
Exchange "Transformation, from arable-resource land" is the result of combining the following original LCA Commons flows: "Transformation; from arable, from unspec. use to corn", "Transformation; from arable, from soy to corn", "Transformation; from arable, from corn to corn", "Transformation; from arable, from small grains to corn".
Exchange "Calcium-soil agricultural" is the result of combining the following original LCA Commons flows: "Calcium; applied in dolomite", "Calcium; applied in limestone".
Exchange "2,4-D-soil agricultural" is the result of combining the following original LCA Commons flows: "2,4-D; unspec. appl. method; kg AI", "2,4-D; foliar or directed spray; kg AI", "2,4-D; in seed furrow; kg AI", "2,4-D; banded or side-dressed; kg AI", "2,4-D; broadcast with incorporation; kg AI", "2,4-D; broadcast without incorporation; kg AI".
Exchange "Alachlor-soil agricultural" is the result of combining the following original LCA Commons flows: "Alachlor; broadcast without incorporation; kg AI", "Alachlor; broadcast with incorporation; kg AI", "Alachlor; in seed furrow; kg AI", "Alachlor; banded or side-dressed; kg AI", "Alachlor; foliar or directed spray; kg AI", "Alachlor; unspec. appl. method; kg AI".
Exchange "Ethene-2bdf9967-6dae-4183-88d1-8f612548c51e low population density" was originally named: "Ethylene; from residue burning; kg C, biogenic" in this dataset.
Exchange "Rimsulfuron-2bdf9967-6dae-4183-88d1-8f612548c51e low population density" was originally named: "Rimsulfuron; broadcast by air; kg AI" in this dataset.
Exchange "Prosulfuron-2bdf9967-6dae-4183-88d1-8f612548c51e low population density" was originally named: "Prosulfuron; broadcast by air; kg AI" in this dataset.
Exchange "Phenol-2bdf9967-6dae-4183-88d1-8f612548c51e low population density" was originally named: "Phenol; from residue burning; kg C, biogenic" in this dataset.
Exchange "Chlorpyrifos-2bdf9967-6dae-4183-88d1-8f612548c51e low population density" was originally named: "Chlorpyrifos; broadcast by air; kg AI" in this dataset.
Exchange "Butadiene-2bdf9967-6dae-4183-88d1-8f612548c51e low population density" was originally named: "1,3 butadiene; from residue burning; kg C, biogenic" in this dataset.
Exchange "1-Butene-2bdf9967-6dae-4183-88d1-8f612548c51e low population density" was originally named: "1 butene; from residue burning; kg C, biogenic" in this dataset.
Exchange "Furan-2bdf9967-6dae-4183-88d1-8f612548c51e low population density" was originally named: "Furan; from residue burning; kg C, biogenic" in this dataset.
Exchange "Acrylonitrile-2bdf9967-6dae-4183-88d1-8f612548c51e low population density" was originally named: "Propenenitrile; from residue burning; kg C, biogenic" in this dataset.
Exchange "Acetochlor-2bdf9967-6dae-4183-88d1-8f612548c51e low population density" was originally named: "Acetochlor; broadcast by air; kg AI" in this dataset.
Exchange "Transformation, to arable-c19fb2d9-98eb-4cd3-8761-81b71d8a9a1b land" was originally named: "Transformation; to arable, to corn" in this dataset.
Exchange "Butane-2bdf9967-6dae-4183-88d1-8f612548c51e low population density" was originally named: "N butane; from residue burning; kg C, biogenic" in this dataset.
Exchange "Tebupirimphos-2bdf9967-6dae-4183-88d1-8f612548c51e low population density" was originally named: "Tebupirimfos; broadcast by air; kg AI" in this dataset.
Exchange "Isoprene-2bdf9967-6dae-4183-88d1-8f612548c51e low population density" was originally named: "Isoprene; from residue burning; kg C, biogenic" in this dataset.
Exchange "isopentane-2bdf9967-6dae-4183-88d1-8f612548c51e low population density" was originally named: "I pentane; from residue burning; kg C, biogenic" in this dataset.
Exchange "Metribuzin-2bdf9967-6dae-4183-88d1-8f612548c51e low population density" was originally named: "Metribuzin; broadcast by air; kg AI" in this dataset.
Exchange "Methanol-2bdf9967-6dae-4183-88d1-8f612548c51e low population density" was originally named: "Methanol; from residue burning; kg C, biogenic" in this dataset.
Exchange "Sulfur dioxide-2bdf9967-6dae-4183-88d1-8f612548c51e low population density" was originally named: "Sulfur dioxide; from residue burning; biogenic" in this dataset.
Exchange "Ethane-2bdf9967-6dae-4183-88d1-8f612548c51e low population density" was originally named: "Ethane; from residue burning; kg C, biogenic" in this dataset.
Exchange "Nicosulfuron-2bdf9967-6dae-4183-88d1-8f612548c51e low population density" was originally named: "Nicosulfuron; broadcast by air; kg AI" in this dataset.
Exchange "Occupation, arable-c19fb2d9-98eb-4cd3-8761-81b71d8a9a1b land" was originally named: "Occupation; arable, as corn" in this dataset.
Exchange "Clopyralid-2bdf9967-6dae-4183-88d1-8f612548c51e low population density" was originally named: "Clopyralid; broadcast by air; kg AI" in this dataset.
Exchange "Dicamba-2bdf9967-6dae-4183-88d1-8f612548c51e low population density" was originally named: "Dicamba; broadcast by air; kg AI" in this dataset.
Exchange "Methane-2bdf9967-6dae-4183-88d1-8f612548c51e low population density" was originally named: "Methane; from residue burning; kg C, biogenic" in this dataset.
Exchange "Propene-2bdf9967-6dae-4183-88d1-8f612548c51e low population density" was originally named: "Propylene; from residue burning; kg C, biogenic" in this dataset.
Exchange "Water, ground-c19fb2d9-98eb-4cd3-8761-81b71d8a9a1b in water" was originally named: "Water; withdrawal from groundwater, for corn, in 2000" in this dataset.
Exchange "pursuit-2bdf9967-6dae-4183-88d1-8f612548c51e low population density" was originally named: "Imazethapyr; broadcast by air; kg AI" in this dataset.
Exchange "Acetone-2bdf9967-6dae-4183-88d1-8f612548c51e low population density" was originally named: "Acetone; from residue burning; kg C, biogenic" in this dataset.
Exchange "Dinitrogen monoxide-2bdf9967-6dae-4183-88d1-8f612548c51e low population density" was originally named: "Dinitrogen monoxide; from residue burning; kg N, biogenic" in this dataset.
Exchange "Permethrin-2bdf9967-6dae-4183-88d1-8f612548c51e low population density" was originally named: "Permethrin, mixed cis,trans; broadcast by air; kg AI" in this dataset.
Exchange "2,4-D-2bdf9967-6dae-4183-88d1-8f612548c51e low population density" was originally named: "2,4-D; broadcast by air; kg AI" in this dataset.
Exchange "Acetic acid-2bdf9967-6dae-4183-88d1-8f612548c51e low population density" was originally named: "Acetic acid; from residue burning; kg C, biogenic" in this dataset.
Exchange "Pentane-2bdf9967-6dae-4183-88d1-8f612548c51e low population density" was originally named: "N pentane; from residue burning; kg C, biogenic" in this dataset.
Exchange "Zinc compounds-be1c0329-f1a8-4524-8420-a86d2a8dd358 agricultural" was originally named: "Zinc compounds; as secondary application" in this dataset.
Exchange "Metolachlor-2bdf9967-6dae-4183-88d1-8f612548c51e low population density" was originally named: "Propazine; broadcast by air; kg AI" in this dataset.
Exchange "Acetonitrile-2bdf9967-6dae-4183-88d1-8f612548c51e low population density" was originally named: "Acetonitrile; from residue burning; kg C, biogenic" in this dataset.
Exchange "Dimethenamid-2bdf9967-6dae-4183-88d1-8f612548c51e low population density" was originally named: "Dimethenamid; broadcast by air; kg AI" in this dataset.
Exchange "Alachlor-2bdf9967-6dae-4183-88d1-8f612548c51e low population density" was originally named: "Alachlor; broadcast by air; kg AI" in this dataset.
Exchange "Terbufos-2bdf9967-6dae-4183-88d1-8f612548c51e low population density" was originally named: "Terbufos; broadcast by air; kg AI" in this dataset.
Exchange "Hydrocyanic acid-2bdf9967-6dae-4183-88d1-8f612548c51e low population density" was originally named: "Hydrogen cyanide; from residue burning; kg C, biogenic" in this dataset.
Exchange "Flumetsulam-2bdf9967-6dae-4183-88d1-8f612548c51e low population density" was originally named: "Flumetsulam; broadcast by air; kg AI" in this dataset.
Exchange "Acetaldehyde-2bdf9967-6dae-4183-88d1-8f612548c51e low population density" was originally named: "Acetaldehyde; from residue burning; kg C, biogenic" in this dataset.
Exchange "Parathion-methyl-2bdf9967-6dae-4183-88d1-8f612548c51e low population density" was originally named: "Methyl parathion; broadcast by air; kg AI" in this dataset.
Exchange "Formaldehyde-2bdf9967-6dae-4183-88d1-8f612548c51e low population density" was originally named: "Formaldehyde; from residue burning; kg C, biogenic" in this dataset.
Exchange "Halosulfuron-methyl-2bdf9967-6dae-4183-88d1-8f612548c51e low population density" was originally named: "Halosulfuron-methyl; broadcast by air; kg AI" in this dataset.
Exchange "Formic acid-2bdf9967-6dae-4183-88d1-8f612548c51e low population density" was originally named: "Formic acid; from residue burning; kg C, biogenic" in this dataset.
Exchange "Cyfluthrin-2bdf9967-6dae-4183-88d1-8f612548c51e low population density" was originally named: "Beta-Cyfluthrin; broadcast by air; kg AI" in this dataset.
Exchange "Propane-2bdf9967-6dae-4183-88d1-8f612548c51e low population density" was originally named: "Propane; from residue burning; kg C, biogenic" in this dataset.
Exchange "Tefluthrin-2bdf9967-6dae-4183-88d1-8f612548c51e low population density" was originally named: "Tefluthrin; broadcast by air; kg AI" in this dataset.
Exchange "Nitrogen dioxide-2bdf9967-6dae-4183-88d1-8f612548c51e low population density" was originally named: "Nitrogen dioxide; from residue burning; kg N, biogenic" in this dataset.
Exchange "Ammonia-2bdf9967-6dae-4183-88d1-8f612548c51e low population density" was originally named: "Ammonia; from residue burning; kg N, biogenic" in this dataset.
Exchange "Atrazine-2bdf9967-6dae-4183-88d1-8f612548c51e low population density" was originally named: "Atrazine; broadcast by air; kg AI" in this dataset.
Exchange "Benzene-2bdf9967-6dae-4183-88d1-8f612548c51e low population density" was originally named: "Benzene; from residue burning; kg C, biogenic" in this dataset.
Exchange "Phosphorus-c19fb2d9-98eb-4cd3-8761-81b71d8a9a1b unspecified" was originally named: "Phosphorous; from plant uptake; biogenic" in this dataset.
Exchange "isobutene-2bdf9967-6dae-4183-88d1-8f612548c51e low population density" was originally named: "I butene; from residue burning; kg C, biogenic" in this dataset.
Exchange "cis-2-Butene-2bdf9967-6dae-4183-88d1-8f612548c51e low population density" was originally named: "Cis 2 butene; from residue burning; kg C, biogenic" in this dataset.
Exchange "Fipronil-2bdf9967-6dae-4183-88d1-8f612548c51e low population density" was originally named: "Fipronil; broadcast by air; kg AI" in this dataset.
Exchange "Sulfuric acid-be1c0329-f1a8-4524-8420-a86d2a8dd358 agricultural" was originally named: "Sulfuric acid; as secondary application" in this dataset.
Exchange "Carbon dioxide, in air-2bdf9967-6dae-4183-88d1-8f612548c51e low population density" was originally named: "Carbon dioxide; from residue burning; kg C, biogenic" in this dataset.
Exchange "Glyphosate-2bdf9967-6dae-4183-88d1-8f612548c51e low population density" was originally named: "Glyphosate; broadcast by air; kg AI" in this dataset.
Exchange "Isoxaflutole-2bdf9967-6dae-4183-88d1-8f612548c51e low population density" was originally named: "Isoxaflutole; broadcast by air; kg AI" in this dataset.
Exchange "trans-2-Butene-2bdf9967-6dae-4183-88d1-8f612548c51e low population density" was originally named: "Trans 2 butene; from residue burning; kg C, biogenic" in this dataset.
Exchange "Magnesium-be1c0329-f1a8-4524-8420-a86d2a8dd358 agricultural" was originally named: "Magnesium; applied in dolomite" in this dataset.
Exchange "Water-2bdf9967-6dae-4183-88d1-8f612548c51e low population density" was originally named: "Water; from residue burning; biogenic" in this dataset.
Exchange "Toluene-2bdf9967-6dae-4183-88d1-8f612548c51e low population density" was originally named: "Toluene; from residue burning; kg C, biogenic" in this dataset.
Exchange "Sulfur-be1c0329-f1a8-4524-8420-a86d2a8dd358 agricultural" was originally named: "Sulfur; as secondary application" in this dataset.
Exchange "Carbon monoxide, fossil-2bdf9967-6dae-4183-88d1-8f612548c51e low population density" was originally named: "Carbon monoxide; from residue burning; kg C, biogenic" in this dataset.
Exchange "Ethyne-2bdf9967-6dae-4183-88d1-8f612548c51e low population density" was originally named: "Acetylene; from residue burning; kg C, biogenic" in this dataset.
Exchange "Carbon dioxide-c19fb2d9-98eb-4cd3-8761-81b71d8a9a1b unspecified" was originally named: "Carbon dioxide; from plant uptake; kg C, biogenic" in this dataset.
Exchange "Cyanazine-2bdf9967-6dae-4183-88d1-8f612548c51e low population density" was originally named: "Cyanazine; broadcast by air; kg AI" in this dataset.

## Geography
The unit process is assumed to represent production in Nebraska (US State).

## Technology
This process produces corn grain; at harvest in 2000; at farm; 85%-91% moisture. The process is assumed to represent production in Nebraska (US State). Yields and related inputs and outputs represent a single year of operation, in 2000. This dataset includes consideration of residue burning; soil preparation; planting or sowing; irrigation; application, storage, and transport of fertilizers, manures, liming materials, secondary materials, and pesticides; and harvest. Fate and transport of applications are not included as described in Cooper, J.S., Kahn, E., Noon, M. (2012) LCA Digital Commons Unit Process Data: field crop production Version 1 which is available at https://www.lcacommons.gov/discovery/docs/LCA%20Digital%20Commons%20Unit%20Process%20Data%20final%20updated.pdf

## Time period
Start and end dates match the underlying data obtained from the USDA Agricultural Resource Management Survey (ARMS).
## Parameters
- p3119: 0; = p2338*p1082
- p0175: 0
- p1964: 0.5
- p1779: 0
- p2883: 2.39932e-5; = p2297*(p1079+p1081)
- p4326: 0; = p1771*p3480
- p3452: 0; = p3376*p1240
- p3827: 2.96564e-8; = p1890*p3477
- p0309: 0.5
- p3409: 4.46072e-5; = p3371*p1238
- p1038: 0.00774783
- p1896: 4.92951e-7; = p1488*1000/p0818
- p0072: 37.874
- p2852: 6.2305e-9; = p2266*(p1079+p1081)
- p0685: 8.381; = p0025*(1+p0553*p0157/100)
- p1307: 0
- p1040: 0.024056
- p0308: 0.5
- p1233: 0; = p1232*p0001/(p0818*p0002)
- p1269: 0
- p0511: 0; = SQRT(2)*(IF((2*p0379-1)<0;-1;IF((2*p0379-1)>0;1;0))*SQRT(SQRT((2/(pi()*0.140012289)+LN(1-(2*p0379-1)^2)/2)^2-LN(1-(2*p0379-1)^2)/0.140012289)-(2/(pi()*0.140012289)+LN(1-(2*p0379-1)^2)/2)))
- p1198: 0.44
- p3498: 3.58692e-6; = p1767*p3476
- p4363: 0; = p1808*p3480
- p0718: 2.864; = p0058*(1+p0586*p0190/100)
- p2121: 0.822447
- p1174: 3.84683e-8; = p1170*p1173/p0818
- p1655: 0.483107
- p0708: 5.201; = p0048*(1+p0576*p0180/100)
- p1821: 0
- p2075: 0.072
- p0082: 96.093
- p2943: 2.12237e-5; = p2357*(p1020+p1022)
- p0102: 50.596
- p1004: 0; = p1000*p0888
- p1066: 0.00384912; = IF(p1012=0;p1052/(p1059*p0818);0)
- p2709: 2.34991e-6; = p2318*(p1019+p1021)
- p1336: 0; = p1323*p0801
- p2420: 0; = p2235*p2210
- p1882: 0
- p4007: 9.42226e-8; = p1864*p3478
- p0716: 22.214; = p0056*(1+p0584*p0188/100)
- p3298: 0; = if(p1283+p1284+p1285+p1286=0;0;p1283/(p1283+p1284+p1285+p1286))
- p1761: 0
- p1775: 0
- p2058: 1.24412
- p3129: 0; = p2348*p1082
- p3209: 0; = p2428*p1132
- p2255: 0.000205703; = p2222*p2201
- p2401: 0; = p2234*p2190
- p2149: 3.54343e-8; = p2015*p2077*p2111/(p0818*1000)
- p2347: 0.000330603; = p2228*p2215
- p1149: 0.830148
- p1611: 0
- p0725: 2.793; = p0065*(1+p0593*p0197/100)
- p0451: 0; = SQRT(2)*(IF((2*p0319-1)<0;-1;IF((2*p0319-1)>0;1;0))*SQRT(SQRT((2/(pi()*0.140012289)+LN(1-(2*p0319-1)^2)/2)^2-LN(1-(2*p0319-1)^2)/0.140012289)-(2/(pi()*0.140012289)+LN(1-(2*p0319-1)^2)/2)))
- p3792: 8.43354e-8; = p1855*p3477
- p0358: 0.5
- p2743: 6.30823e-7; = p2352*(p1128+p1130)
- p2667: 0.000284372; = p2276*(p1019+p1021)
- p1154: 0.000695156; = if(p1152*p0818=0;0;p1150/(p1152*p0818))
- p2905: 2.16034e-5; = p2319*(p1020+p1022)
- p2394: 0; = p2234*p2183
- p2735: 4.29461e-8; = p2344*(p1078+p1080)
- p0989: 4.74794e7; = p0985*p0886
- p2239: 1.70293e-5; = p2222*p2184
- p2766: 7.28635e-7; = p2375*(p1078+p1080)
- p2543: 0.000279095; = p2347*p1073
- p4265: 2.60995e-9; = p1916*p3479
- p0149: 0
- p2599: 0; = p2403*p1014
- p2062: 3.76588
- p1696: 0
- p0704: 98.939; = p0044*(1+p0572*p0176/100)
- p4309: 0; = p1754*p3480
- p2733: 2.94969e-6; = p2342*(p1078+p1080)
- p2864: 2.49811e-5; = p2278*(p1020+p1022)
- p3908: 1.84205e-5; = p1765*p3478
- p1173: 0.5
- p3225: 0.000230242; = p3221*p1229
- p2737: 3.02071e-6; = p2346*(p1078+p1080)
- p2922: 0.0001056; = p2336*(p1079+p1081)
- p3211: 0; = p2430*p1132
- p1765: 4.13022e-5; = p1357*1000/p0818
- p1956: 0
- p2704: 8.95978e-8; = p2313*(p1128+p1130)
- p1737: 0
- p3549: 2.04046e-7; = p1818*p3476
- p1917: 0
- p0215: 27.358
- p5197: 1.10957e-8; = p1818*p3484
- p4940: 1.18468e-6; = p1767*p3483
- p1411: 443
- p3110: 8.34389e-8; = p2329*p1023
- p3247: 0
- p0776: 30.954; = p0116*(1+p0644*p0248/100)
- p2016: 0.000532155; = (p2014-p2015)/(p0818)
- p4120: 3.91336e-6; = p1771*p3479
- p0400: 0.5
- p0766: 139.798; = p0106*(1+p0634*p0238/100)
- p3078: 0; = p2297*p1082
- p1592: 0
- p2315: 0.00063053; = p2224*p2182
- p0010: 4793.95
- p0983: 0.734371; = if(p0886=0;0;min(1;(p0695*p0694*1000*p0697/100)/p0886))
- p2473: 0.000738419; = p2277*p1014
- p1192: 3.47702e-8; = p1188*p1191/p0818
- p4938: 4.16056e-6; = p1765*p3483
- p1049: 0.218296; = IF(p1012=0;IF(p1037+p1044+p1045+p1046+p1047+p1048=1;0;1-(p1037+p1044+p1045+p1046+p1047+p1048));0)
- p3347: 0.00107264; = if(and(p1232=0;p3256<>0);p3275*p3289;0)
- p3436: 0; = p3379*p1239
- p3056: 0; = p2275*p1132
- p2057: 3.28794
- p0452: 0; = SQRT(2)*(IF((2*p0320-1)<0;-1;IF((2*p0320-1)>0;1;0))*SQRT(SQRT((2/(pi()*0.140012289)+LN(1-(2*p0320-1)^2)/2)^2-LN(1-(2*p0320-1)^2)/0.140012289)-(2/(pi()*0.140012289)+LN(1-(2*p0320-1)^2)/2)))
- p3167: 0; = p2386*p1082
- p2885: 7.02703e-6; = p2299*(p1079+p1081)
- p0775: 43.939; = p0115*(1+p0643*p0247/100)
- p0681: 0
- p2654: 2.81683e-7; = p2263*(p1078+p1080)
- p1078: 0.03448; = IF(p1071=0;IF(p1073=1;0;IF(p1073+p1074>1;1-p1073;p1074));0)
- p2753: 5.18592e-6; = p2362*(p1019+p1021)
- p2875: 0.00217903; = p2289*(p1020+p1022)
- p2931: 1.58012e-6; = p2345*(p1079+p1081)
- p0078: 8498.81
- p2485: 0.0061043; = p2289*p1014
- p1743: 0
- p1702: 0
- p1886: 0
- p1735: 0.749667
- p2432: 0.0134926; = p1158
- p3125: 0; = p2344*p1082
- p0240: 10.919
- p0572: 0; = IF(p0308<0.5;-SQRT(p0007*EXP(p0440^2*p0008)-p0007);SQRT(p0007*EXP(p0440^2*p0008)-p0007))
- p2512: 8.51548e-5; = p2316*p1014
- p4721: 0; = p1754*p3482
- p2023: 2.24
- p2059: 1.00168
- p2195: 0.00151731; = p2194*p2193
- p0393: 0.5
- p1623: 0
- p5234: 5.31427e-8; = p1855*p3484
- p2505: 9.16813e-6; = p2309*p1073
- p4905: 0; = p1938*p3482
- p1738: 0
- p2402: 0; = p2234*p2191
- p2715: 6.09726e-7; = p2324*(p1019+p1021)
- p1588: 0
- p1787: 0
- p1566: 0
- p3296: 0.514
- p3232: 2.23377e-8; = p1182/p0818
- p2094: 0.922577
- p0416: 0; = SQRT(2)*(IF((2*p0284-1)<0;-1;IF((2*p0284-1)>0;1;0))*SQRT(SQRT((2/(pi()*0.140012289)+LN(1-(2*p0284-1)^2)/2)^2-LN(1-(2*p0284-1)^2)/0.140012289)-(2/(pi()*0.140012289)+LN(1-(2*p0284-1)^2)/2)))
- p0660: 0; = IF(p0396<0.5;-SQRT(p0007*EXP(p0528^2*p0008)-p0007);SQRT(p0007*EXP(p0528^2*p0008)-p0007))
- p1267: 0
- p3210: 0; = p2429*p1132
- p1148: 0.0801873; = if(p1121=0;IF(p1146=1;0;1-p1146);0)
- p1797: 0
- p3233: 0.60394
- p2137: 4.53053e-8; = p2015*p2065*p2099/(p0818*1000)
- p0707: 6.834; = p0047*(1+p0575*p0179/100)
- p2026: 53.05
- p2140: 1.36312e-7; = p2015*p2068*p2102/(p0818*1000)
- p2629: 9.34551e-6; = p2238*(p1019+p1021)
- p2712: 9.41946e-6; = p2321*(p1019+p1021)
- p0934: 2.85056e-5; = p0928*p0001/(p0818*p0002)
- p1024: 5.17333e6; = IF(p1012=0;p1014*(p0704/100)*p0703*1000;0)
- p4359: 0; = p1804*p3480
- p1006: 0; = p1002*p0001*p0004/(p0818*p0002)
- p1098: 0.0330733
- p3275: 0.0214527
- p1771: 0.000131988; = p1363*1000/p0818
- p1265: 0; = if(p1232>0;0;IF(p1259+p1263+p1264=1;0;IF(p1259+p1263+p1264+p1262>1;1-(p1259+p1263+p1264);p1262)))
- p2312: 5.05701e-5; = p2231*p2219
- p3456: 0; = p3380*p1240
- p0444: 0; = SQRT(2)*(IF((2*p0312-1)<0;-1;IF((2*p0312-1)>0;1;0))*SQRT(SQRT((2/(pi()*0.140012289)+LN(1-(2*p0312-1)^2)/2)^2-LN(1-(2*p0312-1)^2)/0.140012289)-(2/(pi()*0.140012289)+LN(1-(2*p0312-1)^2)/2)))
- p1341: 0; = p1340*p0001/(p0818*p0002)
- p0726: 0
- p3223: 0.126838; = IF(p3216=0;0;(1-p1223)*24.3050/84.3139)
- p3100: 1.11283e-5; = p2319*p1023
- p1322: 0.100907; = IF(((p0745*1000*p0749/100)+(p0754*1000*p0758/100))/p0801<0;0;((p0745*1000*p0749/100)+(p0754*1000*p0758/100))/p0801)
- p1946: 0
- p2548: 1.91875e-5; = p2352*p1123
- p5112: 1.6848e-7; = p1939*p3483
- p1935: 0
- p1079: 0.05843; = IF(p1071=0;IF(p1073+p1078=1;0;IF(p1073+p1078+p1075>1;1-(p1073+p1078);p1075));0)
- p2886: 5.83449e-5; = p2300*(p1079+p1081)
- p0187: 30.198
- p2171: 0.1777; = p2165*p0831
- p3047: 0; = p2266*p1082
- p3383: 0; = p3364*p1234
- p1137: 0; = if(p1121=0;p1131*(p0716/100)*p0703*1000;0)
- p1159: 0.5
- p0418: 0; = SQRT(2)*(IF((2*p0286-1)<0;-1;IF((2*p0286-1)>0;1;0))*SQRT(SQRT((2/(pi()*0.140012289)+LN(1-(2*p0286-1)^2)/2)^2-LN(1-(2*p0286-1)^2)/0.140012289)-(2/(pi()*0.140012289)+LN(1-(2*p0286-1)^2)/2)))
- p2123: 0.263965
- p3471: 0; = p3376*p1241
- p0190: 30.637
- p2903: 2.88083e-6; = p2317*(p1020+p1022)
- p2917: 5.84532e-7; = p2331*(p1020+p1022)
- p2640: 7.81552e-6; = p2249*(p1019+p1021)
- p2504: 6.34125e-5; = p2308*p1073
- p0286: 0.5
- p3042: 0; = p2261*p1082
- p2934: 5.7989e-6; = p2348*(p1079+p1081)
- p1650: 0
- p2673: 8.16808e-5; = p2282*(p1019+p1021)
- p3463: 0.000180195; = p3368*p1241
- p2999: 0; = p2413*(p1020+p1022)
- p2589: 0; = p2393*p1014
- p1496: 17
- p3961: 2.98372e-7; = p1818*p3478
- p1051: 9.76689e6; = IF(p1012=0;p1044*p1036;0)
- p3239: 0.013074; = IF(p3238+p3235+p3236=1;0;1-(p3238+p3235+p3236))
- p1158: 0.0134926; = p1156*p1157
- p2148: 4.69711e-8; = p2015*p2076*p2110/(p0818*1000)
- p1081: 0.06289; = IF(p1071=0;IF(p1073+p1078+p1079+p1080=1;0;IF(p1073+p1078+p1079+p1080+p1077>1;1-(p1073+p1078+p1079+p1080);p1077));0)
- p2809: 0; = p2418*(p1078+p1080)
- p3138: 1.09327e-5; = p2357*p1023
- p1145: 2.14638e7; = if(p1121=0;p0799*p0702*1000*p0800/100;0)
- p4287: 2.97535e-8; = p1938*p3479
- p3104: 5.27391e-6; = p2323*p1023
- p1972: 0; = if(p0807=480;p1967*p0001/(p0818*p0002);0)
- p1963b: 0; = p1569*p1773+p1570*p1774+p1571*p1775+p1572*p1776+p1573*p1777+p1574*p1778+p1575*p1779+p1576*p1780+p1577*p1781+p1578*p1782+p1579*p1783+p1580*p1784+p1581*p1785+p1582*p1786+p1583*p1787+p1584*p1788+p1585*p1789+p1586*p1790+p1587*p1791
- p2204: 0.00112522; = p1109/p0818
- p1934: 0
- p1812: 0
- p3174: 0; = p2393*p1023
- p3254: 9.66448e7; = p1252*(p1287*(1-p3247)+p1290*(1-p3248)+p1291*(1-p3249)+p1292*(1-p3250))
- p2295: 0.000197748; = p2223*p2202
- p2250: 0.00148542; = p2222*p2196
- p3282: 0.3
- p0034: 3710.02
- p0241: 24.36
- p1879: 0
- p0539: 0; = IF(p0275<0.5;-SQRT(p0007*EXP(p0407^2*p0008)-p0007);SQRT(p0007*EXP(p0407^2*p0008)-p0007))
- p0668: 0; = IF(p0404<0.5;-SQRT(p0007*EXP(p0536^2*p0008)-p0007);SQRT(p0007*EXP(p0536^2*p0008)-p0007))
- p3704: 3.09539e-7; = p1767*p3477
- p2431: 0; = p2236*p2221
- p1674: 0
- p0390: 0.5
- p1894: 0
- p1125: 0.07806; = if(p1121=0;p0719/100;0)
- p1598: 0.392863
- p0371: 0.5
- p0990: 0; = p0986*p0886
- p3198: 0; = p2417*p1082
- p2217: 0.000553789; = p1118-p2216
- p2382: 2.7198e-5; = p2229*p2211
- p2774: 1.04264e-9; = p2383*(p1078+p1080)
- p0912: 0.0117949
- p2374: 0.000559173; = p2225*p2203
- p2184: 0.00017195; = p1051/p0818
- p1273: 0; = p1267*p1252/p0818
- p4322: 0; = p1767*p3480
- p0506: 0; = SQRT(2)*(IF((2*p0374-1)<0;-1;IF((2*p0374-1)>0;1;0))*SQRT(SQRT((2/(pi()*0.140012289)+LN(1-(2*p0374-1)^2)/2)^2-LN(1-(2*p0374-1)^2)/0.140012289)-(2/(pi()*0.140012289)+LN(1-(2*p0374-1)^2)/2)))
- p2811: 0; = p2420*(p1078+p1080)
- p2909: 1.02383e-5; = p2323*(p1020+p1022)
- p0033: 58.457
- p2498: 3.80038e-5; = p2302*p1073
- p2663: 0; = p2272*(p1128+p1130)
- p1061: 0.3
- p0982: 0.261811; = if(p0886=0;0;min(1;(p0691*p0690*1000*p0693/100)/p0886))
- p2304: 0.000254536; = p2227*p2211
- p3145: 2.29563e-5; = p2364*p1023
- p1091: 6.43177e-6; = IF(p1071=0;p1085*p0001/(p0818*p0002);0)
- p4532: 9.99377e-6; = p1771*p3481
- p0355: 0.5
- p1620: 0
- p1939: 1.67251e-6; = p1531*1000/p0818
- p1303: 0; = p1297*p1252/p0818
- p0808: 4.06e6
- p1275: 0; = p1271*p1252/p0818
- p0720: 0
- p1256: 0; = if(p1232>0;0;IF(p1253=1;0;IF(p1253+p1254>1;1-p1253;p1254)))
- p0690: 2135.25; = p0030*(1+p0558*p0162/100)
- p0290: 0.5
- p1222: 0.94
- p2722: 1.38428e-7; = p2331*(p1019+p1021)
- p1911: 0
- p3102: 2.04888e-5; = p2321*p1023
- p3833: 1.29747e-8; = p1896*p3477
- p0644: 0; = IF(p0380<0.5;-SQRT(p0007*EXP(p0512^2*p0008)-p0007);SQRT(p0007*EXP(p0512^2*p0008)-p0007))
- p0976: 0; = IF(p0687=0;IF(OR(p0686=0;p0689=0);0;p0686*1000*p0689/100);0)
- p1080: 0; = IF(p1071=0;IF(p1073+p1078+p1079=1;0;IF(p1073+p1078+p1079+p1076>1;1-(p1073+p1078+p1079);p1076));0)
- p1824: 0
- p2333: 0.000158449; = p2224*p2201
- p2455: 2.74022e-5; = p2259*p1073
- p1838: 3.13376e-6; = p1430*1000/p0818
- p0188: 23.01
- p1581: 0
- p0820: 0; = if(p0807=480;p0814;0)
- p1919: 0
- p2754: 1.30413e-6; = p2363*(p1019+p1021)
- p2299: 5.79214e-5; = p2227*p2206
- p2408: 0; = p2234*p2198
- p1272: 0.37527; = IF(p1267+p1270+p1271=p1259;0;p1259-(p1267+p1270+p1271))
- p4677: 6.66518e-9; = p1916*p3481
- p3382: 0; = p3363*p1234
- p1790: 0
- p3193: 0; = p2412*p1023
- p3405: 9.60028e-5; = p3367*p1238
- p1831: 0
- p1277: 0
- p1567: 0.629912
- p1401: 96
- p0794: 0.064; = p0134*(1+p0662*p0266/100)
- p2690: 1.99713e-6; = p2299*(p1078+p1080)
- p1101: 0.0606187; = IF(p1071=0;IF(p1096=1;0;IF(p1096+p1097>1;1-p1096;p1097));0)
- p5146: 1.95051e-7; = p1767*p3484
- p1637: 0
- p2475: 0.000241048; = p2279*p1014
- p4966: 4.36273e-7; = p1793*p3483
- p1127: 0; = if(p1121=0;p0721/100;0)
- p2232: 0.875631; = if(p0783*p0787+p0784*p0788+p0785*p0789+p0786*p0790=0;0;p0789*p0785/(p0783*p0787+p0784*p0788+p0785*p0789+p0786*p0790))
- p2984: 0; = p2398*(p1020+p1022)
- p0715: 6.289; = p0055*(1+p0583*p0187/100)
- p1834: 0
- p0881: 0; = p0880*p0001*p0003/(p0818*p0002)
- p4936: 4.59328e-7; = p1763*p3483
- p1929: 0
- p1286: 0; = p1282*p1252/p0818
- p0998: 0; = if(p0888=0;0;if((p0699*p0698*1000*p0700/100)/p0888>1;1;(p0699*p0698*1000*p0700/100)/p0888))
- p3524: 1.32093e-6; = p1793*p3476
- p3389: 0; = p3370*p1234
- p3017: 0; = p2431*(p1129+p1131)
- p2168: 0.00342427; = p2166*(p0903)
- p2527: 1.6375e-6; = p2331*p1014
- p0378: 0.5
- p1610: 0
- p1036: 1.2606e9; = IF(p1012=0;p0795*p0702*1000*p0796/100;0)
- p4528: 8.90468e-7; = p1767*p3481
- p0431: 0; = SQRT(2)*(IF((2*p0299-1)<0;-1;IF((2*p0299-1)>0;1;0))*SQRT(SQRT((2/(pi()*0.140012289)+LN(1-(2*p0299-1)^2)/2)^2-LN(1-(2*p0299-1)^2)/0.140012289)-(2/(pi()*0.140012289)+LN(1-(2*p0299-1)^2)/2)))
- p2598: 0; = p2402*p1014
- p2153: 1.5657e-9; = p2015*p2081*p2115/(p0818*1000)
- p3285: 0.275
- p2466: 1.66377e-6; = p2270*p1073
- p0367: 0.5
- p1763: 4.55979e-6; = p1355*1000/p0818
- p1236: 0; = if(p1232>0;0;p0728/100)
- p0946: 0; = if(and(p0683=0;or(p0807=480;p0807=32;p0807=1;and(p0807=60;p0901<0.03)));p0934;0)
- p1268: 0
- p2388: 1.04004e-5; = p2229*p2217
- p2666: 0; = p2275*(p1128+p1130)
- p2464: 3.04945e-6; = p2268*p1073
- p0521: 0; = SQRT(2)*(IF((2*p0389-1)<0;-1;IF((2*p0389-1)>0;1;0))*SQRT(SQRT((2/(pi()*0.140012289)+LN(1-(2*p0389-1)^2)/2)^2-LN(1-(2*p0389-1)^2)/0.140012289)-(2/(pi()*0.140012289)+LN(1-(2*p0389-1)^2)/2)))
- p3393: 0; = p3374*p1234
- p2271: 1.76634e-5; = p2226*p2217
- p3054: 0; = p2273*p1132
- p0993: 1.89425e-5; = p0989*p0001*p0004/(p0818*p0002)
- p2520: 7.21261e-6; = p2324*p1014
- p2378: 5.13875e-5; = p2229*p2207
- p0665: 0; = IF(p0401<0.5;-SQRT(p0007*EXP(p0533^2*p0008)-p0007);SQRT(p0007*EXP(p0533^2*p0008)-p0007))
- p2465: 1.15077e-5; = p2269*p1073
- p3118: 0; = p2337*p1082
- p1172: 7.69366e-8; = p1170/p0818
- p4857: 0; = p1890*p3482
- p3228: 0.000786318; = p3224*p1229
- p0403: 0.5
- p1532: 675
- p2331: 2.66156e-6; = p2224*p2199
- p3249: 0
- p3112: 3.01103e-7; = p2331*p1023
- p2541: 1.09952e-5; = p2345*p1073
- p1314: 0; = p1310*p1252/p0818
- p5144: 6.85015e-7; = p1765*p3484
- p4831: 0; = p1864*p3482
- p0949: 0; = if(and(p0683=0;or(p0807=480;p0807=32;p0807=1;and(p0807=60;p0901<0.03)));p0937;0)
- p1518: 9
- p1922: 0
- p1948: 0
- p3339: 2.96521e7; = if(and(p1232=0;p3254<>0);p3254*(p3269*p3277-p3334)/p3338;0)
- p3134: 8.48565e-7; = p2353*p1132
- p1695: 0
- p3170: 0; = p2389*p1132
- p1676: 0
- p1962: 5.33812e-5; = p1960*1000/p0818
- p3025: 5.98162e-6; = p2244*p1023
- p2989: 0; = p2403*(p1020+p1022)
- p4871: 0; = p1904*p3482
- p2732: 6.83166e-6; = p2341*(p1078+p1080)
- p2052: 1.18538e-6; = p2015*p2049*(1-p2050)/(p0818*1000)
- p2410: 0; = p2234*p2200
- p0813: 0; = if(p0807=480;1.56521739130435;0)
- p2248: 0.000701009; = p2222*p2193
- p0138: 82.459
- p0159: 4.282
- p1780: 0
- p1261: 0.37874; = if(p1232>0;0;p0732/100)
- p2358: 0.000210394; = p2225*p2186
- p2164: 0.000342274; = (p2015/p0818)-(p2022)-(p2035+p2036+p2052)-(p2017/p0818)-(p2039+p2041+p2044+p2158+p2159+p2160+p2161+p2162)
- p2183: 0.00181435; = p1064-p2182
- p3280: 0.375
- p0701: 0
- p0327: 0.5
- p1840: 0
- p3573: 1.55719e-7; = p1842*p3476
- p2263: 8.16945e-6; = p2226*p2209
- p3468: 2.69381e-5; = p3373*p1241
- p0350: 0.5
- p4699: 7.5983e-8; = p1938*p3481
- p2079: 0.02
- p0163: 5.807
- p1107: 6.4328e6; = IF(p1071=0;p1105*p1101*p1095;0)
- p1885: 0
- p1690: 0
- p0234: 24.343
- p2962: 2.31871e-6; = p2376*(p1079+p1081)
- p1281: 0; = IF(p1277+p1280=p1263;0;IF(p1277+p1280+p1279>p1263;p1263-(p1277+p1280);p1279))
- p2425: 0; = p2235*p2215
- p2460: 2.97775e-6; = p2264*p1073
- p2456: 8.87353e-6; = p2260*p1073
- p2196: 0.0149987; = p1068-p2193-p2195
- p1781: 0
- p0237: 18.857
- p3002: 0; = p2416*(p1079+p1081)
- p1928: 0
- p0377: 0.5
- p2039: 6.73896e-7; = p2015*p2037*p2038/(p0818*1000)
- p2562: 0.000152317; = p2366*p1014
- p1792: 0
- p2221: 4.37117e-5; = p1155-p2220
- p3224: 0.501945; = IF(p3216=0;0;1-p3221-p3222-p3223)
- p3446: 0; = p3370*p1240
- p0145: 0
- p3439: 0; = p3363*p1240
- p2500: 0.00021488; = p2304*p1073
- p0426: 0; = SQRT(2)*(IF((2*p0294-1)<0;-1;IF((2*p0294-1)>0;1;0))*SQRT(SQRT((2/(pi()*0.140012289)+LN(1-(2*p0294-1)^2)/2)^2-LN(1-(2*p0294-1)^2)/0.140012289)-(2/(pi()*0.140012289)+LN(1-(2*p0294-1)^2)/2)))
- p3533: 8.48402e-7; = p1802*p3476
- p2657: 1.77075e-9; = p2266*(p1078+p1080)
- p0342: 0.5
- p3234: 0.39606; = 1-p3233
- p3372: 0.000598186; = if(p1232=0;p3245*p3360/p0818;0)
- p3310: 4.27729e7; = if(and(p1232=0;p3252<>0);IF((p3306+p3307+p3308+p3309)+(p3252*(p3257*(1-p3277))/p3305)>p3252;p3252-(p3306+p3307+p3308+p3309);p3252*(p3257*(1-p3277))/p3305);0)
- p1327a: 0.0564456; = (p0745*1000/p0801)*(1-(p0746+p0747+p0748+p0749+p0750+p0751+p0752+p0753)/100)+(p0754*1000/p0801)*(1-(p0755+p0756+p0757+p0758+p0759+p0760+p0761+p0762)/100)
- p1555: 0
- p0649: 0; = IF(p0385<0.5;-SQRT(p0007*EXP(p0517^2*p0008)-p0007);SQRT(p0007*EXP(p0517^2*p0008)-p0007))
- p2251: 9.57508e-7; = p2222*p2197
- p2878: 5.06877e-6; = p2292*(p1020+p1022)
- p2767: 6.58994e-7; = p2376*(p1078+p1080)
- p2714: 2.42461e-6; = p2323*(p1019+p1021)
- p1338: 2.19037e6; = p1324*p0801
- p2635: 2.74997e-6; = p2244*(p1019+p1021)
- p3360: 1.18777e8; = if(p1232=0;p3310+p3321+p3332+p3343+p3354;0)
- p1121: 0
- p3896: 5.01836e-6; = p1963*p3477
- p2603: 0; = p2407*p1014
- p3214: 0.376406; = p1222*40.078/100.0869
- p2278: 0.000113747; = p2223*p2184
- p0575: 0; = IF(p0311<0.5;-SQRT(p0007*EXP(p0443^2*p0008)-p0007);SQRT(p0007*EXP(p0443^2*p0008)-p0007))
- p2822: 0; = p2431*(p1128+p1130)
- p0938: 1.95644e-5; = p0932*p0001/(p0818*p0002)
- p0807: 56
- p0903: 0.0106556
- p2783: 0; = p2392*(p1128+p1130)
- p2355: 0.000296039; = p2225*p2183
- p2461: 3.89948e-5; = p2265*p1073
- p0632: 0; = IF(p0368<0.5;-SQRT(p0007*EXP(p0500^2*p0008)-p0007);SQRT(p0007*EXP(p0500^2*p0008)-p0007))
- p1653: 0
- p2495: 4.88973e-5; = p2299*p1073
- p2280: 0.000852989; = p2223*p2186
- p2681: 3.32638e-7; = p2290*(p1019+p1021)
- p0107: 16.827
- p1116: 1.8447e-5; = IF(p1071=0;p1106/(p1111*p0818);0)
- p2143: 1.2907e-7; = p2015*p2071*p2105/(p0818*1000)
- p2677: 4.27878e-5; = p2286*(p1019+p1021)
- p1641: 0
- p1008: 0; = p1004*p0001*p0004/(p0818*p0002)
- p3387: 0; = p3368*p1234
- p2941: 6.50161e-5; = p2355*(p1020+p1022)
- p3418: 0.018495; = p3380*p1238
- p0645: 0; = IF(p0381<0.5;-SQRT(p0007*EXP(p0513^2*p0008)-p0007);SQRT(p0007*EXP(p0513^2*p0008)-p0007))
- p2557: 5.35943e-5; = p2361*p1014
- p3311: 6.57918e6; = if(and(p1232=0;p3252<>0);p3252-(p3306+p3307+p3308+p3309+p3310);0)
- p1796: 0
- p0752: 0
- p2060: 0.272353
- p0857: 1.33511; = p0856*p0001*p0003/(p0818*p0002)
- p3242: 2.35413e-8; = p3234*p1188*p3238/p0818
- p1077: 0.06289; = IF(p1071=0;p0715/100;0)
- p1926: 1.58448e-7; = p1518*1000/p0818
- p0684: 14.63; = p0024*(1+p0552*p0156/100)
- p1963i: 1.6873e-7; = p1706*p1910+p1707*p1911+p1708*p1912+p1709*p1913+p1710*p1914+p1711*p1915+p1712*p1916+p1713*p1917+p1714*p1918+p1715*p1919+p1716*p1920+p1717*p1921+p1718*p1922+p1719*p1923+p1720*p1924+p1721*p1925+p1722*p1926+p1723*p1927+p1724*p1928
- p2691: 1.6582e-5; = p2300*(p1078+p1080)
- p2174: 0.00133079; = p0895*p0903/p0818
- p0401: 0.5
- p2357: 9.66384e-5; = p2225*p2185
- p2866: 0.000187334; = p2280*(p1020+p1022)
- p3474: 0; = p3379*p1241
- p3308: 846184; = if(and(p1232=0;p3252<>0);p3252*(p3259-p3303)/p3305;0)
- p2241: 0.000127703; = p2222*p2186
- p1434: 29
- p0736: 0
- p2938: 1.71935e-6; = p2352*(p1129+p1131)
- p2151: 1.60206e-8; = p2015*p2079*p2113/(p0818*1000)
- p0906: 0.00342907
- p3335: 0.0141479; = IF(or(p3254=0;p1232>0);0;p3270*(p3280*(p3283*p1256+p3286*(p1253+p1257)+p1258*p3288+p3300*p3287)))
- p3640: 9.12838e-8; = p1909*p3476
- p2114: 0.832356
- p3669: 3.06069e-7; = p1938*p3476
- p1864: 2.11265e-7; = p1456*1000/p0818
- p0634: 0; = IF(p0370<0.5;-SQRT(p0007*EXP(p0502^2*p0008)-p0007);SQRT(p0007*EXP(p0502^2*p0008)-p0007))
- p0814: 0; = if(p0807=480;p0810*p0812+p0811*p0813;0)
- p3877: 3.12783e-7; = p1940*p3477
- p1621: 0
- p2046: 10
- p0793: 0
- p0761: 0
- p2742: 1.01971e-5; = p2351*(p1128+p1130)
- p2372: 0.000338901; = p2225*p2201
- p2725: 1.18605e-6; = p2334*(p1019+p1021)
- p1203: 3
- p2470: 0; = p2274*p1123
- p2066: 0.109412
- p2240: 5.86566e-5; = p2222*p2185
- p2360: 0.000387368; = p2225*p2188
- p0174: 0
- p3219: 0.0121089; = p3215*p1228
- p0947: 0; = if(and(p0683=0;or(p0807=480;p0807=32;p0807=1;and(p0807=60;p0901<0.03)));p0935;0)
- p0315: 0.5
- p0927: 0.00014; = IF(p0918+p0923+p0924+p0925+p0926=1;0;1-(p0918+p0923+p0924+p0925+p0926))
- p3367: 0.000163234; = if(p1232=0;p3244*p3361/p0818;0)
- p3267: 0.0170629
- p1170: 4370.06; = p1169*p0801
- p0530: 0; = SQRT(2)*(IF((2*p0398-1)<0;-1;IF((2*p0398-1)>0;1;0))*SQRT(SQRT((2/(pi()*0.140012289)+LN(1-(2*p0398-1)^2)/2)^2-LN(1-(2*p0398-1)^2)/0.140012289)-(2/(pi()*0.140012289)+LN(1-(2*p0398-1)^2)/2)))
- p1570: 0
- p2720: 3.83599e-8; = p2329*(p1019+p1021)
- p2201: 0.00207704; = 12.01*p2200/(2*14.0067)
- p2390: 0; = p2233*p2219
- p4142: 1.2841e-7; = p1793*p3479
- p0678: 2346.34; = p0018*(1+p0546*p0150/100)
- p1871: 0
- p2383: 3.02389e-8; = p2229*p2212
- p1635: 0
- p2605: 0; = p2409*p1014
- p2172: 0.165317; = p2166-(p2167+p2168+p2169+p2170)
- p1888: 1.47885e-6; = p1480*1000/p0818
- p2467: 1.49115e-5; = p2271*p1073
- p2145: 3.20411e-7; = p2015*p2073*p2107/(p0818*1000)
- p1326: 0.342832; = IF(((p0745*1000*p0753/100)+(p0754*1000*p0762/100))/p0801<0;0;((p0745*1000*p0753/100)+(p0754*1000*p0762/100))/p0801)
- p0642: 0; = IF(p0378<0.5;-SQRT(p0007*EXP(p0510^2*p0008)-p0007);SQRT(p0007*EXP(p0510^2*p0008)-p0007))
- p0282: 0.5
- p1638: 0.732906
- p1730: 0
- p2738: 1.13992e-5; = p2347*(p1078+p1080)
- p0829: 0; = if(p0807=480;p0814*(1-p0824);0)
- p3148: 0.00027686; = p2367*p1023
- p0635: 0; = IF(p0371<0.5;-SQRT(p0007*EXP(p0503^2*p0008)-p0007);SQRT(p0007*EXP(p0503^2*p0008)-p0007))
- p1048: 0.000435637; = IF(p1012=0;IF(p1037+p1044+p1045+p1046+p1047=1;0;IF(p1037+p1044+p1045+p1046+p1047+p1042>1;1-(p1037+p1044+p1045+p1046+p1047);p1042));0)
- p1990: 30
- p3400: 0.000642186; = p3362*p1238
- p2869: 7.75631e-5; = p2283*(p1020+p1022)
- p1989: 50
- p1175: 0.000136304
- p1062: 0.16
- p0616: 0; = IF(p0352<0.5;-SQRT(p0007*EXP(p0484^2*p0008)-p0007);SQRT(p0007*EXP(p0484^2*p0008)-p0007))
- p5133: 4.81788e-8; = p1754*p3484
- p0559: 0; = IF(p0295<0.5;-SQRT(p0007*EXP(p0427^2*p0008)-p0007);SQRT(p0007*EXP(p0427^2*p0008)-p0007))
- p3101: 1.60161e-6; = p2320*p1023
- p1855: 3.20418e-6; = p1447*1000/p0818
- p2745: 7.01419e-5; = p2354*(p1019+p1021)
- p0719: 7.806; = p0059*(1+p0587*p0191/100)
- p1724: 0
- p1689: 0
- p4822: 0; = p1855*p3482
- p0641: 0; = IF(p0377<0.5;-SQRT(p0007*EXP(p0509^2*p0008)-p0007);SQRT(p0007*EXP(p0509^2*p0008)-p0007))
- p1661: 0
- p0005: 1.60934
- p3936: 1.93156e-6; = p1793*p3478
- p4700: 1.26638e-7; = p1939*p3481
- p2992: 0; = p2406*(p1020+p1022)
- p1558: 0
- p2082: 0.285294
- p1328: 8.8231e6; = p1319*p0801
- p2487: 6.45845e-6; = p2291*p1014
- p3998: 1.42904e-6; = p1855*p3478
- p0593: 0; = IF(p0329<0.5;-SQRT(p0007*EXP(p0461^2*p0008)-p0007);SQRT(p0007*EXP(p0461^2*p0008)-p0007))
- p3091: 0; = p2310*p1082
- p2837: 2.10288e-7; = p2251*(p1020+p1022)
- p1161: 391455; = (p0722/100)*p0702*1000
- p3057: 0.000618554; = p2276*p1023
- p1774: 0
- p2536: 0.000369881; = p2340*p1073
- p1768: 0
- p2262: 1.80655e-5; = p2226*p2208
- p0148: 0
- p0166: 15.525
- p2511: 0.000387927; = p2315*p1014
- p2972: 9.73753e-7; = p2386*(p1079+p1081)
- p3455: 0; = p3379*p1240
- p0018: 2346.34
- p0119: 13.879
- p0801: 8.5e6
- p2596: 0; = p2400*p1014
- p0657: 0; = IF(p0393<0.5;-SQRT(p0007*EXP(p0525^2*p0008)-p0007);SQRT(p0007*EXP(p0525^2*p0008)-p0007))
- p1300: 0; = IF(p1297=p1265;0;IF(p1297+p1298>p1265;p1265-p1297;p1298))
- p1747: 0
- p1214: 0; = IF(p1213=0;0;p1213-1)
- p3377: 0; = if(p1232=0;p3246*p3359/p0818;0)
- p2915: 1.61981e-7; = p2329*(p1020+p1022)
- p1945: 0
- p0111: 67.965
- p2867: 2.69615e-5; = p2281*(p1020+p1022)
- p1925: 0
- p3108: 1.30947e-5; = p2327*p1023
- p1873: 0
- p4719: 4.04189e-6; = p1962*p3481
- p1155: 6.88661e-5; = if(p1153*p0818=0;0;p1151/(p1153*p0818))
- p0313: 0.5
- p1266: 0.24599; = if(p1232>0;0;IF(p1259+p1263+p1264+p1265=1;0;1-(p1259+p1263+p1264+p1265)))
- p4785: 0; = p1818*p3482
- p2756: 6.0068e-5; = p2365*(p1019+p1021)
- p2949: 5.50687e-6; = p2363*(p1020+p1022)
- p1754: 2.90489e-6; = p1346*1000/p0818
- p4353: 0; = p1798*p3480
- p0648: 0; = IF(p0384<0.5;-SQRT(p0007*EXP(p0516^2*p0008)-p0007);SQRT(p0007*EXP(p0516^2*p0008)-p0007))
- p3365: 0.000189294; = if(p1232=0;p3244*p3359/p0818;0)
- p0136: 98.939
- p0161: 16.39
- p2363: 2.50745e-5; = p2225*p2191
- p1400: 239
- p0729: 0
- p5217: 5.19747e-8; = p1838*p3484
- p3069: 0.000113551; = p2288*p1023
- p2870: 8.87811e-5; = p2284*(p1020+p1022)
- p1007: 0; = p1003*p0001*p0004/(p0818*p0002)
- p1003: 0; = p0999*p0888
- p2253: 3.45532e-6; = p2222*p2199
- p0809: 2000
- p3245: 0.28606; = IF(p3244=1;0;if(p3244+p0792/100>1;1-p3244;p0792/100))
- p0855: 0.601931; = p0854*p0001*p0003/(p0818*p0002)
- p0504: 0; = SQRT(2)*(IF((2*p0372-1)<0;-1;IF((2*p0372-1)>0;1;0))*SQRT(SQRT((2/(pi()*0.140012289)+LN(1-(2*p0372-1)^2)/2)^2-LN(1-(2*p0372-1)^2)/0.140012289)-(2/(pi()*0.140012289)+LN(1-(2*p0372-1)^2)/2)))
- p1773: 0
- p1973: 0; = if(p0807=480;p1968*p0001/(p0818*p0002);0)
- p2521: 5.83691e-5; = p2325*p1014
- p3071: 7.2354e-7; = p2290*p1023
- p0155: 2.757
- p0125: 10.159
- p0741: 2.025; = p0081*(1+p0609*p0213/100)
- p0728: 0
- p2011: 0.00226032
- p1828: 0
- p0769: 11.966; = p0109*(1+p0637*p0241/100)
- p2413: 0; = p2234*p2203
- p0951: 0; = if(and(p0683=0;or(p0807=480;p0807=32;p0807=1;and(p0807=60;p0901<0.03)));p0939;0)
- p0114: 44.606
- p1124: 0.02864; = if(p1121=0;p0718/100;0)
- p1110: 3.21718e7; = IF(p1071=0;p1105*p1104*p1095;0)
- p3149: 1.78465e-7; = p2368*p1023
- p0764: 98.939; = p0104*(1+p0632*p0236/100)
- p1728: 0
- p1554: 0
- p4855: 0; = p1888*p3482
- p2560: 0.000124844; = p2364*p1014
- p2658: 1.85165e-8; = p2267*(p1078+p1080)
- p2404: 0; = p2234*p2193
- p2781: 0; = p2390*(p1128+p1130)
- p1189: 0.000133511; = p0801*p0001/(p0818*p0002)
- p2129: 1.18608e-6; = p2015*p2057*p2091/(p0818*1000)
- p2910: 2.57466e-6; = p2324*(p1020+p1022)
- p0672: 0
- p2925: 0.000256791; = p2339*(p1079+p1081)
- p0550: 0; = IF(p0286<0.5;-SQRT(p0007*EXP(p0418^2*p0008)-p0007);SQRT(p0007*EXP(p0418^2*p0008)-p0007))
- p3194: 0; = p2413*p1023
- p3169: 0; = p2388*p1082
- p3378: 0; = if(p1232=0;p3246*p3360/p0818;0)
- p2300: 0.000480917; = p2227*p2207
- p2126: 6.99615e-7; = p2015*p2054*p2088/(p0818*1000)
- p0481: 0; = SQRT(2)*(IF((2*p0349-1)<0;-1;IF((2*p0349-1)>0;1;0))*SQRT(SQRT((2/(pi()*0.140012289)+LN(1-(2*p0349-1)^2)/2)^2-LN(1-(2*p0349-1)^2)/0.140012289)-(2/(pi()*0.140012289)+LN(1-(2*p0349-1)^2)/2)))
- p3318: 0; = if(and(p1232=0;p3253<>0);p3253*(p3262-p3313)/p3316;0)
- p2267: 5.37021e-7; = p2226*p2213
- p1736: 0.641
- p0257: 13.921
- p3055: 0; = p2274*p1132
- p2118: 0.679049
- p4580: 5.90535e-7; = p1819*p3481
- p2710: 5.11607e-6; = p2319*(p1019+p1021)
- p1615: 0.445163
- p3364: 6.07407e-5; = if(p1232=0;p3244*p3358/p0818;0)
- p1861: 0
- p0840: 0.135678; = p0839*p0831
- p0622: 0; = IF(p0358<0.5;-SQRT(p0007*EXP(p0490^2*p0008)-p0007);SQRT(p0007*EXP(p0490^2*p0008)-p0007))
- p1151: 1.42879e6; = if(p1121=0;p1149*p1148*p1145;0)
- p1020: 0.06834; = IF(p1012=0;IF(p1014+p1019=1;0;IF(p1014+p1019+p1016>1;1-(p1014+p1019);p1016));0)
- p2384: 3.16203e-7; = p2229*p2213
- p1258: 1; = if(p1232>0;0;IF(p1253+p1256+p1257=1;0;1-(p1253+p1256+p1257)))
- p2808: 0; = p2417*(p1078+p1080)
- p2133: 3.82329e-7; = p2015*p2061*p2095/(p0818*1000)
- p1344: 479787; = IF(p1318=0;p1327*p0801;0)
- p1185: 0.5
- p1997: 5.29856e7; = (if(p1152=0;0;p1150/p1152)+if(p1153=0;0;p1151/p1153))*(1+p1157)
- p2678: 0.00024353; = p2287*(p1019+p1021)
- p2007: 0.0219204; = ((p1981*p1985+p1987*p1991+p1993*p1997+p2001*p2005)/p0818)*p0005*p0002/1000
- p2953: 0.000537469; = p2367*(p1020+p1022)
- p1982: 750
- p3316: 0; = if(and(p1232=0;p3253<>0);1-(p3312+p3313+p3314+p3315);0)
- p1666: 0
- p0064: 4.3
- p1562: 0
- p2310: 9.73336e-5; = p2227*p2217
- p4906: 0; = p1939*p3482
- p0795: 149.917; = p0135*(1+p0663*p0267/100)
- p1447: 182
- p0806: 1.0143e9
- p2440: 3.25301e-5; = p2244*p1014
- p3396: 0; = p3377*p1234
- p1963k: 2.66906e-5; = p1744*p1948+p1745*p1949+p1746*p1950+p1747*p1951+p1748*p1952+p1749*p1953+p1750*p1954+p1751*p1955+p1752*p1956+p1753*p1957+p1961*p1962
- p3395: 0; = p3376*p1234
- p1050: 4.69479e8; = IF(p1012=0;p1037*p1036;0)
- p3213: 0.112803; = p1222*12.0107/100.0869
- p0109: 11.966
- p2563: 0.00150566; = p2367*p1014
- p1644: 0
- p2661: 6.79539e-8; = p2270*(p1078+p1080)
- p1848: 0
- p2643: 8.17388e-8; = p2252*(p1019+p1021)
- p5150: 2.18907e-6; = p1771*p3484
- p1932: 0
- p2942: 6.16172e-6; = p2356*(p1020+p1022)
- p1251: 1.53563e-6; = if(p1232>0;0;p1246*p0001/(p0818*p0002))
- p5172: 7.18303e-8; = p1793*p3484
- p2528: 0.000227382; = p2332*p1014
- p4786: 0; = p1819*p3482
- p3941: 6.12447e-7; = p1798*p3478
- p2929: 0.000135913; = p2343*(p1079+p1081)
- p2493: 0.000166956; = p2297*p1073
- p1904: 2.99292e-7; = p1496*1000/p0818
- p0611: 0; = IF(p0347<0.5;-SQRT(p0007*EXP(p0479^2*p0008)-p0007);SQRT(p0007*EXP(p0479^2*p0008)-p0007))
- p2407: 0; = p2234*p2197
- p3434: 0; = p3377*p1239
- p2998: 0; = p2412*(p1020+p1022)
- p5275: 8.1758e-9; = p1896*p3484
- p2789: 0; = p2398*(p1019+p1021)
- p2077: 0.043
- p0535: 0; = SQRT(2)*(IF((2*p0403-1)<0;-1;IF((2*p0403-1)>0;1;0))*SQRT(SQRT((2/(pi()*0.140012289)+LN(1-(2*p0403-1)^2)/2)^2-LN(1-(2*p0403-1)^2)/0.140012289)-(2/(pi()*0.140012289)+LN(1-(2*p0403-1)^2)/2)))
- p0306: 0.5
- p0211: 8.19
- p3426: 0; = p3369*p1239
- p0007: 14; = p0006-1
- p2231: 0.124369; = if(p0783*p0787+p0784*p0788+p0785*p0789+p0786*p0790=0;0;p0788*p0784/(p0783*p0787+p0784*p0788+p0785*p0789+p0786*p0790))
- p0067: 58.813
- p0299: 0.5
- p2210: 0.000110589; = 6*1.00794*p2208/30.973762
- p2859: 0; = p2273*(p1129+p1131)
- p4168: 2.31242e-7; = p1819*p3479
- p1930: 0
- p2775: 1.09027e-8; = p2384*(p1078+p1080)
- p3502: 4.02561e-5; = p1771*p3476
- p3155: 6.32592e-5; = p2374*p1023
- p0822: 0.879667
- p2897: 2.80122e-6; = p2311*(p1129+p1131)
- p0322: 0.5
- p2796: 0; = p2405*(p1019+p1021)
- p4374: 0; = p1819*p3480
- p1844: 0
- p1306: 0; = p1302*p1252/p0818
- p4308: 5.65309e-6; = p1963*p3479
- p0395: 0.5
- p0686: 5845.27; = p0026*(1+p0554*p0158/100)
- p0475: 0; = SQRT(2)*(IF((2*p0343-1)<0;-1;IF((2*p0343-1)>0;1;0))*SQRT(SQRT((2/(pi()*0.140012289)+LN(1-(2*p0343-1)^2)/2)^2-LN(1-(2*p0343-1)^2)/0.140012289)-(2/(pi()*0.140012289)+LN(1-(2*p0343-1)^2)/2)))
- p4393: 0; = p1838*p3480
- p3671: 3.6245e-6; = p1940*p3476
- p1944: 0
- p2018: 0.1978
- p3334: 0.2408; = IF(or(p3254=0;p1232>0);0;p3269*p3277*(p3300*p3292+(1-p3300)*p3296))
- p2452: 1.82143e-5; = p2256*p1014
- p2389: 0; = p2233*p2218
- p1295: 0; = p1291*p1252/p0818
- p2044: 4.28769e-8; = p2015*p2042*p2043/(p0818*1000)
- p2055: 5.59471
- p2794: 0; = p2403*(p1019+p1021)
- p2261: 8.72735e-5; = p2226*p2207
- p0220: 15.772
- p0094: 5759.49
- p0245: 4.09
- p2005: 2.90968e7; = p1963*p0818+p1959*1000+p1170+p1176+p1182
- p3322: 0; = if(and(p1232=0;p3253<>0);p3253-(p3317+p3318+p3319+p3320+p3321);0)
- p2577: 1.75333e-6; = p2381*p1073
- p2889: 2.35811e-6; = p2303*(p1079+p1081)
- p3647: 2.68482e-8; = p1916*p3476
- p2177: 0.0642478; = p0895/p0818-(p2173+p2174+p2175+p2176)
- p2746: 1.5397e-5; = p2355*(p1019+p1021)
- p1579: 0
- p2356: 2.80563e-5; = p2225*p2184
- p1755: 0
- p2659: 1.2455e-7; = p2268*(p1078+p1080)
- p1005: 0; = p1001*p0888
- p0524: 0; = SQRT(2)*(IF((2*p0392-1)<0;-1;IF((2*p0392-1)>0;1;0))*SQRT(SQRT((2/(pi()*0.140012289)+LN(1-(2*p0392-1)^2)/2)^2-LN(1-(2*p0392-1)^2)/0.140012289)-(2/(pi()*0.140012289)+LN(1-(2*p0392-1)^2)/2)))
- p0273: 0.5
- p3539: 1.28334e-6; = p1808*p3476
- p0967: 2.05648e7; = (p0684/100)*p0964*p0683*p0682*1000
- p1921: 0
- p2684: 0.000166683; = p2293*(p1019+p1021)
- p2289: 0.00992181; = p2223*p2196
- p1909: 2.99292e-7; = p1501*1000/p0818
- p4414: 0; = p1859*p3480
- p0606: 0; = IF(p0342<0.5;-SQRT(p0007*EXP(p0474^2*p0008)-p0007);SQRT(p0007*EXP(p0474^2*p0008)-p0007))
- p3951: 1.8766e-6; = p1808*p3478
- p2636: 3.1477e-6; = p2245*(p1019+p1021)
- p4734: 0; = p1767*p3482
- p4524: 3.45256e-7; = p1763*p3481
- p0762: 50.596; = p0102*(1+p0630*p0234/100)
- p2895: 1.31755e-6; = p2309*(p1079+p1081)
- p1114: 0.216028
- p2908: 8.9446e-6; = p2322*(p1020+p1022)
- p0210: 0
- p2804: 0; = p2413*(p1019+p1021)
- p1551: 0
- p0176: 0.534
- p2406: 0; = p2234*p2196
- p0724: 4.3; = p0064*(1+p0592*p0196/100)
- p2414: 0; = p2235*p2204
- p2638: 6.40586e-6; = p2247*(p1019+p1021)
- p4730: 0; = p1763*p3482
- p3230: 7.69366e-8; = p1170/p0818
- p0474: 0; = SQRT(2)*(IF((2*p0342-1)<0;-1;IF((2*p0342-1)>0;1;0))*SQRT(SQRT((2/(pi()*0.140012289)+LN(1-(2*p0342-1)^2)/2)^2-LN(1-(2*p0342-1)^2)/0.140012289)-(2/(pi()*0.140012289)+LN(1-(2*p0342-1)^2)/2)))
- p2438: 1.13077e-5; = p2242*p1014
- p2806: 0; = p2415*(p1078+p1080)
- p1271: 0; = IF(p1267+p1270=p1259;0;IF(p1267+p1270+p1269>p1259;p1259-(p1267+p1270);p1269))
- p2819: 0; = p2428*(p1128+p1130)
- p0688: 0
- p1891: 0
- p3421: 0; = p3364*p1239
- p0758: 0
- p3349: 0.816024; = if(and(p1232=0;p3256<>0);1-(p3345+p3346+p3347+p3348);0)
- p1908: 0
- p1560: 0
- p1325: 0; = IF(((p0745*1000*p0752/100)+(p0754*1000*p0761/100))/p0801<0;0;((p0745*1000*p0752/100)+(p0754*1000*p0761/100))/p0801)
- p2525: 4.5377e-7; = p2329*p1014
- p1585: 0
- p3114: 1.79253e-5; = p2333*p1023
- p1983: 50
- p1852: 0
- p4670: 2.26616e-8; = p1909*p3481
- p3635: 9.12838e-8; = p1904*p3476
- p1878: 0
- p2730: 7.29819e-5; = p2339*(p1078+p1080)
- p3274: 0.0768939
- p2967: 2.51971e-7; = p2381*(p1079+p1081)
- p3008: 0; = p2422*(p1079+p1081)
- p0584: 0; = IF(p0320<0.5;-SQRT(p0007*EXP(p0452^2*p0008)-p0007);SQRT(p0007*EXP(p0452^2*p0008)-p0007))
- p1227: 0.000133511; = IF(p1221=0;0;p1226*p0001/(p0818*p0002))
- p3156: 0; = p2375*p1082
- p1963a: 0.000118801; = p1550*p1754+p1551*p1755+p1552*p1756+p1553*p1757+p1554*p1758+p1555*p1759+p1556*p1760+p1557*p1761+p1558*p1762+p1559*p1763+p1560*p1764+p1561*p1765+p1562*p1766+p1563*p1767+p1564*p1768+p1565*p1769+p1566*p1770+p1567*p1771+p1568*p1772
- p1000: 0; = IF(p0996+p0999=1;0;IF(p0996+p0999+p0998>1;1-(p0996+p0999);p0998))
- p0366: 0.5
- p0248: 5.853
- p2939: 2.98777e-6; = p2353*(p1129+p1131)
- p2000: 4000
- p2551: 0.000182135; = p2355*p1014
- p2303: 1.94371e-5; = p2227*p2210
- p3460: 7.79644e-5; = p3365*p1241
- p0581: 0; = IF(p0317<0.5;-SQRT(p0007*EXP(p0449^2*p0008)-p0007);SQRT(p0007*EXP(p0449^2*p0008)-p0007))
- p3398: 0; = p3379*p1234
- p2963: 7.50859e-7; = p2377*(p1079+p1081)
- p1961: 0.5
- p4579: 5.06554e-8; = p1818*p3481
- p2760: 1.34667e-7; = p2369*(p1019+p1021)
- p0942: 0; = if(and(p0683=0;p0948=0);p0936;0)
- p2441: 3.7235e-5; = p2245*p1014
- p2914: 0.000251286; = p2328*(p1020+p1022)
- p0429: 0; = SQRT(2)*(IF((2*p0297-1)<0;-1;IF((2*p0297-1)>0;1;0))*SQRT(SQRT((2/(pi()*0.140012289)+LN(1-(2*p0297-1)^2)/2)^2-LN(1-(2*p0297-1)^2)/0.140012289)-(2/(pi()*0.140012289)+LN(1-(2*p0297-1)^2)/2)))
- p1234: 0; = if(p1232>0;0;p0726/100)
- p2990: 0; = p2404*(p1020+p1022)
- p2671: 4.4364e-5; = p2280*(p1019+p1021)
- p1839: 0
- p4876: 0; = p1909*p3482
- p3475: 0.0129521; = p3380*p1241
- p0571: 0; = IF(p0307<0.5;-SQRT(p0007*EXP(p0439^2*p0008)-p0007);SQRT(p0007*EXP(p0439^2*p0008)-p0007))
- p1959: 18260.1; = if(p0738*p0740*p0739>0;p0738*1000*(p0740/100)*p0739/1000;p1958)
- p2274: 0; = p2230*p2220
- p1016: 0.06834; = IF(p1012=0;p0707/100;0)
- p3804: 6.48734e-9; = p1867*p3477
- p2846: 1.27521e-6; = p2260*(p1079+p1081)
- p1826: 0
- p2328: 0.00114419; = p2224*p2196
- p0268: 0.534
- p2976: 0; = p2390*(p1129+p1131)
- p0221: 36.58
- p2558: 6.13457e-5; = p2362*p1014
- p0585: 0; = IF(p0321<0.5;-SQRT(p0007*EXP(p0453^2*p0008)-p0007);SQRT(p0007*EXP(p0453^2*p0008)-p0007))
- p3796: 2.78029e-9; = p1859*p3477
- p2884: 2.17e-5; = p2298*(p1079+p1081)
- p1237: 0; = if(p1232>0;0;p0729/100)
- p0948: 0; = if(and(p0683=0;or(p0807=480;p0807=32;p0807=1;and(p0807=60;p0901<0.03)));p0936;0)
- p3283: 0.3
- p1385: 246
- p1315: 0; = p1311*p1252/p0818
- p0937: 1.87827e-5; = p0931*p0001/(p0818*p0002)
- p2450: 0.000295194; = p2254*p1014
- p1745: 0
- p0112: 39.709
- p0375: 0.5
- p2205: 0.00101767; = 2*14.0067*p2204/30.973762
- p0288: 0.5
- p2555: 1.86298e-5; = p2359*p1014
- p0894: 0.22
- p2336: 0.000870429; = p2228*p2204
- p2301: 9.95496e-5; = p2227*p2208
- p2987: 0; = p2401*(p1020+p1022)
- p2510: 4.73578e-6; = p2314*p1123
- p1052: 7.3242e7; = IF(p1012=0;p1045*p1036;0)
- p0958: 0; = if(and(p0683>0;or(p0807=480;p0807=32;p0807=1;and(p0807=60;p0901<0.03)));p0934;0)
- p4357: 0; = p1802*p3480
- p1299: 0
- p3151: 6.4402e-7; = p2370*p1023
- p1340: 0; = p1325*p0801
- p0466: 0; = SQRT(2)*(IF((2*p0334-1)<0;-1;IF((2*p0334-1)>0;1;0))*SQRT(SQRT((2/(pi()*0.140012289)+LN(1-(2*p0334-1)^2)/2)^2-LN(1-(2*p0334-1)^2)/0.140012289)-(2/(pi()*0.140012289)+LN(1-(2*p0334-1)^2)/2)))
- p1410: 38
- p3113: 4.18108e-5; = p2332*p1023
- p0957: 1.86915e-8; = if(and(p0683>0;or(p0807=56;p0807=100;and(p0807=60;p0901>0.06)));p0939;0)
- p3058: 0.00013578; = p2277*p1023
- p0468: 0; = SQRT(2)*(IF((2*p0336-1)<0;-1;IF((2*p0336-1)>0;1;0))*SQRT(SQRT((2/(pi()*0.140012289)+LN(1-(2*p0336-1)^2)/2)^2-LN(1-(2*p0336-1)^2)/0.140012289)-(2/(pi()*0.140012289)+LN(1-(2*p0336-1)^2)/2)))
- p0693: 58.457; = p0033*(1+p0561*p0165/100)
- p2434: 0.00011055; = p2238*p1014
- p1088: 0; = IF(p1071=0;p1082*(p0710/100)*p0703*1000;0)
- p2713: 2.11824e-6; = p2322*(p1019+p1021)
- p3374: 0; = if(p1232=0;p3246*p3356/p0818;0)
- p2716: 4.9343e-6; = p2325*(p1019+p1021)
- p2810: 0; = p2419*(p1078+p1080)
- p3288: 0.505
- p1664: 0
- p0674: 0
- p0739: 2.238; = p0079*(1+p0607*p0211/100)
- p3897: 1.29556e-6; = p1754*p3478
- p2827: 2.80461e-5; = p2241*(p1020+p1022)
- p2269: 1.36314e-5; = p2226*p2215
- p2554: 0.000129443; = p2358*p1014
- p0979: 0; = IF(p0976=0;0;p0976*p0001/(p0818*p0002))
- p2213: 1.68368e-5; = p1116-p2212
- p0922: 0.146538; = p0677*1000/p0801
- p0157: 32.938
- p0866: 0.0819882; = IF(p0858+p0864+p0865=1;0;IF(p0858+p0864+p0865+p0861>1;1-(p0858+p0864+p0865);p0861))
- p5131: 5.37732e-6; = p1962*p3483
- p3166: 0; = p2385*p1082
- p3825: 3.8924e-8; = p1888*p3477
- p3747: 2.36325e-8; = p1810*p3477
- p2615: 0; = p2419*p1073
- p2072: 0.134
- p3039: 0; = p2258*p1082
- p4208: 3.13194e-9; = p1859*p3479
- p2529: 9.74839e-5; = p2333*p1014
- p2049: 25.6942
- p2329: 7.37549e-7; = p2224*p2197
- p2247: 0.000123166; = p2222*p2192
- p1626: 0
- p0828: 0.0929212; = if(p0827=0;0;p0819-p0827/p0818)
- p2236: 0; = 1-(p2230+p2231+p2232+p2233)
- p2443: 7.57766e-5; = p2247*p1014
- p3086: 0; = p2305*p1082
- p0743: 0.311; = p0083*(1+p0611*p0215/100)
- p2682: 5.45972e-7; = p2291*(p1019+p1021)
- p0772: 39.709; = p0112*(1+p0640*p0244/100)
- p0013: 696.9
- p3023: 2.07926e-6; = p2242*p1023
- p2771: 1.65858e-7; = p2380*(p1078+p1080)
- p1756: 0
- p3203: 0; = p2422*p1082
- p0789: 88.4; = p0129*(1+p0657*p0261/100)
- p2842: 6.50191e-6; = p2256*(p1020+p1022)
- p3094: 6.93569e-8; = p2313*p1132
- p0812: 0; = if(p0807=480;0.095/0.34;0)
- p3175: 0; = p2394*p1023
- p0295: 0.5
- p1206: 0.0206875
- p4571: 6.79848e-8; = p1810*p3481
- p0852: 0.363111; = p0847*p0851^3+p0848*p0851^2+p0849*p0851+p0850
- p2101: 0.620397
- p0811: 0; = if(p0807=480;1-p0810;0)
- p2840: 0.000105374; = p2254*(p1020+p1022)
- p0646: 0; = IF(p0382<0.5;-SQRT(p0007*EXP(p0514^2*p0008)-p0007);SQRT(p0007*EXP(p0514^2*p0008)-p0007))
- p0955: 1.87827e-5; = if(and(p0683>0;or(p0807=56;p0807=100;and(p0807=60;p0901>0.06)));p0937;0)
- p1575: 0
- p0647: 0; = IF(p0383<0.5;-SQRT(p0007*EXP(p0515^2*p0008)-p0007);SQRT(p0007*EXP(p0515^2*p0008)-p0007))
- p1924: 0
- p0939: 1.86915e-8; = p0933*p0001/(p0818*p0002)
- p1627: 0
- p1060: 0.21
- p0406: 0; = SQRT(2)*(IF((2*p0274-1)<0;-1;IF((2*p0274-1)>0;1;0))*SQRT(SQRT((2/(pi()*0.140012289)+LN(1-(2*p0274-1)^2)/2)^2-LN(1-(2*p0274-1)^2)/0.140012289)-(2/(pi()*0.140012289)+LN(1-(2*p0274-1)^2)/2)))
- p0945: 0; = if(and(p0683=0;p0951=0);p0939;0)
- p0561: 0; = IF(p0297<0.5;-SQRT(p0007*EXP(p0429^2*p0008)-p0007);SQRT(p0007*EXP(p0429^2*p0008)-p0007))
- p2350: 0.000252656; = p2232*p2218
- p1633: 0
- p0971: 0.000207406; = p0968/p0818
- p2836: 0.000326228; = p2250*(p1020+p1022)
- p1070: 0.0106477; = IF(p1012=0;p1056/(p1063*p0818);0)
- p3152: 8.9428e-5; = p2371*p1023
- p4239: 3.34074e-8; = p1890*p3479
- p0116: 30.954
- p0821: 1.00219
- p0781: 3.003; = p0121*(1+p0649*p0253/100)
- p1109: 6.39133e7; = IF(p1071=0;p1105*p1103*p1095;0)
- p0343: 0.5
- p1187: 0.0004647
- p2012: 0.00341157
- p0614: 0; = IF(p0350<0.5;-SQRT(p0007*EXP(p0482^2*p0008)-p0007);SQRT(p0007*EXP(p0482^2*p0008)-p0007))
- p2807: 0; = p2416*(p1078+p1080)
- p3416: 0; = p3378*p1238
- p0779: 13.879; = p0119*(1+p0647*p0251/100)
- p3070: 0.00112245; = p2289*p1023
- p1704: 0
- p1346: 165
- p2081: 0.0019
- p3286: 0.185
- p1710: 0
- p1750: 0
- p2832: 3.3425e-6; = p2246*(p1020+p1022)
- p2954: 3.46455e-7; = p2368*(p1020+p1022)
- p0274: 0.5
- p1915: 0
- p2587: 0; = p2391*p1123
- p2761: 2.96079e-7; = p2370*(p1019+p1021)
- p3385: 0; = p3366*p1234
- p1749: 0
- p2582: 6.77582e-6; = p2386*p1073
- p0348: 0.5
- p0991: 246832; = p0987*p0886
- p1279: 0
- p1229: 0.00156654; = IF(p1221=0;0;p1228*p1221)
- p2175: 0.000124615; = p0895*p0908/p0818
- p3212: 0; = p2431*p1132
- p2091: 0.374844
- p3141: 4.3823e-5; = p2360*p1023
- p0083: 0.311
- p4010: 1.09926e-7; = p1867*p3478
- p3103: 4.60752e-6; = p2322*p1023
- p2623: 0; = p2427*p1073
- p3739: 7.32143e-8; = p1802*p3477
- p1923: 0
- p0562: 0; = IF(p0298<0.5;-SQRT(p0007*EXP(p0430^2*p0008)-p0007);SQRT(p0007*EXP(p0430^2*p0008)-p0007))
- p1976: 0.064
- p2708: 6.82233e-7; = p2317*(p1019+p1021)
- p2224: 0.0762858; = if(p0765*p0769+p0766*p0770+p0767*p0771+p0768*p0772=0;0;p0771*p0767/(p0765*p0769+p0766*p0770+p0767*p0771+p0768*p0772))
- p3276: 0.0887032
- p2381: 2.07691e-6; = p2229*p2210
- p3195: 0; = p2414*p1082
- p0065: 2.793
- p1108: 3.50971e6; = IF(p1071=0;p1105*p1102*p1095;0)
- p0455: 0; = SQRT(2)*(IF((2*p0323-1)<0;-1;IF((2*p0323-1)>0;1;0))*SQRT(SQRT((2/(pi()*0.140012289)+LN(1-(2*p0323-1)^2)/2)^2-LN(1-(2*p0323-1)^2)/0.140012289)-(2/(pi()*0.140012289)+LN(1-(2*p0323-1)^2)/2)))
- p2571: 1.78397e-5; = p2375*p1073
- p3061: 9.64987e-5; = p2280*p1023
- p0885: 16.617; = IF(p0689+p0884=100;0;100-(p0689+p0884))
- p1071: 0
- p2212: 1.61013e-6; = p1106/p0818
- p3181: 0; = p2400*p1023
- p1613: 0
- p2570: 0.000344025; = p2374*p1014
- p2020: 1.41696e6; = p2015*p2018*p2019
- p2863: 0.000263591; = p2277*(p1020+p1022)
- p3330: 0; = if(and(p1232=0;p3255<>0);p3255*(p3267-p3325)/p3327;0)
- p1895: 0
- p0712: 3.448; = p0052*(1+p0580*p0184/100)
- p2633: 9.5591e-7; = p2242*(p1019+p1021)
- p4419: 0; = p1864*p3480
- p3952: 7.53781e-7; = p1809*p3478
- p2653: 6.229e-7; = p2262*(p1078+p1080)
- p1671: 0
- p3220: 0.00161168; = p3216*p1228
- p2492: 0.00139476; = p2296*p1014
- p2229: 0.0187804; = if(p0774*p0778+p0775*p0779+p0776*p0780+p0777*p0781=0;0;p0781*p0777/(p0774*p0778+p0775*p0779+p0776*p0780+p0777*p0781))
- p1769: 0
- p3906: 2.03364e-6; = p1763*p3478
- p0872: 2.8283e6; = p0864*p0856
- p0856: 8.5e6; = p0801
- p1313: 0; = p1307*p1252/p0818
- p0732: 37.874; = p0072*(1+p0600*p0204/100)
- p1660: 0.731714
- p0438: 0; = SQRT(2)*(IF((2*p0306-1)<0;-1;IF((2*p0306-1)>0;1;0))*SQRT(SQRT((2/(pi()*0.140012289)+LN(1-(2*p0306-1)^2)/2)^2-LN(1-(2*p0306-1)^2)/0.140012289)-(2/(pi()*0.140012289)+LN(1-(2*p0306-1)^2)/2)))
- p1287: 0
- p1727: 0
- p2242: 1.83794e-5; = p2222*p2187
- p0446: 0; = SQRT(2)*(IF((2*p0314-1)<0;-1;IF((2*p0314-1)>0;1;0))*SQRT(SQRT((2/(pi()*0.140012289)+LN(1-(2*p0314-1)^2)/2)^2-LN(1-(2*p0314-1)^2)/0.140012289)-(2/(pi()*0.140012289)+LN(1-(2*p0314-1)^2)/2)))
- p4526: 3.1273e-6; = p1765*p3481
- p2843: 7.45392e-5; = p2257*(p1020+p1022)
- p0096: 13.22
- p0659: 0; = IF(p0395<0.5;-SQRT(p0007*EXP(p0527^2*p0008)-p0007);SQRT(p0007*EXP(p0527^2*p0008)-p0007))
- p2307: 1.99051e-5; = p2227*p2214
- p0122: 22.214
- p2093: 0.260958
- p0997: 0; = if(p0888=0;0;if((p0695*p0694*1000*p0696/100)/p0888>1;1;(p0695*p0694*1000*p0696/100)/p0888))
- p0509: 0; = SQRT(2)*(IF((2*p0377-1)<0;-1;IF((2*p0377-1)>0;1;0))*SQRT(SQRT((2/(pi()*0.140012289)+LN(1-(2*p0377-1)^2)/2)^2-LN(1-(2*p0377-1)^2)/0.140012289)-(2/(pi()*0.140012289)+LN(1-(2*p0377-1)^2)/2)))
- p2613: 0; = p2417*p1073
- p1595: 0
- p1012: 0
- p2180: 4.19982e-8; = p3233*p1188/(p0818)
- p2537: 0.000167265; = p2341*p1073
- p1219: 0; = if(p1218=0;0;SQRT(2)*(IF((2*p1218-1)<0;-1;IF((2*p1218-1)>0;1;0))*SQRT(SQRT((2/(pi()*0.140012289)+LN(1-(2*p1218-1)^2)/2)^2-LN(1-(2*p1218-1)^2)/0.140012289)-(2/(pi()*0.140012289)+LN(1-(2*p1218-1)^2)/2))))
- p2352: 2.2026e-5; = p2232*p2220
- p3013: 0; = p2427*(p1079+p1081)
- p0950: 0; = if(and(p0683=0;or(p0807=480;p0807=32;p0807=1;and(p0807=60;p0901<0.03)));p0938;0)
- p2669: 5.91598e-6; = p2278*(p1019+p1021)
- p3030: 1.7e-5; = p2249*p1023
- p2219: 0.000406615; = p1154-p2218
- p3540: 5.15485e-7; = p1809*p3476
- p4620: 7.99821e-9; = p1859*p3481
- p0592: 0; = IF(p0328<0.5;-SQRT(p0007*EXP(p0460^2*p0008)-p0007);SQRT(p0007*EXP(p0460^2*p0008)-p0007))
- p4471: 0; = p1916*p3480
- p1568: 0
- p3401: 0.00012305; = p3363*p1238
- p0709: 15.128; = p0049*(1+p0577*p0181/100)
- p3945: 1.2406e-6; = p1802*p3478
- p0142: 0
- p2202: 0.000298933; = 4*1.00794*p2201/(2*14.0067)
- p2959: 1.07121e-5; = p2373*(p1020+p1022)
- p0612: 0; = IF(p0348<0.5;-SQRT(p0007*EXP(p0480^2*p0008)-p0007);SQRT(p0007*EXP(p0480^2*p0008)-p0007))
- p1897: 0
- p3427: 0; = p3370*p1239
- p2108: 0.826583
- p5011: 3.15677e-7; = p1838*p3483
- p1612: 0
- p1764: 0
- p1009: 0; = p1005*p0001*p0004/(p0818*p0002)
- p4002: 4.71113e-8; = p1859*p3478
- p4809: 0; = p1842*p3482
- p1808: 4.20769e-6; = p1400*1000/p0818
- p0062: 4.606
- p1859: 1.05632e-7; = p1451*1000/p0818
- p3947: 2.35556e-8; = p1804*p3478
- p2400: 0; = p2234*p2189
- p1019: 0; = IF(p1012=0;IF(p1014=1;0;IF(p1014+p1015>1;1-p1014;p1015));0)
- p1718: 0
- p5099: 1.59612e-8; = p1926*p3483
- p4052: 1.33482e-7; = p1909*p3478
- p1553: 0
- p0733: 0
- p3279: 0.37
- p0291: 0.5
- p0229: 40.675
- p1795: 0
- p0883: 0.0284064; = p0882*p0001*p0003/(p0818*p0002)
- p1282: 0; = IF(p1277+p1280+p1281=p1260;0;p1260-(p1277+p1280+p1281))
- p2377: 6.18908e-6; = p2229*p2206
- p3657: 4.83267e-8; = p1926*p3476
- p3353: 6.48209e6; = if(and(p1232=0;p3256<>0);p3256*(p3276-p3348)/p3349;0)
- p2028: 2.18916e-5; = p2015*p2026*p2027/(p0818*1000)
- p1318: 0; = p1317*p0001/(p0818*p0002)
- p2641: 7.72566e-5; = p2250*(p1019+p1021)
- p0553: 0; = IF(p0289<0.5;-SQRT(p0007*EXP(p0421^2*p0008)-p0007);SQRT(p0007*EXP(p0421^2*p0008)-p0007))
- p2621: 0; = p2425*p1073
- p0689: 83.383; = p0029*(1+p0557*p0161/100)
- p2518: 2.50573e-5; = p2322*p1014
- p1337: 0; = p1336*p0001/(p0818*p0002)
- p1720: 0
- p1818: 6.69005e-7; = p1410*1000/p0818
- p1662: 0
- p3361: 1.29868e7; = if(p1232=0;p3311+p3322+p3333+p3344+p3355;0)
- p0487: 0; = SQRT(2)*(IF((2*p0355-1)<0;-1;IF((2*p0355-1)>0;1;0))*SQRT(SQRT((2/(pi()*0.140012289)+LN(1-(2*p0355-1)^2)/2)^2-LN(1-(2*p0355-1)^2)/0.140012289)-(2/(pi()*0.140012289)+LN(1-(2*p0355-1)^2)/2)))
- p0520: 0; = SQRT(2)*(IF((2*p0388-1)<0;-1;IF((2*p0388-1)>0;1;0))*SQRT(SQRT((2/(pi()*0.140012289)+LN(1-(2*p0388-1)^2)/2)^2-LN(1-(2*p0388-1)^2)/0.140012289)-(2/(pi()*0.140012289)+LN(1-(2*p0388-1)^2)/2)))
- p1092: 0; = IF(p1071=0;p1086*p0001/(p0818*p0002);0)
- p2291: 1.04974e-5; = p2223*p2198
- p1339: 3.44046e-5; = p1338*p0001/(p0818*p0002)
- p3404: 0.00087804; = p3366*p1238
- p1854: 0
- p0965: 0.08381; = IF(p0684/100=1;0;IF(p0684/100+p0685/100>1;1-p0684/100;p0685/100))
- p0904: 1.19396e9; = p0825*p0901+p0827*p0902+(p0830+p0895)*p0824*p0903
- p1239: 0; = if(p1232>0;0;IF(p1234+p1238=1;0;IF(p1234+p1238+p1236>1;1-(p1234+p1238);p1236)))
- p2750: 1.57489e-6; = p2359*(p1019+p1021)
- p1576: 0
- p3124: 0; = p2343*p1082
- p0454: 0; = SQRT(2)*(IF((2*p0322-1)<0;-1;IF((2*p0322-1)>0;1;0))*SQRT(SQRT((2/(pi()*0.140012289)+LN(1-(2*p0322-1)^2)/2)^2-LN(1-(2*p0322-1)^2)/0.140012289)-(2/(pi()*0.140012289)+LN(1-(2*p0322-1)^2)/2)))
- p0242: 9.86
- p2353: 3.82754e-5; = p2232*p2221
- p1999: 1.61476e9; = (p1228+p1229)*p0818+p1164
- p2237: 0.000818573; = p2222*p2182
- p5032: 1.06408e-8; = p1859*p3483
- p0514: 0; = SQRT(2)*(IF((2*p0382-1)<0;-1;IF((2*p0382-1)>0;1;0))*SQRT(SQRT((2/(pi()*0.140012289)+LN(1-(2*p0382-1)^2)/2)^2-LN(1-(2*p0382-1)^2)/0.140012289)-(2/(pi()*0.140012289)+LN(1-(2*p0382-1)^2)/2)))
- p1853: 0
- p2181: 309.377; = p0887+p0889+p0893+p2180
- p0751: 9.454; = p0091*(1+p0619*p0223/100)
- p2515: 6.05193e-5; = p2319*p1014
- p0294: 0.5
- p0108: 61.601
- p0113: 82.459
- p3099: 5.11143e-6; = p2318*p1023
- p1958: 15228
- p2540: 1.05148e-6; = p2344*p1073
- p1253: 0; = if(p1232>0;0;p0735/100)
- p1918: 0
- p0964: 0.000622222; = 56/90000
- p0893: 51.4354; = 1000*(p0890+p0892)*p0001*p0003*p0004/(p0818*p0002)
- p2305: 2.82995e-7; = p2227*p2212
- p3441: 0; = p3365*p1240
- p1628: 0
- p0954: 2.97853e-5; = if(and(p0683>0;or(p0807=56;p0807=100;and(p0807=60;p0901>0.06)));p0936;0)
- p0218: 25.302
- p2100: 0.705744
- p0154: 0
- p1975: 0.000133511; = p1970*p0001/(p0818*p0002)
- p1817: 0
- p0213: 9.218
- p3403: 0.000111329; = p3365*p1238
- p2022: 0.000165409; = p2018*p2015/p0818-p2021
- p1963g: 1.37531e-5; = p1667*p1871+p1668*p1872+p1669*p1873+p1670*p1874+p1671*p1875+p1672*p1876+p1673*p1877+p1674*p1878+p1675*p1879+p1676*p1880+p1677*p1881+p1678*p1882+p1679*p1883+p1680*p1884+p1681*p1885+p1682*p1886+p1683*p1887+p1684*p1888+p1685*p1889
- p1974: 4.55508e-6; = p1969*p0001/(p0818*p0002)
- p1013: 0; = p1012*p0001/(p0818*p0002)
- p3445: 0; = p3369*p1240
- p3179: 0; = p2398*p1023
- p2650: 1.1192e-6; = p2259*(p1078+p1080)
- p2025: 1.61393e-6; = p2015*p2023*p2024/(p0818*1000)
- p0909: 2.05008e8; = p0825*p0906+p0827*p0907+(p0830+p0895)*p0824*p0908
- p1073: 0.8442; = IF(p1071=0;p0711/100;0)
- p2021: 2.49461e-5; = p2020/p0818
- p1850: 0
- p2287: 0.00468237; = p2223*p2193
- p4373: 0; = p1818*p3480
- p3083: 0; = p2302*p1082
- p1451: 6
- p4893: 0; = p1926*p3482
- p2982: 0; = p2396*(p1020+p1022)
- p2762: 4.11133e-5; = p2371*(p1019+p1021)
- p3271: 0.0195489
- p4451: 0; = p1896*p3480
- p1957: 0
- p3253: 0; = p1252*(p1277*(1-p3247)+p1280*(1-p3248)+p1281*(1-p3249)+p1282*(1-p3250))
- p1250: 0; = if(p1232>0;0;p1245*p0001/(p0818*p0002))
- p2919: 3.47985e-5; = p2333*(p1020+p1022)
- p1084: 241637; = IF(p1071=0;p1078*(p0710/100)*p0703*1000;0)
- p2620: 0; = p2424*p1073
- p1617: 0
- p1571: 0
- p1246: 97766.3; = if(p1232>0;0;p1241*(p0725/100)*p0723*1000)
- p5189: 1.48916e-8; = p1810*p3484
- p2223: 0.661512; = if(p0765*p0769+p0766*p0770+p0767*p0771+p0768*p0772=0;0;p0770*p0766/(p0765*p0769+p0766*p0770+p0767*p0771+p0768*p0772))
- p0009: 42.2365
- p1746: 0
- p2004: 30
- p0848: -0.1224
- p2612: 0; = p2416*p1073
- p0545: 0; = IF(p0281<0.5;-SQRT(p0007*EXP(p0413^2*p0008)-p0007);SQRT(p0007*EXP(p0413^2*p0008)-p0007))
- p2948: 2.18983e-5; = p2362*(p1020+p1022)
- p3173: 0; = p2392*p1132
- p2626: 0; = p2430*p1123
- p0003: 10000
- p0768: 61.601; = p0108*(1+p0636*p0240/100)
- p2252: 1.5716e-6; = p2222*p2198
- p3266: 0.0545989
- p1257: 0; = if(p1232>0;0;IF(p1253+p1256=1;0;IF(p1253+p1256+p1255>1;1-(p1253+p1256);p1255)))
- p3480: 0; = if(p1328+p1330+p1332+p1334+p1336+p1338+p1340+p1342+p1344=0;0;p1336/(p1328+p1330+p1332+p1334+p1336+p1338+p1340+p1342+p1344))
- p2258: 3.58895e-5; = p2226*p2204
- p0134: 0.064
- p2158: 1.42297e-7; = p2015*p2082*p2120/(p0818*1000)
- p2014: 8.48899e7; = p0833*p2011*p2013
- p1963c: 1.22056e-5; = p1588*p1792+p1589*p1793+p1590*p1794+p1591*p1795+p1592*p1796+p1593*p1797+p1594*p1798+p1595*p1799+p1596*p1800+p1597*p1801+p1598*p1802+p1599*p1803+p1600*p1804+p1601*p1805+p1602*p1806+p1603*p1807+p1604*p1808+p1605*p1809+p1606*p1810+p1607*p1811
- p2128: 8.00254e-7; = p2015*p2056*p2090/(p0818*1000)
- p0624: 0; = IF(p0360<0.5;-SQRT(p0007*EXP(p0492^2*p0008)-p0007);SQRT(p0007*EXP(p0492^2*p0008)-p0007))
- p2444: 0.000431289; = p2248*p1014
- p1119: 0.00520867; = IF(p1071=0;p1109/(p1114*p0818);0)
- p1654: 0
- p3081: 0; = p2300*p1082
- p0235: 0
- p1068: 0.0235943; = IF(p1012=0;p1054/(p1061*p0818);0)
- p2868: 0.000344909; = p2282*(p1020+p1022)
- p0898: 0.458721
- p3384: 0; = p3365*p1234
- p1603: 0
- p0238: 6.937
- p5188: 2.80313e-8; = p1809*p3484
- p1312: 0.24599; = IF(p1307+p1310+p1311=p1266;0;p1266-(p1307+p1310+p1311))
- p3140: 3.42563e-6; = p2359*p1023
- p1323: 0; = IF(((p0745*1000*p0750/100)+(p0754*1000*p0759/100))/p0801<0;0;((p0745*1000*p0750/100)+(p0754*1000*p0759/100))/p0801)
- p3202: 0; = p2421*p1082
- p1031: 0; = IF(p1012=0;p1025*p0001/(p0818*p0002);0)
- p1063: 0.455
- p2755: 1.05538e-5; = p2364*(p1019+p1021)
- p2581: 1.79555e-6; = p2385*p1073
- p2249: 0.00015027; = p2222*p2195
- p2480: 0.00024871; = p2284*p1014
- p2445: 9.24518e-5; = p2249*p1014
- p2142: 2.2176e-7; = p2015*p2070*p2104/(p0818*1000)
- p0754: 5759.49; = p0094*(1+p0622*p0226/100)
- p3051: 0; = p2270*p1082
- p0089: 3.702
- p2845: 3.93797e-6; = p2259*(p1079+p1081)
- p3348: 0.00443516; = if(and(p1232=0;p3256<>0);p3276*p3289;0)
- p3265: 0.696292
- p4992: 7.85647e-7; = p1819*p3483
- p0656: 0; = IF(p0392<0.5;-SQRT(p0007*EXP(p0524^2*p0008)-p0007);SQRT(p0007*EXP(p0524^2*p0008)-p0007))
- p1177: 0.000133511; = p0801*p0001/(p0818*p0002)
- p3123: 0; = p2342*p1082
- p2292: 2.30797e-5; = p2223*p2199
- p3375: 0; = if(p1232=0;p3246*p3357/p0818;0)
- p1132: 0.02217; = if(p1121=0;IF(p1123+p1128+p1129+p1130+p1131=1;0;1-(p1123+p1128+p1129+p1130+p1131));0)
- p1220: 0; = IF(p1218<0.5;-SQRT(p1214*EXP(p1219^2*p1215)-p1214);SQRT(p1214*EXP(p1219^2*p1215)-p1214))
- p3168: 0; = p2387*p1082
- p0320: 0.5
- p1508: 5
- p0165: 59.033
- p2076: 0.057
- p3117: 0; = p2336*p1082
- p2758: 0.000127282; = p2367*(p1019+p1021)
- p2050: 0.952062
- p3163: 0; = p2382*p1082
- p3097: 1.56582e-5; = p2316*p1023
- p0975: 0.00123736; = p0973*p0974/p0818
- p4031: 6.59558e-7; = p1888*p3478
- p1014: 0.61524; = IF(p1012=0;p0705/100;0)
- p0869: 0.0212765; = IF(p0858+p0864+p0865+p0866+p0867+p0868=1;0;1-(p0858+p0864+p0865+p0866+p0867+p0868))
- p0609: 0; = IF(p0345<0.5;-SQRT(p0007*EXP(p0477^2*p0008)-p0007);SQRT(p0007*EXP(p0477^2*p0008)-p0007))
- p0492: 0; = SQRT(2)*(IF((2*p0360-1)<0;-1;IF((2*p0360-1)>0;1;0))*SQRT(SQRT((2/(pi()*0.140012289)+LN(1-(2*p0360-1)^2)/2)^2-LN(1-(2*p0360-1)^2)/0.140012289)-(2/(pi()*0.140012289)+LN(1-(2*p0360-1)^2)/2)))
- p3442: 0; = p3366*p1240
- p2595: 0; = p2399*p1014
- p3072: 1.18758e-6; = p2291*p1023
- p0307: 0.5
- p1618: 0
- p0780: 86.71; = p0120*(1+p0648*p0252/100)
- p2368: 1.57752e-6; = p2225*p2197
- p2364: 0.000202919; = p2225*p2192
- p0838: 2.16435e10; = (p0833-p0836)*p0837
- p0969: 1.0822e8; = p0966*p0964*p0683*p0682*1000
- p3259: 0.00796296
- p1589: 0.897233
- p2483: 0.00288078; = p2287*p1014
- p1055: 549163; = IF(p1012=0;p1048*p1036;0)
- p2751: 2.0147e-5; = p2360*(p1019+p1021)
- p1305: 0; = p1301*p1252/p0818
- p0552: 0; = IF(p0288<0.5;-SQRT(p0007*EXP(p0420^2*p0008)-p0007);SQRT(p0007*EXP(p0420^2*p0008)-p0007))
- p2904: 9.92286e-6; = p2318*(p1020+p1022)
- p2003: 50
- p2417: 0; = p2235*p2207
- p0835: 1444.24; = -LN(1-p0669/100)/p0834
- p0447: 0; = SQRT(2)*(IF((2*p0315-1)<0;-1;IF((2*p0315-1)>0;1;0))*SQRT(SQRT((2/(pi()*0.140012289)+LN(1-(2*p0315-1)^2)/2)^2-LN(1-(2*p0315-1)^2)/0.140012289)-(2/(pi()*0.140012289)+LN(1-(2*p0315-1)^2)/2)))
- p2430: 0; = p2236*p2220
- p3444: 0; = p3368*p1240
- p2944: 4.62068e-5; = p2358*(p1020+p1022)
- p2162: 1.56901e-8; = p2015*p2086*p2124/(p0818*1000)
- p3244: 0.71394; = p0791/100
- p0696: 0
- p2264: 3.5273e-6; = p2226*p2210
- p0630: 0; = IF(p0366<0.5;-SQRT(p0007*EXP(p0498^2*p0008)-p0007);SQRT(p0007*EXP(p0498^2*p0008)-p0007))
- p4103: 8.61284e-8; = p1754*p3479
- p1687: 0
- p0184: 45.88
- p2494: 0.000150999; = p2298*p1073
- p0792: 28.606; = p0132*(1+p0660*p0264/100)
- p3192: 0; = p2411*p1023
- p0283: 0.5
- p0796: 98.939; = p0136*(1+p0664*p0268/100)
- p0002: 0.453592
- p0782: 22.214; = p0122*(1+p0650*p0254/100)
- p2805: 0; = p2414*(p1078+p1080)
- p0194: 49.759
- p1678: 0
- p5268: 4.28938e-7; = p1889*p3484
- p0744: 55.387; = p0084*(1+p0612*p0216/100)
- p0763: 8498.81; = p0103*(1+p0631*p0235/100)
- p0485: 0; = SQRT(2)*(IF((2*p0353-1)<0;-1;IF((2*p0353-1)>0;1;0))*SQRT(SQRT((2/(pi()*0.140012289)+LN(1-(2*p0353-1)^2)/2)^2-LN(1-(2*p0353-1)^2)/0.140012289)-(2/(pi()*0.140012289)+LN(1-(2*p0353-1)^2)/2)))
- p1188: 3949.95; = p1187*p0801
- p3315: 0; = if(and(p1232=0;p3253<>0);p3264*p3289;0)
- p1619: 0
- p2522: 0.000332213; = p2326*p1014
- p3075: 0.000155439; = p2294*p1023
- p2688: 6.81904e-6; = p2297*(p1078+p1080)
- p0637: 0; = IF(p0373<0.5;-SQRT(p0007*EXP(p0505^2*p0008)-p0007);SQRT(p0007*EXP(p0505^2*p0008)-p0007))
- p0925: 0.140683; = IF(p0918+p0923+p0924=1;0;IF(p0918+p0923+p0924+p0921>1;1-(p0918+p0923+p0924);p0921))
- p0199: 29.585
- p2694: 6.70191e-7; = p2303*(p1078+p1080)
- p1100: 0.303167
- p3092: 7.9558e-7; = p2311*p1132
- p0004: 0.0254
- p1692: 0.454882
- p1291: 0; = IF(p1287+p1290=p1264;0;IF(p1287+p1290+p1289>p1264;p1264-(p1287+p1290);p1289))
- p0839: 0.381043; = p0838/p0818
- p0783: 0
- p3022: 1.4447e-5; = p2241*p1023
- p1042: 0.000435637
- p0901: 0.0177532
- p0117: 21.699
- p0441: 0; = SQRT(2)*(IF((2*p0309-1)<0;-1;IF((2*p0309-1)>0;1;0))*SQRT(SQRT((2/(pi()*0.140012289)+LN(1-(2*p0309-1)^2)/2)^2-LN(1-(2*p0309-1)^2)/0.140012289)-(2/(pi()*0.140012289)+LN(1-(2*p0309-1)^2)/2)))
- p1128: 0.02864; = if(p1121=0;IF(p1123=1;0;IF(p1123+p1124>1;1-p1123;p1124));0)
- p0607: 0; = IF(p0343<0.5;-SQRT(p0007*EXP(p0475^2*p0008)-p0007);SQRT(p0007*EXP(p0475^2*p0008)-p0007))
- p0977: 0; = IF(p0687=0;IF(OR(p0686=0;p0688=0);0;p0686*1000*p0688/100);0)
- p4975: 2.80208e-7; = p1802*p3483
- p0854: 3.8322e6; = p0801*((1-p0853)*p0846+p0853*p0852)
- p2988: 0; = p2402*(p1020+p1022)
- p2412: 0; = p2234*p2202
- p0204: 31.023
- p2970: 3.83618e-8; = p2384*(p1079+p1081)
- p1966: 8.05e6; = if(p0814=0;p0802;0)
- p0027: 13.265
- p3477: 0.0263204; = if(p1328+p1330+p1332+p1334+p1336+p1338+p1340+p1342+p1344=0;0;p1330/(p1328+p1330+p1332+p1334+p1336+p1338+p1340+p1342+p1344))
- p3005: 0; = p2419*(p1079+p1081)
- p5183: 8.75979e-10; = p1804*p3484
- p3329: 0; = if(and(p1232=0;p3255<>0);p3255*(p3266-p3324)/p3327;0)
- p1218: 0
- p2592: 0; = p2396*p1014
- p4732: 0; = p1765*p3482
- p3180: 0; = p2399*p1023
- p2639: 3.64595e-5; = p2248*(p1019+p1021)
- p0935: 3.68543e-5; = p0929*p0001/(p0818*p0002)
- p2544: 4.03514e-5; = p2348*p1073
- p3287: 0.745
- p2283: 0.000353169; = p2223*p2189
- p2428: 0; = p2236*p2218
- p4651: 8.53143e-8; = p1890*p3481
- p0774: 44.606; = p0114*(1+p0642*p0246/100)
- p4365: 0; = p1810*p3480
- p2152: 2.00257e-8; = p2015*p2080*p2114/(p0818*1000)
- p3020: 1.92653e-6; = p2239*p1023
- p3132: 7.89351e-6; = p2351*p1132
- p1217: 0
- p0420: 0; = SQRT(2)*(IF((2*p0288-1)<0;-1;IF((2*p0288-1)>0;1;0))*SQRT(SQRT((2/(pi()*0.140012289)+LN(1-(2*p0288-1)^2)/2)^2-LN(1-(2*p0288-1)^2)/0.140012289)-(2/(pi()*0.140012289)+LN(1-(2*p0288-1)^2)/2)))
- p3084: 0; = p2303*p1082
- p2068: 0.153529
- p2348: 4.77984e-5; = p2228*p2216
- p1335: 1.34722e-5; = p1334*p0001/(p0818*p0002)
- p2757: 1.28763e-5; = p2366*(p1019+p1021)
- p5288: 4.96388e-9; = p1909*p3484
- p1800: 0
- p2567: 0.00048634; = p2371*p1014
- p2517: 0.000111425; = p2321*p1014
- p1786: 0
- p0756: 13.22; = p0096*(1+p0624*p0228/100)
- p0755: 28.239; = p0095*(1+p0623*p0227/100)
- p0851: 0.5
- p4981: 4.23859e-7; = p1808*p3483
- p2790: 0; = p2399*(p1019+p1021)
- p4665: 2.26616e-8; = p1904*p3481
- p1577: 0
- p0115: 43.939
- p0216: 8.55
- p3484: 0.0165854; = IF(p1344=0;0;p1344/(p1328+p1330+p1332+p1334+p1336+p1338+p1340+p1342+p1344))
- p0380: 0.5
- p0532: 0; = SQRT(2)*(IF((2*p0400-1)<0;-1;IF((2*p0400-1)>0;1;0))*SQRT(SQRT((2/(pi()*0.140012289)+LN(1-(2*p0400-1)^2)/2)^2-LN(1-(2*p0400-1)^2)/0.140012289)-(2/(pi()*0.140012289)+LN(1-(2*p0400-1)^2)/2)))
- p2228: 0.773564; = if(p0774*p0778+p0775*p0779+p0776*p0780+p0777*p0781=0;0;p0780*p0776/(p0774*p0778+p0775*p0779+p0776*p0780+p0777*p0781))
- p2858: 0; = p2272*(p1129+p1131)
- p1196: 0.59
- p1726: 0
- p1106: 91456.5; = IF(p1071=0;p1105*p1096*p1095;0)
- p2035: 2.55691e-6; = p2015*p2029*(1-p2031)/(p0818*1000)
- p3027: 1.72178e-6; = p2246*p1023
- p4514: 0; = p1963*p3480
- p0770: 70.939; = p0110*(1+p0638*p0242/100)
- p1587: 0
- p1270: 0; = IF(p1267=p1259;0;IF(p1267+p1268>p1259;p1259-p1267;p1268))
- p2499: 1.64088e-5; = p2303*p1073
- p2887: 1.20774e-5; = p2301*(p1079+p1081)
- p0833: 5.00753e10; = p0830+p0832
- p2685: 7.1461e-5; = p2294*(p1019+p1021)
- p2115: 0.856281
- p0884: 0; = IF(p0689=100;0;IF(p0689+p0688>100;100-p0689;p0688))
- p0460: 0; = SQRT(2)*(IF((2*p0328-1)<0;-1;IF((2*p0328-1)>0;1;0))*SQRT(SQRT((2/(pi()*0.140012289)+LN(1-(2*p0328-1)^2)/2)^2-LN(1-(2*p0328-1)^2)/0.140012289)-(2/(pi()*0.140012289)+LN(1-(2*p0328-1)^2)/2)))
- p2741: 7.23606e-6; = p2350*(p1128+p1130)
- p2134: 1.7628e-6; = p2015*p2062*p2096/(p0818*1000)
- p2891: 3.4333e-8; = p2305*(p1079+p1081)
- p2877: 2.30545e-6; = p2291*(p1020+p1022)
- p4625: 1.59964e-8; = p1864*p3481
- p2995: 0; = p2409*(p1020+p1022)
- p3428: 0; = p3371*p1239
- p0527: 0; = SQRT(2)*(IF((2*p0395-1)<0;-1;IF((2*p0395-1)>0;1;0))*SQRT(SQRT((2/(pi()*0.140012289)+LN(1-(2*p0395-1)^2)/2)^2-LN(1-(2*p0395-1)^2)/0.140012289)-(2/(pi()*0.140012289)+LN(1-(2*p0395-1)^2)/2)))
- p1290: 0; = IF(p1287=p1264;0;IF(p1287+p1288>p1264;p1264-p1287;p1288))
- p2097: 0.40001
- p1742: 0
- p3260: 0.0343561
- p0913: 0.0151931
- p3098: 1.48396e-6; = p2317*p1023
- p2220: 2.51544e-5; = p1151/p0818
- p2646: 1.06986e-5; = p2255*(p1019+p1021)
- p0710: 82.459; = p0050*(1+p0578*p0182/100)
- p1822: 0
- p0019: 1195.8
- p2945: 6.6502e-6; = p2359*(p1020+p1022)
- p0345: 0.5
- p4159: 2.66215e-8; = p1810*p3479
- p4805: 0; = p1838*p3482
- p1209: 121.608; = p1206*p0818*p0822/p0801
- p1731: 0
- p2816: 0; = p2425*(p1078+p1080)
- p1296: 0.0136118; = p1292*p1252/p0818
- p1757: 0
- p0370: 0.5
- p3425: 0; = p3368*p1239
- p2957: 0.000173607; = p2371*(p1020+p1022)
- p2308: 7.51155e-5; = p2227*p2215
- p0880: 0; = p0868*p0856
- p0008: 0.0739645; = (p0007-1.5)/(p0007-1)^2
- p2043: 0.636483
- p0182: 4.09
- p0331: 0.5
- p1977: 2.0414e9; = p1252+p1188
- p1884: 0
- p1776: 0
- p1783: 0
- p1829: 0
- p0055: 6.289
- p0895: 7.09389e9; = p0894*p0830
- p2997: 0; = p2411*(p1020+p1022)
- p2173: 0.0572899; = p0895*p0898/p0818
- p2320: 1.41572e-5; = p2224*p2187
- p2542: 7.39584e-5; = p2346*p1073
- p0827: 2.842e9; = p0818*p0819*p0823
- p0499: 0; = SQRT(2)*(IF((2*p0367-1)<0;-1;IF((2*p0367-1)>0;1;0))*SQRT(SQRT((2/(pi()*0.140012289)+LN(1-(2*p0367-1)^2)/2)^2-LN(1-(2*p0367-1)^2)/0.140012289)-(2/(pi()*0.140012289)+LN(1-(2*p0367-1)^2)/2)))
- p2029: 4.97
- p4650: 1.95823e-6; = p1889*p3481
- p0892: 7885.77; = if(p0891=0;0;(1-p1240)*p3251/p0891)
- p1953: 0
- p1311: 0; = IF(p1307+p1310=p1266;0;IF(p1307+p1310+p1309>p1266;p1266-(p1307+p1310);p1309))
- p1937: 0
- p1782: 0
- p2285: 0.000101658; = p2223*p2191
- p1293: 0; = p1287*p1252/p0818
- p1047: 0.318938; = IF(p1012=0;IF(p1037+p1044+p1045+p1046=1;0;IF(p1037+p1044+p1045+p1046+p1041>1;1-(p1037+p1044+p1045+p1046);p1041));0)
- p1883: 0
- p2968: 3.29966e-6; = p2382*(p1079+p1081)
- p0297: 0.5
- p3305: 0.856081; = if(and(p1232=0;p3252<>0);1-(p3301+p3302+p3303+p3304);0)
- p3620: 7.88799e-6; = p1889*p3476
- p2446: 0.000913889; = p2250*p1014
- p5113: 1.19709e-6; = p1940*p3483
- p1037: 0.372426
- p2227: 0.17576; = if(p0774*p0778+p0775*p0779+p0776*p0780+p0777*p0781=0;0;p0779*p0775/(p0774*p0778+p0775*p0779+p0776*p0780+p0777*p0781))
- p0988: 1.69269e7; = p0982*p0886
- p2969: 3.66858e-9; = p2383*(p1079+p1081)
- p2427: 0; = p2235*p2217
- p1872: 0
- p1213: 0
- p3373: 6.54043e-5; = if(p1232=0;p3245*p3361/p0818;0)
- p3206: 0; = p2425*p1082
- p2516: 8.7101e-6; = p2320*p1014
- p2787: 0; = p2396*(p1019+p1021)
- p0679: 1195.8; = p0019*(1+p0547*p0151/100)
- p1488: 28
- p0551: 0; = IF(p0287<0.5;-SQRT(p0007*EXP(p0419^2*p0008)-p0007);SQRT(p0007*EXP(p0419^2*p0008)-p0007))
- p5132: 1.92064e-5; = p1963*p3483
- p3182: 0; = p2401*p1023
- p2656: 1.59268e-6; = p2265*(p1078+p1080)
- p0430: 0; = SQRT(2)*(IF((2*p0298-1)<0;-1;IF((2*p0298-1)>0;1;0))*SQRT(SQRT((2/(pi()*0.140012289)+LN(1-(2*p0298-1)^2)/2)^2-LN(1-(2*p0298-1)^2)/0.140012289)-(2/(pi()*0.140012289)+LN(1-(2*p0298-1)^2)/2)))
- p2585: 0; = p2389*p1123
- p3014: 0; = p2428*(p1129+p1131)
- p1083: 5.91618e6; = IF(p1071=0;p1073*(p0710/100)*p0703*1000;0)
- p2472: 0.00336391; = p2276*p1014
- p3033: 1.77795e-7; = p2252*p1023
- p3199: 0; = p2418*p1082
- p2344: 1.24554e-6; = p2228*p2212
- p1991: 6.07836e8; = (if(p1111=0;0;p1106/p1111)+if(p1112=0;0;p1107/p1112)+if(p1113=0;0;p1108/p1113)+if(p1114=0;0;p1109/p1114)+if(p1115=0;0;p1110/p1115))*(1+p1157)
- p0214: 2.393
- p4765: 0; = p1798*p3482
- p3826: 6.80707e-7; = p1889*p3477
- p0804: 0
- p1244: 0; = if(p1232>0;0;p1239*(p0725/100)*p0723*1000)
- p1550: 0.783979
- p3229: 6.4464e-7; = p1164/p0818
- p3137: 3.17401e-6; = p2356*p1023
- p2385: 2.12692e-6; = p2229*p2214
- p1978: 116
- p2672: 6.38498e-6; = p2281*(p1019+p1021)
- p1027: 437333; = IF(p1012=0;p1021*(p0704/100)*p0703*1000;0)
- p3178: 0; = p2397*p1023
- p1723: 0
- p1713: 0
- p0251: 30.518
- p1342: 2.91407e6; = p1326*p0801
- p2279: 0.000391795; = p2223*p2185
- p2894: 9.11301e-6; = p2308*(p1079+p1081)
- p3093: 1.12114e-6; = p2312*p1132
- p2335: 0.000261434; = p2224*p2203
- p1310: 0; = IF(p1307=p1266;0;IF(p1307+p1308>p1266;p1266-p1307;p1308))
- p2817: 0; = p2426*(p1078+p1080)
- p1646: 0
- p3053: 0; = p2272*p1132
- p0502: 0; = SQRT(2)*(IF((2*p0370-1)<0;-1;IF((2*p0370-1)>0;1;0))*SQRT(SQRT((2/(pi()*0.140012289)+LN(1-(2*p0370-1)^2)/2)^2-LN(1-(2*p0370-1)^2)/0.140012289)-(2/(pi()*0.140012289)+LN(1-(2*p0370-1)^2)/2)))
- p2618: 0; = p2422*p1073
- p0386: 0.5
- p2019: 0.13105
- p4977: 5.32041e-9; = p1804*p3483
- p2359: 3.02805e-5; = p2225*p2187
- p1243: 139605; = if(p1232>0;0;p1238*(p0725/100)*p0723*1000)
- p2857: 2.14293e-6; = p2271*(p1079+p1081)
- p1298: 0
- p0911: 0.00344444
- p1054: 4.02052e8; = IF(p1012=0;p1047*p1036;0)
- p5305: 2.62794e-9; = p1926*p3484
- p1857: 0
- p0427: 0; = SQRT(2)*(IF((2*p0295-1)<0;-1;IF((2*p0295-1)>0;1;0))*SQRT(SQRT((2/(pi()*0.140012289)+LN(1-(2*p0295-1)^2)/2)^2-LN(1-(2*p0295-1)^2)/0.140012289)-(2/(pi()*0.140012289)+LN(1-(2*p0295-1)^2)/2)))
- p2952: 5.43721e-5; = p2366*(p1020+p1022)
- p0228: 42.134
- p2069: 0.190588
- p2189: 0.000533882; = p1053/p0818
- p0056: 22.214
- p1186: 1.11689e-8; = p1182*p1185/p0818
- p0449: 0; = SQRT(2)*(IF((2*p0317-1)<0;-1;IF((2*p0317-1)>0;1;0))*SQRT(SQRT((2/(pi()*0.140012289)+LN(1-(2*p0317-1)^2)/2)^2-LN(1-(2*p0317-1)^2)/0.140012289)-(2/(pi()*0.140012289)+LN(1-(2*p0317-1)^2)/2)))
- p1807: 0
- p2965: 1.2905e-6; = p2379*(p1079+p1081)
- p5238: 1.75196e-9; = p1859*p3484
- p0284: 0.5
- p3001: 0; = p2415*(p1079+p1081)
- p1680: 0
- p0001: 0.404686
- p0197: 30.563
- p2298: 0.000178866; = p2227*p2205
- p4657: 3.7325e-8; = p1896*p3481
- p5028: 3.22771e-7; = p1855*p3483
- p2693: 1.5522e-6; = p2302*(p1078+p1080)
- p0422: 0; = SQRT(2)*(IF((2*p0290-1)<0;-1;IF((2*p0290-1)>0;1;0))*SQRT(SQRT((2/(pi()*0.140012289)+LN(1-(2*p0290-1)^2)/2)^2-LN(1-(2*p0290-1)^2)/0.140012289)-(2/(pi()*0.140012289)+LN(1-(2*p0290-1)^2)/2)))
- p1212: 0.0900595; = if(p1211=0;0;if(p1193>0;0;(p1207+p1208+p1209)*p1210/(2000*p1211)))
- p1045: 0.058101; = IF(p1012=0;IF(p1037+p1044=1;0;IF(p1037+p1044+p1039>1;1-(p1037+p1044);p1039));0)
- p0900: 0.617687; = p0899/p0818
- p2814: 0; = p2423*(p1078+p1080)
- p0453: 0; = SQRT(2)*(IF((2*p0321-1)<0;-1;IF((2*p0321-1)>0;1;0))*SQRT(SQRT((2/(pi()*0.140012289)+LN(1-(2*p0321-1)^2)/2)^2-LN(1-(2*p0321-1)^2)/0.140012289)-(2/(pi()*0.140012289)+LN(1-(2*p0321-1)^2)/2)))
- p2103: 0.912485
- p3089: 0; = p2308*p1082
- p5040: 2.48286e-8; = p1867*p3483
- p4856: 0; = p1889*p3482
- p2538: 7.22195e-5; = p2342*p1073
- p0908: 0.000997792
- p2506: 8.21691e-5; = p2310*p1073
- p2324: 1.17232e-5; = p2224*p2191
- p3337: 0.00199123; = IF(or(p3254=0;p1232>0);0;p3272*p3289)
- p1044: 0.00774783; = IF(p1012=0;IF(p1037=1;0;IF(p1037+p1038>1;1-p1037;p1038));0)
- p1867: 2.46475e-7; = p1459*1000/p0818
- p0886: 6.46531e7; = p0686*1000*p0687*p0689/100
- p2127: 2.15371e-6; = p2015*p2055*p2089/(p0818*1000)
- p2314: 5.43636e-6; = p2231*p2221
- p2477: 7.55296e-5; = p2281*p1014
- p0372: 0.5
- p1153: 0.365265
- p0683: 26581.3; = p0023*(1+p0551*p0155/100)
- p3910: 5.24506e-6; = p1767*p3478
- p0369: 0.5
- p4116: 3.4869e-7; = p1767*p3479
- p0745: 23168.8; = p0085*(1+p0613*p0217/100)
- p1208: 0; = p1205*p0818*p0822/p0801
- p0118: 2.481
- p2030: 10.68
- p0311: 0.5
- p2513: 8.07031e-6; = p2317*p1014
- p0577: 0; = IF(p0313<0.5;-SQRT(p0007*EXP(p0445^2*p0008)-p0007);SQRT(p0007*EXP(p0445^2*p0008)-p0007))
- p0767: 16.827; = p0107*(1+p0635*p0239/100)
- p2829: 5.16372e-5; = p2243*(p1020+p1022)
- p5061: 1.48971e-7; = p1888*p3483
- p2906: 3.10921e-6; = p2320*(p1020+p1022)
- p2288: 0.00100372; = p2223*p2195
- p4775: 0; = p1808*p3482
- p2936: 1.97223e-5; = p2350*(p1129+p1131)
- p2532: 0.000734817; = p2336*p1073
- p2547: 0.000310161; = p2351*p1123
- p0158: 8.25
- p5077: 3.0149e-8; = p1904*p3483
- p2664: 0; = p2273*(p1128+p1130)
- p2721: 6.29617e-8; = p2330*(p1019+p1021)
- p0382: 0.5
- p2040: 1.19
- p2074: 0.025
- p3250: 0.875
- p0666: 0; = IF(p0402<0.5;-SQRT(p0007*EXP(p0534^2*p0008)-p0007);SQRT(p0007*EXP(p0534^2*p0008)-p0007))
- p3399: 0; = p3380*p1234
- p1827: 0
- p2396: 0; = p2234*p2185
- p1015: 0; = IF(p1012=0;p0706/100;0)
- p0695: 13.095; = p0035*(1+p0563*p0167/100)
- p0563: 0; = IF(p0299<0.5;-SQRT(p0007*EXP(p0431^2*p0008)-p0007);SQRT(p0007*EXP(p0431^2*p0008)-p0007))
- p0897: 0.458721
- p1297: 0
- p4047: 1.33482e-7; = p1904*p3478
- p0381: 0.5
- p3309: 3.65085e6; = if(and(p1232=0;p3252<>0);p3252*(p3260-p3304)/p3305;0)
- p4253: 8.87384e-9; = p1904*p3479
- p5317: 1.66436e-8; = p1938*p3484
- p0253: 46.75
- p2719: 5.95092e-5; = p2328*(p1019+p1021)
- p3466: 3.12386e-5; = p3371*p1241
- p3090: 0; = p2309*p1082
- p2254: 0.000479803; = p2222*p2200
- p2727: 3.00124e-5; = p2336*(p1078+p1080)
- p2318: 4.51819e-5; = p2224*p2185
- p1639: 0
- p2092: 0.54529
- p1856: 0
- p0675: 0
- p3586: 9.77273e-7; = p1855*p3476
- p3875: 2.64127e-8; = p1938*p3477
- p4114: 1.22459e-6; = p1765*p3479
- p0928: 1.81481e6; = p0801*p0918
- p1259: 0.37527; = if(p1232>0;0;p0730/100)
- p3420: 0; = p3363*p1239
- p2346: 8.76076e-5; = p2228*p2214
- p3423: 0; = p3366*p1239
- p1163: 0.00430777
- p3535: 1.61089e-8; = p1804*p3476
- p3730: 1.13992e-7; = p1793*p3477
- p2194: 0.214362
- p0179: 27.196
- p1837: 0
- p2056: 2.07882
- p2104: 0.817136
- p1221: 0.0583196
- p0916: 0.596226; = p0826+p0828+(p0832*(1+p0894))/p0818
- p1955: 0
- p0862: 0; = p0674*1000/p0856
- p3131: 5.60137e-6; = p2350*p1132
- p1557: 0
- p2319: 9.8367e-5; = p2224*p2186
- p0952: 2.85056e-5; = if(and(p0683>0;or(p0807=56;p0807=100;and(p0807=60;p0901>0.06)));p0934;0)
- p3095: 1.20524e-7; = p2314*p1132
- p2423: 0; = p2235*p2213
- p0252: 4.131
- p4213: 6.26389e-9; = p1864*p3479
- p2703: 1.44833e-6; = p2312*(p1128+p1130)
- p0973: 1.40566e8; = p0967+p0968+p0969
- p0271: 12.476
- p3370: 2.43374e-5; = if(p1232=0;p3245*p3358/p0818;0)
- p3454: 0; = p3378*p1240
- p0500: 0; = SQRT(2)*(IF((2*p0368-1)<0;-1;IF((2*p0368-1)>0;1;0))*SQRT(SQRT((2/(pi()*0.140012289)+LN(1-(2*p0368-1)^2)/2)^2-LN(1-(2*p0368-1)^2)/0.140012289)-(2/(pi()*0.140012289)+LN(1-(2*p0368-1)^2)/2)))
- p0025: 8.381
- p0753: 0
- p0479: 0; = SQRT(2)*(IF((2*p0347-1)<0;-1;IF((2*p0347-1)>0;1;0))*SQRT(SQRT((2/(pi()*0.140012289)+LN(1-(2*p0347-1)^2)/2)^2-LN(1-(2*p0347-1)^2)/0.140012289)-(2/(pi()*0.140012289)+LN(1-(2*p0347-1)^2)/2)))
- p0970: 0.00036205; = p0967/p0818
- p2850: 4.27933e-7; = p2264*(p1079+p1081)
- p3410: 0.000351811; = p3372*p1238
- p1643: 0
- p3076: 2.23712e-5; = p2295*p1023
- p2523: 7.12137e-5; = p2327*p1014
- p1804: 5.28162e-8; = p1396*1000/p0818
- p1160: 0.0372795; = (p1156+p1158)*p1159
- p3045: 0; = p2264*p1082
- p3324: 0; = if(and(p1232=0;p3255<>0);p3266*(p3279*(p3284*p1256+p3286*(p1253+p1257)+p1258*p3288+p3299*p3287));0)
- p1830: 0
- p4926: 0; = p1963*p3482
- p1240: 0; = if(p1232>0;0;IF(p1234+p1238+p1239=1;0;IF(p1234+p1238+p1239+p1237>1;1-(p1234+p1238+p1239);p1237)))
- p2927: 2.40376e-5; = p2341*(p1079+p1081)
- p1679: 0
- p0503: 0; = SQRT(2)*(IF((2*p0371-1)<0;-1;IF((2*p0371-1)>0;1;0))*SQRT(SQRT((2/(pi()*0.140012289)+LN(1-(2*p0371-1)^2)/2)^2-LN(1-(2*p0371-1)^2)/0.140012289)-(2/(pi()*0.140012289)+LN(1-(2*p0371-1)^2)/2)))
- p2902: 3.03974e-5; = p2316*(p1020+p1022)
- p3065: 4.57327e-5; = p2284*p1023
- p1914: 0
- p1870: 0
- p1697: 0
- p2978: 0; = p2392*(p1129+p1131)
- p2222: 0.0990366; = if(p0765*p0769+p0766*p0770+p0767*p0771+p0768*p0772=0;0;p0769*p0765/(p0765*p0769+p0766*p0770+p0767*p0771+p0768*p0772))
- p3184: 0; = p2403*p1023
- p2947: 1.91314e-5; = p2361*(p1020+p1022)
- p1207: 310.678; = if(p1193>0;0;(p1194*p1050/p1057+p1195*p1051/p1058+p1196*p1052/p1059+p1197*p1053/p1060+p1198*p1054/p1061+p1199*p1055/p1062+p1200*p1056/p1063)/(p0702*1000)+(p1201*p1109/p1114+p1202*p1110/p1115)/(p0702*1000)+p1203*p1170/p0801+p1204*p1176/p0801)
- p2531: 0.000160844; = p2335*p1014
- p0882: 180850; = p0869*p0856
- p3295: 0.58
- p1157: 0.22095
- p0673: 696.9; = p0013*(1+p0541*p0145/100)
- p2476: 0.000524793; = p2280*p1014
- p2488: 1.41996e-5; = p2292*p1014
- p0121: 3.003
- p3690: 5.81524e-5; = p1963*p3476
- p1847: 0
- p2923: 9.55076e-5; = p2337*(p1079+p1081)
- p4444: 0; = p1889*p3480
- p0031: 13.561
- p0140: 22.214
- p1150: 1.63894e7; = if(p1121=0;p1149*p1146*p1145;0)
- p1734: 0.7899
- p2135: 7.7556e-7; = p2015*p2063*p2097/(p0818*1000)
- p0823: 0.35
- p1806: 0
- p1858: 0
- p2294: 0.00137399; = p2223*p2201
- p1994: 750
- p3462: 6.72312e-5; = p3367*p1241
- p0135: 149.917
- p2749: 1.09426e-5; = p2358*(p1019+p1021)
- p2524: 0.00070395; = p2328*p1014
- p2156: 2.19112e-8; = p2015*p2085*p2118/(p0818*1000)
- p2084: 0.21
- p2365: 0.00115493; = p2225*p2193
- p2293: 0.00320483; = p2223*p2200
- p2225: 0.163166; = if(p0765*p0769+p0766*p0770+p0767*p0771+p0768*p0772=0;0;p0772*p0768/(p0765*p0769+p0766*p0770+p0767*p0771+p0768*p0772))
- p0373: 0.5
- p2041: 1.14521e-6; = p2015*p2040/(p0818*1000)
- p2089: 0.40001
- p0600: 0; = IF(p0336<0.5;-SQRT(p0007*EXP(p0468^2*p0008)-p0007);SQRT(p0007*EXP(p0468^2*p0008)-p0007))
- p1599: 0
- p2218: 0.000288541; = p1150/p0818
- p0084: 55.387
- p1659: 0
- p1069: 6.04265e-5; = IF(p1012=0;p1055/(p1062*p0818);0)
- p2112: 0.856281
- p0448: 0; = SQRT(2)*(IF((2*p0316-1)<0;-1;IF((2*p0316-1)>0;1;0))*SQRT(SQRT((2/(pi()*0.140012289)+LN(1-(2*p0316-1)^2)/2)^2-LN(1-(2*p0316-1)^2)/0.140012289)-(2/(pi()*0.140012289)+LN(1-(2*p0316-1)^2)/2)))
- p0865: 0; = IF(p0858+p0864=1;0;IF(p0858+p0864+p0860>1;1-(p0858+p0864);p0860))
- p1759: 0
- p4925: 0; = p1962*p3482
- p2411: 0; = p2234*p2201
- p3024: 2.65992e-5; = p2243*p1023
- p2150: 9.64143e-8; = p2015*p2078*p2112/(p0818*1000)
- p1717: 0
- p0047: 6.834
- p3351: 4.54084e6; = if(and(p1232=0;p3256<>0);p3256*(p3274-p3346)/p3349;0)
- p2462: 4.33547e-8; = p2266*p1073
- p1788: 0
- p0924: 0.223092; = IF(p0918+p0923=1;0;IF(p0918+p0923+p0920>1;1-(p0918+p0923);p0920))
- p3186: 0; = p2405*p1023
- p1900: 0
- p3461: 0.000614895; = p3366*p1241
- p2637: 7.91565e-7; = p2246*(p1019+p1021)
- p4982: 1.70253e-7; = p1809*p3483
- p0352: 0.5
- p3172: 0; = p2391*p1132
- p1846: 0
- p0662: 0; = IF(p0398<0.5;-SQRT(p0007*EXP(p0530^2*p0008)-p0007);SQRT(p0007*EXP(p0530^2*p0008)-p0007))
- p1135: 147371; = if(p1121=0;p1129*(p0716/100)*p0703*1000;0)
- p3004: 0; = p2418*(p1079+p1081)
- p4769: 0; = p1802*p3482
- p0915: 0.0103958; = p0914/p0818
- p1357: 2346
- p0664: 0; = IF(p0400<0.5;-SQRT(p0007*EXP(p0532^2*p0008)-p0007);SQRT(p0007*EXP(p0532^2*p0008)-p0007))
- p3297: 0; = if(p1273+p1274+p1275+p1276=0;0;p1273/(p1273+p1274+p1275+p1276))
- p0557: 0; = IF(p0293<0.5;-SQRT(p0007*EXP(p0425^2*p0008)-p0007);SQRT(p0007*EXP(p0425^2*p0008)-p0007))
- p0263: 21.536
- p2549: 3.33428e-5; = p2353*p1123
- p0314: 0.5
- p2728: 2.71439e-5; = p2337*(p1078+p1080)
- p3177: 0; = p2396*p1023
- p2169: 0.000320649; = p2166*(p0908)
- p0671: 2828.3; = p0011*(1+p0539*p0143/100)
- p1751: 0
- p2880: 0.000301755; = p2294*(p1020+p1022)
- p1264: 0.37874; = if(p1232>0;0;IF(p1259+p1263=1;0;IF(p1259+p1263+p1261>1;1-(p1259+p1263);p1261)))
- p3154: 5.51797e-6; = p2373*p1023
- p5111: 1.01088e-7; = p1938*p3483
- p3120: 0; = p2339*p1082
- p2569: 3.00086e-5; = p2373*p1014
- p1785: 0
- p2362: 9.97101e-5; = p2225*p2190
- p0932: 1.24557e6; = p0801*p0926
- p4777: 0; = p1810*p3482
- p2437: 7.8568e-5; = p2241*p1014
- p0544: 0; = IF(p0280<0.5;-SQRT(p0007*EXP(p0412^2*p0008)-p0007);SQRT(p0007*EXP(p0412^2*p0008)-p0007))
- p1308: 0
- p0264: 53.57
- p2215: 0.000427377; = p1117-p2214
- p0994: 0; = p0990*p0001*p0004/(p0818*p0002)
- p0702: 8498.81; = p0042*(1+p0570*p0174/100)
- p2763: 1.76262e-5; = p2372*(p1019+p1021)
- p1057: 0.82
- p5243: 3.50391e-9; = p1864*p3484
- p2415: 0; = p2235*p2205
- p0414: 0; = SQRT(2)*(IF((2*p0282-1)<0;-1;IF((2*p0282-1)>0;1;0))*SQRT(SQRT((2/(pi()*0.140012289)+LN(1-(2*p0282-1)^2)/2)^2-LN(1-(2*p0282-1)^2)/0.140012289)-(2/(pi()*0.140012289)+LN(1-(2*p0282-1)^2)/2)))
- p2881: 4.34293e-5; = p2295*(p1020+p1022)
- p3304: 0.0017178; = if(and(p1232=0;p3252<>0);p3260*p3289;0)
- p3332: 0; = if(and(p1232=0;p3255<>0);IF((p3328+p3329+p3330+p3331)+(p3255*(p3265*(1-p3277))/p3327)>p3255;p3255-(p3328+p3329+p3330+p3331);p3255*(p3265*(1-p3277))/p3327);0)
- p2872: 0.000180678; = p2286*(p1020+p1022)
- p1058: 0.225
- p3196: 0; = p2415*p1082
- p3590: 3.22178e-8; = p1859*p3476
- p5089: 8.86734e-9; = p1916*p3483
- p4771: 0; = p1804*p3482
- p0189: 6.326
- p4397: 0; = p1842*p3480
- p2006: 0.198723; = ((p1980*p1985+p1986*p1991+p1992*p1997+p2000*p2005)/p0818)*p0005*p0002/1000
- p5246: 4.0879e-9; = p1867*p3484
- p0052: 3.448
- p1963: 0.000190664; = p1963a+p1963b+p1963c+p1963d+p1963e+p1963f+p1963g+p1963h+p1963i+p1963j+p1963k
- p1225: 1.088; = IF(p1221=0;0;p1223+1.2*p1224)
- p1580: 0
- p4069: 7.06669e-8; = p1926*p3478
- p3066: 1.15006e-5; = p2285*p1023
- p2509: 2.72525e-6; = p2313*p1123
- p0095: 28.239
- p0250: 36.645
- p1584: 0
- p0103: 8498.81
- p1716: 0
- p1841: 0
- p1651: 0.299611
- p2530: 1.40301e-5; = p2334*p1014
- p2416: 0; = p2235*p2206
- p3846: 7.87749e-9; = p1909*p3477
- p3345: 0.160606; = if(and(p1232=0;p3256<>0);p3273*p3277*p3293;0)
- p1816: 0
- p1199: -0.29
- p5037: 2.12816e-8; = p1864*p3483
- p3479: 0.0296495; = if(p1328+p1330+p1332+p1334+p1336+p1338+p1340+p1342+p1344=0;0;p1334/(p1328+p1330+p1332+p1334+p1336+p1338+p1340+p1342+p1344))
- p0579: 0; = IF(p0315<0.5;-SQRT(p0007*EXP(p0447^2*p0008)-p0007);SQRT(p0007*EXP(p0447^2*p0008)-p0007))
- p0738: 8498.81; = p0078*(1+p0606*p0210/100)
- p1605: 0.909913
- p0583: 0; = IF(p0319<0.5;-SQRT(p0007*EXP(p0451^2*p0008)-p0007);SQRT(p0007*EXP(p0451^2*p0008)-p0007))
- p0151: 0
- p1216: 0
- p2188: 0.00237408; = p1066-p2186-p2187
- p2085: 0.0335294
- p1205: 0
- p2234: 0; = 1-(p2222+p2223+p2224+p2225)
- p1563: 0.693253
- p3015: 0; = p2429*(p1129+p1131)
- p4422: 0; = p1867*p3480
- p3476: 0.305; = if(p1328+p1330+p1332+p1334+p1336+p1338+p1340+p1342+p1344=0;0;p1328/(p1328+p1330+p1332+p1334+p1336+p1338+p1340+p1342+p1344))
- p2935: 5.19724e-5; = p2349*(p1079+p1081)
- p0522: 0; = SQRT(2)*(IF((2*p0390-1)<0;-1;IF((2*p0390-1)>0;1;0))*SQRT(SQRT((2/(pi()*0.140012289)+LN(1-(2*p0390-1)^2)/2)^2-LN(1-(2*p0390-1)^2)/0.140012289)-(2/(pi()*0.140012289)+LN(1-(2*p0390-1)^2)/2)))
- p1166: 6.4464e-7; = p1164/p0818
- p0180: 32.016
- p0029: 83.383
- p3457: 0.000449726; = p3362*p1241
- p4187: 9.29143e-8; = p1838*p3479
- p3321: 0; = if(and(p1232=0;p3253<>0);IF((p3317+p3318+p3319+p3320)+(p3253*(p3261*(1-p3277))/p3316)>p3253;p3253-(p3317+p3318+p3319+p3320);p3253*(p3261*(1-p3277))/p3316);0)
- p1803: 0
- p0987: 0.00381779; = if(p0978>0;0;if(and(p0687=0;p0691=0;p0695=0;p0699=0);0;IF(p0982+p0985+p0986=1;0;1-(p0982+p0985+p0986))))
- p0239: 15.093
- p3314: 0; = if(and(p1232=0;p3253<>0);p3263*p3289;0)
- p1182: 1268.8; = p1181*p0801
- p1327: 0.0564456; = if(p1318=0;if(p1327a=0;1;if(p1327a<0;0;p1327a));0)
- p2609: 0; = p2413*p1014
- p0654: 0; = IF(p0390<0.5;-SQRT(p0007*EXP(p0522^2*p0008)-p0007);SQRT(p0007*EXP(p0522^2*p0008)-p0007))
- p1180: 1.01986e-8; = p1176*p1179/p0818
- p1970: 8.5e6; = p0801
- p0625: 0; = IF(p0361<0.5;-SQRT(p0007*EXP(p0493^2*p0008)-p0007);SQRT(p0007*EXP(p0493^2*p0008)-p0007))
- p0143: 0
- p3432: 0; = p3375*p1239
- p3735: 3.61438e-8; = p1798*p3477
- p1965: 0.000351402; = p1963+p1959*p1964*1000/p0818
- p0270: 4.09
- p0914: 5.90488e8; = p0825*p0911+p0827*p0912+(p0830+p0895)*p0824*p0913
- p1802: 2.78165e-6; = p1394*1000/p0818
- p3246: 0; = IF(p3244+p3245=1;0;1-(p3244+p3245))
- p3397: 0; = p3378*p1234
- p2429: 0; = p2236*p2219
- p1890: 1.12674e-6; = p1482*1000/p0818
- p2911: 2.08358e-5; = p2325*(p1020+p1022)
- p3458: 8.61725e-5; = p3363*p1241
- p2580: 2.66939e-7; = p2384*p1073
- p0124: 22.114
- p1949: 0
- p0368: 0.5
- p1951: 0
- p0682: 8498.81; = p0022*(1+p0550*p0154/100)
- p2451: 0.000126557; = p2255*p1014
- p3158: 0; = p2377*p1082
- p2354: 0.00134862; = p2225*p2182
- p1167: 0.5
- p1396: 3
- p3165: 0; = p2384*p1082
- p0850: 0.32549
- p0223: 41.585
- p1740: 0
- p3746: 4.44846e-8; = p1809*p3477
- p0608: 0; = IF(p0344<0.5;-SQRT(p0007*EXP(p0476^2*p0008)-p0007);SQRT(p0007*EXP(p0476^2*p0008)-p0007))
- p0910: 0.00360925; = p0909/p0818
- p4348: 0; = p1793*p3480
- p2453: 0.000208813; = p2257*p1014
- p2695: 8.77641e-6; = p2304*(p1078+p1080)
- p0858: 0.563994; = p0670*1000/p0856
- p2053: 1.45647
- p1223: 0.56
- p3268: 0.0232481
- p0905: 0.02102; = p0904/p0818
- p1210: 0.25
- p1142: 0; = if(p1121=0;p1136*p0001/(p0818*p0002);0)
- p2977: 0; = p2391*(p1129+p1131)
- p1597: 0
- p3448: 0; = p3372*p1240
- p2624: 0; = p2428*p1123
- p2950: 4.45651e-5; = p2364*(p1020+p1022)
- p3376: 0; = if(p1232=0;p3246*p3358/p0818;0)
- p3272: 0.0398246
- p5319: 1.97095e-7; = p1940*p3484
- p1171: 0.000133511; = p0801*p0001/(p0818*p0002)
- p2457: 7.36763e-5; = p2261*p1073
- p2132: 2.4181e-7; = p2015*p2060*p2094/(p0818*1000)
- p2786: 0; = p2395*(p1019+p1021)
- p2698: 6.86328e-7; = p2307*(p1078+p1080)
- p1301: 0; = IF(p1297+p1300=p1265;0;IF(p1297+p1300+p1299>p1265;p1265-(p1297+p1300);p1299))
- p1129: 0.07806; = if(p1121=0;IF(p1123+p1128=1;0;IF(p1123+p1128+p1125>1;1-(p1123+p1128);p1125));0)
- p2890: 3.08804e-5; = p2304*(p1079+p1081)
- p1191: 0.5
- p0528: 0; = SQRT(2)*(IF((2*p0396-1)<0;-1;IF((2*p0396-1)>0;1;0))*SQRT(SQRT((2/(pi()*0.140012289)+LN(1-(2*p0396-1)^2)/2)^2-LN(1-(2*p0396-1)^2)/0.140012289)-(2/(pi()*0.140012289)+LN(1-(2*p0396-1)^2)/2)))
- p0415: 0; = SQRT(2)*(IF((2*p0283-1)<0;-1;IF((2*p0283-1)>0;1;0))*SQRT(SQRT((2/(pi()*0.140012289)+LN(1-(2*p0283-1)^2)/2)^2-LN(1-(2*p0283-1)^2)/0.140012289)-(2/(pi()*0.140012289)+LN(1-(2*p0283-1)^2)/2)))
- p3085: 0; = p2304*p1082
- p1629: 0
- p1345: 7.53611e-6; = IF(p1318=0;p1344*p0001/(p0818*p0002);0)
- p3443: 0; = p3367*p1240
- p3127: 0; = p2346*p1082
- p1035: 1.49418e-5; = IF(p1012=0;p1029*p0001/(p0818*p0002);0)
- p4513: 0; = p1962*p3480
- p1920: 0
- p3258: 0.0491162
- p0706: 0
- p2785: 0; = p2394*(p1019+p1021)
- p3459: 2.50173e-5; = p3364*p1241
- p2652: 3.00919e-6; = p2261*(p1078+p1080)
- p1851: 0
- p2064: 0.676706
- p1053: 3.03249e7; = IF(p1012=0;p1046*p1036;0)
- p3431: 0; = p3374*p1239
- p0771: 67.965; = p0111*(1+p0639*p0243/100)
- p0360: 0.5
- p2812: 0; = p2421*(p1078+p1080)
- p0344: 0.5
- p3429: 0; = p3372*p1239
- p0336: 0.5
- p2674: 1.83683e-5; = p2283*(p1019+p1021)
- p1255: 0; = if(p1232>0;0;p0737/100)
- p0392: 0.5
- p2090: 0.40001
- p0490: 0; = SQRT(2)*(IF((2*p0358-1)<0;-1;IF((2*p0358-1)>0;1;0))*SQRT(SQRT((2/(pi()*0.140012289)+LN(1-(2*p0358-1)^2)/2)^2-LN(1-(2*p0358-1)^2)/0.140012289)-(2/(pi()*0.140012289)+LN(1-(2*p0358-1)^2)/2)))
- p0941: 0; = if(and(p0683=0;p0947=0);p0935;0)
- p2038: 0.304457
- p1147: 0.0801873
- p3106: 1.07329e-5; = p2325*p1023
- p1887: 0
- p2986: 0; = p2400*(p1020+p1022)
- p3143: 1.12802e-5; = p2362*p1023
- p0889: 0; = 1000*p0888*p0001*p0003*p0004/(p0818*p0002)
- p1753: 0
- p2117: 0.585147
- p2458: 1.52509e-5; = p2262*p1073
- p1947: 0
- p1967: 0; = if(p0807=480;p0802*p0810;0)
- p1178: 2.03973e-8; = p1176/p0818
- p0663: 0; = IF(p0399<0.5;-SQRT(p0007*EXP(p0531^2*p0008)-p0007);SQRT(p0007*EXP(p0531^2*p0008)-p0007))
- p1952: 0
- p0923: 0.27604; = IF(p0918=1;0;IF(p0918+p0919>1;1-p0918;p0919))
- p2851: 5.60395e-6; = p2265*(p1079+p1081)
- p1810: 8.97875e-7; = p1402*1000/p0818
- p2973: 1.40784e-7; = p2387*(p1079+p1081)
- p2160: 6.89542e-8; = p2015*p2084*p2122/(p0818*1000)
- p2136: 5.57642e-7; = p2015*p2064*p2098/(p0818*1000)
- p2345: 1.30244e-5; = p2228*p2213
- p1708: 0
- p3190: 0; = p2409*p1023
- p1141: 2.31479e-6; = if(p1121=0;p1135*p0001/(p0818*p0002);0)
- p3388: 0; = p3369*p1234
- p2286: 0.000822683; = p2223*p2192
- p2032: 0.448886
- p0458: 0; = SQRT(2)*(IF((2*p0326-1)<0;-1;IF((2*p0326-1)>0;1;0))*SQRT(SQRT((2/(pi()*0.140012289)+LN(1-(2*p0326-1)^2)/2)^2-LN(1-(2*p0326-1)^2)/0.140012289)-(2/(pi()*0.140012289)+LN(1-(2*p0326-1)^2)/2)))
- p1226: 8.5e6; = IF(p1221=0;0;IF(p1193=0;p0801;0))
- p2630: 8.85695e-7; = p2239*(p1019+p1021)
- p1276: 0.013487; = p1272*p1252/p0818
- p0421: 0; = SQRT(2)*(IF((2*p0289-1)<0;-1;IF((2*p0289-1)>0;1;0))*SQRT(SQRT((2/(pi()*0.140012289)+LN(1-(2*p0289-1)^2)/2)^2-LN(1-(2*p0289-1)^2)/0.140012289)-(2/(pi()*0.140012289)+LN(1-(2*p0289-1)^2)/2)))
- p3550: 2.37875e-6; = p1819*p3476
- p2593: 0; = p2397*p1014
- p3755: 1.76085e-8; = p1818*p3477
- p1169: 0.000514124
- p1482: 64
- p0992: 6.75319e-6; = p0988*p0001*p0004/(p0818*p0002)
- p2216: 6.17898e-5; = p1108/p0818
- p2297: 0.000197768; = p2227*p2204
- p3301: 0.130394; = if(and(p1232=0;p3252<>0);p3257*p3277*(p3297*p3290+(1-p3297)*p3294);0)
- p2405: 0; = p2234*p2195
- p1211: 0.6
- p4410: 0; = p1855*p3480
- p0565: 0; = IF(p0301<0.5;-SQRT(p0007*EXP(p0433^2*p0008)-p0007);SQRT(p0007*EXP(p0433^2*p0008)-p0007))
- p0953: 3.68543e-5; = if(and(p0683>0;or(p0807=56;p0807=100;and(p0807=60;p0901>0.06)));p0935;0)
- p0888: 0; = p0686*1000*p0687*p0884/100
- p0670: 4793.95; = p0010*(1+p0538*p0142/100)
- p1249: 0; = if(p1232>0;0;p1244*p0001/(p0818*p0002))
- p3116: 2.9576e-5; = p2335*p1023
- p1862: 0
- p2439: 0.000144656; = p2243*p1014
- p2489: 0.00197174; = p2293*p1014
- p0048: 5.201
- p1320: 0.089577; = IF(((p0745*1000*p0747/100)+(p0754*1000*p0756/100))/p0801<0;0;((p0745*1000*p0747/100)+(p0754*1000*p0756/100))/p0801)
- p3303: 0.000398148; = if(and(p1232=0;p3252<>0);p3259*p3289;0)
- p4191: 1.51377e-8; = p1842*p3479
- p2054: 0.91
- p0132: 28.606
- p3447: 0; = p3371*p1240
- p0177: 13.228
- p3402: 3.57234e-5; = p3364*p1238
- p5177: 2.27754e-8; = p1798*p3484
- p2120: 0.51828
- p0538: 0; = IF(p0274<0.5;-SQRT(p0007*EXP(p0406^2*p0008)-p0007);SQRT(p0007*EXP(p0406^2*p0008)-p0007))
- p2045: 30
- p1833: 0
- p2683: 1.20038e-6; = p2292*(p1019+p1021)
- p1968: 0; = if(p0807=480;p0802*p0811;0)
- p2391: 0; = p2233*p2220
- p2130: 6.52871e-7; = p2015*p2058*p2092/(p0818*1000)
- p2705: 1.55697e-7; = p2314*(p1128+p1130)
- p0610: 0; = IF(p0346<0.5;-SQRT(p0007*EXP(p0478^2*p0008)-p0007);SQRT(p0007*EXP(p0478^2*p0008)-p0007))
- p2892: 3.59014e-7; = p2306*(p1079+p1081)
- p5082: 3.0149e-8; = p1909*p3483
- p2309: 1.08601e-5; = p2227*p2216
- p2865: 8.6046e-5; = p2279*(p1020+p1022)
- p0879: 0; = p0878*p0001*p0003/(p0818*p0002)
- p1064: 0.0100797; = IF(p1012=0;p1050/(p1057*p0818);0)
- p2339: 0.00211665; = p2228*p2207
- p0152: 0
- p1809: 1.69012e-6; = p1401*1000/p0818
- p2940: 0.000296184; = p2354*(p1020+p1022)
- p3208: 0; = p2427*p1082
- p0280: 0.5
- p2979: 0; = p2393*(p1020+p1022)
- p0287: 0.5
- p2088: 0.798875
- p2478: 0.000966224; = p2282*p1014
- p1284: 0; = p1280*p1252/p0818
- p3049: 0; = p2268*p1082
- p2768: 2.13399e-7; = p2377*(p1078+p1080)
- p1591: 0
- p2707: 7.19865e-6; = p2316*(p1019+p1021)
- p1194: 1.48
- p2409: 0; = p2234*p2199
- p3161: 0; = p2380*p1082
- p4151: 8.24745e-8; = p1802*p3479
- p1254: 0; = if(p1232>0;0;p0736/100)
- p3269: 0.851786
- p0933: 1190; = p0801*p0927
- p3411: 3.84662e-5; = p3373*p1238
- p3775: 8.24819e-8; = p1838*p3477
- p0680: 1814.81; = p0020*(1+p0548*p0152/100)
- p2144: 1.10423e-7; = p2015*p2072*p2106/(p0818*1000)
- p1184: 2.23377e-8; = p1182/p0818
- p1056: 2.75183e8; = IF(p1012=0;p1049*p1036;0)
- p3277: 0.55
- p2034: 4.61367e-6; = p2015*p2030*p2032/(p0818*1000)
- p0512: 0; = SQRT(2)*(IF((2*p0380-1)<0;-1;IF((2*p0380-1)>0;1;0))*SQRT(SQRT((2/(pi()*0.140012289)+LN(1-(2*p0380-1)^2)/2)^2-LN(1-(2*p0380-1)^2)/0.140012289)-(2/(pi()*0.140012289)+LN(1-(2*p0380-1)^2)/2)))
- p0298: 0.5
- p0875: 0; = p0874*p0001*p0003/(p0818*p0002)
- p1480: 84
- p0156: 36.012
- p4495: 0; = p1940*p3480
- p2994: 0; = p2408*(p1020+p1022)
- p0202: 53.195
- p2611: 0; = p2415*p1073
- p3068: 0.000529717; = p2287*p1023
- p0959: 0; = if(and(p0683>0;or(p0807=480;p0807=32;p0807=1;and(p0807=60;p0901<0.03)));p0935;0)
- p1481: 1469
- p1715: 0
- p3281: 0.46
- p4944: 1.32957e-5; = p1771*p3483
- p2208: 0.000566396; = p1110/p0818
- p0586: 0; = IF(p0322<0.5;-SQRT(p0007*EXP(p0454^2*p0008)-p0007);SQRT(p0007*EXP(p0454^2*p0008)-p0007))
- p0433: 0; = SQRT(2)*(IF((2*p0301-1)<0;-1;IF((2*p0301-1)>0;1;0))*SQRT(SQRT((2/(pi()*0.140012289)+LN(1-(2*p0301-1)^2)/2)^2-LN(1-(2*p0301-1)^2)/0.140012289)-(2/(pi()*0.140012289)+LN(1-(2*p0301-1)^2)/2)))
- p2482: 0.000506148; = p2286*p1014
- p2679: 5.22035e-5; = p2288*(p1019+p1021)
- p1916: 8.80269e-8; = p1508*1000/p0818
- p2568: 0.000208506; = p2372*p1014
- p3417: 0; = p3379*p1238
- p3293: 0.3875
- p2447: 5.89098e-7; = p2251*p1014
- p0508: 0; = SQRT(2)*(IF((2*p0376-1)<0;-1;IF((2*p0376-1)>0;1;0))*SQRT(SQRT((2/(pi()*0.140012289)+LN(1-(2*p0376-1)^2)/2)^2-LN(1-(2*p0376-1)^2)/0.140012289)-(2/(pi()*0.140012289)+LN(1-(2*p0376-1)^2)/2)))
- p2426: 0; = p2235*p2216
- p3326: 0; = if(and(p1232=0;p3255<>0);p3268*p3289;0)
- p0534: 0; = SQRT(2)*(IF((2*p0402-1)<0;-1;IF((2*p0402-1)>0;1;0))*SQRT(SQRT((2/(pi()*0.140012289)+LN(1-(2*p0402-1)^2)/2)^2-LN(1-(2*p0402-1)^2)/0.140012289)-(2/(pi()*0.140012289)+LN(1-(2*p0402-1)^2)/2)))
- p3142: 9.85489e-6; = p2361*p1023
- p1292: 0.37874; = IF(p1287+p1290+p1291=p1261;0;p1261-(p1287+p1290+p1291))
- p3453: 0; = p3377*p1240
- p1112: 0.209482
- p0316: 0.5
- p0956: 1.95644e-5; = if(and(p0683>0;or(p0807=56;p0807=100;and(p0807=60;p0901>0.06)));p0938;0)
- p1712: 0.60504
- p4738: 0; = p1771*p3482
- p1772: 0
- p3914: 5.88656e-5; = p1771*p3478
- p2266: 5.13559e-8; = p2226*p2212
- p3333: 0; = if(and(p1232=0;p3255<>0);p3255-(p3328+p3329+p3330+p3331+p3332);0)
- p0825: 4.99658e10; = p0818*p0822
- p0541: 0; = IF(p0277<0.5;-SQRT(p0007*EXP(p0409^2*p0008)-p0007);SQRT(p0007*EXP(p0409^2*p0008)-p0007))
- p2841: 4.51764e-5; = p2255*(p1020+p1022)
- p3136: 3.34909e-5; = p2355*p1023
- p1583: 0
- p2583: 9.79642e-7; = p2387*p1073
- p0570: 0; = IF(p0306<0.5;-SQRT(p0007*EXP(p0438^2*p0008)-p0007);SQRT(p0007*EXP(p0438^2*p0008)-p0007))
- p0120: 86.71
- p0398: 0.5
- p1670: 0
- p0785: 10.159; = p0125*(1+p0653*p0257/100)
- p0929: 2.34634e6; = p0801*p0923
- p2619: 0; = p2423*p1073
- p2321: 0.000181109; = p2224*p2188
- p3328: 0; = if(and(p1232=0;p3255<>0);p3255*(p3265*p3277-p3323)/p3327;0)
- p3011: 0; = p2425*(p1079+p1081)
- p2454: 3.02979e-5; = p2258*p1073
- p2245: 6.0521e-5; = p2222*p2190
- p0321: 0.5
- p0999: 0; = IF(p0996=1;0;IF(p0996+p0997>1;1-p0996;p0997))
- p2113: 0.832356
- p0826: 0.120333; = 1-p0825/p0818
- p2792: 0; = p2401*(p1019+p1021)
- p0501: 0; = SQRT(2)*(IF((2*p0369-1)<0;-1;IF((2*p0369-1)>0;1;0))*SQRT(SQRT((2/(pi()*0.140012289)+LN(1-(2*p0369-1)^2)/2)^2-LN(1-(2*p0369-1)^2)/0.140012289)-(2/(pi()*0.140012289)+LN(1-(2*p0369-1)^2)/2)))
- p2534: 0.00021521; = p2338*p1073
- p0266: 23.309
- p3003: 0; = p2417*(p1079+p1081)
- p1980: 3521.6
- p2821: 0; = p2430*(p1128+p1130)
- p1647: 0
- p2326: 0.000539973; = p2224*p2193
- p1302: 0; = IF(p1297+p1300+p1301=p1262;0;p1262-(p1297+p1300+p1301))
- p0491: 0; = SQRT(2)*(IF((2*p0359-1)<0;-1;IF((2*p0359-1)>0;1;0))*SQRT(SQRT((2/(pi()*0.140012289)+LN(1-(2*p0359-1)^2)/2)^2-LN(1-(2*p0359-1)^2)/0.140012289)-(2/(pi()*0.140012289)+LN(1-(2*p0359-1)^2)/2)))
- p0423: 0; = SQRT(2)*(IF((2*p0291-1)<0;-1;IF((2*p0291-1)>0;1;0))*SQRT(SQRT((2/(pi()*0.140012289)+LN(1-(2*p0291-1)^2)/2)^2-LN(1-(2*p0291-1)^2)/0.140012289)-(2/(pi()*0.140012289)+LN(1-(2*p0291-1)^2)/2)))
- p0191: 50.245
- p1274: 0; = p1270*p1252/p0818
- p3012: 0; = p2426*(p1079+p1081)
- p0853: 0.0347722; = p0803/(p0802+p0803)
- p1231: 0.0142139; = IF(p1221=0;0;p1230*(p1228+p1229))
- p4883: 0; = p1916*p3482
- p1252: 2.0414e9; = if(p1232>0;0;p0724*2000*p0723*1000*p0725/100)
- p5187: 6.97863e-8; = p1808*p3484
- p3240: 3.25254e-9; = p3234*p1188*p3235/p0818
- p0104: 98.939
- p1131: 0; = if(p1121=0;IF(p1123+p1128+p1129+p1130=1;0;IF(p1123+p1128+p1129+p1130+p1127>1;1-(p1123+p1128+p1129+p1130);p1127));0)
- p3031: 0.000168045; = p2250*p1023
- p3325: 0; = if(and(p1232=0;p3255<>0);p3267*p3289;0)
- p3406: 0.00025731; = p3368*p1238
- p1564: 0
- p4157: 1.24756e-7; = p1808*p3479
- p3473: 0; = p3378*p1241
- p0788: 5.768; = p0128*(1+p0656*p0260/100)
- p2442: 9.36363e-6; = p2246*p1014
- p1086: 0; = IF(p1071=0;p1080*(p0710/100)*p0703*1000;0)
- p2246: 1.52195e-5; = p2222*p2191
- p1998: 116
- p1943: 0
- p1324: 0.257691; = IF(((p0745*1000*p0751/100)+(p0754*1000*p0760/100))/p0801<0;0;((p0745*1000*p0751/100)+(p0754*1000*p0760/100))/p0801)
- p0727: 58.813; = p0067*(1+p0595*p0199/100)
- p2209: 0.000256131; = 14.0067*p2208/30.973762
- p0555: 0; = IF(p0291<0.5;-SQRT(p0007*EXP(p0423^2*p0008)-p0007);SQRT(p0007*EXP(p0423^2*p0008)-p0007))
- p0546: 0; = IF(p0282<0.5;-SQRT(p0007*EXP(p0414^2*p0008)-p0007);SQRT(p0007*EXP(p0414^2*p0008)-p0007))
- p5062: 2.60523e-6; = p1889*p3483
- p4204: 9.50023e-8; = p1855*p3479
- p0137: 34.697
- p1863: 0
- p0547: 0; = IF(p0283<0.5;-SQRT(p0007*EXP(p0415^2*p0008)-p0007);SQRT(p0007*EXP(p0415^2*p0008)-p0007))
- p2302: 4.50175e-5; = p2227*p2209
- p2622: 0; = p2426*p1073
- p1866: 0
- p0735: 0
- p1733: 0
- p2193: 0.00707829; = p1054/p0818
- p1146: 0.919813
- p0439: 0; = SQRT(2)*(IF((2*p0307-1)<0;-1;IF((2*p0307-1)>0;1;0))*SQRT(SQRT((2/(pi()*0.140012289)+LN(1-(2*p0307-1)^2)/2)^2-LN(1-(2*p0307-1)^2)/0.140012289)-(2/(pi()*0.140012289)+LN(1-(2*p0307-1)^2)/2)))
- p2993: 0; = p2407*(p1020+p1022)
- p0873: 0.444246; = p0872*p0001*p0003/(p0818*p0002)
- p4481: 0; = p1926*p3480
- p0799: 11.369; = p0139*(1+p0667*p0271/100)
- p3323: 0; = if(and(p1232=0;p3255<>0);p3265*p3277*(p3299*p3291+(1-p3299)*p3295);0)
- p3478: 0.445993; = if(p1328+p1330+p1332+p1334+p1336+p1338+p1340+p1342+p1344=0;0;p1332/(p1328+p1330+p1332+p1334+p1336+p1338+p1340+p1342+p1344))
- p1179: 0.5
- p1705: 0.453667
- p3354: 2.60851e7; = IF((p3350+p3351+p3352+p3353)+IF(p3349=0;0;(p3256*(p3273*(1-p3277))/p3349))>p3256;p3256-(p3350+p3351+p3352+p3353);IF(p3349=0;0;p3256*(p3273*(1-p3277))/p3349))
- p0425: 0; = SQRT(2)*(IF((2*p0293-1)<0;-1;IF((2*p0293-1)>0;1;0))*SQRT(SQRT((2/(pi()*0.140012289)+LN(1-(2*p0293-1)^2)/2)^2-LN(1-(2*p0293-1)^2)/0.140012289)-(2/(pi()*0.140012289)+LN(1-(2*p0293-1)^2)/2)))
- p0461: 0; = SQRT(2)*(IF((2*p0329-1)<0;-1;IF((2*p0329-1)>0;1;0))*SQRT(SQRT((2/(pi()*0.140012289)+LN(1-(2*p0329-1)^2)/2)^2-LN(1-(2*p0329-1)^2)/0.140012289)-(2/(pi()*0.140012289)+LN(1-(2*p0329-1)^2)/2)))
- p4033: 5.0252e-7; = p1890*p3478
- p2071: 0.151
- p2514: 2.77977e-5; = p2318*p1014
- p0548: 0; = IF(p0284<0.5;-SQRT(p0007*EXP(p0416^2*p0008)-p0007);SQRT(p0007*EXP(p0416^2*p0008)-p0007))
- p2882: 0.000497883; = p2296*(p1020+p1022)
- p3291: 0.437
- p3430: 0; = p3373*p1239
- p0944: 0; = if(and(p0683=0;p0950=0);p0938;0)
- p3029: 7.93052e-5; = p2248*p1023
- p3040: 0; = p2259*p1082
- p2793: 0; = p2402*(p1019+p1021)
- p0247: 7.917
- p1331: 1.19595e-5; = p1330*p0001/(p0818*p0002)
- p2317: 1.31173e-5; = p2224*p2184
- p4569: 3.18596e-7; = p1808*p3481
- p3745: 1.10748e-7; = p1808*p3477
- p2552: 1.72614e-5; = p2356*p1014
- p1201: 0.65
- p4102: 8.50348e-5; = p1963*p3478
- p2508: 4.40531e-5; = p2312*p1123
- p4083: 5.30002e-6; = p1940*p3478
- p3238: 0.854735; = IF(p3237+p3235+p3236>1;1-(p3235+p3236);p3237)
- p0022: 8498.81
- p5221: 8.46779e-9; = p1842*p3484
- p3341: 2.41864e6; = if(and(p1232=0;p3254<>0);p3254*(p3271-p3336)/p3338;0)
- p3708: 3.47397e-6; = p1771*p3477
- p1815: 0
- p1652: 0
- p0558: 0; = IF(p0294<0.5;-SQRT(p0007*EXP(p0426^2*p0008)-p0007);SQRT(p0007*EXP(p0426^2*p0008)-p0007))
- p1602: 0
- p0691: 13.561; = p0031*(1+p0559*p0163/100)
- p1706: 0
- p2433: 0.000503619; = p2237*p1014
- p0790: 0
- p1294: 0; = p1290*p1252/p0818
- p0507: 0; = SQRT(2)*(IF((2*p0375-1)<0;-1;IF((2*p0375-1)>0;1;0))*SQRT(SQRT((2/(pi()*0.140012289)+LN(1-(2*p0375-1)^2)/2)^2-LN(1-(2*p0375-1)^2)/0.140012289)-(2/(pi()*0.140012289)+LN(1-(2*p0375-1)^2)/2)))
- p2185: 0.000592272; = p1065-p2184
- p3074: 0.000362562; = p2293*p1023
- p0805: 0
- p1986: 4200
- p2918: 8.11676e-5; = p2332*(p1020+p1022)
- p2566: 3.5024e-6; = p2370*p1014
- p2002: 750
- p4082: 7.45929e-7; = p1939*p3478
- p1181: 0.000149271
- p0860: 0; = p0672*1000/p0856
- p1096: 0.000861829
- p0697: 97.729; = p0037*(1+p0565*p0169/100)
- p2848: 2.19171e-6; = p2262*(p1079+p1081)
- p3105: 1.32625e-6; = p2324*p1023
- p1104: 0.303167; = IF(p1071=0;IF(p1096+p1101+p1102+p1103=1;0;1-(p1096+p1101+p1102+p1103));0)
- p2273: 0; = p2230*p2219
- p0374: 0.5
- p2932: 1.06286e-5; = p2346*(p1079+p1081)
- p1017: 0.05201; = IF(p1012=0;p0708/100;0)
- p2256: 2.96053e-5; = p2222*p2202
- p3171: 0; = p2390*p1132
- p3237: 0.854735
- p1288: 0
- p0478: 0; = SQRT(2)*(IF((2*p0346-1)<0;-1;IF((2*p0346-1)>0;1;0))*SQRT(SQRT((2/(pi()*0.140012289)+LN(1-(2*p0346-1)^2)/2)^2-LN(1-(2*p0346-1)^2)/0.140012289)-(2/(pi()*0.140012289)+LN(1-(2*p0346-1)^2)/2)))
- p1889: 2.58623e-5; = p1481*1000/p0818
- p1992: 3900
- p1582: 0
- p2964: 6.23433e-6; = p2378*(p1079+p1081)
- p3371: 7.58458e-5; = if(p1232=0;p3245*p3359/p0818;0)
- p0389: 0.5
- p3187: 0; = p2406*p1023
- p2748: 5.02616e-6; = p2357*(p1019+p1021)
- p1675: 0
- p1594: 0.735896
- p2916: 2.65865e-7; = p2330*(p1020+p1022)
- p2349: 0.000428391; = p2228*p2217
- p0590: 0; = IF(p0326<0.5;-SQRT(p0007*EXP(p0458^2*p0008)-p0007);SQRT(p0007*EXP(p0458^2*p0008)-p0007))
- p2871: 2.23262e-5; = p2285*(p1020+p1022)
- p2991: 0; = p2405*(p1020+p1022)
- p2795: 0; = p2404*(p1019+p1021)
- p3369: 8.38308e-5; = if(p1232=0;p3245*p3357/p0818;0)
- p1574: 0
- p1028: 1.27206e6; = IF(p1012=0;p1022*(p0704/100)*p0703*1000;0)
- p0713: 5.843; = p0053*(1+p0581*p0185/100)
- p0063: 8498.81
- p3689: 1.62812e-5; = p1962*p3476
- p0405: 0; = SQRT(2)*(IF((2*p0273-1)<0;-1;IF((2*p0273-1)>0;1;0))*SQRT(SQRT((2/(pi()*0.140012289)+LN(1-(2*p0273-1)^2)/2)^2-LN(1-(2*p0273-1)^2)/0.140012289)-(2/(pi()*0.140012289)+LN(1-(2*p0273-1)^2)/2)))
- p2539: 0.000945742; = p2343*p1073
- p0963: 0; = if(and(p0683>0;or(p0807=480;p0807=32;p0807=1;and(p0807=60;p0901<0.03)));p0939;0)
- p4493: 0; = p1938*p3480
- p0917: 0.969564; = (p0825+p0827+(p0830+p0895))/p0818-(p0900+p0905+p0910+p0915)
- p2070: 0.282
- p1777: 0
- p0030: 2135.25
- p1971: 0.000126443; = p1966*p0001/(p0818*p0002)
- p3700: 1.20016e-7; = p1763*p3477
- p4991: 6.73918e-8; = p1818*p3483
- p0722: 4.606; = p0062*(1+p0590*p0194/100)
- p3205: 0; = p2424*p1082
- p2027: 0.428799
- p2387: 1.16044e-6; = p2229*p2216
- p1954: 0
- p1001: 1; = if(p0978>0;0;if(and(p0687=0;p0691=0;p0695=0;p0699=0);0;IF(p0996+p0999+p1000=1;0;1-(p0996+p0999+p1000))))
- p2861: 0; = p2275*(p1129+p1131)
- p0843: 0.200228
- p1903: 0
- p1799: 0
- p1739: 0
- p3352: 1.56768e6; = if(and(p1232=0;p3256<>0);p3256*(p3275-p3347)/p3349;0)
- p2668: 6.24231e-5; = p2277*(p1019+p1021)
- p3465: 1.00239e-5; = p3370*p1241
- p0576: 0; = IF(p0312<0.5;-SQRT(p0007*EXP(p0444^2*p0008)-p0007);SQRT(p0007*EXP(p0444^2*p0008)-p0007))
- p0798: 82.459; = p0138*(1+p0666*p0270/100)
- p2981: 0; = p2395*(p1020+p1022)
- p0700: 0
- p1875: 0
- p1082: 0; = IF(p1071=0;IF(p1073+p1078+p1079+p1080+p1081=1;0;1-(p1073+p1078+p1079+p1080+p1081));0)
- p3394: 0; = p3375*p1234
- p0746: 31.062; = p0086*(1+p0614*p0218/100)
- p1729: 0
- p2680: 0.000516034; = p2289*(p1019+p1021)
- p2675: 2.1025e-5; = p2284*(p1019+p1021)
- p0899: 3.50851e10; = p0825*p0896+p0827*p0897+(p0830+p0895)*p0824*p0898
- p3386: 0; = p3367*p1234
- p0936: 2.97853e-5; = p0930*p0001/(p0818*p0002)
- p2096: 0.486404
- p4245: 1.46157e-8; = p1896*p3479
- p2607: 0; = p2411*p1014
- p0613: 0; = IF(p0349<0.5;-SQRT(p0007*EXP(p0481^2*p0008)-p0007);SQRT(p0007*EXP(p0481^2*p0008)-p0007))
- p2687: 0.000117908; = p2296*(p1019+p1021)
- p2676: 5.28724e-6; = p2285*(p1019+p1021)
- p2001: 400
- p0777: 21.699; = p0117*(1+p0645*p0249/100)
- p2342: 8.55478e-5; = p2228*p2210
- p3670: 5.10115e-7; = p1939*p3476
- p0480: 0; = SQRT(2)*(IF((2*p0348-1)<0;-1;IF((2*p0348-1)>0;1;0))*SQRT(SQRT((2/(pi()*0.140012289)+LN(1-(2*p0348-1)^2)/2)^2-LN(1-(2*p0348-1)^2)/0.140012289)-(2/(pi()*0.140012289)+LN(1-(2*p0348-1)^2)/2)))
- p0419: 0; = SQRT(2)*(IF((2*p0287-1)<0;-1;IF((2*p0287-1)>0;1;0))*SQRT(SQRT((2/(pi()*0.140012289)+LN(1-(2*p0287-1)^2)/2)^2-LN(1-(2*p0287-1)^2)/0.140012289)-(2/(pi()*0.140012289)+LN(1-(2*p0287-1)^2)/2)))
- p2907: 3.97751e-5; = p2321*(p1020+p1022)
- p1309: 0
- p2553: 5.94558e-5; = p2357*p1014
- p2235: 0; = 1-(p2226+p2227+p2228+p2229)
- p2642: 4.98e-8; = p2251*(p1019+p1021)
- p2586: 0; = p2390*p1123
- p0846: 0.454008; = p0841*p0845^3+p0842*p0845^2+p0843*p0845+p0844
- p1232: 0
- p2435: 1.04771e-5; = p2239*p1014
- p3494: 1.39074e-6; = p1763*p3476
- p1561: 0.52337
- p1359: 668
- p2163: 0.000349891; = (p2017-p2020)/p0818-(p2025+p2028+p2033+p2034+p2051+p2125+p2126+p2127+p2128+p2129+p2130+p2131+p2132+p2133+p2134+p2135+p2136+p2137+p2138+p2139+p2140+p2141+p2142+p2143+p2144+p2145+p2146+p2147+p2148+p2149+p2150+p2151+p2152+p2153+p2154+p2155+p2156+p2157)
- p3876: 4.40212e-8; = p1939*p3477
- p3204: 0; = p2423*p1082
- p2647: 1.53977e-6; = p2256*(p1019+p1021)

- p3231: 2.03973e-8; = p1176/p0818
- p1074: 0.03448; = IF(p1071=0;p0712/100;0)
- p3235: 0.118093
- p2648: 1.76522e-5; = p2257*(p1019+p1021)
- p0267: 5.386
- p1456: 12
- p3317: 0; = if(and(p1232=0;p3253<>0);p3253*(p3261*p3277-p3312)/p3316;0)
- p2726: 1.35972e-5; = p2335*(p1019+p1021)
- p2660: 4.70012e-7; = p2269*(p1078+p1080)
- p2901: 0.000138477; = p2315*(p1020+p1022)
- p0513: 0; = SQRT(2)*(IF((2*p0381-1)<0;-1;IF((2*p0381-1)>0;1;0))*SQRT(SQRT((2/(pi()*0.140012289)+LN(1-(2*p0381-1)^2)/2)^2-LN(1-(2*p0381-1)^2)/0.140012289)-(2/(pi()*0.140012289)+LN(1-(2*p0381-1)^2)/2)))
- p0023: 26581.3
- p2257: 0.000339401; = p2222*p2203
- p2833: 2.70497e-5; = p2247*(p1020+p1022)
- p1039: 0.058101
- p2614: 0; = p2418*p1073
- p2146: 1.98868e-8; = p2015*p2074*p2108/(p0818*1000)
- p2323: 4.66181e-5; = p2224*p2190
- p0139: 11.369
- p2479: 0.000217284; = p2283*p1014
- p3485: 8.8599e-7; = p1754*p3476
- p0081: 2.025
- p2270: 1.97082e-6; = p2226*p2216
- p1033: 6.86927e-6; = IF(p1012=0;p1027*p0001/(p0818*p0002);0)
- p2080: 0.025
- p1065: 0.000764222; = IF(p1012=0;p1051/(p1058*p0818);0)
- p2306: 2.95923e-6; = p2227*p2213
- p0972: 0.00190526; = p0969/p0818
- p5198: 1.29353e-7; = p1819*p3484
- p0920: 0.223092; = p0676*1000/p0801
- p1698: 0
- p0236: 0.534
- p3756: 2.05278e-7; = p1819*p3477
- p1093: 6.92271e-6; = IF(p1071=0;p1087*p0001/(p0818*p0002);0)
- p4983: 9.04469e-8; = p1810*p3483
- p0537: 0; = IF(p0273<0.5;-SQRT(p0007*EXP(p0405^2*p0008)-p0007);SQRT(p0007*EXP(p0405^2*p0008)-p0007))
- p0837: 0.5
- p3046: 0; = p2265*p1082
- p4565: 3.99911e-9; = p1804*p3481
- p0765: 124.078; = p0105*(1+p0633*p0237/100)
- p1606: 0.80434
- p2095: 0.765734
- p1770: 0
- p2009: 0.00535856; = ((p1983*p1985+p1989*p1991+p1995*p1997+p2003*p2005+p1976*p1977+p1978*p1979+p1998*p1999)/p0818)*p0005*p0002/1000
- p2597: 0; = p2401*p1014
- p2670: 2.03773e-5; = p2279*(p1019+p1021)
- p2277: 0.00120021; = p2223*p2183
- p1002: 0; = p0996*p0888
- p2327: 0.00011575; = p2224*p2195
- p2723: 1.9222e-5; = p2332*(p1019+p1021)
- p1683: 0
- p2122: 0.341195
- p1876: 0
- p2265: 4.61914e-5; = p2226*p2211
- p0863: 0; = p0675*1000/p0856
- p1067: 0.0025423; = IF(p1012=0;p1053/(p1060*p0818);0)
- p1113: 0.100377
- p2290: 6.39565e-6; = p2223*p2197
- p1103: 0.602279; = IF(p1071=0;IF(p1096+p1101+p1102=1;0;IF(p1096+p1101+p1102+p1099>1;1-(p1096+p1101+p1102);p1099));0)
- p2503: 1.68039e-5; = p2307*p1073
- p3216: 0.06; = IF(OR(p1226=0;p1228=0);0;1-p3213-p3214-p3215)
- p1011: 5.14039e-6; = p1010*p0001*p0004/(p0818*p0002)
- p2155: 1.18256e-7; = p2015*p2084*p2117/(p0818*1000)
- p2752: 4.53065e-6; = p2361*(p1019+p1021)
- p2799: 0; = p2408*(p1019+p1021)
- p3026: 6.84674e-6; = p2245*p1023
- p3278: 0.46
- p1842: 5.10556e-7; = p1434*1000/p0818
- p2844: 4.35412e-6; = p2258*(p1079+p1081)
- p1202: 0.7
- p1136: 0; = if(p1121=0;p1130*(p0716/100)*p0703*1000;0)
- p3255: 0; = p1252*(p1297*(1-p3247)+p1300*(1-p3248)+p1301*(1-p3249)+p1302*(1-p3250))
- p0747: 0
- p3779: 1.34381e-8; = p1842*p3477
- p1907: 0
- p2951: 0.000253646; = p2365*(p1020+p1022)
- p2862: 0.0012008; = p2276*(p1020+p1022)
- p2099: 0.620397
- p2550: 0.000829727; = p2354*p1014
- p2061: 0.518824
- p2078: 0.117
- p2773: 9.37786e-7; = p2382*(p1078+p1080)
- p3067: 9.30701e-5; = p2286*p1023
- p1162: 6.89172e-6; = p1161/p0818
- p0059: 7.806
- p2960: 0.000122806; = p2374*(p1020+p1022)
- p0162: 32.271
- p1263: 0; = if(p1232>0;0;IF(p1259=1;0;IF(p1259+p1260>1;1-p1259;p1260)))
- p1677: 0
- p3691: 7.6458e-8; = p1754*p3477
- p0272: 23.01
- p2788: 0; = p2397*(p1019+p1021)
- p0619: 0; = IF(p0355<0.5;-SQRT(p0007*EXP(p0487^2*p0008)-p0007);SQRT(p0007*EXP(p0487^2*p0008)-p0007))
- p0254: 23.01
- p2010: 0.00164403; = ((p1984*p1985+p1990*p1991+p1996*p1997+p2004*p2005)/p0818)*p0005*p0002/1000
- p2813: 0; = p2422*(p1078+p1080)
- p3016: 0; = p2430*(p1129+p1131)
- p2797: 0; = p2406*(p1019+p1021)
- p2759: 8.20469e-8; = p2368*(p1019+p1021)
- p0463: 0; = SQRT(2)*(IF((2*p0331-1)<0;-1;IF((2*p0331-1)>0;1;0))*SQRT(SQRT((2/(pi()*0.140012289)+LN(1-(2*p0331-1)^2)/2)^2-LN(1-(2*p0331-1)^2)/0.140012289)-(2/(pi()*0.140012289)+LN(1-(2*p0331-1)^2)/2)))
- p1686: 0.505026
- p3077: 0.000256468; = p2296*p1023
- p1459: 14
- p1590: 0
- p2764: 2.53681e-6; = p2373*(p1019+p1021)
- p3107: 6.10871e-5; = p2326*p1023
- p2051: 2.35418e-5; = p2015*p2049*p2050/(p0818*1000)
- p3183: 0; = p2402*p1023
- p0931: 1.1958e6; = p0801*p0925
- p2801: 0; = p2410*(p1019+p1021)
- p1556: 0
- p0816: 0
- p1843: 0
- p1334: 857708; = p1322*p0801
- p0445: 0; = SQRT(2)*(IF((2*p0313-1)<0;-1;IF((2*p0313-1)>0;1;0))*SQRT(SQRT((2/(pi()*0.140012289)+LN(1-(2*p0313-1)^2)/2)^2-LN(1-(2*p0313-1)^2)/0.140012289)-(2/(pi()*0.140012289)+LN(1-(2*p0313-1)^2)/2)))
- p0639: 0; = IF(p0375<0.5;-SQRT(p0007*EXP(p0507^2*p0008)-p0007);SQRT(p0007*EXP(p0507^2*p0008)-p0007))
- p0721: 0
- p3313: 0; = if(and(p1232=0;p3253<>0);p3262*(p3278*(p3282*p1256+p3286*(p1253+p1257)+p1258*p3288+p3298*p3287));0)
- p1609: 0
- p1087: 440735; = IF(p1071=0;p1081*(p0710/100)*p0703*1000;0)
- p3962: 3.47838e-6; = p1819*p3478
- p3469: 0; = p3374*p1241
- p0623: 0; = IF(p0359<0.5;-SQRT(p0007*EXP(p0491^2*p0008)-p0007);SQRT(p0007*EXP(p0491^2*p0008)-p0007))
- p2644: 1.79711e-7; = p2253*(p1019+p1021)
- p4158: 5.01111e-8; = p1809*p3479
- p3153: 3.83399e-5; = p2372*p1023
- p3380: 0.0314471; = p3251/p0818
- p3028: 1.39338e-5; = p2247*p1023
- p2780: 0; = p2389*(p1128+p1130)
- p4275: 4.69791e-9; = p1926*p3479
- p2778: 4.00119e-8; = p2387*(p1078+p1080)
- p3356: 8.68721e7; = if(p1232=0;p3306+p3317+p3328+p3339+p3350;0)
- p0980: 0; = IF(p0977=0;0;p0977*p0001/(p0818*p0002))
- p2649: 1.23747e-6; = p2258*(p1078+p1080)
- p1963j: 9.66391e-6; = p1725*p1929+p1726*p1930+p1727*p1931+p1728*p1932+p1729*p1933+p1730*p1934+p1731*p1935+p1732*p1936+p1733*p1937+p1734*p1938+p1735*p1939+p1736*p1940+p1737*p1941+p1738*p1942+p1739*p1943+p1740*p1944+p1741*p1945+p1742*p1946+p1743*p1947
- p3355: 4.56711e6; = if(and(p1232=0;p3256<>0);p3256-(p3350+p3351+p3352+p3353+p3354);0)
- p2459: 6.89665e-6; = p2263*p1073
- p2243: 0.000235121; = p2222*p2188
- p2838: 3.45154e-7; = p2252*(p1020+p1022)
- p0459: 0; = SQRT(2)*(IF((2*p0327-1)<0;-1;IF((2*p0327-1)>0;1;0))*SQRT(SQRT((2/(pi()*0.140012289)+LN(1-(2*p0327-1)^2)/2)^2-LN(1-(2*p0327-1)^2)/0.140012289)-(2/(pi()*0.140012289)+LN(1-(2*p0327-1)^2)/2)))
- p1685: 0.491852
- p0044: 98.939
- p0803: 290000
- p3087: 0; = p2306*p1082
- p0328: 0.5
- p5269: 1.86875e-8; = p1890*p3484
- p1996: 30
- p4059: 3.92594e-8; = p1916*p3478
- p1981: 400
- p1794: 0
- p2824: 3.94628e-5; = p2238*(p1020+p1022)
- p1741: 0
- p2083: 2.17294
- p1758: 0
- p2192: 0.00124364; = p1067-p2189-p2190-p2191
- p3122: 0; = p2341*p1082
- p1355: 259
- p2686: 1.02849e-5; = p2295*(p1019+p1021)
- p3133: 4.88316e-7; = p2352*p1132
- p0723: 8498.81; = p0063*(1+p0591*p0195/100)
- p2042: 0.07
- p3128: 0; = p2347*p1082
- p0323: 0.5
- p0961: 0; = if(and(p0683>0;or(p0807=480;p0807=32;p0807=1;and(p0807=60;p0901<0.03)));p0937;0)
- p0598: 0; = IF(p0334<0.5;-SQRT(p0007*EXP(p0466^2*p0008)-p0007);SQRT(p0007*EXP(p0466^2*p0008)-p0007))
- p1111: 0.0872841
- p1814: 0
- p2913: 2.54209e-5; = p2327*(p1020+p1022)
- p4760: 0; = p1793*p3482
- p2138: 7.43105e-8; = p2015*p2066*p2100/(p0818*1000)
- p3218: 0.0101108; = p3214*p1228
- p1134: 54070.2; = if(p1121=0;p1128*(p0716/100)*p0703*1000;0)
- p2403: 0; = p2234*p2192
- p1892: 0
- p0640: 0; = IF(p0376<0.5;-SQRT(p0007*EXP(p0508^2*p0008)-p0007);SQRT(p0007*EXP(p0508^2*p0008)-p0007))
- p2190: 0.000611098; = 32.065*p2189/(2*14.0067)
- p0249: 49.117
- p2131: 2.51559e-7; = p2015*p2059*p2093/(p0818*1000)
- p2380: 4.81025e-6; = p2229*p2209
- p4464: 0; = p1909*p3480
- p1026: 574646; = IF(p1012=0;p1020*(p0704/100)*p0703*1000;0)
- p0985: 0.734371; = IF(p0982=1;0;IF(p0982+p0983>1;1-p0982;p0983))
- p0580: 0; = IF(p0316<0.5;-SQRT(p0007*EXP(p0448^2*p0008)-p0007);SQRT(p0007*EXP(p0448^2*p0008)-p0007))
- p0902: 0.0130121
- p3390: 0; = p3371*p1234
- p2729: 8.7899e-6; = p2338*(p1078+p1080)
- p2008: 0.0411007; = ((p1982*p1985+p1988*p1991+p1994*p1997+p2002*p2005)/p0818)*p0005*p0002/1000
- p2238: 0.000179687; = p2222*p2183
- p2161: 8.5175e-9; = p2015*p2085*p2123/(p0818*1000)
- p0085: 23168.8
- p2048: 9.62363e-15; = p2015*p2046/(p0818*1000000000000)
- p0277: 0.5
- p1573: 0
- p2578: 2.29605e-5; = p2382*p1073
- p1936: 0
- p3407: 4.93034e-5; = p3369*p1238
- p0301: 0.5
- p1709: 0
- p1097: 0.0606187
- p3953: 4.00446e-7; = p1810*p3478
- p1156: 0.0610664; = p1064+p1065+p1066+p1067+p1068+p1069+p1070+p1116+p1117+p1118+p1119+p1120+p1154+p1155
- p0962: 0; = if(and(p0683>0;or(p0807=480;p0807=32;p0807=1;and(p0807=60;p0901<0.03)));p0938;0)
- p0859: 0.332741; = p0671*1000/p0856
- p3159: 0; = p2378*p1082
- p3062: 1.38883e-5; = p2281*p1023
- p0791: 71.394; = p0131*(1+p0659*p0263/100)
- p2955: 5.68652e-7; = p2369*(p1020+p1022)
- p1813: 0
- p1224: 0.44; = IF(p1221=0;0;IF(p1193=0;1-p1223;0))
- p0020: 1814.81
- p5069: 4.96571e-8; = p1896*p3483
- p1245: 0; = if(p1232>0;0;p1240*(p0725/100)*p0723*1000)
- p1607: 0
- p3048: 0; = p2267*p1082
- p1165: 0.000133511; = p0801*p0001/(p0818*p0002)
- p2718: 6.02013e-6; = p2327*(p1019+p1021)
- p1018: 0.15128; = IF(p1012=0;p0709/100;0)
- p3368: 0.000437505; = if(p1232=0;p3245*p3356/p0818;0)
- p2067: 0.446471
- p2926: 5.31556e-5; = p2340*(p1079+p1081)
- p1798: 1.37322e-6; = p1390*1000/p0818
- p3147: 2.8008e-5; = p2366*p1023
- p2065: 0.0758824
- p0035: 13.095
- p2502: 2.49819e-6; = p2306*p1073
- p2281: 0.000122764; = p2223*p2187
- p1963h: 1.20401e-6; = p1686*p1890+p1687*p1891+p1688*p1892+p1689*p1893+p1690*p1894+p1691*p1895+p1692*p1896+p1693*p1897+p1694*p1898+p1695*p1899+p1696*p1900+p1697*p1901+p1698*p1902+p1699*p1903+p1700*p1904+p1701*p1905+p1702*p1906+p1703*p1907+p1704*p1908+p1705*p1909
- p1569: 0
- p1649: 0
- p0105: 124.078
- p3853: 2.31691e-9; = p1916*p3477
- p3598: 7.51749e-8; = p1867*p3476
- p0088: 54.136
- p4907: 0; = p1940*p3482
- p2421: 0; = p2235*p2211
- p5338: 3.16224e-6; = p1963*p3484
- p4320: 0; = p1765*p3480
- p0554: 0; = IF(p0290<0.5;-SQRT(p0007*EXP(p0422^2*p0008)-p0007);SQRT(p0007*EXP(p0422^2*p0008)-p0007))
- p1193: 0; = IF(OR(p1036=0;p1095=0);0.0001*p0857;0)
- p2233: 0; = if(p0783*p0787+p0784*p0788+p0785*p0789+p0786*p0790=0;0;p0790*p0786/(p0783*p0787+p0784*p0788+p0785*p0789+p0786*p0790))
- p4863: 0; = p1896*p3482
- p1321: 1.51786; = IF(((p0745*1000*p0748/100)+(p0754*1000*p0757/100))/p0801<0;0;((p0745*1000*p0748/100)+(p0754*1000*p0757/100))/p0801)
- p2311: 3.58854e-5; = p2231*p2218
- p0106: 139.798
- p2956: 1.25024e-6; = p2370*(p1020+p1022)
- p0275: 0.5
- p1645: 0
- p1030: 8.12585e-5; = IF(p1012=0;p1024*p0001/(p0818*p0002);0)
- p1531: 95
- p2361: 8.71112e-5; = p2225*p2189
- p2395: 0; = p2234*p2184
- p2371: 0.000790489; = p2225*p2200
- p1719: 0
- p0269: 5.554
- p0043: 8498.81
- p0505: 0; = SQRT(2)*(IF((2*p0373-1)<0;-1;IF((2*p0373-1)>0;1;0))*SQRT(SQRT((2/(pi()*0.140012289)+LN(1-(2*p0373-1)^2)/2)^2-LN(1-(2*p0373-1)^2)/0.140012289)-(2/(pi()*0.140012289)+LN(1-(2*p0373-1)^2)/2)))
- p3306: 3.76925e7; = if(and(p1232=0;p3252<>0);p3252*(p3257*p3277-p3301)/p3305;0)
- p2392: 0; = p2233*p2221
- p0181: 19.378
- p2186: 0.00128945; = p1052/p0818
- p0353: 0.5
- p2340: 0.000438144; = p2228*p2208
- p4258: 8.87384e-9; = p1909*p3479
- p2860: 0; = p2274*(p1129+p1131)
- p1963e: 2.93137e-6; = p1628*p1832+p1629*p1833+p1630*p1834+p1631*p1835+p1632*p1836+p1633*p1837+p1634*p1838+p1635*p1839+p1636*p1840+p1637*p1841+p1638*p1842+p1639*p1843+p1640*p1844+p1641*p1845+p1642*p1846+p1643*p1847+p1644*p1848+p1645*p1849+p1646*p1850
- p1614: 0.65436
- p2985: 0; = p2399*(p1020+p1022)
- p3126: 0; = p2345*p1082
- p0643: 0; = IF(p0379<0.5;-SQRT(p0007*EXP(p0511^2*p0008)-p0007);SQRT(p0007*EXP(p0511^2*p0008)-p0007))
- p0810: 0
- p0091: 9.454
- p0832: 1.78304e10; = p0831*p0830/(1-p0831)
- p2770: 3.6677e-7; = p2379*(p1078+p1080)
- p0261: 6.122
- p3079: 0; = p2298*p1082
- p2497: 8.40397e-5; = p2301*p1073
- p1963d: 3.90967e-6; = p1608*p1812+p1609*p1813+p1610*p1814+p1611*p1815+p1612*p1816+p1613*p1817+p1614*p1818+p1615*p1819+p1616*p1820+p1617*p1821+p1618*p1822+p1619*p1823+p1620*p1824+p1621*p1825+p1622*p1826+p1623*p1827+p1624*p1828+p1625*p1829+p1626*p1830+p1627*p1831
- p0737: 0
- p1849: 0
- p1963f: 1.33569e-6; = p1647*p1851+p1648*p1852+p1649*p1853+p1650*p1854+p1651*p1855+p1652*p1856+p1653*p1857+p1654*p1858+p1655*p1859+p1656*p1860+p1657*p1861+p1658*p1862+p1659*p1863+p1660*p1864+p1661*p1865+p1662*p1866+p1663*p1867+p1664*p1868+p1665*p1869+p1666*p1870
- p5267: 2.45274e-8; = p1888*p3484
- p4927: 2.92622e-7; = p1754*p3483
- p4459: 0; = p1904*p3480
- p0653: 0; = IF(p0389<0.5;-SQRT(p0007*EXP(p0521^2*p0008)-p0007);SQRT(p0007*EXP(p0521^2*p0008)-p0007))
- p3018: 9.26052e-5; = p2237*p1023
- p3037: 3.34924e-6; = p2256*p1023
- p1195: 0.45
- p0861: 0.0819882; = p0673*1000/p0856
- p0749: 3.702; = p0089*(1+p0617*p0221/100)
- p1616: 0
- p0407: 0; = SQRT(2)*(IF((2*p0275-1)<0;-1;IF((2*p0275-1)>0;1;0))*SQRT(SQRT((2/(pi()*0.140012289)+LN(1-(2*p0275-1)^2)/2)^2-LN(1-(2*p0275-1)^2)/0.140012289)-(2/(pi()*0.140012289)+LN(1-(2*p0275-1)^2)/2)))
- p1942: 0
- p3433: 0; = p3376*p1239
- p3294: 0.279
- p1089: 9.29266e-5; = IF(p1071=0;p1083*p0001/(p0818*p0002);0)
- p2576: 4.06082e-6; = p2380*p1073
- p5063: 1.13502e-7; = p1890*p3483
- p2141: 1.67363e-7; = p2015*p2069*p2103/(p0818*1000)
- p3449: 0; = p3373*p1240
- p2601: 0; = p2405*p1014
- p0243: 13.482
- p2572: 1.61347e-5; = p2376*p1073
- p0037: 97.729
- p3035: 5.42801e-5; = p2254*p1023
- p3038: 3.83964e-5; = p2257*p1023
- p0476: 0; = SQRT(2)*(IF((2*p0344-1)<0;-1;IF((2*p0344-1)>0;1;0))*SQRT(SQRT((2/(pi()*0.140012289)+LN(1-(2*p0344-1)^2)/2)^2-LN(1-(2*p0344-1)^2)/0.140012289)-(2/(pi()*0.140012289)+LN(1-(2*p0344-1)^2)/2)))
- p2166: 0.321358; = p2165*p0824
- p4238: 7.66804e-7; = p1889*p3479
- p1684: 0.698317
- p1667: 0
- p1241: 0.41187; = if(p1232>0;0;IF(p1234+p1238+p1239+p1240=1;0;1-(p1234+p1238+p1239+p1240)))
- p0131: 71.394
- p2734: 3.86273e-5; = p2343*(p1078+p1080)
- p3207: 0; = p2426*p1082
- p2847: 1.0588e-5; = p2261*(p1079+p1081)
- p2375: 2.11321e-5; = p2229*p2204
- p1140: 8.4929e-7; = if(p1121=0;p1134*p0001/(p0818*p0002);0)
- p1835: 0
- p0440: 0; = SQRT(2)*(IF((2*p0308-1)<0;-1;IF((2*p0308-1)>0;1;0))*SQRT(SQRT((2/(pi()*0.140012289)+LN(1-(2*p0308-1)^2)/2)^2-LN(1-(2*p0308-1)^2)/0.140012289)-(2/(pi()*0.140012289)+LN(1-(2*p0308-1)^2)/2)))
- p3312: 0; = if(and(p1232=0;p3253<>0);p3261*p3277*(p3298*p3290+(1-p3298)*p3294);0)
- p0591: 0; = IF(p0327<0.5;-SQRT(p0007*EXP(p0459^2*p0008)-p0007);SQRT(p0007*EXP(p0459^2*p0008)-p0007))
- p2418: 0; = p2235*p2208
- p1969: 290000; = p0803
- p3130: 0; = p2349*p1082
- p0413: 0; = SQRT(2)*(IF((2*p0281-1)<0;-1;IF((2*p0281-1)>0;1;0))*SQRT(SQRT((2/(pi()*0.140012289)+LN(1-(2*p0281-1)^2)/2)^2-LN(1-(2*p0281-1)^2)/0.140012289)-(2/(pi()*0.140012289)+LN(1-(2*p0281-1)^2)/2)))
- p0317: 0.5
- p0379: 0.5
- p2815: 0; = p2424*(p1078+p1080)
- p3215: 0.450791; = p1222*3*15.9994/100.0869
- p1023: 0.11313; = IF(p1012=0;IF(p1014+p1019+p1020+p1021+p1022=1;0;1-(p1014+p1019+p1020+p1021+p1022));0)
- p2739: 1.64809e-6; = p2348*(p1078+p1080)
- p1663: 0.69001
- p0058: 2.864
- p2966: 5.8358e-7; = p2380*(p1079+p1081)
- p1673: 0
- p3981: 1.39764e-6; = p1838*p3478
- p0396: 0.5
- p1801: 0
- p2106: 0.856281
- p3019: 2.0328e-5; = p2238*p1023
- p3627: 1.5035e-7; = p1896*p3476
- p3121: 0; = p2340*p1082
- p4288: 4.95891e-8; = p1939*p3479
- p1363: 7497
- p2481: 6.25441e-5; = p2285*p1014
- p3257: 0.849747
- p2203: 0.00342703; = p1070-p2200-p2201-p2202
- p4167: 1.98356e-8; = p1818*p3479
- p0196: 35.991
- p2105: 0.888194
- p2606: 0; = p2410*p1014
- p2098: 0.856281
- p3541: 2.73851e-7; = p1810*p3476
- p2017: 2.50751e7; = p2015*p0898
- p3300: 0; = if(p1293+p1294+p1295+p1296=0;0;p1293/(p1293+p1294+p1295+p1296))
- p2087: 0.856281
- p3358: 4.83251e6; = if(p1232=0;p3308+p3319+p3330+p3341+p3352;0)
- p2419: 0; = p2235*p2209
- p2665: 0; = p2274*(p1128+p1130)
- p2692: 3.43247e-6; = p2301*(p1078+p1080)
- p2036: 5.66437e-6; = p2015*p2030*(1-p2032)/(p0818*1000)
- p0705: 61.524; = p0045*(1+p0573*p0177/100)
- p3366: 0.00149294; = if(p1232=0;p3244*p3360/p0818;0)
- p2398: 0; = p2234*p2187
- p0703: 8498.81; = p0043*(1+p0571*p0175/100)
- p1658: 0
- p2765: 2.90826e-5; = p2374*(p1019+p1021)
- p0974: 0.5
- p2772: 7.16119e-8; = p2381*(p1078+p1080)
- p1200: 0.84
- p1877: 0
- p1725: 0
- p1248: 2.19281e-6; = if(p1232>0;0;p1243*p0001/(p0818*p0002))
- p2367: 0.00244727; = p2225*p2196
- p3251: 1.78622e9; = p1252-(p3252+p3253+p3254+p3255+p3256)
- p0887: 257.941; = 1000*p0886*p0001*p0003*p0004/(p0818*p0002)
- p3422: 0; = p3365*p1239
- p0844: 0.405295
- p2856: 2.391e-7; = p2270*(p1079+p1081)
- p1760: 0
- p3415: 0; = p3377*p1238
- p4443: 0; = p1888*p3480
- p1722: 0.728757
- p0334: 0.5
- p2573: 5.22482e-6; = p2377*p1073
- p2579: 2.55277e-8; = p2383*p1073
- p1622: 0
- p2900: 4.24363e-7; = p2314*(p1129+p1131)
- p2873: 0.00102834; = p2287*(p1020+p1022)
- p0984: 0; = if(p0886=0;0;min(1;(p0699*p0698*1000*p0701/100)/p0886))
- p0849: 0.133628
- p2820: 0; = p2429*(p1128+p1130)
- p3327: 0; = if(and(p1232=0;p3255<>0);1-(p3323+p3324+p3325+p3326);0)
- p3096: 7.13319e-5; = p2315*p1023
- p3419: 0; = p3362*p1239
- p3021: 6.63582e-6; = p2240*p1023
- p3412: 0; = p3374*p1238
- p1752: 0
- p2779: 3.58605e-7; = p2388*(p1078+p1080)
- p2125: 1.20021e-6; = p2015*p2053*p2087/(p0818*1000)
- p3201: 0; = p2420*p1082
- p0346: 0.5
- p0757: 6.236; = p0097*(1+p0625*p0229/100)
- p2379: 1.06372e-5; = p2229*p2208
- p3185: 0; = p2404*p1023
- p2662: 6.09035e-7; = p2271*(p1078+p1080)
- p0517: 0; = SQRT(2)*(IF((2*p0385-1)<0;-1;IF((2*p0385-1)>0;1;0))*SQRT(SQRT((2/(pi()*0.140012289)+LN(1-(2*p0385-1)^2)/2)^2-LN(1-(2*p0385-1)^2)/0.140012289)-(2/(pi()*0.140012289)+LN(1-(2*p0385-1)^2)/2)))
- p0650: 0; = IF(p0386<0.5;-SQRT(p0007*EXP(p0518^2*p0008)-p0007);SQRT(p0007*EXP(p0518^2*p0008)-p0007))
- p0246: 5.494
- p2971: 2.58038e-7; = p2385*(p1079+p1081)
- p2736: 4.49081e-7; = p2345*(p1078+p1080)
- p1624: 0
- p5015: 5.14306e-8; = p1842*p3483
- p1668: 0
- p1789: 0
- p3197: 0; = p2416*p1082
- p0516: 0; = SQRT(2)*(IF((2*p0384-1)<0;-1;IF((2*p0384-1)>0;1;0))*SQRT(SQRT((2/(pi()*0.140012289)+LN(1-(2*p0384-1)^2)/2)^2-LN(1-(2*p0384-1)^2)/0.140012289)-(2/(pi()*0.140012289)+LN(1-(2*p0384-1)^2)/2)))
- p1910: 0
- p3146: 0.000130658; = p2365*p1023
- p2393: 0; = p2234*p2182
- p0874: 0; = p0865*p0856
- p3464: 3.45274e-5; = p3369*p1241
- p0896: 0.443532
- p2835: 3.30022e-5; = p2249*(p1020+p1022)
- p2800: 0; = p2409*(p1019+p1021)
- p1636: 0
- p1634: 0.816012
- p2147: 5.7274e-8; = p2015*p2075*p2109/(p0818*1000)
- p4307: 1.58272e-6; = p1962*p3479
- p2015: 5.4663e7; = p0830*p2011*p2013
- p2325: 9.48721e-5; = p2224*p2192
- p0797: 34.697; = p0137*(1+p0665*p0269/100)
- p1402: 51
- p4112: 1.35196e-7; = p1763*p3479
- p4649: 1.11975e-7; = p1888*p3481
- p1283: 0; = p1277*p1252/p0818
- p2854: 4.38236e-7; = p2268*(p1079+p1081)
- p1120: 0.00238132; = IF(p1071=0;p1110/(p1115*p0818);0)
- p3346: 0.0178625; = if(and(p1232=0;p3256<>0);p3274*(p3281*(p3285*p1256+p3286*(p1253+p1257)+p1258*p3288));0)
- p0617: 0; = IF(p0353<0.5;-SQRT(p0007*EXP(p0485^2*p0008)-p0007);SQRT(p0007*EXP(p0485^2*p0008)-p0007))
- p5337: 8.8535e-7; = p1962*p3484
- p3741: 1.39014e-9; = p1804*p3477
- p1285: 0; = p1281*p1252/p0818
- p1247: 0; = if(p1232>0;0;p1242*p0001/(p0818*p0002))
- p0141: 85.949
- p1601: 0
- p2711: 7.36318e-7; = p2320*(p1019+p1021)
- p1260: 0; = if(p1232>0;0;p0731/100)
- p3270: 0.0747083
- p2575: 8.9799e-6; = p2379*p1073
- p4318: 0; = p1763*p3480
- p2386: 8.02632e-6; = p2229*p2215
- p2111: 0.856281
- p2154: 1.22019e-7; = p2015*p2082*p2116/(p0818*1000)
- p0070: 37.527
- p1176: 1158.58; = p1175*p0801
- p0533: 0; = SQRT(2)*(IF((2*p0401-1)<0;-1;IF((2*p0401-1)>0;1;0))*SQRT(SQRT((2/(pi()*0.140012289)+LN(1-(2*p0401-1)^2)/2)^2-LN(1-(2*p0401-1)^2)/0.140012289)-(2/(pi()*0.140012289)+LN(1-(2*p0401-1)^2)/2)))
- p1691: 0
- p0080: 96.003
- p0484: 0; = SQRT(2)*(IF((2*p0352-1)<0;-1;IF((2*p0352-1)>0;1;0))*SQRT(SQRT((2/(pi()*0.140012289)+LN(1-(2*p0352-1)^2)/2)^2-LN(1-(2*p0352-1)^2)/0.140012289)-(2/(pi()*0.140012289)+LN(1-(2*p0352-1)^2)/2)))
- p2590: 0; = p2394*p1014
- p2422: 0; = p2235*p2212
- p1657: 0
- p2199: 3.48894e-5; = p1069-p2197-p2198
- p0918: 0.213507; = p0680*1000/p0801
- p3340: 7.88706e6; = if(and(p1232=0;p3254<>0);p3254*(p3270-p3335)/p3338;0)
- p3451: 0; = p3375*p1240
- p2369: 2.58925e-6; = p2225*p2198
- p2924: 3.09278e-5; = p2338*(p1079+p1081)
- p0800: 22.214; = p0140*(1+p0668*p0272/100)
- p1836: 0
- p0226: 10.632
- p1085: 409479; = IF(p1071=0;p1079*(p0710/100)*p0703*1000;0)
- p0128: 5.768
- p0891: 226512; = IF(p3251=0;0;62.4*6272640/(12*12*12))
- p3440: 0; = p3364*p1240
- p1130: 0; = if(p1121=0;IF(p1123+p1128+p1129=1;0;IF(p1123+p1128+p1129+p1126>1;1-(p1123+p1128+p1129);p1126));0)
- p0412: 0; = SQRT(2)*(IF((2*p0280-1)<0;-1;IF((2*p0280-1)>0;1;0))*SQRT(SQRT((2/(pi()*0.140012289)+LN(1-(2*p0280-1)^2)/2)^2-LN(1-(2*p0280-1)^2)/0.140012289)-(2/(pi()*0.140012289)+LN(1-(2*p0280-1)^2)/2)))
- p1625: 0
- p4364: 0; = p1809*p3480
- p2086: 0.0617647
- p2533: 0.000664585; = p2337*p1073
- p0026: 5845.27
- p0498: 0; = SQRT(2)*(IF((2*p0366-1)<0;-1;IF((2*p0366-1)>0;1;0))*SQRT(SQRT((2/(pi()*0.140012289)+LN(1-(2*p0366-1)^2)/2)^2-LN(1-(2*p0366-1)^2)/0.140012289)-(2/(pi()*0.140012289)+LN(1-(2*p0366-1)^2)/2)))
- p2588: 0; = p2392*p1123
- p1090: 3.79544e-6; = IF(p1071=0;p1084*p0001/(p0818*p0002);0)
- p1988: 750
- p1046: 0.024056; = IF(p1012=0;IF(p1037+p1044+p1045=1;0;IF(p1037+p1044+p1045+p1040>1;1-(p1037+p1044+p1045);p1040));0)
- p2782: 0; = p2391*(p1128+p1130)
- p2874: 0.000220437; = p2288*(p1020+p1022)
- p0011: 2828.3
- p0778: 2.481; = p0118*(1+p0646*p0250/100)
- p2784: 0; = p2393*(p1019+p1021)
- p0926: 0.146538; = IF(p0918+p0923+p0924+p0925=1;0;IF(p0918+p0923+p0924+p0925+p0922>1;1-(p0918+p0923+p0924+p0925);p0922))
- p3261: 0.908439
- p1665: 0
- p3438: 0; = p3362*p1240
- p1893: 0
- p2338: 0.000254928; = p2228*p2206
- p2546: 0.000220096; = p2350*p1123
- p0930: 1.89628e6; = p0801*p0924
- p5142: 7.56262e-8; = p1763*p3484
- p2545: 0.000361648; = p2349*p1073
- p0384: 0.5
- p2584: 8.78001e-6; = p2388*p1073
- p0734: 0
- p1784: 0
- p1905: 0
- p2996: 0; = p2410*(p1020+p1022)
- p4081: 4.47557e-7; = p1938*p3478
- p2702: 1.02776e-6; = p2311*(p1128+p1130)
- p2689: 6.1673e-6; = p2298*(p1078+p1080)
- p1693: 0
- p3467: 0.000246375; = p3372*p1241
- p1094: 0; = IF(p1071=0;p1088*p0001/(p0818*p0002);0)
- p1778: 0
- p0694: 3710.02; = p0034*(1+p0562*p0166/100)
- p1819: 7.79919e-6; = p1411*1000/p0818
- p1714: 0
- p3109: 0.000129442; = p2328*p1023
- p3000: 0; = p2414*(p1079+p1081)
- p1021: 0.05201; = IF(p1012=0;IF(p1014+p1019+p1020=1;0;IF(p1014+p1019+p1020+p1017>1;1-(p1014+p1019+p1020);p1017));0)
- p3344: 1.84054e6; = if(and(p1232=0;p3254<>0);p3254-(p3339+p3340+p3341+p3342+p3343);0)
- p2343: 0.00112028; = p2228*p2211
- p3243: 3.60088e-10; = p3234*p1188*p3239/p0818
- p3227: 0.000198697; = p3223*p1229
- p0877: 0.109463; = p0876*p0001*p0003/(p0818*p0002)
- p1102: 0.0330733; = IF(p1071=0;IF(p1096+p1101=1;0;IF(p1096+p1101+p1098>1;1-(p1096+p1101);p1098));0)
- p4554: 3.27927e-7; = p1793*p3481
- p0841: 0.194891
- p0051: 84.42
- p0006: 15
- p1993: 400
- p3162: 0; = p2381*p1082
- p3010: 0; = p2424*(p1079+p1081)
- p4599: 2.3728e-7; = p1838*p3481
- p2486: 3.93486e-6; = p2290*p1014
- p0510: 0; = SQRT(2)*(IF((2*p0378-1)<0;-1;IF((2*p0378-1)>0;1;0))*SQRT(SQRT((2/(pi()*0.140012289)+LN(1-(2*p0378-1)^2)/2)^2-LN(1-(2*p0378-1)^2)/0.140012289)-(2/(pi()*0.140012289)+LN(1-(2*p0378-1)^2)/2)))
- p2178: 0.0690604; = (p0895*p0831/(1-p0831))/(p0818)
- p2176: 0.00189747; = p0895*p0913/p0818
- p1593: 0
- p1874: 0
- p0169: 1.538
- p2928: 1.03787e-5; = p2342*(p1079+p1081)
- p0817: 0
- p0260: 55.318
- p3619: 4.51049e-7; = p1888*p3476
- p2179: 0.00247471; = p0970+p0971+p0972
- p0871: 0.752995; = p0870*p0001*p0003/(p0818*p0002)
- p3319: 0; = if(and(p1232=0;p3253<>0);p3253*(p3263-p3314)/p3316;0)
- p2747: 1.45921e-6; = p2356*(p1019+p1021)
- p4237: 4.38472e-8; = p1888*p3479
- p1075: 0.05843; = IF(p1071=0;p0713/100;0)
- p4216: 7.30787e-9; = p1867*p3479
- p1700: 0.918695
- p2879: 0.000703845; = p2293*(p1020+p1022)
- p0477: 0; = SQRT(2)*(IF((2*p0345-1)<0;-1;IF((2*p0345-1)>0;1;0))*SQRT(SQRT((2/(pi()*0.140012289)+LN(1-(2*p0345-1)^2)/2)^2-LN(1-(2*p0345-1)^2)/0.140012289)-(2/(pi()*0.140012289)+LN(1-(2*p0345-1)^2)/2)))
- p1333: 0.000202651; = p1332*p0001/(p0818*p0002)
- p4039: 2.19853e-7; = p1896*p3478
- p1744: 0
- p3263: 0.0214527
- p2921: 5.7416e-5; = p2335*(p1020+p1022)
- p2198: 1.58689e-5; = 22.98976928*p2197/14.0067
- p3088: 0; = p2307*p1082
- p3262: 0.0787162
- p2717: 2.8084e-5; = p2326*(p1019+p1021)
- p0966: 0.76989; = if(p0683=0;0;IF(p0684/100+p0965=1;0;1-(p0684/100+p0965)))
- p0995: 9.84765e-8; = p0991*p0001*p0004/(p0818*p0002)
- p0919: 0.27604; = p0678*1000/p0801
- p2849: 9.91118e-7; = p2263*(p1079+p1081)
- p0669: 42.2365; = p0009*(1+p0537*p0141/100)
- p1931: 0
- p1278: 0
- p1183: 0.000133511; = p0801*p0001/(p0818*p0002)
- p2109: 0.826583
- p1868: 0
- p3408: 1.43136e-5; = p3370*p1238
- p3032: 1.08323e-7; = p2251*p1023
- p2296: 0.00226702; = p2223*p2203
- p3414: 0; = p3376*p1238
- p3034: 3.90901e-7; = p2253*p1023
- p3702: 1.08709e-6; = p1765*p3477
- p1941: 0
- p2226: 0.0318956; = if(p0774*p0778+p0775*p0779+p0776*p0780+p0777*p0781=0;0;p0778*p0774/(p0774*p0778+p0775*p0779+p0776*p0780+p0777*p0781))
- p2490: 0.000845331; = p2294*p1014
- p3391: 0; = p3372*p1234
- p4616: 2.42613e-7; = p1855*p3481
- p3111: 1.36952e-7; = p2330*p1023
- p0943: 0; = if(and(p0683=0;p0949=0);p0937;0)
- p2983: 0; = p2397*(p1020+p1022)
- p3063: 0.000177669; = p2282*p1023
- p1289: 0
- p4289: 3.52344e-7; = p1940*p3479
- p2449: 2.12585e-6; = p2253*p1014
- p0742: 96.093; = p0082*(1+p0610*p0214/100)
- p2334: 2.28043e-5; = p2224*p2202
- p2397: 0; = p2234*p2186
- p2776: 7.33362e-8; = p2385*(p1078+p1080)
- p1022: 0.15128; = IF(p1012=0;IF(p1014+p1019+p1020+p1021=1;0;IF(p1014+p1019+p1020+p1021+p1018>1;1-(p1014+p1019+p1020+p1021);p1018));0)
- p0638: 0; = IF(p0374<0.5;-SQRT(p0007*EXP(p0506^2*p0008)-p0007);SQRT(p0007*EXP(p0506^2*p0008)-p0007))
- p2206: 0.000329549; = 9*1.00794*p2204/30.973762
- p2330: 1.21057e-6; = p2224*p2198
- p0086: 31.062
- p3139: 2.38019e-5; = p2358*p1023
- p1133: 1.64463e6; = if(p1121=0;p1123*(p0716/100)*p0703*1000;0)
- p1793: 4.33092e-6; = p1385*1000/p0818
- p2777: 2.76747e-7; = p2386*(p1078+p1080)
- p1688: 0
- p2463: 4.53353e-7; = p2267*p1073
- p3292: 0.258
- p2565: 1.59301e-6; = p2369*p1014
- p3164: 0; = p2383*p1082
- p0388: 0.5
- p4032: 1.15344e-5; = p1889*p3478
- p0996: 0; = if(p0888=0;0;if((p0691*p0690*1000*p0692/100)/p0888>1;1;(p0691*p0690*1000*p0692/100)/p0888))
- p3496: 1.25972e-5; = p1765*p3476
- p2024: 0.748682
- p2655: 1.21621e-7; = p2264*(p1078+p1080)
- p0652: 0; = IF(p0388<0.5;-SQRT(p0007*EXP(p0520^2*p0008)-p0007);SQRT(p0007*EXP(p0520^2*p0008)-p0007))
- p1820: 0
- p3036: 2.32711e-5; = p2255*p1023
- p0845: 0.5
- p2197: 9.66823e-6; = p1055/p0818
- p3481: 0.0757175; = if(p1328+p1330+p1332+p1334+p1336+p1338+p1340+p1342+p1344=0;0;p1338/(p1328+p1330+p1332+p1334+p1336+p1338+p1340+p1342+p1344))
- p2631: 3.05073e-6; = p2240*(p1019+p1021)
- p0536: 0; = SQRT(2)*(IF((2*p0404-1)<0;-1;IF((2*p0404-1)>0;1;0))*SQRT(SQRT((2/(pi()*0.140012289)+LN(1-(2*p0404-1)^2)/2)^2-LN(1-(2*p0404-1)^2)/0.140012289)-(2/(pi()*0.140012289)+LN(1-(2*p0404-1)^2)/2)))
- p2448: 9.6691e-7; = p2252*p1014
- p3236: 0.0140975
- p0258: 13.442
- p2697: 1.02034e-7; = p2306*(p1078+p1080)
- p1631: 0
- p2946: 8.50738e-5; = p2360*(p1020+p1022)
- p2260: 1.05112e-5; = p2226*p2206
- p4971: 1.38331e-7; = p1798*p3483
- p2170: 0.00488242; = p2166*(p0913)
- p3052: 0; = p2271*p1082
- p1672: 0
- p3338: 0.742084; = if(and(p1232=0;p3254<>0);1-(p3334+p3335+p3336+p3337);0)
- p1899: 0
- p0361: 0.5
- p1845: 0
- p0740: 96.003; = p0080*(1+p0608*p0212/100)
- p0864: 0.332741; = IF(p0858=1;0;IF(p0858+p0859>1;1-p0858;p0859))
- p1238: 0.58813; = if(p1232>0;0;IF(p1234=1;0;IF(p1234+p1235>1;1-p1234;p1235)))
- p2888: 5.46152e-6; = p2302*(p1079+p1081)
- p0404: 0.5
- p0185: 34.171
- p1117: 0.000540628; = IF(p1071=0;p1107/(p1112*p0818);0)
- p0687: 13.265; = p0027*(1+p0555*p0159/100)
- p0482: 0; = SQRT(2)*(IF((2*p0350-1)<0;-1;IF((2*p0350-1)>0;1;0))*SQRT(SQRT((2/(pi()*0.140012289)+LN(1-(2*p0350-1)^2)/2)^2-LN(1-(2*p0350-1)^2)/0.140012289)-(2/(pi()*0.140012289)+LN(1-(2*p0350-1)^2)/2)))
- p3009: 0; = p2423*(p1079+p1081)
- p2634: 1.22286e-5; = p2243*(p1019+p1021)
- p2608: 0; = p2412*p1014
- p2351: 0.000356045; = p2232*p2219
- p4628: 1.86625e-8; = p1867*p3481
- p1987: 400
- p1043: 0.218296
- p2839: 7.58858e-7; = p2253*(p1020+p1022)
- p4494: 0; = p1939*p3480
- p3302: 0.0114097; = if(and(p1232=0;p3252<>0);p3258*(p3278*(p3282*p1256+p3286*(p1253+p1257)+p1258*p3288+p3297*p3287));0)
- p2341: 0.000198134; = p2228*p2209
- p3252: 9.57594e7; = p1252*(p1267*(1-p3247)+p1270*(1-p3248)+p1271*(1-p3249)+p1272*(1-p3250))
- p3043: 0; = p2262*p1082
- p3007: 0; = p2421*(p1079+p1081)
- p2157: 4.03627e-8; = p2015*p2086*p2119/(p0818*1000)
- p0167: 6.441
- p4687: 1.19973e-8; = p1926*p3481
- p2574: 4.33813e-5; = p2378*p1073
- p1319: 1.03801; = IF(((p0745*1000*p0746/100)+(p0754*1000*p0755/100))/p0801<0;0;((p0745*1000*p0746/100)+(p0754*1000*p0755/100))/p0801)
- p1940: 1.18836e-5; = p1532*1000/p0818
- p2191: 0.000153675; = 8*1.00794*p2189/(2*14.0067)
- p0079: 2.238
- p2556: 0.000238324; = p2360*p1014
- p0126: 5.624
- p1095: 2.43158e8; = IF(p1071=0;p0797*p0702*1000*p0798/100;0)
- p2937: 2.77928e-5; = p2351*(p1129+p1131)
- p2207: 0.00273622; = p1119-p2205-p2204-p2206
- p1099: 0.602279
- p2896: 1.18085e-5; = p2310*(p1079+p1081)
- p0907: 0.00295453
- p3595: 6.44356e-8; = p1864*p3476
- p0347: 0.5
- p0042: 8498.81
- p0847: 0.0112525
- p5295: 1.45996e-9; = p1916*p3484
- p2063: 2.01468
- p0968: 1.17808e7; = p0965*p0964*p0683*p0682*1000
- p5181: 4.61349e-8; = p1802*p3484
- p2974: 1.26178e-6; = p2388*(p1079+p1081)
- p2855: 1.65376e-6; = p2269*(p1079+p1081)
- p1984: 30
- p1865: 0
- p2912: 0.000118589; = p2326*(p1020+p1022)
- p3392: 0; = p3373*p1234
- p1139: 2.58325e-5; = if(p1121=0;p1133*p0001/(p0818*p0002);0)
- p2706: 3.27939e-5; = p2315*(p1019+p1021)
- p2424: 0; = p2235*p2214
- p2124: 0.263965
- p0244: 19.553
- p3299: 0; = if(p1303+p1304+p1305+p1306=0;0;p1303/(p1303+p1304+p1305+p1306))
- p1832: 0
- p4101: 2.38076e-5; = p1962*p3478
- p3006: 0; = p2420*(p1079+p1081)
- p4603: 3.8658e-8; = p1842*p3481
- p5283: 4.96388e-9; = p1904*p3484
- p2436: 3.60879e-5; = p2240*p1014
- p3413: 0; = p3375*p1238
- p3189: 0; = p2408*p1023
- p3284: 0.275
- p0834: 0.00038
- p0049: 15.128
- p1230: 0.5
- p1330: 761404; = p1320*p0801
- p2399: 0; = p2234*p2188
- p3256: 6.27704e7; = p1252*(p1307*(1-p3247)+p1310*(1-p3248)+p1311*(1-p3249)+p1312*(1-p3250))
- p2604: 0; = p2408*p1014
- p0631: 0; = IF(p0367<0.5;-SQRT(p0007*EXP(p0499^2*p0008)-p0007);SQRT(p0007*EXP(p0499^2*p0008)-p0007))
- p2496: 0.00040599; = p2300*p1073
- p0183: 3.468
- p1430: 178
- p1242: 0; = if(p1232>0;0;p1234*(p0725/100)*p0723*1000)
- p2731: 1.51072e-5; = p2340*(p1078+p1080)
- p2507: 3.12609e-5; = p2311*p1123
- p0868: 0; = IF(p0858+p0864+p0865+p0866+p0867=1;0;IF(p0858+p0864+p0865+p0866+p0867+p0863>1;1-(p0858+p0864+p0865+p0866+p0867);p0863))
- p2699: 2.58998e-6; = p2308*(p1078+p1080)
- p2119: 0.679049
- p2167: 0.147414; = p2166*(p0898)
- p1168: 3.2232e-7; = p1164*p1167/p0818
- p1906: 0
- p0150: 0
- p2876: 1.40461e-6; = p2290*(p1020+p1022)
- p1235: 0.58813; = if(p1232>0;0;p0727/100)
- p0824: 0.643929
- p2802: 0; = p2411*(p1019+p1021)
- p1390: 78
- p0748: 54.136; = p0088*(1+p0616*p0220/100)
- p1530: 57
- p1881: 0
- p3482: 0; = if(p1328+p1330+p1332+p1334+p1336+p1338+p1340+p1342+p1344=0;0;p1340/(p1328+p1330+p1332+p1334+p1336+p1338+p1340+p1342+p1344))
- p0636: 0; = IF(p0372<0.5;-SQRT(p0007*EXP(p0504^2*p0008)-p0007);SQRT(p0007*EXP(p0504^2*p0008)-p0007))
- p0595: 0; = IF(p0331<0.5;-SQRT(p0007*EXP(p0463^2*p0008)-p0007);SQRT(p0007*EXP(p0463^2*p0008)-p0007))
- p2165: 0.499058; = (p0833-p2014)/p0818-p0839
- p0053: 5.843
- p1034: 1.99805e-5; = IF(p1012=0;p1028*p0001/(p0818*p0002);0)
- p2744: 1.09621e-6; = p2353*(p1128+p1130)
- p2376: 1.91124e-5; = p2229*p2205
- p2602: 0; = p2406*p1014
- p3342: 4.9272e6; = if(and(p1232=0;p3254<>0);p3254*(p3272-p3337)/p3338;0)
- p0876: 696900; = p0866*p0856
- p3144: 2.83668e-6; = p2363*p1023
- p0750: 0
- p1565: 0
- p2268: 3.61224e-6; = p2226*p2214
- p1630: 0
- p3273: 0.753577
- p0711: 84.42; = p0051*(1+p0579*p0183/100)
- p3082: 0; = p2301*p1082
- p1707: 0
- p2769: 1.77184e-6; = p2378*(p1078+p1080)
- p2700: 3.74458e-7; = p2309*(p1078+p1080)
- p1805: 0
- p1010: 1.28844e7; = p0890
- p0531: 0; = SQRT(2)*(IF((2*p0399-1)<0;-1;IF((2*p0399-1)>0;1;0))*SQRT(SQRT((2/(pi()*0.140012289)+LN(1-(2*p0399-1)^2)/2)^2-LN(1-(2*p0399-1)^2)/0.140012289)-(2/(pi()*0.140012289)+LN(1-(2*p0399-1)^2)/2)))
- p1586: 0
- p0714: 0
- p2645: 2.49545e-5; = p2254*(p1019+p1021)
- p2826: 1.28822e-5; = p2240*(p1020+p1022)
- p1823: 0
- p3424: 0; = p3367*p1239
- p1215: 0; = IF(p1214=0;0;(p1214-1.5)/(p1214-1)^2)
- p0493: 0; = SQRT(2)*(IF((2*p0361-1)<0;-1;IF((2*p0361-1)>0;1;0))*SQRT(SQRT((2/(pi()*0.140012289)+LN(1-(2*p0361-1)^2)/2)^2-LN(1-(2*p0361-1)^2)/0.140012289)-(2/(pi()*0.140012289)+LN(1-(2*p0361-1)^2)/2)))
- p1329: 0.000138586; = p1328*p0001/(p0818*p0002)
- p3191: 0; = p2410*p1023
- p2920: 5.00828e-6; = p2334*(p1020+p1022)
- p2628: 4.2574e-5; = p2237*(p1019+p1021)
- p1280: 0; = IF(p1277=p1263;0;IF(p1277+p1278>p1263;p1263-p1277;p1278))
- p0319: 0.5
- p1860: 0
- p3841: 7.87749e-9; = p1904*p3477
- p0050: 82.459
- p1682: 0
- p0787: 0
- p2610: 0; = p2414*p1073
- p1640: 0
- p1076: 0; = IF(p1071=0;p0714/100;0)
- p2244: 5.28738e-5; = p2222*p2189
- p2033: 2.22603e-6; = p2015*p2029*p2031/(p0818*1000)
- p0699: 0
- p3483: 0.100734; = if(p1328+p1330+p1332+p1334+p1336+p1338+p1340+p1342+p1344=0;0;p1342/(p1328+p1330+p1332+p1334+p1336+p1338+p1340+p1342+p1344))
- p3115: 2.57985e-6; = p2334*p1023
- p1394: 158
- p0819: 0.142956; = p0808*p0809/p0818
- p1332: 1.29018e7; = p1321*p0801
- p0383: 0.5
- p2366: 0.000247573; = p2225*p2195
- p1126: 0; = if(p1121=0;p0720/100;0)
- p0940: 0; = if(and(p0683=0;p0946=0);p0934;0)
- p2830: 1.16122e-5; = p2244*(p1020+p1022)
- p1960: 3032.09; = IF(p1959-p1958<0;0;p1959-p1958)
- p2313: 3.12841e-6; = p2231*p2220
- p3450: 0; = p3374*p1240
- p2724: 8.24091e-6; = p2333*(p1019+p1021)
- p3290: 0.195
- p0195: 0
- p2373: 4.87755e-5; = p2225*p2202
- p3357: 1.66457e7; = if(p1232=0;p3307+p3318+p3329+p3340+p3351;0)
- p3080: 0; = p2299*p1082
- p0802: 8.05e6
- p1122: 0; = p1121*p0001/(p0818*p0002)
- p0097: 6.236
- p3222: 0.224242; = IF(p3216=0;0;p1223*40.078/100.0869)
- p1901: 0
- p2961: 2.56375e-6; = p2375*(p1079+p1081)
- p0385: 0.5
- p0289: 0.5
- p4776: 0; = p1809*p3482
- p1123: 0.87113; = if(p1121=0;p0717/100;0)
- p1766: 0
- p2899: 2.44204e-7; = p2313*(p1129+p1131)
- p2182: 0.00826536; = p1050/p0818
- p2275: 0; = p2230*p2221
- p3176: 0; = p2395*p1023
- p1164: 36616.1; = p1163*p0801
- p3217: 0.00303003; = p3213*p1228
- p4559: 1.03977e-7; = p1798*p3481
- p0960: 0; = if(and(p0683>0;or(p0807=480;p0807=32;p0807=1;and(p0807=60;p0901<0.03)));p0936;0)
- p0717: 87.113; = p0057*(1+p0585*p0189/100)
- p2491: 0.000121662; = p2295*p1014
- p1950: 0
- p1701: 0
- p3437: 0; = p3380*p1239
- p0212: 2.634
- p2828: 4.03647e-6; = p2242*(p1020+p1022)
- p1927: 0
- p1596: 0
- p4720: 1.44366e-5; = p1963*p3481
- p4570: 1.27971e-7; = p1809*p3481
- p1732: 0
- p2139: 2.66564e-7; = p2015*p2067*p2101/(p0818*1000)
- p3863: 4.17043e-9; = p1926*p3477
- p3289: 0.05
- p0986: 0; = IF(p0982+p0985=1;0;IF(p0982+p0985+p0984>1;1-(p0982+p0985);p0984))
- p1791: 0
- p1703: 0
- p0870: 4.79395e6; = p0858*p0856
- p2980: 0; = p2394*(p1020+p1022)
- p3529: 4.18831e-7; = p1798*p3476
- p2696: 9.75767e-9; = p2305*(p1078+p1080)
- p0578: 0; = IF(p0314<0.5;-SQRT(p0007*EXP(p0446^2*p0008)-p0007);SQRT(p0007*EXP(p0446^2*p0008)-p0007))
- p0836: 6.78827e9; = p0831*p0835*p0801/(1-p0831)
- p0921: 0.140683; = p0679*1000/p0801
- p2519: 2.86813e-5; = p2323*p1014
- p3200: 0; = p2419*p1082
- p4563: 2.1062e-7; = p1802*p3481
- p1880: 0
- p3331: 0; = if(and(p1232=0;p3255<>0);p3255*(p3268-p3326)/p3327;0)
- p0399: 0.5
- p2211: 0.00144821; = p1120-p2209-p2208-p2210
- p2818: 0; = p2427*(p1078+p1080)
- p2370: 5.69274e-6; = p2225*p2199
- p2337: 0.000787237; = p2228*p2205
- p3379: 0; = if(p1232=0;p3246*p3361/p0818;0)
- p1995: 50
- p1711: 0
- p3226: 0.000351284; = p3222*p1229
- p3381: 0; = p3362*p1234
- p0818: 5.68008e10; = p0806*p0807
- p1669: 0
- p0692: 0
- p2625: 0; = p2429*p1123
- p2332: 0.000369582; = p2224*p2200
- p1681: 0
- p1912: 0
- p1304: 0; = p1300*p1252/p0818
- p2272: 0; = p2230*p2218
- p4147: 4.07153e-8; = p1798*p3479
- p2893: 2.41489e-6; = p2307*(p1079+p1081)
- p2276: 0.00546764; = p2223*p2182
- p2853: 6.51514e-8; = p2267*(p1079+p1081)
- p2474: 6.99817e-5; = p2278*p1014
- p3160: 0; = p2379*p1082
- p3041: 0; = p2260*p1082
- p0786: 5.624; = p0126*(1+p0654*p0258/100)
- p2616: 0; = p2420*p1073
- p3221: 0.146975; = IF(p3216=0;0;p1223*12.0107/100.0869+(1-p1224)*12.0107/84.3139)
- p2031: 0.465411
- p2116: 0.444424
- p0256: 21.767
- p1190: 6.95404e-8; = p1188/p0818
- p2107: 0.881623
- p1138: 41855.3; = if(p1121=0;p1132*(p0716/100)*p0703*1000;0)
- p2484: 0.00061753; = p2288*p1014
- p1825: 0
- p0981: 0; = p0978*p0001/(p0818*p0002)
- p2526: 7.44791e-7; = p2330*p1014
- p2322: 4.07276e-5; = p2224*p2189
- p3470: 0; = p3375*p1241
- p3241: 3.88277e-10; = p3234*p1188*p3236/p0818
- p1228: 0.0268613; = IF(p1221=0;0;p0801*p1212*2000/(p1222+p1221*p1225)/p0818)
- p3050: 0; = p2269*p1082
- p3150: 2.92922e-7; = p2369*p1023
- p1938: 1.00351e-6; = p1530*1000/p0818
- p2632: 6.64184e-6; = p2241*(p1019+p1021)
- p1811: 0
- p0773: 82.459; = p0113*(1+p0641*p0245/100)
- p1694: 0
- p3307: 4.21777e6; = if(and(p1232=0;p3252<>0);p3252*(p3258-p3302)/p3305;0)
- p1029: 951269; = IF(p1012=0;IF(p0801<p1023*(p0704/100)*p0703*1000;p0801;p1023*(p0704/100)*p0703*1000);0)
- p0312: 0.5
- p0784: 22.114; = p0124*(1+p0652*p0256/100)
- p1032: 9.02608e-6; = IF(p1012=0;p1026*p0001/(p0818*p0002);0)
- p2834: 0.000153956; = p2248*(p1020+p1022)
- p2073: 0.377647
- p0217: 6.624
- p2600: 0; = p2404*p1014
- p2468: 0; = p2272*p1123
- p0867: 0; = IF(p0858+p0864+p0865+p0866=1;0;IF(p0858+p0864+p0865+p0866+p0862>1;1-(p0858+p0864+p0865+p0866);p0862))
- p3359: 1.50601e7; = if(p1232=0;p3309+p3320+p3331+p3342+p3353;0)
- p0518: 0; = SQRT(2)*(IF((2*p0386-1)<0;-1;IF((2*p0386-1)>0;1;0))*SQRT(SQRT((2/(pi()*0.140012289)+LN(1-(2*p0386-1)^2)/2)^2-LN(1-(2*p0386-1)^2)/0.140012289)-(2/(pi()*0.140012289)+LN(1-(2*p0386-1)^2)/2)))
- p2559: 1.54269e-5; = p2363*p1014
- p0573: 0; = IF(p0309<0.5;-SQRT(p0007*EXP(p0441^2*p0008)-p0007);SQRT(p0007*EXP(p0441^2*p0008)-p0007))
- p2975: 0; = p2389*(p1129+p1131)
- p1572: 0
- p0759: 0
- p0698: 0
- p0402: 0.5
- p3435: 0; = p3378*p1239
- p0376: 0.5
- p2471: 0; = p2275*p1123
- p0281: 0.5
- p3363: 0.000209222; = if(p1232=0;p3244*p3357/p0818;0)
- p2230: 0; = if(p0783*p0787+p0784*p0788+p0785*p0789+p0786*p0790=0;0;p0787*p0783/(p0783*p0787+p0784*p0788+p0785*p0789+p0786*p0790))
- p1608: 0
- p1632: 0
- p3264: 0.0887032
- p2803: 0; = p2412*(p1019+p1021)
- p1648: 0
- p2930: 1.51109e-7; = p2344*(p1079+p1081)
- p0815: 0
- p3801: 5.56058e-9; = p1864*p3477
- p0016: 1896.29
- p3621: 3.43657e-7; = p1890*p3476
- p2187: 0.000185581; = 4*1.00794*p2186/(2*14.0067)
- p2831: 1.32916e-5; = p2245*(p1020+p1022)
- p1143: 0; = if(p1121=0;p1137*p0001/(p0818*p0002);0)
- p3135: 0.00015257; = p2354*p1023
- p2825: 3.73998e-6; = p2239*(p1020+p1022)
- p4701: 8.99799e-7; = p1940*p3481
- p0024: 14.63
- p3248: 0
- p2469: 0; = p2273*p1123
- p2591: 0; = p2395*p1014
- p4445: 0; = p1890*p3480
- p3569: 9.55795e-7; = p1838*p3476
- p0587: 0; = IF(p0323<0.5;-SQRT(p0007*EXP(p0455^2*p0008)-p0007);SQRT(p0007*EXP(p0455^2*p0008)-p0007))
- p2284: 0.000404249; = p2223*p2190
- p0057: 87.113
- p1985: 3.57419e9; = (if(p1057=0;0;p1050/p1057)+if(p1058=0;0;p1051/p1058)+if(p1059=0;0;p1052/p1059)+if(p1060=0;0;p1053/p1060)+if(p1061=0;0;p1054/p1061)+if(p1062=0;0;p1055/p1062)+if(p1063=0;0;p1056/p1063))*(1+p1157)
- p1933: 0
- p3059: 1.28682e-5; = p2278*p1023
- p2282: 0.00157048; = p2223*p2188
- p2798: 0; = p2407*(p1019+p1021)
- p0443: 0; = SQRT(2)*(IF((2*p0311-1)<0;-1;IF((2*p0311-1)>0;1;0))*SQRT(SQRT((2/(pi()*0.140012289)+LN(1-(2*p0311-1)^2)/2)^2-LN(1-(2*p0311-1)^2)/0.140012289)-(2/(pi()*0.140012289)+LN(1-(2*p0311-1)^2)/2)))
- p2791: 0; = p2400*(p1019+p1021)
- p2200: 0.0048447; = p1056/p0818
- p0045: 61.524
- p2102: 0.922577
- p2617: 0; = p2421*p1073
- p0890: 1.28844e7; = p0686*1000*p0687*p0885/100
- p0227: 27.508
- p0842: -0.303052
- p0359: 0.5
- p1604: 0.92902
- p1767: 1.17604e-5; = p1359*1000/p0818
- p0525: 0; = SQRT(2)*(IF((2*p0393-1)<0;-1;IF((2*p0393-1)>0;1;0))*SQRT(SQRT((2/(pi()*0.140012289)+LN(1-(2*p0393-1)^2)/2)^2-LN(1-(2*p0393-1)^2)/0.140012289)-(2/(pi()*0.140012289)+LN(1-(2*p0393-1)^2)/2)))
- p1204: 0.980791
- p1262: 0; = if(p1232>0;0;p0733/100)
- p0110: 70.939
- p3472: 0; = p3377*p1241
- p2701: 3.35606e-6; = p2310*(p1078+p1080)
- p4515: 2.19951e-7; = p1754*p3481
- p2259: 3.24593e-5; = p2226*p2205
- p2561: 0.000710561; = p2365*p1014
- p1105: 0.436421
- p2316: 0.000138409; = p2224*p2183
- p3157: 0; = p2376*p1082
- p2214: 0.000113252; = p1107/p0818
- p2958: 7.44295e-5; = p2372*(p1020+p1022)
- p1913: 0
- p1115: 0.237849
- p0830: 3.22449e10; = p0825*p0821*p0824
- p0667: 0; = IF(p0403<0.5;-SQRT(p0007*EXP(p0535^2*p0008)-p0007);SQRT(p0007*EXP(p0535^2*p0008)-p0007))
- p2898: 3.9475e-6; = p2312*(p1129+p1131)
- p1578: 0
- p0878: 0; = p0867*p0856
- p1642: 0
- p0760: 0
- p0633: 0; = IF(p0369<0.5;-SQRT(p0007*EXP(p0501^2*p0008)-p0007);SQRT(p0007*EXP(p0501^2*p0008)-p0007))
- p1501: 17
- p1059: 0.335
- p1197: 1.806
- p5318: 2.77393e-8; = p1939*p3484
- p4153: 1.56597e-9; = p1804*p3479
- p0831: 0.356071; = 1-p0824
- p1748: 0
- p1152: 0.415074
- p2933: 4.01088e-5; = p2347*(p1079+p1081)
- p2159: 1.71987e-6; = p2015*p2083*p2121/(p0818*1000)
- p2564: 9.70555e-7; = p2368*p1014
- p2501: 2.38905e-7; = p2305*p1073
- p3362: 0.00109191; = if(p1232=0;p3244*p3356/p0818;0)
- p1559: 0.792595
- p1898: 0
- p0326: 0.5
- p2013: 0.75
- p3985: 2.27705e-7; = p1842*p3478
- p1144: 6.57429e-7; = if(p1121=0;p1138*p0001/(p0818*p0002);0)
- p3044: 0; = p2263*p1082
- p1902: 0
- p0129: 88.4
- p3350: 1.95276e7; = if(and(p1232=0;p3256<>0);p3256*(p3273*p3277-p3345)/p3349;0)
- p1025: 0; = IF(p1012=0;p1019*(p0704/100)*p0703*1000;0)
- p0409: 0; = SQRT(2)*(IF((2*p0277-1)<0;-1;IF((2*p0277-1)>0;1;0))*SQRT(SQRT((2/(pi()*0.140012289)+LN(1-(2*p0277-1)^2)/2)^2-LN(1-(2*p0277-1)^2)/0.140012289)-(2/(pi()*0.140012289)+LN(1-(2*p0277-1)^2)/2)))
- p2047: 2.88709e-14; = p2015*p2045/(p0818*1000000000000)
- p0293: 0.5
- p1721: 0
- p2535: 0.00178687; = p2339*p1073
- p1600: 0.895638
- p1118: 0.000615578; = IF(p1071=0;p1108/(p1113*p0818);0)
- p2594: 0; = p2398*p1014
- p2740: 1.47709e-5; = p2349*(p1078+p1080)
- p0730: 37.527; = p0070*(1+p0598*p0202/100)
- p3064: 3.99541e-5; = p2283*p1023
- p3060: 4.43238e-5; = p2279*p1023
- p1552: 0
- p0677: 1245.57; = p0017*(1+p0545*p0149/100)
- p1041: 0.318938
- p1699: 0
- p2037: 2.3
- p0017: 1245.57
- p1316: 0.00884078; = p1312*p1252/p0818
- p2823: 0.000179775; = p2237*(p1020+p1022)
- p1343: 4.57718e-5; = p1342*p0001/(p0818*p0002)
- p3895: 1.40502e-6; = p1962*p3477
- p3336: 0.000977444; = IF(or(p3254=0;p1232>0);0;p3271*p3289)
- p1869: 0
- p0676: 1896.29; = p0016*(1+p0544*p0148/100)
- p1317: 0
- p3320: 0; = if(and(p1232=0;p3253<>0);p3253*(p3264-p3315)/p3316;0)
- p3188: 0; = p2407*p1023
- p0515: 0; = SQRT(2)*(IF((2*p0383-1)<0;-1;IF((2*p0383-1)>0;1;0))*SQRT(SQRT((2/(pi()*0.140012289)+LN(1-(2*p0383-1)^2)/2)^2-LN(1-(2*p0383-1)^2)/0.140012289)-(2/(pi()*0.140012289)+LN(1-(2*p0383-1)^2)/2)))
- p3073: 2.61101e-6; = p2292*p1023
- p2627: 0; = p2431*p1123
- p1656: 0
- p1072: 0; = p1071*p0001/(p0818*p0002)
- p1979: 1.40566e8; = p0973
- p3343: 4.99193e7; = if(and(p1232=0;p3254<>0);IF((p3339+p3340+p3341+p3342)+(p3254*(p3269*(1-p3277))/p3338)>p3254;p3254-(p3339+p3340+p3341+p3342);p3254*(p3269*(1-p3277))/p3338);0)
- p1762: 0
- p0329: 0.5
- p2110: 0.856281
- p2651: 3.62425e-7; = p2260*(p1078+p1080)
- p0978: 0
- p0731: 0
- p0349: 0.5
- p4834: 0; = p1867*p3482
- p4826: 0; = p1859*p3482

## Reference product
- corn grain; at harvest in 2000; at farm; 85%-91% moisture: 1 kg

## Inputs from technosphere
- CUTOFF pesticide, Primisulfuron-methyl; at point-of-sale; kg AI: 2.99292e-7 kg; = p1909
- CUTOFF prepare soil; for ridge till, corn: 1.95644e-5 ha; = p0938
- CUTOFF hog manure; from unspecified storage; at point-of-sale: 0.0136118 kg; = p1296
- CUTOFF fertilizer filler materials; at point-of-sale: 0.0134926 kg; = p1158
- CUTOFF planting; for ridge till, corn: 1.95644e-5 ha; = p0956
- CUTOFF harvest; corn silage: 4.55508e-6 ha; = p1974
- CUTOFF zinc compounds; at point-of-sale: 2.23377e-8 kg; = p1184
- CUTOFF planting; for conventional till, corn; <15% residue: 2.85056e-5 ha; = p0952
- CUTOFF pesticide, Dimethylamine 3,6-dichloro-o-anisate; at point-of-sale; kg AI: 1.69012e-6 kg; = p1809
- CUTOFF pesticide, Atrazine; at point-of-sale; kg AI: 0.000131988 kg; = p1771
- CUTOFF pesticide, unspecified type; at point-of-sale; kg AI: 5.33812e-5 kg; = p1962
- CUTOFF pesticide, beta-Cyfluthrin; at point-of-sale; kg AI: 5.28162e-8 kg; = p1804
- CUTOFF apply single or mixed N fertilizer; unspec. method: 1.49418e-5 ha; = p1035
- CUTOFF corn seeds; nonGMO herbicide resistant seed; at point-of-sale: 0.000207406 kg; = p0971
- CUTOFF phosphatic fertilizer, superphosphate grades over 22%; at point-of-sale: 0.000540628 kg; = p1117
- CUTOFF zinc compounds storage: 1.11689e-8 kg*a; = p1186
- CUTOFF gypsum storage: 3.2232e-7 kg*a; = p1168
- CUTOFF pesticide, Tefluthrin; at point-of-sale; kg AI: 1.67251e-6 kg; = p1939
- CUTOFF pesticide, Propazine; at point-of-sale; kg AI: 2.58623e-5 kg; = p1889
- CUTOFF bulk cargo rail transport; diesel: 0.0411007 metric ton*km; = p2008
- CUTOFF apply K fertilizer; broadcast with incorporation: 8.4929e-7 ha; = p1140
- CUTOFF pesticide, Clopyralid; at point-of-sale; kg AI: 1.37322e-6 kg; = p1798
- CUTOFF prepare soil; for mulch till, corn: 3.68543e-5 ha; = p0935
- CUTOFF nitrogenous fertilizer, sodium nitrate; at point-of-sale: 6.04265e-5 kg; = p1069
- CUTOFF planting; for no-till, corn: 2.97853e-5 ha; = p0954
- CUTOFF phosphatic fertilizer, diammonium phosphate; at point-of-sale: 0.00520867 kg; = p1119
- CUTOFF phosphatic fertilizer, superphos. grades 22% and under; at point-of-sale: 1.8447e-5 kg; = p1116
- CUTOFF harvest; corn residue management: 0.000133511 ha; = p1975
- CUTOFF potassic fertilizer, other single nutrients; at point-of-sale: 6.88661e-5 kg; = p1155
- CUTOFF apply P fertilizer; broadcast without incorporation: 6.43177e-6 ha; = p1091
- CUTOFF pesticide, Acetochlor; at point-of-sale; kg AI: 4.13022e-5 kg; = p1765
- CUTOFF pesticide, Rimsulfuron; at point-of-sale; kg AI: 1.58448e-7 kg; = p1926
- CUTOFF apply mixed P fertilizer; without incorporation: 6.92271e-6 ha; = p1093
- CUTOFF planting; for reduced till, corn; 15-30% residue: 1.87827e-5 ha; = p0955
- CUTOFF sulfur storage: 3.84683e-8 kg*a; = p1174
- CUTOFF gypsum; at point-of-sale: 6.4464e-7 kg; = p1166
- CUTOFF pesticide, Nicosulfuron; at point-of-sale; kg AI: 4.92951e-7 kg; = p1896
- CUTOFF apply mixed N fertilizer; without incorporation: 1.99805e-5 ha; = p1034
- CUTOFF apply K fertilizer; no broadcast application: 2.58325e-5 ha; = p1139
- CUTOFF pesticide, Methyl parathion; at point-of-sale; kg AI: 1.47885e-6 kg; = p1888
- CUTOFF prepare soil; for no-till, corn: 2.97853e-5 ha; = p0936
- CUTOFF local area trucking; class 6, average fuel: 0.00164403 metric ton*km; = p2010
- CUTOFF apply pesticide; broadcast with incorporation: 0.000202651 ha; = p1333
- CUTOFF sulfuric acid; at point-of-sale: 2.03973e-8 kg; = p1178
- CUTOFF pesticide formulation balance; at point-of-sale: 0.000190664 kg; = p1963
- CUTOFF fertilizer storage: 0.0372795 kg*a; = p1160
- CUTOFF apply gypsum; unspecified method: 0.000133511 ha; = p1165
- CUTOFF pesticide, Permethrin, mixed cis,trans; at point-of-sale; kg AI: 2.99292e-7 kg; = p1904
- CUTOFF apply pesticide; as foliar or directed spray: 3.44046e-5 ha; = p1339
- CUTOFF apply sulfur; unspecified method: 0.000133511 ha; = p1171
- CUTOFF N inhibitor appl svc; unspec rate & type, 2000 corn: 6.89172e-6 ha; = p1162
- CUTOFF planting; for mulch till, corn: 3.68543e-5 ha; = p0953
- CUTOFF pesticide, Chlorpyrifos; at point-of-sale; kg AI: 4.33092e-6 kg; = p1793
- CUTOFF nitrogenous fertilizer, nitrogen solutions; at point-of-sale: 0.0235943 kg; = p1068
- CUTOFF phosphatic fertilizer, other single phosphates; at point-of-sale: 0.000615578 kg; = p1118
- CUTOFF apply sewage sludge; unspecified method: 0.000133511 ha; = p1189
- CUTOFF pesticide, Cyanazine; at point-of-sale; kg AI: 2.78165e-6 kg; = p1802
- CUTOFF corn seeds; seed, unspec. type; at point-of-sale: 0.00190526 kg; = p0972
- CUTOFF sewage sludge storage: 3.47702e-8 kg*a; = p1192
- CUTOFF pesticide, Tebupirimfos; at point-of-sale; kg AI: 1.00351e-6 kg; = p1938
- CUTOFF pesticide, Prosulfuron; at point-of-sale; kg AI: 8.80269e-8 kg; = p1916
- CUTOFF apply pesticide; banded or side-dressed: 0.000138586 ha; = p1329
- CUTOFF pesticide storage: 0.000351402 kg*a; = p1965
- CUTOFF nitrogenous fertilizer, ammonium nitrate; at point-of-sale: 0.00384912 kg; = p1066
- CUTOFF apply P fertilizer; broadcast with incorporation: 3.79544e-6 ha; = p1090
- CUTOFF pesticide, Glyphosate; at point-of-sale; kg AI: 3.20418e-6 kg; = p1855
- CUTOFF international vessel transport; average fuel: 0.198723 metric ton*km; = p2006
- CUTOFF pesticide, Metribuzin; at point-of-sale; kg AI: 1.12674e-6 kg; = p1890
- CUTOFF pesticide, 2,4-D; at point-of-sale; kg AI: 2.90489e-6 kg; = p1754
- CUTOFF pesticide, Dimethenamid; at point-of-sale; kg AI: 7.79919e-6 kg; = p1819
- CUTOFF apply N fertilizer; no broadcast application: 8.12585e-5 ha; = p1030
- CUTOFF apply pesticide; in seed furrow: 4.57718e-5 ha; = p1343
- CUTOFF apply manure; broadcast without incorporation: 2.19281e-6 ha; = p1248
- CUTOFF irrigate; pressure, groundwater source, in 2000: 1.89425e-5 ha-m; = p0993
- CUTOFF pesticide, Terbufos; at point-of-sale; kg AI: 1.18836e-5 kg; = p1940
- CUTOFF pesticide, Halosulfuron-methyl; at point-of-sale; kg AI: 1.05632e-7 kg; = p1859
- CUTOFF pesticide, Alachlor; at point-of-sale; kg AI: 1.17604e-5 kg; = p1767
- CUTOFF apply pesticide; broadcast by air: 1.19595e-5 ha; = p1331
- CUTOFF phosphatic fertilizer, monoammonium phosphate; at point-of-sale: 0.00238132 kg; = p1120
- CUTOFF irrigate; unspecified irrigation method, groundwater source, in 2000: 9.84765e-8 ha-m; = p0995
- CUTOFF regional or national trucking; class 8, average fuel: 0.00535856 metric ton*km; = p2009
- CUTOFF prepare soil; for unspec. till, corn: 1.86915e-8 ha; = p0939
- CUTOFF sulfuric acid storage: 1.01986e-8 kg*a; = p1180
- CUTOFF unspecified animal manure; from unspecified storage; at point-of-sale: 0.00884078 kg; = p1316
- CUTOFF beef manure; from unspecified storage; at point-of-sale: 0.013487 kg; = p1276
- CUTOFF apply single or mixed K fertilizer; unspec. method: 6.57429e-7 ha; = p1144
- CUTOFF pesticide, 1-Naphthaleneacetamide; at point-of-sale; kg AI: 4.55979e-6 kg; = p1763
- CUTOFF corn seeds; GMO herbicide resistant seed; at point-of-sale: 0.00036205 kg; = p0970
- CUTOFF apply manure; unspec. method: 1.53563e-6 ha; = p1251
- CUTOFF prepare soil; for conventional till, corn; <15% residue: 2.85056e-5 ha; = p0934
- CUTOFF apply mixed N fertilizer; with incorporation: 6.86927e-6 ha; = p1033
- CUTOFF nitrogenous fertilizer, aqueous ammonia; at point-of-sale: 0.000764222 kg; = p1065
- CUTOFF limestone, high-grade, pulverized; at point-of-sale: 0.0268613 kg; = p1228
- CUTOFF nitrogenous fertilizer, anhydrous ammonia; at point-of-sale: 0.0100797 kg; = p1064
- CUTOFF apply sulfuric acid; unspecified method: 0.000133511 ha; = p1177
- CUTOFF apply zinc compounds; unspecified method: 0.000133511 ha; = p1183
- CUTOFF potassic fertilizer, potassium chloride; at point-of-sale: 0.000695156 kg; = p1154
- CUTOFF nitrogenous fertilizer, ammonium sulfate; at point-of-sale: 0.0025423 kg; = p1067
- CUTOFF seed storage; corn: 0.00123736 kg*a; = p0975
- CUTOFF pesticide, Imazethapyr; at point-of-sale; kg AI: 2.11265e-7 kg; = p1864
- CUTOFF planting; for unspec. till, corn: 1.86915e-8 ha; = p0957
- CUTOFF sewage sludge; at point-of-sale: 6.95404e-8 kg; = p1190
- CUTOFF apply K fertilizer; broadcast without incorporation: 2.31479e-6 ha; = p1141
- CUTOFF pesticide, Dicamba-potassium; at point-of-sale; kg AI: 8.97875e-7 kg; = p1810
- CUTOFF dolomite, pulverized; at point-of-sale: 0.00156654 kg; = p1229
- CUTOFF harvest; corn: 0.000126443 ha; = p1971
- CUTOFF sulfur; at point-of-sale: 7.69366e-8 kg; = p1172
- corn silage; at harvest in 2000; at farm; 28%-40% moisture: 0.142956 kg; = p0819
- CUTOFF irrigate; unspec. irrigation method, unspec. water source, in 2000: 5.14039e-6 ha-m; = p1011
- CUTOFF pesticide, Fipronil; at point-of-sale; kg AI: 3.13376e-6 kg; = p1838
- CUTOFF liming materials storage: 0.0142139 kg*a; = p1231
- CUTOFF irrigate; gravity, groundwater source, in 2000: 6.75319e-6 ha-m; = p0992
- CUTOFF domestic barge transport; average fuel: 0.0219204 metric ton*km; = p2007
- CUTOFF prepare soil; for reduced till, corn; 15-30% residue: 1.87827e-5 ha; = p0937
- CUTOFF pesticide, Diflufenzopyr-sodium; at point-of-sale; kg AI: 6.69005e-7 kg; = p1818
- CUTOFF pesticide, Isoxaflutole; at point-of-sale; kg AI: 2.46475e-7 kg; = p1867
- CUTOFF apply N fertilizer; broadcast without incorporation: 9.02608e-6 ha; = p1032
- CUTOFF pesticide, Flumetsulam; at point-of-sale; kg AI: 5.10556e-7 kg; = p1842
- CUTOFF apply liming materials; unspecified method: 0.000133511 ha; = p1227
- corn residue; at harvest in 2000; at farm; 22%-91% moisture: 0.381043 kg; = p0839
- CUTOFF apply pesticide; unspecified application methods: 7.53611e-6 ha; = p1345
- CUTOFF apply pesticide; broadcast without incorporation: 1.34722e-5 ha; = p1335
- CUTOFF apply P fertilizer; no broadcast application: 9.29266e-5 ha; = p1089
- CUTOFF nitrogenous fertilizer, urea; at point-of-sale: 0.0106477 kg; = p1070
- CUTOFF pesticide, Dicamba; at point-of-sale; kg AI: 4.20769e-6 kg; = p1808

## Inputs from nature
- Nitrogen: 0.02102 kg; = p0905
- Phosphorus: 0.00360925 kg; = p0910
- Water, ground: 257.941 kg; = p0887
- Water, unspecified origin: 0.0520316 m3; = p0893*0.001+p0916*0.001
- Potassium; from plant uptake; biogenic: 0.0103958 kg; = p0915
- Occupation, annual crop [natural resource, land]: 0.601931 m2*year; = 1.0 * (p0855)
- Transformation, to annual crop [natural resource, land]: 1.33511 m2; = 1.0 * (p0857)
- Dry matter except CNPK; from plant uptake: 0.969564 kg; = p0917
- Transformation, from annual crop [natural resource, land]: 1.33511 m2; = 1.0 * (p0883+p0873+p0871+p0877)
- Carbon dioxide: 2.26485 kg; = p0900*3.6666666667

## Emissions to nature
- Superphosphate, grades>22%; no broadcast in fert. in spr. bef. plant.; kg P: 1.68039e-5 kg; = p2503
- Superphosphate, grades>22%; broadcast w/o incorp. in fert. in spr. bef. plant.; kg P: 2.41489e-6 kg; = p2893
- Urea; unspec. appl. method in fert. after plant.: 0.000191699 kg; = p3153*5
- Ammonium sulfate; broadcast w/ incorp. in fert. at plant.: 9.98601e-6 kg; = p2713*4.7142857143
- Other single phosphates; no broadcast in fert. after plant.; kg P: 9.79642e-7 kg; = p2583
- Formaldehyde [air, non-urban air or from high stacks]: 2.00063e-6 kg; = 1.0 * (p2128*2.5)
- Ammonium nitrate; no broadcast in fert. at plant.: 0.000285305 kg; = p2515*4.7142857143
- Dicamba-potassium; broadcast without incorporation: 2.66215e-8 kg; = p4159
- Ammonia [air, non-urban air or from high stacks]: 2.08841e-6 kg; = 1.0 * (p2159*1.2142857143)
- Methanol [air, non-urban air or from high stacks]: 3.16288e-6 kg; = 1.0 * (p2129*2.6666666667)
- Ash: 0.000190355 kg; = p2022+p2021
- Rimsulfuron [soil, agricultural]: 1.54278e-7 kg; = 1.0 * (p4069+p4687+p3657+p4275+p5305+p5099)
- Dimethylamine 3,6-dichloro-o-anisate; broadcast without incorporation: 5.01111e-8 kg; = p4158
- Nitrogen; using unspec. method in manure in spring before planting: 3.45274e-5 kg; = p3464
- Ammonium nitrate; unspec. appl. method in fert. after plant.: 0.000112209 kg; = p3139*4.7142857143
- Carbon monoxide, fossil [air, non-urban air or from high stacks]: 5.10805e-5 kg; = 1.0 * (p2028*2.3333333333)
- Acetonitrile [air, non-urban air or from high stacks]: 2.02021e-7 kg; = 1.0 * (p2155*1.7083333333)
- Pesticides, unspecified [soil, agricultural]: 5.19762e-5 kg; = 1.0 * (p5131+p4307+p4101+p5337+p4719+p3689)
- Dicamba-potassium; broadcast with incorporation: 4.00446e-7 kg; = p3953
- NMVOC, non-methane volatile organic compounds, unspecified origin [air, non-urban air or from high stacks]: 2.47272e-5 kg; = 1.0 * (p2051+p2052)
- Anhydrous ammonia; unspec. appl. method in fert. after plant.: 0.000185263 kg; = p3135*1.2142857143
- Monoammonium phosphate; broadcast w/ incorp. in fert. in spr. bef. plant.: 1.27502e-5 kg; = p2693*8.2142857143
- Prosulfuron: 2.31691e-9 kg; = p3853
- Atrazine [soil, agricultural]: 0.000128514 kg; = 1.0 * (p3502+p4120+p4944+p5150+p4532+p3914)
- Ammonium sulfate; unspec. appl. method in fert. in fall bef. plant.: 2.81991e-5 kg; = p3025*4.7142857143
- Superphosphate, grades<= 22%; no broadcast in fert. after plant.; kg P: 2.55277e-8 kg; = p2579
- Cyanazine: 7.32143e-8 kg; = p3739
- Cyfluthrin [soil, agricultural]: 5.1426e-8 kg; = 1.0 * (p3535+p4153+p4977+p3947+p4565+p5183)
- Acetochlor: 1.08709e-6 kg; = p3702
- Alachlor [soil, agricultural]: 1.14509e-5 kg; = 1.0 * (p4116+p3910+p4940+p3498+p4528+p5146)
- Formic acid [air, non-urban air or from high stacks]: 9.64308e-7 kg; = 1.0 * (p2131*3.8333333333)
- Furan [air, non-urban air or from high stacks]: 1.05273e-7 kg; = 1.0 * (p2138*1.4166666667)
- Aqueous ammonia; broadcast w/ incorp. in fert. in fall bef. plant.: 1.07549e-6 kg; = p2630*1.2142857143
- Imazethapyr [soil, agricultural]: 2.05704e-7 kg; = 1.0 * (p4213+p5037+p5243+p3595+p4007+p4625)
- Toluene [air, non-urban air or from high stacks]: 1.83303e-7 kg; = 1.0 * (p2141*1.0952380952)
- Ammonium nitrate; broadcast w/ incorp. in fert. at plant.: 2.41186e-5 kg; = p2710*4.7142857143
- Other single K nutrients; no broadcast in fert. in spr. bef. plant.; kg K: 2.72525e-6 kg; = p2509
- Urea; broadcast w/o incorp. in fert. in spr. bef. plant.: 0.00150877 kg; = p2880*5
- Potassium chloride; broadcast w/o incorp. in fert. at plant.: 4.37178e-5 kg; = p2936*2.2166666667
- Glyphosate [air, non-urban air or from high stacks]: 8.43354e-8 kg; = 1.0 * (p3792)
- Ammonium sulfate; unspec. appl. method in fert. after plant.: 4.64588e-5 kg; = p3142*4.7142857143
- Aqueous ammonia; no broadcast in fert. after plant.: 2.09602e-5 kg; = p2552*1.2142857143
- Anhydrous ammonia; no broadcast in fert. at plant.: 0.000471055 kg; = p2511*1.2142857143
- Particulates, < 2.5 um [air, non-urban air or from high stacks]: 4.78295e-6 kg; = 1.0 * (p2035+p2033)
- isopentane: 1.62876e-8 kg; = p2151*1.0166666667
- 2,4-D [air, non-urban air or from high stacks]: 7.6458e-8 kg; = 1.0 * (p3691)
- Other single phosphates; broadcast w/ incorp. in fert. in spr. bef. plant.; kg P: 3.74458e-7 kg; = p2700
- Nitrogen solution; broadcast w/ incorp. in fert. in fall bef. plant.; broadcast w/ incorp. in fert. in fall bef. plan...: 3.64595e-5 kg; = p2639
- Other single K nutrients; unspec. appl. method in fert. in spr. bef. plant.; kg K: 6.93569e-8 kg; = p3094
- Other single K nutrients; no broadcast in fert. at plant.; kg K: 1.91875e-5 kg; = p2548
- Phosphorous; using unspec. method in manure in spring before planting: 1.00239e-5 kg; = p3465
- Anhydrous ammonia; unspec. appl. method in fert. in spr. bef. plant.: 0.000751101 kg; = p3057*1.2142857143
- Ammonium nitrate; unspec. appl. method in fert. in fall bef. plant.: 6.81075e-5 kg; = p3022*4.7142857143
- Phosphorous; using unspec. method in manure in fall before planting: 2.50173e-5 kg; = p3459
- Metolachlor [air, non-urban air or from high stacks]: 6.80707e-7 kg; = 1.0 * (p3826)
- Methyl parathion [air, non-urban air or from high stacks]: 3.8924e-8 kg; = 1.0 * (p3825)
- Aqueous ammonia; no broadcast in fert. at plant.: 9.79966e-6 kg; = p2513*1.2142857143
- Monoammonium phosphate; broadcast w/ incorp. in fert. at plant.: 5.61172e-5 kg; = p2732*8.2142857143
- Ammonium sulfate; no broadcast in fert. in fall bef. plant.: 0.000153356 kg; = p2440*4.7142857143
- Aqueous ammonia; broadcast w/o incorp. in fert. after plant.: 7.48209e-6 kg; = p2942*1.2142857143
- Permethrin [soil, agricultural]: 2.91414e-7 kg; = 1.0 * (p4047+p5283+p3635+p4665+p4253+p5077)
- Dimethylamine 3,6-dichloro-o-anisate; broadcast by air: 4.44846e-8 kg; = p3746
- Aqueous ammonia; broadcast w/ incorp. in fert. after plant.: 1.7719e-6 kg; = p2747*1.2142857143
- Metribuzin [soil, agricultural]: 1.09709e-6 kg; = 1.0 * (p4033+p4651+p5269+p4239+p3621+p5063)
- Nitrogen; broadcast w/o incorp. in manure in fall before planting: 0.00012305 kg; = p3401
- Aqueous ammonia; broadcast w/o incorp. in fert. at plant.: 3.49815e-6 kg; = p2903*1.2142857143
- Anhydrous ammonia; unspec. appl. method in fert. in fall bef. plant.: 0.000112449 kg; = p3018*1.2142857143
- Sodium nitrate; no broadcast in fert. in spr. bef. plant.: 2.38902e-5 kg; = p2486*6.0714285714
- Sodium nitrate; broadcast w/ incorp. in fert. after plant.: 4.98142e-7 kg; = p2759*6.0714285714
- Water [air, non-urban air or from high stacks]: 5.32155e-7 m3; = 0.001 * (p2016)
- Other single phosphates; broadcast w/o incorp. in fert. after plant.; kg P: 1.40784e-7 kg; = p2973
- Pentane [air, non-urban air or from high stacks]: 2.03595e-8 kg; = 1.0 * (p2152*1.0166666667)
- Potassium; in above-ground residue left on field; biogenic: 0.00488242 kg; = p2170
- Anhydrous ammonia; no broadcast in fert. after plant.: 0.00100753 kg; = p2550*1.2142857143
- Ammonium sulfate; broadcast w/ incorp. in fert. in spr. bef. plant.: 8.65936e-5 kg; = p2674*4.7142857143
- Acetaldehyde [air, non-urban air or from high stacks]: 1.19693e-6 kg; = 1.0 * (p2130*1.8333333333)
- cyclopentane: 1.5918e-9 kg; = p2153*1.0166666667
- Monoammonium phosphate; no broadcast in fert. at plant.: 0.00137396 kg; = p2537*8.2142857143
- Plant dry matter; in below-ground residue: 0.0642478 kg; = p2177
- Volatile constituents; broadcast w/o incorp. in man. in spr.bef.plant.: 0.000351811 kg; = p3410
- Other single phosphates; broadcast w/o incorp. in fert. in spr. bef. plant.; kg P: 1.31755e-6 kg; = p2895
- Sulfur [soil, agricultural]: 7.69366e-8 kg; = 1.0 * (p3230)
- Nonvolatile constituents;broadcast w/o incorp. in man. in spr.bef.plant; exc.CNPK,biogenic: 3.84662e-5 kg; = p3411
- Acetochlor [soil, agricultural]: 4.02151e-5 kg; = 1.0 * (p5144+p4526+p4114+p4938+p3496+p3908)
- Aqueous ammonia; no broadcast in fert. in spr. bef. plant.: 8.49777e-5 kg; = p2474*1.2142857143
- Potassium chloride; broadcast w/ incorp. in fert. in spr. bef. plant.: 2.2782e-6 kg; = p2702*2.2166666667
- Ammonium sulfate; unspec. appl. method in fert. at plant.: 2.17212e-5 kg; = p3103*4.7142857143
- Sodium nitrate; broadcast w/ incorp. in fert. in spr. bef. plant.: 2.01959e-6 kg; = p2681*6.0714285714
- Monoammonium phosphate; broadcast w/o incorp. in fert. in fall bef. plant.: 8.14133e-6 kg; = p2849*8.2142857143
- Urea; no broadcast in fert. in spr. bef. plant.: 0.00422666 kg; = p2490*5
- Potassium chloride; unspec. appl. method in fert. at plant.: 1.24164e-5 kg; = p3131*2.2166666667
- Sulfur dioxide [air, non-urban air or from high stacks]: 1.14521e-6 kg; = 1.0 * (p2041)
- Volatile constituents; using unspec. method in man. in fal.bef.plant: 0.000614895 kg; = p3461
- Diammonium phosphate; broadcast w/ incorp. in fert. after plant.: 3.10669e-6 kg; = p2767*4.7142857143
- Potassium; in below-ground residue; biogenic: 0.00189747 kg; = p2176
- Glyphosate [soil, agricultural]: 3.11984e-6 kg; = 1.0 * (p4616+p3998+p4204+p5028+p5234+p3586)
- Monoammonium phosphate; broadcast w/ incorp. in fert. in fall bef. plant.: 2.31382e-6 kg; = p2654*8.2142857143
- Monoammonium phosphate; no broadcast in fert. in fall bef. plant.: 5.66511e-5 kg; = p2459*8.2142857143
- trans-2-Butene: 5.47996e-8 kg; = p2148*1.1666666667
- Sodium nitrate; unspec. appl. method in fert. in spr. bef. plant.: 4.39292e-6 kg; = p3071*6.0714285714
- Other single K nutrients; broadcast w/o incorp. in fert. in spr. bef. plant.; kg K: 2.44204e-7 kg; = p2899
- Ammonium sulfate; broadcast w/o incorp. in fert. in fall bef. plant.: 5.4743e-5 kg; = p2830*4.7142857143
- Urea; broadcast w/o incorp. in fert. in fall bef. plant.: 0.000225882 kg; = p2841*5
- Sodium nitrate; broadcast w/o incorp. in fert. at plant.: 9.83453e-7 kg; = p2915*6.0714285714
- Chlorpyrifos [soil, agricultural]: 4.21693e-6 kg; = 1.0 * (p5172+p3936+p4554+p3524+p4142+p4966)
- isobutene: 1.12483e-7 kg; = p2150*1.1666666667
- Nitrogen; broadcast w/o incorp. in manure in spring before planting: 4.93034e-5 kg; = p3407
- Sewage sludge dry matter; applied in sewage sludge: 3.60088e-10 kg; = p3243
- Superphosphate, grades<= 22%; broadcast w/o incorp. in fert. in fall bef. plant.; kg P: 6.2305e-9 kg; = p2852
- Butadiene [air, non-urban air or from high stacks]: 1.45203e-7 kg; = 1.0 * (p2143*1.125)
- Anhydrous ammonia; broadcast w/ incorp. in fert. in fall bef. plant.: 5.1697e-5 kg; = p2628*1.2142857143
- Pesticide formulation balance; broadcast by air: 5.01836e-6 kg; = p3896
- Dinitrogen monoxide [air, non-urban air or from high stacks]: 6.73781e-8 kg; = 1.0 * (p2044*1.5714285714)
- Ammonium nitrate; no broadcast in fert. in spr. bef. plant.: 0.00247402 kg; = p2476*4.7142857143
- Diammonium phosphate; broadcast w/o incorp. in fert. at plant.: 0.00045025 kg; = p2923*4.7142857143
- Plant dry matter; from residue burning: 0.000342274 kg; = p2164
- Potassium chloride; broadcast w/ incorp. in fert. at plant.: 1.60399e-5 kg; = p2741*2.2166666667
- Isoprene [air, non-urban air or from high stacks]: 3.63133e-7 kg; = 1.0 * (p2145*1.1333333333)
- Ammonium nitrate; broadcast w/o incorp. in fert. after plant.: 0.000217832 kg; = p2944*4.7142857143
- Nitrogen solution; broadcast w/o incorp. in fert. at plant.; broadcast w/o incorp. in fert. at plant.; kg N: 0.000118589 kg; = p2912
- Nitrogen solution; broadcast w/ incorp. in fert. in spr. bef. plant.; broadcast w/ incorp. in fert. in spr. bef. plan...: 0.00024353 kg; = p2678
- I butane; from residue burning: 2.03011e-8 kg; = p2146*1.0208333333
- Diammonium phosphate; broadcast w/o incorp. in fert. in fall bef. plant.: 1.85647e-5 kg; = p2845*4.7142857143
- Urea; unspec. appl. method in fert. in fall bef. plant.: 0.000116356 kg; = p3036*5
- Alachlor [air, non-urban air or from high stacks]: 3.09539e-7 kg; = 1.0 * (p3704)
- Phenol [air, non-urban air or from high stacks]: 4.99151e-7 kg; = 1.0 * (p2133*1.3055555556)
- Potassium chloride; unspec. appl. method in fert. in spr. bef. plant.: 1.76354e-6 kg; = p3092*2.2166666667
- Anhydrous ammonia; broadcast w/ incorp. in fert. after plant.: 8.51723e-5 kg; = p2745*1.2142857143
- Hydrocyanic acid: 2.74544e-7 kg; = p2154*2.25
- Cyfluthrin [air, non-urban air or from high stacks]: 1.39014e-9 kg; = 1.0 * (p3741)
- Ammonium nitrate; broadcast w/o incorp. in fert. in spr. bef. plant.: 0.000883144 kg; = p2866*4.7142857143
- Zinc compounds: 2.23377e-8 kg; = p3232
- 1-Naphthaleneacetamide: 1.20016e-7 kg; = p3700
- Acetic acid [air, non-urban air or from high stacks]: 5.38428e-6 kg; = 1.0 * (p2127*2.5)
- Ammonium sulfate; broadcast w/ incorp. in fert. in fall bef. plant.: 1.29641e-5 kg; = p2635*4.7142857143
- pursuit: 5.56058e-9 kg; = p3801
- Anhydrous ammonia; broadcast w/o incorp. in fert. after plant.: 0.000359653 kg; = p2940*1.2142857143
- Ammonium sulfate; broadcast w/o incorp. in fert. in spr. bef. plant.: 0.000365655 kg; = p2869*4.7142857143
- Potassium; broadcast w/o incorp. in manure in fall before planting; biogenic: 0.000111329 kg; = p3403
- Superphosphate, grades<= 22%; broadcast w/o incorp. in fert. after plant.; kg P: 3.66858e-9 kg; = p2969
- Monoammonium phosphate; no broadcast in fert. in spr. bef. plant.: 0.000312174 kg; = p2498*8.2142857143
- Pesticides, unspecified: 1.40502e-6 kg; = p3895
- Other single K nutrients; unspec. appl. method in fert. at plant.; kg K: 4.88316e-7 kg; = p3133
- Monoammonium phosphate; broadcast w/o incorp. in fert. after plant.: 4.79369e-6 kg; = p2966*8.2142857143
- Carbon dioxide, in air: 0.00128293 kg; = p2163*3.6666666667
- Flumetsulam [air, non-urban air or from high stacks]: 1.34381e-8 kg; = 1.0 * (p3779)
- Nitrogen solution; unspec. appl. method in fert. at plant.; unspec. appl. method in fert. at plant.; kg N: 6.10871e-5 kg; = p3107
- Urea; broadcast w/ incorp. in fert. at plant.: 4.12045e-5 kg; = p2724*5
- Aqueous ammonia; no broadcast in fert. in fall bef. plant.: 1.27222e-5 kg; = p2435*1.2142857143
- Nitrogen solution; broadcast w/o incorp. in fert. after plant.; broadcast w/o incorp. in fert. after plant.; kg N: 0.000253646 kg; = p2951
- Pesticide formulation balance; broadcast without incorporation: 5.65309e-6 kg; = p4308
- Benzene [air, non-urban air or from high stacks]: 1.47671e-7 kg; = 1.0 * (p2140*1.0833333333)
- Monoammonium phosphate; broadcast w/o incorp. in fert. in spr. bef. plant.: 4.48625e-5 kg; = p2888*8.2142857143
- Superphosphate, grades>22%; broadcast w/o incorp. in fert. after plant.; kg P: 2.58038e-7 kg; = p2971
- Flumetsulam [soil, agricultural]: 4.97118e-7 kg; = 1.0 * (p3573+p4191+p4603+p5221+p3985+p5015)
- Magnesium [soil, agricultural]: 0.000198697 kg; = 1.0 * (p3227)
- Pesticide formulation balance; banded or side-dressed: 5.81524e-5 kg; = p3690
- Aqueous ammonia; broadcast w/o incorp. in fert. in spr. bef. plant.: 3.03342e-5 kg; = p2864*1.2142857143
- Phosphorous; in below-ground residue: 0.000124615 kg; = p2175
- Urea; broadcast w/ incorp. in fert. in fall bef. plant.: 5.3493e-5 kg; = p2646*5
- Ammonium nitrate; broadcast w/ incorp. in fert. after plant.: 5.15866e-5 kg; = p2749*4.7142857143
- Urea; no broadcast in fert. in fall bef. plant.: 0.000632783 kg; = p2451*5
- Ethane [air, non-urban air or from high stacks]: 8.74519e-7 kg; = 1.0 * (p2126*1.25)
- Ammonium nitrate; no broadcast in fert. after plant.: 0.000610232 kg; = p2554*4.7142857143
- Ammonium nitrate; unspec. appl. method in fert. at plant.: 5.24618e-5 kg; = p3100*4.7142857143
- Dioxins and furans (PCDD/F); from residue burning: 2.88709e-14 kg TEQ; = p2047
- Permethrin [air, non-urban air or from high stacks]: 7.87749e-9 kg; = 1.0 * (p3841)
- Nitrogen solution; no broadcast in fert. in fall bef. plant.; no broadcast in fert. in fall bef. plant.; kg N: 0.000431289 kg; = p2444
- Sodium nitrate; no broadcast in fert. in fall bef. plant.: 3.57666e-6 kg; = p2447*6.0714285714
- Propene [air, non-urban air or from high stacks]: 6.50582e-7 kg; = 1.0 * (p2136*1.1666666667)
- Other single phosphates; broadcast w/ incorp. in fert. in fall bef. plant.; kg P: 6.79539e-8 kg; = p2661
- Other single phosphates; broadcast w/o incorp. in fert. at plant.; kg P: 5.7989e-6 kg; = p2934
- Phosphorous; broadcast w/o incorp. in manure in fall before planting: 3.57234e-5 kg; = p3402
- Superphosphate, grades<= 22%; broadcast w/ incorp. in fert. after plant.; kg P: 1.04264e-9 kg; = p2774
- Nitrogen dioxide: 2.21423e-6 kg; = p2039*3.2857142857
- Nicosulfuron: 1.29747e-8 kg; = p3833
- Other single K nutrients; broadcast w/ incorp. in fert. in spr. bef. plant.; kg K: 8.95978e-8 kg; = p2704
- Phosphorous; applied in sewage sludge: 3.88277e-10 kg; = p3241
- Superphosphate, grades<= 22%; broadcast w/ incorp. in fert. at plant.; kg P: 4.29461e-8 kg; = p2735
- Nitrogen solution; no broadcast in fert. after plant.; no broadcast in fert. after plant.; kg N: 0.000710561 kg; = p2561
- Potassium; using unspec. method in manure in spring before planting; biogenic: 3.12386e-5 kg; = p3466
- Cyanazine [soil, agricultural]: 2.70844e-6 kg; = 1.0 * (p4975+p4151+p4563+p5181+p3533+p3945)
- Ammonium sulfate; no broadcast in fert. at plant.: 0.000118127 kg; = p2518*4.7142857143
- Dimethylamine 3,6-dichloro-o-anisate; broadcast with incorporation: 7.53781e-7 kg; = p3952
- 2,4-D [soil, agricultural]: 2.82843e-6 kg; = 1.0 * (p5133+p4515+p4927+p3485+p3897+p4103)
- Superphosphate, grades>22%; broadcast w/ incorp. in fert. in spr. bef. plant.; kg P: 6.86328e-7 kg; = p2698
- Chlorpyrifos [air, non-urban air or from high stacks]: 1.13992e-7 kg; = 1.0 * (p3730)
- Superphosphate, grades<= 22%; no broadcast in fert. at plant.; kg P: 1.05148e-6 kg; = p2540
- Isoxaflutole [soil, agricultural]: 2.39988e-7 kg; = 1.0 * (p4628+p5040+p5246+p3598+p4216+p4010)
- Oxygen; applied in limestone: 0.0121089 kg; = p3219
- Plant dry matter; in aboveground residue left on field: 0.165317 kg; = p2172
- Sodium nitrate; unspec. appl. method in fert. at plant.: 5.06593e-7 kg; = p3110*6.0714285714
- Anhydrous ammonia; no broadcast in fert. in spr. bef. plant.: 0.00408475 kg; = p2472*1.2142857143
- Superphosphate, grades>22%; no broadcast in fert. in fall bef. plant.; kg P: 3.04945e-6 kg; = p2464
- Nonvolatile constituents;broadcast w/o incorp. in man. in fal.bef.plant; exc.CNPK,biogenic: 9.60028e-5 kg; = p3405
- Volatile constituents; using unspec. method in man. in spr.bef.plant.: 0.000246375 kg; = p3467
- Terbufos: 3.12783e-7 kg; = p3877
- Water: 309.655 kg; = p2171+p2181+p3475+p3418+p2178
- Urea; broadcast w/ incorp. in fert. after plant.: 8.81312e-5 kg; = p2763*5
- Halosulfuron-methyl: 2.78029e-9 kg; = p3796
- Anhydrous ammonia; no broadcast in fert. in fall bef. plant.: 0.000611537 kg; = p2433*1.2142857143
- Phosphorous; broadcast w/o incorp. in manure in spring before planting: 1.43136e-5 kg; = p3408
- Other single K nutrients; broadcast w/o incorp. in fert. at plant.; kg K: 1.71935e-6 kg; = p2938
- Tefluthrin: 4.40212e-8 kg; = p3876
- Superphosphate, grades<= 22%; broadcast w/o incorp. in fert. in spr. bef. plant.; kg P: 3.4333e-8 kg; = p2891
- Dimethylamine 3,6-dichloro-o-anisate; unspec. appl. method: 2.80313e-8 kg; = p5188
- Monoammonium phosphate; broadcast w/ incorp. in fert. after plant.: 1.3624e-6 kg; = p2771*8.2142857143
- Dimethylamine 3,6-dichloro-o-anisate; foliar or directed spray: 1.27971e-7 kg; = p4570
- Ammonium nitrate; broadcast w/o incorp. in fert. in fall bef. plant.: 0.000132218 kg; = p2827*4.7142857143
- Ammonium nitrate; no broadcast in fert. in fall bef. plant.: 0.000370392 kg; = p2437*4.7142857143
- Atrazine [air, non-urban air or from high stacks]: 3.47397e-6 kg; = 1.0 * (p3708)
- Phosphorous; in above-ground residue left on field: 0.000320649 kg; = p2169
- Dicamba-potassium; unspec. appl. method: 1.48916e-8 kg; = p5189
- Carbon [soil, agricultural]: 0.209493 kg; = 1.0 * (p3242+p3225+p3457+p3463+p2173+p3400+p2167+p3217+p3406)
- Tebupirimphos: 2.64127e-8 kg; = p3875
- Anhydrous ammonia; unspec. appl. method in fert. at plant.: 8.66173e-5 kg; = p3096*1.2142857143
- Other single phosphates; broadcast w/ incorp. in fert. at plant.; kg P: 1.64809e-6 kg; = p2739
- Superphosphate, grades>22%; broadcast w/o incorp. in fert. in fall bef. plant.; kg P: 4.38236e-7 kg; = p2854
- Primisulfuron [soil, agricultural]: 2.91414e-7 kg; = 1.0 * (p3640+p4258+p5082+p4670+p5288+p4052)
- Aqueous ammonia; broadcast w/ incorp. in fert. in spr. bef. plant.: 7.18369e-6 kg; = p2669*1.2142857143
- 1-Butene: 1.28827e-7 kg; = p2144*1.1666666667
- Ammonium nitrate; unspec. appl. method in fert. in spr. bef. plant.: 0.000454922 kg; = p3061*4.7142857143
- Other single phosphates; broadcast w/o incorp. in fert. in fall bef. plant.; kg P: 2.391e-7 kg; = p2856
- Potassium chloride; broadcast w/o incorp. in fert. in spr. bef. plant.: 6.20936e-6 kg; = p2897*2.2166666667
- Ammonium sulfate; no broadcast in fert. in spr. bef. plant.: 0.00102434 kg; = p2479*4.7142857143
- Methyl vinyl ether; from residue burning: 7.29919e-8 kg; = p2137*1.6111111111
- Isoxaflutole: 6.48734e-9 kg; = p3804
- Acetone [air, non-urban air or from high stacks]: 4.29464e-7 kg; = 1.0 * (p2139*1.6111111111)
- Urea; broadcast w/o incorp. in fert. after plant.: 0.000372147 kg; = p2958*5
- Ammonium sulfate; broadcast w/o incorp. in fert. after plant.: 9.01907e-5 kg; = p2947*4.7142857143
- Ammonium nitrate; broadcast w/ incorp. in fert. in fall bef. plant.: 3.13115e-5 kg; = p2632*4.7142857143
- Diammonium phosphate; no broadcast in fert. at plant.: 0.00313305 kg; = p2533*4.7142857143
- Tebupirimphos [soil, agricultural]: 9.77094e-7 kg; = 1.0 * (p5317+p4081+p4287+p4699+p3669+p5111)
- Aqueous ammonia; unspec. appl. method in fert. at plant.: 1.80196e-6 kg; = p3098*1.2142857143
- Ammonium sulfate; broadcast w/o incorp. in fert. at plant.: 4.21674e-5 kg; = p2908*4.7142857143
- Sodium nitrate; unspec. appl. method in fert. in fall bef. plant.: 6.57675e-7 kg; = p3032*6.0714285714
- Aqueous ammonia; unspec. appl. method in fert. in fall bef. plant.: 2.33935e-6 kg; = p3020*1.2142857143
- Urea; unspec. appl. method in fert. in spr. bef. plant.: 0.000777195 kg; = p3075*5
- Other single K nutrients; broadcast w/ incorp. in fert. at plant.; kg K: 6.30823e-7 kg; = p2743
- Urea; unspec. appl. method in fert. at plant.: 8.96264e-5 kg; = p3114*5
- Metolachlor [soil, agricultural]: 2.51816e-5 kg; = 1.0 * (p4238+p4032+p4650+p5268+p5062+p3620)
- Nitrogen solution; broadcast w/o incorp. in fert. in spr. bef. plant.; broadcast w/o incorp. in fert. in spr. bef. pl...: 0.00102834 kg; = p2873
- Volatile constituents; broadcast w/o incorp. in man. in fal.bef.plant: 0.00087804 kg; = p3404
- Sodium nitrate; broadcast w/o incorp. in fert. after plant.: 2.10348e-6 kg; = p2954*6.0714285714
- Aqueous ammonia; broadcast w/ incorp. in fert. at plant.: 8.28425e-7 kg; = p2708*1.2142857143
- Propane [air, non-urban air or from high stacks]: 2.71039e-7 kg; = 1.0 * (p2142*1.2222222222)
- Anhydrous ammonia; broadcast w/ incorp. in fert. at plant.: 3.98211e-5 kg; = p2706*1.2142857143
- Ammonium sulfate; no broadcast in fert. after plant.: 0.000252659 kg; = p2557*4.7142857143
- Anhydrous ammonia; broadcast w/ incorp. in fert. in spr. bef. plant.: 0.000345309 kg; = p2667*1.2142857143
- Nitrogen; in below-ground residue: 0.00133079 kg; = p2174
- Dimethylamine 3,6-dichloro-o-anisate; in seed furrow: 1.70253e-7 kg; = p4982
- Halosulfuron-methyl [soil, agricultural]: 1.02852e-7 kg; = 1.0 * (p5238+p5032+p4620+p4002+p4208+p3590)
- Sulfuric acid [soil, agricultural]: 2.03973e-8 kg; = 1.0 * (p3231)
- Potassium chloride; no broadcast in fert. at plant.: 0.000487879 kg; = p2546*2.2166666667
- Superphosphate, grades>22%; no broadcast in fert. at plant.; kg P: 7.39584e-5 kg; = p2542
- Aqueous ammonia; broadcast w/o incorp. in fert. in fall bef. plant.: 4.5414e-6 kg; = p2825*1.2142857143
- Superphosphate, grades>22%; broadcast w/ incorp. in fert. after plant.; kg P: 7.33362e-8 kg; = p2776
- Clopyralid: 3.61438e-8 kg; = p3735
- Superphosphate, grades>22%; broadcast w/ incorp. in fert. at plant.; kg P: 3.02071e-6 kg; = p2737
- Pesticide formulation balance; unspec. appl. method: 3.16224e-6 kg; = p5338
- Dicamba [air, non-urban air or from high stacks]: 1.10748e-7 kg; = 1.0 * (p3745)
- Acrylonitrile: 3.22581e-8 kg; = p2156*1.4722222222
- Urea; no broadcast in fert. after plant.: 0.00104253 kg; = p2568*5
- Anhydrous ammonia; broadcast w/o incorp. in fert. in fall bef. plant.: 0.000218298 kg; = p2823*1.2142857143
- Methane: 2.15191e-6 kg; = p2025*1.3333333333
- Sodium nitrate; broadcast w/o incorp. in fert. in spr. bef. plant.: 8.52801e-6 kg; = p2876*6.0714285714
- Glycolaldehyde; from residue burning: 1.9389e-6 kg; = p2135*2.5
- Nitrogen solution; broadcast w/o incorp. in fert. in fall bef. plant.; broadcast w/o incorp. in fert. in fall bef. pl...: 0.000153956 kg; = p2834
- Pesticide formulation balance; foliar or directed spray: 1.44366e-5 kg; = p4720
- Superphosphate, grades>22%; broadcast w/o incorp. in fert. at plant.; kg P: 1.06286e-5 kg; = p2932
- Potassium chloride; no broadcast in fert. in spr. bef. plant.: 6.92949e-5 kg; = p2507*2.2166666667
- Superphosphate, grades<= 22%; no broadcast in fert. in spr. bef. plant.; kg P: 2.38905e-7 kg; = p2501
- Diammonium phosphate; broadcast w/o incorp. in fert. in spr. bef. plant.: 0.0001023 kg; = p2884*4.7142857143
- Diflufenzopyr-sodium [soil, agricultural]: 6.51396e-7 kg; = 1.0 * (p3961+p5197+p4991+p4579+p4167+p3549)
- Particulates, < 10 um: 1.0278e-5 kg; = p2036+p2034
- Diammonium phosphate; broadcast w/ incorp. in fert. in fall bef. plant.: 5.27622e-6 kg; = p2650*4.7142857143
- Pesticide formulation balance; in seed furrow: 1.92064e-5 kg; = p5132
- Ethyne [air, non-urban air or from high stacks]: 2.61961e-7 kg; = 1.0 * (p2132*1.0833333333)
- Superphosphate, grades<= 22%; broadcast w/ incorp. in fert. in spr. bef. plant.; kg P: 9.75767e-9 kg; = p2696
- Ammonium sulfate; broadcast w/ incorp. in fert. after plant.: 2.13588e-5 kg; = p2752*4.7142857143
- Filler materials, applied with synthetic fertilizer: 0.0134926 kg; = p2432
- Urea; broadcast w/o incorp. in fert. at plant.: 0.000173992 kg; = p2919*5
- Methyl parathion [soil, agricultural]: 1.43993e-6 kg; = 1.0 * (p4031+p5061+p4649+p4237+p5267+p3619)
- Dicamba-potassium; broadcast by air: 2.36325e-8 kg; = p3747
- Diammonium phosphate; broadcast w/ incorp. in fert. at plant.: 0.000127964 kg; = p2728*4.7142857143
- Prosulfuron [soil, agricultural]: 8.571e-8 kg; = 1.0 * (p4265+p4677+p5295+p3647+p4059+p5089)
- Aqueous ammonia; unspec. appl. method in fert. after plant.: 3.85415e-6 kg; = p3137*1.2142857143
- Nitrogen solution; unspec. appl. method in fert. after plant.; unspec. appl. method in fert. after plant.; kg N: 0.000130658 kg; = p3146
- Dimethenamid: 2.05278e-7 kg; = p3756
- Sodium nitrate; broadcast w/ incorp. in fert. at plant.: 2.329e-7 kg; = p2720*6.0714285714
- Fipronil: 8.24819e-8 kg; = p3775
- Superphosphate, grades>22%; no broadcast in fert. after plant.; kg P: 1.79555e-6 kg; = p2581
- Diammonium phosphate; no broadcast in fert. in spr. bef. plant.: 0.000711851 kg; = p2494*4.7142857143
- Dimethenamid [soil, agricultural]: 7.59391e-6 kg; = 1.0 * (p4992+p3962+p4168+p3550+p5198+p4580)
- Acetol; from residue burning: 3.62353e-6 kg; = p2134*2.0555555556
- Fipronil [soil, agricultural]: 3.05128e-6 kg; = 1.0 * (p4599+p3981+p3569+p4187+p5217+p5011)
- Ammonium sulfate; unspec. appl. method in fert. in spr. bef. plant.: 0.000188355 kg; = p3064*4.7142857143
- Dicamba-potassium; banded or side-dressed: 2.73851e-7 kg; = p3541
- Dicamba-potassium; in seed furrow: 9.04469e-8 kg; = p4983
- Diflufenzopyr-sodium: 1.76085e-8 kg; = p3755
- Superphosphate, grades<= 22%; no broadcast in fert. in fall bef. plant.; kg P: 4.33547e-8 kg; = p2462
- Other single phosphates; no broadcast in fert. in fall bef. plant.; kg P: 1.66377e-6 kg; = p2466
- Nitrogen solution; broadcast w/ incorp. in fert. after plant.; broadcast w/ incorp. in fert. after plant.; kg N: 6.0068e-5 kg; = p2756
- Nitrogen solution; unspec. appl. method in fert. in fall bef. plant.; unspec. appl. method in fert. in fall bef. plan...: 7.93052e-5 kg; = p3029
- Diammonium phosphate; no broadcast in fert. in fall bef. plant.: 0.000129182 kg; = p2455*4.7142857143
- Monoammonium phosphate; no broadcast in fert. after plant.: 3.33567e-5 kg; = p2576*8.2142857143
- Calcium [soil, agricultural]: 0.010462 kg; = 1.0 * (p3226+p3218)
- Nitrogen solution; broadcast w/ incorp. in fert. at plant.; broadcast w/ incorp. in fert. at plant.; kg N: 2.8084e-5 kg; = p2717
- Dicamba [soil, agricultural]: 4.09694e-6 kg; = 1.0 * (p4569+p4157+p5187+p3539+p4981+p3951)
- Ammonium nitrate; broadcast w/o incorp. in fert. at plant.: 0.000101844 kg; = p2905*4.7142857143
- Ammonium nitrate; broadcast w/ incorp. in fert. in spr. bef. plant.: 0.000209144 kg; = p2671*4.7142857143
- Butane [air, non-urban air or from high stacks]: 5.84672e-8 kg; = 1.0 * (p2147*1.0208333333)
- Superphosphate, grades>22%; broadcast w/ incorp. in fert. in fall bef. plant.; kg P: 1.2455e-7 kg; = p2659
- Anhydrous ammonia; broadcast w/o incorp. in fert. at plant.: 0.000168151 kg; = p2901*1.2142857143
- Other single phosphates; no broadcast in fert. at plant.; kg P: 4.03514e-5 kg; = p2544
- Nitrogen solution; unspec. appl. method in fert. in spr. bef. plant.; unspec. appl. method in fert. in spr. bef. plan...: 0.000529717 kg; = p3068
- Sodium nitrate; broadcast w/ incorp. in fert. in fall bef. plant.: 3.02357e-7 kg; = p2642*6.0714285714
- Nicosulfuron [soil, agricultural]: 4.79976e-7 kg; = 1.0 * (p4039+p5275+p4657+p3627+p5069+p4245)
- Dimethylamine 3,6-dichloro-o-anisate; banded or side-dressed: 5.15485e-7 kg; = p3540
- Other single phosphates; broadcast w/ incorp. in fert. after plant.; kg P: 4.00119e-8 kg; = p2778
- Anhydrous ammonia; broadcast w/o incorp. in fert. in spr. bef. plant.: 0.00145812 kg; = p2862*1.2142857143
- Ethene [air, non-urban air or from high stacks]: 1.40025e-6 kg; = 1.0 * (p2125*1.1666666667)
- Metribuzin [air, non-urban air or from high stacks]: 2.96564e-8 kg; = 1.0 * (p3827)
- Urea; no broadcast in fert. at plant.: 0.000487419 kg; = p2529*5
- Terbufos [soil, agricultural]: 1.15709e-5 kg; = 1.0 * (p4701+p4083+p5319+p3671+p5113+p4289)
- Gypsum: 6.4464e-7 kg; = p3229
- Other limestone constituents; applied in limestone: 0.00161168 kg; = p3220
- Sodium nitrate; unspec. appl. method in fert. after plant.: 1.08354e-6 kg; = p3149*6.0714285714
- Potassium; broadcast w/o incorp. in manure in spring before planting; biogenic: 4.46072e-5 kg; = p3409
- Oxygen; applied in dolomite: 0.000786318 kg; = p3228
- Diammonium phosphate; broadcast w/ incorp. in fert. in spr. bef. plant.: 2.90744e-5 kg; = p2689*4.7142857143
- Nitrogen solution; no broadcast in fert. at plant.; no broadcast in fert. at plant.; kg N: 0.000332213 kg; = p2522
- 1-Naphthaleneacetamide: 4.43978e-6 kg; = p5142+p4936+p3494+p3906+p4112+p4524
- Superphosphate, grades<= 22%; broadcast w/ incorp. in fert. in fall bef. plant.; kg P: 1.77075e-9 kg; = p2657
- Urea; broadcast w/ incorp. in fert. in spr. bef. plant.: 0.000357305 kg; = p2685*5
- Pesticide formulation balance; broadcast with incorporation: 8.50348e-5 kg; = p4102
- Tefluthrin [soil, agricultural]: 1.62849e-6 kg; = 1.0 * (p4700+p4082+p3670+p5318+p5112+p4288)
- Dicamba-potassium; foliar or directed spray: 6.79848e-8 kg; = p4571
- cis-2-Butene: 4.134e-8 kg; = p2149*1.1666666667
- Sodium nitrate; broadcast w/o incorp. in fert. in fall bef. plant.: 1.27675e-6 kg; = p2837*6.0714285714
- Diammonium phosphate; no broadcast in fert. after plant.: 7.60634e-5 kg; = p2572*4.7142857143
- Monoammonium phosphate; broadcast w/o incorp. in fert. at plant.: 0.000197452 kg; = p2927*8.2142857143
- Nitrogen; using unspec. method in manure in fall before planting: 8.61725e-5 kg; = p3458
- Nitrogen; in above-ground residue left on field: 0.00342427 kg; = p2168
- Potassium; using unspec. method in manure in fall before planting; biogenic: 7.79644e-5 kg; = p3460
- Sodium nitrate; no broadcast in fert. at plant.: 2.75503e-6 kg; = p2525*6.0714285714
- Nitrogen solution; no broadcast in fert. in spr. bef. plant.; no broadcast in fert. in spr. bef. plant.; kg N: 0.00288078 kg; = p2483
- Diammonium phosphate; broadcast w/o incorp. in fert. after plant.: 1.09311e-5 kg; = p2962*4.7142857143
- Aqueous ammonia; unspec. appl. method in fert. in spr. bef. plant.: 1.56257e-5 kg; = p3059*1.2142857143
- Nitrogen; applied in sewage sludge: 3.25254e-9 kg; = p3240
- Propanenitrile: 6.16652e-8 kg; = p2157*1.5277777778
- Seeds; used in planting and sowing: 0.00247471 kg; = p2179
- Sodium nitrate; no broadcast in fert. after plant.: 5.89265e-6 kg; = p2564*6.0714285714
- Rimsulfuron: 4.17043e-9 kg; = p3863
- Other single phosphates; no broadcast in fert. in spr. bef. plant.; kg P: 9.16813e-6 kg; = p2505
- Superphosphate, grades<= 22%; broadcast w/o incorp. in fert. at plant.; kg P: 1.51109e-7 kg; = p2930
- Primisulfuron-methyl: 7.87749e-9 kg; = p3846
- Clopyralid [soil, agricultural]: 1.33708e-6 kg; = 1.0 * (p4147+p4559+p5177+p3529+p3941+p4971)

## Sampling procedure
A delete-a-group jackknife is used by the USDA to estimate the ARMS sample means and RSEs, based on a 15 sample delete-a-group jackknife. Because of this relatively small sample size, a Students t distribution is used to represent ARMS data probability density functions. Other representations of uncertainty are described in Cooper, J.S., Kahn, E., Noon, M. (2012). LCA Digital Commons Unit Process Data: field crop production Version 1. Prepared for the US Department of Agriculture National Agricultural Library. Retrieved from https://www.lcacommons.gov/discovery/docs/LCA%20Digital%20Commons%20Unit%20Process%20Data%20final%20updated.pdf

## Extrapolations
Data represent an aggregation of processes applied in Nebraska in 2000. Data development is demonstrated by parameterization (exlicitly presents all raw and uncertainty data and all calculations). Flow data quality according to the LCADC convention is provided for all flows.
