# spring wheat, excl. durum; at harvest in 2004; at farm; 86%-90% moisture

Dataset: EcoSpold 2, unit process
Geography: GLO
Time period: 2004-01-02 to 2005-01-01
Scenario: Business-as-Usual
System model: Allocation, ecoinvent default
Generated by: cooperjs@u.washington.edu
isCopyrightProtected: false

## General comment
This unit process/ gate-to-gate dataset represents the production of 1 kg spring wheat (excl. durum) coproduced with residue. The process technologies are an aggregation of those applied in Idaho in 2004. Applicable classifications include ISIC 0111, NAIC 111140, UNSPSC 50221101; this dataset was prepared in ILCD format using the UWDFE Lab Excel to ILCD File Generator (beta version, August 2013)

Exchange "Fluroxypyr-soil agricultural" is the result of combining the following original LCA Commons flows: "Fluroxypyr; broadcast without incorporation; kg AI", "Fluroxypyr; foliar or directed spray; kg AI", "Fluroxypyr; unspec. appl. method; kg AI", "Fluroxypyr; broadcast with incorporation; kg AI".
Exchange "Clodinafop-propargyl-soil agricultural" is the result of combining the following original LCA Commons flows: "Clodinafop-propargyl; broadcast with incorporation; kg AI", "Clodinafop-propargyl; foliar or directed spray; kg AI", "Clodinafop-propargyl; broadcast without incorporation; kg AI", "Clodinafop-propargyl; unspec. appl. method; kg AI".
Exchange "Bromoxynil octanoate-soil unspecified" is the result of combining the following original LCA Commons flows: "Bromoxynil octanoate; foliar or directed spray; kg AI", "Bromoxynil octanoate; broadcast with incorporation; kg AI", "Bromoxynil octanoate; unspec. appl. method; kg AI", "Bromoxynil octanoate; broadcast without incorporation; kg AI".
Exchange "NMVOC, non-methane volatile organic compounds, unspecified origin-air low population density" is the result of combining the following original LCA Commons flows: "NMVOCs; from residue burning; kg except C, biogenic", "NMVOCs; from residue burning; kg C, biogenic".
Exchange "Glyphosate-soil agricultural" is the result of combining the following original LCA Commons flows: "Glyphosate; unspec. appl. method; kg AI", "Glyphosate; foliar or directed spray; kg AI", "Glyphosate; broadcast with incorporation; kg AI", "Glyphosate; broadcast without incorporation; kg AI".
Exchange "Imazamethabenz-soil agricultural" is the result of combining the following original LCA Commons flows: "Imazamethabenz; broadcast without incorporation; kg AI", "Imazamethabenz; unspec. appl. method; kg AI", "Imazamethabenz; foliar or directed spray; kg AI", "Imazamethabenz; broadcast with incorporation; kg AI".
Exchange "Carbon-soil agricultural" is the result of combining the following original LCA Commons flows: "Carbon; broadcast w/o incorp. in manure at an unknown time", "Carbon; applied in dolomite", "Carbon; using unspec. method in manure at an unknown time", "Carbon; in below-ground residue; biogenic", "Carbon; applied in sewage sludge", "Carbon; using unspec. method in manure in fall before planting; biogenic", "Carbon; in above-ground residue left on field; biogenic", "Carbon; applied in limestone", "Carbon; broadcast w/o incorp. in manure in fall before planting; biogenic".
Exchange "Particulates, < 2.5 um-air low population density" is the result of combining the following original LCA Commons flows: "PM2.5; from residue burning; kg C, biogenic", "PM2.5; from residue burning; kg except C, biogenic".
Exchange "Pesticides, unspecified-soil agricultural" is the result of combining the following original LCA Commons flows: "Unspecified pesticide; foliar or directed spray; kg AI", "Unspecified pesticide; broadcast without incorporation; kg AI", "Unspecified pesticide; unspec. appl. method; kg AI", "Unspecified pesticide; broadcast with incorporation; kg AI".
Exchange "Ash-soil agricultural" is the result of combining the following original LCA Commons flows: "Ash; from residue burning; kg except C, biogenic", "Ash; from residue burning; kg C, biogenic".
Exchange "Water-soil agricultural" is the result of combining the following original LCA Commons flows: "Water; from irrigation and applied with manure and sewage sludge", "Water; in below-ground residue; biogenic", "Water; using unspec. method in manure", "Water; in above-ground residue left on field; biogenic", "Water; broadcast w/o incorp. in manure".
Exchange "Tralkoxydim-soil agricultural" is the result of combining the following original LCA Commons flows: "Tralkoxydim; unspec. appl. method; kg AI", "Tralkoxydim; broadcast without incorporation; kg AI", "Tralkoxydim; broadcast with incorporation; kg AI", "Tralkoxydim; foliar or directed spray; kg AI".
Exchange "Water, unspecified origin-resource in water" is the result of combining the following original LCA Commons flows: "Water; withdrawal from unspec. source, for spring wheat (excl. durum), in 2004", "Water; from plant uptake; biogenic".
Exchange "Particulates, < 10 um-air low population density" is the result of combining the following original LCA Commons flows: "PM10; from residue burning; kg except C, biogenic", "PM10; from residue burning; kg C, biogenic".
Exchange "Bromoxynil-soil agricultural" is the result of combining the following original LCA Commons flows: "Bromoxynil; unspec. appl. method; kg AI", "Bromoxynil; broadcast without incorporation; kg AI", "Bromoxynil; broadcast with incorporation; kg AI", "Bromoxynil; foliar or directed spray; kg AI".
Exchange "MCPA-soil agricultural" is the result of combining the following original LCA Commons flows: "MCPA; foliar or directed spray; kg AI", "MCPA; broadcast with incorporation; kg AI", "MCPA; broadcast without incorporation; kg AI", "MCPA; unspec. appl. method; kg AI".
Exchange "Tribenuron-methyl-soil agricultural" is the result of combining the following original LCA Commons flows: "Tribenuron-methyl; broadcast with incorporation; kg AI", "Tribenuron-methyl; unspec. appl. method; kg AI", "Tribenuron-methyl; broadcast without incorporation; kg AI", "Tribenuron-methyl; foliar or directed spray; kg AI".
Exchange "Calcium-soil agricultural" is the result of combining the following original LCA Commons flows: "Calcium; applied in limestone", "Calcium; applied in dolomite".
Exchange "2,4-D-soil agricultural" is the result of combining the following original LCA Commons flows: "2,4-D; broadcast with incorporation; kg AI", "2,4-D; broadcast without incorporation; kg AI", "2,4-D; unspec. appl. method; kg AI", "2,4-D; foliar or directed spray; kg AI".
Exchange "Carbon monoxide, fossil-2bdf9967-6dae-4183-88d1-8f612548c51e low population density" was originally named: "Carbon monoxide; from residue burning; kg C, biogenic" in this dataset.
Exchange "Transformation, from arable-c19fb2d9-98eb-4cd3-8761-81b71d8a9a1b land" was originally named: "Transformation; from arable, from unspec. use to wheat" in this dataset.
Exchange "Isoprene-2bdf9967-6dae-4183-88d1-8f612548c51e low population density" was originally named: "Isoprene; from residue burning; kg C, biogenic" in this dataset.
Exchange "Methanol-2bdf9967-6dae-4183-88d1-8f612548c51e low population density" was originally named: "Methanol; from residue burning; kg C, biogenic" in this dataset.
Exchange "Tribenuron-methyl-2bdf9967-6dae-4183-88d1-8f612548c51e low population density" was originally named: "Tribenuron-methyl; broadcast by air; kg AI" in this dataset.
Exchange "Magnesium-be1c0329-f1a8-4524-8420-a86d2a8dd358 agricultural" was originally named: "Magnesium; applied in dolomite" in this dataset.
Exchange "Propane-2bdf9967-6dae-4183-88d1-8f612548c51e low population density" was originally named: "Propane; from residue burning; kg C, biogenic" in this dataset.
Exchange "isobutene-2bdf9967-6dae-4183-88d1-8f612548c51e low population density" was originally named: "I butene; from residue burning; kg C, biogenic" in this dataset.
Exchange "Sulfur dioxide-2bdf9967-6dae-4183-88d1-8f612548c51e low population density" was originally named: "Sulfur dioxide; from residue burning; biogenic" in this dataset.
Exchange "Pentane-2bdf9967-6dae-4183-88d1-8f612548c51e low population density" was originally named: "N pentane; from residue burning; kg C, biogenic" in this dataset.
Exchange "Transformation, to arable-c19fb2d9-98eb-4cd3-8761-81b71d8a9a1b land" was originally named: "Transformation; to arable, to wheat" in this dataset.
Exchange "Butane-2bdf9967-6dae-4183-88d1-8f612548c51e low population density" was originally named: "N butane; from residue burning; kg C, biogenic" in this dataset.
Exchange "Propene-2bdf9967-6dae-4183-88d1-8f612548c51e low population density" was originally named: "Propylene; from residue burning; kg C, biogenic" in this dataset.
Exchange "Fluroxypyr-2bdf9967-6dae-4183-88d1-8f612548c51e low population density" was originally named: "Fluroxypyr; broadcast by air; kg AI" in this dataset.
Exchange "Sulfur-be1c0329-f1a8-4524-8420-a86d2a8dd358 agricultural" was originally named: "Sulfur; as secondary application" in this dataset.
Exchange "1-Butene-2bdf9967-6dae-4183-88d1-8f612548c51e low population density" was originally named: "1 butene; from residue burning; kg C, biogenic" in this dataset.
Exchange "Butadiene-2bdf9967-6dae-4183-88d1-8f612548c51e low population density" was originally named: "1,3 butadiene; from residue burning; kg C, biogenic" in this dataset.
Exchange "Acetic acid-2bdf9967-6dae-4183-88d1-8f612548c51e low population density" was originally named: "Acetic acid; from residue burning; kg C, biogenic" in this dataset.
Exchange "Glyphosate-2bdf9967-6dae-4183-88d1-8f612548c51e low population density" was originally named: "Glyphosate; broadcast by air; kg AI" in this dataset.
Exchange "Bromoxynil-2bdf9967-6dae-4183-88d1-8f612548c51e low population density" was originally named: "Bromoxynil; broadcast by air; kg AI" in this dataset.
Exchange "Furan-2bdf9967-6dae-4183-88d1-8f612548c51e low population density" was originally named: "Furan; from residue burning; kg C, biogenic" in this dataset.
Exchange "Ethyne-2bdf9967-6dae-4183-88d1-8f612548c51e low population density" was originally named: "Acetylene; from residue burning; kg C, biogenic" in this dataset.
Exchange "Dinitrogen monoxide-2bdf9967-6dae-4183-88d1-8f612548c51e low population density" was originally named: "Dinitrogen monoxide; from residue burning; kg N, biogenic" in this dataset.
Exchange "Water, surface-c19fb2d9-98eb-4cd3-8761-81b71d8a9a1b in water" was originally named: "Water; withdrawal from surface water, for spring wheat (excl. durum), in 2004" in this dataset.
Exchange "Nitrogen dioxide-2bdf9967-6dae-4183-88d1-8f612548c51e low population density" was originally named: "Nitrogen dioxide; from residue burning; kg N, biogenic" in this dataset.
Exchange "Toluene-2bdf9967-6dae-4183-88d1-8f612548c51e low population density" was originally named: "Toluene; from residue burning; kg C, biogenic" in this dataset.
Exchange "Sulfuric acid-be1c0329-f1a8-4524-8420-a86d2a8dd358 agricultural" was originally named: "Sulfuric acid; as secondary application" in this dataset.
Exchange "Water-2bdf9967-6dae-4183-88d1-8f612548c51e low population density" was originally named: "Water; from residue burning; biogenic" in this dataset.
Exchange "Zinc compounds-be1c0329-f1a8-4524-8420-a86d2a8dd358 agricultural" was originally named: "Zinc compounds; as secondary application" in this dataset.
Exchange "2,4-D-2bdf9967-6dae-4183-88d1-8f612548c51e low population density" was originally named: "2,4-D; broadcast by air; kg AI" in this dataset.
Exchange "Phenol-2bdf9967-6dae-4183-88d1-8f612548c51e low population density" was originally named: "Phenol; from residue burning; kg C, biogenic" in this dataset.
Exchange "Acrylonitrile-2bdf9967-6dae-4183-88d1-8f612548c51e low population density" was originally named: "Propenenitrile; from residue burning; kg C, biogenic" in this dataset.
Exchange "Acetone-2bdf9967-6dae-4183-88d1-8f612548c51e low population density" was originally named: "Acetone; from residue burning; kg C, biogenic" in this dataset.
Exchange "Phosphorus-c19fb2d9-98eb-4cd3-8761-81b71d8a9a1b unspecified" was originally named: "Phosphorous; from plant uptake; biogenic" in this dataset.
Exchange "isopentane-2bdf9967-6dae-4183-88d1-8f612548c51e low population density" was originally named: "I pentane; from residue burning; kg C, biogenic" in this dataset.
Exchange "Formic acid-2bdf9967-6dae-4183-88d1-8f612548c51e low population density" was originally named: "Formic acid; from residue burning; kg C, biogenic" in this dataset.
Exchange "MCPA-2bdf9967-6dae-4183-88d1-8f612548c51e low population density" was originally named: "MCPA; broadcast by air; kg AI" in this dataset.
Exchange "Carbon dioxide-c19fb2d9-98eb-4cd3-8761-81b71d8a9a1b unspecified" was originally named: "Carbon dioxide; from plant uptake; kg C, biogenic" in this dataset.
Exchange "Ammonia-2bdf9967-6dae-4183-88d1-8f612548c51e low population density" was originally named: "Ammonia; from residue burning; kg N, biogenic" in this dataset.
Exchange "Hydrocyanic acid-2bdf9967-6dae-4183-88d1-8f612548c51e low population density" was originally named: "Hydrogen cyanide; from residue burning; kg C, biogenic" in this dataset.
Exchange "Clodinafop-propargyl-2bdf9967-6dae-4183-88d1-8f612548c51e low population density" was originally named: "Clodinafop-propargyl; broadcast by air; kg AI" in this dataset.
Exchange "Formaldehyde-2bdf9967-6dae-4183-88d1-8f612548c51e low population density" was originally named: "Formaldehyde; from residue burning; kg C, biogenic" in this dataset.
Exchange "Acetonitrile-2bdf9967-6dae-4183-88d1-8f612548c51e low population density" was originally named: "Acetonitrile; from residue burning; kg C, biogenic" in this dataset.
Exchange "cis-2-Butene-2bdf9967-6dae-4183-88d1-8f612548c51e low population density" was originally named: "Cis 2 butene; from residue burning; kg C, biogenic" in this dataset.
Exchange "Benzene-2bdf9967-6dae-4183-88d1-8f612548c51e low population density" was originally named: "Benzene; from residue burning; kg C, biogenic" in this dataset.
Exchange "Ethene-2bdf9967-6dae-4183-88d1-8f612548c51e low population density" was originally named: "Ethylene; from residue burning; kg C, biogenic" in this dataset.
Exchange "Acetaldehyde-2bdf9967-6dae-4183-88d1-8f612548c51e low population density" was originally named: "Acetaldehyde; from residue burning; kg C, biogenic" in this dataset.
Exchange "trans-2-Butene-2bdf9967-6dae-4183-88d1-8f612548c51e low population density" was originally named: "Trans 2 butene; from residue burning; kg C, biogenic" in this dataset.
Exchange "Methane-2bdf9967-6dae-4183-88d1-8f612548c51e low population density" was originally named: "Methane; from residue burning; kg C, biogenic" in this dataset.
Exchange "Carbon dioxide, in air-2bdf9967-6dae-4183-88d1-8f612548c51e low population density" was originally named: "Carbon dioxide; from residue burning; kg C, biogenic" in this dataset.
Exchange "Occupation, arable-c19fb2d9-98eb-4cd3-8761-81b71d8a9a1b land" was originally named: "Occupation; arable, as wheat" in this dataset.
Exchange "Water, ground-c19fb2d9-98eb-4cd3-8761-81b71d8a9a1b in water" was originally named: "Water; withdrawal from groundwater, for spring wheat (excl. durum), in 2004" in this dataset.
Exchange "Ethane-2bdf9967-6dae-4183-88d1-8f612548c51e low population density" was originally named: "Ethane; from residue burning; kg C, biogenic" in this dataset.

## Geography
The unit process is assumed to represent production in Idaho (US State).

## Technology
This process produces spring wheat, excl. durum; at harvest in 2004; at farm; 86%-90% moisture. The process is assumed to represent production in Idaho (US State). Yields and related inputs and outputs represent a single year of operation, in 2004. This dataset includes consideration of residue burning; soil preparation; planting or sowing; irrigation; application, storage, and transport of fertilizers, manures, liming materials, secondary materials, and pesticides; and harvest. Fate and transport of applications are not included as described in Cooper, J.S., Kahn, E., Noon, M. (2012) LCA Digital Commons Unit Process Data: field crop production Version 1 which is available at https://www.lcacommons.gov/discovery/docs/LCA%20Digital%20Commons%20Unit%20Process%20Data%20final%20updated.pdf

## Time period
Start and end dates match the underlying data obtained from the USDA Agricultural Resource Management Survey (ARMS).
## Parameters
- p1921: 0
- p0119: 68.184
- p4428: 0; = p1873*p3480
- p0712: 30.724; = p0052*(1+p0580*p0184/100)
- p2993: 0; = p2407*(p1020+p1022)
- p2531: 0.000158363; = p2335*p1014
- p1813: 0
- p5239: 4.72337e-7; = p1860*p3484
- p3159: 0; = p2378*p1082
- p2958: 8.36554e-5; = p2372*(p1020+p1022)
- p2967: 0; = p2381*(p1079+p1081)
- p0917: 1.19669
- p1938: 0
- p1001: 0.0406641; = if(p0978>0;0;if(and(p0687=0;p0691=0;p0695=0;p0699=0);0;IF(p0996+p0999+p1000=1;0;1-(p0996+p0999+p1000))))
- p2968: 0; = p2382*(p1079+p1081)
- p1012: 0
- p2484: 0.000336816; = p2288*p1014
- p1154: 0.00328557; = if(p1152*p0818=0;0;p1150/(p1152*p0818))
- p3232: 3.07462e-8; = p1182/p0818
- p1021: 0.06381; = IF(p1012=0;IF(p1014+p1019+p1020=1;0;IF(p1014+p1019+p1020+p1017>1;1-(p1014+p1019+p1020);p1017));0)
- p2717: 0.000318423; = p2326*(p1019+p1021)
- p1036: 4.86581e7; = IF(p1012=0;p0795*p0702*1000*p0796/100;0)
- p1568: 0
- p1310: 0; = IF(p1307=p1266;0;IF(p1307+p1308>p1266;p1266-p1307;p1308))
- p2720: 2.55261e-7; = p2329*(p1019+p1021)
- p2908: 2.57269e-5; = p2322*(p1020+p1022)
- p0078: 500
- p2564: 1.78751e-7; = p2368*p1014
- p2236: 0; = 1-(p2230+p2231+p2232+p2233)
- p1117: 0.000355316; = IF(p1071=0;p1107/(p1112*p0818);0)
- p1165: 0.000192065; = p0801*p0001/(p0818*p0002)
- p2839: 1.83211e-7; = p2253*(p1020+p1022)
- p2927: 2.16429e-5; = p2341*(p1079+p1081)
- p0742: 89.973; = p0082*(1+p0610*p0214/100)
- p1094: 4.67701e-6; = IF(p1071=0;p1088*p0001/(p0818*p0002);0)
- p2453: 3.00239e-5; = p2257*p1014
- p0663: 0; = IF(p0399<0.5;-SQRT(p0007*EXP(p0531^2*p0008)-p0007);SQRT(p0007*EXP(p0531^2*p0008)-p0007))
- p1130: 0; = if(p1121=0;IF(p1123+p1128+p1129=1;0;IF(p1123+p1128+p1129+p1126>1;1-(p1123+p1128+p1129);p1126));0)
- p1195: 0.45
- p1703: 0
- p2039: 6.41078e-5; = p2015*p2037*p2038/(p0818*1000)
- p3297: 0; = if(p1273+p1274+p1275+p1276=0;0;p1273/(p1273+p1274+p1275+p1276))
- p0103: 500
- p0703: 500; = p0043*(1+p0571*p0175/100)
- p1612: 0
- p0934: 0.000120873; = p0928*p0001/(p0818*p0002)
- p2370: 2.08478e-6; = p2225*p2199
- p0720: 0
- p2684: 0.00131065; = p2293*(p1019+p1021)
- p0667: 0; = IF(p0403<0.5;-SQRT(p0007*EXP(p0535^2*p0008)-p0007);SQRT(p0007*EXP(p0535^2*p0008)-p0007))
- p2017: 1.12716e8; = p2015*p0898
- p2906: 7.33716e-6; = p2320*(p1020+p1022)
- p1279: 0
- p2197: 5.54963e-6; = p1055/p0818
- p3416: 1.07644e-5; = p3378*p1238
- p2570: 0.000120792; = p2374*p1014
- p1620: 0
- p0814: 0; = if(p0807=480;p0810*p0812+p0811*p0813;0)
- p0398: 0.5
- p1071: 0
- p1137: 0; = if(p1121=0;p1131*(p0716/100)*p0703*1000;0)
- p1852: 0
- p1157: 0.217341
- p0115: 38.208
- p3055: 0; = p2274*p1132
- p2125: 0.000131962; = p2015*p2053*p2087/(p0818*1000)
- p0389: 0.5
- p0559: 0; = IF(p0295<0.5;-SQRT(p0007*EXP(p0427^2*p0008)-p0007);SQRT(p0007*EXP(p0427^2*p0008)-p0007))
- p1172: 2.03461e-7; = p1170/p0818
- p1963c: 1.99546e-6; = p1588*p1792+p1589*p1793+p1590*p1794+p1591*p1795+p1592*p1796+p1593*p1797+p1594*p1798+p1595*p1799+p1596*p1800+p1597*p1801+p1598*p1802+p1599*p1803+p1600*p1804+p1601*p1805+p1602*p1806+p1603*p1807+p1604*p1808+p1605*p1809+p1606*p1810+p1607*p1811
- p3374: 2.77356e-5; = if(p1232=0;p3246*p3356/p0818;0)
- p2498: 0.00012052; = p2302*p1073
- p2053: 1.45647
- p3078: 3.46011e-5; = p2297*p1082
- p3194: 0; = p2413*p1023
- p0052: 30.724
- p1963f: 4.40686e-6; = p1647*p1851+p1648*p1852+p1649*p1853+p1650*p1854+p1651*p1855+p1652*p1856+p1653*p1857+p1654*p1858+p1655*p1859+p1656*p1860+p1657*p1861+p1658*p1862+p1659*p1863+p1660*p1864+p1661*p1865+p1662*p1866+p1663*p1867+p1664*p1868+p1665*p1869+p1666*p1870
- p1693: 0
- p1145: 4.29457e6; = if(p1121=0;p0799*p0702*1000*p0800/100;0)
- p3082: 2.34368e-5; = p2301*p1082
- p0819: 0; = p0808*p0809/p0818
- p2292: 1.46905e-5; = p2223*p2199
- p1089: 5.31849e-5; = IF(p1071=0;p1083*p0001/(p0818*p0002);0)
- p2485: 0.00332943; = p2289*p1014
- p0839: 0.575904; = p0838/p0818
- p0135: 105.882
- p3142: 5.5502e-10; = p2361*p1023
- p1140: 1.29744e-5; = if(p1121=0;p1134*p0001/(p0818*p0002);0)
- p2171: 0.0640332; = p2165*p0831
- p1194: 1.48
- p0886: 3.38944e6; = p0686*1000*p0687*p0689/100
- p2396: 0; = p2234*p2185
- p3083: 1.05984e-5; = p2302*p1082
- p2566: 6.45051e-7; = p2370*p1014
- p1765: 0
- p2523: 6.26657e-5; = p2327*p1014
- p1975: 0.000192065; = p1970*p0001/(p0818*p0002)
- p0476: 0; = SQRT(2)*(IF((2*p0344-1)<0;-1;IF((2*p0344-1)>0;1;0))*SQRT(SQRT((2/(pi()*0.140012289)+LN(1-(2*p0344-1)^2)/2)^2-LN(1-(2*p0344-1)^2)/0.140012289)-(2/(pi()*0.140012289)+LN(1-(2*p0344-1)^2)/2)))
- p0005: 1.60934
- p1627: 0
- p1996: 30
- p2687: 0.000927125; = p2296*(p1019+p1021)
- p2507: 0.000433896; = p2311*p1123
- p3052: 7.11099e-7; = p2271*p1082
- p1897: 0
- p0671: 0
- p1787: 0
- p1702: 0
- p2835: 1.3576e-5; = p2249*(p1020+p1022)
- p2349: 0.000103663; = p2228*p2217
- p3111: 1.24316e-11; = p2330*p1023
- p3203: 0; = p2422*p1082
- p4309: 0; = p1754*p3480
- p1553: 0
- p0160: 24.77
- p2675: 0.000150872; = p2284*(p1019+p1021)
- p3327: 0; = if(and(p1232=0;p3255<>0);1-(p3323+p3324+p3325+p3326);0)
- p0763: 500; = p0103*(1+p0631*p0235/100)
- p1641: 0
- p1150: 3.16745e6; = if(p1121=0;p1149*p1146*p1145;0)
- p2633: 1.32597e-6; = p2242*(p1019+p1021)
- p0113: 61.633
- p1742: 0.403
- p2228: 0.270158; = if(p0774*p0778+p0775*p0779+p0776*p0780+p0777*p0781=0;0;p0780*p0776/(p0774*p0778+p0775*p0779+p0776*p0780+p0777*p0781))
- p0971: 0; = p0968/p0818
- p2640: 1.29409e-5; = p2249*(p1019+p1021)
- p0463: 0; = SQRT(2)*(IF((2*p0331-1)<0;-1;IF((2*p0331-1)>0;1;0))*SQRT(SQRT((2/(pi()*0.140012289)+LN(1-(2*p0331-1)^2)/2)^2-LN(1-(2*p0331-1)^2)/0.140012289)-(2/(pi()*0.140012289)+LN(1-(2*p0331-1)^2)/2)))
- p0923: 0.184282; = IF(p0918=1;0;IF(p0918+p0919>1;1-p0918;p0919))
- p2022: 0.0181866; = p2018*p2015/p0818-p2021
- p1842: 0
- p1198: 0.44
- p3273: 0.753577
- p3418: 0.0390778; = p3380*p1238
- p5338: 1.84783e-5; = p1963*p3484
- p3102: 2.65476e-9; = p2321*p1023
- p2647: 2.85262e-6; = p2256*(p1019+p1021)
- p3366: 0.00794775; = if(p1232=0;p3244*p3360/p0818;0)
- p4204: 2.30073e-7; = p1855*p3479
- p0283: 0.5
- p2750: 5.33463e-6; = p2359*(p1019+p1021)
- p1296: 0; = p1292*p1252/p0818
- p2919: 0.000109676; = p2333*(p1020+p1022)
- p2005: 420279; = p1963*p0818+p1959*1000+p1170+p1176+p1182
- p2873: 0.00179545; = p2287*(p1020+p1022)
- p2615: 0; = p2419*p1073
- p2032: 0.448886
- p0821: 1.31667
- p2067: 0.446471
- p2565: 2.93391e-7; = p2369*p1014
- p0134: 0.078
- p0247: 6.456
- p2057: 3.28794
- p2938: 1.14526e-5; = p2352*(p1129+p1131)
- p0652: 0; = IF(p0388<0.5;-SQRT(p0007*EXP(p0520^2*p0008)-p0007);SQRT(p0007*EXP(p0520^2*p0008)-p0007))
- p3277: 0.55
- p2815: 0; = p2424*(p1078+p1080)
- p1719: 0
- p0191: 30.283
- p2630: 2.1052e-6; = p2239*(p1019+p1021)
- p3566: 0; = p1835*p3476
- p1950: 4.30552e-7; = p1542*1000/p0818
- p2515: 4.46139e-5; = p2319*p1014
- p1646: 0
- p0443: 0; = SQRT(2)*(IF((2*p0311-1)<0;-1;IF((2*p0311-1)>0;1;0))*SQRT(SQRT((2/(pi()*0.140012289)+LN(1-(2*p0311-1)^2)/2)^2-LN(1-(2*p0311-1)^2)/0.140012289)-(2/(pi()*0.140012289)+LN(1-(2*p0311-1)^2)/2)))
- p3340: 0; = if(and(p1232=0;p3254<>0);p3254*(p3270-p3335)/p3338;0)
- p2860: 0; = p2274*(p1129+p1131)
- p0849: 0
- p3298: 0; = if(p1283+p1284+p1285+p1286=0;0;p1283/(p1283+p1284+p1285+p1286))
- p2299: 0.000256488; = p2227*p2206
- p0547: 0; = IF(p0283<0.5;-SQRT(p0007*EXP(p0415^2*p0008)-p0007);SQRT(p0007*EXP(p0415^2*p0008)-p0007))
- p0030: 32.964
- p1178: 9.29852e-8; = p1176/p0818
- p0049: 18.355
- p0871: 0; = p0870*p0001*p0003/(p0818*p0002)
- p3148: 1.52707e-8; = p2367*p1023
- p2240: 2.15158e-5; = p2222*p2185
- p2182: 0.00688881; = p1050/p0818
- p0862: 0; = p0674*1000/p0856
- p3363: 0.00138353; = if(p1232=0;p3244*p3357/p0818;0)
- p0662: 0; = IF(p0398<0.5;-SQRT(p0007*EXP(p0530^2*p0008)-p0007);SQRT(p0007*EXP(p0530^2*p0008)-p0007))
- p1649: 0
- p3420: 0; = p3363*p1239
- p3312: 0; = if(and(p1232=0;p3253<>0);p3261*p3277*(p3298*p3290+(1-p3298)*p3294);0)
- p0739: 0.583; = p0079*(1+p0607*p0211/100)
- p3275: 0.0214527
- p2805: 0; = p2414*(p1078+p1080)
- p0141: 106.192
- p1266: 1; = if(p1232>0;0;IF(p1259+p1263+p1264+p1265=1;0;1-(p1259+p1263+p1264+p1265)))
- p2769: 0; = p2378*(p1078+p1080)
- p1144: 0; = if(p1121=0;p1138*p0001/(p0818*p0002);0)
- p1091: 2.41439e-5; = IF(p1071=0;p1085*p0001/(p0818*p0002);0)
- p0735: 0
- p3166: 0; = p2385*p1082
- p1076: 0; = IF(p1071=0;p0714/100;0)
- p1206: 0.023475
- p1343: 0; = p1342*p0001/(p0818*p0002)
- p2863: 0.000392187; = p2277*(p1020+p1022)
- p3342: 0; = if(and(p1232=0;p3254<>0);p3254*(p3272-p3337)/p3338;0)
- p2953: 0.000539909; = p2367*(p1020+p1022)
- p0306: 0.5
- p3151: 2.08478e-11; = p2370*p1023
- p0535: 0; = SQRT(2)*(IF((2*p0403-1)<0;-1;IF((2*p0403-1)>0;1;0))*SQRT(SQRT((2/(pi()*0.140012289)+LN(1-(2*p0403-1)^2)/2)^2-LN(1-(2*p0403-1)^2)/0.140012289)-(2/(pi()*0.140012289)+LN(1-(2*p0403-1)^2)/2)))
- p1752: 0
- p2625: 0; = p2429*p1123
- p0027: 20.358
- p0284: 0.5
- p2591: 0; = p2395*p1014
- p3477: 0.0694676; = if(p1328+p1330+p1332+p1334+p1336+p1338+p1340+p1342+p1344=0;0;p1330/(p1328+p1330+p1332+p1334+p1336+p1338+p1340+p1342+p1344))
- p1240: 0; = if(p1232>0;0;IF(p1234+p1238+p1239=1;0;IF(p1234+p1238+p1239+p1237>1;1-(p1234+p1238+p1239);p1237)))
- p1628: 0
- p0382: 0.5
- p0058: 27.725
- p1331: 4.86479e-5; = p1330*p0001/(p0818*p0002)
- p3410: 0; = p3372*p1238
- p2638: 1.08303e-5; = p2247*(p1019+p1021)
- p0178: 25.256
- p2540: 3.75224e-7; = p2344*p1073
- p3372: 0; = if(p1232=0;p3245*p3360/p0818;0)
- p3427: 0; = p3370*p1239
- p2864: 6.26109e-5; = p2278*(p1020+p1022)
- p1267: 0
- p0241: 43.924
- p2511: 0.0002909; = p2315*p1014
- p3117: 1.36876e-5; = p2336*p1082
- p2010: 0.00171251; = ((p1984*p1985+p1990*p1991+p1996*p1997+p2004*p2005)/p0818)*p0005*p0002/1000
- p1879: 0
- p5138: 2.47977e-6; = p1759*p3484
- p2153: 1.72148e-7; = p2015*p2081*p2115/(p0818*1000)
- p0719: 32.076; = p0059*(1+p0587*p0191/100)
- p1193: 0; = IF(OR(p1036=0;p1095=0);0.0001*p0857;0)
- p3014: 0; = p2428*(p1129+p1131)
- p4910: 0; = p1943*p3482
- p5161: 8.2659e-7; = p1782*p3484
- p3213: 0.112803; = p1222*12.0107/100.0869
- p0914: 3.95141e7; = p0825*p0911+(p0830+p0895)*p0824*p0913
- p3356: 1.38834e7; = if(p1232=0;p3306+p3317+p3328+p3339+p3350;0)
- p1250: 0; = if(p1232>0;0;p1245*p0001/(p0818*p0002))
- p1184: 3.07462e-8; = p1182/p0818
- p2118: 0.679049
- p0749: 2.539; = p0089*(1+p0617*p0221/100)
- p3085: 5.99251e-5; = p2304*p1082
- p1295: 0; = p1291*p1252/p0818
- p2624: 0; = p2428*p1123
- p0740: 90.235; = p0080*(1+p0608*p0212/100)
- p3468: 0; = p3373*p1241
- p3084: 4.57605e-6; = p2303*p1082
- p3139: 1.09982e-9; = p2358*p1023
- p1933: 0
- p3193: 0; = p2412*p1023
- p1685: 0
- p1854: 0
- p0577: 0; = IF(p0313<0.5;-SQRT(p0007*EXP(p0445^2*p0008)-p0007);SQRT(p0007*EXP(p0445^2*p0008)-p0007))
- p2149: 3.89598e-6; = p2015*p2077*p2111/(p0818*1000)
- p2029: 4.03
- p3100: 1.4419e-9; = p2319*p1023
- p0043: 500
- p1684: 0
- p1058: 0.225
- p3196: 0; = p2415*p1082
- p1158: 0.013929; = p1156*p1157
- p1292: 0; = IF(p1287+p1290+p1291=p1261;0;p1261-(p1287+p1290+p1291))
- p2241: 2.73369e-5; = p2222*p2186
- p1785: 0
- p0342: 0.5
- p3591: 0; = p1860*p3476
- p0774: 33.513; = p0114*(1+p0642*p0246/100)
- p1270: 0; = IF(p1267=p1259;0;IF(p1267+p1268>p1259;p1259-p1267;p1268))
- p2479: 0.00012101; = p2283*p1014
- p0836: 3.27497e7; = p0831*p0835*p0801/(1-p0831)
- p0764: 91.91; = p0104*(1+p0632*p0236/100)
- p2188: 0.00194518; = p1066-p2186-p2187
- p2818: 0; = p2427*(p1078+p1080)
- p2885: 5.23132e-5; = p2299*(p1079+p1081)
- p1945: 0
- p1007: 1.56481e-5; = p1003*p0001*p0004/(p0818*p0002)
- p2161: 9.36493e-7; = p2015*p2085*p2123/(p0818*1000)
- p2059: 1.00168
- p3087: 8.72236e-7; = p2306*p1082
- p2796: 0; = p2405*(p1019+p1021)
- p1239: 0; = if(p1232>0;0;IF(p1234+p1238=1;0;IF(p1234+p1238+p1236>1;1-(p1234+p1238);p1236)))
- p0825: 2.05666e9; = p0818*p0822
- p3031: 3.79565e-9; = p2250*p1023
- p4017: 2.98198e-6; = p1874*p3478
- p2575: 0; = p2379*p1073
- p0082: 89.973
- p0511: 0; = SQRT(2)*(IF((2*p0379-1)<0;-1;IF((2*p0379-1)>0;1;0))*SQRT(SQRT((2/(pi()*0.140012289)+LN(1-(2*p0379-1)^2)/2)^2-LN(1-(2*p0379-1)^2)/0.140012289)-(2/(pi()*0.140012289)+LN(1-(2*p0379-1)^2)/2)))
- p3887: 2.99094e-8; = p1950*p3477
- p1896: 0
- p1656: 0.386667
- p3013: 0; = p2427*(p1079+p1081)
- p2910: 7.40536e-6; = p2324*(p1020+p1022)
- p2994: 0; = p2408*(p1020+p1022)
- p1974: 0; = p1969*p0001/(p0818*p0002)
- p2688: 0.000269067; = p2297*(p1078+p1080)
- p0018: 92.141
- p0783: 0
- p1254: 0; = if(p1232>0;0;p0736/100)
- p2234: 0; = 1-(p2222+p2223+p2224+p2225)
- p2019: 0.13105
- p2199: 2.00267e-5; = p1069-p2197-p2198
- p0313: 0.5
- p0860: 0; = p0672*1000/p0856
- p2060: 0.272353
- p1885: 0
- p0505: 0; = SQRT(2)*(IF((2*p0373-1)<0;-1;IF((2*p0373-1)>0;1;0))*SQRT(SQRT((2/(pi()*0.140012289)+LN(1-(2*p0373-1)^2)/2)^2-LN(1-(2*p0373-1)^2)/0.140012289)-(2/(pi()*0.140012289)+LN(1-(2*p0373-1)^2)/2)))
- p2011: 0.123719
- p2646: 1.98205e-5; = p2255*(p1019+p1021)
- p0610: 0; = IF(p0346<0.5;-SQRT(p0007*EXP(p0478^2*p0008)-p0007);SQRT(p0007*EXP(p0478^2*p0008)-p0007))
- p2595: 0; = p2399*p1014
- p1033: 1.12642e-5; = IF(p1012=0;p1027*p0001/(p0818*p0002);0)
- p4209: 3.17342e-8; = p1860*p3479
- p1955: 0
- p3401: 0.00040197; = p3363*p1238
- p0802: 490000
- p3064: 3.91099e-9; = p2283*p1023
- p3470: 4.57565e-6; = p3375*p1241
- p1626: 0
- p1092: 0; = IF(p1071=0;p1086*p0001/(p0818*p0002);0)
- p0524: 0; = SQRT(2)*(IF((2*p0392-1)<0;-1;IF((2*p0392-1)>0;1;0))*SQRT(SQRT((2/(pi()*0.140012289)+LN(1-(2*p0392-1)^2)/2)^2-LN(1-(2*p0392-1)^2)/0.140012289)-(2/(pi()*0.140012289)+LN(1-(2*p0392-1)^2)/2)))
- p1911: 0
- p1136: 0; = if(p1121=0;p1130*(p0716/100)*p0703*1000;0)
- p1705: 0
- p2767: 0; = p2376*(p1078+p1080)
- p0168: 29.763
- p3733: 2.39275e-7; = p1796*p3477
- p1090: 3.63697e-5; = IF(p1071=0;p1084*p0001/(p0818*p0002);0)
- p0108: 35.215
- p2823: 6.3021e-5; = p2237*(p1020+p1022)
- p0978: 0
- p2014: 2.84771e8; = p0833*p2011*p2013
- p1876: 0
- p3414: 6.46924e-7; = p3376*p1238
- p0591: 0; = IF(p0327<0.5;-SQRT(p0007*EXP(p0459^2*p0008)-p0007);SQRT(p0007*EXP(p0459^2*p0008)-p0007))
- p2634: 1.69627e-5; = p2243*(p1019+p1021)
- p1104: 0.382423; = IF(p1071=0;IF(p1096+p1101+p1102+p1103=1;0;1-(p1096+p1101+p1102+p1103));0)
- p1889: 0
- p1313: 0; = p1307*p1252/p0818
- p1587: 0
- p2009: 0.00745037; = ((p1983*p1985+p1989*p1991+p1995*p1997+p2003*p2005+p1976*p1977+p1978*p1979+p1998*p1999)/p0818)*p0005*p0002/1000
- p0064: 11.227
- p0565: 0; = IF(p0301<0.5;-SQRT(p0007*EXP(p0433^2*p0008)-p0007);SQRT(p0007*EXP(p0433^2*p0008)-p0007))
- p0959: 0; = if(and(p0683>0;or(p0807=480;p0807=32;p0807=1;and(p0807=60;p0901<0.03)));p0935;0)
- p3440: 0; = p3364*p1240
- p1954: 0
- p0996: 0.147897; = if(p0888=0;0;if((p0691*p0690*1000*p0692/100)/p0888>1;1;(p0691*p0690*1000*p0692/100)/p0888))
- p1427: 3
- p0513: 0; = SQRT(2)*(IF((2*p0381-1)<0;-1;IF((2*p0381-1)>0;1;0))*SQRT(SQRT((2/(pi()*0.140012289)+LN(1-(2*p0381-1)^2)/2)^2-LN(1-(2*p0381-1)^2)/0.140012289)-(2/(pi()*0.140012289)+LN(1-(2*p0381-1)^2)/2)))
- p3717: 1.01692e-6; = p1780*p3477
- p1586: 0
- p0748: 50.228; = p0088*(1+p0616*p0220/100)
- p3279: 0.37
- p2999: 0; = p2413*(p1020+p1022)
- p1219: 0; = if(p1218=0;0;SQRT(2)*(IF((2*p1218-1)<0;-1;IF((2*p1218-1)>0;1;0))*SQRT(SQRT((2/(pi()*0.140012289)+LN(1-(2*p1218-1)^2)/2)^2-LN(1-(2*p1218-1)^2)/0.140012289)-(2/(pi()*0.140012289)+LN(1-(2*p1218-1)^2)/2))))
- p2817: 0; = p2426*(p1078+p1080)
- p1181: 0.000142822
- p1251: 4.33315e-6; = if(p1232>0;0;p1246*p0001/(p0818*p0002))
- p2838: 8.33306e-8; = p2252*(p1020+p1022)
- p3202: 0; = p2421*p1082
- p1141: 1.50105e-5; = if(p1121=0;p1135*p0001/(p0818*p0002);0)
- p0696: 32.537; = p0036*(1+p0564*p0168/100)
- p2475: 0.00018873; = p2279*p1014
- p3075: 1.66728e-8; = p2294*p1023
- p1171: 0.000192065; = p0801*p0001/(p0818*p0002)
- p0955: 0; = if(and(p0683>0;or(p0807=56;p0807=100;and(p0807=60;p0901>0.06)));p0937;0)
- p0736: 0
- p2202: 0.000327123; = 4*1.00794*p2201/(2*14.0067)
- p1605: 0
- p1182: 71.4111; = p1181*p0801
- p3294: 0.279
- p3257: 0.849747
- p0533: 0; = SQRT(2)*(IF((2*p0401-1)<0;-1;IF((2*p0401-1)>0;1;0))*SQRT(SQRT((2/(pi()*0.140012289)+LN(1-(2*p0401-1)^2)/2)^2-LN(1-(2*p0401-1)^2)/0.140012289)-(2/(pi()*0.140012289)+LN(1-(2*p0401-1)^2)/2)))
- p0883: 1.92065; = p0882*p0001*p0003/(p0818*p0002)
- p0109: 4.815
- p1963k: 2.7259e-7; = p1744*p1948+p1745*p1949+p1746*p1950+p1747*p1951+p1748*p1952+p1749*p1953+p1750*p1954+p1751*p1955+p1752*p1956+p1753*p1957+p1961*p1962
- p2897: 0.000346219; = p2311*(p1129+p1131)
- p1771: 0
- p3319: 0; = if(and(p1232=0;p3253<>0);p3253*(p3263-p3314)/p3316;0)
- p2554: 3.40294e-5; = p2358*p1014
- p3247: 0
- p0373: 0.5
- p0731: 0
- p2303: 0.00011582; = p2227*p2210
- p1969: 0; = p0803
- p2877: 2.3624e-6; = p2291*(p1020+p1022)
- p2929: 0.000122373; = p2343*(p1079+p1081)
- p2505: 1.31367e-5; = p2309*p1073
- p3228: 0.000120425; = p3224*p1229
- p0854: 159868; = p0801*((1-p0853)*p0846+p0853*p0852)
- p1881: 0
- p3211: 0; = p2430*p1132
- p2832: 1.40397e-6; = p2246*(p1020+p1022)
- p1863: 0
- p2048: 1.05811e-12; = p2015*p2046/(p0818*1000000000000)
- p3160: 0; = p2379*p1082
- p0048: 6.381
- p2755: 4.35726e-5; = p2364*(p1019+p1021)
- p2926: 4.78601e-5; = p2340*(p1079+p1081)
- p2001: 400
- p2167: 0.185002; = p2166*(p0898)
- p2834: 6.33322e-5; = p2248*(p1020+p1022)
- p2030: 6.61
- p0807: 60
- p3034: 5.18189e-12; = p2253*p1023
- p1856: 0
- p1947: 0
- p0716: 24.365; = p0056*(1+p0584*p0188/100)
- p2560: 4.0003e-5; = p2364*p1014
- p0891: 226512; = IF(p3251=0;0;62.4*6272640/(12*12*12))
- p2217: 0.000383712; = p1118-p2216
- p0444: 0; = SQRT(2)*(IF((2*p0312-1)<0;-1;IF((2*p0312-1)>0;1;0))*SQRT(SQRT((2/(pi()*0.140012289)+LN(1-(2*p0312-1)^2)/2)^2-LN(1-(2*p0312-1)^2)/0.140012289)-(2/(pi()*0.140012289)+LN(1-(2*p0312-1)^2)/2)))
- p2697: 6.78273e-6; = p2306*(p1078+p1080)
- p3481: 0.27332; = if(p1328+p1330+p1332+p1334+p1336+p1338+p1340+p1342+p1344=0;0;p1338/(p1328+p1330+p1332+p1334+p1336+p1338+p1340+p1342+p1344))
- p2578: 0; = p2382*p1073
- p2230: 0; = if(p0783*p0787+p0784*p0788+p0785*p0789+p0786*p0790=0;0;p0787*p0783/(p0783*p0787+p0784*p0788+p0785*p0789+p0786*p0790))
- p2390: 0; = p2233*p2219
- p1116: 3.54169e-5; = IF(p1071=0;p1106/(p1111*p0818);0)
- p1770: 0
- p1886: 0
- p0643: 0; = IF(p0379<0.5;-SQRT(p0007*EXP(p0511^2*p0008)-p0007);SQRT(p0007*EXP(p0511^2*p0008)-p0007))
- p2730: 0.000258829; = p2339*(p1078+p1080)
- p0795: 105.882; = p0135*(1+p0663*p0267/100)
- p1327a: 0; = (p0745*1000/p0801)*(1-(p0746+p0747+p0748+p0749+p0750+p0751+p0752+p0753)/100)+(p0754*1000/p0801)*(1-(p0755+p0756+p0757+p0758+p0759+p0760+p0761+p0762)/100)
- p2283: 0.000391099; = p2223*p2189
- p0525: 0; = SQRT(2)*(IF((2*p0393-1)<0;-1;IF((2*p0393-1)>0;1;0))*SQRT(SQRT((2/(pi()*0.140012289)+LN(1-(2*p0393-1)^2)/2)^2-LN(1-(2*p0393-1)^2)/0.140012289)-(2/(pi()*0.140012289)+LN(1-(2*p0393-1)^2)/2)))
- p2414: 0; = p2235*p2204
- p1081: 0; = IF(p1071=0;IF(p1073+p1078+p1079+p1080=1;0;IF(p1073+p1078+p1079+p1080+p1077>1;1-(p1073+p1078+p1079+p1080);p1077));0)
- p2501: 9.48535e-7; = p2305*p1073
- p0870: 0; = p0858*p0856
- p1334: 33592.8; = p1322*p0801
- p3459: 0.000338873; = p3364*p1241
- p0136: 91.91
- p0912: 0
- p1046: 0.0254495; = IF(p1012=0;IF(p1037+p1044+p1045=1;0;IF(p1037+p1044+p1045+p1040>1;1-(p1037+p1044+p1045);p1040));0)
- p2928: 9.3447e-6; = p2342*(p1079+p1081)
- p2580: 0; = p2384*p1073
- p0607: 0; = IF(p0343<0.5;-SQRT(p0007*EXP(p0475^2*p0008)-p0007);SQRT(p0007*EXP(p0475^2*p0008)-p0007))
- p2856: 4.09582e-7; = p2270*(p1079+p1081)
- p1291: 0; = IF(p1287+p1290=p1264;0;IF(p1287+p1290+p1289>p1264;p1264-(p1287+p1290);p1289))
- p0504: 0; = SQRT(2)*(IF((2*p0372-1)<0;-1;IF((2*p0372-1)>0;1;0))*SQRT(SQRT((2/(pi()*0.140012289)+LN(1-(2*p0372-1)^2)/2)^2-LN(1-(2*p0372-1)^2)/0.140012289)-(2/(pi()*0.140012289)+LN(1-(2*p0372-1)^2)/2)))
- p2495: 0.000115237; = p2299*p1073
- p0841: -0.0535865
- p0734: 0
- p1263: 0; = if(p1232>0;0;IF(p1259=1;0;IF(p1259+p1260>1;1-p1259;p1260)))
- p2977: 0; = p2391*(p1129+p1131)
- p2222: 0.0258749; = if(p0765*p0769+p0766*p0770+p0767*p0771+p0768*p0772=0;0;p0769*p0765/(p0765*p0769+p0766*p0770+p0767*p0771+p0768*p0772))
- p0647: 0; = IF(p0383<0.5;-SQRT(p0007*EXP(p0515^2*p0008)-p0007);SQRT(p0007*EXP(p0515^2*p0008)-p0007))
- p0164: 40.904
- p3406: 0; = p3368*p1238
- p1060: 0.21
- p0124: 32.123
- p4616: 3.41268e-6; = p1855*p3481
- p1016: 0.17001; = IF(p1012=0;p0707/100;0)
- p0633: 0; = IF(p0369<0.5;-SQRT(p0007*EXP(p0501^2*p0008)-p0007);SQRT(p0007*EXP(p0501^2*p0008)-p0007))
- p1708: 0
- p2626: 0; = p2430*p1123
- p2137: 4.98129e-6; = p2015*p2065*p2099/(p0818*1000)
- p2331: 2.73323e-6; = p2224*p2199
- p0213: 12.384
- p2795: 0; = p2404*(p1019+p1021)
- p1466: 19
- p1077: 0; = IF(p1071=0;p0715/100;0)
- p1236: 0; = if(p1232>0;0;p0728/100)
- p1983: 50
- p3388: 0; = p3369*p1234
- p0034: 230.614
- p5234: 3.42444e-6; = p1855*p3484
- p0697: 67.463; = p0037*(1+p0565*p0169/100)
- p2846: 3.59292e-6; = p2260*(p1079+p1081)
- p3104: 8.32894e-10; = p2323*p1023
- p2085: 0.0335294
- p2004: 30
- p2280: 0.000774994; = p2223*p2186
- p0613: 0; = IF(p0349<0.5;-SQRT(p0007*EXP(p0481^2*p0008)-p0007);SQRT(p0007*EXP(p0481^2*p0008)-p0007))
- p2748: 2.91732e-5; = p2357*(p1019+p1021)
- p2122: 0.341195
- p1890: 0
- p0676: 0
- p0744: 0
- p2187: 0.000152055; = 4*1.00794*p2186/(2*14.0067)
- p2622: 0; = p2426*p1073
- p0576: 0; = IF(p0312<0.5;-SQRT(p0007*EXP(p0444^2*p0008)-p0007);SQRT(p0007*EXP(p0444^2*p0008)-p0007))
- p1594: 0
- p2295: 0.00023996; = p2223*p2202
- p2481: 3.48321e-5; = p2285*p1014
- p1858: 0
- p3328: 0; = if(and(p1232=0;p3255<>0);p3255*(p3265*p3277-p3323)/p3327;0)
- p4763: 0; = p1796*p3482
- p1290: 0; = IF(p1287=p1264;0;IF(p1287+p1288>p1264;p1264-p1287;p1288))
- p0858: 0; = p0670*1000/p0856
- p3453: 0; = p3377*p1240
- p1790: 0
- p0380: 0.5
- p0943: 0; = if(and(p0683=0;p0949=0);p0937;0)
- p2330: 1.24316e-6; = p2224*p2198
- p3098: 3.29477e-10; = p2317*p1023
- p1299: 0
- p2089: 0.40001
- p0197: 54.468
- p1841: 0
- p0937: 2.48936e-5; = p0931*p0001/(p0818*p0002)
- p2324: 2.09451e-5; = p2224*p2191
- p1872: 0
- p1970: 500000; = p0801
- p2549: 2.49416e-5; = p2353*p1123
- p2257: 9.7036e-5; = p2222*p2203
- p3070: 1.07606e-7; = p2289*p1023
- p0837: 0.5
- p0267: 6.022
- p0820: 0; = if(p0807=480;p0814;0)
- p1003: 1.6038e6; = p0999*p0888
- p2866: 0.000274007; = p2280*(p1020+p1022)
- p2366: 0.000154483; = p2225*p2195
- p1282: 0; = IF(p1277+p1280+p1281=p1260;0;p1260-(p1277+p1280+p1281))
- p2951: 0.000254798; = p2365*(p1020+p1022)
- p1185: 0.5
- p0368: 0.5
- p1747: 0
- p3358: 1.11456e6; = if(p1232=0;p3308+p3319+p3330+p3341+p3352;0)
- p1655: 0
- p3197: 0; = p2416*p1082
- p0715: 0
- p2745: 0.000241685; = p2354*(p1019+p1021)
- p3252: 0; = p1252*(p1267*(1-p3247)+p1270*(1-p3248)+p1271*(1-p3249)+p1272*(1-p3250))
- p3244: 0.99536; = p0791/100
- p3269: 0.851786
- p1623: 0
- p2963: 0; = p2377*(p1079+p1081)
- p0724: 11.227; = p0064*(1+p0592*p0196/100)
- p1786: 0
- p3490: 0; = p1759*p3476
- p3291: 0.437
- p0036: 32.537
- p4390: 0; = p1835*p3480
- p1820: 0
- p3376: 2.22663e-6; = if(p1232=0;p3246*p3358/p0818;0)
- p2806: 0; = p2415*(p1078+p1080)
- p0936: 0; = p0930*p0001/(p0818*p0002)
- p0974: 0
- p1906: 0
- p1774: 0
- p1971: 0.000188224; = p1966*p0001/(p0818*p0002)
- p2707: 6.95543e-5; = p2316*(p1019+p1021)
- p0111: 35.1
- p3783: 3.29004e-7; = p1846*p3477
- p2827: 9.66522e-6; = p2241*(p1020+p1022)
- p2246: 3.97096e-6; = p2222*p2191
- p2111: 0.856281
- p2629: 1.31867e-5; = p2238*(p1019+p1021)
- p1968: 0; = if(p0807=480;p0802*p0811;0)
- p0028: 36.834
- p3198: 0; = p2417*p1082
- p2872: 0.000322106; = p2286*(p1020+p1022)
- p1139: 1.88118e-5; = if(p1121=0;p1133*p0001/(p0818*p0002);0)
- p2686: 8.08712e-5; = p2295*(p1019+p1021)
- p1120: 0.00365182; = IF(p1071=0;p1110/(p1115*p0818);0)
- p2901: 0.000332409; = p2315*(p1020+p1022)
- p2062: 3.76588
- p2663: 0; = p2272*(p1128+p1130)
- p1040: 0.0254495
- p1937: 0
- p1008: 0; = p1004*p0001*p0004/(p0818*p0002)
- p3041: 6.96001e-7; = p2260*p1082
- p5214: 3.54253e-7; = p1835*p3484
- p1867: 0
- p1025: 125554; = IF(p1012=0;p1019*(p0704/100)*p0703*1000;0)
- p3119: 4.00876e-6; = p2338*p1082
- p2552: 7.77576e-6; = p2356*p1014
- p3330: 0; = if(and(p1232=0;p3255<>0);p3255*(p3267-p3325)/p3327;0)
- p3001: 0; = p2415*(p1079+p1081)
- p3141: 2.02493e-9; = p2360*p1023
- p3696: 6.28098e-7; = p1759*p3477
- p0900: 0.915333; = p0899/p0818
- p2666: 0; = p2275*(p1128+p1130)
- p1109: 2.97836e6; = IF(p1071=0;p1105*p1103*p1095;0)
- p0151: 0
- p3902: 3.29587e-6; = p1759*p3478
- p2850: 1.62243e-6; = p2264*(p1079+p1081)
- p0895: 6.54346e8; = p0894*p0830
- p2285: 0.000112576; = p2223*p2191
- p0784: 32.123; = p0124*(1+p0652*p0256/100)
- p2489: 0.00120328; = p2293*p1014
- p2322: 7.27653e-5; = p2224*p2189
- p2785: 0; = p2394*(p1019+p1021)
- p2439: 1.5573e-5; = p2243*p1014
- p2494: 0.000355862; = p2298*p1073
- p1783: 0
- p2420: 0; = p2235*p2210
- p0584: 0; = IF(p0320<0.5;-SQRT(p0007*EXP(p0452^2*p0008)-p0007);SQRT(p0007*EXP(p0452^2*p0008)-p0007))
- p1648: 0
- p2527: 8.45687e-7; = p2331*p1014
- p2392: 0; = p2233*p2221
- p3321: 0; = if(and(p1232=0;p3253<>0);IF((p3317+p3318+p3319+p3320)+(p3253*(p3261*(1-p3277))/p3316)>p3253;p3253-(p3317+p3318+p3319+p3320);p3253*(p3261*(1-p3277))/p3316);0)
- p2992: 0; = p2406*(p1020+p1022)
- p0352: 0.5
- p3113: 7.23552e-9; = p2332*p1023
- p3236: 0.0140975
- p1963h: 0; = p1686*p1890+p1687*p1891+p1688*p1892+p1689*p1893+p1690*p1894+p1691*p1895+p1692*p1896+p1693*p1897+p1694*p1898+p1695*p1899+p1696*p1900+p1697*p1901+p1698*p1902+p1699*p1903+p1700*p1904+p1701*p1905+p1702*p1906+p1703*p1907+p1704*p1908+p1705*p1909
- p4925: 0; = p1962*p3482
- p3191: 0; = p2410*p1023
- p0672: 0
- p0782: 24.365; = p0122*(1+p0650*p0254/100)
- p0516: 0; = SQRT(2)*(IF((2*p0384-1)<0;-1;IF((2*p0384-1)>0;1;0))*SQRT(SQRT((2/(pi()*0.140012289)+LN(1-(2*p0384-1)^2)/2)^2-LN(1-(2*p0384-1)^2)/0.140012289)-(2/(pi()*0.140012289)+LN(1-(2*p0384-1)^2)/2)))
- p0579: 0; = IF(p0315<0.5;-SQRT(p0007*EXP(p0447^2*p0008)-p0007);SQRT(p0007*EXP(p0447^2*p0008)-p0007))
- p3045: 3.14287e-7; = p2264*p1082
- p3136: 1.57417e-9; = p2355*p1023
- p0811: 0; = if(p0807=480;1-p0810;0)
- p0105: 56.899
- p2782: 0; = p2391*(p1128+p1130)
- p3315: 0; = if(and(p1232=0;p3253<>0);p3264*p3289;0)
- p0320: 0.5
- p3895: 1.04758e-9; = p1962*p3477
- p2431: 0; = p2236*p2221
- p2411: 0; = p2234*p2201
- p2607: 0; = p2411*p1014
- p0236: 4.302
- p1871: 0
- p2291: 6.68176e-6; = p2223*p2198
- p0910: 0.00604756; = p0909/p0818
- p3896: 4.68035e-6; = p1963*p3477
- p1268: 0
- p2044: 4.71429e-6; = p2015*p2042*p2043/(p0818*1000)
- p1981: 400
- p0273: 0.5
- p0578: 0; = IF(p0314<0.5;-SQRT(p0007*EXP(p0446^2*p0008)-p0007);SQRT(p0007*EXP(p0446^2*p0008)-p0007))
- p3454: 0; = p3378*p1240
- p0110: 84.264
- p0392: 0.5
- p0721: 0
- p0741: 0.578; = p0081*(1+p0609*p0213/100)
- p0506: 0; = SQRT(2)*(IF((2*p0374-1)<0;-1;IF((2*p0374-1)>0;1;0))*SQRT(SQRT((2/(pi()*0.140012289)+LN(1-(2*p0374-1)^2)/2)^2-LN(1-(2*p0374-1)^2)/0.140012289)-(2/(pi()*0.140012289)+LN(1-(2*p0374-1)^2)/2)))
- p3025: 1.37955e-10; = p2244*p1023
- p0888: 1.97648e6; = p0686*1000*p0687*p0884/100
- p3158: 0; = p2377*p1082
- p0965: 0; = IF(p0684/100=1;0;IF(p0684/100+p0685/100>1;1-p0684/100;p0685/100))
- p2237: 0.000178247; = p2222*p2182
- p0514: 0; = SQRT(2)*(IF((2*p0382-1)<0;-1;IF((2*p0382-1)>0;1;0))*SQRT(SQRT((2/(pi()*0.140012289)+LN(1-(2*p0382-1)^2)/2)^2-LN(1-(2*p0382-1)^2)/0.140012289)-(2/(pi()*0.140012289)+LN(1-(2*p0382-1)^2)/2)))
- p3341: 0; = if(and(p1232=0;p3254<>0);p3254*(p3271-p3336)/p3338;0)
- p1608: 0
- p0826: 0.1145; = 1-p0825/p0818
- p2334: 4.46453e-5; = p2224*p2202
- p0979: 0; = IF(p0976=0;0;p0976*p0001/(p0818*p0002))
- p2674: 0.000131808; = p2283*(p1019+p1021)
- p2328: 0.00200204; = p2224*p2196
- p1204: 0.980791
- p0768: 35.215; = p0108*(1+p0636*p0240/100)
- p3457: 0.00422113; = p3362*p1241
- p1567: 0
- p1220: 0; = IF(p1218<0.5;-SQRT(p1214*EXP(p1219^2*p1215)-p1214);SQRT(p1214*EXP(p1219^2*p1215)-p1214))
- p1316: 0.153715; = p1312*p1252/p0818
- p1673: 0
- p2108: 0.826583
- p1098: 0.01885
- p1078: 0.30724; = IF(p1071=0;IF(p1073=1;0;IF(p1073+p1074>1;1-p1073;p1074));0)
- p2976: 0; = p2390*(p1129+p1131)
- p0956: 0; = if(and(p0683>0;or(p0807=56;p0807=100;and(p0807=60;p0901>0.06)));p0938;0)
- p0508: 0; = SQRT(2)*(IF((2*p0376-1)<0;-1;IF((2*p0376-1)>0;1;0))*SQRT(SQRT((2/(pi()*0.140012289)+LN(1-(2*p0376-1)^2)/2)^2-LN(1-(2*p0376-1)^2)/0.140012289)-(2/(pi()*0.140012289)+LN(1-(2*p0376-1)^2)/2)))
- p3243: 2.02147e-10; = p3234*p1188*p3239/p0818
- p0282: 0.5
- p2225: 0.1041; = if(p0765*p0769+p0766*p0770+p0767*p0771+p0768*p0772=0;0;p0772*p0768/(p0765*p0769+p0766*p0770+p0767*p0771+p0768*p0772))
- p2170: 0.00485659; = p2166*(p0913)
- p4932: 0; = p1759*p3483
- p4102: 2.45596e-5; = p1963*p3478
- p2206: 0.000375565; = 9*1.00794*p2204/30.973762
- p0932: 0; = p0801*p0926
- p2097: 0.40001
- p2189: 0.000533162; = p1053/p0818
- p3449: 0; = p3373*p1240
- p1924: 0
- p0933: 28388; = p0801*p0927
- p0954: 0; = if(and(p0683>0;or(p0807=56;p0807=100;and(p0807=60;p0901>0.06)));p0936;0)
- p2612: 0; = p2416*p1073
- p1927: 0
- p2556: 6.26533e-5; = p2360*p1014
- p2219: 0.00192181; = p1154-p2218
- p2800: 0; = p2409*(p1019+p1021)
- p3024: 5.03313e-10; = p2243*p1023
- p2251: 1.43596e-7; = p2222*p2197
- p2021: 0.0027428; = p2020/p0818
- p2224: 0.136479; = if(p0765*p0769+p0766*p0770+p0767*p0771+p0768*p0772=0;0;p0771*p0767/(p0765*p0769+p0766*p0770+p0767*p0771+p0768*p0772))
- p2413: 0; = p2234*p2203
- p1303: 0; = p1297*p1252/p0818
- p0430: 0; = SQRT(2)*(IF((2*p0298-1)<0;-1;IF((2*p0298-1)>0;1;0))*SQRT(SQRT((2/(pi()*0.140012289)+LN(1-(2*p0298-1)^2)/2)^2-LN(1-(2*p0298-1)^2)/0.140012289)-(2/(pi()*0.140012289)+LN(1-(2*p0298-1)^2)/2)))
- p2364: 0.000129288; = p2225*p2192
- p2351: 0.000400756; = p2232*p2219
- p1232: 0
- p0866: 0; = IF(p0858+p0864+p0865=1;0;IF(p0858+p0864+p0865+p0861>1;1-(p0858+p0864+p0865);p0861))
- p0571: 0; = IF(p0307<0.5;-SQRT(p0007*EXP(p0439^2*p0008)-p0007);SQRT(p0007*EXP(p0439^2*p0008)-p0007))
- p0447: 0; = SQRT(2)*(IF((2*p0315-1)<0;-1;IF((2*p0315-1)>0;1;0))*SQRT(SQRT((2/(pi()*0.140012289)+LN(1-(2*p0315-1)^2)/2)^2-LN(1-(2*p0315-1)^2)/0.140012289)-(2/(pi()*0.140012289)+LN(1-(2*p0315-1)^2)/2)))
- p0180: 38.21
- p2041: 4.65569e-5; = p2015*p2040/(p0818*1000)
- p1962: 1.50801e-8; = p1960*1000/p0818
- p2710: 4.8595e-5; = p2319*(p1019+p1021)
- p0714: 0
- p1750: 0
- p1209: 96.5603; = p1206*p0818*p0822/p0801
- p2286: 0.000911037; = p2223*p2192
- p1807: 0
- p0310: 0.5
- p2388: 0; = p2229*p2217
- p2693: 8.24159e-5; = p2302*(p1078+p1080)
- p0779: 68.184; = p0119*(1+p0647*p0251/100)
- p2318: 0.000113486; = p2224*p2185
- p2984: 0; = p2398*(p1020+p1022)
- p2664: 0; = p2273*(p1128+p1130)
- p2184: 0.000241412; = p1051/p0818
- p1987: 400
- p2740: 3.18494e-5; = p2349*(p1078+p1080)
- p0195: 0
- p1341: 0; = p1340*p0001/(p0818*p0002)
- p3056: 0; = p2275*p1132
- p2771: 0; = p2380*(p1078+p1080)
- p0992: 0; = p0988*p0001*p0004/(p0818*p0002)
- p1069: 3.46852e-5; = IF(p1012=0;p1055/(p1062*p0818);0)
- p1817: 0
- p1196: 0.59
- p2000: 4000
- p1611: 0
- p2600: 0; = p2404*p1014
- p2701: 8.05127e-5; = p2310*(p1078+p1080)
- p5322: 1.18084e-7; = p1943*p3484
- p2159: 0.000189098; = p2015*p2083*p2121/(p0818*1000)
- p2079: 0.02
- p0619: 0; = IF(p0355<0.5;-SQRT(p0007*EXP(p0487^2*p0008)-p0007);SQRT(p0007*EXP(p0487^2*p0008)-p0007))
- p3677: 0; = p1946*p3476
- p2797: 0; = p2406*(p1019+p1021)
- p1005: 80371.9; = p1001*p0888
- p0765: 56.899; = p0105*(1+p0633*p0237/100)
- p0732: 0
- p3513: 0; = p1782*p3476
- p0595: 0; = IF(p0331<0.5;-SQRT(p0007*EXP(p0463^2*p0008)-p0007);SQRT(p0007*EXP(p0463^2*p0008)-p0007))
- p0818: 2.3226e9; = p0806*p0807
- p0088: 50.228
- p3463: 0; = p3368*p1241
- p1804: 0
- p2644: 1.7464e-7; = p2253*(p1019+p1021)
- p0827: 0; = p0818*p0819*p0823
- p2677: 0.000307038; = p2286*(p1019+p1021)
- p2473: 0.000343214; = p2277*p1014
- p0509: 0; = SQRT(2)*(IF((2*p0377-1)<0;-1;IF((2*p0377-1)>0;1;0))*SQRT(SQRT((2/(pi()*0.140012289)+LN(1-(2*p0377-1)^2)/2)^2-LN(1-(2*p0377-1)^2)/0.140012289)-(2/(pi()*0.140012289)+LN(1-(2*p0377-1)^2)/2)))
- p2337: 0.000313323; = p2228*p2205
- p3408: 0; = p3370*p1238
- p1967: 0; = if(p0807=480;p0802*p0810;0)
- p2302: 0.000268246; = p2227*p2209
- p2975: 0; = p2389*(p1129+p1131)
- p2759: 1.94702e-7; = p2368*(p1019+p1021)
- p1031: 4.82289e-5; = IF(p1012=0;p1025*p0001/(p0818*p0002);0)
- p2049: 25.6942
- p1821: 0
- p1902: 0
- p1830: 0
- p1619: 0
- p2472: 0.00156353; = p2276*p1014
- p0973: 0; = p0967+p0968+p0969
- p0260: 20.836
- p3123: 1.8102e-6; = p2342*p1082
- p3337: 0; = IF(or(p3254=0;p1232>0);0;p3272*p3289)
- p3210: 0; = p2429*p1132
- p5046: 0; = p1873*p3483
- p3218: 0.00566465; = p3214*p1228
- p1994: 750
- p1998: 411
- p0564: 0; = IF(p0300<0.5;-SQRT(p0007*EXP(p0432^2*p0008)-p0007);SQRT(p0007*EXP(p0432^2*p0008)-p0007))
- p0877: 0; = p0876*p0001*p0003/(p0818*p0002)
- p0840: 0.0788988; = p0839*p0831
- p2323: 8.32894e-5; = p2224*p2190
- p0843: -0.0598325
- p0801: 500000
- p0188: 16.11
- p2596: 0; = p2400*p1014
- p2456: 7.91461e-6; = p2260*p1073
- p2902: 7.29678e-5; = p2316*(p1020+p1022)
- p2102: 0.922577
- p0581: 0; = IF(p0317<0.5;-SQRT(p0007*EXP(p0449^2*p0008)-p0007);SQRT(p0007*EXP(p0449^2*p0008)-p0007))
- p2894: 3.91249e-5; = p2308*(p1079+p1081)
- p2166: 0.403363; = p2165*p0824
- p2181: 523.682; = p0887+p0889+p0893+p2180
- p2311: 0.00107937; = p2231*p2218
- p4314: 0; = p1759*p3480
- p1062: 0.16
- p2573: 0; = p2377*p1073
- p1845: 0
- p3329: 0; = if(and(p1232=0;p3255<>0);p3255*(p3266-p3324)/p3327;0)
- p0898: 0.45865
- p3065: 4.47664e-9; = p2284*p1023
- p2668: 0.00037384; = p2277*(p1019+p1021)
- p1011: 0; = p1010*p0001*p0004/(p0818*p0002)
- p0239: 24.686
- p2174: 0.00364561; = p0895*p0903/p0818
- p3189: 0; = p2408*p1023
- p1720: 0
- p1690: 0
- p1900: 0
- p0322: 0.5
- p0828: 0; = if(p0827=0;0;p0819-p0827/p0818)
- p3036: 5.88112e-10; = p2255*p1023
- p1253: 0; = if(p1232>0;0;p0735/100)
- p1333: 0.000255274; = p1332*p0001/(p0818*p0002)
- p1308: 0
- p1833: 0
- p2574: 0; = p2378*p1073
- p2923: 6.39053e-5; = p2337*(p1079+p1081)
- p2445: 1.18807e-5; = p2249*p1014
- p0930: 0; = p0801*p0924
- p2961: 0; = p2375*(p1079+p1081)
- p2939: 1.99017e-5; = p2353*(p1129+p1131)
- p3073: 1.46905e-10; = p2292*p1023
- p1603: 0
- p1963i: 0; = p1706*p1910+p1707*p1911+p1708*p1912+p1709*p1913+p1710*p1914+p1711*p1915+p1712*p1916+p1713*p1917+p1714*p1918+p1715*p1919+p1716*p1920+p1717*p1921+p1718*p1922+p1719*p1923+p1720*p1924+p1721*p1925+p1722*p1926+p1723*p1927+p1724*p1928
- p2903: 1.1649e-5; = p2317*(p1020+p1022)
- p1152: 0.415074
- p1818: 0
- p2028: 0.0025018; = p2015*p2026*p2027/(p0818*1000)
- p0760: 0
- p1915: 0
- p3450: 0; = p3374*p1240
- p0179: 29.033
- p1225: 1.088; = IF(p1221=0;0;p1223+1.2*p1224)
- p0085: 1323.07
- p2262: 4.07406e-5; = p2226*p2208
- p2063: 2.01468
- p1709: 0
- p1201: 0.65
- p0926: 0; = IF(p0918+p0923+p0924+p0925=1;0;IF(p0918+p0923+p0924+p0925+p0922>1;1-(p0918+p0923+p0924+p0925);p0922))
- p2190: 0.000610273; = 32.065*p2189/(2*14.0067)
- p2266: 1.44998e-7; = p2226*p2212
- p0290: 0.5
- p1241: 0.70946; = if(p1232>0;0;IF(p1234+p1238+p1239+p1240=1;0;1-(p1234+p1238+p1239+p1240)))
- p2426: 0; = p2235*p2216
- p1728: 0
- p1832: 0
- p3379: 6.48681e-6; = if(p1232=0;p3246*p3361/p0818;0)
- p1960: 0.035025; = IF(p1959-p1958<0;0;p1959-p1958)
- p1744: 0
- p2393: 0; = p2234*p2182
- p2809: 0; = p2418*(p1078+p1080)
- p2627: 0; = p2431*p1123
- p1792: 0
- p2448: 7.29249e-8; = p2252*p1014
- p1584: 0
- p0775: 38.208; = p0115*(1+p0643*p0247/100)
- p1018: 0.18355; = IF(p1012=0;p0709/100;0)
- p3074: 3.88895e-8; = p2293*p1023
- p1873: 3.57358e-5; = p1465*1000/p0818
- p0300: 0.5
- p1207: 212.325; = if(p1193>0;0;(p1194*p1050/p1057+p1195*p1051/p1058+p1196*p1052/p1059+p1197*p1053/p1060+p1198*p1054/p1061+p1199*p1055/p1062+p1200*p1056/p1063)/(p0702*1000)+(p1201*p1109/p1114+p1202*p1110/p1115)/(p0702*1000)+p1203*p1170/p0801+p1204*p1176/p0801)
- p2403: 0; = p2234*p2192
- p2371: 0.000551892; = p2225*p2200
- p4337: 0; = p1782*p3480
- p0246: 3.501
- p2636: 5.3218e-6; = p2245*(p1019+p1021)
- p0256: 32.602
- p1596: 0
- p0793: 0
- p5033: 0; = p1860*p3483
- p1592: 0.579333
- p3069: 1.08857e-8; = p2288*p1023
- p5252: 9.80099e-6; = p1873*p3484
- p2245: 1.57907e-5; = p2222*p2190
- p0698: 0
- p4145: 6.34684e-8; = p1796*p3479
- p3399: 0; = p3380*p1234
- p1215: 0; = IF(p1214=0;0;(p1214-1.5)/(p1214-1)^2)
- p3772: 8.97282e-8; = p1835*p3477
- p0669: 21.6068; = p0009*(1+p0537*p0141/100)
- p3387: 0; = p3368*p1234
- p3032: 1.43596e-12; = p2251*p1023
- p2112: 0.856281
- p2739: 3.55364e-6; = p2348*(p1078+p1080)
- p1339: 0.000191405; = p1338*p0001/(p0818*p0002)
- p1340: 0; = p1325*p0801
- p2641: 0.000127921; = p2250*(p1019+p1021)
- p2770: 0; = p2379*(p1078+p1080)
- p3880: 2.99094e-8; = p1943*p3477
- p1988: 750
- p3353: 4.60851e6; = if(and(p1232=0;p3256<>0);p3256*(p3276-p3348)/p3349;0)
- p1764: 0
- p1918: 0
- p2435: 1.93273e-6; = p2239*p1014
- p0919: 0.184282; = p0678*1000/p0801
- p2367: 0.00152707; = p2225*p2196
- p3245: 0; = IF(p3244=1;0;if(p3244+p0792/100>1;1-p3244;p0792/100))
- p0107: 41.17
- p3690: 0; = p1963*p3476
- p2868: 0.000504488; = p2282*(p1020+p1022)
- p2539: 0.000269566; = p2343*p1073
- p2092: 0.54529
- p0323: 0.5
- p1277: 0
- p2056: 2.07882
- p2327: 0.000202533; = p2224*p2195
- p1601: 0
- p1197: 1.806
- p2487: 2.0674e-6; = p2291*p1014
- p3221: 0.146975; = IF(p3216=0;0;p1223*12.0107/100.0869+(1-p1224)*12.0107/84.3139)
- p3241: 2.17972e-10; = p3234*p1188*p3236/p0818
- p1958: 263
- p1903: 0
- p0329: 0.5
- p1035: 1.76527e-9; = IF(p1012=0;p1029*p0001/(p0818*p0002);0)
- p0353: 0.5
- p1884: 0
- p3311: 0; = if(and(p1232=0;p3252<>0);p3252-(p3306+p3307+p3308+p3309+p3310);0)
- p3355: 3.24704e6; = if(and(p1232=0;p3256<>0);p3256-(p3350+p3351+p3352+p3353+p3354);0)
- p1146: 0.888454
- p0181: 34.34
- p1064: 0.00840099; = IF(p1012=0;p1050/(p1057*p0818);0)
- p3157: 0; = p2376*p1082
- p1056: 1.23134e7; = IF(p1012=0;p1049*p1036;0)
- p0455: 0; = SQRT(2)*(IF((2*p0323-1)<0;-1;IF((2*p0323-1)>0;1;0))*SQRT(SQRT((2/(pi()*0.140012289)+LN(1-(2*p0323-1)^2)/2)^2-LN(1-(2*p0323-1)^2)/0.140012289)-(2/(pi()*0.140012289)+LN(1-(2*p0323-1)^2)/2)))
- p0897: 0
- p0316: 0.5
- p2064: 0.676706
- p1676: 0
- p2716: 5.71254e-5; = p2325*(p1019+p1021)
- p0118: 5.339
- p1614: 0
- p0546: 0; = IF(p0282<0.5;-SQRT(p0007*EXP(p0414^2*p0008)-p0007);SQRT(p0007*EXP(p0414^2*p0008)-p0007))
- p3097: 2.0638e-9; = p2316*p1023
- p3054: 0; = p2273*p1132
- p3174: 0; = p2393*p1023
- p0047: 17.001
- p2172: 0.207486; = p2166-(p2167+p2168+p2169+p2170)
- p0220: 11.745
- p0499: 0; = SQRT(2)*(IF((2*p0367-1)<0;-1;IF((2*p0367-1)>0;1;0))*SQRT(SQRT((2/(pi()*0.140012289)+LN(1-(2*p0367-1)^2)/2)^2-LN(1-(2*p0367-1)^2)/0.140012289)-(2/(pi()*0.140012289)+LN(1-(2*p0367-1)^2)/2)))
- p2538: 2.05848e-5; = p2342*p1073
- p3476: 0; = if(p1328+p1330+p1332+p1334+p1336+p1338+p1340+p1342+p1344=0;0;p1328/(p1328+p1330+p1332+p1334+p1336+p1338+p1340+p1342+p1344))
- p1027: 29323.9; = IF(p1012=0;p1021*(p0704/100)*p0703*1000;0)
- p1631: 0.5
- p2309: 2.92388e-5; = p2227*p2216
- p2905: 5.09799e-5; = p2319*(p1020+p1022)
- p1100: 0.382423
- p2422: 0; = p2235*p2212
- p0343: 0.5
- p2631: 7.25124e-6; = p2240*(p1019+p1021)
- p1322: 0.0671855; = IF(((p0745*1000*p0749/100)+(p0754*1000*p0758/100))/p0801<0;0;((p0745*1000*p0749/100)+(p0754*1000*p0758/100))/p0801)
- p3223: 0.126838; = IF(p3216=0;0;(1-p1223)*24.3050/84.3139)
- p3172: 0; = p2391*p1132
- p3318: 0; = if(and(p1232=0;p3253<>0);p3253*(p3262-p3313)/p3316;0)
- p3325: 0; = if(and(p1232=0;p3255<>0);p3267*p3289;0)
- p3216: 0.06; = IF(OR(p1226=0;p1228=0);0;1-p3213-p3214-p3215)
- p2731: 7.20952e-5; = p2340*(p1078+p1080)
- p1653: 0
- p2264: 7.95463e-6; = p2226*p2210
- p2833: 1.13619e-5; = p2247*(p1020+p1022)
- p1330: 126644; = p1320*p0801
- p1657: 0
- p2499: 5.20367e-5; = p2303*p1073
- p3484: 0.274262; = IF(p1344=0;0;p1344/(p1328+p1330+p1332+p1334+p1336+p1338+p1340+p1342+p1344))
- p2718: 6.82576e-5; = p2327*(p1019+p1021)
- p0737: 0
- p0219: 41.091
- p2412: 0; = p2234*p2202
- p3461: 0.00563861; = p3366*p1241
- p1814: 0
- p3080: 1.01338e-5; = p2299*p1082
- p4295: 3.96678e-8; = p1946*p3479
- p2964: 0; = p2378*(p1079+p1081)
- p3180: 0; = p2399*p1023
- p2548: 1.43529e-5; = p2352*p1123
- p1297: 0
- p2231: 0.79147; = if(p0783*p0787+p0784*p0788+p0785*p0789+p0786*p0790=0;0;p0788*p0784/(p0783*p0787+p0784*p0788+p0785*p0789+p0786*p0790))
- p0242: 9.059
- p1164: 2310.23; = p1163*p0801
- p2871: 3.98024e-5; = p2285*(p1020+p1022)
- p0752: 0
- p1654: 0
- p0446: 0; = SQRT(2)*(IF((2*p0314-1)<0;-1;IF((2*p0314-1)>0;1;0))*SQRT(SQRT((2/(pi()*0.140012289)+LN(1-(2*p0314-1)^2)/2)^2-LN(1-(2*p0314-1)^2)/0.140012289)-(2/(pi()*0.140012289)+LN(1-(2*p0314-1)^2)/2)))
- p4184: 2.38007e-8; = p1835*p3479
- p2252: 2.3569e-7; = p2222*p2198
- p0158: 13.067
- p0169: 14.354
- p1740: 0
- p0374: 0.5
- p3577: 0; = p1846*p3476
- p2178: 0.0447242; = (p0895*p0831/(1-p0831))/(p0818)
- p1839: 0
- p2665: 0; = p2274*(p1128+p1130)
- p0874: 0; = p0865*p0856
- p3051: 7.93419e-8; = p2270*p1082
- p3162: 0; = p2381*p1082
- p2341: 0.000106113; = p2228*p2209
- p2455: 2.4441e-5; = p2259*p1073
- p0889: 192.844; = 1000*p0888*p0001*p0003*p0004/(p0818*p0002)
- p3472: 6.53179e-6; = p3377*p1241
- p2653: 1.25172e-5; = p2262*(p1078+p1080)
- p1311: 0; = IF(p1307+p1310=p1266;0;IF(p1307+p1310+p1309>p1266;p1266-(p1307+p1310);p1309))
- p0847: 0
- p0423: 0; = SQRT(2)*(IF((2*p0291-1)<0;-1;IF((2*p0291-1)>0;1;0))*SQRT(SQRT((2/(pi()*0.140012289)+LN(1-(2*p0291-1)^2)/2)^2-LN(1-(2*p0291-1)^2)/0.140012289)-(2/(pi()*0.140012289)+LN(1-(2*p0291-1)^2)/2)))
- p0677: 0
- p0935: 3.53941e-5; = p0929*p0001/(p0818*p0002)
- p1905: 0
- p2046: 10
- p2194: 0.214362
- p2914: 0.000707843; = p2328*(p1020+p1022)
- p1238: 0.29054; = if(p1232>0;0;IF(p1234=1;0;IF(p1234+p1235>1;1-p1234;p1235)))
- p1893: 0
- p1952: 0
- p1229: 0.000239916; = IF(p1221=0;0;p1228*p1221)
- p2942: 8.88529e-6; = p2356*(p1020+p1022)
- p3238: 0.854735; = IF(p3237+p3235+p3236>1;1-(p3235+p3236);p3237)
- p2430: 0; = p2236*p2220
- p3460: 0.00140118; = p3365*p1241
- p2179: 0; = p0970+p0971+p0972
- p1175: 0.000431935
- p2751: 6.82441e-5; = p2360*(p1019+p1021)
- p1156: 0.0640885; = p1064+p1065+p1066+p1067+p1068+p1069+p1070+p1116+p1117+p1118+p1119+p1120+p1154+p1155
- p5008: 0; = p1835*p3483
- p2522: 0.000292336; = p2326*p1014
- p1110: 2.01737e6; = IF(p1071=0;p1105*p1104*p1095;0)
- p2229: 0; = if(p0774*p0778+p0775*p0779+p0776*p0780+p0777*p0781=0;0;p0781*p0777/(p0774*p0778+p0775*p0779+p0776*p0780+p0777*p0781))
- p0950: 0; = if(and(p0683=0;or(p0807=480;p0807=32;p0807=1;and(p0807=60;p0901<0.03)));p0938;0)
- p0427: 0; = SQRT(2)*(IF((2*p0295-1)<0;-1;IF((2*p0295-1)>0;1;0))*SQRT(SQRT((2/(pi()*0.140012289)+LN(1-(2*p0295-1)^2)/2)^2-LN(1-(2*p0295-1)^2)/0.140012289)-(2/(pi()*0.140012289)+LN(1-(2*p0295-1)^2)/2)))
- p1213: 0
- p5131: 0; = p1962*p3483
- p0404: 0.5
- p0927: 0.056776; = IF(p0918+p0923+p0924+p0925+p0926=1;0;1-(p0918+p0923+p0924+p0925+p0926))
- p0432: 0; = SQRT(2)*(IF((2*p0300-1)<0;-1;IF((2*p0300-1)>0;1;0))*SQRT(SQRT((2/(pi()*0.140012289)+LN(1-(2*p0300-1)^2)/2)^2-LN(1-(2*p0300-1)^2)/0.140012289)-(2/(pi()*0.140012289)+LN(1-(2*p0300-1)^2)/2)))
- p2312: 0.00152106; = p2231*p2219
- p1287: 0
- p0286: 0.5
- p3467: 0; = p3372*p1241
- p2890: 0.000309348; = p2304*(p1079+p1081)
- p3268: 0.0232481
- p0117: 17.957
- p2424: 0; = p2235*p2214
- p0243: 25.787
- p2583: 0; = p2387*p1073
- p0106: 92.174
- p1796: 3.44442e-6; = p1388*1000/p0818
- p2271: 1.79979e-5; = p2226*p2217
- p0270: 11.113
- p0686: 263.578; = p0026*(1+p0554*p0158/100)
- p2460: 3.57393e-6; = p2264*p1073
- p1929: 0
- p0899: 2.12595e9; = p0825*p0896+(p0830+p0895)*p0824*p0898
- p1101: 0.0327715; = IF(p1071=0;IF(p1096=1;0;IF(p1096+p1097>1;1-p1096;p1097));0)
- p0006: 15
- p1169: 0.000945116
- p2733: 1.40766e-5; = p2342*(p1078+p1080)
- p2876: 1.43931e-6; = p2290*(p1020+p1022)
- p3058: 1.10925e-8; = p2277*p1023
- p2582: 0; = p2386*p1073
- p1298: 0
- p0947: 3.53941e-5; = if(and(p0683=0;or(p0807=480;p0807=32;p0807=1;and(p0807=60;p0901<0.03)));p0935;0)
- p2144: 1.2141e-5; = p2015*p2072*p2106/(p0818*1000)
- p3989: 1.72641e-6; = p1846*p3478
- p3466: 0; = p3371*p1241
- p0718: 27.725; = p0058*(1+p0586*p0190/100)
- p3259: 0.00796296
- p2469: 0; = p2273*p1123
- p3348: 0.00443516; = if(and(p1232=0;p3256<>0);p3276*p3289;0)
- p2416: 0; = p2235*p2206
- p3483: 0; = if(p1328+p1330+p1332+p1334+p1336+p1338+p1340+p1342+p1344=0;0;p1342/(p1328+p1330+p1332+p1334+p1336+p1338+p1340+p1342+p1344))
- p1148: 0.111546; = if(p1121=0;IF(p1146=1;0;1-p1146);0)
- p0966: 0; = if(p0683=0;0;IF(p0684/100+p0965=1;0;1-(p0684/100+p0965)))
- p2134: 0.000193819; = p2015*p2062*p2096/(p0818*1000)
- p0791: 99.536; = p0131*(1+p0659*p0263/100)
- p0815: 0
- p3435: 0; = p3378*p1239
- p1731: 0
- p3047: 5.72888e-9; = p2266*p1082
- p0961: 0; = if(and(p0683>0;or(p0807=480;p0807=32;p0807=1;and(p0807=60;p0901<0.03)));p0937;0)
- p2066: 0.109412
- p1686: 0
- p0733: 0
- p1779: 0
- p0184: 17.048
- p1610: 0
- p3018: 1.78247e-9; = p2237*p1023
- p3242: 1.32157e-8; = p3234*p1188*p3238/p0818
- p2918: 0.000255819; = p2332*(p1020+p1022)
- p2826: 7.60711e-6; = p2240*(p1020+p1022)
- p2635: 4.64936e-6; = p2244*(p1019+p1021)
- p1985: 1.41169e8; = (if(p1057=0;0;p1050/p1057)+if(p1058=0;0;p1051/p1058)+if(p1059=0;0;p1052/p1059)+if(p1060=0;0;p1053/p1060)+if(p1061=0;0;p1054/p1061)+if(p1062=0;0;p1055/p1062)+if(p1063=0;0;p1056/p1063))*(1+p1157)
- p2510: 9.46653e-5; = p2314*p1123
- p2528: 0.000223874; = p2332*p1014
- p4607: 1.29446e-6; = p1846*p3481
- p2116: 0.444424
- p2037: 1.99
- p0925: 0.12961; = IF(p0918+p0923+p0924=1;0;IF(p0918+p0923+p0924+p0921>1;1-(p0918+p0923+p0924);p0921))
- p1824: 0
- p1964: 0.5
- p3175: 0; = p2394*p1023
- p2553: 2.67832e-5; = p2357*p1014
- p1208: 0; = p1205*p0818*p0822/p0801
- p1801: 0
- p2632: 9.21307e-6; = p2241*(p1019+p1021)
- p2861: 0; = p2275*(p1129+p1131)
- p1285: 0; = p1281*p1252/p0818
- p3248: 0
- p1598: 0
- p2545: 4.65747e-5; = p2349*p1073
- p2525: 2.34349e-7; = p2329*p1014
- p3332: 0; = if(and(p1232=0;p3255<>0);IF((p3328+p3329+p3330+p3331)+(p3255*(p3265*(1-p3277))/p3327)>p3255;p3255-(p3328+p3329+p3330+p3331);p3255*(p3265*(1-p3277))/p3327);0)
- p3306: 0; = if(and(p1232=0;p3252<>0);p3252*(p3257*p3277-p3301)/p3305;0)
- p0294: 0.5
- p0753: 0
- p2989: 0; = p2403*(p1020+p1022)
- p1791: 0
- p2762: 0.000185999; = p2371*(p1019+p1021)
- p1892: 0
- p0059: 32.076
- p2350: 0.000284384; = p2232*p2218
- p2378: 0; = p2229*p2207
- p3120: 3.32845e-5; = p2339*p1082
- p1860: 1.72221e-6; = p1452*1000/p0818
- p1203: 3
- p2503: 2.28386e-5; = p2307*p1073
- p2154: 1.3416e-5; = p2015*p2082*p2116/(p0818*1000)
- p0573: 0; = IF(p0309<0.5;-SQRT(p0007*EXP(p0441^2*p0008)-p0007);SQRT(p0007*EXP(p0441^2*p0008)-p0007))
- p0922: 0; = p0677*1000/p0801
- p0089: 2.539
- p2205: 0.00115978; = 2*14.0067*p2204/30.973762
- p2243: 5.03313e-5; = p2222*p2188
- p2957: 0.000195127; = p2371*(p1020+p1022)
- p4195: 8.72691e-8; = p1846*p3479
- p0020: 314.666
- p1940: 0
- p2432: 0.013929; = p1158
- p1257: 0; = if(p1232>0;0;IF(p1253+p1256=1;0;IF(p1253+p1256+p1255>1;1-(p1253+p1256);p1255)))
- p2402: 0; = p2234*p2191
- p0951: 1.09047e-5; = if(and(p0683=0;or(p0807=480;p0807=32;p0807=1;and(p0807=60;p0901<0.03)));p0939;0)
- p2383: 0; = p2229*p2212
- p0120: 35.807
- p1780: 1.46388e-5; = p1372*1000/p0818
- p0710: 61.633; = p0050*(1+p0578*p0182/100)
- p2387: 0; = p2229*p2216
- p1679: 0
- p2008: 0.0428128; = ((p1982*p1985+p1988*p1991+p1994*p1997+p2002*p2005)/p0818)*p0005*p0002/1000
- p1838: 0
- p3274: 0.0768939
- p1659: 0
- p1275: 0; = p1271*p1252/p0818
- p0879: 0; = p0878*p0001*p0003/(p0818*p0002)
- p0128: 77.031
- p2681: 1.37198e-6; = p2290*(p1019+p1021)
- p0829: 0; = if(p0807=480;p0814*(1-p0824);0)
- p1224: 0.44; = IF(p1221=0;0;IF(p1193=0;1-p1223;0))
- p1124: 0.27725; = if(p1121=0;p0718/100;0)
- p1284: 0; = p1280*p1252/p0818
- p2878: 5.19399e-6; = p2292*(p1020+p1022)
- p3163: 0; = p2382*p1082
- p4917: 0; = p1950*p3482
- p2454: 2.70238e-5; = p2258*p1073
- p1273: 0; = p1267*p1252/p0818
- p1638: 0
- p2812: 0; = p2421*(p1078+p1080)
- p0031: 13.256
- p3214: 0.376406; = p1222*40.078/100.0869
- p0292: 0.5
- p3251: 3.12391e8; = p1252-(p3252+p3253+p3254+p3255+p3256)
- p3209: 0; = p2428*p1132
- p2438: 1.21734e-6; = p2242*p1014
- p1234: 0; = if(p1232>0;0;p0726/100)
- p1953: 0
- p3207: 0; = p2426*p1082
- p0570: 0; = IF(p0306<0.5;-SQRT(p0007*EXP(p0438^2*p0008)-p0007);SQRT(p0007*EXP(p0438^2*p0008)-p0007))
- p1776: 0
- p1874: 8.18049e-6; = p1466*1000/p0818
- p0788: 77.031; = p0128*(1+p0656*p0260/100)
- p2211: 0.00222086; = p1120-p2209-p2208-p2210
- p2423: 0; = p2235*p2213
- p3370: 0; = if(p1232=0;p3245*p3358/p0818;0)
- p2882: 0.000972626; = p2296*(p1020+p1022)
- p1908: 0
- p3307: 0; = if(and(p1232=0;p3252<>0);p3252*(p3258-p3302)/p3305;0)
- p2547: 0.0001611; = p2351*p1123
- p0773: 61.633; = p0113*(1+p0641*p0245/100)
- p0296: 0.5
- p3360: 1.85455e7; = if(p1232=0;p3310+p3321+p3332+p3343+p3354;0)
- p0804: 0
- p1143: 0; = if(p1121=0;p1137*p0001/(p0818*p0002);0)
- p0673: 0
- p0460: 0; = SQRT(2)*(IF((2*p0328-1)<0;-1;IF((2*p0328-1)>0;1;0))*SQRT(SQRT((2/(pi()*0.140012289)+LN(1-(2*p0328-1)^2)/2)^2-LN(1-(2*p0328-1)^2)/0.140012289)-(2/(pi()*0.140012289)+LN(1-(2*p0328-1)^2)/2)))
- p1689: 0
- p0967: 0
- p2788: 0; = p2397*(p1019+p1021)
- p0908: 0.00197823
- p2290: 4.07092e-6; = p2223*p2197
- p3101: 2.07522e-10; = p2320*p1023
- p3107: 9.44819e-9; = p2326*p1023
- p2298: 0.000792054; = p2227*p2205
- p1059: 0.335
- p1639: 0
- p2391: 0; = p2233*p2220
- p2045: 30
- p1228: 0.0150493; = IF(p1221=0;0;p0801*p1212*2000/(p1222+p1221*p1225)/p0818)
- p0312: 0.5
- p3448: 0; = p3372*p1240
- p2790: 0; = p2399*(p1019+p1021)
- p2988: 0; = p2402*(p1020+p1022)
- p2443: 9.94308e-6; = p2247*p1014
- p0750: 0
- p4089: 7.84731e-7; = p1946*p3478
- p2813: 0; = p2422*(p1078+p1080)
- p3436: 0; = p3379*p1239
- p3381: 0; = p3362*p1234
- p1438: 11
- p2558: 1.96566e-5; = p2362*p1014
- p2055: 5.59471
- p1023: 1e-5; = IF(p1012=0;IF(p1014+p1019+p1020+p1021+p1022=1;0;1-(p1014+p1019+p1020+p1021+p1022));0)
- p0639: 0; = IF(p0375<0.5;-SQRT(p0007*EXP(p0507^2*p0008)-p0007);SQRT(p0007*EXP(p0507^2*p0008)-p0007))
- p2655: 2.44398e-6; = p2264*(p1078+p1080)
- p3338: 0; = if(and(p1232=0;p3254<>0);1-(p3334+p3335+p3336+p3337);0)
- p0968: 0
- p0894: 0.28
- p1948: 0
- p2931: 1.78118e-6; = p2345*(p1079+p1081)
- p2139: 2.93085e-5; = p2015*p2067*p2101/(p0818*1000)
- p2362: 6.35292e-5; = p2225*p2190
- p2714: 2.80702e-5; = p2323*(p1019+p1021)
- p1794: 0
- p0859: 0; = p0671*1000/p0856
- p1452: 4
- p2354: 0.000717123; = p2225*p2182
- p0832: 3.70988e8; = p0831*p0830/(1-p0831)
- p2126: 7.69222e-5; = p2015*p2054*p2088/(p0818*1000)
- p3469: 1.96773e-5; = p3374*p1241
- p2959: 1.20399e-5; = p2373*(p1020+p1022)
- p0114: 33.513
- p2773: 0; = p2382*(p1078+p1080)
- p0850: 0
- p1616: 0
- p3437: 0; = p3380*p1239
- p2650: 1.67136e-5; = p2259*(p1078+p1080)
- p0161: 14.444
- p0770: 84.264; = p0110*(1+p0638*p0242/100)
- p0700: 0
- p4498: 0; = p1943*p3480
- p1663: 0
- p2987: 0; = p2401*(p1020+p1022)
- p2342: 4.58163e-5; = p2228*p2210
- p0641: 0; = IF(p0377<0.5;-SQRT(p0007*EXP(p0509^2*p0008)-p0007);SQRT(p0007*EXP(p0509^2*p0008)-p0007))
- p1925: 0
- p2845: 1.10952e-5; = p2259*(p1079+p1081)
- p1276: 0; = p1272*p1252/p0818
- p0636: 0; = IF(p0372<0.5;-SQRT(p0007*EXP(p0504^2*p0008)-p0007);SQRT(p0007*EXP(p0504^2*p0008)-p0007))
- p0806: 3.871e7
- p0309: 0.5
- p2618: 0; = p2422*p1073
- p0415: 0; = SQRT(2)*(IF((2*p0283-1)<0;-1;IF((2*p0283-1)>0;1;0))*SQRT(SQRT((2/(pi()*0.140012289)+LN(1-(2*p0283-1)^2)/2)^2-LN(1-(2*p0283-1)^2)/0.140012289)-(2/(pi()*0.140012289)+LN(1-(2*p0283-1)^2)/2)))
- p1556: 0
- p2657: 4.45493e-8; = p2266*(p1078+p1080)
- p2104: 0.817136
- p3011: 0; = p2425*(p1079+p1081)
- p2227: 0.682937; = if(p0774*p0778+p0775*p0779+p0776*p0780+p0777*p0781=0;0;p0779*p0775/(p0774*p0778+p0775*p0779+p0776*p0780+p0777*p0781))
- p0929: 92141; = p0801*p0923
- p3417: 1.88468e-6; = p3379*p1238
- p0856: 500000; = p0801
- p1757: 0
- p2385: 0; = p2229*p2214
- p1233: 0; = p1232*p0001/(p0818*p0002)
- p2195: 0.00148399; = p2194*p2193
- p4557: 9.41428e-7; = p1796*p3481
- p2530: 1.38137e-5; = p2334*p1014
- p1300: 0; = IF(p1297=p1265;0;IF(p1297+p1298>p1265;p1265-p1297;p1298))
- p2007: 0.0228335; = ((p1981*p1985+p1987*p1991+p1993*p1997+p2001*p2005)/p0818)*p0005*p0002/1000
- p1782: 3.01386e-6; = p1374*1000/p0818
- p2689: 0.000243351; = p2298*(p1078+p1080)
- p3281: 0.46
- p3114: 3.10204e-9; = p2333*p1023
- p1721: 0
- p2307: 5.08326e-5; = p2227*p2214
- p2779: 0; = p2388*(p1078+p1080)
- p2109: 0.826583
- p0314: 0.5
- p3605: 0; = p1874*p3476
- p3022: 2.73369e-10; = p2241*p1023
- p2760: 3.19572e-7; = p2369*(p1019+p1021)
- p3276: 0.0887032
- p0942: 0; = if(and(p0683=0;p0948=0);p0936;0)
- p2162: 1.72512e-6; = p2015*p2086*p2124/(p0818*1000)
- p3397: 0; = p3378*p1234
- p3128: 2.99814e-6; = p2347*p1082
- p2463: 6.81224e-7; = p2267*p1073
- p3015: 0; = p2429*(p1129+p1131)
- p3038: 9.7036e-10; = p2257*p1023
- p2966: 0; = p2380*(p1079+p1081)
- p2781: 0; = p2390*(p1128+p1130)
- p2569: 1.05364e-5; = p2373*p1014
- p1831: 0
- p1729: 0
- p1878: 0
- p3062: 1.11539e-9; = p2281*p1023
- p0037: 67.463
- p2729: 3.11732e-5; = p2338*(p1078+p1080)
- p3352: 1.11456e6; = if(and(p1232=0;p3256<>0);p3256*(p3275-p3347)/p3349;0)
- p1732: 0
- p2270: 2.00815e-6; = p2226*p2216
- p2458: 1.83044e-5; = p2262*p1073
- p2721: 4.18971e-7; = p2330*(p1019+p1021)
- p0756: 0
- p1935: 0
- p2421: 0; = p2235*p2211
- p2802: 0; = p2411*(p1019+p1021)
- p3478: 0.364523; = if(p1328+p1330+p1332+p1334+p1336+p1338+p1340+p1342+p1344=0;0;p1332/(p1328+p1330+p1332+p1334+p1336+p1338+p1340+p1342+p1344))
- p4520: 2.47125e-6; = p1759*p3481
- p1044: 0.0115234; = IF(p1012=0;IF(p1037=1;0;IF(p1037+p1038>1;1-p1037;p1038));0)
- p2081: 0.0019
- p3195: 0; = p2414*p1082
- p2452: 2.61893e-6; = p2256*p1014
- p1037: 0.328824
- p2409: 0; = p2234*p2199
- p1834: 0
- p0484: 0; = SQRT(2)*(IF((2*p0352-1)<0;-1;IF((2*p0352-1)>0;1;0))*SQRT(SQRT((2/(pi()*0.140012289)+LN(1-(2*p0352-1)^2)/2)^2-LN(1-(2*p0352-1)^2)/0.140012289)-(2/(pi()*0.140012289)+LN(1-(2*p0352-1)^2)/2)))
- p1447: 29
- p2679: 0.000366871; = p2288*(p1019+p1021)
- p3010: 0; = p2424*(p1079+p1081)
- p1713: 0
- p3455: 0; = p3379*p1240
- p0823: 0
- p1715: 0
- p0705: 30.941; = p0045*(1+p0573*p0177/100)
- p0507: 0; = SQRT(2)*(IF((2*p0375-1)<0;-1;IF((2*p0375-1)>0;1;0))*SQRT(SQRT((2/(pi()*0.140012289)+LN(1-(2*p0375-1)^2)/2)^2-LN(1-(2*p0375-1)^2)/0.140012289)-(2/(pi()*0.140012289)+LN(1-(2*p0375-1)^2)/2)))
- p3349: 0.816024; = if(and(p1232=0;p3256<>0);1-(p3345+p3346+p3347+p3348);0)
- p1815: 0
- p1205: 0
- p3021: 2.15158e-10; = p2240*p1023
- p0138: 61.633
- p0163: 51.514
- p2504: 8.61856e-5; = p2308*p1073
- p1000: 0; = IF(p0996+p0999=1;0;IF(p0996+p0999+p0998>1;1-(p0996+p0999);p0998))
- p3067: 9.11037e-9; = p2286*p1023
- p1999: 3.55131e7; = (p1228+p1229)*p0818+p1164
- p3674: 0; = p1943*p3476
- p3020: 6.24651e-11; = p2239*p1023
- p2086: 0.0617647
- p3462: 0.000987237; = p3367*p1241
- p0885: 0; = IF(p0689+p0884=100;0;100-(p0689+p0884))
- p0140: 24.365
- p0402: 0.5
- p4707: 5.88392e-7; = p1946*p3481
- p2093: 0.260958
- p0321: 0.5
- p1374: 7
- p3235: 0.118093
- p0615: 0; = IF(p0351<0.5;-SQRT(p0007*EXP(p0483^2*p0008)-p0007);SQRT(p0007*EXP(p0483^2*p0008)-p0007))
- p0001: 0.404686
- p1870: 0
- p2709: 3.82472e-5; = p2318*(p1019+p1021)
- p2526: 3.84647e-7; = p2330*p1014
- p1963e: 4.91776e-6; = p1628*p1832+p1629*p1833+p1630*p1834+p1631*p1835+p1632*p1836+p1633*p1837+p1634*p1838+p1635*p1839+p1636*p1840+p1637*p1841+p1638*p1842+p1639*p1843+p1640*p1844+p1641*p1845+p1642*p1846+p1643*p1847+p1644*p1848+p1645*p1849+p1646*p1850
- p1692: 0
- p0537: 0; = IF(p0273<0.5;-SQRT(p0007*EXP(p0405^2*p0008)-p0007);SQRT(p0007*EXP(p0405^2*p0008)-p0007))
- p2588: 0; = p2392*p1123
- p2857: 3.67086e-6; = p2271*(p1079+p1081)
- p3424: 0; = p3367*p1239
- p3079: 3.12941e-5; = p2298*p1082
- p2114: 0.832356
- p3169: 0; = p2388*p1082
- p1707: 0
- p2559: 4.94312e-6; = p2363*p1014
- p3434: 0; = p3377*p1239
- p2537: 4.76757e-5; = p2341*p1073
- p1630: 0
- p0687: 20.358; = p0027*(1+p0555*p0159/100)
- p2621: 0; = p2425*p1073
- p4429: 0; = p1874*p3480
- p2652: 4.49378e-5; = p2261*(p1078+p1080)
- p0217: 5.461
- p1307: 0
- p3005: 0; = p2419*(p1079+p1081)
- p0395: 0.5
- p3250: 0.875
- p0824: 0.863
- p1723: 0
- p2690: 7.88032e-5; = p2299*(p1078+p1080)
- p2617: 0; = p2421*p1073
- p1928: 0
- p1899: 0
- p5253: 2.2436e-6; = p1874*p3484
- p0249: 5.373
- p2736: 2.68313e-6; = p2345*(p1078+p1080)
- p1687: 0
- p2699: 5.89367e-5; = p2308*(p1078+p1080)
- p1714: 0
- p2819: 0; = p2428*(p1128+p1130)
- p1802: 0
- p3125: 3.29967e-8; = p2344*p1082
- p2726: 0.000172495; = p2335*(p1019+p1021)
- p0792: 0
- p3419: 0; = p3362*p1239
- p1597: 0
- p1923: 0
- p3283: 0.3
- p1258: 1; = if(p1232>0;0;IF(p1253+p1256+p1257=1;0;1-(p1253+p1256+p1257)))
- p2272: 0; = p2230*p2218
- p2821: 0; = p2430*(p1128+p1130)
- p2321: 0.000265476; = p2224*p2188
- p4131: 5.55349e-8; = p1782*p3479
- p3176: 0; = p2395*p1023
- p2282: 0.00142688; = p2223*p2188
- p1129: 0.32076; = if(p1121=0;IF(p1123+p1128=1;0;IF(p1123+p1128+p1125>1;1-(p1123+p1128);p1125));0)
- p1944: 0
- p1805: 0
- p3023: 3.93439e-11; = p2242*p1023
- p3361: 3.24704e6; = if(p1232=0;p3311+p3322+p3333+p3344+p3355;0)
- p2058: 1.24412
- p3299: 0; = if(p1303+p1304+p1305+p1306=0;0;p1303/(p1303+p1304+p1305+p1306))
- p2256: 8.46426e-6; = p2222*p2202
- p1342: 0; = p1326*p0801
- p1161: 500000; = p0801
- p3237: 0.854735
- p0848: 0
- p2587: 0; = p2391*p1123
- p0575: 0; = IF(p0311<0.5;-SQRT(p0007*EXP(p0443^2*p0008)-p0007);SQRT(p0007*EXP(p0443^2*p0008)-p0007))
- p0778: 5.339; = p0118*(1+p0646*p0250/100)
- p1227: 0.000192065; = IF(p1221=0;0;p1226*p0001/(p0818*p0002))
- p3346: 0.0178625; = if(and(p1232=0;p3256<>0);p3274*(p3281*(p3285*p1256+p3286*(p1253+p1257)+p1258*p3288));0)
- p2433: 5.51514e-5; = p2237*p1014
- p1986: 4200
- p2254: 0.000137177; = p2222*p2200
- p2249: 3.8398e-5; = p2222*p2195
- p2094: 0.922577
- p2672: 3.75909e-5; = p2281*(p1019+p1021)
- p1566: 0
- p0112: 31.3
- p2023: 2.12
- p3394: 0; = p3375*p1234
- p0401: 0.5
- p2200: 0.00530157; = p1056/p0818
- p0237: 21.23
- p0003: 10000
- p2892: 4.50269e-6; = p2306*(p1079+p1081)
- p1088: 12175.6; = IF(p1071=0;p1082*(p0710/100)*p0703*1000;0)
- p0372: 0.5
- p3249: 0
- p1593: 0
- p1028: 84350.4; = IF(p1012=0;p1022*(p0704/100)*p0703*1000;0)
- p0777: 17.957; = p0117*(1+p0645*p0249/100)
- p1877: 0
- p2698: 1.56178e-5; = p2307*(p1078+p1080)
- p0377: 0.5
- p0269: 7.281
- p0989: 3.32535e6; = p0985*p0886
- p1946: 2.15276e-6; = p1538*1000/p0818
- p1344: 500000; = IF(p1318=0;p1327*p0801;0)
- p0560: 0; = IF(p0296<0.5;-SQRT(p0007*EXP(p0428^2*p0008)-p0007);SQRT(p0007*EXP(p0428^2*p0008)-p0007))
- p1741: 0
- p0383: 0.5
- p3091: 1.03537e-5; = p2310*p1082
- p3145: 1.29288e-9; = p2364*p1023
- p2088: 0.798875
- p2811: 0; = p2420*(p1078+p1080)
- p1055: 12889.6; = IF(p1012=0;p1048*p1036;0)
- p4401: 0; = p1846*p3480
- p2585: 0; = p2389*p1123
- p1248: 1.77452e-6; = if(p1232>0;0;p1243*p0001/(p0818*p0002))
- p2203: 0.0037502; = p1070-p2200-p2201-p2202
- p1618: 0
- p1966: 490000; = if(p0814=0;p0802;0)
- p3367: 0.00139153; = if(p1232=0;p3244*p3361/p0818;0)
- p2467: 8.0863e-6; = p2271*p1073
- p1095: 1.20875e7; = IF(p1071=0;p0797*p0702*1000*p0798/100;0)
- p1247: 0; = if(p1232>0;0;p1242*p0001/(p0818*p0002))
- p0725: 3.18; = p0065*(1+p0593*p0197/100)
- p4543: 8.23749e-7; = p1782*p3481
- p1216: 0
- p0692: 66.896; = p0032*(1+p0560*p0164/100)
- p3300: 0; = if(p1293+p1294+p1295+p1296=0;0;p1293/(p1293+p1294+p1295+p1296))
- p0555: 0; = IF(p0291<0.5;-SQRT(p0007*EXP(p0423^2*p0008)-p0007);SQRT(p0007*EXP(p0423^2*p0008)-p0007))
- p1844: 0
- p1843: 0
- p0689: 63.166; = p0029*(1+p0557*p0161/100)
- p1166: 9.94675e-7; = p1164/p0818
- p2514: 3.51138e-5; = p2318*p1014
- p1265: 0; = if(p1232>0;0;IF(p1259+p1263+p1264=1;0;IF(p1259+p1263+p1264+p1262>1;1-(p1259+p1263+p1264);p1262)))
- p2900: 7.55363e-5; = p2314*(p1129+p1131)
- p2803: 0; = p2412*(p1019+p1021)
- p2115: 0.856281
- p3208: 0; = p2427*p1082
- p0769: 4.815; = p0109*(1+p0637*p0241/100)
- p2466: 9.0224e-7; = p2270*p1073
- p2744: 1.72021e-5; = p2353*(p1128+p1130)
- p0483: 0; = SQRT(2)*(IF((2*p0351-1)<0;-1;IF((2*p0351-1)>0;1;0))*SQRT(SQRT((2/(pi()*0.140012289)+LN(1-(2*p0351-1)^2)/2)^2-LN(1-(2*p0351-1)^2)/0.140012289)-(2/(pi()*0.140012289)+LN(1-(2*p0351-1)^2)/2)))
- p3923: 5.33617e-6; = p1780*p3478
- p0842: 0.113186
- p1681: 0
- p1574: 0
- p2296: 0.00275095; = p2223*p2203
- p3122: 4.19254e-6; = p2341*p1082
- p3314: 0; = if(and(p1232=0;p3253<>0);p3263*p3289;0)
- p2316: 0.00020638; = p2224*p2183
- p1318: 0; = p1317*p0001/(p0818*p0002)
- p2274: 0; = p2230*p2220
- p3229: 9.94675e-7; = p1164/p0818
- p0873: 0; = p0872*p0001*p0003/(p0818*p0002)
- p0510: 0; = SQRT(2)*(IF((2*p0378-1)<0;-1;IF((2*p0378-1)>0;1;0))*SQRT(SQRT((2/(pi()*0.140012289)+LN(1-(2*p0378-1)^2)/2)^2-LN(1-(2*p0378-1)^2)/0.140012289)-(2/(pi()*0.140012289)+LN(1-(2*p0378-1)^2)/2)))
- p1105: 0.436421
- p2100: 0.705744
- p2830: 4.87753e-6; = p2244*(p1020+p1022)
- p1024: 142189; = IF(p1012=0;p1014*(p0704/100)*p0703*1000;0)
- p2259: 5.43991e-5; = p2226*p2205
- p2789: 0; = p2398*(p1019+p1021)
- p1695: 0
- p1645: 0
- p3380: 0.134501; = p3251/p0818
- p1665: 0
- p2336: 0.000346434; = p2228*p2204
- p2922: 7.06586e-5; = p2336*(p1079+p1081)
- p1103: 0.564594; = IF(p1071=0;IF(p1096+p1101+p1102=1;0;IF(p1096+p1101+p1102+p1099>1;1-(p1096+p1101+p1102);p1099));0)
- p0426: 0; = SQRT(2)*(IF((2*p0294-1)<0;-1;IF((2*p0294-1)>0;1;0))*SQRT(SQRT((2/(pi()*0.140012289)+LN(1-(2*p0294-1)^2)/2)^2-LN(1-(2*p0294-1)^2)/0.140012289)-(2/(pi()*0.140012289)+LN(1-(2*p0294-1)^2)/2)))
- p2277: 0.00110925; = p2223*p2183
- p1990: 30
- p0212: 2.973
- p3187: 0; = p2406*p1023
- p2875: 0.00380451; = p2289*(p1020+p1022)
- p1191: 0.5
- p1670: 0.74211
- p1943: 4.30552e-7; = p1535*1000/p0818
- p2965: 0; = p2379*(p1079+p1081)
- p3375: 6.44949e-6; = if(p1232=0;p3246*p3357/p0818;0)
- p1909: 0
- p2765: 0.000131571; = p2374*(p1019+p1021)
- p3368: 0; = if(p1232=0;p3245*p3356/p0818;0)
- p0345: 0.5
- p1317: 0
- p2619: 0; = p2423*p1073
- p2695: 0.000465993; = p2304*(p1078+p1080)
- p0670: 0
- p2169: 0.000797944; = p2166*(p0908)
- p3320: 0; = if(and(p1232=0;p3253<>0);p3253*(p3264-p3315)/p3316;0)
- p1672: 0
- p1828: 0
- p3430: 0; = p3373*p1239
- p1745: 0
- p2550: 0.000221885; = p2354*p1014
- p2226: 0.0469048; = if(p0774*p0778+p0775*p0779+p0776*p0780+p0777*p0781=0;0;p0778*p0774/(p0774*p0778+p0775*p0779+p0776*p0780+p0777*p0781))
- p3354: 1.85455e7; = IF((p3350+p3351+p3352+p3353)+IF(p3349=0;0;(p3256*(p3273*(1-p3277))/p3349))>p3256;p3256-(p3350+p3351+p3352+p3353);IF(p3349=0;0;p3256*(p3273*(1-p3277))/p3349))
- p3289: 0.05
- p2146: 2.18654e-6; = p2015*p2074*p2108/(p0818*1000)
- p3480: 0; = if(p1328+p1330+p1332+p1334+p1336+p1338+p1340+p1342+p1344=0;0;p1336/(p1328+p1330+p1332+p1334+p1336+p1338+p1340+p1342+p1344))
- p1997: 1.0615e7; = (if(p1152=0;0;p1150/p1152)+if(p1153=0;0;p1151/p1153))*(1+p1157)
- p3231: 9.29852e-8; = p1176/p0818
- p0640: 0; = IF(p0376<0.5;-SQRT(p0007*EXP(p0508^2*p0008)-p0007);SQRT(p0007*EXP(p0508^2*p0008)-p0007))
- p2120: 0.51828
- p0386: 0.5
- p1712: 0
- p0958: 0; = if(and(p0683>0;or(p0807=480;p0807=32;p0807=1;and(p0807=60;p0901<0.03)));p0934;0)
- p1961: 0.5
- p2374: 0.000390395; = p2225*p2203
- p0972: 0; = p0969/p0818
- p0729: 0
- p2848: 8.30946e-6; = p2262*(p1079+p1081)
- p3227: 3.04305e-5; = p3223*p1229
- p1666: 0
- p0745: 1323.07; = p0085*(1+p0613*p0217/100)
- p1951: 0
- p1576: 0.47191
- p1052: 2.45383e6; = IF(p1012=0;p1045*p1036;0)
- p0266: 49.984
- p1168: 4.97337e-7; = p1164*p1167/p0818
- p2944: 3.88851e-5; = p2358*(p1020+p1022)
- p3456: 0; = p3380*p1240
- p1306: 0; = p1302*p1252/p0818
- p1015: 0.27321; = IF(p1012=0;p0706/100;0)
- p3304: 0; = if(and(p1232=0;p3252<>0);p3260*p3289;0)
- p0251: 12.78
- p1019: 0.27321; = IF(p1012=0;IF(p1014=1;0;IF(p1014+p1015>1;1-p1014;p1015));0)
- p3527: 0; = p1796*p3476
- p2247: 3.21356e-5; = p2222*p2192
- p0384: 0.5
- p0644: 0; = IF(p0380<0.5;-SQRT(p0007*EXP(p0512^2*p0008)-p0007);SQRT(p0007*EXP(p0512^2*p0008)-p0007))
- p0004: 0.0254
- p0439: 0; = SQRT(2)*(IF((2*p0307-1)<0;-1;IF((2*p0307-1)>0;1;0))*SQRT(SQRT((2/(pi()*0.140012289)+LN(1-(2*p0307-1)^2)/2)^2-LN(1-(2*p0307-1)^2)/0.140012289)-(2/(pi()*0.140012289)+LN(1-(2*p0307-1)^2)/2)))
- p1128: 0.27725; = if(p1121=0;IF(p1123=1;0;IF(p1123+p1124>1;1-p1123;p1124));0)
- p0693: 0
- p2881: 8.48402e-5; = p2295*(p1020+p1022)
- p0852: 0; = p0847*p0851^3+p0848*p0851^2+p0849*p0851+p0850
- p1633: 0
- p2150: 1.06007e-5; = p2015*p2078*p2112/(p0818*1000)
- p2268: 3.49124e-6; = p2226*p2214
- p2361: 5.5502e-5; = p2225*p2189
- p2541: 3.92365e-6; = p2345*p1073
- p0771: 35.1; = p0111*(1+p0639*p0243/100)
- p2711: 6.99391e-6; = p2320*(p1019+p1021)
- p1606: 0
- p1959: 263.035; = if(p0738*p0740*p0739>0;p0738*1000*(p0740/100)*p0739/1000;p1958)
- p2680: 0.00362653; = p2289*(p1019+p1021)
- p0580: 0; = IF(p0316<0.5;-SQRT(p0007*EXP(p0448^2*p0008)-p0007);SQRT(p0007*EXP(p0448^2*p0008)-p0007))
- p2440: 4.26846e-6; = p2244*p1014
- p0609: 0; = IF(p0345<0.5;-SQRT(p0007*EXP(p0477^2*p0008)-p0007);SQRT(p0007*EXP(p0477^2*p0008)-p0007))
- p2103: 0.912485
- p3313: 0; = if(and(p1232=0;p3253<>0);p3262*(p3278*(p3282*p1256+p3286*(p1253+p1257)+p1258*p3288+p3298*p3287));0)
- p3167: 0; = p2386*p1082
- p2925: 0.000171822; = p2339*(p1079+p1081)
- p1218: 0
- p2339: 0.000842432; = p2228*p2207
- p0995: 6.25315e-7; = p0991*p0001*p0004/(p0818*p0002)
- p2141: 1.84015e-5; = p2015*p2069*p2103/(p0818*1000)
- p0931: 64805; = p0801*p0925
- p1244: 0; = if(p1232>0;0;p1239*(p0725/100)*p0723*1000)
- p1710: 0
- p3134: 0; = p2353*p1132
- p3106: 1.69502e-9; = p2325*p1023
- p4841: 0; = p1874*p3482
- p2386: 0; = p2229*p2215
- p1167: 0.5
- p1762: 0
- p0757: 0
- p1017: 0.06381; = IF(p1012=0;p0708/100;0)
- p2304: 0.00151671; = p2227*p2211
- p0876: 0; = p0866*p0856
- p2971: 0; = p2385*(p1079+p1081)
- p2853: 3.09249e-7; = p2267*(p1079+p1081)
- p0022: 500
- p1221: 0.015942
- p1237: 0; = if(p1232>0;0;p0729/100)
- p4596: 3.53035e-7; = p1835*p3481
- p3043: 1.60966e-6; = p2262*p1082
- p2177: 0.14492; = p0895/p0818-(p2173+p2174+p2175+p2176)
- p1979: 0; = p0973
- p4299: 7.93356e-9; = p1950*p3479
- p2934: 2.35907e-6; = p2348*(p1079+p1081)
- p3246: 0.00464; = IF(p3244+p3245=1;0;1-(p3244+p3245))
- p0838: 1.33759e9; = (p0833-p0836)*p0837
- p4704: 1.17678e-7; = p1943*p3481
- p3138: 8.65621e-10; = p2357*p1023
- p1112: 0.209482
- p2960: 0.000138028; = p2374*(p1020+p1022)
- p0810: 0
- p1123: 0.40199; = if(p1121=0;p0717/100;0)
- p1789: 0
- p2375: 0; = p2229*p2204
- p2332: 0.000723552; = p2224*p2200
- p2883: 0.000178619; = p2297*(p1079+p1081)
- p2801: 0; = p2410*(p1019+p1021)
- p1704: 0
- p0418: 0; = SQRT(2)*(IF((2*p0286-1)<0;-1;IF((2*p0286-1)>0;1;0))*SQRT(SQRT((2/(pi()*0.140012289)+LN(1-(2*p0286-1)^2)/2)^2-LN(1-(2*p0286-1)^2)/0.140012289)-(2/(pi()*0.140012289)+LN(1-(2*p0286-1)^2)/2)))
- p0174: 0
- p2261: 0.000146263; = p2226*p2207
- p3396: 0; = p3377*p1234
- p1722: 0
- p1264: 0; = if(p1232>0;0;IF(p1259+p1263=1;0;IF(p1259+p1263+p1261>1;1-(p1259+p1263);p1261)))
- p1066: 0.00315374; = IF(p1012=0;p1052/(p1059*p0818);0)
- p2723: 0.000243852; = p2332*(p1019+p1021)
- p2888: 5.47115e-5; = p2302*(p1079+p1081)
- p1766: 0
- p2363: 1.5976e-5; = p2225*p2191
- p2576: 0; = p2380*p1073
- p1272: 0; = IF(p1267+p1270+p1271=p1259;0;p1259-(p1267+p1270+p1271))
- p2930: 1.70337e-7; = p2344*(p1079+p1081)
- p2995: 0; = p2409*(p1020+p1022)
- p0214: 3.008
- p1595: 0
- p2216: 4.28133e-5; = p1108/p0818
- p0846: 0.319735; = p0841*p0845^3+p0842*p0845^2+p0843*p0845+p0844
- p1087: 0; = IF(p1071=0;p1081*(p0710/100)*p0703*1000;0)
- p0379: 0.5
- p0781: 0
- p1847: 0
- p0328: 0.5
- p2306: 2.20763e-5; = p2227*p2213
- p1211: 0.6
- p2972: 0; = p2386*(p1079+p1081)
- p1067: 0.00253887; = IF(p1012=0;p1053/(p1060*p0818);0)
- p3322: 0; = if(and(p1232=0;p3253<>0);p3253-(p3317+p3318+p3319+p3320+p3321);0)
- p2651: 5.41228e-6; = p2260*(p1078+p1080)
- p4101: 5.49704e-9; = p1962*p3478
- p0032: 66.896
- p2365: 0.000720663; = p2225*p2193
- p1939: 0
- p1262: 0; = if(p1232>0;0;p0733/100)
- p3446: 0; = p3370*p1240
- p2542: 9.03455e-6; = p2346*p1073
- p3046: 4.11572e-6; = p2265*p1082
- p1812: 0
- p2441: 4.88581e-6; = p2245*p1014
- p0301: 0.5
- p0986: 0; = IF(p0982+p0985=1;0;IF(p0982+p0985+p0984>1;1-(p0982+p0985);p0984))
- p0675: 0
- p2352: 3.57047e-5; = p2232*p2220
- p3334: 0; = IF(or(p3254=0;p1232>0);0;p3269*p3277*(p3300*p3292+(1-p3300)*p3296))
- p3433: 0; = p3376*p1239
- p5019: 0; = p1846*p3483
- p2314: 0.000235492; = p2231*p2221
- p0822: 0.8855
- p1920: 0
- p2401: 0; = p2234*p2190
- p4307: 2.77873e-10; = p1962*p3479
- p2238: 3.91274e-5; = p2222*p2183
- p0196: 8.256
- p0761: 0
- p2642: 4.83947e-8; = p2251*(p1019+p1021)
- p2703: 0.000421713; = p2312*(p1128+p1130)
- p1875: 0
- p0367: 0.5
- p2998: 0; = p2412*(p1020+p1022)
- p2551: 4.87064e-5; = p2355*p1014
- p0887: 330.704; = 1000*p0886*p0001*p0003*p0004/(p0818*p0002)
- p1930: 0
- p2791: 0; = p2400*(p1019+p1021)
- p0375: 0.5
- p2859: 0; = p2273*(p1129+p1131)
- p2273: 0; = p2230*p2219
- p1315: 0; = p1311*p1252/p0818
- p2070: 0.282
- p3339: 0; = if(and(p1232=0;p3254<>0);p3254*(p3269*p3277-p3334)/p3338;0)
- p2889: 2.36226e-5; = p2303*(p1079+p1081)
- p2250: 0.000379565; = p2222*p2196
- p0903: 0.0129401
- p1013: 0; = p1012*p0001/(p0818*p0002)
- p2129: 0.000130409; = p2015*p2057*p2091/(p0818*1000)
- p4822: 0; = p1855*p3482
- p3133: 0; = p2352*p1132
- p1811: 0
- p1004: 0; = p1000*p0888
- p3260: 0.0343561
- p2012: 0.202233
- p1963g: 2.47685e-5; = p1667*p1871+p1668*p1872+p1669*p1873+p1670*p1874+p1671*p1875+p1672*p1876+p1673*p1877+p1674*p1878+p1675*p1879+p1676*p1880+p1677*p1881+p1678*p1882+p1679*p1883+p1680*p1884+p1681*p1885+p1682*p1886+p1683*p1887+p1684*p1888+p1685*p1889
- p3053: 0; = p2272*p1132
- p2343: 0.000599983; = p2228*p2211
- p3008: 0; = p2422*(p1079+p1081)
- p2052: 0.000130331; = p2015*p2049*(1-p2050)/(p0818*1000)
- p4515: 4.3541e-6; = p1754*p3481
- p1963a: 2.09276e-5; = p1550*p1754+p1551*p1755+p1552*p1756+p1553*p1757+p1554*p1758+p1555*p1759+p1556*p1760+p1557*p1761+p1558*p1762+p1559*p1763+p1560*p1764+p1561*p1765+p1562*p1766+p1563*p1767+p1564*p1768+p1565*p1769+p1566*p1770+p1567*p1771+p1568*p1772
- p0727: 29.054; = p0067*(1+p0595*p0199/100)
- p1857: 0
- p3604: 0; = p1873*p3476
- p2173: 0.129216; = p0895*p0898/p0818
- p2395: 0; = p2234*p2184
- p1571: 0
- p0475: 0; = SQRT(2)*(IF((2*p0343-1)<0;-1;IF((2*p0343-1)>0;1;0))*SQRT(SQRT((2/(pi()*0.140012289)+LN(1-(2*p0343-1)^2)/2)^2-LN(1-(2*p0343-1)^2)/0.140012289)-(2/(pi()*0.140012289)+LN(1-(2*p0343-1)^2)/2)))
- p3270: 0.0747083
- p2940: 0.000253546; = p2354*(p1020+p1022)
- p2598: 0; = p2402*p1014
- p2798: 0; = p2407*(p1019+p1021)
- p2986: 0; = p2400*(p1020+p1022)
- p2315: 0.000940176; = p2224*p2182
- p0882: 500000; = p0869*p0856
- p3110: 7.57407e-12; = p2329*p1023
- p3331: 0; = if(and(p1232=0;p3255<>0);p3255*(p3268-p3326)/p3327;0)
- p2841: 2.07933e-5; = p2255*(p1020+p1022)
- p0177: 22.467
- p1293: 0; = p1287*p1252/p0818
- p2077: 0.043
- p2662: 5.52969e-6; = p2271*(p1078+p1080)
- p2478: 0.000441491; = p2282*p1014
- p2917: 9.66359e-7; = p2331*(p1020+p1022)
- p0029: 63.166
- p2027: 0.428799
- p2891: 4.30598e-7; = p2305*(p1079+p1081)
- p1075: 0.20396; = IF(p1071=0;p0713/100;0)
- p1826: 0
- p0295: 0.5
- p3234: 0.39606; = 1-p3233
- p0941: 0; = if(and(p0683=0;p0947=0);p0935;0)
- p4802: 0; = p1835*p3482
- p1106: 7179.93; = IF(p1071=0;p1105*p1096*p1095;0)
- p0634: 0; = IF(p0370<0.5;-SQRT(p0007*EXP(p0502^2*p0008)-p0007);SQRT(p0007*EXP(p0502^2*p0008)-p0007))
- p0254: 16.11
- p0728: 0
- p1696: 0
- p0809: 0
- p2884: 0.000161547; = p2298*(p1079+p1081)
- p2138: 8.17039e-6; = p2015*p2066*p2100/(p0818*1000)
- p1682: 0
- p3002: 0; = p2416*(p1079+p1081)
- p3092: 0; = p2311*p1132
- p4749: 0; = p1782*p3482
- p2895: 5.96354e-6; = p2309*(p1079+p1081)
- p3324: 0; = if(and(p1232=0;p3255<>0);p3266*(p3279*(p3284*p1256+p3286*(p1253+p1257)+p1258*p3288+p3299*p3287));0)
- p0129: 34.961
- p1180: 4.64926e-8; = p1176*p1179/p0818
- p0532: 0; = SQRT(2)*(IF((2*p0400-1)<0;-1;IF((2*p0400-1)>0;1;0))*SQRT(SQRT((2/(pi()*0.140012289)+LN(1-(2*p0400-1)^2)/2)^2-LN(1-(2*p0400-1)^2)/0.140012289)-(2/(pi()*0.140012289)+LN(1-(2*p0400-1)^2)/2)))
- p3040: 2.14931e-6; = p2259*p1082
- p2025: 0.000167944; = p2015*p2023*p2024/(p0818*1000)
- p2147: 6.29724e-6; = p2015*p2075*p2109/(p0818*1000)
- p1746: 0.615605
- p2325: 0.000169502; = p2224*p2192
- p0916: 0.318954; = p0826+(p0832*(1+p0894))/p0818
- p0608: 0; = IF(p0344<0.5;-SQRT(p0007*EXP(p0476^2*p0008)-p0007);SQRT(p0007*EXP(p0476^2*p0008)-p0007))
- p2308: 0.000191826; = p2227*p2215
- p1108: 99438.1; = IF(p1071=0;p1105*p1102*p1095;0)
- p0864: 0; = IF(p0858=1;0;IF(p0858+p0859>1;1-p0858;p0859))
- p5132: 0; = p1963*p3483
- p0081: 0.578
- p2719: 0.000674729; = p2328*(p1019+p1021)
- p1800: 0
- p2604: 0; = p2408*p1014
- p1242: 0; = if(p1232>0;0;p1234*(p0725/100)*p0723*1000)
- p0167: 35.69
- p2831: 5.58298e-6; = p2245*(p1020+p1022)
- p1917: 0
- p2913: 7.16075e-5; = p2327*(p1020+p1022)
- p0425: 0; = SQRT(2)*(IF((2*p0293-1)<0;-1;IF((2*p0293-1)>0;1;0))*SQRT(SQRT((2/(pi()*0.140012289)+LN(1-(2*p0293-1)^2)/2)^2-LN(1-(2*p0293-1)^2)/0.140012289)-(2/(pi()*0.140012289)+LN(1-(2*p0293-1)^2)/2)))
- p1581: 0
- p1538: 5
- p3811: 5.68279e-7; = p1874*p3477
- p2513: 1.01943e-5; = p2317*p1014
- p2101: 0.620397
- p0154: 0
- p2654: 5.6604e-6; = p2263*(p1078+p1080)
- p2069: 0.190588
- p0159: 31.264
- p1660: 0
- p0948: 0; = if(and(p0683=0;or(p0807=480;p0807=32;p0807=1;and(p0807=60;p0901<0.03)));p0936;0)
- p1560: 0
- p1177: 0.000192065; = p0801*p0001/(p0818*p0002)
- p2006: 0.208624; = ((p1980*p1985+p1986*p1991+p1992*p1997+p2000*p2005)/p0818)*p0005*p0002/1000
- p0851: 0
- p3016: 0; = p2430*(p1129+p1131)
- p2712: 8.94708e-5; = p2321*(p1019+p1021)
- p3183: 0; = p2402*p1023
- p0087: 9.572
- p1931: 0
- p2232: 0.20853; = if(p0783*p0787+p0784*p0788+p0785*p0789+p0786*p0790=0;0;p0789*p0785/(p0783*p0787+p0784*p0788+p0785*p0789+p0786*p0790))
- p0805: 0
- p2561: 0.00022298; = p2365*p1014
- p2269: 1.31748e-5; = p2226*p2215
- p0044: 91.91
- p3426: 0; = p3369*p1239
- p3271: 0.0195489
- p2033: 0.00019846; = p2015*p2029*p2031/(p0818*1000)
- p0789: 34.961; = p0129*(1+p0657*p0261/100)
- p3179: 0; = p2398*p1023
- p2099: 0.620397
- p2368: 5.77715e-7; = p2225*p2197
- p3586: 0; = p1855*p3476
- p1848: 0
- p1667: 0
- p1643: 0
- p2793: 0; = p2402*(p1019+p1021)
- p0045: 30.941
- p1836: 0
- p4926: 0; = p1963*p3482
- p3009: 0; = p2423*(p1079+p1081)
- p1126: 0; = if(p1121=0;p0720/100;0)
- p2746: 5.30527e-5; = p2355*(p1019+p1021)
- p2661: 6.16983e-7; = p2270*(p1078+p1080)
- p0803: 0
- p3293: 0.3875
- p2233: 0; = if(p0783*p0787+p0784*p0788+p0785*p0789+p0786*p0790=0;0;p0790*p0786/(p0783*p0787+p0784*p0788+p0785*p0789+p0786*p0790))
- p3066: 1.12576e-9; = p2285*p1023
- p2175: 0.000557327; = p0895*p0908/p0818
- p1736: 0
- p0695: 21.374; = p0035*(1+p0563*p0167/100)
- p2609: 0; = p2413*p1014
- p3362: 0.00594977; = if(p1232=0;p3244*p3356/p0818;0)
- p2715: 7.05893e-6; = p2324*(p1019+p1021)
- p1026: 78128.1; = IF(p1012=0;p1020*(p0704/100)*p0703*1000;0)
- p2287: 0.00507821; = p2223*p2193
- p1226: 500000; = IF(p1221=0;0;IF(p1193=0;p0801;0))
- p0487: 0; = SQRT(2)*(IF((2*p0355-1)<0;-1;IF((2*p0355-1)>0;1;0))*SQRT(SQRT((2/(pi()*0.140012289)+LN(1-(2*p0355-1)^2)/2)^2-LN(1-(2*p0355-1)^2)/0.140012289)-(2/(pi()*0.140012289)+LN(1-(2*p0355-1)^2)/2)))
- p1121: 0
- p2855: 2.68713e-6; = p2269*(p1079+p1081)
- p2263: 1.84234e-5; = p2226*p2209
- p3284: 0.275
- p1159: 0.5
- p3061: 7.74994e-9; = p2280*p1023
- p2087: 0.856281
- p2136: 6.13124e-5; = p2015*p2064*p2098/(p0818*1000)
- p1855: 1.2486e-5; = p1447*1000/p0818
- p0957: 0; = if(and(p0683>0;or(p0807=56;p0807=100;and(p0807=60;p0901>0.06)));p0939;0)
- p0063: 500
- p0688: 36.834; = p0028*(1+p0556*p0160/100)
- p2982: 0; = p2396*(p1020+p1022)
- p3164: 0; = p2383*p1082
- p3240: 1.82592e-9; = p3234*p1188*p3235/p0818
- p5119: 0; = p1946*p3483
- p1080: 0; = IF(p1071=0;IF(p1073+p1078+p1079=1;0;IF(p1073+p1078+p1079+p1076>1;1-(p1073+p1078+p1079);p1076));0)
- p3308: 0; = if(and(p1232=0;p3252<>0);p3252*(p3259-p3303)/p3305;0)
- p0376: 0.5
- p0503: 0; = SQRT(2)*(IF((2*p0371-1)<0;-1;IF((2*p0371-1)>0;1;0))*SQRT(SQRT((2/(pi()*0.140012289)+LN(1-(2*p0371-1)^2)/2)^2-LN(1-(2*p0371-1)^2)/0.140012289)-(2/(pi()*0.140012289)+LN(1-(2*p0371-1)^2)/2)))
- p2204: 0.00128234; = p1109/p0818
- p2854: 7.12072e-7; = p2268*(p1079+p1081)
- p2557: 1.71729e-5; = p2361*p1014
- p2310: 0.000262051; = p2227*p2217
- p0393: 0.5
- p0988: 0; = p0982*p0886
- p3004: 0; = p2418*(p1079+p1081)
- p1550: 0.783979
- p2643: 7.94323e-8; = p2252*(p1019+p1021)
- p1200: 0.84
- p2034: 0.000313956; = p2015*p2030*p2032/(p0818*1000)
- p1668: 0
- p5028: 0; = p1855*p3483
- p1304: 0; = p1300*p1252/p0818
- p1305: 0; = p1301*p1252/p0818
- p2544: 5.19664e-6; = p2348*p1073
- p3050: 5.20537e-7; = p2269*p1082
- p2521: 5.24455e-5; = p2325*p1014
- p3305: 0; = if(and(p1232=0;p3252<>0);1-(p3301+p3302+p3303+p3304);0)
- p1328: 0; = p1319*p0801
- p1769: 0
- p2694: 3.55845e-5; = p2303*(p1078+p1080)
- p0587: 0; = IF(p0323<0.5;-SQRT(p0007*EXP(p0455^2*p0008)-p0007);SQRT(p0007*EXP(p0455^2*p0008)-p0007))
- p0772: 31.3; = p0112*(1+p0640*p0244/100)
- p1261: 0; = if(p1232>0;0;p0732/100)
- p3422: 0; = p3365*p1239
- p1570: 0
- p2408: 0; = p2234*p2198
- p2970: 0; = p2384*(p1079+p1081)
- p1346: 37
- p2518: 2.25143e-5; = p2322*p1014
- p2338: 0.000101462; = p2228*p2206
- p1992: 3900
- p1302: 0; = IF(p1297+p1300+p1301=p1262;0;p1262-(p1297+p1300+p1301))
- p1914: 0
- p0835: 412.598; = -LN(1-p0669/100)/p0834
- p2605: 0; = p2409*p1014
- p1853: 0
- p0690: 32.964; = p0030*(1+p0558*p0162/100)
- p3336: 0; = IF(or(p3254=0;p1232>0);0;p3271*p3289)
- p3143: 6.35292e-10; = p2362*p1023
- p0009: 21.6068
- p0125: 18.648
- p0646: 0; = IF(p0382<0.5;-SQRT(p0007*EXP(p0514^2*p0008)-p0007);SQRT(p0007*EXP(p0514^2*p0008)-p0007))
- p0235: 0
- p3443: 0; = p3367*p1240
- p0817: 0
- p0308: 0.5
- p2497: 0.000266513; = p2301*p1073
- p1070: 0.0116518; = IF(p1012=0;p1056/(p1063*p0818);0)
- p0263: 0.452
- p3272: 0.0398246
- p0428: 0; = SQRT(2)*(IF((2*p0296-1)<0;-1;IF((2*p0296-1)>0;1;0))*SQRT(SQRT((2/(pi()*0.140012289)+LN(1-(2*p0296-1)^2)/2)^2-LN(1-(2*p0296-1)^2)/0.140012289)-(2/(pi()*0.140012289)+LN(1-(2*p0296-1)^2)/2)))
- p0659: 0; = IF(p0395<0.5;-SQRT(p0007*EXP(p0527^2*p0008)-p0007);SQRT(p0007*EXP(p0527^2*p0008)-p0007))
- p0065: 3.18
- p0331: 0.5
- p3096: 9.40176e-9; = p2315*p1023
- p2603: 0; = p2407*p1014
- p0906: 0.0043465
- p2267: 1.51622e-6; = p2226*p2213
- p3471: 1.5797e-6; = p3376*p1241
- p1280: 0; = IF(p1277=p1263;0;IF(p1277+p1278>p1263;p1263-p1277;p1278))
- p2442: 1.22866e-6; = p2246*p1014
- p0210: 0
- p0190: 42.135
- p0131: 99.536
- p2417: 0; = p2235*p2207
- p2026: 55.14
- p1701: 0
- p0857: 1.92065; = p0856*p0001*p0003/(p0818*p0002)
- p2040: 0.44
- p2983: 0; = p2397*(p1020+p1022)
- p0520: 0; = SQRT(2)*(IF((2*p0388-1)<0;-1;IF((2*p0388-1)>0;1;0))*SQRT(SQRT((2/(pi()*0.140012289)+LN(1-(2*p0388-1)^2)/2)^2-LN(1-(2*p0388-1)^2)/0.140012289)-(2/(pi()*0.140012289)+LN(1-(2*p0388-1)^2)/2)))
- p1671: 0
- p3204: 0; = p2423*p1082
- p5159: 4.01486e-6; = p1780*p3484
- p0459: 0; = SQRT(2)*(IF((2*p0327-1)<0;-1;IF((2*p0327-1)>0;1;0))*SQRT(SQRT((2/(pi()*0.140012289)+LN(1-(2*p0327-1)^2)/2)^2-LN(1-(2*p0327-1)^2)/0.140012289)-(2/(pi()*0.140012289)+LN(1-(2*p0327-1)^2)/2)))
- p1561: 0
- p2329: 7.57407e-7; = p2224*p2197
- p2758: 0.000514652; = p2367*(p1019+p1021)
- p1621: 0
- p1982: 750
- p2418: 0; = p2235*p2208
- p2035: 0.000227959; = p2015*p2029*(1-p2031)/(p0818*1000)
- p2722: 9.21152e-7; = p2331*(p1019+p1021)
- p0944: 0; = if(and(p0683=0;p0950=0);p0938;0)
- p0755: 0
- p0344: 0.5
- p2427: 0; = p2235*p2217
- p2355: 0.000157417; = p2225*p2183
- p2215: 0.000280884; = p1117-p2214
- p4719: 4.12169e-9; = p1962*p3481
- p2399: 0; = p2234*p2188
- p4513: 0; = p1962*p3480
- p2606: 0; = p2410*p1014
- p4308: 1.24148e-6; = p1963*p3479
- p3153: 2.36609e-9; = p2372*p1023
- p2594: 0; = p2398*p1014
- p3290: 0.195
- p1107: 172877; = IF(p1071=0;p1105*p1101*p1095;0)
- p0723: 500; = p0063*(1+p0591*p0195/100)
- p0441: 0; = SQRT(2)*(IF((2*p0309-1)<0;-1;IF((2*p0309-1)>0;1;0))*SQRT(SQRT((2/(pi()*0.140012289)+LN(1-(2*p0309-1)^2)/2)^2-LN(1-(2*p0309-1)^2)/0.140012289)-(2/(pi()*0.140012289)+LN(1-(2*p0309-1)^2)/2)))
- p0238: 6.148
- p1222: 0.94
- p3404: 0.00230914; = p3366*p1238
- p1625: 0
- p0400: 0.5
- p3140: 1.58288e-10; = p2359*p1023
- p0150: 0
- p1187: 0.000181343
- p1980: 3521.6
- p1809: 0
- p2462: 6.51463e-8; = p2266*p1073
- p2381: 0; = p2229*p2210
- p2592: 0; = p2396*p1014
- p0738: 500; = p0078*(1+p0606*p0210/100)
- p1781: 0
- p1926: 0
- p3177: 0; = p2396*p1023
- p3255: 0; = p1252*(p1297*(1-p3247)+p1300*(1-p3248)+p1301*(1-p3249)+p1302*(1-p3250))
- p1045: 0.0504301; = IF(p1012=0;IF(p1037+p1044=1;0;IF(p1037+p1044+p1039>1;1-(p1037+p1044);p1039));0)
- p0981: 0; = p0978*p0001/(p0818*p0002)
- p2985: 0; = p2399*(p1020+p1022)
- p2909: 2.94478e-5; = p2323*(p1020+p1022)
- p2288: 0.00108857; = p2223*p2195
- p2678: 0.00171146; = p2287*(p1019+p1021)
- p1010: 0; = p0890
- p2319: 0.00014419; = p2224*p2186
- p0881: 0; = p0880*p0001*p0003/(p0818*p0002)
- p2372: 0.000236609; = p2225*p2201
- p2772: 0; = p2381*(p1078+p1080)
- p0902: 0
- p1552: 0
- p3295: 0.58
- p0754: 0
- p1068: 0.0230761; = IF(p1012=0;p1054/(p1061*p0818);0)
- p0638: 0; = IF(p0374<0.5;-SQRT(p0007*EXP(p0506^2*p0008)-p0007);SQRT(p0007*EXP(p0506^2*p0008)-p0007))
- p1664: 0
- p3479: 0.0184265; = if(p1328+p1330+p1332+p1334+p1336+p1338+p1340+p1342+p1344=0;0;p1334/(p1328+p1330+p1332+p1334+p1336+p1338+p1340+p1342+p1344))
- p2113: 0.832356
- p2865: 0.00021566; = p2279*(p1020+p1022)
- p2185: 0.000831531; = p1065-p2184
- p1865: 0
- p2163: 0.038617; = (p2017-p2020)/p0818-(p2025+p2028+p2033+p2034+p2051+p2125+p2126+p2127+p2128+p2129+p2130+p2131+p2132+p2133+p2134+p2135+p2136+p2137+p2138+p2139+p2140+p2141+p2142+p2143+p2144+p2145+p2146+p2147+p2148+p2149+p2150+p2151+p2152+p2153+p2154+p2155+p2156+p2157)
- p2725: 1.50464e-5; = p2334*(p1019+p1021)
- p0485: 0; = SQRT(2)*(IF((2*p0353-1)<0;-1;IF((2*p0353-1)>0;1;0))*SQRT(SQRT((2/(pi()*0.140012289)+LN(1-(2*p0353-1)^2)/2)^2-LN(1-(2*p0353-1)^2)/0.140012289)-(2/(pi()*0.140012289)+LN(1-(2*p0353-1)^2)/2)))
- p1767: 0
- p4840: 0; = p1873*p3482
- p0433: 0; = SQRT(2)*(IF((2*p0301-1)<0;-1;IF((2*p0301-1)>0;1;0))*SQRT(SQRT((2/(pi()*0.140012289)+LN(1-(2*p0301-1)^2)/2)^2-LN(1-(2*p0301-1)^2)/0.140012289)-(2/(pi()*0.140012289)+LN(1-(2*p0301-1)^2)/2)))
- p0833: 2.70794e9; = p0830+p0832
- p0657: 0; = IF(p0393<0.5;-SQRT(p0007*EXP(p0525^2*p0008)-p0007);SQRT(p0007*EXP(p0525^2*p0008)-p0007))
- p0176: 4.302
- p2512: 6.38561e-5; = p2316*p1014
- p3280: 0.375
- p2348: 1.15663e-5; = p2228*p2216
- p2777: 0; = p2386*(p1078+p1080)
- p1700: 0
- p2649: 1.84798e-5; = p2258*(p1078+p1080)
- p1822: 0
- p0780: 35.807; = p0120*(1+p0648*p0252/100)
- p1963: 6.73746e-5; = p1963a+p1963b+p1963c+p1963d+p1963e+p1963f+p1963g+p1963h+p1963i+p1963j+p1963k
- p1798: 0
- p2614: 0; = p2418*p1073
- p1583: 0
- p1725: 0
- p1754: 1.59304e-5; = p1346*1000/p0818
- p4415: 0; = p1860*p3480
- p2220: 0.000171221; = p1151/p0818
- p1079: 0.20396; = IF(p1071=0;IF(p1073+p1078=1;0;IF(p1073+p1078+p1075>1;1-(p1073+p1078);p1075));0)
- p1289: 0
- p2936: 9.12189e-5; = p2350*(p1129+p1131)
- p1797: 0
- p2477: 3.45113e-5; = p2281*p1014
- p4003: 6.27785e-7; = p1860*p3478
- p0762: 0
- p4501: 0; = p1946*p3480
- p2754: 5.38422e-6; = p2363*(p1019+p1021)
- p1734: 0
- p3205: 0; = p2424*p1082
- p1249: 0; = if(p1232>0;0;p1244*p0001/(p0818*p0002))
- p2457: 6.57144e-5; = p2261*p1073
- p0019: 64.805
- p1065: 0.00107294; = IF(p1012=0;p1051/(p1058*p0818);0)
- p2670: 0.000205571; = p2279*(p1019+p1021)
- p0907: 0
- p0057: 40.199
- p3302: 0; = if(and(p1232=0;p3252<>0);p3258*(p3278*(p3282*p1256+p3286*(p1253+p1257)+p1258*p3288+p3297*p3287));0)
- p2692: 0.000182251; = p2301*(p1078+p1080)
- p1578: 0.6832
- p1941: 0
- p2344: 8.35148e-7; = p2228*p2212
- p0512: 0; = SQRT(2)*(IF((2*p0380-1)<0;-1;IF((2*p0380-1)>0;1;0))*SQRT(SQRT((2/(pi()*0.140012289)+LN(1-(2*p0380-1)^2)/2)^2-LN(1-(2*p0380-1)^2)/0.140012289)-(2/(pi()*0.140012289)+LN(1-(2*p0380-1)^2)/2)))
- p1186: 1.53731e-8; = p1182*p1185/p0818
- p3027: 3.97096e-11; = p2246*p1023
- p2713: 2.45234e-5; = p2322*(p1019+p1021)
- p2305: 2.11119e-6; = p2227*p2212
- p3423: 0; = p3366*p1239
- p3127: 7.94487e-7; = p2346*p1082
- p2620: 0; = p2424*p1073
- p0913: 0.0120403
- p4813: 0; = p1846*p3482
- p0042: 500
- p2468: 0; = p2272*p1123
- p0863: 0; = p0675*1000/p0856
- p3883: 1.49547e-7; = p1946*p3477
- p2121: 0.822447
- p2207: 0.00311829; = p1119-p2205-p2204-p2206
- p0454: 0; = SQRT(2)*(IF((2*p0322-1)<0;-1;IF((2*p0322-1)>0;1;0))*SQRT(SQRT((2/(pi()*0.140012289)+LN(1-(2*p0322-1)^2)/2)^2-LN(1-(2*p0322-1)^2)/0.140012289)-(2/(pi()*0.140012289)+LN(1-(2*p0322-1)^2)/2)))
- p3323: 0; = if(and(p1232=0;p3255<>0);p3265*p3277*(p3299*p3291+(1-p3299)*p3295);0)
- p0617: 0; = IF(p0353<0.5;-SQRT(p0007*EXP(p0485^2*p0008)-p0007);SQRT(p0007*EXP(p0485^2*p0008)-p0007))
- p1269: 0
- p3057: 5.05326e-8; = p2276*p1023
- p2050: 0.952062
- p1351: 21
- p3230: 2.03461e-7; = p1170/p0818
- p3681: 0; = p1950*p3476
- p0653: 0; = IF(p0389<0.5;-SQRT(p0007*EXP(p0521^2*p0008)-p0007);SQRT(p0007*EXP(p0521^2*p0008)-p0007))
- p2768: 0; = p2377*(p1078+p1080)
- p2123: 0.263965
- p1212: 0.0334626; = if(p1211=0;0;if(p1193>0;0;(p1207+p1208+p1209)*p1210/(2000*p1211)))
- p1573: 0
- p1613: 0
- p2586: 0; = p2390*p1123
- p1155: 0.000468758; = if(p1153*p0818=0;0;p1151/(p1153*p0818))
- p2508: 0.00061145; = p2312*p1123
- p0984: 0; = if(p0886=0;0;min(1;(p0699*p0698*1000*p0701/100)/p0886))
- p3192: 0; = p2411*p1023
- p2896: 5.3448e-5; = p2310*(p1079+p1081)
- p3447: 0; = p3371*p1240
- p2915: 2.67789e-7; = p2329*(p1020+p1022)
- p2196: 0.0146693; = p1068-p2193-p2195
- p2140: 1.49874e-5; = p2015*p2068*p2102/(p0818*1000)
- p2186: 0.0010565; = p1052/p0818
- p2822: 0; = p2431*(p1128+p1130)
- p1577: 0
- p2301: 0.000593187; = p2227*p2208
- p0388: 0.5
- p2546: 0.000114319; = p2350*p1123
- p3226: 5.37993e-5; = p3222*p1229
- p2584: 0; = p2388*p1073
- p1599: 0
- p0530: 0; = SQRT(2)*(IF((2*p0398-1)<0;-1;IF((2*p0398-1)>0;1;0))*SQRT(SQRT((2/(pi()*0.140012289)+LN(1-(2*p0398-1)^2)/2)^2-LN(1-(2*p0398-1)^2)/0.140012289)-(2/(pi()*0.140012289)+LN(1-(2*p0398-1)^2)/2)))
- p2899: 4.34682e-5; = p2313*(p1129+p1131)
- p3398: 0; = p3379*p1234
- p2656: 3.20049e-5; = p2265*(p1078+p1080)
- p1049: 0.25306; = IF(p1012=0;IF(p1037+p1044+p1045+p1046+p1047+p1048=1;0;1-(p1037+p1044+p1045+p1046+p1047+p1048));0)
- p1936: 0
- p3012: 0; = p2426*(p1079+p1081)
- p1635: 0
- p0586: 0; = IF(p0322<0.5;-SQRT(p0007*EXP(p0454^2*p0008)-p0007);SQRT(p0007*EXP(p0454^2*p0008)-p0007))
- p0272: 16.11
- p3088: 2.0084e-6; = p2307*p1082
- p3165: 0; = p2384*p1082
- p3792: 8.67373e-7; = p1855*p3477
- p3201: 0; = p2420*p1082
- p2345: 8.73301e-6; = p2228*p2213
- p1559: 0
- p3263: 0.0214527
- p3432: 0; = p3375*p1239
- p0682: 500; = p0022*(1+p0550*p0154/100)
- p2568: 7.32092e-5; = p2372*p1014
- p1589: 0
- p2210: 0.000169591; = 6*1.00794*p2208/30.973762
- p3171: 0; = p2390*p1132
- p1972: 0; = if(p0807=480;p1967*p0001/(p0818*p0002);0)
- p2158: 1.56455e-5; = p2015*p2082*p2120/(p0818*1000)
- p2145: 3.5229e-5; = p2015*p2073*p2107/(p0818*1000)
- p4086: 1.56946e-7; = p1943*p3478
- p4351: 0; = p1796*p3480
- p2840: 4.85005e-5; = p2254*(p1020+p1022)
- p2176: 0.00339211; = p0895*p0913/p0818
- p1326: 0; = IF(((p0745*1000*p0753/100)+(p0754*1000*p0762/100))/p0801<0;0;((p0745*1000*p0753/100)+(p0754*1000*p0762/100))/p0801)
- p0776: 28.781; = p0116*(1+p0644*p0248/100)
- p2924: 2.06942e-5; = p2338*(p1079+p1081)
- p1760: 0
- p1904: 0
- p2870: 0.000158276; = p2284*(p1020+p1022)
- p1020: 0.17001; = IF(p1012=0;IF(p1014+p1019=1;0;IF(p1014+p1019+p1016>1;1-(p1014+p1019);p1016));0)
- p1932: 0
- p2639: 6.03694e-5; = p2248*(p1019+p1021)
- p1321: 1.3291; = IF(((p0745*1000*p0748/100)+(p0754*1000*p0757/100))/p0801<0;0;((p0745*1000*p0748/100)+(p0754*1000*p0757/100))/p0801)
- p3511: 0; = p1780*p3476
- p0964: 0; = 56/90000
- p1337: 0; = p1336*p0001/(p0818*p0002)
- p1230: 0.5
- p0875: 0; = p0874*p0001*p0003/(p0818*p0002)
- p3292: 0.258
- p1535: 1
- p2593: 0; = p2397*p1014
- p1637: 0
- p5325: 5.90421e-7; = p1946*p3484
- p0767: 41.17; = p0107*(1+p0635*p0239/100)
- p1320: 0.253289; = IF(((p0745*1000*p0747/100)+(p0754*1000*p0756/100))/p0801<0;0;((p0745*1000*p0747/100)+(p0754*1000*p0756/100))/p0801)
- p2543: 3.40935e-5; = p2347*p1073
- p3405: 0.000404296; = p3367*p1238
- p3206: 0; = p2425*p1082
- p1788: 0
- p2761: 7.02611e-7; = p2370*(p1019+p1021)
- p2488: 4.5454e-6; = p2292*p1014
- p3093: 0; = p2312*p1132
- p2783: 0; = p2392*(p1128+p1130)
- p3222: 0.224242; = IF(p3216=0;0;p1223*40.078/100.0869)
- p4129: 2.69741e-7; = p1780*p3479
- p3282: 0.3
- p1864: 0
- p2602: 0; = p2406*p1014
- p3135: 7.17123e-9; = p2354*p1023
- p0666: 0; = IF(p0402<0.5;-SQRT(p0007*EXP(p0534^2*p0008)-p0007);SQRT(p0007*EXP(p0534^2*p0008)-p0007))
- p0293: 0.5
- p0556: 0; = IF(p0292<0.5;-SQRT(p0007*EXP(p0424^2*p0008)-p0007);SQRT(p0007*EXP(p0424^2*p0008)-p0007))
- p2997: 0; = p2411*(p1020+p1022)
- p3217: 0.0016976; = p3213*p1228
- p0248: 24.509
- p3377: 9.20671e-6; = if(p1232=0;p3246*p3359/p0818;0)
- p2410: 0; = p2234*p2200
- p0962: 0; = if(and(p0683>0;or(p0807=480;p0807=32;p0807=1;and(p0807=60;p0901<0.03)));p0938;0)
- p1119: 0.00593597; = IF(p1071=0;p1109/(p1114*p0818);0)
- p1895: 0
- p3350: 1.38834e7; = if(and(p1232=0;p3256<>0);p3256*(p3273*p3277-p3345)/p3349;0)
- p2356: 2.51309e-5; = p2225*p2184
- p3181: 0; = p2400*p1023
- p0648: 0; = IF(p0384<0.5;-SQRT(p0007*EXP(p0516^2*p0008)-p0007);SQRT(p0007*EXP(p0516^2*p0008)-p0007))
- p2255: 5.88112e-5; = p2222*p2201
- p1758: 0
- p2704: 3.75719e-5; = p2313*(p1128+p1130)
- p0853: 0; = p0803/(p0802+p0803)
- p2659: 1.07265e-6; = p2268*(p1078+p1080)
- p3364: 0.00047765; = if(p1232=0;p3244*p3358/p0818;0)
- p4721: 0; = p1754*p3482
- p3458: 0.000981557; = p3363*p1241
- p2239: 6.24651e-6; = p2222*p2184
- p1163: 0.00462046
- p4292: 7.93356e-9; = p1943*p3479
- p4108: 1.66605e-7; = p1759*p3479
- p0730: 0
- p1711: 0
- p2941: 5.56564e-5; = p2355*(p1020+p1022)
- p3081: 8.41404e-5; = p2300*p1082
- p2480: 0.000138512; = p2284*p1014
- p2611: 0; = p2415*p1073
- p2214: 7.44324e-5; = p1107/p0818
- p2340: 0.000234654; = p2228*p2208
- p3464: 0; = p3369*p1241
- p3310: 0; = if(and(p1232=0;p3252<>0);IF((p3306+p3307+p3308+p3309)+(p3252*(p3257*(1-p3277))/p3305)>p3252;p3252-(p3306+p3307+p3308+p3309);p3252*(p3257*(1-p3277))/p3305);0)
- p3072: 6.68176e-11; = p2291*p1023
- p2130: 7.17828e-5; = p2015*p2058*p2092/(p0818*1000)
- p1174: 1.0173e-7; = p1170*p1173/p0818
- p0831: 0.137; = 1-p0824
- p2810: 0; = p2419*(p1078+p1080)
- p0683: 0
- p0722: 0
- p0678: 92.141; = p0018*(1+p0546*p0150/100)
- p2373: 3.40534e-5; = p2225*p2202
- p2013: 0.85
- p2131: 2.76587e-5; = p2015*p2059*p2093/(p0818*1000)
- p1564: 0
- p0477: 0; = SQRT(2)*(IF((2*p0345-1)<0;-1;IF((2*p0345-1)>0;1;0))*SQRT(SQRT((2/(pi()*0.140012289)+LN(1-(2*p0345-1)^2)/2)^2-LN(1-(2*p0345-1)^2)/0.140012289)-(2/(pi()*0.140012289)+LN(1-(2*p0345-1)^2)/2)))
- p3347: 0.00107264; = if(and(p1232=0;p3256<>0);p3275*p3289;0)
- p1816: 0
- p3335: 0; = IF(or(p3254=0;p1232>0);0;p3270*(p3280*(p3283*p1256+p3286*(p1253+p1257)+p1258*p3288+p3300*p3287)))
- p2685: 0.000561908; = p2294*(p1019+p1021)
- p3373: 0; = if(p1232=0;p3245*p3361/p0818;0)
- p3384: 0; = p3365*p1234
- p1179: 0.5
- p0268: 4.302
- p3108: 2.02533e-9; = p2327*p1023
- p2407: 0; = p2234*p2197
- p2932: 4.10133e-6; = p2346*(p1079+p1081)
- p1907: 0
- p0797: 39.224; = p0137*(1+p0665*p0269/100)
- p2095: 0.765734
- p2843: 3.43081e-5; = p2257*(p1020+p1022)
- p3233: 0.60394
- p3897: 5.80701e-6; = p1754*p3478
- p2753: 2.14106e-5; = p2362*(p1019+p1021)
- p1795: 0
- p0759: 0
- p2567: 0.000170761; = p2371*p1014
- p2377: 0; = p2229*p2206
- p2708: 1.1104e-5; = p2317*(p1019+p1021)
- p1604: 0
- p1739: 0.583082
- p2858: 0; = p2272*(p1129+p1131)
- p0550: 0; = IF(p0286<0.5;-SQRT(p0007*EXP(p0418^2*p0008)-p0007);SQRT(p0007*EXP(p0418^2*p0008)-p0007))
- p1775: 0
- p1309: 0
- p3077: 2.75095e-8; = p2296*p1023
- p2536: 0.000105428; = p2340*p1073
- p1846: 4.73607e-6; = p1438*1000/p0818
- p0500: 0; = SQRT(2)*(IF((2*p0368-1)<0;-1;IF((2*p0368-1)>0;1;0))*SQRT(SQRT((2/(pi()*0.140012289)+LN(1-(2*p0368-1)^2)/2)^2-LN(1-(2*p0368-1)^2)/0.140012289)-(2/(pi()*0.140012289)+LN(1-(2*p0368-1)^2)/2)))
- p0355: 0.5
- p0053: 20.396
- p2054: 0.91
- p1125: 0.32076; = if(p1121=0;p0719/100;0)
- p2156: 2.40912e-6; = p2015*p2085*p2118/(p0818*1000)
- p4103: 2.93542e-7; = p1754*p3479
- p1898: 0
- p0892: 1379.14; = if(p0891=0;0;(1-p1240)*p3251/p0891)
- p0970: 0; = p0967/p0818
- p3365: 0.001975; = if(p1232=0;p3244*p3359/p0818;0)
- p2106: 0.856281
- p0631: 0; = IF(p0367<0.5;-SQRT(p0007*EXP(p0499^2*p0008)-p0007);SQRT(p0007*EXP(p0499^2*p0008)-p0007))
- p2300: 0.0021296; = p2227*p2207
- p3386: 0; = p3367*p1234
- p2036: 0.000385456; = p2015*p2030*(1-p2032)/(p0818*1000)
- p1799: 0
- p3287: 0.745
- p0924: 0; = IF(p0918+p0923=1;0;IF(p0918+p0923+p0920>1;1-(p0918+p0923);p0920))
- p1678: 0
- p1866: 0
- p2952: 5.46189e-5; = p2366*(p1020+p1022)
- p4747: 0; = p1780*p3482
- p1851: 0
- p3161: 0; = p2380*p1082
- p1658: 0
- p3173: 0; = p2392*p1132
- p0067: 29.054
- p0909: 1.40461e7
- p2579: 0; = p2383*p1073
- p0298: 0.5
- p1149: 0.830148
- p5329: 1.18084e-7; = p1950*p3484
- p0240: 29.509
- p1632: 0
- p2073: 0.377647
- p1743: 0
- p2132: 2.65868e-5; = p2015*p2060*p2094/(p0818*1000)
- p1288: 0
- p2804: 0; = p2413*(p1019+p1021)
- p4505: 0; = p1950*p3480
- p0183: 16.463
- p3441: 0; = p3365*p1240
- p2082: 0.285294
- p2428: 0; = p2236*p2218
- p1183: 0.000192065; = p0801*p0001/(p0818*p0002)
- p4514: 0; = p1963*p3480
- p2405: 0; = p2234*p2195
- p1332: 664552; = p1321*p0801
- p1246: 11280.4; = if(p1232>0;0;p1241*(p0725/100)*p0723*1000)
- p2974: 0; = p2388*(p1079+p1081)
- p0872: 0; = p0864*p0856
- p0414: 0; = SQRT(2)*(IF((2*p0282-1)<0;-1;IF((2*p0282-1)>0;1;0))*SQRT(SQRT((2/(pi()*0.140012289)+LN(1-(2*p0282-1)^2)/2)^2-LN(1-(2*p0282-1)^2)/0.140012289)-(2/(pi()*0.140012289)+LN(1-(2*p0282-1)^2)/2)))
- p1651: 0.299611
- p1591: 0
- p1214: 0; = IF(p1213=0;0;p1213-1)
- p1640: 0
- p1022: 0.18355; = IF(p1012=0;IF(p1014+p1019+p1020+p1021=1;0;IF(p1014+p1019+p1020+p1021+p1018>1;1-(p1014+p1019+p1020+p1021);p1018));0)
- p3168: 0; = p2387*p1082
- p0554: 0; = IF(p0290<0.5;-SQRT(p0007*EXP(p0422^2*p0008)-p0007);SQRT(p0007*EXP(p0422^2*p0008)-p0007))
- p2198: 9.10884e-6; = 22.98976928*p2197/14.0067
- p2737: 6.17814e-6; = p2346*(p1078+p1080)
- p3035: 1.37177e-9; = p2254*p1023
- p2645: 4.62315e-5; = p2254*(p1019+p1021)
- p3261: 0.908439
- p1133: 48972.4; = if(p1121=0;p1123*(p0716/100)*p0703*1000;0)
- p1565: 0
- p1882: 0
- p3076: 2.3996e-9; = p2295*p1023
- p3359: 4.60851e6; = if(p1232=0;p3309+p3320+p3331+p3342+p3353;0)
- p2912: 0.00033405; = p2326*(p1020+p1022)
- p1138: 0; = if(p1121=0;p1132*(p0716/100)*p0703*1000;0)
- p2248: 0.000179127; = p2222*p2193
- p0199: 114.597
- p0977: 0; = IF(p0687=0;IF(OR(p0686=0;p0688=0);0;p0686*1000*p0688/100);0)
- p2275: 0; = p2230*p2221
- p1294: 0; = p1290*p1252/p0818
- p1995: 50
- p3691: 1.10665e-6; = p1754*p3477
- p3288: 0.505
- p1243: 4619.59; = if(p1232>0;0;p1238*(p0725/100)*p0723*1000)
- p3316: 0; = if(and(p1232=0;p3253<>0);1-(p3312+p3313+p3314+p3315);0)
- p1677: 0
- p1963d: 0; = p1608*p1812+p1609*p1813+p1610*p1814+p1611*p1815+p1612*p1816+p1613*p1817+p1614*p1818+p1615*p1819+p1616*p1820+p1617*p1821+p1618*p1822+p1619*p1823+p1620*p1824+p1621*p1825+p1622*p1826+p1623*p1827+p1624*p1828+p1625*p1829+p1626*p1830+p1627*p1831
- p1680: 0
- p3124: 2.37053e-5; = p2343*p1082
- p1973: 0; = if(p0807=480;p1968*p0001/(p0818*p0002);0)
- p0747: 9.572; = p0087*(1+p0615*p0219/100)
- p3998: 4.55144e-6; = p1855*p3478
- p2667: 0.00170305; = p2276*(p1019+p1021)
- p3267: 0.0170629
- p1984: 30
- p2743: 9.89913e-6; = p2352*(p1128+p1130)
- p0904: 8.90167e7; = p0825*p0901+(p0830+p0895)*p0824*p0903
- p2168: 0.00521954; = p2166*(p0903)
- p1582: 0
- p1756: 0
- p1634: 0
- p1042: 0.000264901
- p1255: 0; = if(p1232>0;0;p0737/100)
- p0378: 0.5
- p2335: 0.000511823; = p2224*p2203
- p1629: 0
- p2446: 0.000117441; = p2250*p1014
- p3317: 0; = if(and(p1232=0;p3253<>0);p3253*(p3261*p3277-p3312)/p3316;0)
- p1256: 0; = if(p1232>0;0;IF(p1253=1;0;IF(p1253+p1254>1;1-p1253;p1254)))
- p0681: 0
- p1652: 0
- p1819: 0
- p1753: 0
- p1041: 0.330448
- p0438: 0; = SQRT(2)*(IF((2*p0306-1)<0;-1;IF((2*p0306-1)>0;1;0))*SQRT(SQRT((2/(pi()*0.140012289)+LN(1-(2*p0306-1)^2)/2)^2-LN(1-(2*p0306-1)^2)/0.140012289)-(2/(pi()*0.140012289)+LN(1-(2*p0306-1)^2)/2)))
- p2483: 0.00157125; = p2287*p1014
- p2415: 0; = p2235*p2205
- p2847: 2.98318e-5; = p2261*(p1079+p1081)
- p3256: 4.46273e7; = p1252*(p1307*(1-p3247)+p1310*(1-p3248)+p1311*(1-p3249)+p1312*(1-p3250))
- p2492: 0.000851171; = p2296*p1014
- p1913: 0
- p0656: 0; = IF(p0392<0.5;-SQRT(p0007*EXP(p0524^2*p0008)-p0007);SQRT(p0007*EXP(p0524^2*p0008)-p0007))
- p1849: 0
- p0813: 0; = if(p0807=480;1.56521739130435;0)
- p3239: 0.013074; = IF(p3238+p3235+p3236=1;0;1-(p3238+p3235+p3236))
- p1176: 215.968; = p1175*p0801
- p0521: 0; = SQRT(2)*(IF((2*p0389-1)<0;-1;IF((2*p0389-1)>0;1;0))*SQRT(SQRT((2/(pi()*0.140012289)+LN(1-(2*p0389-1)^2)/2)^2-LN(1-(2*p0389-1)^2)/0.140012289)-(2/(pi()*0.140012289)+LN(1-(2*p0389-1)^2)/2)))
- p2784: 0; = p2393*(p1019+p1021)
- p1115: 0.237849
- p2260: 1.76158e-5; = p2226*p2206
- p1808: 0
- p0684: 0
- p3253: 0; = p1252*(p1277*(1-p3247)+p1280*(1-p3248)+p1281*(1-p3249)+p1282*(1-p3250))
- p3137: 2.51309e-10; = p2356*p1023
- p2490: 0.000515874; = p2294*p1014
- p0252: 29.036
- p3400: 0.00172865; = p3362*p1238
- p1190: 3.90388e-8; = p1188/p0818
- p3482: 0; = if(p1328+p1330+p1332+p1334+p1336+p1338+p1340+p1342+p1344=0;0;p1340/(p1328+p1330+p1332+p1334+p1336+p1338+p1340+p1342+p1344))
- p3225: 3.52617e-5; = p3221*p1229
- p3264: 0.0887032
- p1803: 0
- p2824: 1.38339e-5; = p2238*(p1020+p1022)
- p2347: 7.58831e-5; = p2228*p2215
- p3212: 0; = p2431*p1132
- p2880: 0.000589485; = p2294*(p1020+p1022)
- p1697: 0
- p2119: 0.679049
- p1271: 0; = IF(p1267+p1270=p1259;0;IF(p1267+p1270+p1269>p1259;p1259-(p1267+p1270);p1269))
- p1735: 0
- p3378: 3.70495e-5; = if(p1232=0;p3246*p3360/p0818;0)
- p1636: 0
- p0664: 0; = IF(p0400<0.5;-SQRT(p0007*EXP(p0532^2*p0008)-p0007);SQRT(p0007*EXP(p0532^2*p0008)-p0007))
- p3059: 1.77087e-9; = p2278*p1023
- p1051: 560704; = IF(p1012=0;p1044*p1036;0)
- p0051: 44.929
- p0311: 0.5
- p0867: 0; = IF(p0858+p0864+p0865+p0866=1;0;IF(p0858+p0864+p0865+p0866+p0862>1;1-(p0858+p0864+p0865+p0866);p0862))
- p2738: 2.33143e-5; = p2347*(p1078+p1080)
- p3797: 1.19638e-7; = p1860*p3477
- p1963j: 1.11861e-6; = p1725*p1929+p1726*p1930+p1727*p1931+p1728*p1932+p1729*p1933+p1730*p1934+p1731*p1935+p1732*p1936+p1733*p1937+p1734*p1938+p1735*p1939+p1736*p1940+p1737*p1941+p1738*p1942+p1739*p1943+p1740*p1944+p1741*p1945+p1742*p1946+p1743*p1947
- p0026: 263.578
- p3006: 0; = p2420*(p1079+p1081)
- p2590: 0; = p2394*p1014
- p0706: 27.321; = p0046*(1+p0574*p0178/100)
- p0668: 0; = IF(p0404<0.5;-SQRT(p0007*EXP(p0536^2*p0008)-p0007);SQRT(p0007*EXP(p0536^2*p0008)-p0007))
- p0250: 29.031
- p0271: 26.747
- p3689: 0; = p1962*p3476
- p1063: 0.455
- p2002: 750
- p2874: 0.000384876; = p2288*(p1020+p1022)
- p2774: 0; = p2383*(p1078+p1080)
- p2151: 1.76145e-6; = p2015*p2079*p2113/(p0818*1000)
- p0785: 18.648; = p0125*(1+p0653*p0257/100)
- p2429: 0; = p2236*p2219
- p3371: 0; = if(p1232=0;p3245*p3359/p0818;0)
- p2284: 0.000447664; = p2223*p2190
- p3028: 3.21356e-10; = p2247*p1023
- p1989: 50
- p1336: 0; = p1323*p0801
- p2920: 1.57848e-5; = p2334*(p1020+p1022)
- p2676: 3.79403e-5; = p2285*(p1019+p1021)
- p2921: 0.00018096; = p2335*(p1020+p1022)
- p3105: 2.09451e-10; = p2324*p1023
- p3121: 9.27119e-6; = p2340*p1082
- p3409: 0; = p3371*p1238
- p2734: 0.000184339; = p2343*(p1078+p1080)
- p1777: 0
- p1887: 0
- p3220: 0.000902958; = p3216*p1228
- p1661: 0
- p3392: 0; = p3373*p1234
- p2517: 8.2141e-5; = p2321*p1014
- p2051: 0.0025884; = p2015*p2049*p2050/(p0818*1000)
- p2313: 0.000135516; = p2231*p2220
- p2869: 0.000138277; = p2283*(p1020+p1022)
- p2450: 4.24441e-5; = p2254*p1014
- p0787: 0
- p2799: 0; = p2408*(p1019+p1021)
- p2775: 0; = p2384*(p1078+p1080)
- p2384: 0; = p2229*p2213
- p3199: 0; = p2418*p1082
- p2491: 7.42459e-5; = p2295*p1014
- p0211: 12.293
- p2065: 0.0758824
- p1759: 9.04159e-6; = p1351*1000/p0818
- p1784: 0
- p1048: 0.000264901; = IF(p1012=0;IF(p1037+p1044+p1045+p1046+p1047=1;0;IF(p1037+p1044+p1045+p1046+p1047+p1042>1;1-(p1037+p1044+p1045+p1046+p1047);p1042));0)
- p1558: 0
- p3099: 1.13486e-9; = p2318*p1023
- p1132: 0; = if(p1121=0;IF(p1123+p1128+p1129+p1130+p1131=1;0;1-(p1123+p1128+p1129+p1130+p1131));0)
- p3044: 7.27908e-7; = p2263*p1082
- p0616: 0; = IF(p0352<0.5;-SQRT(p0007*EXP(p0484^2*p0008)-p0007);SQRT(p0007*EXP(p0484^2*p0008)-p0007))
- p1099: 0.564594
- p3156: 0; = p2375*p1082
- p1554: 0
- p0702: 500; = p0042*(1+p0570*p0174/100)
- p0983: 0.981091; = if(p0886=0;0;min(1;(p0695*p0694*1000*p0697/100)/p0886))
- p2828: 1.39104e-6; = p2242*(p1020+p1022)
- p2836: 0.000134199; = p2250*(p1020+p1022)
- p3026: 1.57907e-10; = p2245*p1023
- p3445: 0; = p3369*p1240
- p0449: 0; = SQRT(2)*(IF((2*p0317-1)<0;-1;IF((2*p0317-1)>0;1;0))*SQRT(SQRT((2/(pi()*0.140012289)+LN(1-(2*p0317-1)^2)/2)^2-LN(1-(2*p0317-1)^2)/0.140012289)-(2/(pi()*0.140012289)+LN(1-(2*p0317-1)^2)/2)))
- p1465: 83
- p2991: 0; = p2405*(p1020+p1022)
- p0751: 37.661; = p0091*(1+p0619*p0223/100)
- p1097: 0.0327715
- p2867: 3.94358e-5; = p2281*(p1020+p1022)
- p1607: 0
- p1259: 0; = if(p1232>0;0;p0730/100)
- p0707: 17.001; = p0047*(1+p0575*p0179/100)
- p0327: 0.5
- p1082: 0.03951; = IF(p1071=0;IF(p1073+p1078+p1079+p1080+p1081=1;0;1-(p1073+p1078+p1079+p1080+p1081));0)

- p0794: 0.078; = p0134*(1+p0662*p0266/100)
- p0632: 0; = IF(p0368<0.5;-SQRT(p0007*EXP(p0500^2*p0008)-p0007);SQRT(p0007*EXP(p0500^2*p0008)-p0007))
- p0953: 0; = if(and(p0683>0;or(p0807=56;p0807=100;and(p0807=60;p0901>0.06)));p0935;0)
- p0399: 0.5
- p0307: 0.5
- p3048: 5.9906e-8; = p2267*p1082
- p2752: 1.87053e-5; = p2361*(p1019+p1021)
- p2616: 0; = p2420*p1073
- p0701: 0
- p1650: 0
- p3345: 0.160606; = if(and(p1232=0;p3256<>0);p3273*p3277*p3293;0)
- p2937: 0.000128547; = p2351*(p1129+p1131)
- p0708: 6.381; = p0048*(1+p0576*p0180/100)
- p2447: 4.44301e-8; = p2251*p1014
- p3118: 1.23794e-5; = p2337*p1082
- p3126: 3.45041e-7; = p2345*p1082
- p0502: 0; = SQRT(2)*(IF((2*p0370-1)<0;-1;IF((2*p0370-1)>0;1;0))*SQRT(SQRT((2/(pi()*0.140012289)+LN(1-(2*p0370-1)^2)/2)^2-LN(1-(2*p0370-1)^2)/0.140012289)-(2/(pi()*0.140012289)+LN(1-(2*p0370-1)^2)/2)))
- p2727: 0.000106438; = p2336*(p1078+p1080)
- p1883: 0
- p2449: 1.60333e-7; = p2253*p1014
- p2018: 0.1978
- p1737: 0
- p5225: 1.29893e-6; = p1846*p3484
- p4726: 0; = p1759*p3482
- p0424: 0; = SQRT(2)*(IF((2*p0292-1)<0;-1;IF((2*p0292-1)>0;1;0))*SQRT(SQRT((2/(pi()*0.140012289)+LN(1-(2*p0292-1)^2)/2)^2-LN(1-(2*p0292-1)^2)/0.140012289)-(2/(pi()*0.140012289)+LN(1-(2*p0292-1)^2)/2)))
- p0185: 36.503
- p2437: 8.4583e-6; = p2241*p1014
- p0938: 0; = p0932*p0001/(p0818*p0002)
- p1733: 0
- p2893: 1.03678e-5; = p2307*(p1079+p1081)
- p0685: 0
- p2996: 0; = p2410*(p1020+p1022)
- p1372: 34
- p2016: 0.0167974; = (p2014-p2015)/(p0818)
- p0461: 0; = SQRT(2)*(IF((2*p0329-1)<0;-1;IF((2*p0329-1)>0;1;0))*SQRT(SQRT((2/(pi()*0.140012289)+LN(1-(2*p0329-1)^2)/2)^2-LN(1-(2*p0329-1)^2)/0.140012289)-(2/(pi()*0.140012289)+LN(1-(2*p0329-1)^2)/2)))
- p3415: 2.67492e-6; = p3377*p1238
- p0557: 0; = IF(p0293<0.5;-SQRT(p0007*EXP(p0425^2*p0008)-p0007);SQRT(p0007*EXP(p0425^2*p0008)-p0007))
- p2529: 9.59801e-5; = p2333*p1014
- p1572: 0
- p3146: 7.20663e-9; = p2365*p1023
- p0008: 0.0739645; = (p0007-1.5)/(p0007-1)^2
- p3190: 0; = p2409*p1023
- p1210: 0.13
- p3333: 0; = if(and(p1232=0;p3255<>0);p3255-(p3328+p3329+p3330+p3331+p3332);0)
- p0515: 0; = SQRT(2)*(IF((2*p0383-1)<0;-1;IF((2*p0383-1)>0;1;0))*SQRT(SQRT((2/(pi()*0.140012289)+LN(1-(2*p0383-1)^2)/2)^2-LN(1-(2*p0383-1)^2)/0.140012289)-(2/(pi()*0.140012289)+LN(1-(2*p0383-1)^2)/2)))
- p3003: 0; = p2417*(p1079+p1081)
- p2786: 0; = p2395*(p1019+p1021)
- p3438: 0; = p3362*p1240
- p2500: 0.000681442; = p2304*p1073
- p2724: 0.000104545; = p2333*(p1019+p1021)
- p0442: 0; = SQRT(2)*(IF((2*p0310-1)<0;-1;IF((2*p0310-1)>0;1;0))*SQRT(SQRT((2/(pi()*0.140012289)+LN(1-(2*p0310-1)^2)/2)^2-LN(1-(2*p0310-1)^2)/0.140012289)-(2/(pi()*0.140012289)+LN(1-(2*p0310-1)^2)/2)))
- p2608: 0; = p2412*p1014
- p2083: 2.17294
- p1074: 0.30724; = IF(p1071=0;p0712/100;0)
- p1778: 0
- p1032: 3.00114e-5; = IF(p1012=0;p1026*p0001/(p0818*p0002);0)
- p2434: 1.21064e-5; = p2238*p1014
- p1965: 0.000124; = p1963+p1959*p1964*1000/p0818
- p1199: -0.29
- p0079: 0.583
- p2816: 0; = p2425*(p1078+p1080)
- p5175: 9.44674e-7; = p1796*p3484
- p0299: 0.5
- p1557: 0
- p1730: 0
- p4927: 0; = p1754*p3483
- p1910: 0
- p0901: 0.02704
- p2279: 0.000609967; = p2223*p2185
- p1002: 292316; = p0996*p0888
- p1072: 0; = p1071*p0001/(p0818*p0002)
- p1038: 0.0115234
- p2637: 1.33829e-6; = p2246*(p1019+p1021)
- p3412: 8.05831e-6; = p3374*p1238
- p0704: 91.91; = p0044*(1+p0572*p0176/100)
- p3182: 0; = p2401*p1023
- p1118: 0.000426526; = IF(p1071=0;p1108/(p1113*p0818);0)
- p3090: 1.15522e-6; = p2309*p1082
- p2524: 0.000619452; = p2328*p1014
- p3030: 3.8398e-10; = p2249*p1023
- p2294: 0.00166728; = p2223*p2201
- p2778: 0; = p2387*(p1078+p1080)
- p3071: 4.07092e-11; = p2290*p1023
- p0911: 0.0041
- p2258: 6.01478e-5; = p2226*p2204
- p0998: 0; = if(p0888=0;0;if((p0699*p0698*1000*p0700/100)/p0888>1;1;(p0699*p0698*1000*p0700/100)/p0888))
- p1810: 0
- p1047: 0.330448; = IF(p1012=0;IF(p1037+p1044+p1045+p1046=1;0;IF(p1037+p1044+p1045+p1046+p1041>1;1-(p1037+p1044+p1045+p1046);p1041));0)
- p1217: 0
- p1202: 0.7
- p3188: 0; = p2407*p1023
- p3042: 5.77885e-6; = p2261*p1082
- p1569: 0
- p0592: 0; = IF(p0328<0.5;-SQRT(p0007*EXP(p0460^2*p0008)-p0007);SQRT(p0007*EXP(p0460^2*p0008)-p0007))
- p1993: 400
- p3086: 8.3413e-8; = p2305*p1082
- p1590: 0
- p0845: 0.5
- p1260: 0; = if(p1232>0;0;p0731/100)
- p3254: 0; = p1252*(p1287*(1-p3247)+p1290*(1-p3248)+p1291*(1-p3249)+p1292*(1-p3250))
- p3154: 3.40534e-10; = p2373*p1023
- p2904: 4.01243e-5; = p2318*(p1020+p1022)
- p3109: 2.00204e-8; = p2328*p1023
- p1888: 0
- p0645: 0; = IF(p0381<0.5;-SQRT(p0007*EXP(p0513^2*p0008)-p0007);SQRT(p0007*EXP(p0513^2*p0008)-p0007))
- p1086: 0; = IF(p1071=0;p1080*(p0710/100)*p0703*1000;0)
- p1825: 0
- p2673: 0.000480888; = p2282*(p1019+p1021)
- p0558: 0; = IF(p0294<0.5;-SQRT(p0007*EXP(p0426^2*p0008)-p0007);SQRT(p0007*EXP(p0426^2*p0008)-p0007))
- p4634: 9.76731e-6; = p1873*p3481
- p1724: 0
- p2792: 0; = p2401*(p1019+p1021)
- p0050: 61.633
- p0790: 0
- p2397: 0; = p2234*p2186
- p1274: 0; = p1270*p1252/p0818
- p2382: 0; = p2229*p2211
- p1252: 3.57019e8; = if(p1232>0;0;p0724*2000*p0723*1000*p0725/100)
- p3170: 0; = p2389*p1132
- p3033: 2.3569e-12; = p2252*p1023
- p0548: 0; = IF(p0284<0.5;-SQRT(p0007*EXP(p0416^2*p0008)-p0007);SQRT(p0007*EXP(p0416^2*p0008)-p0007))
- p2098: 0.856281
- p1823: 0
- p1160: 0.0390088; = (p1156+p1158)*p1159
- p0223: 14.431
- p3810: 2.48248e-6; = p1873*p3477
- p2956: 7.37094e-7; = p2370*(p1020+p1022)
- p4711: 1.17678e-7; = p1950*p3481
- p2470: 0; = p2274*p1123
- p0162: 38.812
- p0403: 0.5
- p0637: 0; = IF(p0373<0.5;-SQRT(p0007*EXP(p0505^2*p0008)-p0007);SQRT(p0007*EXP(p0505^2*p0008)-p0007))
- p1683: 0
- p1768: 0
- p1323: 0; = IF(((p0745*1000*p0750/100)+(p0754*1000*p0759/100))/p0801<0;0;((p0745*1000*p0750/100)+(p0754*1000*p0759/100))/p0801)
- p0448: 0; = SQRT(2)*(IF((2*p0316-1)<0;-1;IF((2*p0316-1)>0;1;0))*SQRT(SQRT((2/(pi()*0.140012289)+LN(1-(2*p0316-1)^2)/2)^2-LN(1-(2*p0316-1)^2)/0.140012289)-(2/(pi()*0.140012289)+LN(1-(2*p0316-1)^2)/2)))
- p2990: 0; = p2404*(p1020+p1022)
- p3383: 0; = p3364*p1234
- p2075: 0.072
- p2648: 3.27031e-5; = p2257*(p1019+p1021)
- p1009: 7.84181e-7; = p1005*p0001*p0004/(p0818*p0002)
- p1861: 0
- p2933: 1.54771e-5; = p2347*(p1079+p1081)
- p3152: 5.51892e-9; = p2371*p1023
- p3391: 0; = p3372*p1234
- p2837: 5.07698e-8; = p2251*(p1020+p1022)
- p2143: 1.41911e-5; = p2015*p2071*p2105/(p0818*1000)
- p0642: 0; = IF(p0378<0.5;-SQRT(p0007*EXP(p0510^2*p0008)-p0007);SQRT(p0007*EXP(p0510^2*p0008)-p0007))
- p1749: 0
- p3103: 7.27653e-10; = p2322*p1023
- p2571: 0; = p2375*p1073
- p2950: 4.5711e-5; = p2364*(p1020+p1022)
- p2732: 3.26023e-5; = p2341*(p1078+p1080)
- p1085: 62853.3; = IF(p1071=0;p1079*(p0710/100)*p0703*1000;0)
- p1575: 0
- p0346: 0.5
- p2459: 8.27745e-6; = p2263*p1073
- p0002: 0.453592
- p2563: 0.000472489; = p2367*p1014
- p0405: 0; = SQRT(2)*(IF((2*p0273-1)<0;-1;IF((2*p0273-1)>0;1;0))*SQRT(SQRT((2/(pi()*0.140012289)+LN(1-(2*p0273-1)^2)/2)^2-LN(1-(2*p0273-1)^2)/0.140012289)-(2/(pi()*0.140012289)+LN(1-(2*p0273-1)^2)/2)))
- p2691: 0.000654298; = p2300*(p1078+p1080)
- p1034: 3.24015e-5; = IF(p1012=0;p1028*p0001/(p0818*p0002);0)
- p2135: 8.52723e-5; = p2015*p2063*p2097/(p0818*1000)
- p2071: 0.151
- p0940: 0; = if(and(p0683=0;p0946=0);p0934;0)
- p0999: 0.811439; = IF(p0996=1;0;IF(p0996+p0997>1;1-p0996;p0997))
- p3385: 0; = p3366*p1234
- p3129: 4.56986e-7; = p2348*p1082
- p1314: 0; = p1310*p1252/p0818
- p2747: 8.46963e-6; = p2356*(p1019+p1021)
- p1674: 0
- p3357: 3.22836e6; = if(p1232=0;p3307+p3318+p3329+p3340+p3351;0)
- p2749: 3.7066e-5; = p2358*(p1019+p1021)
- p3465: 0; = p3370*p1241
- p0635: 0; = IF(p0371<0.5;-SQRT(p0007*EXP(p0503^2*p0008)-p0007);SQRT(p0007*EXP(p0503^2*p0008)-p0007))
- p2979: 0; = p2393*(p1020+p1022)
- p0855: 0.614099; = p0854*p0001*p0003/(p0818*p0002)
- p2589: 0; = p2393*p1014
- p0812: 0; = if(p0807=480;0.095/0.34;0)
- p2482: 0.000281884; = p2286*p1014
- p2486: 1.25958e-6; = p2290*p1014
- p0317: 0.5
- p1726: 0
- p2852: 2.95739e-8; = p2266*(p1079+p1081)
- p2359: 1.58288e-5; = p2225*p2187
- p2389: 0; = p2233*p2218
- p2253: 5.18189e-7; = p2222*p2199
- p3421: 0; = p3364*p1239
- p2157: 4.43785e-6; = p2015*p2086*p2119/(p0818*1000)
- p1551: 0
- p2091: 0.374844
- p3285: 0.275
- p0679: 64.805; = p0019*(1+p0547*p0151/100)
- p2047: 3.17433e-12; = p2015*p2045/(p0818*1000000000000)
- p1127: 0; = if(p1121=0;p0721/100;0)
- p3150: 9.48227e-12; = p2369*p1023
- p3116: 5.11823e-9; = p2335*p1023
- p2496: 0.000956807; = p2300*p1073
- p2042: 0.07
- p2360: 0.000202493; = p2225*p2188
- p2320: 2.07522e-5; = p2224*p2187
- p2333: 0.000310204; = p2224*p2201
- p2610: 0; = p2414*p1073
- p1691: 0
- p0593: 0; = IF(p0329<0.5;-SQRT(p0007*EXP(p0461^2*p0008)-p0007);SQRT(p0007*EXP(p0461^2*p0008)-p0007))
- p2825: 2.20852e-6; = p2239*(p1020+p1022)
- p5047: 0; = p1874*p3483
- p0758: 0
- p2742: 0.00011111; = p2351*(p1128+p1130)
- p2683: 4.95101e-6; = p2292*(p1019+p1021)
- p1057: 0.82
- p3444: 0; = p3368*p1240
- p1706: 0
- p1588: 0
- p0371: 0.5
- p1949: 0
- p2084: 0.21
- p0369: 0.5
- p1093: 0; = IF(p1071=0;p1087*p0001/(p0818*p0002);0)
- p1694: 0
- p1622: 0
- p1717: 0
- p2814: 0; = p2423*(p1078+p1080)
- p3473: 2.62851e-5; = p3378*p1241
- p1006: 2.8521e-6; = p1002*p0001*p0004/(p0818*p0002)
- p2702: 0.000299255; = p2311*(p1128+p1130)
- p2829: 1.77951e-5; = p2243*(p1020+p1022)
- p1278: 0
- p2520: 6.48063e-6; = p2324*p1014
- p2074: 0.025
- p3149: 5.77715e-12; = p2368*p1023
- p4720: 1.84148e-5; = p1963*p3481
- p0834: 0.00059
- p2107: 0.881623
- p2043: 0.636483
- p2763: 7.97419e-5; = p2372*(p1019+p1021)
- p1142: 0; = if(p1121=0;p1136*p0001/(p0818*p0002);0)
- p0534: 0; = SQRT(2)*(IF((2*p0402-1)<0;-1;IF((2*p0402-1)>0;1;0))*SQRT(SQRT((2/(pi()*0.140012289)+LN(1-(2*p0402-1)^2)/2)^2-LN(1-(2*p0402-1)^2)/0.140012289)-(2/(pi()*0.140012289)+LN(1-(2*p0402-1)^2)/2)))
- p2671: 0.000261188; = p2280*(p1019+p1021)
- p0915: 0.0170129; = p0914/p0818
- p0007: 14; = p0006-1
- p1335: 1.2904e-5; = p1334*p0001/(p0818*p0002)
- p2735: 2.56591e-7; = p2344*(p1078+p1080)
- p2024: 0.748682
- p2509: 5.44761e-5; = p2313*p1123
- p0982: 0; = if(p0886=0;0;min(1;(p0691*p0690*1000*p0693/100)/p0886))
- p1901: 0
- p0844: 0.328053
- p0928: 314666; = p0801*p0918
- p2705: 6.529e-5; = p2314*(p1128+p1130)
- p3029: 1.79127e-9; = p2248*p1023
- p2080: 0.025
- p2180: 2.35771e-8; = p3233*p1188/(p0818)
- p1869: 0
- p0291: 0.5
- p2061: 0.518824
- p1806: 0
- p3094: 0; = p2313*p1132
- p2281: 0.000111539; = p2223*p2187
- p2728: 9.62653e-5; = p2337*(p1078+p1080)
- p0452: 0; = SQRT(2)*(IF((2*p0320-1)<0;-1;IF((2*p0320-1)>0;1;0))*SQRT(SQRT((2/(pi()*0.140012289)+LN(1-(2*p0320-1)^2)/2)^2-LN(1-(2*p0320-1)^2)/0.140012289)-(2/(pi()*0.140012289)+LN(1-(2*p0320-1)^2)/2)))
- p0257: 40.477
- p0691: 13.256; = p0031*(1+p0559*p0163/100)
- p4093: 1.56946e-7; = p1950*p3478
- p3428: 0; = p3371*p1239
- p2962: 0; = p2376*(p1079+p1081)
- p1114: 0.216028
- p3407: 0; = p3369*p1238
- p0993: 3.24451e-5; = p0989*p0001*p0004/(p0818*p0002)
- p1135: 39076.6; = if(p1121=0;p1129*(p0716/100)*p0703*1000;0)
- p1868: 0
- p2506: 0.000117737; = p2310*p1073
- p3925: 1.09862e-6; = p1782*p3478
- p3219: 0.0067841; = p3215*p1228
- p1134: 33776; = if(p1121=0;p1128*(p0716/100)*p0703*1000;0)
- p2947: 1.96233e-5; = p2361*(p1020+p1022)
- p3266: 0.0545989
- p4223: 1.50738e-7; = p1874*p3479
- p3390: 0; = p3371*p1234
- p0969: 0
- p1763: 0
- p0799: 35.252; = p0139*(1+p0667*p0271/100)
- p1084: 94680.6; = IF(p1071=0;p1078*(p0710/100)*p0703*1000;0)
- p2380: 0; = p2229*p2209
- p2935: 2.11431e-5; = p2349*(p1079+p1081)
- p1053: 1.23832e6; = IF(p1012=0;p1046*p1036;0)
- p2808: 0; = p2417*(p1078+p1080)
- p2954: 2.04257e-7; = p2368*(p1020+p1022)
- p2766: 0; = p2375*(p1078+p1080)
- p3200: 0; = p2419*p1082
- p2110: 0.856281
- p3000: 0; = p2414*(p1079+p1081)
- p2599: 0; = p2403*p1014
- p2794: 0; = p2403*(p1019+p1021)
- p1859: 0
- p3037: 8.46426e-11; = p2256*p1023
- p1773: 0
- p0175: 0
- p3382: 0; = p3363*p1234
- p3351: 3.22836e6; = if(and(p1232=0;p3256<>0);p3256*(p3274-p3346)/p3349;0)
- p1602: 0
- p3131: 0; = p2350*p1132
- p2465: 5.91931e-6; = p2269*p1073
- p2741: 7.88454e-5; = p2350*(p1128+p1130)
- p4016: 1.30265e-5; = p1873*p3478
- p3429: 0; = p3372*p1239
- p2911: 5.9929e-5; = p2325*(p1020+p1022)
- p0481: 0; = SQRT(2)*(IF((2*p0349-1)<0;-1;IF((2*p0349-1)>0;1;0))*SQRT(SQRT((2/(pi()*0.140012289)+LN(1-(2*p0349-1)^2)/2)^2-LN(1-(2*p0349-1)^2)/0.140012289)-(2/(pi()*0.140012289)+LN(1-(2*p0349-1)^2)/2)))
- p3278: 0.46
- p1617: 0
- p0370: 0.5
- p2031: 0.465411
- p0786: 0
- p1173: 0.5
- p2193: 0.00692282; = p1054/p0818
- p0315: 0.5
- p1644: 0
- p1850: 0
- p2353: 6.20454e-5; = p2232*p2221
- p3485: 0; = p1754*p3476
- p0674: 0
- p2978: 0; = p2392*(p1129+p1131)
- p2117: 0.585147
- p3395: 0; = p3376*p1234
- p0920: 0; = p0676*1000/p0801
- p2276: 0.00505326; = p2223*p2182
- p0122: 24.365
- p1716: 0
- p2535: 0.000378496; = p2339*p1073
- p1624: 0
- p0189: 26.125
- p0746: 0
- p1043: 0.25306
- p2476: 0.000239791; = p2280*p1014
- p0717: 40.199; = p0057*(1+p0585*p0189/100)
- p0800: 24.365; = p0140*(1+p0668*p0272/100)
- p1245: 0; = if(p1232>0;0;p1240*(p0725/100)*p0723*1000)
- p2406: 0; = p2234*p2196
- p1325: 0; = IF(((p0745*1000*p0752/100)+(p0754*1000*p0761/100))/p0801<0;0;((p0745*1000*p0752/100)+(p0754*1000*p0761/100))/p0801)
- p3344: 0; = if(and(p1232=0;p3254<>0);p3254-(p3339+p3340+p3341+p3342+p3343);0)
- p2127: 0.000236799; = p2015*p2055*p2089/(p0818*1000)
- p2969: 0; = p2383*(p1079+p1081)
- p1642: 0.902
- p2444: 5.54237e-5; = p2248*p1014
- p0137: 39.224
- p0585: 0; = IF(p0321<0.5;-SQRT(p0007*EXP(p0453^2*p0008)-p0007);SQRT(p0007*EXP(p0453^2*p0008)-p0007))
- p2020: 6.37044e6; = p2015*p2018*p2019
- p1188: 90.6716; = p1187*p0801
- p0865: 0; = IF(p0858+p0864=1;0;IF(p0858+p0864+p0860>1;1-(p0858+p0864);p0860))
- p3369: 0; = if(p1232=0;p3245*p3357/p0818;0)
- p0046: 27.321
- p2164: 0.0380201; = (p2015/p0818)-(p2022)-(p2035+p2036+p2052)-(p2017/p0818)-(p2039+p2041+p2044+p2158+p2159+p2160+p2161+p2162)
- p2242: 3.93439e-6; = p2222*p2187
- p3039: 2.37644e-6; = p2258*p1082
- p1609: 0
- p2682: 2.25189e-6; = p2291*(p1019+p1021)
- p2623: 0; = p2427*p1073
- p2105: 0.888194
- p2764: 1.14767e-5; = p2373*(p1019+p1021)
- p2787: 0; = p2396*(p1019+p1021)
- p1963b: 8.96725e-6; = p1569*p1773+p1570*p1774+p1571*p1775+p1572*p1776+p1573*p1777+p1574*p1778+p1575*p1779+p1576*p1780+p1577*p1781+p1578*p1782+p1579*p1783+p1580*p1784+p1581*p1785+p1582*p1786+p1583*p1787+p1584*p1788+p1585*p1789+p1586*p1790+p1587*p1791
- p1829: 0
- p1675: 0
- p1669: 0.523221
- p0990: 0; = p0986*p0886
- p3185: 0; = p2404*p1023
- p4953: 0; = p1780*p3483
- p2756: 0.000242878; = p2365*(p1019+p1021)
- p0980: 0; = IF(p0977=0;0;p0977*p0001/(p0818*p0002))
- p2658: 4.65845e-7; = p2267*(p1078+p1080)
- p2152: 2.20182e-6; = p2015*p2080*p2114/(p0818*1000)
- p0726: 0
- p2820: 0; = p2429*(p1128+p1130)
- p3719: 2.09366e-7; = p1782*p3477
- p3184: 0; = p2403*p1023
- p1096: 0.00136107
- p4222: 6.58485e-7; = p1873*p3479
- p1738: 0
- p0890: 0; = p0686*1000*p0687*p0885/100
- p2474: 5.47925e-5; = p2278*p1014
- p2628: 6.00728e-5; = p2237*(p1019+p1021)
- p1054: 1.60789e7; = IF(p1012=0;p1047*p1036;0)
- p0921: 0.12961; = p0679*1000/p0801
- p0440: 0; = SQRT(2)*(IF((2*p0308-1)<0;-1;IF((2*p0308-1)>0;1;0))*SQRT(SQRT((2/(pi()*0.140012289)+LN(1-(2*p0308-1)^2)/2)^2-LN(1-(2*p0308-1)^2)/0.140012289)-(2/(pi()*0.140012289)+LN(1-(2*p0308-1)^2)/2)))
- p3147: 1.54483e-9; = p2366*p1023
- p2209: 0.000392783; = 14.0067*p2208/30.973762
- p1688: 0
- p2068: 0.153529
- p3186: 0; = p2405*p1023
- p1916: 0
- p0796: 91.91; = p0136*(1+p0664*p0268/100)
- p1039: 0.0504301
- p2244: 1.37955e-5; = p2222*p2189
- p1751: 0
- p0880: 0; = p0868*p0856
- p0349: 0.5
- p1894: 0
- p1281: 0; = IF(p1277+p1280=p1263;0;IF(p1277+p1280+p1279>p1263;p1263-(p1277+p1280);p1279))
- p2293: 0.00388895; = p2223*p2200
- p1192: 1.95194e-8; = p1188*p1191/p0818
- p0104: 91.91
- p2346: 2.01085e-5; = p2228*p2214
- p2376: 0; = p2229*p2205
- p3475: 0.0954229; = p3380*p1241
- p1699: 0
- p2471: 0; = p2275*p1123
- p2706: 0.000316858; = p2315*(p1019+p1021)
- p2597: 0; = p2401*p1014
- p1324: 0.996564; = IF(((p0745*1000*p0751/100)+(p0754*1000*p0760/100))/p0801<0;0;((p0745*1000*p0751/100)+(p0754*1000*p0760/100))/p0801)
- p5337: 4.1359e-9; = p1962*p3484
- p1647: 0
- p2265: 0.000104169; = p2226*p2211
- p3049: 1.37939e-7; = p2268*p1082
- p3224: 0.501945; = IF(p3216=0;0;1-p3221-p3222-p3223)
- p2555: 4.8976e-6; = p2359*p1014
- p2981: 0; = p2395*(p1020+p1022)
- p0244: 19.257
- p1555: 0.933291
- p1189: 0.000192065; = p0801*p0001/(p0818*p0002)
- p1153: 0.365265
- p1319: 0; = IF(((p0745*1000*p0746/100)+(p0754*1000*p0755/100))/p0801<0;0;((p0745*1000*p0746/100)+(p0754*1000*p0755/100))/p0801)
- p0869: 1; = IF(p0858+p0864+p0865+p0866+p0867+p0868=1;0;1-(p0858+p0864+p0865+p0866+p0867+p0868))
- p2213: 3.23256e-5; = p1116-p2212
- p3403: 0.000573816; = p3365*p1238
- p2493: 0.000393468; = p2297*p1073
- p1562: 0
- p1977: 3.57019e8; = p1252+p1188
- p2851: 2.12463e-5; = p2265*(p1079+p1081)
- p3442: 0; = p3366*p1240
- p1978: 411
- p1827: 0
- p0878: 0; = p0867*p0856
- p2218: 0.00136375; = p1150/p0818
- p2201: 0.00227291; = 12.01*p2200/(2*14.0067)
- p2142: 2.43823e-5; = p2015*p2070*p2104/(p0818*1000)
- p1580: 0
- p0139: 35.252
- p3978: 4.70839e-7; = p1835*p3478
- p0709: 18.355; = p0049*(1+p0577*p0181/100)
- p1014: 0.30941; = IF(p1012=0;p0705/100;0)
- p3130: 4.09572e-6; = p2349*p1082
- p0699: 0
- p1563: 0
- p5116: 0; = p1943*p3483
- p2943: 3.06049e-5; = p2357*(p1020+p1022)
- p0351: 0.5
- p2124: 0.263965
- p3431: 0; = p3374*p1239
- p0713: 20.396; = p0053*(1+p0581*p0185/100)
- p1102: 0.01885; = IF(p1071=0;IF(p1096+p1101=1;0;IF(p1096+p1101+p1098>1;1-(p1096+p1101);p1098));0)
- p1793: 0
- p2669: 5.96819e-5; = p2278*(p1019+p1021)
- p2519: 2.57706e-5; = p2323*p1014
- p3215: 0.450791; = p1222*3*15.9994/100.0869
- p3389: 0; = p3370*p1234
- p1329: 0; = p1328*p0001/(p0818*p0002)
- p3303: 0; = if(and(p1232=0;p3252<>0);p3259*p3289;0)
- p2581: 0; = p2385*p1073
- p4335: 0; = p1780*p3480
- p2776: 0; = p2385*(p1078+p1080)
- p0963: 0; = if(and(p0683>0;or(p0807=480;p0807=32;p0807=1;and(p0807=60;p0901<0.03)));p0939;0)
- p1761: 0
- p1301: 0; = IF(p1297+p1300=p1265;0;IF(p1297+p1300+p1299>p1265;p1265-(p1297+p1300);p1299))
- p3258: 0.0491162
- p3089: 7.57905e-6; = p2308*p1082
- p1147: 0.111546
- p1922: 0
- p0056: 24.365
- p2208: 0.000868582; = p1110/p0818
- p5133: 4.36912e-6; = p1754*p3484
- p5123: 0; = p1950*p3483
- p2317: 3.29477e-5; = p2224*p2184
- p3286: 0.185
- p2955: 3.35255e-7; = p2369*(p1020+p1022)
- p2464: 1.56858e-6; = p2268*p1073
- p4541: 4.00107e-6; = p1780*p3481
- p2379: 0; = p2229*p2208
- p0945: 0; = if(and(p0683=0;p0951=0);p0939;0)
- p0743: 0
- p2842: 2.99262e-6; = p2256*(p1020+p1022)
- p2613: 0; = p2417*p1073
- p2461: 4.68021e-5; = p2265*p1073
- p2577: 0; = p2381*p1073
- p3413: 1.87383e-6; = p3375*p1238
- p1029: 4.5955; = IF(p1012=0;IF(p0801<p1023*(p0704/100)*p0703*1000;p0801;p1023*(p0704/100)*p0703*1000);0)
- p2128: 8.79874e-5; = p2015*p2056*p2090/(p0818*1000)
- p2358: 0.000109982; = p2225*p2186
- p0261: 30.75
- p0665: 0; = IF(p0401<0.5;-SQRT(p0007*EXP(p0533^2*p0008)-p0007);SQRT(p0007*EXP(p0533^2*p0008)-p0007))
- p2400: 0; = p2234*p2189
- p2076: 0.057
- p3439: 0; = p3363*p1240
- p3063: 1.42688e-8; = p2282*p1023
- p3115: 4.46453e-10; = p2334*p1023
- p0152: 0
- p3262: 0.0787162
- p1050: 1.59999e7; = IF(p1012=0;p1037*p1036;0)
- p2807: 0; = p2416*(p1078+p1080)
- p4410: 0; = p1855*p3480
- p2949: 5.64846e-6; = p2363*(p1020+p1022)
- p3060: 6.09967e-9; = p2279*p1023
- p2973: 0; = p2387*(p1079+p1081)
- p0946: 0.000120873; = if(and(p0683=0;or(p0807=480;p0807=32;p0807=1;and(p0807=60;p0901<0.03)));p0934;0)
- p1061: 0.3
- p1942: 0
- p1840: 0
- p2326: 0.000944819; = p2224*p2193
- p1327: 1; = if(p1318=0;if(p1327a=0;1;if(p1327a<0;0;p1327a));0)
- p0884: 36.834; = IF(p0689=100;0;IF(p0689+p0688>100;100-p0689;p0688))
- p3425: 0; = p3368*p1239
- p1223: 0.56
- p2394: 0; = p2234*p2183
- p1727: 0
- p0939: 1.09047e-5; = p0933*p0001/(p0818*p0002)
- p1934: 0
- p2419: 0; = p2235*p2209
- p1698: 0
- p1862: 0
- p1957: 0
- p3265: 0.696292
- p3301: 0; = if(and(p1232=0;p3252<>0);p3257*p3277*(p3297*p3290+(1-p3297)*p3294);0)
- p2516: 6.42095e-6; = p2320*p1014
- p0994: 0; = p0990*p0001*p0004/(p0818*p0002)
- p0997: 0.811439; = if(p0888=0;0;if((p0695*p0694*1000*p0696/100)/p0888>1;1;(p0695*p0694*1000*p0696/100)/p0888))
- p1919: 0
- p2015: 2.45757e8; = p0830*p2011*p2013
- p0416: 0; = SQRT(2)*(IF((2*p0284-1)<0;-1;IF((2*p0284-1)>0;1;0))*SQRT(SQRT((2/(pi()*0.140012289)+LN(1-(2*p0284-1)^2)/2)^2-LN(1-(2*p0284-1)^2)/0.140012289)-(2/(pi()*0.140012289)+LN(1-(2*p0284-1)^2)/2)))
- p0991: 64089.4; = p0987*p0886
- p0606: 0; = IF(p0342<0.5;-SQRT(p0007*EXP(p0474^2*p0008)-p0007);SQRT(p0007*EXP(p0474^2*p0008)-p0007))
- p1345: 0.000192065; = IF(p1318=0;p1344*p0001/(p0818*p0002);0)
- p1231: 0.00764461; = IF(p1221=0;0;p1230*(p1228+p1229))
- p2289: 0.0107606; = p2223*p2196
- p2357: 8.65621e-5; = p2225*p2185
- p2451: 1.81968e-5; = p2255*p1014
- p1891: 0
- p1338: 498282; = p1324*p0801
- p2886: 0.000434353; = p2300*(p1079+p1081)
- p4635: 2.23589e-6; = p1874*p3481
- p2562: 4.77985e-5; = p2366*p1014
- p0035: 21.374
- p3393: 0; = p3374*p1234
- p3474: 4.60213e-6; = p3379*p1241
- p1600: 0
- p0985: 0.981091; = IF(p0982=1;0;IF(p0982+p0983>1;1-p0982;p0983))
- p1837: 0
- p1162: 0.000215276; = p1161/p0818
- p2160: 7.58147e-6; = p2015*p2084*p2122/(p0818*1000)
- p0766: 92.174; = p0106*(1+p0634*p0238/100)
- p0453: 0; = SQRT(2)*(IF((2*p0321-1)<0;-1;IF((2*p0321-1)>0;1;0))*SQRT(SQRT((2/(pi()*0.140012289)+LN(1-(2*p0321-1)^2)/2)^2-LN(1-(2*p0321-1)^2)/0.140012289)-(2/(pi()*0.140012289)+LN(1-(2*p0321-1)^2)/2)))
- p1991: 2.94192e7; = (if(p1111=0;0;p1106/p1111)+if(p1112=0;0;p1107/p1112)+if(p1113=0;0;p1108/p1113)+if(p1114=0;0;p1109/p1114)+if(p1115=0;0;p1110/p1115))*(1+p1157)
- p0711: 44.929; = p0051*(1+p0579*p0183/100)
- p2916: 4.39533e-7; = p2330*(p1020+p1022)
- p2980: 0; = p2394*(p1020+p1022)
- p1312: 1; = IF(p1307+p1310+p1311=p1266;0;p1266-(p1307+p1310+p1311))
- p2038: 0.304457
- p0563: 0; = IF(p0299<0.5;-SQRT(p0007*EXP(p0431^2*p0008)-p0007);SQRT(p0007*EXP(p0431^2*p0008)-p0007))
- p1111: 0.0872841
- p2572: 0; = p2376*p1073
- p2278: 0.000177087; = p2223*p2184
- p0952: 0; = if(and(p0683>0;or(p0807=56;p0807=100;and(p0807=60;p0901>0.06)));p0934;0)
- p0918: 0.629332; = p0680*1000/p0801
- p0694: 230.614; = p0034*(1+p0562*p0166/100)
- p4621: 4.70714e-7; = p1860*p3481
- p2398: 0; = p2234*p2187
- p3411: 0; = p3373*p1238
- p2192: 0.00124196; = p1067-p2189-p2190-p2191
- p3144: 1.5976e-10; = p2363*p1023
- p1718: 0
- p0527: 0; = SQRT(2)*(IF((2*p0395-1)<0;-1;IF((2*p0395-1)>0;1;0))*SQRT(SQRT((2/(pi()*0.140012289)+LN(1-(2*p0395-1)^2)/2)^2-LN(1-(2*p0395-1)^2)/0.140012289)-(2/(pi()*0.140012289)+LN(1-(2*p0395-1)^2)/2)))
- p1122: 0; = p1121*p0001/(p0818*p0002)
- p2700: 8.98332e-6; = p2309*(p1078+p1080)
- p0245: 11.113
- p1030: 5.46192e-5; = IF(p1012=0;p1024*p0001/(p0818*p0002);0)
- p0896: 0.458
- p0816: 0
- p0893: 0.134561; = 1000*(p0890+p0892)*p0001*p0003*p0004/(p0818*p0002)
- p3326: 0; = if(and(p1232=0;p3255<>0);p3268*p3289;0)
- p0562: 0; = IF(p0298<0.5;-SQRT(p0007*EXP(p0430^2*p0008)-p0007);SQRT(p0007*EXP(p0430^2*p0008)-p0007))
- p2297: 0.000875756; = p2227*p2204
- p2096: 0.486404
- p1579: 0
- p0080: 90.235
- p2223: 0.733547; = if(p0765*p0769+p0766*p0770+p0767*p0771+p0768*p0772=0;0;p0770*p0766/(p0765*p0769+p0766*p0770+p0767*p0771+p0768*p0772))
- p3343: 0; = if(and(p1232=0;p3254<>0);IF((p3339+p3340+p3341+p3342)+(p3254*(p3269*(1-p3277))/p3338)>p3254;p3254-(p3339+p3340+p3341+p3342);p3254*(p3269*(1-p3277))/p3338);0)
- p1755: 0
- p2862: 0.00178663; = p2276*(p1020+p1022)
- p0830: 2.33695e9; = p0825*p0821*p0824
- p2696: 6.48641e-7; = p2305*(p1078+p1080)
- p1286: 0; = p1282*p1252/p0818
- p1912: 0
- p2133: 4.20368e-5; = p2015*p2061*p2095/(p0818*1000)
- p2945: 5.59644e-6; = p2359*(p1020+p1022)
- p2534: 4.55859e-5; = p2338*p1073
- p2532: 0.000155649; = p2336*p1073
- p3007: 0; = p2421*(p1079+p1081)
- p3112: 2.73323e-11; = p2331*p1023
- p1083: 138455; = IF(p1071=0;p1073*(p0710/100)*p0703*1000;0)
- p0501: 0; = SQRT(2)*(IF((2*p0369-1)<0;-1;IF((2*p0369-1)>0;1;0))*SQRT(SQRT((2/(pi()*0.140012289)+LN(1-(2*p0369-1)^2)/2)^2-LN(1-(2*p0369-1)^2)/0.140012289)-(2/(pi()*0.140012289)+LN(1-(2*p0369-1)^2)/2)))
- p3296: 0.514
- p0518: 0; = SQRT(2)*(IF((2*p0386-1)<0;-1;IF((2*p0386-1)>0;1;0))*SQRT(SQRT((2/(pi()*0.140012289)+LN(1-(2*p0386-1)^2)/2)^2-LN(1-(2*p0386-1)^2)/0.140012289)-(2/(pi()*0.140012289)+LN(1-(2*p0386-1)^2)/2)))
- p2844: 1.22677e-5; = p2258*(p1079+p1081)
- p0381: 0.5
- p3132: 0; = p2351*p1132
- p3019: 3.91274e-10; = p2238*p1023
- p0572: 0; = IF(p0308<0.5;-SQRT(p0007*EXP(p0440^2*p0008)-p0007);SQRT(p0007*EXP(p0440^2*p0008)-p0007))
- p1170: 472.558; = p1169*p0801
- p3309: 0; = if(and(p1232=0;p3252<>0);p3252*(p3260-p3304)/p3305;0)
- p2072: 0.134
- p3017: 0; = p2431*(p1129+p1131)
- p2887: 0.000120986; = p2301*(p1079+p1081)
- p2533: 0.000140773; = p2337*p1073
- p2155: 1.30022e-5; = p2015*p2084*p2117/(p0818*1000)
- p2879: 0.00137498; = p2293*(p1020+p1022)
- p0166: 14.588
- p0808: 0
- p0987: 0.0189086; = if(p0978>0;0;if(and(p0687=0;p0691=0;p0695=0;p0699=0);0;IF(p0982+p0985+p0986=1;0;1-(p0982+p0985+p0986))))
- p1615: 0
- p2090: 0.40001
- p0949: 2.48936e-5; = if(and(p0683=0;or(p0807=480;p0807=32;p0807=1;and(p0807=60;p0901<0.03)));p0937;0)
- p0905: 0.0383263; = p0904/p0818
- p1835: 1.29166e-6; = p1427*1000/p0818
- p0975: 0; = p0973*p0974/p0818
- p2660: 4.04783e-6; = p2269*(p1078+p1080)
- p1151: 397678; = if(p1121=0;p1149*p1148*p1145;0)
- p1956: 0
- p4827: 0; = p1860*p3482
- p1880: 0
- p2183: 0.00151218; = p1064-p2182
- p2898: 0.000487895; = p2312*(p1129+p1131)
- p0536: 0; = SQRT(2)*(IF((2*p0404-1)<0;-1;IF((2*p0404-1)>0;1;0))*SQRT(SQRT((2/(pi()*0.140012289)+LN(1-(2*p0404-1)^2)/2)^2-LN(1-(2*p0404-1)^2)/0.140012289)-(2/(pi()*0.140012289)+LN(1-(2*p0404-1)^2)/2)))
- p1585: 0
- p1388: 8
- p3095: 0; = p2314*p1132
- p1772: 0
- p2601: 0; = p2405*p1014
- p2849: 3.75764e-6; = p2263*(p1079+p1081)
- p0091: 37.661
- p0976: 0; = IF(p0687=0;IF(OR(p0686=0;p0689=0);0;p0686*1000*p0689/100);0)
- p2003: 50
- p0650: 0; = IF(p0386<0.5;-SQRT(p0007*EXP(p0518^2*p0008)-p0007);SQRT(p0007*EXP(p0518^2*p0008)-p0007))
- p3939: 1.25557e-6; = p1796*p3478
- p2436: 6.65719e-6; = p2240*p1014
- p0431: 0; = SQRT(2)*(IF((2*p0299-1)<0;-1;IF((2*p0299-1)>0;1;0))*SQRT(SQRT((2/(pi()*0.140012289)+LN(1-(2*p0299-1)^2)/2)^2-LN(1-(2*p0299-1)^2)/0.140012289)-(2/(pi()*0.140012289)+LN(1-(2*p0299-1)^2)/2)))
- p0116: 28.781
- p1073: 0.44929; = IF(p1071=0;p0711/100;0)
- p4955: 0; = p1782*p3483
- p2212: 3.09133e-6; = p1106/p0818
- p3178: 0; = p2397*p1023
- p2946: 7.15933e-5; = p2360*(p1020+p1022)
- p0861: 0; = p0673*1000/p0856
- p0221: 22.311
- p2948: 2.24614e-5; = p2362*(p1020+p1022)
- p1131: 0; = if(p1121=0;IF(p1123+p1128+p1129+p1130=1;0;IF(p1123+p1128+p1129+p1130+p1127>1;1-(p1123+p1128+p1129+p1130);p1127));0)
- p4913: 0; = p1946*p3482
- p0445: 0; = SQRT(2)*(IF((2*p0313-1)<0;-1;IF((2*p0313-1)>0;1;0))*SQRT(SQRT((2/(pi()*0.140012289)+LN(1-(2*p0313-1)^2)/2)^2-LN(1-(2*p0313-1)^2)/0.140012289)-(2/(pi()*0.140012289)+LN(1-(2*p0313-1)^2)/2)))
- p0531: 0; = SQRT(2)*(IF((2*p0399-1)<0;-1;IF((2*p0399-1)>0;1;0))*SQRT(SQRT((2/(pi()*0.140012289)+LN(1-(2*p0399-1)^2)/2)^2-LN(1-(2*p0399-1)^2)/0.140012289)-(2/(pi()*0.140012289)+LN(1-(2*p0399-1)^2)/2)))
- p2369: 9.48227e-7; = p2225*p2198
- p3402: 0.000138776; = p3364*p1238
- p2757: 5.20637e-5; = p2366*(p1019+p1021)
- p2148: 5.16444e-6; = p2015*p2076*p2110/(p0818*1000)
- p2907: 9.38617e-5; = p2321*(p1020+p1022)
- p3068: 5.07821e-8; = p2287*p1023
- p2235: 0; = 1-(p2226+p2227+p2228+p2229)
- p2425: 0; = p2235*p2215
- p0474: 0; = SQRT(2)*(IF((2*p0342-1)<0;-1;IF((2*p0342-1)>0;1;0))*SQRT(SQRT((2/(pi()*0.140012289)+LN(1-(2*p0342-1)^2)/2)^2-LN(1-(2*p0342-1)^2)/0.140012289)-(2/(pi()*0.140012289)+LN(1-(2*p0342-1)^2)/2)))
- p2078: 0.117
- p3452: 0; = p3376*p1240
- p0478: 0; = SQRT(2)*(IF((2*p0346-1)<0;-1;IF((2*p0346-1)>0;1;0))*SQRT(SQRT((2/(pi()*0.140012289)+LN(1-(2*p0346-1)^2)/2)^2-LN(1-(2*p0346-1)^2)/0.140012289)-(2/(pi()*0.140012289)+LN(1-(2*p0346-1)^2)/2)))
- p0182: 11.113
- p2404: 0; = p2234*p2193
- p2191: 0.000153468; = 8*1.00794*p2189/(2*14.0067)
- p1542: 1
- p1113: 0.100377
- p1748: 0
- p0680: 314.666; = p0020*(1+p0548*p0152/100)
- p3155: 3.90395e-9; = p2374*p1023
- p0574: 0; = IF(p0310<0.5;-SQRT(p0007*EXP(p0442^2*p0008)-p0007);SQRT(p0007*EXP(p0442^2*p0008)-p0007))
- p2502: 9.91867e-6; = p2306*p1073
- p2221: 0.000297537; = p1155-p2220
- p0798: 61.633; = p0138*(1+p0666*p0270/100)
- p4969: 0; = p1796*p3483
- p0960: 0; = if(and(p0683>0;or(p0807=480;p0807=32;p0807=1;and(p0807=60;p0901<0.03)));p0936;0)
- p2165: 0.467396; = (p0833-p2014)/p0818-p0839
- p2780: 0; = p2389*(p1128+p1130)
- p1662: 0
- p1976: 0.078
- p1235: 0.29054; = if(p1232>0;0;p0727/100)
- p1283: 0; = p1277*p1252/p0818
- p0422: 0; = SQRT(2)*(IF((2*p0290-1)<0;-1;IF((2*p0290-1)>0;1;0))*SQRT(SQRT((2/(pi()*0.140012289)+LN(1-(2*p0290-1)^2)/2)^2-LN(1-(2*p0290-1)^2)/0.140012289)-(2/(pi()*0.140012289)+LN(1-(2*p0290-1)^2)/2)))
- p0868: 0; = IF(p0858+p0864+p0865+p0866+p0867=1;0;IF(p0858+p0864+p0865+p0866+p0867+p0863>1;1-(p0858+p0864+p0865+p0866+p0867);p0863))
- p3451: 0; = p3375*p1240

## Reference product
- spring wheat, excl. durum; at harvest in 2004; at farm; 86%-90% moisture: 1 kg

## Inputs from technosphere
- CUTOFF unspecified animal manure; from unspecified storage; at point-of-sale: 0.153715 kg; = p1316
- CUTOFF apply N fertilizer; broadcast with incorporation: 4.82289e-5 ha; = p1031
- CUTOFF pesticide storage: 0.000124 kg*a; = p1965
- CUTOFF apply pesticide; unspecified application methods: 0.000192065 ha; = p1345
- CUTOFF sewage sludge; at point-of-sale: 3.90388e-8 kg; = p1190
- CUTOFF pesticide, Imazamethabenz; at point-of-sale; kg AI: 1.72221e-6 kg; = p1860
- CUTOFF apply sulfur; unspecified method: 0.000192065 ha; = p1171
- CUTOFF apply sewage sludge; unspecified method: 0.000192065 ha; = p1189
- CUTOFF pesticide, Glyphosate; at point-of-sale; kg AI: 1.2486e-5 kg; = p1855
- CUTOFF apply manure; unspec. method: 4.33315e-6 ha; = p1251
- CUTOFF pesticide, Dichlorprop-dimethylammonium; at point-of-sale; kg AI: 9.04159e-6 kg; = p1759
- CUTOFF phosphatic fertilizer, superphosphate grades over 22%; at point-of-sale: 0.000355316 kg; = p1117
- CUTOFF apply single or mixed N fertilizer; unspec. method: 1.76527e-9 ha; = p1035
- CUTOFF pesticide formulation balance; at point-of-sale: 6.73746e-5 kg; = p1963
- CUTOFF apply gypsum; unspecified method: 0.000192065 ha; = p1165
- CUTOFF international vessel transport; average fuel: 0.208624 metric ton*km; = p2006
- CUTOFF zinc compounds storage: 1.53731e-8 kg*a; = p1186
- CUTOFF pesticide, Tribenuron-methyl; at point-of-sale; kg AI: 4.30552e-7 kg; = p1950
- CUTOFF nitrogenous fertilizer, ammonium sulfate; at point-of-sale: 0.00253887 kg; = p1067
- CUTOFF apply mixed N fertilizer; without incorporation: 3.24015e-5 ha; = p1034
- CUTOFF prepare soil; for conventional till, wheat; <15% residue: 0.000120873 ha; = p0934
- CUTOFF gypsum; at point-of-sale: 9.94675e-7 kg; = p1166
- CUTOFF potassic fertilizer, potassium chloride; at point-of-sale: 0.00328557 kg; = p1154
- CUTOFF pesticide, Fluroxypyr; at point-of-sale; kg AI: 4.73607e-6 kg; = p1846
- CUTOFF apply manure; broadcast without incorporation: 1.77452e-6 ha; = p1248
- CUTOFF prepare soil; for reduced till, wheat; 15-30% residue: 2.48936e-5 ha; = p0937
- CUTOFF apply pesticide; broadcast without incorporation: 1.2904e-5 ha; = p1335
- CUTOFF fertilizer filler materials; at point-of-sale: 0.013929 kg; = p1158
- CUTOFF sulfuric acid storage: 4.64926e-8 kg*a; = p1180
- CUTOFF pesticide, Fenoxaprop P; at point-of-sale; kg AI: 1.29166e-6 kg; = p1835
- CUTOFF local area trucking; class 6, average fuel: 0.00171251 metric ton*km; = p2010
- CUTOFF apply K fertilizer; broadcast without incorporation: 1.50105e-5 ha; = p1141
- CUTOFF pesticide, MCPA; at point-of-sale; kg AI: 3.57358e-5 kg; = p1873
- CUTOFF prepare soil; for unspec. till, wheat: 1.09047e-5 ha; = p0939
- CUTOFF phosphatic fertilizer, other single phosphates; at point-of-sale: 0.000426526 kg; = p1118
- CUTOFF nitrogenous fertilizer, ammonium nitrate; at point-of-sale: 0.00315374 kg; = p1066
- CUTOFF sowing svc; for mulch till, 2004 spring wheat (excl. durum): 3.53941e-5 ha; = p0947
- spring wheat residue, excl. durum; at harvest in 2004; at farm; 83%-90% moisture: 0.575904 kg; = p0839
- CUTOFF sowing svc; for reduced till, 2004 spring wheat (excl. durum): 2.48936e-5 ha; = p0949
- CUTOFF nitrogenous fertilizer, urea; at point-of-sale: 0.0116518 kg; = p1070
- CUTOFF sulfur; at point-of-sale: 2.03461e-7 kg; = p1172
- CUTOFF gypsum storage: 4.97337e-7 kg*a; = p1168
- CUTOFF apply sulfuric acid; unspecified method: 0.000192065 ha; = p1177
- CUTOFF pesticide, MCPA, dimethylamine salt; at point-of-sale; kg AI: 8.18049e-6 kg; = p1874
- CUTOFF potassic fertilizer, other single nutrients; at point-of-sale: 0.000468758 kg; = p1155
- CUTOFF pesticide, Tralkoxydim; at point-of-sale; kg AI: 2.15276e-6 kg; = p1946
- CUTOFF irrigate; unspecified irrigation method, surface water source, in 2004: 7.84181e-7 ha-m; = p1009
- CUTOFF liming materials storage: 0.00764461 kg*a; = p1231
- CUTOFF phosphatic fertilizer, diammonium phosphate; at point-of-sale: 0.00593597 kg; = p1119
- CUTOFF apply K fertilizer; no broadcast application: 1.88118e-5 ha; = p1139
- CUTOFF apply liming materials; unspecified method: 0.000192065 ha; = p1227
- CUTOFF apply pesticide; as foliar or directed spray: 0.000191405 ha; = p1339
- CUTOFF N inhibitor appl svc; unspec rate & type, 2004 spring wheat (excl. durum): 0.000215276 ha; = p1162
- CUTOFF prepare soil; for mulch till, wheat: 3.53941e-5 ha; = p0935
- CUTOFF apply N fertilizer; broadcast without incorporation: 3.00114e-5 ha; = p1032
- CUTOFF limestone, high-grade, pulverized; at point-of-sale: 0.0150493 kg; = p1228
- CUTOFF harvest; spring: 0.000188224 ha; = p1971
- CUTOFF nitrogenous fertilizer, sodium nitrate; at point-of-sale: 3.46852e-5 kg; = p1069
- CUTOFF sulfuric acid; at point-of-sale: 9.29852e-8 kg; = p1178
- CUTOFF pesticide, Bromoxynil; at point-of-sale; kg AI: 1.46388e-5 kg; = p1780
- CUTOFF sulfur storage: 1.0173e-7 kg*a; = p1174
- CUTOFF apply N fertilizer; no broadcast application: 5.46192e-5 ha; = p1030
- CUTOFF apply mixed N fertilizer; with incorporation: 1.12642e-5 ha; = p1033
- CUTOFF apply single or mixed P fertilizer; unspec. method: 4.67701e-6 ha; = p1094
- CUTOFF apply P fertilizer; no broadcast application: 5.31849e-5 ha; = p1089
- CUTOFF apply P fertilizer; broadcast with incorporation: 3.63697e-5 ha; = p1090
- CUTOFF phosphatic fertilizer, superphos. grades 22% and under; at point-of-sale: 3.54169e-5 kg; = p1116
- CUTOFF apply P fertilizer; broadcast without incorporation: 2.41439e-5 ha; = p1091
- CUTOFF irrigate; gravity, surface water source, in 2004: 2.8521e-6 ha-m; = p1006
- CUTOFF pesticide, 2,4-D; at point-of-sale; kg AI: 1.59304e-5 kg; = p1754
- CUTOFF nitrogenous fertilizer, nitrogen solutions; at point-of-sale: 0.0230761 kg; = p1068
- CUTOFF fertilizer storage: 0.0390088 kg*a; = p1160
- CUTOFF dolomite, pulverized; at point-of-sale: 0.000239916 kg; = p1229
- CUTOFF sowing svc; for unspec till, 2004 spring wheat (excl. durum): 1.09047e-5 ha; = p0951
- CUTOFF phosphatic fertilizer, monoammonium phosphate; at point-of-sale: 0.00365182 kg; = p1120
- CUTOFF pesticide, Bromoxynil octanoate; at point-of-sale; kg AI: 3.01386e-6 kg; = p1782
- CUTOFF sewage sludge storage: 1.95194e-8 kg*a; = p1192
- CUTOFF zinc compounds; at point-of-sale: 3.07462e-8 kg; = p1184
- CUTOFF pesticide, Clodinafop-propargyl; at point-of-sale; kg AI: 3.44442e-6 kg; = p1796
- CUTOFF nitrogenous fertilizer, aqueous ammonia; at point-of-sale: 0.00107294 kg; = p1065
- CUTOFF apply zinc compounds; unspecified method: 0.000192065 ha; = p1183
- CUTOFF nitrogenous fertilizer, anhydrous ammonia; at point-of-sale: 0.00840099 kg; = p1064
- CUTOFF regional or national trucking; class 8, average fuel: 0.00745037 metric ton*km; = p2009
- CUTOFF pesticide, Thifensulfuron methyl; at point-of-sale; kg AI: 4.30552e-7 kg; = p1943
- CUTOFF domestic barge transport; average fuel: 0.0228335 metric ton*km; = p2007
- CUTOFF irrigate; pressure, groundwater source, in 2004: 3.24451e-5 ha-m; = p0993
- CUTOFF bulk cargo rail transport; diesel: 0.0428128 metric ton*km; = p2008
- CUTOFF apply K fertilizer; broadcast with incorporation: 1.29744e-5 ha; = p1140
- CUTOFF pesticide, unspecified type; at point-of-sale; kg AI: 1.50801e-8 kg; = p1962
- CUTOFF sowing svc; for conventional till, 2004 spring wheat (excl. durum): 0.000120873 ha; = p0946
- CUTOFF irrigate; unspecified irrigation method, groundwater source, in 2004: 6.25315e-7 ha-m; = p0995
- CUTOFF apply pesticide; broadcast by air: 4.86479e-5 ha; = p1331
- CUTOFF harvest; spring wheat residue management: 0.000192065 ha; = p1975
- CUTOFF irrigate; pressure, surface water source, in 2004: 1.56481e-5 ha-m; = p1007
- CUTOFF apply pesticide; broadcast with incorporation: 0.000255274 ha; = p1333

## Inputs from nature
- Carbon dioxide: 3.35622 kg; = p0900*3.6666666667
- Occupation, annual crop [natural resource, land]: 0.614099 m2*year; = 1.0 * (p0855)
- Nitrogen: 0.0383263 kg; = p0905
- Potassium; from plant uptake; biogenic: 0.0170129 kg; = p0915
- Water, surface: 192.844 kg; = p0889
- Transformation, from annual crop [natural resource, land]: 1.92065 m2; = 1.0 * (p0883)
- Phosphorus: 0.00604756 kg; = p0910
- Water, unspecified origin: 0.000453515 m3; = p0893*0.001+p0916*0.001
- Transformation, to annual crop [natural resource, land]: 1.92065 m2; = 1.0 * (p0857)
- Dry matter except CNPK; from plant uptake: 1.19669 kg; = p0917
- Water, ground: 330.704 kg; = p0887

## Emissions to nature
- Sodium nitrate; broadcast w/o incorp. in fert. in spr. bef. plant.: 8.73869e-6 kg; = p2876*6.0714285714
- 2,4-D [soil, agricultural]: 1.48238e-5 kg; = 1.0 * (p3897+p4103+p5133+p4515)
- Phosphorous; in above-ground residue left on field: 0.000797944 kg; = p2169
- Thifensulfuron methyl; broadcast without incorporation: 7.93356e-9 kg; = p4292
- Aqueous ammonia; unspec. appl. method in fert. in spr. bef. plant.: 2.15034e-9 kg; = p3059*1.2142857143
- Methyl vinyl ether; from residue burning: 8.02541e-6 kg; = p2137*1.6111111111
- Nitrogen solution; no broadcast in fert. in fall bef. plant.; no broadcast in fert. in fall bef. plant.; kg N: 5.54237e-5 kg; = p2444
- Ammonium sulfate; broadcast w/o incorp. in fert. at plant.: 0.000121284 kg; = p2908*4.7142857143
- Thifensulfuron methyl; broadcast by air: 2.99094e-8 kg; = p3880
- Sodium nitrate; unspec. appl. method in fert. at plant.: 4.59855e-11 kg; = p3110*6.0714285714
- Sulfuric acid [soil, agricultural]: 9.29852e-8 kg; = 1.0 * (p3231)
- cis-2-Butene: 4.54531e-6 kg; = p2149*1.1666666667
- Monoammonium phosphate; broadcast w/o incorp. in fert. at plant.: 0.000177781 kg; = p2927*8.2142857143
- Monoammonium phosphate; unspec. appl. method in fert. at plant.: 3.44387e-5 kg; = p3122*8.2142857143
- Particulates, < 10 um: 0.000699412 kg; = p2036+p2034
- Other single phosphates; broadcast w/o incorp. in fert. in fall bef. plant.; kg P: 4.09582e-7 kg; = p2856
- Clodinafop-propargyl: 2.39275e-7 kg; = p3733
- isobutene: 1.23675e-5 kg; = p2150*1.1666666667
- Ammonium nitrate; unspec. appl. method in fert. at plant.: 6.79754e-9 kg; = p3100*4.7142857143
- Urea; no broadcast in fert. in fall bef. plant.: 9.09838e-5 kg; = p2451*5
- Fenoxaprop P; broadcast by air: 8.97282e-8 kg; = p3772
- Monoammonium phosphate; no broadcast in fert. in fall bef. plant.: 6.79933e-5 kg; = p2459*8.2142857143
- Other single K nutrients; no broadcast in fert. at plant.; kg K: 1.43529e-5 kg; = p2548
- Superphosphate, grades>22%; unspec. appl. method in fert. in spr. bef. plant.; kg P: 2.0084e-6 kg; = p3088
- Anhydrous ammonia; broadcast w/o incorp. in fert. in spr. bef. plant.: 0.00216948 kg; = p2862*1.2142857143
- Other limestone constituents; applied in limestone: 0.000902958 kg; = p3220
- Methane: 0.000223925 kg; = p2025*1.3333333333
- Nitrogen solution; unspec. appl. method in fert. in spr. bef. plant.; unspec. appl. method in fert. in spr. bef. plan...: 5.07821e-8 kg; = p3068
- Monoammonium phosphate; no broadcast in fert. at plant.: 0.000391622 kg; = p2537*8.2142857143
- Butadiene [air, non-urban air or from high stacks]: 1.5965e-5 kg; = 1.0 * (p2143*1.125)
- Superphosphate, grades<= 22%; broadcast w/ incorp. in fert. in fall bef. plant.; kg P: 4.45493e-8 kg; = p2657
- MCPA [soil, agricultural]: 3.32533e-5 kg; = 1.0 * (p4634+p4016+p4222+p5252)
- Aqueous ammonia; no broadcast in fert. at plant.: 1.23788e-5 kg; = p2513*1.2142857143
- Nitrogen solution; broadcast w/o incorp. in fert. in spr. bef. plant.; broadcast w/o incorp. in fert. in spr. bef. pl...: 0.00179545 kg; = p2873
- Diammonium phosphate; no broadcast in fert. at plant.: 0.000663643 kg; = p2533*4.7142857143
- Formic acid [air, non-urban air or from high stacks]: 0.000106025 kg; = 1.0 * (p2131*3.8333333333)
- Tralkoxydim: 1.49547e-7 kg; = p3883
- Nonvolatile constituents; broadcast w/o incorp. in man. at unknown time; exc.CNPK,biogenic: 1.88468e-6 kg; = p3417
- Other single phosphates; unspec. appl. method in fert. in spr. bef. plant.; kg P: 1.15522e-6 kg; = p3090
- Other single K nutrients; broadcast w/o incorp. in fert. in spr. bef. plant.; kg K: 4.34682e-5 kg; = p2899
- Sodium nitrate; unspec. appl. method in fert. in spr. bef. plant.: 2.47163e-10 kg; = p3071*6.0714285714
- Superphosphate, grades>22%; broadcast w/o incorp. in fert. in fall bef. plant.; kg P: 7.12072e-7 kg; = p2854
- Nitrogen; using unspec. method in manure at an unknown time: 4.57565e-6 kg; = p3470
- Methanol [air, non-urban air or from high stacks]: 0.000347756 kg; = 1.0 * (p2129*2.6666666667)
- Dichlorprop-dimethylammonium; broadcast without incorporation: 1.66605e-7 kg; = p4108
- Volatile constituents; using unspec. method in man. in fal.bef.plant: 0.00563861 kg; = p3461
- Diammonium phosphate; no broadcast in fert. in spr. bef. plant.: 0.00167764 kg; = p2494*4.7142857143
- Urea; broadcast w/o incorp. in fert. after plant.: 0.000418277 kg; = p2958*5
- Nitrogen solution; broadcast w/ incorp. in fert. after plant.; broadcast w/ incorp. in fert. after plant.; kg N: 0.000242878 kg; = p2756
- Potassium chloride; broadcast w/o incorp. in fert. at plant.: 0.000202202 kg; = p2936*2.2166666667
- Ammonium nitrate; unspec. appl. method in fert. after plant.: 5.18484e-9 kg; = p3139*4.7142857143
- Furan [air, non-urban air or from high stacks]: 1.15747e-5 kg; = 1.0 * (p2138*1.4166666667)
- Water: 523.926 kg; = p2181+p2178+p3475+p2171+p3418
- Superphosphate, grades<= 22%; broadcast w/o incorp. in fert. in fall bef. plant.; kg P: 2.95739e-8 kg; = p2852
- Nitrogen; applied in sewage sludge: 1.82592e-9 kg; = p3240
- Nitrogen solution; broadcast w/ incorp. in fert. in spr. bef. plant.; broadcast w/ incorp. in fert. in spr. bef. plan...: 0.00171146 kg; = p2678
- Ammonium nitrate; broadcast w/o incorp. in fert. in fall bef. plant.: 4.55646e-5 kg; = p2827*4.7142857143
- Anhydrous ammonia; unspec. appl. method in fert. in spr. bef. plant.: 6.13611e-8 kg; = p3057*1.2142857143
- Sewage sludge dry matter; applied in sewage sludge: 2.02147e-10 kg; = p3243
- Nitrogen solution; unspec. appl. method in fert. at plant.; unspec. appl. method in fert. at plant.; kg N: 9.44819e-9 kg; = p3107
- Superphosphate, grades<= 22%; unspec. appl. method in fert. at plant.; kg P: 3.29967e-8 kg; = p3125
- Aqueous ammonia; broadcast w/ incorp. in fert. at plant.: 1.34835e-5 kg; = p2708*1.2142857143
- Dichlorprop-dimethylammonium; unspec. appl. method: 2.47977e-6 kg; = p5138
- Nitrogen; broadcast w/o incorp. in manure at an unknown time: 1.87383e-6 kg; = p3413
- I butane; from residue burning: 2.23209e-6 kg; = p2146*1.0208333333
- Volatile constituents; broadcast w/o incorp. in man. in fal.bef.plant: 0.00230914 kg; = p3404
- Ammonium sulfate; broadcast w/ incorp. in fert. after plant.: 8.8182e-5 kg; = p2752*4.7142857143
- Diammonium phosphate; broadcast w/ incorp. in fert. in spr. bef. plant.: 0.00114723 kg; = p2689*4.7142857143
- Ammonium nitrate; no broadcast in fert. in spr. bef. plant.: 0.00113044 kg; = p2476*4.7142857143
- Phosphorous; broadcast w/o incorp. in manure in fall before planting: 0.000138776 kg; = p3402
- Monoammonium phosphate; broadcast w/ incorp. in fert. in spr. bef. plant.: 0.000676988 kg; = p2693*8.2142857143
- Aqueous ammonia; broadcast w/o incorp. in fert. in spr. bef. plant.: 7.60276e-5 kg; = p2864*1.2142857143
- Acetonitrile [air, non-urban air or from high stacks]: 2.2212e-5 kg; = 1.0 * (p2155*1.7083333333)
- Anhydrous ammonia; broadcast w/o incorp. in fert. after plant.: 0.000307877 kg; = p2940*1.2142857143
- Sulfur dioxide [air, non-urban air or from high stacks]: 4.65569e-5 kg; = 1.0 * (p2041)
- Bromoxynil octanoate: 2.8045e-6 kg; = p4543+p3925+p5161+p4131
- Other single K nutrients; broadcast w/ incorp. in fert. at plant.; kg K: 9.89913e-6 kg; = p2743
- 2,4-D [air, non-urban air or from high stacks]: 1.10665e-6 kg; = 1.0 * (p3691)
- Phosphorous; using unspec. method in manure in fall before planting: 0.000338873 kg; = p3459
- Potassium chloride; broadcast w/ incorp. in fert. at plant.: 0.000174774 kg; = p2741*2.2166666667
- Superphosphate, grades<= 22%; unspec. appl. method in fert. in fall bef. plant.; kg P: 5.72888e-9 kg; = p3047
- Ethene [air, non-urban air or from high stacks]: 0.000153956 kg; = 1.0 * (p2125*1.1666666667)
- Ammonium sulfate; broadcast w/ incorp. in fert. in spr. bef. plant.: 0.000621382 kg; = p2674*4.7142857143
- Aqueous ammonia; broadcast w/o incorp. in fert. after plant.: 1.07893e-5 kg; = p2942*1.2142857143
- Superphosphate, grades<= 22%; no broadcast in fert. at plant.; kg P: 3.75224e-7 kg; = p2540
- Particulates, < 2.5 um [air, non-urban air or from high stacks]: 0.000426419 kg; = 1.0 * (p2033+p2035)
- Pesticide formulation balance; broadcast without incorporation: 1.24148e-6 kg; = p4308
- Phosphorous; applied in sewage sludge: 2.17972e-10 kg; = p3241
- Other single phosphates; broadcast w/o incorp. in fert. at plant.; kg P: 2.35907e-6 kg; = p2934
- Pesticides, unspecified [soil, agricultural]: 1.40325e-8 kg; = 1.0 * (p4719+p4307+p5337+p4101)
- Diammonium phosphate; unspec. appl. method in fert. in fall bef. plant.: 1.01324e-5 kg; = p3040*4.7142857143
- Fluroxypyr [soil, agricultural]: 4.40707e-6 kg; = 1.0 * (p4195+p4607+p5225+p3989)
- Anhydrous ammonia; broadcast w/ incorp. in fert. in fall bef. plant.: 7.29456e-5 kg; = p2628*1.2142857143
- Tribenuron-methyl: 2.99094e-8 kg; = p3887
- Ammonium sulfate; no broadcast in fert. in fall bef. plant.: 2.01228e-5 kg; = p2440*4.7142857143
- Gypsum: 9.94675e-7 kg; = p3229
- Aqueous ammonia; no broadcast in fert. in spr. bef. plant.: 6.65338e-5 kg; = p2474*1.2142857143
- Acrylonitrile: 3.54676e-6 kg; = p2156*1.4722222222
- Superphosphate, grades>22%; no broadcast in fert. at plant.; kg P: 9.03455e-6 kg; = p2542
- Aqueous ammonia; no broadcast in fert. after plant.: 9.442e-6 kg; = p2552*1.2142857143
- Urea; broadcast w/o incorp. in fert. in fall bef. plant.: 0.000103966 kg; = p2841*5
- Anhydrous ammonia; broadcast w/ incorp. in fert. after plant.: 0.000293474 kg; = p2745*1.2142857143
- Aqueous ammonia; broadcast w/o incorp. in fert. in fall bef. plant.: 2.68177e-6 kg; = p2825*1.2142857143
- Ash: 0.0209294 kg; = p2022+p2021
- Potassium chloride; broadcast w/ incorp. in fert. in spr. bef. plant.: 0.000663349 kg; = p2702*2.2166666667
- Ammonium nitrate; broadcast w/ incorp. in fert. in spr. bef. plant.: 0.00123132 kg; = p2671*4.7142857143
- Sodium nitrate; no broadcast in fert. in fall bef. plant.: 2.69754e-7 kg; = p2447*6.0714285714
- Other single phosphates; broadcast w/ incorp. in fert. in fall bef. plant.; kg P: 6.16983e-7 kg; = p2661
- Nonvolatile constituents; using unspec. method in man. at unknown time; exc.CNPK,biogenic: 4.60213e-6 kg; = p3474
- Nitrogen solution; unspec. appl. method in fert. in fall bef. plant.; unspec. appl. method in fert. in fall bef. plan...: 1.79127e-9 kg; = p3029
- Ammonium sulfate; broadcast w/ incorp. in fert. at plant.: 0.00011561 kg; = p2713*4.7142857143
- Diammonium phosphate; broadcast w/o incorp. in fert. in fall bef. plant.: 5.23061e-5 kg; = p2845*4.7142857143
- Nitrogen solution; broadcast w/o incorp. in fert. at plant.; broadcast w/o incorp. in fert. at plant.; kg N: 0.00033405 kg; = p2912
- Diammonium phosphate; broadcast w/o incorp. in fert. at plant.: 0.000301268 kg; = p2923*4.7142857143
- Monoammonium phosphate; unspec. appl. method in fert. in spr. bef. plant.: 8.70583e-5 kg; = p3083*8.2142857143
- Sodium nitrate; broadcast w/o incorp. in fert. at plant.: 1.62586e-6 kg; = p2915*6.0714285714
- Ethyne [air, non-urban air or from high stacks]: 2.88024e-5 kg; = 1.0 * (p2132*1.0833333333)
- Monoammonium phosphate; broadcast w/ incorp. in fert. in fall bef. plant.: 4.64962e-5 kg; = p2654*8.2142857143
- Potassium chloride; no broadcast in fert. at plant.: 0.000253408 kg; = p2546*2.2166666667
- Nitrogen dioxide: 0.00021064 kg; = p2039*3.2857142857
- Acetaldehyde [air, non-urban air or from high stacks]: 0.000131602 kg; = 1.0 * (p2130*1.8333333333)
- Oxygen; applied in dolomite: 0.000120425 kg; = p3228
- Aqueous ammonia; broadcast w/o incorp. in fert. at plant.: 1.41452e-5 kg; = p2903*1.2142857143
- Potassium chloride; broadcast w/o incorp. in fert. in spr. bef. plant.: 0.000767451 kg; = p2897*2.2166666667
- cyclopentane: 1.75017e-7 kg; = p2153*1.0166666667
- Other single phosphates; broadcast w/ incorp. in fert. at plant.; kg P: 3.55364e-6 kg; = p2739
- Sodium nitrate; unspec. appl. method in fert. in fall bef. plant.: 8.71833e-12 kg; = p3032*6.0714285714
- Glycolaldehyde; from residue burning: 0.000213181 kg; = p2135*2.5
- Carbon dioxide, in air: 0.141596 kg; = p2163*3.6666666667
- Superphosphate, grades<= 22%; unspec. appl. method in fert. in spr. bef. plant.; kg P: 8.3413e-8 kg; = p3086
- Ammonium nitrate; no broadcast in fert. in fall bef. plant.: 3.98748e-5 kg; = p2437*4.7142857143
- Oxygen; applied in limestone: 0.0067841 kg; = p3219
- 1-Butene: 1.41644e-5 kg; = p2144*1.1666666667
- MCPA, dimethylamine salt; broadcast without incorporation: 1.50738e-7 kg; = p4223
- Diammonium phosphate; broadcast w/ incorp. in fert. at plant.: 0.000453822 kg; = p2728*4.7142857143
- Ethane [air, non-urban air or from high stacks]: 9.61527e-5 kg; = 1.0 * (p2126*1.25)
- Dichlorprop-dimethylammonium; foliar or directed spray: 2.47125e-6 kg; = p4520
- Ammonium sulfate; no broadcast in fert. after plant.: 8.09578e-5 kg; = p2557*4.7142857143
- Potassium; broadcast w/o incorp. in manure in fall before planting; biogenic: 0.000573816 kg; = p3403
- Nitrogen solution; no broadcast in fert. after plant.; no broadcast in fert. after plant.; kg N: 0.00022298 kg; = p2561
- Aqueous ammonia; unspec. appl. method in fert. after plant.: 3.05161e-10 kg; = p3137*1.2142857143
- Superphosphate, grades>22%; unspec. appl. method in fert. at plant.; kg P: 7.94487e-7 kg; = p3127
- Ammonium sulfate; broadcast w/o incorp. in fert. in spr. bef. plant.: 0.000651877 kg; = p2869*4.7142857143
- Aqueous ammonia; no broadcast in fert. in fall bef. plant.: 2.34689e-6 kg; = p2435*1.2142857143
- Superphosphate, grades>22%; no broadcast in fert. in spr. bef. plant.; kg P: 2.28386e-5 kg; = p2503
- Aqueous ammonia; broadcast w/ incorp. in fert. in spr. bef. plant.: 7.24709e-5 kg; = p2669*1.2142857143
- Sodium nitrate; no broadcast in fert. after plant.: 1.08527e-6 kg; = p2564*6.0714285714
- Aqueous ammonia; unspec. appl. method in fert. in fall bef. plant.: 7.58505e-11 kg; = p3020*1.2142857143
- Ammonium nitrate; broadcast w/ incorp. in fert. in fall bef. plant.: 4.3433e-5 kg; = p2632*4.7142857143
- Superphosphate, grades<= 22%; broadcast w/o incorp. in fert. at plant.; kg P: 1.70337e-7 kg; = p2930
- Urea; unspec. appl. method in fert. after plant.: 1.18304e-8 kg; = p3153*5
- Ammonium nitrate; broadcast w/o incorp. in fert. in spr. bef. plant.: 0.00129175 kg; = p2866*4.7142857143
- Nitrogen; broadcast w/o incorp. in manure in fall before planting: 0.00040197 kg; = p3401
- Sodium nitrate; broadcast w/ incorp. in fert. at plant.: 1.5498e-6 kg; = p2720*6.0714285714
- Potassium chloride; no broadcast in fert. in spr. bef. plant.: 0.000961803 kg; = p2507*2.2166666667
- Urea; broadcast w/ incorp. in fert. after plant.: 0.00039871 kg; = p2763*5
- Superphosphate, grades>22%; broadcast w/o incorp. in fert. in spr. bef. plant.; kg P: 1.03678e-5 kg; = p2893
- Glyphosate [soil, agricultural]: 1.16186e-5 kg; = 1.0 * (p5234+p4616+p3998+p4204)
- Propanenitrile: 6.78005e-6 kg; = p2157*1.5277777778
- Thifensulfuron methyl; broadcast with incorporation: 1.56946e-7 kg; = p4086
- Ammonium sulfate; unspec. appl. method in fert. after plant.: 2.61652e-9 kg; = p3142*4.7142857143
- Nitrogen solution; broadcast w/o incorp. in fert. in fall bef. plant.; broadcast w/o incorp. in fert. in fall bef. pl...: 6.33322e-5 kg; = p2834
- MCPA, dimethylamine salt; broadcast by air: 5.68279e-7 kg; = p3811
- Other single phosphates; no broadcast in fert. in fall bef. plant.; kg P: 9.0224e-7 kg; = p2466
- Ammonium nitrate; broadcast w/o incorp. in fert. after plant.: 0.000183315 kg; = p2944*4.7142857143
- Acetic acid [air, non-urban air or from high stacks]: 0.000591998 kg; = 1.0 * (p2127*2.5)
- Thifensulfuron methyl; foliar or directed spray: 1.17678e-7 kg; = p4704
- Ammonium sulfate; broadcast w/ incorp. in fert. in fall bef. plant.: 2.19184e-5 kg; = p2635*4.7142857143
- Ammonium sulfate; broadcast w/o incorp. in fert. after plant.: 9.25097e-5 kg; = p2947*4.7142857143
- Other single phosphates; broadcast w/o incorp. in fert. in spr. bef. plant.; kg P: 5.96354e-6 kg; = p2895
- Butane [air, non-urban air or from high stacks]: 6.42843e-6 kg; = 1.0 * (p2147*1.0208333333)
- Nitrogen solution; unspec. appl. method in fert. after plant.; unspec. appl. method in fert. after plant.; kg N: 7.20663e-9 kg; = p3146
- Fenoxaprop P; foliar or directed spray: 3.53035e-7 kg; = p4596
- Monoammonium phosphate; broadcast w/ incorp. in fert. at plant.: 0.000267804 kg; = p2732*8.2142857143
- Ammonium nitrate; no broadcast in fert. after plant.: 0.000160424 kg; = p2554*4.7142857143
- Imazamethabenz: 1.19638e-7 kg; = p3797
- Urea; broadcast w/o incorp. in fert. at plant.: 0.000548378 kg; = p2919*5
- Nitrogen solution; broadcast w/o incorp. in fert. after plant.; broadcast w/o incorp. in fert. after plant.; kg N: 0.000254798 kg; = p2951
- MCPA, dimethylamine salt; foliar or directed spray: 2.23589e-6 kg; = p4635
- Ammonium nitrate; broadcast w/ incorp. in fert. after plant.: 0.00017474 kg; = p2749*4.7142857143
- Superphosphate, grades<= 22%; no broadcast in fert. in fall bef. plant.; kg P: 6.51463e-8 kg; = p2462
- Pesticide formulation balance; unspec. appl. method: 1.84783e-5 kg; = p5338
- Urea; no broadcast in fert. after plant.: 0.000366046 kg; = p2568*5
- Ammonium sulfate; broadcast w/o incorp. in fert. in fall bef. plant.: 2.29941e-5 kg; = p2830*4.7142857143
- Ammonium sulfate; unspec. appl. method in fert. in spr. bef. plant.: 1.84375e-8 kg; = p3064*4.7142857143
- Hydrocyanic acid: 3.01859e-5 kg; = p2154*2.25
- Superphosphate, grades>22%; broadcast w/ incorp. in fert. at plant.; kg P: 6.17814e-6 kg; = p2737
- Ammonium nitrate; broadcast w/ incorp. in fert. at plant.: 0.000229091 kg; = p2710*4.7142857143
- Urea; unspec. appl. method in fert. at plant.: 1.55102e-8 kg; = p3114*5
- Urea; unspec. appl. method in fert. in spr. bef. plant.: 8.33642e-8 kg; = p3075*5
- Nonvolatile constituents;broadcast w/o incorp. in man. in fal.bef.plant; exc.CNPK,biogenic: 0.000404296 kg; = p3405
- Filler materials, applied with synthetic fertilizer: 0.013929 kg; = p2432
- Sodium nitrate; broadcast w/o incorp. in fert. after plant.: 1.24013e-6 kg; = p2954*6.0714285714
- Toluene [air, non-urban air or from high stacks]: 2.0154e-5 kg; = 1.0 * (p2141*1.0952380952)
- Nitrogen; using unspec. method in manure in fall before planting: 0.000981557 kg; = p3458
- Urea; broadcast w/ incorp. in fert. in fall bef. plant.: 9.91027e-5 kg; = p2646*5
- Anhydrous ammonia; unspec. appl. method in fert. after plant.: 8.70792e-9 kg; = p3135*1.2142857143
- Volatile constituents; broadcast w/o incorp. in man. at unknown time: 1.07644e-5 kg; = p3416
- Ammonium sulfate; unspec. appl. method in fert. in fall bef. plant.: 6.50359e-10 kg; = p3025*4.7142857143
- Magnesium [soil, agricultural]: 3.04305e-5 kg; = 1.0 * (p3227)
- Superphosphate, grades>22%; broadcast w/ incorp. in fert. in spr. bef. plant.; kg P: 1.56178e-5 kg; = p2698
- Potassium; in above-ground residue left on field; biogenic: 0.00485659 kg; = p2170
- Ammonium nitrate; no broadcast in fert. at plant.: 0.000210323 kg; = p2515*4.7142857143
- Acetol; from residue burning: 0.000398405 kg; = p2134*2.0555555556
- Benzene [air, non-urban air or from high stacks]: 1.62363e-5 kg; = 1.0 * (p2140*1.0833333333)
- Superphosphate, grades>22%; broadcast w/ incorp. in fert. in fall bef. plant.; kg P: 1.07265e-6 kg; = p2659
- Anhydrous ammonia; no broadcast in fert. after plant.: 0.000269432 kg; = p2550*1.2142857143
- Plant dry matter; in below-ground residue: 0.14492 kg; = p2177
- Zinc compounds: 3.07462e-8 kg; = p3232
- Other single phosphates; broadcast w/ incorp. in fert. in spr. bef. plant.; kg P: 8.98332e-6 kg; = p2700
- Potassium; using unspec. method in manure at an unknown time: 6.53179e-6 kg; = p3472
- Fenoxaprop P; broadcast without incorporation: 2.38007e-8 kg; = p4184
- Superphosphate, grades>22%; broadcast w/o incorp. in fert. at plant.; kg P: 4.10133e-6 kg; = p2932
- Nitrogen solution; broadcast w/ incorp. in fert. at plant.; broadcast w/ incorp. in fert. at plant.; kg N: 0.000318423 kg; = p2717
- Superphosphate, grades>22%; no broadcast in fert. in fall bef. plant.; kg P: 1.56858e-6 kg; = p2464
- Anhydrous ammonia; broadcast w/o incorp. in fert. in fall bef. plant.: 7.65255e-5 kg; = p2823*1.2142857143
- Imazamethabenz: 1.60257e-6 kg; = p4209+p5239+p4621+p4003
- Plant dry matter; in aboveground residue left on field: 0.207486 kg; = p2172
- Other single phosphates; unspec. appl. method in fert. at plant.; kg P: 4.56986e-7 kg; = p3129
- Monoammonium phosphate; broadcast w/o incorp. in fert. in spr. bef. plant.: 0.000449416 kg; = p2888*8.2142857143
- Propane [air, non-urban air or from high stacks]: 2.98006e-5 kg; = 1.0 * (p2142*1.2222222222)
- Sodium nitrate; unspec. appl. method in fert. after plant.: 3.50756e-11 kg; = p3149*6.0714285714
- Sodium nitrate; broadcast w/ incorp. in fert. in fall bef. plant.: 2.93825e-7 kg; = p2642*6.0714285714
- MCPA, dimethylamine salt; unspec. appl. method: 2.2436e-6 kg; = p5253
- Ammonium sulfate; unspec. appl. method in fert. at plant.: 3.43036e-9 kg; = p3103*4.7142857143
- Superphosphate, grades<= 22%; broadcast w/o incorp. in fert. in spr. bef. plant.; kg P: 4.30598e-7 kg; = p2891
- Propene [air, non-urban air or from high stacks]: 7.15311e-5 kg; = 1.0 * (p2136*1.1666666667)
- Ammonium sulfate; no broadcast in fert. in spr. bef. plant.: 0.000570476 kg; = p2479*4.7142857143
- Phosphorous; broadcast w/o incorp. in manure at an unknown time: 6.46924e-7 kg; = p3414
- Potassium; using unspec. method in manure in fall before planting; biogenic: 0.00140118 kg; = p3460
- Pesticides, unspecified: 1.04758e-9 kg; = p3895
- Urea; no broadcast in fert. at plant.: 0.000479901 kg; = p2529*5
- Bromoxynil octanoate: 2.09366e-7 kg; = p3719
- Bromoxynil [soil, agricultural]: 1.36218e-5 kg; = 1.0 * (p5159+p4129+p3923+p4541)
- Phosphorous; in below-ground residue: 0.000557327 kg; = p2175
- Ammonium sulfate; no broadcast in fert. at plant.: 0.000106139 kg; = p2518*4.7142857143
- isopentane: 1.79081e-6 kg; = p2151*1.0166666667
- Nitrogen; in above-ground residue left on field: 0.00521954 kg; = p2168
- Anhydrous ammonia; no broadcast in fert. at plant.: 0.000353236 kg; = p2511*1.2142857143
- Sodium nitrate; broadcast w/o incorp. in fert. in fall bef. plant.: 3.08245e-7 kg; = p2837*6.0714285714
- Anhydrous ammonia; no broadcast in fert. in fall bef. plant.: 6.69696e-5 kg; = p2433*1.2142857143
- Diammonium phosphate; unspec. appl. method in fert. at plant.: 5.836e-5 kg; = p3118*4.7142857143
- Pesticide formulation balance; foliar or directed spray: 1.84148e-5 kg; = p4720
- Nitrogen; in below-ground residue: 0.00364561 kg; = p2174
- Ammonium nitrate; unspec. appl. method in fert. in spr. bef. plant.: 3.65354e-8 kg; = p3061*4.7142857143
- NMVOC, non-methane volatile organic compounds, unspecified origin [air, non-urban air or from high stacks]: 0.00271873 kg; = 1.0 * (p2052+p2051)
- Plant dry matter; from residue burning: 0.0380201 kg; = p2164
- Calcium [soil, agricultural]: 0.00571845 kg; = 1.0 * (p3218+p3226)
- Tribenuron-methyl [soil, agricultural]: 4.00643e-7 kg; = 1.0 * (p4093+p5329+p4299+p4711)
- trans-2-Butene: 6.02518e-6 kg; = p2148*1.1666666667
- Urea; broadcast w/ incorp. in fert. at plant.: 0.000522724 kg; = p2724*5
- Fenoxaprop P; unspec. appl. method: 3.54253e-7 kg; = p5214
- Potassium; broadcast w/o incorp. in manure at an unknown time: 2.67492e-6 kg; = p3415
- Potassium; in below-ground residue; biogenic: 0.00339211 kg; = p2176
- Urea; unspec. appl. method in fert. in fall bef. plant.: 2.94056e-9 kg; = p3036*5
- Phosphorous; using unspec. method in manure at an unknown time: 1.5797e-6 kg; = p3471
- Sodium nitrate; broadcast w/ incorp. in fert. in spr. bef. plant.: 8.32988e-6 kg; = p2681*6.0714285714
- Anhydrous ammonia; no broadcast in fert. in spr. bef. plant.: 0.00189857 kg; = p2472*1.2142857143
- Sodium nitrate; broadcast w/ incorp. in fert. after plant.: 1.18212e-6 kg; = p2759*6.0714285714
- Sodium nitrate; no broadcast in fert. at plant.: 1.42284e-6 kg; = p2525*6.0714285714
- Anhydrous ammonia; unspec. appl. method in fert. in fall bef. plant.: 2.16443e-9 kg; = p3018*1.2142857143
- Phenol [air, non-urban air or from high stacks]: 5.48813e-5 kg; = 1.0 * (p2133*1.3055555556)
- Glyphosate [air, non-urban air or from high stacks]: 8.67373e-7 kg; = 1.0 * (p3792)
- Other single phosphates; unspec. appl. method in fert. in fall bef. plant.; kg P: 7.93419e-8 kg; = p3051
- MCPA, dimethylamine salt; broadcast with incorporation: 2.98198e-6 kg; = p4017
- Pesticide formulation balance; broadcast by air: 4.68035e-6 kg; = p3896
- MCPA: 2.48248e-6 kg; = p3810
- Carbon monoxide, fossil [air, non-urban air or from high stacks]: 0.00583752 kg; = 1.0 * (p2028*2.3333333333)
- Monoammonium phosphate; broadcast w/o incorp. in fert. in fall bef. plant.: 3.08663e-5 kg; = p2849*8.2142857143
- Diammonium phosphate; no broadcast in fert. in fall bef. plant.: 0.000115222 kg; = p2455*4.7142857143
- Monoammonium phosphate; no broadcast in fert. in spr. bef. plant.: 0.000989988 kg; = p2498*8.2142857143
- Aqueous ammonia; broadcast w/ incorp. in fert. after plant.: 1.02845e-5 kg; = p2747*1.2142857143
- Pesticide formulation balance; broadcast with incorporation: 2.45596e-5 kg; = p4102
- Thifensulfuron methyl; unspec. appl. method: 1.18084e-7 kg; = p5322
- Sulfur [soil, agricultural]: 2.03461e-7 kg; = 1.0 * (p3230)
- Dinitrogen monoxide [air, non-urban air or from high stacks]: 7.40817e-6 kg; = 1.0 * (p2044*1.5714285714)
- Anhydrous ammonia; broadcast w/o incorp. in fert. at plant.: 0.000403639 kg; = p2901*1.2142857143
- Volatile constituents; using unspec. method in man. at unknown time: 2.62851e-5 kg; = p3473
- Ammonium nitrate; unspec. appl. method in fert. in fall bef. plant.: 1.28874e-9 kg; = p3022*4.7142857143
- Diammonium phosphate; unspec. appl. method in fert. in spr. bef. plant.: 0.000147529 kg; = p3079*4.7142857143
- Dichlorprop-dimethylammonium; broadcast with incorporation: 3.29587e-6 kg; = p3902
- Carbon [soil, agricultural]: 0.321928 kg; = 1.0 * (p3412+p3225+p3469+p2173+p3242+p3457+p2167+p3217+p3400)
- Ammonium nitrate; broadcast w/o incorp. in fert. at plant.: 0.000240334 kg; = p2905*4.7142857143
- Fluroxypyr: 3.29004e-7 kg; = p3783
- Superphosphate, grades>22%; unspec. appl. method in fert. in fall bef. plant.; kg P: 1.37939e-7 kg; = p3049
- Aqueous ammonia; broadcast w/ incorp. in fert. in fall bef. plant.: 2.55631e-6 kg; = p2630*1.2142857143
- Dichlorprop-dimethylammonium; broadcast by air: 6.28098e-7 kg; = p3696
- Nitrogen solution; no broadcast in fert. at plant.; no broadcast in fert. at plant.; kg N: 0.000292336 kg; = p2522
- Superphosphate, grades<= 22%; broadcast w/ incorp. in fert. in spr. bef. plant.; kg P: 6.48641e-7 kg; = p2696
- Anhydrous ammonia; unspec. appl. method in fert. at plant.: 1.14164e-8 kg; = p3096*1.2142857143
- Other single phosphates; no broadcast in fert. at plant.; kg P: 5.19664e-6 kg; = p2544
- Nitrogen solution; no broadcast in fert. in spr. bef. plant.; no broadcast in fert. in spr. bef. plant.; kg N: 0.00157125 kg; = p2483
- Clodinafop-propargyl [soil, agricultural]: 3.20514e-6 kg; = 1.0 * (p3939+p4557+p4145+p5175)
- Bromoxynil: 1.01692e-6 kg; = p3717
- Sodium nitrate; no broadcast in fert. in spr. bef. plant.: 7.64746e-6 kg; = p2486*6.0714285714
- Fenoxaprop P; broadcast with incorporation: 4.70839e-7 kg; = p3978
- Anhydrous ammonia; broadcast w/ incorp. in fert. at plant.: 0.000384756 kg; = p2706*1.2142857143
- Other single phosphates; no broadcast in fert. in spr. bef. plant.; kg P: 1.31367e-5 kg; = p2505
- Urea; broadcast w/o incorp. in fert. in spr. bef. plant.: 0.00294742 kg; = p2880*5
- Pentane [air, non-urban air or from high stacks]: 2.23851e-6 kg; = 1.0 * (p2152*1.0166666667)
- Aqueous ammonia; unspec. appl. method in fert. at plant.: 4.00079e-10 kg; = p3098*1.2142857143
- Diammonium phosphate; broadcast w/o incorp. in fert. in spr. bef. plant.: 0.000761581 kg; = p2884*4.7142857143
- Acetone [air, non-urban air or from high stacks]: 4.72193e-5 kg; = 1.0 * (p2139*1.6111111111)
- Anhydrous ammonia; broadcast w/ incorp. in fert. in spr. bef. plant.: 0.00206799 kg; = p2667*1.2142857143
- Formaldehyde [air, non-urban air or from high stacks]: 0.000219968 kg; = 1.0 * (p2128*2.5)
- Other single K nutrients; broadcast w/o incorp. in fert. at plant.; kg K: 1.14526e-5 kg; = p2938
- Water [air, non-urban air or from high stacks]: 1.67974e-5 m3; = 0.001 * (p2016)
- Superphosphate, grades<= 22%; broadcast w/ incorp. in fert. at plant.; kg P: 2.56591e-7 kg; = p2735
- Isoprene [air, non-urban air or from high stacks]: 3.99262e-5 kg; = 1.0 * (p2145*1.1333333333)
- Monoammonium phosphate; unspec. appl. method in fert. in fall bef. plant.: 5.97925e-6 kg; = p3044*8.2142857143
- Diammonium phosphate; broadcast w/ incorp. in fert. in fall bef. plant.: 7.87925e-5 kg; = p2650*4.7142857143
- Urea; broadcast w/ incorp. in fert. in spr. bef. plant.: 0.00280954 kg; = p2685*5
- Ammonia [air, non-urban air or from high stacks]: 0.000229619 kg; = 1.0 * (p2159*1.2142857143)
- Nitrogen solution; broadcast w/ incorp. in fert. in fall bef. plant.; broadcast w/ incorp. in fert. in fall bef. plan...: 6.03694e-5 kg; = p2639
- Other single K nutrients; no broadcast in fert. in spr. bef. plant.; kg K: 5.44761e-5 kg; = p2509
- Tralkoxydim [soil, agricultural]: 2.00321e-6 kg; = 1.0 * (p5325+p4295+p4089+p4707)
- Dioxins and furans (PCDD/F); from residue burning: 3.17433e-12 kg TEQ; = p2047
- Urea; no broadcast in fert. in spr. bef. plant.: 0.00257937 kg; = p2490*5
- Superphosphate, grades<= 22%; no broadcast in fert. in spr. bef. plant.; kg P: 9.48535e-7 kg; = p2501
- Other single K nutrients; broadcast w/ incorp. in fert. in spr. bef. plant.; kg K: 3.75719e-5 kg; = p2704

## Sampling procedure
A delete-a-group jackknife is used by the USDA to estimate the ARMS sample means and RSEs, based on a 15 sample delete-a-group jackknife. Because of this relatively small sample size, a Students t distribution is used to represent ARMS data probability density functions. Other representations of uncertainty are described in Cooper, J.S., Kahn, E., Noon, M. (2012). LCA Digital Commons Unit Process Data: field crop production Version 1. Prepared for the US Department of Agriculture National Agricultural Library. Retrieved from https://www.lcacommons.gov/discovery/docs/LCA%20Digital%20Commons%20Unit%20Process%20Data%20final%20updated.pdf

## Extrapolations
Data represent an aggregation of processes applied in Idaho in 2004. Data development is demonstrated by parameterization (exlicitly presents all raw and uncertainty data and all calculations). Flow data quality according to the LCADC convention is provided for all flows.
