# corn grain; at harvest in 1996; at farm; 85%-91% moisture

Dataset: EcoSpold 2, unit process
Geography: GLO
Time period: 1996-01-02 to 1997-01-01
Scenario: Business-as-Usual
System model: Allocation, ecoinvent default
Generated by: cooperjs@u.washington.edu
isCopyrightProtected: false

## General comment
This unit process/ gate-to-gate dataset represents the production of 1 kg corn coproduced with silage and residue. The process technologies are an aggregation of those applied in Iowa in 1996. Applicable classifications include ISIC 0111, NAIC 111150, UNSPSC 50403200; this dataset was prepared in ILCD format using the UWDFE Lab Excel to ILCD File Generator (beta version, August 2013)

Exchange "Prosulfuron-soil agricultural" is the result of combining the following original LCA Commons flows: "Prosulfuron; banded or side-dressed; kg AI", "Prosulfuron; broadcast without incorporation; kg AI", "Prosulfuron; unspec. appl. method; kg AI", "Prosulfuron; foliar or directed spray; kg AI", "Prosulfuron; broadcast with incorporation; kg AI", "Prosulfuron; in seed furrow; kg AI".
Exchange "Cyanazine-soil agricultural" is the result of combining the following original LCA Commons flows: "Cyanazine; foliar or directed spray; kg AI", "Cyanazine; broadcast with incorporation; kg AI", "Cyanazine; in seed furrow; kg AI", "Cyanazine; broadcast without incorporation; kg AI", "Cyanazine; banded or side-dressed; kg AI", "Cyanazine; unspec. appl. method; kg AI".
Exchange "Terbufos-soil agricultural" is the result of combining the following original LCA Commons flows: "Terbufos; foliar or directed spray; kg AI", "Terbufos; unspec. appl. method; kg AI", "Terbufos; broadcast without incorporation; kg AI", "Terbufos; banded or side-dressed; kg AI", "Terbufos; broadcast with incorporation; kg AI", "Terbufos; in seed furrow; kg AI".
Exchange "Metribuzin-soil agricultural" is the result of combining the following original LCA Commons flows: "Metribuzin; broadcast with incorporation; kg AI", "Metribuzin; in seed furrow; kg AI", "Metribuzin; unspec. appl. method; kg AI", "Metribuzin; broadcast without incorporation; kg AI", "Metribuzin; foliar or directed spray; kg AI", "Metribuzin; banded or side-dressed; kg AI".
Exchange "Bentazone-soil agricultural" is the result of combining the following original LCA Commons flows: "Bentazon; broadcast without incorporation; kg AI", "Bentazon; unspec. appl. method; kg AI", "Bentazon; foliar or directed spray; kg AI", "Bentazon; banded or side-dressed; kg AI", "Bentazon; broadcast with incorporation; kg AI", "Bentazon; in seed furrow; kg AI".
Exchange "Tefluthrin-soil agricultural" is the result of combining the following original LCA Commons flows: "Tefluthrin; in seed furrow; kg AI", "Tefluthrin; foliar or directed spray; kg AI", "Tefluthrin; broadcast with incorporation; kg AI", "Tefluthrin; banded or side-dressed; kg AI", "Tefluthrin; unspec. appl. method; kg AI", "Tefluthrin; broadcast without incorporation; kg AI".
Exchange "NMVOC, non-methane volatile organic compounds, unspecified origin-air low population density" is the result of combining the following original LCA Commons flows: "NMVOCs; from residue burning; kg C, biogenic", "NMVOCs; from residue burning; kg except C, biogenic".
Exchange "Dipropylthiocarbamic acid S-ethyl ester-soil agricultural" is the result of combining the following original LCA Commons flows: "EPTC; banded or side-dressed; kg AI", "EPTC; in seed furrow; kg AI", "EPTC; broadcast with incorporation; kg AI", "EPTC; foliar or directed spray; kg AI", "EPTC; unspec. appl. method; kg AI", "EPTC; broadcast without incorporation; kg AI".
Exchange "Glyphosate-soil agricultural" is the result of combining the following original LCA Commons flows: "Glyphosate; broadcast without incorporation; kg AI", "Glyphosate; foliar or directed spray; kg AI", "Glyphosate; broadcast with incorporation; kg AI", "Glyphosate; unspec. appl. method; kg AI", "Glyphosate; banded or side-dressed; kg AI", "Glyphosate; in seed furrow; kg AI".
Exchange "Imazethapyr-soil agricultural" is the result of combining the following original LCA Commons flows: "Imazethapyr; foliar or directed spray; kg AI", "Imazethapyr; in seed furrow; kg AI", "Imazethapyr; broadcast without incorporation; kg AI", "Imazethapyr; unspec. appl. method; kg AI", "Imazethapyr; banded or side-dressed; kg AI", "Imazethapyr; broadcast with incorporation; kg AI".
Exchange "Carbofuran-soil agricultural" is the result of combining the following original LCA Commons flows: "Carbofuran; broadcast with incorporation; kg AI", "Carbofuran; broadcast without incorporation; kg AI", "Carbofuran; banded or side-dressed; kg AI", "Carbofuran; in seed furrow; kg AI", "Carbofuran; foliar or directed spray; kg AI", "Carbofuran; unspec. appl. method; kg AI".
Exchange "Dicamba-soil agricultural" is the result of combining the following original LCA Commons flows: "Dicamba; foliar or directed spray; kg AI", "Dicamba; unspec. appl. method; kg AI", "Dicamba; broadcast without incorporation; kg AI", "Dicamba; broadcast with incorporation; kg AI", "Dicamba; in seed furrow; kg AI", "Dicamba; banded or side-dressed; kg AI".
Exchange "Nicosulfuron-soil agricultural" is the result of combining the following original LCA Commons flows: "Nicosulfuron; unspec. appl. method; kg AI", "Nicosulfuron; broadcast without incorporation; kg AI", "Nicosulfuron; foliar or directed spray; kg AI", "Nicosulfuron; in seed furrow; kg AI", "Nicosulfuron; banded or side-dressed; kg AI", "Nicosulfuron; broadcast with incorporation; kg AI".
Exchange "Tebupirimphos-soil agricultural" is the result of combining the following original LCA Commons flows: "Tebupirimfos; broadcast with incorporation; kg AI", "Tebupirimfos; broadcast without incorporation; kg AI", "Tebupirimfos; foliar or directed spray; kg AI", "Tebupirimfos; banded or side-dressed; kg AI", "Tebupirimfos; in seed furrow; kg AI", "Tebupirimfos; unspec. appl. method; kg AI".
Exchange "Carbon-soil agricultural" is the result of combining the following original LCA Commons flows: "Carbon; in above-ground residue left on field; biogenic", "Carbon; broadcast w/o incorp. in manure at an unknown time", "Carbon; applied in limestone", "Carbon; injected/knifed in manure at an unknown time", "Carbon; using unspec. method in manure at an unknown time", "Carbon; broadcast w/ incorp. in manure at an unknown time", "Carbon; in below-ground residue; biogenic", "Carbon; applied in sewage sludge", "Carbon; applied in dolomite".
Exchange "Particulates, < 2.5 um-air low population density" is the result of combining the following original LCA Commons flows: "PM2.5; from residue burning; kg C, biogenic", "PM2.5; from residue burning; kg except C, biogenic".
Exchange "Dimethenamid-soil agricultural" is the result of combining the following original LCA Commons flows: "Dimethenamid; in seed furrow; kg AI", "Dimethenamid; foliar or directed spray; kg AI", "Dimethenamid; broadcast without incorporation; kg AI", "Dimethenamid; unspec. appl. method; kg AI", "Dimethenamid; broadcast with incorporation; kg AI", "Dimethenamid; banded or side-dressed; kg AI".
Exchange "Chlorpyrifos-soil agricultural" is the result of combining the following original LCA Commons flows: "Chlorpyrifos; banded or side-dressed; kg AI", "Chlorpyrifos; broadcast without incorporation; kg AI", "Chlorpyrifos; in seed furrow; kg AI", "Chlorpyrifos; foliar or directed spray; kg AI", "Chlorpyrifos; broadcast with incorporation; kg AI", "Chlorpyrifos; unspec. appl. method; kg AI".
Exchange "Rimsulfuron-soil agricultural" is the result of combining the following original LCA Commons flows: "Rimsulfuron; unspec. appl. method; kg AI", "Rimsulfuron; foliar or directed spray; kg AI", "Rimsulfuron; broadcast with incorporation; kg AI", "Rimsulfuron; banded or side-dressed; kg AI", "Rimsulfuron; in seed furrow; kg AI", "Rimsulfuron; broadcast without incorporation; kg AI".
Exchange "fonofos-soil agricultural" is the result of combining the following original LCA Commons flows: "Dyphonate; banded or side-dressed; kg AI", "Dyphonate; in seed furrow; kg AI", "Dyphonate; broadcast with incorporation; kg AI", "Dyphonate; broadcast without incorporation; kg AI", "Dyphonate; unspec. appl. method; kg AI", "Dyphonate; foliar or directed spray; kg AI".
Exchange "Ash-soil agricultural" is the result of combining the following original LCA Commons flows: "Ash; from residue burning; kg C, biogenic", "Ash; from residue burning; kg except C, biogenic".
Exchange "Acetochlor-soil agricultural" is the result of combining the following original LCA Commons flows: "Acetochlor; broadcast with incorporation; kg AI", "Acetochlor; foliar or directed spray; kg AI", "Acetochlor; banded or side-dressed; kg AI", "Acetochlor; in seed furrow; kg AI", "Acetochlor; unspec. appl. method; kg AI", "Acetochlor; broadcast without incorporation; kg AI".
Exchange "Water-soil agricultural" is the result of combining the following original LCA Commons flows: "Water; in below-ground residue; biogenic", "Water; broadcast w/o incorp. in manure", "Water; in above-ground residue left on field; biogenic", "Water; using unspec. method in manure", "Water; broadcast w/ incorp. in manure", "Water; injected/knifed in manure", "Water; from irrigation and applied with manure and sewage sludge".
Exchange "Pendimethalin-soil agricultural" is the result of combining the following original LCA Commons flows: "Pendimethalin; in seed furrow; kg AI", "Pendimethalin; foliar or directed spray; kg AI", "Pendimethalin; broadcast without incorporation; kg AI", "Pendimethalin; banded or side-dressed; kg AI", "Pendimethalin; unspec. appl. method; kg AI", "Pendimethalin; broadcast with incorporation; kg AI".
Exchange "Primisulfuron-soil agricultural" is the result of combining the following original LCA Commons flows: "Primisulfuron-methyl; broadcast with incorporation; kg AI", "Primisulfuron-methyl; in seed furrow; kg AI", "Primisulfuron-methyl; unspec. appl. method; kg AI", "Primisulfuron-methyl; broadcast without incorporation; kg AI", "Primisulfuron-methyl; banded or side-dressed; kg AI", "Primisulfuron-methyl; foliar or directed spray; kg AI".
Exchange "Halosulfuron-methyl-soil agricultural" is the result of combining the following original LCA Commons flows: "Halosulfuron-methyl; broadcast with incorporation; kg AI", "Halosulfuron-methyl; foliar or directed spray; kg AI", "Halosulfuron-methyl; in seed furrow; kg AI", "Halosulfuron-methyl; broadcast without incorporation; kg AI", "Halosulfuron-methyl; unspec. appl. method; kg AI", "Halosulfuron-methyl; banded or side-dressed; kg AI".
Exchange "Water, unspecified origin-resource in water" is the result of combining the following original LCA Commons flows: "Water; withdrawal from unspec. source, for corn, in 1996", "Water; from plant uptake; biogenic".
Exchange "Metolachlor-soil agricultural" is the result of combining the following original LCA Commons flows: "Propazine; unspec. appl. method; kg AI", "Propazine; banded or side-dressed; kg AI", "Propazine; in seed furrow; kg AI", "Propazine; broadcast with incorporation; kg AI", "Propazine; broadcast without incorporation; kg AI", "Propazine; foliar or directed spray; kg AI".
Exchange "Particulates, < 10 um-air low population density" is the result of combining the following original LCA Commons flows: "PM10; from residue burning; kg C, biogenic", "PM10; from residue burning; kg except C, biogenic".
Exchange "Cyfluthrin-soil agricultural" is the result of combining the following original LCA Commons flows: "Beta-Cyfluthrin; banded or side-dressed; kg AI", "Beta-Cyfluthrin; foliar or directed spray; kg AI", "Beta-Cyfluthrin; in seed furrow; kg AI", "Beta-Cyfluthrin; broadcast with incorporation; kg AI", "Beta-Cyfluthrin; broadcast without incorporation; kg AI", "Beta-Cyfluthrin; unspec. appl. method; kg AI".
Exchange "Bromoxynil-soil agricultural" is the result of combining the following original LCA Commons flows: "Bromoxynil; broadcast without incorporation; kg AI", "Bromoxynil; in seed furrow; kg AI", "Bromoxynil; unspec. appl. method; kg AI", "Bromoxynil; broadcast with incorporation; kg AI", "Bromoxynil; banded or side-dressed; kg AI", "Bromoxynil; foliar or directed spray; kg AI".
Exchange "Flumetsulam-soil agricultural" is the result of combining the following original LCA Commons flows: "Flumetsulam; broadcast without incorporation; kg AI", "Flumetsulam; foliar or directed spray; kg AI", "Flumetsulam; banded or side-dressed; kg AI", "Flumetsulam; unspec. appl. method; kg AI", "Flumetsulam; broadcast with incorporation; kg AI", "Flumetsulam; in seed furrow; kg AI".
Exchange "Atrazine-soil agricultural" is the result of combining the following original LCA Commons flows: "Atrazine; unspec. appl. method; kg AI", "Atrazine; banded or side-dressed; kg AI", "Atrazine; broadcast without incorporation; kg AI", "Atrazine; foliar or directed spray; kg AI", "Atrazine; broadcast with incorporation; kg AI", "Atrazine; in seed furrow; kg AI".
Exchange "Transformation, from arable-resource land" is the result of combining the following original LCA Commons flows: "Transformation; from arable, from unspec. use to corn", "Transformation; from arable, from soy to corn", "Transformation; from arable, from other to corn", "Transformation; from arable, from corn to corn", "Transformation; from arable, from fallow to corn".
Exchange "Calcium-soil agricultural" is the result of combining the following original LCA Commons flows: "Calcium; applied in dolomite", "Calcium; applied in limestone".
Exchange "2,4-D-soil agricultural" is the result of combining the following original LCA Commons flows: "2,4-D; banded or side-dressed; kg AI", "2,4-D; broadcast without incorporation; kg AI", "2,4-D; unspec. appl. method; kg AI", "2,4-D; foliar or directed spray; kg AI", "2,4-D; broadcast with incorporation; kg AI", "2,4-D; in seed furrow; kg AI".
Exchange "Alachlor-soil agricultural" is the result of combining the following original LCA Commons flows: "Alachlor; unspec. appl. method; kg AI", "Alachlor; in seed furrow; kg AI", "Alachlor; foliar or directed spray; kg AI", "Alachlor; broadcast without incorporation; kg AI", "Alachlor; broadcast with incorporation; kg AI", "Alachlor; banded or side-dressed; kg AI".
Exchange "Terbufos-2bdf9967-6dae-4183-88d1-8f612548c51e low population density" was originally named: "Terbufos; broadcast by air; kg AI" in this dataset.
Exchange "Nitrogen dioxide-2bdf9967-6dae-4183-88d1-8f612548c51e low population density" was originally named: "Nitrogen dioxide; from residue burning; kg N, biogenic" in this dataset.
Exchange "Acetaldehyde-2bdf9967-6dae-4183-88d1-8f612548c51e low population density" was originally named: "Acetaldehyde; from residue burning; kg C, biogenic" in this dataset.
Exchange "Butadiene-2bdf9967-6dae-4183-88d1-8f612548c51e low population density" was originally named: "1,3 butadiene; from residue burning; kg C, biogenic" in this dataset.
Exchange "Pentane-2bdf9967-6dae-4183-88d1-8f612548c51e low population density" was originally named: "N pentane; from residue burning; kg C, biogenic" in this dataset.
Exchange "Magnesium-be1c0329-f1a8-4524-8420-a86d2a8dd358 agricultural" was originally named: "Magnesium; applied in dolomite" in this dataset.
Exchange "Formic acid-2bdf9967-6dae-4183-88d1-8f612548c51e low population density" was originally named: "Formic acid; from residue burning; kg C, biogenic" in this dataset.
Exchange "Alachlor-2bdf9967-6dae-4183-88d1-8f612548c51e low population density" was originally named: "Alachlor; broadcast by air; kg AI" in this dataset.
Exchange "1-Butene-2bdf9967-6dae-4183-88d1-8f612548c51e low population density" was originally named: "1 butene; from residue burning; kg C, biogenic" in this dataset.
Exchange "Dicamba-2bdf9967-6dae-4183-88d1-8f612548c51e low population density" was originally named: "Dicamba; broadcast by air; kg AI" in this dataset.
Exchange "Acrylonitrile-2bdf9967-6dae-4183-88d1-8f612548c51e low population density" was originally named: "Propenenitrile; from residue burning; kg C, biogenic" in this dataset.
Exchange "Bentazone-2bdf9967-6dae-4183-88d1-8f612548c51e low population density" was originally named: "Bentazon; broadcast by air; kg AI" in this dataset.
Exchange "Sulfur-be1c0329-f1a8-4524-8420-a86d2a8dd358 agricultural" was originally named: "Sulfur; as secondary application" in this dataset.
Exchange "Dimethenamid-2bdf9967-6dae-4183-88d1-8f612548c51e low population density" was originally named: "Dimethenamid; broadcast by air; kg AI" in this dataset.
Exchange "Sulfur dioxide-2bdf9967-6dae-4183-88d1-8f612548c51e low population density" was originally named: "Sulfur dioxide; from residue burning; biogenic" in this dataset.
Exchange "Bromoxynil-2bdf9967-6dae-4183-88d1-8f612548c51e low population density" was originally named: "Bromoxynil; broadcast by air; kg AI" in this dataset.
Exchange "Nicosulfuron-2bdf9967-6dae-4183-88d1-8f612548c51e low population density" was originally named: "Nicosulfuron; broadcast by air; kg AI" in this dataset.
Exchange "Propene-2bdf9967-6dae-4183-88d1-8f612548c51e low population density" was originally named: "Propylene; from residue burning; kg C, biogenic" in this dataset.
Exchange "cis-2-Butene-2bdf9967-6dae-4183-88d1-8f612548c51e low population density" was originally named: "Cis 2 butene; from residue burning; kg C, biogenic" in this dataset.
Exchange "isopentane-2bdf9967-6dae-4183-88d1-8f612548c51e low population density" was originally named: "I pentane; from residue burning; kg C, biogenic" in this dataset.
Exchange "Zinc compounds-be1c0329-f1a8-4524-8420-a86d2a8dd358 agricultural" was originally named: "Zinc compounds; as secondary application" in this dataset.
Exchange "Acetic acid-2bdf9967-6dae-4183-88d1-8f612548c51e low population density" was originally named: "Acetic acid; from residue burning; kg C, biogenic" in this dataset.
Exchange "Tefluthrin-2bdf9967-6dae-4183-88d1-8f612548c51e low population density" was originally named: "Tefluthrin; broadcast by air; kg AI" in this dataset.
Exchange "Prosulfuron-2bdf9967-6dae-4183-88d1-8f612548c51e low population density" was originally named: "Prosulfuron; broadcast by air; kg AI" in this dataset.
Exchange "Methane-2bdf9967-6dae-4183-88d1-8f612548c51e low population density" was originally named: "Methane; from residue burning; kg C, biogenic" in this dataset.
Exchange "Acetonitrile-2bdf9967-6dae-4183-88d1-8f612548c51e low population density" was originally named: "Acetonitrile; from residue burning; kg C, biogenic" in this dataset.
Exchange "Halosulfuron-methyl-2bdf9967-6dae-4183-88d1-8f612548c51e low population density" was originally named: "Halosulfuron-methyl; broadcast by air; kg AI" in this dataset.
Exchange "Ethene-2bdf9967-6dae-4183-88d1-8f612548c51e low population density" was originally named: "Ethylene; from residue burning; kg C, biogenic" in this dataset.
Exchange "Formaldehyde-2bdf9967-6dae-4183-88d1-8f612548c51e low population density" was originally named: "Formaldehyde; from residue burning; kg C, biogenic" in this dataset.
Exchange "trans-2-Butene-2bdf9967-6dae-4183-88d1-8f612548c51e low population density" was originally named: "Trans 2 butene; from residue burning; kg C, biogenic" in this dataset.
Exchange "Sulfuric acid-be1c0329-f1a8-4524-8420-a86d2a8dd358 agricultural" was originally named: "Sulfuric acid; as secondary application" in this dataset.
Exchange "2,4-D-2bdf9967-6dae-4183-88d1-8f612548c51e low population density" was originally named: "2,4-D; broadcast by air; kg AI" in this dataset.
Exchange "Metolachlor-2bdf9967-6dae-4183-88d1-8f612548c51e low population density" was originally named: "Propazine; broadcast by air; kg AI" in this dataset.
Exchange "Metribuzin-2bdf9967-6dae-4183-88d1-8f612548c51e low population density" was originally named: "Metribuzin; broadcast by air; kg AI" in this dataset.
Exchange "Phenol-2bdf9967-6dae-4183-88d1-8f612548c51e low population density" was originally named: "Phenol; from residue burning; kg C, biogenic" in this dataset.
Exchange "Chlorpyrifos-2bdf9967-6dae-4183-88d1-8f612548c51e low population density" was originally named: "Chlorpyrifos; broadcast by air; kg AI" in this dataset.
Exchange "Acetochlor-2bdf9967-6dae-4183-88d1-8f612548c51e low population density" was originally named: "Acetochlor; broadcast by air; kg AI" in this dataset.
Exchange "Hydrocyanic acid-2bdf9967-6dae-4183-88d1-8f612548c51e low population density" was originally named: "Hydrogen cyanide; from residue burning; kg C, biogenic" in this dataset.
Exchange "Furan-2bdf9967-6dae-4183-88d1-8f612548c51e low population density" was originally named: "Furan; from residue burning; kg C, biogenic" in this dataset.
Exchange "Toluene-2bdf9967-6dae-4183-88d1-8f612548c51e low population density" was originally named: "Toluene; from residue burning; kg C, biogenic" in this dataset.
Exchange "Tebupirimphos-2bdf9967-6dae-4183-88d1-8f612548c51e low population density" was originally named: "Tebupirimfos; broadcast by air; kg AI" in this dataset.
Exchange "Transformation, to arable-c19fb2d9-98eb-4cd3-8761-81b71d8a9a1b land" was originally named: "Transformation; to arable, to corn" in this dataset.
Exchange "Cyfluthrin-2bdf9967-6dae-4183-88d1-8f612548c51e low population density" was originally named: "Beta-Cyfluthrin; broadcast by air; kg AI" in this dataset.
Exchange "Carbon dioxide, in air-2bdf9967-6dae-4183-88d1-8f612548c51e low population density" was originally named: "Carbon dioxide; from residue burning; kg C, biogenic" in this dataset.
Exchange "Ethyne-2bdf9967-6dae-4183-88d1-8f612548c51e low population density" was originally named: "Acetylene; from residue burning; kg C, biogenic" in this dataset.
Exchange "Carbon dioxide-c19fb2d9-98eb-4cd3-8761-81b71d8a9a1b unspecified" was originally named: "Carbon dioxide; from plant uptake; kg C, biogenic" in this dataset.
Exchange "Occupation, arable-c19fb2d9-98eb-4cd3-8761-81b71d8a9a1b land" was originally named: "Occupation; arable, as corn" in this dataset.
Exchange "Carbon monoxide, fossil-2bdf9967-6dae-4183-88d1-8f612548c51e low population density" was originally named: "Carbon monoxide; from residue burning; kg C, biogenic" in this dataset.
Exchange "Cyanazine-2bdf9967-6dae-4183-88d1-8f612548c51e low population density" was originally named: "Cyanazine; broadcast by air; kg AI" in this dataset.
Exchange "Flumetsulam-2bdf9967-6dae-4183-88d1-8f612548c51e low population density" was originally named: "Flumetsulam; broadcast by air; kg AI" in this dataset.
Exchange "Dinitrogen monoxide-2bdf9967-6dae-4183-88d1-8f612548c51e low population density" was originally named: "Dinitrogen monoxide; from residue burning; kg N, biogenic" in this dataset.
Exchange "fonofos-2bdf9967-6dae-4183-88d1-8f612548c51e low population density" was originally named: "Dyphonate; broadcast by air; kg AI" in this dataset.
Exchange "Ethane-2bdf9967-6dae-4183-88d1-8f612548c51e low population density" was originally named: "Ethane; from residue burning; kg C, biogenic" in this dataset.
Exchange "Benzene-2bdf9967-6dae-4183-88d1-8f612548c51e low population density" was originally named: "Benzene; from residue burning; kg C, biogenic" in this dataset.
Exchange "Acetone-2bdf9967-6dae-4183-88d1-8f612548c51e low population density" was originally named: "Acetone; from residue burning; kg C, biogenic" in this dataset.
Exchange "Water-2bdf9967-6dae-4183-88d1-8f612548c51e low population density" was originally named: "Water; from residue burning; biogenic" in this dataset.
Exchange "EPTC-2bdf9967-6dae-4183-88d1-8f612548c51e low population density" was originally named: "EPTC; broadcast by air; kg AI" in this dataset.
Exchange "Propane-2bdf9967-6dae-4183-88d1-8f612548c51e low population density" was originally named: "Propane; from residue burning; kg C, biogenic" in this dataset.
Exchange "Butane-2bdf9967-6dae-4183-88d1-8f612548c51e low population density" was originally named: "N butane; from residue burning; kg C, biogenic" in this dataset.
Exchange "isobutene-2bdf9967-6dae-4183-88d1-8f612548c51e low population density" was originally named: "I butene; from residue burning; kg C, biogenic" in this dataset.
Exchange "Glyphosate-2bdf9967-6dae-4183-88d1-8f612548c51e low population density" was originally named: "Glyphosate; broadcast by air; kg AI" in this dataset.
Exchange "Methanol-2bdf9967-6dae-4183-88d1-8f612548c51e low population density" was originally named: "Methanol; from residue burning; kg C, biogenic" in this dataset.
Exchange "Phosphorus-c19fb2d9-98eb-4cd3-8761-81b71d8a9a1b unspecified" was originally named: "Phosphorous; from plant uptake; biogenic" in this dataset.
Exchange "Rimsulfuron-2bdf9967-6dae-4183-88d1-8f612548c51e low population density" was originally named: "Rimsulfuron; broadcast by air; kg AI" in this dataset.
Exchange "Carbofuran-2bdf9967-6dae-4183-88d1-8f612548c51e low population density" was originally named: "Carbofuran; broadcast by air; kg AI" in this dataset.
Exchange "Ammonia-2bdf9967-6dae-4183-88d1-8f612548c51e low population density" was originally named: "Ammonia; from residue burning; kg N, biogenic" in this dataset.
Exchange "Atrazine-2bdf9967-6dae-4183-88d1-8f612548c51e low population density" was originally named: "Atrazine; broadcast by air; kg AI" in this dataset.
Exchange "Pendimethalin-2bdf9967-6dae-4183-88d1-8f612548c51e low population density" was originally named: "Pendimethalin; broadcast by air; kg AI" in this dataset.
Exchange "pursuit-2bdf9967-6dae-4183-88d1-8f612548c51e low population density" was originally named: "Imazethapyr; broadcast by air; kg AI" in this dataset.
Exchange "Isoprene-2bdf9967-6dae-4183-88d1-8f612548c51e low population density" was originally named: "Isoprene; from residue burning; kg C, biogenic" in this dataset.

## Geography
The unit process is assumed to represent production in Iowa (US State).

## Technology
This process produces corn grain; at harvest in 1996; at farm; 85%-91% moisture. The process is assumed to represent production in Iowa (US State). Yields and related inputs and outputs represent a single year of operation, in 1996. This dataset includes consideration of residue burning; soil preparation; planting or sowing; irrigation; application, storage, and transport of fertilizers, manures, liming materials, secondary materials, and pesticides; and harvest. Fate and transport of applications are not included as described in Cooper, J.S., Kahn, E., Noon, M. (2012) LCA Digital Commons Unit Process Data: field crop production Version 1 which is available at https://www.lcacommons.gov/discovery/docs/LCA%20Digital%20Commons%20Unit%20Process%20Data%20final%20updated.pdf

## Time period
Start and end dates match the underlying data obtained from the USDA Agricultural Resource Management Survey (ARMS).
## Parameters
- p3373: 0; = if(p1232=0;p3245*p3361/p0818;0)
- p0127: 38.99
- p2910: 1.55656e-6; = p2324*(p1020+p1022)
- p3375: 0.00105592; = if(p1232=0;p3246*p3357/p0818;0)
- p2227: 0.374592; = if(p0774*p0778+p0775*p0779+p0776*p0780+p0777*p0781=0;0;p0779*p0775/(p0774*p0778+p0775*p0779+p0776*p0780+p0777*p0781))
- p2579: 9.55583e-8; = p2383*p1073
- p0873: 0.90036; = p0872*p0001*p0003/(p0818*p0002)
- p2361: 5.20559e-5; = p2225*p2189
- p1614: 0
- p1253: 0; = if(p1232>0;0;p0735/100)
- p0369: 0.5
- p2250: 0.00291141; = p2222*p2196
- p0743: 0.785; = p0083*(1+p0611*p0215/100)
- p0251: 2.951
- p3356: 5.58535e8; = if(p1232=0;p3306+p3317+p3328+p3339+p3350;0)
- p2613: 0; = p2417*p1073
- p2637: 8.16031e-6; = p2246*(p1019+p1021)
- p1091: 4.8599e-5; = IF(p1071=0;p1085*p0001/(p0818*p0002);0)
- p3034: 0; = p2253*p1023
- p1919: 0
- p1564: 0
- p2807: 0; = p2416*(p1078+p1080)
- p2228: 0.109337; = if(p0774*p0778+p0775*p0779+p0776*p0780+p0777*p0781=0;0;p0780*p0776/(p0774*p0778+p0775*p0779+p0776*p0780+p0777*p0781))
- p4949: 6.746e-8; = p1776*p3483
- p2103: 0.912485
- p0533: 0; = SQRT(2)*(IF((2*p0401-1)<0;-1;IF((2*p0401-1)>0;1;0))*SQRT(SQRT((2/(pi()*0.140012289)+LN(1-(2*p0401-1)^2)/2)^2-LN(1-(2*p0401-1)^2)/0.140012289)-(2/(pi()*0.140012289)+LN(1-(2*p0401-1)^2)/2)))
- p1067: 0.00184285; = IF(p1012=0;p1053/(p1060*p0818);0)
- p1096: 0.00216322
- p2833: 9.03647e-5; = p2247*(p1020+p1022)
- p0728: 3.386; = p0068*(1+p0596*p0200/100)
- p2789: 0; = p2398*(p1019+p1021)
- p0519: 0; = SQRT(2)*(IF((2*p0387-1)<0;-1;IF((2*p0387-1)>0;1;0))*SQRT(SQRT((2/(pi()*0.140012289)+LN(1-(2*p0387-1)^2)/2)^2-LN(1-(2*p0387-1)^2)/0.140012289)-(2/(pi()*0.140012289)+LN(1-(2*p0387-1)^2)/2)))
- p3004: 0; = p2418*(p1079+p1081)
- p2236: 0; = 1-(p2230+p2231+p2232+p2233)
- p2934: 2.49602e-6; = p2348*(p1079+p1081)
- p2622: 0; = p2426*p1073
- p0275: 0.5
- p3365: 0; = if(p1232=0;p3244*p3359/p0818;0)
- p3134: 5.6744e-10; = p2353*p1132
- p0766: 102.01; = p0106*(1+p0634*p0238/100)
- p0002: 0.453592
- p0776: 32.349; = p0116*(1+p0644*p0248/100)
- p1925: 0
- p2351: 0.000606299; = p2232*p2219
- p2104: 0.817136
- p0537: 0; = IF(p0273<0.5;-SQRT(p0007*EXP(p0405^2*p0008)-p0007);SQRT(p0007*EXP(p0405^2*p0008)-p0007))
- p2211: 0.00176867; = p1120-p2209-p2208-p2210
- p1771: 8.25131e-5; = p1363*1000/p0818
- p1372: 572
- p2475: 0.000100959; = p2279*p1014
- p0961: 0; = if(and(p0683>0;or(p0807=480;p0807=32;p0807=1;and(p0807=60;p0901<0.03)));p0937;0)
- p1611: 0
- p3896: 2.11292e-6; = p1963*p3477
- p2209: 0.000312807; = 14.0067*p2208/30.973762
- p2540: 1.16953e-7; = p2344*p1073
- p1952: 0
- p2547: 8.71251e-5; = p2351*p1123
- p0124: 68.909
- p2788: 0; = p2397*(p1019+p1021)
- p2388: 3.41781e-5; = p2229*p2217
- p0237: 7.311
- p2817: 0; = p2426*(p1078+p1080)
- p0283: 0.5
- p0314: 0.5
- p2755: 3.29877e-5; = p2364*(p1019+p1021)
- p0245: 1.096
- p2429: 0; = p2236*p2219
- p2669: 2.24162e-5; = p2278*(p1019+p1021)
- p0853: 0.0197628; = p0803/(p0802+p0803)
- p0727: 73.321; = p0067*(1+p0595*p0199/100)
- p3331: 1.56679e6; = if(and(p1232=0;p3255<>0);p3255*(p3268-p3326)/p3327;0)
- p2746: 5.62912e-5; = p2355*(p1019+p1021)
- p2863: 0.000319918; = p2277*(p1020+p1022)
- p3258: 0.0491162
- p2436: 4.86624e-5; = p2240*p1014
- p1163: 0.00483226
- p3524: 6.33741e-7; = p1793*p3476
- p0824: 0.643929
- p0677: 103.21; = p0017*(1+p0545*p0149/100)
- p3481: 0.0211984; = if(p1328+p1330+p1332+p1334+p1336+p1338+p1340+p1342+p1344=0;0;p1338/(p1328+p1330+p1332+p1334+p1336+p1338+p1340+p1342+p1344))
- p1081: 0.03826; = IF(p1071=0;IF(p1073+p1078+p1079+p1080=1;0;IF(p1073+p1078+p1079+p1080+p1077>1;1-(p1073+p1078+p1079+p1080);p1077));0)
- p1255: 0; = if(p1232>0;0;p0737/100)
- p1676: 0
- p3145: 0; = p2364*p1023
- p3875: 9.23003e-10; = p1938*p3477
- p3474: 1.90019e-6; = p3379*p1241
- p2816: 0; = p2425*(p1078+p1080)
- p1451: 6
- p1011: 0; = p1010*p0001*p0004/(p0818*p0002)
- p2092: 0.54529
- p2568: 6.41366e-5; = p2372*p1014
- p0242: 3.739
- p4650: 2.18516e-6; = p1889*p3481
- p0414: 0; = SQRT(2)*(IF((2*p0282-1)<0;-1;IF((2*p0282-1)>0;1;0))*SQRT(SQRT((2/(pi()*0.140012289)+LN(1-(2*p0282-1)^2)/2)^2-LN(1-(2*p0282-1)^2)/0.140012289)-(2/(pi()*0.140012289)+LN(1-(2*p0282-1)^2)/2)))
- p4603: 1.32729e-9; = p1842*p3481
- p1833: 0
- p1456: 9
- p3348: 0.00443516; = if(and(p1232=0;p3256<>0);p3276*p3289;0)
- p2962: 8.18793e-5; = p2376*(p1079+p1081)
- p2931: 3.77811e-6; = p2345*(p1079+p1081)
- p2405: 0; = p2234*p2195
- p2522: 6.81287e-5; = p2326*p1014
- p1016: 0.11991; = IF(p1012=0;p0707/100;0)
- p0963: 0; = if(and(p0683>0;or(p0807=480;p0807=32;p0807=1;and(p0807=60;p0901<0.03)));p0939;0)
- p0789: 18.017; = p0129*(1+p0657*p0261/100)
- p2798: 0; = p2407*(p1019+p1021)
- p1984: 30
- p3286: 0.185
- p2188: 0.00227211; = p1066-p2186-p2187
- p0116: 32.349
- p1114: 0.216028
- p1066: 0.00368379; = IF(p1012=0;p1052/(p1059*p0818);0)
- p1832: 0
- p0635: 0; = IF(p0371<0.5;-SQRT(p0007*EXP(p0503^2*p0008)-p0007);SQRT(p0007*EXP(p0503^2*p0008)-p0007))
- p0616: 0; = IF(p0352<0.5;-SQRT(p0007*EXP(p0484^2*p0008)-p0007);SQRT(p0007*EXP(p0484^2*p0008)-p0007))
- p1675: 0
- p1303: 0; = p1297*p1252/p0818
- p2561: 0.000244134; = p2365*p1014
- p0653: 0; = IF(p0389<0.5;-SQRT(p0007*EXP(p0521^2*p0008)-p0007);SQRT(p0007*EXP(p0521^2*p0008)-p0007))
- p2982: 0; = p2396*(p1020+p1022)
- p2514: 6.78344e-6; = p2318*p1014
- p1969: 250000; = p0803
- p2469: 0.00060893; = p2273*p1123
- p0190: 3.187
- p0733: 3.48; = p0073*(1+p0601*p0205/100)
- p1756: 0
- p0060: 2.271
- p2988: 0; = p2402*(p1020+p1022)
- p3015: 0; = p2429*(p1129+p1131)
- p1149: 0.830148
- p4775: 0; = p1808*p3482
- p0121: 9.141
- p0654: 0; = IF(p0390<0.5;-SQRT(p0007*EXP(p0522^2*p0008)-p0007);SQRT(p0007*EXP(p0522^2*p0008)-p0007))
- p1963: 0.000214997; = p1963a+p1963b+p1963c+p1963d+p1963e+p1963f+p1963g+p1963h+p1963i+p1963j+p1963k
- p2894: 0.00016699; = p2308*(p1079+p1081)
- p4870: 0; = p1903*p3482
- p3846: 1.53834e-9; = p1909*p3477
- p4910: 0; = p1943*p3482
- p0948: 0; = if(and(p0683=0;or(p0807=480;p0807=32;p0807=1;and(p0807=60;p0901<0.03)));p0936;0)
- p2659: 2.75342e-5; = p2268*(p1078+p1080)
- p1299: 0
- p2004: 30
- p0444: 0; = SQRT(2)*(IF((2*p0312-1)<0;-1;IF((2*p0312-1)>0;1;0))*SQRT(SQRT((2/(pi()*0.140012289)+LN(1-(2*p0312-1)^2)/2)^2-LN(1-(2*p0312-1)^2)/0.140012289)-(2/(pi()*0.140012289)+LN(1-(2*p0312-1)^2)/2)))
- p3451: 0; = p3375*p1240
- p0863: 0.00847764; = p0675*1000/p0856
- p2734: 5.64863e-5; = p2343*(p1078+p1080)
- p3377: 0.000885434; = if(p1232=0;p3246*p3359/p0818;0)
- p2633: 1.30109e-5; = p2242*(p1019+p1021)
- p0798: 82.779; = p0138*(1+p0666*p0270/100)
- p2700: 4.67077e-6; = p2309*(p1078+p1080)
- p0094: 2198.63
- p0930: 2.23953e6; = p0801*p0924
- p0840: 0.141406; = p0839*p0831
- p3343: 3.26073e8; = if(and(p1232=0;p3254<>0);IF((p3339+p3340+p3341+p3342)+(p3254*(p3269*(1-p3277))/p3338)>p3254;p3254-(p3339+p3340+p3341+p3342);p3254*(p3269*(1-p3277))/p3338);0)
- p1794: 0
- p0877: 0; = p0876*p0001*p0003/(p0818*p0002)
- p2285: 6.22335e-5; = p2223*p2191
- p0657: 0; = IF(p0393<0.5;-SQRT(p0007*EXP(p0525^2*p0008)-p0007);SQRT(p0007*EXP(p0525^2*p0008)-p0007))
- p0487: 0; = SQRT(2)*(IF((2*p0355-1)<0;-1;IF((2*p0355-1)>0;1;0))*SQRT(SQRT((2/(pi()*0.140012289)+LN(1-(2*p0355-1)^2)/2)^2-LN(1-(2*p0355-1)^2)/0.140012289)-(2/(pi()*0.140012289)+LN(1-(2*p0355-1)^2)/2)))
- p1062: 0.16
- p3232: 1.46784e-8; = p1182/p0818
- p2447: 8.47412e-7; = p2251*p1014
- p3201: 0; = p2420*p1082
- p2596: 0; = p2400*p1014
- p5269: 5.67474e-9; = p1890*p3484
- p2409: 0; = p2234*p2199
- p1727: 0
- p2774: 1.61242e-7; = p2383*(p1078+p1080)
- p1890: 2.40015e-7; = p1482*1000/p0818
- p1298: 0
- p5238: 1.48037e-9; = p1859*p3484
- p2778: 1.11391e-6; = p2387*(p1078+p1080)
- p0828: 0.0610474; = if(p0827=0;0;p0819-p0827/p0818)
- p1966: 1.24e7; = if(p0814=0;p0802;0)
- p0777: 58.307; = p0117*(1+p0645*p0249/100)
- p2200: 0.0031266; = p1056/p0818
- p1806: 0
- p1345: 8.18842e-6; = IF(p1318=0;p1344*p0001/(p0818*p0002);0)
- p3280: 0.375
- p2647: 1.41324e-5; = p2256*(p1019+p1021)
- p2527: 4.26282e-7; = p2331*p1014
- p2644: 2.33871e-6; = p2253*(p1019+p1021)
- p1752: 0
- p1132: 1e-5; = if(p1121=0;IF(p1123+p1128+p1129+p1130+p1131=1;0;1-(p1123+p1128+p1129+p1130+p1131));0)
- p0178: 4.001
- p0016: 2239.53
- p0725: 13.63; = p0065*(1+p0593*p0197/100)
- p2256: 5.19498e-5; = p2222*p2202
- p2651: 6.91786e-5; = p2260*(p1078+p1080)
- p0783: 92.965; = p0123*(1+p0651*p0255/100)
- p3072: 0; = p2291*p1023
- p3147: 0; = p2366*p1023
- p0383: 0.5
- p2919: 1.87304e-5; = p2333*(p1020+p1022)
- p2246: 2.99967e-5; = p2222*p2191
- p0693: 0
- p2984: 0; = p2398*(p1020+p1022)
- p2665: 6.85468e-5; = p2274*(p1128+p1130)
- p1012: 0
- p1297: 0
- p3209: 0; = p2428*p1132
- p3361: 6.84547e7; = if(p1232=0;p3311+p3322+p3333+p3344+p3355;0)
- p3480: 0; = if(p1328+p1330+p1332+p1334+p1336+p1338+p1340+p1342+p1344=0;0;p1336/(p1328+p1330+p1332+p1334+p1336+p1338+p1340+p1342+p1344))
- p3290: 0.195
- p2980: 0; = p2394*(p1020+p1022)
- p2516: 2.37152e-6; = p2320*p1014
- p2648: 0.000162017; = p2257*(p1019+p1021)
- p2263: 0.000133486; = p2226*p2209
- p0360: 0.5
- p1725: 0
- p2948: 2.21804e-5; = p2362*(p1020+p1022)
- p1158: 0.0170007; = p1156*p1157
- p2245: 0.000119283; = p2222*p2190
- p1047: 0.299887; = IF(p1012=0;IF(p1037+p1044+p1045+p1046=1;0;IF(p1037+p1044+p1045+p1046+p1041>1;1-(p1037+p1044+p1045+p1046);p1041));0)
- p1757: 0
- p0348: 0.5
- p1237: 0; = if(p1232>0;0;p0729/100)
- p2643: 1.06373e-6; = p2252*(p1019+p1021)
- p0247: 2.782
- p0905: 0.0207967; = p0904/p0818
- p2336: 0.000207188; = p2228*p2204
- p0769: 42.622; = p0109*(1+p0637*p0241/100)
- p2820: 0; = p2429*(p1128+p1130)
- p0736: 0
- p0347: 0.5
- p2601: 0; = p2405*p1014
- p2935: 2.23705e-5; = p2349*(p1079+p1081)
- p2850: 3.08226e-5; = p2264*(p1079+p1081)
- p2187: 0.00017761; = 4*1.00794*p2186/(2*14.0067)
- p2983: 0; = p2397*(p1020+p1022)
- p1282: 0.17312; = IF(p1277+p1280+p1281=p1260;0;p1260-(p1277+p1280+p1281))
- p2307: 8.27448e-5; = p2227*p2214
- p0741: 2.84; = p0081*(1+p0609*p0213/100)
- p0106: 102.01
- p2851: 0.000403635; = p2265*(p1079+p1081)
- p2748: 1.85903e-5; = p2357*(p1019+p1021)
- p2898: 0.0018424; = p2312*(p1129+p1131)
- p2881: 4.01208e-5; = p2295*(p1020+p1022)
- p0600: 0; = IF(p0336<0.5;-SQRT(p0007*EXP(p0468^2*p0008)-p0007);SQRT(p0007*EXP(p0468^2*p0008)-p0007))
- p0313: 0.5
- p2912: 7.12966e-5; = p2326*(p1020+p1022)
- p3079: 0; = p2298*p1082
- p3315: 0.00443516; = if(and(p1232=0;p3253<>0);p3264*p3289;0)
- p1060: 0.21
- p0140: 81.127
- p3397: 0.00172711; = p3378*p1234
- p1963a: 0.000100517; = p1550*p1754+p1551*p1755+p1552*p1756+p1553*p1757+p1554*p1758+p1555*p1759+p1556*p1760+p1557*p1761+p1558*p1762+p1559*p1763+p1560*p1764+p1561*p1765+p1562*p1766+p1563*p1767+p1564*p1768+p1565*p1769+p1566*p1770+p1567*p1771+p1568*p1772
- p2928: 7.89726e-6; = p2342*(p1079+p1081)
- p4704: 2.21215e-10; = p1943*p3481
- p2537: 5.92059e-6; = p2341*p1073
- p1764: 0
- p3023: 0; = p2242*p1023
- p3224: 0.501945; = IF(p3216=0;0;1-p3221-p3222-p3223)
- p1215: 0.0183471; = IF(p1214=0;0;(p1214-1.5)/(p1214-1)^2)
- p2803: 0; = p2412*(p1019+p1021)
- p2064: 0.676706
- p2271: 0.000163262; = p2226*p2217
- p2357: 6.83365e-5; = p2225*p2185
- p3336: 0.000977444; = IF(or(p3254=0;p1232>0);0;p3271*p3289)
- p0130: 8.992
- p0625: 0; = IF(p0361<0.5;-SQRT(p0007*EXP(p0493^2*p0008)-p0007);SQRT(p0007*EXP(p0493^2*p0008)-p0007))
- p3317: 1.16326e8; = if(and(p1232=0;p3253<>0);p3253*(p3261*p3277-p3312)/p3316;0)
- p2740: 1.22187e-5; = p2349*(p1078+p1080)
- p1341: 0; = p1340*p0001/(p0818*p0002)
- p0611: 0; = IF(p0347<0.5;-SQRT(p0007*EXP(p0479^2*p0008)-p0007);SQRT(p0007*EXP(p0479^2*p0008)-p0007))
- p0992: 0; = p0988*p0001*p0004/(p0818*p0002)
- p2155: 6.05001e-8; = p2015*p2084*p2117/(p0818*1000)
- p2148: 2.40305e-8; = p2015*p2076*p2110/(p0818*1000)
- p1263: 0.17312; = if(p1232>0;0;IF(p1259=1;0;IF(p1259+p1260>1;1-p1259;p1260)))
- p0259: 3.609
- p1261: 0.40445; = if(p1232>0;0;p0732/100)
- p1835: 0
- p2088: 0.798875
- p1051: 1.41339e7; = IF(p1012=0;p1044*p1036;0)
- p0772: 19.962; = p0112*(1+p0640*p0244/100)
- p2741: 0.000129223; = p2350*(p1128+p1130)
- p0787: 38.99; = p0127*(1+p0655*p0259/100)
- p3657: 1.57061e-9; = p1926*p3476
- p0123: 92.965
- p0391: 0.5
- p2401: 0; = p2234*p2190
- p2695: 0.000193524; = p2304*(p1078+p1080)
- p4664: 3.56155e-8; = p1903*p3481
- p1961: 0
- p0925: 0.282953; = IF(p0918+p0923+p0924=1;0;IF(p0918+p0923+p0924+p0921>1;1-(p0918+p0923+p0924);p0921))
- p2172: 0.160231; = p2166-(p2167+p2168+p2169+p2170)
- p0932: 103210; = p0801*p0926
- p0890: 0; = p0686*1000*p0687*p0885/100
- p0252: 18.488
- p1917: 0
- p4046: 1.05831e-6; = p1903*p3478
- p1140: 2.66323e-5; = if(p1121=0;p1134*p0001/(p0818*p0002);0)
- p2312: 0.00331404; = p2231*p2219
- p2602: 0; = p2406*p1014
- p1568: 0
- p1022: 0.25234; = IF(p1012=0;IF(p1014+p1019+p1020+p1021=1;0;IF(p1014+p1019+p1020+p1021+p1018>1;1-(p1014+p1019+p1020+p1021);p1018));0)
- p2918: 4.36887e-5; = p2332*(p1020+p1022)
- p0402: 0.5
- p0204: 16.688
- p1144: 9.59239e-10; = if(p1121=0;p1138*p0001/(p0818*p0002);0)
- p0515: 0; = SQRT(2)*(IF((2*p0383-1)<0;-1;IF((2*p0383-1)>0;1;0))*SQRT(SQRT((2/(pi()*0.140012289)+LN(1-(2*p0383-1)^2)/2)^2-LN(1-(2*p0383-1)^2)/0.140012289)-(2/(pi()*0.140012289)+LN(1-(2*p0383-1)^2)/2)))
- p3405: 0; = p3367*p1238
- p4532: 1.74914e-6; = p1771*p3481
- p0280: 0.5
- p0464: 0; = SQRT(2)*(IF((2*p0332-1)<0;-1;IF((2*p0332-1)>0;1;0))*SQRT(SQRT((2/(pi()*0.140012289)+LN(1-(2*p0332-1)^2)/2)^2-LN(1-(2*p0332-1)^2)/0.140012289)-(2/(pi()*0.140012289)+LN(1-(2*p0332-1)^2)/2)))
- p1667: 0
- p1781: 0
- p1153: 0.365265
- p2091: 0.374844
- p2995: 0; = p2409*(p1020+p1022)
- p3161: 0; = p2380*p1082
- p1739: 0.583082
- p2903: 2.06096e-6; = p2317*(p1020+p1022)
- p2655: 1.68352e-5; = p2264*(p1078+p1080)
- p1053: 3.7085e7; = IF(p1012=0;p1046*p1036;0)
- p3314: 0.00107264; = if(and(p1232=0;p3253<>0);p3263*p3289;0)
- p2519: 5.9147e-6; = p2323*p1014
- p2156: 1.12098e-8; = p2015*p2085*p2118/(p0818*1000)
- p2267: 2.7573e-5; = p2226*p2213
- p1176: 5113.96; = p1175*p0801
- p4960: 4.71495e-8; = p1787*p3483
- p2013: 0.75
- p0095: 32.922
- p2450: 0.000299484; = p2254*p1014
- p1233: 0; = p1232*p0001/(p0818*p0002)
- p0995: 0; = p0991*p0001*p0004/(p0818*p0002)
- p0272: 4.169
- p1590: 0
- p0070: 37.957
- p0664: 0; = IF(p0400<0.5;-SQRT(p0007*EXP(p0532^2*p0008)-p0007);SQRT(p0007*EXP(p0532^2*p0008)-p0007))
- p1333: 0.000218158; = p1332*p0001/(p0818*p0002)
- p0592: 0; = IF(p0328<0.5;-SQRT(p0007*EXP(p0460^2*p0008)-p0007);SQRT(p0007*EXP(p0460^2*p0008)-p0007))
- p2179: 0.00229798; = p0970+p0971+p0972
- p3350: 3.91371e6; = if(and(p1232=0;p3256<>0);p3256*(p3273*p3277-p3345)/p3349;0)
- p3208: 0; = p2427*p1082
- p0478: 0; = SQRT(2)*(IF((2*p0346-1)<0;-1;IF((2*p0346-1)>0;1;0))*SQRT(SQRT((2/(pi()*0.140012289)+LN(1-(2*p0346-1)^2)/2)^2-LN(1-(2*p0346-1)^2)/0.140012289)-(2/(pi()*0.140012289)+LN(1-(2*p0346-1)^2)/2)))
- p2533: 3.24383e-5; = p2337*p1073
- p1368: 279
- p3303: 0.000398148; = if(and(p1232=0;p3252<>0);p3259*p3289;0)
- p3385: 0; = p3366*p1234
- p3364: 0; = if(p1232=0;p3244*p3358/p0818;0)
- p1315: 0; = p1311*p1252/p0818
- p3298: 0; = if(p1283+p1284+p1285+p1286=0;0;p1283/(p1283+p1284+p1285+p1286))
- p1211: 0.6
- p2802: 0; = p2411*(p1019+p1021)
- p1627: 0
- p1733: 0
- p4940: 9.55079e-8; = p1767*p3483
- p0907: 0.00295453
- p0933: 622; = p0801*p0927
- p1014: 0.35571; = IF(p1012=0;p0705/100;0)
- p1136: 233981; = if(p1121=0;p1130*(p0716/100)*p0703*1000;0)
- p2882: 0.000459953; = p2296*(p1020+p1022)
- p0079: 2.974
- p3833: 5.84569e-9; = p1896*p3477
- p1836: 0
- p2696: 6.76106e-7; = p2305*(p1078+p1080)
- p1637: 0
- p1124: 0.27764; = if(p1121=0;p0718/100;0)
- p3713: 2.86131e-8; = p1776*p3477
- p2582: 1.28911e-5; = p2386*p1073
- p4208: 1.35869e-8; = p1859*p3479
- p0410: 0; = SQRT(2)*(IF((2*p0278-1)<0;-1;IF((2*p0278-1)>0;1;0))*SQRT(SQRT((2/(pi()*0.140012289)+LN(1-(2*p0278-1)^2)/2)^2-LN(1-(2*p0278-1)^2)/0.140012289)-(2/(pi()*0.140012289)+LN(1-(2*p0278-1)^2)/2)))
- p2066: 0.109412
- p1765: 7.91425e-5; = p1357*1000/p0818
- p3196: 0; = p2415*p1082
- p0271: 11.043
- p4721: 0; = p1754*p3482
- p3219: 0.009757; = p3215*p1228
- p0142: 0
- p1097: 0.0773317
- p0117: 58.307
- p1607: 0
- p0321: 0.5
- p3132: 6.06299e-9; = p2351*p1132
- p1967: 0; = if(p0807=480;p0802*p0810;0)
- p1019: 0.1786; = IF(p1012=0;IF(p1014=1;0;IF(p1014+p1015>1;1-p1014;p1015));0)
- p2610: 0; = p2414*p1073
- p2606: 0; = p2410*p1014
- p1276: 0.0494599; = p1272*p1252/p0818
- p1848: 0
- p1634: 0
- p2721: 1.48281e-7; = p2330*(p1019+p1021)
- p1673: 0
- p0868: 0.00847764; = IF(p0858+p0864+p0865+p0866+p0867=1;0;IF(p0858+p0864+p0865+p0866+p0867+p0863>1;1-(p0858+p0864+p0865+p0866+p0867);p0863))
- p4796: 0; = p1829*p3482
- p3162: 0; = p2381*p1082
- p0182: 1.096
- p0599: 0; = IF(p0335<0.5;-SQRT(p0007*EXP(p0467^2*p0008)-p0007);SQRT(p0007*EXP(p0467^2*p0008)-p0007))
- p3030: 0; = p2249*p1023
- p3111: 0; = p2330*p1023
- p0493: 0; = SQRT(2)*(IF((2*p0361-1)<0;-1;IF((2*p0361-1)>0;1;0))*SQRT(SQRT((2/(pi()*0.140012289)+LN(1-(2*p0361-1)^2)/2)^2-LN(1-(2*p0361-1)^2)/0.140012289)-(2/(pi()*0.140012289)+LN(1-(2*p0361-1)^2)/2)))
- p0448: 0; = SQRT(2)*(IF((2*p0316-1)<0;-1;IF((2*p0316-1)>0;1;0))*SQRT(SQRT((2/(pi()*0.140012289)+LN(1-(2*p0316-1)^2)/2)^2-LN(1-(2*p0316-1)^2)/0.140012289)-(2/(pi()*0.140012289)+LN(1-(2*p0316-1)^2)/2)))
- p4120: 1.79052e-5; = p1771*p3479
- p2847: 0.00105161; = p2261*(p1079+p1081)
- p3381: 0; = p3362*p1234
- p2875: 0.00224848; = p2289*(p1020+p1022)
- p3840: 1.65115e-8; = p1903*p3477
- p0197: 10.105
- p0415: 0; = SQRT(2)*(IF((2*p0283-1)<0;-1;IF((2*p0283-1)>0;1;0))*SQRT(SQRT((2/(pi()*0.140012289)+LN(1-(2*p0283-1)^2)/2)^2-LN(1-(2*p0283-1)^2)/0.140012289)-(2/(pi()*0.140012289)+LN(1-(2*p0283-1)^2)/2)))
- p1304: 0; = p1300*p1252/p0818
- p2058: 1.24412
- p1971: 0.000115448; = p1966*p0001/(p0818*p0002)
- p1048: 0.000519971; = IF(p1012=0;IF(p1037+p1044+p1045+p1046+p1047=1;0;IF(p1037+p1044+p1045+p1046+p1047+p1042>1;1-(p1037+p1044+p1045+p1046+p1047);p1042));0)
- p1920: 0
- p0511: 0; = SQRT(2)*(IF((2*p0379-1)<0;-1;IF((2*p0379-1)>0;1;0))*SQRT(SQRT((2/(pi()*0.140012289)+LN(1-(2*p0379-1)^2)/2)^2-LN(1-(2*p0379-1)^2)/0.140012289)-(2/(pi()*0.140012289)+LN(1-(2*p0379-1)^2)/2)))
- p1252: 1.24868e10; = if(p1232>0;0;p0724*2000*p0723*1000*p0725/100)
- p1829: 1.0905e-5; = p1421*1000/p0818
- p2178: 0.0690604; = (p0895*p0831/(1-p0831))/(p0818)
- p2347: 9.11409e-5; = p2228*p2215
- p1941: 0
- p0507: 0; = SQRT(2)*(IF((2*p0375-1)<0;-1;IF((2*p0375-1)>0;1;0))*SQRT(SQRT((2/(pi()*0.140012289)+LN(1-(2*p0375-1)^2)/2)^2-LN(1-(2*p0375-1)^2)/0.140012289)-(2/(pi()*0.140012289)+LN(1-(2*p0375-1)^2)/2)))
- p3498: 3.10195e-7; = p1767*p3476
- p3029: 0; = p2248*p1023
- p1646: 0
- p0722: 5.741; = p0062*(1+p0590*p0194/100)
- p3158: 0; = p2377*p1082
- p3246: 1; = IF(p3244+p3245=1;0;1-(p3244+p3245))
- p1312: 0.00806; = IF(p1307+p1310+p1311=p1266;0;p1266-(p1307+p1310+p1311))
- p2370: 4.29437e-6; = p2225*p2199
- p2007: 0.0251262; = ((p1981*p1985+p1987*p1991+p1993*p1997+p2001*p2005)/p0818)*p0005*p0002/1000
- p0577: 0; = IF(p0313<0.5;-SQRT(p0007*EXP(p0445^2*p0008)-p0007);SQRT(p0007*EXP(p0445^2*p0008)-p0007))
- p0983: 0; = if(p0886=0;0;min(1;(p0695*p0694*1000*p0697/100)/p0886))
- p2679: 0.00016623; = p2288*(p1019+p1021)
- p0786: 72.29; = p0126*(1+p0654*p0258/100)
- p1302: 0.0348; = IF(p1297+p1300+p1301=p1262;0;p1262-(p1297+p1300+p1301))
- p1165: 0.000118241; = p0801*p0001/(p0818*p0002)
- p2680: 0.00164318; = p2289*(p1019+p1021)
- p0118: 38.659
- p1259: 0.37957; = if(p1232>0;0;p0730/100)
- p2207: 0.004608; = p1119-p2205-p2204-p2206
- p1243: 1.26912e6; = if(p1232>0;0;p1238*(p0725/100)*p0723*1000)
- p1924: 0
- p0940: 0; = if(and(p0683=0;p0946=0);p0934;0)
- p1228: 0.0216442; = IF(p1221=0;0;p0801*p1212*2000/(p1222+p1221*p1225)/p0818)
- p2566: 1.52755e-6; = p2370*p1014
- p1488: 57
- p1918: 0
- p2286: 0.000503634; = p2223*p2192
- p1131: 0.04141; = if(p1121=0;IF(p1123+p1128+p1129+p1130=1;0;IF(p1123+p1128+p1129+p1130+p1127>1;1-(p1123+p1128+p1129+p1130);p1127));0)
- p2203: 0.00221168; = p1070-p2200-p2201-p2202
- p2258: 0.000808644; = p2226*p2204
- p3344: 1.20224e7; = if(and(p1232=0;p3254<>0);p3254-(p3339+p3340+p3341+p3342+p3343);0)
- p2063: 2.01468
- p2150: 4.93259e-8; = p2015*p2078*p2112/(p0818*1000)
- p1722: 0.728757
- p2971: 1.05533e-5; = p2385*(p1079+p1081)
- p2497: 4.48555e-5; = p2301*p1073
- p3741: 1.02556e-10; = p1804*p3477
- p3169: 0; = p2388*p1082
- p3125: 0; = p2344*p1082
- p2039: 3.44767e-7; = p2015*p2037*p2038/(p0818*1000)
- p0320: 0.5
- p0019: 3593.51
- p0860: 0; = p0672*1000/p0856
- p1143: 3.97221e-6; = if(p1121=0;p1137*p0001/(p0818*p0002);0)
- p4857: 0; = p1890*p3482
- p1958: 37648
- p2141: 8.56237e-8; = p2015*p2069*p2103/(p0818*1000)
- p0708: 9.344; = p0048*(1+p0576*p0180/100)
- p2171: 0.172233; = p2165*p0831
- p2725: 1.97003e-6; = p2334*(p1019+p1021)
- p3422: 0; = p3365*p1239
- p3355: 915338; = if(and(p1232=0;p3256<>0);p3256-(p3350+p3351+p3352+p3353+p3354);0)
- p0505: 0; = SQRT(2)*(IF((2*p0373-1)<0;-1;IF((2*p0373-1)>0;1;0))*SQRT(SQRT((2/(pi()*0.140012289)+LN(1-(2*p0373-1)^2)/2)^2-LN(1-(2*p0373-1)^2)/0.140012289)-(2/(pi()*0.140012289)+LN(1-(2*p0373-1)^2)/2)))
- p5063: 5.56122e-9; = p1890*p3483
- p1992: 3900
- p4743: 0; = p1776*p3482
- p1931: 0
- p2338: 6.06802e-5; = p2228*p2206
- p0582: 0; = IF(p0318<0.5;-SQRT(p0007*EXP(p0450^2*p0008)-p0007);SQRT(p0007*EXP(p0450^2*p0008)-p0007))
- p1290: 0; = IF(p1287=p1264;0;IF(p1287+p1288>p1264;p1264-p1287;p1288))
- p0641: 0; = IF(p0377<0.5;-SQRT(p0007*EXP(p0509^2*p0008)-p0007);SQRT(p0007*EXP(p0509^2*p0008)-p0007))
- p2507: 0.000337939; = p2311*p1123
- p3573: 4.71183e-9; = p1842*p3476
- p2074: 0.025
- p2054: 0.91
- p0110: 72.034
- p1127: 0.04141; = if(p1121=0;p0721/100;0)
- p2220: 0.000480292; = p1151/p0818
- p2458: 5.10995e-5; = p2262*p1073
- p0588: 0; = IF(p0324<0.5;-SQRT(p0007*EXP(p0456^2*p0008)-p0007);SQRT(p0007*EXP(p0456^2*p0008)-p0007))
- p1642: 0
- p2016: 0.000272252; = (p2014-p2015)/(p0818)
- p3200: 0; = p2419*p1082
- p0248: 1.803
- p2036: 2.89791e-6; = p2015*p2030*(1-p2032)/(p0818*1000)
- p2300: 0.00172612; = p2227*p2207
- p2297: 0.000709833; = p2227*p2204
- p2951: 0.000255486; = p2365*(p1020+p1022)
- p2376: 0.000153106; = p2229*p2205
- p3055: 2.28223e-9; = p2274*p1132
- p3250: 0.875
- p3043: 0; = p2262*p1082
- p2380: 2.79446e-5; = p2229*p2209
- p1217: 9.53097
- p1887: 0
- p1041: 0.299887
- p1248: 1.18159e-5; = if(p1232>0;0;p1243*p0001/(p0818*p0002))
- p0513: 0; = SQRT(2)*(IF((2*p0381-1)<0;-1;IF((2*p0381-1)>0;1;0))*SQRT(SQRT((2/(pi()*0.140012289)+LN(1-(2*p0381-1)^2)/2)^2-LN(1-(2*p0381-1)^2)/0.140012289)-(2/(pi()*0.140012289)+LN(1-(2*p0381-1)^2)/2)))
- p0943: 0; = if(and(p0683=0;p0949=0);p0937;0)
- p2161: 4.35758e-9; = p2015*p2085*p2123/(p0818*1000)
- p4471: 0; = p1916*p3480
- p1003: 0; = p0999*p0888
- p3062: 0; = p2281*p1023
- p3325: 0.000853147; = if(and(p1232=0;p3255<>0);p3267*p3289;0)
- p0902: 0.0130121
- p2985: 0; = p2399*(p1020+p1022)
- p5113: 1.33227e-7; = p1940*p3483
- p2908: 5.40762e-6; = p2322*(p1020+p1022)
- p2500: 0.00011469; = p2304*p1073
- p3384: 0; = p3365*p1234
- p0506: 0; = SQRT(2)*(IF((2*p0374-1)<0;-1;IF((2*p0374-1)>0;1;0))*SQRT(SQRT((2/(pi()*0.140012289)+LN(1-(2*p0374-1)^2)/2)^2-LN(1-(2*p0374-1)^2)/0.140012289)-(2/(pi()*0.140012289)+LN(1-(2*p0374-1)^2)/2)))
- p0773: 82.779; = p0113*(1+p0641*p0245/100)
- p1560: 0
- p0955: 3.34567e-5; = if(and(p0683>0;or(p0807=56;p0807=100;and(p0807=60;p0901>0.06)));p0937;0)
- p1073: 0.17311; = IF(p1071=0;p0711/100;0)
- p3466: 0; = p3371*p1241
- p1679: 0
- p2431: 0; = p2236*p2221
- p2944: 6.17923e-5; = p2358*(p1020+p1022)
- p1963b: 4.49342e-6; = p1569*p1773+p1570*p1774+p1571*p1775+p1572*p1776+p1573*p1777+p1574*p1778+p1575*p1779+p1576*p1780+p1577*p1781+p1578*p1782+p1579*p1783+p1580*p1784+p1581*p1785+p1582*p1786+p1583*p1787+p1584*p1788+p1585*p1789+p1586*p1790+p1587*p1791
- p1827: 0
- p3126: 0; = p2345*p1082
- p0254: 4.169
- p2998: 0; = p2412*(p1020+p1022)
- p1098: 0.0149443
- p1207: 297.463; = if(p1193>0;0;(p1194*p1050/p1057+p1195*p1051/p1058+p1196*p1052/p1059+p1197*p1053/p1060+p1198*p1054/p1061+p1199*p1055/p1062+p1200*p1056/p1063)/(p0702*1000)+(p1201*p1109/p1114+p1202*p1110/p1115)/(p0702*1000)+p1203*p1170/p0801+p1204*p1176/p0801)
- p4563: 1.08506e-6; = p1802*p3481
- p1900: 0
- p2170: 0.0047322; = p2166*(p0913)
- p0813: 0; = if(p0807=480;1.56521739130435;0)
- p2719: 0.000110406; = p2328*(p1019+p1021)
- p3027: 0; = p2246*p1023
- p2585: 7.74914e-5; = p2389*p1123
- p0844: 0.409944
- p2888: 6.26641e-5; = p2302*(p1079+p1081)
- p2151: 8.19618e-9; = p2015*p2079*p2113/(p0818*1000)
- p1588: 0
- p0593: 0; = IF(p0329<0.5;-SQRT(p0007*EXP(p0461^2*p0008)-p0007);SQRT(p0007*EXP(p0461^2*p0008)-p0007))
- p1911: 0
- p2926: 4.04468e-5; = p2340*(p1079+p1081)
- p3102: 0; = p2321*p1023
- p4419: 0; = p1864*p3480
- p0194: 32.936
- p2529: 1.78981e-5; = p2333*p1014
- p2106: 0.856281
- p2595: 0; = p2399*p1014
- p3124: 0; = p2343*p1082
- p2632: 9.04019e-5; = p2241*(p1019+p1021)
- p2786: 0; = p2395*(p1019+p1021)
- p1686: 0.505026
- p1024: 4.40935e6; = IF(p1012=0;p1014*(p0704/100)*p0703*1000;0)
- p2831: 4.44033e-5; = p2245*(p1020+p1022)
- p2949: 5.57781e-6; = p2363*(p1020+p1022)
- p3312: 0.1394; = if(and(p1232=0;p3253<>0);p3261*p3277*(p3298*p3290+(1-p3298)*p3294);0)
- p2635: 2.83496e-5; = p2244*(p1019+p1021)
- p0650: 0; = IF(p0386<0.5;-SQRT(p0007*EXP(p0518^2*p0008)-p0007);SQRT(p0007*EXP(p0518^2*p0008)-p0007))
- p3724: 1.99984e-8; = p1787*p3477
- p3085: 0; = p2304*p1082
- p3231: 5.33664e-8; = p1176/p0818
- p5112: 8.22093e-9; = p1939*p3483
- p1168: 3.2021e-7; = p1164*p1167/p0818
- p1630: 0
- p0867: 0.0366415; = IF(p0858+p0864+p0865+p0866=1;0;IF(p0858+p0864+p0865+p0866+p0862>1;1-(p0858+p0864+p0865+p0866);p0862))
- p0751: 2.253; = p0091*(1+p0619*p0223/100)
- p3595: 7.06774e-9; = p1864*p3476
- p3407: 0; = p3369*p1238
- p2254: 0.000841933; = p2222*p2200
- p0816: 0
- p3328: 1.14105e7; = if(and(p1232=0;p3255<>0);p3255*(p3265*p3277-p3323)/p3327;0)
- p2040: 1.19
- p0213: 1.802
- p1147: 0.070543
- p2722: 3.26012e-7; = p2331*(p1019+p1021)
- p2750: 6.49923e-6; = p2359*(p1019+p1021)
- p1201: 0.65
- p3182: 0; = p2401*p1023
- p1638: 0.732906
- p1843: 0
- p3919: 1.83397e-6; = p1776*p3478
- p1310: 0; = IF(p1307=p1266;0;IF(p1307+p1308>p1266;p1266-p1307;p1308))
- p4451: 0; = p1896*p3480
- p3171: 7.59928e-9; = p2390*p1132
- p2636: 3.24499e-5; = p2245*(p1019+p1021)
- p0966: 1; = if(p0683=0;0;IF(p0684/100+p0965=1;0;1-(p0684/100+p0965)))
- p2726: 2.25849e-5; = p2335*(p1019+p1021)
- p0590: 0; = IF(p0326<0.5;-SQRT(p0007*EXP(p0458^2*p0008)-p0007);SQRT(p0007*EXP(p0458^2*p0008)-p0007))
- p0218: 49.985
- p2932: 1.29161e-5; = p2346*(p1079+p1081)
- p3080: 0; = p2299*p1082
- p1057: 0.82
- p2599: 0; = p2403*p1014
- p1287: 0
- p2332: 0.000117364; = p2224*p2200
- p3908: 4.98525e-5; = p1765*p3478
- p0691: 0
- p2977: 2.27536e-5; = p2391*(p1129+p1131)
- p0610: 0; = IF(p0346<0.5;-SQRT(p0007*EXP(p0478^2*p0008)-p0007);SQRT(p0007*EXP(p0478^2*p0008)-p0007))
- p2706: 7.15622e-5; = p2315*(p1019+p1021)
- p3139: 0; = p2358*p1023
- p2718: 1.1169e-5; = p2327*(p1019+p1021)
- p2917: 4.46103e-7; = p2331*(p1020+p1022)
- p2098: 0.856281
- p3424: 0; = p3367*p1239
- p0355: 0.5
- p2169: 0.000310783; = p2166*(p0908)
- p3070: 0; = p2289*p1023
- p3267: 0.0170629
- p0148: 0
- p0821: 1.00219
- p2166: 0.311471; = p2165*p0824
- p2790: 0; = p2399*(p1019+p1021)
- p2328: 0.000405844; = p2224*p2196
- p2432: 0.0170007; = p1158
- p4670: 3.31822e-9; = p1909*p3481
- p0839: 0.397127; = p0838/p0818
- p2545: 7.24127e-6; = p2349*p1073
- p0523: 0; = SQRT(2)*(IF((2*p0391-1)<0;-1;IF((2*p0391-1)>0;1;0))*SQRT(SQRT((2/(pi()*0.140012289)+LN(1-(2*p0391-1)^2)/2)^2-LN(1-(2*p0391-1)^2)/0.140012289)-(2/(pi()*0.140012289)+LN(1-(2*p0391-1)^2)/2)))
- p3013: 0; = p2427*(p1079+p1081)
- p3391: 0; = p3372*p1234
- p2053: 1.45647
- p1575: 0
- p3152: 0; = p2371*p1023
- p0220: 6.654
- p3479: 0.216999; = if(p1328+p1330+p1332+p1334+p1336+p1338+p1340+p1342+p1344=0;0;p1334/(p1328+p1330+p1332+p1334+p1336+p1338+p1340+p1342+p1344))
- p0595: 0; = IF(p0331<0.5;-SQRT(p0007*EXP(p0463^2*p0008)-p0007);SQRT(p0007*EXP(p0463^2*p0008)-p0007))
- p0760: 0
- p2565: 6.94782e-7; = p2369*p1014
- p3318: 1.95136e7; = if(and(p1232=0;p3253<>0);p3253*(p3262-p3313)/p3316;0)
- p1256: 0; = if(p1232>0;0;IF(p1253=1;0;IF(p1253+p1254>1;1-p1253;p1254)))
- p2415: 0; = p2235*p2205
- p5131: 0; = p1962*p3483
- p2154: 6.24255e-8; = p2015*p2082*p2116/(p0818*1000)
- p1151: 4.6025e7; = if(p1121=0;p1149*p1148*p1145;0)
- p0589: 0; = IF(p0325<0.5;-SQRT(p0007*EXP(p0457^2*p0008)-p0007);SQRT(p0007*EXP(p0457^2*p0008)-p0007))
- p0015: 107.666
- p0234: 18.812
- p2677: 0.000137009; = p2286*(p1019+p1021)
- p0447: 0; = SQRT(2)*(IF((2*p0315-1)<0;-1;IF((2*p0315-1)>0;1;0))*SQRT(SQRT((2/(pi()*0.140012289)+LN(1-(2*p0315-1)^2)/2)^2-LN(1-(2*p0315-1)^2)/0.140012289)-(2/(pi()*0.140012289)+LN(1-(2*p0315-1)^2)/2)))
- p2122: 0.341195
- p2177: 0.0642478; = p0895/p0818-(p2173+p2174+p2175+p2176)
- p2129: 6.06802e-7; = p2015*p2057*p2091/(p0818*1000)
- p2591: 0; = p2395*p1014
- p0719: 51.453; = p0059*(1+p0587*p0191/100)
- p0946: 0; = if(and(p0683=0;or(p0807=480;p0807=32;p0807=1;and(p0807=60;p0901<0.03)));p0934;0)
- p3063: 0; = p2282*p1023
- p2697: 7.06993e-6; = p2306*(p1078+p1080)
- p0797: 59.661; = p0137*(1+p0665*p0269/100)
- p0949: 0; = if(and(p0683=0;or(p0807=480;p0807=32;p0807=1;and(p0807=60;p0901<0.03)));p0937;0)
- p0054: 2.071
- p1336: 0; = p1323*p0801
- p1834: 0
- p1862: 0
- p0619: 0; = IF(p0355<0.5;-SQRT(p0007*EXP(p0487^2*p0008)-p0007);SQRT(p0007*EXP(p0487^2*p0008)-p0007))
- p1598: 0.392863
- p2280: 0.000689438; = p2223*p2186
- p2921: 3.09043e-5; = p2335*(p1020+p1022)
- p1576: 0.47191
- p1110: 6.62863e7; = IF(p1071=0;p1105*p1104*p1095;0)
- p0845: 0.5
- p3292: 0.258
- p0337: 0.5
- p0521: 0; = SQRT(2)*(IF((2*p0389-1)<0;-1;IF((2*p0389-1)>0;1;0))*SQRT(SQRT((2/(pi()*0.140012289)+LN(1-(2*p0389-1)^2)/2)^2-LN(1-(2*p0389-1)^2)/0.140012289)-(2/(pi()*0.140012289)+LN(1-(2*p0389-1)^2)/2)))
- p2239: 3.97172e-5; = p2222*p2184
- p2957: 0.000156555; = p2371*(p1020+p1022)
- p2885: 0.000111179; = p2299*(p1079+p1081)
- p3484: 0.0236432; = IF(p1344=0;0;p1344/(p1328+p1330+p1332+p1334+p1336+p1338+p1340+p1342+p1344))
- p3535: 7.85305e-10; = p1804*p3476
- p0754: 2198.63; = p0094*(1+p0622*p0226/100)
- p0048: 9.344
- p0795: 131.53; = p0135*(1+p0663*p0267/100)
- p1883: 0
- p0346: 0.5
- p0883: 0.00114284; = p0882*p0001*p0003/(p0818*p0002)
- p1230: 0.5
- p2623: 0; = p2427*p1073
- p0678: 4672.12; = p0018*(1+p0546*p0150/100)
- p2413: 0; = p2234*p2203
- p2762: 0.00011441; = p2371*(p1019+p1021)
- p2482: 0.000179148; = p2286*p1014
- p3240: 1.84841e-9; = p3234*p1188*p3235/p0818
- p4157: 3.0661e-6; = p1808*p3479
- p4826: 0; = p1859*p3482
- p2846: 0.000126655; = p2260*(p1079+p1081)
- p2544: 8.07955e-7; = p2348*p1073
- p2428: 0; = p2236*p2218
- p2731: 2.20919e-5; = p2340*(p1078+p1080)
- p3310: 2.6463e8; = if(and(p1232=0;p3252<>0);IF((p3306+p3307+p3308+p3309)+(p3252*(p3257*(1-p3277))/p3305)>p3252;p3252-(p3306+p3307+p3308+p3309);p3252*(p3257*(1-p3277))/p3305);0)
- p4554: 1.7852e-7; = p1793*p3481
- p1708: 0
- p1823: 0
- p0957: 5.79101e-9; = if(and(p0683>0;or(p0807=56;p0807=100;and(p0807=60;p0901>0.06)));p0939;0)
- p2856: 9.74185e-6; = p2270*(p1079+p1081)
- p2160: 3.52772e-8; = p2015*p2084*p2122/(p0818*1000)
- p1981: 400
- p0683: 27868; = p0023*(1+p0551*p0155/100)
- p3153: 0; = p2372*p1023
- p1286: 0.0225584; = p1282*p1252/p0818
- p1657: 0
- p2499: 8.75806e-6; = p2303*p1073
- p0059: 51.453
- p2412: 0; = p2234*p2202
- p2264: 5.7635e-5; = p2226*p2210
- p4514: 0; = p1963*p3480
- p1825: 0
- p2913: 1.52833e-5; = p2327*(p1020+p1022)
- p2326: 0.000191529; = p2224*p2193
- p1736: 0.641
- p0411: 0; = SQRT(2)*(IF((2*p0279-1)<0;-1;IF((2*p0279-1)>0;1;0))*SQRT(SQRT((2/(pi()*0.140012289)+LN(1-(2*p0279-1)^2)/2)^2-LN(1-(2*p0279-1)^2)/0.140012289)-(2/(pi()*0.140012289)+LN(1-(2*p0279-1)^2)/2)))
- p0750: 0
- p2031: 0.465411
- p3260: 0.0343561
- p0113: 82.779
- p0463: 0; = SQRT(2)*(IF((2*p0331-1)<0;-1;IF((2*p0331-1)>0;1;0))*SQRT(SQRT((2/(pi()*0.140012289)+LN(1-(2*p0331-1)^2)/2)^2-LN(1-(2*p0331-1)^2)/0.140012289)-(2/(pi()*0.140012289)+LN(1-(2*p0331-1)^2)/2)))
- p0119: 38.752
- p1185: 0.5
- p3345: 0.160606; = if(and(p1232=0;p3256<>0);p3273*p3277*p3293;0)
- p0730: 37.957; = p0070*(1+p0598*p0202/100)
- p3444: 0; = p3368*p1240
- p2144: 5.64929e-8; = p2015*p2072*p2106/(p0818*1000)
- p1396: 1
- p1899: 0
- p2120: 0.51828
- p0126: 72.29
- p1095: 6.27203e8; = IF(p1071=0;p0797*p0702*1000*p0798/100;0)
- p0774: 65.857; = p0114*(1+p0642*p0246/100)
- p0918: 0.164647; = p0680*1000/p0801
- p2035: 1.30812e-6; = p2015*p2029*(1-p2031)/(p0818*1000)
- p2940: 0.000350901; = p2354*(p1020+p1022)
- p3239: 0.013074; = IF(p3238+p3235+p3236=1;0;1-(p3238+p3235+p3236))
- p2941: 7.7027e-5; = p2355*(p1020+p1022)
- p1907: 0
- p0210: 0
- p2331: 1.1984e-6; = p2224*p2199
- p2896: 7.66422e-5; = p2310*(p1079+p1081)
- p1761: 0
- p3801: 9.23003e-10; = p1864*p3477
- p0645: 0; = IF(p0381<0.5;-SQRT(p0007*EXP(p0513^2*p0008)-p0007);SQRT(p0007*EXP(p0513^2*p0008)-p0007))
- p1955: 0
- p2843: 0.000221698; = p2257*(p1020+p1022)
- p2038: 0.304457
- p2273: 0.00423751; = p2230*p2219
- p2560: 4.31336e-5; = p2364*p1014
- p4590: 2.31169e-7; = p1829*p3481
- p0328: 0.5
- p0531: 0; = SQRT(2)*(IF((2*p0399-1)<0;-1;IF((2*p0399-1)>0;1;0))*SQRT(SQRT((2/(pi()*0.140012289)+LN(1-(2*p0399-1)^2)/2)^2-LN(1-(2*p0399-1)^2)/0.140012289)-(2/(pi()*0.140012289)+LN(1-(2*p0399-1)^2)/2)))
- p2205: 0.00171384; = 2*14.0067*p2204/30.973762
- p1113: 0.100377
- p3113: 0; = p2332*p1023
- p1200: 0.84
- p3066: 0; = p2285*p1023
- p2989: 0; = p2403*(p1020+p1022)
- p2575: 1.06974e-5; = p2379*p1073
- p0842: -0.445511
- p0784: 68.909; = p0124*(1+p0652*p0256/100)
- p3094: 1.78487e-9; = p2313*p1132
- p0082: 96.246
- p0154: 0
- p0258: 27.018
- p1968: 0; = if(p0807=480;p0802*p0811;0)
- p2083: 2.17294
- p1975: 0.000118241; = p1970*p0001/(p0818*p0002)
- p0056: 81.127
- p1273: 0; = p1267*p1252/p0818
- p0370: 0.5
- p0211: 1.651
- p3154: 0; = p2373*p1023
- p4747: 0; = p1780*p3482
- p0141: 58.0468
- p2876: 1.83986e-6; = p2290*(p1020+p1022)
- p1672: 0
- p0312: 0.5
- p2381: 1.20656e-5; = p2229*p2210
- p2973: 2.0394e-6; = p2387*(p1079+p1081)
- p1246: 4604.21; = if(p1232>0;0;p1241*(p0725/100)*p0723*1000)
- p4548: 4.31368e-8; = p1787*p3481
- p3203: 0; = p2422*p1082
- p2720: 9.03416e-8; = p2329*(p1019+p1021)
- p3170: 5.39258e-9; = p2389*p1132
- p0022: 12699.4
- p0514: 0; = SQRT(2)*(IF((2*p0382-1)<0;-1;IF((2*p0382-1)>0;1;0))*SQRT(SQRT((2/(pi()*0.140012289)+LN(1-(2*p0382-1)^2)/2)^2-LN(1-(2*p0382-1)^2)/0.140012289)-(2/(pi()*0.140012289)+LN(1-(2*p0382-1)^2)/2)))
- p0512: 0; = SQRT(2)*(IF((2*p0380-1)<0;-1;IF((2*p0380-1)>0;1;0))*SQRT(SQRT((2/(pi()*0.140012289)+LN(1-(2*p0380-1)^2)/2)^2-LN(1-(2*p0380-1)^2)/0.140012289)-(2/(pi()*0.140012289)+LN(1-(2*p0380-1)^2)/2)))
- p2439: 0.000217636; = p2243*p1014
- p3669: 7.06774e-9; = p1938*p3476
- p3173: 7.11223e-10; = p2392*p1132
- p2589: 0; = p2393*p1014
- p2085: 0.0335294
- p4322: 0; = p1767*p3480
- p4769: 0; = p1802*p3482
- p0781: 9.141; = p0121*(1+p0649*p0253/100)
- p2354: 0.000942648; = p2225*p2182
- p2662: 4.76889e-5; = p2271*(p1078+p1080)
- p0261: 18.996
- p1181: 0.000110755
- p3193: 0; = p2412*p1023
- p2269: 0.000355719; = p2226*p2215
- p1959: 36375.4; = if(p0738*p0740*p0739>0;p0738*1000*(p0740/100)*p0739/1000;p1958)
- p3287: 0.745
- p0047: 11.991
- p0503: 0; = SQRT(2)*(IF((2*p0371-1)<0;-1;IF((2*p0371-1)>0;1;0))*SQRT(SQRT((2/(pi()*0.140012289)+LN(1-(2*p0371-1)^2)/2)^2-LN(1-(2*p0371-1)^2)/0.140012289)-(2/(pi()*0.140012289)+LN(1-(2*p0371-1)^2)/2)))
- p2501: 4.00687e-7; = p2305*p1073
- p0137: 59.661
- p0147: 0
- p1571: 0
- p1747: 0
- p3075: 0; = p2294*p1023
- p0017: 103.21
- p0637: 0; = IF(p0373<0.5;-SQRT(p0007*EXP(p0505^2*p0008)-p0007);SQRT(p0007*EXP(p0505^2*p0008)-p0007))
- p2764: 7.05946e-6; = p2373*(p1019+p1021)
- p2090: 0.40001
- p0315: 0.5
- p1223: 0.56
- p3586: 6.98921e-8; = p1855*p3476
- p3413: 0.000774214; = p3375*p1238
- p2784: 0; = p2393*(p1019+p1021)
- p1737: 0
- p2215: 0.00083358; = p1117-p2214
- p1651: 0.299611
- p1116: 7.07929e-5; = IF(p1071=0;p1106/(p1111*p0818);0)
- p3582: 1.23293e-7; = p1851*p3476
- p2356: 1.98396e-5; = p2225*p2184
- p0516: 0; = SQRT(2)*(IF((2*p0384-1)<0;-1;IF((2*p0384-1)>0;1;0))*SQRT(SQRT((2/(pi()*0.140012289)+LN(1-(2*p0384-1)^2)/2)^2-LN(1-(2*p0384-1)^2)/0.140012289)-(2/(pi()*0.140012289)+LN(1-(2*p0384-1)^2)/2)))
- p1558: 0
- p1260: 0.17312; = if(p1232>0;0;p0731/100)
- p0608: 0; = IF(p0344<0.5;-SQRT(p0007*EXP(p0476^2*p0008)-p0007);SQRT(p0007*EXP(p0476^2*p0008)-p0007))
- p2186: 0.00123407; = p1052/p0818
- p1300: 0; = IF(p1297=p1265;0;IF(p1297+p1298>p1265;p1265-p1297;p1298))
- p2479: 7.69062e-5; = p2283*p1014
- p2010: 0.00188446; = ((p1984*p1985+p1990*p1991+p1996*p1997+p2004*p2005)/p0818)*p0005*p0002/1000
- p2993: 0; = p2407*(p1020+p1022)
- p2021: 1.27625e-5; = p2020/p0818
- p1572: 0.0125
- p0663: 0; = IF(p0399<0.5;-SQRT(p0007*EXP(p0531^2*p0008)-p0007);SQRT(p0007*EXP(p0531^2*p0008)-p0007))
- p2877: 3.01983e-6; = p2291*(p1020+p1022)
- p0819: 0.0939191; = p0808*p0809/p0818
- p3436: 2.41881e-5; = p3379*p1239
- p3245: 0; = IF(p3244=1;0;if(p3244+p0792/100>1;1-p3244;p0792/100))
- p0846: 0.447012; = p0841*p0845^3+p0842*p0845^2+p0843*p0845+p0844
- p1622: 0
- p3296: 0.514
- p3249: 0
- p2963: 2.65146e-5; = p2377*(p1079+p1081)
- p0682: 12699.4; = p0022*(1+p0550*p0154/100)
- p1963f: 1.74455e-6; = p1647*p1851+p1648*p1852+p1649*p1853+p1650*p1854+p1651*p1855+p1652*p1856+p1653*p1857+p1654*p1858+p1655*p1859+p1656*p1860+p1657*p1861+p1658*p1862+p1659*p1863+p1660*p1864+p1661*p1865+p1662*p1866+p1663*p1867+p1664*p1868+p1665*p1869+p1666*p1870
- p2181: 0.114068; = p0887+p0889+p0893+p2180
- p3054: 4.23751e-8; = p2273*p1132
- p3176: 0; = p2395*p1023
- p1754: 5.43687e-6; = p1346*1000/p0818
- p1187: 0.000298194
- p0938: 9.60917e-7; = p0932*p0001/(p0818*p0002)
- p1616: 0
- p3425: 0; = p3368*p1239
- p0671: 9670.58; = p0011*(1+p0539*p0143/100)
- p2548: 4.69237e-6; = p2352*p1123
- p5082: 3.62688e-9; = p1909*p3483
- p0469: 0; = SQRT(2)*(IF((2*p0337-1)<0;-1;IF((2*p0337-1)>0;1;0))*SQRT(SQRT((2/(pi()*0.140012289)+LN(1-(2*p0337-1)^2)/2)^2-LN(1-(2*p0337-1)^2)/0.140012289)-(2/(pi()*0.140012289)+LN(1-(2*p0337-1)^2)/2)))
- p0018: 4672.12
- p0632: 0; = IF(p0368<0.5;-SQRT(p0007*EXP(p0500^2*p0008)-p0007);SQRT(p0007*EXP(p0500^2*p0008)-p0007))
- p3421: 0; = p3364*p1239
- p1617: 0
- p3756: 1.10145e-7; = p1819*p3477
- p0848: 0.158241
- p3140: 0; = p2359*p1023
- p1269: 0
- p2298: 0.00064199; = p2227*p2205
- p1172: 4.78497e-8; = p1170/p0818
- p1133: 1.48054e6; = if(p1121=0;p1123*(p0716/100)*p0703*1000;0)
- p0068: 3.386
- p2345: 7.06466e-6; = p2228*p2213
- p3107: 0; = p2326*p1023
- p1886: 0
- p0647: 0; = IF(p0383<0.5;-SQRT(p0007*EXP(p0515^2*p0008)-p0007);SQRT(p0007*EXP(p0515^2*p0008)-p0007))
- p0639: 0; = IF(p0375<0.5;-SQRT(p0007*EXP(p0507^2*p0008)-p0007);SQRT(p0007*EXP(p0507^2*p0008)-p0007))
- p2404: 0; = p2234*p2193
- p3394: 0.000243148; = p3375*p1234
- p1986: 4200
- p2620: 0; = p2424*p1073
- p0613: 0; = IF(p0349<0.5;-SQRT(p0007*EXP(p0481^2*p0008)-p0007);SQRT(p0007*EXP(p0481^2*p0008)-p0007))
- p0345: 0.5
- p2702: 0.000706332; = p2311*(p1128+p1130)
- p2143: 6.60324e-8; = p2015*p2071*p2105/(p0818*1000)
- p1275: 0; = p1271*p1252/p0818
- p1963d: 1.08335e-5; = p1608*p1812+p1609*p1813+p1610*p1814+p1611*p1815+p1612*p1816+p1613*p1817+p1614*p1818+p1615*p1819+p1616*p1820+p1617*p1821+p1618*p1822+p1619*p1823+p1620*p1824+p1621*p1825+p1622*p1826+p1623*p1827+p1624*p1828+p1625*p1829+p1626*p1830+p1627*p1831
- p1644: 0
- p3044: 0; = p2263*p1082
- p2593: 0; = p2397*p1014
- p2893: 4.42511e-5; = p2307*(p1079+p1081)
- p3930: 1.28181e-6; = p1787*p3478
- p0096: 4.131
- p2801: 0; = p2410*(p1019+p1021)
- p3326: 0.0011624; = if(and(p1232=0;p3255<>0);p3268*p3289;0)
- p4493: 0; = p1938*p3480
- p1265: 0.0348; = if(p1232>0;0;IF(p1259+p1263+p1264=1;0;IF(p1259+p1263+p1264+p1262>1;1-(p1259+p1263+p1264);p1262)))
- p0490: 0; = SQRT(2)*(IF((2*p0358-1)<0;-1;IF((2*p0358-1)>0;1;0))*SQRT(SQRT((2/(pi()*0.140012289)+LN(1-(2*p0358-1)^2)/2)^2-LN(1-(2*p0358-1)^2)/0.140012289)-(2/(pi()*0.140012289)+LN(1-(2*p0358-1)^2)/2)))
- p5338: 5.08323e-6; = p1963*p3484
- p1268: 0
- p3233: 0.60394
- p3251: 1.09259e10; = p1252-(p3252+p3253+p3254+p3255+p3256)
- p0262: 52.1
- p2627: 0; = p2431*p1123
- p2067: 0.446471
- p3627: 4.47624e-8; = p1896*p3476
- p1194: 1.48
- p3167: 0; = p2386*p1082
- p1661: 0
- p3441: 0; = p3365*p1240
- p2812: 0; = p2421*(p1078+p1080)
- p2044: 2.1936e-8; = p2015*p2042*p2043/(p0818*1000)
- p2163: 0.000179005; = (p2017-p2020)/p0818-(p2025+p2028+p2033+p2034+p2051+p2125+p2126+p2127+p2128+p2129+p2130+p2131+p2132+p2133+p2134+p2135+p2136+p2137+p2138+p2139+p2140+p2141+p2142+p2143+p2144+p2145+p2146+p2147+p2148+p2149+p2150+p2151+p2152+p2153+p2154+p2155+p2156+p2157)
- p0474: 0; = SQRT(2)*(IF((2*p0342-1)<0;-1;IF((2*p0342-1)>0;1;0))*SQRT(SQRT((2/(pi()*0.140012289)+LN(1-(2*p0342-1)^2)/2)^2-LN(1-(2*p0342-1)^2)/0.140012289)-(2/(pi()*0.140012289)+LN(1-(2*p0342-1)^2)/2)))
- p0631: 0; = IF(p0367<0.5;-SQRT(p0007*EXP(p0499^2*p0008)-p0007);SQRT(p0007*EXP(p0499^2*p0008)-p0007))
- p4191: 1.35869e-8; = p1842*p3479
- p2505: 2.76809e-6; = p2309*p1073
- p0638: 0; = IF(p0374<0.5;-SQRT(p0007*EXP(p0506^2*p0008)-p0007);SQRT(p0007*EXP(p0506^2*p0008)-p0007))
- p1082: 0; = IF(p1071=0;IF(p1073+p1078+p1079+p1080+p1081=1;0;1-(p1073+p1078+p1079+p1080+p1081));0)
- p0350: 0.5
- p2676: 1.693e-5; = p2285*(p1019+p1021)
- p1853: 0
- p2752: 1.41613e-5; = p2361*(p1019+p1021)
- p3863: 2.05112e-10; = p1926*p3477
- p1224: 0.44; = IF(p1221=0;0;IF(p1193=0;1-p1223;0))
- p2937: 0.000337066; = p2351*(p1129+p1131)
- p2914: 0.000151076; = p2328*(p1020+p1022)
- p2117: 0.585147
- p0481: 0; = SQRT(2)*(IF((2*p0349-1)<0;-1;IF((2*p0349-1)>0;1;0))*SQRT(SQRT((2/(pi()*0.140012289)+LN(1-(2*p0349-1)^2)/2)^2-LN(1-(2*p0349-1)^2)/0.140012289)-(2/(pi()*0.140012289)+LN(1-(2*p0349-1)^2)/2)))
- p1893: 0
- p0228: 121.746
- p1855: 9.28755e-7; = p1447*1000/p0818
- p2008: 0.0471115; = ((p1982*p1985+p1988*p1991+p1994*p1997+p2002*p2005)/p0818)*p0005*p0002/1000
- p1283: 0; = p1277*p1252/p0818
- p1860: 0
- p0578: 0; = IF(p0314<0.5;-SQRT(p0007*EXP(p0446^2*p0008)-p0007);SQRT(p0007*EXP(p0446^2*p0008)-p0007))
- p0998: 0; = if(p0888=0;0;if((p0699*p0698*1000*p0700/100)/p0888>1;1;(p0699*p0698*1000*p0700/100)/p0888))
- p2214: 0.000220893; = p1107/p0818
- p4528: 8.73797e-8; = p1767*p3481
- p2378: 0.000411655; = p2229*p2207
- p2425: 0; = p2235*p2215
- p3241: 2.20657e-10; = p3234*p1188*p3236/p0818
- p1196: 0.59
- p0855: 0.526641; = p0854*p0001*p0003/(p0818*p0002)
- p2965: 3.30476e-5; = p2379*(p1079+p1081)
- p1720: 0
- p3853: 1.12812e-9; = p1916*p3477
- p2474: 2.93106e-5; = p2278*p1014
- p0747: 0.785; = p0087*(1+p0615*p0219/100)
- p3472: 2.35526e-6; = p3377*p1241
- p0980: 0; = IF(p0977=0;0;p0977*p0001/(p0818*p0002))
- p2096: 0.486404
- p1212: 0.0905784; = if(p1211=0;0;if(p1193>0;0;(p1207+p1208+p1209)*p1210/(2000*p1211)))
- p2923: 0.000100212; = p2337*(p1079+p1081)
- p5150: 1.95088e-6; = p1771*p3484
- p0738: 12699.4; = p0078*(1+p0606*p0210/100)
- p2854: 5.0411e-5; = p2268*(p1079+p1081)
- p3086: 0; = p2305*p1082
- p1190: 3.95197e-8; = p1188/p0818
- p3368: 0; = if(p1232=0;p3245*p3356/p0818;0)
- p4052: 9.86006e-8; = p1909*p3478
- p2138: 3.80175e-8; = p2015*p2066*p2100/(p0818*1000)
- p4732: 0; = p1765*p3482
- p3123: 0; = p2342*p1082
- p3796: 6.15335e-10; = p1859*p3477
- p0049: 25.234
- p2367: 0.00145431; = p2225*p2196
- p2014: 7.32695e7; = p0833*p2011*p2013
- p2242: 4.78271e-5; = p2222*p2187
- p3095: 3.10163e-9; = p2314*p1132
- p2302: 0.000117175; = p2227*p2209
- p3962: 7.05981e-6; = p1819*p3478
- p2441: 4.24303e-5; = p2245*p1014
- p1713: 0
- p0658: 0; = IF(p0394<0.5;-SQRT(p0007*EXP(p0526^2*p0008)-p0007);SQRT(p0007*EXP(p0526^2*p0008)-p0007))
- p2268: 9.42631e-5; = p2226*p2214
- p2282: 0.00126936; = p2223*p2188
- p2253: 8.59695e-6; = p2222*p2199
- p2015: 4.71803e7; = p0830*p2011*p2013
- p0975: 0.00114899; = p0973*p0974/p0818
- p0185: 12.764
- p0240: 7.584
- p1235: 0.73321; = if(p1232>0;0;p0727/100)
- p3284: 0.275
- p2942: 7.3853e-6; = p2356*(p1020+p1022)
- p0734: 0.639; = p0074*(1+p0602*p0206/100)
- p3010: 0; = p2424*(p1079+p1081)
- p1589: 0.897233
- p0694: 0
- p0790: 8.992; = p0130*(1+p0658*p0262/100)
- p2732: 9.99021e-6; = p2341*(p1078+p1080)
- p2694: 1.47781e-5; = p2303*(p1078+p1080)
- p1895: 0
- p1774: 0
- p0953: 4.34989e-5; = if(and(p0683>0;or(p0807=56;p0807=100;and(p0807=60;p0901>0.06)));p0935;0)
- p2804: 0; = p2413*(p1019+p1021)
- p3073: 0; = p2292*p1023
- p2675: 6.7323e-5; = p2284*(p1019+p1021)
- p2523: 1.46042e-5; = p2327*p1014
- p1086: 217720; = IF(p1071=0;p1080*(p0710/100)*p0703*1000;0)
- p3415: 0.000649209; = p3377*p1238
- p2278: 8.24004e-5; = p2223*p2184
- p2530: 2.57594e-6; = p2334*p1014
- p2393: 0; = p2234*p2182
- p0914: 9.76798e8; = p0825*p0911+p0827*p0912+(p0830+p0895)*p0824*p0913
- p4374: 0; = p1819*p3480
- p0700: 0
- p2991: 0; = p2405*(p1020+p1022)
- p4464: 0; = p1909*p3480
- p1933: 0
- p2650: 0.000213629; = p2259*(p1078+p1080)
- p0149: 0
- p1797: 0
- p2046: 10
- p2584: 5.91657e-6; = p2388*p1073
- p2049: 25.6942
- p4406: 0; = p1851*p3480
- p4103: 1.17979e-6; = p1754*p3479
- p2026: 53.05
- p0956: 9.60917e-7; = if(and(p0683>0;or(p0807=56;p0807=100;and(p0807=60;p0901>0.06)));p0938;0)
- p2471: 5.69903e-5; = p2275*p1123
- p1856: 0
- p2536: 1.30925e-5; = p2340*p1073
- p2456: 4.0998e-5; = p2260*p1073
- p1745: 0
- p2969: 2.95209e-7; = p2383*(p1079+p1081)
- p2506: 2.48089e-5; = p2310*p1073
- p2244: 0.000104211; = p2222*p2189
- p1076: 0.02071; = IF(p1071=0;p0714/100;0)
- p1443: 157
- p2835: 0.000109638; = p2249*(p1020+p1022)
- p4905: 0; = p1938*p3482
- p4238: 2.23685e-5; = p1889*p3479
- p3352: 314194; = if(and(p1232=0;p3256<>0);p3256*(p3275-p3347)/p3349;0)
- p1808: 1.41296e-5; = p1400*1000/p0818
- p1090: 2.65629e-5; = IF(p1071=0;p1084*p0001/(p0818*p0002);0)
- p3456: 0; = p3380*p1240
- p0571: 0; = IF(p0307<0.5;-SQRT(p0007*EXP(p0439^2*p0008)-p0007);SQRT(p0007*EXP(p0439^2*p0008)-p0007))
- p1625: 0.535927
- p0057: 14.37
- p4876: 0; = p1909*p3482
- p3689: 0; = p1962*p3476
- p2865: 0.000105653; = p2279*(p1020+p1022)
- p1482: 23
- p2105: 0.888194
- p3003: 0; = p2417*(p1079+p1081)
- p0909: 3.41005e8; = p0825*p0906+p0827*p0907+(p0830+p0895)*p0824*p0908
- p2060: 0.272353
- p0399: 0.5
- p1254: 0; = if(p1232>0;0;p0736/100)
- p0468: 0; = SQRT(2)*(IF((2*p0336-1)<0;-1;IF((2*p0336-1)>0;1;0))*SQRT(SQRT((2/(pi()*0.140012289)+LN(1-(2*p0336-1)^2)/2)^2-LN(1-(2*p0336-1)^2)/0.140012289)-(2/(pi()*0.140012289)+LN(1-(2*p0336-1)^2)/2)))
- p0006: 15
- p1930: 0
- p1004: 0; = p1000*p0888
- p1267: 0
- p0960: 0; = if(and(p0683>0;or(p0807=480;p0807=32;p0807=1;and(p0807=60;p0901<0.03)));p0936;0)
- p2142: 1.13453e-7; = p2015*p2070*p2104/(p0818*1000)
- p2899: 9.9228e-5; = p2313*(p1129+p1131)
- p3168: 0; = p2387*p1082
- p3191: 0; = p2410*p1023
- p1758: 0
- p0607: 0; = IF(p0343<0.5;-SQRT(p0007*EXP(p0475^2*p0008)-p0007);SQRT(p0007*EXP(p0475^2*p0008)-p0007))
- p1939: 3.54805e-7; = p1531*1000/p0818
- p3443: 0; = p3367*p1240
- p0325: 0.5
- p1791: 0
- p0073: 3.48
- p2125: 6.14031e-7; = p2015*p2053*p2087/(p0818*1000)
- p2422: 0; = p2235*p2212
- p4083: 3.62193e-6; = p1940*p3478
- p0705: 35.571; = p0045*(1+p0573*p0177/100)
- p5028: 2.15195e-8; = p1855*p3483
- p2093: 0.260958
- p1009: 0; = p1005*p0001*p0004/(p0818*p0002)
- p1199: -0.29
- p4348: 0; = p1793*p3480
- p4657: 1.26092e-8; = p1896*p3481
- p4114: 1.71738e-5; = p1765*p3479
- p3910: 2.59648e-6; = p1767*p3478
- p0334: 0.5
- p2902: 2.14953e-5; = p2316*(p1020+p1022)
- p0817: 0
- p0989: 0; = p0985*p0886
- p2714: 4.52345e-6; = p2323*(p1019+p1021)
- p3274: 0.0768939
- p2467: 2.82623e-5; = p2271*p1073
- p2047: 1.47704e-14; = p2015*p2045/(p0818*1000000000000)
- p2276: 0.00391512; = p2223*p2182
- p3026: 0; = p2245*p1023
- p1262: 0.0348; = if(p1232>0;0;p0733/100)
- p1819: 1.12077e-5; = p1411*1000/p0818
- p1770: 0
- p2130: 3.34011e-7; = p2015*p2058*p2092/(p0818*1000)
- p1714: 0
- p2037: 2.3
- p1863: 0
- p2420: 0; = p2235*p2210
- p1861: 0
- p1851: 1.63837e-6; = p1443*1000/p0818
- p0199: 4.692
- p0999: 0; = IF(p0996=1;0;IF(p0996+p0997>1;1-p0996;p0997))
- p4287: 2.03803e-8; = p1938*p3479
- p3050: 0; = p2269*p1082
- p2992: 0; = p2406*(p1020+p1022)
- p2217: 0.000382584; = p1118-p2216
- p0438: 0; = SQRT(2)*(IF((2*p0306-1)<0;-1;IF((2*p0306-1)>0;1;0))*SQRT(SQRT((2/(pi()*0.140012289)+LN(1-(2*p0306-1)^2)/2)^2-LN(1-(2*p0306-1)^2)/0.140012289)-(2/(pi()*0.140012289)+LN(1-(2*p0306-1)^2)/2)))
- p2224: 0.0375372; = if(p0765*p0769+p0766*p0770+p0767*p0771+p0768*p0772=0;0;p0771*p0767/(p0765*p0769+p0766*p0770+p0767*p0771+p0768*p0772))
- p1762: 0
- p2496: 0.000298808; = p2300*p1073
- p1279: 0
- p0899: 5.84368e10; = p0825*p0896+p0827*p0897+(p0830+p0895)*p0824*p0898
- p3431: 0.000197355; = p3374*p1239
- p2025: 8.25691e-7; = p2015*p2023*p2024/(p0818*1000)
- p0311: 0.5
- p0807: 56
- p3285: 0.275
- p4359: 0; = p1804*p3480
- p3461: 0; = p3366*p1241
- p0859: 0.761463; = p0671*1000/p0856
- p4288: 7.69923e-8; = p1939*p3479
- p1025: 2.21391e6; = IF(p1012=0;p1019*(p0704/100)*p0703*1000;0)
- p1731: 0
- p1434: 6
- p1257: 0; = if(p1232>0;0;IF(p1253+p1256=1;0;IF(p1253+p1256+p1255>1;1-(p1253+p1256);p1255)))
- p2382: 0.000158004; = p2229*p2211
- p0942: 0; = if(and(p0683=0;p0948=0);p0936;0)
- p2878: 6.63941e-6; = p2292*(p1020+p1022)
- p1005: 0; = p1001*p0888
- p2999: 0; = p2413*(p1020+p1022)
- p1027: 1.15827e6; = IF(p1012=0;p1021*(p0704/100)*p0703*1000;0)
- p1552: 0
- p2108: 0.826583
- p2433: 0.000671259; = p2237*p1014
- p2470: 3.27957e-5; = p2274*p1123
- p2416: 0; = p2235*p2206
- p3475: 0.000303285; = p3380*p1241
- p1094: 0; = IF(p1071=0;p1088*p0001/(p0818*p0002);0)
- p3235: 0.118093
- p1916: 1.1479e-7; = p1508*1000/p0818
- p4699: 1.99093e-9; = p1938*p3481
- p2938: 1.81536e-5; = p2352*(p1129+p1131)
- p1888: 0
- p2872: 0.000187478; = p2286*(p1020+p1022)
- p1792: 0
- p2301: 0.000259116; = p2227*p2208
- p3302: 0.0114097; = if(and(p1232=0;p3252<>0);p3258*(p3278*(p3282*p1256+p3286*(p1253+p1257)+p1258*p3288+p3297*p3287));0)
- p3005: 0; = p2419*(p1079+p1081)
- p2792: 0; = p2401*(p1019+p1021)
- p0358: 0.5
- p2056: 2.07882
- p1322: 0.635598; = IF(((p0745*1000*p0749/100)+(p0754*1000*p0758/100))/p0801<0;0;((p0745*1000*p0749/100)+(p0754*1000*p0758/100))/p0801)
- p1578: 0
- p3281: 0.46
- p3033: 0; = p2252*p1023
- p4258: 3.39672e-8; = p1909*p3479
- p3128: 0; = p2347*p1082
- p2950: 4.51392e-5; = p2364*(p1020+p1022)
- p0858: 0.192452; = p0670*1000/p0856
- p0453: 0; = SQRT(2)*(IF((2*p0321-1)<0;-1;IF((2*p0321-1)>0;1;0))*SQRT(SQRT((2/(pi()*0.140012289)+LN(1-(2*p0321-1)^2)/2)^2-LN(1-(2*p0321-1)^2)/0.140012289)-(2/(pi()*0.140012289)+LN(1-(2*p0321-1)^2)/2)))
- p2598: 0; = p2402*p1014
- p0669: 36.4211; = p0009*(1+p0537*p0141/100)
- p3051: 0; = p2270*p1082
- p2832: 1.11663e-5; = p2246*(p1020+p1022)
- p1065: 0.000655527; = IF(p1012=0;p1051/(p1058*p0818);0)
- p2325: 3.38393e-5; = p2224*p2192
- p2335: 8.30203e-5; = p2224*p2203
- p1247: 3.71086e-6; = if(p1232>0;0;p1242*p0001/(p0818*p0002))
- p0573: 0; = IF(p0309<0.5;-SQRT(p0007*EXP(p0441^2*p0008)-p0007);SQRT(p0007*EXP(p0441^2*p0008)-p0007))
- p4481: 0; = p1926*p3480
- p1980: 3521.6
- p2069: 0.190588
- p2970: 3.08695e-6; = p2384*(p1079+p1081)
- p2149: 1.81283e-8; = p2015*p2077*p2111/(p0818*1000)
- p3347: 0.00107264; = if(and(p1232=0;p3256<>0);p3275*p3289;0)
- p2906: 2.48179e-6; = p2320*(p1020+p1022)
- p0695: 0
- p4906: 0; = p1939*p3482
- p1117: 0.00105447; = IF(p1071=0;p1107/(p1112*p0818);0)
- p0651: 0; = IF(p0387<0.5;-SQRT(p0007*EXP(p0519^2*p0008)-p0007);SQRT(p0007*EXP(p0519^2*p0008)-p0007))
- p2018: 0.1978
- p1326: 0.0678667; = IF(((p0745*1000*p0753/100)+(p0754*1000*p0762/100))/p0801<0;0;((p0745*1000*p0753/100)+(p0754*1000*p0762/100))/p0801)
- p3307: 2.60947e7; = if(and(p1232=0;p3252<>0);p3252*(p3258-p3302)/p3305;0)
- p0947: 0; = if(and(p0683=0;or(p0807=480;p0807=32;p0807=1;and(p0807=60;p0901<0.03)));p0935;0)
- p3400: 0; = p3362*p1238
- p5318: 8.38874e-9; = p1939*p3484
- p2871: 2.31664e-5; = p2285*(p1020+p1022)
- p1732: 0
- p2371: 0.000420565; = p2225*p2200
- p2642: 6.48084e-7; = p2251*(p1019+p1021)
- p0652: 0; = IF(p0388<0.5;-SQRT(p0007*EXP(p0520^2*p0008)-p0007);SQRT(p0007*EXP(p0520^2*p0008)-p0007))
- p2503: 1.4324e-5; = p2307*p1073
- p3213: 0.112803; = p1222*12.0107/100.0869
- p1721: 0
- p2444: 0.000488735; = p2248*p1014
- p0941: 0; = if(and(p0683=0;p0947=0);p0935;0)
- p1821: 0
- p1049: 0.183763; = IF(p1012=0;IF(p1037+p1044+p1045+p1046+p1047+p1048=1;0;1-(p1037+p1044+p1045+p1046+p1047+p1048));0)
- p0752: 0
- p1198: 0.44
- p0381: 0.5
- p1813: 0
- p3059: 0; = p2278*p1023
- p4200: 3.55523e-7; = p1851*p3479
- p2094: 0.922577
- p4700: 7.52129e-9; = p1939*p3481
- p2849: 7.13871e-5; = p2263*(p1079+p1081)
- p4178: 2.36638e-6; = p1829*p3479
- p2487: 2.88565e-6; = p2291*p1014
- p2612: 0; = p2416*p1073
- p2240: 0.000136804; = p2222*p2185
- p2079: 0.02
- p1871: 0
- p3021: 0; = p2240*p1023
- p2355: 0.000206923; = p2225*p2183
- p1801: 0
- p0735: 0
- p0449: 0; = SQRT(2)*(IF((2*p0317-1)<0;-1;IF((2*p0317-1)>0;1;0))*SQRT(SQRT((2/(pi()*0.140012289)+LN(1-(2*p0317-1)^2)/2)^2-LN(1-(2*p0317-1)^2)/0.140012289)-(2/(pi()*0.140012289)+LN(1-(2*p0317-1)^2)/2)))
- p0485: 0; = SQRT(2)*(IF((2*p0353-1)<0;-1;IF((2*p0353-1)>0;1;0))*SQRT(SQRT((2/(pi()*0.140012289)+LN(1-(2*p0353-1)^2)/2)^2-LN(1-(2*p0353-1)^2)/0.140012289)-(2/(pi()*0.140012289)+LN(1-(2*p0353-1)^2)/2)))
- p2012: 0.00204232
- p2830: 3.87927e-5; = p2244*(p1020+p1022)
- p2535: 8.72169e-5; = p2339*p1073
- p0763: 12699.8; = p0103*(1+p0631*p0235/100)
- p4445: 0; = p1890*p3480
- p2739: 1.36332e-6; = p2348*(p1078+p1080)
- p3053: 3.00701e-8; = p2272*p1132
- p2945: 8.89331e-6; = p2359*(p1020+p1022)
- p1035: 0; = IF(p1012=0;p1029*p0001/(p0818*p0002);0)
- p0155: 0.21
- p1777: 0
- p3289: 0.05
- p1712: 0.60504
- p3042: 0; = p2261*p1082
- p2939: 3.15463e-5; = p2353*(p1129+p1131)
- p1295: 0; = p1291*p1252/p0818
- p1586: 0
- p2116: 0.444424
- p0520: 0; = SQRT(2)*(IF((2*p0388-1)<0;-1;IF((2*p0388-1)>0;1;0))*SQRT(SQRT((2/(pi()*0.140012289)+LN(1-(2*p0388-1)^2)/2)^2-LN(1-(2*p0388-1)^2)/0.140012289)-(2/(pi()*0.140012289)+LN(1-(2*p0388-1)^2)/2)))
- p2407: 0; = p2234*p2197
- p3040: 0; = p2259*p1082
- p2754: 4.07626e-6; = p2363*(p1019+p1021)
- p0843: 0.22008
- p0979: 0; = IF(p0976=0;0;p0976*p0001/(p0818*p0002))
- p0538: 0; = IF(p0274<0.5;-SQRT(p0007*EXP(p0406^2*p0008)-p0007);SQRT(p0007*EXP(p0406^2*p0008)-p0007))
- p2504: 5.4054e-5; = p2308*p1073
- p1897: 0
- p4831: 0; = p1864*p3482
- p4651: 5.08793e-9; = p1890*p3481
- p1664: 0
- p2043: 0.636483
- p3035: 0; = p2254*p1023
- p2109: 0.826583
- p1915: 0
- p0689: 0
- p4335: 0; = p1780*p3480
- p1663: 0
- p3204: 0; = p2423*p1082
- p0074: 0.639
- p2777: 2.17521e-5; = p2386*(p1078+p1080)
- p0764: 97.607; = p0104*(1+p0632*p0236/100)
- p3417: 0.000523773; = p3379*p1238
- p1203: 3
- p1574: 0
- p1964: 0.5
- p0935: 4.34989e-5; = p0929*p0001/(p0818*p0002)
- p2272: 0.00300701; = p2230*p2218
- p5295: 2.71401e-9; = p1916*p3484
- p1668: 0
- p2344: 6.75602e-7; = p2228*p2212
- p0872: 9.67058e6; = p0864*p0856
- p4116: 8.94469e-7; = p1767*p3479
- p3156: 0; = p2375*p1082
- p3404: 0; = p3366*p1238
- p0475: 0; = SQRT(2)*(IF((2*p0343-1)<0;-1;IF((2*p0343-1)>0;1;0))*SQRT(SQRT((2/(pi()*0.140012289)+LN(1-(2*p0343-1)^2)/2)^2-LN(1-(2*p0343-1)^2)/0.140012289)-(2/(pi()*0.140012289)+LN(1-(2*p0343-1)^2)/2)))
- p2191: 0.000111396; = 8*1.00794*p2189/(2*14.0067)
- p2073: 0.377647
- p0753: 0
- p1867: 0
- p5146: 9.74575e-8; = p1767*p3484
- p2216: 4.26873e-5; = p1108/p0818
- p2270: 1.82162e-5; = p2226*p2216
- p2699: 9.1209e-5; = p2308*(p1078+p1080)
- p1953: 0
- p1072: 0; = p1071*p0001/(p0818*p0002)
- p1107: 2.11676e7; = IF(p1071=0;p1105*p1101*p1095;0)
- p1938: 9.39191e-8; = p1530*1000/p0818
- p2473: 0.000305703; = p2277*p1014
- p2639: 0.000373775; = p2248*(p1019+p1021)
- p1379: 195
- p2189: 0.000386999; = p1053/p0818
- p2621: 0; = p2425*p1073
- p1343: 8.02461e-6; = p1342*p0001/(p0818*p0002)
- p3507: 2.191e-7; = p1776*p3476
- p1518: 2
- p0614: 0; = IF(p0350<0.5;-SQRT(p0007*EXP(p0482^2*p0008)-p0007);SQRT(p0007*EXP(p0482^2*p0008)-p0007))
- p0484: 0; = SQRT(2)*(IF((2*p0352-1)<0;-1;IF((2*p0352-1)>0;1;0))*SQRT(SQRT((2/(pi()*0.140012289)+LN(1-(2*p0352-1)^2)/2)^2-LN(1-(2*p0352-1)^2)/0.140012289)-(2/(pi()*0.140012289)+LN(1-(2*p0352-1)^2)/2)))
- p3396: 0.000203889; = p3377*p1234
- p2723: 3.19277e-5; = p2332*(p1019+p1021)
- p2126: 3.57925e-7; = p2015*p2054*p2088/(p0818*1000)
- p1951: 0
- p0241: 5.856
- p1245: 0; = if(p1232>0;0;p1240*(p0725/100)*p0723*1000)
- p1798: 0
- p3379: 0.000714356; = if(p1232=0;p3246*p3361/p0818;0)
- p2180: 2.38675e-8; = p3233*p1188/(p0818)
- p1876: 0
- p4125: 6.3179e-7; = p1776*p3479
- p1704: 0
- p1858: 0
- p2638: 6.60385e-5; = p2247*(p1019+p1021)
- p0692: 0
- p2691: 0.000504199; = p2300*(p1078+p1080)
- p3560: 8.20644e-7; = p1829*p3476
- p3270: 0.0747083
- p1579: 0
- p1698: 0
- p1782: 0
- p1567: 0.629912
- p0794: 0
- p2360: 0.000305626; = p2225*p2188
- p3399: 0.0262547; = p3380*p1234
- p3074: 0; = p2293*p1023
- p3301: 0.130394; = if(and(p1232=0;p3252<>0);p3257*p3277*(p3297*p3290+(1-p3297)*p3294);0)
- p2390: 0.000759928; = p2233*p2219
- p2084: 0.21
- p3454: 0; = p3378*p1240
- p2775: 1.68608e-6; = p2384*(p1078+p1080)
- p2573: 8.58271e-6; = p2377*p1073
- p2666: 0.000119116; = p2275*(p1128+p1130)
- p0418: 0; = SQRT(2)*(IF((2*p0286-1)<0;-1;IF((2*p0286-1)>0;1;0))*SQRT(SQRT((2/(pi()*0.140012289)+LN(1-(2*p0286-1)^2)/2)^2-LN(1-(2*p0286-1)^2)/0.140012289)-(2/(pi()*0.140012289)+LN(1-(2*p0286-1)^2)/2)))
- p3382: 0; = p3363*p1234
- p0229: 6.858
- p0150: 0
- p0576: 0; = IF(p0312<0.5;-SQRT(p0007*EXP(p0444^2*p0008)-p0007);SQRT(p0007*EXP(p0444^2*p0008)-p0007))
- p2793: 0; = p2402*(p1019+p1021)
- p0191: 9.829
- p0058: 27.764
- p1793: 8.42141e-6; = p1385*1000/p0818
- p3181: 0; = p2400*p1023
- p3469: 1.5504e-5; = p3374*p1241
- p2526: 1.93887e-7; = p2330*p1014
- p2249: 0.000294527; = p2222*p2195
- p2076: 0.057
- p3019: 0; = p2238*p1023
- p2929: 0.000103418; = p2343*(p1079+p1081)
- p1038: 0.0086688
- p4307: 0; = p1962*p3479
- p0587: 0; = IF(p0323<0.5;-SQRT(p0007*EXP(p0455^2*p0008)-p0007);SQRT(p0007*EXP(p0455^2*p0008)-p0007))
- p3199: 0; = p2418*p1082
- p2512: 2.05402e-5; = p2316*p1014
- p3670: 2.67004e-8; = p1939*p3476
- p1183: 0.000118241; = p0801*p0001/(p0818*p0002)
- p1753: 0
- p2281: 9.92257e-5; = p2223*p2187
- p2800: 0; = p2409*(p1019+p1021)
- p2190: 0.000442971; = 32.065*p2189/(2*14.0067)
- p2628: 0.000513366; = p2237*(p1019+p1021)
- p0906: 0.00342907
- p0352: 0.5
- p2118: 0.679049
- p0915: 0.0101933; = p0914/p0818
- p0913: 0.0151931
- p1666: 0
- p3420: 0; = p3363*p1239
- p3160: 0; = p2379*p1082
- p2112: 0.856281
- p2947: 1.93778e-5; = p2361*(p1020+p1022)
- p0585: 0; = IF(p0321<0.5;-SQRT(p0007*EXP(p0453^2*p0008)-p0007);SQRT(p0007*EXP(p0453^2*p0008)-p0007))
- p3049: 0; = p2268*p1082
- p1649: 0
- p1659: 0
- p0630: 0; = IF(p0366<0.5;-SQRT(p0007*EXP(p0498^2*p0008)-p0007);SQRT(p0007*EXP(p0498^2*p0008)-p0007))
- p2791: 0; = p2400*(p1019+p1021)
- p1889: 0.000103081; = p1481*1000/p0818
- p2402: 0; = p2234*p2191
- p1826: 0
- p1099: 0.663396
- p2578: 2.7352e-5; = p2382*p1073
- p1926: 2.08709e-8; = p1518*1000/p0818
- p1032: 1.38388e-5; = IF(p1012=0;p1026*p0001/(p0818*p0002);0)
- p3001: 0; = p2415*(p1079+p1081)
- p1946: 0
- p2827: 0.000123703; = p2241*(p1020+p1022)
- p0825: 8.4296e10; = p0818*p0822
- p2742: 0.000182102; = p2351*(p1128+p1130)
- p0788: 41.138; = p0128*(1+p0656*p0260/100)
- p1935: 0
- p3346: 0.0178625; = if(and(p1232=0;p3256<>0);p3274*(p3281*(p3285*p1256+p3286*(p1253+p1257)+p1258*p3288));0)
- p1641: 0
- p1928: 0
- p4204: 2.01539e-7; = p1855*p3479
- p3236: 0.0140975
- p0945: 0; = if(and(p0683=0;p0951=0);p0939;0)
- p2494: 0.000111135; = p2298*p1073
- p1963g: 5.07007e-5; = p1667*p1871+p1668*p1872+p1669*p1873+p1670*p1874+p1671*p1875+p1672*p1876+p1673*p1877+p1674*p1878+p1675*p1879+p1676*p1880+p1677*p1881+p1678*p1882+p1679*p1883+p1680*p1884+p1681*p1885+p1682*p1886+p1683*p1887+p1684*p1888+p1685*p1889
- p2194: 0.214362
- p2082: 0.285294
- p0253: 49.717
- p0371: 0.5
- p2157: 2.06497e-8; = p2015*p2086*p2119/(p0818*1000)
- p0456: 0; = SQRT(2)*(IF((2*p0324-1)<0;-1;IF((2*p0324-1)>0;1;0))*SQRT(SQRT((2/(pi()*0.140012289)+LN(1-(2*p0324-1)^2)/2)^2-LN(1-(2*p0324-1)^2)/0.140012289)-(2/(pi()*0.140012289)+LN(1-(2*p0324-1)^2)/2)))
- p1934: 0
- p0065: 13.63
- p2823: 0.000702472; = p2237*(p1020+p1022)
- p4033: 1.51188e-7; = p1890*p3478
- p0009: 36.4211
- p2387: 3.81347e-6; = p2229*p2216
- p2438: 1.70126e-5; = p2242*p1014
- p3332: 2.22282e7; = if(and(p1232=0;p3255<>0);IF((p3328+p3329+p3330+p3331)+(p3255*(p3265*(1-p3277))/p3327)>p3255;p3255-(p3328+p3329+p3330+p3331);p3255*(p3265*(1-p3277))/p3327);0)
- p0378: 0.5
- p2824: 0.000154201; = p2238*(p1020+p1022)
- p2979: 0; = p2393*(p1020+p1022)
- p0962: 0; = if(and(p0683>0;or(p0807=480;p0807=32;p0807=1;and(p0807=60;p0901<0.03)));p0938;0)
- p0268: 0.946
- p2424: 0; = p2235*p2214
- p0005: 1.60934
- p1643: 0
- p0196: 25.787
- p0765: 83.099; = p0105*(1+p0633*p0237/100)
- p4981: 3.27386e-7; = p1808*p3483
- p3418: 0.0835983; = p3380*p1238
- p1602: 0
- p1799: 0
- p3078: 0; = p2297*p1082
- p1997: 1.98111e9; = (if(p1152=0;0;p1150/p1152)+if(p1153=0;0;p1151/p1153))*(1+p1157)
- p0004: 0.0254
- p2386: 7.44678e-5; = p2229*p2215
- p2821: 0; = p2430*(p1128+p1130)
- p2704: 5.36085e-5; = p2313*(p1128+p1130)
- p3014: 0; = p2428*(p1129+p1131)
- p2685: 0.000203722; = p2294*(p1019+p1021)
- p0762: 39.202; = p0102*(1+p0630*p0234/100)
- p3007: 0; = p2421*(p1079+p1081)
- p1655: 0.483107
- p1841: 0
- p1204: 0.980791
- p2453: 0.000211848; = p2257*p1014
- p0351: 0.5
- p1582: 0
- p5159: 1.41128e-7; = p1780*p3484
- p1726: 0
- p0193: 12.156
- p4101: 0; = p1962*p3478
- p4856: 0; = p1889*p3482
- p3341: 1.57985e7; = if(and(p1232=0;p3254<>0);p3254*(p3271-p3336)/p3338;0)
- p3539: 1.0633e-6; = p1808*p3476
- p1197: 1.806
- p3320: 2.7211e7; = if(and(p1232=0;p3253<>0);p3253*(p3264-p3315)/p3316;0)
- p1960: 0; = IF(p1959-p1958<0;0;p1959-p1958)
- p3229: 6.40421e-7; = p1164/p0818
- p3300: 0; = if(p1293+p1294+p1295+p1296=0;0;p1293/(p1293+p1294+p1295+p1296))
- p2909: 6.18973e-6; = p2323*(p1020+p1022)
- p0551: 0; = IF(p0287<0.5;-SQRT(p0007*EXP(p0419^2*p0008)-p0007);SQRT(p0007*EXP(p0419^2*p0008)-p0007))
- p1087: 402219; = IF(p1071=0;p1081*(p0710/100)*p0703*1000;0)
- p3262: 0.0787162
- p2020: 1.22299e6; = p2015*p2018*p2019
- p1635: 0
- p1040: 0.0227455
- p1760: 0
- p0990: 0; = p0986*p0886
- p0174: 0
- p3165: 0; = p2384*p1082
- p3351: 910072; = if(and(p1232=0;p3256<>0);p3256*(p3274-p3346)/p3349;0)
- p1010: 0; = p0890
- p3330: 1.14995e6; = if(and(p1232=0;p3255<>0);p3255*(p3267-p3325)/p3327;0)
- p1618: 0
- p2366: 0.000147123; = p2225*p2195
- p0937: 3.34567e-5; = p0931*p0001/(p0818*p0002)
- p1868: 0
- p2629: 0.00011269; = p2238*(p1019+p1021)
- p2406: 0; = p2234*p2196
- p1906: 0
- p2845: 0.000391122; = p2259*(p1079+p1081)
- p4142: 1.82743e-6; = p1793*p3479
- p0749: 23.063; = p0089*(1+p0617*p0221/100)
- p1319: 0.220421; = IF(((p0745*1000*p0746/100)+(p0754*1000*p0755/100))/p0801<0;0;((p0745*1000*p0746/100)+(p0754*1000*p0755/100))/p0801)
- p1559: 0
- p0726: 23.027; = p0066*(1+p0594*p0198/100)
- p1683: 0
- p1314: 0; = p1310*p1252/p0818
- p0973: 2.20209e8; = p0967+p0968+p0969
- p0665: 0; = IF(p0401<0.5;-SQRT(p0007*EXP(p0533^2*p0008)-p0007);SQRT(p0007*EXP(p0533^2*p0008)-p0007))
- p1296: 0.0527018; = p1292*p1252/p0818
- p2520: 1.48739e-6; = p2324*p1014
- p0586: 0; = IF(p0322<0.5;-SQRT(p0007*EXP(p0454^2*p0008)-p0007);SQRT(p0007*EXP(p0454^2*p0008)-p0007))
- p0539: 0; = IF(p0275<0.5;-SQRT(p0007*EXP(p0407^2*p0008)-p0007);SQRT(p0007*EXP(p0407^2*p0008)-p0007))
- p3457: 0; = p3362*p1241
- p2235: 0; = 1-(p2226+p2227+p2228+p2229)
- p1042: 0.000519971
- p1130: 0.02271; = if(p1121=0;IF(p1123+p1128+p1129=1;0;IF(p1123+p1128+p1129+p1126>1;1-(p1123+p1128+p1129);p1126));0)
- p2686: 2.93202e-5; = p2295*(p1019+p1021)
- p1330: 365577; = p1320*p0801
- p2114: 0.832356
- p1178: 5.33664e-8; = p1176/p0818
- p0862: 0.0366415; = p0674*1000/p0856
- p2296: 0.0012356; = p2223*p2203
- p2146: 1.01742e-8; = p2015*p2074*p2108/(p0818*1000)
- p1141: 4.93557e-5; = if(p1121=0;p1135*p0001/(p0818*p0002);0)
- p2508: 0.000476227; = p2312*p1123
- p0284: 0.5
- p2462: 4.56464e-7; = p2266*p1073
- p3449: 0; = p3373*p1240
- p3265: 0.696292
- p1716: 0
- p1385: 807
- p3464: 0; = p3369*p1241
- p1501: 15
- p0001: 0.404686
- p2115: 0.856281
- p1092: 2.02704e-6; = IF(p1071=0;p1086*p0001/(p0818*p0002);0)
- p2100: 0.705744
- p0219: 92.014
- p1344: 879500; = IF(p1318=0;p1327*p0801;0)
- p1160: 0.0427277; = (p1156+p1158)*p1159
- p3114: 0; = p2333*p1023
- p3401: 0; = p3363*p1238
- p2411: 0; = p2234*p2201
- p2139: 1.36375e-7; = p2015*p2067*p2101/(p0818*1000)
- p3214: 0.376406; = p1222*40.078/100.0869
- p2225: 0.134512; = if(p0765*p0769+p0766*p0770+p0767*p0771+p0768*p0772=0;0;p0772*p0768/(p0765*p0769+p0766*p0770+p0767*p0771+p0768*p0772))
- p0931: 3.59351e6; = p0801*p0925
- p1170: 4585.3; = p1169*p0801
- p0656: 0; = IF(p0392<0.5;-SQRT(p0007*EXP(p0524^2*p0008)-p0007);SQRT(p0007*EXP(p0524^2*p0008)-p0007))
- p1817: 0
- p3148: 0; = p2367*p1023
- p3590: 4.71183e-9; = p1859*p3476
- p2017: 2.16426e7; = p2015*p0898
- p1658: 0
- p0043: 12699.8
- p3470: 2.80876e-6; = p3375*p1241
- p0767: 25.357; = p0107*(1+p0635*p0239/100)
- p4444: 0; = p1889*p3480
- p1857: 0
- p2319: 4.63235e-5; = p2224*p2186
- p2288: 0.000611048; = p2223*p2195
- p1002: 0; = p0996*p0888
- p1840: 0
- p1100: 0.242165
- p1949: 0
- p0643: 0; = IF(p0379<0.5;-SQRT(p0007*EXP(p0511^2*p0008)-p0007);SQRT(p0007*EXP(p0511^2*p0008)-p0007))
- p3367: 0; = if(p1232=0;p3244*p3361/p0818;0)
- p0336: 0.5
- p0818: 9.58272e10; = p0806*p0807
- p3210: 0; = p2429*p1132
- p2787: 0; = p2396*(p1019+p1021)
- p1810: 0
- p0023: 27868
- p1957: 0
- p0732: 40.445; = p0072*(1+p0600*p0204/100)
- p3195: 0; = p2414*p1082
- p0483: 0; = SQRT(2)*(IF((2*p0351-1)<0;-1;IF((2*p0351-1)>0;1;0))*SQRT(SQRT((2/(pi()*0.140012289)+LN(1-(2*p0351-1)^2)/2)^2-LN(1-(2*p0351-1)^2)/0.140012289)-(2/(pi()*0.140012289)+LN(1-(2*p0351-1)^2)/2)))
- p2747: 5.39717e-6; = p2356*(p1019+p1021)
- p2375: 0.000169285; = p2229*p2204
- p2603: 0; = p2407*p1014
- p1699: 0.762907
- p0322: 0.5
- p2131: 1.28698e-7; = p2015*p2059*p2093/(p0818*1000)
- p2352: 3.2654e-5; = p2232*p2220
- p1665: 0
- p1328: 2.79934e6; = p1319*p0801
- p0053: 49.653
- p1773: 0
- p0404: 0.5
- p3226: 0.00075501; = p3222*p1229
- p3135: 0; = p2354*p1023
- p3008: 0; = p2422*(p1079+p1081)
- p2551: 7.36045e-5; = p2355*p1014
- p2316: 5.77443e-5; = p2224*p2183
- p1050: 6.71549e8; = IF(p1012=0;p1037*p1036;0)
- p1554: 0
- p3511: 4.49194e-7; = p1780*p3476
- p2712: 2.32019e-5; = p2321*(p1019+p1021)
- p2776: 5.76415e-6; = p2385*(p1078+p1080)
- p2102: 0.922577
- p2805: 0; = p2414*(p1078+p1080)
- p1191: 0.5
- p2065: 0.0758824
- p0768: 88.63; = p0108*(1+p0636*p0240/100)
- p1321: 1.84503; = IF(((p0745*1000*p0748/100)+(p0754*1000*p0757/100))/p0801<0;0;((p0745*1000*p0748/100)+(p0754*1000*p0757/100))/p0801)
- p0857: 1.18241; = p0856*p0001*p0003/(p0818*p0002)
- p0865: 0; = IF(p0858+p0864=1;0;IF(p0858+p0864+p0860>1;1-(p0858+p0864);p0860))
- p1020: 0.11991; = IF(p1012=0;IF(p1014+p1019=1;0;IF(p1014+p1019+p1016>1;1-(p1014+p1019);p1016));0)
- p2392: 7.11223e-5; = p2233*p2221
- p2097: 0.40001
- p3060: 0; = p2279*p1023
- p1706: 0
- p1788: 0
- p0446: 0; = SQRT(2)*(IF((2*p0314-1)<0;-1;IF((2*p0314-1)>0;1;0))*SQRT(SQRT((2/(pi()*0.140012289)+LN(1-(2*p0314-1)^2)/2)^2-LN(1-(2*p0314-1)^2)/0.140012289)-(2/(pi()*0.140012289)+LN(1-(2*p0314-1)^2)/2)))
- p1950: 0
- p3179: 0; = p2398*p1023
- p1157: 0.24835
- p3092: 2.3517e-8; = p2311*p1132
- p0307: 0.5
- p4818: 0; = p1851*p3482
- p1680: 0
- p2539: 3.3476e-5; = p2343*p1073
- p1775: 0
- p0249: 25.533
- p1068: 0.0170079; = IF(p1012=0;p1054/(p1061*p0818);0)
- p2218: 0.00632821; = p1150/p0818
- p2658: 8.05408e-6; = p2267*(p1078+p1080)
- p3827: 2.35879e-9; = p1890*p3477
- p5208: 2.5783e-7; = p1829*p3484
- p3257: 0.849747
- p1595: 0
- p1015: 0.1786; = IF(p1012=0;p0706/100;0)
- p0711: 17.311; = p0051*(1+p0579*p0183/100)
- p2716: 9.20563e-6; = p2325*(p1019+p1021)
- p0924: 0.176341; = IF(p0918+p0923=1;0;IF(p0918+p0923+p0920>1;1-(p0918+p0923);p0920))
- p3207: 0; = p2426*p1082
- p1943: 1.04355e-8; = p1535*1000/p0818
- p2468: 0.000432108; = p2272*p1123
- p0993: 0; = p0989*p0001*p0004/(p0818*p0002)
- p2515: 1.64777e-5; = p2319*p1014
- p3269: 0.851786
- p2206: 0.000554985; = 9*1.00794*p2204/30.973762
- p0739: 2.974; = p0079*(1+p0607*p0211/100)
- p4944: 1.91185e-6; = p1771*p3483
- p1179: 0.5
- p3244: 0; = p0791/100
- p3923: 3.75997e-6; = p1780*p3478
- p3087: 0; = p2306*p1082
- p2528: 4.17475e-5; = p2332*p1014
- p0187: 12.878
- p3826: 1.01305e-6; = p1889*p3477
- p1192: 1.97599e-8; = p1188*p1191/p0818
- p2075: 0.072
- p2861: 0.000220481; = p2275*(p1129+p1131)
- p2241: 0.000332311; = p2222*p2186
- p2678: 0.000775463; = p2287*(p1019+p1021)
- p3121: 0; = p2340*p1082
- p3088: 0; = p2307*p1082
- p2284: 0.000247475; = p2223*p2190
- p2688: 0.000207342; = p2297*(p1078+p1080)
- p2449: 3.05802e-6; = p2253*p1014
- p4213: 2.03803e-8; = p1864*p3479
- p1580: 0
- p2196: 0.0108118; = p1068-p2193-p2195
- p1738: 0
- p4102: 0.000135428; = p1963*p3478
- p2353: 5.6744e-5; = p2232*p2221
- p1691: 0
- p0720: 2.271; = p0060*(1+p0588*p0192/100)
- p0454: 0; = SQRT(2)*(IF((2*p0322-1)<0;-1;IF((2*p0322-1)>0;1;0))*SQRT(SQRT((2/(pi()*0.140012289)+LN(1-(2*p0322-1)^2)/2)^2-LN(1-(2*p0322-1)^2)/0.140012289)-(2/(pi()*0.140012289)+LN(1-(2*p0322-1)^2)/2)))
- p0680: 2091.02; = p0020*(1+p0548*p0152/100)
- p4494: 0; = p1939*p3480
- p2674: 5.88164e-5; = p2283*(p1019+p1021)
- p1064: 0.00854624; = IF(p1012=0;p1050/(p1057*p0818);0)
- p2690: 6.07255e-5; = p2299*(p1078+p1080)
- p3360: 7.18741e8; = if(p1232=0;p3310+p3321+p3332+p3343+p3354;0)
- p1112: 0.209482
- p3388: 0; = p3369*p1234
- p1565: 0
- p0143: 0
- p1811: 0
- p3093: 3.31404e-8; = p2312*p1132
- p0891: 226512; = IF(p3251=0;0;62.4*6272640/(12*12*12))
- p3288: 0.505
- p0670: 2444.14; = p0010*(1+p0538*p0142/100)
- p2839: 3.20021e-6; = p2253*(p1020+p1022)
- p2176: 0.00189747; = p0895*p0913/p0818
- p1227: 0.000118241; = IF(p1221=0;0;p1226*p0001/(p0818*p0002))
- p2440: 3.7069e-5; = p2244*p1014
- p0122: 81.127
- p0286: 0.5
- p1970: 1.27e7; = p0801
- p2649: 0.000236205; = p2258*(p1078+p1080)
- p3408: 0; = p3370*p1238
- p1088: 0; = IF(p1071=0;p1082*(p0710/100)*p0703*1000;0)
- p0221: 12.613
- p2452: 1.84791e-5; = p2256*p1014
- p1982: 750
- p2087: 0.856281
- p0799: 76.282; = p0139*(1+p0667*p0271/100)
- p1126: 0.02271; = if(p1121=0;p0720/100;0)
- p0707: 11.991; = p0047*(1+p0575*p0179/100)
- p0108: 88.63
- p4925: 0; = p1962*p3482
- p3243: 2.04637e-10; = p3234*p1188*p3239/p0818
- p0713: 49.653; = p0053*(1+p0581*p0185/100)
- p0861: 0; = p0673*1000/p0856
- p2815: 0; = p2424*(p1078+p1080)
- p3951: 8.90035e-6; = p1808*p3478
- p3077: 0; = p2296*p1023
- p0911: 0.00344444
- p4265: 2.49093e-8; = p1916*p3479
- p1028: 3.12798e6; = IF(p1012=0;p1022*(p0704/100)*p0703*1000;0)
- p1719: 0
- p0864: 0.761463; = IF(p0858=1;0;IF(p0858+p0859>1;1-p0858;p0859))
- p0986: 0; = IF(p0982+p0985=1;0;IF(p0982+p0985+p0984>1;1-(p0982+p0985);p0984))
- p3109: 0; = p2328*p1023
- p5198: 2.64986e-7; = p1819*p3484
- p0151: 0
- p3118: 0; = p2337*p1082
- p1877: 0
- p2233: 0.085215; = if(p0783*p0787+p0784*p0788+p0785*p0789+p0786*p0790=0;0;p0790*p0786/(p0783*p0787+p0784*p0788+p0785*p0789+p0786*p0790))
- p0892: 48235.5; = if(p0891=0;0;(1-p1240)*p3251/p0891)
- p2960: 0.000110743; = p2374*(p1020+p1022)
- p2936: 0.000239188; = p2350*(p1129+p1131)
- p0543: 0; = IF(p0279<0.5;-SQRT(p0007*EXP(p0411^2*p0008)-p0007);SQRT(p0007*EXP(p0411^2*p0008)-p0007))
- p3972: 6.86918e-6; = p1829*p3478
- p1264: 0.40445; = if(p1232>0;0;IF(p1259+p1263=1;0;IF(p1259+p1263+p1261>1;1-(p1259+p1263);p1261)))
- p3068: 0; = p2287*p1023
- p5015: 1.45075e-9; = p1842*p3483
- p2231: 0.371621; = if(p0783*p0787+p0784*p0788+p0785*p0789+p0786*p0790=0;0;p0788*p0784/(p0783*p0787+p0784*p0788+p0785*p0789+p0786*p0790))
- p0183: 33.486
- p1711: 0
- p2653: 8.62236e-5; = p2262*(p1078+p1080)
- p0011: 9670.58
- p0884: 0; = IF(p0689=100;0;IF(p0689+p0688>100;100-p0689;p0688))
- p2127: 1.10185e-6; = p2015*p2055*p2089/(p0818*1000)
- p0985: 0; = IF(p0982=1;0;IF(p0982+p0983>1;1-p0982;p0983))
- p4822: 0; = p1855*p3482
- p1592: 0
- p3194: 0; = p2413*p1023
- p3248: 0
- p2711: 1.81369e-6; = p2320*(p1019+p1021)
- p0239: 6.633
- p2132: 1.23711e-7; = p2015*p2060*p2094/(p0818*1000)
- p2070: 0.282
- p0746: 5.93; = p0086*(1+p0614*p0218/100)
- p3339: 1.93687e8; = if(and(p1232=0;p3254<>0);p3254*(p3269*p3277-p3334)/p3338;0)
- p2373: 2.59501e-5; = p2225*p2202
- p2652: 0.000574385; = p2261*(p1078+p1080)
- p2836: 0.00108377; = p2250*(p1020+p1022)
- p2869: 8.04823e-5; = p2283*(p1020+p1022)
- p2783: 2.13616e-5; = p2392*(p1128+p1130)
- p0740: 96.313; = p0080*(1+p0608*p0212/100)
- p0020: 2091.02
- p1139: 1.37843e-5; = if(p1121=0;p1133*p0001/(p0818*p0002);0)
- p0412: 0; = SQRT(2)*(IF((2*p0280-1)<0;-1;IF((2*p0280-1)>0;1;0))*SQRT(SQRT((2/(pi()*0.140012289)+LN(1-(2*p0280-1)^2)/2)^2-LN(1-(2*p0280-1)^2)/0.140012289)-(2/(pi()*0.140012289)+LN(1-(2*p0280-1)^2)/2)))
- p3108: 0; = p2327*p1023
- p0003: 10000
- p2517: 3.0338e-5; = p2321*p1014
- p0479: 0; = SQRT(2)*(IF((2*p0347-1)<0;-1;IF((2*p0347-1)>0;1;0))*SQRT(SQRT((2/(pi()*0.140012289)+LN(1-(2*p0347-1)^2)/2)^2-LN(1-(2*p0347-1)^2)/0.140012289)-(2/(pi()*0.140012289)+LN(1-(2*p0347-1)^2)/2)))
- p0723: 12699.2; = p0063*(1+p0591*p0195/100)
- p0260: 4.198
- p0120: 20.165
- p2795: 0; = p2404*(p1019+p1021)
- p1682: 0
- p0920: 0.176341; = p0676*1000/p0801
- p2868: 0.00047252; = p2282*(p1020+p1022)
- p4734: 0; = p1767*p3482
- p0522: 0; = SQRT(2)*(IF((2*p0390-1)<0;-1;IF((2*p0390-1)>0;1;0))*SQRT(SQRT((2/(pi()*0.140012289)+LN(1-(2*p0390-1)^2)/2)^2-LN(1-(2*p0390-1)^2)/0.140012289)-(2/(pi()*0.140012289)+LN(1-(2*p0390-1)^2)/2)))
- p2023: 2.24
- p0377: 0.5
- p1990: 30
- p1885: 0
- p2029: 4.97
- p0083: 0.785
- p1045: 0.0725313; = IF(p1012=0;IF(p1037+p1044=1;0;IF(p1037+p1044+p1039>1;1-(p1037+p1044);p1039));0)
- p1769: 0
- p3376: 0.000303451; = if(p1232=0;p3246*p3358/p0818;0)
- p4384: 0; = p1829*p3480
- p2510: 4.45705e-5; = p2314*p1123
- p2703: 0.00099537; = p2312*(p1128+p1130)
- p3276: 0.0887032
- p2261: 0.0019664; = p2226*p2207
- p3025: 0; = p2244*p1023
- p3097: 0; = p2316*p1023
- p0309: 0.5
- p1612: 0
- p1226: 1.27e7; = IF(p1221=0;0;IF(p1193=0;p0801;0))
- p0847: -0.267484
- p3324: 0.0102018; = if(and(p1232=0;p3255<>0);p3266*(p3279*(p3284*p1256+p3286*(p1253+p1257)+p1258*p3288+p3299*p3287));0)
- p4907: 0; = p1940*p3482
- p3190: 0; = p2409*p1023
- p4308: 4.66541e-5; = p1963*p3479
- p2164: 0.000175108; = (p2015/p0818)-(p2022)-(p2035+p2036+p2052)-(p2017/p0818)-(p2039+p2041+p2044+p2158+p2159+p2160+p2161+p2162)
- p0896: 0.443532
- p0500: 0; = SQRT(2)*(IF((2*p0368-1)<0;-1;IF((2*p0368-1)>0;1;0))*SQRT(SQRT((2/(pi()*0.140012289)+LN(1-(2*p0368-1)^2)/2)^2-LN(1-(2*p0368-1)^2)/0.140012289)-(2/(pi()*0.140012289)+LN(1-(2*p0368-1)^2)/2)))
- p0779: 38.752; = p0119*(1+p0647*p0251/100)
- p1850: 0
- p1693: 0
- p1818: 0
- p2966: 1.49445e-5; = p2380*(p1079+p1081)
- p3223: 0.126838; = IF(p3216=0;0;(1-p1223)*24.3050/84.3139)
- p0461: 0; = SQRT(2)*(IF((2*p0329-1)<0;-1;IF((2*p0329-1)>0;1;0))*SQRT(SQRT((2/(pi()*0.140012289)+LN(1-(2*p0329-1)^2)/2)^2-LN(1-(2*p0329-1)^2)/0.140012289)-(2/(pi()*0.140012289)+LN(1-(2*p0329-1)^2)/2)))
- p2292: 1.78359e-5; = p2223*p2199
- p1569: 0
- p2408: 0; = p2234*p2198
- p3230: 4.78497e-8; = p1170/p0818
- p2630: 1.08047e-5; = p2239*(p1019+p1021)
- p1129: 0.51453; = if(p1121=0;IF(p1123+p1128=1;0;IF(p1123+p1128+p1125>1;1-(p1123+p1128);p1125));0)
- p1884: 0
- p2987: 0; = p2401*(p1020+p1022)
- p2751: 8.31424e-5; = p2360*(p1019+p1021)
- p3263: 0.0214527
- p4081: 5.91604e-8; = p1938*p3478
- p2813: 0; = p2422*(p1078+p1080)
- p2193: 0.00510238; = p1054/p0818
- p2745: 0.000256438; = p2354*(p1019+p1021)
- p2773: 4.61529e-5; = p2382*(p1078+p1080)
- p1746: 0
- p4809: 0; = p1842*p3482
- p4786: 0; = p1819*p3482
- p3430: 0; = p3373*p1239
- p3057: 0; = p2276*p1023
- p1927: 0
- p2994: 0; = p2408*(p1020+p1022)
- p2709: 5.18784e-6; = p2318*(p1019+p1021)
- p3183: 0; = p2402*p1023
- p3037: 0; = p2256*p1023
- p2660: 0.000103905; = p2269*(p1078+p1080)
- p2974: 1.82781e-5; = p2388*(p1079+p1081)
- p2997: 0; = p2411*(p1020+p1022)
- p1239: 0.03386; = if(p1232>0;0;IF(p1234+p1238=1;0;IF(p1234+p1238+p1236>1;1-(p1234+p1238);p1236)))
- p1280: 0; = IF(p1277=p1263;0;IF(p1277+p1278>p1263;p1263-p1277;p1278))
- p1805: 0
- p0810: 0
- p1999: 2.39681e9; = (p1228+p1229)*p0818+p1164
- p3032: 0; = p2251*p1023
- p3442: 0; = p3366*p1240
- p2556: 0.000108714; = p2360*p1014
- p0570: 0; = IF(p0306<0.5;-SQRT(p0007*EXP(p0438^2*p0008)-p0007);SQRT(p0007*EXP(p0438^2*p0008)-p0007))
- p1972: 0; = if(p0807=480;p1967*p0001/(p0818*p0002);0)
- p3482: 0; = if(p1328+p1330+p1332+p1334+p1336+p1338+p1340+p1342+p1344=0;0;p1340/(p1328+p1330+p1332+p1334+p1336+p1338+p1340+p1342+p1344))
- p1963k: 0; = p1744*p1948+p1745*p1949+p1746*p1950+p1747*p1951+p1748*p1952+p1749*p1953+p1750*p1954+p1751*p1955+p1752*p1956+p1753*p1957+p1961*p1962
- p3022: 0; = p2241*p1023
- p0535: 0; = SQRT(2)*(IF((2*p0403-1)<0;-1;IF((2*p0403-1)>0;1;0))*SQRT(SQRT((2/(pi()*0.140012289)+LN(1-(2*p0403-1)^2)/2)^2-LN(1-(2*p0403-1)^2)/0.140012289)-(2/(pi()*0.140012289)+LN(1-(2*p0403-1)^2)/2)))
- p0675: 107.666; = p0015*(1+p0543*p0147/100)
- p2464: 1.63179e-5; = p2268*p1073
- p2608: 0; = p2412*p1014
- p2819: 0; = p2428*(p1128+p1130)
- p2730: 0.000147167; = p2339*(p1078+p1080)
- p0699: 0
- p0200: 96.732
- p2577: 2.08867e-6; = p2381*p1073
- p0139: 76.282
- p0636: 0; = IF(p0372<0.5;-SQRT(p0007*EXP(p0504^2*p0008)-p0007);SQRT(p0007*EXP(p0504^2*p0008)-p0007))
- p0974: 0.5
- p1873: 0
- p1006: 0; = p1002*p0001*p0004/(p0818*p0002)
- p2933: 4.87413e-5; = p2347*(p1079+p1081)
- p3216: 0.06; = IF(OR(p1226=0;p1228=0);0;1-p3213-p3214-p3215)
- p1940: 5.74993e-6; = p1532*1000/p0818
- p2543: 1.57774e-5; = p2347*p1073
- p0876: 0; = p0866*p0856
- p1653: 0
- p1317: 0
- p1632: 0
- p0257: 15.348
- p0179: 27.427
- p1249: 5.45663e-7; = if(p1232>0;0;p1244*p0001/(p0818*p0002))
- p1146: 0.929457
- p2986: 0; = p2400*(p1020+p1022)
- p0672: 0
- p0243: 12.208
- p5132: 4.98154e-6; = p1963*p3483
- p2437: 0.000118206; = p2241*p1014
- p0274: 0.5
- p2952: 5.47665e-5; = p2366*(p1020+p1022)
- p4992: 2.59685e-7; = p1819*p3483
- p2213: 6.46138e-5; = p1116-p2212
- p3180: 0; = p2399*p1023
- p0951: 0; = if(and(p0683=0;or(p0807=480;p0807=32;p0807=1;and(p0807=60;p0901<0.03)));p0939;0)
- p3212: 0; = p2431*p1132
- p0782: 81.127; = p0122*(1+p0650*p0254/100)
- p2681: 1.34457e-6; = p2290*(p1019+p1021)
- p2472: 0.00139265; = p2276*p1014
- p0544: 0; = IF(p0280<0.5;-SQRT(p0007*EXP(p0412^2*p0008)-p0007);SQRT(p0007*EXP(p0412^2*p0008)-p0007))
- p0184: 4.611
- p3031: 0; = p2250*p1023
- p3098: 0; = p2317*p1023
- p2111: 0.856281
- p4342: 0; = p1787*p3480
- p3435: 0.000253963; = p3378*p1239
- p2454: 0.000139984; = p2258*p1073
- p3082: 0; = p2301*p1082
- p2159: 8.7989e-7; = p2015*p2083*p2121/(p0818*1000)
- p1606: 0
- p1583: 0.806008
- p0052: 27.139
- p1142: 2.17843e-6; = if(p1121=0;p1136*p0001/(p0818*p0002);0)
- p3362: 0; = if(p1232=0;p3244*p3356/p0818;0)
- p0622: 0; = IF(p0358<0.5;-SQRT(p0007*EXP(p0490^2*p0008)-p0007);SQRT(p0007*EXP(p0490^2*p0008)-p0007))
- p0606: 0; = IF(p0342<0.5;-SQRT(p0007*EXP(p0474^2*p0008)-p0007);SQRT(p0007*EXP(p0474^2*p0008)-p0007))
- p2321: 8.52886e-5; = p2224*p2188
- p1318: 0; = p1317*p0001/(p0818*p0002)
- p2128: 4.09412e-7; = p2015*p2056*p2090/(p0818*1000)
- p4977: 2.41792e-10; = p1804*p3483
- p2417: 0; = p2235*p2207
- p3439: 0; = p3363*p1240
- p0406: 0; = SQRT(2)*(IF((2*p0274-1)<0;-1;IF((2*p0274-1)>0;1;0))*SQRT(SQRT((2/(pi()*0.140012289)+LN(1-(2*p0274-1)^2)/2)^2-LN(1-(2*p0274-1)^2)/0.140012289)-(2/(pi()*0.140012289)+LN(1-(2*p0274-1)^2)/2)))
- p2290: 4.94253e-6; = p2223*p2197
- p1882: 0
- p0181: 22.068
- p2400: 0; = p2234*p2189
- p1584: 0
- p0063: 12699.2
- p0609: 0; = IF(p0345<0.5;-SQRT(p0007*EXP(p0477^2*p0008)-p0007);SQRT(p0007*EXP(p0477^2*p0008)-p0007))
- p2184: 0.000147494; = p1051/p0818
- p1838: 0
- p1039: 0.0725313
- p1270: 0; = IF(p1267=p1259;0;IF(p1267+p1268>p1259;p1259-p1267;p1268))
- p1921: 0
- p2583: 6.60149e-7; = p2387*p1073
- p2077: 0.043
- p0466: 0; = SQRT(2)*(IF((2*p0334-1)<0;-1;IF((2*p0334-1)>0;1;0))*SQRT(SQRT((2/(pi()*0.140012289)+LN(1-(2*p0334-1)^2)/2)^2-LN(1-(2*p0334-1)^2)/0.140012289)-(2/(pi()*0.140012289)+LN(1-(2*p0334-1)^2)/2)))
- p0062: 5.741
- p1994: 750
- p2183: 0.00153832; = p1064-p2182
- p1123: 0.1437; = if(p1121=0;p0717/100;0)
- p1550: 0.783979
- p1748: 0
- p2900: 0.000172432; = p2314*(p1129+p1131)
- p0518: 0; = SQRT(2)*(IF((2*p0386-1)<0;-1;IF((2*p0386-1)>0;1;0))*SQRT(SQRT((2/(pi()*0.140012289)+LN(1-(2*p0386-1)^2)/2)^2-LN(1-(2*p0386-1)^2)/0.140012289)-(2/(pi()*0.140012289)+LN(1-(2*p0386-1)^2)/2)))
- p2806: 0; = p2415*(p1078+p1080)
- p2907: 3.17487e-5; = p2321*(p1020+p1022)
- p0114: 65.857
- p0384: 0.5
- p0214: 0.912
- p2781: 0.000228244; = p2390*(p1128+p1130)
- p2717: 5.21035e-5; = p2326*(p1019+p1021)
- p1948: 0
- p1977: 1.24868e10; = p1252+p1188
- p1308: 0
- p2445: 0.000104766; = p2249*p1014
- p2320: 6.667e-6; = p2224*p2187
- p3011: 0; = p2425*(p1079+p1081)
- p2457: 0.000340403; = p2261*p1073
- p2340: 7.56312e-5; = p2228*p2208
- p0400: 0.5
- p1909: 1.56532e-7; = p1501*1000/p0818
- p2809: 0; = p2418*(p1078+p1080)
- p1238: 0.73321; = if(p1232>0;0;IF(p1234=1;0;IF(p1234+p1235>1;1-p1234;p1235)))
- p0250: 3.986
- p0084: 16.606
- p4082: 2.23495e-7; = p1939*p3478
- p3717: 5.8662e-8; = p1780*p3477
- p0579: 0; = IF(p0315<0.5;-SQRT(p0007*EXP(p0447^2*p0008)-p0007);SQRT(p0007*EXP(p0447^2*p0008)-p0007))
- p3779: 6.15335e-10; = p1842*p3477
- p2559: 5.32997e-6; = p2363*p1014
- p0499: 0; = SQRT(2)*(IF((2*p0367-1)<0;-1;IF((2*p0367-1)>0;1;0))*SQRT(SQRT((2/(pi()*0.140012289)+LN(1-(2*p0367-1)^2)/2)^2-LN(1-(2*p0367-1)^2)/0.140012289)-(2/(pi()*0.140012289)+LN(1-(2*p0367-1)^2)/2)))
- p2199: 3.19256e-5; = p1069-p2197-p2198
- p3141: 0; = p2360*p1023
- p1007: 0; = p1003*p0001*p0004/(p0818*p0002)
- p1017: 0.09344; = IF(p1012=0;p0708/100;0)
- p3462: 0; = p3367*p1241
- p2818: 0; = p2427*(p1078+p1080)
- p2925: 0.00026944; = p2339*(p1079+p1081)
- p0759: 0
- p2770: 1.80504e-5; = p2379*(p1078+p1080)
- p1786: 0
- p2594: 0; = p2398*p1014
- p0177: 10.555
- p3766: 1.07171e-7; = p1829*p3477
- p3237: 0.854735
- p1807: 0
- p2558: 2.11949e-5; = p2362*p1014
- p5275: 1.40635e-8; = p1896*p3484
- p0316: 0.5
- p2617: 0; = p2421*p1073
- p1508: 11
- p2294: 0.000748869; = p2223*p2201
- p4883: 0; = p1916*p3482
- p1189: 0.000118241; = p0801*p0001/(p0818*p0002)
- p3745: 1.38861e-7; = p1808*p3477
- p4863: 0; = p1896*p3482
- p1785: 0
- p4893: 0; = p1926*p3482
- p1741: 0
- p0917: 0.960751; = (p0825+p0827+(p0830+p0895))/p0818-(p0900+p0905+p0910+p0915)
- p3133: 3.2654e-10; = p2352*p1132
- p4541: 1.26535e-7; = p1780*p3481
- p0050: 82.779
- p2259: 0.000731356; = p2226*p2205
- p3155: 0; = p2374*p1023
- p0997: 0; = if(p0888=0;0;if((p0695*p0694*1000*p0696/100)/p0888>1;1;(p0695*p0694*1000*p0696/100)/p0888))
- p1266: 0.00806; = if(p1232>0;0;IF(p1259+p1263+p1264+p1265=1;0;1-(p1259+p1263+p1264+p1265)))
- p1613: 0
- p1914: 0
- p0667: 0; = IF(p0403<0.5;-SQRT(p0007*EXP(p0535^2*p0008)-p0007);SQRT(p0007*EXP(p0535^2*p0008)-p0007))
- p1600: 0.895638
- p4720: 4.55759e-6; = p1963*p3481
- p2886: 0.000923111; = p2300*(p1079+p1081)
- p1839: 0
- p2032: 0.448886
- p0882: 12275; = p0869*p0856
- p3897: 3.42473e-6; = p1754*p3478
- p2834: 0.000511461; = p2248*(p1020+p1022)
- p2372: 0.000180306; = p2225*p2201
- p2232: 0.0679877; = if(p0783*p0787+p0784*p0788+p0785*p0789+p0786*p0790=0;0;p0789*p0785/(p0783*p0787+p0784*p0788+p0785*p0789+p0786*p0790))
- p2295: 0.000107779; = p2223*p2202
- p1654: 0
- p2897: 0.0013074; = p2311*(p1129+p1131)
- p0644: 0; = IF(p0380<0.5;-SQRT(p0007*EXP(p0512^2*p0008)-p0007);SQRT(p0007*EXP(p0512^2*p0008)-p0007))
- p1109: 1.81588e8; = IF(p1071=0;p1105*p1103*p1095;0)
- p3099: 0; = p2318*p1023
- p2549: 8.15412e-6; = p2353*p1123
- p0138: 82.779
- p1709: 0
- p0756: 4.131; = p0096*(1+p0624*p0228/100)
- p3406: 0; = p3368*p1238
- p1701: 0
- p2358: 0.000165997; = p2225*p2186
- p0815: 0
- p2484: 0.000217356; = p2288*p1014
- p4275: 4.52896e-9; = p1926*p3479
- p1159: 0.5
- p0335: 0.5
- p3708: 8.1091e-7; = p1771*p3477
- p1175: 0.000402674
- p0972: 0.00229798; = p0969/p0818
- p3496: 5.95575e-6; = p1765*p3476
- p0796: 97.607; = p0136*(1+p0664*p0268/100)
- p0281: 0.5
- p0329: 0.5
- p2884: 0.00034333; = p2298*(p1079+p1081)
- p1323: 0; = IF(((p0745*1000*p0750/100)+(p0754*1000*p0759/100))/p0801<0;0;((p0745*1000*p0750/100)+(p0754*1000*p0759/100))/p0801)
- p1359: 395
- p0443: 0; = SQRT(2)*(IF((2*p0311-1)<0;-1;IF((2*p0311-1)>0;1;0))*SQRT(SQRT((2/(pi()*0.140012289)+LN(1-(2*p0311-1)^2)/2)^2-LN(1-(2*p0311-1)^2)/0.140012289)-(2/(pi()*0.140012289)+LN(1-(2*p0311-1)^2)/2)))
- p2765: 8.09312e-5; = p2374*(p1019+p1021)
- p5234: 2.19588e-8; = p1855*p3484
- p0368: 0.5
- p0071: 17.312
- p2423: 0; = p2235*p2213
- p2078: 0.117
- p2329: 3.32089e-7; = p2224*p2197
- p3012: 0; = p2426*(p1079+p1081)
- p0830: 5.43996e10; = p0825*p0821*p0824
- p2663: 0.000903156; = p2272*(p1128+p1130)
- p1697: 0
- p1865: 0
- p0596: 0; = IF(p0332<0.5;-SQRT(p0007*EXP(p0464^2*p0008)-p0007);SQRT(p0007*EXP(p0464^2*p0008)-p0007))
- p2455: 0.000126605; = p2259*p1073
- p2052: 6.06443e-7; = p2015*p2049*(1-p2050)/(p0818*1000)
- p1988: 750
- p0594: 0; = IF(p0330<0.5;-SQRT(p0007*EXP(p0462^2*p0008)-p0007);SQRT(p0007*EXP(p0462^2*p0008)-p0007))
- p2162: 8.02712e-9; = p2015*p2086*p2124/(p0818*1000)
- p4397: 0; = p1842*p3480
- p0343: 0.5
- p5317: 2.22055e-9; = p1938*p3484
- p3416: 0.00549936; = p3378*p1238
- p0921: 0.282953; = p0679*1000/p0801
- p3256: 1.25804e7; = p1252*(p1307*(1-p3247)+p1310*(1-p3248)+p1311*(1-p3249)+p1312*(1-p3250))
- p0202: 29.896
- p3333: 1.48125e7; = if(and(p1232=0;p3255<>0);p3255-(p3328+p3329+p3330+p3331+p3332);0)
- p3994: 1.03202e-6; = p1851*p3478
- p1628: 0
- p2586: 0.000109202; = p2390*p1123
- p1106: 592125; = IF(p1071=0;p1105*p1096*p1095;0)
- p2978: 3.95397e-5; = p2392*(p1129+p1131)
- p0926: 0.00812677; = IF(p0918+p0923+p0924+p0925=1;0;IF(p0918+p0923+p0924+p0925+p0922>1;1-(p0918+p0923+p0924+p0925);p0922))
- p3342: 3.21845e7; = if(and(p1232=0;p3254<>0);p3254*(p3272-p3337)/p3338;0)
- p0712: 27.139; = p0052*(1+p0580*p0184/100)
- p0547: 0; = IF(p0283<0.5;-SQRT(p0007*EXP(p0415^2*p0008)-p0007);SQRT(p0007*EXP(p0415^2*p0008)-p0007))
- p3392: 0; = p3373*p1234
- p0526: 0; = SQRT(2)*(IF((2*p0394-1)<0;-1;IF((2*p0394-1)>0;1;0))*SQRT(SQRT((2/(pi()*0.140012289)+LN(1-(2*p0394-1)^2)/2)^2-LN(1-(2*p0394-1)^2)/0.140012289)-(2/(pi()*0.140012289)+LN(1-(2*p0394-1)^2)/2)))
- p0136: 97.607
- p3321: 1.00582e8; = if(and(p1232=0;p3253<>0);IF((p3317+p3318+p3319+p3320)+(p3253*(p3261*(1-p3277))/p3316)>p3253;p3253-(p3317+p3318+p3319+p3320);p3253*(p3261*(1-p3277))/p3316);0)
- p4738: 0; = p1771*p3482
- p3282: 0.3
- p2996: 0; = p2410*(p1020+p1022)
- p0887: 0; = 1000*p0886*p0001*p0003*p0004/(p0818*p0002)
- p1363: 7907
- p0534: 0; = SQRT(2)*(IF((2*p0402-1)<0;-1;IF((2*p0402-1)>0;1;0))*SQRT(SQRT((2/(pi()*0.140012289)+LN(1-(2*p0402-1)^2)/2)^2-LN(1-(2*p0402-1)^2)/0.140012289)-(2/(pi()*0.140012289)+LN(1-(2*p0402-1)^2)/2)))
- p2337: 0.000187385; = p2228*p2205
- p1023: 0; = IF(p1012=0;IF(p1014+p1019+p1020+p1021+p1022=1;0;1-(p1014+p1019+p1020+p1021+p1022));0)
- p3105: 0; = p2324*p1023
- p3434: 2.99808e-5; = p3377*p1239
- p2363: 1.4984e-5; = p2225*p2191
- p1615: 0.445163
- p0102: 39.202
- p2502: 4.18992e-6; = p2306*p1073
- p4495: 0; = p1940*p3480
- p0583: 0; = IF(p0319<0.5;-SQRT(p0007*EXP(p0451^2*p0008)-p0007);SQRT(p0007*EXP(p0451^2*p0008)-p0007))
- p2495: 3.59883e-5; = p2299*p1073
- p1623: 0
- p2022: 8.4624e-5; = p2018*p2015/p0818-p2021
- p0459: 0; = SQRT(2)*(IF((2*p0327-1)<0;-1;IF((2*p0327-1)>0;1;0))*SQRT(SQRT((2/(pi()*0.140012289)+LN(1-(2*p0327-1)^2)/2)^2-LN(1-(2*p0327-1)^2)/0.140012289)-(2/(pi()*0.140012289)+LN(1-(2*p0327-1)^2)/2)))
- p0342: 0.5
- p5076: 3.89285e-8; = p1903*p3483
- p2513: 1.96939e-6; = p2317*p1014
- p3000: 0; = p2414*(p1079+p1081)
- p0685: 0
- p1703: 0
- p4289: 1.24773e-6; = p1940*p3479
- p1767: 4.122e-6; = p1359*1000/p0818
- p2374: 0.000297497; = p2225*p2203
- p1205: 0
- p1320: 0.0287856; = IF(((p0745*1000*p0747/100)+(p0754*1000*p0756/100))/p0801<0;0;((p0745*1000*p0747/100)+(p0754*1000*p0756/100))/p0801)
- p0107: 25.357
- p0758: 0
- p0279: 0.5
- p2727: 6.05195e-5; = p2336*(p1078+p1080)
- p2476: 0.00024524; = p2280*p1014
- p0703: 12699.8; = p0043*(1+p0571*p0175/100)
- p0407: 0; = SQRT(2)*(IF((2*p0275-1)<0;-1;IF((2*p0275-1)>0;1;0))*SQRT(SQRT((2/(pi()*0.140012289)+LN(1-(2*p0275-1)^2)/2)^2-LN(1-(2*p0275-1)^2)/0.140012289)-(2/(pi()*0.140012289)+LN(1-(2*p0275-1)^2)/2)))
- p0373: 0.5
- p1325: 0; = IF(((p0745*1000*p0752/100)+(p0754*1000*p0761/100))/p0801<0;0;((p0745*1000*p0752/100)+(p0754*1000*p0761/100))/p0801)
- p0897: 0.458721
- p1084: 2.85306e6; = IF(p1071=0;p1078*(p0710/100)*p0703*1000;0)
- p2099: 0.620397
- p1316: 0.00105026; = p1312*p1252/p0818
- p3255: 5.43174e7; = p1252*(p1297*(1-p3247)+p1300*(1-p3248)+p1301*(1-p3249)+p1302*(1-p3250))
- p0748: 66.031; = p0088*(1+p0616*p0220/100)
- p1945: 0
- p1294: 0; = p1290*p1252/p0818
- p1923: 0
- p2607: 0; = p2411*p1014
- p3671: 4.32703e-7; = p1940*p3476
- p1555: 0
- p2389: 0.000539258; = p2233*p2218
- p3452: 0; = p3376*p1240
- p0504: 0; = SQRT(2)*(IF((2*p0372-1)<0;-1;IF((2*p0372-1)>0;1;0))*SQRT(SQRT((2/(pi()*0.140012289)+LN(1-(2*p0372-1)^2)/2)^2-LN(1-(2*p0372-1)^2)/0.140012289)-(2/(pi()*0.140012289)+LN(1-(2*p0372-1)^2)/2)))
- p1864: 9.39191e-8; = p1456*1000/p0818
- p1901: 0
- p2124: 0.263965
- p2895: 8.55147e-6; = p2309*(p1079+p1081)
- p2811: 0; = p2420*(p1078+p1080)
- p2251: 2.38231e-6; = p2222*p2197
- p1030: 4.10524e-5; = IF(p1012=0;p1024*p0001/(p0818*p0002);0)
- p0655: 0; = IF(p0391<0.5;-SQRT(p0007*EXP(p0523^2*p0008)-p0007);SQRT(p0007*EXP(p0523^2*p0008)-p0007))
- p1001: 0; = if(p0978>0;0;if(and(p0687=0;p0691=0;p0695=0;p0699=0);0;IF(p0996+p0999+p1000=1;0;1-(p0996+p0999+p1000))))
- p2553: 2.4308e-5; = p2357*p1014
- p2641: 0.000792019; = p2250*(p1019+p1021)
- p4513: 0; = p1962*p3480
- p0326: 0.5
- p2724: 1.36881e-5; = p2333*(p1019+p1021)
- p0524: 0; = SQRT(2)*(IF((2*p0392-1)<0;-1;IF((2*p0392-1)>0;1;0))*SQRT(SQRT((2/(pi()*0.140012289)+LN(1-(2*p0392-1)^2)/2)^2-LN(1-(2*p0392-1)^2)/0.140012289)-(2/(pi()*0.140012289)+LN(1-(2*p0392-1)^2)/2)))
- p2493: 0.000122879; = p2297*p1073
- p0676: 2239.53; = p0016*(1+p0544*p0148/100)
- p0581: 0; = IF(p0317<0.5;-SQRT(p0007*EXP(p0449^2*p0008)-p0007);SQRT(p0007*EXP(p0449^2*p0008)-p0007))
- p1281: 0; = IF(p1277+p1280=p1263;0;IF(p1277+p1280+p1279>p1263;p1263-(p1277+p1280);p1279))
- p1332: 2.34319e7; = p1321*p0801
- p1852: 0
- p0125: 28.785
- p0701: 0
- p3016: 0; = p2430*(p1129+p1131)
- p0176: 0.946
- p3308: 5.23522e6; = if(and(p1232=0;p3252<>0);p3252*(p3259-p3303)/p3305;0)
- p1216: 0.155559
- p0866: 0; = IF(p0858+p0864+p0865=1;0;IF(p0858+p0864+p0865+p0861>1;1-(p0858+p0864+p0865);p0861))
- p2446: 0.00103562; = p2250*p1014
- p1210: 0.25
- p0812: 0; = if(p0807=480;0.095/0.34;0)
- p2892: 1.2944e-5; = p2306*(p1079+p1081)
- p1278: 0
- p1125: 0.51453; = if(p1121=0;p0719/100;0)
- p1145: 7.85932e8; = if(p1121=0;p0799*p0702*1000*p0800/100;0)
- p0086: 5.93
- p0374: 0.5
- p0366: 0.5
- p3273: 0.753577
- p0532: 0; = SQRT(2)*(IF((2*p0400-1)<0;-1;IF((2*p0400-1)>0;1;0))*SQRT(SQRT((2/(pi()*0.140012289)+LN(1-(2*p0400-1)^2)/2)^2-LN(1-(2*p0400-1)^2)/0.140012289)-(2/(pi()*0.140012289)+LN(1-(2*p0400-1)^2)/2)))
- p2410: 0; = p2234*p2200
- p0217: 75.935
- p3234: 0.39606; = 1-p3233
- p0393: 0.5
- p3304: 0.0017178; = if(and(p1232=0;p3252<>0);p3260*p3289;0)
- p2158: 7.27997e-8; = p2015*p2082*p2120/(p0818*1000)
- p1755: 0
- p2698: 2.41698e-5; = p2307*(p1078+p1080)
- p0744: 16.606; = p0084*(1+p0612*p0216/100)
- p3297: 0; = if(p1273+p1274+p1275+p1276=0;0;p1273/(p1273+p1274+p1275+p1276))
- p2185: 0.000508034; = p1065-p2184
- p0460: 0; = SQRT(2)*(IF((2*p0328-1)<0;-1;IF((2*p0328-1)>0;1;0))*SQRT(SQRT((2/(pi()*0.140012289)+LN(1-(2*p0328-1)^2)/2)^2-LN(1-(2*p0328-1)^2)/0.140012289)-(2/(pi()*0.140012289)+LN(1-(2*p0328-1)^2)/2)))
- p2001: 400
- p1956: 0
- p2414: 0; = p2235*p2204
- p2279: 0.000283823; = p2223*p2185
- p2531: 2.95312e-5; = p2335*p1014
- p2498: 2.02842e-5; = p2302*p1073
- p0441: 0; = SQRT(2)*(IF((2*p0309-1)<0;-1;IF((2*p0309-1)>0;1;0))*SQRT(SQRT((2/(pi()*0.140012289)+LN(1-(2*p0309-1)^2)/2)^2-LN(1-(2*p0309-1)^2)/0.140012289)-(2/(pi()*0.140012289)+LN(1-(2*p0309-1)^2)/2)))
- p2967: 6.45256e-6; = p2381*(p1079+p1081)
- p1872: 0
- p1717: 0
- p1581: 0
- p1122: 0; = p1121*p0001/(p0818*p0002)
- p1309: 0
- p2619: 0; = p2423*p1073
- p5155: 6.8837e-8; = p1776*p3484
- p4975: 1.18599e-6; = p1802*p3483
- p0392: 0.5
- p0327: 0.5
- p4252: 3.64581e-7; = p1903*p3479
- p2840: 0.00031341; = p2254*(p1020+p1022)
- p0223: 6.431
- p1842: 6.26127e-8; = p1434*1000/p0818
- p3020: 0; = p2239*p1023
- p2359: 2.38907e-5; = p2225*p2187
- p1138: 103.03; = if(p1121=0;p1132*(p0716/100)*p0703*1000;0)
- p1285: 0; = p1281*p1252/p0818
- p1695: 0
- p3266: 0.0545989
- p0282: 0.5
- p2570: 0.000105823; = p2374*p1014
- p3366: 0; = if(p1232=0;p3244*p3360/p0818;0)
- p1033: 1.07839e-5; = IF(p1012=0;p1027*p0001/(p0818*p0002);0)
- p2563: 0.000517314; = p2367*p1014
- p1929: 0
- p0270: 1.096
- p0745: 35000.2; = p0085*(1+p0613*p0217/100)
- p0206: 9.431
- p1327: 0.069252; = if(p1318=0;if(p1327a=0;1;if(p1327a<0;0;p1327a));0)
- p0927: 4.89764e-5; = IF(p0918+p0923+p0924+p0925+p0926=1;0;1-(p0918+p0923+p0924+p0925+p0926))
- p1822: 0
- p3428: 0; = p3371*p1239
- p2880: 0.000278766; = p2294*(p1020+p1022)
- p2590: 0; = p2394*p1014
- p1636: 0
- p1338: 788555; = p1324*p0801
- p4357: 0; = p1802*p3480
- p2048: 4.92348e-15; = p2015*p2046/(p0818*1000000000000)
- p2394: 0; = p2234*p2183
- p3056: 3.96592e-9; = p2275*p1132
- p2033: 1.13885e-6; = p2015*p2029*p2031/(p0818*1000)
- p2837: 8.86815e-7; = p2251*(p1020+p1022)
- p2192: 0.000901487; = p1067-p2189-p2190-p2191
- p1866: 0
- p0502: 0; = SQRT(2)*(IF((2*p0370-1)<0;-1;IF((2*p0370-1)>0;1;0))*SQRT(SQRT((2/(pi()*0.140012289)+LN(1-(2*p0370-1)^2)/2)^2-LN(1-(2*p0370-1)^2)/0.140012289)-(2/(pi()*0.140012289)+LN(1-(2*p0370-1)^2)/2)))
- p2972: 3.98247e-5; = p2386*(p1079+p1081)
- p1881: 0
- p2857: 8.7311e-5; = p2271*(p1079+p1081)
- p1684: 0
- p2955: 7.27088e-7; = p2369*(p1020+p1022)
- p2927: 1.82905e-5; = p2341*(p1079+p1081)
- p0939: 5.79101e-9; = p0933*p0001/(p0818*p0002)
- p0480: 0; = SQRT(2)*(IF((2*p0348-1)<0;-1;IF((2*p0348-1)>0;1;0))*SQRT(SQRT((2/(pi()*0.140012289)+LN(1-(2*p0348-1)^2)/2)^2-LN(1-(2*p0348-1)^2)/0.140012289)-(2/(pi()*0.140012289)+LN(1-(2*p0348-1)^2)/2)))
- p3438: 0; = p3362*p1240
- p0323: 0.5
- p5230: 3.87363e-8; = p1851*p3484
- p0536: 0; = SQRT(2)*(IF((2*p0404-1)<0;-1;IF((2*p0404-1)>0;1;0))*SQRT(SQRT((2/(pi()*0.140012289)+LN(1-(2*p0404-1)^2)/2)^2-LN(1-(2*p0404-1)^2)/0.140012289)-(2/(pi()*0.140012289)+LN(1-(2*p0404-1)^2)/2)))
- p3468: 0; = p3373*p1241
- p1847: 0
- p2275: 0.000396592; = p2230*p2221
- p2488: 6.34441e-6; = p2292*p1014
- p2611: 0; = p2415*p1073
- p3065: 0; = p2284*p1023
- p1987: 400
- p3477: 0.00982765; = if(p1328+p1330+p1332+p1334+p1336+p1338+p1340+p1342+p1344=0;0;p1330/(p1328+p1330+p1332+p1334+p1336+p1338+p1340+p1342+p1344))
- p1137: 426646; = if(p1121=0;p1131*(p0716/100)*p0703*1000;0)
- p1803: 0
- p1729: 0
- p2030: 10.68
- p2396: 0; = p2234*p2185
- p1071: 0
- p1828: 0
- p1820: 0
- p1058: 0.225
- p0889: 0; = 1000*p0888*p0001*p0003*p0004/(p0818*p0002)
- p1029: 0; = IF(p1012=0;IF(p0801<p1023*(p0704/100)*p0703*1000;p0801;p1023*(p0704/100)*p0703*1000);0)
- p0952: 1.9468e-5; = if(and(p0683>0;or(p0807=56;p0807=100;and(p0807=60;p0901>0.06)));p0934;0)
- p0982: 0; = if(p0886=0;0;min(1;(p0691*p0690*1000*p0693/100)/p0886))
- p2427: 0; = p2235*p2217
- p2796: 0; = p2405*(p1019+p1021)
- p2334: 7.2417e-6; = p2224*p2202
- p3295: 0.58
- p2668: 0.000233796; = p2277*(p1019+p1021)
- p1037: 0.411884
- p2785: 0; = p2394*(p1019+p1021)
- p1705: 0.453667
- p3159: 0; = p2378*p1082
- p2758: 0.000395631; = p2367*(p1019+p1021)
- p2057: 3.28794
- p0353: 0.5
- p0673: 0
- p3192: 0; = p2411*p1023
- p3485: 4.09144e-7; = p1754*p3476
- p1043: 0.183763
- p2147: 2.93016e-8; = p2015*p2075*p2109/(p0818*1000)
- p0904: 1.99289e9; = p0825*p0901+p0827*p0902+(p0830+p0895)*p0824*p0903
- p1186: 7.3392e-9; = p1182*p1185/p0818
- p4129: 1.29528e-6; = p1780*p3479
- p4414: 0; = p1859*p3480
- p0306: 0.5
- p0994: 0; = p0990*p0001*p0004/(p0818*p0002)
- p2772: 3.52436e-6; = p2381*(p1078+p1080)
- p1974: 2.32758e-6; = p1969*p0001/(p0818*p0002)
- p0236: 0.946
- p1231: 0.0125056; = IF(p1221=0;0;p1230*(p1228+p1229))
- p0668: 0; = IF(p0404<0.5;-SQRT(p0007*EXP(p0536^2*p0008)-p0007);SQRT(p0007*EXP(p0536^2*p0008)-p0007))
- p2313: 0.000178487; = p2231*p2220
- p4498: 0; = p1943*p3480
- p1284: 0; = p1280*p1252/p0818
- p1869: 0
- p4331: 0; = p1776*p3480
- p3502: 6.20941e-6; = p1771*p3476
- p2274: 0.000228223; = p2230*p2220
- p2011: 0.00115639
- p0379: 0.5
- p3039: 0; = p2258*p1082
- p0186: 26.745
- p2303: 5.05924e-5; = p2227*p2210
- p0803: 250000
- p3518: 1.53134e-7; = p1787*p3476
- p2822: 0; = p2431*(p1128+p1130)
- p1059: 0.335
- p2542: 4.1809e-6; = p2346*p1073
- p0965: 0; = IF(p0684/100=1;0;IF(p0684/100+p0685/100>1;1-p0684/100;p0685/100))
- p0135: 131.53
- p3437: 0.00386061; = p3380*p1239
- p0835: 1191.81; = -LN(1-p0669/100)/p0834
- p1830: 0
- p0742: 96.246; = p0082*(1+p0610*p0214/100)
- p3306: 2.33198e8; = if(and(p1232=0;p3252<>0);p3252*(p3257*p3277-p3301)/p3305;0)
- p2289: 0.00604023; = p2223*p2196
- p4926: 0; = p1963*p3482
- p1750: 0
- p2597: 0; = p2401*p1014
- p0894: 0.22
- p5305: 4.93455e-10; = p1926*p3484
- p4326: 0; = p1771*p3480
- p2068: 0.153529
- p3358: 2.90788e7; = if(p1232=0;p3308+p3319+p3330+p3341+p3352;0)
- p2041: 5.85894e-7; = p2015*p2040/(p0818*1000)
- p1551: 0
- p1878: 0
- p0958: 0; = if(and(p0683>0;or(p0807=480;p0807=32;p0807=1;and(p0807=60;p0901<0.03)));p0934;0)
- p1357: 7584
- p0046: 17.86
- p3704: 4.05096e-8; = p1767*p3477
- p4320: 0; = p1765*p3480
- p5322: 2.46728e-10; = p1943*p3484
- p0908: 0.000997792
- p3947: 6.57338e-9; = p1804*p3478
- p0967: 0
- p2763: 4.90504e-5; = p2372*(p1019+p1021)
- p3340: 5.15182e7; = if(and(p1232=0;p3254<>0);p3254*(p3270-p3335)/p3338;0)
- p0238: 3.888
- p2201: 0.00134045; = 12.01*p2200/(2*14.0067)
- p0509: 0; = SQRT(2)*(IF((2*p0377-1)<0;-1;IF((2*p0377-1)>0;1;0))*SQRT(SQRT((2/(pi()*0.140012289)+LN(1-(2*p0377-1)^2)/2)^2-LN(1-(2*p0377-1)^2)/0.140012289)-(2/(pi()*0.140012289)+LN(1-(2*p0377-1)^2)/2)))
- p3335: 0.0141479; = IF(or(p3254=0;p1232>0);0;p3270*(p3280*(p3283*p1256+p3286*(p1253+p1257)+p1258*p3288+p3300*p3287)))
- p0085: 35000.2
- p2339: 0.000503823; = p2228*p2207
- p3131: 4.3024e-9; = p2350*p1132
- p1947: 0
- p0387: 0.5
- p3483: 0.0231703; = if(p1328+p1330+p1332+p1334+p1336+p1338+p1340+p1342+p1344=0;0;p1342/(p1328+p1330+p1332+p1334+p1336+p1338+p1340+p1342+p1344))
- p4363: 0; = p1808*p3480
- p0051: 17.311
- p2915: 1.2362e-7; = p2329*(p1020+p1022)
- p3067: 0; = p2286*p1023
- p0981: 0.000118241; = p0978*p0001/(p0818*p0002)
- p2780: 0.000161966; = p2389*(p1128+p1130)
- p2946: 0.000113769; = p2360*(p1020+p1022)
- p1174: 2.39248e-8; = p1170*p1173/p0818
- p0331: 0.5
- p2521: 1.2037e-5; = p2325*p1014
- p0875: 0; = p0874*p0001*p0003/(p0818*p0002)
- p3620: 7.75724e-6; = p1889*p3476
- p1079: 0.49653; = IF(p1071=0;IF(p1073+p1078=1;0;IF(p1073+p1078+p1075>1;1-(p1073+p1078);p1075));0)
- p3383: 0; = p3364*p1234
- p2580: 9.99237e-7; = p2384*p1073
- p2771: 8.16263e-6; = p2380*(p1078+p1080)
- p1710: 0
- p3309: 2.25873e7; = if(and(p1232=0;p3252<>0);p3252*(p3260-p3304)/p3305;0)
- p3533: 3.85192e-6; = p1802*p3476
- p4625: 1.99093e-9; = p1864*p3481
- p3945: 3.22424e-5; = p1802*p3478
- p3106: 0; = p2325*p1023
- p2968: 8.44988e-5; = p2382*(p1079+p1081)
- p1277: 0
- p0452: 0; = SQRT(2)*(IF((2*p0320-1)<0;-1;IF((2*p0320-1)>0;1;0))*SQRT(SQRT((2/(pi()*0.140012289)+LN(1-(2*p0320-1)^2)/2)^2-LN(1-(2*p0320-1)^2)/0.140012289)-(2/(pi()*0.140012289)+LN(1-(2*p0320-1)^2)/2)))
- p3465: 0; = p3370*p1241
- p2478: 0.000451524; = p2282*p1014
- p0646: 0; = IF(p0382<0.5;-SQRT(p0007*EXP(p0514^2*p0008)-p0007);SQRT(p0007*EXP(p0514^2*p0008)-p0007))
- p1102: 0.0149443; = IF(p1071=0;IF(p1096+p1101=1;0;IF(p1096+p1101+p1098>1;1-(p1096+p1101);p1098));0)
- p0834: 0.00038
- p2616: 0; = p2420*p1073
- p3272: 0.0398246
- p2350: 0.00043024; = p2232*p2218
- p1656: 0
- p1291: 0; = IF(p1287+p1290=p1264;0;IF(p1287+p1290+p1289>p1264;p1264-(p1287+p1290);p1289))
- p0226: 77.781
- p2891: 1.23785e-6; = p2305*(p1079+p1081)
- p2137: 2.31783e-8; = p2015*p2065*p2099/(p0818*1000)
- p3166: 0; = p2385*p1082
- p0761: 0
- p2735: 1.97343e-7; = p2344*(p1078+p1080)
- p1735: 0.749667
- p1242: 398576; = if(p1232>0;0;p1234*(p0725/100)*p0723*1000)
- p3380: 0.114017; = p3251/p0818
- p2072: 0.134
- p5089: 2.65971e-9; = p1916*p3483
- p2779: 9.98342e-6; = p2388*(p1078+p1080)
- p0922: 0.00812677; = p0677*1000/p0801
- p1778: 0
- p2904: 7.09886e-6; = p2318*(p1020+p1022)
- p3460: 0; = p3365*p1241
- p3414: 0.000222493; = p3376*p1238
- p2604: 0; = p2408*p1014
- p0919: 0.367883; = p0678*1000/p0801
- p2229: 0.0893349; = if(p0774*p0778+p0775*p0779+p0776*p0780+p0777*p0781=0;0;p0781*p0777/(p0774*p0778+p0775*p0779+p0776*p0780+p0777*p0781))
- p0067: 73.321
- p0731: 17.312; = p0071*(1+p0599*p0203/100)
- p1258: 1; = if(p1232>0;0;IF(p1253+p1256+p1257=1;0;1-(p1253+p1256+p1257)))
- p2916: 2.02903e-7; = p2330*(p1020+p1022)
- p1796: 0
- p1306: 0.00453461; = p1302*p1252/p0818
- p1289: 0
- p2808: 0; = p2417*(p1078+p1080)

- p0697: 0
- p1846: 0
- p2905: 1.72439e-5; = p2319*(p1020+p1022)
- p1085: 5.21991e6; = IF(p1071=0;p1079*(p0710/100)*p0703*1000;0)
- p0542: 0; = IF(p0278<0.5;-SQRT(p0007*EXP(p0410^2*p0008)-p0007);SQRT(p0007*EXP(p0410^2*p0008)-p0007))
- p0814: 0; = if(p0807=480;p0810*p0812+p0811*p0813;0)
- p1937: 0
- p1922: 0
- p1624: 0
- p2518: 5.16734e-6; = p2322*p1014
- p5032: 1.45075e-9; = p1859*p3483
- p3455: 0; = p3379*p1240
- p1662: 0
- p3279: 0.37
- p2210: 0.00013506; = 6*1.00794*p2208/30.973762
- p0089: 23.063
- p3354: 5.22796e6; = IF((p3350+p3351+p3352+p3353)+IF(p3349=0;0;(p3256*(p3273*(1-p3277))/p3349))>p3256;p3256-(p3350+p3351+p3352+p3353);IF(p3349=0;0;p3256*(p3273*(1-p3277))/p3349))
- p5187: 3.34069e-7; = p1808*p3484
- p3142: 0; = p2361*p1023
- p3177: 0; = p2396*p1023
- p0827: 3.15e9; = p0818*p0819*p0823
- p0820: 0; = if(p0807=480;p0814;0)
- p3792: 9.12748e-9; = p1855*p3477
- p1963c: 4.0801e-5; = p1588*p1792+p1589*p1793+p1590*p1794+p1591*p1795+p1592*p1796+p1593*p1797+p1594*p1798+p1595*p1799+p1596*p1800+p1597*p1801+p1598*p1802+p1599*p1803+p1600*p1804+p1601*p1805+p1602*p1806+p1603*p1807+p1604*p1808+p1605*p1809+p1606*p1810+p1607*p1811
- p2113: 0.832356
- p0087: 0.785
- p2398: 0; = p2234*p2187
- p2384: 5.77227e-6; = p2229*p2213
- p1293: 0; = p1287*p1252/p0818
- p3739: 5.03037e-7; = p1802*p3477
- p0988: 0; = p0982*p0886
- p0462: 0; = SQRT(2)*(IF((2*p0330-1)<0;-1;IF((2*p0330-1)>0;1;0))*SQRT(SQRT((2/(pi()*0.140012289)+LN(1-(2*p0330-1)^2)/2)^2-LN(1-(2*p0330-1)^2)/0.140012289)-(2/(pi()*0.140012289)+LN(1-(2*p0330-1)^2)/2)))
- p1831: 0
- p2713: 3.95188e-6; = p2322*(p1019+p1021)
- p0498: 0; = SQRT(2)*(IF((2*p0366-1)<0;-1;IF((2*p0366-1)>0;1;0))*SQRT(SQRT((2/(pi()*0.140012289)+LN(1-(2*p0366-1)^2)/2)^2-LN(1-(2*p0366-1)^2)/0.140012289)-(2/(pi()*0.140012289)+LN(1-(2*p0366-1)^2)/2)))
- p1824: 0
- p1447: 89
- p2614: 0; = p2418*p1073
- p0709: 25.234; = p0049*(1+p0577*p0181/100)
- p1337: 0; = p1336*p0001/(p0818*p0002)
- p3550: 8.43417e-7; = p1819*p3476
- p2226: 0.426736; = if(p0774*p0778+p0775*p0779+p0776*p0780+p0777*p0781=0;0;p0778*p0774/(p0774*p0778+p0775*p0779+p0776*p0780+p0777*p0781))
- p2167: 0.142878; = p2166*(p0898)
- p1594: 0
- p2889: 2.70563e-5; = p2303*(p1079+p1081)
- p3151: 0; = p2370*p1023
- p4059: 7.23071e-8; = p1916*p3478
- p2838: 1.45557e-6; = p2252*(p1020+p1022)
- p1692: 0.454882
- p0477: 0; = SQRT(2)*(IF((2*p0345-1)<0;-1;IF((2*p0345-1)>0;1;0))*SQRT(SQRT((2/(pi()*0.140012289)+LN(1-(2*p0345-1)^2)/2)^2-LN(1-(2*p0345-1)^2)/0.140012289)-(2/(pi()*0.140012289)+LN(1-(2*p0345-1)^2)/2)))
- p3225: 0.000494856; = p3221*p1229
- p0574: 0; = IF(p0310<0.5;-SQRT(p0007*EXP(p0442^2*p0008)-p0007);SQRT(p0007*EXP(p0442^2*p0008)-p0007))
- p0103: 12699.8
- p2080: 0.025
- p2873: 0.00106112; = p2287*(p1020+p1022)
- p2481: 2.21371e-5; = p2285*p1014
- p1609: 0
- p4151: 1.11073e-5; = p1802*p3479
- p1251: 4.28666e-8; = if(p1232>0;0;p1246*p0001/(p0818*p0002))
- p1288: 0
- p1718: 0
- p3119: 0; = p2338*p1082
- p0227: 6.889
- p1103: 0.663396; = IF(p1071=0;IF(p1096+p1101+p1102=1;0;IF(p1096+p1101+p1102+p1099>1;1-(p1096+p1101+p1102);p1099));0)
- p2564: 4.23301e-7; = p2368*p1014
- p2492: 0.000439516; = p2296*p1014
- p1335: 7.51537e-5; = p1334*p0001/(p0818*p0002)
- p2153: 8.01018e-10; = p2015*p2081*p2115/(p0818*1000)
- p2943: 2.54383e-5; = p2357*(p1020+p1022)
- p3471: 8.07179e-7; = p3376*p1241
- p3096: 0; = p2315*p1023
- p2399: 0; = p2234*p2188
- p1108: 4.0906e6; = IF(p1071=0;p1105*p1102*p1095;0)
- p2930: 3.61305e-7; = p2344*(p1079+p1081)
- p2202: 0.000192921; = 4*1.00794*p2201/(2*14.0067)
- p2866: 0.000256643; = p2280*(p1020+p1022)
- p3024: 0; = p2243*p1023
- p4719: 0; = p1962*p3481
- p3252: 5.9245e8; = p1252*(p1267*(1-p3247)+p1270*(1-p3248)+p1271*(1-p3249)+p1272*(1-p3250))
- p1156: 0.0684547; = p1064+p1065+p1066+p1067+p1068+p1069+p1070+p1116+p1117+p1118+p1119+p1120+p1154+p1155
- p2562: 5.23331e-5; = p2366*p1014
- p5181: 1.2102e-6; = p1802*p3484
- p1292: 0.40445; = IF(p1287+p1290+p1291=p1261;0;p1261-(p1287+p1290+p1291))
- p0679: 3593.51; = p0019*(1+p0547*p0151/100)
- p1119: 0.00877177; = IF(p1071=0;p1109/(p1114*p0818);0)
- p2826: 5.09252e-5; = p2240*(p1020+p1022)
- p1763: 0
- p0950: 0; = if(and(p0683=0;or(p0807=480;p0807=32;p0807=1;and(p0807=60;p0901<0.03)));p0938;0)
- p2901: 9.79232e-5; = p2315*(p1020+p1022)
- p2173: 0.0572899; = p0895*p0898/p0818
- p3914: 5.19757e-5; = p1771*p3478
- p2557: 1.85168e-5; = p2361*p1014
- p1150: 6.06414e8; = if(p1121=0;p1149*p1146*p1145;0)
- p3069: 0; = p2288*p1023
- p1561: 0.52337
- p1995: 50
- p1220: 0; = IF(p1218<0.5;-SQRT(p1214*EXP(p1219^2*p1215)-p1214);SQRT(p1214*EXP(p1219^2*p1215)-p1214))
- p3046: 0; = p2265*p1082
- p0903: 0.0106556
- p0189: 36.142
- p3403: 0; = p3365*p1238
- p0984: 0; = if(p0886=0;0;min(1;(p0699*p0698*1000*p0701/100)/p0886))
- p2208: 0.000691728; = p1110/p0818
- p2310: 0.000143313; = p2227*p2217
- p1562: 0
- p3215: 0.450791; = p1222*3*15.9994/100.0869
- p1208: 0; = p1205*p0818*p0822/p0801
- p1305: 0; = p1301*p1252/p0818
- p1161: 729096; = (p0722/100)*p0702*1000
- p1814: 0
- p2684: 0.000475183; = p2293*(p1019+p1021)
- p3432: 3.57536e-5; = p3375*p1239
- p0601: 0; = IF(p0337<0.5;-SQRT(p0007*EXP(p0469^2*p0008)-p0007);SQRT(p0007*EXP(p0469^2*p0008)-p0007))
- p2379: 6.17954e-5; = p2229*p2208
- p5288: 3.70092e-9; = p1909*p3484
- p0936: 2.08507e-5; = p0930*p0001/(p0818*p0002)
- p0715: 3.826; = p0055*(1+p0583*p0187/100)
- p0367: 0.5
- p2858: 0.00167172; = p2272*(p1129+p1131)
- p3363: 0; = if(p1232=0;p3244*p3357/p0818;0)
- p2305: 2.31464e-6; = p2227*p2212
- p3144: 0; = p2363*p1023
- p3278: 0.46
- p0801: 1.27e7
- p1891: 0
- p3880: 1.02556e-10; = p1943*p3477
- p3222: 0.224242; = IF(p3216=0;0;p1223*40.078/100.0869)
- p2733: 4.31345e-6; = p2342*(p1078+p1080)
- p1894: 0
- p2645: 0.00022904; = p2254*(p1019+p1021)
- p3081: 0; = p2300*p1082
- p3476: 0.0752536; = if(p1328+p1330+p1332+p1334+p1336+p1338+p1340+p1342+p1344=0;0;p1328/(p1328+p1330+p1332+p1334+p1336+p1338+p1340+p1342+p1344))
- p1652: 0
- p3319: 6.58094e6; = if(and(p1232=0;p3253<>0);p3253*(p3263-p3314)/p3316;0)
- p2377: 4.95795e-5; = p2229*p2206
- p0482: 0; = SQRT(2)*(IF((2*p0350-1)<0;-1;IF((2*p0350-1)>0;1;0))*SQRT(SQRT((2/(pi()*0.140012289)+LN(1-(2*p0350-1)^2)/2)^2-LN(1-(2*p0350-1)^2)/0.140012289)-(2/(pi()*0.140012289)+LN(1-(2*p0350-1)^2)/2)))
- p3427: 0; = p3370*p1239
- p2212: 6.17909e-6; = p1106/p0818
- p4458: 0; = p1903*p3480
- p2175: 0.000124615; = p0895*p0908/p0818
- p1597: 0
- p1570: 0
- p2618: 0; = p2422*p1073
- p2243: 0.000611835; = p2222*p2188
- p2844: 0.000432455; = p2258*(p1079+p1081)
- p2463: 4.77317e-6; = p2267*p1073
- p3138: 0; = p2357*p1023
- p0195: 0
- p3002: 0; = p2416*(p1079+p1081)
- p2860: 0.000126878; = p2274*(p1129+p1131)
- p0698: 0
- p4032: 6.49318e-5; = p1889*p3478
- p1250: 0; = if(p1232>0;0;p1245*p0001/(p0818*p0002))
- p3076: 0; = p2295*p1023
- p4007: 5.91604e-8; = p1864*p3478
- p1804: 1.04355e-8; = p1396*1000/p0818
- p2981: 0; = p2395*(p1020+p1022)
- p1902: 0
- p2631: 3.72161e-5; = p2240*(p1019+p1021)
- p1155: 0.00131491; = if(p1153*p0818=0;0;p1151/(p1153*p0818))
- p1772: 0
- p2318: 1.90702e-5; = p2224*p2185
- p5337: 0; = p1962*p3484
- p1070: 0.00687165; = IF(p1012=0;p1056/(p1063*p0818);0)
- p2165: 0.483704; = (p0833-p2014)/p0818-p0839
- p2448: 1.39089e-6; = p2252*p1014
- p2841: 0.000134366; = p2255*(p1020+p1022)
- p0205: 8.66
- p3228: 0.00169002; = p3224*p1229
- p0128: 41.138
- p1879: 0
- p1329: 2.60628e-5; = p1328*p0001/(p0818*p0002)
- p1875: 0
- p2524: 0.000144363; = p2328*p1014
- p3130: 0; = p2349*p1082
- p1557: 0
- p0832: 3.00812e10; = p0831*p0830/(1-p0831)
- p1976: 0.172
- p0061: 4.141
- p2588: 1.02203e-5; = p2392*p1123
- p2848: 0.000157862; = p2262*(p1079+p1081)
- p2055: 5.59471
- p1688: 0
- p0175: 0
- p1689: 0
- p3387: 0; = p3368*p1234
- p2346: 2.41517e-5; = p2228*p2214
- p1690: 0
- p0403: 0.5
- p2089: 0.40001
- p2605: 0; = p2409*p1014
- p3101: 0; = p2320*p1023
- p3247: 0
- p1213: 56
- p1768: 0
- p2654: 3.89913e-5; = p2263*(p1078+p1080)
- p3110: 0; = p2329*p1023
- p3322: 0; = if(and(p1232=0;p3253<>0);p3253-(p3317+p3318+p3319+p3320+p3321);0)
- p0805: 0
- p2237: 0.0018871; = p2222*p2182
- p5002: 2.52673e-7; = p1829*p3483
- p0696: 0
- p0617: 0; = IF(p0353<0.5;-SQRT(p0007*EXP(p0485^2*p0008)-p0007);SQRT(p0007*EXP(p0485^2*p0008)-p0007))
- p2592: 0; = p2396*p1014
- p2024: 0.748682
- p0771: 19.471; = p0111*(1+p0639*p0243/100)
- p0450: 0; = SQRT(2)*(IF((2*p0318-1)<0;-1;IF((2*p0318-1)>0;1;0))*SQRT(SQRT((2/(pi()*0.140012289)+LN(1-(2*p0318-1)^2)/2)^2-LN(1-(2*p0318-1)^2)/0.140012289)-(2/(pi()*0.140012289)+LN(1-(2*p0318-1)^2)/2)))
- p0929: 4.67212e6; = p0801*p0923
- p2306: 2.42038e-5; = p2227*p2213
- p0649: 0; = IF(p0385<0.5;-SQRT(p0007*EXP(p0517^2*p0008)-p0007);SQRT(p0007*EXP(p0517^2*p0008)-p0007))
- p0308: 0.5
- p0109: 42.622
- p0014: 465.347
- p0216: 12.099
- p1535: 1
- p0850: 0.326261
- p4966: 1.95126e-7; = p1793*p3483
- p1789: 0
- p1815: 0
- p1101: 0.0773317; = IF(p1071=0;IF(p1096=1;0;IF(p1096+p1097>1;1-p1096;p1097));0)
- p0235: 0
- p0115: 57.671
- p4245: 1.29075e-7; = p1896*p3479
- p2403: 0; = p2234*p2192
- p1495: 161
- p2757: 4.00233e-5; = p2366*(p1019+p1021)
- p0180: 15.24
- p2572: 2.65041e-5; = p2376*p1073
- p3103: 0; = p2322*p1023
- p1985: 4.62513e9; = (if(p1057=0;0;p1050/p1057)+if(p1058=0;0;p1051/p1058)+if(p1059=0;0;p1052/p1059)+if(p1060=0;0;p1053/p1060)+if(p1061=0;0;p1054/p1061)+if(p1062=0;0;p1055/p1062)+if(p1063=0;0;p1056/p1063))*(1+p1157)
- p2708: 1.50615e-6; = p2317*(p1019+p1021)
- p1973: 0; = if(p0807=480;p1968*p0001/(p0818*p0002);0)
- p3313: 0.0182858; = if(and(p1232=0;p3253<>0);p3262*(p3278*(p3282*p1256+p3286*(p1253+p1257)+p1258*p3288+p3298*p3287));0)
- p5221: 1.48037e-9; = p1842*p3484
- p1734: 0.7899
- p2799: 0; = p2408*(p1019+p1021)
- p2489: 0.000621333; = p2293*p1014
- p0888: 0; = p0686*1000*p0687*p0884/100
- p1687: 0
- p1996: 30
- p3188: 0; = p2407*p1023
- p1963i: 8.46623e-8; = p1706*p1910+p1707*p1911+p1708*p1912+p1709*p1913+p1710*p1914+p1711*p1915+p1712*p1916+p1713*p1917+p1714*p1918+p1715*p1919+p1716*p1920+p1717*p1921+p1718*p1922+p1719*p1923+p1720*p1924+p1721*p1925+p1722*p1926+p1723*p1927+p1724*p1928
- p3433: 1.02748e-5; = p3376*p1239
- p1115: 0.237849
- p2197: 8.84695e-6; = p1055/p0818
- p1240: 0; = if(p1232>0;0;IF(p1234+p1238+p1239=1;0;IF(p1234+p1238+p1239+p1237>1;1-(p1234+p1238+p1239);p1237)))
- p0775: 57.671; = p0115*(1+p0643*p0247/100)
- p3395: 6.98756e-5; = p3376*p1234
- p5144: 1.87118e-6; = p1765*p3484
- p1221: 0.155559; = p1216*(1+p1220*p1217/100)
- p1134: 2.86052e6; = if(p1121=0;p1128*(p0716/100)*p0703*1000;0)
- p3206: 0; = p2425*p1082
- p0467: 0; = SQRT(2)*(IF((2*p0335-1)<0;-1;IF((2*p0335-1)>0;1;0))*SQRT(SQRT((2/(pi()*0.140012289)+LN(1-(2*p0335-1)^2)/2)^2-LN(1-(2*p0335-1)^2)/0.140012289)-(2/(pi()*0.140012289)+LN(1-(2*p0335-1)^2)/2)))
- p3412: 0.00427356; = p3374*p1238
- p2121: 0.822447
- p1307: 0
- p4239: 5.2083e-8; = p1890*p3479
- p3120: 0; = p2339*p1082
- p2683: 4.85208e-6; = p2292*(p1019+p1021)
- p2238: 0.000414241; = p2222*p2183
- p0856: 1.27e7; = p0801
- p1681: 0
- p1340: 0; = p1325*p0801
- p1553: 0
- p1167: 0.5
- p1054: 4.88947e8; = IF(p1012=0;p1047*p1036;0)
- p2538: 2.55632e-6; = p2342*p1073
- p3895: 0; = p1962*p3477
- p4153: 2.26448e-9; = p1804*p3479
- p1912: 0
- p5268: 2.43718e-6; = p1889*p3484
- p4953: 1.38305e-7; = p1780*p3483
- p2736: 2.06359e-6; = p2345*(p1078+p1080)
- p2532: 3.58662e-5; = p2336*p1073
- p0389: 0.5
- p1954: 0
- p2341: 3.42013e-5; = p2228*p2209
- p2766: 4.94482e-5; = p2375*(p1078+p1080)
- p0809: 2000
- p3410: 0; = p3372*p1238
- p0457: 0; = SQRT(2)*(IF((2*p0325-1)<0;-1;IF((2*p0325-1)>0;1;0))*SQRT(SQRT((2/(pi()*0.140012289)+LN(1-(2*p0325-1)^2)/2)^2-LN(1-(2*p0325-1)^2)/0.140012289)-(2/(pi()*0.140012289)+LN(1-(2*p0325-1)^2)/2)))
- p3473: 1.9951e-5; = p3378*p1241
- p1816: 0
- p2546: 6.18255e-5; = p2350*p1123
- p2195: 0.00109375; = p2194*p2193
- p2364: 0.000121261; = p2225*p2192
- p0066: 23.027
- p3440: 0; = p3364*p1240
- p3453: 0; = p3377*p1240
- p1723: 0
- p0634: 0; = IF(p0370<0.5;-SQRT(p0007*EXP(p0502^2*p0008)-p0007);SQRT(p0007*EXP(p0502^2*p0008)-p0007))
- p2477: 3.52956e-5; = p2281*p1014
- p1324: 0.0620909; = IF(((p0745*1000*p0751/100)+(p0754*1000*p0760/100))/p0801<0;0;((p0745*1000*p0751/100)+(p0754*1000*p0760/100))/p0801)
- p0045: 35.571
- p3220: 0.00129865; = p3216*p1228
- p2842: 1.93383e-5; = p2256*(p1020+p1022)
- p2624: 0; = p2428*p1123
- p0517: 0; = SQRT(2)*(IF((2*p0385-1)<0;-1;IF((2*p0385-1)>0;1;0))*SQRT(SQRT((2/(pi()*0.140012289)+LN(1-(2*p0385-1)^2)/2)^2-LN(1-(2*p0385-1)^2)/0.140012289)-(2/(pi()*0.140012289)+LN(1-(2*p0385-1)^2)/2)))
- p1342: 861907; = p1326*p0801
- p2853: 1.47458e-5; = p2267*(p1079+p1081)
- p1111: 0.0872841
- p2576: 4.83749e-6; = p2380*p1073
- p2204: 0.00189495; = p1109/p0818
- p1685: 0.491852
- p2309: 1.59903e-5; = p2227*p2216
- p2426: 0; = p2235*p2216
- p2657: 7.70222e-7; = p2266*(p1078+p1080)
- p1331: 3.40363e-6; = p1330*p0001/(p0818*p0002)
- p0492: 0; = SQRT(2)*(IF((2*p0360-1)<0;-1;IF((2*p0360-1)>0;1;0))*SQRT(SQRT((2/(pi()*0.140012289)+LN(1-(2*p0360-1)^2)/2)^2-LN(1-(2*p0360-1)^2)/0.140012289)-(2/(pi()*0.140012289)+LN(1-(2*p0360-1)^2)/2)))
- p2051: 1.2044e-5; = p2015*p2049*p2050/(p0818*1000)
- p1034: 2.91225e-5; = IF(p1012=0;p1028*p0001/(p0818*p0002);0)
- p2729: 1.77247e-5; = p2338*(p1078+p1080)
- p2828: 1.78036e-5; = p2242*(p1020+p1022)
- p1724: 0
- p2443: 8.63496e-5; = p2247*p1014
- p1610: 0
- p1195: 0.45
- p5024: 3.79614e-8; = p1851*p3483
- p0215: 3.457
- p2814: 0; = p2423*(p1078+p1080)
- p2761: 1.16824e-6; = p2370*(p1019+p1021)
- p0729: 0
- p0349: 0.5
- p3448: 0; = p3372*p1240
- p0893: 0.114068; = 1000*(p0890+p0892)*p0001*p0003*p0004/(p0818*p0002)
- p0413: 0; = SQRT(2)*(IF((2*p0281-1)<0;-1;IF((2*p0281-1)>0;1;0))*SQRT(SQRT((2/(pi()*0.140012289)+LN(1-(2*p0281-1)^2)/2)^2-LN(1-(2*p0281-1)^2)/0.140012289)-(2/(pi()*0.140012289)+LN(1-(2*p0281-1)^2)/2)))
- p2480: 8.80293e-5; = p2284*p1014
- p3254: 6.31284e8; = p1252*(p1287*(1-p3247)+p1290*(1-p3248)+p1291*(1-p3249)+p1292*(1-p3250))
- p2911: 1.25967e-5; = p2325*(p1020+p1022)
- p1531: 34
- p1604: 0.92902
- p3090: 0; = p2309*p1082
- p5037: 2.17613e-9; = p1864*p3483
- p1802: 5.11859e-5; = p1394*1000/p0818
- p2964: 0.000220149; = p2378*(p1079+p1081)
- p2956: 1.59858e-6; = p2370*(p1020+p1022)
- p1311: 0; = IF(p1307+p1310=p1266;0;IF(p1307+p1310+p1309>p1266;p1266-(p1307+p1310);p1309))
- p2810: 0; = p2419*(p1078+p1080)
- p1963j: 4.03196e-6; = p1725*p1929+p1726*p1930+p1727*p1931+p1728*p1932+p1729*p1933+p1730*p1934+p1731*p1935+p1732*p1936+p1733*p1937+p1734*p1938+p1735*p1939+p1736*p1940+p1737*p1941+p1738*p1942+p1739*p1943+p1740*p1944+p1741*p1945+p1742*p1946+p1743*p1947
- p3311: 4.07045e7; = if(and(p1232=0;p3252<>0);p3252-(p3306+p3307+p3308+p3309+p3310);0)
- p0901: 0.0177532
- p2749: 4.51578e-5; = p2358*(p1019+p1021)
- p2587: 5.88137e-6; = p2391*p1123
- p1694: 0
- p2222: 0.269281; = if(p0765*p0769+p0766*p0770+p0767*p0771+p0768*p0772=0;0;p0769*p0765/(p0765*p0769+p0766*p0770+p0767*p0771+p0768*p0772))
- p0376: 0.5
- p3478: 0.629908; = if(p1328+p1330+p1332+p1334+p1336+p1338+p1340+p1342+p1344=0;0;p1332/(p1328+p1330+p1332+p1334+p1336+p1338+p1340+p1342+p1344))
- p0687: 0
- p0977: 0; = IF(p0687=0;IF(OR(p0686=0;p0688=0);0;p0686*1000*p0688/100);0)
- p1983: 50
- p2322: 1.45268e-5; = p2224*p2189
- p3378: 0.00750039; = if(p1232=0;p3246*p3360/p0818;0)
- p2825: 1.47847e-5; = p2239*(p1020+p1022)
- p1963h: 1.74457e-6; = p1686*p1890+p1687*p1891+p1688*p1892+p1689*p1893+p1690*p1894+p1691*p1895+p1692*p1896+p1693*p1897+p1694*p1898+p1695*p1899+p1696*p1900+p1697*p1901+p1698*p1902+p1699*p1903+p1700*p1904+p1701*p1905+p1702*p1906+p1703*p1907+p1704*p1908+p1705*p1909
- p1214: 55; = IF(p1213=0;0;p1213-1)
- p0969: 2.20209e8; = p0966*p0964*p0683*p0682*1000
- p0273: 0.5
- p1702: 0
- p0623: 0; = IF(p0359<0.5;-SQRT(p0007*EXP(p0491^2*p0008)-p0007);SQRT(p0007*EXP(p0491^2*p0008)-p0007))
- p0129: 18.017
- p2640: 8.01231e-5; = p2249*(p1019+p1021)
- p0146: 0
- p0088: 66.031
- p3146: 0; = p2365*p1023
- p0964: 0.000622222; = 56/90000
- p2442: 1.06701e-5; = p2246*p1014
- p2924: 3.24512e-5; = p2338*(p1079+p1081)
- p0811: 0; = if(p0807=480;1-p0810;0)
- p0091: 2.253
- p2862: 0.0014574; = p2276*(p1020+p1022)
- p3369: 0; = if(p1232=0;p3245*p3357/p0818;0)
- p3691: 5.34316e-8; = p1754*p3477
- p1978: 52
- p2922: 0.000110802; = p2336*(p1079+p1081)
- p0690: 0
- p1898: 0
- p2365: 0.00068633; = p2225*p2193
- p3136: 0; = p2355*p1023
- p1621: 0
- p1809: 0
- p2744: 1.70431e-5; = p2353*(p1128+p1130)
- p0770: 72.034; = p0110*(1+p0638*p0242/100)
- p2006: 0.235308; = ((p1980*p1985+p1986*p1991+p1992*p1997+p2000*p2005)/p0818)*p0005*p0002/1000
- p1121: 0
- p0152: 0
- p1645: 0
- p2349: 4.18304e-5; = p2228*p2217
- p1837: 0
- p3353: 1.29914e6; = if(and(p1232=0;p3256<>0);p3256*(p3276-p3348)/p3349;0)
- p2571: 2.9305e-5; = p2375*p1073
- p1232: 0
- p0064: 3.607
- p1566: 0
- p4612: 3.47307e-8; = p1851*p3481
- p3459: 0; = p3364*p1241
- p0007: 14; = p0006-1
- p1779: 0
- p1759: 0
- p4938: 1.83375e-6; = p1765*p3483
- p2311: 0.0023517; = p2231*p2218
- p1896: 5.94821e-7; = p1488*1000/p0818
- p3268: 0.0232481
- p1962: 0; = p1960*1000/p0818
- p2490: 0.00026638; = p2294*p1014
- p0269: 10.556
- p3640: 1.17796e-8; = p1909*p3476
- p2555: 8.49816e-6; = p2359*p1014
- p2692: 7.56877e-5; = p2301*(p1078+p1080)
- p2756: 0.000186709; = p2365*(p1019+p1021)
- p1596: 0
- p0978: 1.27e7; = p0801
- p2975: 0.000299795; = p2389*(p1129+p1131)
- p1812: 0
- p3291: 0.437
- p2262: 0.000295185; = p2226*p2208
- p1620: 0
- p1670: 0
- p0591: 0; = IF(p0327<0.5;-SQRT(p0007*EXP(p0459^2*p0008)-p0007);SQRT(p0007*EXP(p0459^2*p0008)-p0007))
- p0338: 0.5
- p2864: 3.06735e-5; = p2278*(p1020+p1022)
- p1844: 0
- p0900: 0.609814; = p0899/p0818
- p3143: 0; = p2362*p1023
- p2534: 1.05043e-5; = p2338*p1073
- p2071: 0.151
- p1715: 0
- p2656: 0.000220464; = p2265*(p1078+p1080)
- p1728: 0
- p0203: 13.869
- p1530: 9
- p2687: 0.000336133; = p2296*(p1019+p1021)
- p1859: 6.26127e-8; = p1451*1000/p0818
- p2317: 5.5365e-6; = p2224*p2184
- p1075: 0.49653; = IF(p1071=0;p0713/100;0)
- p4039: 3.74682e-7; = p1896*p3478
- p1166: 6.40421e-7; = p1164/p0818
- p2095: 0.765734
- p2009: 0.00419379; = ((p1983*p1985+p1989*p1991+p1995*p1997+p2003*p2005+p1976*p1977+p1978*p1979+p1998*p1999)/p0818)*p0005*p0002/1000
- p0954: 2.08507e-5; = if(and(p0683>0;or(p0807=56;p0807=100;and(p0807=60;p0901>0.06)));p0936;0)
- p0778: 38.659; = p0118*(1+p0646*p0250/100)
- p3261: 0.908439
- p0361: 0.5
- p0757: 14.594; = p0097*(1+p0625*p0229/100)
- p2701: 4.18617e-5; = p2310*(p1078+p1080)
- p2769: 0.000120244; = p2378*(p1078+p1080)
- p1169: 0.000361047
- p2434: 0.00014735; = p2238*p1014
- p2152: 1.02452e-8; = p2015*p2080*p2114/(p0818*1000)
- p1648: 0
- p0501: 0; = SQRT(2)*(IF((2*p0369-1)<0;-1;IF((2*p0369-1)>0;1;0))*SQRT(SQRT((2/(pi()*0.140012289)+LN(1-(2*p0369-1)^2)/2)^2-LN(1-(2*p0369-1)^2)/0.140012289)-(2/(pi()*0.140012289)+LN(1-(2*p0369-1)^2)/2)))
- p0923: 0.367883; = IF(p0918=1;0;IF(p0918+p0919>1;1-p0918;p0919))
- p2221: 0.000834622; = p1155-p2220
- p0615: 0; = IF(p0351<0.5;-SQRT(p0007*EXP(p0483^2*p0008)-p0007);SQRT(p0007*EXP(p0483^2*p0008)-p0007))
- p3447: 0; = p3371*p1240
- p3149: 0; = p2368*p1023
- p2086: 0.0617647
- p2348: 4.66729e-6; = p2228*p2216
- p3458: 0; = p3363*p1241
- p2062: 3.76588
- p1182: 1406.59; = p1181*p0801
- p0785: 28.785; = p0125*(1+p0653*p0257/100)
- p0836: 8.36971e9; = p0831*p0835*p0801/(1-p0831)
- p0780: 20.165; = p0120*(1+p0648*p0252/100)
- p3185: 0; = p2404*p1023
- p2670: 7.72113e-5; = p2279*(p1019+p1021)
- p1601: 0
- p2234: 0; = 1-(p2222+p2223+p2224+p2225)
- p0804: 0
- p4069: 1.31468e-8; = p1926*p3478
- p3372: 0; = if(p1232=0;p3245*p3360/p0818;0)
- p0545: 0; = IF(p0281<0.5;-SQRT(p0007*EXP(p0413^2*p0008)-p0007);SQRT(p0007*EXP(p0413^2*p0008)-p0007))
- p3058: 0; = p2277*p1023
- p2990: 0; = p2404*(p1020+p1022)
- p2342: 1.4767e-5; = p2228*p2210
- p0044: 97.607
- p1274: 0; = p1270*p1252/p0818
- p3198: 0; = p2417*p1082
- p1783: 0
- p0642: 0; = IF(p0378<0.5;-SQRT(p0007*EXP(p0510^2*p0008)-p0007);SQRT(p0007*EXP(p0510^2*p0008)-p0007))
- p4002: 3.94403e-8; = p1859*p3478
- p0256: 11.053
- p2710: 1.26018e-5; = p2319*(p1019+p1021)
- p1903: 1.68011e-6; = p1495*1000/p0818
- p1936: 0
- p4616: 1.96881e-8; = p1855*p3481
- p0718: 27.764; = p0058*(1+p0586*p0190/100)
- p1400: 1354
- p3446: 0; = p3370*p1240
- p1989: 50
- p1910: 0
- p3064: 0; = p2283*p1023
- p4515: 1.15253e-7; = p1754*p3481
- p0246: 12.24
- p4760: 0; = p1793*p3482
- p2855: 0.000190235; = p2269*(p1079+p1081)
- p1587: 0
- p3323: 0.222117; = if(and(p1232=0;p3255<>0);p3265*p3277*(p3299*p3291+(1-p3299)*p3295);0)
- p2874: 0.000227463; = p2288*(p1020+p1022)
- p3936: 5.30471e-6; = p1793*p3478
- p1052: 1.18257e8; = IF(p1012=0;p1045*p1036;0)
- p1177: 0.000118241; = p0801*p0001/(p0818*p0002)
- p4927: 1.25974e-7; = p1754*p3483
- p2266: 2.63684e-6; = p2226*p2212
- p1577: 0
- p0822: 0.879667
- p1631: 0
- p5133: 1.28545e-7; = p1754*p3484
- p0721: 4.141; = p0061*(1+p0589*p0193/100)
- p0724: 3.607; = p0064*(1+p0592*p0196/100)
- p2140: 6.97375e-8; = p2015*p2068*p2102/(p0818*1000)
- p2483: 0.00101397; = p2287*p1014
- p0078: 12699.4
- p3264: 0.0887032
- p3100: 0; = p2319*p1023
- p1241: 0.00266; = if(p1232>0;0;IF(p1234+p1238+p1239+p1240=1;0;1-(p1234+p1238+p1239+p1240)))
- p3389: 0; = p3370*p1234
- p5183: 2.46728e-10; = p1804*p3484
- p1740: 0
- p2581: 3.41606e-6; = p2385*p1073
- p0755: 32.922; = p0095*(1+p0623*p0227/100)
- p0575: 0; = IF(p0311<0.5;-SQRT(p0007*EXP(p0443^2*p0008)-p0007);SQRT(p0007*EXP(p0443^2*p0008)-p0007))
- p3998: 5.85031e-7; = p1855*p3478
- p2277: 0.000859416; = p2223*p2183
- p3702: 7.77784e-7; = p1765*p3477
- p1677: 0
- p1908: 0
- p2330: 5.45072e-7; = p2224*p2198
- p1870: 0
- p3634: 1.26434e-7; = p1903*p3476
- p1173: 0.5
- p2042: 0.07
- p0042: 12699.8
- p1944: 0
- p0072: 40.445
- p3877: 5.65083e-8; = p1940*p3477
- p0686: 0
- p3467: 0; = p3372*p1241
- p1171: 0.000118241; = p0801*p0001/(p0818*p0002)
- p4168: 2.43205e-6; = p1819*p3479
- p4410: 0; = p1855*p3480
- p1800: 0
- p3450: 0; = p3374*p1240
- p0105: 83.099
- p2879: 0.000650224; = p2293*(p1020+p1022)
- p1036: 1.63043e9; = IF(p1012=0;p0795*p0702*1000*p0796/100;0)
- p1647: 0.834559
- p1751: 0
- p2673: 0.000345317; = p2282*(p1019+p1021)
- p1998: 52
- p2767: 4.47221e-5; = p2376*(p1078+p1080)
- p1104: 0.242165; = IF(p1071=0;IF(p1096+p1101+p1102+p1103=1;0;1-(p1096+p1101+p1102+p1103));0)
- p1707: 0
- p1346: 521
- p2672: 2.69934e-5; = p2281*(p1019+p1021)
- p2343: 0.00019338; = p2228*p2211
- p0310: 0.5
- p2419: 0; = p2235*p2209
- p0602: 0; = IF(p0338<0.5;-SQRT(p0007*EXP(p0470^2*p0008)-p0007);SQRT(p0007*EXP(p0470^2*p0008)-p0007))
- p1008: 0; = p1004*p0001*p0004/(p0818*p0002)
- p2368: 1.19002e-6; = p2225*p2197
- p1573: 0
- p3115: 0; = p2334*p1023
- p4569: 2.99524e-7; = p1808*p3481
- p0684: 0
- p3172: 4.09281e-10; = p2391*p1132
- p3036: 0; = p2255*p1023
- p3028: 0; = p2247*p1023
- p2324: 4.18148e-6; = p2224*p2191
- p2870: 9.21225e-5; = p2284*(p1020+p1022)
- p3398: 0.000164495; = p3379*p1234
- p1031: 2.06122e-5; = IF(p1012=0;p1025*p0001/(p0818*p0002);0)
- p4754: 0; = p1787*p3482
- p2485: 0.00214857; = p2289*p1014
- p1905: 0
- p3104: 0; = p2323*p1023
- p2327: 4.10564e-5; = p2224*p2195
- p0717: 14.37; = p0057*(1+p0585*p0189/100)
- p0255: 6.597
- p0580: 0; = IF(p0316<0.5;-SQRT(p0007*EXP(p0448^2*p0008)-p0007);SQRT(p0007*EXP(p0448^2*p0008)-p0007))
- p2737: 7.05472e-6; = p2346*(p1078+p1080)
- p2395: 0; = p2234*p2184
- p1633: 0
- p0792: 0
- p2034: 2.36037e-6; = p2015*p2030*p2032/(p0818*1000)
- p1481: 9878
- p0737: 0
- p4537: 6.17189e-8; = p1776*p3481
- p4771: 0; = p1804*p3482
- p1193: 0; = IF(OR(p1036=0;p1095=0);0.0001*p0857;0)
- p0944: 0; = if(and(p0683=0;p0950=0);p0938;0)
- p1784: 0
- p0791: 0
- p0385: 0.5
- p4677: 2.43336e-9; = p1916*p3481
- p1219: 0; = if(p1218=0;0;SQRT(2)*(IF((2*p1218-1)<0;-1;IF((2*p1218-1)>0;1;0))*SQRT(SQRT((2/(pi()*0.140012289)+LN(1-(2*p1218-1)^2)/2)^2-LN(1-(2*p1218-1)^2)/0.140012289)-(2/(pi()*0.140012289)+LN(1-(2*p1218-1)^2)/2))))
- p1650: 0
- p2019: 0.13105
- p3985: 3.94403e-8; = p1842*p3478
- p1629: 0
- p0806: 1.7112e9
- p3402: 0; = p3364*p1238
- p0959: 0; = if(and(p0683>0;or(p0807=480;p0807=32;p0807=1;and(p0807=60;p0901<0.03)));p0935;0)
- p2646: 9.81946e-5; = p2255*(p1019+p1021)
- p3357: 1.01186e8; = if(p1232=0;p3307+p3318+p3329+p3340+p3351;0)
- p0833: 8.44809e10; = p0830+p0832
- p4309: 0; = p1754*p3480
- p0870: 2.44414e6; = p0858*p0856
- p0405: 0; = SQRT(2)*(IF((2*p0273-1)<0;-1;IF((2*p0273-1)>0;1;0))*SQRT(SQRT((2/(pi()*0.140012289)+LN(1-(2*p0273-1)^2)/2)^2-LN(1-(2*p0273-1)^2)/0.140012289)-(2/(pi()*0.140012289)+LN(1-(2*p0273-1)^2)/2)))
- p5319: 1.35947e-7; = p1940*p3484
- p0318: 0.5
- p2315: 0.000263058; = p2224*p2182
- p1532: 551
- p3175: 0; = p2394*p1023
- p3157: 0; = p2376*p1082
- p2491: 3.83381e-5; = p2295*p1014
- p0681: 0
- p1603: 0
- p1880: 0
- p3048: 0; = p2267*p1082
- p0912: 0.0117949
- p2753: 1.62094e-5; = p2362*(p1019+p1021)
- p2059: 1.00168
- p3294: 0.279
- p0382: 0.5
- p3371: 0; = if(p1232=0;p3245*p3359/p0818;0)
- p2574: 7.12616e-5; = p2378*p1073
- p0287: 0.5
- p2667: 0.00106507; = p2276*(p1019+p1021)
- p1700: 0
- p1993: 400
- p0968: 0
- p1963e: 4.58892e-8; = p1628*p1832+p1629*p1833+p1630*p1834+p1631*p1835+p1632*p1836+p1633*p1837+p1634*p1838+p1635*p1839+p1636*p1840+p1637*p1841+p1638*p1842+p1639*p1843+p1640*p1844+p1641*p1845+p1642*p1846+p1643*p1847+p1644*p1848+p1645*p1849+p1646*p1850
- p2283: 0.000216205; = p2223*p2189
- p0874: 0; = p0865*p0856
- p3293: 0.3875
- p2883: 0.000379612; = p2297*(p1079+p1081)
- p3211: 0; = p2430*p1132
- p2664: 0.00127274; = p2273*(p1128+p1130)
- p1787: 2.03491e-6; = p1379*1000/p0818
- p1585: 0
- p3463: 0; = p3368*p1241
- p4136: 4.41573e-7; = p1787*p3479
- p2135: 3.96779e-7; = p2015*p2063*p2097/(p0818*1000)
- p2248: 0.00137397; = p2222*p2193
- p1904: 0
- p2265: 0.000754754; = p2226*p2211
- p2782: 1.22928e-5; = p2391*(p1128+p1130)
- p0869: 0.000966535; = IF(p0858+p0864+p0865+p0866+p0867+p0868=1;0;1-(p0858+p0864+p0865+p0866+p0867+p0868))
- p0852: 0.365262; = p0847*p0851^3+p0848*p0851^2+p0849*p0851+p0850
- p2133: 1.95601e-7; = p2015*p2061*p2095/(p0818*1000)
- p3197: 0; = p2416*p1082
- p3116: 0; = p2335*p1023
- p3393: 0.00134214; = p3374*p1234
- p1301: 0; = IF(p1297+p1300=p1265;0;IF(p1297+p1300+p1299>p1265;p1265-(p1297+p1300);p1299))
- p2123: 0.263965
- p0455: 0; = SQRT(2)*(IF((2*p0323-1)<0;-1;IF((2*p0323-1)>0;1;0))*SQRT(SQRT((2/(pi()*0.140012289)+LN(1-(2*p0323-1)^2)/2)^2-LN(1-(2*p0323-1)^2)/0.140012289)-(2/(pi()*0.140012289)+LN(1-(2*p0323-1)^2)/2)))
- p2634: 0.000166444; = p2243*(p1019+p1021)
- p2705: 9.31576e-5; = p2314*(p1128+p1130)
- p0666: 0; = IF(p0402<0.5;-SQRT(p0007*EXP(p0534^2*p0008)-p0007);SQRT(p0007*EXP(p0534^2*p0008)-p0007))
- p2567: 0.000149599; = p2371*p1014
- p1892: 0
- p0401: 0.5
- p3423: 0; = p3366*p1239
- p1206: 0.0206875
- p1244: 58608.5; = if(p1232>0;0;p1239*(p0725/100)*p0723*1000)
- p2486: 1.75811e-6; = p2290*p1014
- p3137: 0; = p2356*p1023
- p1164: 61369.7; = p1163*p0801
- p1619: 0
- p2435: 1.41278e-5; = p2239*p1014
- p5282: 3.97232e-8; = p1903*p3484
- p0987: 0; = if(p0978>0;0;if(and(p0687=0;p0691=0;p0695=0;p0699=0);0;IF(p0982+p0985+p0986=1;0;1-(p0982+p0985+p0986))))
- p3242: 1.33785e-8; = p3234*p1188*p3238/p0818
- p0714: 2.071; = p0054*(1+p0582*p0186/100)
- p2323: 1.66279e-5; = p2224*p2190
- p2797: 0; = p2406*(p1019+p1021)
- p0823: 0.35
- p2976: 0.000422474; = p2390*(p1129+p1131)
- p1671: 0
- p0898: 0.458721
- p0971: 0; = p0968/p0818
- p0710: 82.779; = p0050*(1+p0578*p0182/100)
- p2291: 8.11237e-6; = p2223*p2198
- p1272: 0.37957; = IF(p1267+p1270+p1271=p1259;0;p1259-(p1267+p1270+p1271))
- p2257: 0.000595563; = p2222*p2203
- p0470: 0; = SQRT(2)*(IF((2*p0338-1)<0;-1;IF((2*p0338-1)>0;1;0))*SQRT(SQRT((2/(pi()*0.140012289)+LN(1-(2*p0338-1)^2)/2)^2-LN(1-(2*p0338-1)^2)/0.140012289)-(2/(pi()*0.140012289)+LN(1-(2*p0338-1)^2)/2)))
- p3370: 0; = if(p1232=0;p3245*p3358/p0818;0)
- p1083: 1.81987e6; = IF(p1071=0;p1073*(p0710/100)*p0703*1000;0)
- p3009: 0; = p2423*(p1079+p1081)
- p3006: 0; = p2420*(p1079+p1081)
- p1744: 0
- p2959: 9.65992e-6; = p2373*(p1020+p1022)
- p2260: 0.000236832; = p2226*p2206
- p1394: 4905
- p0080: 96.313
- p2430: 0; = p2236*p2220
- p2867: 3.69368e-5; = p2281*(p1020+p1022)
- p0550: 0; = IF(p0286<0.5;-SQRT(p0007*EXP(p0418^2*p0008)-p0007);SQRT(p0007*EXP(p0418^2*p0008)-p0007))
- p1184: 1.46784e-8; = p1182/p0818
- p2460: 9.9772e-6; = p2264*p1073
- p2421: 0; = p2235*p2211
- p2287: 0.00285055; = p2223*p2193
- p1669: 0
- p0674: 465.347; = p0014*(1+p0542*p0146/100)
- p0510: 0; = SQRT(2)*(IF((2*p0378-1)<0;-1;IF((2*p0378-1)>0;1;0))*SQRT(SQRT((2/(pi()*0.140012289)+LN(1-(2*p0378-1)^2)/2)^2-LN(1-(2*p0378-1)^2)/0.140012289)-(2/(pi()*0.140012289)+LN(1-(2*p0378-1)^2)/2)))
- p2107: 0.881623
- p1120: 0.00290826; = IF(p1071=0;p1110/(p1115*p0818);0)
- p3045: 0; = p2264*p1082
- p0928: 2.09102e6; = p0801*p0918
- p0317: 0.5
- p2397: 0; = p2234*p2186
- p3178: 0; = p2397*p1023
- p2101: 0.620397
- p1080: 0.02071; = IF(p1071=0;IF(p1073+p1078+p1079=1;0;IF(p1073+p1078+p1079+p1076>1;1-(p1073+p1078+p1079);p1076));0)
- p0716: 81.127; = p0056*(1+p0584*p0188/100)
- p1162: 7.60845e-6; = p1161/p0818
- p3788: 1.61013e-8; = p1851*p3477
- p3221: 0.146975; = IF(p3216=0;0;p1223*12.0107/100.0869+(1-p1224)*12.0107/84.3139)
- p1640: 0
- p0330: 0.5
- p2299: 0.000207893; = p2227*p2206
- p1743: 0
- p4565: 2.21215e-10; = p1804*p3481
- p1599: 0
- p0278: 0.5
- p0793: 0
- p3876: 3.4869e-9; = p1939*p3477
- p2552: 7.05716e-6; = p2356*p1014
- p3275: 0.0214527
- p0886: 0; = p0686*1000*p0687*p0689/100
- p0871: 0.227556; = p0870*p0001*p0003/(p0818*p0002)
- p3674: 7.85305e-10; = p1943*p3476
- p1188: 3787.06; = p1187*p0801
- p0439: 0; = SQRT(2)*(IF((2*p0307-1)<0;-1;IF((2*p0307-1)>0;1;0))*SQRT(SQRT((2/(pi()*0.140012289)+LN(1-(2*p0307-1)^2)/2)^2-LN(1-(2*p0307-1)^2)/0.140012289)-(2/(pi()*0.140012289)+LN(1-(2*p0307-1)^2)/2)))
- p3305: 0.856081; = if(and(p1232=0;p3252<>0);1-(p3301+p3302+p3303+p3304);0)
- p2768: 1.44822e-5; = p2377*(p1078+p1080)
- p1225: 1.088; = IF(p1221=0;0;p1223+1.2*p1224)
- p1942: 0
- p3429: 0; = p3372*p1239
- p3217: 0.00244152; = p3213*p1228
- p3112: 0; = p2331*p1023
- p0104: 97.607
- p1236: 0.03386; = if(p1232>0;0;p0728/100)
- p1913: 0
- p4526: 1.67769e-6; = p1765*p3481
- p1154: 0.015246; = if(p1152*p0818=0;0;p1150/(p1152*p0818))
- p1105: 0.436421
- p3164: 0; = p2383*p1082
- p0808: 4.5e6
- p2293: 0.00174674; = p2223*p2200
- p2304: 0.000662528; = p2227*p2211
- p3018: 0; = p2237*p1023
- p3277: 0.55
- p1021: 0.09344; = IF(p1012=0;IF(p1014+p1019+p1020=1;0;IF(p1014+p1019+p1020+p1017>1;1-(p1014+p1019+p1020);p1017));0)
- p2541: 1.22296e-6; = p2345*p1073
- p3337: 0.00199123; = IF(or(p3254=0;p1232>0);0;p3272*p3289)
- p0838: 3.80556e10; = (p0833-p0836)*p0837
- p1965: 0.000404794; = p1963+p1959*p1964*1000/p0818
- p1605: 0
- p1790: 0
- p2136: 2.85291e-7; = p2015*p2064*p2098/(p0818*1000)
- p0598: 0; = IF(p0334<0.5;-SQRT(p0007*EXP(p0466^2*p0008)-p0007);SQRT(p0007*EXP(p0466^2*p0008)-p0007))
- p0375: 0.5
- p2626: 0; = p2430*p1123
- p0849: 0.0657513
- p1874: 0
- p0648: 0; = IF(p0384<0.5;-SQRT(p0007*EXP(p0516^2*p0008)-p0007);SQRT(p0007*EXP(p0516^2*p0008)-p0007))
- p2028: 1.11998e-5; = p2015*p2026*p2027/(p0818*1000)
- p0881: 0.010024; = p0880*p0001*p0003/(p0818*p0002)
- p0332: 0.5
- p1593: 0
- p1026: 1.48639e6; = IF(p1012=0;p1020*(p0704/100)*p0703*1000;0)
- p1696: 0
- p1044: 0.0086688; = IF(p1012=0;IF(p1037=1;0;IF(p1037+p1038>1;1-p1037;p1038));0)
- p0081: 2.84
- p1795: 0
- p1327a: 0.069252; = (p0745*1000/p0801)*(1-(p0746+p0747+p0748+p0749+p0750+p0751+p0752+p0753)/100)+(p0754*1000/p0801)*(1-(p0755+p0756+p0757+p0758+p0759+p0760+p0761+p0762)/100)
- p2459: 2.31078e-5; = p2263*p1073
- p0359: 0.5
- p2682: 2.20689e-6; = p2291*(p1019+p1021)
- p2308: 0.000312252; = p2227*p2215
- p2707: 1.57088e-5; = p2316*(p1019+p1021)
- p1730: 0
- p0416: 0; = SQRT(2)*(IF((2*p0284-1)<0;-1;IF((2*p0284-1)>0;1;0))*SQRT(SQRT((2/(pi()*0.140012289)+LN(1-(2*p0284-1)^2)/2)^2-LN(1-(2*p0284-1)^2)/0.140012289)-(2/(pi()*0.140012289)+LN(1-(2*p0284-1)^2)/2)))
- p1674: 0
- p1334: 8.0721e6; = p1322*p0801
- p2255: 0.000360957; = p2222*p2201
- p2859: 0.0023558; = p2273*(p1129+p1131)
- p0548: 0; = IF(p0284<0.5;-SQRT(p0007*EXP(p0416^2*p0008)-p0007);SQRT(p0007*EXP(p0416^2*p0008)-p0007))
- p0706: 17.86; = p0046*(1+p0574*p0178/100)
- p1776: 2.91149e-6; = p1368*1000/p0818
- p3730: 8.27626e-8; = p1793*p3477
- p2002: 750
- p2252: 3.91018e-6; = p2222*p2198
- p2759: 3.23733e-7; = p2368*(p1019+p1021)
- p2003: 50
- p2625: 0; = p2429*p1123
- p2027: 0.428799
- p0704: 97.607; = p0044*(1+p0572*p0176/100)
- p2609: 0; = p2413*p1014
- p0612: 0; = IF(p0348<0.5;-SQRT(p0007*EXP(p0480^2*p0008)-p0007);SQRT(p0007*EXP(p0480^2*p0008)-p0007))
- p0991: 0; = p0987*p0886
- p0212: 0.539
- p2451: 0.000128396; = p2255*p1014
- p0572: 0; = IF(p0308<0.5;-SQRT(p0007*EXP(p0440^2*p0008)-p0007);SQRT(p0007*EXP(p0440^2*p0008)-p0007))
- p2550: 0.000335309; = p2354*p1014
- p1069: 5.52934e-5; = IF(p1012=0;p1055/(p1062*p0818);0)
- p3129: 0; = p2348*p1082
- p2134: 9.01854e-7; = p2015*p2062*p2096/(p0818*1000)
- p2219: 0.00891777; = p1154-p2218
- p3117: 0; = p2336*p1082
- p0491: 0; = SQRT(2)*(IF((2*p0359-1)<0;-1;IF((2*p0359-1)>0;1;0))*SQRT(SQRT((2/(pi()*0.140012289)+LN(1-(2*p0359-1)^2)/2)^2-LN(1-(2*p0359-1)^2)/0.140012289)-(2/(pi()*0.140012289)+LN(1-(2*p0359-1)^2)/2)))
- p1055: 847778; = IF(p1012=0;p1048*p1036;0)
- p1202: 0.7
- p2829: 0.000227756; = p2243*(p1020+p1022)
- p4086: 6.57338e-9; = p1943*p3478
- p2182: 0.00700792; = p1050/p0818
- p1046: 0.0227455; = IF(p1012=0;IF(p1037+p1044+p1045=1;0;IF(p1037+p1044+p1045+p1040>1;1-(p1037+p1044+p1045);p1040));0)
- p3445: 0; = p3369*p1240
- p0451: 0; = SQRT(2)*(IF((2*p0319-1)<0;-1;IF((2*p0319-1)>0;1;0))*SQRT(SQRT((2/(pi()*0.140012289)+LN(1-(2*p0319-1)^2)/2)^2-LN(1-(2*p0319-1)^2)/0.140012289)-(2/(pi()*0.140012289)+LN(1-(2*p0319-1)^2)/2)))
- p1556: 0
- p2081: 0.0019
- p3349: 0.816024; = if(and(p1232=0;p3256<>0);1-(p3345+p3346+p3347+p3348);0)
- p1089: 1.69435e-5; = IF(p1071=0;p1083*p0001/(p0818*p0002);0)
- p0188: 4.169
- p0895: 1.19679e10; = p0894*p0830
- p0442: 0; = SQRT(2)*(IF((2*p0310-1)<0;-1;IF((2*p0310-1)>0;1;0))*SQRT(SQRT((2/(pi()*0.140012289)+LN(1-(2*p0310-1)^2)/2)^2-LN(1-(2*p0310-1)^2)/0.140012289)-(2/(pi()*0.140012289)+LN(1-(2*p0310-1)^2)/2)))
- p3316: 0.836806; = if(and(p1232=0;p3253<>0);1-(p3312+p3313+p3314+p3315);0)
- p1678: 0
- p3334: 0.2408; = IF(or(p3254=0;p1232>0);0;p3269*p3277*(p3300*p3292+(1-p3300)*p3296))
- p2671: 0.000187555; = p2280*(p1019+p1021)
- p3390: 0; = p3371*p1234
- p0910: 0.00355854; = p0909/p0818
- p2119: 0.679049
- p0879: 0.0433252; = p0878*p0001*p0003/(p0818*p0002)
- p1074: 0.27139; = IF(p1071=0;p0712/100;0)
- p0837: 0.5
- p0324: 0.5
- p0010: 2444.14
- p0244: 20.258
- p0372: 0.5
- p0419: 0; = SQRT(2)*(IF((2*p0287-1)<0;-1;IF((2*p0287-1)>0;1;0))*SQRT(SQRT((2/(pi()*0.140012289)+LN(1-(2*p0287-1)^2)/2)^2-LN(1-(2*p0287-1)^2)/0.140012289)-(2/(pi()*0.140012289)+LN(1-(2*p0287-1)^2)/2)))
- p2461: 0.000130655; = p2265*p1073
- p1742: 0
- p2615: 0; = p2419*p1073
- p1749: 0
- p0885: 100; = IF(p0689+p0884=100;0;100-(p0689+p0884))
- p5116: 2.41792e-10; = p1943*p3483
- p0878: 465347; = p0867*p0856
- p2145: 1.63923e-7; = p2015*p2073*p2107/(p0818*1000)
- p3041: 0; = p2260*p1082
- p1218: 0.5
- p0458: 0; = SQRT(2)*(IF((2*p0326-1)<0;-1;IF((2*p0326-1)>0;1;0))*SQRT(SQRT((2/(pi()*0.140012289)+LN(1-(2*p0326-1)^2)/2)^2-LN(1-(2*p0326-1)^2)/0.140012289)-(2/(pi()*0.140012289)+LN(1-(2*p0326-1)^2)/2)))
- p2168: 0.00331892; = p2166*(p0903)
- p5172: 1.99109e-7; = p1793*p3484
- p2728: 5.47353e-5; = p2337*(p1078+p1080)
- p1845: 0
- p0976: 0; = IF(p0687=0;IF(OR(p0686=0;p0689=0);0;p0686*1000*p0689/100);0)
- p3253: 2.70213e8; = p1252*(p1277*(1-p3247)+p1280*(1-p3248)+p1281*(1-p3249)+p1282*(1-p3250))
- p3238: 0.854735; = IF(p3237+p3235+p3236>1;1-(p3235+p3236);p3237)
- p4292: 2.26448e-9; = p1943*p3479
- p1849: 0
- p3283: 0.3
- p0640: 0; = IF(p0376<0.5;-SQRT(p0007*EXP(p0508^2*p0008)-p0007);SQRT(p0007*EXP(p0508^2*p0008)-p0007))
- p3089: 0; = p2308*p1082
- p3621: 1.8062e-8; = p1890*p3476
- p3047: 0; = p2266*p1082
- p0508: 0; = SQRT(2)*(IF((2*p0376-1)<0;-1;IF((2*p0376-1)>0;1;0))*SQRT(SQRT((2/(pi()*0.140012289)+LN(1-(2*p0376-1)^2)/2)^2-LN(1-(2*p0376-1)^2)/0.140012289)-(2/(pi()*0.140012289)+LN(1-(2*p0376-1)^2)/2)))
- p1313: 0; = p1307*p1252/p0818
- p4701: 1.21889e-7; = p1940*p3481
- p2525: 1.18127e-7; = p2329*p1014
- p2230: 0.475176; = if(p0783*p0787+p0784*p0788+p0785*p0789+p0786*p0790=0;0;p0787*p0783/(p0783*p0787+p0784*p0788+p0785*p0789+p0786*p0790))
- p1077: 0.03826; = IF(p1071=0;p0715/100;0)
- p0688: 0
- p1018: 0.25234; = IF(p1012=0;p0709/100;0)
- p3038: 0; = p2257*p1023
- p2738: 2.66223e-5; = p2347*(p1078+p1080)
- p5062: 2.38842e-6; = p1889*p3483
- p3052: 0; = p2271*p1082
- p3690: 1.61793e-5; = p1963*p3476
- p0831: 0.356071; = 1-p0824
- p1854: 0
- p3327: 0.765666; = if(and(p1232=0;p3255<>0);1-(p3323+p3324+p3325+p3326);0)
- p2961: 9.0532e-5; = p2375*(p1079+p1081)
- p0198: 28.636
- p0380: 0.5
- p2000: 4000
- p3411: 0; = p3373*p1238
- p0880: 107666; = p0868*p0856
- p2887: 0.000138572; = p2301*(p1079+p1081)
- p0394: 0.5
- p2569: 9.23071e-6; = p2373*p1014
- p3174: 0; = p2393*p1023
- p0854: 5.65653e6; = p0801*((1-p0853)*p0846+p0853*p0852)
- p0111: 19.471
- p2391: 4.09281e-5; = p2233*p2220
- p2953: 0.000541368; = p2367*(p1020+p1022)
- p0633: 0; = IF(p0369<0.5;-SQRT(p0007*EXP(p0501^2*p0008)-p0007);SQRT(p0007*EXP(p0501^2*p0008)-p0007))
- p1180: 2.66832e-8; = p1176*p1179/p0818
- p0525: 0; = SQRT(2)*(IF((2*p0393-1)<0;-1;IF((2*p0393-1)>0;1;0))*SQRT(SQRT((2/(pi()*0.140012289)+LN(1-(2*p0393-1)^2)/2)^2-LN(1-(2*p0393-1)^2)/0.140012289)-(2/(pi()*0.140012289)+LN(1-(2*p0393-1)^2)/2)))
- p0112: 19.962
- p2110: 0.856281
- p0319: 0.5
- p1118: 0.000425271; = IF(p1071=0;p1108/(p1113*p0818);0)
- p1078: 0.27139; = IF(p1071=0;IF(p1073=1;0;IF(p1073+p1074>1;1-p1073;p1074));0)
- p2045: 30
- p3227: 0.000427056; = p3223*p1229
- p5243: 2.22055e-9; = p1864*p3484
- p2743: 9.80762e-6; = p2352*(p1128+p1130)
- p1209: 137.313; = p1206*p0818*p0822/p0801
- p1626: 0
- p3186: 0; = p2405*p1023
- p0802: 1.24e7
- p4620: 1.32729e-9; = p1859*p3481
- p1128: 0.27764; = if(p1121=0;IF(p1123=1;0;IF(p1123+p1124>1;1-p1123;p1124));0)
- p1979: 2.20209e8; = p0973
- p1780: 5.96908e-6; = p1372*1000/p0818
- p0008: 0.0739645; = (p0007-1.5)/(p0007-1)^2
- p3150: 0; = p2369*p1023
- p3426: 0; = p3369*p1239
- p2005: 5.69891e7; = p1963*p0818+p1959*1000+p1170+p1176+p1182
- p3299: 0; = if(p1303+p1304+p1305+p1306=0;0;p1303/(p1303+p1304+p1305+p1306))
- p3409: 0; = p3371*p1238
- p1339: 7.34168e-6; = p1338*p0001/(p0818*p0002)
- p0192: 26.484
- p3184: 0; = p2403*p1023
- p3205: 0; = p2424*p1082
- p2383: 5.52009e-7; = p2229*p2212
- p1135: 5.30119e6; = if(p1121=0;p1129*(p0716/100)*p0703*1000;0)
- p2600: 0; = p2404*p1014
- p3091: 0; = p2310*p1082
- p1411: 1074
- p2509: 2.56486e-5; = p2313*p1123
- p0826: 0.120333; = 1-p0825/p0818
- p1229: 0.00336694; = IF(p1221=0;0;p1228*p1221)
- p3329: 3.14959e6; = if(and(p1232=0;p3255<>0);p3255*(p3266-p3324)/p3327;0)
- p1660: 0.731714
- p5069: 1.37821e-8; = p1896*p3483
- p3122: 0; = p2341*p1082
- p2852: 1.41016e-6; = p2266*(p1079+p1081)
- p2314: 0.000310163; = p2231*p2221
- p1063: 0.455
- p0445: 0; = SQRT(2)*(IF((2*p0313-1)<0;-1;IF((2*p0313-1)>0;1;0))*SQRT(SQRT((2/(pi()*0.140012289)+LN(1-(2*p0313-1)^2)/2)^2-LN(1-(2*p0313-1)^2)/0.140012289)-(2/(pi()*0.140012289)+LN(1-(2*p0313-1)^2)/2)))
- p1056: 2.99614e8; = IF(p1012=0;p1049*p1036;0)
- p1991: 1.58272e9; = (if(p1111=0;0;p1106/p1111)+if(p1112=0;0;p1107/p1112)+if(p1113=0;0;p1108/p1113)+if(p1114=0;0;p1109/p1114)+if(p1115=0;0;p1110/p1115))*(1+p1157)
- p2061: 0.518824
- p2958: 6.71189e-5; = p2372*(p1020+p1022)
- p3338: 0.742084; = if(and(p1232=0;p3254<>0);1-(p3334+p3335+p3336+p3337);0)
- p3163: 0; = p2382*p1082
- p2333: 5.03166e-5; = p2224*p2201
- p3083: 0; = p2302*p1082
- p5166: 4.81119e-8; = p1787*p3484
- p3084: 0; = p2303*p1082
- p0851: 0.5
- p0800: 81.127; = p0140*(1+p0668*p0272/100)
- p0916: 0.564352; = p0826+p0828+(p0832*(1+p0894))/p0818
- p3061: 0; = p2280*p1023
- p3647: 8.63835e-9; = p1916*p3476
- p0388: 0.5
- p4580: 2.37584e-7; = p1819*p3481
- p0624: 0; = IF(p0360<0.5;-SQRT(p0007*EXP(p0492^2*p0008)-p0007);SQRT(p0007*EXP(p0492^2*p0008)-p0007))
- p2385: 1.97335e-5; = p2229*p2214
- p0097: 14.594
- p3189: 0; = p2408*p1023
- p3017: 0; = p2431*(p1129+p1131)
- p0829: 0; = if(p0807=480;p0814*(1-p0824);0)
- p3071: 0; = p2290*p1023
- p3127: 0; = p2346*p1082
- p0584: 0; = IF(p0320<0.5;-SQRT(p0007*EXP(p0452^2*p0008)-p0007);SQRT(p0007*EXP(p0452^2*p0008)-p0007))
- p1608: 0
- p0476: 0; = SQRT(2)*(IF((2*p0344-1)<0;-1;IF((2*p0344-1)>0;1;0))*SQRT(SQRT((2/(pi()*0.140012289)+LN(1-(2*p0344-1)^2)/2)^2-LN(1-(2*p0344-1)^2)/0.140012289)-(2/(pi()*0.140012289)+LN(1-(2*p0344-1)^2)/2)))
- p1093: 3.74478e-6; = IF(p1071=0;p1087*p0001/(p0818*p0002);0)
- p1148: 0.070543; = if(p1121=0;IF(p1146=1;0;1-p1146);0)
- p0970: 0; = p0967/p0818
- p2554: 5.90468e-5; = p2358*p1014
- p3359: 8.48487e7; = if(p1232=0;p3309+p3320+p3331+p3342+p3353;0)
- p0546: 0; = IF(p0282<0.5;-SQRT(p0007*EXP(p0414^2*p0008)-p0007);SQRT(p0007*EXP(p0414^2*p0008)-p0007))
- p1222: 0.94
- p0996: 0; = if(p0888=0;0;if((p0691*p0690*1000*p0692/100)/p0888>1;1;(p0691*p0690*1000*p0692/100)/p0888))
- p2466: 3.15341e-6; = p2270*p1073
- p0055: 3.826
- p2511: 9.35722e-5; = p2315*p1014
- p0841: 0.307247
- p3202: 0; = p2421*p1082
- p2890: 0.000354313; = p2304*(p1079+p1081)
- p3218: 0.008147; = p3214*p1228
- p2760: 5.31355e-7; = p2369*(p1019+p1021)
- p0267: 2.832
- p1061: 0.3
- p2418: 0; = p2235*p2208
- p1591: 0
- p1000: 0; = IF(p0996+p0999=1;0;IF(p0996+p0999+p0998>1;1-(p0996+p0999);p0998))
- p0390: 0.5
- p5099: 4.83584e-10; = p1926*p3483
- p1271: 0; = IF(p1267+p1270=p1259;0;IF(p1267+p1270+p1269>p1259;p1259-(p1267+p1270);p1269))
- p2794: 0; = p2403*(p1019+p1021)
- p1932: 0
- p2954: 4.42984e-7; = p2368*(p1020+p1022)
- p2689: 0.000187525; = p2298*(p1078+p1080)
- p1234: 0.23027; = if(p1232>0;0;p0726/100)
- p0344: 0.5
- p1766: 0
- p5111: 2.17613e-9; = p1938*p3483
- p1563: 0.693253
- p3386: 0; = p3367*p1234
- p3187: 0; = p2406*p1023
- p2693: 3.42269e-5; = p2302*(p1078+p1080)
- p2920: 2.69572e-6; = p2334*(p1020+p1022)
- p0702: 12699.8; = p0042*(1+p0570*p0174/100)
- p2247: 0.000242753; = p2222*p2192
- p3271: 0.0195489
- p1421: 1045
- p0440: 0; = SQRT(2)*(IF((2*p0308-1)<0;-1;IF((2*p0308-1)>0;1;0))*SQRT(SQRT((2/(pi()*0.140012289)+LN(1-(2*p0308-1)^2)/2)^2-LN(1-(2*p0308-1)^2)/0.140012289)-(2/(pi()*0.140012289)+LN(1-(2*p0308-1)^2)/2)))
- p1013: 0; = p1012*p0001/(p0818*p0002)
- p2661: 5.32096e-6; = p2270*(p1078+p1080)
- p0934: 1.9468e-5; = p0928*p0001/(p0818*p0002)
- p2050: 0.952062
- p2715: 1.13753e-6; = p2324*(p1019+p1021)
- p2174: 0.00133079; = p0895*p0903/p0818
- p1152: 0.415074
- p2198: 1.45209e-5; = 22.98976928*p2197/14.0067
- p4687: 4.42429e-10; = p1926*p3481
- p1639: 0
- p2369: 1.95323e-6; = p2225*p2198
- p2362: 5.95848e-5; = p2225*p2190
- p3259: 0.00796296
- p3419: 0; = p3362*p1239
- p2223: 0.55867; = if(p0765*p0769+p0766*p0770+p0767*p0771+p0768*p0772=0;0;p0770*p0766/(p0765*p0769+p0766*p0770+p0767*p0771+p0768*p0772))
- p0386: 0.5
- p2465: 6.15785e-5; = p2269*p1073
- p3374: 0.00582857; = if(p1232=0;p3246*p3356/p0818;0)

## Reference product
- corn grain; at harvest in 1996; at farm; 85%-91% moisture: 1 kg

## Inputs from technosphere
- CUTOFF apply mixed P fertilizer; without incorporation: 3.74478e-6 ha; = p1093
- CUTOFF phosphatic fertilizer, diammonium phosphate; at point-of-sale: 0.00877177 kg; = p1119
- CUTOFF irrig svc; unspec wat source & rate, 1996 corn: 0.000118241 ha; = p0981
- CUTOFF apply K fertilizer; broadcast without incorporation: 4.93557e-5 ha; = p1141
- CUTOFF pesticide, Nicosulfuron; at point-of-sale; kg AI: 5.94821e-7 kg; = p1896
- CUTOFF pesticide, Propazine; at point-of-sale; kg AI: 0.000103081 kg; = p1889
- CUTOFF apply pesticide; broadcast with incorporation: 0.000218158 ha; = p1333
- CUTOFF corn seeds; seed, unspec. type; at point-of-sale: 0.00229798 kg; = p0972
- CUTOFF apply pesticide; broadcast by air: 3.40363e-6 ha; = p1331
- CUTOFF gypsum storage: 3.2021e-7 kg*a; = p1168
- CUTOFF liming materials storage: 0.0125056 kg*a; = p1231
- CUTOFF pesticide, Acetochlor; at point-of-sale; kg AI: 7.91425e-5 kg; = p1765
- CUTOFF pesticide storage: 0.000404794 kg*a; = p1965
- CUTOFF apply K fertilizer; broadcast with incorporation: 2.66323e-5 ha; = p1140
- CUTOFF planting; for reduced till, corn; 15-30% residue: 3.34567e-5 ha; = p0955
- corn silage; at harvest in 1996; at farm; 28%-40% moisture: 0.0939191 kg; = p0819
- CUTOFF apply mixed K fertilizer; without incorporation: 3.97221e-6 ha; = p1143
- CUTOFF apply P fertilizer; broadcast with incorporation: 2.65629e-5 ha; = p1090
- CUTOFF apply P fertilizer; broadcast without incorporation: 4.8599e-5 ha; = p1091
- CUTOFF phosphatic fertilizer, superphosphate grades over 22%; at point-of-sale: 0.00105447 kg; = p1117
- CUTOFF pesticide, Carbofuran; at point-of-sale; kg AI: 2.03491e-6 kg; = p1787
- CUTOFF pesticide, Atrazine; at point-of-sale; kg AI: 8.25131e-5 kg; = p1771
- CUTOFF apply sulfur; unspecified method: 0.000118241 ha; = p1171
- CUTOFF harvest; corn residue management: 0.000118241 ha; = p1975
- CUTOFF apply N fertilizer; broadcast with incorporation: 2.06122e-5 ha; = p1031
- CUTOFF nitrogenous fertilizer, urea; at point-of-sale: 0.00687165 kg; = p1070
- CUTOFF pesticide, Glyphosate; at point-of-sale; kg AI: 9.28755e-7 kg; = p1855
- CUTOFF prepare soil; for no-till, corn: 2.08507e-5 ha; = p0936
- CUTOFF hog manure; from unspecified storage; at point-of-sale: 0.0527018 kg; = p1296
- CUTOFF apply sewage sludge; unspecified method: 0.000118241 ha; = p1189
- CUTOFF nitrogenous fertilizer, anhydrous ammonia; at point-of-sale: 0.00854624 kg; = p1064
- CUTOFF harvest; corn silage: 2.32758e-6 ha; = p1974
- CUTOFF apply mixed N fertilizer; without incorporation: 2.91225e-5 ha; = p1034
- CUTOFF prepare soil; for reduced till, corn; 15-30% residue: 3.34567e-5 ha; = p0937
- CUTOFF fertilizer storage: 0.0427277 kg*a; = p1160
- CUTOFF pesticide, Bromoxynil; at point-of-sale; kg AI: 5.96908e-6 kg; = p1780
- CUTOFF apply manure; broadcast without incorporation: 1.18159e-5 ha; = p1248
- CUTOFF pesticide, Terbufos; at point-of-sale; kg AI: 5.74993e-6 kg; = p1940
- CUTOFF apply mixed P fertilizer; with incorporation: 2.02704e-6 ha; = p1092
- CUTOFF apply pesticide; banded or side-dressed: 2.60628e-5 ha; = p1329
- CUTOFF domestic barge transport; average fuel: 0.0251262 metric ton*km; = p2007
- CUTOFF nitrogenous fertilizer, sodium nitrate; at point-of-sale: 5.52934e-5 kg; = p1069
- CUTOFF gypsum; at point-of-sale: 6.40421e-7 kg; = p1166
- CUTOFF pesticide, Halosulfuron-methyl; at point-of-sale; kg AI: 6.26127e-8 kg; = p1859
- CUTOFF apply single or mixed K fertilizer; unspec. method: 9.59239e-10 ha; = p1144
- CUTOFF phosphatic fertilizer, superphos. grades 22% and under; at point-of-sale: 7.07929e-5 kg; = p1116
- CUTOFF nitrogenous fertilizer, ammonium sulfate; at point-of-sale: 0.00184285 kg; = p1067
- CUTOFF apply mixed N fertilizer; with incorporation: 1.07839e-5 ha; = p1033
- CUTOFF apply gypsum; unspecified method: 0.000118241 ha; = p1165
- CUTOFF harvest; corn: 0.000115448 ha; = p1971
- CUTOFF apply manure; unspec. method: 4.28666e-8 ha; = p1251
- CUTOFF prepare soil; for unspec. till, corn: 5.79101e-9 ha; = p0939
- CUTOFF sewage sludge; at point-of-sale: 3.95197e-8 kg; = p1190
- CUTOFF apply liming materials; unspecified method: 0.000118241 ha; = p1227
- CUTOFF dairy manure; from unspecified storage; at point-of-sale: 0.0225584 kg; = p1286
- CUTOFF phosphatic fertilizer, other single phosphates; at point-of-sale: 0.000425271 kg; = p1118
- CUTOFF apply K fertilizer; no broadcast application: 1.37843e-5 ha; = p1139
- CUTOFF N inhibitor appl svc; unspec rate & type, 1996 corn: 7.60845e-6 ha; = p1162
- CUTOFF apply sulfuric acid; unspecified method: 0.000118241 ha; = p1177
- CUTOFF pesticide, Bentazon; at point-of-sale; kg AI: 2.91149e-6 kg; = p1776
- corn residue; at harvest in 1996; at farm; 22%-91% moisture: 0.397127 kg; = p0839
- CUTOFF apply manure; injected/knifed in: 5.45663e-7 ha; = p1249
- CUTOFF planting; for no-till, corn: 2.08507e-5 ha; = p0954
- CUTOFF pesticide, Prosulfuron; at point-of-sale; kg AI: 1.1479e-7 kg; = p1916
- CUTOFF apply P fertilizer; no broadcast application: 1.69435e-5 ha; = p1089
- CUTOFF planting; for unspec. till, corn: 5.79101e-9 ha; = p0957
- CUTOFF pesticide, 2,4-D; at point-of-sale; kg AI: 5.43687e-6 kg; = p1754
- CUTOFF apply mixed K fertilizer; with incorporation: 2.17843e-6 ha; = p1142
- CUTOFF pesticide, Dyphonate; at point-of-sale; kg AI: 1.63837e-6 kg; = p1851
- CUTOFF sulfur storage: 2.39248e-8 kg*a; = p1174
- CUTOFF pesticide, beta-Cyfluthrin; at point-of-sale; kg AI: 1.04355e-8 kg; = p1804
- CUTOFF unspecified animal manure; from unspecified storage; at point-of-sale: 0.00105026 kg; = p1316
- CUTOFF international vessel transport; average fuel: 0.235308 metric ton*km; = p2006
- CUTOFF dolomite, pulverized; at point-of-sale: 0.00336694 kg; = p1229
- CUTOFF sulfur; at point-of-sale: 4.78497e-8 kg; = p1172
- CUTOFF sulfuric acid storage: 2.66832e-8 kg*a; = p1180
- CUTOFF pesticide, Tefluthrin; at point-of-sale; kg AI: 3.54805e-7 kg; = p1939
- CUTOFF potassic fertilizer, other single nutrients; at point-of-sale: 0.00131491 kg; = p1155
- CUTOFF limestone, high-grade, pulverized; at point-of-sale: 0.0216442 kg; = p1228
- CUTOFF pesticide, EPTC; at point-of-sale; kg AI: 1.0905e-5 kg; = p1829
- CUTOFF pesticide, Alachlor; at point-of-sale; kg AI: 4.122e-6 kg; = p1767
- CUTOFF pesticide, Pendimethalin; at point-of-sale; kg AI: 1.68011e-6 kg; = p1903
- CUTOFF regional or national trucking; class 8, average fuel: 0.00419379 metric ton*km; = p2009
- CUTOFF fertilizer filler materials; at point-of-sale: 0.0170007 kg; = p1158
- CUTOFF apply pesticide; broadcast without incorporation: 7.51537e-5 ha; = p1335
- CUTOFF local area trucking; class 6, average fuel: 0.00188446 metric ton*km; = p2010
- CUTOFF planting; for mulch till, corn: 4.34989e-5 ha; = p0953
- CUTOFF poultry manure; from unspecified storage; at point-of-sale: 0.00453461 kg; = p1306
- CUTOFF planting; for ridge till, corn: 9.60917e-7 ha; = p0956
- CUTOFF pesticide, Thifensulfuron methyl; at point-of-sale; kg AI: 1.04355e-8 kg; = p1943
- CUTOFF pesticide, Dicamba; at point-of-sale; kg AI: 1.41296e-5 kg; = p1808
- CUTOFF phosphatic fertilizer, monoammonium phosphate; at point-of-sale: 0.00290826 kg; = p1120
- CUTOFF pesticide formulation balance; at point-of-sale: 0.000214997 kg; = p1963
- CUTOFF pesticide, Dimethenamid; at point-of-sale; kg AI: 1.12077e-5 kg; = p1819
- CUTOFF pesticide, Metribuzin; at point-of-sale; kg AI: 2.40015e-7 kg; = p1890
- CUTOFF apply pesticide; as foliar or directed spray: 7.34168e-6 ha; = p1339
- CUTOFF zinc compounds storage: 7.3392e-9 kg*a; = p1186
- CUTOFF apply manure; broadcast or spray with incorporation: 3.71086e-6 ha; = p1247
- CUTOFF apply N fertilizer; broadcast without incorporation: 1.38388e-5 ha; = p1032
- CUTOFF pesticide, Flumetsulam; at point-of-sale; kg AI: 6.26127e-8 kg; = p1842
- CUTOFF prepare soil; for mulch till, corn: 4.34989e-5 ha; = p0935
- CUTOFF pesticide, Tebupirimfos; at point-of-sale; kg AI: 9.39191e-8 kg; = p1938
- CUTOFF pesticide, Imazethapyr; at point-of-sale; kg AI: 9.39191e-8 kg; = p1864
- CUTOFF sulfuric acid; at point-of-sale: 5.33664e-8 kg; = p1178
- CUTOFF prepare soil; for ridge till, corn: 9.60917e-7 ha; = p0938
- CUTOFF planting; for conventional till, corn; <15% residue: 1.9468e-5 ha; = p0952
- CUTOFF nitrogenous fertilizer, aqueous ammonia; at point-of-sale: 0.000655527 kg; = p1065
- CUTOFF sewage sludge storage: 1.97599e-8 kg*a; = p1192
- CUTOFF pesticide, Primisulfuron-methyl; at point-of-sale; kg AI: 1.56532e-7 kg; = p1909
- CUTOFF prepare soil; for conventional till, corn; <15% residue: 1.9468e-5 ha; = p0934
- CUTOFF potassic fertilizer, potassium chloride; at point-of-sale: 0.015246 kg; = p1154
- CUTOFF pesticide, Chlorpyrifos; at point-of-sale; kg AI: 8.42141e-6 kg; = p1793
- CUTOFF nitrogenous fertilizer, ammonium nitrate; at point-of-sale: 0.00368379 kg; = p1066
- CUTOFF apply pesticide; in seed furrow: 8.02461e-6 ha; = p1343
- CUTOFF bulk cargo rail transport; diesel: 0.0471115 metric ton*km; = p2008
- CUTOFF nitrogenous fertilizer, nitrogen solutions; at point-of-sale: 0.0170079 kg; = p1068
- CUTOFF apply zinc compounds; unspecified method: 0.000118241 ha; = p1183
- CUTOFF apply pesticide; unspecified application methods: 8.18842e-6 ha; = p1345
- CUTOFF pesticide, Rimsulfuron; at point-of-sale; kg AI: 2.08709e-8 kg; = p1926
- CUTOFF zinc compounds; at point-of-sale: 1.46784e-8 kg; = p1184
- CUTOFF pesticide, Cyanazine; at point-of-sale; kg AI: 5.11859e-5 kg; = p1802
- CUTOFF apply N fertilizer; no broadcast application: 4.10524e-5 ha; = p1030
- CUTOFF beef manure; from unspecified storage; at point-of-sale: 0.0494599 kg; = p1276
- CUTOFF seed storage; corn: 0.00114899 kg*a; = p0975

## Inputs from nature
- Water, unspecified origin: 0.00067842 m3; = p0893*0.001+p0916*0.001
- Dry matter except CNPK; from plant uptake: 0.960751 kg; = p0917
- Phosphorus: 0.00355854 kg; = p0910
- Potassium; from plant uptake; biogenic: 0.0101933 kg; = p0915
- Nitrogen: 0.0207967 kg; = p0905
- Carbon dioxide: 2.23599 kg; = p0900*3.6666666667
- Occupation, annual crop [natural resource, land]: 0.526641 m2*year; = 1.0 * (p0855)
- Transformation, to annual crop [natural resource, land]: 1.18241 m2; = 1.0 * (p0857)
- Transformation, from annual crop [natural resource, land]: 1.18241 m2; = 1.0 * (p0883+p0873+p0879+p0871+p0881)

## Emissions to nature
- Sodium nitrate; no broadcast in fert. in fall bef. plant.: 5.145e-6 kg; = p2447*6.0714285714
- Seeds; used in planting and sowing: 0.00229798 kg; = p2179
- Aqueous ammonia; no broadcast in fert. in fall bef. plant.: 1.71552e-5 kg; = p2435*1.2142857143
- Ammonium nitrate; broadcast w/ incorp. in fert. after plant.: 0.000212887 kg; = p2749*4.7142857143
- Sodium nitrate; broadcast w/ incorp. in fert. after plant.: 1.96552e-6 kg; = p2759*6.0714285714
- Anhydrous ammonia; no broadcast in fert. at plant.: 0.000113623 kg; = p2511*1.2142857143
- Superphosphate, grades<= 22%; broadcast w/ incorp. in fert. after plant.; kg P: 1.61242e-7 kg; = p2774
- Volatile constituents; injected/knifed in man. at unknown time: 0.000253963 kg; = p3435
- Carbon dioxide, in air: 0.000656353 kg; = p2163*3.6666666667
- Diammonium phosphate; broadcast w/o incorp. in fert. after plant.: 0.000386002 kg; = p2962*4.7142857143
- Thifensulfuron methyl; broadcast by air: 1.02556e-10 kg; = p3880
- Flumetsulam [soil, agricultural]: 6.19974e-8 kg; = 1.0 * (p4191+p4603+p3573+p5221+p3985+p5015)
- Phosphorous; injected/knifed in manure at an unknown time: 1.02748e-5 kg; = p3433
- Tefluthrin: 3.4869e-9 kg; = p3876
- Metolachlor [air, non-urban air or from high stacks]: 1.01305e-6 kg; = 1.0 * (p3826)
- Atrazine [soil, agricultural]: 8.17022e-5 kg; = 1.0 * (p5150+p3502+p4120+p4532+p3914+p4944)
- Other single phosphates; broadcast w/o incorp. in fert. in spr. bef. plant.; kg P: 8.55147e-6 kg; = p2895
- Pentane [air, non-urban air or from high stacks]: 1.0416e-8 kg; = 1.0 * (p2152*1.0166666667)
- Monoammonium phosphate; broadcast w/ incorp. in fert. at plant.: 8.20624e-5 kg; = p2732*8.2142857143
- Urea; broadcast w/ incorp. in fert. after plant.: 0.000245252 kg; = p2763*5
- Aqueous ammonia; no broadcast in fert. in spr. bef. plant.: 3.55915e-5 kg; = p2474*1.2142857143
- Sodium nitrate; broadcast w/ incorp. in fert. in fall bef. plant.: 3.93479e-6 kg; = p2642*6.0714285714
- Phosphorous; applied in sewage sludge: 2.20657e-10 kg; = p3241
- Ammonium nitrate; broadcast w/ incorp. in fert. in fall bef. plant.: 0.00042618 kg; = p2632*4.7142857143
- Urea; no broadcast in fert. in spr. bef. plant.: 0.0013319 kg; = p2490*5
- Metribuzin [soil, agricultural]: 2.37657e-7 kg; = 1.0 * (p4033+p5063+p5269+p4239+p4651+p3621)
- Sodium nitrate; broadcast w/o incorp. in fert. at plant.: 7.50552e-7 kg; = p2915*6.0714285714
- Nitrogen solution; no broadcast in fert. at plant.; no broadcast in fert. at plant.; kg N: 6.81287e-5 kg; = p2522
- Nitrogen solution; broadcast w/o incorp. in fert. after plant.; broadcast w/o incorp. in fert. after plant.; kg N: 0.000255486 kg; = p2951
- Acetic acid [air, non-urban air or from high stacks]: 2.75461e-6 kg; = 1.0 * (p2127*2.5)
- Ammonium sulfate; broadcast w/ incorp. in fert. in spr. bef. plant.: 0.000277277 kg; = p2674*4.7142857143
- Anhydrous ammonia; no broadcast in fert. after plant.: 0.000407161 kg; = p2550*1.2142857143
- Nonvolatile constituents; injected/knifed in man. at unknown time; exc.CNPK,biogenic: 2.41881e-5 kg; = p3436
- Ammonium sulfate; broadcast w/ incorp. in fert. after plant.: 6.67604e-5 kg; = p2752*4.7142857143
- Diammonium phosphate; broadcast w/ incorp. in fert. after plant.: 0.000210833 kg; = p2767*4.7142857143
- Metolachlor [soil, agricultural]: 0.000102068 kg; = 1.0 * (p5268+p3620+p5062+p4032+p4238+p4650)
- Pesticide formulation balance; foliar or directed spray: 4.55759e-6 kg; = p4720
- Glyphosate [soil, agricultural]: 9.19628e-7 kg; = 1.0 * (p4204+p4616+p3998+p5234+p3586+p5028)
- Anhydrous ammonia; broadcast w/o incorp. in fert. at plant.: 0.000118907 kg; = p2901*1.2142857143
- Potassium chloride; unspec. appl. method in fert. in fall bef. plant.: 6.66554e-8 kg; = p3053*2.2166666667
- Ammonium nitrate; no broadcast in fert. after plant.: 0.000278363 kg; = p2554*4.7142857143
- Isoprene [air, non-urban air or from high stacks]: 1.8578e-7 kg; = 1.0 * (p2145*1.1333333333)
- Monoammonium phosphate; broadcast w/o incorp. in fert. in fall bef. plant.: 0.000586394 kg; = p2849*8.2142857143
- Thifensulfuron methyl; broadcast with incorporation: 6.57338e-9 kg; = p4086
- Dipropylthiocarbamic acid S-ethyl ester: 1.07979e-5 kg; = p3560+p5002+p3972+p4590+p5208+p4178
- Dinitrogen monoxide [air, non-urban air or from high stacks]: 3.44708e-8 kg; = 1.0 * (p2044*1.5714285714)
- Primisulfuron-methyl: 1.53834e-9 kg; = p3846
- Other single phosphates; broadcast w/ incorp. in fert. in fall bef. plant.; kg P: 5.32096e-6 kg; = p2661
- Propanenitrile: 3.15481e-8 kg; = p2157*1.5277777778
- Nicosulfuron: 5.84569e-9 kg; = p3833
- Cyfluthrin [soil, agricultural]: 1.03329e-8 kg; = 1.0 * (p3535+p4565+p4977+p3947+p4153+p5183)
- Diammonium phosphate; broadcast w/o incorp. in fert. in fall bef. plant.: 0.00184386 kg; = p2845*4.7142857143
- Nonvolatile constituents; broadcast w/ incorp. in man. at unknown time; exc.CNPK,biogenic: 0.000164495 kg; = p3398
- Nicosulfuron [soil, agricultural]: 5.88975e-7 kg; = 1.0 * (p5275+p4245+p4657+p5069+p3627+p4039)
- Terbufos: 5.65083e-8 kg; = p3877
- Other single K nutrients; unspec. appl. method in fert. at plant.; kg K: 3.2654e-10 kg; = p3133
- Water: 0.469379 kg; = p2178+p3418+p2171+p3475+p3399+p3437+p2181
- Ammonium sulfate; broadcast w/o incorp. in fert. at plant.: 2.54931e-5 kg; = p2908*4.7142857143
- Pesticide formulation balance; broadcast with incorporation: 0.000135428 kg; = p4102
- Ammonium sulfate; broadcast w/o incorp. in fert. in spr. bef. plant.: 0.000379416 kg; = p2869*4.7142857143
- Potassium; broadcast w/o incorp. in manure at an unknown time: 0.000649209 kg; = p3415
- Chlorpyrifos [air, non-urban air or from high stacks]: 8.27626e-8 kg; = 1.0 * (p3730)
- Anhydrous ammonia; broadcast w/o incorp. in fert. after plant.: 0.000426094 kg; = p2940*1.2142857143
- Nitrogen; injected/knifed in manure at an unknown time: 3.57536e-5 kg; = p3432
- Potassium chloride; unspec. appl. method in fert. at plant.: 9.53699e-9 kg; = p3131*2.2166666667
- Monoammonium phosphate; broadcast w/ incorp. in fert. in spr. bef. plant.: 0.000281149 kg; = p2693*8.2142857143
- Potassium chloride; no broadcast in fert. at plant.: 0.000137047 kg; = p2546*2.2166666667
- Plant dry matter; from residue burning: 0.000175108 kg; = p2164
- Ammonium nitrate; no broadcast in fert. at plant.: 7.76807e-5 kg; = p2515*4.7142857143
- Sodium nitrate; no broadcast in fert. in spr. bef. plant.: 1.06742e-5 kg; = p2486*6.0714285714
- pursuit: 9.23003e-10 kg; = p3801
- Potassium; in above-ground residue left on field; biogenic: 0.0047322 kg; = p2170
- Other single K nutrients; unspec. appl. method in fert. after plant.; kg K: 4.09281e-10 kg; = p3172
- Diammonium phosphate; no broadcast in fert. in fall bef. plant.: 0.000596853 kg; = p2455*4.7142857143
- Dimethenamid [soil, agricultural]: 1.10975e-5 kg; = 1.0 * (p4992+p4580+p4168+p5198+p3962+p3550)
- Nitrogen solution; broadcast w/ incorp. in fert. in spr. bef. plant.; broadcast w/ incorp. in fert. in spr. bef. plan...: 0.000775463 kg; = p2678
- Acetol; from residue burning: 1.85381e-6 kg; = p2134*2.0555555556
- Diammonium phosphate; no broadcast in fert. in spr. bef. plant.: 0.000523921 kg; = p2494*4.7142857143
- Other single K nutrients; broadcast w/o incorp. in fert. after plant.; kg K: 2.27536e-5 kg; = p2977
- Acetonitrile [air, non-urban air or from high stacks]: 1.03354e-7 kg; = 1.0 * (p2155*1.7083333333)
- Ammonium nitrate; broadcast w/ incorp. in fert. in spr. bef. plant.: 0.000884187 kg; = p2671*4.7142857143
- Urea; no broadcast in fert. after plant.: 0.000320683 kg; = p2568*5
- Superphosphate, grades<= 22%; no broadcast in fert. in fall bef. plant.; kg P: 4.56464e-7 kg; = p2462
- Nitrogen; in below-ground residue: 0.00133079 kg; = p2174
- Tefluthrin [soil, agricultural]: 3.51318e-7 kg; = 1.0 * (p5112+p4700+p4082+p3670+p5318+p4288)
- Sodium nitrate; no broadcast in fert. at plant.: 7.17203e-7 kg; = p2525*6.0714285714
- Rimsulfuron [soil, agricultural]: 2.06658e-8 kg; = 1.0 * (p5305+p4687+p4069+p3657+p5099+p4275)
- Aqueous ammonia; no broadcast in fert. after plant.: 8.5694e-6 kg; = p2552*1.2142857143
- Other single phosphates; no broadcast in fert. at plant.; kg P: 8.07955e-7 kg; = p2544
- Superphosphate, grades>22%; broadcast w/ incorp. in fert. in fall bef. plant.; kg P: 2.75342e-5 kg; = p2659
- Superphosphate, grades<= 22%; broadcast w/o incorp. in fert. in spr. bef. plant.; kg P: 1.23785e-6 kg; = p2891
- Acrylonitrile: 1.65034e-8 kg; = p2156*1.4722222222
- Bentazone [soil, agricultural]: 2.88288e-6 kg; = 1.0 * (p4125+p5155+p4537+p3507+p3919+p4949)
- Anhydrous ammonia; no broadcast in fert. in fall bef. plant.: 0.0008151 kg; = p2433*1.2142857143
- Nitrogen solution; broadcast w/o incorp. in fert. in fall bef. plant.; broadcast w/o incorp. in fert. in fall bef. pl...: 0.000511461 kg; = p2834
- Sulfur [soil, agricultural]: 4.78497e-8 kg; = 1.0 * (p3230)
- Phosphorous; broadcast w/o incorp. in manure at an unknown time: 0.000222493 kg; = p3414
- Monoammonium phosphate; broadcast w/ incorp. in fert. after plant.: 6.70501e-5 kg; = p2771*8.2142857143
- Volatile constituents; broadcast w/o incorp. in man. at unknown time: 0.00549936 kg; = p3416
- Superphosphate, grades<= 22%; broadcast w/ incorp. in fert. in fall bef. plant.; kg P: 7.70222e-7 kg; = p2657
- Nitrogen; applied in sewage sludge: 1.84841e-9 kg; = p3240
- Potassium chloride; broadcast w/ incorp. in fert. at plant.: 0.000286444 kg; = p2741*2.2166666667
- Nitrogen solution; broadcast w/o incorp. in fert. in spr. bef. plant.; broadcast w/o incorp. in fert. in spr. bef. pl...: 0.00106112 kg; = p2873
- Rimsulfuron: 2.05112e-10 kg; = p3863
- Superphosphate, grades>22%; broadcast w/o incorp. in fert. after plant.; kg P: 1.05533e-5 kg; = p2971
- Ammonium nitrate; broadcast w/ incorp. in fert. at plant.: 5.94087e-5 kg; = p2710*4.7142857143
- Anhydrous ammonia; broadcast w/o incorp. in fert. in fall bef. plant.: 0.000853001 kg; = p2823*1.2142857143
- Other single phosphates; broadcast w/o incorp. in fert. in fall bef. plant.; kg P: 9.74185e-6 kg; = p2856
- Carbon monoxide, fossil [air, non-urban air or from high stacks]: 2.61329e-5 kg; = 1.0 * (p2028*2.3333333333)
- Ammonium sulfate; no broadcast in fert. at plant.: 2.43603e-5 kg; = p2518*4.7142857143
- Monoammonium phosphate; no broadcast in fert. at plant.: 4.86334e-5 kg; = p2537*8.2142857143
- Bromoxynil [soil, agricultural]: 5.91042e-6 kg; = 1.0 * (p4129+p4953+p5159+p3923+p3511+p4541)
- Other single K nutrients; broadcast w/o incorp. in fert. in fall bef. plant.; kg K: 0.000126878 kg; = p2860
- fonofos: 1.61013e-8 kg; = p3788
- Other single phosphates; no broadcast in fert. in fall bef. plant.; kg P: 3.15341e-6 kg; = p2466
- Other single K nutrients; broadcast w/ incorp. in fert. at plant.; kg K: 9.80762e-6 kg; = p2743
- Phosphorous; in above-ground residue left on field: 0.000310783 kg; = p2169
- Urea; broadcast w/o incorp. in fert. in fall bef. plant.: 0.00067183 kg; = p2841*5
- Ammonium nitrate; broadcast w/o incorp. in fert. in spr. bef. plant.: 0.00120989 kg; = p2866*4.7142857143
- Superphosphate, grades>22%; broadcast w/o incorp. in fert. in spr. bef. plant.; kg P: 4.42511e-5 kg; = p2893
- cyclopentane: 8.14369e-10 kg; = p2153*1.0166666667
- Potassium chloride; unspec. appl. method in fert. in spr. bef. plant.: 5.21293e-8 kg; = p3092*2.2166666667
- Anhydrous ammonia; no broadcast in fert. in spr. bef. plant.: 0.00169107 kg; = p2472*1.2142857143
- Ammonium sulfate; broadcast w/ incorp. in fert. at plant.: 1.86303e-5 kg; = p2713*4.7142857143
- Dicamba [air, non-urban air or from high stacks]: 1.38861e-7 kg; = 1.0 * (p3745)
- Aqueous ammonia; broadcast w/o incorp. in fert. at plant.: 2.50259e-6 kg; = p2903*1.2142857143
- Flumetsulam [air, non-urban air or from high stacks]: 6.15335e-10 kg; = 1.0 * (p3779)
- Superphosphate, grades>22%; no broadcast in fert. after plant.; kg P: 3.41606e-6 kg; = p2581
- Aqueous ammonia; broadcast w/ incorp. in fert. at plant.: 1.82889e-6 kg; = p2708*1.2142857143
- Other single K nutrients; no broadcast in fert. in fall bef. plant.; kg K: 3.27957e-5 kg; = p2470
- Potassium chloride; broadcast w/ incorp. in fert. in fall bef. plant.: 0.002002 kg; = p2663*2.2166666667
- Monoammonium phosphate; broadcast w/o incorp. in fert. after plant.: 0.000122758 kg; = p2966*8.2142857143
- Tebupirimphos [soil, agricultural]: 9.29961e-8 kg; = 1.0 * (p4081+p4287+p4699+p3669+p5111+p5317)
- trans-2-Butene: 2.80356e-8 kg; = p2148*1.1666666667
- Imazethapyr [soil, agricultural]: 9.29961e-8 kg; = 1.0 * (p4625+p5037+p4213+p5243+p3595+p4007)
- Volatile constituents; broadcast w/ incorp. in man. at unknown time: 0.00172711 kg; = p3397
- Atrazine [air, non-urban air or from high stacks]: 8.1091e-7 kg; = 1.0 * (p3708)
- Superphosphate, grades<= 22%; broadcast w/o incorp. in fert. after plant.; kg P: 2.95209e-7 kg; = p2969
- EPTC: 1.07171e-7 kg; = p3766
- Prosulfuron: 1.12812e-9 kg; = p3853
- Aqueous ammonia; broadcast w/ incorp. in fert. in fall bef. plant.: 1.31199e-5 kg; = p2630*1.2142857143
- Phenol [air, non-urban air or from high stacks]: 2.55367e-7 kg; = 1.0 * (p2133*1.3055555556)
- I butane; from residue burning: 1.03861e-8 kg; = p2146*1.0208333333
- Pesticide formulation balance; banded or side-dressed: 1.61793e-5 kg; = p3690
- Potassium chloride; broadcast w/ incorp. in fert. in spr. bef. plant.: 0.0015657 kg; = p2702*2.2166666667
- Ethene [air, non-urban air or from high stacks]: 7.1637e-7 kg; = 1.0 * (p2125*1.1666666667)
- Primisulfuron [soil, agricultural]: 1.54993e-7 kg; = 1.0 * (p4052+p5082+p5288+p4258+p3640+p4670)
- Cyanazine: 5.03037e-7 kg; = p3739
- Potassium; injected/knifed in manure at an unknown time: 2.99808e-5 kg; = p3434
- Plant dry matter; in below-ground residue: 0.0642478 kg; = p2177
- Toluene [air, non-urban air or from high stacks]: 9.37783e-8 kg; = 1.0 * (p2141*1.0952380952)
- Other limestone constituents; applied in limestone: 0.00129865 kg; = p3220
- Magnesium [soil, agricultural]: 0.000427056 kg; = 1.0 * (p3227)
- Acetaldehyde [air, non-urban air or from high stacks]: 6.12354e-7 kg; = 1.0 * (p2130*1.8333333333)
- Sodium nitrate; no broadcast in fert. after plant.: 2.57004e-6 kg; = p2564*6.0714285714
- Ammonium nitrate; broadcast w/o incorp. in fert. after plant.: 0.000291307 kg; = p2944*4.7142857143
- Potassium chloride; broadcast w/o incorp. in fert. in spr. bef. plant.: 0.00289808 kg; = p2897*2.2166666667
- Other single phosphates; no broadcast in fert. after plant.; kg P: 6.60149e-7 kg; = p2583
- Alachlor [air, non-urban air or from high stacks]: 4.05096e-8 kg; = 1.0 * (p3704)
- Ammonium nitrate; broadcast w/o incorp. in fert. in fall bef. plant.: 0.00058317 kg; = p2827*4.7142857143
- Zinc compounds: 1.46784e-8 kg; = p3232
- Ammonium sulfate; broadcast w/o incorp. in fert. after plant.: 9.13525e-5 kg; = p2947*4.7142857143
- Nitrogen solution; no broadcast in fert. in fall bef. plant.; no broadcast in fert. in fall bef. plant.; kg N: 0.000488735 kg; = p2444
- Superphosphate, grades>22%; broadcast w/ incorp. in fert. at plant.; kg P: 7.05472e-6 kg; = p2737
- Prosulfuron [soil, agricultural]: 1.13662e-7 kg; = 1.0 * (p3647+p4265+p5295+p4677+p4059+p5089)
- Hydrocyanic acid: 1.40457e-7 kg; = p2154*2.25
- Sulfuric acid [soil, agricultural]: 5.33664e-8 kg; = 1.0 * (p3231)
- Aqueous ammonia; broadcast w/ incorp. in fert. after plant.: 6.55371e-6 kg; = p2747*1.2142857143
- Propene [air, non-urban air or from high stacks]: 3.3284e-7 kg; = 1.0 * (p2136*1.1666666667)
- Carbofuran: 1.99984e-8 kg; = p3724
- Diammonium phosphate; no broadcast in fert. after plant.: 0.000124948 kg; = p2572*4.7142857143
- cis-2-Butene: 2.11497e-8 kg; = p2149*1.1666666667
- Thifensulfuron methyl; broadcast without incorporation: 2.26448e-9 kg; = p4292
- Butane [air, non-urban air or from high stacks]: 2.9912e-8 kg; = 1.0 * (p2147*1.0208333333)
- Furan [air, non-urban air or from high stacks]: 5.38581e-8 kg; = 1.0 * (p2138*1.4166666667)
- Aqueous ammonia; no broadcast in fert. at plant.: 2.3914e-6 kg; = p2513*1.2142857143
- Other single K nutrients; broadcast w/ incorp. in fert. after plant.; kg K: 1.22928e-5 kg; = p2782
- Superphosphate, grades<= 22%; broadcast w/ incorp. in fert. at plant.; kg P: 1.97343e-7 kg; = p2735
- Other single K nutrients; broadcast w/ incorp. in fert. in fall bef. plant.; kg K: 6.85468e-5 kg; = p2665
- Monoammonium phosphate; no broadcast in fert. after plant.: 3.97366e-5 kg; = p2576*8.2142857143
- Phosphorous; in below-ground residue: 0.000124615 kg; = p2175
- Bromoxynil: 5.8662e-8 kg; = p3717
- Diammonium phosphate; broadcast w/ incorp. in fert. in spr. bef. plant.: 0.000884047 kg; = p2689*4.7142857143
- Superphosphate, grades>22%; broadcast w/o incorp. in fert. in fall bef. plant.; kg P: 5.0411e-5 kg; = p2854
- Potassium chloride; unspec. appl. method in fert. after plant.: 1.19536e-8 kg; = p3170*2.2166666667
- Sodium nitrate; broadcast w/o incorp. in fert. in spr. bef. plant.: 1.11706e-5 kg; = p2876*6.0714285714
- Superphosphate, grades<= 22%; no broadcast in fert. in spr. bef. plant.; kg P: 4.00687e-7 kg; = p2501
- Nonvolatile constituents; broadcast w/o incorp. in man. at unknown time; exc.CNPK,biogenic: 0.000523773 kg; = p3417
- fonofos: 1.62226e-6 kg; = p3582+p5024+p3994+p4200+p5230+p4612
- Diammonium phosphate; no broadcast in fert. at plant.: 0.000152923 kg; = p2533*4.7142857143
- Other single phosphates; broadcast w/ incorp. in fert. in spr. bef. plant.; kg P: 4.67077e-6 kg; = p2700
- Dicamba [soil, agricultural]: 1.39907e-5 kg; = 1.0 * (p4569+p5187+p4157+p3951+p4981+p3539)
- Methane: 1.10092e-6 kg; = p2025*1.3333333333
- Anhydrous ammonia; broadcast w/ incorp. in fert. after plant.: 0.000311389 kg; = p2745*1.2142857143
- Urea; broadcast w/ incorp. in fert. at plant.: 6.84407e-5 kg; = p2724*5
- Anhydrous ammonia; broadcast w/ incorp. in fert. at plant.: 8.68969e-5 kg; = p2706*1.2142857143
- Alachlor [soil, agricultural]: 4.08149e-6 kg; = 1.0 * (p5146+p4940+p4528+p4116+p3910+p3498)
- Other single phosphates; broadcast w/ incorp. in fert. at plant.; kg P: 1.36332e-6 kg; = p2739
- Other single K nutrients; broadcast w/o incorp. in fert. at plant.; kg K: 1.81536e-5 kg; = p2938
- Filler materials, applied with synthetic fertilizer: 0.0170007 kg; = p2432
- Water [air, non-urban air or from high stacks]: 2.72252e-7 m3; = 0.001 * (p2016)
- Nitrogen; broadcast w/ incorp. in manure at an unknown time: 0.000243148 kg; = p3394
- Particulates, < 2.5 um [air, non-urban air or from high stacks]: 2.44697e-6 kg; = 1.0 * (p2033+p2035)
- Phosphorous; broadcast w/ incorp. in manure at an unknown time: 6.98756e-5 kg; = p3395
- Glyphosate [air, non-urban air or from high stacks]: 9.12748e-9 kg; = 1.0 * (p3792)
- Chlorpyrifos [soil, agricultural]: 8.33865e-6 kg; = 1.0 * (p3524+p4142+p4966+p4554+p3936+p5172)
- Methyl vinyl ether; from residue burning: 3.73429e-8 kg; = p2137*1.6111111111
- Methanol [air, non-urban air or from high stacks]: 1.61814e-6 kg; = 1.0 * (p2129*2.6666666667)
- Diammonium phosphate; broadcast w/o incorp. in fert. in spr. bef. plant.: 0.00161855 kg; = p2884*4.7142857143
- Urea; no broadcast in fert. in fall bef. plant.: 0.000641979 kg; = p2451*5
- Nitrogen dioxide: 1.13281e-6 kg; = p2039*3.2857142857
- Pendimethalin [air, non-urban air or from high stacks]: 1.65115e-8 kg; = 1.0 * (p3840)
- Urea; broadcast w/ incorp. in fert. in spr. bef. plant.: 0.00101861 kg; = p2685*5
- Nitrogen solution; no broadcast in fert. in spr. bef. plant.; no broadcast in fert. in spr. bef. plant.; kg N: 0.00101397 kg; = p2483
- Urea; no broadcast in fert. at plant.: 8.94906e-5 kg; = p2529*5
- Ethyne [air, non-urban air or from high stacks]: 1.3402e-7 kg; = 1.0 * (p2132*1.0833333333)
- Propane [air, non-urban air or from high stacks]: 1.38665e-7 kg; = 1.0 * (p2142*1.2222222222)
- Nonvolatile constituents; using unspec. method in man. at unknown time; exc.CNPK,biogenic: 1.90019e-6 kg; = p3474
- Diammonium phosphate; broadcast w/ incorp. in fert. at plant.: 0.000258038 kg; = p2728*4.7142857143
- Potassium chloride; broadcast w/o incorp. in fert. at plant.: 0.0005302 kg; = p2936*2.2166666667
- 1-Butene: 6.59083e-8 kg; = p2144*1.1666666667
- Sodium nitrate; broadcast w/o incorp. in fert. after plant.: 2.68955e-6 kg; = p2954*6.0714285714
- isobutene: 5.75468e-8 kg; = p2150*1.1666666667
- Other single K nutrients; unspec. appl. method in fert. in fall bef. plant.; kg K: 2.28223e-9 kg; = p3055
- Ammonium sulfate; no broadcast in fert. after plant.: 8.72935e-5 kg; = p2557*4.7142857143
- Diammonium phosphate; broadcast w/o incorp. in fert. at plant.: 0.000472427 kg; = p2923*4.7142857143
- Potassium chloride; no broadcast in fert. in fall bef. plant.: 0.000957838 kg; = p2468*2.2166666667
- Other single phosphates; no broadcast in fert. in spr. bef. plant.; kg P: 2.76809e-6 kg; = p2505
- Cyfluthrin [air, non-urban air or from high stacks]: 1.02556e-10 kg; = 1.0 * (p3741)
- Pesticide formulation balance; in seed furrow: 4.98154e-6 kg; = p5132
- Other single K nutrients; unspec. appl. method in fert. in spr. bef. plant.; kg K: 1.78487e-9 kg; = p3094
- Other single K nutrients; no broadcast in fert. in spr. bef. plant.; kg K: 2.56486e-5 kg; = p2509
- Potassium chloride; broadcast w/ incorp. in fert. after plant.: 0.000359025 kg; = p2780*2.2166666667
- Terbufos [soil, agricultural]: 5.69342e-6 kg; = 1.0 * (p4701+p5319+p4289+p3671+p4083+p5113)
- Nitrogen; in above-ground residue left on field: 0.00331892 kg; = p2168
- Oxygen; applied in dolomite: 0.00169002 kg; = p3228
- Anhydrous ammonia; broadcast w/o incorp. in fert. in spr. bef. plant.: 0.0017697 kg; = p2862*1.2142857143
- Nitrogen solution; broadcast w/ incorp. in fert. at plant.; broadcast w/ incorp. in fert. at plant.; kg N: 5.21035e-5 kg; = p2717
- Ammonium sulfate; broadcast w/ incorp. in fert. in fall bef. plant.: 0.000133648 kg; = p2635*4.7142857143
- Nitrogen solution; broadcast w/ incorp. in fert. in fall bef. plant.; broadcast w/ incorp. in fert. in fall bef. plan...: 0.000373775 kg; = p2639
- Superphosphate, grades>22%; no broadcast in fert. in spr. bef. plant.; kg P: 1.4324e-5 kg; = p2503
- Formic acid [air, non-urban air or from high stacks]: 4.93343e-7 kg; = 1.0 * (p2131*3.8333333333)
- Sodium nitrate; broadcast w/ incorp. in fert. at plant.: 5.48502e-7 kg; = p2720*6.0714285714
- Urea; broadcast w/ incorp. in fert. in fall bef. plant.: 0.000490973 kg; = p2646*5
- Halosulfuron-methyl [soil, agricultural]: 6.19974e-8 kg; = 1.0 * (p4002+p4620+p5032+p4208+p5238+p3590)
- Acetone [air, non-urban air or from high stacks]: 2.19715e-7 kg; = 1.0 * (p2139*1.6111111111)
- Acetochlor [soil, agricultural]: 7.83647e-5 kg; = 1.0 * (p3908+p4526+p3496+p4938+p5144+p4114)
- Ash: 9.73865e-5 kg; = p2021+p2022
- Superphosphate, grades>22%; no broadcast in fert. at plant.; kg P: 4.1809e-6 kg; = p2542
- isopentane: 8.33279e-9 kg; = p2151*1.0166666667
- Urea; broadcast w/o incorp. in fert. in spr. bef. plant.: 0.00139383 kg; = p2880*5
- Other single phosphates; broadcast w/o incorp. in fert. after plant.; kg P: 2.0394e-6 kg; = p2973
- Monoammonium phosphate; broadcast w/o incorp. in fert. in spr. bef. plant.: 0.000514741 kg; = p2888*8.2142857143
- Sulfur dioxide [air, non-urban air or from high stacks]: 5.85894e-7 kg; = 1.0 * (p2041)
- NMVOC, non-methane volatile organic compounds, unspecified origin [air, non-urban air or from high stacks]: 1.26505e-5 kg; = 1.0 * (p2051+p2052)
- Formaldehyde [air, non-urban air or from high stacks]: 1.02353e-6 kg; = 1.0 * (p2128*2.5)
- Monoammonium phosphate; broadcast w/ incorp. in fert. in fall bef. plant.: 0.000320286 kg; = p2654*8.2142857143
- Volatile constituents; using unspec. method in man. at unknown time: 1.9951e-5 kg; = p3473
- Superphosphate, grades<= 22%; no broadcast in fert. at plant.; kg P: 1.16953e-7 kg; = p2540
- Potassium chloride; broadcast w/o incorp. in fert. after plant.: 0.000664546 kg; = p2975*2.2166666667
- Benzene [air, non-urban air or from high stacks]: 7.5549e-8 kg; = 1.0 * (p2140*1.0833333333)
- Urea; broadcast w/o incorp. in fert. at plant.: 9.36518e-5 kg; = p2919*5
- Nitrogen solution; broadcast w/ incorp. in fert. after plant.; broadcast w/ incorp. in fert. after plant.; kg N: 0.000186709 kg; = p2756
- Monoammonium phosphate; no broadcast in fert. in fall bef. plant.: 0.000189814 kg; = p2459*8.2142857143
- Ammonium nitrate; no broadcast in fert. in fall bef. plant.: 0.000557259 kg; = p2437*4.7142857143
- Bentazone [air, non-urban air or from high stacks]: 2.86131e-8 kg; = 1.0 * (p3713)
- Butadiene [air, non-urban air or from high stacks]: 7.42864e-8 kg; = 1.0 * (p2143*1.125)
- Phosphorous; using unspec. method in manure at an unknown time: 8.07179e-7 kg; = p3471
- Aqueous ammonia; broadcast w/o incorp. in fert. in spr. bef. plant.: 3.72464e-5 kg; = p2864*1.2142857143
- Other single K nutrients; no broadcast in fert. after plant.; kg K: 5.88137e-6 kg; = p2587
- Superphosphate, grades<= 22%; broadcast w/o incorp. in fert. at plant.; kg P: 3.61305e-7 kg; = p2930
- Superphosphate, grades<= 22%; no broadcast in fert. after plant.; kg P: 9.55583e-8 kg; = p2579
- Ammonium sulfate; broadcast w/o incorp. in fert. in fall bef. plant.: 0.00018288 kg; = p2830*4.7142857143
- Acetochlor: 7.77784e-7 kg; = p3702
- Superphosphate, grades>22%; no broadcast in fert. in fall bef. plant.; kg P: 1.63179e-5 kg; = p2464
- Thifensulfuron methyl; banded or side-dressed: 7.85305e-10 kg; = p3674
- Cyanazine [soil, agricultural]: 5.06828e-5 kg; = 1.0 * (p4563+p3945+p4975+p4151+p3533+p5181)
- 2,4-D [soil, agricultural]: 5.38344e-6 kg; = 1.0 * (p3485+p4103+p5133+p4515+p3897+p4927)
- Sodium nitrate; broadcast w/o incorp. in fert. in fall bef. plant.: 5.38423e-6 kg; = p2837*6.0714285714
- Calcium [soil, agricultural]: 0.00890201 kg; = 1.0 * (p3226+p3218)
- Potassium; in below-ground residue; biogenic: 0.00189747 kg; = p2176
- Tebupirimphos: 9.23003e-10 kg; = p3875
- Sewage sludge dry matter; applied in sewage sludge: 2.04637e-10 kg; = p3243
- Superphosphate, grades>22%; broadcast w/o incorp. in fert. at plant.; kg P: 1.29161e-5 kg; = p2932
- Diammonium phosphate; broadcast w/ incorp. in fert. in fall bef. plant.: 0.00100711 kg; = p2650*4.7142857143
- Carbon [soil, agricultural]: 0.208933 kg; = 1.0 * (p2167+p3412+p3217+p3431+p3469+p3393+p2173+p3242+p3225)
- Metribuzin [air, non-urban air or from high stacks]: 2.35879e-9 kg; = 1.0 * (p3827)
- Pesticide formulation balance; unspec. appl. method: 5.08323e-6 kg; = p5338
- Glycolaldehyde; from residue burning: 9.91948e-7 kg; = p2135*2.5
- Monoammonium phosphate; no broadcast in fert. in spr. bef. plant.: 0.00016662 kg; = p2498*8.2142857143
- Nitrogen solution; no broadcast in fert. after plant.; no broadcast in fert. after plant.; kg N: 0.000244134 kg; = p2561
- Urea; broadcast w/o incorp. in fert. after plant.: 0.000335595 kg; = p2958*5
- Dimethenamid: 1.10145e-7 kg; = p3756
- Carbofuran [soil, agricultural]: 2.01491e-6 kg; = 1.0 * (p3930+p4136+p3518+p4960+p4548+p5166)
- 2,4-D [air, non-urban air or from high stacks]: 5.34316e-8 kg; = 1.0 * (p3691)
- Superphosphate, grades<= 22%; broadcast w/o incorp. in fert. in fall bef. plant.; kg P: 1.41016e-6 kg; = p2852
- Superphosphate, grades>22%; broadcast w/ incorp. in fert. after plant.; kg P: 5.76415e-6 kg; = p2776
- Thifensulfuron methyl; foliar or directed spray: 2.21215e-10 kg; = p4704
- Pesticide formulation balance; broadcast without incorporation: 4.66541e-5 kg; = p4308
- Ammonium sulfate; no broadcast in fert. in fall bef. plant.: 0.000174754 kg; = p2440*4.7142857143
- Ammonium nitrate; broadcast w/o incorp. in fert. at plant.: 8.12928e-5 kg; = p2905*4.7142857143
- Thifensulfuron methyl; in seed furrow: 2.41792e-10 kg; = p5116
- Superphosphate, grades<= 22%; broadcast w/ incorp. in fert. in spr. bef. plant.; kg P: 6.76106e-7 kg; = p2696
- Other single phosphates; broadcast w/ incorp. in fert. after plant.; kg P: 1.11391e-6 kg; = p2778
- Aqueous ammonia; broadcast w/o incorp. in fert. in fall bef. plant.: 1.79529e-5 kg; = p2825*1.2142857143
- Pesticide formulation balance; broadcast by air: 2.11292e-6 kg; = p3896
- Ammonium sulfate; no broadcast in fert. in spr. bef. plant.: 0.000362558 kg; = p2479*4.7142857143
- Ethane [air, non-urban air or from high stacks]: 4.47407e-7 kg; = 1.0 * (p2126*1.25)
- Other single K nutrients; no broadcast in fert. at plant.; kg K: 4.69237e-6 kg; = p2548
- Thifensulfuron methyl; unspec. appl. method: 2.46728e-10 kg; = p5322
- Oxygen; applied in limestone: 0.009757 kg; = p3219
- Plant dry matter; in aboveground residue left on field: 0.160231 kg; = p2172
- Potassium; using unspec. method in manure at an unknown time: 2.35526e-6 kg; = p3472
- Aqueous ammonia; broadcast w/o incorp. in fert. after plant.: 8.96787e-6 kg; = p2942*1.2142857143
- Dioxins and furans (PCDD/F); from residue burning: 1.47704e-14 kg TEQ; = p2047
- Sodium nitrate; broadcast w/ incorp. in fert. in spr. bef. plant.: 8.16343e-6 kg; = p2681*6.0714285714
- Nitrogen; broadcast w/o incorp. in manure at an unknown time: 0.000774214 kg; = p3413
- Potassium; broadcast w/ incorp. in manure at an unknown time: 0.000203889 kg; = p3396
- Monoammonium phosphate; broadcast w/o incorp. in fert. at plant.: 0.000150244 kg; = p2927*8.2142857143
- Other single phosphates; broadcast w/o incorp. in fert. at plant.; kg P: 2.49602e-6 kg; = p2934
- Particulates, < 10 um: 5.25828e-6 kg; = p2034+p2036
- Aqueous ammonia; broadcast w/ incorp. in fert. in spr. bef. plant.: 2.72197e-5 kg; = p2669*1.2142857143
- Anhydrous ammonia; broadcast w/ incorp. in fert. in fall bef. plant.: 0.000623373 kg; = p2628*1.2142857143
- Nitrogen solution; broadcast w/o incorp. in fert. at plant.; broadcast w/o incorp. in fert. at plant.; kg N: 7.12966e-5 kg; = p2912
- Potassium chloride; no broadcast in fert. in spr. bef. plant.: 0.000749098 kg; = p2507*2.2166666667
- Potassium chloride; broadcast w/o incorp. in fert. in fall bef. plant.: 0.00370564 kg; = p2858*2.2166666667
- Gypsum: 6.40421e-7 kg; = p3229
- Nitrogen; using unspec. method in manure at an unknown time: 2.80876e-6 kg; = p3470
- Ammonium nitrate; no broadcast in fert. in spr. bef. plant.: 0.00115613 kg; = p2476*4.7142857143
- Potassium chloride; no broadcast in fert. after plant.: 0.000171773 kg; = p2585*2.2166666667
- Other single K nutrients; broadcast w/o incorp. in fert. in spr. bef. plant.; kg K: 9.9228e-5 kg; = p2899
- Superphosphate, grades>22%; broadcast w/ incorp. in fert. in spr. bef. plant.; kg P: 2.41698e-5 kg; = p2698
- Pendimethalin [soil, agricultural]: 1.6636e-6 kg; = 1.0 * (p5076+p4664+p4252+p3634+p5282+p4046)
- Anhydrous ammonia; broadcast w/ incorp. in fert. in spr. bef. plant.: 0.0012933 kg; = p2667*1.2142857143
- Halosulfuron-methyl: 6.15335e-10 kg; = p3796
- Ammonia [air, non-urban air or from high stacks]: 1.06844e-6 kg; = 1.0 * (p2159*1.2142857143)
- Other single K nutrients; broadcast w/ incorp. in fert. in spr. bef. plant.; kg K: 5.36085e-5 kg; = p2704

## Sampling procedure
A delete-a-group jackknife is used by the USDA to estimate the ARMS sample means and RSEs, based on a 15 sample delete-a-group jackknife. Because of this relatively small sample size, a Students t distribution is used to represent ARMS data probability density functions. Other representations of uncertainty are described in Cooper, J.S., Kahn, E., Noon, M. (2012). LCA Digital Commons Unit Process Data: field crop production Version 1. Prepared for the US Department of Agriculture National Agricultural Library. Retrieved from https://www.lcacommons.gov/discovery/docs/LCA%20Digital%20Commons%20Unit%20Process%20Data%20final%20updated.pdf

## Extrapolations
Data represent an aggregation of processes applied in Iowa in 1996. Data development is demonstrated by parameterization (exlicitly presents all raw and uncertainty data and all calculations). Flow data quality according to the LCADC convention is provided for all flows.
