# winter wheat; at harvest in 2000; at farm; 86%-90% moisture

Dataset: EcoSpold 2, unit process
Geography: GLO
Time period: 2000-01-02 to 2001-01-01
Scenario: Business-as-Usual
System model: Allocation, ecoinvent default
Generated by: cooperjs@u.washington.edu
isCopyrightProtected: false

## General comment
This unit process/ gate-to-gate dataset represents the production of 1 kg winter wheat coproduced with residue. The process technologies are an aggregation of those applied in Montana in 2000. Applicable classifications include ISIC 0111, NAIC 111140, UNSPSC 50221101; this dataset was prepared in ILCD format using the UWDFE Lab Excel to ILCD File Generator (beta version, August 2013)

Exchange "Fluroxypyr-soil agricultural" is the result of combining the following original LCA Commons flows: "Fluroxypyr; broadcast without incorporation; kg AI", "Fluroxypyr; broadcast with incorporation; kg AI", "Fluroxypyr; unspec. appl. method; kg AI", "Fluroxypyr; foliar or directed spray; kg AI".
Exchange "NMVOC, non-methane volatile organic compounds, unspecified origin-air low population density" is the result of combining the following original LCA Commons flows: "NMVOCs; from residue burning; kg C, biogenic", "NMVOCs; from residue burning; kg except C, biogenic".
Exchange "Glyphosate-soil agricultural" is the result of combining the following original LCA Commons flows: "Glyphosate; broadcast without incorporation; kg AI", "Glyphosate; broadcast with incorporation; kg AI", "Glyphosate; unspec. appl. method; kg AI", "Glyphosate; foliar or directed spray; kg AI".
Exchange "Dicamba-soil agricultural" is the result of combining the following original LCA Commons flows: "Dicamba; foliar or directed spray; kg AI", "Dicamba; broadcast with incorporation; kg AI", "Dicamba; broadcast without incorporation; kg AI", "Dicamba; unspec. appl. method; kg AI".
Exchange "Carbon-soil agricultural" is the result of combining the following original LCA Commons flows: "Carbon; applied in limestone", "Carbon; applied in sewage sludge", "Carbon; in above-ground residue left on field; biogenic", "Carbon; applied in dolomite", "Carbon; in below-ground residue; biogenic".
Exchange "Particulates, < 2.5 um-air low population density" is the result of combining the following original LCA Commons flows: "PM2.5; from residue burning; kg except C, biogenic", "PM2.5; from residue burning; kg C, biogenic".
Exchange "Pesticides, unspecified-soil agricultural" is the result of combining the following original LCA Commons flows: "Unspecified pesticide; foliar or directed spray; kg AI", "Unspecified pesticide; broadcast without incorporation; kg AI", "Unspecified pesticide; broadcast with incorporation; kg AI", "Unspecified pesticide; unspec. appl. method; kg AI".
Exchange "Ash-soil agricultural" is the result of combining the following original LCA Commons flows: "Ash; from residue burning; kg except C, biogenic", "Ash; from residue burning; kg C, biogenic".
Exchange "Water-soil agricultural" is the result of combining the following original LCA Commons flows: "Water; from irrigation and applied with manure and sewage sludge", "Water; in below-ground residue; biogenic", "Water; in above-ground residue left on field; biogenic".
Exchange "Tralkoxydim-soil agricultural" is the result of combining the following original LCA Commons flows: "Tralkoxydim; broadcast without incorporation; kg AI", "Tralkoxydim; unspec. appl. method; kg AI", "Tralkoxydim; foliar or directed spray; kg AI", "Tralkoxydim; broadcast with incorporation; kg AI".
Exchange "Metsulfuron-methyl-soil agricultural" is the result of combining the following original LCA Commons flows: "Metsulfuron-methyl; foliar or directed spray; kg AI", "Metsulfuron-methyl; broadcast with incorporation; kg AI", "Metsulfuron-methyl; unspec. appl. method; kg AI", "Metsulfuron-methyl; broadcast without incorporation; kg AI".
Exchange "Tri-allate-soil agricultural" is the result of combining the following original LCA Commons flows: "Tri-allate; unspec. appl. method; kg AI", "Tri-allate; broadcast without incorporation; kg AI", "Tri-allate; foliar or directed spray; kg AI", "Tri-allate; broadcast with incorporation; kg AI".
Exchange "Particulates, < 10 um-air low population density" is the result of combining the following original LCA Commons flows: "PM10; from residue burning; kg except C, biogenic", "PM10; from residue burning; kg C, biogenic".
Exchange "MCPA-soil agricultural" is the result of combining the following original LCA Commons flows: "MCPA; broadcast without incorporation; kg AI", "MCPA; broadcast with incorporation; kg AI", "MCPA; unspec. appl. method; kg AI", "MCPA; foliar or directed spray; kg AI".
Exchange "Triasulfuron-soil agricultural" is the result of combining the following original LCA Commons flows: "Triasulfuron; unspec. appl. method; kg AI", "Triasulfuron; broadcast without incorporation; kg AI", "Triasulfuron; foliar or directed spray; kg AI", "Triasulfuron; broadcast with incorporation; kg AI".
Exchange "Calcium-soil agricultural" is the result of combining the following original LCA Commons flows: "Calcium; applied in dolomite", "Calcium; applied in limestone".
Exchange "2,4-D-soil agricultural" is the result of combining the following original LCA Commons flows: "2,4-D; foliar or directed spray; kg AI", "2,4-D; unspec. appl. method; kg AI", "2,4-D; broadcast with incorporation; kg AI", "2,4-D; broadcast without incorporation; kg AI".
Exchange "Phenol-2bdf9967-6dae-4183-88d1-8f612548c51e low population density" was originally named: "Phenol; from residue burning; kg C, biogenic" in this dataset.
Exchange "Sulfuric acid-be1c0329-f1a8-4524-8420-a86d2a8dd358 agricultural" was originally named: "Sulfuric acid; as secondary application" in this dataset.
Exchange "Methanol-2bdf9967-6dae-4183-88d1-8f612548c51e low population density" was originally named: "Methanol; from residue burning; kg C, biogenic" in this dataset.
Exchange "Sulfur-be1c0329-f1a8-4524-8420-a86d2a8dd358 agricultural" was originally named: "Sulfur; as secondary application" in this dataset.
Exchange "Methane-2bdf9967-6dae-4183-88d1-8f612548c51e low population density" was originally named: "Methane; from residue burning; kg C, biogenic" in this dataset.
Exchange "Occupation, arable-c19fb2d9-98eb-4cd3-8761-81b71d8a9a1b land" was originally named: "Occupation; arable, as wheat" in this dataset.
Exchange "Sulfur dioxide-2bdf9967-6dae-4183-88d1-8f612548c51e low population density" was originally named: "Sulfur dioxide; from residue burning; biogenic" in this dataset.
Exchange "Carbon monoxide, fossil-2bdf9967-6dae-4183-88d1-8f612548c51e low population density" was originally named: "Carbon monoxide; from residue burning; kg C, biogenic" in this dataset.
Exchange "Acetone-2bdf9967-6dae-4183-88d1-8f612548c51e low population density" was originally named: "Acetone; from residue burning; kg C, biogenic" in this dataset.
Exchange "Carbon dioxide-c19fb2d9-98eb-4cd3-8761-81b71d8a9a1b unspecified" was originally named: "Carbon dioxide; from plant uptake; kg C, biogenic" in this dataset.
Exchange "Propane-2bdf9967-6dae-4183-88d1-8f612548c51e low population density" was originally named: "Propane; from residue burning; kg C, biogenic" in this dataset.
Exchange "Formaldehyde-2bdf9967-6dae-4183-88d1-8f612548c51e low population density" was originally named: "Formaldehyde; from residue burning; kg C, biogenic" in this dataset.
Exchange "Butadiene-2bdf9967-6dae-4183-88d1-8f612548c51e low population density" was originally named: "1,3 butadiene; from residue burning; kg C, biogenic" in this dataset.
Exchange "Dinitrogen monoxide-2bdf9967-6dae-4183-88d1-8f612548c51e low population density" was originally named: "Dinitrogen monoxide; from residue burning; kg N, biogenic" in this dataset.
Exchange "Acrylonitrile-2bdf9967-6dae-4183-88d1-8f612548c51e low population density" was originally named: "Propenenitrile; from residue burning; kg C, biogenic" in this dataset.
Exchange "Glyphosate-2bdf9967-6dae-4183-88d1-8f612548c51e low population density" was originally named: "Glyphosate; broadcast by air; kg AI" in this dataset.
Exchange "Pentane-2bdf9967-6dae-4183-88d1-8f612548c51e low population density" was originally named: "N pentane; from residue burning; kg C, biogenic" in this dataset.
Exchange "Ammonia-2bdf9967-6dae-4183-88d1-8f612548c51e low population density" was originally named: "Ammonia; from residue burning; kg N, biogenic" in this dataset.
Exchange "Water, unspecified origin-c19fb2d9-98eb-4cd3-8761-81b71d8a9a1b in water" was originally named: "Water; from plant uptake; biogenic" in this dataset.
Exchange "Ethane-2bdf9967-6dae-4183-88d1-8f612548c51e low population density" was originally named: "Ethane; from residue burning; kg C, biogenic" in this dataset.
Exchange "Toluene-2bdf9967-6dae-4183-88d1-8f612548c51e low population density" was originally named: "Toluene; from residue burning; kg C, biogenic" in this dataset.
Exchange "Isoprene-2bdf9967-6dae-4183-88d1-8f612548c51e low population density" was originally named: "Isoprene; from residue burning; kg C, biogenic" in this dataset.
Exchange "cis-2-Butene-2bdf9967-6dae-4183-88d1-8f612548c51e low population density" was originally named: "Cis 2 butene; from residue burning; kg C, biogenic" in this dataset.
Exchange "Transformation, from arable-c19fb2d9-98eb-4cd3-8761-81b71d8a9a1b land" was originally named: "Transformation; from arable, from unspec. use to wheat" in this dataset.
Exchange "isopentane-2bdf9967-6dae-4183-88d1-8f612548c51e low population density" was originally named: "I pentane; from residue burning; kg C, biogenic" in this dataset.
Exchange "Carbon dioxide, in air-2bdf9967-6dae-4183-88d1-8f612548c51e low population density" was originally named: "Carbon dioxide; from residue burning; kg C, biogenic" in this dataset.
Exchange "Acetaldehyde-2bdf9967-6dae-4183-88d1-8f612548c51e low population density" was originally named: "Acetaldehyde; from residue burning; kg C, biogenic" in this dataset.
Exchange "Acetonitrile-2bdf9967-6dae-4183-88d1-8f612548c51e low population density" was originally named: "Acetonitrile; from residue burning; kg C, biogenic" in this dataset.
Exchange "Triasulfuron-2bdf9967-6dae-4183-88d1-8f612548c51e low population density" was originally named: "Triasulfuron; broadcast by air; kg AI" in this dataset.
Exchange "Ethyne-2bdf9967-6dae-4183-88d1-8f612548c51e low population density" was originally named: "Acetylene; from residue burning; kg C, biogenic" in this dataset.
Exchange "Propene-2bdf9967-6dae-4183-88d1-8f612548c51e low population density" was originally named: "Propylene; from residue burning; kg C, biogenic" in this dataset.
Exchange "Magnesium-be1c0329-f1a8-4524-8420-a86d2a8dd358 agricultural" was originally named: "Magnesium; applied in dolomite" in this dataset.
Exchange "Phosphorus-c19fb2d9-98eb-4cd3-8761-81b71d8a9a1b unspecified" was originally named: "Phosphorous; from plant uptake; biogenic" in this dataset.
Exchange "1-Butene-2bdf9967-6dae-4183-88d1-8f612548c51e low population density" was originally named: "1 butene; from residue burning; kg C, biogenic" in this dataset.
Exchange "Furan-2bdf9967-6dae-4183-88d1-8f612548c51e low population density" was originally named: "Furan; from residue burning; kg C, biogenic" in this dataset.
Exchange "Zinc compounds-be1c0329-f1a8-4524-8420-a86d2a8dd358 agricultural" was originally named: "Zinc compounds; as secondary application" in this dataset.
Exchange "Tri-allate-2bdf9967-6dae-4183-88d1-8f612548c51e low population density" was originally named: "Tri-allate; broadcast by air; kg AI" in this dataset.
Exchange "Fluroxypyr-2bdf9967-6dae-4183-88d1-8f612548c51e low population density" was originally named: "Fluroxypyr; broadcast by air; kg AI" in this dataset.
Exchange "Metsulfuron-methyl-2bdf9967-6dae-4183-88d1-8f612548c51e low population density" was originally named: "Metsulfuron-methyl; broadcast by air; kg AI" in this dataset.
Exchange "Hydrocyanic acid-2bdf9967-6dae-4183-88d1-8f612548c51e low population density" was originally named: "Hydrogen cyanide; from residue burning; kg C, biogenic" in this dataset.
Exchange "Dicamba-2bdf9967-6dae-4183-88d1-8f612548c51e low population density" was originally named: "Dicamba; broadcast by air; kg AI" in this dataset.
Exchange "Butane-2bdf9967-6dae-4183-88d1-8f612548c51e low population density" was originally named: "N butane; from residue burning; kg C, biogenic" in this dataset.
Exchange "2,4-D-2bdf9967-6dae-4183-88d1-8f612548c51e low population density" was originally named: "2,4-D; broadcast by air; kg AI" in this dataset.
Exchange "trans-2-Butene-2bdf9967-6dae-4183-88d1-8f612548c51e low population density" was originally named: "Trans 2 butene; from residue burning; kg C, biogenic" in this dataset.
Exchange "Nitrogen dioxide-2bdf9967-6dae-4183-88d1-8f612548c51e low population density" was originally named: "Nitrogen dioxide; from residue burning; kg N, biogenic" in this dataset.
Exchange "Acetic acid-2bdf9967-6dae-4183-88d1-8f612548c51e low population density" was originally named: "Acetic acid; from residue burning; kg C, biogenic" in this dataset.
Exchange "Ethene-2bdf9967-6dae-4183-88d1-8f612548c51e low population density" was originally named: "Ethylene; from residue burning; kg C, biogenic" in this dataset.
Exchange "Benzene-2bdf9967-6dae-4183-88d1-8f612548c51e low population density" was originally named: "Benzene; from residue burning; kg C, biogenic" in this dataset.
Exchange "isobutene-2bdf9967-6dae-4183-88d1-8f612548c51e low population density" was originally named: "I butene; from residue burning; kg C, biogenic" in this dataset.
Exchange "Formic acid-2bdf9967-6dae-4183-88d1-8f612548c51e low population density" was originally named: "Formic acid; from residue burning; kg C, biogenic" in this dataset.
Exchange "MCPA-2bdf9967-6dae-4183-88d1-8f612548c51e low population density" was originally named: "MCPA; broadcast by air; kg AI" in this dataset.
Exchange "Transformation, to arable-c19fb2d9-98eb-4cd3-8761-81b71d8a9a1b land" was originally named: "Transformation; to arable, to wheat" in this dataset.
Exchange "Water-2bdf9967-6dae-4183-88d1-8f612548c51e low population density" was originally named: "Water; from residue burning; biogenic" in this dataset.

## Geography
The unit process is assumed to represent production in Montana (US State).

## Technology
This process produces winter wheat; at harvest in 2000; at farm; 86%-90% moisture. The process is assumed to represent production in Montana (US State). Yields and related inputs and outputs represent a single year of operation, in 2000. This dataset includes consideration of residue burning; soil preparation; planting or sowing; irrigation; application, storage, and transport of fertilizers, manures, liming materials, secondary materials, and pesticides; and harvest. Fate and transport of applications are not included as described in Cooper, J.S., Kahn, E., Noon, M. (2012) LCA Digital Commons Unit Process Data: field crop production Version 1 which is available at https://www.lcacommons.gov/discovery/docs/LCA%20Digital%20Commons%20Unit%20Process%20Data%20final%20updated.pdf

## Time period
Start and end dates match the underlying data obtained from the USDA Agricultural Resource Management Survey (ARMS).
## Parameters
- p2372: 0.000777372; = p2225*p2201
- p2297: 0; = p2227*p2204
- p2688: 0; = p2297*(p1078+p1080)
- p2985: 0; = p2399*(p1020+p1022)
- p2067: 0.446471
- p0253: 25.178
- p2480: 0; = p2284*p1014
- p1089: 0.000355442; = IF(p1071=0;p1083*p0001/(p0818*p0002);0)
- p3216: 0.06; = IF(OR(p1226=0;p1228=0);0;1-p3213-p3214-p3215)
- p2581: 0; = p2385*p1073
- p0271: 15.277
- p2241: 0.000853941; = p2222*p2186
- p2974: 0; = p2388*(p1079+p1081)
- p0517: 0; = SQRT(2)*(IF((2*p0385-1)<0;-1;IF((2*p0385-1)>0;1;0))*SQRT(SQRT((2/(pi()*0.140012289)+LN(1-(2*p0385-1)^2)/2)^2-LN(1-(2*p0385-1)^2)/0.140012289)-(2/(pi()*0.140012289)+LN(1-(2*p0385-1)^2)/2)))
- p3201: 0; = p2420*p1082
- p0585: 0; = IF(p0321<0.5;-SQRT(p0007*EXP(p0453^2*p0008)-p0007);SQRT(p0007*EXP(p0453^2*p0008)-p0007))
- p2089: 0.40001
- p0866: 0; = IF(p0858+p0864+p0865=1;0;IF(p0858+p0864+p0865+p0861>1;1-(p0858+p0864+p0865);p0861))
- p2668: 0; = p2277*(p1019+p1021)
- p1572: 0
- p1734: 0
- p1265: 0; = if(p1232>0;0;IF(p1259+p1263+p1264=1;0;IF(p1259+p1263+p1264+p1262>1;1-(p1259+p1263+p1264);p1262)))
- p0949: 0.000267175; = if(and(p0683=0;or(p0807=480;p0807=32;p0807=1;and(p0807=60;p0901<0.03)));p0937;0)
- p1832: 0
- p1915: 0
- p3586: 0; = p1855*p3476
- p1951: 0
- p3232: 8.37658e-8; = p1182/p0818
- p1716: 0
- p3319: 0; = if(and(p1232=0;p3253<>0);p3253*(p3263-p3314)/p3316;0)
- p0741: 0.521; = p0081*(1+p0609*p0213/100)
- p2957: 0.00064957; = p2371*(p1020+p1022)
- p2196: 0.0187542; = p1068-p2193-p2195
- p1963h: 2.08242e-7; = p1686*p1890+p1687*p1891+p1688*p1892+p1689*p1893+p1690*p1894+p1691*p1895+p1692*p1896+p1693*p1897+p1694*p1898+p1695*p1899+p1696*p1900+p1697*p1901+p1698*p1902+p1699*p1903+p1700*p1904+p1701*p1905+p1702*p1906+p1703*p1907+p1704*p1908+p1705*p1909
- p1575: 0
- p3427: 0; = p3370*p1239
- p1199: -0.29
- p2883: 0; = p2297*(p1079+p1081)
- p1299: 0
- p2711: 3.36495e-6; = p2320*(p1019+p1021)
- p2312: 0; = p2231*p2219
- p2387: 0; = p2229*p2216
- p2794: 0; = p2403*(p1019+p1021)
- p0778: 12.611; = p0118*(1+p0646*p0250/100)
- p1924: 0
- p1057: 0.82
- p2334: 6.39328e-5; = p2224*p2202
- p1904: 0
- p3460: 0; = p3365*p1241
- p1720: 0
- p1902: 0
- p3296: 0
- p1839: 0
- p2676: 0; = p2285*(p1019+p1021)
- p0986: 0; = IF(p0982+p0985=1;0;IF(p0982+p0985+p0984>1;1-(p0982+p0985);p0984))
- p1595: 0
- p1214: 0; = IF(p1213=0;0;p1213-1)
- p0250: 39.325
- p0044: 82.065
- p2843: 0.000813043; = p2257*(p1020+p1022)
- p2573: 0; = p2377*p1073
- p2844: 0; = p2258*(p1079+p1081)
- p2682: 0; = p2291*(p1019+p1021)
- p2549: 0.000318157; = p2353*p1123
- p3242: 8.82791e-8; = p3234*p1188*p3238/p0818
- p2761: 1.10706e-6; = p2370*(p1019+p1021)
- p1253: 0; = if(p1232>0;0;p0735/100)
- p1884: 0
- p2854: 0; = p2268*(p1079+p1081)
- p1859: 0
- p2622: 0; = p2426*p1073
- p2693: 0; = p2302*(p1078+p1080)
- p0844: 0.855396
- p3252: 0; = p1252*(p1267*(1-p3247)+p1270*(1-p3248)+p1271*(1-p3249)+p1272*(1-p3250))
- p2117: 0.585147
- p0953: 0; = if(and(p0683>0;or(p0807=56;p0807=100;and(p0807=60;p0901>0.06)));p0935;0)
- p1754: 7.55705e-5; = p1346*1000/p0818
- p2792: 0; = p2401*(p1019+p1021)
- p3030: 1.00484e-8; = p2249*p1023
- p3034: 2.31055e-10; = p2253*p1023
- p3318: 0; = if(and(p1232=0;p3253<>0);p3253*(p3262-p3313)/p3316;0)
- p1682: 0
- p3416: 0; = p3378*p1238
- p2310: 0; = p2227*p2217
- p1616: 0
- p0999: 0; = IF(p0996=1;0;IF(p0996+p0997>1;1-p0996;p0997))
- p2284: 0; = p2223*p2190
- p1851: 0
- p1691: 0
- p2814: 0; = p2423*(p1078+p1080)
- p0487: 0; = SQRT(2)*(IF((2*p0355-1)<0;-1;IF((2*p0355-1)>0;1;0))*SQRT(SQRT((2/(pi()*0.140012289)+LN(1-(2*p0355-1)^2)/2)^2-LN(1-(2*p0355-1)^2)/0.140012289)-(2/(pi()*0.140012289)+LN(1-(2*p0355-1)^2)/2)))
- p2454: 0.000657922; = p2258*p1073
- p1078: 0.06056; = IF(p1071=0;IF(p1073=1;0;IF(p1073+p1074>1;1-p1073;p1074));0)
- p0890: 0; = p0686*1000*p0687*p0885/100
- p2832: 3.64586e-5; = p2246*(p1020+p1022)
- p2891: 0; = p2305*(p1079+p1081)
- p2744: 0; = p2353*(p1128+p1130)
- p0245: 13.104
- p0484: 0; = SQRT(2)*(IF((2*p0352-1)<0;-1;IF((2*p0352-1)>0;1;0))*SQRT(SQRT((2/(pi()*0.140012289)+LN(1-(2*p0352-1)^2)/2)^2-LN(1-(2*p0352-1)^2)/0.140012289)-(2/(pi()*0.140012289)+LN(1-(2*p0352-1)^2)/2)))
- p1938: 0
- p1268: 0
- p1315: 0; = p1311*p1252/p0818
- p0766: 0
- p3390: 0; = p3371*p1234
- p3883: 1.81398e-6; = p1946*p3477
- p1551: 0
- p2483: 0; = p2287*p1014
- p0509: 0; = SQRT(2)*(IF((2*p0377-1)<0;-1;IF((2*p0377-1)>0;1;0))*SQRT(SQRT((2/(pi()*0.140012289)+LN(1-(2*p0377-1)^2)/2)^2-LN(1-(2*p0377-1)^2)/0.140012289)-(2/(pi()*0.140012289)+LN(1-(2*p0377-1)^2)/2)))
- p0127: 15.404
- p1973: 0; = if(p0807=480;p1968*p0001/(p0818*p0002);0)
- p1861: 0
- p2290: 0; = p2223*p2197
- p2683: 0; = p2292*(p1019+p1021)
- p0403: 0.5
- p0016: 258.901
- p2882: 0; = p2296*(p1020+p1022)
- p3314: 0; = if(and(p1232=0;p3253<>0);p3263*p3289;0)
- p2566: 7.27293e-6; = p2370*p1014
- p1338: 926057; = p1324*p0801
- p0825: 2.36534e9; = p0818*p0822
- p0499: 0; = SQRT(2)*(IF((2*p0367-1)<0;-1;IF((2*p0367-1)>0;1;0))*SQRT(SQRT((2/(pi()*0.140012289)+LN(1-(2*p0367-1)^2)/2)^2-LN(1-(2*p0367-1)^2)/0.140012289)-(2/(pi()*0.140012289)+LN(1-(2*p0367-1)^2)/2)))
- p0504: 0; = SQRT(2)*(IF((2*p0372-1)<0;-1;IF((2*p0372-1)>0;1;0))*SQRT(SQRT((2/(pi()*0.140012289)+LN(1-(2*p0372-1)^2)/2)^2-LN(1-(2*p0372-1)^2)/0.140012289)-(2/(pi()*0.140012289)+LN(1-(2*p0372-1)^2)/2)))
- p1005: 0; = p1001*p0888
- p2935: 0; = p2349*(p1079+p1081)
- p2625: 0; = p2429*p1123
- p1971: 0.000450596; = p1966*p0001/(p0818*p0002)
- p2093: 0.260958
- p0020: 316.058
- p0913: 0.0120403
- p2646: 0.000116617; = p2255*(p1019+p1021)
- p1134: 0; = if(p1121=0;p1128*(p0716/100)*p0703*1000;0)
- p0180: 49.421
- p2555: 3.86858e-5; = p2359*p1014
- p4775: 0; = p1808*p3482
- p3317: 0; = if(and(p1232=0;p3253<>0);p3253*(p3261*p3277-p3312)/p3316;0)
- p1155: 0.000556473; = if(p1153*p0818=0;0;p1151/(p1153*p0818))
- p1157: 0.22095
- p2671: 0; = p2280*(p1019+p1021)
- p2500: 0; = p2304*p1073
- p1202: 0.7
- p0858: 0; = p0670*1000/p0856
- p1171: 0.000500663; = p0801*p0001/(p0818*p0002)
- p0640: 0; = IF(p0376<0.5;-SQRT(p0007*EXP(p0508^2*p0008)-p0007);SQRT(p0007*EXP(p0508^2*p0008)-p0007))
- p0311: 0.5
- p1857: 0
- p1894: 0
- p2308: 0; = p2227*p2215
- p0841: -0.188576
- p1586: 0
- p2922: 0; = p2336*(p1079+p1081)
- p2990: 0; = p2404*(p1020+p1022)
- p2892: 0; = p2306*(p1079+p1081)
- p3441: 0; = p3365*p1240
- p2441: 0.000225406; = p2245*p1014
- p3298: 0; = if(p1283+p1284+p1285+p1286=0;0;p1283/(p1283+p1284+p1285+p1286))
- p0940: 0; = if(and(p0683=0;p0946=0);p0934;0)
- p2651: 1.26066e-5; = p2260*(p1078+p1080)
- p3209: 0; = p2428*p1132
- p0239: 11.748
- p2617: 0; = p2421*p1073
- p3166: 0; = p2385*p1082
- p1568: 0
- p0108: 58.856
- p2959: 4.00804e-5; = p2373*(p1020+p1022)
- p2662: 2.11846e-5; = p2271*(p1078+p1080)
- p1144: 2.10626e-5; = if(p1121=0;p1138*p0001/(p0818*p0002);0)
- p1125: 0; = if(p1121=0;p0719/100;0)
- p0710: 76.718; = p0050*(1+p0578*p0182/100)
- p1246: 0; = if(p1232>0;0;p1241*(p0725/100)*p0723*1000)
- p2257: 0.00226955; = p2222*p2203
- p0943: 0; = if(and(p0683=0;p0949=0);p0937;0)
- p1640: 0
- p3171: 0; = p2390*p1132
- p0951: 1.38183e-7; = if(and(p0683=0;or(p0807=480;p0807=32;p0807=1;and(p0807=60;p0901<0.03)));p0939;0)
- p2392: 0; = p2233*p2221
- p1724: 0
- p1648: 0
- p1196: 0.59
- p2706: 0.000149867; = p2315*(p1019+p1021)
- p1032: 6.67765e-5; = IF(p1012=0;p1026*p0001/(p0818*p0002);0)
- p0675: 0
- p0917: 1.27956
- p2590: 0; = p2394*p1014
- p2724: 3.76607e-5; = p2333*(p1019+p1021)
- p2893: 0; = p2307*(p1079+p1081)
- p2276: 0; = p2223*p2182
- p3167: 0; = p2386*p1082
- p2060: 0.272353
- p1708: 0
- p3148: 5.61355e-8; = p2367*p1023
- p1783: 0
- p3112: 7.4618e-11; = p2331*p1023
- p1105: 0.436421
- p0932: 0; = p0801*p0926
- p0742: 90.002; = p0082*(1+p0610*p0214/100)
- p1203: 3
- p2768: 0; = p2377*(p1078+p1080)
- p3284: 0
- p1671: 0
- p1099: 0.602279
- p0785: 11.542; = p0125*(1+p0653*p0257/100)
- p3054: 0; = p2273*p1132
- p2848: 0; = p2262*(p1079+p1081)
- p1675: 0
- p0483: 0; = SQRT(2)*(IF((2*p0351-1)<0;-1;IF((2*p0351-1)>0;1;0))*SQRT(SQRT((2/(pi()*0.140012289)+LN(1-(2*p0351-1)^2)/2)^2-LN(1-(2*p0351-1)^2)/0.140012289)-(2/(pi()*0.140012289)+LN(1-(2*p0351-1)^2)/2)))
- p0687: 0
- p2917: 2.67311e-6; = p2331*(p1020+p1022)
- p3002: 0; = p2416*(p1079+p1081)
- p0960: 0; = if(and(p0683>0;or(p0807=480;p0807=32;p0807=1;and(p0807=60;p0901<0.03)));p0936;0)
- p1840: 0
- p1554: 0
- p2479: 0; = p2283*p1014
- p2227: 0; = if(p0774*p0778+p0775*p0779+p0776*p0780+p0777*p0781=0;0;p0779*p0775/(p0774*p0778+p0775*p0779+p0776*p0780+p0777*p0781))
- p3315: 0; = if(and(p1232=0;p3253<>0);p3264*p3289;0)
- p2537: 0.000555589; = p2341*p1073
- p1702: 0
- p0868: 0; = IF(p0858+p0864+p0865+p0866+p0867=1;0;IF(p0858+p0864+p0865+p0866+p0867+p0863>1;1-(p0858+p0864+p0865+p0866+p0867);p0863))
- p1808: 1.57127e-5; = p1400*1000/p0818
- p1864: 0
- p2770: 0; = p2379*(p1078+p1080)
- p1103: 0.602279; = IF(p1071=0;IF(p1096+p1101+p1102=1;0;IF(p1096+p1101+p1102+p1099>1;1-(p1096+p1101+p1102);p1099));0)
- p3475: 0; = p3380*p1241
- p1069: 7.55566e-5; = IF(p1012=0;p1055/(p1062*p0818);0)
- p0136: 82.065
- p0189: 3.512
- p0548: 0; = IF(p0284<0.5;-SQRT(p0007*EXP(p0416^2*p0008)-p0007);SQRT(p0007*EXP(p0416^2*p0008)-p0007))
- p1198: 0.44
- p1913: 0
- p2484: 0; = p2288*p1014
- p3236: 0.0140975
- p3008: 0; = p2422*(p1079+p1081)
- p0984: 0; = if(p0886=0;0;min(1;(p0699*p0698*1000*p0701/100)/p0886))
- p2587: 0; = p2391*p1123
- p3221: 0.146975; = IF(p3216=0;0;p1223*12.0107/100.0869+(1-p1224)*12.0107/84.3139)
- p3115: 6.39328e-10; = p2334*p1023
- p1107: 900617; = IF(p1071=0;p1105*p1101*p1095;0)
- p2567: 0.00100991; = p2371*p1014
- p4513: 0; = p1962*p3480
- p2034: 2.73928e-5; = p2015*p2030*p2032/(p0818*1000)
- p0221: 13.725
- p1325: 0; = IF(((p0745*1000*p0752/100)+(p0754*1000*p0761/100))/p0801<0;0;((p0745*1000*p0752/100)+(p0754*1000*p0761/100))/p0801)
- p3198: 0; = p2417*p1082
- p2051: 0.000225839; = p2015*p2049*p2050/(p0818*1000)
- p2598: 0; = p2402*p1014
- p0800: 42.399; = p0140*(1+p0668*p0272/100)
- p2015: 2.46773e7; = p0830*p2011*p2013
- p2746: 5.75703e-5; = p2355*(p1019+p1021)
- p0759: 0
- p1581: 0
- p2066: 0.109412
- p3339: 0; = if(and(p1232=0;p3254<>0);p3254*(p3269*p3277-p3334)/p3338;0)
- p0007: 14; = p0006-1
- p1346: 202
- p3151: 1.3058e-10; = p2370*p1023
- p0535: 0; = SQRT(2)*(IF((2*p0403-1)<0;-1;IF((2*p0403-1)>0;1;0))*SQRT(SQRT((2/(pi()*0.140012289)+LN(1-(2*p0403-1)^2)/2)^2-LN(1-(2*p0403-1)^2)/0.140012289)-(2/(pi()*0.140012289)+LN(1-(2*p0403-1)^2)/2)))
- p0448: 0; = SQRT(2)*(IF((2*p0316-1)<0;-1;IF((2*p0316-1)>0;1;0))*SQRT(SQRT((2/(pi()*0.140012289)+LN(1-(2*p0316-1)^2)/2)^2-LN(1-(2*p0316-1)^2)/0.140012289)-(2/(pi()*0.140012289)+LN(1-(2*p0316-1)^2)/2)))
- p1300: 0; = IF(p1297=p1265;0;IF(p1297+p1298>p1265;p1265-p1297;p1298))
- p2894: 0; = p2308*(p1079+p1081)
- p2332: 0.00103614; = p2224*p2200
- p2057: 3.28794
- p1853: 0
- p2173: 0.121937; = p0895*p0898/p0818
- p1657: 0
- p2478: 0; = p2282*p1014
- p1204: 0.980791
- p3361: 0; = if(p1232=0;p3311+p3322+p3333+p3344+p3355;0)
- p3311: 0; = if(and(p1232=0;p3252<>0);p3252-(p3306+p3307+p3308+p3309+p3310);0)
- p1058: 0.225
- p1726: 0
- p0485: 0; = SQRT(2)*(IF((2*p0353-1)<0;-1;IF((2*p0353-1)>0;1;0))*SQRT(SQRT((2/(pi()*0.140012289)+LN(1-(2*p0353-1)^2)/2)^2-LN(1-(2*p0353-1)^2)/0.140012289)-(2/(pi()*0.140012289)+LN(1-(2*p0353-1)^2)/2)))
- p2097: 0.40001
- p3343: 0; = if(and(p1232=0;p3254<>0);IF((p3339+p3340+p3341+p3342)+(p3254*(p3269*(1-p3277))/p3338)>p3254;p3254-(p3339+p3340+p3341+p3342);p3254*(p3269*(1-p3277))/p3338);0)
- p3136: 6.79055e-9; = p2355*p1023
- p2268: 7.15379e-5; = p2226*p2214
- p1109: 8.94812e6; = IF(p1071=0;p1105*p1103*p1095;0)
- p2804: 0; = p2413*(p1019+p1021)
- p1230: 0.5
- p0050: 76.718
- p3111: 3.39388e-11; = p2330*p1023
- p3208: 0; = p2427*p1082
- p0992: 0; = p0988*p0001*p0004/(p0818*p0002)
- p2696: 0; = p2305*(p1078+p1080)
- p1996: 30
- p1626: 0
- p2604: 0; = p2408*p1014
- p1094: 5.29525e-6; = IF(p1071=0;p1088*p0001/(p0818*p0002);0)
- p1277: 0
- p3330: 0; = if(and(p1232=0;p3255<>0);p3255*(p3267-p3325)/p3327;0)
- p3410: 0; = p3372*p1238
- p0752: 0
- p2179: 0; = p0970+p0971+p0972
- p1806: 0
- p2371: 0.00181323; = p2225*p2200
- p1801: 0
- p0107: 13.539
- p1081: 0; = IF(p1071=0;IF(p1073+p1078+p1079+p1080=1;0;IF(p1073+p1078+p1079+p1080+p1077>1;1-(p1073+p1078+p1079+p1080);p1077));0)
- p2327: 0.000324508; = p2224*p2195
- p1260: 0; = if(p1232>0;0;p0731/100)
- p2166: 0.605899; = p2165*p0824
- p0405: 0; = SQRT(2)*(IF((2*p0273-1)<0;-1;IF((2*p0273-1)>0;1;0))*SQRT(SQRT((2/(pi()*0.140012289)+LN(1-(2*p0273-1)^2)/2)^2-LN(1-(2*p0273-1)^2)/0.140012289)-(2/(pi()*0.140012289)+LN(1-(2*p0273-1)^2)/2)))
- p3409: 0; = p3371*p1238
- p0850: 0
- p1100: 0.303167
- p0664: 0; = IF(p0400<0.5;-SQRT(p0007*EXP(p0532^2*p0008)-p0007);SQRT(p0007*EXP(p0532^2*p0008)-p0007))
- p1789: 0
- p2225: 0.299322; = if(p0765*p0769+p0766*p0770+p0767*p0771+p0768*p0772=0;0;p0772*p0768/(p0765*p0769+p0766*p0770+p0767*p0771+p0768*p0772))
- p1041: 0.318938
- p0514: 0; = SQRT(2)*(IF((2*p0382-1)<0;-1;IF((2*p0382-1)>0;1;0))*SQRT(SQRT((2/(pi()*0.140012289)+LN(1-(2*p0382-1)^2)/2)^2-LN(1-(2*p0382-1)^2)/0.140012289)-(2/(pi()*0.140012289)+LN(1-(2*p0382-1)^2)/2)))
- p1223: 0.56
- p1767: 0
- p1944: 0
- p0689: 0
- p2023: 2.12
- p2914: 0.00114915; = p2328*(p1020+p1022)
- p0945: 0; = if(and(p0683=0;p0951=0);p0939;0)
- p0888: 0; = p0686*1000*p0687*p0884/100
- p2470: 0; = p2274*p1123
- p0655: 0; = IF(p0391<0.5;-SQRT(p0007*EXP(p0523^2*p0008)-p0007);SQRT(p0007*EXP(p0523^2*p0008)-p0007))
- p1847: 0
- p2076: 0.057
- p2945: 2.48825e-5; = p2359*(p1020+p1022)
- p2229: 0; = if(p0774*p0778+p0775*p0779+p0776*p0780+p0777*p0781=0;0;p0781*p0777/(p0774*p0778+p0775*p0779+p0776*p0780+p0777*p0781))
- p1963a: 5.92457e-5; = p1550*p1754+p1551*p1755+p1552*p1756+p1553*p1757+p1554*p1758+p1555*p1759+p1556*p1760+p1557*p1761+p1558*p1762+p1559*p1763+p1560*p1764+p1561*p1765+p1562*p1766+p1563*p1767+p1564*p1768+p1565*p1769+p1566*p1770+p1567*p1771+p1568*p1772
- p2764: 9.48531e-6; = p2373*(p1019+p1021)
- p2508: 0; = p2312*p1123
- p0927: 0.000276; = IF(p0918+p0923+p0924+p0925+p0926=1;0;1-(p0918+p0923+p0924+p0925+p0926))
- p1095: 3.4043e7; = IF(p1071=0;p0797*p0702*1000*p0798/100;0)
- p0445: 0; = SQRT(2)*(IF((2*p0313-1)<0;-1;IF((2*p0313-1)>0;1;0))*SQRT(SQRT((2/(pi()*0.140012289)+LN(1-(2*p0313-1)^2)/2)^2-LN(1-(2*p0313-1)^2)/0.140012289)-(2/(pi()*0.140012289)+LN(1-(2*p0313-1)^2)/2)))
- p2285: 0; = p2223*p2191
- p2192: 0.00155504; = p1067-p2189-p2190-p2191
- p1550: 0.783979
- p0240: 10.302
- p1271: 0; = IF(p1267+p1270=p1259;0;IF(p1267+p1270+p1269>p1259;p1259-(p1267+p1270);p1269))
- p2546: 0.00210015; = p2350*p1123
- p2895: 0; = p2309*(p1079+p1081)
- p2006: 0.322577; = ((p1980*p1985+p1986*p1991+p1992*p1997+p2000*p2005)/p0818)*p0005*p0002/1000
- p0861: 0; = p0673*1000/p0856
- p1327: 1; = if(p1318=0;if(p1327a=0;1;if(p1327a<0;0;p1327a));0)
- p0772: 29.318; = p0112*(1+p0640*p0244/100)
- p0343: 0.5
- p0584: 0; = IF(p0320<0.5;-SQRT(p0007*EXP(p0452^2*p0008)-p0007);SQRT(p0007*EXP(p0452^2*p0008)-p0007))
- p1745: 0.4234
- p1662: 0
- p2193: 0.00885062; = p1054/p0818
- p1749: 0
- p0974: 0
- p3445: 0; = p3369*p1240
- p2606: 0; = p2410*p1014
- p2242: 0.000122901; = p2222*p2187
- p3162: 0; = p2381*p1082
- p3083: 0; = p2302*p1082
- p2800: 0; = p2409*(p1019+p1021)
- p2211: 0.00430851; = p1120-p2209-p2208-p2210
- p0978: 1.5e6; = p0801
- p2621: 0; = p2425*p1073
- p2879: 0; = p2293*(p1020+p1022)
- p1206: 0.023475
- p1201: 0.65
- p3235: 0.118093
- p0715: 0
- p2802: 0; = p2411*(p1019+p1021)
- p1837: 0
- p1809: 0
- p2940: 0.00110821; = p2354*(p1020+p1022)
- p3271: 0
- p3160: 0; = p2379*p1082
- p3289: 0
- p2261: 0.00172839; = p2226*p2207
- p2787: 0; = p2396*(p1019+p1021)
- p0002: 0.453592
- p1082: 0.01379; = IF(p1071=0;IF(p1073+p1078+p1079+p1080+p1081=1;0;1-(p1073+p1078+p1079+p1080+p1081));0)
- p0671: 0
- p2299: 0; = p2227*p2206
- p2812: 0; = p2421*(p1078+p1080)
- p1090: 2.32546e-5; = IF(p1071=0;p1084*p0001/(p0818*p0002);0)
- p0518: 0; = SQRT(2)*(IF((2*p0386-1)<0;-1;IF((2*p0386-1)>0;1;0))*SQRT(SQRT((2/(pi()*0.140012289)+LN(1-(2*p0386-1)^2)/2)^2-LN(1-(2*p0386-1)^2)/0.140012289)-(2/(pi()*0.140012289)+LN(1-(2*p0386-1)^2)/2)))
- p3164: 0; = p2383*p1082
- p0898: 0.45865
- p1984: 30
- p2266: 1.01707e-6; = p2226*p2212
- p0648: 0; = IF(p0384<0.5;-SQRT(p0007*EXP(p0516^2*p0008)-p0007);SQRT(p0007*EXP(p0516^2*p0008)-p0007))
- p2194: 0.214362
- p2277: 0; = p2223*p2183
- p2135: 7.44003e-6; = p2015*p2063*p2097/(p0818*1000)
- p1021: 0.05337; = IF(p1012=0;IF(p1014+p1019+p1020=1;0;IF(p1014+p1019+p1020+p1017>1;1-(p1014+p1019+p1020);p1017));0)
- p1222: 0.94
- p2860: 0; = p2274*(p1129+p1131)
- p0840: 0.085849; = p0839*p0831
- p0899: 2.58758e9; = p0825*p0896+(p0830+p0895)*p0824*p0898
- p0805: 0
- p2739: 8.76894e-6; = p2348*(p1078+p1080)
- p2061: 0.518824
- p2343: 0.00339372; = p2228*p2211
- p0921: 0.533642; = p0679*1000/p0801
- p0815: 0
- p4195: 3.59556e-8; = p1846*p3479
- p3158: 0; = p2377*p1082
- p1033: 2.1922e-5; = IF(p1012=0;p1027*p0001/(p0818*p0002);0)
- p0684: 0
- p3050: 3.72276e-6; = p2269*p1082
- p1835: 0
- p1802: 0
- p3399: 0; = p3380*p1234
- p1046: 0.024056; = IF(p1012=0;IF(p1037+p1044+p1045=1;0;IF(p1037+p1044+p1045+p1040>1;1-(p1037+p1044+p1045);p1040));0)
- p0667: 0; = IF(p0403<0.5;-SQRT(p0007*EXP(p0535^2*p0008)-p0007);SQRT(p0007*EXP(p0535^2*p0008)-p0007))
- p1194: 1.48
- p2789: 0; = p2398*(p1019+p1021)
- p1728: 0
- p3362: 0; = if(p1232=0;p3244*p3356/p0818;0)
- p0903: 0.0129401
- p3356: 0; = if(p1232=0;p3306+p3317+p3328+p3339+p3350;0)
- p2425: 0; = p2235*p2215
- p0935: 4.14428e-5; = p0929*p0001/(p0818*p0002)
- p2593: 0; = p2397*p1014
- p3068: 0; = p2287*p1023
- p1759: 0
- p1887: 0
- p0571: 0; = IF(p0307<0.5;-SQRT(p0007*EXP(p0439^2*p0008)-p0007);SQRT(p0007*EXP(p0439^2*p0008)-p0007))
- p3300: 0; = if(p1293+p1294+p1295+p1296=0;0;p1293/(p1293+p1294+p1295+p1296))
- p1596: 0
- p3471: 0; = p3376*p1241
- p0987: 0; = if(p0978>0;0;if(and(p0687=0;p0691=0;p0695=0;p0699=0);0;IF(p0982+p0985+p0986=1;0;1-(p0982+p0985+p0986))))
- p2645: 0.000272009; = p2254*(p1019+p1021)
- p3155: 1.28263e-8; = p2374*p1023
- p2868: 0; = p2282*(p1020+p1022)
- p2720: 1.75304e-7; = p2329*(p1019+p1021)
- p1897: 0
- p3190: 0; = p2409*p1023
- p1914: 0
- p2823: 0.00196091; = p2237*(p1020+p1022)
- p2255: 0.00137552; = p2222*p2201
- p3197: 0; = p2416*p1082
- p2756: 0.000224598; = p2365*(p1019+p1021)
- p1192: 1.30387e-7; = p1188*p1191/p0818
- p3478: 0.461784; = if(p1328+p1330+p1332+p1334+p1336+p1338+p1340+p1342+p1344=0;0;p1332/(p1328+p1330+p1332+p1334+p1336+p1338+p1340+p1342+p1344))
- p1899: 0
- p1182: 223.906; = p1181*p0801
- p4925: 0; = p1962*p3482
- p1875: 0
- p1583: 0
- p1115: 0.237849
- p0836: 2.3027e8; = p0831*p0835*p0801/(1-p0831)
- p3073: 0; = p2292*p1023
- p0746: 0
- p3691: 8.93717e-6; = p1754*p3477
- p5337: 2.09123e-6; = p1962*p3484
- p2383: 0; = p2229*p2212
- p2306: 0; = p2227*p2213
- p1006: 0; = p1002*p0001*p0004/(p0818*p0002)
- p2427: 0; = p2235*p2217
- p2498: 0; = p2302*p1073
- p1278: 0
- p2085: 0.0335294
- p0882: 1.5e6; = p0869*p0856
- p2771: 0; = p2380*(p1078+p1080)
- p2356: 6.43556e-5; = p2225*p2184
- p2438: 6.84524e-5; = p2242*p1014
- p2013: 0.85
- p1256: 0; = if(p1232>0;0;IF(p1253=1;0;IF(p1253+p1254>1;1-p1253;p1254)))
- p3248: 0
- p3402: 0; = p3364*p1238
- p2373: 0.000111881; = p2225*p2202
- p1706: 0
- p0738: 1499.59; = p0078*(1+p0606*p0210/100)
- p3466: 0; = p3371*p1241
- p4607: 1.06575e-6; = p1846*p3481
- p1080: 0; = IF(p1071=0;IF(p1073+p1078+p1079=1;0;IF(p1073+p1078+p1079+p1076>1;1-(p1073+p1078+p1079);p1076));0)
- p2841: 0.000492766; = p2255*(p1020+p1022)
- p2733: 1.56943e-5; = p2342*(p1078+p1080)
- p1768: 0
- p2314: 0; = p2231*p2221
- p2950: 0.000166745; = p2364*(p1020+p1022)
- p2624: 0; = p2428*p1123
- p0793: 0
- p3372: 0; = if(p1232=0;p3245*p3360/p0818;0)
- p2052: 1.13715e-5; = p2015*p2049*(1-p2050)/(p0818*1000)
- p3024: 1.57224e-8; = p2243*p1023
- p2349: 0.00129774; = p2228*p2217
- p1060: 0.21
- p2705: 0; = p2314*(p1128+p1130)
- p3224: 0.501945; = IF(p3216=0;0;1-p3221-p3222-p3223)
- p1169: 0.000514124
- p1301: 0; = IF(p1297+p1300=p1265;0;IF(p1297+p1300+p1299>p1265;p1265-(p1297+p1300);p1299))
- p1850: 0
- p2240: 0.000392232; = p2222*p2185
- p3312: 0; = if(and(p1232=0;p3253<>0);p3261*p3277*(p3298*p3290+(1-p3298)*p3294);0)
- p3146: 2.64919e-8; = p2365*p1023
- p2262: 0.000357776; = p2226*p2208
- p2164: 0.00331727; = (p2015/p0818)-(p2022)-(p2035+p2036+p2052)-(p2017/p0818)-(p2039+p2041+p2044+p2158+p2159+p2160+p2161+p2162)
- p1180: 3.82446e-8; = p1176*p1179/p0818
- p3052: 4.82391e-6; = p2271*p1082
- p1267: 0
- p4981: 0; = p1808*p3483
- p2245: 0.0004047; = p2222*p2190
- p3020: 1.13874e-9; = p2239*p1023
- p2469: 0; = p2273*p1123
- p0722: 0
- p2906: 1.42187e-5; = p2320*(p1020+p1022)
- p0141: 64.4579
- p3049: 9.86507e-7; = p2268*p1082
- p2944: 0.000172888; = p2358*(p1020+p1022)
- p2929: 0; = p2343*(p1079+p1081)
- p2385: 0; = p2229*p2214
- p2822: 0; = p2431*(p1128+p1130)
- p1812: 0
- p2909: 4.68204e-5; = p2323*(p1020+p1022)
- p2481: 0; = p2285*p1014
- p3027: 1.01772e-9; = p2246*p1023
- p0438: 0; = SQRT(2)*(IF((2*p0306-1)<0;-1;IF((2*p0306-1)>0;1;0))*SQRT(SQRT((2/(pi()*0.140012289)+LN(1-(2*p0306-1)^2)/2)^2-LN(1-(2*p0306-1)^2)/0.140012289)-(2/(pi()*0.140012289)+LN(1-(2*p0306-1)^2)/2)))
- p3172: 0; = p2391*p1132
- p1176: 204.456; = p1175*p0801
- p1014: 0.55697; = IF(p1012=0;p0705/100;0)
- p2237: 0.00547374; = p2222*p2182
- p3195: 0; = p2414*p1082
- p0082: 90.002
- p0761: 0
- p1121: 0
- p2145: 3.07374e-6; = p2015*p2073*p2107/(p0818*1000)
- p1174: 1.44255e-7; = p1170*p1173/p0818
- p0004: 0.0254
- p2766: 0; = p2375*(p1078+p1080)
- p2018: 0.1978
- p1638: 0
- p0444: 0; = SQRT(2)*(IF((2*p0312-1)<0;-1;IF((2*p0312-1)>0;1;0))*SQRT(SQRT((2/(pi()*0.140012289)+LN(1-(2*p0312-1)^2)/2)^2-LN(1-(2*p0312-1)^2)/0.140012289)-(2/(pi()*0.140012289)+LN(1-(2*p0312-1)^2)/2)))
- p2291: 0; = p2223*p2198
- p2799: 0; = p2408*(p1019+p1021)
- p3368: 0; = if(p1232=0;p3245*p3356/p0818;0)
- p2009: 0.0113412; = ((p1983*p1985+p1989*p1991+p1995*p1997+p2003*p2005+p1976*p1977+p1978*p1979+p1998*p1999)/p0818)*p0005*p0002/1000
- p1623: 0
- p1128: 0; = if(p1121=0;IF(p1123=1;0;IF(p1123+p1124>1;1-p1123;p1124));0)
- p1816: 0
- p0376: 0.5
- p2613: 0; = p2417*p1073
- p5131: 0; = p1962*p3483
- p1263: 0; = if(p1232>0;0;IF(p1259=1;0;IF(p1259+p1260>1;1-p1259;p1260)))
- p1483: 1
- p2874: 0; = p2288*(p1020+p1022)
- p3095: 0; = p2314*p1132
- p1298: 0
- p1813: 0
- p1807: 0
- p2046: 10
- p1748: 0
- p3377: 0; = if(p1232=0;p3246*p3359/p0818;0)
- p2234: 0; = 1-(p2222+p2223+p2224+p2225)
- p0441: 0; = SQRT(2)*(IF((2*p0309-1)<0;-1;IF((2*p0309-1)>0;1;0))*SQRT(SQRT((2/(pi()*0.140012289)+LN(1-(2*p0309-1)^2)/2)^2-LN(1-(2*p0309-1)^2)/0.140012289)-(2/(pi()*0.140012289)+LN(1-(2*p0309-1)^2)/2)))
- p2973: 0; = p2387*(p1079+p1081)
- p1193: 0; = IF(OR(p1036=0;p1095=0);0.0001*p0857;0)
- p3193: 0; = p2412*p1023
- p4719: 1.29107e-6; = p1962*p3481
- p1820: 0
- p1963i: 0; = p1706*p1910+p1707*p1911+p1708*p1912+p1709*p1913+p1710*p1914+p1711*p1915+p1712*p1916+p1713*p1917+p1714*p1918+p1715*p1919+p1716*p1920+p1717*p1921+p1718*p1922+p1719*p1923+p1720*p1924+p1721*p1925+p1722*p1926+p1723*p1927+p1724*p1928
- p1288: 0
- p2292: 0; = p2223*p2199
- p1828: 0
- p1189: 0.000500663; = p0801*p0001/(p0818*p0002)
- p1729: 0
- p0176: 14.103
- p4363: 0; = p1808*p3480
- p0576: 0; = IF(p0312<0.5;-SQRT(p0007*EXP(p0444^2*p0008)-p0007);SQRT(p0007*EXP(p0444^2*p0008)-p0007))
- p1774: 0
- p2681: 0; = p2290*(p1019+p1021)
- p0728: 0
- p3360: 0; = if(p1232=0;p3310+p3321+p3332+p3343+p3354;0)
- p1644: 0
- p2795: 0; = p2404*(p1019+p1021)
- p1673: 0
- p1167: 0.5
- p4240: 1.99753e-9; = p1891*p3479
- p2776: 0; = p2385*(p1078+p1080)
- p1077: 0; = IF(p1071=0;p0715/100;0)
- p1159: 0.5
- p2230: 0; = if(p0783*p0787+p0784*p0788+p0785*p0789+p0786*p0790=0;0;p0787*p0783/(p0783*p0787+p0784*p0788+p0785*p0789+p0786*p0790))
- p3230: 2.8851e-7; = p1170/p0818
- p0767: 13.539; = p0107*(1+p0635*p0239/100)
- p0981: 0.000500663; = p0978*p0001/(p0818*p0002)
- p0572: 0; = IF(p0308<0.5;-SQRT(p0007*EXP(p0440^2*p0008)-p0007);SQRT(p0007*EXP(p0440^2*p0008)-p0007))
- p2107: 0.881623
- p1844: 0
- p1050: 2.76253e7; = IF(p1012=0;p1037*p1036;0)
- p1051: 574707; = IF(p1012=0;p1044*p1036;0)
- p0378: 0.5
- p1552: 0
- p4298: 9.98766e-9; = p1949*p3479
- p3091: 0; = p2310*p1082
- p0959: 0; = if(and(p0683>0;or(p0807=480;p0807=32;p0807=1;and(p0807=60;p0901<0.03)));p0935;0)
- p4709: 2.72358e-6; = p1948*p3481
- p0706: 3.141; = p0046*(1+p0574*p0178/100)
- p2530: 3.56087e-5; = p2334*p1014
- p2861: 0; = p2275*(p1129+p1131)
- p2533: 0.0022075; = p2337*p1073
- p1093: 0; = IF(p1071=0;p1087*p0001/(p0818*p0002);0)
- p0682: 1499.59; = p0022*(1+p0550*p0154/100)
- p0646: 0; = IF(p0382<0.5;-SQRT(p0007*EXP(p0514^2*p0008)-p0007);SQRT(p0007*EXP(p0514^2*p0008)-p0007))
- p3477: 0.118263; = if(p1328+p1330+p1332+p1334+p1336+p1338+p1340+p1342+p1344=0;0;p1330/(p1328+p1330+p1332+p1334+p1336+p1338+p1340+p1342+p1344))
- p2637: 8.62819e-6; = p2246*(p1019+p1021)
- p3076: 0; = p2295*p1023
- p1885: 0
- p2609: 0; = p2413*p1014
- p2561: 0.00147552; = p2365*p1014
- p3170: 0; = p2389*p1132
- p2174: 0.00344026; = p0895*p0903/p0818
- p2492: 0; = p2296*p1014
- p1934: 0
- p3485: 0; = p1754*p3476
- p1946: 1.53386e-5; = p1538*1000/p0818
- p0313: 0.5
- p3018: 5.47374e-8; = p2237*p1023
- p1811: 0
- p0650: 0; = IF(p0386<0.5;-SQRT(p0007*EXP(p0518^2*p0008)-p0007);SQRT(p0007*EXP(p0518^2*p0008)-p0007))
- p3211: 0; = p2430*p1132
- p2218: 0.00233156; = p1150/p0818
- p2496: 0; = p2300*p1073
- p2474: 0; = p2278*p1014
- p0744: 0
- p3113: 1.03614e-8; = p2332*p1023
- p2777: 0; = p2386*(p1078+p1080)
- p3295: 0
- p1326: 0; = IF(((p0745*1000*p0753/100)+(p0754*1000*p0762/100))/p0801<0;0;((p0745*1000*p0753/100)+(p0754*1000*p0762/100))/p0801)
- p2394: 0; = p2234*p2183
- p2279: 0; = p2223*p2185
- p2774: 0; = p2383*(p1078+p1080)
- p1795: 0
- p2701: 0; = p2310*(p1078+p1080)
- p3274: 0
- p1236: 0; = if(p1232>0;0;p0728/100)
- p2626: 0; = p2430*p1123
- p3299: 0; = if(p1303+p1304+p1305+p1306=0;0;p1303/(p1303+p1304+p1305+p1306))
- p3424: 0; = p3367*p1239
- p3105: 3.28666e-10; = p2324*p1023
- p1891: 3.74111e-7; = p1483*1000/p0818
- p0740: 90.098; = p0080*(1+p0608*p0212/100)
- p2148: 4.50599e-7; = p2015*p2076*p2110/(p0818*1000)
- p1976: 0.177981
- p2378: 0; = p2229*p2207
- p3473: 0; = p3378*p1241
- p1760: 0
- p2224: 0.171043; = if(p0765*p0769+p0766*p0770+p0767*p0771+p0768*p0772=0;0;p0771*p0767/(p0765*p0769+p0766*p0770+p0767*p0771+p0768*p0772))
- p0879: 0; = p0878*p0001*p0003/(p0818*p0002)
- p0607: 0; = IF(p0343<0.5;-SQRT(p0007*EXP(p0475^2*p0008)-p0007);SQRT(p0007*EXP(p0475^2*p0008)-p0007))
- p2456: 0.000192689; = p2260*p1073
- p0769: 46.796; = p0109*(1+p0637*p0241/100)
- p1717: 0
- p0859: 0; = p0671*1000/p0856
- p0813: 0; = if(p0807=480;1.56521739130435;0)
- p2793: 0; = p2402*(p1019+p1021)
- p1777: 0
- p0924: 0.172601; = IF(p0918+p0923=1;0;IF(p0918+p0923+p0920>1;1-(p0918+p0923);p0920))
- p2623: 0; = p2427*p1073
- p2169: 0.00119861; = p2166*(p0908)
- p2649: 4.30441e-5; = p2258*(p1078+p1080)
- p1017: 0.05337; = IF(p1012=0;p0708/100;0)
- p1990: 30
- p2778: 0; = p2387*(p1078+p1080)
- p1952: 0
- p2204: 0.00334759; = p1109/p0818
- p3386: 0; = p3367*p1234
- p2313: 0; = p2231*p2220
- p3267: 0
- p3320: 0; = if(and(p1232=0;p3253<>0);p3253*(p3264-p3315)/p3316;0)
- p1309: 0
- p0252: 10.406
- p2457: 0.00159989; = p2261*p1073
- p1838: 0
- p2503: 0; = p2307*p1073
- p1303: 0; = p1297*p1252/p0818
- p3080: 0; = p2299*p1082
- p1705: 0
- p2463: 9.84459e-6; = p2267*p1073
- p3448: 0; = p3372*p1240
- p5270: 9.59036e-8; = p1891*p3484
- p2936: 0; = p2350*(p1129+p1131)
- p0386: 0.5
- p0019: 800.463
- p2256: 0.000197968; = p2222*p2202
- p0111: 72.829
- p1712: 0
- p1669: 0.523221
- p2139: 2.55718e-6; = p2015*p2067*p2101/(p0818*1000)
- p0971: 0; = p0968/p0818
- p1269: 0
- p0534: 0; = SQRT(2)*(IF((2*p0402-1)<0;-1;IF((2*p0402-1)>0;1;0))*SQRT(SQRT((2/(pi()*0.140012289)+LN(1-(2*p0402-1)^2)/2)^2-LN(1-(2*p0402-1)^2)/0.140012289)-(2/(pi()*0.140012289)+LN(1-(2*p0402-1)^2)/2)))
- p1735: 0
- p2989: 0; = p2403*(p1020+p1022)
- p2735: 2.28502e-7; = p2344*(p1078+p1080)
- p1663: 0
- p2921: 0.000262568; = p2335*(p1020+p1022)
- p1000: 0; = IF(p0996+p0999=1;0;IF(p0996+p0999+p0998>1;1-(p0996+p0999);p0998))
- p1666: 0
- p2952: 0.000203439; = p2366*(p1020+p1022)
- p0894: 0.23
- p2450: 0.00178699; = p2254*p1014
- p2595: 0; = p2399*p1014
- p1645: 0
- p1130: 0; = if(p1121=0;IF(p1123+p1128+p1129=1;0;IF(p1123+p1128+p1129+p1126>1;1-(p1123+p1128+p1129);p1126));0)
- p3465: 0; = p3370*p1241
- p3404: 0; = p3366*p1238
- p0862: 0; = p0674*1000/p0856
- p2014: 2.85948e7; = p0833*p2011*p2013
- p1045: 0.058101; = IF(p1012=0;IF(p1037+p1044=1;0;IF(p1037+p1044+p1039>1;1-(p1037+p1044);p1039));0)
- p2368: 3.61853e-6; = p2225*p2197
- p1876: 0
- p2956: 4.67791e-6; = p2370*(p1020+p1022)
- p3038: 2.26955e-8; = p2257*p1023
- p0907: 0
- p2758: 0.000475917; = p2367*(p1019+p1021)
- p1674: 0
- p2698: 0; = p2307*(p1078+p1080)
- p0988: 0; = p0982*p0886
- p2493: 0; = p2297*p1073
- p2876: 0; = p2290*(p1020+p1022)
- p2040: 0.44
- p2741: 0; = p2350*(p1128+p1130)
- p2091: 0.374844
- p0851: 0
- p1212: 0.0169171; = if(p1211=0;0;if(p1193>0;0;(p1207+p1208+p1209)*p1210/(2000*p1211)))
- p1161: 1.5e6; = p0801
- p0148: 0
- p3451: 0; = p3375*p1240
- p2146: 1.90776e-7; = p2015*p2074*p2108/(p0818*1000)
- p0712: 6.056; = p0052*(1+p0580*p0184/100)
- p0046: 3.141
- p0821: 1.51364
- p0523: 0; = SQRT(2)*(IF((2*p0391-1)<0;-1;IF((2*p0391-1)>0;1;0))*SQRT(SQRT((2/(pi()*0.140012289)+LN(1-(2*p0391-1)^2)/2)^2-LN(1-(2*p0391-1)^2)/0.140012289)-(2/(pi()*0.140012289)+LN(1-(2*p0391-1)^2)/2)))
- p1612: 0
- p1224: 0.44; = IF(p1221=0;0;IF(p1193=0;1-p1223;0))
- p0977: 0; = IF(p0687=0;IF(OR(p0686=0;p0688=0);0;p0686*1000*p0688/100);0)
- p0717: 90.075; = p0057*(1+p0585*p0189/100)
- p0615: 0; = IF(p0351<0.5;-SQRT(p0007*EXP(p0483^2*p0008)-p0007);SQRT(p0007*EXP(p0483^2*p0008)-p0007))
- p1956: 0
- p1713: 0
- p2233: 0; = if(p0783*p0787+p0784*p0788+p0785*p0789+p0786*p0790=0;0;p0790*p0786/(p0783*p0787+p0784*p0788+p0785*p0789+p0786*p0790))
- p1693: 0
- p3040: 8.86469e-6; = p2259*p1082
- p2419: 0; = p2235*p2209
- p1238: 0; = if(p1232>0;0;IF(p1234=1;0;IF(p1234+p1235>1;1-p1234;p1235)))
- p1023: 1e-5; = IF(p1012=0;IF(p1014+p1019+p1020+p1021+p1022=1;0;1-(p1014+p1019+p1020+p1021+p1022));0)
- p2346: 0.000265393; = p2228*p2214
- p2477: 0; = p2281*p1014
- p2757: 4.81452e-5; = p2366*(p1019+p1021)
- p1065: 0.000955575; = IF(p1012=0;p1051/(p1058*p0818);0)
- p1842: 0
- p2341: 0.000600215; = p2228*p2209
- p1751: 0
- p3099: 1.26669e-9; = p2318*p1023
- p2464: 6.6219e-5; = p2268*p1073
- p0270: 13.104
- p0804: 0
- p2943: 7.94108e-5; = p2357*(p1020+p1022)
- p3088: 0; = p2307*p1082
- p1600: 0
- p2258: 0.000710767; = p2226*p2204
- p3069: 0; = p2288*p1023
- p1127: 0; = if(p1121=0;p0721/100;0)
- p0649: 0; = IF(p0385<0.5;-SQRT(p0007*EXP(p0517^2*p0008)-p0007);SQRT(p0007*EXP(p0517^2*p0008)-p0007))
- p2382: 0; = p2229*p2211
- p0869: 1; = IF(p0858+p0864+p0865+p0866+p0867+p0868=1;0;1-(p0858+p0864+p0865+p0866+p0867+p0868))
- p2031: 0.465411
- p2305: 0; = p2227*p2212
- p0533: 0; = SQRT(2)*(IF((2*p0401-1)<0;-1;IF((2*p0401-1)>0;1;0))*SQRT(SQRT((2/(pi()*0.140012289)+LN(1-(2*p0401-1)^2)/2)^2-LN(1-(2*p0401-1)^2)/0.140012289)-(2/(pi()*0.140012289)+LN(1-(2*p0401-1)^2)/2)))
- p3383: 0; = p3364*p1234
- p1088: 15864.7; = IF(p1071=0;p1082*(p0710/100)*p0703*1000;0)
- p1001: 0; = if(p0978>0;0;if(and(p0687=0;p0691=0;p0695=0;p0699=0);0;IF(p0996+p0999+p1000=1;0;1-(p0996+p0999+p1000))))
- p3292: 0
- p2129: 1.13782e-5; = p2015*p2057*p2091/(p0818*1000)
- p2597: 0; = p2401*p1014
- p4091: 7.9469e-6; = p1948*p3478
- p2690: 0; = p2299*(p1078+p1080)
- p1679: 0
- p0080: 90.098
- p3293: 0
- p1963j: 6.18144e-6; = p1725*p1929+p1726*p1930+p1727*p1931+p1728*p1932+p1729*p1933+p1730*p1934+p1731*p1935+p1732*p1936+p1733*p1937+p1734*p1938+p1735*p1939+p1736*p1940+p1737*p1941+p1738*p1942+p1739*p1943+p1740*p1944+p1741*p1945+p1742*p1946+p1743*p1947
- p3186: 0; = p2405*p1023
- p3484: 0.25635; = IF(p1344=0;0;p1344/(p1328+p1330+p1332+p1334+p1336+p1338+p1340+p1342+p1344))
- p1963c: 1.45974e-5; = p1588*p1792+p1589*p1793+p1590*p1794+p1591*p1795+p1592*p1796+p1593*p1797+p1594*p1798+p1595*p1799+p1596*p1800+p1597*p1801+p1598*p1802+p1599*p1803+p1600*p1804+p1601*p1805+p1602*p1806+p1603*p1807+p1604*p1808+p1605*p1809+p1606*p1810+p1607*p1811
- p1641: 0
- p2635: 2.99751e-5; = p2244*(p1019+p1021)
- p2910: 1.17741e-5; = p2324*(p1020+p1022)
- p2329: 2.06775e-6; = p2224*p2197
- p2127: 2.06608e-5; = p2015*p2055*p2089/(p0818*1000)
- p2502: 0; = p2306*p1073
- p5187: 4.02795e-6; = p1808*p3484
- p2657: 6.15937e-8; = p2266*(p1078+p1080)
- p3175: 0; = p2394*p1023
- p4309: 0; = p1754*p3480
- p2248: 0.0046876; = p2222*p2193
- p2184: 0.000215004; = p1051/p0818
- p3081: 0; = p2300*p1082
- p0384: 0.5
- p1661: 0
- p0931: 800463; = p0801*p0925
- p0757: 0
- p2269: 0.000269961; = p2226*p2215
- p0316: 0.5
- p3234: 0.39606; = 1-p3233
- p1655: 0
- p1137: 0; = if(p1121=0;p1131*(p0716/100)*p0703*1000;0)
- p2568: 0.000432973; = p2372*p1014
- p1632: 0
- p0969: 0
- p0697: 0
- p1164: 6461.66; = p1163*p0801
- p0760: 0
- p1291: 0; = IF(p1287+p1290=p1264;0;IF(p1287+p1290+p1289>p1264;p1264-(p1287+p1290);p1289))
- p0045: 55.697
- p1879: 0
- p2207: 0.00814043; = p1119-p2205-p2204-p2206
- p1880: 0
- p1963e: 6.07407e-6; = p1628*p1832+p1629*p1833+p1630*p1834+p1631*p1835+p1632*p1836+p1633*p1837+p1634*p1838+p1635*p1839+p1636*p1840+p1637*p1841+p1638*p1842+p1639*p1843+p1640*p1844+p1641*p1845+p1642*p1846+p1643*p1847+p1644*p1848+p1645*p1849+p1646*p1850
- p3082: 0; = p2301*p1082
- p2286: 0; = p2223*p2192
- p3366: 0; = if(p1232=0;p3244*p3360/p0818;0)
- p1062: 0.16
- p3233: 0.60394
- p1314: 0; = p1310*p1252/p0818
- p1566: 0
- p4720: 2.30965e-5; = p1963*p3481
- p0223: 34.359
- p1629: 0
- p2670: 0; = p2279*(p1019+p1021)
- p2041: 4.0621e-6; = p2015*p2040/(p0818*1000)
- p2511: 0.000984565; = p2315*p1014
- p1678: 0
- p2325: 0.000265978; = p2224*p2192
- p2901: 0.000633266; = p2315*(p1020+p1022)
- p3055: 0; = p2274*p1132
- p2559: 3.20347e-5; = p2363*p1014
- p1628: 0
- p1761: 0
- p3246: 1; = IF(p3244+p3245=1;0;1-(p3244+p3245))
- p2524: 0.00178663; = p2328*p1014
- p2554: 0.000268796; = p2358*p1014
- p1111: 0.0872841
- p2364: 0.000465457; = p2225*p2192
- p1126: 0; = if(p1121=0;p0720/100;0)
- p1284: 0; = p1280*p1252/p0818
- p0391: 0.5
- p2512: 0.000216124; = p2316*p1014
- p1866: 0
- p4446: 0; = p1891*p3480
- p2102: 0.922577
- p3403: 0; = p3365*p1238
- p2653: 2.16669e-5; = p2262*(p1078+p1080)
- p1752: 0
- p2235: 0; = 1-(p2226+p2227+p2228+p2229)
- p2981: 0; = p2395*(p1020+p1022)
- p3407: 0; = p3369*p1238
- p2749: 4.09151e-5; = p2358*(p1019+p1021)
- p2710: 2.33803e-5; = p2319*(p1019+p1021)
- p2342: 0.000259153; = p2228*p2210
- p1274: 0; = p1270*p1252/p0818
- p1083: 1.06492e6; = IF(p1071=0;p1073*(p0710/100)*p0703*1000;0)
- p0856: 1.5e6; = p0801
- p0799: 12.837; = p0139*(1+p0667*p0271/100)
- p1710: 0
- p3462: 0; = p3367*p1241
- p1941: 0
- p3178: 0; = p2397*p1023
- p1110: 4.50417e6; = IF(p1071=0;p1105*p1104*p1095;0)
- p2552: 3.58442e-5; = p2356*p1014
- p2165: 0.702084; = (p0833-p2014)/p0818-p0839
- p0806: 4.455e7
- p2113: 0.832356
- p1576: 0
- p3337: 0; = IF(or(p3254=0;p1232>0);0;p3272*p3289)
- p1932: 0
- p0009: 43.4782
- p2467: 0.000323803; = p2271*p1073
- p3117: 3.63618e-5; = p2336*p1082
- p0792: 0
- p1906: 0
- p0872: 0; = p0864*p0856
- p0860: 0; = p0672*1000/p0856
- p1567: 0
- p2399: 0; = p2234*p2188
- p1603: 0
- p0783: 0
- p1849: 0
- p3256: 0; = p1252*(p1307*(1-p3247)+p1310*(1-p3248)+p1311*(1-p3249)+p1312*(1-p3250))
- p2912: 0.000542316; = p2326*(p1020+p1022)
- p3107: 1.51384e-8; = p2326*p1023
- p1030: 0.000228778; = IF(p1012=0;p1024*p0001/(p0818*p0002);0)
- p0736: 0
- p4634: 1.36179e-6; = p1873*p3481
- p1108: 491373; = IF(p1071=0;p1105*p1102*p1095;0)
- p3017: 0; = p2431*(p1129+p1131)
- p0139: 12.837
- p0057: 90.075
- p0997: 0; = if(p0888=0;0;if((p0695*p0694*1000*p0696/100)/p0888>1;1;(p0695*p0694*1000*p0696/100)/p0888))
- p3680: 0; = p1949*p3476
- p4401: 0; = p1846*p3480
- p2919: 0.000159136; = p2333*(p1020+p1022)
- p0955: 0; = if(and(p0683>0;or(p0807=56;p0807=100;and(p0807=60;p0901>0.06)));p0937;0)
- p3303: 0; = if(and(p1232=0;p3252<>0);p3259*p3289;0)
- p2811: 0; = p2420*(p1078+p1080)
- p1725: 0
- p1764: 0
- p1175: 0.000136304
- p0211: 14.368
- p2282: 0; = p2223*p2188
- p1610: 0
- p2337: 0.00238481; = p2228*p2205
- p2073: 0.377647
- p0214: 4.56
- p1565: 0
- p2078: 0.117
- p3885: 2.0352e-6; = p1948*p3477
- p2296: 0; = p2223*p2203
- p1963: 0.000145937; = p1963a+p1963b+p1963c+p1963d+p1963e+p1963f+p1963g+p1963h+p1963i+p1963j+p1963k
- p1680: 0
- p3062: 0; = p2281*p1023
- p2796: 0; = p2405*(p1019+p1021)
- p0933: 414; = p0801*p0927
- p1098: 0.0330733
- p1166: 2.41738e-6; = p1164/p0818
- p1213: 0
- p2397: 0; = p2234*p2186
- p2160: 6.61485e-7; = p2015*p2084*p2122/(p0818*1000)
- p3792: 1.53082e-5; = p1855*p3477
- p2644: 1.95888e-6; = p2253*(p1019+p1021)
- p0692: 0
- p3144: 5.7516e-10; = p2363*p1023
- p2494: 0; = p2298*p1073
- p3479: 0.0053394; = if(p1328+p1330+p1332+p1334+p1336+p1338+p1340+p1342+p1344=0;0;p1334/(p1328+p1330+p1332+p1334+p1336+p1338+p1340+p1342+p1344))
- p1117: 0.0016084; = IF(p1071=0;p1107/(p1112*p0818);0)
- p4016: 3.97345e-6; = p1873*p3478
- p0788: 0
- p2471: 0; = p2275*p1123
- p3302: 0; = if(and(p1232=0;p3252<>0);p3258*(p3278*(p3282*p1256+p3286*(p1253+p1257)+p1258*p3288+p3297*p3287));0)
- p1026: 200064; = IF(p1012=0;p1020*(p0704/100)*p0703*1000;0)
- p2210: 0.000329009; = 6*1.00794*p2208/30.973762
- p1791: 0
- p1733: 0
- p0631: 0; = IF(p0367<0.5;-SQRT(p0007*EXP(p0499^2*p0008)-p0007);SQRT(p0007*EXP(p0499^2*p0008)-p0007))
- p3067: 0; = p2286*p1023
- p2101: 0.620397
- p2190: 0.000764111; = 32.065*p2189/(2*14.0067)
- p1630: 0
- p3231: 7.64892e-8; = p1176/p0818
- p0755: 0
- p1651: 0.299611
- p2123: 0.263965
- p2745: 0.000262265; = p2354*(p1019+p1021)
- p2188: 0.00296853; = p1066-p2186-p2187
- p0912: 0
- p2451: 0.000766123; = p2255*p1014
- p1960: 21.8055; = IF(p1959-p1958<0;0;p1959-p1958)
- p2350: 0.00233156; = p2232*p2218
- p1878: 0
- p1918: 0
- p2357: 0.000221669; = p2225*p2185
- p3276: 0
- p1191: 0.5
- p1756: 0
- p2970: 0; = p2384*(p1079+p1081)
- p2838: 3.7648e-6; = p2252*(p1020+p1022)
- p3039: 9.80148e-6; = p2258*p1082
- p1336: 0; = p1323*p0801
- p1249: 0; = if(p1232>0;0;p1244*p0001/(p0818*p0002))
- p1700: 0
- p0756: 0
- p0948: 8.64147e-5; = if(and(p0683=0;or(p0807=480;p0807=32;p0807=1;and(p0807=60;p0901<0.03)));p0936;0)
- p2272: 0; = p2230*p2218
- p3430: 0; = p3373*p1239
- p2633: 1.04196e-5; = p2242*(p1019+p1021)
- p3458: 0; = p3363*p1241
- p2429: 0; = p2236*p2219
- p3145: 4.65457e-9; = p2364*p1023
- p2376: 0; = p2229*p2205
- p0259: 72.147
- p3454: 0; = p3378*p1240
- p0109: 46.796
- p0254: 43.284
- p1940: 0
- p2528: 0.000577098; = p2332*p1014
- p0843: -0.137185
- p1143: 0; = if(p1121=0;p1137*p0001/(p0818*p0002);0)
- p0729: 0
- p2729: 4.67682e-5; = p2338*(p1078+p1080)
- p2141: 1.60554e-6; = p2015*p2069*p2103/(p0818*1000)
- p0705: 55.697; = p0045*(1+p0573*p0177/100)
- p3199: 0; = p2418*p1082
- p3033: 1.05092e-10; = p2252*p1023
- p1293: 0; = p1287*p1252/p0818
- p0672: 0
- p1589: 0
- p0754: 0
- p0665: 0; = IF(p0401<0.5;-SQRT(p0007*EXP(p0533^2*p0008)-p0007);SQRT(p0007*EXP(p0533^2*p0008)-p0007))
- p2958: 0.000278486; = p2372*(p1020+p1022)
- p1650: 0
- p3247: 0
- p1216: 0
- p1667: 0
- p0633: 0; = IF(p0369<0.5;-SQRT(p0007*EXP(p0501^2*p0008)-p0007);SQRT(p0007*EXP(p0501^2*p0008)-p0007))
- p2413: 0; = p2234*p2203
- p1607: 0
- p3104: 1.30696e-9; = p2323*p1023
- p3263: 0
- p2333: 0.000444217; = p2224*p2201
- p1345: 0.000500663; = IF(p1318=0;p1344*p0001/(p0818*p0002);0)
- p2569: 6.23146e-5; = p2373*p1014
- p2582: 0; = p2386*p1073
- p0896: 0.458
- p0639: 0; = IF(p0375<0.5;-SQRT(p0007*EXP(p0507^2*p0008)-p0007);SQRT(p0007*EXP(p0507^2*p0008)-p0007))
- p0453: 0; = SQRT(2)*(IF((2*p0321-1)<0;-1;IF((2*p0321-1)>0;1;0))*SQRT(SQRT((2/(pi()*0.140012289)+LN(1-(2*p0321-1)^2)/2)^2-LN(1-(2*p0321-1)^2)/0.140012289)-(2/(pi()*0.140012289)+LN(1-(2*p0321-1)^2)/2)))
- p2931: 0; = p2345*(p1079+p1081)
- p2405: 0; = p2234*p2195
- p3251: 0; = p1252-(p3252+p3253+p3254+p3255+p3256)
- p2591: 0; = p2395*p1014
- p2654: 9.79803e-6; = p2263*(p1078+p1080)
- p0440: 0; = SQRT(2)*(IF((2*p0308-1)<0;-1;IF((2*p0308-1)>0;1;0))*SQRT(SQRT((2/(pi()*0.140012289)+LN(1-(2*p0308-1)^2)/2)^2-LN(1-(2*p0308-1)^2)/0.140012289)-(2/(pi()*0.140012289)+LN(1-(2*p0308-1)^2)/2)))
- p1282: 0; = IF(p1277+p1280+p1281=p1260;0;p1260-(p1277+p1280+p1281))
- p2852: 0; = p2266*(p1079+p1081)
- p1890: 0
- p0970: 0; = p0967/p0818
- p2452: 0.000110262; = p2256*p1014
- p3217: 0.00223717; = p3213*p1228
- p2223: 0; = if(p0765*p0769+p0766*p0770+p0767*p0771+p0768*p0772=0;0;p0770*p0766/(p0765*p0769+p0766*p0770+p0767*p0771+p0768*p0772))
- p1775: 0
- p2178: 0.042205; = (p0895*p0831/(1-p0831))/(p0818)
- p0129: 79.719
- p1438: 18
- p2518: 6.35957e-5; = p2322*p1014
- p2557: 0.000111291; = p2361*p1014
- p2951: 0.000949045; = p2365*(p1020+p1022)
- p2163: 0.00336935; = (p2017-p2020)/p0818-(p2025+p2028+p2033+p2034+p2051+p2125+p2126+p2127+p2128+p2129+p2130+p2131+p2132+p2133+p2134+p2135+p2136+p2137+p2138+p2139+p2140+p2141+p2142+p2143+p2144+p2145+p2146+p2147+p2148+p2149+p2150+p2151+p2152+p2153+p2154+p2155+p2156+p2157)
- p2152: 1.92109e-7; = p2015*p2080*p2114/(p0818*1000)
- p0827: 0; = p0818*p0819*p0823
- p0632: 0; = IF(p0368<0.5;-SQRT(p0007*EXP(p0500^2*p0008)-p0007);SQRT(p0007*EXP(p0500^2*p0008)-p0007))
- p1276: 0; = p1272*p1252/p0818
- p2728: 0.000144424; = p2337*(p1078+p1080)
- p2027: 0.428799
- p2517: 0.000282799; = p2321*p1014
- p0753: 0
- p2905: 9.87939e-5; = p2319*(p1020+p1022)
- p3345: 0; = if(and(p1232=0;p3256<>0);p3273*p3277*p3293;0)
- p2198: 1.98423e-5; = 22.98976928*p2197/14.0067
- p0018: 124.164
- p3079: 0; = p2298*p1082
- p3468: 0; = p3373*p1241
- p1029: 12.3064; = IF(p1012=0;IF(p0801<p1023*(p0704/100)*p0703*1000;p0801;p1023*(p0704/100)*p0703*1000);0)
- p1867: 0
- p3237: 0.854735
- p3098: 3.6775e-10; = p2317*p1023
- p1772: 0
- p3989: 3.10966e-6; = p1846*p3478
- p0819: 0; = p0808*p0809/p0818
- p0138: 76.718
- p3132: 0.000326101; = p2351*p1132
- p1158: 0.0213639; = p1156*p1157
- p3328: 0; = if(and(p1232=0;p3255<>0);p3255*(p3265*p3277-p3323)/p3327;0)
- p0822: 0.8849
- p2665: 0; = p2274*(p1128+p1130)
- p0873: 0; = p0872*p0001*p0003/(p0818*p0002)
- p2926: 0; = p2340*(p1079+p1081)
- p1294: 0; = p1290*p1252/p0818
- p1049: 0.218296; = IF(p1012=0;IF(p1037+p1044+p1045+p1046+p1047+p1048=1;0;1-(p1037+p1044+p1045+p1046+p1047+p1048));0)
- p0726: 0
- p2412: 0; = p2234*p2202
- p0184: 57.808
- p2964: 0; = p2378*(p1079+p1081)
- p2355: 0.000679055; = p2225*p2183
- p0578: 0; = IF(p0314<0.5;-SQRT(p0007*EXP(p0446^2*p0008)-p0007);SQRT(p0007*EXP(p0446^2*p0008)-p0007))
- p3421: 0; = p3364*p1239
- p1275: 0; = p1271*p1252/p0818
- p1753: 0
- p4307: 4.35573e-8; = p1962*p3479
- p3275: 0
- p2079: 0.02
- p2501: 0; = p2305*p1073
- p0217: 10.515
- p3467: 0; = p3372*p1241
- p3443: 0; = p3367*p1240
- p0832: 4.90496e8; = p0831*p0830/(1-p0831)
- p0636: 0; = IF(p0372<0.5;-SQRT(p0007*EXP(p0504^2*p0008)-p0007);SQRT(p0007*EXP(p0504^2*p0008)-p0007))
- p3472: 0; = p3377*p1241
- p2960: 0.00045949; = p2374*(p1020+p1022)
- p1333: 0.000901883; = p1332*p0001/(p0818*p0002)
- p1538: 41
- p2903: 1.31743e-5; = p2317*(p1020+p1022)
- p3127: 3.65977e-6; = p2346*p1082
- p1917: 0
- p2443: 0.000458721; = p2247*p1014
- p1280: 0; = IF(p1277=p1263;0;IF(p1277+p1278>p1263;p1263-p1277;p1278))
- p0676: 258.901; = p0016*(1+p0544*p0148/100)
- p1106: 12804.3; = IF(p1071=0;p1105*p1096*p1095;0)
- p2740: 7.85913e-5; = p2349*(p1078+p1080)
- p1827: 0
- p1631: 0
- p2687: 0; = p2296*(p1019+p1021)
- p2326: 0.00151384; = p2224*p2193
- p1873: 8.60456e-6; = p1465*1000/p0818
- p2043: 0.636483
- p3391: 0; = p3372*p1234
- p1818: 0
- p0762: 0
- p0047: 16.257
- p1240: 0; = if(p1232>0;0;IF(p1234+p1238+p1239=1;0;IF(p1234+p1238+p1239+p1237>1;1-(p1234+p1238+p1239);p1237)))
- p2686: 0; = p2295*(p1019+p1021)
- p0121: 1.183
- p2867: 0; = p2281*(p1020+p1022)
- p2675: 0; = p2284*(p1019+p1021)
- p2962: 0; = p2376*(p1079+p1081)
- p0439: 0; = SQRT(2)*(IF((2*p0307-1)<0;-1;IF((2*p0307-1)>0;1;0))*SQRT(SQRT((2/(pi()*0.140012289)+LN(1-(2*p0307-1)^2)/2)^2-LN(1-(2*p0307-1)^2)/0.140012289)-(2/(pi()*0.140012289)+LN(1-(2*p0307-1)^2)/2)))
- p3357: 0; = if(p1232=0;p3307+p3318+p3329+p3340+p3351;0)
- p0782: 42.399; = p0122*(1+p0650*p0254/100)
- p3326: 0; = if(and(p1232=0;p3255<>0);p3268*p3289;0)
- p0814: 0; = if(p0807=480;p0810*p0812+p0811*p0813;0)
- p1039: 0.058101
- p0663: 0; = IF(p0399<0.5;-SQRT(p0007*EXP(p0531^2*p0008)-p0007);SQRT(p0007*EXP(p0531^2*p0008)-p0007))
- p2514: 7.0551e-5; = p2318*p1014
- p1886: 0
- p0865: 0; = IF(p0858+p0864=1;0;IF(p0858+p0864+p0860>1;1-(p0858+p0864);p0860))
- p2423: 0; = p2235*p2213
- p2866: 0; = p2280*(p1020+p1022)
- p1646: 0
- p2435: 6.34243e-5; = p2239*p1014
- p1637: 0
- p0505: 0; = SQRT(2)*(IF((2*p0373-1)<0;-1;IF((2*p0373-1)>0;1;0))*SQRT(SQRT((2/(pi()*0.140012289)+LN(1-(2*p0373-1)^2)/2)^2-LN(1-(2*p0373-1)^2)/0.140012289)-(2/(pi()*0.140012289)+LN(1-(2*p0373-1)^2)/2)))
- p5028: 0; = p1855*p3483
- p3437: 0; = p3380*p1239
- p1988: 750
- p2042: 0.07
- p3310: 0; = if(and(p1232=0;p3252<>0);IF((p3306+p3307+p3308+p3309)+(p3252*(p3257*(1-p3277))/p3305)>p3252;p3252-(p3306+p3307+p3308+p3309);p3252*(p3257*(1-p3277))/p3305);0)
- p0695: 0
- p1963d: 0; = p1608*p1812+p1609*p1813+p1610*p1814+p1611*p1815+p1612*p1816+p1613*p1817+p1614*p1818+p1615*p1819+p1616*p1820+p1617*p1821+p1618*p1822+p1619*p1823+p1620*p1824+p1621*p1825+p1622*p1826+p1623*p1827+p1624*p1828+p1625*p1829+p1626*p1830+p1627*p1831
- p1929: 0
- p2274: 0; = p2230*p2220
- p2736: 2.38941e-6; = p2345*(p1078+p1080)
- p0723: 1499.59; = p0063*(1+p0591*p0195/100)
- p2155: 1.13444e-6; = p2015*p2084*p2117/(p0818*1000)
- p2490: 0; = p2294*p1014
- p3411: 0; = p3373*p1238
- p0893: 0; = 1000*(p0890+p0892)*p0001*p0003*p0004/(p0818*p0002)
- p1218: 0
- p2911: 9.52839e-5; = p2325*(p1020+p1022)
- p2817: 0; = p2426*(p1078+p1080)
- p3012: 0; = p2426*(p1079+p1081)
- p3238: 0.854735; = IF(p3237+p3235+p3236>1;1-(p3235+p3236);p3237)
- p2560: 0.000259245; = p2364*p1014
- p1794: 0
- p2374: 0.00128263; = p2225*p2203
- p0373: 0.5
- p2120: 0.51828
- p2923: 0; = p2337*(p1079+p1081)
- p1313: 0; = p1307*p1252/p0818
- p3376: 0; = if(p1232=0;p3246*p3358/p0818;0)
- p0845: 0.5
- p4569: 2.48674e-6; = p1808*p3481
- p3051: 5.38234e-7; = p2270*p1082
- p0116: 26.514
- p3279: 0
- p3415: 0; = p3377*p1238
- p3288: 0
- p2096: 0.486404
- p0853: 0; = p0803/(p0802+p0803)
- p0122: 42.399
- p1320: 0.461332; = IF(((p0745*1000*p0747/100)+(p0754*1000*p0756/100))/p0801<0;0;((p0745*1000*p0747/100)+(p0754*1000*p0756/100))/p0801)
- p3150: 5.93923e-11; = p2369*p1023
- p3896: 1.72589e-5; = p1963*p3477
- p1038: 0.00774783
- p2476: 0; = p2280*p1014
- p3483: 0; = if(p1328+p1330+p1332+p1334+p1336+p1338+p1340+p1342+p1344=0;0;p1342/(p1328+p1330+p1332+p1334+p1336+p1338+p1340+p1342+p1344))
- p0544: 0; = IF(p0280<0.5;-SQRT(p0007*EXP(p0412^2*p0008)-p0007);SQRT(p0007*EXP(p0412^2*p0008)-p0007))
- p2049: 25.6942
- p2558: 0.000127388; = p2362*p1014
- p2589: 0; = p2393*p1014
- p3431: 0; = p3374*p1239
- p1053: 1.78439e6; = IF(p1012=0;p1046*p1036;0)
- p3323: 0; = if(and(p1232=0;p3255<>0);p3265*p3277*(p3299*p3291+(1-p3299)*p3295);0)
- p2108: 0.826583
- p1070: 0.0133138; = IF(p1012=0;p1056/(p1063*p0818);0)
- p2059: 1.00168
- p2631: 3.32534e-5; = p2240*(p1019+p1021)
- p2790: 0; = p2399*(p1019+p1021)
- p3108: 3.24508e-9; = p2327*p1023
- p1963b: 0; = p1569*p1773+p1570*p1774+p1571*p1775+p1572*p1776+p1573*p1777+p1574*p1778+p1575*p1779+p1576*p1780+p1577*p1781+p1578*p1782+p1579*p1783+p1580*p1784+p1581*p1785+p1582*p1786+p1583*p1787+p1584*p1788+p1585*p1789+p1586*p1790+p1587*p1791
- p0928: 316058; = p0801*p0918
- p3306: 0; = if(and(p1232=0;p3252<>0);p3252*(p3257*p3277-p3301)/p3305;0)
- p0679: 800.463; = p0019*(1+p0547*p0151/100)
- p1999: 5.38641e7; = (p1228+p1229)*p0818+p1164
- p1877: 0
- p2110: 0.856281
- p2037: 1.99
- p2700: 0; = p2309*(p1078+p1080)
- p1994: 750
- p3393: 0; = p3374*p1234
- p1020: 0.16257; = IF(p1012=0;IF(p1014+p1019=1;0;IF(p1014+p1019+p1016>1;1-(p1014+p1019);p1016));0)
- p0177: 14.706
- p3006: 0; = p2420*(p1079+p1081)
- p2997: 0; = p2411*(p1020+p1022)
- p1059: 0.335
- p3268: 0
- p2232: 1; = if(p0783*p0787+p0784*p0788+p0785*p0789+p0786*p0790=0;0;p0789*p0785/(p0783*p0787+p0784*p0788+p0785*p0789+p0786*p0790))
- p2475: 0; = p2279*p1014
- p2806: 0; = p2415*(p1078+p1080)
- p2529: 0.000247415; = p2333*p1014
- p0261: 14.703
- p1711: 0
- p0642: 0; = IF(p0378<0.5;-SQRT(p0007*EXP(p0510^2*p0008)-p0007);SQRT(p0007*EXP(p0510^2*p0008)-p0007))
- p1140: 0; = if(p1121=0;p1134*p0001/(p0818*p0002);0)
- p2834: 0.00167928; = p2248*(p1020+p1022)
- p1307: 0
- p1769: 0
- p2753: 1.93905e-5; = p2362*(p1019+p1021)
- p1606: 0
- p1342: 0; = p1326*p0801
- p2288: 0; = p2223*p2195
- p2872: 0; = p2286*(p1020+p1022)
- p1763: 0
- p3022: 8.53941e-9; = p2241*p1023
- p2335: 0.000732939; = p2224*p2203
- p0702: 1499.59; = p0042*(1+p0570*p0174/100)
- p2278: 0; = p2223*p2184
- p1992: 3900
- p3442: 0; = p3366*p1240
- p0056: 42.399
- p1317: 0
- p2045: 30
- p1923: 0
- p1335: 1.04281e-5; = p1334*p0001/(p0818*p0002)
- p4504: 0; = p1949*p3480
- p2298: 0; = p2227*p2205
- p1063: 0.455
- p3056: 0; = p2275*p1132
- p0236: 14.103
- p1146: 0.919813
- p1933: 0
- p2767: 0; = p2376*(p1078+p1080)
- p3250: 0
- p0993: 0; = p0989*p0001*p0004/(p0818*p0002)
- p0901: 0.0206965
- p1959: 745.806; = if(p0738*p0740*p0739>0;p0738*1000*(p0740/100)*p0739/1000;p1958)
- p1598: 0
- p0442: 0; = SQRT(2)*(IF((2*p0310-1)<0;-1;IF((2*p0310-1)>0;1;0))*SQRT(SQRT((2/(pi()*0.140012289)+LN(1-(2*p0310-1)^2)/2)^2-LN(1-(2*p0310-1)^2)/0.140012289)-(2/(pi()*0.140012289)+LN(1-(2*p0310-1)^2)/2)))
- p3065: 0; = p2284*p1023
- p2661: 2.3637e-6; = p2270*(p1078+p1080)
- p3352: 0; = if(and(p1232=0;p3256<>0);p3256*(p3275-p3347)/p3349;0)
- p0178: 43.265
- p0443: 0; = SQRT(2)*(IF((2*p0311-1)<0;-1;IF((2*p0311-1)>0;1;0))*SQRT(SQRT((2/(pi()*0.140012289)+LN(1-(2*p0311-1)^2)/2)^2-LN(1-(2*p0311-1)^2)/0.140012289)-(2/(pi()*0.140012289)+LN(1-(2*p0311-1)^2)/2)))
- p2488: 0; = p2292*p1014
- p0954: 0; = if(and(p0683>0;or(p0807=56;p0807=100;and(p0807=60;p0901>0.06)));p0936;0)
- p2797: 0; = p2406*(p1019+p1021)
- p1703: 0
- p3089: 0; = p2308*p1082
- p3134: 3.50564e-5; = p2353*p1132
- p3243: 1.35032e-9; = p3234*p1188*p3239/p0818
- p1955: 0
- p3147: 5.67884e-9; = p2366*p1023
- p3886: 2.21217e-7; = p1949*p3477
- p1055: 32314.1; = IF(p1012=0;p1048*p1036;0)
- p1197: 1.806
- p3481: 0.158263; = if(p1328+p1330+p1332+p1334+p1336+p1338+p1340+p1342+p1344=0;0;p1338/(p1328+p1330+p1332+p1334+p1336+p1338+p1340+p1342+p1344))
- p3470: 0; = p3375*p1241
- p2984: 0; = p2398*(p1020+p1022)
- p1028: 240798; = IF(p1012=0;p1022*(p0704/100)*p0703*1000;0)
- p0834: 0.00059
- p0089: 0.718
- p1252: 0; = if(p1232>0;0;p0724*2000*p0723*1000*p0725/100)
- p2858: 0; = p2272*(p1129+p1131)
- p1270: 0; = IF(p1267=p1259;0;IF(p1267+p1268>p1259;p1259-p1267;p1268))
- p2714: 1.10804e-5; = p2323*(p1019+p1021)
- p0385: 0.5
- p2863: 0; = p2277*(p1020+p1022)
- p2005: 1.13709e6; = p1963*p0818+p1959*1000+p1170+p1176+p1182
- p3133: 2.01736e-5; = p2352*p1132
- p1163: 0.00430777
- p2853: 0; = p2267*(p1079+p1081)
- p3213: 0.112803; = p1222*12.0107/100.0869
- p3044: 2.23109e-6; = p2263*p1082
- p1285: 0; = p1281*p1252/p0818
- p2748: 1.87931e-5; = p2357*(p1019+p1021)
- p2149: 3.39925e-7; = p2015*p2077*p2111/(p0818*1000)
- p2904: 4.5378e-5; = p2318*(p1020+p1022)
- p3125: 5.20318e-8; = p2344*p1082
- p0878: 0; = p0867*p0856
- p1035: 4.10755e-9; = IF(p1012=0;p1029*p0001/(p0818*p0002);0)
- p3245: 0; = IF(p3244=1;0;if(p3244+p0792/100>1;1-p3244;p0792/100))
- p1785: 0
- p1715: 0
- p2175: 0.000525934; = p0895*p0908/p0818
- p2669: 0; = p2278*(p1019+p1021)
- p3152: 1.81323e-8; = p2371*p1023
- p2367: 0.00561355; = p2225*p2196
- p1871: 0
- p1834: 0
- p2260: 0.000208166; = p2226*p2206
- p2830: 0.000126661; = p2244*(p1020+p1022)
- p2251: 6.40279e-6; = p2222*p2197
- p1061: 0.3
- p2856: 0; = p2270*(p1079+p1081)
- p2495: 0; = p2299*p1073
- p1591: 0
- p1151: 543315; = if(p1121=0;p1149*p1148*p1145;0)
- p0570: 0; = IF(p0306<0.5;-SQRT(p0007*EXP(p0438^2*p0008)-p0007);SQRT(p0007*EXP(p0438^2*p0008)-p0007))
- p1145: 8.16189e6; = if(p1121=0;p0799*p0702*1000*p0800/100;0)
- p2692: 0; = p2301*(p1078+p1080)
- p0915: 0.0189815; = p0914/p0818
- p2011: 0.00939622
- p2028: 0.000218282; = p2015*p2026*p2027/(p0818*1000)
- p0776: 26.514; = p0116*(1+p0644*p0248/100)
- p1721: 0
- p2259: 0.000642835; = p2226*p2205
- p1779: 0
- p2880: 0; = p2294*(p1020+p1022)
- p1272: 0; = IF(p1267+p1270+p1271=p1259;0;p1259-(p1267+p1270+p1271))
- p0802: 1.35e6
- p3455: 0; = p3379*p1240
- p2074: 0.025
- p3174: 0; = p2393*p1023
- p2641: 0.00084211; = p2250*(p1019+p1021)
- p2121: 0.822447
- p2734: 0.000205523; = p2343*(p1078+p1080)
- p1295: 0; = p1291*p1252/p0818
- p2946: 0.000318313; = p2360*(p1020+p1022)
- p0152: 0
- p2070: 0.282
- p2172: 0.311669; = p2166-(p2167+p2168+p2169+p2170)
- p1066: 0.0048129; = IF(p1012=0;p1052/(p1059*p0818);0)
- p1150: 6.23226e6; = if(p1121=0;p1149*p1146*p1145;0)
- p2424: 0; = p2235*p2214
- p1699: 0
- p0547: 0; = IF(p0283<0.5;-SQRT(p0007*EXP(p0415^2*p0008)-p0007);SQRT(p0007*EXP(p0415^2*p0008)-p0007))
- p2265: 0.00091479; = p2226*p2211
- p1739: 0
- p1559: 0
- p2170: 0.00729518; = p2166*(p0913)
- p1615: 0
- p0653: 0; = IF(p0389<0.5;-SQRT(p0007*EXP(p0521^2*p0008)-p0007);SQRT(p0007*EXP(p0521^2*p0008)-p0007))
- p4503: 0; = p1948*p3480
- p2969: 0; = p2383*(p1079+p1081)
- p1237: 0; = if(p1232>0;0;p0729/100)
- p0401: 0.5
- p1928: 0
- p2998: 0; = p2412*(p1020+p1022)
- p3031: 9.93289e-8; = p2250*p1023
- p2144: 1.0593e-6; = p2015*p2072*p2106/(p0818*1000)
- p2077: 0.043
- p2932: 0; = p2346*(p1079+p1081)
- p0546: 0; = IF(p0282<0.5;-SQRT(p0007*EXP(p0414^2*p0008)-p0007);SQRT(p0007*EXP(p0414^2*p0008)-p0007))
- p0619: 0; = IF(p0355<0.5;-SQRT(p0007*EXP(p0487^2*p0008)-p0007);SQRT(p0007*EXP(p0487^2*p0008)-p0007))
- p3400: 0; = p3362*p1238
- p3457: 0; = p3362*p1241
- p3130: 1.78959e-5; = p2349*p1082
- p0830: 3.08977e9; = p0825*p0821*p0824
- p1296: 0; = p1292*p1252/p0818
- p2983: 0; = p2397*(p1020+p1022)
- p1331: 0.000230972; = p1330*p0001/(p0818*p0002)
- p1250: 0; = if(p1232>0;0;p1245*p0001/(p0818*p0002))
- p3396: 0; = p3377*p1234
- p2485: 0; = p2289*p1014
- p2294: 0; = p2223*p2201
- p3126: 5.44088e-7; = p2345*p1082
- p0686: 0
- p0355: 0.5
- p3321: 0; = if(and(p1232=0;p3253<>0);IF((p3317+p3318+p3319+p3320)+(p3253*(p3261*(1-p3277))/p3316)>p3253;p3253-(p3317+p3318+p3319+p3320);p3253*(p3261*(1-p3277))/p3316);0)
- p3434: 0; = p3377*p1239
- p1003: 0; = p0999*p0888
- p3106: 2.65978e-9; = p2325*p1023
- p2131: 2.41323e-6; = p2015*p2059*p2093/(p0818*1000)
- p1273: 0; = p1267*p1252/p0818
- p3577: 0; = p1846*p3476
- p2243: 0.00157224; = p2222*p2188
- p3305: 0; = if(and(p1232=0;p3252<>0);1-(p3301+p3302+p3303+p3304);0)
- p1947: 0
- p0213: 12.509
- p4157: 8.38964e-8; = p1808*p3479
- p1778: 0
- p0537: 0; = IF(p0273<0.5;-SQRT(p0007*EXP(p0405^2*p0008)-p0007);SQRT(p0007*EXP(p0405^2*p0008)-p0007))
- p0980: 0; = IF(p0977=0;0;p0977*p0001/(p0818*p0002))
- p1689: 0
- p2596: 0; = p2400*p1014
- p2395: 0; = p2234*p2184
- p1872: 0
- p4101: 3.7671e-6; = p1962*p3478
- p0181: 44.603
- p2900: 0; = p2314*(p1129+p1131)
- p2311: 0; = p2231*p2218
- p1574: 0
- p2134: 1.69107e-5; = p2015*p2062*p2096/(p0818*1000)
- p1829: 0
- p2650: 3.89301e-5; = p2259*(p1078+p1080)
- p2161: 8.17093e-8; = p2015*p2085*p2123/(p0818*1000)
- p3078: 0; = p2297*p1082
- p1621: 0
- p2679: 0; = p2288*(p1019+p1021)
- p2036: 3.36311e-5; = p2015*p2030*(1-p2032)/(p0818*1000)
- p1602: 0
- p0048: 5.337
- p2273: 0; = p2230*p2219
- p2058: 1.24412
- p1737: 0
- p0521: 0; = SQRT(2)*(IF((2*p0389-1)<0;-1;IF((2*p0389-1)>0;1;0))*SQRT(SQRT((2/(pi()*0.140012289)+LN(1-(2*p0389-1)^2)/2)^2-LN(1-(2*p0389-1)^2)/0.140012289)-(2/(pi()*0.140012289)+LN(1-(2*p0389-1)^2)/2)))
- p3196: 0; = p2415*p1082
- p0991: 0; = p0987*p0886
- p2871: 0; = p2285*(p1020+p1022)
- p2887: 0; = p2301*(p1079+p1081)
- p1815: 0
- p2835: 0.000359974; = p2249*(p1020+p1022)
- p2466: 3.61288e-5; = p2270*p1073
- p4915: 0; = p1948*p3482
- p2680: 0; = p2289*(p1019+p1021)
- p0876: 0; = p0866*p0856
- p1966: 1.35e6; = if(p0814=0;p0802;0)
- p2358: 0.000482603; = p2225*p2186
- p3435: 0; = p3378*p1239
- p3228: 0.000158701; = p3224*p1229
- p3392: 0; = p3373*p1234
- p1036: 7.41765e7; = IF(p1012=0;p0795*p0702*1000*p0796/100;0)
- p0283: 0.5
- p2249: 0.00100484; = p2222*p2195
- p1334: 31242.8; = p1322*p0801
- p2136: 5.34952e-6; = p2015*p2064*p2098/(p0818*1000)
- p3951: 7.25587e-6; = p1808*p3478
- p3214: 0.376406; = p1222*40.078/100.0869
- p2029: 4.03
- p3139: 4.82603e-9; = p2358*p1023
- p3480: 0; = if(p1328+p1330+p1332+p1334+p1336+p1338+p1340+p1342+p1344=0;0;p1336/(p1328+p1330+p1332+p1334+p1336+p1338+p1340+p1342+p1344))
- p2112: 0.856281
- p1618: 0
- p2775: 0; = p2384*(p1078+p1080)
- p2968: 0; = p2382*(p1079+p1081)
- p2875: 0; = p2289*(p1020+p1022)
- p3240: 1.21969e-8; = p3234*p1188*p3235/p0818
- p2004: 30
- p3005: 0; = p2419*(p1079+p1081)
- p2377: 0; = p2229*p2206
- p2159: 1.64989e-5; = p2015*p2083*p2121/(p0818*1000)
- p2721: 2.87733e-7; = p2330*(p1019+p1021)
- p2902: 0.00013901; = p2316*(p1020+p1022)
- p1599: 0
- p0182: 13.104
- p2818: 0; = p2427*(p1078+p1080)
- p4913: 0; = p1946*p3482
- p2544: 0.000134032; = p2348*p1073
- p1810: 0
- p0591: 0; = IF(p0327<0.5;-SQRT(p0007*EXP(p0459^2*p0008)-p0007);SQRT(p0007*EXP(p0459^2*p0008)-p0007))
- p2055: 5.59471
- p1002: 0; = p0996*p0888
- p1319: 0; = IF(((p0745*1000*p0746/100)+(p0754*1000*p0755/100))/p0801<0;0;((p0745*1000*p0746/100)+(p0754*1000*p0755/100))/p0801)
- p3114: 4.44217e-9; = p2333*p1023
- p2629: 0.000101868; = p2238*(p1019+p1021)
- p1231: 0.0100744; = IF(p1221=0;0;p1230*(p1228+p1229))
- p1207: 119.14; = if(p1193>0;0;(p1194*p1050/p1057+p1195*p1051/p1058+p1196*p1052/p1059+p1197*p1053/p1060+p1198*p1054/p1061+p1199*p1055/p1062+p1200*p1056/p1063)/(p0702*1000)+(p1201*p1109/p1114+p1202*p1110/p1115)/(p0702*1000)+p1203*p1170/p0801+p1204*p1176/p0801)
- p2247: 0.000823601; = p2222*p2192
- p0452: 0; = SQRT(2)*(IF((2*p0320-1)<0;-1;IF((2*p0320-1)>0;1;0))*SQRT(SQRT((2/(pi()*0.140012289)+LN(1-(2*p0320-1)^2)/2)^2-LN(1-(2*p0320-1)^2)/0.140012289)-(2/(pi()*0.140012289)+LN(1-(2*p0320-1)^2)/2)))
- p1570: 0
- p5327: 4.41157e-6; = p1948*p3484
- p2846: 0; = p2260*(p1079+p1081)
- p1010: 0; = p0890
- p0818: 2.673e9; = p0806*p0807
- p1858: 0
- p1625: 0
- p1727: 0
- p4092: 8.63794e-7; = p1949*p3478
- p3077: 0; = p2296*p1023
- p2847: 0; = p2261*(p1079+p1081)
- p3123: 3.57372e-6; = p2342*p1082
- p2526: 1.89029e-6; = p2330*p1014
- p1905: 0
- p0703: 1499.59; = p0043*(1+p0571*p0175/100)
- p1321: 1.80138; = IF(((p0745*1000*p0748/100)+(p0754*1000*p0757/100))/p0801<0;0;((p0745*1000*p0748/100)+(p0754*1000*p0757/100))/p0801)
- p1084: 69671.4; = IF(p1071=0;p1078*(p0710/100)*p0703*1000;0)
- p0763: 1499.59; = p0103*(1+p0631*p0235/100)
- p2319: 0.000275776; = p2224*p2186
- p2839: 8.27731e-6; = p2253*(p1020+p1022)
- p0081: 0.521
- p2301: 0; = p2227*p2208
- p1762: 0
- p2434: 0.000669229; = p2238*p1014
- p1790: 0
- p0781: 1.183; = p0121*(1+p0649*p0253/100)
- p2639: 0.000397415; = p2248*(p1019+p1021)
- p2743: 0; = p2352*(p1128+p1130)
- p1907: 0
- p0579: 0; = IF(p0315<0.5;-SQRT(p0007*EXP(p0447^2*p0008)-p0007);SQRT(p0007*EXP(p0447^2*p0008)-p0007))
- p3159: 0; = p2378*p1082
- p1187: 0.0004647
- p0635: 0; = IF(p0371<0.5;-SQRT(p0007*EXP(p0503^2*p0008)-p0007);SQRT(p0007*EXP(p0503^2*p0008)-p0007))
- p2183: 0.00226864; = p1064-p2182
- p1719: 0
- p0707: 16.257; = p0047*(1+p0575*p0179/100)
- p3348: 0; = if(and(p1232=0;p3256<>0);p3276*p3289;0)
- p1869: 0
- p1684: 0
- p0042: 1499.59
- p1571: 0
- p3346: 0; = if(and(p1232=0;p3256<>0);p3274*(p3281*(p3285*p1256+p3286*(p1253+p1257)+p1258*p3288));0)
- p1141: 0; = if(p1121=0;p1135*p0001/(p0818*p0002);0)
- p3207: 0; = p2426*p1082
- p1037: 0.372426
- p3200: 0; = p2419*p1082
- p1245: 0; = if(p1232>0;0;p1240*(p0725/100)*p0723*1000)
- p1254: 0; = if(p1232>0;0;p0736/100)
- p1009: 0; = p1005*p0001*p0004/(p0818*p0002)
- p2351: 0.00328566; = p2232*p2219
- p2994: 0; = p2408*(p1020+p1022)
- p0743: 0
- p3340: 0; = if(and(p1232=0;p3254<>0);p3254*(p3270-p3335)/p3338;0)
- p1803: 0
- p2783: 0; = p2392*(p1128+p1130)
- p1611: 0
- p1732: 0
- p1974: 0; = p1969*p0001/(p0818*p0002)
- p0114: 48.927
- p0402: 0.5
- p2615: 0; = p2419*p1073
- p3381: 0; = p3362*p1234
- p0718: 0
- p2472: 0; = p2276*p1014
- p2062: 3.76588
- p4428: 0; = p1873*p3480
- p2772: 0; = p2381*(p1078+p1080)
- p2859: 0; = p2273*(p1129+p1131)
- p3084: 0; = p2303*p1082
- p2411: 0; = p2234*p2201
- p1978: 477
- p3539: 0; = p1808*p3476
- p3469: 0; = p3374*p1241
- p1597: 0
- p2824: 0.000430444; = p2238*(p1020+p1022)
- p1718: 0
- p0267: 12.22
- p3280: 0
- p1016: 0.16257; = IF(p1012=0;p0707/100;0)
- p2068: 0.153529
- p3604: 0; = p1873*p3476
- p2449: 1.28691e-5; = p2253*p1014
- p1639: 0
- p2360: 0.000888546; = p2225*p2188
- p0280: 0.5
- p0809: 0
- p3309: 0; = if(and(p1232=0;p3252<>0);p3252*(p3260-p3304)/p3305;0)
- p1892: 0
- p1594: 0
- p2216: 0.000183828; = p1108/p0818
- p0272: 43.284
- p1865: 0
- p3156: 0; = p2375*p1082
- p3270: 0
- p5064: 0; = p1891*p3483
- p2808: 0; = p2417*(p1078+p1080)
- p0677: 0
- p2660: 1.63488e-5; = p2269*(p1078+p1080)
- p0881: 0; = p0880*p0001*p0003/(p0818*p0002)
- p5132: 0; = p1963*p3483
- p3347: 0; = if(and(p1232=0;p3256<>0);p3275*p3289;0)
- p0721: 0
- p3335: 0; = IF(or(p3254=0;p1232>0);0;p3270*(p3280*(p3283*p1256+p3286*(p1253+p1257)+p1258*p3288+p3300*p3287)))
- p2632: 7.23971e-5; = p2241*(p1019+p1021)
- p2330: 3.39388e-6; = p2224*p2198
- p0704: 82.065; = p0044*(1+p0572*p0176/100)
- p1677: 0
- p1823: 0
- p3677: 0; = p1946*p3476
- p3444: 0; = p3368*p1240
- p0501: 0; = SQRT(2)*(IF((2*p0369-1)<0;-1;IF((2*p0369-1)>0;1;0))*SQRT(SQRT((2/(pi()*0.140012289)+LN(1-(2*p0369-1)^2)/2)^2-LN(1-(2*p0369-1)^2)/0.140012289)-(2/(pi()*0.140012289)+LN(1-(2*p0369-1)^2)/2)))
- p5121: 0; = p1948*p3483
- p2897: 0; = p2311*(p1129+p1131)
- p2339: 0.00641204; = p2228*p2207
- p1540: 46
- p2264: 6.98559e-5; = p2226*p2210
- p0751: 21.282; = p0091*(1+p0619*p0223/100)
- p2431: 0; = p2236*p2221
- p1617: 0
- p1833: 0
- p1604: 0.92902
- p2132: 2.31971e-6; = p2015*p2060*p2094/(p0818*1000)
- p0043: 1499.59
- p1977: 697.05; = p1252+p1188
- p2105: 0.888194
- p2618: 0; = p2422*p1073
- p2570: 0.000714388; = p2374*p1014
- p0637: 0; = IF(p0373<0.5;-SQRT(p0007*EXP(p0505^2*p0008)-p0007);SQRT(p0007*EXP(p0505^2*p0008)-p0007))
- p3090: 0; = p2309*p1082
- p1609: 0
- p1297: 0
- p2752: 1.69404e-5; = p2361*(p1019+p1021)
- p2550: 0.00172297; = p2354*p1014
- p0889: 0; = 1000*p0888*p0001*p0003*p0004/(p0818*p0002)
- p3308: 0; = if(and(p1232=0;p3252<>0);p3252*(p3259-p3303)/p3305;0)
- p0791: 0
- p0006: 15
- p1071: 0
- p1131: 0; = if(p1121=0;IF(p1123+p1128+p1129+p1130=1;0;IF(p1123+p1128+p1129+p1130+p1127>1;1-(p1123+p1128+p1129+p1130);p1127));0)
- p1863: 0
- p3103: 1.14182e-9; = p2322*p1023
- p3007: 0; = p2421*(p1079+p1081)
- p2468: 0; = p2272*p1123
- p1557: 0
- p3290: 0
- p3019: 1.20155e-8; = p2238*p1023
- p1788: 0
- p3322: 0; = if(and(p1232=0;p3253<>0);p3253-(p3317+p3318+p3319+p3320+p3321);0)
- p3000: 0; = p2414*(p1079+p1081)
- p2280: 0; = p2223*p2186
- p2206: 0.000980429; = 9*1.00794*p2204/30.973762
- p2151: 1.53687e-7; = p2015*p2079*p2113/(p0818*1000)
- p2295: 0; = p2223*p2202
- p2238: 0.00120155; = p2222*p2183
- p2022: 0.00158679; = p2018*p2015/p0818-p2021
- p3177: 0; = p2396*p1023
- p1341: 0; = p1340*p0001/(p0818*p0002)
- p1332: 2.70207e6; = p1321*p0801
- p3285: 0
- p3074: 0; = p2293*p1023
- p2080: 0.025
- p1965: 0.000285444; = p1963+p1959*p1964*1000/p0818
- p2215: 0.00127147; = p1117-p2214
- p0049: 19.567
- p2803: 0; = p2412*(p1019+p1021)
- p0580: 0; = IF(p0316<0.5;-SQRT(p0007*EXP(p0448^2*p0008)-p0007);SQRT(p0007*EXP(p0448^2*p0008)-p0007))
- p1856: 0
- p2965: 0; = p2379*(p1079+p1081)
- p0867: 0; = IF(p0858+p0864+p0865+p0866=1;0;IF(p0858+p0864+p0865+p0866+p0862>1;1-(p0858+p0864+p0865+p0866);p0862))
- p3420: 0; = p3363*p1239
- p2437: 0.00047562; = p2241*p1014
- p1912: 0
- p1322: 0.0208285; = IF(((p0745*1000*p0749/100)+(p0754*1000*p0758/100))/p0801<0;0;((p0745*1000*p0749/100)+(p0754*1000*p0758/100))/p0801)
- p0795: 60.275; = p0135*(1+p0663*p0267/100)
- p1344: 1.5e6; = IF(p1318=0;p1327*p0801;0)
- p0346: 0.5
- p2414: 0; = p2235*p2204
- p2759: 3.06779e-7; = p2368*(p1019+p1021)
- p0308: 0.5
- p2527: 4.156e-6; = p2331*p1014
- p3329: 0; = if(and(p1232=0;p3255<>0);p3255*(p3266-p3324)/p3327;0)
- p1279: 0
- p4204: 6.91146e-7; = p1855*p3479
- p1075: 0; = IF(p1071=0;p0713/100;0)
- p1736: 0
- p2410: 0; = p2234*p2200
- p1290: 0; = IF(p1287=p1264;0;IF(p1287+p1288>p1264;p1264-p1287;p1288))
- p3075: 0; = p2294*p1023
- p3206: 0; = p2425*p1082
- p2722: 6.32611e-7; = p2331*(p1019+p1021)
- p2455: 0.00059504; = p2259*p1073
- p0967: 0
- p2182: 0.0103349; = p1050/p0818
- p2908: 4.09044e-5; = p2322*(p1020+p1022)
- p3810: 1.0176e-6; = p1873*p3477
- p1622: 0
- p3398: 0; = p3379*p1234
- p4840: 0; = p1873*p3482
- p0944: 0; = if(and(p0683=0;p0950=0);p0938;0)
- p5133: 1.93725e-5; = p1754*p3484
- p3191: 0; = p2410*p1023
- p2798: 0; = p2407*(p1019+p1021)
- p2094: 0.922577
- p1793: 0
- p2440: 0.000196924; = p2244*p1014
- p0968: 0
- p1122: 0; = p1121*p0001/(p0818*p0002)
- p3419: 0; = p3362*p1239
- p2672: 0; = p2281*(p1019+p1021)
- p2920: 2.29033e-5; = p2334*(p1020+p1022)
- p0414: 0; = SQRT(2)*(IF((2*p0282-1)<0;-1;IF((2*p0282-1)>0;1;0))*SQRT(SQRT((2/(pi()*0.140012289)+LN(1-(2*p0282-1)^2)/2)^2-LN(1-(2*p0282-1)^2)/0.140012289)-(2/(pi()*0.140012289)+LN(1-(2*p0282-1)^2)/2)))
- p1327a: 0; = (p0745*1000/p0801)*(1-(p0746+p0747+p0748+p0749+p0750+p0751+p0752+p0753)/100)+(p0754*1000/p0801)*(1-(p0755+p0756+p0757+p0758+p0759+p0760+p0761+p0762)/100)
- p0794: 0
- p1031: 1.29018e-5; = IF(p1012=0;p1025*p0001/(p0818*p0002);0)
- p3101: 3.96904e-10; = p2320*p1023
- p2709: 1.0739e-5; = p2318*(p1019+p1021)
- p1685: 0
- p2202: 0.000373782; = 4*1.00794*p2201/(2*14.0067)
- p2270: 3.90308e-5; = p2226*p2216
- p1178: 7.64892e-8; = p1176/p0818
- p0087: 15.903
- p3014: 0; = p2428*(p1129+p1131)
- p0998: 0; = if(p0888=0;0;if((p0699*p0698*1000*p0700/100)/p0888>1;1;(p0699*p0698*1000*p0700/100)/p0888))
- p2755: 3.94614e-5; = p2364*(p1019+p1021)
- p2972: 0; = p2386*(p1079+p1081)
- p1605: 0
- p3253: 0; = p1252*(p1277*(1-p3247)+p1280*(1-p3248)+p1281*(1-p3249)+p1282*(1-p3250))
- p3286: 0
- p3124: 4.67993e-5; = p2343*p1082
- p2406: 0; = p2234*p2196
- p2888: 0; = p2302*(p1079+p1081)
- p2109: 0.826583
- p3259: 0
- p2982: 0; = p2396*(p1020+p1022)
- p2030: 6.61
- p0885: 100; = IF(p0689+p0884=100;0;100-(p0689+p0884))
- p1845: 0
- p3262: 0
- p3418: 0; = p3380*p1238
- p0730: 0
- p2991: 0; = p2405*(p1020+p1022)
- p2082: 0.285294
- p2791: 0; = p2400*(p1019+p1021)
- p2401: 0; = p2234*p2190
- p1022: 0.19567; = IF(p1012=0;IF(p1014+p1019+p1020+p1021=1;0;IF(p1014+p1019+p1020+p1021+p1018>1;1-(p1014+p1019+p1020+p1021);p1018));0)
- p2114: 0.832356
- p2819: 0; = p2428*(p1128+p1130)
- p2918: 0.000371186; = p2332*(p1020+p1022)
- p3897: 3.48973e-5; = p1754*p3478
- p2347: 0.00100151; = p2228*p2215
- p3277: 0
- p2379: 0; = p2229*p2208
- p2583: 0; = p2387*p1073
- p2713: 9.68031e-6; = p2322*(p1019+p1021)
- p0353: 0.5
- p3241: 1.45603e-9; = p3234*p1188*p3236/p0818
- p2081: 0.0019
- p2708: 3.11778e-6; = p2317*(p1019+p1021)
- p2864: 0; = p2278*(p1020+p1022)
- p2158: 1.36507e-6; = p2015*p2082*p2120/(p0818*1000)
- p0371: 0.5
- p5325: 3.93205e-6; = p1946*p3484
- p2801: 0; = p2410*(p1019+p1021)
- p0956: 0; = if(and(p0683>0;or(p0807=56;p0807=100;and(p0807=60;p0901>0.06)));p0938;0)
- p2578: 0; = p2382*p1073
- p1323: 0; = IF(((p0745*1000*p0750/100)+(p0754*1000*p0759/100))/p0801<0;0;((p0745*1000*p0750/100)+(p0754*1000*p0759/100))/p0801)
- p2988: 0; = p2402*(p1020+p1022)
- p2092: 0.54529
- p1796: 0
- p2303: 0; = p2227*p2210
- p1019: 0.03141; = IF(p1012=0;IF(p1014=1;0;IF(p1014+p1015>1;1-p1014;p1015));0)
- p1587: 0
- p0078: 1499.59
- p1556: 0
- p2810: 0; = p2419*(p1078+p1080)
- p3387: 0; = p3368*p1234
- p2805: 0; = p2414*(p1078+p1080)
- p2565: 3.30798e-6; = p2369*p1014
- p2599: 0; = p2403*p1014
- p0826: 0.1151; = 1-p0825/p0818
- p1953: 0
- p3029: 4.6876e-8; = p2248*p1023
- p2021: 0.000239311; = p2020/p0818
- p2275: 0; = p2230*p2221
- p2459: 0.000149761; = p2263*p1073
- p2124: 0.263965
- p3333: 0; = if(and(p1232=0;p3255<>0);p3255-(p3328+p3329+p3330+p3331+p3332);0)
- p0685: 0
- p2850: 0; = p2264*(p1079+p1081)
- p3157: 0; = p2376*p1082
- p1967: 0; = if(p0807=480;p0802*p0810;0)
- p2320: 3.96904e-5; = p2224*p2187
- p2825: 4.07942e-5; = p2239*(p1020+p1022)
- p2047: 2.76962e-13; = p2015*p2045/(p0818*1000000000000)
- p0415: 0; = SQRT(2)*(IF((2*p0283-1)<0;-1;IF((2*p0283-1)>0;1;0))*SQRT(SQRT((2/(pi()*0.140012289)+LN(1-(2*p0283-1)^2)/2)^2-LN(1-(2*p0283-1)^2)/0.140012289)-(2/(pi()*0.140012289)+LN(1-(2*p0283-1)^2)/2)))
- p3021: 3.92232e-9; = p2240*p1023
- p3100: 2.75776e-9; = p2319*p1023
- p1086: 0; = IF(p1071=0;p1080*(p0710/100)*p0703*1000;0)
- p2115: 0.856281
- p1874: 0
- p1132: 0.09925; = if(p1121=0;IF(p1123+p1128+p1129+p1130+p1131=1;0;1-(p1123+p1128+p1129+p1130+p1131));0)
- p3063: 0; = p2282*p1023
- p0765: 65.246; = p0105*(1+p0633*p0237/100)
- p0775: 0
- p0696: 0
- p2870: 0; = p2284*(p1020+p1022)
- p0854: 1.25169e6; = p0801*((1-p0853)*p0846+p0853*p0852)
- p2763: 6.59056e-5; = p2372*(p1019+p1021)
- p2025: 1.46532e-5; = p2015*p2023*p2024/(p0818*1000)
- p1908: 0
- p2137: 4.34619e-7; = p2015*p2065*p2099/(p0818*1000)
- p0241: 32.354
- p1311: 0; = IF(p1307+p1310=p1266;0;IF(p1307+p1310+p1309>p1266;p1266-(p1307+p1310);p1309))
- p2111: 0.856281
- p0904: 9.13945e7; = p0825*p0901+(p0830+p0895)*p0824*p0903
- p2226: 0.212322; = if(p0774*p0778+p0775*p0779+p0776*p0780+p0777*p0781=0;0;p0778*p0774/(p0774*p0778+p0775*p0779+p0776*p0780+p0777*p0781))
- p1862: 0
- p2008: 0.0648669; = ((p1982*p1985+p1988*p1991+p1994*p1997+p2002*p2005)/p0818)*p0005*p0002/1000
- p3426: 0; = p3369*p1239
- p0720: 0
- p3218: 0.00746511; = p3214*p1228
- p2562: 0.000316295; = p2366*p1014
- p2877: 0; = p2291*(p1020+p1022)
- p0937: 0.000267175; = p0931*p0001/(p0818*p0002)
- p1040: 0.024056
- p3679: 0; = p1948*p3476
- p1056: 1.61924e7; = IF(p1012=0;p1049*p1036;0)
- p0838: 1.675e9; = (p0833-p0836)*p0837
- p3141: 8.88546e-9; = p2360*p1023
- p1846: 6.73401e-6; = p1438*1000/p0818
- p2369: 5.93923e-6; = p2225*p2198
- p2978: 0; = p2392*(p1129+p1131)
- p0125: 11.542
- p0510: 0; = SQRT(2)*(IF((2*p0378-1)<0;-1;IF((2*p0378-1)>0;1;0))*SQRT(SQRT((2/(pi()*0.140012289)+LN(1-(2*p0378-1)^2)/2)^2-LN(1-(2*p0378-1)^2)/0.140012289)-(2/(pi()*0.140012289)+LN(1-(2*p0378-1)^2)/2)))
- p1044: 0.00774783; = IF(p1012=0;IF(p1037=1;0;IF(p1037+p1038>1;1-p1037;p1038));0)
- p3425: 0; = p3368*p1239
- p0936: 8.64147e-5; = p0930*p0001/(p0818*p0002)
- p0641: 0; = IF(p0377<0.5;-SQRT(p0007*EXP(p0509^2*p0008)-p0007);SQRT(p0007*EXP(p0509^2*p0008)-p0007))
- p0930: 258901; = p0801*p0924
- p4102: 6.73913e-5; = p1963*p3478
- p2156: 2.10196e-7; = p2015*p2085*p2118/(p0818*1000)
- p1653: 0
- p1541: 5
- p2519: 7.27936e-5; = p2323*p1014
- p1786: 0
- p2200: 0.00605777; = p1056/p0818
- p0174: 0
- p2723: 8.78438e-5; = p2332*(p1019+p1021)
- p2816: 0; = p2425*(p1078+p1080)
- p1900: 0
- p2189: 0.000667561; = p1053/p0818
- p2084: 0.21
- p1042: 0.000435637
- p2967: 0; = p2381*(p1079+p1081)
- p0673: 0
- p1922: 0
- p2845: 0; = p2259*(p1079+p1081)
- p2086: 0.0617647
- p1670: 0
- p1261: 0; = if(p1232>0;0;p0732/100)
- p0877: 0; = p0876*p0001*p0003/(p0818*p0002)
- p2221: 0.000353213; = p1155-p2220
- p0105: 65.246
- p2391: 0; = p2233*p2220
- p2263: 0.00016179; = p2226*p2209
- p0088: 62.097
- p2643: 8.90967e-7; = p2252*(p1019+p1021)
- p2118: 0.679049
- p3185: 0; = p2404*p1023
- p4652: 5.92082e-8; = p1891*p3481
- p2616: 0; = p2420*p1073
- p0926: 0; = IF(p0918+p0923+p0924+p0925=1;0;IF(p0918+p0923+p0924+p0925+p0922>1;1-(p0918+p0923+p0924+p0925);p0922))
- p2627: 0; = p2431*p1123
- p2453: 0.00126407; = p2257*p1014
- p2007: 0.0345957; = ((p1981*p1985+p1987*p1991+p1993*p1997+p2001*p2005)/p0818)*p0005*p0002/1000
- p2934: 0; = p2348*(p1079+p1081)
- p2181: 1.57492e-7; = p0887+p0889+p0893+p2180
- p2316: 0.000388035; = p2224*p2183
- p2217: 0.00164755; = p1118-p2216
- p2098: 0.856281
- p2448: 5.85329e-6; = p2252*p1014
- p0481: 0; = SQRT(2)*(IF((2*p0349-1)<0;-1;IF((2*p0349-1)>0;1;0))*SQRT(SQRT((2/(pi()*0.140012289)+LN(1-(2*p0349-1)^2)/2)^2-LN(1-(2*p0349-1)^2)/0.140012289)-(2/(pi()*0.140012289)+LN(1-(2*p0349-1)^2)/2)))
- p0617: 0; = IF(p0353<0.5;-SQRT(p0007*EXP(p0485^2*p0008)-p0007);SQRT(p0007*EXP(p0485^2*p0008)-p0007))
- p2540: 3.49262e-6; = p2344*p1073
- p2075: 0.072
- p0244: 18.607
- p3143: 2.28715e-9; = p2362*p1023
- p3463: 0; = p3368*p1241
- p2531: 0.000408225; = p2335*p1014
- p1312: 0; = IF(p1307+p1310+p1311=p1266;0;p1266-(p1307+p1310+p1311))
- p3085: 0; = p2304*p1082
- p1895: 0
- p2442: 5.66837e-5; = p2246*p1014
- p1672: 0
- p2293: 0; = p2223*p2200
- p1129: 0; = if(p1121=0;IF(p1123+p1128=1;0;IF(p1123+p1128+p1125>1;1-(p1123+p1128);p1125));0)
- p0286: 0.5
- p1195: 0.45
- p3353: 0; = if(and(p1232=0;p3256<>0);p3256*(p3276-p3348)/p3349;0)
- p1097: 0.0606187
- p2601: 0; = p2405*p1014
- p3401: 0; = p3363*p1238
- p2428: 0; = p2236*p2218
- p2571: 0; = p2375*p1073
- p2826: 0.000140513; = p2240*(p1020+p1022)
- p3092: 0; = p2311*p1132
- p2725: 5.42022e-6; = p2334*(p1019+p1021)
- p1855: 0.000129443; = p1447*1000/p0818
- p0863: 0; = p0675*1000/p0856
- p2064: 0.676706
- p0848: 0
- p1592: 0
- p1184: 8.37658e-8; = p1182/p0818
- p2445: 0.000559666; = p2249*p1014
- p2220: 0.00020326; = p1151/p0818
- p2930: 0; = p2344*(p1079+p1081)
- p0910: 0.00590066; = p0909/p0818
- p0925: 0.533642; = IF(p0918+p0923+p0924=1;0;IF(p0918+p0923+p0924+p0921>1;1-(p0918+p0923+p0924);p0921))
- p2403: 0; = p2234*p2192
- p2659: 4.33233e-6; = p2268*(p1078+p1080)
- p1620: 0
- p3001: 0; = p2415*(p1079+p1081)
- p2648: 0.000192412; = p2257*(p1019+p1021)
- p2992: 0; = p2406*(p1020+p1022)
- p0829: 0; = if(p0807=480;p0814*(1-p0824);0)
- p0474: 0; = SQRT(2)*(IF((2*p0342-1)<0;-1;IF((2*p0342-1)>0;1;0))*SQRT(SQRT((2/(pi()*0.140012289)+LN(1-(2*p0342-1)^2)/2)^2-LN(1-(2*p0342-1)^2)/0.140012289)-(2/(pi()*0.140012289)+LN(1-(2*p0342-1)^2)/2)))
- p3369: 0; = if(p1232=0;p3245*p3357/p0818;0)
- p3350: 0; = if(and(p1232=0;p3256<>0);p3256*(p3273*p3277-p3345)/p3349;0)
- p0103: 1499.59
- p0052: 6.056
- p2762: 0.000153725; = p2371*(p1019+p1021)
- p3102: 5.07745e-9; = p2321*p1023
- p1619: 0
- p1972: 0; = if(p0807=480;p1967*p0001/(p0818*p0002);0)
- p3332: 0; = if(and(p1232=0;p3255<>0);IF((p3328+p3329+p3330+p3331)+(p3255*(p3265*(1-p3277))/p3327)>p3255;p3255-(p3328+p3329+p3330+p3331);p3255*(p3265*(1-p3277))/p3327);0)
- p0309: 0.5
- p0923: 0.082776; = IF(p0918=1;0;IF(p0918+p0919>1;1-p0918;p0919))
- p3215: 0.450791; = p1222*3*15.9994/100.0869
- p2095: 0.765734
- p1931: 0
- p2422: 0; = p2235*p2212
- p1936: 0
- p2019: 0.13105
- p1251: 0; = if(p1232>0;0;p1246*p0001/(p0818*p0002))
- p0713: 0
- p2987: 0; = p2401*(p1020+p1022)
- p1983: 50
- p1714: 0
- p3378: 0; = if(p1232=0;p3246*p3360/p0818;0)
- p0773: 76.718; = p0113*(1+p0641*p0245/100)
- p3194: 0; = p2413*p1023
- p1964: 0.5
- p1758: 0
- p3187: 0; = p2406*p1023
- p1096: 0.000861829
- p3135: 3.09347e-8; = p2354*p1023
- p1787: 0
- p0874: 0; = p0865*p0856
- p2461: 0.000846775; = p2265*p1073
- p1400: 42
- p3370: 0; = if(p1232=0;p3245*p3358/p0818;0)
- p2416: 0; = p2235*p2206
- p1741: 0
- p5234: 3.31827e-5; = p1855*p3484
- p2212: 4.79022e-6; = p1106/p0818
- p1227: 0.000500663; = IF(p1221=0;0;p1226*p0001/(p0818*p0002))
- p0824: 0.863
- p2737: 1.60722e-5; = p2346*(p1078+p1080)
- p1289: 0
- p1656: 0
- p1688: 0
- p2197: 1.20891e-5; = p1055/p0818
- p2655: 4.23047e-6; = p2264*(p1078+p1080)
- p1133: 572705; = if(p1121=0;p1123*(p0716/100)*p0703*1000;0)
- p3026: 4.047e-9; = p2245*p1023
- p0478: 0; = SQRT(2)*(IF((2*p0346-1)<0;-1;IF((2*p0346-1)>0;1;0))*SQRT(SQRT((2/(pi()*0.140012289)+LN(1-(2*p0346-1)^2)/2)^2-LN(1-(2*p0346-1)^2)/0.140012289)-(2/(pi()*0.140012289)+LN(1-(2*p0346-1)^2)/2)))
- p3301: 0; = if(and(p1232=0;p3252<>0);p3257*p3277*(p3297*p3290+(1-p3297)*p3294);0)
- p0871: 0; = p0870*p0001*p0003/(p0818*p0002)
- p2365: 0.00264919; = p2225*p2193
- p0389: 0.5
- p2375: 0; = p2229*p2204
- p3316: 0; = if(and(p1232=0;p3253<>0);1-(p3312+p3313+p3314+p3315);0)
- p2605: 0; = p2409*p1014
- p2418: 0; = p2235*p2208
- p1939: 0
- p3121: 1.83033e-5; = p2340*p1082
- p0525: 0; = SQRT(2)*(IF((2*p0393-1)<0;-1;IF((2*p0393-1)>0;1;0))*SQRT(SQRT((2/(pi()*0.140012289)+LN(1-(2*p0393-1)^2)/2)^2-LN(1-(2*p0393-1)^2)/0.140012289)-(2/(pi()*0.140012289)+LN(1-(2*p0393-1)^2)/2)))
- p1179: 0.5
- p0135: 60.275
- p2535: 0.0059353; = p2339*p1073
- p2199: 4.36253e-5; = p1069-p2197-p2198
- p0918: 0.210705; = p0680*1000/p0801
- p0179: 39.89
- p1742: 0.403
- p2592: 0; = p2396*p1014
- p1824: 0
- p3058: 0; = p2277*p1023
- p2447: 3.56616e-6; = p2251*p1014
- p1102: 0.0330733; = IF(p1071=0;IF(p1096+p1101=1;0;IF(p1096+p1101+p1098>1;1-(p1096+p1101);p1098));0)
- p3395: 0; = p3376*p1234
- p2928: 0; = p2342*(p1079+p1081)
- p2898: 0; = p2312*(p1129+p1131)
- p2712: 4.30466e-5; = p2321*(p1019+p1021)
- p1181: 0.000149271
- p1784: 0
- p0681: 0
- p1264: 0; = if(p1232>0;0;IF(p1259+p1263=1;0;IF(p1259+p1263+p1261>1;1-(p1259+p1263);p1261)))
- p0327: 0.5
- p3153: 7.77372e-9; = p2372*p1023
- p2510: 0; = p2314*p1123
- p0698: 0
- p3453: 0; = p3377*p1240
- p3408: 0; = p3370*p1238
- p2432: 0.0213639; = p1158
- p2366: 0.000567884; = p2225*p2195
- p0003: 10000
- p3456: 0; = p3380*p1240
- p1329: 0; = p1328*p0001/(p0818*p0002)
- p0022: 1499.59
- p3009: 0; = p2423*(p1079+p1081)
- p3182: 0; = p2401*p1023
- p0973: 0; = p0967+p0968+p0969
- p2664: 0; = p2273*(p1128+p1130)
- p2673: 0; = p2282*(p1019+p1021)
- p2869: 0; = p2283*(p1020+p1022)
- p3142: 1.99816e-9; = p2361*p1023
- p1242: 0; = if(p1232>0;0;p1234*(p0725/100)*p0723*1000)
- p1683: 0
- p2016: 0.00146558; = (p2014-p2015)/(p0818)
- p2354: 0.00309347; = p2225*p2182
- p2505: 0; = p2309*p1073
- p0946: 0.000105492; = if(and(p0683=0;or(p0807=480;p0807=32;p0807=1;and(p0807=60;p0901<0.03)));p0934;0)
- p0051: 92.565
- p0786: 0
- p2281: 0; = p2223*p2187
- p2585: 0; = p2389*p1123
- p2603: 0; = p2407*p1014
- p2302: 0; = p2227*p2209
- p2694: 0; = p2303*(p1078+p1080)
- p1819: 0
- p2716: 2.25496e-5; = p2325*(p1019+p1021)
- p2214: 0.000336931; = p1107/p0818
- p1302: 0; = IF(p1297+p1300+p1301=p1262;0;p1262-(p1297+p1300+p1301))
- p0412: 0; = SQRT(2)*(IF((2*p0280-1)<0;-1;IF((2*p0280-1)>0;1;0))*SQRT(SQRT((2/(pi()*0.140012289)+LN(1-(2*p0280-1)^2)/2)^2-LN(1-(2*p0280-1)^2)/0.140012289)-(2/(pi()*0.140012289)+LN(1-(2*p0280-1)^2)/2)))
- p1239: 0; = if(p1232>0;0;IF(p1234+p1238=1;0;IF(p1234+p1238+p1236>1;1-(p1234+p1238);p1236)))
- p1817: 0
- p2754: 4.87621e-6; = p2363*(p1019+p1021)
- p1139: 0.000191155; = if(p1121=0;p1133*p0001/(p0818*p0002);0)
- p2381: 0; = p2229*p2210
- p1860: 0
- p4916: 0; = p1949*p3482
- p0503: 0; = SQRT(2)*(IF((2*p0371-1)<0;-1;IF((2*p0371-1)>0;1;0))*SQRT(SQRT((2/(pi()*0.140012289)+LN(1-(2*p0371-1)^2)/2)^2-LN(1-(2*p0371-1)^2)/0.140012289)-(2/(pi()*0.140012289)+LN(1-(2*p0371-1)^2)/2)))
- p1585: 0
- p0345: 0.5
- p2704: 0; = p2313*(p1128+p1130)
- p3138: 2.21669e-9; = p2357*p1023
- p4103: 4.03502e-7; = p1754*p3479
- p1927: 0
- p0085: 4351.36
- p3447: 0; = p3371*p1240
- p0771: 72.829; = p0111*(1+p0639*p0243/100)
- p3097: 3.88035e-9; = p2316*p1023
- p0938: 0; = p0932*p0001/(p0818*p0002)
- p5122: 0; = p1949*p3483
- p0839: 0.626635; = p0838/p0818
- p2995: 0; = p2409*(p1020+p1022)
- p3227: 4.01026e-5; = p3223*p1229
- p2628: 0.000464064; = p2237*(p1019+p1021)
- p3118: 3.28865e-5; = p2337*p1082
- p0906: 0.00392517
- p1561: 0
- p1011: 0; = p1010*p0001*p0004/(p0818*p0002)
- p2140: 1.30765e-6; = p2015*p2068*p2102/(p0818*1000)
- p1255: 0; = if(p1232>0;0;p0737/100)
- p3183: 0; = p2402*p1023
- p1580: 0
- p2236: 0; = 1-(p2230+p2231+p2232+p2233)
- p1185: 0.5
- p1814: 0
- p3414: 0; = p3376*p1238
- p2465: 0.00024989; = p2269*p1073
- p2577: 0; = p2381*p1073
- p2433: 0.00304871; = p2237*p1014
- p1007: 0; = p1003*p0001*p0004/(p0818*p0002)
- p4295: 8.18988e-8; = p1946*p3479
- p2980: 0; = p2394*(p1020+p1022)
- p2685: 0; = p2294*(p1019+p1021)
- p2380: 0; = p2229*p2209
- p2886: 0; = p2300*(p1079+p1081)
- p3745: 1.85822e-6; = p1808*p3477
- p2054: 0.91
- p2915: 7.4075e-7; = p2329*(p1020+p1022)
- p1170: 771.187; = p1169*p0801
- p3060: 0; = p2279*p1023
- p1067: 0.00317886; = IF(p1012=0;p1053/(p1060*p0818);0)
- p1755: 0
- p0817: 0
- p2499: 0; = p2303*p1073
- p2138: 7.12869e-7; = p2015*p2066*p2100/(p0818*1000)
- p3222: 0.224242; = IF(p3216=0;0;p1223*40.078/100.0869)
- p1893: 0
- p0613: 0; = IF(p0349<0.5;-SQRT(p0007*EXP(p0481^2*p0008)-p0007);SQRT(p0007*EXP(p0481^2*p0008)-p0007))
- p1825: 0
- p3336: 0; = IF(or(p3254=0;p1232>0);0;p3271*p3289)
- p3622: 0; = p1891*p3476
- p0400: 0.5
- p0195: 0
- p2588: 0; = p2392*p1123
- p2707: 3.28976e-5; = p2316*(p1019+p1021)
- p0745: 4351.36; = p0085*(1+p0613*p0217/100)
- p3086: 0; = p2305*p1082
- p2017: 1.13182e7; = p2015*p0898
- p2684: 0; = p2293*(p1019+p1021)
- p2717: 0.000128343; = p2326*(p1019+p1021)
- p1076: 0; = IF(p1071=0;p0714/100;0)
- p1776: 0
- p3137: 6.43556e-10; = p2356*p1023
- p3128: 1.38108e-5; = p2347*p1082
- p3422: 0; = p3365*p1239
- p3011: 0; = p2425*(p1079+p1081)
- p1961: 0.5
- p2833: 0.000295047; = p2247*(p1020+p1022)
- p0382: 0.5
- p0574: 0; = IF(p0310<0.5;-SQRT(p0007*EXP(p0442^2*p0008)-p0007);SQRT(p0007*EXP(p0442^2*p0008)-p0007))
- p1008: 0; = p1004*p0001*p0004/(p0818*p0002)
- p3239: 0.013074; = IF(p3238+p3235+p3236=1;0;1-(p3238+p3235+p3236))
- p1188: 697.05; = p1187*p0801
- p2658: 6.44076e-7; = p2267*(p1078+p1080)
- p3168: 0; = p2387*p1082
- p2939: 0; = p2353*(p1129+p1131)
- p1903: 0
- p1704: 0
- p1173: 0.5
- p1624: 0
- p3110: 2.06775e-11; = p2329*p1023
- p0920: 0.172601; = p0676*1000/p0801
- p2564: 2.01541e-6; = p2368*p1014
- p2730: 0.000388313; = p2339*(p1078+p1080)
- p1287: 0
- p3120: 8.8422e-5; = p2339*p1082
- p3219: 0.00894036; = p3215*p1228
- p0693: 0
- p0952: 0; = if(and(p0683>0;or(p0807=56;p0807=100;and(p0807=60;p0901>0.06)));p0934;0)
- p0803: 0
- p1582: 0
- p1074: 0.06056; = IF(p1071=0;p0712/100;0)
- p2849: 0; = p2263*(p1079+p1081)
- p0790: 0
- p1220: 0; = IF(p1218<0.5;-SQRT(p1214*EXP(p1219^2*p1215)-p1214);SQRT(p1214*EXP(p1219^2*p1215)-p1214))
- p2521: 0.000148142; = p2325*p1014
- p0699: 0
- p2636: 3.43104e-5; = p2245*(p1019+p1021)
- p2702: 0; = p2311*(p1128+p1130)
- p1114: 0.216028
- p0911: 0.00475556
- p1562: 0
- p1215: 0; = IF(p1214=0;0;(p1214-1.5)/(p1214-1)^2)
- p2961: 0; = p2375*(p1079+p1081)
- p0892: 0; = if(p0891=0;0;(1-p1240)*p3251/p0891)
- p2542: 0.000245661; = p2346*p1073
- p1221: 0.015942
- p3476: 0; = if(p1328+p1330+p1332+p1334+p1336+p1338+p1340+p1342+p1344=0;0;p1328/(p1328+p1330+p1332+p1334+p1336+p1338+p1340+p1342+p1344))
- p1969: 0; = p0803
- p3176: 0; = p2395*p1023
- p0716: 42.399; = p0056*(1+p0584*p0188/100)
- p0808: 0
- p2228: 0.787678; = if(p0774*p0778+p0775*p0779+p0776*p0780+p0777*p0781=0;0;p0780*p0776/(p0774*p0778+p0775*p0779+p0776*p0780+p0777*p0781))
- p0268: 14.103
- p0678: 124.164; = p0018*(1+p0546*p0150/100)
- p3304: 0; = if(and(p1232=0;p3252<>0);p3260*p3289;0)
- p0857: 5.00663; = p0856*p0001*p0003/(p0818*p0002)
- p1234: 0; = if(p1232>0;0;p0726/100)
- p1563: 0
- p0958: 0; = if(and(p0683>0;or(p0807=480;p0807=32;p0807=1;and(p0807=60;p0901<0.03)));p0934;0)
- p3094: 0; = p2313*p1132
- p0091: 21.282
- p1257: 0; = if(p1232>0;0;IF(p1253+p1256=1;0;IF(p1253+p1256+p1255>1;1-(p1253+p1256);p1255)))
- p0737: 0
- p2611: 0; = p2415*p1073
- p1757: 0
- p1244: 0; = if(p1232>0;0;p1239*(p0725/100)*p0723*1000)
- p0608: 0; = IF(p0344<0.5;-SQRT(p0007*EXP(p0476^2*p0008)-p0007);SQRT(p0007*EXP(p0476^2*p0008)-p0007))
- p0342: 0.5
- p1208: 0; = p1205*p0818*p0822/p0801
- p1330: 691998; = p1320*p0801
- p1780: 0
- p0914: 5.07376e7; = p0825*p0911+(p0830+p0895)*p0824*p0913
- p2760: 5.03528e-7; = p2369*(p1019+p1021)
- p1782: 0
- p1101: 0.0606187; = IF(p1071=0;IF(p1096=1;0;IF(p1096+p1097>1;1-p1096;p1097));0)
- p1701: 0
- p2252: 1.05092e-5; = p2222*p2198
- p1987: 400
- p2715: 2.78643e-6; = p2324*(p1019+p1021)
- p1836: 0
- p1957: 0
- p0606: 0; = IF(p0342<0.5;-SQRT(p0007*EXP(p0474^2*p0008)-p0007);SQRT(p0007*EXP(p0474^2*p0008)-p0007))
- p2489: 0; = p2293*p1014
- p2837: 2.29374e-6; = p2251*(p1020+p1022)
- p3015: 0; = p2429*(p1129+p1131)
- p3344: 0; = if(and(p1232=0;p3254<>0);p3254-(p3339+p3340+p3341+p3342+p3343);0)
- p1601: 0
- p1831: 0
- p3331: 0; = if(and(p1232=0;p3255<>0);p3255*(p3268-p3326)/p3327;0)
- p4514: 0; = p1963*p3480
- p2186: 0.00161232; = p1052/p0818
- p1018: 0.19567; = IF(p1012=0;p0709/100;0)
- p1304: 0; = p1300*p1252/p0818
- p1211: 0.6
- p1647: 0
- p3116: 7.32939e-9; = p2335*p1023
- p2781: 0; = p2390*(p1128+p1130)
- p3149: 3.61853e-11; = p2368*p1023
- p2640: 8.51904e-5; = p2249*(p1019+p1021)
- p1564: 0
- p0787: 15.404; = p0127*(1+p0655*p0259/100)
- p2071: 0.151
- p3210: 0; = p2429*p1132
- p2647: 1.67837e-5; = p2256*(p1019+p1021)
- p2504: 0; = p2308*p1073
- p2954: 1.2963e-6; = p2368*(p1020+p1022)
- p2143: 1.23818e-6; = p2015*p2071*p2105/(p0818*1000)
- p2147: 5.49436e-7; = p2015*p2075*p2109/(p0818*1000)
- p2780: 0; = p2389*(p1128+p1130)
- p2065: 0.0758824
- p2999: 0; = p2413*(p1020+p1022)
- p3179: 0; = p2398*p1023
- p3394: 0; = p3375*p1234
- p1881: 0
- p0312: 0.5
- p3690: 0; = p1963*p3476
- p2506: 0; = p2310*p1073
- p0810: 0
- p3373: 0; = if(p1232=0;p3245*p3361/p0818;0)
- p2209: 0.000762005; = 14.0067*p2208/30.973762
- p2953: 0.002011; = p2367*(p1020+p1022)
- p0079: 0.552
- p3035: 3.20841e-8; = p2254*p1023
- p0908: 0.00197823
- p0476: 0; = SQRT(2)*(IF((2*p0344-1)<0;-1;IF((2*p0344-1)>0;1;0))*SQRT(SQRT((2/(pi()*0.140012289)+LN(1-(2*p0344-1)^2)/2)^2-LN(1-(2*p0344-1)^2)/0.140012289)-(2/(pi()*0.140012289)+LN(1-(2*p0344-1)^2)/2)))
- p1465: 23
- p0798: 76.718; = p0138*(1+p0666*p0270/100)
- p0750: 0
- p2719: 0.000271955; = p2328*(p1019+p1021)
- p0727: 0
- p0855: 4.17784; = p0854*p0001*p0003/(p0818*p0002)
- p3895: 9.64751e-7; = p1962*p3477
- p4926: 0; = p1963*p3482
- p1841: 0
- p2773: 0; = p2382*(p1078+p1080)
- p0008: 0.0739645; = (p0007-1.5)/(p0007-1)^2
- p0151: 0
- p3261: 0
- p1920: 0
- p0734: 0
- p2100: 0.705744
- p1209: 37.0175; = p1206*p0818*p0822/p0801
- p0939: 1.38183e-7; = p0933*p0001/(p0818*p0002)
- p3212: 0; = p2431*p1132
- p3071: 0; = p2290*p1023
- p1968: 0; = if(p0807=480;p0802*p0811;0)
- p1118: 0.00183138; = IF(p1071=0;p1108/(p1113*p0818);0)
- p0714: 0
- p2975: 0; = p2389*(p1129+p1131)
- p2612: 0; = p2416*p1073
- p0349: 0.5
- p4297: 9.18865e-8; = p1948*p3479
- p1052: 4.30973e6; = IF(p1012=0;p1045*p1036;0)
- p3297: 0; = if(p1273+p1274+p1275+p1276=0;0;p1273/(p1273+p1274+p1275+p1276))
- p2176: 0.00320104; = p0895*p0913/p0818
- p5119: 0; = p1946*p3483
- p2003: 50
- p1982: 750
- p2400: 0; = p2234*p2189
- p1697: 0
- p2033: 1.73157e-5; = p2015*p2029*p2031/(p0818*1000)
- p3059: 0; = p2278*p1023
- p3374: 0; = if(p1232=0;p3246*p3356/p0818;0)
- p3446: 0; = p3370*p1240
- p3269: 0
- p3129: 1.99676e-6; = p2348*p1082
- p0118: 12.611
- p2487: 0; = p2291*p1014
- p1695: 0
- p2782: 0; = p2391*(p1128+p1130)
- p3397: 0; = p3378*p1234
- p2142: 2.12736e-6; = p2015*p2070*p2104/(p0818*1000)
- p2167: 0.277895; = p2166*(p0898)
- p2878: 0; = p2292*(p1020+p1022)
- p1919: 0
- p5046: 0; = p1873*p3483
- p1217: 0
- p2396: 0; = p2234*p2185
- p1888: 0
- p2104: 0.817136
- p4410: 0; = p1855*p3480
- p4616: 2.0486e-5; = p1855*p3481
- p3363: 0; = if(p1232=0;p3244*p3357/p0818;0)
- p3417: 0; = p3379*p1238
- p2993: 0; = p2407*(p1020+p1022)
- p0112: 29.318
- p3413: 0; = p3375*p1238
- p2536: 0.0012286; = p2340*p1073
- p2541: 3.65218e-5; = p2345*p1073
- p2024: 0.748682
- p1186: 4.18829e-8; = p1182*p1185/p0818
- p1889: 0
- p2407: 0; = p2234*p2197
- p0747: 15.903; = p0087*(1+p0615*p0219/100)
- p3358: 0; = if(p1232=0;p3308+p3319+p3330+p3341+p3352;0)
- p2267: 1.06353e-5; = p2226*p2213
- p1266: 0; = if(p1232>0;0;IF(p1259+p1263+p1264+p1265=1;0;1-(p1259+p1263+p1264+p1265)))
- p3324: 0; = if(and(p1232=0;p3255<>0);p3266*(p3279*(p3284*p1256+p3286*(p1253+p1257)+p1258*p3288+p3299*p3287));0)
- p1120: 0.00708458; = IF(p1071=0;p1110/(p1115*p0818);0)
- p0344: 0.5
- p2656: 5.53997e-5; = p2265*(p1078+p1080)
- p2786: 0; = p2395*(p1019+p1021)
- p1848: 0
- p2955: 2.12767e-6; = p2369*(p1020+p1022)
- p0711: 92.565; = p0051*(1+p0579*p0183/100)
- p0001: 0.404686
- p2187: 0.000232049; = 4*1.00794*p2186/(2*14.0067)
- p3131: 0.000231407; = p2350*p1132
- p0248: 8.759
- p3273: 0
- p0416: 0; = SQRT(2)*(IF((2*p0284-1)<0;-1;IF((2*p0284-1)>0;1;0))*SQRT(SQRT((2/(pi()*0.140012289)+LN(1-(2*p0284-1)^2)/2)^2-LN(1-(2*p0284-1)^2)/0.140012289)-(2/(pi()*0.140012289)+LN(1-(2*p0284-1)^2)/2)))
- p1168: 1.20869e-6; = p1164*p1167/p0818
- p2344: 3.77315e-6; = p2228*p2212
- p1608: 0
- p2130: 6.26307e-6; = p2015*p2058*p2092/(p0818*1000)
- p3405: 0; = p3367*p1238
- p2678: 0; = p2287*(p1019+p1021)
- p3382: 0; = p3363*p1234
- p0770: 0
- p3140: 6.94575e-10; = p2359*p1023
- p2208: 0.00168506; = p1110/p0818
- p2851: 0; = p2265*(p1079+p1081)
- p2050: 0.952062
- p2881: 0; = p2295*(p1020+p1022)
- p0668: 0; = IF(p0404<0.5;-SQRT(p0007*EXP(p0536^2*p0008)-p0007);SQRT(p0007*EXP(p0536^2*p0008)-p0007))
- p1652: 0
- p2402: 0; = p2234*p2191
- p0725: 0
- p3364: 0; = if(p1232=0;p3244*p3358/p0818;0)
- p2331: 7.4618e-6; = p2224*p2199
- p2607: 0; = p2411*p1014
- p3010: 0; = p2424*(p1079+p1081)
- p2563: 0.00312658; = p2367*p1014
- p3180: 0; = p2399*p1023
- p0797: 29.591; = p0137*(1+p0665*p0269/100)
- p1577: 0
- p2986: 0; = p2400*(p1020+p1022)
- p0220: 13.116
- p3003: 0; = p2417*(p1079+p1081)
- p2855: 0; = p2269*(p1079+p1081)
- p1558: 0
- p0532: 0; = SQRT(2)*(IF((2*p0400-1)<0;-1;IF((2*p0400-1)>0;1;0))*SQRT(SQRT((2/(pi()*0.140012289)+LN(1-(2*p0400-1)^2)/2)^2-LN(1-(2*p0400-1)^2)/0.140012289)-(2/(pi()*0.140012289)+LN(1-(2*p0400-1)^2)/2)))
- p1723: 0
- p2913: 0.000116252; = p2327*(p1020+p1022)
- p2271: 0.000349812; = p2226*p2217
- p2727: 0.000159686; = p2336*(p1078+p1080)
- p1135: 0; = if(p1121=0;p1129*(p0716/100)*p0703*1000;0)
- p2153: 1.502e-8; = p2015*p2081*p2115/(p0818*1000)
- p2048: 9.23206e-14; = p2015*p2046/(p0818*1000000000000)
- p1614: 0
- p0369: 0.5
- p0459: 0; = SQRT(2)*(IF((2*p0327-1)<0;-1;IF((2*p0327-1)>0;1;0))*SQRT(SQRT((2/(pi()*0.140012289)+LN(1-(2*p0327-1)^2)/2)^2-LN(1-(2*p0327-1)^2)/0.140012289)-(2/(pi()*0.140012289)+LN(1-(2*p0327-1)^2)/2)))
- p0990: 0; = p0986*p0886
- p1627: 0
- p3313: 0; = if(and(p1232=0;p3253<>0);p3262*(p3278*(p3282*p1256+p3286*(p1253+p1257)+p1258*p3288+p3298*p3287));0)
- p2996: 0; = p2410*(p1020+p1022)
- p1584: 0
- p1588: 0
- p3165: 0; = p2384*p1082
- p2938: 0; = p2352*(p1129+p1131)
- p0883: 5.00663; = p0882*p0001*p0003/(p0818*p0002)
- p0842: 0.28492
- p1746: 0
- p2836: 0.00355836; = p2250*(p1020+p1022)
- p2035: 1.98895e-5; = p2015*p2029*(1-p2031)/(p0818*1000)
- p1337: 0; = p1336*p0001/(p0818*p0002)
- p3380: 0; = p3251/p0818
- p2916: 1.21582e-6; = p2330*(p1020+p1022)
- p2742: 0; = p2351*(p1128+p1130)
- p0828: 0; = if(p0827=0;0;p0819-p0827/p0818)
- p3070: 0; = p2289*p1023
- p2458: 0.000331175; = p2262*p1073
- p2125: 1.15137e-5; = p2015*p2053*p2087/(p0818*1000)
- p2865: 0; = p2279*(p1020+p1022)
- p2473: 0; = p2277*p1014
- p1578: 0
- p0257: 22.775
- p0683: 0
- p1981: 400
- p2283: 0; = p2223*p2189
- p2386: 0; = p2229*p2215
- p2520: 1.83057e-5; = p2324*p1014
- p3042: 2.38345e-5; = p2261*p1082
- p2556: 0.000494894; = p2360*p1014
- p2580: 0; = p2384*p1073
- p2205: 0.00302764; = 2*14.0067*p2204/30.973762
- p2195: 0.00189723; = p2194*p2193
- p2966: 0; = p2380*(p1079+p1081)
- p0780: 86.333; = p0120*(1+p0648*p0252/100)
- p0657: 0; = IF(p0393<0.5;-SQRT(p0007*EXP(p0525^2*p0008)-p0007);SQRT(p0007*EXP(p0525^2*p0008)-p0007))
- p2551: 0.000378213; = p2355*p1014
- p2338: 0.000772262; = p2228*p2206
- p1942: 0
- p0749: 0.718; = p0089*(1+p0617*p0221/100)
- p3025: 3.53564e-9; = p2244*p1023
- p1259: 0; = if(p1232>0;0;p0730/100)
- p2809: 0; = p2418*(p1078+p1080)
- p0758: 0
- p3385: 0; = p3366*p1234
- p0934: 0.000105492; = p0928*p0001/(p0818*p0002)
- p2020: 639677; = p2015*p2018*p2019
- p0846: 0.834462; = p0841*p0845^3+p0842*p0845^2+p0843*p0845+p0844
- p2213: 5.00906e-5; = p1116-p2212
- p1013: 0; = p1012*p0001/(p0818*p0002)
- p2522: 0.000843161; = p2326*p1014
- p2638: 6.98249e-5; = p2247*(p1019+p1021)
- p5225: 1.72627e-6; = p1846*p3484
- p0847: 0
- p2884: 0; = p2298*(p1079+p1081)
- p0446: 0; = SQRT(2)*(IF((2*p0314-1)<0;-1;IF((2*p0314-1)>0;1;0))*SQRT(SQRT((2/(pi()*0.140012289)+LN(1-(2*p0314-1)^2)/2)^2-LN(1-(2*p0314-1)^2)/0.140012289)-(2/(pi()*0.140012289)+LN(1-(2*p0314-1)^2)/2)))
- p1804: 0
- p0670: 0
- p2513: 2.04826e-5; = p2317*p1014
- p0831: 0.137; = 1-p0824
- p0796: 82.065; = p0136*(1+p0664*p0268/100)
- p1225: 1.088; = IF(p1221=0;0;p1223+1.2*p1224)
- p1340: 0; = p1325*p0801
- p0610: 0; = IF(p0346<0.5;-SQRT(p0007*EXP(p0478^2*p0008)-p0007);SQRT(p0007*EXP(p0478^2*p0008)-p0007))
- p1160: 0.0590276; = (p1156+p1158)*p1159
- p1229: 0.000316172; = IF(p1221=0;0;p1228*p1221)
- p4089: 7.08311e-6; = p1946*p3478
- p1698: 0
- p0351: 0.5
- p3351: 0; = if(and(p1232=0;p3256<>0);p3256*(p3274-p3346)/p3349;0)
- p2779: 0; = p2388*(p1078+p1080)
- p2857: 0; = p2271*(p1079+p1081)
- p2044: 4.11323e-7; = p2015*p2042*p2043/(p0818*1000)
- p2246: 0.000101772; = p2222*p2191
- p2345: 3.94553e-5; = p2228*p2213
- p1113: 0.100377
- p2579: 0; = p2383*p1073
- p1654: 0
- p2491: 0; = p2295*p1014
- p3282: 0
- p1770: 0
- p0897: 0
- p2949: 2.06045e-5; = p2363*(p1020+p1022)
- p2083: 2.17294
- p3203: 0; = p2422*p1082
- p0732: 0
- p4858: 0; = p1891*p3482
- p3266: 0
- p1316: 0; = p1312*p1252/p0818
- p2614: 0; = p2418*p1073
- p1773: 0
- p0307: 0.5
- p1765: 0
- p0972: 0; = p0969/p0818
- p1447: 346
- p0393: 0.5
- p3154: 1.11881e-9; = p2373*p1023
- p1958: 724
- p2663: 0; = p2272*(p1128+p1130)
- p0063: 1499.59
- p2039: 5.59342e-6; = p2015*p2037*p2038/(p0818*1000)
- p1926: 0
- p2393: 0; = p2234*p2182
- p1909: 0
- p2827: 0.000305916; = p2241*(p1020+p1022)
- p0269: 9.871
- p2610: 0; = p2414*p1073
- p1636: 0
- p2738: 6.06514e-5; = p2347*(p1078+p1080)
- p0900: 0.968045; = p0899/p0818
- p2087: 0.856281
- p3278: 0
- p2699: 0; = p2308*(p1078+p1080)
- p3307: 0; = if(and(p1232=0;p3252<>0);p3252*(p3258-p3302)/p3305;0)
- p0748: 62.097; = p0088*(1+p0616*p0220/100)
- p1286: 0; = p1282*p1252/p0818
- p3428: 0; = p3371*p1239
- p0573: 0; = IF(p0309<0.5;-SQRT(p0007*EXP(p0441^2*p0008)-p0007);SQRT(p0007*EXP(p0441^2*p0008)-p0007))
- p0175: 0
- p2446: 0.00553232; = p2250*p1014
- p2180: 1.57492e-7; = p3233*p1188/(p0818)
- p0120: 86.333
- p2927: 0; = p2341*(p1079+p1081)
- p0709: 19.567; = p0049*(1+p0577*p0181/100)
- p2899: 0; = p2313*(p1129+p1131)
- p3389: 0; = p3370*p1234
- p3032: 6.40279e-11; = p2251*p1023
- p2090: 0.40001
- p1573: 0
- p1153: 0.365265
- p2002: 750
- p3464: 0; = p3369*p1241
- p2191: 0.000192154; = 8*1.00794*p2189/(2*14.0067)
- p0306: 0.5
- p3225: 4.64693e-5; = p3221*p1229
- p2907: 0.000181895; = p2321*(p1020+p1022)
- p0820: 0; = if(p0807=480;p0814;0)
- p1235: 0; = if(p1232>0;0;p0727/100)
- p1233: 0.000500663; = p1232*p0001/(p0818*p0002)
- p2532: 0.00244078; = p2336*p1073
- p0994: 0; = p0990*p0001*p0004/(p0818*p0002)
- p0777: 0
- p2119: 0.679049
- p3184: 0; = p2403*p1023
- p3181: 0; = p2400*p1023
- p2323: 0.000130696; = p2224*p2190
- p2436: 0.000218462; = p2240*p1014
- p5338: 3.7411e-5; = p1963*p3484
- p0550: 0; = IF(p0286<0.5;-SQRT(p0007*EXP(p0418^2*p0008)-p0007);SQRT(p0007*EXP(p0418^2*p0008)-p0007))
- p3342: 0; = if(and(p1232=0;p3254<>0);p3254*(p3272-p3337)/p3338;0)
- p1012: 0
- p1916: 0
- p3037: 1.97968e-9; = p2256*p1023
- p1156: 0.0966913; = p1064+p1065+p1066+p1067+p1068+p1069+p1070+p1116+p1117+p1118+p1119+p1120+p1154+p1155
- p2574: 0; = p2378*p1073
- p1343: 0; = p1342*p0001/(p0818*p0002)
- p3004: 0; = p2418*(p1079+p1081)
- p2584: 0; = p2388*p1073
- p0886: 0; = p0686*1000*p0687*p0689/100
- p1116: 5.48808e-5; = IF(p1071=0;p1106/(p1111*p0818);0)
- p2038: 0.304457
- p3341: 0; = if(and(p1232=0;p3254<>0);p3254*(p3271-p3336)/p3338;0)
- p0976: 0; = IF(p0687=0;IF(OR(p0686=0;p0689=0);0;p0686*1000*p0689/100);0)
- p2602: 0; = p2406*p1014
- p2408: 0; = p2234*p2198
- p0996: 0; = if(p0888=0;0;if((p0691*p0690*1000*p0692/100)/p0888>1;1;(p0691*p0690*1000*p0692/100)/p0888))
- p1177: 0.000500663; = p0801*p0001/(p0818*p0002)
- p3287: 0
- p2842: 7.09201e-5; = p2256*(p1020+p1022)
- p0688: 0
- p2697: 0; = p2306*(p1078+p1080)
- p1852: 0
- p0961: 0; = if(and(p0683>0;or(p0807=480;p0807=32;p0807=1;and(p0807=60;p0901<0.03)));p0937;0)
- p2925: 0; = p2339*(p1079+p1081)
- p2318: 0.000126669; = p2224*p2185
- p4721: 0; = p1754*p3482
- p3689: 0; = p1962*p3476
- p2979: 0; = p2393*(p1020+p1022)
- p2348: 0.000144797; = p2228*p2216
- p0104: 82.065
- p4501: 0; = p1946*p3480
- p1328: 0; = p1319*p0801
- p3192: 0; = p2411*p1023
- p3119: 1.06495e-5; = p2338*p1082
- p2890: 0; = p2304*(p1079+p1081)
- p0909: 1.57725e7
- p1882: 0
- p1190: 2.60775e-7; = p1188/p0818
- p2088: 0.798875
- p0784: 0
- p1766: 0
- p0989: 0; = p0985*p0886
- p0447: 0; = SQRT(2)*(IF((2*p0315-1)<0;-1;IF((2*p0315-1)>0;1;0))*SQRT(SQRT((2/(pi()*0.140012289)+LN(1-(2*p0315-1)^2)/2)^2-LN(1-(2*p0315-1)^2)/0.140012289)-(2/(pi()*0.140012289)+LN(1-(2*p0315-1)^2)/2)))
- p1560: 0
- p2322: 0.000114182; = p2224*p2189
- p1870: 0
- p1183: 0.000500663; = p0801*p0001/(p0818*p0002)
- p4034: 1.72759e-7; = p1891*p3478
- p3188: 0; = p2407*p1023
- p0691: 0
- p0929: 124164; = p0801*p0923
- p0284: 0.5
- p2703: 0; = p2312*(p1128+p1130)
- p0849: 0
- p1901: 0
- p0609: 0; = IF(p0345<0.5;-SQRT(p0007*EXP(p0477^2*p0008)-p0007);SQRT(p0007*EXP(p0477^2*p0008)-p0007))
- p2667: 0; = p2276*(p1019+p1021)
- p2363: 5.7516e-5; = p2225*p2191
- p0674: 0
- p1997: 2.01484e7; = (if(p1152=0;0;p1150/p1152)+if(p1153=0;0;p1151/p1153))*(1+p1157)
- p3229: 2.41738e-6; = p1164/p0818
- p0979: 0; = IF(p0976=0;0;p0976*p0001/(p0818*p0002))
- p0764: 82.065; = p0104*(1+p0632*p0236/100)
- p2253: 2.31055e-5; = p2222*p2199
- p1248: 0; = if(p1232>0;0;p1243*p0001/(p0818*p0002))
- p3438: 0; = p3362*p1240
- p1634: 0
- p3294: 0
- p1950: 0
- p2813: 0; = p2422*(p1078+p1080)
- p0816: 0
- p1165: 0.000500663; = p0801*p0001/(p0818*p0002)
- p3220: 0.00118996; = p3216*p1228
- p2509: 0; = p2313*p1123
- p2543: 0.000927048; = p2347*p1073
- p1205: 0
- p2815: 0; = p2424*(p1078+p1080)
- p0368: 0.5
- p2553: 0.000123463; = p2357*p1014
- p4927: 0; = p1754*p3483
- p2507: 0; = p2311*p1123
- p2370: 1.3058e-5; = p2225*p2199
- p1921: 0
- p1148: 0.0801873; = if(p1121=0;IF(p1146=1;0;1-p1146);0)
- p2317: 3.6775e-5; = p2224*p2184
- p2324: 3.28666e-5; = p2224*p2191
- p2362: 0.000228715; = p2225*p2190
- p1243: 0; = if(p1232>0;0;p1238*(p0725/100)*p0723*1000)
- p3367: 0; = if(p1232=0;p3244*p3361/p0818;0)
- p1085: 0; = IF(p1071=0;p1079*(p0710/100)*p0703*1000;0)
- p0644: 0; = IF(p0380<0.5;-SQRT(p0007*EXP(p0512^2*p0008)-p0007);SQRT(p0007*EXP(p0512^2*p0008)-p0007))
- p3474: 0; = p3379*p1241
- p1579: 0
- p3093: 0; = p2312*p1132
- p2539: 0.00314139; = p2343*p1073
- p2534: 0.000714844; = p2338*p1073
- p2072: 0.134
- p2840: 0.00114938; = p2254*(p1020+p1022)
- p2941: 0.000243265; = p2355*(p1020+p1022)
- p0957: 0; = if(and(p0683>0;or(p0807=56;p0807=100;and(p0807=60;p0901>0.06)));p0939;0)
- p3433: 0; = p3376*p1239
- p1945: 0
- p3459: 0; = p3364*p1241
- p3379: 0; = if(p1232=0;p3246*p3361/p0818;0)
- p1079: 0; = IF(p1071=0;IF(p1073+p1078=1;0;IF(p1073+p1078+p1075>1;1-(p1073+p1078);p1075));0)
- p2133: 3.66772e-6; = p2015*p2061*p2095/(p0818*1000)
- p2933: 0; = p2347*(p1079+p1081)
- p3066: 0; = p2285*p1023
- p0282: 0.5
- p0733: 0
- p1247: 0; = if(p1232>0;0;p1242*p0001/(p0818*p0002))
- p1935: 0
- p1843: 0
- p3189: 0; = p2408*p1023
- p2185: 0.000740571; = p1065-p2184
- p1142: 0; = if(p1121=0;p1136*p0001/(p0818*p0002);0)
- p3450: 0; = p3374*p1240
- p0823: 0
- p2942: 2.30548e-5; = p2356*(p1020+p1022)
- p2444: 0.00261085; = p2248*p1014
- p3334: 0; = IF(or(p3254=0;p1232>0);0;p3269*p3277*(p3300*p3292+(1-p3300)*p3296))
- p3163: 0; = p2382*p1082
- p0507: 0; = SQRT(2)*(IF((2*p0375-1)<0;-1;IF((2*p0375-1)>0;1;0))*SQRT(SQRT((2/(pi()*0.140012289)+LN(1-(2*p0375-1)^2)/2)^2-LN(1-(2*p0375-1)^2)/0.140012289)-(2/(pi()*0.140012289)+LN(1-(2*p0375-1)^2)/2)))
- p2732: 3.6349e-5; = p2341*(p1078+p1080)
- p2831: 0.00014498; = p2245*(p1020+p1022)
- p0852: 0; = p0847*p0851^3+p0848*p0851^2+p0849*p0851+p0850
- p0789: 79.719; = p0129*(1+p0657*p0261/100)
- p1896: 0
- p1073: 0.92565; = IF(p1071=0;p0711/100;0)
- p3452: 0; = p3376*p1240
- p2482: 0; = p2286*p1014
- p2889: 0; = p2303*(p1079+p1081)
- p1963k: 1.63455e-5; = p1744*p1948+p1745*p1949+p1746*p1950+p1747*p1951+p1748*p1952+p1749*p1953+p1750*p1954+p1751*p1955+p1752*p1956+p1753*p1957+p1961*p1962
- p2630: 9.65423e-6; = p2239*(p1019+p1021)
- p2315: 0.00176772; = p2224*p2182
- p1228: 0.0198326; = IF(p1221=0;0;p0801*p1212*2000/(p1222+p1221*p1225)/p0818)
- p1805: 0
- p0700: 0
- p2203: 0.00428512; = p1070-p2200-p2201-p2202
- p2053: 1.45647
- p1963g: 4.50208e-6; = p1667*p1871+p1668*p1872+p1669*p1873+p1670*p1874+p1671*p1875+p1672*p1876+p1673*p1877+p1674*p1878+p1675*p1879+p1676*p1880+p1677*p1881+p1678*p1882+p1679*p1883+p1680*p1884+p1681*p1885+p1682*p1886+p1683*p1887+p1684*p1888+p1685*p1889
- p1219: 0; = if(p1218=0;0;SQRT(2)*(IF((2*p1218-1)<0;-1;IF((2*p1218-1)>0;1;0))*SQRT(SQRT((2/(pi()*0.140012289)+LN(1-(2*p1218-1)^2)/2)^2-LN(1-(2*p1218-1)^2)/0.140012289)-(2/(pi()*0.140012289)+LN(1-(2*p1218-1)^2)/2))))
- p3223: 0.126838; = IF(p3216=0;0;(1-p1223)*24.3050/84.3139)
- p2862: 0; = p2276*(p1020+p1022)
- p2642: 5.42828e-7; = p2251*(p1019+p1021)

- p5328: 4.79518e-7; = p1949*p3484
- p1991: 8.50995e7; = (if(p1111=0;0;p1106/p1111)+if(p1112=0;0;p1107/p1112)+if(p1113=0;0;p1108/p1113)+if(p1114=0;0;p1109/p1114)+if(p1115=0;0;p1110/p1115))*(1+p1157)
- p2409: 0; = p2234*p2199
- p1262: 0; = if(p1232>0;0;p0733/100)
- p2254: 0.00320841; = p2222*p2200
- p0919: 0.082776; = p0678*1000/p0801
- p0701: 0
- p1305: 0; = p1301*p1252/p0818
- p0377: 0.5
- p2769: 0; = p2378*(p1078+p1080)
- p0243: 12.804
- p2287: 0; = p2223*p2193
- p0875: 0; = p0874*p0001*p0003/(p0818*p0002)
- p1826: 0
- p1954: 0
- p1995: 50
- p0837: 0.5
- p2336: 0.00263683; = p2228*p2204
- p2788: 0; = p2397*(p1019+p1021)
- p1339: 0.000309095; = p1338*p0001/(p0818*p0002)
- p2971: 0; = p2385*(p1079+p1081)
- p0113: 76.718
- p3057: 0; = p2276*p1023
- p2689: 0; = p2298*(p1078+p1080)
- p2328: 0.00320777; = p2224*p2196
- p3283: 0
- p2726: 6.21386e-5; = p2335*(p1019+p1021)
- p2162: 1.50517e-7; = p2015*p2086*p2124/(p0818*1000)
- p1025: 38654.3; = IF(p1012=0;p1019*(p0704/100)*p0703*1000;0)
- p1258: 0; = if(p1232>0;0;IF(p1253+p1256+p1257=1;0;1-(p1253+p1256+p1257)))
- p0690: 0
- p0508: 0; = SQRT(2)*(IF((2*p0376-1)<0;-1;IF((2*p0376-1)>0;1;0))*SQRT(SQRT((2/(pi()*0.140012289)+LN(1-(2*p0376-1)^2)/2)^2-LN(1-(2*p0376-1)^2)/0.140012289)-(2/(pi()*0.140012289)+LN(1-(2*p0376-1)^2)/2)))
- p1676: 0
- p1800: 0
- p1696: 0
- p1925: 0
- p3013: 0; = p2427*(p1079+p1081)
- p3349: 0; = if(and(p1232=0;p3256<>0);1-(p3345+p3346+p3347+p3348);0)
- p1123: 0.90075; = if(p1121=0;p0717/100;0)
- p0310: 0.5
- p3061: 0; = p2280*p1023
- p0719: 0
- p2462: 9.4145e-7; = p2266*p1073
- p2415: 0; = p2235*p2205
- p0774: 48.927; = p0114*(1+p0642*p0246/100)
- p2171: 0.0961855; = p2165*p0831
- p0210: 0
- p1310: 0; = IF(p1307=p1266;0;IF(p1307+p1308>p1266;p1266-p1307;p1308))
- p2516: 2.21063e-5; = p2320*p1014
- p2122: 0.341195
- p1744: 0.666778
- p1731: 0
- p0962: 0; = if(and(p0683>0;or(p0807=480;p0807=32;p0807=1;and(p0807=60;p0901<0.03)));p0938;0)
- p3202: 0; = p2421*p1082
- p2608: 0; = p2412*p1014
- p2222: 0.529635; = if(p0765*p0769+p0766*p0770+p0767*p0771+p0768*p0772=0;0;p0769*p0765/(p0765*p0769+p0766*p0770+p0767*p0771+p0768*p0772))
- p2751: 7.5331e-5; = p2360*(p1019+p1021)
- p2486: 0; = p2290*p1014
- p1798: 0
- p2765: 0.000108742; = p2374*(p1019+p1021)
- p1172: 2.8851e-7; = p1170/p0818
- p0880: 0; = p0868*p0856
- p3365: 0; = if(p1232=0;p3244*p3359/p0818;0)
- p0985: 0; = IF(p0982=1;0;IF(p0982+p0983>1;1-p0982;p0983))
- p2515: 0.000153599; = p2319*p1014
- p1162: 0.000561167; = p1161/p0818
- p2547: 0.00295955; = p2351*p1123
- p2289: 0; = p2223*p2196
- p1308: 0
- p3355: 0; = if(and(p1232=0;p3256<>0);p3256-(p3350+p3351+p3352+p3353+p3354);0)
- p0500: 0; = SQRT(2)*(IF((2*p0368-1)<0;-1;IF((2*p0368-1)>0;1;0))*SQRT(SQRT((2/(pi()*0.140012289)+LN(1-(2*p0368-1)^2)/2)^2-LN(1-(2*p0368-1)^2)/0.140012289)-(2/(pi()*0.140012289)+LN(1-(2*p0368-1)^2)/2)))
- p1898: 0
- p0477: 0; = SQRT(2)*(IF((2*p0345-1)<0;-1;IF((2*p0345-1)>0;1;0))*SQRT(SQRT((2/(pi()*0.140012289)+LN(1-(2*p0345-1)^2)/2)^2-LN(1-(2*p0345-1)^2)/0.140012289)-(2/(pi()*0.140012289)+LN(1-(2*p0345-1)^2)/2)))
- p3255: 0; = p1252*(p1297*(1-p3247)+p1300*(1-p3248)+p1301*(1-p3249)+p1302*(1-p3250))
- p2460: 6.46621e-5; = p2264*p1073
- p2828: 4.40282e-5; = p2242*(p1020+p1022)
- p2056: 2.07882
- p3204: 0; = p2423*p1082
- p3265: 0
- p1593: 0
- p1980: 3521.6
- p3783: 7.96381e-7; = p1846*p3477
- p3264: 0
- p2674: 0; = p2283*(p1019+p1021)
- p3359: 0; = if(p1232=0;p3309+p3320+p3331+p3342+p3353;0)
- p3047: 1.40254e-8; = p2266*p1082
- p0807: 60
- p2398: 0; = p2234*p2187
- p1054: 2.36577e7; = IF(p1012=0;p1047*p1036;0)
- p2177: 0.136757; = p0895/p0818-(p2173+p2174+p2175+p2176)
- p1868: 0
- p1024: 685427; = IF(p1012=0;p1014*(p0704/100)*p0703*1000;0)
- p2586: 0; = p2390*p1123
- p2361: 0.000199816; = p2225*p2189
- p2116: 0.444424
- p2634: 0.000133294; = p2243*(p1019+p1021)
- p2352: 0.00020326; = p2232*p2220
- p3327: 0; = if(and(p1232=0;p3255<>0);1-(p3323+p3324+p3325+p3326);0)
- p1709: 0
- p1226: 1.5e6; = IF(p1221=0;0;IF(p1193=0;p0801;0))
- p0833: 3.58026e9; = p0830+p0832
- p1064: 0.0126036; = IF(p1012=0;p1050/(p1057*p0818);0)
- p1027: 65679; = IF(p1012=0;p1021*(p0704/100)*p0703*1000;0)
- p1690: 0
- p3173: 0; = p2392*p1132
- p2244: 0.000353564; = p2222*p2189
- p2168: 0.00784037; = p2166*(p0903)
- p2873: 0; = p2287*(p1020+p1022)
- p0475: 0; = SQRT(2)*(IF((2*p0343-1)<0;-1;IF((2*p0343-1)>0;1;0))*SQRT(SQRT((2/(pi()*0.140012289)+LN(1-(2*p0343-1)^2)/2)^2-LN(1-(2*p0343-1)^2)/0.140012289)-(2/(pi()*0.140012289)+LN(1-(2*p0343-1)^2)/2)))
- p1555: 0
- p3828: 4.42434e-8; = p1891*p3477
- p0246: 3.421
- p3388: 0; = p3369*p1234
- p2000: 4000
- p1613: 0
- p1004: 0; = p1000*p0888
- p3016: 0; = p2430*(p1129+p1131)
- p0418: 0; = SQRT(2)*(IF((2*p0286-1)<0;-1;IF((2*p0286-1)>0;1;0))*SQRT(SQRT((2/(pi()*0.140012289)+LN(1-(2*p0286-1)^2)/2)^2-LN(1-(2*p0286-1)^2)/0.140012289)-(2/(pi()*0.140012289)+LN(1-(2*p0286-1)^2)/2)))
- p2032: 0.448886
- p2538: 0.000239885; = p2342*p1073
- p2231: 0; = if(p0783*p0787+p0784*p0788+p0785*p0789+p0786*p0790=0;0;p0788*p0784/(p0783*p0787+p0784*p0788+p0785*p0789+p0786*p0790))
- p2359: 6.94575e-5; = p2225*p2187
- p1979: 0; = p0973
- p0916: 0.340805; = p0826+(p0832*(1+p0894))/p0818
- p1658: 0
- p3281: 0
- p1068: 0.0295021; = IF(p1012=0;p1054/(p1061*p0818);0)
- p3272: 0
- p3412: 0; = p3374*p1238
- p1730: 0
- p1975: 0.000500663; = p1970*p0001/(p0818*p0002)
- p0616: 0; = IF(p0352<0.5;-SQRT(p0007*EXP(p0484^2*p0008)-p0007);SQRT(p0007*EXP(p0484^2*p0008)-p0007))
- p1792: 0
- p1590: 0
- p1642: 0.902
- p2747: 5.45607e-6; = p2356*(p1019+p1021)
- p0140: 42.399
- p2128: 7.67692e-6; = p2015*p2056*p2090/(p0818*1000)
- p1643: 0
- p3260: 0
- p1911: 0
- p1210: 0.13
- p3096: 1.76772e-8; = p2315*p1023
- p2157: 3.87204e-7; = p2015*p2086*p2119/(p0818*1000)
- p2548: 0.000183087; = p2352*p1123
- p2947: 7.1582e-5; = p2361*(p1020+p1022)
- p3384: 0; = p3365*p1234
- p0995: 0; = p0991*p0001*p0004/(p0818*p0002)
- p1034: 8.03725e-5; = IF(p1012=0;p1028*p0001/(p0818*p0002);0)
- p2652: 0.000104671; = p2261*(p1078+p1080)
- p0801: 1.5e6
- p0516: 0; = SQRT(2)*(IF((2*p0384-1)<0;-1;IF((2*p0384-1)>0;1;0))*SQRT(SQRT((2/(pi()*0.140012289)+LN(1-(2*p0384-1)^2)/2)^2-LN(1-(2*p0384-1)^2)/0.140012289)-(2/(pi()*0.140012289)+LN(1-(2*p0384-1)^2)/2)))
- p0983: 0; = if(p0886=0;0;min(1;(p0695*p0694*1000*p0697/100)/p0886))
- p1635: 0
- p2600: 0; = p2404*p1014
- p1686: 0
- p0380: 0.5
- p1306: 0; = p1302*p1252/p0818
- p1750: 0
- p0680: 316.058; = p0020*(1+p0548*p0152/100)
- p0183: 4.922
- p0375: 0.5
- p2154: 1.17055e-6; = p2015*p2082*p2116/(p0818*1000)
- p2103: 0.912485
- p1553: 0
- p1087: 0; = IF(p1071=0;p1081*(p0710/100)*p0703*1000;0)
- p5252: 2.20578e-6; = p1873*p3484
- p2784: 0; = p2393*(p1019+p1021)
- p0577: 0; = IF(p0313<0.5;-SQRT(p0007*EXP(p0445^2*p0008)-p0007);SQRT(p0007*EXP(p0445^2*p0008)-p0007))
- p3244: 0; = p0791/100
- p0884: 0; = IF(p0689=100;0;IF(p0689+p0688>100;100-p0689;p0688))
- p4813: 0; = p1846*p3482
- p1119: 0.0154961; = IF(p1071=0;p1109/(p1114*p0818);0)
- p1633: 0
- p2309: 0; = p2227*p2216
- p1822: 0
- p0005: 1.60934
- p2421: 0; = p2235*p2211
- p2594: 0; = p2398*p1014
- p3043: 4.93373e-6; = p2262*p1082
- p3205: 0; = p2424*p1082
- p1681: 0
- p2099: 0.620397
- p1104: 0.303167; = IF(p1071=0;IF(p1096+p1101+p1102+p1103=1;0;1-(p1096+p1101+p1102+p1103));0)
- p2785: 0; = p2394*(p1019+p1021)
- p0950: 0; = if(and(p0683=0;or(p0807=480;p0807=32;p0807=1;and(p0807=60;p0901<0.03)));p0938;0)
- p0536: 0; = SQRT(2)*(IF((2*p0404-1)<0;-1;IF((2*p0404-1)>0;1;0))*SQRT(SQRT((2/(pi()*0.140012289)+LN(1-(2*p0404-1)^2)/2)^2-LN(1-(2*p0404-1)^2)/0.140012289)-(2/(pi()*0.140012289)+LN(1-(2*p0404-1)^2)/2)))
- p1665: 0
- p2695: 0; = p2304*(p1078+p1080)
- p0212: 4.499
- p3064: 0; = p2283*p1023
- p4710: 2.96041e-7; = p1949*p3481
- p1747: 0
- p2545: 0.00120126; = p2349*p1073
- p0150: 0
- p3249: 0
- p0895: 7.10646e8; = p0894*p0830
- p2307: 0; = p2227*p2214
- p3439: 0; = p3363*p1240
- p0905: 0.0341917; = p0904/p0818
- p1821: 0
- p2896: 0; = p2310*(p1079+p1081)
- p2677: 0; = p2286*(p1019+p1021)
- p1048: 0.000435637; = IF(p1012=0;IF(p1037+p1044+p1045+p1046+p1047=1;0;IF(p1037+p1044+p1045+p1046+p1047+p1042>1;1-(p1037+p1044+p1045+p1046+p1047);p1042));0)
- p3028: 8.23601e-9; = p2247*p1023
- p1970: 1.5e6; = p0801
- p2963: 0; = p2377*(p1079+p1081)
- p0966: 0; = if(p0683=0;0;IF(p0684/100+p0965=1;0;1-(p0684/100+p0965)))
- p1687: 0.556632
- p2439: 0.000875688; = p2243*p1014
- p2937: 0; = p2351*(p1129+p1131)
- p2731: 8.03805e-5; = p2340*(p1078+p1080)
- p0531: 0; = SQRT(2)*(IF((2*p0399-1)<0;-1;IF((2*p0399-1)>0;1;0))*SQRT(SQRT((2/(pi()*0.140012289)+LN(1-(2*p0399-1)^2)/2)^2-LN(1-(2*p0399-1)^2)/0.140012289)-(2/(pi()*0.140012289)+LN(1-(2*p0399-1)^2)/2)))
- p1659: 0
- p1799: 0
- p0512: 0; = SQRT(2)*(IF((2*p0380-1)<0;-1;IF((2*p0380-1)>0;1;0))*SQRT(SQRT((2/(pi()*0.140012289)+LN(1-(2*p0380-1)^2)/2)^2-LN(1-(2*p0380-1)^2)/0.140012289)-(2/(pi()*0.140012289)+LN(1-(2*p0380-1)^2)/2)))
- p0942: 0; = if(and(p0683=0;p0948=0);p0936;0)
- p3998: 5.97745e-5; = p1855*p3478
- p2069: 0.190588
- p1948: 1.72091e-5; = p1540*1000/p0818
- p1963f: 3.87824e-5; = p1647*p1851+p1648*p1852+p1649*p1853+p1650*p1854+p1651*p1855+p1652*p1856+p1653*p1857+p1654*p1858+p1655*p1859+p1656*p1860+p1657*p1861+p1658*p1862+p1659*p1863+p1660*p1864+p1661*p1865+p1662*p1866+p1663*p1867+p1664*p1868+p1665*p1869+p1666*p1870
- p4222: 4.59432e-8; = p1873*p3479
- p3436: 0; = p3379*p1239
- p0975: 0; = p0973*p0974/p0818
- p1241: 0; = if(p1232>0;0;IF(p1234+p1238+p1239+p1240=1;0;1-(p1234+p1238+p1239+p1240)))
- p0154: 0
- p2576: 0; = p2380*p1073
- p0669: 43.4782; = p0009*(1+p0537*p0141/100)
- p2718: 2.75118e-5; = p2327*(p1019+p1021)
- p3169: 0; = p2388*p1082
- p3461: 0; = p3366*p1241
- p2417: 0; = p2235*p2207
- p2523: 0.000180741; = p2327*p1014
- p3023: 1.22901e-9; = p2242*p1023
- p3161: 0; = p2380*p1082
- p2666: 0; = p2275*(p1128+p1130)
- p3432: 0; = p3375*p1239
- p1043: 0.218296
- p2885: 0; = p2299*(p1079+p1081)
- p0768: 58.856; = p0108*(1+p0636*p0240/100)
- p2012: 0.0129716
- p0963: 0; = if(and(p0683>0;or(p0807=480;p0807=32;p0807=1;and(p0807=60;p0901<0.03)));p0939;0)
- p1318: 0; = p1317*p0001/(p0818*p0002)
- p1738: 0
- p2620: 0; = p2424*p1073
- p3371: 0; = if(p1232=0;p3245*p3359/p0818;0)
- p1993: 400
- p4707: 2.42754e-6; = p1946*p3481
- p1883: 0
- p1949: 1.87056e-6; = p1541*1000/p0818
- p3482: 0; = if(p1328+p1330+p1332+p1334+p1336+p1338+p1340+p1342+p1344=0;0;p1340/(p1328+p1330+p1332+p1334+p1336+p1338+p1340+p1342+p1344))
- p1740: 0
- p4515: 1.19601e-5; = p1754*p3481
- p2340: 0.00132729; = p2228*p2208
- p2572: 0; = p2376*p1073
- p2389: 0; = p2233*p2218
- p1136: 0; = if(p1121=0;p1130*(p0716/100)*p0703*1000;0)
- p0922: 0; = p0677*1000/p0801
- p1569: 0
- p1072: 0; = p1071*p0001/(p0818*p0002)
- p0314: 0.5
- p1830: 0
- p0964: 0; = 56/90000
- p1154: 0.00561721; = if(p1152*p0818=0;0;p1150/(p1152*p0818))
- p4308: 7.79216e-7; = p1963*p3479
- p0188: 43.284
- p0352: 0.5
- p3406: 0; = p3368*p1238
- p1047: 0.318938; = IF(p1012=0;IF(p1037+p1044+p1045+p1046=1;0;IF(p1037+p1044+p1045+p1046+p1041>1;1-(p1037+p1044+p1045+p1046);p1041));0)
- p1092: 0; = IF(p1071=0;p1086*p0001/(p0818*p0002);0)
- p0708: 5.337; = p0048*(1+p0576*p0180/100)
- p1771: 0
- p1091: 0; = IF(p1071=0;p1085*p0001/(p0818*p0002);0)
- p3041: 2.87062e-6; = p2260*p1082
- p2691: 0; = p2300*(p1078+p1080)
- p1324: 0.617372; = IF(((p0745*1000*p0751/100)+(p0754*1000*p0760/100))/p0801<0;0;((p0745*1000*p0751/100)+(p0754*1000*p0760/100))/p0801)
- p2304: 0; = p2227*p2211
- p2010: 0.00259468; = ((p1984*p1985+p1990*p1991+p1996*p1997+p2004*p2005)/p0818)*p0005*p0002/1000
- p1112: 0.209482
- p0982: 0; = if(p0886=0;0;min(1;(p0691*p0690*1000*p0693/100)/p0886))
- p3291: 0
- p1998: 477
- p1138: 63104.1; = if(p1121=0;p1132*(p0716/100)*p0703*1000;0)
- p0235: 0
- p3325: 0; = if(and(p1232=0;p3255<>0);p3267*p3289;0)
- p1930: 0
- p0731: 0
- p0835: 967.023; = -LN(1-p0669/100)/p0834
- p0372: 0.5
- p0947: 4.14428e-5; = if(and(p0683=0;or(p0807=480;p0807=32;p0807=1;and(p0807=60;p0901<0.03)));p0935;0)
- p1986: 4200
- p3258: 0
- p1232: 1.5e6; = p0801
- p0891: 0; = IF(p3251=0;0;62.4*6272640/(12*12*12))
- p1152: 0.415074
- p2321: 0.000507745; = p2224*p2188
- p2219: 0.00328566; = p1154-p2218
- p3072: 0; = p2291*p1023
- p3087: 0; = p2306*p1082
- p1015: 0.03141; = IF(p1012=0;p0706/100;0)
- p2150: 9.24913e-7; = p2015*p2078*p2112/(p0818*1000)
- p1781: 0
- p1962: 8.1577e-6; = p1960*1000/p0818
- p3338: 0; = if(and(p1232=0;p3254<>0);1-(p3334+p3335+p3336+p3337);0)
- p2575: 0; = p2379*p1073
- p2063: 2.01468
- p0575: 0; = IF(p0311<0.5;-SQRT(p0007*EXP(p0443^2*p0008)-p0007);SQRT(p0007*EXP(p0443^2*p0008)-p0007))
- p2106: 0.856281
- p2404: 0; = p2234*p2193
- p0739: 0.552; = p0079*(1+p0607*p0211/100)
- p0219: 42.604
- p1124: 0; = if(p1121=0;p0718/100;0)
- p0735: 0
- p2001: 400
- p0864: 0; = IF(p0858=1;0;IF(p0858+p0859>1;1-p0858;p0859))
- p3122: 8.27696e-6; = p2341*p1082
- p1910: 0
- p3257: 0
- p1147: 0.0801873
- p3046: 1.2615e-5; = p2265*p1082
- p0724: 0
- p4822: 0; = p1855*p3482
- p1149: 0.830148
- p0965: 0; = IF(p0684/100=1;0;IF(p0684/100+p0685/100>1;1-p0684/100;p0685/100))
- p0321: 0.5
- p1692: 0
- p1292: 0; = IF(p1287+p1290+p1291=p1261;0;p1261-(p1287+p1290+p1291))
- p1694: 0
- p2300: 0; = p2227*p2207
- p2026: 55.14
- p3109: 3.20777e-8; = p2328*p1023
- p2430: 0; = p2236*p2220
- p3045: 9.63312e-7; = p2264*p1082
- p2976: 0; = p2390*(p1129+p1131)
- p0779: 0
- p2426: 0; = p2235*p2216
- p1854: 0
- p3226: 7.0899e-5; = p3222*p1229
- p3053: 0; = p2272*p1132
- p0315: 0.5
- p2948: 8.1935e-5; = p2362*(p1020+p1022)
- p2821: 0; = p2430*(p1128+p1130)
- p3440: 0; = p3364*p1240
- p2619: 0; = p2423*p1073
- p1707: 0
- p0870: 0; = p0858*p0856
- p1283: 0; = p1277*p1252/p0818
- p1664: 0
- p0812: 0; = if(p0807=480;0.095/0.34;0)
- p3036: 1.37552e-8; = p2255*p1023
- p3375: 0; = if(p1232=0;p3246*p3357/p0818;0)
- p2353: 0.000353213; = p2232*p2221
- p1797: 0
- p1200: 0.84
- p0237: 11.019
- p3449: 0; = p3373*p1240
- p2250: 0.00993289; = p2222*p2196
- p0666: 0; = IF(p0402<0.5;-SQRT(p0007*EXP(p0534^2*p0008)-p0007);SQRT(p0007*EXP(p0534^2*p0008)-p0007))
- p1989: 50
- p0887: 0; = 1000*p0886*p0001*p0003*p0004/(p0818*p0002)
- p1943: 0
- p2388: 0; = p2229*p2217
- p3423: 0; = p3366*p1239
- p1985: 2.10314e8; = (if(p1057=0;0;p1050/p1057)+if(p1058=0;0;p1051/p1058)+if(p1059=0;0;p1052/p1059)+if(p1060=0;0;p1053/p1060)+if(p1061=0;0;p1054/p1061)+if(p1062=0;0;p1055/p1062)+if(p1063=0;0;p1056/p1063))*(1+p1157)
- p2750: 5.88861e-6; = p2359*(p1019+p1021)
- p1649: 0
- p1668: 0
- p0811: 0; = if(p0807=480;1-p0810;0)
- p1743: 0
- p1722: 0
- p0367: 0.5
- p2820: 0; = p2429*(p1128+p1130)
- p2525: 1.15167e-6; = p2329*p1014
- p0902: 0
- p2390: 0; = p2233*p2219
- p1281: 0; = IF(p1277+p1280=p1263;0;IF(p1277+p1280+p1279>p1263;p1263-(p1277+p1280);p1279))
- p2420: 0; = p2235*p2210
- p2807: 0; = p2416*(p1078+p1080)
- p1660: 0
- p2829: 0.000563238; = p2243*(p1020+p1022)
- p3354: 0; = IF((p3350+p3351+p3352+p3353)+IF(p3349=0;0;(p3256*(p3273*(1-p3277))/p3349))>p3256;p3256-(p3350+p3351+p3352+p3353);IF(p3349=0;0;p3256*(p3273*(1-p3277))/p3349))
- p5019: 0; = p1846*p3483
- p0694: 0
- p0273: 0.5
- p2977: 0; = p2391*(p1129+p1131)
- p2497: 0; = p2301*p1073
- p3429: 0; = p3372*p1239
- p2239: 0.000113874; = p2222*p2184
- p0404: 0.5
- p2126: 6.71148e-6; = p2015*p2054*p2088/(p0818*1000)
- p1937: 0
- p3254: 0; = p1252*(p1287*(1-p3247)+p1290*(1-p3248)+p1291*(1-p3249)+p1292*(1-p3250))
- p0941: 0; = if(and(p0683=0;p0947=0);p0935;0)
- p0399: 0.5
- p0137: 29.591
- p2924: 0; = p2338*(p1079+p1081)
- p0320: 0.5
- p2384: 0; = p2229*p2213
- p2201: 0.00259711; = 12.01*p2200/(2*14.0067)
- p3048: 1.46661e-7; = p2267*p1082

## Reference product
- winter wheat; at harvest in 2000; at farm; 86%-90% moisture: 1 kg

## Inputs from technosphere
- CUTOFF apply sewage sludge; unspecified method: 0.000500663 ha; = p1189
- CUTOFF prepare soil; for mulch till, wheat: 4.14428e-5 ha; = p0935
- CUTOFF apply single or mixed P fertilizer; unspec. method: 5.29525e-6 ha; = p1094
- CUTOFF sulfur; at point-of-sale: 2.8851e-7 kg; = p1172
- CUTOFF phosphatic fertilizer, diammonium phosphate; at point-of-sale: 0.0154961 kg; = p1119
- CUTOFF limestone, high-grade, pulverized; at point-of-sale: 0.0198326 kg; = p1228
- CUTOFF sowing svc; for conventional till, 2000 winter wheat: 0.000105492 ha; = p0946
- CUTOFF liming materials storage: 0.0100744 kg*a; = p1231
- CUTOFF sowing svc; for no-till, 2000 winter wheat: 8.64147e-5 ha; = p0948
- CUTOFF phosphatic fertilizer, other single phosphates; at point-of-sale: 0.00183138 kg; = p1118
- CUTOFF gypsum storage: 1.20869e-6 kg*a; = p1168
- CUTOFF domestic barge transport; average fuel: 0.0345957 metric ton*km; = p2007
- CUTOFF potassic fertilizer, other single nutrients; at point-of-sale: 0.000556473 kg; = p1155
- CUTOFF apply N fertilizer; broadcast without incorporation: 6.67765e-5 ha; = p1032
- CUTOFF apply pesticide; broadcast by air: 0.000230972 ha; = p1331
- CUTOFF nitrogenous fertilizer, nitrogen solutions; at point-of-sale: 0.0295021 kg; = p1068
- CUTOFF pesticide, unspecified type; at point-of-sale; kg AI: 8.1577e-6 kg; = p1962
- CUTOFF pesticide, Dicamba; at point-of-sale; kg AI: 1.57127e-5 kg; = p1808
- CUTOFF apply gypsum; unspecified method: 0.000500663 ha; = p1165
- CUTOFF apply K fertilizer; no broadcast application: 0.000191155 ha; = p1139
- CUTOFF apply mixed N fertilizer; without incorporation: 8.03725e-5 ha; = p1034
- CUTOFF phosphatic fertilizer, superphosphate grades over 22%; at point-of-sale: 0.0016084 kg; = p1117
- CUTOFF sowing svc; for reduced till, 2000 winter wheat: 0.000267175 ha; = p0949
- CUTOFF apply pesticide; broadcast with incorporation: 0.000901883 ha; = p1333
- CUTOFF nitrogenous fertilizer, sodium nitrate; at point-of-sale: 7.55566e-5 kg; = p1069
- CUTOFF harvest; winter: 0.000450596 ha; = p1971
- CUTOFF pesticide, Triasulfuron; at point-of-sale; kg AI: 1.87056e-6 kg; = p1949
- CUTOFF pesticide, MCPA; at point-of-sale; kg AI: 8.60456e-6 kg; = p1873
- CUTOFF nitrogenous fertilizer, urea; at point-of-sale: 0.0133138 kg; = p1070
- CUTOFF N inhibitor appl svc; unspec rate & type, 2000 winter wheat: 0.000561167 ha; = p1162
- CUTOFF bulk cargo rail transport; diesel: 0.0648669 metric ton*km; = p2008
- CUTOFF apply liming materials; unspecified method: 0.000500663 ha; = p1227
- CUTOFF pesticide, Glyphosate; at point-of-sale; kg AI: 0.000129443 kg; = p1855
- CUTOFF apply zinc compounds; unspecified method: 0.000500663 ha; = p1183
- CUTOFF sewage sludge; at point-of-sale: 2.60775e-7 kg; = p1190
- CUTOFF harvest; winter wheat residue management: 0.000500663 ha; = p1975
- CUTOFF pesticide storage: 0.000285444 kg*a; = p1965
- CUTOFF sowing svc; for mulch till, 2000 winter wheat: 4.14428e-5 ha; = p0947
- CUTOFF zinc compounds storage: 4.18829e-8 kg*a; = p1186
- CUTOFF prepare soil; for no-till, wheat: 8.64147e-5 ha; = p0936
- CUTOFF apply sulfuric acid; unspecified method: 0.000500663 ha; = p1177
- CUTOFF pesticide formulation balance; at point-of-sale: 0.000145937 kg; = p1963
- CUTOFF pesticide, Tralkoxydim; at point-of-sale; kg AI: 1.53386e-5 kg; = p1946
- CUTOFF sulfur storage: 1.44255e-7 kg*a; = p1174
- CUTOFF apply sulfur; unspecified method: 0.000500663 ha; = p1171
- CUTOFF fertilizer filler materials; at point-of-sale: 0.0213639 kg; = p1158
- CUTOFF nitrogenous fertilizer, ammonium nitrate; at point-of-sale: 0.0048129 kg; = p1066
- CUTOFF pesticide, Tri-allate; at point-of-sale; kg AI: 1.72091e-5 kg; = p1948
- CUTOFF sulfuric acid storage: 3.82446e-8 kg*a; = p1180
- CUTOFF regional or national trucking; class 8, average fuel: 0.0113412 metric ton*km; = p2009
- CUTOFF phosphatic fertilizer, monoammonium phosphate; at point-of-sale: 0.00708458 kg; = p1120
- CUTOFF nitrogenous fertilizer, ammonium sulfate; at point-of-sale: 0.00317886 kg; = p1067
- CUTOFF fertilizer storage: 0.0590276 kg*a; = p1160
- CUTOFF nitrogenous fertilizer, aqueous ammonia; at point-of-sale: 0.000955575 kg; = p1065
- CUTOFF dolomite, pulverized; at point-of-sale: 0.000316172 kg; = p1229
- winter wheat residue; at harvest in 2000; at farm; 83%-90% moisture: 0.626635 kg; = p0839
- CUTOFF apply single or mixed N fertilizer; unspec. method: 4.10755e-9 ha; = p1035
- CUTOFF apply mixed N fertilizer; with incorporation: 2.1922e-5 ha; = p1033
- CUTOFF prepare soil; for unspec. till, wheat: 1.38183e-7 ha; = p0939
- CUTOFF apply N fertilizer; no broadcast application: 0.000228778 ha; = p1030
- CUTOFF prepare soil; for reduced till, wheat; 15-30% residue: 0.000267175 ha; = p0937
- CUTOFF pesticide, Metsulfuron-methyl; at point-of-sale; kg AI: 3.74111e-7 kg; = p1891
- CUTOFF prepare soil; for conventional till, wheat; <15% residue: 0.000105492 ha; = p0934
- CUTOFF local area trucking; class 6, average fuel: 0.00259468 metric ton*km; = p2010
- CUTOFF pesticide, 2,4-D; at point-of-sale; kg AI: 7.55705e-5 kg; = p1754
- CUTOFF apply N fertilizer; broadcast with incorporation: 1.29018e-5 ha; = p1031
- CUTOFF apply pesticide; as foliar or directed spray: 0.000309095 ha; = p1339
- CUTOFF international vessel transport; average fuel: 0.322577 metric ton*km; = p2006
- CUTOFF irrig svc; unspec wat source & rate, 2000 winter wheat: 0.000500663 ha; = p0981
- CUTOFF potassic fertilizer, potassium chloride; at point-of-sale: 0.00561721 kg; = p1154
- CUTOFF apply pesticide; unspecified application methods: 0.000500663 ha; = p1345
- CUTOFF nitrogenous fertilizer, anhydrous ammonia; at point-of-sale: 0.0126036 kg; = p1064
- CUTOFF zinc compounds; at point-of-sale: 8.37658e-8 kg; = p1184
- CUTOFF manure appl svc; unspec rate, 2000 winter wheat: 0.000500663 ha; = p1233
- CUTOFF apply pesticide; broadcast without incorporation: 1.04281e-5 ha; = p1335
- CUTOFF apply P fertilizer; broadcast with incorporation: 2.32546e-5 ha; = p1090
- CUTOFF apply P fertilizer; no broadcast application: 0.000355442 ha; = p1089
- CUTOFF pesticide, Fluroxypyr; at point-of-sale; kg AI: 6.73401e-6 kg; = p1846
- CUTOFF sewage sludge storage: 1.30387e-7 kg*a; = p1192
- CUTOFF sulfuric acid; at point-of-sale: 7.64892e-8 kg; = p1178
- CUTOFF gypsum; at point-of-sale: 2.41738e-6 kg; = p1166
- CUTOFF sowing svc; for unspec till, 2000 winter wheat: 1.38183e-7 ha; = p0951
- CUTOFF apply single or mixed K fertilizer; unspec. method: 2.10626e-5 ha; = p1144
- CUTOFF phosphatic fertilizer, superphos. grades 22% and under; at point-of-sale: 5.48808e-5 kg; = p1116

## Inputs from nature
- Nitrogen: 0.0341917 kg; = p0905
- Phosphorus: 0.00590066 kg; = p0910
- Water, unspecified origin: 0.000340805 m3; = p0916*0.001
- Transformation, to annual crop [natural resource, land]: 5.00663 m2; = 1.0 * (p0857)
- Carbon dioxide: 3.5495 kg; = p0900*3.6666666667
- Dry matter except CNPK; from plant uptake: 1.27956 kg; = p0917
- Transformation, from annual crop [natural resource, land]: 5.00663 m2; = 1.0 * (p0883)
- Potassium; from plant uptake; biogenic: 0.0189815 kg; = p0915
- Occupation, annual crop [natural resource, land]: 4.17784 m2*year; = 1.0 * (p0855)

## Emissions to nature
- Nitrogen solution; broadcast w/o incorp. in fert. after plant.; broadcast w/o incorp. in fert. after plant.; kg N: 0.000949045 kg; = p2951
- Nitrogen solution; broadcast w/o incorp. in fert. at plant.; broadcast w/o incorp. in fert. at plant.; kg N: 0.000542316 kg; = p2912
- Nitrogen solution; unspec. appl. method in fert. after plant.; unspec. appl. method in fert. after plant.; kg N: 2.64919e-8 kg; = p3146
- Ammonium sulfate; unspec. appl. method in fert. in fall bef. plant.: 1.6668e-8 kg; = p3025*4.7142857143
- Sodium nitrate; broadcast w/ incorp. in fert. at plant.: 1.06434e-6 kg; = p2720*6.0714285714
- Superphosphate, grades<= 22%; broadcast w/ incorp. in fert. in fall bef. plant.; kg P: 6.15937e-8 kg; = p2657
- Formaldehyde [air, non-urban air or from high stacks]: 1.91923e-5 kg; = 1.0 * (p2128*2.5)
- Ammonium nitrate; broadcast w/ incorp. in fert. in fall bef. plant.: 0.000341301 kg; = p2632*4.7142857143
- Propene [air, non-urban air or from high stacks]: 6.24111e-6 kg; = 1.0 * (p2136*1.1666666667)
- Anhydrous ammonia; broadcast w/o incorp. in fert. at plant.: 0.000768966 kg; = p2901*1.2142857143
- Ammonium nitrate; no broadcast in fert. at plant.: 0.000724109 kg; = p2515*4.7142857143
- Superphosphate, grades<= 22%; no broadcast in fert. at plant.; kg P: 3.49262e-6 kg; = p2540
- Superphosphate, grades<= 22%; no broadcast in fert. in fall bef. plant.; kg P: 9.4145e-7 kg; = p2462
- Aqueous ammonia; no broadcast in fert. at plant.: 2.48717e-5 kg; = p2513*1.2142857143
- Urea; no broadcast in fert. at plant.: 0.00123708 kg; = p2529*5
- Ash: 0.0018261 kg; = p2022+p2021
- Superphosphate, grades>22%; broadcast w/ incorp. in fert. in fall bef. plant.; kg P: 4.33233e-6 kg; = p2659
- Fluroxypyr: 7.96381e-7 kg; = p3783
- trans-2-Butene: 5.25698e-7 kg; = p2148*1.1666666667
- Ammonium nitrate; unspec. appl. method in fert. at plant.: 1.30009e-8 kg; = p3100*4.7142857143
- Carbon monoxide, fossil [air, non-urban air or from high stacks]: 0.000509326 kg; = 1.0 * (p2028*2.3333333333)
- Urea; unspec. appl. method in fert. at plant.: 2.22108e-8 kg; = p3114*5
- Anhydrous ammonia; unspec. appl. method in fert. in fall bef. plant.: 6.64668e-8 kg; = p3018*1.2142857143
- Urea; unspec. appl. method in fert. after plant.: 3.88686e-8 kg; = p3153*5
- Dinitrogen monoxide [air, non-urban air or from high stacks]: 6.46365e-7 kg; = 1.0 * (p2044*1.5714285714)
- Aqueous ammonia; broadcast w/ incorp. in fert. in fall bef. plant.: 1.1723e-5 kg; = p2630*1.2142857143
- Propanenitrile: 5.91561e-7 kg; = p2157*1.5277777778
- Sodium nitrate; broadcast w/o incorp. in fert. in fall bef. plant.: 1.39262e-5 kg; = p2837*6.0714285714
- Other single phosphates; unspec. appl. method in fert. in fall bef. plant.; kg P: 5.38234e-7 kg; = p3051
- Ammonium nitrate; broadcast w/ incorp. in fert. after plant.: 0.000192886 kg; = p2749*4.7142857143
- Potassium; in below-ground residue; biogenic: 0.00320104 kg; = p2176
- Superphosphate, grades<= 22%; broadcast w/ incorp. in fert. at plant.; kg P: 2.28502e-7 kg; = p2735
- Dicamba [soil, agricultural]: 1.38545e-5 kg; = 1.0 * (p4569+p3951+p4157+p5187)
- Other single phosphates; broadcast w/ incorp. in fert. in fall bef. plant.; kg P: 2.3637e-6 kg; = p2661
- Carbon [soil, agricultural]: 0.402116 kg; = 1.0 * (p3217+p3242+p2167+p3225+p2173)
- Water: 0.138391 kg; = p2181+p2178+p2171
- Urea; broadcast w/ incorp. in fert. in fall bef. plant.: 0.000583083 kg; = p2646*5
- Glycolaldehyde; from residue burning: 1.86001e-5 kg; = p2135*2.5
- Anhydrous ammonia; broadcast w/ incorp. in fert. at plant.: 0.000181981 kg; = p2706*1.2142857143
- Anhydrous ammonia; broadcast w/o incorp. in fert. in fall bef. plant.: 0.00238111 kg; = p2823*1.2142857143
- Superphosphate, grades<= 22%; unspec. appl. method in fert. at plant.; kg P: 5.20318e-8 kg; = p3125
- Sodium nitrate; unspec. appl. method in fert. at plant.: 1.25542e-10 kg; = p3110*6.0714285714
- Aqueous ammonia; unspec. appl. method in fert. at plant.: 4.46553e-10 kg; = p3098*1.2142857143
- Ammonium sulfate; broadcast w/ incorp. in fert. at plant.: 4.56357e-5 kg; = p2713*4.7142857143
- Diammonium phosphate; broadcast w/ incorp. in fert. in fall bef. plant.: 0.000183528 kg; = p2650*4.7142857143
- Ammonium sulfate; no broadcast in fert. in fall bef. plant.: 0.000928357 kg; = p2440*4.7142857143
- cis-2-Butene: 3.96579e-7 kg; = p2149*1.1666666667
- Sodium nitrate; no broadcast in fert. after plant.: 1.22364e-5 kg; = p2564*6.0714285714
- Nitrogen; in below-ground residue: 0.00344026 kg; = p2174
- Triasulfuron [soil, agricultural]: 1.64934e-6 kg; = 1.0 * (p5328+p4298+p4710+p4092)
- Aqueous ammonia; unspec. appl. method in fert. in fall bef. plant.: 1.38275e-9 kg; = p3020*1.2142857143
- Diammonium phosphate; no broadcast in fert. in fall bef. plant.: 0.00280519 kg; = p2455*4.7142857143
- Aqueous ammonia; no broadcast in fert. in fall bef. plant.: 7.70152e-5 kg; = p2435*1.2142857143
- Glyphosate [air, non-urban air or from high stacks]: 1.53082e-5 kg; = 1.0 * (p3792)
- Ammonium nitrate; unspec. appl. method in fert. in fall bef. plant.: 4.02572e-8 kg; = p3022*4.7142857143
- Tri-allate [soil, agricultural]: 1.51739e-5 kg; = 1.0 * (p5327+p4297+p4709+p4091)
- Diammonium phosphate; unspec. appl. method in fert. at plant.: 0.000155036 kg; = p3118*4.7142857143
- Methyl vinyl ether; from residue burning: 7.00219e-7 kg; = p2137*1.6111111111
- Phosphorous; in above-ground residue left on field: 0.00119861 kg; = p2169
- Potassium chloride; no broadcast in fert. at plant.: 0.00465534 kg; = p2546*2.2166666667
- Ethyne [air, non-urban air or from high stacks]: 2.51302e-6 kg; = 1.0 * (p2132*1.0833333333)
- Sodium nitrate; broadcast w/o incorp. in fert. at plant.: 4.49741e-6 kg; = p2915*6.0714285714
- Sulfur dioxide [air, non-urban air or from high stacks]: 4.0621e-6 kg; = 1.0 * (p2041)
- Aqueous ammonia; broadcast w/o incorp. in fert. at plant.: 1.59973e-5 kg; = p2903*1.2142857143
- Acetonitrile [air, non-urban air or from high stacks]: 1.93801e-6 kg; = 1.0 * (p2155*1.7083333333)
- Monoammonium phosphate; broadcast w/ incorp. in fert. at plant.: 0.000298581 kg; = p2732*8.2142857143
- Ammonium nitrate; no broadcast in fert. in fall bef. plant.: 0.00224221 kg; = p2437*4.7142857143
- Nitrogen solution; broadcast w/ incorp. in fert. at plant.; broadcast w/ incorp. in fert. at plant.; kg N: 0.000128343 kg; = p2717
- 1-Butene: 1.23585e-6 kg; = p2144*1.1666666667
- Aqueous ammonia; broadcast w/ incorp. in fert. at plant.: 3.78588e-6 kg; = p2708*1.2142857143
- Ethene [air, non-urban air or from high stacks]: 1.34327e-5 kg; = 1.0 * (p2125*1.1666666667)
- Sewage sludge dry matter; applied in sewage sludge: 1.35032e-9 kg; = p3243
- Anhydrous ammonia; no broadcast in fert. in fall bef. plant.: 0.003702 kg; = p2433*1.2142857143
- Pesticide formulation balance; broadcast without incorporation: 7.79216e-7 kg; = p4308
- Tralkoxydim [soil, agricultural]: 1.35246e-5 kg; = 1.0 * (p4295+p5325+p4707+p4089)
- I butane; from residue burning: 1.94751e-7 kg; = p2146*1.0208333333
- Nitrogen solution; no broadcast in fert. at plant.; no broadcast in fert. at plant.; kg N: 0.000843161 kg; = p2522
- Methanol [air, non-urban air or from high stacks]: 3.03418e-5 kg; = 1.0 * (p2129*2.6666666667)
- Phosphorous; applied in sewage sludge: 1.45603e-9 kg; = p3241
- Ammonia [air, non-urban air or from high stacks]: 2.00343e-5 kg; = 1.0 * (p2159*1.2142857143)
- Nitrogen; applied in sewage sludge: 1.21969e-8 kg; = p3240
- Nitrogen; in above-ground residue left on field: 0.00784037 kg; = p2168
- Ammonium sulfate; broadcast w/o incorp. in fert. in fall bef. plant.: 0.000597114 kg; = p2830*4.7142857143
- Superphosphate, grades>22%; no broadcast in fert. in fall bef. plant.; kg P: 6.6219e-5 kg; = p2464
- Nitrogen solution; unspec. appl. method in fert. at plant.; unspec. appl. method in fert. at plant.; kg N: 1.51384e-8 kg; = p3107
- Calcium [soil, agricultural]: 0.00753601 kg; = 1.0 * (p3226+p3218)
- MCPA [soil, agricultural]: 7.58697e-6 kg; = 1.0 * (p4222+p4016+p5252+p4634)
- Diammonium phosphate; broadcast w/ incorp. in fert. at plant.: 0.000680856 kg; = p2728*4.7142857143
- 2,4-D [soil, agricultural]: 6.66334e-5 kg; = 1.0 * (p4515+p5133+p3897+p4103)
- Nitrogen solution; broadcast w/ incorp. in fert. in fall bef. plant.; broadcast w/ incorp. in fert. in fall bef. plan...: 0.000397415 kg; = p2639
- Pesticides, unspecified [soil, agricultural]: 7.19295e-6 kg; = 1.0 * (p4719+p4307+p4101+p5337)
- Urea; broadcast w/ incorp. in fert. at plant.: 0.000188303 kg; = p2724*5
- Ammonium sulfate; unspec. appl. method in fert. at plant.: 5.38284e-9 kg; = p3103*4.7142857143
- Superphosphate, grades>22%; no broadcast in fert. at plant.; kg P: 0.000245661 kg; = p2542
- 2,4-D [air, non-urban air or from high stacks]: 8.93717e-6 kg; = 1.0 * (p3691)
- Ammonium nitrate; no broadcast in fert. after plant.: 0.00126718 kg; = p2554*4.7142857143
- Magnesium [soil, agricultural]: 4.01026e-5 kg; = 1.0 * (p3227)
- Nitrogen solution; no broadcast in fert. after plant.; no broadcast in fert. after plant.; kg N: 0.00147552 kg; = p2561
- Dicamba [air, non-urban air or from high stacks]: 1.85822e-6 kg; = 1.0 * (p3745)
- Urea; broadcast w/o incorp. in fert. in fall bef. plant.: 0.00246383 kg; = p2841*5
- Acetone [air, non-urban air or from high stacks]: 4.1199e-6 kg; = 1.0 * (p2139*1.6111111111)
- Ammonium sulfate; no broadcast in fert. at plant.: 0.000299808 kg; = p2518*4.7142857143
- Nitrogen dioxide: 1.83784e-5 kg; = p2039*3.2857142857
- Monoammonium phosphate; no broadcast in fert. in fall bef. plant.: 0.00123018 kg; = p2459*8.2142857143
- Other single phosphates; no broadcast in fert. in fall bef. plant.; kg P: 3.61288e-5 kg; = p2466
- Urea; broadcast w/o incorp. in fert. after plant.: 0.00139243 kg; = p2958*5
- Ammonium nitrate; broadcast w/o incorp. in fert. in fall bef. plant.: 0.00144217 kg; = p2827*4.7142857143
- Hydrocyanic acid: 2.63373e-6 kg; = p2154*2.25
- Methane: 1.95376e-5 kg; = p2025*1.3333333333
- Tri-allate: 2.0352e-6 kg; = p3885
- Aqueous ammonia; unspec. appl. method in fert. after plant.: 7.81461e-10 kg; = p3137*1.2142857143
- Sodium nitrate; unspec. appl. method in fert. in fall bef. plant.: 3.88741e-10 kg; = p3032*6.0714285714
- Sodium nitrate; no broadcast in fert. in fall bef. plant.: 2.16517e-5 kg; = p2447*6.0714285714
- Phosphorous; in below-ground residue: 0.000525934 kg; = p2175
- Butane [air, non-urban air or from high stacks]: 5.60883e-7 kg; = 1.0 * (p2147*1.0208333333)
- Plant dry matter; from residue burning: 0.00331727 kg; = p2164
- Sodium nitrate; broadcast w/ incorp. in fert. in fall bef. plant.: 3.29574e-6 kg; = p2642*6.0714285714
- Superphosphate, grades>22%; unspec. appl. method in fert. in fall bef. plant.; kg P: 9.86507e-7 kg; = p3049
- Ammonium sulfate; broadcast w/ incorp. in fert. in fall bef. plant.: 0.000141311 kg; = p2635*4.7142857143
- Water [air, non-urban air or from high stacks]: 1.46558e-6 m3; = 0.001 * (p2016)
- Benzene [air, non-urban air or from high stacks]: 1.41662e-6 kg; = 1.0 * (p2140*1.0833333333)
- Ammonium sulfate; broadcast w/o incorp. in fert. after plant.: 0.000337458 kg; = p2947*4.7142857143
- Sodium nitrate; broadcast w/o incorp. in fert. after plant.: 7.8704e-6 kg; = p2954*6.0714285714
- Ammonium sulfate; broadcast w/ incorp. in fert. after plant.: 7.98618e-5 kg; = p2752*4.7142857143
- Urea; broadcast w/ incorp. in fert. after plant.: 0.000329528 kg; = p2763*5
- Urea; broadcast w/o incorp. in fert. at plant.: 0.000795681 kg; = p2919*5
- Superphosphate, grades>22%; unspec. appl. method in fert. at plant.; kg P: 3.65977e-6 kg; = p3127
- Pesticide formulation balance; broadcast by air: 1.72589e-5 kg; = p3896
- Monoammonium phosphate; unspec. appl. method in fert. in fall bef. plant.: 1.83268e-5 kg; = p3044*8.2142857143
- Acetaldehyde [air, non-urban air or from high stacks]: 1.14823e-5 kg; = 1.0 * (p2130*1.8333333333)
- Monoammonium phosphate; no broadcast in fert. at plant.: 0.00456377 kg; = p2537*8.2142857143
- Oxygen; applied in dolomite: 0.000158701 kg; = p3228
- Ammonium sulfate; no broadcast in fert. after plant.: 0.00052466 kg; = p2557*4.7142857143
- Pentane [air, non-urban air or from high stacks]: 1.95311e-7 kg; = 1.0 * (p2152*1.0166666667)
- Other single K nutrients; unspec. appl. method in fert. at plant.; kg K: 2.01736e-5 kg; = p3133
- Anhydrous ammonia; unspec. appl. method in fert. after plant.: 3.75636e-8 kg; = p3135*1.2142857143
- Other single phosphates; broadcast w/ incorp. in fert. at plant.; kg P: 8.76894e-6 kg; = p2739
- Other single K nutrients; no broadcast in fert. at plant.; kg K: 0.000183087 kg; = p2548
- Sodium nitrate; broadcast w/ incorp. in fert. after plant.: 1.86258e-6 kg; = p2759*6.0714285714
- Monoammonium phosphate; unspec. appl. method in fert. at plant.: 6.79893e-5 kg; = p3122*8.2142857143
- Dioxins and furans (PCDD/F); from residue burning: 2.76962e-13 kg TEQ; = p2047
- Other single phosphates; unspec. appl. method in fert. at plant.; kg P: 1.99676e-6 kg; = p3129
- Tralkoxydim: 1.81398e-6 kg; = p3883
- Ammonium nitrate; broadcast w/ incorp. in fert. at plant.: 0.000110221 kg; = p2710*4.7142857143
- Aqueous ammonia; broadcast w/ incorp. in fert. after plant.: 6.62523e-6 kg; = p2747*1.2142857143
- Formic acid [air, non-urban air or from high stacks]: 9.25071e-6 kg; = 1.0 * (p2131*3.8333333333)
- Triasulfuron: 2.21217e-7 kg; = p3886
- Plant dry matter; in below-ground residue: 0.136757 kg; = p2177
- Anhydrous ammonia; unspec. appl. method in fert. at plant.: 2.14651e-8 kg; = p3096*1.2142857143
- Zinc compounds: 8.37658e-8 kg; = p3232
- Nitrogen solution; unspec. appl. method in fert. in fall bef. plant.; unspec. appl. method in fert. in fall bef. plan...: 4.6876e-8 kg; = p3029
- Urea; no broadcast in fert. after plant.: 0.00216487 kg; = p2568*5
- Anhydrous ammonia; broadcast w/ incorp. in fert. in fall bef. plant.: 0.000563506 kg; = p2628*1.2142857143
- Nitrogen solution; broadcast w/o incorp. in fert. in fall bef. plant.; broadcast w/o incorp. in fert. in fall bef. pl...: 0.00167928 kg; = p2834
- Metsulfuron-methyl: 4.42434e-8 kg; = p3828
- Pesticides, unspecified: 9.64751e-7 kg; = p3895
- Furan [air, non-urban air or from high stacks]: 1.0099e-6 kg; = 1.0 * (p2138*1.4166666667)
- Particulates, < 10 um: 6.10239e-5 kg; = p2036+p2034
- Diammonium phosphate; unspec. appl. method in fert. in fall bef. plant.: 4.17907e-5 kg; = p3040*4.7142857143
- Diammonium phosphate; no broadcast in fert. at plant.: 0.0104068 kg; = p2533*4.7142857143
- Sulfur [soil, agricultural]: 2.8851e-7 kg; = 1.0 * (p3230)
- Fluroxypyr [soil, agricultural]: 5.93763e-6 kg; = 1.0 * (p4195+p3989+p5225+p4607)
- Acetic acid [air, non-urban air or from high stacks]: 5.1652e-5 kg; = 1.0 * (p2127*2.5)
- Sodium nitrate; no broadcast in fert. at plant.: 6.9923e-6 kg; = p2525*6.0714285714
- Ammonium nitrate; broadcast w/o incorp. in fert. after plant.: 0.000815043 kg; = p2944*4.7142857143
- Anhydrous ammonia; no broadcast in fert. at plant.: 0.00119554 kg; = p2511*1.2142857143
- Urea; unspec. appl. method in fert. in fall bef. plant.: 6.8776e-8 kg; = p3036*5
- Metsulfuron-methyl [soil, agricultural]: 3.29868e-7 kg; = 1.0 * (p4652+p4034+p5270+p4240)
- Nitrogen solution; no broadcast in fert. in fall bef. plant.; no broadcast in fert. in fall bef. plant.; kg N: 0.00261085 kg; = p2444
- cyclopentane: 1.52703e-8 kg; = p2153*1.0166666667
- isopentane: 1.56249e-7 kg; = p2151*1.0166666667
- Ammonium sulfate; broadcast w/o incorp. in fert. at plant.: 0.000192835 kg; = p2908*4.7142857143
- Pesticide formulation balance; foliar or directed spray: 2.30965e-5 kg; = p4720
- Urea; no broadcast in fert. in fall bef. plant.: 0.00383061 kg; = p2451*5
- MCPA: 1.0176e-6 kg; = p3810
- Anhydrous ammonia; no broadcast in fert. after plant.: 0.00209218 kg; = p2550*1.2142857143
- Gypsum: 2.41738e-6 kg; = p3229
- Butadiene [air, non-urban air or from high stacks]: 1.39295e-6 kg; = 1.0 * (p2143*1.125)
- Superphosphate, grades>22%; broadcast w/ incorp. in fert. at plant.; kg P: 1.60722e-5 kg; = p2737
- Phenol [air, non-urban air or from high stacks]: 4.78841e-6 kg; = 1.0 * (p2133*1.3055555556)
- Pesticide formulation balance; unspec. appl. method: 3.7411e-5 kg; = p5338
- Aqueous ammonia; broadcast w/o incorp. in fert. after plant.: 2.79951e-5 kg; = p2942*1.2142857143
- Other limestone constituents; applied in limestone: 0.00118996 kg; = p3220
- Propane [air, non-urban air or from high stacks]: 2.60011e-6 kg; = 1.0 * (p2142*1.2222222222)
- Isoprene [air, non-urban air or from high stacks]: 3.48357e-6 kg; = 1.0 * (p2145*1.1333333333)
- Carbon dioxide, in air: 0.0123543 kg; = p2163*3.6666666667
- isobutene: 1.07907e-6 kg; = p2150*1.1666666667
- Anhydrous ammonia; broadcast w/ incorp. in fert. after plant.: 0.000318464 kg; = p2745*1.2142857143
- Ammonium nitrate; unspec. appl. method in fert. after plant.: 2.27513e-8 kg; = p3139*4.7142857143
- Acrylonitrile: 3.09456e-7 kg; = p2156*1.4722222222
- Monoammonium phosphate; broadcast w/ incorp. in fert. in fall bef. plant.: 8.04838e-5 kg; = p2654*8.2142857143
- Ammonium sulfate; unspec. appl. method in fert. after plant.: 9.41989e-9 kg; = p3142*4.7142857143
- Filler materials, applied with synthetic fertilizer: 0.0213639 kg; = p2432
- Toluene [air, non-urban air or from high stacks]: 1.75844e-6 kg; = 1.0 * (p2141*1.0952380952)
- Potassium; in above-ground residue left on field; biogenic: 0.00729518 kg; = p2170
- Aqueous ammonia; broadcast w/o incorp. in fert. in fall bef. plant.: 4.95358e-5 kg; = p2825*1.2142857143
- Particulates, < 2.5 um [air, non-urban air or from high stacks]: 3.72052e-5 kg; = 1.0 * (p2035+p2033)
- Sulfuric acid [soil, agricultural]: 7.64892e-8 kg; = 1.0 * (p3231)
- Plant dry matter; in aboveground residue left on field: 0.311669 kg; = p2172
- NMVOC, non-methane volatile organic compounds, unspecified origin [air, non-urban air or from high stacks]: 0.00023721 kg; = 1.0 * (p2051+p2052)
- Ethane [air, non-urban air or from high stacks]: 8.38936e-6 kg; = 1.0 * (p2126*1.25)
- Glyphosate [soil, agricultural]: 0.000114134 kg; = 1.0 * (p4204+p3998+p5234+p4616)
- Other single phosphates; no broadcast in fert. at plant.; kg P: 0.000134032 kg; = p2544
- Pesticide formulation balance; broadcast with incorporation: 6.73913e-5 kg; = p4102
- Sodium nitrate; unspec. appl. method in fert. after plant.: 2.19696e-10 kg; = p3149*6.0714285714
- Superphosphate, grades<= 22%; unspec. appl. method in fert. in fall bef. plant.; kg P: 1.40254e-8 kg; = p3047
- Nitrogen solution; broadcast w/ incorp. in fert. after plant.; broadcast w/ incorp. in fert. after plant.; kg N: 0.000224598 kg; = p2756
- Acetol; from residue burning: 3.47609e-5 kg; = p2134*2.0555555556
- Oxygen; applied in limestone: 0.00894036 kg; = p3219
- Ammonium nitrate; broadcast w/o incorp. in fert. at plant.: 0.000465743 kg; = p2905*4.7142857143
- Potassium chloride; unspec. appl. method in fert. at plant.: 0.000512953 kg; = p3131*2.2166666667
- Aqueous ammonia; no broadcast in fert. after plant.: 4.3525e-5 kg; = p2552*1.2142857143
- Anhydrous ammonia; broadcast w/o incorp. in fert. after plant.: 0.00134568 kg; = p2940*1.2142857143

## Sampling procedure
A delete-a-group jackknife is used by the USDA to estimate the ARMS sample means and RSEs, based on a 15 sample delete-a-group jackknife. Because of this relatively small sample size, a Students t distribution is used to represent ARMS data probability density functions. Other representations of uncertainty are described in Cooper, J.S., Kahn, E., Noon, M. (2012). LCA Digital Commons Unit Process Data: field crop production Version 1. Prepared for the US Department of Agriculture National Agricultural Library. Retrieved from https://www.lcacommons.gov/discovery/docs/LCA%20Digital%20Commons%20Unit%20Process%20Data%20final%20updated.pdf

## Extrapolations
Data represent an aggregation of processes applied in Montana in 2000. Data development is demonstrated by parameterization (exlicitly presents all raw and uncertainty data and all calculations). Flow data quality according to the LCADC convention is provided for all flows.
