# spring wheat, excl. durum; at harvest in 2009; at farm; 86%-90% moisture

Dataset: EcoSpold 2, unit process
Geography: GLO
Time period: 2009-01-02 to 2010-01-01
Scenario: Business-as-Usual
System model: Allocation, ecoinvent default
Generated by: cooperjs@u.washington.edu
isCopyrightProtected: false

## General comment
This unit process/ gate-to-gate dataset represents the production of 1 kg spring wheat (excl. durum) coproduced with residue. The process technologies are an aggregation of those applied in Minnesota in 2009. Applicable classifications include ISIC 0111, NAIC 111140, UNSPSC 50221101; this dataset was prepared in ILCD format using the UWDFE Lab Excel to ILCD File Generator (beta version, August 2013)

Exchange "Parathion-methyl-soil agricultural" is the result of combining the following original LCA Commons flows: "Methyl parathion; unspec. appl. method; kg AI", "Methyl parathion; foliar or directed spray; kg AI", "Methyl parathion; broadcast with incorporation; kg AI".
Exchange "Bromoxynil octanoate-soil unspecified" is the result of combining the following original LCA Commons flows: "Bromoxynil octanoate; unspec. appl. method; kg AI", "Bromoxynil octanoate; broadcast with incorporation; kg AI", "Bromoxynil octanoate; foliar or directed spray; kg AI".
Exchange "NMVOC, non-methane volatile organic compounds, unspecified origin-air low population density" is the result of combining the following original LCA Commons flows: "NMVOCs; from residue burning; kg C, biogenic", "NMVOCs; from residue burning; kg except C, biogenic".
Exchange "Propoxycarbazone-sodium (prop)-soil agricultural" is the result of combining the following original LCA Commons flows: "Propoxycarbazone-sodium; broadcast with incorporation; kg AI", "Propoxycarbazone-sodium; foliar or directed spray; kg AI", "Propoxycarbazone-sodium; unspec. appl. method; kg AI".
Exchange "Carbon-soil agricultural" is the result of combining the following original LCA Commons flows: "Carbon; broadcast w/o incorp. in manure in fall before planting; biogenic", "Carbon; applied in sewage sludge", "Carbon; using unspec. method in manure at an unknown time", "Carbon; in above-ground residue left on field; biogenic", "Carbon; using unspec. method in manure in fall before planting; biogenic", "Carbon; applied in limestone", "Carbon; applied in dolomite", "Carbon; broadcast w/o incorp. in manure at an unknown time", "Carbon; in below-ground residue; biogenic".
Exchange "Particulates, < 2.5 um-air low population density" is the result of combining the following original LCA Commons flows: "PM2.5; from residue burning; kg except C, biogenic", "PM2.5; from residue burning; kg C, biogenic".
Exchange "Starane-soil agricultural" is the result of combining the following original LCA Commons flows: "Fluroxypyr-meptyl; unspec. appl. method; kg AI", "Fluroxypyr-meptyl; foliar or directed spray; kg AI", "Fluroxypyr-meptyl; broadcast with incorporation; kg AI".
Exchange "Pesticides, unspecified-soil agricultural" is the result of combining the following original LCA Commons flows: "Unspecified pesticide; unspec. appl. method; kg AI", "Unspecified pesticide; broadcast with incorporation; kg AI", "Unspecified pesticide; foliar or directed spray; kg AI".
Exchange "Ash-soil agricultural" is the result of combining the following original LCA Commons flows: "Ash; from residue burning; kg C, biogenic", "Ash; from residue burning; kg except C, biogenic".
Exchange "Water-soil agricultural" is the result of combining the following original LCA Commons flows: "Water; broadcast w/o incorp. in manure", "Water; from irrigation and applied with manure and sewage sludge", "Water; using unspec. method in manure", "Water; in below-ground residue; biogenic", "Water; in above-ground residue left on field; biogenic".
Exchange "2,4-D, dimethylamine salt-soil agricultural" is the result of combining the following original LCA Commons flows: "2,4-D, dimethylamine salt; broadcast with incorporation; kg AI", "2,4-D, dimethylamine salt; foliar or directed spray; kg AI", "2,4-D, dimethylamine salt; unspec. appl. method; kg AI".
Exchange "Clopyralid-soil agricultural" is the result of combining the following original LCA Commons flows: "Clopyralid; broadcast with incorporation; kg AI", "Clopyralid; unspec. appl. method; kg AI", "Clopyralid; foliar or directed spray; kg AI".
Exchange "Tebuconazole-soil agricultural" is the result of combining the following original LCA Commons flows: "Tebuconazole; foliar or directed spray; kg AI", "Tebuconazole; unspec. appl. method; kg AI", "Tebuconazole; broadcast with incorporation; kg AI".
Exchange "Fenoxaprop ethyl ester-soil agricultural" is the result of combining the following original LCA Commons flows: "Fenoxaprop-ethyl; broadcast with incorporation; kg AI", "Fenoxaprop-ethyl; foliar or directed spray; kg AI", "Fenoxaprop-ethyl; unspec. appl. method; kg AI".
Exchange "Water, unspecified origin-resource in water" is the result of combining the following original LCA Commons flows: "Water; from plant uptake; biogenic", "Water; withdrawal from unspec. source, for spring wheat (excl. durum), in 2009".
Exchange "Pyraclostrobin (prop)-soil agricultural" is the result of combining the following original LCA Commons flows: "Pyraclostrobin; unspec. appl. method; kg AI", "Pyraclostrobin; foliar or directed spray; kg AI", "Pyraclostrobin; broadcast with incorporation; kg AI".
Exchange "Prothioconazol-soil agricultural" is the result of combining the following original LCA Commons flows: "Prothioconazole; broadcast with incorporation; kg AI", "Prothioconazole; foliar or directed spray; kg AI", "Prothioconazole; unspec. appl. method; kg AI".
Exchange "Particulates, < 10 um-air low population density" is the result of combining the following original LCA Commons flows: "PM10; from residue burning; kg except C, biogenic", "PM10; from residue burning; kg C, biogenic".
Exchange "Transformation, from arable-resource land" is the result of combining the following original LCA Commons flows: "Transformation; from arable, from other to wheat", "Transformation; from arable, from corn to wheat", "Transformation; from arable, from small grains to wheat", "Transformation; from arable, from soy to wheat", "Transformation; from arable, from unspec. use to wheat".
Exchange "Calcium-soil agricultural" is the result of combining the following original LCA Commons flows: "Calcium; applied in dolomite", "Calcium; applied in limestone".
Exchange "Propiconazole-soil agricultural" is the result of combining the following original LCA Commons flows: "Propiconazole; unspec. appl. method; kg AI", "Propiconazole; broadcast with incorporation; kg AI", "Propiconazole; foliar or directed spray; kg AI".
Exchange "Phosphorus-c19fb2d9-98eb-4cd3-8761-81b71d8a9a1b unspecified" was originally named: "Phosphorous; from plant uptake; biogenic" in this dataset.
Exchange "Butadiene-2bdf9967-6dae-4183-88d1-8f612548c51e low population density" was originally named: "1,3 butadiene; from residue burning; kg C, biogenic" in this dataset.
Exchange "Hydrocyanic acid-2bdf9967-6dae-4183-88d1-8f612548c51e low population density" was originally named: "Hydrogen cyanide; from residue burning; kg C, biogenic" in this dataset.
Exchange "Acetic acid-2bdf9967-6dae-4183-88d1-8f612548c51e low population density" was originally named: "Acetic acid; from residue burning; kg C, biogenic" in this dataset.
Exchange "Sulfur-be1c0329-f1a8-4524-8420-a86d2a8dd358 agricultural" was originally named: "Sulfur; as secondary application" in this dataset.
Exchange "Tebuconazole-2bdf9967-6dae-4183-88d1-8f612548c51e low population density" was originally named: "Tebuconazole; broadcast by air; kg AI" in this dataset.
Exchange "Carbon dioxide, in air-2bdf9967-6dae-4183-88d1-8f612548c51e low population density" was originally named: "Carbon dioxide; from residue burning; kg C, biogenic" in this dataset.
Exchange "Acrylonitrile-2bdf9967-6dae-4183-88d1-8f612548c51e low population density" was originally named: "Propenenitrile; from residue burning; kg C, biogenic" in this dataset.
Exchange "Isoprene-2bdf9967-6dae-4183-88d1-8f612548c51e low population density" was originally named: "Isoprene; from residue burning; kg C, biogenic" in this dataset.
Exchange "Ammonia-2bdf9967-6dae-4183-88d1-8f612548c51e low population density" was originally named: "Ammonia; from residue burning; kg N, biogenic" in this dataset.
Exchange "Pyraclostrobin-2bdf9967-6dae-4183-88d1-8f612548c51e low population density" was originally named: "Pyraclostrobin; broadcast by air; kg AI" in this dataset.
Exchange "Dinitrogen monoxide-2bdf9967-6dae-4183-88d1-8f612548c51e low population density" was originally named: "Dinitrogen monoxide; from residue burning; kg N, biogenic" in this dataset.
Exchange "1-Butene-2bdf9967-6dae-4183-88d1-8f612548c51e low population density" was originally named: "1 butene; from residue burning; kg C, biogenic" in this dataset.
Exchange "Zinc compounds-be1c0329-f1a8-4524-8420-a86d2a8dd358 agricultural" was originally named: "Zinc compounds; as secondary application" in this dataset.
Exchange "Clopyralid-2bdf9967-6dae-4183-88d1-8f612548c51e low population density" was originally named: "Clopyralid; broadcast by air; kg AI" in this dataset.
Exchange "Fenoxaprop ethyl ester-2bdf9967-6dae-4183-88d1-8f612548c51e low population density" was originally named: "Fenoxaprop-ethyl; broadcast by air; kg AI" in this dataset.
Exchange "trans-2-Butene-2bdf9967-6dae-4183-88d1-8f612548c51e low population density" was originally named: "Trans 2 butene; from residue burning; kg C, biogenic" in this dataset.
Exchange "Formic acid-2bdf9967-6dae-4183-88d1-8f612548c51e low population density" was originally named: "Formic acid; from residue burning; kg C, biogenic" in this dataset.
Exchange "Ethane-2bdf9967-6dae-4183-88d1-8f612548c51e low population density" was originally named: "Ethane; from residue burning; kg C, biogenic" in this dataset.
Exchange "Water-2bdf9967-6dae-4183-88d1-8f612548c51e low population density" was originally named: "Water; from residue burning; biogenic" in this dataset.
Exchange "Methane-2bdf9967-6dae-4183-88d1-8f612548c51e low population density" was originally named: "Methane; from residue burning; kg C, biogenic" in this dataset.
Exchange "Starane-2bdf9967-6dae-4183-88d1-8f612548c51e low population density" was originally named: "Fluroxypyr-meptyl; broadcast by air; kg AI" in this dataset.
Exchange "Nitrogen dioxide-2bdf9967-6dae-4183-88d1-8f612548c51e low population density" was originally named: "Nitrogen dioxide; from residue burning; kg N, biogenic" in this dataset.
Exchange "Formaldehyde-2bdf9967-6dae-4183-88d1-8f612548c51e low population density" was originally named: "Formaldehyde; from residue burning; kg C, biogenic" in this dataset.
Exchange "Ethene-2bdf9967-6dae-4183-88d1-8f612548c51e low population density" was originally named: "Ethylene; from residue burning; kg C, biogenic" in this dataset.
Exchange "Propane-2bdf9967-6dae-4183-88d1-8f612548c51e low population density" was originally named: "Propane; from residue burning; kg C, biogenic" in this dataset.
Exchange "Pentane-2bdf9967-6dae-4183-88d1-8f612548c51e low population density" was originally named: "N pentane; from residue burning; kg C, biogenic" in this dataset.
Exchange "Carbon dioxide-c19fb2d9-98eb-4cd3-8761-81b71d8a9a1b unspecified" was originally named: "Carbon dioxide; from plant uptake; kg C, biogenic" in this dataset.
Exchange "Sulfur dioxide-2bdf9967-6dae-4183-88d1-8f612548c51e low population density" was originally named: "Sulfur dioxide; from residue burning; biogenic" in this dataset.
Exchange "cis-2-Butene-2bdf9967-6dae-4183-88d1-8f612548c51e low population density" was originally named: "Cis 2 butene; from residue burning; kg C, biogenic" in this dataset.
Exchange "Acetonitrile-2bdf9967-6dae-4183-88d1-8f612548c51e low population density" was originally named: "Acetonitrile; from residue burning; kg C, biogenic" in this dataset.
Exchange "isopentane-2bdf9967-6dae-4183-88d1-8f612548c51e low population density" was originally named: "I pentane; from residue burning; kg C, biogenic" in this dataset.
Exchange "Carbon monoxide, fossil-2bdf9967-6dae-4183-88d1-8f612548c51e low population density" was originally named: "Carbon monoxide; from residue burning; kg C, biogenic" in this dataset.
Exchange "Phenol-2bdf9967-6dae-4183-88d1-8f612548c51e low population density" was originally named: "Phenol; from residue burning; kg C, biogenic" in this dataset.
Exchange "Benzene-2bdf9967-6dae-4183-88d1-8f612548c51e low population density" was originally named: "Benzene; from residue burning; kg C, biogenic" in this dataset.
Exchange "Methanol-2bdf9967-6dae-4183-88d1-8f612548c51e low population density" was originally named: "Methanol; from residue burning; kg C, biogenic" in this dataset.
Exchange "Propene-2bdf9967-6dae-4183-88d1-8f612548c51e low population density" was originally named: "Propylene; from residue burning; kg C, biogenic" in this dataset.
Exchange "Parathion-methyl-2bdf9967-6dae-4183-88d1-8f612548c51e low population density" was originally named: "Methyl parathion; broadcast by air; kg AI" in this dataset.
Exchange "Ethyne-2bdf9967-6dae-4183-88d1-8f612548c51e low population density" was originally named: "Acetylene; from residue burning; kg C, biogenic" in this dataset.
Exchange "Furan-2bdf9967-6dae-4183-88d1-8f612548c51e low population density" was originally named: "Furan; from residue burning; kg C, biogenic" in this dataset.
Exchange "Acetone-2bdf9967-6dae-4183-88d1-8f612548c51e low population density" was originally named: "Acetone; from residue burning; kg C, biogenic" in this dataset.
Exchange "Butane-2bdf9967-6dae-4183-88d1-8f612548c51e low population density" was originally named: "N butane; from residue burning; kg C, biogenic" in this dataset.
Exchange "Sulfuric acid-be1c0329-f1a8-4524-8420-a86d2a8dd358 agricultural" was originally named: "Sulfuric acid; as secondary application" in this dataset.
Exchange "Transformation, to arable-c19fb2d9-98eb-4cd3-8761-81b71d8a9a1b land" was originally named: "Transformation; to arable, to wheat" in this dataset.
Exchange "Magnesium-be1c0329-f1a8-4524-8420-a86d2a8dd358 agricultural" was originally named: "Magnesium; applied in dolomite" in this dataset.
Exchange "Propiconazole-2bdf9967-6dae-4183-88d1-8f612548c51e low population density" was originally named: "Propiconazole; broadcast by air; kg AI" in this dataset.
Exchange "isobutene-2bdf9967-6dae-4183-88d1-8f612548c51e low population density" was originally named: "I butene; from residue burning; kg C, biogenic" in this dataset.
Exchange "Acetaldehyde-2bdf9967-6dae-4183-88d1-8f612548c51e low population density" was originally named: "Acetaldehyde; from residue burning; kg C, biogenic" in this dataset.
Exchange "Occupation, arable-c19fb2d9-98eb-4cd3-8761-81b71d8a9a1b land" was originally named: "Occupation; arable, as wheat" in this dataset.
Exchange "Toluene-2bdf9967-6dae-4183-88d1-8f612548c51e low population density" was originally named: "Toluene; from residue burning; kg C, biogenic" in this dataset.

## Geography
The unit process is assumed to represent production in Minnesota (US State).

## Technology
This process produces spring wheat, excl. durum; at harvest in 2009; at farm; 86%-90% moisture. The process is assumed to represent production in Minnesota (US State). Yields and related inputs and outputs represent a single year of operation, in 2009. This dataset includes consideration of residue burning; soil preparation; planting or sowing; irrigation; application, storage, and transport of fertilizers, manures, liming materials, secondary materials, and pesticides; and harvest. Fate and transport of applications are not included as described in Cooper, J.S., Kahn, E., Noon, M. (2012) LCA Digital Commons Unit Process Data: field crop production Version 1 which is available at https://www.lcacommons.gov/discovery/docs/LCA%20Digital%20Commons%20Unit%20Process%20Data%20final%20updated.pdf

## Time period
Start and end dates match the underlying data obtained from the USDA Agricultural Resource Management Survey (ARMS).
## Parameters
- p2565: 0; = p2369*p1014
- p2967: 0; = p2381*(p1079+p1081)
- p1195: 0.45
- p2911: 0.000103289; = p2325*(p1020+p1022)
- p1480: 89
- p2384: 0; = p2229*p2213
- p1171: 0.00028961; = p0801*p0001/(p0818*p0002)
- p1319: 0; = IF(((p0745*1000*p0746/100)+(p0754*1000*p0755/100))/p0801<0;0;((p0745*1000*p0746/100)+(p0754*1000*p0755/100))/p0801)
- p3101: 0; = p2320*p1023
- p1823: 0
- p2265: 0.00110582; = p2226*p2211
- p2693: 0.000192304; = p2302*(p1078+p1080)
- p1764: 0
- p0217: 12.688
- p3645: 0; = p1914*p3476
- p3260: 0.0343561
- p0674: 364.934; = p0014*(1+p0542*p0146/100)
- p0828: 0; = if(p0827=0;0;p0819-p0827/p0818)
- p2737: 7.16046e-6; = p2346*(p1078+p1080)
- p2228: 0.294684; = if(p0774*p0778+p0775*p0779+p0776*p0780+p0777*p0781=0;0;p0780*p0776/(p0774*p0778+p0775*p0779+p0776*p0780+p0777*p0781))
- p2155: 8.03802e-7; = p2015*p2084*p2117/(p0818*1000)
- p0220: 16.477
- p0676: 77.748; = p0016*(1+p0544*p0148/100)
- p3250: 0.875
- p2956: 0; = p2370*(p1020+p1022)
- p1813: 0
- p1727: 0
- p2130: 4.43766e-6; = p2015*p2058*p2092/(p0818*1000)
- p2777: 0; = p2386*(p1078+p1080)
- p3079: 2.85256e-5; = p2298*p1082
- p1765: 0
- p0839: 0.571587; = p0838/p0818
- p2667: 0.00265185; = p2276*(p1019+p1021)
- p1262: 0; = if(p1232>0;0;p0733/100)
- p0449: 0; = SQRT(2)*(IF((2*p0317-1)<0;-1;IF((2*p0317-1)>0;1;0))*SQRT(SQRT((2/(pi()*0.140012289)+LN(1-(2*p0317-1)^2)/2)^2-LN(1-(2*p0317-1)^2)/0.140012289)-(2/(pi()*0.140012289)+LN(1-(2*p0317-1)^2)/2)))
- p0826: 0.1145; = 1-p0825/p0818
- p0827: 0; = p0818*p0819*p0823
- p3187: 0; = p2406*p1023
- p1294: 0; = p1290*p1252/p0818
- p2144: 7.50562e-7; = p2015*p2072*p2106/(p0818*1000)
- p0523: 0; = SQRT(2)*(IF((2*p0391-1)<0;-1;IF((2*p0391-1)>0;1;0))*SQRT(SQRT((2/(pi()*0.140012289)+LN(1-(2*p0391-1)^2)/2)^2-LN(1-(2*p0391-1)^2)/0.140012289)-(2/(pi()*0.140012289)+LN(1-(2*p0391-1)^2)/2)))
- p1691: 0
- p1048: 0.000315647; = IF(p1012=0;IF(p1037+p1044+p1045+p1046+p1047=1;0;IF(p1037+p1044+p1045+p1046+p1047+p1042>1;1-(p1037+p1044+p1045+p1046+p1047);p1042));0)
- p2821: 0; = p2430*(p1128+p1130)
- p1917: 5.88355e-6; = p1509*1000/p0818
- p0966: 0.79986; = if(p0683=0;0;IF(p0684/100+p0965=1;0;1-(p0684/100+p0965)))
- p1725: 0
- p2812: 0; = p2421*(p1078+p1080)
- p1644: 0
- p2943: 0; = p2357*(p1020+p1022)
- p2127: 1.46391e-5; = p2015*p2055*p2089/(p0818*1000)
- p1338: 1.54185e6; = p1324*p0801
- p2723: 0.00049857; = p2332*(p1019+p1021)
- p0632: 0; = IF(p0368<0.5;-SQRT(p0007*EXP(p0500^2*p0008)-p0007);SQRT(p0007*EXP(p0500^2*p0008)-p0007))
- p1252: 1.95861e9; = if(p1232>0;0;p0724*2000*p0723*1000*p0725/100)
- p3813: 3.75739e-7; = p1876*p3477
- p3423: 0; = p3366*p1239
- p2756: 0; = p2365*(p1019+p1021)
- p2469: 0.000135285; = p2273*p1123
- p2879: 0.00160422; = p2293*(p1020+p1022)
- p1588: 0
- p0278: 0.5
- p4509: 0; = p1954*p3480
- p1250: 0; = if(p1232>0;0;p1245*p0001/(p0818*p0002))
- p1600: 0
- p3385: 0; = p3366*p1234
- p0950: 0; = if(and(p0683=0;or(p0807=480;p0807=32;p0807=1;and(p0807=60;p0901<0.03)));p0938;0)
- p4196: 0; = p1847*p3479
- p3061: 0; = p2280*p1023
- p0273: 0.5
- p2150: 6.55341e-7; = p2015*p2078*p2112/(p0818*1000)
- p0534: 0; = SQRT(2)*(IF((2*p0402-1)<0;-1;IF((2*p0402-1)>0;1;0))*SQRT(SQRT((2/(pi()*0.140012289)+LN(1-(2*p0402-1)^2)/2)^2-LN(1-(2*p0402-1)^2)/0.140012289)-(2/(pi()*0.140012289)+LN(1-(2*p0402-1)^2)/2)))
- p0810: 0
- p2698: 1.31563e-5; = p2307*(p1078+p1080)
- p2360: 0; = p2225*p2188
- p2532: 0.000225386; = p2336*p1073
- p1097: 0.0162883
- p0817: 0
- p0440: 0; = SQRT(2)*(IF((2*p0308-1)<0;-1;IF((2*p0308-1)>0;1;0))*SQRT(SQRT((2/(pi()*0.140012289)+LN(1-(2*p0308-1)^2)/2)^2-LN(1-(2*p0308-1)^2)/0.140012289)-(2/(pi()*0.140012289)+LN(1-(2*p0308-1)^2)/2)))
- p1592: 0
- p1861: 0
- p2561: 0; = p2365*p1014
- p3192: 0; = p2411*p1023
- p4971: 0; = p1798*p3483
- p1961: 0.5
- p0871: 0.162576; = p0870*p0001*p0003/(p0818*p0002)
- p3578: 0; = p1847*p3476
- p2103: 0.912485
- p1094: 6.95265e-6; = IF(p1071=0;p1088*p0001/(p0818*p0002);0)
- p2865: 0.000228812; = p2279*(p1020+p1022)
- p0499: 0; = SQRT(2)*(IF((2*p0367-1)<0;-1;IF((2*p0367-1)>0;1;0))*SQRT(SQRT((2/(pi()*0.140012289)+LN(1-(2*p0367-1)^2)/2)^2-LN(1-(2*p0367-1)^2)/0.140012289)-(2/(pi()*0.140012289)+LN(1-(2*p0367-1)^2)/2)))
- p2925: 0.000472882; = p2339*(p1079+p1081)
- p3190: 0; = p2409*p1023
- p1804: 0
- p1946: 0
- p1151: 3.87633e6; = if(p1121=0;p1149*p1148*p1145;0)
- p3317: 4.05963e7; = if(and(p1232=0;p3253<>0);p3253*(p3261*p3277-p3312)/p3316;0)
- p3229: 1.42205e-6; = p1164/p0818
- p2047: 1.96239e-13; = p2015*p2045/(p0818*1000000000000)
- p2753: 0; = p2362*(p1019+p1021)
- p1167: 0.5
- p3171: 0; = p2390*p1132
- p2745: 0; = p2354*(p1019+p1021)
- p3153: 0; = p2372*p1023
- p1509: 29
- p3014: 0; = p2428*(p1129+p1131)
- p0801: 1.6e6
- p1963e: 6.48723e-6; = p1628*p1832+p1629*p1833+p1630*p1834+p1631*p1835+p1632*p1836+p1633*p1837+p1634*p1838+p1635*p1839+p1636*p1840+p1637*p1841+p1638*p1842+p1639*p1843+p1640*p1844+p1641*p1845+p1642*p1846+p1643*p1847+p1644*p1848+p1645*p1849+p1646*p1850
- p3419: 0; = p3362*p1239
- p2767: 0; = p2376*(p1078+p1080)
- p1213: 30
- p0766: 84.608; = p0106*(1+p0634*p0238/100)
- p2920: 2.57032e-5; = p2334*(p1020+p1022)
- p3076: 0; = p2295*p1023
- p0321: 0.5
- p1586: 0
- p0846: 0.276908; = p0841*p0845^3+p0842*p0845^2+p0843*p0845+p0844
- p0701: 0
- p0088: 46.805
- p2549: 0.000132082; = p2353*p1123
- p0289: 0.5
- p1334: 0; = p1322*p0801
- p4719: 2.87332e-5; = p1962*p3481
- p2591: 0; = p2395*p1014
- p2053: 1.45647
- p0659: 0; = IF(p0395<0.5;-SQRT(p0007*EXP(p0527^2*p0008)-p0007);SQRT(p0007*EXP(p0527^2*p0008)-p0007))
- p0878: 364934; = p0867*p0856
- p1670: 0
- p0395: 0.5
- p0850: 0
- p0860: 0; = p0672*1000/p0856
- p2546: 0.000442613; = p2350*p1123
- p0157: 29.706
- p2276: 0.00637601; = p2223*p2182
- p0977: 0; = IF(p0687=0;IF(OR(p0686=0;p0688=0);0;p0686*1000*p0688/100);0)
- p4803: 0; = p1836*p3482
- p3226: 0.000847054; = p3222*p1229
- p4131: 0; = p1782*p3479
- p0907: 0
- p2056: 2.07882
- p3068: 0; = p2287*p1023
- p4431: 0; = p1876*p3480
- p1172: 1.56982e-7; = p1170/p0818
- p2319: 0.000127707; = p2224*p2186
- p2161: 5.78946e-8; = p2015*p2085*p2123/(p0818*1000)
- p2623: 0; = p2427*p1073
- p1675: 0
- p4101: 2.7897e-5; = p1962*p3478
- p2568: 0; = p2372*p1014
- p2851: 0.000345625; = p2265*(p1079+p1081)
- p2905: 4.43782e-5; = p2319*(p1020+p1022)
- p1070: 0.0166256; = IF(p1012=0;p1056/(p1063*p0818);0)
- p3088: 1.21965e-6; = p2307*p1082
- p1585: 0
- p0873: 1.89159; = p0872*p0001*p0003/(p0818*p0002)
- p1288: 0
- p2244: 0.000186218; = p2222*p2189
- p2033: 1.22689e-5; = p2015*p2029*p2031/(p0818*1000)
- p3718: 8.90641e-7; = p1781*p3477
- p5109: 0; = p1936*p3483
- p2500: 0.00132348; = p2304*p1073
- p2897: 0.000913761; = p2311*(p1129+p1131)
- p0783: 30.96; = p0123*(1+p0651*p0255/100)
- p2583: 0; = p2387*p1073
- p2896: 0.000269028; = p2310*(p1079+p1081)
- p0655: 0; = IF(p0391<0.5;-SQRT(p0007*EXP(p0523^2*p0008)-p0007);SQRT(p0007*EXP(p0523^2*p0008)-p0007))
- p2193: 0.0101704; = p1054/p0818
- p2797: 0; = p2406*(p1019+p1021)
- p0836: 1.12059e8; = p0831*p0835*p0801/(1-p0831)
- p2115: 0.856281
- p1032: 7.60392e-5; = IF(p1012=0;p1026*p0001/(p0818*p0002);0)
- p0842: 0.144226
- p2218: 0.00457959; = p1150/p0818
- p1205: 0
- p3185: 0; = p2404*p1023
- p3436: 0; = p3379*p1239
- p2918: 0.000416564; = p2332*(p1020+p1022)
- p1237: 0; = if(p1232>0;0;p0729/100)
- p2886: 0.000868849; = p2300*(p1079+p1081)
- p0685: 20.014; = p0025*(1+p0553*p0157/100)
- p1085: 435135; = IF(p1071=0;p1079*(p0710/100)*p0703*1000;0)
- p2151: 1.08894e-7; = p2015*p2079*p2113/(p0818*1000)
- p0782: 55.992; = p0122*(1+p0650*p0254/100)
- p3057: 0; = p2276*p1023
- p3339: 0; = if(and(p1232=0;p3254<>0);p3254*(p3269*p3277-p3334)/p3338;0)
- p2859: 0.000176014; = p2273*(p1129+p1131)
- p0811: 0; = if(p0807=480;1-p0810;0)
- p0612: 0; = IF(p0348<0.5;-SQRT(p0007*EXP(p0480^2*p0008)-p0007);SQRT(p0007*EXP(p0480^2*p0008)-p0007))
- p1145: 3.18607e7; = if(p1121=0;p0799*p0702*1000*p0800/100;0)
- p3115: 0; = p2334*p1023
- p0848: 0
- p1165: 0.00028961; = p0801*p0001/(p0818*p0002)
- p3039: 9.54635e-6; = p2258*p1082
- p4058: 1.63867e-7; = p1915*p3478
- p1617: 0
- p0899: 4.51167e9; = p0825*p0896+(p0830+p0895)*p0824*p0898
- p1117: 0.000389754; = IF(p1071=0;p1107/(p1112*p0818);0)
- p2011: 0.00764841
- p1278: 0.228495
- p1554: 0
- p2689: 0.000307702; = p2298*(p1078+p1080)
- p0732: 0
- p1761: 0
- p5226: 4.07545e-7; = p1847*p3484
- p2739: 1.55563e-5; = p2348*(p1078+p1080)
- p1279: 0
- p2644: 3.29966e-6; = p2253*(p1019+p1021)
- p3072: 0; = p2291*p1023
- p2757: 0; = p2366*(p1019+p1021)
- p1789: 0
- p0964: 0; = 56/90000
- p2120: 0.51828
- p2052: 8.05718e-6; = p2015*p2049*(1-p2050)/(p0818*1000)
- p2476: 0.000116358; = p2280*p1014
- p2380: 0; = p2229*p2209
- p2165: 0.586742; = (p0833-p2014)/p0818-p0839
- p0825: 4.36463e9; = p0818*p0822
- p2686: 0.000118472; = p2295*(p1019+p1021)
- p2159: 1.16902e-5; = p2015*p2083*p2121/(p0818*1000)
- p2804: 0; = p2413*(p1019+p1021)
- p2871: 4.91525e-5; = p2285*(p1020+p1022)
- p1344: 413673; = IF(p1318=0;p1327*p0801;0)
- p1896: 0
- p3319: 2.29667e6; = if(and(p1232=0;p3253<>0);p3253*(p3263-p3314)/p3316;0)
- p0277: 0.5
- p1071: 0
- p1667: 0
- p0841: -0.0162967
- p1128: 0.33336; = if(p1121=0;IF(p1123=1;0;IF(p1123+p1124>1;1-p1123;p1124));0)
- p2791: 0; = p2400*(p1019+p1021)
- p1174: 7.84909e-8; = p1170*p1173/p0818
- p2207: 0.00513425; = p1119-p2205-p2204-p2206
- p4637: 2.27852e-6; = p1876*p3481
- p2889: 8.71988e-5; = p2303*(p1079+p1081)
- p2269: 5.04923e-5; = p2226*p2215
- p0689: 0
- p0945: 0; = if(and(p0683=0;p0951=0);p0939;0)
- p2488: 4.95307e-6; = p2292*p1014
- p0758: 0
- p2297: 0.00114317; = p2227*p2204
- p3344: 0; = if(and(p1232=0;p3254<>0);p3254-(p3339+p3340+p3341+p3342+p3343);0)
- p2582: 0; = p2386*p1073
- p3386: 0; = p3367*p1234
- p3302: 0; = if(and(p1232=0;p3252<>0);p3258*(p3278*(p3282*p1256+p3286*(p1253+p1257)+p1258*p3288+p3297*p3287));0)
- p1076: 0; = IF(p1071=0;p0714/100;0)
- p0681: 0
- p3428: 0; = p3371*p1239
- p3924: 5.24376e-6; = p1781*p3478
- p3093: 0.000157495; = p2312*p1132
- p3512: 0; = p1781*p3476
- p2848: 0.000135174; = p2262*(p1079+p1081)
- p3094: 1.91923e-5; = p2313*p1132
- p2069: 0.190588
- p3243: 9.40735e-10; = p3234*p1188*p3239/p0818
- p3279: 0.37
- p1309: 0
- p0307: 0.5
- p3434: 0; = p3377*p1239
- p2057: 3.28794
- p2252: 3.60846e-6; = p2222*p2198
- p2064: 0.676706
- p2391: 0; = p2233*p2220
- p0530: 0; = SQRT(2)*(IF((2*p0398-1)<0;-1;IF((2*p0398-1)>0;1;0))*SQRT(SQRT((2/(pi()*0.140012289)+LN(1-(2*p0398-1)^2)/2)^2-LN(1-(2*p0398-1)^2)/0.140012289)-(2/(pi()*0.140012289)+LN(1-(2*p0398-1)^2)/2)))
- p2534: 6.60102e-5; = p2338*p1073
- p2511: 0.000391708; = p2315*p1014
- p2226: 0.163879; = if(p0774*p0778+p0775*p0779+p0776*p0780+p0777*p0781=0;0;p0778*p0774/(p0774*p0778+p0775*p0779+p0776*p0780+p0777*p0781))
- p5049: 0; = p1876*p3483
- p1340: 0; = p1325*p0801
- p3307: 0; = if(and(p1232=0;p3252<>0);p3252*(p3258-p3302)/p3305;0)
- p3276: 0.0887032
- p2194: 0.214362
- p3444: 0; = p3368*p1240
- p3369: 0; = if(p1232=0;p3245*p3357/p0818;0)
- p0822: 0.8855
- p1973: 0; = if(p0807=480;p1968*p0001/(p0818*p0002);0)
- p0894: 0.28
- p1065: 0.0013922; = IF(p1012=0;p1051/(p1058*p0818);0)
- p5090: 0; = p1917*p3483
- p1044: 0.010401; = IF(p1012=0;IF(p1037=1;0;IF(p1037+p1038>1;1-p1037;p1038));0)
- p3062: 0; = p2281*p1023
- p2327: 0.000345481; = p2224*p2195
- p2430: 0; = p2236*p2220
- p3393: 0; = p3374*p1234
- p3046: 3.05096e-5; = p2265*p1082
- p1684: 0.698317
- p1639: 0
- p0756: 20.726; = p0096*(1+p0624*p0228/100)
- p0609: 0; = IF(p0345<0.5;-SQRT(p0007*EXP(p0477^2*p0008)-p0007);SQRT(p0007*EXP(p0477^2*p0008)-p0007))
- p2929: 0.000621495; = p2343*(p1079+p1081)
- p1780: 0
- p2566: 0; = p2370*p1014
- p1264: 0; = if(p1232>0;0;IF(p1259+p1263=1;0;IF(p1259+p1263+p1261>1;1-(p1259+p1263);p1261)))
- p2436: 5.90353e-5; = p2240*p1014
- p3106: 0; = p2325*p1023
- p2545: 0.000169705; = p2349*p1073
- p3368: 0; = if(p1232=0;p3245*p3356/p0818;0)
- p2750: 0; = p2359*(p1019+p1021)
- p1997: 7.71638e7; = (if(p1152=0;0;p1150/p1152)+if(p1153=0;0;p1151/p1153))*(1+p1157)
- p3180: 0; = p2399*p1023
- p4921: 0; = p1954*p3482
- p2113: 0.832356
- p2363: 0; = p2225*p2191
- p0195: 0.009
- p0924: 0.0485925; = IF(p0918+p0923=1;0;IF(p0918+p0923+p0920>1;1-(p0918+p0923);p0920))
- p2994: 0; = p2408*(p1020+p1022)
- p0145: 45.183
- p2858: 0.000124903; = p2272*(p1129+p1131)
- p1710: 0.757148
- p3135: 0; = p2354*p1023
- p3242: 6.1502e-8; = p3234*p1188*p3238/p0818
- p3209: 0; = p2428*p1132
- p2186: 0.000805894; = p1052/p0818
- p1636: 0
- p1303: 0; = p1297*p1252/p0818
- p2853: 1.66979e-6; = p2267*(p1079+p1081)
- p0091: 42.831
- p3195: 0; = p2414*p1082
- p2058: 1.24412
- p1553: 0
- p2758: 0; = p2367*(p1019+p1021)
- p2899: 0.000156916; = p2313*(p1129+p1131)
- p2416: 0; = p2235*p2206
- p1803: 0
- p0113: 87.505
- p0891: 226512; = IF(p3251=0;0;62.4*6272640/(12*12*12))
- p2006: 0.346077; = ((p1980*p1985+p1986*p1991+p1992*p1997+p2000*p2005)/p0818)*p0005*p0002/1000
- p0110: 69.913
- p0953: 0; = if(and(p0683>0;or(p0807=56;p0807=100;and(p0807=60;p0901>0.06)));p0935;0)
- p2412: 0; = p2234*p2202
- p0348: 0.5
- p1287: 0
- p0781: 0
- p2535: 0.000548078; = p2339*p1073
- p2934: 1.63372e-5; = p2348*(p1079+p1081)
- p5020: 0; = p1847*p3483
- p2551: 0; = p2355*p1014
- p2830: 6.47109e-5; = p2244*(p1020+p1022)
- p3281: 0.46
- p0312: 0.5
- p2831: 7.40701e-5; = p2245*(p1020+p1022)
- p1673: 0
- p1337: 0; = p1336*p0001/(p0818*p0002)
- p0807: 60
- p1581: 0
- p4308: 0; = p1963*p3479
- p2809: 0; = p2418*(p1078+p1080)
- p1910: 0
- p3071: 0; = p2290*p1023
- p0387: 0.5
- p2682: 3.96032e-6; = p2291*(p1019+p1021)
- p1216: 0.224397
- p3337: 0; = IF(or(p3254=0;p1232>0);0;p3272*p3289)
- p0105: 72.808
- p0460: 0; = SQRT(2)*(IF((2*p0328-1)<0;-1;IF((2*p0328-1)>0;1;0))*SQRT(SQRT((2/(pi()*0.140012289)+LN(1-(2*p0328-1)^2)/2)^2-LN(1-(2*p0328-1)^2)/0.140012289)-(2/(pi()*0.140012289)+LN(1-(2*p0328-1)^2)/2)))
- p1314: 0.189776; = p1310*p1252/p0818
- p2402: 0; = p2234*p2191
- p2084: 0.21
- p3268: 0.0232481
- p0856: 1.6e6; = p0801
- p2029: 4.03
- p1859: 0
- p1821: 0
- p3278: 0.46
- p1696: 0
- p3472: 4.4968e-5; = p3377*p1241
- p2836: 0.00173193; = p2250*(p1020+p1022)
- p1794: 0
- p3248: 0.84
- p0343: 0.5
- p0921: 0; = p0679*1000/p0801
- p2933: 2.83778e-5; = p2347*(p1079+p1081)
- p3029: 0; = p2248*p1023
- p2233: 0; = if(p0783*p0787+p0784*p0788+p0785*p0789+p0786*p0790=0;0;p0790*p0786/(p0783*p0787+p0784*p0788+p0785*p0789+p0786*p0790))
- p2024: 0.748682
- p3437: 0; = p3380*p1239
- p0009: 22.9178
- p3036: 0; = p2255*p1023
- p4514: 0; = p1963*p3480
- p2740: 0.000139423; = p2349*(p1078+p1080)
- p1995: 50
- p0975: 0.019797; = p0973*p0974/p0818
- p2427: 0; = p2235*p2217
- p1935: 0
- p1743: 0
- p1613: 0
- p2988: 0; = p2402*(p1020+p1022)
- p0616: 0; = IF(p0352<0.5;-SQRT(p0007*EXP(p0484^2*p0008)-p0007);SQRT(p0007*EXP(p0484^2*p0008)-p0007))
- p1708: 0
- p3286: 0.185
- p2307: 4.42064e-5; = p2227*p2214
- p0978: 1.6e6; = p0801
- p1202: 0.7
- p3077: 0; = p2296*p1023
- p4225: 0; = p1876*p3479
- p1688: 0
- p1796: 0
- p1073: 0.36225; = IF(p1071=0;p0711/100;0)
- p2829: 0.000119243; = p2243*(p1020+p1022)
- p0897: 0
- p2954: 0; = p2368*(p1020+p1022)
- p0532: 0; = SQRT(2)*(IF((2*p0400-1)<0;-1;IF((2*p0400-1)>0;1;0))*SQRT(SQRT((2/(pi()*0.140012289)+LN(1-(2*p0400-1)^2)/2)^2-LN(1-(2*p0400-1)^2)/0.140012289)-(2/(pi()*0.140012289)+LN(1-(2*p0400-1)^2)/2)))
- p0410: 0; = SQRT(2)*(IF((2*p0278-1)<0;-1;IF((2*p0278-1)>0;1;0))*SQRT(SQRT((2/(pi()*0.140012289)+LN(1-(2*p0278-1)^2)/2)^2-LN(1-(2*p0278-1)^2)/0.140012289)-(2/(pi()*0.140012289)+LN(1-(2*p0278-1)^2)/2)))
- p2138: 5.05099e-7; = p2015*p2066*p2100/(p0818*1000)
- p0448: 0; = SQRT(2)*(IF((2*p0316-1)<0;-1;IF((2*p0316-1)>0;1;0))*SQRT(SQRT((2/(pi()*0.140012289)+LN(1-(2*p0316-1)^2)/2)^2-LN(1-(2*p0316-1)^2)/0.140012289)-(2/(pi()*0.140012289)+LN(1-(2*p0316-1)^2)/2)))
- p3123: 4.1894e-6; = p2342*p1082
- p1616: 0
- p0940: 0; = if(and(p0683=0;p0946=0);p0934;0)
- p1229: 0.00377741; = IF(p1221=0;0;p1228*p1221)
- p3164: 0; = p2383*p1082
- p1784: 0
- p2037: 1.99
- p1049: 0.251177; = IF(p1012=0;IF(p1037+p1044+p1045+p1046+p1047+p1048=1;0;1-(p1037+p1044+p1045+p1046+p1047+p1048));0)
- p0263: 1.813
- p4019: 2.21221e-6; = p1876*p3478
- p2785: 0; = p2394*(p1019+p1021)
- p1875: 2.43457e-5; = p1467*1000/p0818
- p3202: 0; = p2421*p1082
- p1980: 3521.6
- p2913: 0.000120055; = p2327*(p1020+p1022)
- p2660: 1.5027e-5; = p2269*(p1078+p1080)
- p5048: 0; = p1875*p3483
- p0889: 0; = 1000*p0888*p0001*p0003*p0004/(p0818*p0002)
- p0124: 31.561
- p3070: 0; = p2289*p1023
- p0683: 122.651; = p0023*(1+p0551*p0155/100)
- p1106: 15366.6; = IF(p1071=0;p1105*p1096*p1095;0)
- p2352: 0.000280504; = p2232*p2220
- p3098: 0; = p2317*p1023
- p1605: 0
- p1088: 38411; = IF(p1071=0;p1082*(p0710/100)*p0703*1000;0)
- p2348: 5.22708e-5; = p2228*p2216
- p2203: 0.00535106; = p1070-p2200-p2201-p2202
- p2643: 1.5008e-6; = p2252*(p1019+p1021)
- p3249: 0
- p2590: 0; = p2394*p1014
- p4336: 0; = p1781*p3480
- p0742: 0
- p3338: 0; = if(and(p1232=0;p3254<>0);1-(p3334+p3335+p3336+p3337);0)
- p1659: 0
- p2810: 0; = p2419*(p1078+p1080)
- p2451: 0.000177449; = p2255*p1014
- p2346: 2.40599e-5; = p2228*p2214
- p2788: 0; = p2397*(p1019+p1021)
- p0734: 0
- p0392: 0.5
- p0535: 0; = SQRT(2)*(IF((2*p0403-1)<0;-1;IF((2*p0403-1)>0;1;0))*SQRT(SQRT((2/(pi()*0.140012289)+LN(1-(2*p0403-1)^2)/2)^2-LN(1-(2*p0403-1)^2)/0.140012289)-(2/(pi()*0.140012289)+LN(1-(2*p0403-1)^2)/2)))
- p0687: 0
- p0367: 0.5
- p3082: 3.94231e-5; = p2301*p1082
- p3031: 0; = p2250*p1023
- p0447: 0; = SQRT(2)*(IF((2*p0315-1)<0;-1;IF((2*p0315-1)>0;1;0))*SQRT(SQRT((2/(pi()*0.140012289)+LN(1-(2*p0315-1)^2)/2)^2-LN(1-(2*p0315-1)^2)/0.140012289)-(2/(pi()*0.140012289)+LN(1-(2*p0315-1)^2)/2)))
- p0022: 1591.17
- p1176: 371.23; = p1175*p0801
- p0501: 0; = SQRT(2)*(IF((2*p0369-1)<0;-1;IF((2*p0369-1)>0;1;0))*SQRT(SQRT((2/(pi()*0.140012289)+LN(1-(2*p0369-1)^2)/2)^2-LN(1-(2*p0369-1)^2)/0.140012289)-(2/(pi()*0.140012289)+LN(1-(2*p0369-1)^2)/2)))
- p1998: 420
- p1720: 0
- p1122: 0; = p1121*p0001/(p0818*p0002)
- p2697: 5.25308e-6; = p2306*(p1078+p1080)
- p2926: 0.000243068; = p2340*(p1079+p1081)
- p1266: 0.67639; = if(p1232>0;0;IF(p1259+p1263+p1264+p1265=1;0;1-(p1259+p1263+p1264+p1265)))
- p0388: 0.5
- p3074: 0; = p2293*p1023
- p0003: 10000
- p4559: 1.26584e-6; = p1798*p3481
- p2658: 1.58997e-6; = p2267*(p1078+p1080)
- p1006: 0; = p1002*p0001*p0004/(p0818*p0002)
- p1599: 0
- p1212: 0.0307037; = if(p1211=0;0;if(p1193>0;0;(p1207+p1208+p1209)*p1210/(2000*p1211)))
- p1226: 1.6e6; = IF(p1221=0;0;IF(p1193=0;p0801;0))
- p3220: 0.00101002; = p3216*p1228
- p2277: 0.00139961; = p2223*p2183
- p1979: 1.95159e8; = p0973
- p0888: 0; = p0686*1000*p0687*p0884/100
- p2612: 0; = p2416*p1073
- p3018: 0; = p2237*p1023
- p2289: 0.0131518; = p2223*p2196
- p3350: 6.12706e7; = if(and(p1232=0;p3256<>0);p3256*(p3273*p3277-p3345)/p3349;0)
- p0914: 8.38565e7; = p0825*p0911+(p0830+p0895)*p0824*p0913
- p1955: 0
- p1905: 0
- p1247: 0; = if(p1232>0;0;p1242*p0001/(p0818*p0002))
- p0245: 3.669
- p1912: 0
- p2364: 0; = p2225*p2192
- p2168: 0.00655231; = p2166*(p0903)
- p1187: 0.000559674
- p2611: 0; = p2415*p1073
- p2860: 2.1449e-5; = p2274*(p1129+p1131)
- p0243: 28.126
- p3274: 0.0768939
- p2998: 0; = p2412*(p1020+p1022)
- p1188: 895.479; = p1187*p0801
- p2840: 0.000607933; = p2254*(p1020+p1022)
- p3284: 0.275
- p2786: 0; = p2395*(p1019+p1021)
- p1651: 0
- p3110: 0; = p2329*p1023
- p1713: 0.785973
- p1962: 6.90775e-5; = p1960*1000/p0818
- p4954: 0; = p1781*p3483
- p1562: 0
- p4130: 0; = p1781*p3479
- p2256: 0.000107946; = p2222*p2202
- p1312: 0.198805; = IF(p1307+p1310+p1311=p1266;0;p1266-(p1307+p1310+p1311))
- p0971: 0.00792433; = p0968/p0818
- p2942: 0; = p2356*(p1020+p1022)
- p4543: 1.28272e-5; = p1782*p3481
- p2782: 0; = p2391*(p1128+p1130)
- p2615: 0; = p2419*p1073
- p0874: 0; = p0865*p0856
- p0444: 0; = SQRT(2)*(IF((2*p0312-1)<0;-1;IF((2*p0312-1)>0;1;0))*SQRT(SQRT((2/(pi()*0.140012289)+LN(1-(2*p0312-1)^2)/2)^2-LN(1-(2*p0312-1)^2)/0.140012289)-(2/(pi()*0.140012289)+LN(1-(2*p0312-1)^2)/2)))
- p2856: 9.08543e-6; = p2270*(p1079+p1081)
- p2354: 0; = p2225*p2182
- p0405: 0; = SQRT(2)*(IF((2*p0273-1)<0;-1;IF((2*p0273-1)>0;1;0))*SQRT(SQRT((2/(pi()*0.140012289)+LN(1-(2*p0273-1)^2)/2)^2-LN(1-(2*p0273-1)^2)/0.140012289)-(2/(pi()*0.140012289)+LN(1-(2*p0273-1)^2)/2)))
- p2992: 0; = p2406*(p1020+p1022)
- p1798: 3.04321e-6; = p1390*1000/p0818
- p3340: 0; = if(and(p1232=0;p3254<>0);p3254*(p3270-p3335)/p3338;0)
- p1192: 9.08378e-8; = p1188*p1191/p0818
- p1298: 0
- p1191: 0.5
- p3149: 0; = p2368*p1023
- p1825: 0
- p2066: 0.109412
- p2092: 0.54529
- p3422: 0; = p3365*p1239
- p1936: 1.15642e-5; = p1528*1000/p0818
- p1546: 4
- p0917: 1.19669
- p0869: 0.00553; = IF(p0858+p0864+p0865+p0866+p0867+p0868=1;0;1-(p0858+p0864+p0865+p0866+p0867+p0868))
- p1785: 0
- p3342: 0; = if(and(p1232=0;p3254<>0);p3254*(p3272-p3337)/p3338;0)
- p1729: 0
- p2598: 0; = p2402*p1014
- p0876: 91360; = p0866*p0856
- p0520: 0; = SQRT(2)*(IF((2*p0388-1)<0;-1;IF((2*p0388-1)>0;1;0))*SQRT(SQRT((2/(pi()*0.140012289)+LN(1-(2*p0388-1)^2)/2)^2-LN(1-(2*p0388-1)^2)/0.140012289)-(2/(pi()*0.140012289)+LN(1-(2*p0388-1)^2)/2)))
- p1898: 0
- p2200: 0.00756466; = p1056/p0818
- p2887: 0.0004466; = p2301*(p1079+p1081)
- p0584: 0; = IF(p0320<0.5;-SQRT(p0007*EXP(p0452^2*p0008)-p0007);SQRT(p0007*EXP(p0452^2*p0008)-p0007))
- p0046: 29.784
- p2425: 0; = p2235*p2215
- p1978: 420
- p1168: 7.11023e-7; = p1164*p1167/p0818
- p2732: 0.000104664; = p2341*(p1078+p1080)
- p3345: 0.160606; = if(and(p1232=0;p3256<>0);p3273*p3277*p3293;0)
- p2212: 3.11759e-6; = p1106/p0818
- p3167: 0; = p2386*p1082
- p2465: 1.82909e-5; = p2269*p1073
- p0728: 0
- p0553: 0; = IF(p0289<0.5;-SQRT(p0007*EXP(p0421^2*p0008)-p0007);SQRT(p0007*EXP(p0421^2*p0008)-p0007))
- p2558: 0; = p2362*p1014
- p3021: 0; = p2240*p1023
- p0716: 55.992; = p0056*(1+p0584*p0188/100)
- p2636: 8.86518e-5; = p2245*(p1019+p1021)
- p1182: 156.341; = p1181*p0801
- p2538: 5.50058e-5; = p2342*p1073
- p1850: 0
- p1152: 0.415074
- p3109: 0; = p2328*p1023
- p0120: 27.833
- p1913: 0
- p2607: 0; = p2411*p1014
- p0767: 44.22; = p0107*(1+p0635*p0239/100)
- p1348: 46
- p3375: 7.68755e-5; = if(p1232=0;p3246*p3357/p0818;0)
- p3096: 0; = p2315*p1023
- p0611: 0; = IF(p0347<0.5;-SQRT(p0007*EXP(p0479^2*p0008)-p0007);SQRT(p0007*EXP(p0479^2*p0008)-p0007))
- p0916: 0.318954; = p0826+(p0832*(1+p0894))/p0818
- p2972: 0; = p2386*(p1079+p1081)
- p2953: 0; = p2367*(p1020+p1022)
- p1671: 0.46617
- p0821: 1.31667
- p0731: 32.361; = p0071*(1+p0599*p0203/100)
- p2548: 7.60081e-5; = p2352*p1123
- p4925: 0; = p1962*p3482
- p3384: 0; = p3365*p1234
- p0750: 0
- p2210: 0.00051528; = 6*1.00794*p2208/30.973762
- p2274: 6.08396e-5; = p2230*p2220
- p1003: 0; = p0999*p0888
- p3235: 0.118093
- p2761: 0; = p2370*(p1019+p1021)
- p1741: 0
- p0585: 0; = IF(p0321<0.5;-SQRT(p0007*EXP(p0453^2*p0008)-p0007);SQRT(p0007*EXP(p0453^2*p0008)-p0007))
- p1166: 1.42205e-6; = p1164/p0818
- p1920: 0
- p0250: 37.533
- p3125: 2.5347e-8; = p2344*p1082
- p3065: 0; = p2284*p1023
- p0067: 54.838
- p1975: 0.00028961; = p1970*p0001/(p0818*p0002)
- p1198: 0.44
- p0769: 30.788; = p0109*(1+p0637*p0241/100)
- p2382: 0; = p2229*p2211
- p2736: 2.85906e-6; = p2345*(p1078+p1080)
- p0085: 3198.34
- p2275: 0.000105723; = p2230*p2221
- p1068: 0.0339015; = IF(p1012=0;p1054/(p1061*p0818);0)
- p4237: 0; = p1888*p3479
- p0521: 0; = SQRT(2)*(IF((2*p0389-1)<0;-1;IF((2*p0389-1)>0;1;0))*SQRT(SQRT((2/(pi()*0.140012289)+LN(1-(2*p0389-1)^2)/2)^2-LN(1-(2*p0389-1)^2)/0.140012289)-(2/(pi()*0.140012289)+LN(1-(2*p0389-1)^2)/2)))
- p0779: 55.062; = p0119*(1+p0647*p0251/100)
- p3476: 0; = if(p1328+p1330+p1332+p1334+p1336+p1338+p1340+p1342+p1344=0;0;p1328/(p1328+p1330+p1332+p1334+p1336+p1338+p1340+p1342+p1344))
- p2255: 0.00075003; = p2222*p2201
- p0798: 87.505; = p0138*(1+p0666*p0270/100)
- p2353: 0.000487442; = p2232*p2221
- p2497: 0.000517616; = p2301*p1073
- p0954: 0; = if(and(p0683>0;or(p0807=56;p0807=100;and(p0807=60;p0901>0.06)));p0936;0)
- p0546: 0; = IF(p0282<0.5;-SQRT(p0007*EXP(p0414^2*p0008)-p0007);SQRT(p0007*EXP(p0414^2*p0008)-p0007))
- p2467: 9.4376e-5; = p2271*p1073
- p1891: 0
- p1572: 0
- p2345: 9.60672e-6; = p2228*p2213
- p2405: 0; = p2234*p2195
- p4285: 0; = p1936*p3479
- p2909: 5.07538e-5; = p2323*(p1020+p1022)
- p1719: 0
- p2125: 8.15799e-6; = p2015*p2053*p2087/(p0818*1000)
- p1682: 0
- p2573: 0; = p2377*p1073
- p1178: 7.53155e-8; = p1176/p0818
- p1736: 0
- p3017: 0; = p2431*(p1129+p1131)
- p0776: 42.12; = p0116*(1+p0644*p0248/100)
- p3431: 0; = p3374*p1239
- p1706: 0
- p0314: 0.5
- p2578: 0; = p2382*p1073
- p3230: 1.56982e-7; = p1170/p0818
- p0694: 0
- p3773: 3.20074e-7; = p1836*p3477
- p2948: 0; = p2362*(p1020+p1022)
- p0705: 23.659; = p0045*(1+p0573*p0177/100)
- p2404: 0; = p2234*p2193
- p2322: 0.000127599; = p2224*p2189
- p0628: 0; = IF(p0364<0.5;-SQRT(p0007*EXP(p0496^2*p0008)-p0007);SQRT(p0007*EXP(p0496^2*p0008)-p0007))
- p1026: 420091; = IF(p1012=0;p1020*(p0704/100)*p0703*1000;0)
- p1808: 0
- p2729: 5.42313e-5; = p2338*(p1078+p1080)
- p0146: 23.006
- p3484: 0.111599; = IF(p1344=0;0;p1344/(p1328+p1330+p1332+p1334+p1336+p1338+p1340+p1342+p1344))
- p2034: 1.9409e-5; = p2015*p2030*p2032/(p0818*1000)
- p0377: 0.5
- p1121: 0
- p1179: 0.5
- p1078: 0.29761; = IF(p1071=0;IF(p1073=1;0;IF(p1073+p1074>1;1-p1073;p1074));0)
- p1160: 0.0636402; = (p1156+p1158)*p1159
- p3408: 0; = p3370*p1238
- p1963h: 0; = p1686*p1890+p1687*p1891+p1688*p1892+p1689*p1893+p1690*p1894+p1691*p1895+p1692*p1896+p1693*p1897+p1694*p1898+p1695*p1899+p1696*p1900+p1697*p1901+p1698*p1902+p1699*p1903+p1700*p1904+p1701*p1905+p1702*p1906+p1703*p1907+p1704*p1908+p1705*p1909
- p1666: 0
- p2361: 0; = p2225*p2189
- p2341: 0.000351682; = p2228*p2209
- p1674: 0
- p1668: 0
- p3142: 0; = p2361*p1023
- p2946: 0; = p2360*(p1020+p1022)
- p1672: 0.4404
- p2290: 5.8014e-6; = p2223*p2197
- p0942: 0; = if(and(p0683=0;p0948=0);p0936;0)
- p3002: 0; = p2416*(p1079+p1081)
- p3389: 0; = p3370*p1234
- p2068: 0.153529
- p3873: 7.93227e-7; = p1936*p3477
- p0516: 0; = SQRT(2)*(IF((2*p0384-1)<0;-1;IF((2*p0384-1)>0;1;0))*SQRT(SQRT((2/(pi()*0.140012289)+LN(1-(2*p0384-1)^2)/2)^2-LN(1-(2*p0384-1)^2)/0.140012289)-(2/(pi()*0.140012289)+LN(1-(2*p0384-1)^2)/2)))
- p0005: 1.60934
- p1602: 0
- p2097: 0.40001
- p0487: 0; = SQRT(2)*(IF((2*p0355-1)<0;-1;IF((2*p0355-1)>0;1;0))*SQRT(SQRT((2/(pi()*0.140012289)+LN(1-(2*p0355-1)^2)/2)^2-LN(1-(2*p0355-1)^2)/0.140012289)-(2/(pi()*0.140012289)+LN(1-(2*p0355-1)^2)/2)))
- p2714: 6.07453e-5; = p2323*(p1019+p1021)
- p2995: 0; = p2409*(p1020+p1022)
- p0671: 1045.04; = p0011*(1+p0539*p0143/100)
- p1273: 0; = p1267*p1252/p0818
- p3424: 0; = p3367*p1239
- p3100: 0; = p2319*p1023
- p3440: 0; = p3364*p1240
- p1134: 296969; = if(p1121=0;p1128*(p0716/100)*p0703*1000;0)
- p1439: 18
- p4636: 1.01267e-5; = p1875*p3481
- p3470: 3.47185e-5; = p3375*p1241
- p1015: 0.29784; = IF(p1012=0;p0706/100;0)
- p3477: 0.0685933; = if(p1328+p1330+p1332+p1334+p1336+p1338+p1340+p1342+p1344=0;0;p1330/(p1328+p1330+p1332+p1334+p1336+p1338+p1340+p1342+p1344))
- p2167: 0.232241; = p2166*(p0898)
- p1332: 1.49698e6; = p1321*p0801
- p0084: 23.369
- p3228: 0.00189605; = p3224*p1229
- p0188: 12.691
- p4472: 0; = p1917*p3480
- p0791: 98.355; = p0131*(1+p0659*p0263/100)
- p1679: 0
- p0271: 13.839
- p2543: 3.28903e-5; = p2347*p1073
- p2684: 0.00192004; = p2293*(p1019+p1021)
- p1972: 0; = if(p0807=480;p1967*p0001/(p0818*p0002);0)
- p0881: 0; = p0880*p0001*p0003/(p0818*p0002)
- p2501: 6.11469e-7; = p2305*p1073
- p2229: 0; = if(p0774*p0778+p0775*p0779+p0776*p0780+p0777*p0781=0;0;p0781*p0777/(p0774*p0778+p0775*p0779+p0776*p0780+p0777*p0781))
- p3234: 0.39606; = 1-p3233
- p2446: 0.00117916; = p2250*p1014
- p2766: 0; = p2375*(p1078+p1080)
- p1707: 0
- p2861: 3.72728e-5; = p2275*(p1129+p1131)
- p0631: 0; = IF(p0367<0.5;-SQRT(p0007*EXP(p0499^2*p0008)-p0007);SQRT(p0007*EXP(p0499^2*p0008)-p0007))
- p2232: 0.356679; = if(p0783*p0787+p0784*p0788+p0785*p0789+p0786*p0790=0;0;p0789*p0785/(p0783*p0787+p0784*p0788+p0785*p0789+p0786*p0790))
- p1954: 8.11524e-7; = p1546*1000/p0818
- p0995: 0; = p0991*p0001*p0004/(p0818*p0002)
- p1988: 750
- p1286: 0.0377956; = p1282*p1252/p0818
- p2504: 6.04308e-5; = p2308*p1073
- p2474: 4.52274e-5; = p2278*p1014
- p3205: 0; = p2424*p1082
- p1838: 0
- p0699: 0
- p0181: 41.176
- p2343: 0.00198847; = p2228*p2211
- p2198: 1.56031e-5; = 22.98976928*p2197/14.0067
- p2949: 0; = p2363*(p1020+p1022)
- p1873: 0
- p2491: 6.73926e-5; = p2295*p1014
- p2536: 0.000281719; = p2340*p1073
- p2700: 2.85824e-5; = p2309*(p1078+p1080)
- p2610: 0; = p2414*p1073
- p2282: 0.000905499; = p2223*p2188
- p2136: 3.79037e-6; = p2015*p2064*p2098/(p0818*1000)
- p1772: 0
- p0269: 5.4
- p2774: 0; = p2383*(p1078+p1080)
- p1255: 0; = if(p1232>0;0;p0737/100)
- p2490: 0.000468256; = p2294*p1014
- p3359: 2.98348e7; = if(p1232=0;p3309+p3320+p3331+p3342+p3353;0)
- p1119: 0.00977354; = IF(p1071=0;p1109/(p1114*p0818);0)
- p0079: 0.67
- p0668: 0; = IF(p0404<0.5;-SQRT(p0007*EXP(p0536^2*p0008)-p0007);SQRT(p0007*EXP(p0536^2*p0008)-p0007))
- p0345: 0.5
- p3075: 0; = p2294*p1023
- p3011: 0; = p2425*(p1079+p1081)
- p0719: 35.255; = p0059*(1+p0587*p0191/100)
- p2392: 0; = p2233*p2221
- p1014: 0.23659; = IF(p1012=0;p0705/100;0)
- p1274: 0; = p1270*p1252/p0818
- p1966: 1.55e6; = if(p0814=0;p0802;0)
- p2093: 0.260958
- p2365: 0; = p2225*p2193
- p3261: 0.908439
- p1993: 400
- p3347: 0.00107264; = if(and(p1232=0;p3256<>0);p3275*p3289;0)
- p0983: 0; = if(p0886=0;0;min(1;(p0695*p0694*1000*p0697/100)/p0886))
- p0862: 0.228084; = p0674*1000/p0856
- p2128: 5.43944e-6; = p2015*p2056*p2090/(p0818*1000)
- p3392: 0; = p3373*p1234
- p3825: 1.23855e-6; = p1888*p3477
- p2628: 0.00100494; = p2237*(p1019+p1021)
- p0749: 0
- p2349: 0.000468475; = p2228*p2217
- p2470: 1.64857e-5; = p2274*p1123
- p2647: 4.48959e-5; = p2256*(p1019+p1021)
- p2673: 0.000376606; = p2282*(p1019+p1021)
- p1023: 0; = IF(p1012=0;IF(p1014+p1019+p1020+p1021+p1022=1;0;1-(p1014+p1019+p1020+p1021+p1022));0)
- p0619: 0; = IF(p0355<0.5;-SQRT(p0007*EXP(p0487^2*p0008)-p0007);SQRT(p0007*EXP(p0487^2*p0008)-p0007))
- p2143: 8.77303e-7; = p2015*p2071*p2105/(p0818*1000)
- p3264: 0.0887032
- p3405: 0.00156807; = p3367*p1238
- p3137: 0; = p2356*p1023
- p0700: 0
- p3352: 4.91883e6; = if(and(p1232=0;p3256<>0);p3256*(p3275-p3347)/p3349;0)
- p2241: 0.000186376; = p2222*p2186
- p3513: 0; = p1782*p3476
- p3225: 0.000555184; = p3221*p1229
- p2601: 0; = p2405*p1014
- p1012: 0
- p2077: 0.043
- p1132: 0.04312; = if(p1121=0;IF(p1123+p1128+p1129+p1130+p1131=1;0;1-(p1123+p1128+p1129+p1130+p1131));0)
- p3895: 4.73825e-6; = p1962*p3477
- p3474: 2.15986e-5; = p3379*p1241
- p2369: 0; = p2225*p2198
- p2654: 5.82055e-5; = p2263*(p1078+p1080)
- p2302: 0.000646161; = p2227*p2209
- p1967: 0; = if(p0807=480;p0802*p0810;0)
- p4025: 5.73536e-7; = p1882*p3478
- p1322: 0; = IF(((p0745*1000*p0749/100)+(p0754*1000*p0758/100))/p0801<0;0;((p0745*1000*p0749/100)+(p0754*1000*p0758/100))/p0801)
- p2922: 0.000194464; = p2336*(p1079+p1081)
- p0793: 0
- p0877: 0.165367; = p0876*p0001*p0003/(p0818*p0002)
- p0514: 0; = SQRT(2)*(IF((2*p0382-1)<0;-1;IF((2*p0382-1)>0;1;0))*SQRT(SQRT((2/(pi()*0.140012289)+LN(1-(2*p0382-1)^2)/2)^2-LN(1-(2*p0382-1)^2)/0.140012289)-(2/(pi()*0.140012289)+LN(1-(2*p0382-1)^2)/2)))
- p1734: 0
- p1105: 0.436421
- p1646: 0
- p0733: 0
- p2004: 30
- p3090: 2.64973e-6; = p2309*p1082
- p0722: 0
- p1974: 0; = p1969*p0001/(p0818*p0002)
- p2075: 0.072
- p0177: 34.328
- p2898: 0.00128768; = p2312*(p1129+p1131)
- p3411: 0; = p3373*p1238
- p0048: 11.807
- p2632: 7.75155e-5; = p2241*(p1019+p1021)
- p2763: 0; = p2372*(p1019+p1021)
- p3091: 2.37481e-5; = p2310*p1082
- p1758: 0
- p2085: 0.0335294
- p0506: 0; = SQRT(2)*(IF((2*p0374-1)<0;-1;IF((2*p0374-1)>0;1;0))*SQRT(SQRT((2/(pi()*0.140012289)+LN(1-(2*p0374-1)^2)/2)^2-LN(1-(2*p0374-1)^2)/0.140012289)-(2/(pi()*0.140012289)+LN(1-(2*p0374-1)^2)/2)))
- p2743: 9.35087e-5; = p2352*(p1128+p1130)
- p0384: 0.5
- p1109: 1.04069e7; = IF(p1071=0;p1105*p1103*p1095;0)
- p2308: 0.000166821; = p2227*p2215
- p0476: 0; = SQRT(2)*(IF((2*p0344-1)<0;-1;IF((2*p0344-1)>0;1;0))*SQRT(SQRT((2/(pi()*0.140012289)+LN(1-(2*p0344-1)^2)/2)^2-LN(1-(2*p0344-1)^2)/0.140012289)-(2/(pi()*0.140012289)+LN(1-(2*p0344-1)^2)/2)))
- p1315: 0; = p1311*p1252/p0818
- p0872: 1.04504e6; = p0864*p0856
- p2246: 5.36021e-5; = p2222*p2191
- p2595: 0; = p2399*p1014
- p0690: 0
- p0759: 0
- p1186: 1.58593e-8; = p1182*p1185/p0818
- p3896: 8.83756e-6; = p1963*p3477
- p1050: 5.14977e7; = IF(p1012=0;p1037*p1036;0)
- p1040: 0.0267363
- p2759: 0; = p2368*(p1019+p1021)
- p2845: 9.78086e-5; = p2259*(p1079+p1081)
- p0805: 0
- p0374: 0.5
- p1299: 0
- p0143: 9.124
- p3412: 0.000186433; = p3374*p1238
- p2350: 0.00163344; = p2232*p2218
- p2081: 0.0019
- p2596: 0; = p2400*p1014
- p3233: 0.60394
- p2323: 0.000146054; = p2224*p2190
- p0254: 12.691
- p3219: 0.00758846; = p3215*p1228
- p0056: 55.992
- p1016: 0.27969; = IF(p1012=0;p0707/100;0)
- p0058: 33.336
- p0895: 1.38865e9; = p0894*p0830
- p2434: 0.000125486; = p2238*p1014
- p1828: 0
- p1035: 0; = IF(p1012=0;p1029*p0001/(p0818*p0002);0)
- p2291: 9.52207e-6; = p2223*p2198
- p1894: 0
- p0368: 0.5
- p2339: 0.00151298; = p2228*p2207
- p3468: 0; = p3373*p1241
- p0764: 94.405; = p0104*(1+p0632*p0236/100)
- p0653: 0; = IF(p0389<0.5;-SQRT(p0007*EXP(p0521^2*p0008)-p0007);SQRT(p0007*EXP(p0521^2*p0008)-p0007))
- p3646: 0; = p1915*p3476
- p1777: 0
- p1690: 0
- p4061: 1.80254e-6; = p1918*p3478
- p0968: 3.9059e7; = p0965*p0683*p0682*1000
- p1693: 0
- p1829: 0
- p1929: 0
- p1018: 0.06782; = IF(p1012=0;p0709/100;0)
- p2122: 0.341195
- p1081: 0; = IF(p1071=0;IF(p1073+p1078+p1079+p1080=1;0;IF(p1073+p1078+p1079+p1080+p1077>1;1-(p1073+p1078+p1079+p1080);p1077));0)
- p0711: 36.225; = p0051*(1+p0579*p0183/100)
- p4307: 0; = p1962*p3479
- p1046: 0.0267363; = IF(p1012=0;IF(p1037+p1044+p1045=1;0;IF(p1037+p1044+p1045+p1040>1;1-(p1037+p1044+p1045);p1040));0)
- p1064: 0.0127413; = IF(p1012=0;p1050/(p1057*p0818);0)
- p2728: 0.000167471; = p2337*(p1078+p1080)
- p0574: 0; = IF(p0310<0.5;-SQRT(p0007*EXP(p0442^2*p0008)-p0007);SQRT(p0007*EXP(p0442^2*p0008)-p0007))
- p3447: 0; = p3371*p1240
- p1634: 0
- p0570: 0; = IF(p0306<0.5;-SQRT(p0007*EXP(p0438^2*p0008)-p0007);SQRT(p0007*EXP(p0438^2*p0008)-p0007))
- p0094: 508.426
- p3273: 0.753577
- p3396: 0; = p3377*p1234
- p5267: 2.01508e-6; = p1888*p3484
- p4147: 0; = p1798*p3479
- p0717: 27.097; = p0057*(1+p0585*p0189/100)
- p1030: 6.43216e-5; = IF(p1012=0;p1024*p0001/(p0818*p0002);0)
- p3221: 0.146975; = IF(p3216=0;0;p1223*12.0107/100.0869+(1-p1224)*12.0107/84.3139)
- p0313: 0.5
- p2523: 8.17374e-5; = p2327*p1014
- p1260: 0.32361; = if(p1232>0;0;p0731/100)
- p2915: 5.23485e-7; = p2329*(p1020+p1022)
- p0637: 0; = IF(p0373<0.5;-SQRT(p0007*EXP(p0505^2*p0008)-p0007);SQRT(p0007*EXP(p0505^2*p0008)-p0007))
- p1180: 3.76577e-8; = p1176*p1179/p0818
- p1685: 0
- p2678: 0.00258143; = p2287*(p1019+p1021)
- p2542: 8.7157e-6; = p2346*p1073
- p1760: 0
- p2775: 0; = p2384*(p1078+p1080)
- p2012: 0.017628
- p0996: 0; = if(p0888=0;0;if((p0691*p0690*1000*p0692/100)/p0888>1;1;(p0691*p0690*1000*p0692/100)/p0888))
- p2400: 0; = p2234*p2189
- p0806: 8.215e7
- p0680: 0
- p1640: 0
- p0131: 98.355
- p2574: 0; = p2378*p1073
- p1077: 0; = IF(p1071=0;p0715/100;0)
- p1574: 0
- p2512: 8.59846e-5; = p2316*p1014
- p1129: 0.35255; = if(p1121=0;IF(p1123+p1128=1;0;IF(p1123+p1128+p1125>1;1-(p1123+p1128);p1125));0)
- p2530: 1.74996e-5; = p2334*p1014
- p2691: 0.000827318; = p2300*(p1078+p1080)
- p0372: 0.5
- p1951: 0
- p2461: 0.000400584; = p2265*p1073
- p0252: 27.687
- p1170: 773.764; = p1169*p0801
- p1234: 0; = if(p1232>0;0;p0726/100)
- p1276: 0; = p1272*p1252/p0818
- p2100: 0.705744
- p4018: 9.83205e-6; = p1875*p3478
- p1609: 0
- p0531: 0; = SQRT(2)*(IF((2*p0399-1)<0;-1;IF((2*p0399-1)>0;1;0))*SQRT(SQRT((2/(pi()*0.140012289)+LN(1-(2*p0399-1)^2)/2)^2-LN(1-(2*p0399-1)^2)/0.140012289)-(2/(pi()*0.140012289)+LN(1-(2*p0399-1)^2)/2)))
- p1098: 0.0353868
- p1778: 0
- p3224: 0.501945; = IF(p3216=0;0;1-p3221-p3222-p3223)
- p5161: 3.44149e-6; = p1782*p3484
- p0025: 20.014
- p1563: 0
- p2134: 1.1982e-5; = p2015*p2062*p2096/(p0818*1000)
- p2537: 0.000127397; = p2341*p1073
- p2475: 0.000155783; = p2279*p1014
- p1698: 0
- p3223: 0.126838; = IF(p3216=0;0;(1-p1223)*24.3050/84.3139)
- p5294: 4.52828e-8; = p1915*p3484
- p2185: 0.00107896; = p1065-p2184
- p0997: 0; = if(p0888=0;0;if((p0695*p0694*1000*p0696/100)/p0888>1;1;(p0695*p0694*1000*p0696/100)/p0888))
- p2473: 0.000331134; = p2277*p1014
- p2801: 0; = p2410*(p1019+p1021)
- p1697: 0
- p0047: 27.969
- p3269: 0.851786
- p2790: 0; = p2399*(p1019+p1021)
- p3430: 0; = p3373*p1239
- p1107: 402435; = IF(p1071=0;p1105*p1101*p1095;0)
- p3357: 2.30346e7; = if(p1232=0;p3307+p3318+p3329+p3340+p3351;0)
- p1902: 0
- p0389: 0.5
- p1968: 0; = if(p0807=480;p0802*p0811;0)
- p0242: 14.763
- p0463: 0; = SQRT(2)*(IF((2*p0331-1)<0;-1;IF((2*p0331-1)>0;1;0))*SQRT(SQRT((2/(pi()*0.140012289)+LN(1-(2*p0331-1)^2)/2)^2-LN(1-(2*p0331-1)^2)/0.140012289)-(2/(pi()*0.140012289)+LN(1-(2*p0331-1)^2)/2)))
- p2855: 1.57814e-5; = p2269*(p1079+p1081)
- p0726: 0
- p1942: 0
- p0635: 0; = IF(p0371<0.5;-SQRT(p0007*EXP(p0503^2*p0008)-p0007);SQRT(p0007*EXP(p0503^2*p0008)-p0007))
- p0934: 0; = p0928*p0001/(p0818*p0002)
- p0360: 0.5
- p0071: 32.361
- p3607: 0; = p1876*p3476
- p3163: 0; = p2382*p1082
- p2520: 8.68967e-6; = p2324*p1014
- p0707: 27.969; = p0047*(1+p0575*p0179/100)
- p3131: 7.0434e-5; = p2350*p1132
- p2438: 6.34621e-6; = p2242*p1014
- p1086: 0; = IF(p1071=0;p1080*(p0710/100)*p0703*1000;0)
- p0591: 0; = IF(p0327<0.5;-SQRT(p0007*EXP(p0459^2*p0008)-p0007);SQRT(p0007*EXP(p0459^2*p0008)-p0007))
- p4678: 2.4473e-6; = p1917*p3481
- p3092: 0.000111761; = p2311*p1132
- p0445: 0; = SQRT(2)*(IF((2*p0313-1)<0;-1;IF((2*p0313-1)>0;1;0))*SQRT(SQRT((2/(pi()*0.140012289)+LN(1-(2*p0313-1)^2)/2)^2-LN(1-(2*p0313-1)^2)/0.140012289)-(2/(pi()*0.140012289)+LN(1-(2*p0313-1)^2)/2)))
- p0885: 100; = IF(p0689+p0884=100;0;100-(p0689+p0884))
- p3194: 0; = p2413*p1023
- p2105: 0.888194
- p3175: 0; = p2394*p1023
- p0267: 5.703
- p2458: 0.000156669; = p2262*p1073
- p2344: 9.18703e-7; = p2228*p2212
- p0715: 0
- p3147: 0; = p2366*p1023
- p2211: 0.00674779; = p1120-p2209-p2208-p2210
- p3852: 2.78325e-8; = p1915*p3477
- p1678: 0.8094
- p2273: 0.00049926; = p2230*p2219
- p0421: 0; = SQRT(2)*(IF((2*p0289-1)<0;-1;IF((2*p0289-1)>0;1;0))*SQRT(SQRT((2/(pi()*0.140012289)+LN(1-(2*p0289-1)^2)/2)^2-LN(1-(2*p0289-1)^2)/0.140012289)-(2/(pi()*0.140012289)+LN(1-(2*p0289-1)^2)/2)))
- p2701: 0.000256168; = p2310*(p1078+p1080)
- p1770: 0
- p0241: 34.109
- p2110: 0.856281
- p2126: 4.75538e-6; = p2015*p2054*p2088/(p0818*1000)
- p1631: 0
- p2521: 7.03225e-5; = p2325*p1014
- p1653: 0
- p2919: 0.000178591; = p2333*(p1020+p1022)
- p2806: 0; = p2415*(p1078+p1080)
- p2183: 0.00229344; = p1064-p2182
- p2003: 50
- p2979: 0; = p2393*(p1020+p1022)
- p2189: 0.000805214; = p1053/p0818
- p2760: 0; = p2369*(p1019+p1021)
- p2952: 0; = p2366*(p1020+p1022)
- p2298: 0.00103391; = p2227*p2205
- p4060: 2.37608e-6; = p1917*p3478
- p1856: 0
- p3297: 0; = if(p1273+p1274+p1275+p1276=0;0;p1273/(p1273+p1274+p1275+p1276))
- p0114: 43.368
- p1930: 0
- p3293: 0.3875
- p2646: 0.000311945; = p2255*(p1019+p1021)
- p1984: 30
- p2661: 8.65114e-6; = p2270*(p1078+p1080)
- p3217: 0.00189888; = p3213*p1228
- p3461: 0.0105391; = p3366*p1241
- p3122: 9.7029e-6; = p2341*p1082
- p1745: 0
- p1148: 0.146558; = if(p1121=0;IF(p1146=1;0;1-p1146);0)
- p3177: 0; = p2396*p1023
- p1824: 0
- p1194: 1.48
- p2383: 0; = p2229*p2212
- p1742: 0
- p2620: 0; = p2424*p1073
- p1021: 0.11807; = IF(p1012=0;IF(p1014+p1019+p1020=1;0;IF(p1014+p1019+p1020+p1017>1;1-(p1014+p1019+p1020);p1017));0)
- p1641: 0
- p1058: 0.225
- p1924: 0
- p3130: 1.29252e-5; = p2349*p1082
- p5135: 1.0415e-6; = p1756*p3484
- p2563: 0; = p2367*p1014
- p1428: 23
- p3353: 2.03385e7; = if(and(p1232=0;p3256<>0);p3256*(p3276-p3348)/p3349;0)
- p1474: 7
- p2063: 2.01468
- p2324: 3.67288e-5; = p2224*p2191
- p1010: 0; = p0890
- p1884: 0
- p0139: 35.765
- p2070: 0.282
- p1218: 0.5
- p2443: 0.000102629; = p2247*p1014
- p2372: 0; = p2225*p2201
- p1754: 0
- p1971: 0.00028056; = p1966*p0001/(p0818*p0002)
- p2179: 0.039594; = p0970+p0971+p0972
- p2401: 0; = p2234*p2190
- p1017: 0.11807; = IF(p1012=0;p0708/100;0)
- p3214: 0.376406; = p1222*40.078/100.0869
- p1963k: 3.48538e-5; = p1744*p1948+p1745*p1949+p1746*p1950+p1747*p1951+p1748*p1952+p1749*p1953+p1750*p1954+p1751*p1955+p1752*p1956+p1753*p1957+p1961*p1962
- p0479: 0; = SQRT(2)*(IF((2*p0347-1)<0;-1;IF((2*p0347-1)>0;1;0))*SQRT(SQRT((2/(pi()*0.140012289)+LN(1-(2*p0347-1)^2)/2)^2-LN(1-(2*p0347-1)^2)/0.140012289)-(2/(pi()*0.140012289)+LN(1-(2*p0347-1)^2)/2)))
- p1776: 0
- p2724: 0.000213749; = p2333*(p1019+p1021)
- p3567: 0; = p1836*p3476
- p3181: 0; = p2400*p1023
- p2577: 0; = p2381*p1073
- p3247: 0
- p0913: 0.0120403
- p0386: 0.5
- p3146: 0; = p2365*p1023
- p2288: 0.00133048; = p2223*p2195
- p0990: 0; = p0986*p0886
- p2664: 0.000166433; = p2273*(p1128+p1130)
- p0608: 0; = IF(p0344<0.5;-SQRT(p0007*EXP(p0476^2*p0008)-p0007);SQRT(p0007*EXP(p0476^2*p0008)-p0007))
- p1220: 0; = IF(p1218<0.5;-SQRT(p1214*EXP(p1219^2*p1215)-p1214);SQRT(p1214*EXP(p1219^2*p1215)-p1214))
- p4715: 3.37558e-7; = p1954*p3481
- p1610: 0
- p3145: 0; = p2364*p1023
- p1295: 0; = p1291*p1252/p0818
- p0190: 27.596
- p0840: 0.0783074; = p0839*p0831
- p2716: 0.000123622; = p2325*(p1019+p1021)
- p4031: 7.2921e-6; = p1888*p3478
- p1953: 0
- p2043: 0.636483
- p2021: 0.000169562; = p2020/p0818
- p3126: 2.6505e-7; = p2345*p1082
- p2835: 0.000175208; = p2249*(p1020+p1022)
- p2016: 0.00103842; = (p2014-p2015)/(p0818)
- p1811: 0
- p2688: 0.000340219; = p2297*(p1078+p1080)
- p2222: 0.231266; = if(p0765*p0769+p0766*p0770+p0767*p0771+p0768*p0772=0;0;p0769*p0765/(p0765*p0769+p0766*p0770+p0767*p0771+p0768*p0772))
- p0247: 8.699
- p3020: 0; = p2239*p1023
- p0150: 3.55
- p2381: 0; = p2229*p2210
- p3301: 0; = if(and(p1232=0;p3252<>0);p3257*p3277*(p3297*p3290+(1-p3297)*p3294);0)
- p0270: 3.669
- p1925: 0
- p3023: 0; = p2242*p1023
- p2320: 1.83799e-5; = p2224*p2187
- p0944: 0; = if(and(p0683=0;p0950=0);p0938;0)
- p3246: 0.01645; = IF(p3244+p3245=1;0;1-(p3244+p3245))
- p2038: 0.304457
- p3191: 0; = p2410*p1023
- p1265: 0; = if(p1232>0;0;IF(p1259+p1263+p1264=1;0;IF(p1259+p1263+p1264+p1262>1;1-(p1259+p1263+p1264);p1262)))
- p2983: 0; = p2397*(p1020+p1022)
- p2751: 0; = p2360*(p1019+p1021)
- p1704: 0
- p3361: 1.433e7; = if(p1232=0;p3311+p3322+p3333+p3344+p3355;0)
- p0496: 0; = SQRT(2)*(IF((2*p0364-1)<0;-1;IF((2*p0364-1)>0;1;0))*SQRT(SQRT((2/(pi()*0.140012289)+LN(1-(2*p0364-1)^2)/2)^2-LN(1-(2*p0364-1)^2)/0.140012289)-(2/(pi()*0.140012289)+LN(1-(2*p0364-1)^2)/2)))
- p1730: 0
- p0216: 26.565
- p2789: 0; = p2398*(p1019+p1021)
- p3394: 0; = p3375*p1234
- p4303: 0; = p1954*p3479
- p0672: 0
- p3179: 0; = p2398*p1023
- p2938: 9.88916e-5; = p2352*(p1129+p1131)
- p2124: 0.263965
- p0912: 0
- p1948: 0
- p0892: 7352.3; = if(p0891=0;0;(1-p1240)*p3251/p0891)
- p2681: 2.41286e-6; = p2290*(p1019+p1021)
- p2201: 0.00324315; = 12.01*p2200/(2*14.0067)
- p1248: 7.57472e-6; = if(p1232>0;0;p1243*p0001/(p0818*p0002))
- p4597: 1.94096e-6; = p1836*p3481
- p0884: 0; = IF(p0689=100;0;IF(p0689+p0688>100;100-p0689;p0688))
- p2181: 0.338027; = p0887+p0889+p0893+p2180
- p2261: 0.000841396; = p2226*p2207
- p2651: 3.0159e-5; = p2260*(p1078+p1080)
- p1210: 0.13
- p2796: 0; = p2405*(p1019+p1021)
- p4266: 0; = p1917*p3479
- p3169: 0; = p2388*p1082
- p3372: 0; = if(p1232=0;p3245*p3360/p0818;0)
- p2833: 0.000150739; = p2247*(p1020+p1022)
- p1717: 0
- p1621: 0
- p2407: 0; = p2234*p2197
- p2891: 5.27577e-7; = p2305*(p1079+p1081)
- p3425: 0; = p3368*p1239
- p3081: 7.66967e-5; = p2300*p1082
- p2581: 0; = p2385*p1073
- p2249: 0.000504195; = p2222*p2195
- p2727: 0.000185168; = p2336*(p1078+p1080)
- p4105: 0; = p1756*p3479
- p0985: 0; = IF(p0982=1;0;IF(p0982+p0983>1;1-p0982;p0983))
- p0260: 21.187
- p0226: 31.049
- p2157: 2.74351e-7; = p2015*p2086*p2119/(p0818*1000)
- p0439: 0; = SQRT(2)*(IF((2*p0307-1)<0;-1;IF((2*p0307-1)>0;1;0))*SQRT(SQRT((2/(pi()*0.140012289)+LN(1-(2*p0307-1)^2)/2)^2-LN(1-(2*p0307-1)^2)/0.140012289)-(2/(pi()*0.140012289)+LN(1-(2*p0307-1)^2)/2)))
- p1941: 0
- p2060: 0.272353
- p0576: 0; = IF(p0312<0.5;-SQRT(p0007*EXP(p0444^2*p0008)-p0007);SQRT(p0007*EXP(p0444^2*p0008)-p0007))
- p0352: 0.5
- p1773: 0
- p1863: 0
- p0910: 0.00604756; = p0909/p0818
- p3022: 0; = p2241*p1023
- p2783: 0; = p2392*(p1128+p1130)
- p0870: 89818; = p0858*p0856
- p4443: 0; = p1888*p3480
- p2214: 8.16464e-5; = p1107/p0818
- p3432: 0; = p3375*p1239
- p3025: 0; = p2244*p1023
- p0858: 0.0561362; = p0670*1000/p0856
- p1011: 0; = p1010*p0001*p0004/(p0818*p0002)
- p0185: 22.677
- p2795: 0; = p2404*(p1019+p1021)
- p0718: 33.336; = p0058*(1+p0586*p0190/100)
- p2219: 0.0064536; = p1154-p2218
- p2099: 0.620397
- p1928: 0
- p2478: 0.000214232; = p2282*p1014
- p4720: 5.35917e-5; = p1963*p3481
- p3211: 0; = p2430*p1132
- p0238: 8.674
- p1702: 0
- p3478: 0.403851; = if(p1328+p1330+p1332+p1334+p1336+p1338+p1340+p1342+p1344=0;0;p1332/(p1328+p1330+p1332+p1334+p1336+p1338+p1340+p1342+p1344))
- p2377: 0; = p2229*p2206
- p1318: 0; = p1317*p0001/(p0818*p0002)
- p2166: 0.506358; = p2165*p0824
- p1792: 0
- p1270: 0; = IF(p1267=p1259;0;IF(p1267+p1268>p1259;p1259-p1267;p1268))
- p1797: 0
- p4855: 0; = p1888*p3482
- p4097: 3.27735e-7; = p1954*p3478
- p1114: 0.216028
- p3113: 0; = p2332*p1023
- p0651: 0; = IF(p0387<0.5;-SQRT(p0007*EXP(p0519^2*p0008)-p0007);SQRT(p0007*EXP(p0519^2*p0008)-p0007))
- p0401: 0.5
- p4649: 7.51067e-6; = p1888*p3481
- p0905: 0.0383263; = p0904/p0818
- p1959: 1038.48; = if(p0738*p0740*p0739>0;p0738*1000*(p0740/100)*p0739/1000;p1958)
- p2270: 2.90687e-5; = p2226*p2216
- p2635: 7.74501e-5; = p2244*(p1019+p1021)
- p2395: 0; = p2234*p2184
- p3227: 0.000479119; = p3223*p1229
- p2045: 30
- p2107: 0.881623
- p1752: 0
- p2496: 0.00100701; = p2300*p1073
- p2614: 0; = p2418*p1073
- p1254: 0.70608; = if(p1232>0;0;p0736/100)
- p2560: 0; = p2364*p1014
- p2616: 0; = p2420*p1073
- p3024: 0; = p2243*p1023
- p0480: 0; = SQRT(2)*(IF((2*p0348-1)<0;-1;IF((2*p0348-1)>0;1;0))*SQRT(SQRT((2/(pi()*0.140012289)+LN(1-(2*p0348-1)^2)/2)^2-LN(1-(2*p0348-1)^2)/0.140012289)-(2/(pi()*0.140012289)+LN(1-(2*p0348-1)^2)/2)))
- p0723: 1591.15; = p0063*(1+p0591*p0195/100)
- p2331: 5.43619e-6; = p2224*p2199
- p0268: 1.929
- p3262: 0.0787162
- p1290: 0; = IF(p1287=p1264;0;IF(p1287+p1288>p1264;p1264-p1287;p1288))
- p1241: 0.45162; = if(p1232>0;0;IF(p1234+p1238+p1239+p1240=1;0;1-(p1234+p1238+p1239+p1240)))
- p0280: 0.5
- p3455: 0; = p3379*p1240
- p0116: 42.12
- p5160: 1.44905e-6; = p1781*p3484
- p1816: 0
- p1164: 7009.27; = p1163*p0801
- p2406: 0; = p2234*p2196
- p1259: 0; = if(p1232>0;0;p0730/100)
- p0710: 87.505; = p0050*(1+p0578*p0182/100)
- p2393: 0; = p2234*p2182
- p2152: 1.36118e-7; = p2015*p2080*p2114/(p0818*1000)
- p1907: 0
- p0257: 39.896
- p1851: 0
- p0745: 3198.34; = p0085*(1+p0613*p0217/100)
- p2580: 0; = p2384*p1073
- p3212: 0; = p2431*p1132
- p0834: 0.00059
- p3237: 0.854735
- p3005: 0; = p2419*(p1079+p1081)
- p2894: 5.21398e-5; = p2308*(p1079+p1081)
- p1230: 0.5
- p1869: 0
- p2800: 0; = p2409*(p1019+p1021)
- p3349: 0.821768; = if(and(p1232=0;p3256<>0);1-(p3345+p3346+p3347+p3348);0)
- p2705: 0.000257837; = p2314*(p1128+p1130)
- p1067: 0.00383435; = IF(p1012=0;p1053/(p1060*p0818);0)
- p3462: 0.00129139; = p3367*p1241
- p0998: 0; = if(p0888=0;0;if((p0699*p0698*1000*p0700/100)/p0888>1;1;(p0699*p0698*1000*p0700/100)/p0888))
- p2009: 0.0231605; = ((p1983*p1985+p1989*p1991+p1995*p1997+p2003*p2005+p1976*p1977+p1978*p1979+p1998*p1999)/p0818)*p0005*p0002/1000
- p3327: 0; = if(and(p1232=0;p3255<>0);1-(p3323+p3324+p3325+p3326);0)
- p2087: 0.856281
- p0823: 0
- p1814: 0
- p2188: 0.00148377; = p1066-p2186-p2187
- p3416: 0.000214033; = p3378*p1238
- p0991: 0; = p0987*p0886
- p2533: 0.000203845; = p2337*p1073
- p2141: 1.13759e-6; = p2015*p2069*p2103/(p0818*1000)
- p3685: 0; = p1954*p3476
- p2242: 2.68237e-5; = p2222*p2187
- p3232: 3.17187e-8; = p1182/p0818
- p2815: 0; = p2424*(p1078+p1080)
- p2225: 0; = if(p0765*p0769+p0766*p0770+p0767*p0771+p0768*p0772=0;0;p0772*p0768/(p0765*p0769+p0766*p0770+p0767*p0771+p0768*p0772))
- p3925: 1.24539e-5; = p1782*p3478
- p1341: 0; = p1340*p0001/(p0818*p0002)
- p0180: 46.902
- p4473: 0; = p1918*p3480
- p1184: 3.17187e-8; = p1182/p0818
- p1783: 0
- p1327a: 0.258545; = (p0745*1000/p0801)*(1-(p0746+p0747+p0748+p0749+p0750+p0751+p0752+p0753)/100)+(p0754*1000/p0801)*(1-(p0755+p0756+p0757+p0758+p0759+p0760+p0761+p0762)/100)
- p1963d: 0; = p1608*p1812+p1609*p1813+p1610*p1814+p1611*p1815+p1612*p1816+p1613*p1817+p1614*p1818+p1615*p1819+p1616*p1820+p1617*p1821+p1618*p1822+p1619*p1823+p1620*p1824+p1621*p1825+p1622*p1826+p1623*p1827+p1624*p1828+p1625*p1829+p1626*p1830+p1627*p1831
- p2687: 0.00135819; = p2296*(p1019+p1021)
- p1126: 0; = if(p1121=0;p0720/100;0)
- p2980: 0; = p2394*(p1020+p1022)
- p1866: 0
- p2711: 7.64439e-6; = p2320*(p1019+p1021)
- p3378: 0.000390301; = if(p1232=0;p3246*p3360/p0818;0)
- p2908: 4.43407e-5; = p2322*(p1020+p1022)
- p0175: 0.009
- p0154: 0.008
- p2680: 0.00546997; = p2289*(p1019+p1021)
- p3329: 0; = if(and(p1232=0;p3255<>0);p3255*(p3266-p3324)/p3327;0)
- p1075: 0.31255; = IF(p1071=0;p0713/100;0)
- p3304: 0; = if(and(p1232=0;p3252<>0);p3260*p3289;0)
- p1141: 5.68476e-5; = if(p1121=0;p1135*p0001/(p0818*p0002);0)
- p3222: 0.224242; = IF(p3216=0;0;p1223*40.078/100.0869)
- p2031: 0.465411
- p2875: 0.00457025; = p2289*(p1020+p1022)
- p2621: 0; = p2425*p1073
- p1207: 219.382; = if(p1193>0;0;(p1194*p1050/p1057+p1195*p1051/p1058+p1196*p1052/p1059+p1197*p1053/p1060+p1198*p1054/p1061+p1199*p1055/p1062+p1200*p1056/p1063)/(p0702*1000)+(p1201*p1109/p1114+p1202*p1110/p1115)/(p0702*1000)+p1203*p1170/p0801+p1204*p1176/p0801)
- p0076: 70.608
- p1732: 0.715577
- p0316: 0.5
- p1996: 30
- p2935: 0.000146422; = p2349*(p1079+p1081)
- p0652: 0; = IF(p0388<0.5;-SQRT(p0007*EXP(p0520^2*p0008)-p0007);SQRT(p0007*EXP(p0520^2*p0008)-p0007))
- p3270: 0.0747083
- p0648: 0; = IF(p0384<0.5;-SQRT(p0007*EXP(p0516^2*p0008)-p0007);SQRT(p0007*EXP(p0516^2*p0008)-p0007))
- p0310: 0.5
- p2173: 0.129216; = p0895*p0898/p0818
- p1567: 0
- p2482: 0.000270818; = p2286*p1014
- p2990: 0; = p2404*(p1020+p1022)
- p0577: 0; = IF(p0313<0.5;-SQRT(p0007*EXP(p0445^2*p0008)-p0007);SQRT(p0007*EXP(p0445^2*p0008)-p0007))
- p1083: 504328; = IF(p1071=0;p1073*(p0710/100)*p0703*1000;0)
- p2456: 3.67094e-5; = p2260*p1073
- p1595: 0
- p1510: 22
- p0407: 0; = SQRT(2)*(IF((2*p0275-1)<0;-1;IF((2*p0275-1)>0;1;0))*SQRT(SQRT((2/(pi()*0.140012289)+LN(1-(2*p0275-1)^2)/2)^2-LN(1-(2*p0275-1)^2)/0.140012289)-(2/(pi()*0.140012289)+LN(1-(2*p0275-1)^2)/2)))
- p1062: 0.16
- p1632: 0.76325
- p0383: 0.5
- p2912: 0.000560057; = p2326*(p1020+p1022)
- p1909: 0
- p0941: 0; = if(and(p0683=0;p0947=0);p0935;0)
- p4675: 1.94096e-6; = p1914*p3481
- p0898: 0.45865
- p3441: 0; = p3365*p1240
- p3007: 0; = p2421*(p1079+p1081)
- p2873: 0.00215683; = p2287*(p1020+p1022)
- p1660: 0
- p2049: 25.6942
- p1665: 0
- p0928: 0; = p0801*p0918
- p1749: 0
- p2594: 0; = p2398*p1014
- p2018: 0.1978
- p3313: 0.0130446; = if(and(p1232=0;p3253<>0);p3262*(p3278*(p3282*p1256+p3286*(p1253+p1257)+p1258*p3288+p3298*p3287));0)
- p2287: 0.0062067; = p2223*p2193
- p1963j: 8.27508e-6; = p1725*p1929+p1726*p1930+p1727*p1931+p1728*p1932+p1729*p1933+p1730*p1934+p1731*p1935+p1732*p1936+p1733*p1937+p1734*p1938+p1735*p1939+p1736*p1940+p1737*p1941+p1738*p1942+p1739*p1943+p1740*p1944+p1741*p1945+p1742*p1946+p1743*p1947
- p0746: 0
- p0861: 0.0571; = p0673*1000/p0856
- p1737: 0
- p2559: 0; = p2363*p1014
- p0986: 0; = IF(p0982+p0985=1;0;IF(p0982+p0985+p0984>1;1-(p0982+p0985);p0984))
- p1059: 0.335
- p0059: 35.255
- p0682: 1591.17; = p0022*(1+p0550*p0154/100)
- p0006: 30
- p1957: 0
- p0239: 18.784
- p2428: 0; = p2236*p2218
- p1225: 1.088; = IF(p1221=0;0;p1223+1.2*p1224)
- p2417: 0; = p2235*p2207
- p0743: 0.318; = p0083*(1+p0611*p0215/100)
- p0403: 0.5
- p1019: 0.29784; = IF(p1012=0;IF(p1014=1;0;IF(p1014+p1015>1;1-p1014;p1015));0)
- p3026: 0; = p2245*p1023
- p2019: 0.13105
- p3239: 0.013074; = IF(p3238+p3235+p3236=1;0;1-(p3238+p3235+p3236))
- p0747: 4.655; = p0087*(1+p0615*p0219/100)
- p3295: 0.58
- p2387: 0; = p2229*p2216
- p0364: 0.5
- p0106: 84.608
- p1892: 0
- p3034: 0; = p2253*p1023
- p0235: 0.009
- p3099: 0; = p2318*p1023
- p2904: 5.9415e-5; = p2318*(p1020+p1022)
- p1130: 0; = if(p1121=0;IF(p1123+p1128+p1129=1;0;IF(p1123+p1128+p1129+p1126>1;1-(p1123+p1128+p1129);p1126));0)
- p0127: 8.687
- p3197: 0; = p2416*p1082
- p2772: 0; = p2381*(p1078+p1080)
- p1643: 0.801155
- p3288: 0.505
- p2748: 0; = p2357*(p1019+p1021)
- p3397: 0; = p3378*p1234
- p3466: 0; = p3371*p1241
- p3168: 0; = p2387*p1082
- p3377: 9.95705e-5; = if(p1232=0;p3246*p3359/p0818;0)
- p3108: 0; = p2327*p1023
- p1885: 0
- p2423: 0; = p2235*p2213
- p2513: 1.17441e-5; = p2317*p1014
- p1611: 0
- p2699: 4.96475e-5; = p2308*(p1078+p1080)
- p2028: 0.000154663; = p2015*p2026*p2027/(p0818*1000)
- p0309: 0.5
- p3380: 0.337875; = p3251/p0818
- p0064: 12.833
- p2083: 2.17294
- p2280: 0.000491811; = p2223*p2186
- p1249: 0; = if(p1232>0;0;p1244*p0001/(p0818*p0002))
- p0780: 27.833; = p0120*(1+p0648*p0252/100)
- p1043: 0.251177
- p2257: 0.00123752; = p2222*p2203
- p2557: 0; = p2361*p1014
- p1922: 0
- p1092: 0; = IF(p1071=0;p1086*p0001/(p0818*p0002);0)
- p4643: 5.90726e-7; = p1882*p3481
- p0757: 0
- p0844: 0.298114
- p3331: 0; = if(and(p1232=0;p3255<>0);p3255*(p3268-p3326)/p3327;0)
- p0946: 0; = if(and(p0683=0;or(p0807=480;p0807=32;p0807=1;and(p0807=60;p0901<0.03)));p0934;0)
- p2539: 0.000720322; = p2343*p1073
- p3254: 0; = p1252*(p1287*(1-p3247)+p1290*(1-p3248)+p1291*(1-p3249)+p1292*(1-p3250))
- p4842: 0; = p1875*p3482
- p3443: 0; = p3367*p1240
- p3059: 0; = p2278*p1023
- p2844: 0.000108145; = p2258*(p1079+p1081)
- p0236: 1.929
- p1843: 0
- p0538: 0; = IF(p0274<0.5;-SQRT(p0007*EXP(p0406^2*p0008)-p0007);SQRT(p0007*EXP(p0406^2*p0008)-p0007))
- p0784: 31.561; = p0124*(1+p0652*p0256/100)
- p2947: 0; = p2361*(p1020+p1022)
- p2892: 5.51679e-6; = p2306*(p1079+p1081)
- p2880: 0.000687768; = p2294*(p1020+p1022)
- p2389: 0; = p2233*p2218
- p1687: 0
- p1963a: 7.54357e-6; = p1550*p1754+p1551*p1755+p1552*p1756+p1553*p1757+p1554*p1758+p1555*p1759+p1556*p1760+p1557*p1761+p1558*p1762+p1559*p1763+p1560*p1764+p1561*p1765+p1562*p1766+p1563*p1767+p1564*p1768+p1565*p1769+p1566*p1770+p1567*p1771+p1568*p1772
- p0399: 0.5
- p3043: 1.19324e-5; = p2262*p1082
- p2589: 0; = p2393*p1014
- p2096: 0.486404
- p0667: 0; = IF(p0403<0.5;-SQRT(p0007*EXP(p0535^2*p0008)-p0007);SQRT(p0007*EXP(p0535^2*p0008)-p0007))
- p0255: 15.9
- p2022: 0.00112431; = p2018*p2015/p0818-p2021
- p1335: 0; = p1334*p0001/(p0818*p0002)
- p1057: 0.82
- p0709: 6.782; = p0049*(1+p0577*p0181/100)
- p1091: 7.87622e-5; = IF(p1071=0;p1085*p0001/(p0818*p0002);0)
- p0409: 0; = SQRT(2)*(IF((2*p0277-1)<0;-1;IF((2*p0277-1)>0;1;0))*SQRT(SQRT((2/(pi()*0.140012289)+LN(1-(2*p0277-1)^2)/2)^2-LN(1-(2*p0277-1)^2)/0.140012289)-(2/(pi()*0.140012289)+LN(1-(2*p0277-1)^2)/2)))
- p1317: 0
- p1882: 1.42017e-6; = p1474*1000/p0818
- p1654: 0
- p2930: 2.87141e-7; = p2344*(p1079+p1081)
- p0573: 0; = IF(p0309<0.5;-SQRT(p0007*EXP(p0441^2*p0008)-p0007);SQRT(p0007*EXP(p0441^2*p0008)-p0007))
- p0593: 0; = IF(p0329<0.5;-SQRT(p0007*EXP(p0461^2*p0008)-p0007);SQRT(p0007*EXP(p0461^2*p0008)-p0007))
- p1039: 0.0267589
- p2279: 0.000658452; = p2223*p2185
- p2652: 0.000250408; = p2261*(p1078+p1080)
- p2315: 0.00165564; = p2224*p2182
- p3030: 0; = p2249*p1023
- p2026: 55.14
- p3448: 0; = p3372*p1240
- p2752: 0; = p2361*(p1019+p1021)
- p2001: 400
- p0992: 0; = p0988*p0001*p0004/(p0818*p0002)
- p2158: 9.67214e-7; = p2015*p2082*p2120/(p0818*1000)
- p2579: 0; = p2383*p1073
- p3382: 0; = p3363*p1234
- p3619: 0; = p1888*p3476
- p1275: 0; = p1271*p1252/p0818
- p1887: 0
- p1977: 1.95862e9; = p1252+p1188
- p1841: 0
- p2266: 5.10907e-7; = p2226*p2212
- p0695: 0
- p0240: 7.039
- p2720: 6.2654e-7; = p2329*(p1019+p1021)
- p0541: 0; = IF(p0277<0.5;-SQRT(p0007*EXP(p0409^2*p0008)-p0007);SQRT(p0007*EXP(p0409^2*p0008)-p0007))
- p1324: 0.963656; = IF(((p0745*1000*p0751/100)+(p0754*1000*p0760/100))/p0801<0;0;((p0745*1000*p0751/100)+(p0754*1000*p0760/100))/p0801)
- p2000: 4000
- p1009: 0; = p1005*p0001*p0004/(p0818*p0002)
- p0579: 0; = IF(p0315<0.5;-SQRT(p0007*EXP(p0447^2*p0008)-p0007);SQRT(p0007*EXP(p0447^2*p0008)-p0007))
- p1162: 0.000324609; = p1161/p0818
- p3144: 0; = p2363*p1023
- p0228: 39.617
- p1272: 0; = IF(p1267+p1270+p1271=p1259;0;p1259-(p1267+p1270+p1271))
- p1901: 0
- p0002: 0.453592
- p1618: 0
- p2102: 0.922577
- p1969: 0; = p0803
- p1939: 0
- p1552: 0.80831
- p1185: 0.5
- p3087: 4.86988e-7; = p2306*p1082
- p1155: 0.00215305; = if(p1153*p0818=0;0;p1151/(p1153*p0818))
- p2819: 0; = p2428*(p1128+p1130)
- p1900: 0
- p1233: 0; = p1232*p0001/(p0818*p0002)
- p1624: 0
- p3453: 0; = p3377*p1240
- p2982: 0; = p2396*(p1020+p1022)
- p2846: 3.1673e-5; = p2260*(p1079+p1081)
- p1173: 0.5
- p0771: 34.735; = p0111*(1+p0639*p0243/100)
- p0854: 443053; = p0801*((1-p0853)*p0846+p0853*p0852)
- p1786: 0
- p2679: 0.000553359; = p2288*(p1019+p1021)
- p1633: 0
- p2332: 0.00119874; = p2224*p2200
- p1738: 0
- p3693: 6.40148e-7; = p1756*p3477
- p0787: 8.687; = p0127*(1+p0655*p0259/100)
- p0795: 98.833; = p0135*(1+p0663*p0267/100)
- p2370: 0; = p2225*p2199
- p3482: 0; = if(p1328+p1330+p1332+p1334+p1336+p1338+p1340+p1342+p1344=0;0;p1340/(p1328+p1330+p1332+p1334+p1336+p1338+p1340+p1342+p1344))
- p1883: 0
- p0765: 72.808; = p0105*(1+p0633*p0237/100)
- p1506: 23
- p2704: 0.000148375; = p2313*(p1128+p1130)
- p1328: 0; = p1319*p0801
- p2426: 0; = p2235*p2216
- p2133: 2.59874e-6; = p2015*p2061*p2095/(p0818*1000)
- p0760: 33.824; = p0100*(1+p0628*p0232/100)
- p0369: 0.5
- p2917: 1.88908e-6; = p2331*(p1020+p1022)
- p1374: 152
- p1564: 0
- p1042: 0.000315647
- p1100: 0.52649
- p3291: 0.437
- p2730: 0.000450279; = p2339*(p1078+p1080)
- p0853: 0; = p0803/(p0802+p0803)
- p2032: 0.448886
- p2609: 0; = p2413*p1014
- p1283: 0; = p1277*p1252/p0818
- p3402: 0.000789561; = p3364*p1238
- p2328: 0.00341509; = p2224*p2196
- p2640: 0.0002097; = p2249*(p1019+p1021)
- p0666: 0; = IF(p0402<0.5;-SQRT(p0007*EXP(p0534^2*p0008)-p0007);SQRT(p0007*EXP(p0534^2*p0008)-p0007))
- p4929: 0; = p1756*p3483
- p0738: 1591.17; = p0078*(1+p0606*p0210/100)
- p1872: 0
- p1258: 0.29392; = if(p1232>0;0;IF(p1253+p1256+p1257=1;0;1-(p1253+p1256+p1257)))
- p0400: 0.5
- p2098: 0.856281
- p3052: 7.18795e-6; = p2271*p1082
- p0974: 0.5
- p1149: 0.830148
- p1731: 0
- p1746: 0
- p2421: 0; = p2235*p2211
- p2976: 0; = p2390*(p1129+p1131)
- p1801: 0
- p1004: 0; = p1000*p0888
- p2044: 2.91441e-7; = p2015*p2042*p2043/(p0818*1000)
- p2492: 0.000772603; = p2296*p1014
- p1981: 400
- p0544: 0; = IF(p0280<0.5;-SQRT(p0007*EXP(p0412^2*p0008)-p0007);SQRT(p0007*EXP(p0412^2*p0008)-p0007))
- p0919: 0.935909; = p0678*1000/p0801
- p2015: 3.22421e7; = p0830*p2011*p2013
- p3420: 0; = p3363*p1239
- p0189: 38.324
- p0800: 55.992; = p0140*(1+p0668*p0272/100)
- p3290: 0.195
- p1251: 6.23818e-6; = if(p1232>0;0;p1246*p0001/(p0818*p0002))
- p3182: 0; = p2401*p1023
- p3348: 0.00443516; = if(and(p1232=0;p3256<>0);p3276*p3289;0)
- p2506: 0.000311807; = p2310*p1073
- p0847: 0
- p2939: 0.000171848; = p2353*(p1129+p1131)
- p1934: 0
- p1819: 0
- p3176: 0; = p2395*p1023
- p0678: 1497.45; = p0018*(1+p0546*p0150/100)
- p1158: 0.0200724; = p1156*p1157
- p2414: 0; = p2235*p2204
- p3294: 0.279
- p1285: 0; = p1281*p1252/p0818
- p3318: 7.40067e6; = if(and(p1232=0;p3253<>0);p3253*(p3262-p3313)/p3316;0)
- p0418: 0; = SQRT(2)*(IF((2*p0286-1)<0;-1;IF((2*p0286-1)>0;1;0))*SQRT(SQRT((2/(pi()*0.140012289)+LN(1-(2*p0286-1)^2)/2)^2-LN(1-(2*p0286-1)^2)/0.140012289)-(2/(pi()*0.140012289)+LN(1-(2*p0286-1)^2)/2)))
- p2234: 0; = 1-(p2222+p2223+p2224+p2225)
- p1146: 0.853442
- p1992: 3900
- p3032: 0; = p2251*p1023
- p1712: 0
- p3069: 0; = p2288*p1023
- p0402: 0.5
- p2437: 4.40946e-5; = p2241*p1014
- p3198: 0; = p2417*p1082
- p1053: 3.9689e6; = IF(p1012=0;p1046*p1036;0)
- p2950: 0; = p2364*(p1020+p1022)
- p1203: 3
- p0725: 4.796; = p0065*(1+p0593*p0197/100)
- p3451: 0; = p3375*p1240
- p1227: 0.00028961; = IF(p1221=0;0;p1226*p0001/(p0818*p0002))
- p1142: 0; = if(p1121=0;p1136*p0001/(p0818*p0002);0)
- p2220: 0.000786433; = p1151/p0818
- p3456: 0; = p3380*p1240
- p3056: 4.55879e-6; = p2275*p1132
- p2715: 1.52759e-5; = p2324*(p1019+p1021)
- p1864: 0
- p2299: 0.000334806; = p2227*p2206
- p0329: 0.5
- p1175: 0.000232019
- p2030: 6.61
- p0703: 1591.01; = p0043*(1+p0571*p0175/100)
- p2842: 3.75113e-5; = p2256*(p1020+p1022)
- p2677: 0.00047608; = p2286*(p1019+p1021)
- p0315: 0.5
- p0237: 10.984
- p1150: 2.25728e7; = if(p1121=0;p1149*p1146*p1145;0)
- p3172: 0; = p2391*p1132
- p2765: 0; = p2374*(p1019+p1021)
- p0199: 36.036
- p3048: 1.47399e-7; = p2267*p1082
- p3272: 0.0398246
- p1889: 0
- p2674: 0.000204376; = p2283*(p1019+p1021)
- p0802: 1.55e6
- p1740: 0
- p2792: 0; = p2401*(p1019+p1021)
- p3206: 0; = p2425*p1082
- p1596: 0
- p0698: 0
- p0213: 9.934
- p0441: 0; = SQRT(2)*(IF((2*p0309-1)<0;-1;IF((2*p0309-1)>0;1;0))*SQRT(SQRT((2/(pi()*0.140012289)+LN(1-(2*p0309-1)^2)/2)^2-LN(1-(2*p0309-1)^2)/0.140012289)-(2/(pi()*0.140012289)+LN(1-(2*p0309-1)^2)/2)))
- p3245: 0; = IF(p3244=1;0;if(p3244+p0792/100>1;1-p3244;p0792/100))
- p2872: 0.000397773; = p2286*(p1020+p1022)
- p0129: 27.691
- p3000: 0; = p2414*(p1079+p1081)
- p5315: 1.29056e-6; = p1936*p3484
- p0763: 1591.01; = p0103*(1+p0631*p0235/100)
- p0461: 0; = SQRT(2)*(IF((2*p0329-1)<0;-1;IF((2*p0329-1)>0;1;0))*SQRT(SQRT((2/(pi()*0.140012289)+LN(1-(2*p0329-1)^2)/2)^2-LN(1-(2*p0329-1)^2)/0.140012289)-(2/(pi()*0.140012289)+LN(1-(2*p0329-1)^2)/2)))
- p0183: 26.315
- p4517: 3.88192e-6; = p1756*p3481
- p2108: 0.826583
- p3114: 0; = p2333*p1023
- p2878: 7.275e-6; = p2292*(p1020+p1022)
- p0932: 0; = p0801*p0926
- p0512: 0; = SQRT(2)*(IF((2*p0380-1)<0;-1;IF((2*p0380-1)>0;1;0))*SQRT(SQRT((2/(pi()*0.140012289)+LN(1-(2*p0380-1)^2)/2)^2-LN(1-(2*p0380-1)^2)/0.140012289)-(2/(pi()*0.140012289)+LN(1-(2*p0380-1)^2)/2)))
- p0755: 0
- p2413: 0; = p2234*p2203
- p2570: 0; = p2374*p1014
- p3188: 0; = p2407*p1023
- p1818: 0
- p2195: 0.00218015; = p2194*p2193
- p2671: 0.000204549; = p2280*(p1019+p1021)
- p3373: 0; = if(p1232=0;p3245*p3361/p0818;0)
- p1594: 0.735896
- p1782: 3.08379e-5; = p1374*1000/p0818
- p2977: 0; = p2391*(p1129+p1131)
- p2868: 0.000314661; = p2282*(p1020+p1022)
- p2726: 0.000352676; = p2335*(p1019+p1021)
- p1222: 0.94
- p0335: 0.5
- p4723: 0; = p1756*p3482
- p0830: 4.95946e9; = p0825*p0821*p0824
- p2820: 0; = p2429*(p1128+p1130)
- p1051: 1.54399e6; = IF(p1012=0;p1044*p1036;0)
- p1082: 0.02759; = IF(p1071=0;IF(p1073+p1078+p1079+p1080+p1081=1;0;1-(p1073+p1078+p1079+p1080+p1081));0)
- p2837: 7.63974e-7; = p2251*(p1020+p1022)
- p3204: 0; = p2423*p1082
- p2027: 0.428799
- p0754: 508.426; = p0094*(1+p0622*p0226/100)
- p1775: 0
- p4881: 0; = p1914*p3482
- p2002: 750
- p4079: 4.67022e-6; = p1936*p3478
- p1045: 0.0267589; = IF(p1012=0;IF(p1037+p1044=1;0;IF(p1037+p1044+p1039>1;1-(p1037+p1044);p1039));0)
- p1903: 0
- p2445: 0.000119288; = p2249*p1014
- p1614: 0
- p2095: 0.765734
- p1587: 0
- p0882: 8848; = p0869*p0856
- p2192: 0.00187569; = p1067-p2189-p2190-p2191
- p2079: 0.02
- p1156: 0.107208; = p1064+p1065+p1066+p1067+p1068+p1069+p1070+p1116+p1117+p1118+p1119+p1120+p1154+p1155
- p1877: 0
- p2811: 0; = p2420*(p1078+p1080)
- p2708: 2.06453e-5; = p2317*(p1019+p1021)
- p1845: 0
- p3255: 0; = p1252*(p1297*(1-p3247)+p1300*(1-p3248)+p1301*(1-p3249)+p1302*(1-p3250))
- p2584: 0; = p2388*p1073
- p0809: 0
- p2131: 1.70988e-6; = p2015*p2059*p2093/(p0818*1000)
- p0572: 0; = IF(p0308<0.5;-SQRT(p0007*EXP(p0440^2*p0008)-p0007);SQRT(p0007*EXP(p0440^2*p0008)-p0007))
- p0525: 0; = SQRT(2)*(IF((2*p0393-1)<0;-1;IF((2*p0393-1)>0;1;0))*SQRT(SQRT((2/(pi()*0.140012289)+LN(1-(2*p0393-1)^2)/2)^2-LN(1-(2*p0393-1)^2)/0.140012289)-(2/(pi()*0.140012289)+LN(1-(2*p0393-1)^2)/2)))
- p2718: 0.000143689; = p2327*(p1019+p1021)
- p0980: 0; = IF(p0977=0;0;p0977*p0001/(p0818*p0002))
- p0691: 0
- p2721: 1.02836e-6; = p2330*(p1019+p1021)
- p1844: 0
- p0010: 89.818
- p0955: 0; = if(and(p0683>0;or(p0807=56;p0807=100;and(p0807=60;p0901>0.06)));p0937;0)
- p2442: 1.26817e-5; = p2246*p1014
- p2342: 0.000151845; = p2228*p2210
- p2962: 0; = p2376*(p1079+p1081)
- p1793: 0
- p0634: 0; = IF(p0370<0.5;-SQRT(p0007*EXP(p0502^2*p0008)-p0007);SQRT(p0007*EXP(p0502^2*p0008)-p0007))
- p1005: 0; = p1001*p0888
- p2823: 0.000839644; = p2237*(p1020+p1022)
- p2663: 0.000118104; = p2272*(p1128+p1130)
- p3855: 3.06158e-7; = p1918*p3477
- p5261: 1.5849e-7; = p1882*p3484
- p0925: 0; = IF(p0918+p0923+p0924=1;0;IF(p0918+p0923+p0924+p0921>1;1-(p0918+p0923+p0924);p0921))
- p2247: 0.000433783; = p2222*p2192
- p3606: 0; = p1875*p3476
- p2358: 0; = p2225*p2186
- p0140: 55.992
- p2665: 2.02815e-5; = p2274*(p1128+p1130)
- p0643: 0; = IF(p0379<0.5;-SQRT(p0007*EXP(p0511^2*p0008)-p0007);SQRT(p0007*EXP(p0511^2*p0008)-p0007))
- p2460: 3.05897e-5; = p2264*p1073
- p3289: 0.05
- p3381: 0; = p3362*p1234
- p0481: 0; = SQRT(2)*(IF((2*p0349-1)<0;-1;IF((2*p0349-1)>0;1;0))*SQRT(SQRT((2/(pi()*0.140012289)+LN(1-(2*p0349-1)^2)/2)^2-LN(1-(2*p0349-1)^2)/0.140012289)-(2/(pi()*0.140012289)+LN(1-(2*p0349-1)^2)/2)))
- p3819: 9.74138e-8; = p1882*p3477
- p3160: 0; = p2379*p1082
- p2675: 0.000233936; = p2284*(p1019+p1021)
- p1606: 0
- p2784: 0; = p2393*(p1019+p1021)
- p2975: 0; = p2389*(p1129+p1131)
- p0246: 8.663
- p0937: 0; = p0931*p0001/(p0818*p0002)
- p2121: 0.822447
- p1342: 0; = p1326*p0801
- p1986: 4200
- p2213: 3.26001e-5; = p1116-p2212
- p2250: 0.00498399; = p2222*p2196
- p2637: 2.22936e-5; = p2246*(p1019+p1021)
- p2447: 5.2014e-7; = p2251*p1014
- p1221: 0.224397; = p1216*(1+p1220*p1217/100)
- p3120: 4.17432e-5; = p2339*p1082
- p3414: 1.32055e-5; = p3376*p1238
- p1881: 0
- p0948: 0; = if(and(p0683=0;or(p0807=480;p0807=32;p0807=1;and(p0807=60;p0901<0.03)));p0936;0)
- p1923: 0
- p3053: 1.52767e-5; = p2272*p1132
- p3134: 2.10185e-5; = p2353*p1132
- p2676: 5.88288e-5; = p2285*(p1019+p1021)
- p0393: 0.5
- p1944: 0
- p2706: 0.000688597; = p2315*(p1019+p1021)
- p0509: 0; = SQRT(2)*(IF((2*p0377-1)<0;-1;IF((2*p0377-1)>0;1;0))*SQRT(SQRT((2/(pi()*0.140012289)+LN(1-(2*p0377-1)^2)/2)^2-LN(1-(2*p0377-1)^2)/0.140012289)-(2/(pi()*0.140012289)+LN(1-(2*p0377-1)^2)/2)))
- p1027: 177340; = IF(p1012=0;p1021*(p0704/100)*p0703*1000;0)
- p1914: 4.66626e-6; = p1506*1000/p0818
- p1931: 0
- p1787: 0
- p0607: 0; = IF(p0343<0.5;-SQRT(p0007*EXP(p0475^2*p0008)-p0007);SQRT(p0007*EXP(p0475^2*p0008)-p0007))
- p2839: 2.75692e-6; = p2253*(p1020+p1022)
- p0044: 94.405
- p2378: 0; = p2229*p2207
- p2268: 1.33801e-5; = p2226*p2214
- p0515: 0; = SQRT(2)*(IF((2*p0383-1)<0;-1;IF((2*p0383-1)>0;1;0))*SQRT(SQRT((2/(pi()*0.140012289)+LN(1-(2*p0383-1)^2)/2)^2-LN(1-(2*p0383-1)^2)/0.140012289)-(2/(pi()*0.140012289)+LN(1-(2*p0383-1)^2)/2)))
- p1622: 0
- p2744: 0.000162494; = p2353*(p1128+p1130)
- p2254: 0.00174945; = p2222*p2200
- p3078: 3.154e-5; = p2297*p1082
- p4337: 0; = p1782*p3480
- p0118: 15.033
- p2104: 0.817136
- p1284: 0.0907959; = p1280*p1252/p0818
- p1169: 0.000483602
- p1080: 0; = IF(p1071=0;IF(p1073+p1078+p1079=1;0;IF(p1073+p1078+p1079+p1076>1;1-(p1073+p1078+p1079);p1076));0)
- p1662: 0
- p3066: 0; = p2285*p1023
- p2050: 0.952062
- p1701: 0
- p0592: 0; = IF(p0328<0.5;-SQRT(p0007*EXP(p0460^2*p0008)-p0007);SQRT(p0007*EXP(p0460^2*p0008)-p0007))
- p1886: 0
- p1831: 0
- p3459: 0.000650245; = p3364*p1241
- p3309: 0; = if(and(p1232=0;p3252<>0);p3252*(p3260-p3304)/p3305;0)
- p1965: 0.000234184; = p1963+p1959*p1964*1000/p0818
- p0904: 1.8891e8; = p0825*p0901+(p0830+p0895)*p0824*p0903
- p0550: 0; = IF(p0286<0.5;-SQRT(p0007*EXP(p0418^2*p0008)-p0007);SQRT(p0007*EXP(p0418^2*p0008)-p0007))
- p1608: 0
- p5131: 0; = p1962*p3483
- p2301: 0.00142889; = p2227*p2208
- p1061: 0.3
- p2310: 0.000860752; = p2227*p2217
- p0965: 0.20014; = IF(p0684/100=1;0;IF(p0684/100+p0685/100>1;1-p0684/100;p0685/100))
- p3899: 3.76895e-6; = p1756*p3478
- p0184: 23.988
- p3006: 0; = p2420*(p1079+p1081)
- p1744: 0
- p1963f: 0; = p1647*p1851+p1648*p1852+p1649*p1853+p1650*p1854+p1651*p1855+p1652*p1856+p1653*p1857+p1654*p1858+p1655*p1859+p1656*p1860+p1657*p1861+p1658*p1862+p1659*p1863+p1660*p1864+p1661*p1865+p1662*p1866+p1663*p1867+p1664*p1868+p1665*p1869+p1666*p1870
- p0833: 5.74676e9; = p0830+p0832
- p3184: 0; = p2403*p1023
- p3719: 2.11527e-6; = p1782*p3477
- p0688: 0
- p3063: 0; = p2282*p1023
- p1733: 0
- p0613: 0; = IF(p0349<0.5;-SQRT(p0007*EXP(p0481^2*p0008)-p0007);SQRT(p0007*EXP(p0481^2*p0008)-p0007))
- p2397: 0; = p2234*p2186
- p1805: 0
- p1069: 5.94144e-5; = IF(p1012=0;p1055/(p1062*p0818);0)
- p1281: 0; = IF(p1277+p1280=p1263;0;IF(p1277+p1280+p1279>p1263;p1263-(p1277+p1280);p1279))
- p2209: 0.00119342; = 14.0067*p2208/30.973762
- p1007: 0; = p1003*p0001*p0004/(p0818*p0002)
- p2367: 0; = p2225*p2196
- p2174: 0.00364561; = p0895*p0903/p0818
- p2531: 0.00020062; = p2335*p1014
- p1604: 0
- p0720: 0
- p2303: 0.000278992; = p2227*p2210
- p2924: 5.69537e-5; = p2338*(p1079+p1081)
- p1289: 0
- p1339: 0.000279085; = p1338*p0001/(p0818*p0002)
- p2351: 0.00230186; = p2232*p2219
- p2991: 0; = p2405*(p1020+p1022)
- p2529: 0.000121591; = p2333*p1014
- p1001: 0; = if(p0978>0;0;if(and(p0687=0;p0691=0;p0695=0;p0699=0);0;IF(p0996+p0999+p1000=1;0;1-(p0996+p0999+p1000))))
- p1607: 0
- p3132: 9.92562e-5; = p2351*p1132
- p1846: 0
- p4542: 5.40093e-6; = p1781*p3481
- p2961: 0; = p2375*(p1079+p1081)
- p1124: 0.33336; = if(p1121=0;p0718/100;0)
- p0504: 0; = SQRT(2)*(IF((2*p0372-1)<0;-1;IF((2*p0372-1)>0;1;0))*SQRT(SQRT((2/(pi()*0.140012289)+LN(1-(2*p0372-1)^2)/2)^2-LN(1-(2*p0372-1)^2)/0.140012289)-(2/(pi()*0.140012289)+LN(1-(2*p0372-1)^2)/2)))
- p2508: 0.000989712; = p2312*p1123
- p0323: 0.5
- p3322: 0; = if(and(p1232=0;p3253<>0);p3253-(p3317+p3318+p3319+p3320+p3321);0)
- p1101: 0.0162883; = IF(p1071=0;IF(p1096=1;0;IF(p1096+p1097>1;1-p1096;p1097));0)
- p0789: 27.691; = p0129*(1+p0657*p0261/100)
- p3104: 0; = p2323*p1023
- p2734: 0.000591788; = p2343*(p1078+p1080)
- p4849: 0; = p1882*p3482
- p1090: 7.49973e-5; = IF(p1071=0;p1084*p0001/(p0818*p0002);0)
- p5215: 5.20752e-7; = p1836*p3484
- p2703: 0.00121759; = p2312*(p1128+p1130)
- p0949: 0; = if(and(p0683=0;or(p0807=480;p0807=32;p0807=1;and(p0807=60;p0901<0.03)));p0937;0)
- p1911: 0
- p0774: 43.368; = p0114*(1+p0642*p0246/100)
- p1650: 0
- p1282: 0.0951155; = IF(p1277+p1280+p1281=p1260;0;p1260-(p1277+p1280+p1281))
- p0232: 46.691
- p1231: 0.0103055; = IF(p1221=0;0;p1230*(p1228+p1229))
- p3314: 0.00107264; = if(and(p1232=0;p3253<>0);p3263*p3289;0)
- p2251: 2.19849e-6; = p2222*p2197
- p0663: 0; = IF(p0399<0.5;-SQRT(p0007*EXP(p0531^2*p0008)-p0007);SQRT(p0007*EXP(p0531^2*p0008)-p0007))
- p1904: 0
- p2112: 0.856281
- p3452: 0; = p3376*p1240
- p0081: 0.472
- p3038: 0; = p2257*p1023
- p2974: 0; = p2388*(p1079+p1081)
- p0665: 0; = IF(p0401<0.5;-SQRT(p0007*EXP(p0533^2*p0008)-p0007);SQRT(p0007*EXP(p0533^2*p0008)-p0007))
- p2749: 0; = p2358*(p1019+p1021)
- p3374: 0.00033997; = if(p1232=0;p3246*p3356/p0818;0)
- p0379: 0.5
- p2205: 0.00190957; = 2*14.0067*p2204/30.973762
- p2608: 0; = p2412*p1014
- p2433: 0.000571659; = p2237*p1014
- p1240: 0; = if(p1232>0;0;IF(p1234+p1238+p1239=1;0;IF(p1234+p1238+p1239+p1237>1;1-(p1234+p1238+p1239);p1237)))
- p1949: 0
- p1593: 0
- p2449: 1.87701e-6; = p2253*p1014
- p5055: 0; = p1882*p3483
- p1223: 0.56
- p3438: 0; = p3362*p1240
- p2148: 3.19269e-7; = p2015*p2076*p2110/(p0818*1000)
- p0595: 0; = IF(p0331<0.5;-SQRT(p0007*EXP(p0463^2*p0008)-p0007);SQRT(p0007*EXP(p0463^2*p0008)-p0007))
- p2941: 0; = p2355*(p1020+p1022)
- p1036: 1.48446e8; = IF(p1012=0;p0795*p0702*1000*p0796/100;0)
- p0344: 0.5
- p2330: 2.47257e-6; = p2224*p2198
- p0474: 0; = SQRT(2)*(IF((2*p0342-1)<0;-1;IF((2*p0342-1)>0;1;0))*SQRT(SQRT((2/(pi()*0.140012289)+LN(1-(2*p0342-1)^2)/2)^2-LN(1-(2*p0342-1)^2)/0.140012289)-(2/(pi()*0.140012289)+LN(1-(2*p0342-1)^2)/2)))
- p1926: 0
- p3216: 0.06; = IF(OR(p1226=0;p1228=0);0;1-p3213-p3214-p3215)
- p2554: 0; = p2358*p1014
- p1756: 9.33252e-6; = p1348*1000/p0818
- p3367: 0.00285945; = if(p1232=0;p3244*p3361/p0818;0)
- p2338: 0.000182223; = p2228*p2206
- p0967: 0
- p0502: 0; = SQRT(2)*(IF((2*p0370-1)<0;-1;IF((2*p0370-1)>0;1;0))*SQRT(SQRT((2/(pi()*0.140012289)+LN(1-(2*p0370-1)^2)/2)^2-LN(1-(2*p0370-1)^2)/0.140012289)-(2/(pi()*0.140012289)+LN(1-(2*p0370-1)^2)/2)))
- p0261: 37.062
- p2997: 0; = p2411*(p1020+p1022)
- p1066: 0.00240565; = IF(p1012=0;p1052/(p1059*p0818);0)
- p1329: 0; = p1328*p0001/(p0818*p0002)
- p2042: 0.07
- p2518: 3.01887e-5; = p2322*p1014
- p2932: 7.51992e-6; = p2346*(p1079+p1081)
- p1723: 0
- p2822: 0; = p2431*(p1128+p1130)
- p2450: 0.000413902; = p2254*p1014
- p2483: 0.00146844; = p2287*p1014
- p1689: 0
- p2073: 0.377647
- p1333: 0.000270963; = p1332*p0001/(p0818*p0002)
- p0650: 0; = IF(p0386<0.5;-SQRT(p0007*EXP(p0518^2*p0008)-p0007);SQRT(p0007*EXP(p0518^2*p0008)-p0007))
- p1779: 0
- p3332: 0; = if(and(p1232=0;p3255<>0);IF((p3328+p3329+p3330+p3331)+(p3255*(p3265*(1-p3277))/p3327)>p3255;p3255-(p3328+p3329+p3330+p3331);p3255*(p3265*(1-p3277))/p3327);0)
- p3316: 0.842048; = if(and(p1232=0;p3253<>0);1-(p3312+p3313+p3314+p3315);0)
- p0829: 0; = if(p0807=480;p0814*(1-p0824);0)
- p2170: 0.00609669; = p2166*(p0913)
- p1840: 0
- p4391: 0; = p1836*p3480
- p0794: 0.15; = p0134*(1+p0662*p0266/100)
- p3404: 0.0127971; = p3366*p1238
- p3427: 0; = p3370*p1239
- p3127: 6.63812e-7; = p2346*p1082
- p1038: 0.010401
- p1854: 0
- p1597: 0
- p3463: 0; = p3368*p1241
- p0135: 98.833
- p2471: 2.86479e-5; = p2275*p1123
- p1127: 0; = if(p1121=0;p0721/100;0)
- p0963: 4.4886e-6; = if(and(p0683>0;or(p0807=480;p0807=32;p0807=1;and(p0807=60;p0901<0.03)));p0939;0)
- p3409: 0; = p3371*p1238
- p1669: 0
- p5255: 6.11318e-7; = p1876*p3484
- p0824: 0.863
- p2996: 0; = p2410*(p1020+p1022)
- p5132: 0; = p1963*p3483
- p1836: 4.66626e-6; = p1428*1000/p0818
- p3426: 0; = p3369*p1239
- p2832: 1.86267e-5; = p2246*(p1020+p1022)
- p2586: 0; = p2390*p1123
- p2869: 0.00017076; = p2283*(p1020+p1022)
- p3469: 0.000153537; = p3374*p1241
- p2375: 0; = p2229*p2204
- p5009: 0; = p1836*p3483
- p0138: 87.505
- p1591: 0
- p2755: 0; = p2364*(p1019+p1021)
- p1316: 0.0789981; = p1312*p1252/p0818
- p2936: 0.000575869; = p2350*(p1129+p1131)
- p3464: 0; = p3369*p1241
- p3303: 0; = if(and(p1232=0;p3252<>0);p3259*p3289;0)
- p0342: 0.5
- p1467: 120
- p0880: 0; = p0868*p0856
- p2432: 0.0200724; = p1158
- p3371: 0; = if(p1232=0;p3245*p3359/p0818;0)
- p3689: 0; = p1962*p3476
- p1306: 0; = p1302*p1252/p0818
- p1177: 0.00028961; = p0801*p0001/(p0818*p0002)
- p1308: 0.477585
- p1307: 0
- p1807: 0
- p2216: 0.000177379; = p1108/p0818
- p1763: 0
- p0016: 77.748
- p2717: 0.000670311; = p2326*(p1019+p1021)
- p1963b: 2.99394e-5; = p1569*p1773+p1570*p1774+p1571*p1775+p1572*p1776+p1573*p1777+p1574*p1778+p1575*p1779+p1576*p1780+p1577*p1781+p1578*p1782+p1579*p1783+p1580*p1784+p1581*p1785+p1582*p1786+p1583*p1787+p1584*p1788+p1585*p1789+p1586*p1790+p1587*p1791
- p1201: 0.65
- p2626: 0; = p2430*p1123
- p1958: 698
- p3236: 0.0140975
- p0174: 0.009
- p2770: 0; = p2379*(p1078+p1080)
- p3415: 5.46025e-5; = p3377*p1238
- p3334: 0; = IF(or(p3254=0;p1232>0);0;p3269*p3277*(p3300*p3292+(1-p3300)*p3296))
- p0406: 0; = SQRT(2)*(IF((2*p0274-1)<0;-1;IF((2*p0274-1)>0;1;0))*SQRT(SQRT((2/(pi()*0.140012289)+LN(1-(2*p0274-1)^2)/2)^2-LN(1-(2*p0274-1)^2)/0.140012289)-(2/(pi()*0.140012289)+LN(1-(2*p0274-1)^2)/2)))
- p1681: 0
- p3481: 0.415956; = if(p1328+p1330+p1332+p1334+p1336+p1338+p1340+p1342+p1344=0;0;p1338/(p1328+p1330+p1332+p1334+p1336+p1338+p1340+p1342+p1344))
- p2502: 6.39404e-6; = p2306*p1073
- p3060: 0; = p2279*p1023
- p0922: 0; = p0677*1000/p0801
- p2902: 0.000126293; = p2316*(p1020+p1022)
- p0490: 0; = SQRT(2)*(IF((2*p0358-1)<0;-1;IF((2*p0358-1)>0;1;0))*SQRT(SQRT((2/(pi()*0.140012289)+LN(1-(2*p0358-1)^2)/2)^2-LN(1-(2*p0358-1)^2)/0.140012289)-(2/(pi()*0.140012289)+LN(1-(2*p0358-1)^2)/2)))
- p0373: 0.5
- p0814: 0; = if(p0807=480;p0810*p0812+p0811*p0813;0)
- p0049: 6.782
- p1558: 0
- p3467: 0; = p3372*p1241
- p0863: 0; = p0675*1000/p0856
- p0050: 87.505
- p1236: 0; = if(p1232>0;0;p0728/100)
- p2593: 0; = p2397*p1014
- p0644: 0; = IF(p0380<0.5;-SQRT(p0007*EXP(p0512^2*p0008)-p0007);SQRT(p0007*EXP(p0512^2*p0008)-p0007))
- p2794: 0; = p2403*(p1019+p1021)
- p1629: 0
- p0155: 2.385
- p3124: 5.48618e-5; = p2343*p1082
- p2366: 0; = p2225*p2195
- p2431: 0; = p2236*p2221
- p3047: 1.40959e-8; = p2266*p1082
- p1144: 6.95297e-6; = if(p1121=0;p1138*p0001/(p0818*p0002);0)
- p3475: 0.152591; = p3380*p1241
- p4765: 0; = p1798*p3482
- p2078: 0.117
- p1739: 0
- p1952: 0
- p1865: 0
- p0929: 1.49745e6; = p0801*p0923
- p1102: 0.0353868; = IF(p1071=0;IF(p1096+p1101=1;0;IF(p1096+p1101+p1098>1;1-(p1096+p1101);p1098));0)
- p1963c: 2.23949e-6; = p1588*p1792+p1589*p1793+p1590*p1794+p1591*p1795+p1592*p1796+p1593*p1797+p1594*p1798+p1595*p1799+p1596*p1800+p1597*p1801+p1598*p1802+p1599*p1803+p1600*p1804+p1601*p1805+p1602*p1806+p1603*p1807+p1604*p1808+p1605*p1809+p1606*p1810+p1607*p1811
- p1943: 0
- p3111: 0; = p2330*p1023
- p2526: 5.84984e-7; = p2330*p1014
- p2900: 0.000272679; = p2314*(p1129+p1131)
- p3479: 0; = if(p1328+p1330+p1332+p1334+p1336+p1338+p1340+p1342+p1344=0;0;p1334/(p1328+p1330+p1332+p1334+p1336+p1338+p1340+p1342+p1344))
- p2253: 7.93359e-6; = p2222*p2199
- p2178: 0.0447242; = (p0895*p0831/(1-p0831))/(p0818)
- p0266: 36.031
- p1728: 0
- p0375: 0.5
- p1964: 0.5
- p0014: 364.934
- p1579: 0
- p2666: 3.52439e-5; = p2275*(p1128+p1130)
- p0753: 0
- p0518: 0; = SQRT(2)*(IF((2*p0386-1)<0;-1;IF((2*p0386-1)>0;1;0))*SQRT(SQRT((2/(pi()*0.140012289)+LN(1-(2*p0386-1)^2)/2)^2-LN(1-(2*p0386-1)^2)/0.140012289)-(2/(pi()*0.140012289)+LN(1-(2*p0386-1)^2)/2)))
- p2971: 0; = p2385*(p1079+p1081)
- p0797: 40.664; = p0137*(1+p0665*p0269/100)
- p0906: 0.0043465
- p2587: 0; = p2391*p1123
- p1244: 0; = if(p1232>0;0;p1239*(p0725/100)*p0723*1000)
- p2106: 0.856281
- p1345: 7.48774e-5; = IF(p1318=0;p1344*p0001/(p0818*p0002);0)
- p2863: 0.000486365; = p2277*(p1020+p1022)
- p2515: 3.02142e-5; = p2319*p1014
- p2599: 0; = p2403*p1014
- p0730: 0
- p2142: 1.50733e-6; = p2015*p2070*p2104/(p0818*1000)
- p2267: 5.34247e-6; = p2226*p2213
- p1468: 27
- p1084: 414335; = IF(p1071=0;p1078*(p0710/100)*p0703*1000;0)
- p3400: 0.0111469; = p3362*p1238
- p2230: 0.0773615; = if(p0783*p0787+p0784*p0788+p0785*p0789+p0786*p0790=0;0;p0787*p0783/(p0783*p0787+p0784*p0788+p0785*p0789+p0786*p0790))
- p2048: 6.54131e-14; = p2015*p2046/(p0818*1000000000000)
- p1578: 0.6832
- p4437: 0; = p1882*p3480
- p2966: 0; = p2380*(p1079+p1081)
- p2237: 0.00241624; = p2222*p2182
- p2419: 0; = p2235*p2209
- p2807: 0; = p2416*(p1078+p1080)
- p2453: 0.000292784; = p2257*p1014
- p0045: 23.659
- p1108: 874302; = IF(p1071=0;p1105*p1102*p1095;0)
- p2080: 0.025
- p1253: 0; = if(p1232>0;0;p0735/100)
- p4903: 0; = p1936*p3482
- p1555: 0
- p2362: 0; = p2225*p2190
- p2877: 3.30892e-6; = p2291*(p1020+p1022)
- p1020: 0.27969; = IF(p1012=0;IF(p1014+p1019=1;0;IF(p1014+p1019+p1016>1;1-(p1014+p1019);p1016));0)
- p2309: 9.60396e-5; = p2227*p2216
- p2931: 3.00258e-6; = p2345*(p1079+p1081)
- p2519: 3.45549e-5; = p2323*p1014
- p3256: 1.98338e8; = p1252*(p1307*(1-p3247)+p1310*(1-p3248)+p1311*(1-p3249)+p1312*(1-p3250))
- p0943: 0; = if(and(p0683=0;p0949=0);p0937;0)
- p0327: 0.5
- p3012: 0; = p2426*(p1079+p1081)
- p1325: 0; = IF(((p0745*1000*p0752/100)+(p0754*1000*p0761/100))/p0801<0;0;((p0745*1000*p0752/100)+(p0754*1000*p0761/100))/p0801)
- p1940: 0
- p1989: 50
- p3667: 0; = p1936*p3476
- p0141: 216.738
- p3210: 0; = p2429*p1132
- p2494: 0.000374534; = p2298*p1073
- p2046: 10
- p0868: 0; = IF(p0858+p0864+p0865+p0866+p0867=1;0;IF(p0858+p0864+p0865+p0866+p0867+p0863>1;1-(p0858+p0864+p0865+p0866+p0867);p0863))
- p3196: 0; = p2415*p1082
- p2169: 0.00100169; = p2166*(p0908)
- p0896: 0.458
- p2359: 0; = p2225*p2187
- p3418: 0.185284; = p3380*p1238
- p1297: 0
- p2286: 0.00114467; = p2223*p2192
- p3174: 0; = p2393*p1023
- p2182: 0.0104479; = p1050/p0818
- p1320: 0.158912; = IF(((p0745*1000*p0747/100)+(p0754*1000*p0756/100))/p0801<0;0;((p0745*1000*p0747/100)+(p0754*1000*p0756/100))/p0801)
- p2649: 0.000102975; = p2258*(p1078+p1080)
- p2738: 2.70213e-5; = p2347*(p1078+p1080)
- p0887: 0; = 1000*p0886*p0001*p0003*p0004/(p0818*p0002)
- p2955: 0; = p2369*(p1020+p1022)
- p0331: 0.5
- p3155: 0; = p2374*p1023
- p2396: 0; = p2234*p2185
- p2778: 0; = p2387*(p1078+p1080)
- p2153: 1.06423e-8; = p2015*p2081*p2115/(p0818*1000)
- p0536: 0; = SQRT(2)*(IF((2*p0404-1)<0;-1;IF((2*p0404-1)>0;1;0))*SQRT(SQRT((2/(pi()*0.140012289)+LN(1-(2*p0404-1)^2)/2)^2-LN(1-(2*p0404-1)^2)/0.140012289)-(2/(pi()*0.140012289)+LN(1-(2*p0404-1)^2)/2)))
- p1649: 0
- p2923: 0.000175878; = p2337*(p1079+p1081)
- p2805: 0; = p2414*(p1078+p1080)
- p2814: 0; = p2423*(p1078+p1080)
- p0947: 0; = if(and(p0683=0;or(p0807=480;p0807=32;p0807=1;and(p0807=60;p0901<0.03)));p0935;0)
- p3013: 0; = p2427*(p1079+p1081)
- p3201: 0; = p2420*p1082
- p0051: 36.225
- p2965: 0; = p2379*(p1079+p1081)
- p0287: 0.5
- p0857: 2.8961; = p0856*p0001*p0003/(p0818*p0002)
- p3028: 0; = p2247*p1023
- p2262: 0.000432488; = p2226*p2208
- p0606: 0; = IF(p0342<0.5;-SQRT(p0007*EXP(p0474^2*p0008)-p0007);SQRT(p0007*EXP(p0474^2*p0008)-p0007))
- p1034: 1.84355e-5; = IF(p1012=0;p1028*p0001/(p0818*p0002);0)
- p3649: 0; = p1918*p3476
- p2870: 0.000195457; = p2284*(p1020+p1022)
- p5338: 1.43785e-5; = p1963*p3484
- p2540: 3.328e-7; = p2344*p1073
- p1994: 750
- p1766: 0
- p0524: 0; = SQRT(2)*(IF((2*p0392-1)<0;-1;IF((2*p0392-1)>0;1;0))*SQRT(SQRT((2/(pi()*0.140012289)+LN(1-(2*p0392-1)^2)/2)^2-LN(1-(2*p0392-1)^2)/0.140012289)-(2/(pi()*0.140012289)+LN(1-(2*p0392-1)^2)/2)))
- p2139: 1.81187e-6; = p2015*p2067*p2101/(p0818*1000)
- p1781: 1.29844e-5; = p1373*1000/p0818
- p2206: 0.000618366; = 9*1.00794*p2204/30.973762
- p2187: 0.000115986; = 4*1.00794*p2186/(2*14.0067)
- p2371: 0; = p2225*p2200
- p2094: 0.922577
- p0804: 0
- p2945: 0; = p2359*(p1020+p1022)
- p3215: 0.450791; = p1222*3*15.9994/100.0869
- p0581: 0; = IF(p0317<0.5;-SQRT(p0007*EXP(p0449^2*p0008)-p0007);SQRT(p0007*EXP(p0449^2*p0008)-p0007))
- p0011: 1045.04
- p3037: 0; = p2256*p1023
- p5296: 6.56601e-7; = p1917*p3484
- p2202: 0.000466762; = 4*1.00794*p2201/(2*14.0067)
- p1331: 4.60225e-5; = p1330*p0001/(p0818*p0002)
- p2441: 5.04295e-5; = p2245*p1014
- p3413: 4.2157e-5; = p3375*p1238
- p3388: 0; = p3369*p1234
- p2828: 9.32123e-6; = p2242*(p1020+p1022)
- p2154: 8.29383e-7; = p2015*p2082*p2116/(p0818*1000)
- p2071: 0.151
- p0748: 46.805; = p0088*(1+p0616*p0220/100)
- p1759: 0
- p3178: 0; = p2397*p1023
- p1876: 5.47778e-6; = p1468*1000/p0818
- p1695: 0
- p3941: 1.22901e-6; = p1798*p3478
- p1755: 0
- p3450: 0; = p3374*p1240
- p2630: 3.01298e-5; = p2239*(p1019+p1021)
- p2420: 0; = p2235*p2210
- p0412: 0; = SQRT(2)*(IF((2*p0280-1)<0;-1;IF((2*p0280-1)>0;1;0))*SQRT(SQRT((2/(pi()*0.140012289)+LN(1-(2*p0280-1)^2)/2)^2-LN(1-(2*p0280-1)^2)/0.140012289)-(2/(pi()*0.140012289)+LN(1-(2*p0280-1)^2)/2)))
- p3445: 0; = p3369*p1240
- p4749: 0; = p1782*p3482
- p0043: 1591.01
- p1963g: 2.75202e-5; = p1667*p1871+p1668*p1872+p1669*p1873+p1670*p1874+p1671*p1875+p1672*p1876+p1673*p1877+p1674*p1878+p1675*p1879+p1676*p1880+p1677*p1881+p1678*p1882+p1679*p1883+p1680*p1884+p1681*p1885+p1682*p1886+p1683*p1887+p1684*p1888+p1685*p1889
- p2054: 0.91
- p2388: 0; = p2229*p2217
- p2373: 0; = p2225*p2202
- p1136: 0; = if(p1121=0;p1130*(p0716/100)*p0703*1000;0)
- p2452: 2.5539e-5; = p2256*p1014
- p0007: 29; = p0006-1
- p0675: 0
- p1832: 0
- p5254: 2.71697e-6; = p1875*p3484
- p1139: 4.36931e-5; = if(p1121=0;p1133*p0001/(p0818*p0002);0)
- p2813: 0; = p2422*(p1078+p1080)
- p2986: 0; = p2400*(p1020+p1022)
- p3238: 0.854735; = IF(p3237+p3235+p3236>1;1-(p3235+p3236);p3237)
- p0551: 0; = IF(p0287<0.5;-SQRT(p0007*EXP(p0419^2*p0008)-p0007);SQRT(p0007*EXP(p0419^2*p0008)-p0007))
- p0961: 0; = if(and(p0683>0;or(p0807=480;p0807=32;p0807=1;and(p0807=60;p0901<0.03)));p0937;0)
- p0958: 0; = if(and(p0683>0;or(p0807=480;p0807=32;p0807=1;and(p0807=60;p0901<0.03)));p0934;0)
- p0729: 0
- p3129: 1.44215e-6; = p2348*p1082
- p0023: 122.651
- p0704: 94.405; = p0044*(1+p0572*p0176/100)
- p1033: 3.20996e-5; = IF(p1012=0;p1027*p0001/(p0818*p0002);0)
- p2065: 0.0758824
- p3183: 0; = p2402*p1023
- p0686: 0
- p1999: 1.01599e8; = (p1228+p1229)*p0818+p1164
- p2422: 0; = p2235*p2212
- p2585: 0; = p2389*p1123
- p3231: 7.53155e-8; = p1176/p0818
- p1224: 0.44; = IF(p1221=0;0;IF(p1193=0;1-p1223;0))
- p1373: 64
- p2735: 2.73415e-7; = p2344*(p1078+p1080)
- p1157: 0.187228
- p1570: 0
- p2544: 1.89351e-5; = p2348*p1073
- p3429: 0; = p3372*p1239
- p3107: 0; = p2326*p1023
- p2817: 0; = p2426*(p1078+p1080)
- p1052: 3.97225e6; = IF(p1012=0;p1045*p1036;0)
- p0483: 0; = SQRT(2)*(IF((2*p0351-1)<0;-1;IF((2*p0351-1)>0;1;0))*SQRT(SQRT((2/(pi()*0.140012289)+LN(1-(2*p0351-1)^2)/2)^2-LN(1-(2*p0351-1)^2)/0.140012289)-(2/(pi()*0.140012289)+LN(1-(2*p0351-1)^2)/2)))
- p2852: 1.59684e-7; = p2266*(p1079+p1081)
- p1626: 0
- p0713: 31.255; = p0053*(1+p0581*p0185/100)
- p1189: 0.00028961; = p0801*p0001/(p0818*p0002)
- p1852: 0
- p3362: 0.0203269; = if(p1232=0;p3244*p3356/p0818;0)
- p1056: 3.72862e7; = IF(p1012=0;p1049*p1036;0)
- p2528: 0.000283611; = p2332*p1014
- p3083: 1.78276e-5; = p2302*p1082
- p2429: 0; = p2236*p2219
- p1747: 0
- p2505: 3.47904e-5; = p2309*p1073
- p1028: 101850; = IF(p1012=0;p1022*(p0704/100)*p0703*1000;0)
- p2798: 0; = p2407*(p1019+p1021)
- p3454: 0; = p3378*p1240
- p0533: 0; = SQRT(2)*(IF((2*p0401-1)<0;-1;IF((2*p0401-1)>0;1;0))*SQRT(SQRT((2/(pi()*0.140012289)+LN(1-(2*p0401-1)^2)/2)^2-LN(1-(2*p0401-1)^2)/0.140012289)-(2/(pi()*0.140012289)+LN(1-(2*p0401-1)^2)/2)))
- p3458: 0.00207583; = p3363*p1241
- p4491: 0; = p1936*p3480
- p3315: 0.00443516; = if(and(p1232=0;p3253<>0);p3264*p3289;0)
- p0542: 0; = IF(p0278<0.5;-SQRT(p0007*EXP(p0410^2*p0008)-p0007);SQRT(p0007*EXP(p0410^2*p0008)-p0007))
- p3395: 0; = p3376*p1234
- p3365: 0.00595335; = if(p1232=0;p3244*p3359/p0818;0)
- p1795: 0
- p1751: 0
- p1700: 0
- p0578: 0; = IF(p0314<0.5;-SQRT(p0007*EXP(p0446^2*p0008)-p0007);SQRT(p0007*EXP(p0446^2*p0008)-p0007))
- p0768: 42.192; = p0108*(1+p0636*p0240/100)
- p2885: 0.000104644; = p2299*(p1079+p1081)
- p2355: 0; = p2225*p2183
- p2435: 1.71393e-5; = p2239*p1014
- p2695: 0.00108732; = p2304*(p1078+p1080)
- p1862: 0
- p2769: 0; = p2378*(p1078+p1080)
- p3213: 0.112803; = p1222*12.0107/100.0869
- p0796: 94.405; = p0136*(1+p0664*p0268/100)
- p1311: 0; = IF(p1307+p1310=p1266;0;IF(p1307+p1310+p1309>p1266;p1266-(p1307+p1310);p1309))
- p0696: 0
- p0915: 0.0170129; = p0914/p0818
- p5177: 3.39621e-7; = p1798*p3484
- p2978: 0; = p2392*(p1129+p1131)
- p2808: 0; = p2417*(p1078+p1080)
- p0886: 0; = p0686*1000*p0687*p0689/100
- p1724: 0
- p2259: 0.000312938; = p2226*p2205
- p1181: 9.77134e-5
- p1820: 0
- p2638: 0.000180415; = p2247*(p1019+p1021)
- p3406: 0; = p3368*p1238
- p2347: 9.07944e-5; = p2228*p2215
- p2304: 0.0036535; = p2227*p2211
- p2969: 0; = p2383*(p1079+p1081)
- p4926: 0; = p1963*p3482
- p3128: 2.50502e-6; = p2347*p1082
- p2659: 3.98206e-6; = p2268*(p1078+p1080)
- p2510: 0.000209582; = p2314*p1123
- p2645: 0.000727613; = p2254*(p1019+p1021)
- p3041: 2.79589e-6; = p2260*p1082
- p0136: 94.405
- p2221: 0.00136661; = p1155-p2220
- p2564: 0; = p2368*p1014
- p1627: 0
- p1853: 0
- p0744: 23.369; = p0084*(1+p0612*p0216/100)
- p3358: 7.2155e6; = if(p1232=0;p3308+p3319+p3330+p3341+p3352;0)
- p2787: 0; = p2396*(p1019+p1021)
- p3275: 0.0214527
- p1830: 0
- p1664: 0
- p0741: 0.472; = p0081*(1+p0609*p0213/100)
- p0484: 0; = SQRT(2)*(IF((2*p0352-1)<0;-1;IF((2*p0352-1)>0;1;0))*SQRT(SQRT((2/(pi()*0.140012289)+LN(1-(2*p0352-1)^2)/2)^2-LN(1-(2*p0352-1)^2)/0.140012289)-(2/(pi()*0.140012289)+LN(1-(2*p0352-1)^2)/2)))
- p0467: 0; = SQRT(2)*(IF((2*p0335-1)<0;-1;IF((2*p0335-1)>0;1;0))*SQRT(SQRT((2/(pi()*0.140012289)+LN(1-(2*p0335-1)^2)/2)^2-LN(1-(2*p0335-1)^2)/0.140012289)-(2/(pi()*0.140012289)+LN(1-(2*p0335-1)^2)/2)))
- p2314: 0.000773449; = p2231*p2221
- p0100: 33.824
- p0647: 0; = IF(p0383<0.5;-SQRT(p0007*EXP(p0515^2*p0008)-p0007);SQRT(p0007*EXP(p0515^2*p0008)-p0007))
- p2569: 0; = p2373*p1014
- p3097: 0; = p2316*p1023
- p1880: 0
- p1847: 3.65186e-6; = p1439*1000/p0818
- p2928: 4.74591e-5; = p2342*(p1079+p1081)
- p1849: 0
- p4679: 1.85657e-6; = p1918*p3481
- p2825: 2.51739e-5; = p2239*(p1020+p1022)
- p3383: 0; = p3364*p1234
- p2989: 0; = p2403*(p1020+p1022)
- p3203: 0; = p2422*p1082
- p2619: 0; = p2423*p1073
- p1680: 0
- p1029: 0; = IF(p1012=0;IF(p0801<p1023*(p0704/100)*p0703*1000;p0801;p1023*(p0704/100)*p0703*1000);0)
- p2090: 0.40001
- p3891: 5.56651e-8; = p1954*p3477
- p2260: 0.000101337; = p2226*p2206
- p2295: 0.00028485; = p2223*p2202
- p0004: 0.0254
- p0398: 0.5
- p2606: 0; = p2410*p1014
- p2592: 0; = p2396*p1014
- p2172: 0.260466; = p2166-(p2167+p2168+p2169+p2170)
- p2184: 0.000313245; = p1051/p0818
- p1326: 0; = IF(((p0745*1000*p0753/100)+(p0754*1000*p0762/100))/p0801<0;0;((p0745*1000*p0753/100)+(p0754*1000*p0762/100))/p0801)
- p2722: 2.26097e-6; = p2331*(p1019+p1021)
- p2118: 0.679049
- p3267: 0.0170629
- p2618: 0; = p2422*p1073
- p0320: 0.5
- p2937: 0.000811521; = p2351*(p1129+p1131)
- p2655: 2.51312e-5; = p2264*(p1078+p1080)
- p2631: 0.00010378; = p2240*(p1019+p1021)
- p4955: 0; = p1782*p3483
- p1330: 254259; = p1320*p0801
- p1933: 0
- p5333: 9.05656e-8; = p1954*p3484
- p3015: 0; = p2429*(p1129+p1131)
- p1767: 0
- p4102: 5.20322e-5; = p1963*p3478
- p0203: 42.085
- p4676: 1.68779e-7; = p1915*p3481
- p3398: 0; = p3379*p1234
- p3119: 5.02752e-6; = p2338*p1082
- p2123: 0.263965
- p4264: 0; = p1915*p3479
- p0724: 12.833; = p0064*(1+p0592*p0196/100)
- p0208: 29.599
- p1343: 0; = p1342*p0001/(p0818*p0002)
- p1031: 8.09736e-5; = IF(p1012=0;p1025*p0001/(p0818*p0002);0)
- p3162: 0; = p2381*p1082
- p0911: 0.0041
- p3165: 0; = p2384*p1082
- p0984: 0; = if(p0886=0;0;min(1;(p0699*p0698*1000*p0701/100)/p0886))
- p2398: 0; = p2234*p2187
- p0855: 0.801954; = p0854*p0001*p0003/(p0818*p0002)
- p3480: 0; = if(p1328+p1330+p1332+p1334+p1336+p1338+p1340+p1342+p1344=0;0;p1336/(p1328+p1330+p1332+p1334+p1336+p1338+p1340+p1342+p1344))
- p1628: 0
- p2963: 0; = p2377*(p1079+p1081)
- p2648: 0.000514696; = p2257*(p1019+p1021)
- p2379: 0; = p2229*p2208
- p1956: 0
- p3010: 0; = p2424*(p1079+p1081)
- p0615: 0; = IF(p0351<0.5;-SQRT(p0007*EXP(p0483^2*p0008)-p0007);SQRT(p0007*EXP(p0483^2*p0008)-p0007))
- p1093: 0; = IF(p1071=0;p1087*p0001/(p0818*p0002);0)
- p1834: 0
- p2843: 0.000430037; = p2257*(p1020+p1022)
- p2357: 0; = p2225*p2185
- p2562: 0; = p2366*p1014
- p4608: 1.51901e-6; = p1847*p3481
- p3439: 0; = p3363*p1240
- p0981: 0.00028961; = p0978*p0001/(p0818*p0002)
- p1722: 0
- p2773: 0; = p2382*(p1078+p1080)
- p1868: 0
- p0370: 0.5
- p2010: 0.00279483; = ((p1984*p1985+p1990*p1991+p1996*p1997+p2004*p2005)/p0818)*p0005*p0002/1000
- p1937: 0
- p2603: 0; = p2407*p1014
- p2439: 8.11849e-5; = p2243*p1014
- p1589: 0
- p3529: 0; = p1798*p3476
- p0419: 0; = SQRT(2)*(IF((2*p0287-1)<0;-1;IF((2*p0287-1)>0;1;0))*SQRT(SQRT((2/(pi()*0.140012289)+LN(1-(2*p0287-1)^2)/2)^2-LN(1-(2*p0287-1)^2)/0.140012289)-(2/(pi()*0.140012289)+LN(1-(2*p0287-1)^2)/2)))
- p2754: 0; = p2363*(p1019+p1021)
- p1642: 0
- p0053: 31.255
- p5337: 7.70901e-6; = p1962*p3484
- p2101: 0.620397
- p1806: 0
- p1153: 0.365265
- p3330: 0; = if(and(p1232=0;p3255<>0);p3255*(p3267-p3325)/p3327;0)
- p2576: 0; = p2380*p1073
- p2893: 1.38167e-5; = p2307*(p1079+p1081)
- p1878: 0
- p2613: 0; = p2417*p1073
- p2086: 0.0617647
- p3287: 0.745
- p3979: 1.88448e-6; = p1836*p3478
- p0865: 0; = IF(p0858+p0864=1;0;IF(p0858+p0864+p0860>1;1-(p0858+p0864);p0860))
- p2464: 4.84695e-6; = p2268*p1073
- p1652: 0
- p1528: 57
- p4402: 0; = p1847*p3480
- p0641: 0; = IF(p0377<0.5;-SQRT(p0007*EXP(p0509^2*p0008)-p0007);SQRT(p0007*EXP(p0509^2*p0008)-p0007))
- p2827: 6.47656e-5; = p2241*(p1020+p1022)
- p3460: 0.00268865; = p3365*p1241
- p4267: 0; = p1918*p3479
- p2847: 0.000262978; = p2261*(p1079+p1081)
- p2762: 0; = p2371*(p1019+p1021)
- p0191: 21.811
- p2522: 0.000381306; = p2326*p1014
- p2020: 835771; = p2015*p2018*p2019
- p3379: 4.78247e-5; = if(p1232=0;p3246*p3361/p0818;0)
- p2940: 0; = p2354*(p1020+p1022)
- p3280: 0.375
- p1300: 0; = IF(p1297=p1265;0;IF(p1297+p1298>p1265;p1265-p1297;p1298))
- p0786: 0
- p1750: 0.38825
- p0988: 0; = p0982*p0886
- p0505: 0; = SQRT(2)*(IF((2*p0373-1)<0;-1;IF((2*p0373-1)>0;1;0))*SQRT(SQRT((2/(pi()*0.140012289)+LN(1-(2*p0373-1)^2)/2)^2-LN(1-(2*p0373-1)^2)/0.140012289)-(2/(pi()*0.140012289)+LN(1-(2*p0373-1)^2)/2)))
- p2733: 4.51905e-5; = p2342*(p1078+p1080)
- p3166: 0; = p2385*p1082
- p1839: 0
- p0123: 30.96
- p2960: 0; = p2374*(p1020+p1022)
- p3336: 0; = IF(or(p3254=0;p1232>0);0;p3271*p3289)
- p1116: 3.57177e-5; = IF(p1071=0;p1106/(p1111*p0818);0)
- p2217: 0.00158975; = p1118-p2216
- p1123: 0.27097; = if(p1121=0;p0717/100;0)
- p3027: 0; = p2246*p1023
- p2409: 0; = p2234*p2199
- p1103: 0.421213; = IF(p1071=0;IF(p1096+p1101+p1102=1;0;IF(p1096+p1101+p1102+p1099>1;1-(p1096+p1101+p1102);p1099));0)
- p1305: 0; = p1301*p1252/p0818
- p0537: 0; = IF(p0273<0.5;-SQRT(p0007*EXP(p0405^2*p0008)-p0007);SQRT(p0007*EXP(p0405^2*p0008)-p0007))
- p2862: 0.00221566; = p2276*(p1020+p1022)
- p2462: 1.85076e-7; = p2266*p1073
- p1598: 0
- p2140: 9.2653e-7; = p2015*p2068*p2102/(p0818*1000)
- p0773: 87.505; = p0113*(1+p0641*p0245/100)
- p3446: 0; = p3370*p1240
- p2485: 0.00311159; = p2289*p1014
- p0812: 0; = if(p0807=480;0.095/0.34;0)
- p1199: -0.29
- p2555: 0; = p2359*p1014
- p2306: 1.76509e-5; = p2227*p2213
- p1206: 0.023475
- p1580: 0
- p0259: 47.787
- p3151: 0; = p2370*p1023
- p0867: 0.228084; = IF(p0858+p0864+p0865+p0866=1;0;IF(p0858+p0864+p0865+p0866+p0862>1;1-(p0858+p0864+p0865+p0866);p0862))
- p3812: 1.66995e-6; = p1875*p3477
- p2694: 8.30307e-5; = p2303*(p1078+p1080)
- p1802: 0
- p2884: 0.000323148; = p2298*(p1079+p1081)
- p1573: 0
- p2149: 2.40852e-7; = p2015*p2077*p2111/(p0818*1000)
- p2197: 9.50631e-6; = p1055/p0818
- p2129: 8.06194e-6; = p2015*p2057*p2091/(p0818*1000)
- p1817: 0
- p3045: 2.3298e-6; = p2264*p1082
- p0104: 94.405
- p1327: 0.258545; = if(p1318=0;if(p1327a=0;1;if(p1327a<0;0;p1327a));0)
- p2907: 8.1707e-5; = p2321*(p1020+p1022)
- p3240: 8.49731e-9; = p3234*p1188*p3235/p0818
- p0096: 20.726
- p3208: 0; = p2427*p1082
- p2970: 0; = p2384*(p1079+p1081)
- p2553: 0; = p2357*p1014
- p2921: 0.000294667; = p2335*(p1020+p1022)
- p0622: 0; = IF(p0358<0.5;-SQRT(p0007*EXP(p0490^2*p0008)-p0007);SQRT(p0007*EXP(p0490^2*p0008)-p0007))
- p0994: 0; = p0990*p0001*p0004/(p0818*p0002)
- p2517: 5.5629e-5; = p2321*p1014
- p0714: 0
- p0453: 0; = SQRT(2)*(IF((2*p0321-1)<0;-1;IF((2*p0321-1)>0;1;0))*SQRT(SQRT((2/(pi()*0.140012289)+LN(1-(2*p0321-1)^2)/2)^2-LN(1-(2*p0321-1)^2)/0.140012289)-(2/(pi()*0.140012289)+LN(1-(2*p0321-1)^2)/2)))
- p3417: 2.62261e-5; = p3379*p1238
- p1753: 0
- p0414: 0; = SQRT(2)*(IF((2*p0282-1)<0;-1;IF((2*p0282-1)>0;1;0))*SQRT(SQRT((2/(pi()*0.140012289)+LN(1-(2*p0282-1)^2)/2)^2-LN(1-(2*p0282-1)^2)/0.140012289)-(2/(pi()*0.140012289)+LN(1-(2*p0282-1)^2)/2)))
- p2199: 3.4305e-5; = p1069-p2197-p2198
- p2385: 0; = p2229*p2214
- p1990: 30
- p2993: 0; = p2407*(p1020+p1022)
- p1960: 340.483; = IF(p1959-p1958<0;0;p1959-p1958)
- p1190: 1.81676e-7; = p1188/p0818
- p2408: 0; = p2234*p2198
- p1551: 0
- p1292: 0; = IF(p1287+p1290+p1291=p1261;0;p1261-(p1287+p1290+p1291))
- p0272: 12.691
- p3050: 1.39308e-6; = p2269*p1082
- p1694: 0
- p2901: 0.000575335; = p2315*(p1020+p1022)
- p2987: 0; = p2401*(p1020+p1022)
- p1874: 0
- p5061: 0; = p1888*p3483
- p1022: 0.06781; = IF(p1012=0;IF(p1014+p1019+p1020+p1021=1;0;IF(p1014+p1019+p1020+p1021+p1018>1;1-(p1014+p1019+p1020+p1021);p1018));0)
- p3407: 0; = p3369*p1238
- p0890: 0; = p0686*1000*p0687*p0885/100
- p2191: 0.000231777; = 8*1.00794*p2189/(2*14.0067)
- p1615: 0
- p1301: 0; = IF(p1297+p1300=p1265;0;IF(p1297+p1300+p1299>p1265;p1265-(p1297+p1300);p1299))
- p0831: 0.137; = 1-p0824
- p0762: 0
- p3040: 8.63395e-6; = p2259*p1082
- p3277: 0.55
- p0087: 4.655
- p0849: 0
- p2305: 1.68798e-6; = p2227*p2212
- p0721: 0
- p3154: 0; = p2373*p1023
- p0706: 29.784; = p0046*(1+p0574*p0178/100)
- p3218: 0.00633628; = p3214*p1228
- p1200: 0.84
- p2245: 0.000213151; = p2222*p2190
- p0633: 0; = IF(p0369<0.5;-SQRT(p0007*EXP(p0501^2*p0008)-p0007);SQRT(p0007*EXP(p0501^2*p0008)-p0007))
- p2642: 9.14372e-7; = p2251*(p1019+p1021)
- p4224: 0; = p1875*p3479
- p0013: 91.36
- p2604: 0; = p2408*p1014
- p2951: 0; = p2365*(p1020+p1022)
- p0938: 0; = p0932*p0001/(p0818*p0002)
- p2023: 2.12
- p3085: 0.0001008; = p2304*p1082
- p0196: 30.225
- p3328: 0; = if(and(p1232=0;p3255<>0);p3255*(p3265*p3277-p3323)/p3327;0)
- p1950: 0
- p1055: 46856.6; = IF(p1012=0;p1048*p1036;0)
- p1575: 0
- p0452: 0; = SQRT(2)*(IF((2*p0320-1)<0;-1;IF((2*p0320-1)>0;1;0))*SQRT(SQRT((2/(pi()*0.140012289)+LN(1-(2*p0320-1)^2)/2)^2-LN(1-(2*p0320-1)^2)/0.140012289)-(2/(pi()*0.140012289)+LN(1-(2*p0320-1)^2)/2)))
- p3193: 0; = p2412*p1023
- p0903: 0.0129401
- p0178: 21.943
- p2968: 0; = p2382*(p1079+p1081)
- p2318: 0.000170978; = p2224*p2185
- p5293: 5.20752e-7; = p1914*p3484
- p3363: 0.0045964; = if(p1232=0;p3244*p3357/p0818;0)
- p4231: 0; = p1882*p3479
- p0976: 0; = IF(p0687=0;IF(OR(p0686=0;p0689=0);0;p0686*1000*p0689/100);0)
- p2340: 0.000777692; = p2228*p2208
- p0122: 55.992
- p2444: 0.000556478; = p2248*p1014
- p1686: 0
- p1699: 0
- p0008: 0.0350765; = (p0007-1.5)/(p0007-1)^2
- p1871: 0
- p2448: 8.53727e-7; = p2252*p1014
- p0808: 0
- p1857: 0
- p1638: 0
- p0282: 0.5
- p0347: 0.5
- p3102: 0; = p2321*p1023
- p2779: 0; = p2388*(p1078+p1080)
- p2455: 0.000113362; = p2259*p1073
- p2440: 4.40574e-5; = p2244*p1014
- p1296: 0; = p1292*p1252/p0818
- p1560: 0
- p1557: 0
- p1060: 0.21
- p0103: 1591.01
- p0459: 0; = SQRT(2)*(IF((2*p0327-1)<0;-1;IF((2*p0327-1)>0;1;0))*SQRT(SQRT((2/(pi()*0.140012289)+LN(1-(2*p0327-1)^2)/2)^2-LN(1-(2*p0327-1)^2)/0.140012289)-(2/(pi()*0.140012289)+LN(1-(2*p0327-1)^2)/2)))
- p1583: 0
- p0815: 0
- p1232: 0
- p1257: 0; = if(p1232>0;0;IF(p1253+p1256=1;0;IF(p1253+p1256+p1255>1;1-(p1253+p1256);p1255)))
- p3364: 0.00143981; = if(p1232=0;p3244*p3358/p0818;0)
- p2780: 0; = p2389*(p1128+p1130)
- p0866: 0.0571; = IF(p0858+p0864+p0865=1;0;IF(p0858+p0864+p0865+p0861>1;1-(p0858+p0864+p0865);p0861))
- p1603: 0
- p2656: 0.000329104; = p2265*(p1078+p1080)
- p0115: 39.119
- p0642: 0; = IF(p0378<0.5;-SQRT(p0007*EXP(p0510^2*p0008)-p0007);SQRT(p0007*EXP(p0510^2*p0008)-p0007))
- p3735: 2.08744e-7; = p1798*p3477
- p4748: 0; = p1781*p3482
- p1858: 0
- p2881: 9.89853e-5; = p2295*(p1020+p1022)
- p1246: 34463.9; = if(p1232>0;0;p1241*(p0725/100)*p0723*1000)
- p4311: 0; = p1756*p3480
- p0973: 1.95159e8; = p0967+p0968+p0969
- p0852: 0; = p0847*p0851^3+p0848*p0851^2+p0849*p0851+p0850
- p1118: 0.00176713; = IF(p1071=0;p1108/(p1113*p0818);0)
- p1390: 15
- p2263: 0.000195576; = p2226*p2209
- p1571: 0
- p0443: 0; = SQRT(2)*(IF((2*p0311-1)<0;-1;IF((2*p0311-1)>0;1;0))*SQRT(SQRT((2/(pi()*0.140012289)+LN(1-(2*p0311-1)^2)/2)^2-LN(1-(2*p0311-1)^2)/0.140012289)-(2/(pi()*0.140012289)+LN(1-(2*p0311-1)^2)/2)))
- p1635: 0
- p1908: 0
- p2164: 0.00235043; = (p2015/p0818)-(p2022)-(p2035+p2036+p2052)-(p2017/p0818)-(p2039+p2041+p2044+p2158+p2159+p2160+p2161+p2162)
- p1125: 0.35255; = if(p1121=0;p0719/100;0)
- p1280: 0.228495; = IF(p1277=p1263;0;IF(p1277+p1278>p1263;p1263-p1277;p1278))
- p3308: 0; = if(and(p1232=0;p3252<>0);p3252*(p3259-p3303)/p3305;0)
- p2524: 0.000807976; = p2328*p1014
- p0697: 0
- p1143: 0; = if(p1121=0;p1137*p0001/(p0818*p0002);0)
- p3282: 0.3
- p0933: 24798; = p0801*p0927
- p2239: 7.2443e-5; = p2222*p2184
- p3054: 2.15281e-5; = p2273*p1132
- p1112: 0.209482
- p3003: 0; = p2417*(p1079+p1081)
- p3080: 9.23731e-6; = p2299*p1082
- p3296: 0.514
- p1159: 0.5
- p0125: 44.78
- p2696: 5.02359e-7; = p2305*(p1078+p1080)
- p0918: 0; = p0680*1000/p0801
- p2147: 3.89299e-7; = p2015*p2075*p2109/(p0818*1000)
- p2547: 0.000623735; = p2351*p1123
- p2487: 2.25283e-6; = p2291*p1014
- p2472: 0.0015085; = p2276*p1014
- p1630: 0
- p2313: 0.00044509; = p2231*p2220
- p1837: 0
- p3118: 1.55254e-5; = p2337*p1082
- p2204: 0.00211136; = p1109/p0818
- p3784: 2.50493e-7; = p1847*p3477
- p0708: 11.807; = p0048*(1+p0576*p0180/100)
- p0893: 0.338027; = 1000*(p0890+p0892)*p0001*p0003*p0004/(p0818*p0002)
- p2334: 7.39661e-5; = p2224*p2202
- p2411: 0; = p2234*p2201
- p1584: 0
- p2690: 9.96417e-5; = p2299*(p1078+p1080)
- p1774: 0
- p2713: 5.30698e-5; = p2322*(p1019+p1021)
- p2973: 0; = p2387*(p1079+p1081)
- p0137: 40.664
- p0960: 1.40729e-5; = if(and(p0683>0;or(p0807=480;p0807=32;p0807=1;and(p0807=60;p0901<0.03)));p0936;0)
- p2137: 3.07946e-7; = p2015*p2065*p2099/(p0818*1000)
- p3001: 0; = p2415*(p1079+p1081)
- p1991: 1.34954e8; = (if(p1111=0;0;p1106/p1111)+if(p1112=0;0;p1107/p1112)+if(p1113=0;0;p1108/p1113)+if(p1114=0;0;p1109/p1114)+if(p1115=0;0;p1110/p1115))*(1+p1157)
- p3335: 0; = IF(or(p3254=0;p1232>0);0;p3270*(p3280*(p3283*p1256+p3286*(p1253+p1257)+p1258*p3288+p3300*p3287)))
- p3356: 1.01867e8; = if(p1232=0;p3306+p3317+p3328+p3339+p3350;0)
- p1657: 0
- p0702: 1591.01; = p0042*(1+p0570*p0174/100)
- p2403: 0; = p2234*p2192
- p0322: 0.5
- p0349: 0.5
- p2333: 0.00051393; = p2224*p2201

- p0693: 0
- p1692: 0
- p2008: 0.0698707; = ((p1982*p1985+p1988*p1991+p1994*p1997+p2002*p2005)/p0818)*p0005*p0002/1000
- p1215: 0.0350765; = IF(p1214=0;0;(p1214-1.5)/(p1214-1)^2)
- p1879: 0
- p2336: 0.000622184; = p2228*p2204
- p2498: 0.000234072; = p2302*p1073
- p2903: 1.72495e-5; = p2317*(p1020+p1022)
- p3333: 0; = if(and(p1232=0;p3255<>0);p3255-(p3328+p3329+p3330+p3331+p3332);0)
- p3133: 1.20953e-5; = p2352*p1132
- p3483: 0; = if(p1328+p1330+p1332+p1334+p1336+p1338+p1340+p1342+p1344=0;0;p1342/(p1328+p1330+p1332+p1334+p1336+p1338+p1340+p1342+p1344))
- p2639: 0.000978253; = p2248*(p1019+p1021)
- p2799: 0; = p2408*(p1019+p1021)
- p2326: 0.00161167; = p2224*p2193
- p0677: 0
- p2742: 0.000767348; = p2351*(p1128+p1130)
- p3258: 0.0491162
- p1000: 0; = IF(p0996+p0999=1;0;IF(p0996+p0999+p0998>1;1-(p0996+p0999);p0998))
- p1768: 0
- p2454: 0.000125341; = p2258*p1073
- p0952: 0; = if(and(p0683>0;or(p0807=56;p0807=100;and(p0807=60;p0901>0.06)));p0934;0)
- p1209: 64.0373; = p1206*p0818*p0822/p0801
- p1715: 0
- p2180: 1.09721e-7; = p3233*p1188/(p0818)
- p2055: 5.59471
- p0080: 97.411
- p2781: 0; = p2390*(p1128+p1130)
- p3136: 0; = p2355*p1023
- p2284: 0.000562467; = p2223*p2190
- p0761: 0
- p0575: 0; = IF(p0311<0.5;-SQRT(p0007*EXP(p0443^2*p0008)-p0007);SQRT(p0007*EXP(p0443^2*p0008)-p0007))
- p3156: 0; = p2375*p1082
- p1568: 0
- p2041: 2.87818e-6; = p2015*p2040/(p0818*1000)
- p2768: 0; = p2377*(p1078+p1080)
- p1293: 0; = p1287*p1252/p0818
- p0901: 0.02704
- p2285: 0.000141446; = p2223*p2191
- p3150: 0; = p2369*p1023
- p1041: 0.337699
- p1921: 0
- p1133: 241390; = if(p1121=0;p1123*(p0716/100)*p0703*1000;0)
- p1037: 0.346912
- p1963: 0.00012884; = p1963a+p1963b+p1963c+p1963d+p1963e+p1963f+p1963g+p1963h+p1963i+p1963j+p1963k
- p1867: 0
- p0662: 0; = IF(p0398<0.5;-SQRT(p0007*EXP(p0530^2*p0008)-p0007);SQRT(p0007*EXP(p0530^2*p0008)-p0007))
- p1323: 0; = IF(((p0745*1000*p0750/100)+(p0754*1000*p0759/100))/p0801<0;0;((p0745*1000*p0750/100)+(p0754*1000*p0759/100))/p0801)
- p4885: 0; = p1918*p3482
- p2017: 1.47879e7; = p2015*p0898
- p2007: 0.0372644; = ((p1981*p1985+p1987*p1991+p1993*p1997+p2001*p2005)/p0818)*p0005*p0002/1000
- p0599: 0; = IF(p0335<0.5;-SQRT(p0007*EXP(p0467^2*p0008)-p0007);SQRT(p0007*EXP(p0467^2*p0008)-p0007))
- p2838: 1.25394e-6; = p2252*(p1020+p1022)
- p1115: 0.237849
- p1304: 0; = p1300*p1252/p0818
- p0923: 0.935909; = IF(p0918=1;0;IF(p0918+p0919>1;1-p0918;p0919))
- p2386: 0; = p2229*p2215
- p2415: 0; = p2235*p2205
- p1291: 0; = IF(p1287+p1290=p1264;0;IF(p1287+p1290+p1289>p1264;p1264-(p1287+p1290);p1289))
- p2669: 7.95068e-5; = p2278*(p1019+p1021)
- p2238: 0.000530394; = p2222*p2183
- p2394: 0; = p2234*p2183
- p0752: 0
- p3141: 0; = p2360*p1023
- p3186: 0; = p2405*p1023
- p3370: 0; = if(p1232=0;p3245*p3358/p0818;0)
- p0454: 0; = SQRT(2)*(IF((2*p0322-1)<0;-1;IF((2*p0322-1)>0;1;0))*SQRT(SQRT((2/(pi()*0.140012289)+LN(1-(2*p0322-1)^2)/2)^2-LN(1-(2*p0322-1)^2)/0.140012289)-(2/(pi()*0.140012289)+LN(1-(2*p0322-1)^2)/2)))
- p2177: 0.14492; = p0895/p0818-(p2173+p2174+p2175+p2176)
- p2572: 0; = p2376*p1073
- p1800: 0
- p2906: 6.38702e-6; = p2320*(p1020+p1022)
- p1196: 0.59
- p2625: 0; = p2429*p1123
- p0380: 0.5
- p2746: 0; = p2355*(p1019+p1021)
- p0455: 0; = SQRT(2)*(IF((2*p0323-1)<0;-1;IF((2*p0323-1)>0;1;0))*SQRT(SQRT((2/(pi()*0.140012289)+LN(1-(2*p0323-1)^2)/2)^2-LN(1-(2*p0323-1)^2)/0.140012289)-(2/(pi()*0.140012289)+LN(1-(2*p0323-1)^2)/2)))
- p3401: 0.00252058; = p3363*p1238
- p2624: 0; = p2428*p1123
- p3139: 0; = p2358*p1023
- p3613: 0; = p1882*p3476
- p3851: 3.20074e-7; = p1914*p3477
- p0664: 0; = IF(p0400<0.5;-SQRT(p0007*EXP(p0532^2*p0008)-p0007);SQRT(p0007*EXP(p0532^2*p0008)-p0007))
- p3391: 0; = p3372*p1234
- p1945: 0
- p2061: 0.518824
- p1809: 0
- p1970: 1.6e6; = p0801
- p0624: 0; = IF(p0360<0.5;-SQRT(p0007*EXP(p0492^2*p0008)-p0007);SQRT(p0007*EXP(p0492^2*p0008)-p0007))
- p0511: 0; = SQRT(2)*(IF((2*p0379-1)<0;-1;IF((2*p0379-1)>0;1;0))*SQRT(SQRT((2/(pi()*0.140012289)+LN(1-(2*p0379-1)^2)/2)^2-LN(1-(2*p0379-1)^2)/0.140012289)-(2/(pi()*0.140012289)+LN(1-(2*p0379-1)^2)/2)))
- p1235: 0.54838; = if(p1232>0;0;p0727/100)
- p2335: 0.000847963; = p2224*p2203
- p0959: 0.000271049; = if(and(p0683>0;or(p0807=480;p0807=32;p0807=1;and(p0807=60;p0901<0.03)));p0935;0)
- p2944: 0; = p2358*(p1020+p1022)
- p1556: 0
- p1559: 0
- p0378: 0.5
- p2399: 0; = p2234*p2188
- p3457: 0.00918003; = p3362*p1241
- p1716: 0
- p2292: 2.09353e-5; = p2223*p2199
- p3263: 0.0214527
- p2236: 0; = 1-(p2230+p2231+p2232+p2233)
- p1154: 0.0110332; = if(p1152*p0818=0;0;p1150/(p1152*p0818))
- p0179: 24.362
- p0306: 0.5
- p3266: 0.0545989
- p4513: 0; = p1962*p3480
- p3346: 0.0121182; = if(and(p1232=0;p3256<>0);p3274*(p3281*(p3285*p1256+p3286*(p1253+p1257)+p1258*p3288));0)
- p3449: 0; = p3373*p1240
- p1893: 0
- p1104: 0.52649; = IF(p1071=0;IF(p1096+p1101+p1102+p1103=1;0;1-(p1096+p1101+p1102+p1103));0)
- p1810: 0
- p0197: 39.776
- p2117: 0.585147
- p2466: 1.05301e-5; = p2270*p1073
- p3298: 0; = if(p1283+p1284+p1285+p1286=0;0;p1283/(p1283+p1284+p1285+p1286))
- p0382: 0.5
- p1137: 0; = if(p1121=0;p1131*(p0716/100)*p0703*1000;0)
- p2294: 0.00197919; = p2223*p2201
- p1919: 0
- p0875: 0; = p0874*p0001*p0003/(p0818*p0002)
- p2650: 9.31333e-5; = p2259*(p1078+p1080)
- p3433: 0; = p3376*p1239
- p3044: 5.39595e-6; = p2263*p1082
- p2662: 7.75355e-5; = p2271*(p1078+p1080)
- p0286: 0.5
- p2874: 0.000462341; = p2288*(p1020+p1022)
- p3173: 0; = p2392*p1132
- p2468: 9.60003e-5; = p2272*p1123
- p1204: 0.980791
- p2088: 0.798875
- p3064: 0; = p2283*p1023
- p2550: 0; = p2354*p1014
- p2278: 0.000191164; = p2223*p2184
- p4469: 0; = p1914*p3480
- p1321: 0.935613; = IF(((p0745*1000*p0748/100)+(p0754*1000*p0757/100))/p0801<0;0;((p0745*1000*p0748/100)+(p0754*1000*p0757/100))/p0801)
- p0111: 34.735
- p2248: 0.00235208; = p2222*p2193
- p2802: 0; = p2411*(p1019+p1021)
- p0107: 44.22
- p3300: 0; = if(p1293+p1294+p1295+p1296=0;0;p1293/(p1293+p1294+p1295+p1296))
- p1757: 0
- p3143: 0; = p2362*p1023
- p0908: 0.00197823
- p2316: 0.000363433; = p2224*p2183
- p2160: 4.68691e-7; = p2015*p2084*p2122/(p0818*1000)
- p4814: 0; = p1847*p3482
- p0792: 0
- p0900: 0.915333; = p0899/p0818
- p2264: 8.44435e-5; = p2226*p2210
- p0134: 0.15
- p0001: 0.404686
- p2685: 0.000823164; = p2294*(p1019+p1021)
- p0210: 0.008
- p3354: 8.18458e7; = IF((p3350+p3351+p3352+p3353)+IF(p3349=0;0;(p3256*(p3273*(1-p3277))/p3349))>p3256;p3256-(p3350+p3351+p3352+p3353);IF(p3349=0;0;p3256*(p3273*(1-p3277))/p3349))
- p5091: 0; = p1918*p3483
- p1791: 0
- p1676: 0
- p1161: 1.6e6; = p0801
- p3067: 0; = p2286*p1023
- p2712: 9.77921e-5; = p2321*(p1019+p1021)
- p1087: 0; = IF(p1071=0;p1081*(p0710/100)*p0703*1000;0)
- p2525: 3.56406e-7; = p2329*p1014
- p0052: 29.761
- p4353: 0; = p1798*p3480
- p2503: 1.60138e-5; = p2307*p1073
- p2146: 1.35173e-7; = p2015*p2074*p2108/(p0818*1000)
- p2516: 4.34851e-6; = p2320*p1014
- p0982: 0; = if(p0886=0;0;min(1;(p0691*p0690*1000*p0693/100)/p0886))
- p2710: 5.31146e-5; = p2319*(p1019+p1021)
- p1855: 0
- p1507: 2
- p0142: 46.255
- p1623: 0
- p2258: 0.000346008; = p2226*p2204
- p3403: 0.0032647; = p3365*p1238
- p0358: 0.5
- p0636: 0; = IF(p0372<0.5;-SQRT(p0007*EXP(p0504^2*p0008)-p0007);SQRT(p0007*EXP(p0504^2*p0008)-p0007))
- p1208: 0; = p1205*p0818*p0822/p0801
- p2477: 1.67465e-5; = p2281*p1014
- p2067: 0.446471
- p1261: 0; = if(p1232>0;0;p0732/100)
- p1915: 4.05762e-7; = p1507*1000/p0818
- p0311: 0.5
- p2312: 0.00365248; = p2231*p2219
- p3004: 0; = p2418*(p1079+p1081)
- p2876: 2.01598e-6; = p2290*(p1020+p1022)
- p2036: 2.38291e-5; = p2015*p2030*(1-p2032)/(p0818*1000)
- p0057: 27.097
- p2890: 0.0011419; = p2304*(p1079+p1081)
- p2271: 0.000260527; = p2226*p2217
- p2552: 0; = p2356*p1014
- p0656: 0; = IF(p0392<0.5;-SQRT(p0007*EXP(p0524^2*p0008)-p0007);SQRT(p0007*EXP(p0524^2*p0008)-p0007))
- p2702: 0.000864024; = p2311*(p1128+p1130)
- p2479: 0.000116259; = p2283*p1014
- p1927: 0
- p3095: 3.33511e-5; = p2314*p1132
- p3390: 0; = p3371*p1234
- p1096: 0.000621953
- p2082: 0.285294
- p2507: 0.000702317; = p2311*p1123
- p3257: 0.849747
- p3360: 1.16948e8; = if(p1232=0;p3310+p3321+p3332+p3343+p3354;0)
- p1788: 0
- p2356: 0; = p2225*p2184
- p2025: 1.03824e-5; = p2015*p2023*p2024/(p0818*1000)
- p3259: 0.00796296
- p3321: 3.5102e7; = if(and(p1232=0;p3253<>0);IF((p3317+p3318+p3319+p3320)+(p3253*(p3261*(1-p3277))/p3316)>p3253;p3253-(p3317+p3318+p3319+p3320);p3253*(p3261*(1-p3277))/p3316);0)
- p0845: 0.5
- p0275: 0.5
- p0571: 0; = IF(p0307<0.5;-SQRT(p0007*EXP(p0439^2*p0008)-p0007);SQRT(p0007*EXP(p0439^2*p0008)-p0007))
- p2882: 0.00113479; = p2296*(p1020+p1022)
- p2981: 0; = p2395*(p1020+p1022)
- p0679: 0
- p1163: 0.00438079
- p3341: 0; = if(and(p1232=0;p3254<>0);p3254*(p3271-p3336)/p3338;0)
- p0803: 0
- p3138: 0; = p2357*p1023
- p2816: 0; = p2425*(p1078+p1080)
- p0108: 42.192
- p1987: 400
- p3473: 0.000176268; = p3378*p1241
- p1217: 16.7773
- p0770: 69.913; = p0110*(1+p0638*p0242/100)
- p2489: 0.00109221; = p2293*p1014
- p1219: 0; = if(p1218=0;0;SQRT(2)*(IF((2*p1218-1)<0;-1;IF((2*p1218-1)>0;1;0))*SQRT(SQRT((2/(pi()*0.140012289)+LN(1-(2*p1218-1)^2)/2)^2-LN(1-(2*p1218-1)^2)/0.140012289)-(2/(pi()*0.140012289)+LN(1-(2*p1218-1)^2)/2))))
- p3399: 0; = p3380*p1234
- p2857: 8.14278e-5; = p2271*(p1079+p1081)
- p1663: 0
- p0951: 0; = if(and(p0683=0;or(p0807=480;p0807=32;p0807=1;and(p0807=60;p0901<0.03)));p0939;0)
- p2424: 0; = p2235*p2214
- p0355: 0.5
- p2240: 0.000249526; = p2222*p2185
- p3355: 1.433e7; = if(and(p1232=0;p3256<>0);p3256-(p3350+p3351+p3352+p3353+p3354);0)
- p1661: 0
- p2484: 0.000314778; = p2288*p1014
- p2914: 0.00118674; = p2328*(p1020+p1022)
- p0475: 0; = SQRT(2)*(IF((2*p0343-1)<0;-1;IF((2*p0343-1)>0;1;0))*SQRT(SQRT((2/(pi()*0.140012289)+LN(1-(2*p0343-1)^2)/2)^2-LN(1-(2*p0343-1)^2)/0.140012289)-(2/(pi()*0.140012289)+LN(1-(2*p0343-1)^2)/2)))
- p3159: 0; = p2378*p1082
- p0507: 0; = SQRT(2)*(IF((2*p0375-1)<0;-1;IF((2*p0375-1)>0;1;0))*SQRT(SQRT((2/(pi()*0.140012289)+LN(1-(2*p0375-1)^2)/2)^2-LN(1-(2*p0375-1)^2)/0.140012289)-(2/(pi()*0.140012289)+LN(1-(2*p0375-1)^2)/2)))
- p3435: 0; = p3378*p1239
- p3311: 0; = if(and(p1232=0;p3252<>0);p3252-(p3306+p3307+p3308+p3309+p3310);0)
- p1268: 0
- p0670: 89.818; = p0010*(1+p0538*p0142/100)
- p3016: 0; = p2430*(p1129+p1131)
- p1242: 0; = if(p1232>0;0;p1234*(p0725/100)*p0723*1000)
- p1245: 0; = if(p1232>0;0;p1240*(p0725/100)*p0723*1000)
- p2600: 0; = p2404*p1014
- p0790: 0
- p2803: 0; = p2412*(p1019+p1021)
- p0993: 0; = p0989*p0001*p0004/(p0818*p0002)
- p1822: 0
- p2317: 4.96389e-5; = p2224*p2184
- p2390: 0; = p2233*p2219
- p2514: 4.04518e-5; = p2318*p1014
- p5297: 4.98111e-7; = p1918*p3484
- p0832: 7.87306e8; = p0831*p0830/(1-p0831)
- p1214: 29; = IF(p1213=0;0;p1213-1)
- p1918: 4.46338e-6; = p1510*1000/p0818
- p1263: 0.32361; = if(p1232>0;0;IF(p1259=1;0;IF(p1259+p1260>1;1-p1259;p1260)))
- p0751: 42.831; = p0091*(1+p0619*p0223/100)
- p3343: 0; = if(and(p1232=0;p3254<>0);IF((p3339+p3340+p3341+p3342)+(p3254*(p3269*(1-p3277))/p3338)>p3254;p3254-(p3339+p3340+p3341+p3342);p3254*(p3269*(1-p3277))/p3338);0)
- p0500: 0; = SQRT(2)*(IF((2*p0368-1)<0;-1;IF((2*p0368-1)>0;1;0))*SQRT(SQRT((2/(pi()*0.140012289)+LN(1-(2*p0368-1)^2)/2)^2-LN(1-(2*p0368-1)^2)/0.140012289)-(2/(pi()*0.140012289)+LN(1-(2*p0368-1)^2)/2)))
- p1812: 0
- p1656: 0
- p2039: 3.96318e-6; = p2015*p2037*p2038/(p0818*1000)
- p3158: 0; = p2377*p1082
- p1590: 0
- p1870: 0
- p2916: 8.59217e-7; = p2330*(p1020+p1022)
- p0586: 0; = IF(p0322<0.5;-SQRT(p0007*EXP(p0454^2*p0008)-p0007);SQRT(p0007*EXP(p0454^2*p0008)-p0007))
- p2051: 0.000160017; = p2015*p2049*p2050/(p0818*1000)
- p0404: 0.5
- p1718: 0
- p3116: 0; = p2335*p1023
- p1985: 4.15248e8; = (if(p1057=0;0;p1050/p1057)+if(p1058=0;0;p1051/p1058)+if(p1059=0;0;p1052/p1059)+if(p1060=0;0;p1053/p1060)+if(p1061=0;0;p1054/p1061)+if(p1062=0;0;p1055/p1062)+if(p1063=0;0;p1056/p1063))*(1+p1157)
- p2480: 0.000133074; = p2284*p1014
- p3241: 1.01438e-9; = p3234*p1188*p3236/p0818
- p3051: 8.02006e-7; = p2270*p1082
- p0604: 0; = IF(p0340<0.5;-SQRT(p0007*EXP(p0472^2*p0008)-p0007);SQRT(p0007*EXP(p0472^2*p0008)-p0007))
- p2657: 1.52051e-7; = p2266*(p1078+p1080)
- p1612: 0
- p2849: 6.11274e-5; = p2263*(p1079+p1081)
- p1147: 0.146558
- p1815: 0
- p3161: 0; = p2380*p1082
- p1860: 0
- p2109: 0.826583
- p2864: 6.64293e-5; = p2278*(p1020+p1022)
- p0835: 441.182; = -LN(1-p0669/100)/p0834
- p3387: 0; = p3368*p1234
- p3244: 0.98355; = p0791/100
- p1655: 0
- p0813: 0; = if(p0807=480;1.56521739130435;0)
- p0083: 0.318
- p1099: 0.421213
- p3366: 0.0233362; = if(p1232=0;p3244*p3360/p0818;0)
- p1110: 1.3008e7; = IF(p1071=0;p1105*p1104*p1095;0)
- p1131: 0; = if(p1121=0;IF(p1123+p1128+p1129+p1130=1;0;IF(p1123+p1128+p1129+p1130+p1127>1;1-(p1123+p1128+p1129+p1130);p1127));0)
- p2866: 0.000170904; = p2280*(p1020+p1022)
- p3465: 0; = p3370*p1241
- p2556: 0; = p2360*p1014
- p2089: 0.40001
- p3207: 0; = p2426*p1082
- p2162: 1.06648e-7; = p2015*p2086*p2124/(p0818*1000)
- p1842: 0
- p0328: 0.5
- p0492: 0; = SQRT(2)*(IF((2*p0360-1)<0;-1;IF((2*p0360-1)>0;1;0))*SQRT(SQRT((2/(pi()*0.140012289)+LN(1-(2*p0360-1)^2)/2)^2-LN(1-(2*p0360-1)^2)/0.140012289)-(2/(pi()*0.140012289)+LN(1-(2*p0360-1)^2)/2)))
- p1748: 0
- p0251: 16.971
- p1938: 0
- p1709: 0
- p3310: 0; = if(and(p1232=0;p3252<>0);IF((p3306+p3307+p3308+p3309)+(p3252*(p3257*(1-p3277))/p3305)>p3252;p3252-(p3306+p3307+p3308+p3309);p3252*(p3257*(1-p3277))/p3305);0)
- p0503: 0; = SQRT(2)*(IF((2*p0371-1)<0;-1;IF((2*p0371-1)>0;1;0))*SQRT(SQRT((2/(pi()*0.140012289)+LN(1-(2*p0371-1)^2)/2)^2-LN(1-(2*p0371-1)^2)/0.140012289)-(2/(pi()*0.140012289)+LN(1-(2*p0371-1)^2)/2)))
- p2575: 0; = p2379*p1073
- p2281: 7.07827e-5; = p2223*p2187
- p4697: 4.8102e-6; = p1936*p3481
- p0351: 0.5
- p0962: 0; = if(and(p0683>0;or(p0807=480;p0807=32;p0807=1;and(p0807=60;p0901<0.03)));p0938;0)
- p3152: 0; = p2371*p1023
- p3410: 0; = p3372*p1238
- p2457: 0.000304796; = p2261*p1073
- p0472: 0; = SQRT(2)*(IF((2*p0340-1)<0;-1;IF((2*p0340-1)>0;1;0))*SQRT(SQRT((2/(pi()*0.140012289)+LN(1-(2*p0340-1)^2)/2)^2-LN(1-(2*p0340-1)^2)/0.140012289)-(2/(pi()*0.140012289)+LN(1-(2*p0340-1)^2)/2)))
- p1897: 0
- p2175: 0.000557327; = p0895*p0908/p0818
- p1577: 0.6832
- p3042: 2.32141e-5; = p2261*p1082
- p3285: 0.275
- p0223: 18.453
- p2641: 0.00207289; = p2250*(p1019+p1021)
- p5087: 0; = p1914*p3483
- p3253: 9.48921e7; = p1252*(p1277*(1-p3247)+p1280*(1-p3248)+p1281*(1-p3249)+p1282*(1-p3250))
- p3199: 0; = p2418*p1082
- p3033: 0; = p2252*p1023
- p2567: 0; = p2371*p1014
- p0119: 55.062
- p2958: 0; = p2372*(p1020+p1022)
- p2116: 0.444424
- p0778: 15.033; = p0118*(1+p0646*p0250/100)
- p2227: 0.541437; = if(p0774*p0778+p0775*p0779+p0776*p0780+p0777*p0781=0;0;p0779*p0775/(p0774*p0778+p0775*p0779+p0776*p0780+p0777*p0781))
- p1120: 0.0110956; = IF(p1071=0;p1110/(p1115*p0818);0)
- p3189: 0; = p2408*p1023
- p2588: 0; = p2392*p1123
- p3351: 1.56339e7; = if(and(p1232=0;p3256<>0);p3256*(p3274-p3346)/p3349;0)
- p0788: 62.342; = p0128*(1+p0656*p0260/100)
- p0775: 39.119; = p0115*(1+p0643*p0247/100)
- p1799: 0
- p1063: 0.455
- p1582: 0
- p2243: 0.000343146; = p2222*p2188
- p2231: 0.56596; = if(p0783*p0787+p0784*p0788+p0785*p0789+p0786*p0790=0;0;p0788*p0784/(p0783*p0787+p0784*p0788+p0785*p0789+p0786*p0790))
- p1726: 0
- p1762: 0
- p0510: 0; = SQRT(2)*(IF((2*p0378-1)<0;-1;IF((2*p0378-1)>0;1;0))*SQRT(SQRT((2/(pi()*0.140012289)+LN(1-(2*p0378-1)^2)/2)^2-LN(1-(2*p0378-1)^2)/0.140012289)-(2/(pi()*0.140012289)+LN(1-(2*p0378-1)^2)/2)))
- p3035: 0; = p2254*p1023
- p0727: 54.838; = p0067*(1+p0595*p0199/100)
- p1140: 5.37533e-5; = if(p1121=0;p1134*p0001/(p0818*p0002);0)
- p0308: 0.5
- p1310: 0.477585; = IF(p1307=p1266;0;IF(p1307+p1308>p1266;p1266-p1307;p1308))
- p1025: 447352; = IF(p1012=0;p1019*(p0704/100)*p0703*1000;0)
- p3421: 0; = p3364*p1239
- p2818: 0; = p2427*(p1078+p1080)
- p0920: 0.0485925; = p0676*1000/p0801
- p1983: 50
- p2321: 0.000235128; = p2224*p2188
- p3265: 0.696292
- p0477: 0; = SQRT(2)*(IF((2*p0345-1)<0;-1;IF((2*p0345-1)>0;1;0))*SQRT(SQRT((2/(pi()*0.140012289)+LN(1-(2*p0345-1)^2)/2)^2-LN(1-(2*p0345-1)^2)/0.140012289)-(2/(pi()*0.140012289)+LN(1-(2*p0345-1)^2)/2)))
- p0818: 4.929e9; = p0806*p0807
- p3105: 0; = p2324*p1023
- p0391: 0.5
- p2692: 0.000425252; = p2301*(p1078+p1080)
- p1569: 0
- p0274: 0.5
- p1711: 0.575083
- p0371: 0.5
- p1620: 0
- p2325: 0.000297233; = p2224*p2192
- p0712: 29.761; = p0052*(1+p0580*p0184/100)
- p1677: 0
- p2527: 1.28615e-6; = p2331*p1014
- p2627: 0; = p2431*p1123
- p1645: 0
- p3271: 0.0195489
- p2132: 1.64361e-6; = p2015*p2060*p2094/(p0818*1000)
- p0969: 1.561e8; = p0966*p0683*p0682*1000
- p0970: 0; = p0967/p0818
- p3103: 0; = p2322*p1023
- p3089: 4.60259e-6; = p2308*p1082
- p0931: 0; = p0801*p0925
- p1647: 0
- p0580: 0; = IF(p0316<0.5;-SQRT(p0007*EXP(p0448^2*p0008)-p0007);SQRT(p0007*EXP(p0448^2*p0008)-p0007))
- p2617: 0; = p2421*p1073
- p3121: 2.14565e-5; = p2340*p1082
- p1095: 5.66128e7; = IF(p1071=0;p0797*p0702*1000*p0798/100;0)
- p3324: 0; = if(and(p1232=0;p3255<>0);p3266*(p3279*(p3284*p1256+p3286*(p1253+p1257)+p1258*p3288+p3299*p3287));0)
- p0909: 2.98084e7
- p3325: 0; = if(and(p1232=0;p3255<>0);p3267*p3289;0)
- p3073: 0; = p2292*p1023
- p0785: 44.78; = p0125*(1+p0653*p0257/100)
- p1024: 355355; = IF(p1012=0;p1014*(p0704/100)*p0703*1000;0)
- p1899: 0
- p2895: 3.00172e-5; = p2309*(p1079+p1081)
- p3252: 0; = p1252*(p1267*(1-p3247)+p1270*(1-p3248)+p1271*(1-p3249)+p1272*(1-p3250))
- p1714: 0.804436
- p0340: 0.5
- p0939: 4.4886e-6; = p0933*p0001/(p0818*p0002)
- p5088: 0; = p1915*p3483
- p0182: 3.669
- p0926: 0; = IF(p0918+p0923+p0924+p0925=1;0;IF(p0918+p0923+p0924+p0925+p0922>1;1-(p0918+p0923+p0924+p0925);p0922))
- p2719: 0.00142037; = p2328*(p1019+p1021)
- p1138: 38412.8; = if(p1121=0;p1132*(p0716/100)*p0703*1000;0)
- p0736: 70.608; = p0076*(1+p0604*p0208/100)
- p1008: 0; = p1004*p0001*p0004/(p0818*p0002)
- p1721: 0
- p0837: 0.5
- p2091: 0.374844
- p3854: 4.03572e-7; = p1917*p3477
- p2418: 0; = p2235*p2208
- p0737: 0
- p2999: 0; = p2413*(p1020+p1022)
- p2771: 0; = p2380*(p1078+p1080)
- p3055: 2.62341e-6; = p2274*p1132
- p0442: 0; = SQRT(2)*(IF((2*p0310-1)<0;-1;IF((2*p0310-1)>0;1;0))*SQRT(SQRT((2/(pi()*0.140012289)+LN(1-(2*p0310-1)^2)/2)^2-LN(1-(2*p0310-1)^2)/0.140012289)-(2/(pi()*0.140012289)+LN(1-(2*p0310-1)^2)/2)))
- p2499: 0.000101065; = p2303*p1073
- p2481: 3.34647e-5; = p2285*p1014
- p2135: 5.27159e-6; = p2015*p2063*p2097/(p0818*1000)
- p0256: 9.554
- p2119: 0.679049
- p2910: 1.27633e-5; = p2324*(p1020+p1022)
- p1228: 0.0168336; = IF(p1221=0;0;p0801*p1212*2000/(p1222+p1221*p1225)/p0818)
- p2834: 0.000817347; = p2248*(p1020+p1022)
- p2176: 0.00339211; = p0895*p0913/p0818
- p3200: 0; = p2419*p1082
- p0176: 1.929
- p1648: 0
- p2985: 0; = p2399*(p1020+p1022)
- p2605: 0; = p2409*p1014
- p2602: 0; = p2406*p1014
- p0987: 0; = if(p0978>0;0;if(and(p0687=0;p0691=0;p0695=0;p0699=0);0;IF(p0982+p0985+p0986=1;0;1-(p0982+p0985+p0986))))
- p3157: 0; = p2376*p1082
- p1302: 0; = IF(p1297+p1300+p1301=p1262;0;p1262-(p1297+p1300+p1301))
- p0799: 35.765; = p0139*(1+p0667*p0271/100)
- p3008: 0; = p2422*(p1079+p1081)
- p2653: 0.000128713; = p2262*(p1078+p1080)
- p2013: 0.85
- p2215: 0.000308108; = p1117-p2214
- p4057: 1.88448e-6; = p1914*p3478
- p0838: 2.81735e9; = (p0833-p0836)*p0837
- p2824: 0.000184312; = p2238*(p1020+p1022)
- p2145: 2.17788e-6; = p2015*p2073*p2107/(p0818*1000)
- p4884: 0; = p1917*p3482
- p1054: 5.01301e7; = IF(p1012=0;p1047*p1036;0)
- p1074: 0.29761; = IF(p1071=0;p0712/100;0)
- p2841: 0.000260635; = p2255*(p1020+p1022)
- p1703: 0
- p3471: 1.08754e-5; = p3376*p1241
- p4843: 0; = p1876*p3482
- p0063: 1591.15
- p3084: 7.69738e-6; = p2303*p1082
- p4263: 0; = p1914*p3479
- p2850: 2.63928e-5; = p2264*(p1079+p1081)
- p1835: 0
- p0936: 1.40729e-5; = p0930*p0001/(p0818*p0002)
- p2541: 3.48004e-6; = p2345*p1073
- p1267: 0
- p0248: 7.47
- p1079: 0.31255; = IF(p1071=0;IF(p1073+p1078=1;0;IF(p1073+p1078+p1075>1;1-(p1073+p1078);p1075));0)
- p2668: 0.000582113; = p2277*(p1019+p1021)
- p0639: 0; = IF(p0375<0.5;-SQRT(p0007*EXP(p0507^2*p0008)-p0007);SQRT(p0007*EXP(p0507^2*p0008)-p0007))
- p3117: 1.71661e-5; = p2336*p1082
- p1601: 0
- p1211: 0.6
- p2634: 0.000142718; = p2243*(p1019+p1021)
- p1976: 0.15
- p0317: 0.5
- p2984: 0; = p2398*(p1020+p1022)
- p2747: 0; = p2356*(p1019+p1021)
- p1947: 0
- p2062: 3.76588
- p5127: 0; = p1954*p3483
- p1625: 0
- p1313: 0; = p1307*p1252/p0818
- p2867: 2.4597e-5; = p2281*(p1020+p1022)
- p2035: 1.40926e-5; = p2015*p2029*(1-p2031)/(p0818*1000)
- p2633: 1.11562e-5; = p2242*(p1019+p1021)
- p2376: 0; = p2229*p2205
- p1565: 0
- p0816: 0
- p0935: 0.000271049; = p0929*p0001/(p0818*p0002)
- p1566: 0
- p2190: 0.000921672; = 32.065*p2189/(2*14.0067)
- p2300: 0.00277987; = p2227*p2207
- p1890: 0
- p0527: 0; = SQRT(2)*(IF((2*p0395-1)<0;-1;IF((2*p0395-1)>0;1;0))*SQRT(SQRT((2/(pi()*0.140012289)+LN(1-(2*p0395-1)^2)/2)^2-LN(1-(2*p0395-1)^2)/0.140012289)-(2/(pi()*0.140012289)+LN(1-(2*p0395-1)^2)/2)))
- p3690: 0; = p1963*p3476
- p0638: 0; = IF(p0374<0.5;-SQRT(p0007*EXP(p0506^2*p0008)-p0007);SQRT(p0007*EXP(p0506^2*p0008)-p0007))
- p2293: 0.00461647; = p2223*p2200
- p1277: 0
- p2059: 1.00168
- p0999: 0; = IF(p0996=1;0;IF(p0996+p0997>1;1-p0996;p0997))
- p0539: 0; = IF(p0275<0.5;-SQRT(p0007*EXP(p0407^2*p0008)-p0007);SQRT(p0007*EXP(p0407^2*p0008)-p0007))
- p2959: 0; = p2373*(p1020+p1022)
- p2329: 1.50643e-6; = p2224*p2197
- p3283: 0.3
- p0148: 43.504
- p2854: 4.18196e-6; = p2268*(p1079+p1081)
- p0989: 0; = p0985*p0886
- p2224: 0.158466; = if(p0765*p0769+p0766*p0770+p0767*p0771+p0768*p0772=0;0;p0771*p0767/(p0765*p0769+p0766*p0770+p0767*p0771+p0768*p0772))
- p2283: 0.000491396; = p2223*p2189
- p1833: 0
- p1113: 0.100377
- p1013: 0; = p1012*p0001/(p0818*p0002)
- p2223: 0.610268; = if(p0765*p0769+p0766*p0770+p0767*p0771+p0768*p0772=0;0;p0770*p0766/(p0765*p0769+p0766*p0770+p0767*p0771+p0768*p0772))
- p0065: 4.796
- p2764: 0; = p2373*(p1019+p1021)
- p1848: 0
- p2725: 3.07632e-5; = p2334*(p1019+p1021)
- p1771: 0
- p2072: 0.134
- p1769: 0
- p1827: 0
- p1193: 0; = IF(OR(p1036=0;p1095=0);0.0001*p0857;0)
- p3058: 0; = p2277*p1023
- p1826: 0
- p2005: 1.67484e6; = p1963*p0818+p1959*1000+p1170+p1176+p1182
- p0930: 77748; = p0801*p0924
- p3086: 4.65713e-8; = p2305*p1082
- p0587: 0; = IF(p0323<0.5;-SQRT(p0007*EXP(p0455^2*p0008)-p0007);SQRT(p0007*EXP(p0455^2*p0008)-p0007))
- p1238: 0.54838; = if(p1232>0;0;IF(p1234=1;0;IF(p1234+p1235>1;1-p1234;p1235)))
- p1982: 750
- p1932: 0
- p1183: 0.00028961; = p0801*p0001/(p0818*p0002)
- p0859: 0.65315; = p0671*1000/p0856
- p0438: 0; = SQRT(2)*(IF((2*p0306-1)<0;-1;IF((2*p0306-1)>0;1;0))*SQRT(SQRT((2/(pi()*0.140012289)+LN(1-(2*p0306-1)^2)/2)^2-LN(1-(2*p0306-1)^2)/0.140012289)-(2/(pi()*0.140012289)+LN(1-(2*p0306-1)^2)/2)))
- p0109: 30.788
- p1906: 0
- p2731: 0.000231449; = p2340*(p1078+p1080)
- p2311: 0.00259186; = p2231*p2218
- p1197: 1.806
- p1002: 0; = p0996*p0888
- p3312: 0.1394; = if(and(p1232=0;p3253<>0);p3261*p3277*(p3298*p3290+(1-p3298)*p3294);0)
- p0128: 62.342
- p3323: 0; = if(and(p1232=0;p3255<>0);p3265*p3277*(p3299*p3291+(1-p3299)*p3295);0)
- p1576: 0
- p2163: 0.00238733; = (p2017-p2020)/p0818-(p2025+p2028+p2033+p2034+p2051+p2125+p2126+p2127+p2128+p2129+p2130+p2131+p2132+p2133+p2134+p2135+p2136+p2137+p2138+p2139+p2140+p2141+p2142+p2143+p2144+p2145+p2146+p2147+p2148+p2149+p2150+p2151+p2152+p2153+p2154+p2155+p2156+p2157)
- p2272: 0.000354284; = p2230*p2218
- p0646: 0; = IF(p0382<0.5;-SQRT(p0007*EXP(p0514^2*p0008)-p0007);SQRT(p0007*EXP(p0514^2*p0008)-p0007))
- p2374: 0; = p2225*p2203
- p0215: 25.387
- p2672: 2.94392e-5; = p2281*(p1019+p1021)
- p3487: 0; = p1756*p3476
- p0692: 0
- p1047: 0.337699; = IF(p1012=0;IF(p1037+p1044+p1045+p1046=1;0;IF(p1037+p1044+p1045+p1046+p1041>1;1-(p1037+p1044+p1045+p1046);p1041));0)
- p2486: 1.37255e-6; = p2290*p1014
- p2463: 1.93531e-6; = p2267*p1073
- p2337: 0.000562718; = p2228*p2205
- p0669: 22.9178; = p0009*(1+p0537*p0141/100)
- p4430: 0; = p1875*p3480
- p1619: 0
- p2076: 0.057
- p2368: 0; = p2225*p2197
- p1916: 0
- p2709: 7.11116e-5; = p2318*(p1019+p1021)
- p2509: 0.000120606; = p2313*p1123
- p3148: 0; = p2367*p1023
- p4882: 0; = p1915*p3482
- p0042: 1591.01
- p1271: 0; = IF(p1267+p1270=p1259;0;IF(p1267+p1270+p1269>p1259;p1259-(p1267+p1270);p1269))
- p2040: 0.44
- p3306: 0; = if(and(p1232=0;p3252<>0);p3252*(p3257*p3277-p3301)/p3305;0)
- p0883: 0.0160154; = p0882*p0001*p0003/(p0818*p0002)
- p0843: -0.110451
- p0212: 1.222
- p1336: 0; = p1323*p0801
- p1239: 0; = if(p1232>0;0;IF(p1234+p1238=1;0;IF(p1234+p1238+p1236>1;1-(p1234+p1238);p1236)))
- p0772: 0
- p2826: 8.67102e-5; = p2240*(p1020+p1022)
- p3251: 1.66539e9; = p1252-(p3252+p3253+p3254+p3255+p3256)
- p2957: 0; = p2371*(p1020+p1022)
- p0851: 0
- p2235: 0; = 1-(p2226+p2227+p2228+p2229)
- p0519: 0; = SQRT(2)*(IF((2*p0387-1)<0;-1;IF((2*p0387-1)>0;1;0))*SQRT(SQRT((2/(pi()*0.140012289)+LN(1-(2*p0387-1)^2)/2)^2-LN(1-(2*p0387-1)^2)/0.140012289)-(2/(pi()*0.140012289)+LN(1-(2*p0387-1)^2)/2)))
- p0219: 31.405
- p2888: 0.000201958; = p2302*(p1079+p1081)
- p2741: 0.000544524; = p2350*(p1128+p1130)
- p1735: 0
- p3376: 2.40809e-5; = if(p1232=0;p3246*p3358/p0818;0)
- p1135: 314064; = if(p1121=0;p1129*(p0716/100)*p0703*1000;0)
- p1683: 0
- p1243: 41847.8; = if(p1232>0;0;p1238*(p0725/100)*p0723*1000)
- p0957: 0; = if(and(p0683>0;or(p0807=56;p0807=100;and(p0807=60;p0901>0.06)));p0939;0)
- p3990: 1.47481e-6; = p1847*p3478
- p2883: 0.000357298; = p2297*(p1079+p1081)
- p3326: 0; = if(and(p1232=0;p3255<>0);p3268*p3289;0)
- p3019: 0; = p2238*p1023
- p2964: 0; = p2378*(p1079+p1081)
- p0735: 0
- p3112: 0; = p2331*p1023
- p0211: 8.957
- p2683: 8.70718e-6; = p2292*(p1019+p1021)
- p0740: 97.411; = p0080*(1+p0608*p0212/100)
- p0972: 0.0316696; = p0969/p0818
- p2196: 0.0215509; = p1068-p2193-p2195
- p2114: 0.832356
- p1089: 9.12865e-5; = IF(p1071=0;p1083*p0001/(p0818*p0002);0)
- p0739: 0.67; = p0079*(1+p0607*p0211/100)
- p2493: 0.000414113; = p2297*p1073
- p3170: 0; = p2389*p1132
- p0927: 0.0154988; = IF(p0918+p0923+p0924+p0925+p0926=1;0;1-(p0918+p0923+p0924+p0925+p0926))
- p3140: 0; = p2359*p1023
- p4185: 0; = p1836*p3479
- p1550: 0
- p1072: 0; = p1071*p0001/(p0818*p0002)
- p0819: 0; = p0808*p0809/p0818
- p3292: 0.258
- p1561: 0
- p1705: 0
- p2296: 0.00326558; = p2223*p2203
- p0078: 1591.17
- p0018: 1497.45
- p3305: 0; = if(and(p1232=0;p3252<>0);1-(p3301+p3302+p3303+p3304);0)
- p2495: 0.000121284; = p2299*p1073
- p1658: 0
- p0864: 0.65315; = IF(p0858=1;0;IF(p0858+p0859>1;1-p0858;p0859))
- p3009: 0; = p2423*(p1079+p1081)
- p1963i: 1.19812e-5; = p1706*p1910+p1707*p1911+p1708*p1912+p1709*p1913+p1710*p1914+p1711*p1915+p1712*p1916+p1713*p1917+p1714*p1918+p1715*p1919+p1716*p1920+p1717*p1921+p1718*p1922+p1719*p1923+p1720*p1924+p1721*p1925+p1722*p1926+p1723*p1927+p1724*p1928
- p2410: 0; = p2234*p2200
- p3320: 9.49634e6; = if(and(p1232=0;p3253<>0);p3253*(p3264-p3315)/p3316;0)
- p0820: 0; = if(p0807=480;p0814;0)
- p1269: 0
- p0673: 91.36; = p0013*(1+p0541*p0145/100)
- p3648: 0; = p1917*p3476
- p2776: 0; = p2385*(p1078+p1080)
- p0902: 0
- p2707: 0.000151155; = p2316*(p1019+p1021)
- p2111: 0.856281
- p2171: 0.0803836; = p2165*p0831
- p4470: 0; = p1915*p3480
- p1111: 0.0872841
- p0657: 0; = IF(p0393<0.5;-SQRT(p0007*EXP(p0525^2*p0008)-p0007);SQRT(p0007*EXP(p0525^2*p0008)-p0007))
- p1637: 0
- p2459: 7.08475e-5; = p2263*p1073
- p2014: 3.73605e7; = p0833*p2011*p2013
- p2156: 1.48933e-7; = p2015*p2085*p2118/(p0818*1000)
- p2927: 0.000109918; = p2341*(p1079+p1081)
- p3299: 0; = if(p1303+p1304+p1305+p1306=0;0;p1303/(p1303+p1304+p1305+p1306))
- p0956: 0; = if(and(p0683>0;or(p0807=56;p0807=100;and(p0807=60;p0901>0.06)));p0938;0)
- p1888: 1.80564e-5; = p1480*1000/p0818
- p0684: 0
- p2208: 0.00263907; = p1110/p0818
- p2571: 0; = p2375*p1073
- p1256: 0.70608; = if(p1232>0;0;IF(p1253=1;0;IF(p1253+p1254>1;1-p1253;p1254)))
- p0979: 0; = IF(p0976=0;0;p0976*p0001/(p0818*p0002))
- p2670: 0.000273857; = p2279*(p1019+p1021)
- p0446: 0; = SQRT(2)*(IF((2*p0314-1)<0;-1;IF((2*p0314-1)>0;1;0))*SQRT(SQRT((2/(pi()*0.140012289)+LN(1-(2*p0314-1)^2)/2)^2-LN(1-(2*p0314-1)^2)/0.140012289)-(2/(pi()*0.140012289)+LN(1-(2*p0314-1)^2)/2)))
- p2793: 0; = p2402*(p1019+p1021)
- p0879: 0.660554; = p0878*p0001*p0003/(p0818*p0002)
- p3442: 0; = p3366*p1240
- p3049: 3.69158e-7; = p2268*p1082
- p2622: 0; = p2426*p1073
- p1895: 0
- p2074: 0.025
- p2629: 0.000220596; = p2238*(p1019+p1021)
- p1790: 0
- p0777: 0
- p2597: 0; = p2401*p1014

## Reference product
- spring wheat, excl. durum; at harvest in 2009; at farm; 86%-90% moisture: 1 kg

## Inputs from technosphere
- CUTOFF apply N fertilizer; broadcast with incorporation: 8.09736e-5 ha; = p1031
- CUTOFF apply mixed N fertilizer; with incorporation: 3.20996e-5 ha; = p1033
- CUTOFF bulk cargo rail transport; diesel: 0.0698707 metric ton*km; = p2008
- CUTOFF pesticide, Clopyralid; at point-of-sale; kg AI: 3.04321e-6 kg; = p1798
- CUTOFF fertilizer storage: 0.0636402 kg*a; = p1160
- CUTOFF sowing; for unspec. till, wheat: 4.4886e-6 ha; = p0963
- CUTOFF sulfur; at point-of-sale: 1.56982e-7 kg; = p1172
- CUTOFF pesticide, Bromoxynil octanoate; at point-of-sale; kg AI: 3.08379e-5 kg; = p1782
- CUTOFF apply gypsum; unspecified method: 0.00028961 ha; = p1165
- CUTOFF nitrogenous fertilizer, nitrogen solutions; at point-of-sale: 0.0339015 kg; = p1068
- CUTOFF apply zinc compounds; unspecified method: 0.00028961 ha; = p1183
- CUTOFF apply K fertilizer; broadcast without incorporation: 5.68476e-5 ha; = p1141
- CUTOFF fertilizer filler materials; at point-of-sale: 0.0200724 kg; = p1158
- CUTOFF regional or national trucking; class 8, average fuel: 0.0231605 metric ton*km; = p2009
- CUTOFF apply pesticide; broadcast by air: 4.60225e-5 ha; = p1331
- CUTOFF gypsum storage: 7.11023e-7 kg*a; = p1168
- CUTOFF pesticide formulation balance; at point-of-sale: 0.00012884 kg; = p1963
- CUTOFF nitrogenous fertilizer, ammonium sulfate; at point-of-sale: 0.00383435 kg; = p1067
- spring wheat residue, excl. durum; at harvest in 2009; at farm; 83%-90% moisture: 0.571587 kg; = p0839
- CUTOFF local area trucking; class 6, average fuel: 0.00279483 metric ton*km; = p2010
- CUTOFF prepare soil; for no-till, wheat: 1.40729e-5 ha; = p0936
- CUTOFF apply sulfur; unspecified method: 0.00028961 ha; = p1171
- CUTOFF zinc compounds storage: 1.58593e-8 kg*a; = p1186
- CUTOFF pesticide, Pyrasulfotole; at point-of-sale; kg AI: 1.42017e-6 kg; = p1882
- CUTOFF sewage sludge storage: 9.08378e-8 kg*a; = p1192
- CUTOFF potassic fertilizer, other single nutrients; at point-of-sale: 0.00215305 kg; = p1155
- CUTOFF wheat seeds; nonGMO herbicide resistant; at point-of-sale: 0.00792433 kg; = p0971
- CUTOFF phosphatic fertilizer, other single phosphates; at point-of-sale: 0.00176713 kg; = p1118
- CUTOFF international vessel transport; average fuel: 0.346077 metric ton*km; = p2006
- CUTOFF dairy manure; from unspecified storage; at point-of-sale: 0.0377956 kg; = p1286
- CUTOFF irrig svc; unspec wat source & rate, 2009 spring wheat (excl. durum): 0.00028961 ha; = p0981
- CUTOFF domestic barge transport; average fuel: 0.0372644 metric ton*km; = p2007
- CUTOFF phosphatic fertilizer, diammonium phosphate; at point-of-sale: 0.00977354 kg; = p1119
- CUTOFF gypsum; at point-of-sale: 1.42205e-6 kg; = p1166
- CUTOFF apply sulfuric acid; unspecified method: 0.00028961 ha; = p1177
- CUTOFF nitrogenous fertilizer, aqueous ammonia; at point-of-sale: 0.0013922 kg; = p1065
- CUTOFF sulfur storage: 7.84909e-8 kg*a; = p1174
- CUTOFF seed storage; wheat: 0.019797 kg*a; = p0975
- CUTOFF nitrogenous fertilizer, anhydrous ammonia; at point-of-sale: 0.0127413 kg; = p1064
- CUTOFF pesticide, Fluroxypyr-meptyl; at point-of-sale; kg AI: 3.65186e-6 kg; = p1847
- CUTOFF apply K fertilizer; no broadcast application: 4.36931e-5 ha; = p1139
- CUTOFF pesticide, Tebuconazole; at point-of-sale; kg AI: 1.15642e-5 kg; = p1936
- CUTOFF zinc compounds; at point-of-sale: 3.17187e-8 kg; = p1184
- CUTOFF pesticide, Prothioconazole; at point-of-sale; kg AI: 5.88355e-6 kg; = p1917
- CUTOFF wheat seeds; unspec. type; at point-of-sale: 0.0316696 kg; = p0972
- CUTOFF nitrogenous fertilizer, ammonium nitrate; at point-of-sale: 0.00240565 kg; = p1066
- CUTOFF phosphatic fertilizer, monoammonium phosphate; at point-of-sale: 0.0110956 kg; = p1120
- CUTOFF apply pesticide; broadcast with incorporation: 0.000270963 ha; = p1333
- CUTOFF apply pesticide; unspecified application methods: 7.48774e-5 ha; = p1345
- CUTOFF pesticide, Bromoxynil heptanoate; at point-of-sale; kg AI: 1.29844e-5 kg; = p1781
- CUTOFF potassic fertilizer, potassium chloride; at point-of-sale: 0.0110332 kg; = p1154
- CUTOFF pesticide, MCPA-isooctyl; at point-of-sale; kg AI: 5.47778e-6 kg; = p1876
- CUTOFF apply N fertilizer; broadcast without incorporation: 7.60392e-5 ha; = p1032
- CUTOFF liming materials storage: 0.0103055 kg*a; = p1231
- CUTOFF pesticide, Trifloxysulfuron-sodium; at point-of-sale; kg AI: 8.11524e-7 kg; = p1954
- CUTOFF dairy manure; from semi-solid to solid storage; at point-of-sale: 0.0907959 kg; = p1284
- CUTOFF apply P fertilizer; broadcast with incorporation: 7.49973e-5 ha; = p1090
- CUTOFF apply P fertilizer; broadcast without incorporation: 7.87622e-5 ha; = p1091
- CUTOFF sewage sludge; at point-of-sale: 1.81676e-7 kg; = p1190
- CUTOFF unspecified animal manure; from unspecified storage; at point-of-sale: 0.0789981 kg; = p1316
- CUTOFF apply single or mixed P fertilizer; unspec. method: 6.95265e-6 ha; = p1094
- CUTOFF apply mixed N fertilizer; without incorporation: 1.84355e-5 ha; = p1034
- CUTOFF harvest; spring: 0.00028056 ha; = p1971
- CUTOFF dolomite, pulverized; at point-of-sale: 0.00377741 kg; = p1229
- CUTOFF pesticide, 2,4-D, dimethylamine salt; at point-of-sale; kg AI: 9.33252e-6 kg; = p1756
- CUTOFF pesticide storage: 0.000234184 kg*a; = p1965
- CUTOFF phosphatic fertilizer, superphos. grades 22% and under; at point-of-sale: 3.57177e-5 kg; = p1116
- CUTOFF apply N fertilizer; no broadcast application: 6.43216e-5 ha; = p1030
- CUTOFF unspecified manure; from semi-solid to solid storage; at point-of-sale: 0.189776 kg; = p1314
- CUTOFF pesticide, Methyl parathion; at point-of-sale; kg AI: 1.80564e-5 kg; = p1888
- CUTOFF nitrogenous fertilizer, sodium nitrate; at point-of-sale: 5.94144e-5 kg; = p1069
- CUTOFF sowing; for mulch till, wheat: 0.000271049 ha; = p0959
- CUTOFF pesticide, MCPA-2-ethylhexyl; at point-of-sale; kg AI: 2.43457e-5 kg; = p1875
- CUTOFF limestone, high-grade, pulverized; at point-of-sale: 0.0168336 kg; = p1228
- CUTOFF prepare soil; for unspec. till, wheat: 4.4886e-6 ha; = p0939
- CUTOFF harvest; spring wheat residue management: 0.00028961 ha; = p1975
- CUTOFF apply manure; broadcast without incorporation: 7.57472e-6 ha; = p1248
- CUTOFF apply liming materials; unspecified method: 0.00028961 ha; = p1227
- CUTOFF apply manure; unspec. method: 6.23818e-6 ha; = p1251
- CUTOFF apply pesticide; as foliar or directed spray: 0.000279085 ha; = p1339
- CUTOFF N inhibitor appl svc; unspec rate & type, 2009 spring wheat (excl. durum): 0.000324609 ha; = p1162
- CUTOFF nitrogenous fertilizer, urea; at point-of-sale: 0.0166256 kg; = p1070
- CUTOFF pesticide, unspecified type; at point-of-sale; kg AI: 6.90775e-5 kg; = p1962
- CUTOFF prepare soil; for mulch till, wheat: 0.000271049 ha; = p0935
- CUTOFF apply P fertilizer; no broadcast application: 9.12865e-5 ha; = p1089
- CUTOFF pesticide, Fenoxaprop-ethyl; at point-of-sale; kg AI: 4.66626e-6 kg; = p1836
- CUTOFF pesticide, Propiconazole; at point-of-sale; kg AI: 4.66626e-6 kg; = p1914
- CUTOFF apply sewage sludge; unspecified method: 0.00028961 ha; = p1189
- CUTOFF sowing; for no-till, wheat: 1.40729e-5 ha; = p0960
- CUTOFF apply single or mixed K fertilizer; unspec. method: 6.95297e-6 ha; = p1144
- CUTOFF apply K fertilizer; broadcast with incorporation: 5.37533e-5 ha; = p1140
- CUTOFF pesticide, Propoxycarbazone-sodium; at point-of-sale; kg AI: 4.05762e-7 kg; = p1915
- CUTOFF phosphatic fertilizer, superphosphate grades over 22%; at point-of-sale: 0.000389754 kg; = p1117
- CUTOFF sulfuric acid; at point-of-sale: 7.53155e-8 kg; = p1178
- CUTOFF sulfuric acid storage: 3.76577e-8 kg*a; = p1180
- CUTOFF pesticide, Pyraclostrobin; at point-of-sale; kg AI: 4.46338e-6 kg; = p1918

## Inputs from nature
- Water, unspecified origin: 0.00065698 m3; = p0916*0.001+p0893*0.001
- Carbon dioxide: 3.35622 kg; = p0900*3.6666666667
- Potassium; from plant uptake; biogenic: 0.0170129 kg; = p0915
- Transformation, to annual crop [natural resource, land]: 2.8961 m2; = 1.0 * (p0857)
- Transformation, from annual crop [natural resource, land]: 2.8961 m2; = 1.0 * (p0879+p0871+p0877+p0873+p0883)
- Occupation, annual crop [natural resource, land]: 0.801954 m2*year; = 1.0 * (p0855)
- Nitrogen: 0.0383263 kg; = p0905
- Dry matter except CNPK; from plant uptake: 1.19669 kg; = p0917
- Phosphorus: 0.00604756 kg; = p0910

## Emissions to nature
- Potassium chloride; broadcast w/ incorp. in fert. in fall bef. plant.: 0.000261797 kg; = p2663*2.2166666667
- Other single phosphates; broadcast w/ incorp. in fert. in fall bef. plant.; kg P: 8.65114e-6 kg; = p2661
- Water: 0.80101 kg; = p3418+p2181+p3475+p2178+p2171
- Starane [soil, agricultural]: 3.40136e-6 kg; = 1.0 * (p5226+p4608+p3990)
- Phosphorous; applied in sewage sludge: 1.01438e-9 kg; = p3241
- Ammonium sulfate; broadcast w/o incorp. in fert. in fall bef. plant.: 0.000305066 kg; = p2830*4.7142857143
- Superphosphate, grades>22%; unspec. appl. method in fert. in fall bef. plant.; kg P: 3.69158e-7 kg; = p3049
- Potassium chloride; unspec. appl. method in fert. in fall bef. plant.: 3.38634e-5 kg; = p3053*2.2166666667
- Starane: 2.50493e-7 kg; = p3784
- Fenoxaprop ethyl ester [soil, agricultural]: 4.34619e-6 kg; = 1.0 * (p3979+p4597+p5215)
- cis-2-Butene: 2.80994e-7 kg; = p2149*1.1666666667
- Superphosphate, grades>22%; unspec. appl. method in fert. at plant.; kg P: 6.63812e-7 kg; = p3127
- Plant dry matter; in aboveground residue left on field: 0.260466 kg; = p2172
- Glycolaldehyde; from residue burning: 1.3179e-5 kg; = p2135*2.5
- Pyrasulfotole; broadcast with incorporation: 5.73536e-7 kg; = p4025
- Nonvolatile constituents; using unspec. method in man. at unknown time; exc.CNPK,biogenic: 2.15986e-5 kg; = p3474
- Magnesium [soil, agricultural]: 0.000479119 kg; = 1.0 * (p3227)
- Prothioconazol [soil, agricultural]: 5.47997e-6 kg; = 1.0 * (p4060+p4678+p5296)
- Monoammonium phosphate; no broadcast in fert. at plant.: 0.00104647 kg; = p2537*8.2142857143
- Monoammonium phosphate; unspec. appl. method in fert. in spr. bef. plant.: 0.000146441 kg; = p3083*8.2142857143
- Sodium nitrate; broadcast w/ incorp. in fert. in fall bef. plant.: 5.55155e-6 kg; = p2642*6.0714285714
- Pyraclostrobin [air, non-urban air or from high stacks]: 3.06158e-7 kg; = 1.0 * (p3855)
- Nitrogen solution; broadcast w/o incorp. in fert. in fall bef. plant.; broadcast w/o incorp. in fert. in fall bef. pl...: 0.000817347 kg; = p2834
- Propanenitrile: 4.19147e-7 kg; = p2157*1.5277777778
- trans-2-Butene: 3.7248e-7 kg; = p2148*1.1666666667
- Nitrogen; using unspec. method in manure at an unknown time: 3.47185e-5 kg; = p3470
- Aqueous ammonia; broadcast w/ incorp. in fert. in fall bef. plant.: 3.65861e-5 kg; = p2630*1.2142857143
- Potassium; broadcast w/o incorp. in manure at an unknown time: 5.46025e-5 kg; = p3415
- Diammonium phosphate; broadcast w/ incorp. in fert. at plant.: 0.000789504 kg; = p2728*4.7142857143
- cyclopentane: 1.08197e-8 kg; = p2153*1.0166666667
- Potassium chloride; unspec. appl. method in fert. at plant.: 0.000156129 kg; = p3131*2.2166666667
- Other single phosphates; broadcast w/o incorp. in fert. in spr. bef. plant.; kg P: 3.00172e-5 kg; = p2895
- Nitrogen; broadcast w/o incorp. in manure at an unknown time: 4.2157e-5 kg; = p3413
- Other single phosphates; no broadcast in fert. in fall bef. plant.; kg P: 1.05301e-5 kg; = p2466
- 2,4-D, dimethylamine salt; broadcast by air: 6.40148e-7 kg; = p3693
- Pentane [air, non-urban air or from high stacks]: 1.38386e-7 kg; = 1.0 * (p2152*1.0166666667)
- Urea; no broadcast in fert. at plant.: 0.000607953 kg; = p2529*5
- Other single phosphates; broadcast w/ incorp. in fert. in spr. bef. plant.; kg P: 2.85824e-5 kg; = p2700
- Carbon dioxide, in air: 0.00875355 kg; = p2163*3.6666666667
- Hydrocyanic acid: 1.86611e-6 kg; = p2154*2.25
- Potassium; in above-ground residue left on field; biogenic: 0.00609669 kg; = p2170
- Pesticide formulation balance; unspec. appl. method: 1.43785e-5 kg; = p5338
- Monoammonium phosphate; broadcast w/ incorp. in fert. at plant.: 0.00085974 kg; = p2732*8.2142857143
- Dioxins and furans (PCDD/F); from residue burning: 1.96239e-13 kg TEQ; = p2047
- Nitrogen solution; broadcast w/ incorp. in fert. at plant.; broadcast w/ incorp. in fert. at plant.; kg N: 0.000670311 kg; = p2717
- Filler materials, applied with synthetic fertilizer: 0.0200724 kg; = p2432
- Trifloxysulfuron-sodium; broadcast with incorporation: 3.27735e-7 kg; = p4097
- Diammonium phosphate; no broadcast in fert. in spr. bef. plant.: 0.00176566 kg; = p2494*4.7142857143
- Monoammonium phosphate; broadcast w/ incorp. in fert. in fall bef. plant.: 0.000478116 kg; = p2654*8.2142857143
- Other single K nutrients; no broadcast in fert. in fall bef. plant.; kg K: 1.64857e-5 kg; = p2470
- Prothioconazole: 4.03572e-7 kg; = p3854
- Gypsum: 1.42205e-6 kg; = p3229
- Monoammonium phosphate; broadcast w/o incorp. in fert. in fall bef. plant.: 0.000502118 kg; = p2849*8.2142857143
- Superphosphate, grades<= 22%; no broadcast in fert. in fall bef. plant.; kg P: 1.85076e-7 kg; = p2462
- Nitrogen dioxide: 1.30219e-5 kg; = p2039*3.2857142857
- Plant dry matter; in below-ground residue: 0.14492 kg; = p2177
- Zinc compounds: 3.17187e-8 kg; = p3232
- Bromoxynil heptanoate; foliar or directed spray: 5.40093e-6 kg; = p4542
- Potassium chloride; broadcast w/ incorp. in fert. at plant.: 0.00120703 kg; = p2741*2.2166666667
- Potassium; using unspec. method in manure at an unknown time: 4.4968e-5 kg; = p3472
- Bromoxynil heptanoate; broadcast by air: 8.90641e-7 kg; = p3718
- Ammonium sulfate; no broadcast in fert. in fall bef. plant.: 0.000207699 kg; = p2440*4.7142857143
- Ammonium nitrate; broadcast w/ incorp. in fert. in spr. bef. plant.: 0.000964303 kg; = p2671*4.7142857143
- Urea; broadcast w/ incorp. in fert. at plant.: 0.00106874 kg; = p2724*5
- Ammonium sulfate; no broadcast in fert. in spr. bef. plant.: 0.00054808 kg; = p2479*4.7142857143
- Methyl parathion [air, non-urban air or from high stacks]: 1.23855e-6 kg; = 1.0 * (p3825)
- Monoammonium phosphate; unspec. appl. method in fert. in fall bef. plant.: 4.43239e-5 kg; = p3044*8.2142857143
- Superphosphate, grades<= 22%; broadcast w/o incorp. in fert. in fall bef. plant.; kg P: 1.59684e-7 kg; = p2852
- Potassium chloride; broadcast w/ incorp. in fert. in spr. bef. plant.: 0.00191525 kg; = p2702*2.2166666667
- Anhydrous ammonia; broadcast w/o incorp. in fert. in fall bef. plant.: 0.00101957 kg; = p2823*1.2142857143
- Urea; broadcast w/ incorp. in fert. in spr. bef. plant.: 0.00411582 kg; = p2685*5
- Other single K nutrients; broadcast w/ incorp. in fert. in fall bef. plant.; kg K: 2.02815e-5 kg; = p2665
- Ash: 0.00129387 kg; = p2021+p2022
- Aqueous ammonia; broadcast w/o incorp. in fert. in fall bef. plant.: 3.05684e-5 kg; = p2825*1.2142857143
- Diammonium phosphate; no broadcast in fert. in fall bef. plant.: 0.000534419 kg; = p2455*4.7142857143
- Ammonium nitrate; broadcast w/ incorp. in fert. at plant.: 0.000250398 kg; = p2710*4.7142857143
- Potassium chloride; broadcast w/o incorp. in fert. at plant.: 0.00127651 kg; = p2936*2.2166666667
- Aqueous ammonia; broadcast w/ incorp. in fert. in spr. bef. plant.: 9.6544e-5 kg; = p2669*1.2142857143
- Dinitrogen monoxide [air, non-urban air or from high stacks]: 4.57978e-7 kg; = 1.0 * (p2044*1.5714285714)
- Potassium chloride; unspec. appl. method in fert. in spr. bef. plant.: 0.000247737 kg; = p3092*2.2166666667
- Anhydrous ammonia; no broadcast in fert. at plant.: 0.000475645 kg; = p2511*1.2142857143
- Volatile constituents; using unspec. method in man. in fal.bef.plant: 0.0105391 kg; = p3461
- Diammonium phosphate; broadcast w/o incorp. in fert. at plant.: 0.000829137 kg; = p2923*4.7142857143
- Monoammonium phosphate; no broadcast in fert. in spr. bef. plant.: 0.00192273 kg; = p2498*8.2142857143
- Pesticide formulation balance; foliar or directed spray: 5.35917e-5 kg; = p4720
- Ammonium nitrate; broadcast w/o incorp. in fert. in fall bef. plant.: 0.000305323 kg; = p2827*4.7142857143
- Phosphorous; broadcast w/o incorp. in manure at an unknown time: 1.32055e-5 kg; = p3414
- Other single K nutrients; unspec. appl. method in fert. in spr. bef. plant.; kg K: 1.91923e-5 kg; = p3094
- Bromoxynil octanoate: 2.11527e-6 kg; = p3719
- Diammonium phosphate; broadcast w/o incorp. in fert. in spr. bef. plant.: 0.00152341 kg; = p2884*4.7142857143
- Sodium nitrate; no broadcast in fert. in spr. bef. plant.: 8.33335e-6 kg; = p2486*6.0714285714
- Anhydrous ammonia; broadcast w/o incorp. in fert. in spr. bef. plant.: 0.00269045 kg; = p2862*1.2142857143
- Sulfur dioxide [air, non-urban air or from high stacks]: 2.87818e-6 kg; = 1.0 * (p2041)
- Particulates, < 10 um: 4.32381e-5 kg; = p2036+p2034
- Nitrogen solution; broadcast w/ incorp. in fert. in fall bef. plant.; broadcast w/ incorp. in fert. in fall bef. plan...: 0.000978253 kg; = p2639
- Other single phosphates; unspec. appl. method in fert. in spr. bef. plant.; kg P: 2.64973e-6 kg; = p3090
- MCPA-2-ethylhexyl; broadcast by air: 1.66995e-6 kg; = p3812
- Ammonium nitrate; broadcast w/o incorp. in fert. in spr. bef. plant.: 0.000805692 kg; = p2866*4.7142857143
- Aqueous ammonia; no broadcast in fert. in fall bef. plant.: 2.0812e-5 kg; = p2435*1.2142857143
- Nonvolatile constituents;broadcast w/o incorp. in man. in fal.bef.plant; exc.CNPK,biogenic: 0.00156807 kg; = p3405
- Superphosphate, grades>22%; broadcast w/o incorp. in fert. in fall bef. plant.; kg P: 4.18196e-6 kg; = p2854
- Ammonium sulfate; broadcast w/ incorp. in fert. in spr. bef. plant.: 0.000963489 kg; = p2674*4.7142857143
- Acetic acid [air, non-urban air or from high stacks]: 3.65977e-5 kg; = 1.0 * (p2127*2.5)
- Other single K nutrients; unspec. appl. method in fert. at plant.; kg K: 1.20953e-5 kg; = p3133
- Ammonium sulfate; no broadcast in fert. at plant.: 0.000142318 kg; = p2518*4.7142857143
- Anhydrous ammonia; broadcast w/ incorp. in fert. in fall bef. plant.: 0.00122028 kg; = p2628*1.2142857143
- Phenol [air, non-urban air or from high stacks]: 3.3928e-6 kg; = 1.0 * (p2133*1.3055555556)
- Clopyralid [soil, agricultural]: 2.83447e-6 kg; = 1.0 * (p3941+p5177+p4559)
- Volatile constituents; using unspec. method in man. at unknown time: 0.000176268 kg; = p3473
- Potassium chloride; no broadcast in fert. in spr. bef. plant.: 0.0015568 kg; = p2507*2.2166666667
- Urea; no broadcast in fert. in fall bef. plant.: 0.000887247 kg; = p2451*5
- Clopyralid: 2.08744e-7 kg; = p3735
- Diammonium phosphate; no broadcast in fert. at plant.: 0.000960982 kg; = p2533*4.7142857143
- Monoammonium phosphate; no broadcast in fert. in fall bef. plant.: 0.000581962 kg; = p2459*8.2142857143
- Superphosphate, grades>22%; no broadcast in fert. at plant.; kg P: 8.7157e-6 kg; = p2542
- Ammonium nitrate; no broadcast in fert. in fall bef. plant.: 0.000207875 kg; = p2437*4.7142857143
- Trifloxysulfuron-sodium; foliar or directed spray: 3.37558e-7 kg; = p4715
- Calcium [soil, agricultural]: 0.00718334 kg; = 1.0 * (p3226+p3218)
- Superphosphate, grades<= 22%; broadcast w/ incorp. in fert. at plant.; kg P: 2.73415e-7 kg; = p2735
- Other single K nutrients; broadcast w/o incorp. in fert. in spr. bef. plant.; kg K: 0.000156916 kg; = p2899
- Phosphorous; using unspec. method in manure at an unknown time: 1.08754e-5 kg; = p3471
- Pyraclostrobin (prop) [soil, agricultural]: 4.15722e-6 kg; = 1.0 * (p5297+p4679+p4061)
- Superphosphate, grades>22%; unspec. appl. method in fert. in spr. bef. plant.; kg P: 1.21965e-6 kg; = p3088
- Pesticides, unspecified: 4.73825e-6 kg; = p3895
- MCPA-isooctyl; unspec. appl. method: 6.11318e-7 kg; = p5255
- Urea; broadcast w/o incorp. in fert. in spr. bef. plant.: 0.00343884 kg; = p2880*5
- Aqueous ammonia; no broadcast in fert. at plant.: 1.42606e-5 kg; = p2513*1.2142857143
- Acetaldehyde [air, non-urban air or from high stacks]: 8.1357e-6 kg; = 1.0 * (p2130*1.8333333333)
- Seeds; used in planting and sowing: 0.039594 kg; = p2179
- Nitrogen; applied in sewage sludge: 8.49731e-9 kg; = p3240
- Sewage sludge dry matter; applied in sewage sludge: 9.40735e-10 kg; = p3243
- Anhydrous ammonia; broadcast w/ incorp. in fert. at plant.: 0.000836154 kg; = p2706*1.2142857143
- Pesticide formulation balance; broadcast by air: 8.83756e-6 kg; = p3896
- Nitrogen solution; no broadcast in fert. in fall bef. plant.; no broadcast in fert. in fall bef. plant.; kg N: 0.000556478 kg; = p2444
- Nitrogen solution; broadcast w/o incorp. in fert. at plant.; broadcast w/o incorp. in fert. at plant.; kg N: 0.000560057 kg; = p2912
- Phosphorous; in below-ground residue: 0.000557327 kg; = p2175
- Trifloxysulfuron-sodium; broadcast by air: 5.56651e-8 kg; = p3891
- Carbon monoxide, fossil [air, non-urban air or from high stacks]: 0.00036088 kg; = 1.0 * (p2028*2.3333333333)
- Other single K nutrients; broadcast w/ incorp. in fert. in spr. bef. plant.; kg K: 0.000148375 kg; = p2704
- Other single K nutrients; unspec. appl. method in fert. in fall bef. plant.; kg K: 2.62341e-6 kg; = p3055
- Sodium nitrate; broadcast w/ incorp. in fert. in spr. bef. plant.: 1.46495e-5 kg; = p2681*6.0714285714
- Superphosphate, grades<= 22%; unspec. appl. method in fert. at plant.; kg P: 2.5347e-8 kg; = p3125
- Toluene [air, non-urban air or from high stacks]: 1.24593e-6 kg; = 1.0 * (p2141*1.0952380952)
- Plant dry matter; from residue burning: 0.00235043 kg; = p2164
- Other single K nutrients; no broadcast in fert. in spr. bef. plant.; kg K: 0.000120606 kg; = p2509
- Superphosphate, grades<= 22%; unspec. appl. method in fert. in spr. bef. plant.; kg P: 4.65713e-8 kg; = p3086
- Diammonium phosphate; broadcast w/ incorp. in fert. in fall bef. plant.: 0.000439057 kg; = p2650*4.7142857143
- Anhydrous ammonia; no broadcast in fert. in fall bef. plant.: 0.000694157 kg; = p2433*1.2142857143
- Superphosphate, grades<= 22%; unspec. appl. method in fert. in fall bef. plant.; kg P: 1.40959e-8 kg; = p3047
- Superphosphate, grades<= 22%; no broadcast in fert. at plant.; kg P: 3.328e-7 kg; = p2540
- Ethyne [air, non-urban air or from high stacks]: 1.78058e-6 kg; = 1.0 * (p2132*1.0833333333)
- Fenoxaprop ethyl ester: 3.20074e-7 kg; = p3773
- Bromoxynil octanoate: 2.87226e-5 kg; = p5161+p3925+p4543
- Volatile constituents; broadcast w/o incorp. in man. at unknown time: 0.000214033 kg; = p3416
- MCPA-isooctyl; foliar or directed spray: 2.27852e-6 kg; = p4637
- Nitrogen; broadcast w/o incorp. in manure in fall before planting: 0.00252058 kg; = p3401
- Monoammonium phosphate; broadcast w/ incorp. in fert. in spr. bef. plant.: 0.00157964 kg; = p2693*8.2142857143
- MCPA-2-ethylhexyl; foliar or directed spray: 1.01267e-5 kg; = p4636
- Phosphorous; in above-ground residue left on field: 0.00100169 kg; = p2169
- Formaldehyde [air, non-urban air or from high stacks]: 1.35986e-5 kg; = 1.0 * (p2128*2.5)
- Sodium nitrate; no broadcast in fert. in fall bef. plant.: 3.15799e-6 kg; = p2447*6.0714285714
- Nonvolatile constituents; broadcast w/o incorp. in man. at unknown time; exc.CNPK,biogenic: 2.62261e-5 kg; = p3417
- Phosphorous; using unspec. method in manure in fall before planting: 0.000650245 kg; = p3459
- Propiconazole [soil, agricultural]: 4.34619e-6 kg; = 1.0 * (p5293+p4057+p4675)
- isopentane: 1.10709e-7 kg; = p2151*1.0166666667
- Sodium nitrate; broadcast w/o incorp. in fert. in fall bef. plant.: 4.63841e-6 kg; = p2837*6.0714285714
- Carbon [soil, agricultural]: 0.384578 kg; = 1.0 * (p3400+p3242+p3469+p2167+p3457+p3217+p3225+p3412+p2173)
- Aqueous ammonia; broadcast w/o incorp. in fert. in spr. bef. plant.: 8.06642e-5 kg; = p2864*1.2142857143
- Oxygen; applied in dolomite: 0.00189605 kg; = p3228
- Methyl vinyl ether; from residue burning: 4.96136e-7 kg; = p2137*1.6111111111
- Pyrasulfotole; foliar or directed spray: 5.90726e-7 kg; = p4643
- Acrylonitrile: 2.19263e-7 kg; = p2156*1.4722222222
- MCPA-2-ethylhexyl; unspec. appl. method: 2.71697e-6 kg; = p5254
- Nitrogen; in below-ground residue: 0.00364561 kg; = p2174
- Propoxycarbazone-sodium: 2.78325e-8 kg; = p3852
- Superphosphate, grades<= 22%; broadcast w/ incorp. in fert. in spr. bef. plant.; kg P: 5.02359e-7 kg; = p2696
- Propiconazole [air, non-urban air or from high stacks]: 3.20074e-7 kg; = 1.0 * (p3851)
- Other single phosphates; no broadcast in fert. in spr. bef. plant.; kg P: 3.47904e-5 kg; = p2505
- Superphosphate, grades>22%; broadcast w/ incorp. in fert. in fall bef. plant.; kg P: 3.98206e-6 kg; = p2659
- Nitrogen; using unspec. method in manure in fall before planting: 0.00207583 kg; = p3458
- Ammonium nitrate; broadcast w/ incorp. in fert. in fall bef. plant.: 0.00036543 kg; = p2632*4.7142857143
- 2,4-D, dimethylamine salt: 8.69237e-6 kg; = p3899+p4517+p5135
- Superphosphate, grades>22%; no broadcast in fert. in fall bef. plant.; kg P: 4.84695e-6 kg; = p2464
- Sodium nitrate; broadcast w/o incorp. in fert. in spr. bef. plant.: 1.22399e-5 kg; = p2876*6.0714285714
- Isoprene [air, non-urban air or from high stacks]: 2.46826e-6 kg; = 1.0 * (p2145*1.1333333333)
- Oxygen; applied in limestone: 0.00758846 kg; = p3219
- Anhydrous ammonia; no broadcast in fert. in spr. bef. plant.: 0.00183175 kg; = p2472*1.2142857143
- Ammonium nitrate; no broadcast in fert. at plant.: 0.000142438 kg; = p2515*4.7142857143
- Pesticide formulation balance; broadcast with incorporation: 5.20322e-5 kg; = p4102
- Aqueous ammonia; no broadcast in fert. in spr. bef. plant.: 5.4919e-5 kg; = p2474*1.2142857143
- Potassium chloride; no broadcast in fert. in fall bef. plant.: 0.000212801 kg; = p2468*2.2166666667
- Other single phosphates; unspec. appl. method in fert. at plant.; kg P: 1.44215e-6 kg; = p3129
- Ethane [air, non-urban air or from high stacks]: 5.94422e-6 kg; = 1.0 * (p2126*1.25)
- Superphosphate, grades<= 22%; broadcast w/ incorp. in fert. in fall bef. plant.; kg P: 1.52051e-7 kg; = p2657
- MCPA-isooctyl; broadcast by air: 3.75739e-7 kg; = p3813
- Monoammonium phosphate; broadcast w/o incorp. in fert. at plant.: 0.000902899 kg; = p2927*8.2142857143
- Superphosphate, grades<= 22%; no broadcast in fert. in spr. bef. plant.; kg P: 6.11469e-7 kg; = p2501
- Other single phosphates; no broadcast in fert. at plant.; kg P: 1.89351e-5 kg; = p2544
- Sulfuric acid [soil, agricultural]: 7.53155e-8 kg; = 1.0 * (p3231)
- Nitrogen; in above-ground residue left on field: 0.00655231 kg; = p2168
- Volatile constituents; broadcast w/o incorp. in man. in fal.bef.plant: 0.0127971 kg; = p3404
- Anhydrous ammonia; broadcast w/ incorp. in fert. in spr. bef. plant.: 0.0032201 kg; = p2667*1.2142857143
- Other single phosphates; broadcast w/o incorp. in fert. in fall bef. plant.; kg P: 9.08543e-6 kg; = p2856
- Butane [air, non-urban air or from high stacks]: 3.9741e-7 kg; = 1.0 * (p2147*1.0208333333)
- Urea; broadcast w/o incorp. in fert. at plant.: 0.000892953 kg; = p2919*5
- Ammonium sulfate; broadcast w/o incorp. in fert. at plant.: 0.000209035 kg; = p2908*4.7142857143
- Diammonium phosphate; broadcast w/o incorp. in fert. in fall bef. plant.: 0.000461098 kg; = p2845*4.7142857143
- Methyl parathion [soil, agricultural]: 1.68179e-5 kg; = 1.0 * (p5267+p4649+p4031)
- Other single phosphates; broadcast w/ incorp. in fert. at plant.; kg P: 1.55563e-5 kg; = p2739
- 1-Butene: 8.75655e-7 kg; = p2144*1.1666666667
- Diammonium phosphate; broadcast w/ incorp. in fert. in spr. bef. plant.: 0.00145059 kg; = p2689*4.7142857143
- Tebuconazole [soil, agricultural]: 1.0771e-5 kg; = 1.0 * (p4697+p5315+p4079)
- Acetone [air, non-urban air or from high stacks]: 2.91913e-6 kg; = 1.0 * (p2139*1.6111111111)
- NMVOC, non-methane volatile organic compounds, unspecified origin [air, non-urban air or from high stacks]: 0.000168074 kg; = 1.0 * (p2051+p2052)
- Ammonium nitrate; broadcast w/o incorp. in fert. at plant.: 0.000209211 kg; = p2905*4.7142857143
- isobutene: 7.64565e-7 kg; = p2150*1.1666666667
- Potassium chloride; no broadcast in fert. at plant.: 0.000981126 kg; = p2546*2.2166666667
- Trifloxysulfuron-sodium; unspec. appl. method: 9.05656e-8 kg; = p5333
- Propane [air, non-urban air or from high stacks]: 1.84229e-6 kg; = 1.0 * (p2142*1.2222222222)
- Other single K nutrients; broadcast w/o incorp. in fert. at plant.; kg K: 9.88916e-5 kg; = p2938
- Acetol; from residue burning: 2.46296e-5 kg; = p2134*2.0555555556
- MCPA-isooctyl; broadcast with incorporation: 2.21221e-6 kg; = p4019
- Superphosphate, grades<= 22%; broadcast w/o incorp. in fert. in spr. bef. plant.; kg P: 5.27577e-7 kg; = p2891
- Methanol [air, non-urban air or from high stacks]: 2.14985e-5 kg; = 1.0 * (p2129*2.6666666667)
- Urea; broadcast w/o incorp. in fert. in fall bef. plant.: 0.00130318 kg; = p2841*5
- Pyrasulfotole; broadcast by air: 9.74138e-8 kg; = p3819
- Superphosphate, grades>22%; broadcast w/ incorp. in fert. in spr. bef. plant.; kg P: 1.31563e-5 kg; = p2698
- Superphosphate, grades>22%; broadcast w/o incorp. in fert. at plant.; kg P: 7.51992e-6 kg; = p2932
- Tebuconazole: 7.93227e-7 kg; = p3873
- Aqueous ammonia; broadcast w/ incorp. in fert. at plant.: 2.50693e-5 kg; = p2708*1.2142857143
- Sodium nitrate; no broadcast in fert. at plant.: 2.1639e-6 kg; = p2525*6.0714285714
- Superphosphate, grades>22%; broadcast w/ incorp. in fert. at plant.; kg P: 7.16046e-6 kg; = p2737
- Sodium nitrate; broadcast w/ incorp. in fert. at plant.: 3.80399e-6 kg; = p2720*6.0714285714
- Butadiene [air, non-urban air or from high stacks]: 9.86966e-7 kg; = 1.0 * (p2143*1.125)
- Potassium chloride; broadcast w/o incorp. in fert. in spr. bef. plant.: 0.0020255 kg; = p2897*2.2166666667
- Potassium; broadcast w/o incorp. in manure in fall before planting; biogenic: 0.0032647 kg; = p3403
- Ammonium nitrate; no broadcast in fert. in spr. bef. plant.: 0.000548543 kg; = p2476*4.7142857143
- Monoammonium phosphate; unspec. appl. method in fert. at plant.: 7.97024e-5 kg; = p3122*8.2142857143
- Methane: 1.38432e-5 kg; = p2025*1.3333333333
- Potassium; using unspec. method in manure in fall before planting; biogenic: 0.00268865 kg; = p3460
- Superphosphate, grades>22%; no broadcast in fert. in spr. bef. plant.; kg P: 1.60138e-5 kg; = p2503
- Nitrogen solution; broadcast w/o incorp. in fert. in spr. bef. plant.; broadcast w/o incorp. in fert. in spr. bef. pl...: 0.00215683 kg; = p2873
- Superphosphate, grades<= 22%; broadcast w/o incorp. in fert. at plant.; kg P: 2.87141e-7 kg; = p2930
- Nitrogen solution; no broadcast in fert. in spr. bef. plant.; no broadcast in fert. in spr. bef. plant.; kg N: 0.00146844 kg; = p2483
- Urea; broadcast w/ incorp. in fert. in fall bef. plant.: 0.00155972 kg; = p2646*5
- Bromoxynil heptanoate; unspec. appl. method: 1.44905e-6 kg; = p5160
- Furan [air, non-urban air or from high stacks]: 7.15557e-7 kg; = 1.0 * (p2138*1.4166666667)
- Other single phosphates; unspec. appl. method in fert. in fall bef. plant.; kg P: 8.02006e-7 kg; = p3051
- Acetonitrile [air, non-urban air or from high stacks]: 1.37316e-6 kg; = 1.0 * (p2155*1.7083333333)
- Diammonium phosphate; unspec. appl. method in fert. in fall bef. plant.: 4.07029e-5 kg; = p3040*4.7142857143
- Diammonium phosphate; unspec. appl. method in fert. in spr. bef. plant.: 0.000134478 kg; = p3079*4.7142857143
- Other single phosphates; broadcast w/o incorp. in fert. at plant.; kg P: 1.63372e-5 kg; = p2934
- Urea; no broadcast in fert. in spr. bef. plant.: 0.00234128 kg; = p2490*5
- Phosphorous; broadcast w/o incorp. in manure in fall before planting: 0.000789561 kg; = p3402
- Anhydrous ammonia; broadcast w/o incorp. in fert. at plant.: 0.000698621 kg; = p2901*1.2142857143
- Benzene [air, non-urban air or from high stacks]: 1.00374e-6 kg; = 1.0 * (p2140*1.0833333333)
- Aqueous ammonia; broadcast w/o incorp. in fert. at plant.: 2.09458e-5 kg; = p2903*1.2142857143
- Other single K nutrients; broadcast w/o incorp. in fert. in fall bef. plant.; kg K: 2.1449e-5 kg; = p2860
- Propene [air, non-urban air or from high stacks]: 4.4221e-6 kg; = 1.0 * (p2136*1.1666666667)
- Ammonium sulfate; broadcast w/ incorp. in fert. at plant.: 0.000250186 kg; = p2713*4.7142857143
- Nitrogen solution; no broadcast in fert. at plant.; no broadcast in fert. at plant.; kg N: 0.000381306 kg; = p2522
- Potassium; in below-ground residue; biogenic: 0.00339211 kg; = p2176
- Potassium chloride; broadcast w/o incorp. in fert. in fall bef. plant.: 0.000276868 kg; = p2858*2.2166666667
- Superphosphate, grades>22%; broadcast w/o incorp. in fert. in spr. bef. plant.; kg P: 1.38167e-5 kg; = p2893
- Monoammonium phosphate; broadcast w/o incorp. in fert. in spr. bef. plant.: 0.00165894 kg; = p2888*8.2142857143
- Other limestone constituents; applied in limestone: 0.00101002 kg; = p3220
- Other single K nutrients; no broadcast in fert. at plant.; kg K: 7.60081e-5 kg; = p2548
- Pesticides, unspecified [soil, agricultural]: 6.43392e-5 kg; = 1.0 * (p5337+p4101+p4719)
- Propoxycarbazone-sodium (prop) [soil, agricultural]: 3.77929e-7 kg; = 1.0 * (p4058+p4676+p5294)
- Sodium nitrate; broadcast w/o incorp. in fert. at plant.: 3.1783e-6 kg; = p2915*6.0714285714
- Ammonium sulfate; broadcast w/o incorp. in fert. in spr. bef. plant.: 0.000805012 kg; = p2869*4.7142857143
- I butane; from residue burning: 1.3799e-7 kg; = p2146*1.0208333333
- Nitrogen solution; broadcast w/ incorp. in fert. in spr. bef. plant.; broadcast w/ incorp. in fert. in spr. bef. plan...: 0.00258143 kg; = p2678
- Ethene [air, non-urban air or from high stacks]: 9.51766e-6 kg; = 1.0 * (p2125*1.1666666667)
- Formic acid [air, non-urban air or from high stacks]: 6.55453e-6 kg; = 1.0 * (p2131*3.8333333333)
- Pyrasulfotole; unspec. appl. method: 1.5849e-7 kg; = p5261
- Ammonia [air, non-urban air or from high stacks]: 1.41952e-5 kg; = 1.0 * (p2159*1.2142857143)
- Other single K nutrients; broadcast w/ incorp. in fert. at plant.; kg K: 9.35087e-5 kg; = p2743
- Water [air, non-urban air or from high stacks]: 1.03842e-6 m3; = 0.001 * (p2016)
- Bromoxynil heptanoate; broadcast with incorporation: 5.24376e-6 kg; = p3924
- Sulfur [soil, agricultural]: 1.56982e-7 kg; = 1.0 * (p3230)
- Diammonium phosphate; unspec. appl. method in fert. at plant.: 7.31912e-5 kg; = p3118*4.7142857143
- Particulates, < 2.5 um [air, non-urban air or from high stacks]: 2.63615e-5 kg; = 1.0 * (p2035+p2033)
- MCPA-2-ethylhexyl; broadcast with incorporation: 9.83205e-6 kg; = p4018
- Ammonium sulfate; broadcast w/ incorp. in fert. in fall bef. plant.: 0.000365122 kg; = p2635*4.7142857143

## Sampling procedure
A delete-a-group jackknife is used by the USDA to estimate the ARMS sample means and RSEs, based on a 30 sample delete-a-group jackknife. Because of this relatively small sample size, a Students t distribution is used to represent ARMS data probability density functions. Other representations of uncertainty are described in Cooper, J.S., Kahn, E., Noon, M. (2012). LCA Digital Commons Unit Process Data: field crop production Version 1. Prepared for the US Department of Agriculture National Agricultural Library. Retrieved from https://www.lcacommons.gov/discovery/docs/LCA%20Digital%20Commons%20Unit%20Process%20Data%20final%20updated.pdf

## Extrapolations
Data represent an aggregation of processes applied in Minnesota in 2009. Data development is demonstrated by parameterization (exlicitly presents all raw and uncertainty data and all calculations). Flow data quality according to the LCADC convention is provided for all flows.
