# soybeans; at harvest in multiple production years; at farm; 85%-92% moisture

Dataset: EcoSpold 2, unit process
Geography: GLO
Time period: 1996-01-02 to 2007-01-01
Scenario: Business-as-Usual
System model: Allocation, ecoinvent default
Generated by: cooperjs@u.washington.edu
isCopyrightProtected: false

## General comment
This unit process/ gate-to-gate data set represents the production of 1 kg soybeans. Coproduction with residue over multiple years is captured in the referenced intermediate flow datasets. Accounting multiple years of crop production is intended to capture the variability in (e.g., yield, irrigation, and nutrient applications) that comes from differences in weather and operations from year to year. Applicable classifications include ISIC 0111, NAIC 111110, UNSPSC 50407053; this dataset was prepared in ILCD format using the UWDFE Lab Excel to ILCD File Generator (beta version, August 2013)

## Geography
The unit process is assumed to represent production in Mississippi (US State).

## Technology
This process produces soybeans; at harvest in multiple production years; at farm; 85%-92% moisture. The process is assumed to represent production in Mississippi (US State). Yields and related inputs and outputs represent 7 years of production and are thus intended to capture variation from year to year. This dataset includes consideration of crop production over 7 years.

## Time period
Start and end dates match the underlying data obtained from the USDA Agricultural Resource Management Survey (ARMS).

## Reference product
- soybeans; at harvest in multiple production years; at farm; 85%-92% moisture: 1 kg

## Inputs from technosphere
- soybeans; at harvest in 1999; at farm; 85%-92% moisture: 0.134257 kg
- soybeans; at harvest in 2002; at farm; 85%-92% moisture: 0.131822 kg
- soybeans; at harvest in 1997; at farm; 85%-92% moisture: 0.192952 kg
- soybeans; at harvest in 2000; at farm; 85%-92% moisture: 0.104519 kg
- soybeans; at harvest in 1998; at farm; 85%-92% moisture: 0.144331 kg
- soybeans; at harvest in 2006; at farm; 85%-92% moisture: 0.128995 kg
- soybeans; at harvest in 1996; at farm; 85%-92% moisture: 0.163124 kg

## Sampling procedure
As reflected in the referenced intermediate flow datasets, a delete-a-group jackknife is used by the USDA to estimate the ARMS sample means and RSEs, based on a sample delete-a-group jackknife. Because of this relatively small sample size, a Students t distribution is used to represent ARMS data probability density functions. Other representations of uncertainty are described in Cooper, J.S., Kahn, E., Noon, M. (2012). LCA Digital Commons Unit Process Data: field crop production Version 1. Prepared for the US Department of Agriculture National Agricultural Library. Retrieved from https://www.lcacommons.gov/discovery/docs/LCA%20Digital%20Commons%20Unit%20Process%20Data%20final%20updated.pdf

## Extrapolations
Data represent an aggregation of processes applied in Mississippi from 1996 to 2006. Data development in the referenced intermediate flow datasets is demonstrated by parameterization (exlicitly presents all raw and uncertainty data and all calculations).
