# corn grain; at harvest in 1998; at farm; 85%-91% moisture

Dataset: EcoSpold 2, unit process
Geography: GLO
Time period: 1998-01-02 to 1999-01-01
Scenario: Business-as-Usual
System model: Allocation, ecoinvent default
Generated by: cooperjs@u.washington.edu
isCopyrightProtected: false

## General comment
This unit process/ gate-to-gate dataset represents the production of 1 kg corn coproduced with silage and residue. The process technologies are an aggregation of those applied in Indiana in 1998. Applicable classifications include ISIC 0111, NAIC 111150, UNSPSC 50403200; this dataset was prepared in ILCD format using the UWDFE Lab Excel to ILCD File Generator (beta version, August 2013)

Exchange "Prosulfuron-soil agricultural" is the result of combining the following original LCA Commons flows: "Prosulfuron; broadcast with incorporation; kg AI", "Prosulfuron; banded or side-dressed; kg AI", "Prosulfuron; broadcast without incorporation; kg AI", "Prosulfuron; unspec. appl. method; kg AI", "Prosulfuron; in seed furrow; kg AI", "Prosulfuron; foliar or directed spray; kg AI".
Exchange "Cyanazine-soil agricultural" is the result of combining the following original LCA Commons flows: "Cyanazine; in seed furrow; kg AI", "Cyanazine; broadcast with incorporation; kg AI", "Cyanazine; banded or side-dressed; kg AI", "Cyanazine; foliar or directed spray; kg AI", "Cyanazine; broadcast without incorporation; kg AI", "Cyanazine; unspec. appl. method; kg AI".
Exchange "Terbufos-soil agricultural" is the result of combining the following original LCA Commons flows: "Terbufos; in seed furrow; kg AI", "Terbufos; banded or side-dressed; kg AI", "Terbufos; broadcast with incorporation; kg AI", "Terbufos; broadcast without incorporation; kg AI", "Terbufos; unspec. appl. method; kg AI", "Terbufos; foliar or directed spray; kg AI".
Exchange "Tefluthrin-soil agricultural" is the result of combining the following original LCA Commons flows: "Tefluthrin; foliar or directed spray; kg AI", "Tefluthrin; in seed furrow; kg AI", "Tefluthrin; unspec. appl. method; kg AI", "Tefluthrin; broadcast with incorporation; kg AI", "Tefluthrin; broadcast without incorporation; kg AI", "Tefluthrin; banded or side-dressed; kg AI".
Exchange "NMVOC, non-methane volatile organic compounds, unspecified origin-air low population density" is the result of combining the following original LCA Commons flows: "NMVOCs; from residue burning; kg except C, biogenic", "NMVOCs; from residue burning; kg C, biogenic".
Exchange "Glyphosate-soil agricultural" is the result of combining the following original LCA Commons flows: "Glyphosate; broadcast with incorporation; kg AI", "Glyphosate; unspec. appl. method; kg AI", "Glyphosate; foliar or directed spray; kg AI", "Glyphosate; banded or side-dressed; kg AI", "Glyphosate; in seed furrow; kg AI", "Glyphosate; broadcast without incorporation; kg AI".
Exchange "Simazine-soil agricultural" is the result of combining the following original LCA Commons flows: "Simazine; in seed furrow; kg AI", "Simazine; broadcast without incorporation; kg AI", "Simazine; foliar or directed spray; kg AI", "Simazine; banded or side-dressed; kg AI", "Simazine; unspec. appl. method; kg AI", "Simazine; broadcast with incorporation; kg AI".
Exchange "Imazethapyr-soil agricultural" is the result of combining the following original LCA Commons flows: "Imazethapyr; unspec. appl. method; kg AI", "Imazethapyr; in seed furrow; kg AI", "Imazethapyr; foliar or directed spray; kg AI", "Imazethapyr; broadcast without incorporation; kg AI", "Imazethapyr; broadcast with incorporation; kg AI", "Imazethapyr; banded or side-dressed; kg AI".
Exchange "Dicamba-soil agricultural" is the result of combining the following original LCA Commons flows: "Dicamba; broadcast without incorporation; kg AI", "Dicamba; broadcast with incorporation; kg AI", "Dicamba; banded or side-dressed; kg AI", "Dicamba; foliar or directed spray; kg AI", "Dicamba; unspec. appl. method; kg AI", "Dicamba; in seed furrow; kg AI".
Exchange "Nicosulfuron-soil agricultural" is the result of combining the following original LCA Commons flows: "Nicosulfuron; in seed furrow; kg AI", "Nicosulfuron; foliar or directed spray; kg AI", "Nicosulfuron; broadcast with incorporation; kg AI", "Nicosulfuron; broadcast without incorporation; kg AI", "Nicosulfuron; banded or side-dressed; kg AI", "Nicosulfuron; unspec. appl. method; kg AI".
Exchange "Tebupirimphos-soil agricultural" is the result of combining the following original LCA Commons flows: "Tebupirimfos; broadcast with incorporation; kg AI", "Tebupirimfos; foliar or directed spray; kg AI", "Tebupirimfos; broadcast without incorporation; kg AI", "Tebupirimfos; banded or side-dressed; kg AI", "Tebupirimfos; in seed furrow; kg AI", "Tebupirimfos; unspec. appl. method; kg AI".
Exchange "Carbon-soil agricultural" is the result of combining the following original LCA Commons flows: "Carbon; broadcast w/o incorp. in manure at an unknown time", "Carbon; applied in sewage sludge", "Carbon; broadcast w/ incorp. in manure at an unknown time", "Carbon; using unspec. method in manure at an unknown time", "Carbon; applied in limestone", "Carbon; in below-ground residue; biogenic", "Carbon; applied in dolomite", "Carbon; in above-ground residue left on field; biogenic".
Exchange "Particulates, < 2.5 um-air low population density" is the result of combining the following original LCA Commons flows: "PM2.5; from residue burning; kg C, biogenic", "PM2.5; from residue burning; kg except C, biogenic".
Exchange "Chlorpyrifos-soil agricultural" is the result of combining the following original LCA Commons flows: "Chlorpyrifos; in seed furrow; kg AI", "Chlorpyrifos; broadcast with incorporation; kg AI", "Chlorpyrifos; banded or side-dressed; kg AI", "Chlorpyrifos; foliar or directed spray; kg AI", "Chlorpyrifos; unspec. appl. method; kg AI", "Chlorpyrifos; broadcast without incorporation; kg AI".
Exchange "Pesticides, unspecified-soil agricultural" is the result of combining the following original LCA Commons flows: "Unspecified pesticide; in seed furrow; kg AI", "Unspecified pesticide; unspec. appl. method; kg AI", "Unspecified pesticide; banded or side-dressed; kg AI", "Unspecified pesticide; broadcast without incorporation; kg AI", "Unspecified pesticide; foliar or directed spray; kg AI", "Unspecified pesticide; broadcast with incorporation; kg AI".
Exchange "Ash-soil agricultural" is the result of combining the following original LCA Commons flows: "Ash; from residue burning; kg except C, biogenic", "Ash; from residue burning; kg C, biogenic".
Exchange "Acetochlor-soil agricultural" is the result of combining the following original LCA Commons flows: "Acetochlor; foliar or directed spray; kg AI", "Acetochlor; in seed furrow; kg AI", "Acetochlor; broadcast with incorporation; kg AI", "Acetochlor; unspec. appl. method; kg AI", "Acetochlor; banded or side-dressed; kg AI", "Acetochlor; broadcast without incorporation; kg AI".
Exchange "Water-soil agricultural" is the result of combining the following original LCA Commons flows: "Water; in above-ground residue left on field; biogenic", "Water; broadcast w/ incorp. in manure", "Water; using unspec. method in manure", "Water; broadcast w/o incorp. in manure", "Water; in below-ground residue; biogenic", "Water; from irrigation and applied with manure and sewage sludge".
Exchange "Clopyralid-soil agricultural" is the result of combining the following original LCA Commons flows: "Clopyralid; banded or side-dressed; kg AI", "Clopyralid; broadcast without incorporation; kg AI", "Clopyralid; in seed furrow; kg AI", "Clopyralid; unspec. appl. method; kg AI", "Clopyralid; broadcast with incorporation; kg AI", "Clopyralid; foliar or directed spray; kg AI".
Exchange "Primisulfuron-soil agricultural" is the result of combining the following original LCA Commons flows: "Primisulfuron-methyl; unspec. appl. method; kg AI", "Primisulfuron-methyl; banded or side-dressed; kg AI", "Primisulfuron-methyl; in seed furrow; kg AI", "Primisulfuron-methyl; broadcast with incorporation; kg AI", "Primisulfuron-methyl; foliar or directed spray; kg AI", "Primisulfuron-methyl; broadcast without incorporation; kg AI".
Exchange "Water, unspecified origin-resource in water" is the result of combining the following original LCA Commons flows: "Water; withdrawal from unspec. source, for corn, in 1998", "Water; from plant uptake; biogenic".
Exchange "Metolachlor-soil agricultural" is the result of combining the following original LCA Commons flows: "Propazine; broadcast with incorporation; kg AI", "Propazine; foliar or directed spray; kg AI", "Propazine; in seed furrow; kg AI", "Propazine; broadcast without incorporation; kg AI", "Propazine; unspec. appl. method; kg AI", "Propazine; banded or side-dressed; kg AI".
Exchange "Particulates, < 10 um-air low population density" is the result of combining the following original LCA Commons flows: "PM10; from residue burning; kg C, biogenic", "PM10; from residue burning; kg except C, biogenic".
Exchange "Cyfluthrin-soil agricultural" is the result of combining the following original LCA Commons flows: "Beta-Cyfluthrin; broadcast with incorporation; kg AI", "Beta-Cyfluthrin; foliar or directed spray; kg AI", "Beta-Cyfluthrin; in seed furrow; kg AI", "Beta-Cyfluthrin; banded or side-dressed; kg AI", "Beta-Cyfluthrin; unspec. appl. method; kg AI", "Beta-Cyfluthrin; broadcast without incorporation; kg AI".
Exchange "Flumetsulam-soil agricultural" is the result of combining the following original LCA Commons flows: "Flumetsulam; banded or side-dressed; kg AI", "Flumetsulam; broadcast with incorporation; kg AI", "Flumetsulam; in seed furrow; kg AI", "Flumetsulam; unspec. appl. method; kg AI", "Flumetsulam; foliar or directed spray; kg AI", "Flumetsulam; broadcast without incorporation; kg AI".
Exchange "Atrazine-soil agricultural" is the result of combining the following original LCA Commons flows: "Atrazine; banded or side-dressed; kg AI", "Atrazine; broadcast with incorporation; kg AI", "Atrazine; in seed furrow; kg AI", "Atrazine; unspec. appl. method; kg AI", "Atrazine; foliar or directed spray; kg AI", "Atrazine; broadcast without incorporation; kg AI".
Exchange "Transformation, from arable-resource land" is the result of combining the following original LCA Commons flows: "Transformation; from arable, from soy to corn", "Transformation; from arable, from corn to corn", "Transformation; from arable, from small grains to corn", "Transformation; from arable, from unspec. use to corn".
Exchange "Calcium-soil agricultural" is the result of combining the following original LCA Commons flows: "Calcium; applied in limestone", "Calcium; applied in dolomite".
Exchange "Lambda-cyhalothrin-soil agricultural" is the result of combining the following original LCA Commons flows: "Lambda-cyhalothrin; banded or side-dressed; kg AI", "Lambda-cyhalothrin; broadcast with incorporation; kg AI", "Lambda-cyhalothrin; unspec. appl. method; kg AI", "Lambda-cyhalothrin; foliar or directed spray; kg AI", "Lambda-cyhalothrin; broadcast without incorporation; kg AI", "Lambda-cyhalothrin; in seed furrow; kg AI".
Exchange "2,4-D-soil agricultural" is the result of combining the following original LCA Commons flows: "2,4-D; broadcast without incorporation; kg AI", "2,4-D; broadcast with incorporation; kg AI", "2,4-D; unspec. appl. method; kg AI", "2,4-D; in seed furrow; kg AI", "2,4-D; banded or side-dressed; kg AI", "2,4-D; foliar or directed spray; kg AI".
Exchange "Alachlor-soil agricultural" is the result of combining the following original LCA Commons flows: "Alachlor; banded or side-dressed; kg AI", "Alachlor; broadcast with incorporation; kg AI", "Alachlor; in seed furrow; kg AI", "Alachlor; unspec. appl. method; kg AI", "Alachlor; foliar or directed spray; kg AI", "Alachlor; broadcast without incorporation; kg AI".
Exchange "Paraquat dichloride-soil unspecified" is the result of combining the following original LCA Commons flows: "Paraquat dichloride; foliar or directed spray; kg AI", "Paraquat dichloride; broadcast with incorporation; kg AI", "Paraquat dichloride; broadcast without incorporation; kg AI", "Paraquat dichloride; banded or side-dressed; kg AI", "Paraquat dichloride; unspec. appl. method; kg AI", "Paraquat dichloride; in seed furrow; kg AI".
Exchange "Magnesium-be1c0329-f1a8-4524-8420-a86d2a8dd358 agricultural" was originally named: "Magnesium; applied in dolomite" in this dataset.
Exchange "Acetaldehyde-2bdf9967-6dae-4183-88d1-8f612548c51e low population density" was originally named: "Acetaldehyde; from residue burning; kg C, biogenic" in this dataset.
Exchange "Toluene-2bdf9967-6dae-4183-88d1-8f612548c51e low population density" was originally named: "Toluene; from residue burning; kg C, biogenic" in this dataset.
Exchange "Acetonitrile-2bdf9967-6dae-4183-88d1-8f612548c51e low population density" was originally named: "Acetonitrile; from residue burning; kg C, biogenic" in this dataset.
Exchange "Sulfur dioxide-2bdf9967-6dae-4183-88d1-8f612548c51e low population density" was originally named: "Sulfur dioxide; from residue burning; biogenic" in this dataset.
Exchange "Ethane-2bdf9967-6dae-4183-88d1-8f612548c51e low population density" was originally named: "Ethane; from residue burning; kg C, biogenic" in this dataset.
Exchange "Methanol-2bdf9967-6dae-4183-88d1-8f612548c51e low population density" was originally named: "Methanol; from residue burning; kg C, biogenic" in this dataset.
Exchange "Formic acid-2bdf9967-6dae-4183-88d1-8f612548c51e low population density" was originally named: "Formic acid; from residue burning; kg C, biogenic" in this dataset.
Exchange "Ammonia-2bdf9967-6dae-4183-88d1-8f612548c51e low population density" was originally named: "Ammonia; from residue burning; kg N, biogenic" in this dataset.
Exchange "Zinc compounds-be1c0329-f1a8-4524-8420-a86d2a8dd358 agricultural" was originally named: "Zinc compounds; as secondary application" in this dataset.
Exchange "Phosphorus-c19fb2d9-98eb-4cd3-8761-81b71d8a9a1b unspecified" was originally named: "Phosphorous; from plant uptake; biogenic" in this dataset.
Exchange "Propane-2bdf9967-6dae-4183-88d1-8f612548c51e low population density" was originally named: "Propane; from residue burning; kg C, biogenic" in this dataset.
Exchange "Butane-2bdf9967-6dae-4183-88d1-8f612548c51e low population density" was originally named: "N butane; from residue burning; kg C, biogenic" in this dataset.
Exchange "Sulfuric acid-be1c0329-f1a8-4524-8420-a86d2a8dd358 agricultural" was originally named: "Sulfuric acid; as secondary application" in this dataset.
Exchange "trans-2-Butene-2bdf9967-6dae-4183-88d1-8f612548c51e low population density" was originally named: "Trans 2 butene; from residue burning; kg C, biogenic" in this dataset.
Exchange "Pentane-2bdf9967-6dae-4183-88d1-8f612548c51e low population density" was originally named: "N pentane; from residue burning; kg C, biogenic" in this dataset.
Exchange "isopentane-2bdf9967-6dae-4183-88d1-8f612548c51e low population density" was originally named: "I pentane; from residue burning; kg C, biogenic" in this dataset.
Exchange "Acetic acid-2bdf9967-6dae-4183-88d1-8f612548c51e low population density" was originally named: "Acetic acid; from residue burning; kg C, biogenic" in this dataset.
Exchange "Hydrocyanic acid-2bdf9967-6dae-4183-88d1-8f612548c51e low population density" was originally named: "Hydrogen cyanide; from residue burning; kg C, biogenic" in this dataset.
Exchange "Ethyne-2bdf9967-6dae-4183-88d1-8f612548c51e low population density" was originally named: "Acetylene; from residue burning; kg C, biogenic" in this dataset.
Exchange "Water-2bdf9967-6dae-4183-88d1-8f612548c51e low population density" was originally named: "Water; from residue burning; biogenic" in this dataset.
Exchange "Transformation, to arable-c19fb2d9-98eb-4cd3-8761-81b71d8a9a1b land" was originally named: "Transformation; to arable, to corn" in this dataset.
Exchange "Carbon dioxide, in air-2bdf9967-6dae-4183-88d1-8f612548c51e low population density" was originally named: "Carbon dioxide; from residue burning; kg C, biogenic" in this dataset.
Exchange "Carbon monoxide, fossil-2bdf9967-6dae-4183-88d1-8f612548c51e low population density" was originally named: "Carbon monoxide; from residue burning; kg C, biogenic" in this dataset.
Exchange "Occupation, arable-c19fb2d9-98eb-4cd3-8761-81b71d8a9a1b land" was originally named: "Occupation; arable, as corn" in this dataset.
Exchange "Formaldehyde-2bdf9967-6dae-4183-88d1-8f612548c51e low population density" was originally named: "Formaldehyde; from residue burning; kg C, biogenic" in this dataset.
Exchange "Butadiene-2bdf9967-6dae-4183-88d1-8f612548c51e low population density" was originally named: "1,3 butadiene; from residue burning; kg C, biogenic" in this dataset.
Exchange "Acrylonitrile-2bdf9967-6dae-4183-88d1-8f612548c51e low population density" was originally named: "Propenenitrile; from residue burning; kg C, biogenic" in this dataset.
Exchange "Sulfur-be1c0329-f1a8-4524-8420-a86d2a8dd358 agricultural" was originally named: "Sulfur; as secondary application" in this dataset.
Exchange "cis-2-Butene-2bdf9967-6dae-4183-88d1-8f612548c51e low population density" was originally named: "Cis 2 butene; from residue burning; kg C, biogenic" in this dataset.
Exchange "1-Butene-2bdf9967-6dae-4183-88d1-8f612548c51e low population density" was originally named: "1 butene; from residue burning; kg C, biogenic" in this dataset.
Exchange "Benzene-2bdf9967-6dae-4183-88d1-8f612548c51e low population density" was originally named: "Benzene; from residue burning; kg C, biogenic" in this dataset.
Exchange "Ethene-2bdf9967-6dae-4183-88d1-8f612548c51e low population density" was originally named: "Ethylene; from residue burning; kg C, biogenic" in this dataset.
Exchange "isobutene-2bdf9967-6dae-4183-88d1-8f612548c51e low population density" was originally named: "I butene; from residue burning; kg C, biogenic" in this dataset.
Exchange "Nitrogen dioxide-2bdf9967-6dae-4183-88d1-8f612548c51e low population density" was originally named: "Nitrogen dioxide; from residue burning; kg N, biogenic" in this dataset.
Exchange "Methane-2bdf9967-6dae-4183-88d1-8f612548c51e low population density" was originally named: "Methane; from residue burning; kg C, biogenic" in this dataset.
Exchange "Carbon dioxide-c19fb2d9-98eb-4cd3-8761-81b71d8a9a1b unspecified" was originally named: "Carbon dioxide; from plant uptake; kg C, biogenic" in this dataset.
Exchange "Furan-2bdf9967-6dae-4183-88d1-8f612548c51e low population density" was originally named: "Furan; from residue burning; kg C, biogenic" in this dataset.
Exchange "Phenol-2bdf9967-6dae-4183-88d1-8f612548c51e low population density" was originally named: "Phenol; from residue burning; kg C, biogenic" in this dataset.
Exchange "Dinitrogen monoxide-2bdf9967-6dae-4183-88d1-8f612548c51e low population density" was originally named: "Dinitrogen monoxide; from residue burning; kg N, biogenic" in this dataset.
Exchange "Propene-2bdf9967-6dae-4183-88d1-8f612548c51e low population density" was originally named: "Propylene; from residue burning; kg C, biogenic" in this dataset.
Exchange "Isoprene-2bdf9967-6dae-4183-88d1-8f612548c51e low population density" was originally named: "Isoprene; from residue burning; kg C, biogenic" in this dataset.
Exchange "Acetone-2bdf9967-6dae-4183-88d1-8f612548c51e low population density" was originally named: "Acetone; from residue burning; kg C, biogenic" in this dataset.

## Geography
The unit process is assumed to represent production in Indiana (US State).

## Technology
This process produces corn grain; at harvest in 1998; at farm; 85%-91% moisture. The process is assumed to represent production in Indiana (US State). Yields and related inputs and outputs represent a single year of operation, in 1998. This dataset includes consideration of residue burning; soil preparation; planting or sowing; irrigation; application, storage, and transport of fertilizers, manures, liming materials, secondary materials, and pesticides; and harvest. Fate and transport of applications are not included as described in Cooper, J.S., Kahn, E., Noon, M. (2012) LCA Digital Commons Unit Process Data: field crop production Version 1 which is available at https://www.lcacommons.gov/discovery/docs/LCA%20Digital%20Commons%20Unit%20Process%20Data%20final%20updated.pdf

## Time period
Start and end dates match the underlying data obtained from the USDA Agricultural Resource Management Survey (ARMS).
## Parameters
- p3333: 0; = if(and(p1232=0;p3255<>0);p3255-(p3328+p3329+p3330+p3331+p3332);0)
- p2083: 2.17294
- p1800: 0
- p2710: 3.56731e-5; = p2319*(p1019+p1021)
- p2525: 7.6357e-7; = p2329*p1014
- p0404: 0.5
- p0770: 52.737; = p0110*(1+p0638*p0242/100)
- p2995: 0; = p2409*(p1020+p1022)
- p2322: 5.67845e-5; = p2224*p2189
- p1243: 125329; = if(p1232>0;0;p1238*(p0725/100)*p0723*1000)
- p0010: 604.821
- p0943: 0; = if(and(p0683=0;p0949=0);p0937;0)
- p1957: 0
- p1683: 0
- p2000: 4000
- p0215: 10.961
- p3367: 0; = if(p1232=0;p3244*p3361/p0818;0)
- p0280: 0.5
- p3947: 4.20322e-8; = p1804*p3478
- p0129: 21.763
- p3082: 0; = p2301*p1082
- p1282: 0.06559; = IF(p1277+p1280+p1281=p1260;0;p1260-(p1277+p1280+p1281))
- p0963: 0; = if(and(p0683>0;or(p0807=480;p0807=32;p0807=1;and(p0807=60;p0901<0.03)));p0939;0)
- p4213: 4.56243e-9; = p1864*p3479
- p2308: 0.000214738; = p2227*p2215
- p2904: 1.43706e-5; = p2318*(p1020+p1022)
- p2332: 0.00049786; = p2224*p2200
- p2976: 0.000165509; = p2390*(p1129+p1131)
- p0179: 42.151
- p1328: 1.31609e6; = p1319*p0801
- p3093: 0; = p2312*p1132
- p0751: 4.953; = p0091*(1+p0619*p0223/100)
- p5144: 1.16152e-6; = p1765*p3484
- p1992: 3900
- p3277: 0.55
- p0916: 0.555208; = p0826+p0828+(p0832*(1+p0894))/p0818
- p1730: 0
- p0990: 0; = p0986*p0886
- p3470: 1.8469e-5; = p3375*p1241
- p0320: 0.5
- p2211: 0.00233214; = p1120-p2209-p2208-p2210
- p3157: 0; = p2376*p1082
- p2622: 0; = p2426*p1073
- p3073: 0; = p2292*p1023
- p0272: 3.246
- p1058: 0.225
- p0824: 0.643929
- p1053: 2.01487e7; = IF(p1012=0;p1046*p1036;0)
- p0415: 0; = SQRT(2)*(IF((2*p0283-1)<0;-1;IF((2*p0283-1)>0;1;0))*SQRT(SQRT((2/(pi()*0.140012289)+LN(1-(2*p0283-1)^2)/2)^2-LN(1-(2*p0283-1)^2)/0.140012289)-(2/(pi()*0.140012289)+LN(1-(2*p0283-1)^2)/2)))
- p2924: 9.45775e-5; = p2338*(p1079+p1081)
- p0083: 0.612
- p3456: 0; = p3380*p1240
- p1581: 0
- p2934: 1.01906e-5; = p2348*(p1079+p1081)
- p2721: 5.60598e-7; = p2330*(p1019+p1021)
- p4032: 6.90029e-5; = p1889*p3478
- p5337: 4.0966e-8; = p1962*p3484
- p2896: 5.17402e-5; = p2310*(p1079+p1081)
- p0482: 0; = SQRT(2)*(IF((2*p0350-1)<0;-1;IF((2*p0350-1)>0;1;0))*SQRT(SQRT((2/(pi()*0.140012289)+LN(1-(2*p0350-1)^2)/2)^2-LN(1-(2*p0350-1)^2)/0.140012289)-(2/(pi()*0.140012289)+LN(1-(2*p0350-1)^2)/2)))
- p2521: 6.57171e-5; = p2325*p1014
- p2666: 0.000260905; = p2275*(p1128+p1130)
- p1012: 0
- p2325: 0.000132276; = p2224*p2192
- p3243: 1.77336e-10; = p3234*p1188*p3239/p0818
- p0591: 0; = IF(p0327<0.5;-SQRT(p0007*EXP(p0459^2*p0008)-p0007);SQRT(p0007*EXP(p0459^2*p0008)-p0007))
- p3174: 0; = p2393*p1023
- p1693: 0
- p1182: 810.896; = p1181*p0801
- p3233: 0.60394
- p1808: 1.83186e-6; = p1400*1000/p0818
- p0934: 3.78044e-5; = p0928*p0001/(p0818*p0002)
- p2933: 0.000116846; = p2347*(p1079+p1081)
- p2828: 8.90824e-6; = p2242*(p1020+p1022)
- p2481: 1.97836e-5; = p2285*p1014
- p2646: 6.51002e-5; = p2255*(p1019+p1021)
- p3876: 0; = p1939*p3477
- p2575: 4.66551e-6; = p2379*p1073
- p0379: 0.5
- p2563: 0.00280876; = p2367*p1014
- p4456: 0; = p1901*p3480
- p1178: 1.33078e-8; = p1176/p0818
- p3399: 0.0453674; = p3380*p1234
- p1794: 0
- p0574: 0; = IF(p0310<0.5;-SQRT(p0007*EXP(p0442^2*p0008)-p0007);SQRT(p0007*EXP(p0442^2*p0008)-p0007))
- p1841: 0
- p1488: 8
- p1727: 0
- p3452: 0; = p3376*p1240
- p3018: 0; = p2237*p1023
- p0735: 0
- p0727: 31.321; = p0067*(1+p0595*p0199/100)
- p0070: 16.857
- p2975: 0.000117448; = p2389*(p1129+p1131)
- p5308: 6.74594e-8; = p1929*p3484
- p0664: 0; = IF(p0400<0.5;-SQRT(p0007*EXP(p0532^2*p0008)-p0007);SQRT(p0007*EXP(p0532^2*p0008)-p0007))
- p1160: 0.0578071; = (p1156+p1158)*p1159
- p0526: 0; = SQRT(2)*(IF((2*p0394-1)<0;-1;IF((2*p0394-1)>0;1;0))*SQRT(SQRT((2/(pi()*0.140012289)+LN(1-(2*p0394-1)^2)/2)^2-LN(1-(2*p0394-1)^2)/0.140012289)-(2/(pi()*0.140012289)+LN(1-(2*p0394-1)^2)/2)))
- p2396: 0; = p2234*p2185
- p1771: 0.000165666; = p1363*1000/p0818
- p2161: 4.28976e-9; = p2015*p2085*p2123/(p0818*1000)
- p2442: 1.11451e-5; = p2246*p1014
- p1798: 6.10621e-7; = p1390*1000/p0818
- p1778: 0
- p0063: 5799.18
- p0108: 112.518
- p1022: 0.24878; = IF(p1012=0;IF(p1014+p1019+p1020+p1021=1;0;IF(p1014+p1019+p1020+p1021+p1018>1;1-(p1014+p1019+p1020+p1021);p1018));0)
- p0614: 0; = IF(p0350<0.5;-SQRT(p0007*EXP(p0482^2*p0008)-p0007);SQRT(p0007*EXP(p0482^2*p0008)-p0007))
- p3144: 0; = p2363*p1023
- p2767: 6.83784e-6; = p2376*(p1078+p1080)
- p1057: 0.82
- p1639: 0
- p0693: 0
- p1616: 0
- p3011: 0; = p2425*(p1079+p1081)
- p4159: 7.07176e-7; = p1810*p3479
- p0743: 0.612; = p0083*(1+p0611*p0215/100)
- p0585: 0; = IF(p0321<0.5;-SQRT(p0007*EXP(p0453^2*p0008)-p0007);SQRT(p0007*EXP(p0453^2*p0008)-p0007))
- p1206: 0.0206875
- p2764: 2.40615e-5; = p2373*(p1019+p1021)
- p0062: 19.425
- p2972: 3.09814e-6; = p2386*(p1079+p1081)
- p4765: 0; = p1798*p3482
- p1005: 0; = p1001*p0888
- p3286: 0.185
- p2439: 0.000201522; = p2243*p1014
- p2282: 0.000720023; = p2223*p2188
- p4410: 0; = p1855*p3480
- p0226: 10.013
- p0641: 0; = IF(p0377<0.5;-SQRT(p0007*EXP(p0509^2*p0008)-p0007);SQRT(p0007*EXP(p0509^2*p0008)-p0007))
- p3627: 1.20892e-8; = p1896*p3476
- p0843: 0.22008
- p1251: 2.11704e-7; = if(p1232>0;0;p1246*p0001/(p0818*p0002))
- p2960: 0.000348733; = p2374*(p1020+p1022)
- p0724: 4.17; = p0064*(1+p0592*p0196/100)
- p0827: 1.19e9; = p0818*p0819*p0823
- p1257: 0; = if(p1232>0;0;IF(p1253+p1256=1;0;IF(p1253+p1256+p1255>1;1-(p1253+p1256);p1255)))
- p2184: 0.000123749; = p1051/p0818
- p1119: 0.010547; = IF(p1071=0;p1109/(p1114*p0818);0)
- p0023: 27272.5
- p2417: 0; = p2235*p2207
- p2208: 0.000912105; = p1110/p0818
- p2893: 1.75407e-5; = p2307*(p1079+p1081)
- p2545: 0.000124316; = p2349*p1073
- p0421: 0; = SQRT(2)*(IF((2*p0289-1)<0;-1;IF((2*p0289-1)>0;1;0))*SQRT(SQRT((2/(pi()*0.140012289)+LN(1-(2*p0289-1)^2)/2)^2-LN(1-(2*p0289-1)^2)/0.140012289)-(2/(pi()*0.140012289)+LN(1-(2*p0289-1)^2)/2)))
- p2667: 0.000483683; = p2276*(p1019+p1021)
- p4532: 6.93002e-6; = p1771*p3481
- p2456: 7.49074e-5; = p2260*p1073
- p2965: 3.42766e-6; = p2379*(p1079+p1081)
- p1716: 0
- p1070: 0.00911822; = IF(p1012=0;p1056/(p1063*p0818);0)
- p0025: 10.227
- p1892: 0
- p4513: 0; = p1962*p3480
- p2195: 0.00135221; = p2194*p2193
- p3102: 0; = p2321*p1023
- p2262: 0.000244029; = p2226*p2208
- p2845: 0.000169947; = p2259*(p1079+p1081)
- p1599: 0
- p0312: 0.5
- p2270: 1.92368e-5; = p2226*p2216
- p2132: 1.21785e-7; = p2015*p2060*p2094/(p0818*1000)
- p1270: 0; = IF(p1267=p1259;0;IF(p1267+p1268>p1259;p1259-p1267;p1268))
- p0790: 2.274; = p0130*(1+p0658*p0262/100)
- p1680: 0
- p3282: 0.3
- p3338: 0.742084; = if(and(p1232=0;p3254<>0);1-(p3334+p3335+p3336+p3337);0)
- p1333: 0.000255676; = p1332*p0001/(p0818*p0002)
- p1574: 0
- p1832: 0
- p1961: 0.5
- p2802: 0; = p2411*(p1019+p1021)
- p3085: 0; = p2304*p1082
- p3356: 1.37475e8; = if(p1232=0;p3306+p3317+p3328+p3339+p3350;0)
- p0673: 107.353; = p0013*(1+p0541*p0145/100)
- p3438: 0; = p3362*p1240
- p1562: 0
- p1967: 0; = if(p0807=480;p0802*p0810;0)
- p1093: 2.35612e-5; = IF(p1071=0;p1087*p0001/(p0818*p0002);0)
- p1126: 0.01711; = if(p1121=0;p0720/100;0)
- p0546: 0; = IF(p0282<0.5;-SQRT(p0007*EXP(p0414^2*p0008)-p0007);SQRT(p0007*EXP(p0414^2*p0008)-p0007))
- p2404: 0; = p2234*p2193
- p3309: 2.68092e6; = if(and(p1232=0;p3252<>0);p3252*(p3260-p3304)/p3305;0)
- p1691: 0
- p2438: 1.5753e-5; = p2242*p1014
- p0854: 2.58428e6; = p0801*((1-p0853)*p0846+p0853*p0852)
- p2807: 0; = p2416*(p1078+p1080)
- p0974: 0.5
- p1021: 0.17165; = IF(p1012=0;IF(p1014+p1019+p1020=1;0;IF(p1014+p1019+p1020+p1017>1;1-(p1014+p1019+p1020);p1017));0)
- p0453: 0; = SQRT(2)*(IF((2*p0321-1)<0;-1;IF((2*p0321-1)>0;1;0))*SQRT(SQRT((2/(pi()*0.140012289)+LN(1-(2*p0321-1)^2)/2)^2-LN(1-(2*p0321-1)^2)/0.140012289)-(2/(pi()*0.140012289)+LN(1-(2*p0321-1)^2)/2)))
- p0950: 0; = if(and(p0683=0;or(p0807=480;p0807=32;p0807=1;and(p0807=60;p0901<0.03)));p0938;0)
- p0352: 0.5
- p3383: 0; = p3364*p1234
- p2783: 1.07039e-5; = p2392*(p1128+p1130)
- p2194: 0.214362
- p1298: 0
- p2736: 1.54304e-5; = p2345*(p1078+p1080)
- p2163: 0.000176219; = (p2017-p2020)/p0818-(p2025+p2028+p2033+p2034+p2051+p2125+p2126+p2127+p2128+p2129+p2130+p2131+p2132+p2133+p2134+p2135+p2136+p2137+p2138+p2139+p2140+p2141+p2142+p2143+p2144+p2145+p2146+p2147+p2148+p2149+p2150+p2151+p2152+p2153+p2154+p2155+p2156+p2157)
- p1015: 0.05058; = IF(p1012=0;p0706/100;0)
- p0812: 0; = if(p0807=480;0.095/0.34;0)
- p2637: 4.98525e-6; = p2246*(p1019+p1021)
- p2501: 1.28863e-6; = p2305*p1073
- p5295: 2.23799e-9; = p1916*p3484
- p3535: 4.53344e-9; = p1804*p3476
- p3234: 0.39606; = 1-p3233
- p1909: 4.93194e-7; = p1501*1000/p0818
- p2169: 0.000318238; = p2166*(p0908)
- p0442: 0; = SQRT(2)*(IF((2*p0310-1)<0;-1;IF((2*p0310-1)>0;1;0))*SQRT(SQRT((2/(pi()*0.140012289)+LN(1-(2*p0310-1)^2)/2)^2-LN(1-(2*p0310-1)^2)/0.140012289)-(2/(pi()*0.140012289)+LN(1-(2*p0310-1)^2)/2)))
- p2114: 0.832356
- p2966: 1.55003e-6; = p2380*(p1079+p1081)
- p1092: 1.13501e-5; = IF(p1071=0;p1086*p0001/(p0818*p0002);0)
- p0588: 0; = IF(p0324<0.5;-SQRT(p0007*EXP(p0456^2*p0008)-p0007);SQRT(p0007*EXP(p0456^2*p0008)-p0007))
- p0240: 5.276
- p2176: 0.00189747; = p0895*p0913/p0818
- p1875: 0
- p2119: 0.679049
- p3090: 0; = p2309*p1082
- p1913: 0
- p1619: 0
- p2345: 5.6692e-5; = p2228*p2213
- p1878: 0
- p2759: 1.20382e-6; = p2368*(p1019+p1021)
- p1285: 0; = p1281*p1252/p0818
- p4603: 9.82424e-9; = p1842*p3481
- p0606: 0; = IF(p0342<0.5;-SQRT(p0007*EXP(p0474^2*p0008)-p0007);SQRT(p0007*EXP(p0474^2*p0008)-p0007))
- p1307: 0
- p2394: 0; = p2234*p2183
- p2167: 0.146305; = p2166*(p0898)
- p2707: 4.35815e-5; = p2316*(p1019+p1021)
- p1300: 0; = IF(p1297=p1265;0;IF(p1297+p1298>p1265;p1265-p1297;p1298))
- p2776: 7.24918e-7; = p2385*(p1078+p1080)
- p3156: 0; = p2375*p1082
- p4925: 0; = p1962*p3482
- p2737: 2.73401e-5; = p2346*(p1078+p1080)
- p2844: 0.000187906; = p2258*(p1079+p1081)
- p1120: 0.0038348; = IF(p1071=0;p1110/(p1115*p0818);0)
- p0771: 82.478; = p0111*(1+p0639*p0243/100)
- p2929: 0.000330536; = p2343*(p1079+p1081)
- p1018: 0.24878; = IF(p1012=0;p0709/100;0)
- p0920: 0.157168; = p0676*1000/p0801
- p1633: 0
- p0623: 0; = IF(p0359<0.5;-SQRT(p0007*EXP(p0491^2*p0008)-p0007);SQRT(p0007*EXP(p0491^2*p0008)-p0007))
- p1582: 0
- p2095: 0.765734
- p0327: 0.5
- p0859: 0.872832; = p0671*1000/p0856
- p1314: 0; = p1310*p1252/p0818
- p4944: 1.48061e-5; = p1771*p3483
- p0052: 17.582
- p3066: 0; = p2285*p1023
- p2080: 0.025
- p0632: 0; = IF(p0368<0.5;-SQRT(p0007*EXP(p0500^2*p0008)-p0007);SQRT(p0007*EXP(p0500^2*p0008)-p0007))
- p1621: 0
- p0788: 51.468; = p0128*(1+p0656*p0260/100)
- p1653: 0
- p1960: 128.134; = IF(p1959-p1958<0;0;p1959-p1958)
- p0998: 0; = if(p0888=0;0;if((p0699*p0698*1000*p0700/100)/p0888>1;1;(p0699*p0698*1000*p0700/100)/p0888))
- p1325: 0; = IF(((p0745*1000*p0752/100)+(p0754*1000*p0761/100))/p0801<0;0;((p0745*1000*p0752/100)+(p0754*1000*p0761/100))/p0801)
- p4690: 2.07291e-7; = p1929*p3481
- p2292: 1.35118e-5; = p2223*p2199
- p0250: 15.278
- p1202: 0.7
- p0150: 0
- p0446: 0; = SQRT(2)*(IF((2*p0314-1)<0;-1;IF((2*p0314-1)>0;1;0))*SQRT(SQRT((2/(pi()*0.140012289)+LN(1-(2*p0314-1)^2)/2)^2-LN(1-(2*p0314-1)^2)/0.140012289)-(2/(pi()*0.140012289)+LN(1-(2*p0314-1)^2)/2)))
- p2724: 4.74337e-5; = p2333*(p1019+p1021)
- p2431: 0; = p2236*p2221
- p2361: 0.000200142; = p2225*p2189
- p0247: 25.548
- p0599: 0; = IF(p0335<0.5;-SQRT(p0007*EXP(p0467^2*p0008)-p0007);SQRT(p0007*EXP(p0467^2*p0008)-p0007))
- p5249: 6.39425e-10; = p1870*p3484
- p0889: 0; = 1000*p0888*p0001*p0003*p0004/(p0818*p0002)
- p3419: 0; = p3362*p1239
- p1315: 0; = p1311*p1252/p0818
- p0892: 12891.4; = if(p0891=0;0;(1-p1240)*p3251/p0891)
- p3371: 0; = if(p1232=0;p3245*p3359/p0818;0)
- p1880: 0
- p0522: 0; = SQRT(2)*(IF((2*p0390-1)<0;-1;IF((2*p0390-1)>0;1;0))*SQRT(SQRT((2/(pi()*0.140012289)+LN(1-(2*p0390-1)^2)/2)^2-LN(1-(2*p0390-1)^2)/0.140012289)-(2/(pi()*0.140012289)+LN(1-(2*p0390-1)^2)/2)))
- p2872: 9.05371e-5; = p2286*(p1020+p1022)
- p1188: 1458.23; = p1187*p0801
- p1912: 0
- p0020: 1804.23
- p2103: 0.912485
- p2451: 0.000145539; = p2255*p1014
- p0515: 0; = SQRT(2)*(IF((2*p0383-1)<0;-1;IF((2*p0383-1)>0;1;0))*SQRT(SQRT((2/(pi()*0.140012289)+LN(1-(2*p0383-1)^2)/2)^2-LN(1-(2*p0383-1)^2)/0.140012289)-(2/(pi()*0.140012289)+LN(1-(2*p0383-1)^2)/2)))
- p3451: 0; = p3375*p1240
- p1052: 5.6958e7; = IF(p1012=0;p1045*p1036;0)
- p2895: 5.77299e-6; = p2309*(p1079+p1081)
- p1185: 0.5
- p1991: 8.73255e8; = (if(p1111=0;0;p1106/p1111)+if(p1112=0;0;p1107/p1112)+if(p1113=0;0;p1108/p1113)+if(p1114=0;0;p1109/p1114)+if(p1115=0;0;p1110/p1115))*(1+p1157)
- p2567: 0.000871793; = p2371*p1014
- p0006: 15
- p2907: 8.30343e-5; = p2321*(p1020+p1022)
- p1779: 0
- p0257: 16.948
- p0531: 0; = SQRT(2)*(IF((2*p0399-1)<0;-1;IF((2*p0399-1)>0;1;0))*SQRT(SQRT((2/(pi()*0.140012289)+LN(1-(2*p0399-1)^2)/2)^2-LN(1-(2*p0399-1)^2)/0.140012289)-(2/(pi()*0.140012289)+LN(1-(2*p0399-1)^2)/2)))
- p2770: 3.02657e-6; = p2379*(p1078+p1080)
- p0637: 0; = IF(p0373<0.5;-SQRT(p0007*EXP(p0505^2*p0008)-p0007);SQRT(p0007*EXP(p0505^2*p0008)-p0007))
- p0809: 2000
- p3237: 0.854735
- p0922: 0; = p0677*1000/p0801
- p2769: 1.83849e-5; = p2378*(p1078+p1080)
- p1042: 0.000645242
- p1327a: 0.0480075; = (p0745*1000/p0801)*(1-(p0746+p0747+p0748+p0749+p0750+p0751+p0752+p0753)/100)+(p0754*1000/p0801)*(1-(p0755+p0756+p0757+p0758+p0759+p0760+p0761+p0762)/100)
- p2200: 0.00414879; = p1056/p0818
- p1595: 0
- p3000: 0; = p2414*(p1079+p1081)
- p0525: 0; = SQRT(2)*(IF((2*p0393-1)<0;-1;IF((2*p0393-1)>0;1;0))*SQRT(SQRT((2/(pi()*0.140012289)+LN(1-(2*p0393-1)^2)/2)^2-LN(1-(2*p0393-1)^2)/0.140012289)-(2/(pi()*0.140012289)+LN(1-(2*p0393-1)^2)/2)))
- p0778: 30.732; = p0118*(1+p0646*p0250/100)
- p1023: 0; = IF(p1012=0;IF(p1014+p1019+p1020+p1021+p1022=1;0;1-(p1014+p1019+p1020+p1021+p1022));0)
- p0625: 0; = IF(p0361<0.5;-SQRT(p0007*EXP(p0493^2*p0008)-p0007);SQRT(p0007*EXP(p0493^2*p0008)-p0007))
- p4320: 0; = p1765*p3480
- p2578: 1.19292e-5; = p2382*p1073
- p2892: 9.89979e-6; = p2306*(p1079+p1081)
- p2120: 0.51828
- p0781: 2.233; = p0121*(1+p0649*p0253/100)
- p2648: 0.000107413; = p2257*(p1019+p1021)
- p2696: 8.35947e-7; = p2305*(p1078+p1080)
- p5172: 1.26926e-7; = p1793*p3484
- p1769: 0
- p2793: 0; = p2402*(p1019+p1021)
- p2958: 0.000211359; = p2372*(p1020+p1022)
- p2846: 5.50331e-5; = p2260*(p1079+p1081)
- p0042: 5798.99
- p0289: 0.5
- p0630: 0; = IF(p0366<0.5;-SQRT(p0007*EXP(p0498^2*p0008)-p0007);SQRT(p0007*EXP(p0498^2*p0008)-p0007))
- p2135: 3.90604e-7; = p2015*p2063*p2097/(p0818*1000)
- p0925: 0.302778; = IF(p0918+p0923+p0924=1;0;IF(p0918+p0923+p0924+p0921>1;1-(p0918+p0923+p0924);p0921))
- p1927: 0
- p4363: 0; = p1808*p3480
- p2420: 0; = p2235*p2210
- p0841: 0.307247
- p0110: 52.737
- p2098: 0.856281
- p1239: 0; = if(p1232>0;0;IF(p1234+p1238=1;0;IF(p1234+p1238+p1236>1;1-(p1234+p1238);p1236)))
- p2712: 6.56797e-5; = p2321*(p1019+p1021)
- p3449: 0; = p3373*p1240
- p1887: 0
- p0243: 11.773
- p1646: 0
- p1803: 0
- p1664: 0
- p1115: 0.237849
- p1692: 0.454882
- p2460: 1.99911e-5; = p2264*p1073
- p2173: 0.0572899; = p0895*p0898/p0818
- p0182: 1.408
- p3436: 0; = p3379*p1239
- p1037: 0.375071
- p2633: 7.04637e-6; = p2242*(p1019+p1021)
- p3306: 2.76787e7; = if(and(p1232=0;p3252<>0);p3252*(p3257*p3277-p3301)/p3305;0)
- p0001: 0.404686
- p1590: 0
- p0649: 0; = IF(p0385<0.5;-SQRT(p0007*EXP(p0517^2*p0008)-p0007);SQRT(p0007*EXP(p0517^2*p0008)-p0007))
- p3439: 0; = p3363*p1240
- p1276: 0.0132117; = p1272*p1252/p0818
- p1256: 0; = if(p1232>0;0;IF(p1253=1;0;IF(p1253+p1254>1;1-p1253;p1254)))
- p2469: 0.000615887; = p2273*p1123
- p2608: 0; = p2412*p1014
- p3127: 0; = p2346*p1082
- p2561: 0.00132553; = p2365*p1014
- p1963c: 2.35832e-5; = p1588*p1792+p1589*p1793+p1590*p1794+p1591*p1795+p1592*p1796+p1593*p1797+p1594*p1798+p1595*p1799+p1596*p1800+p1597*p1801+p1598*p1802+p1599*p1803+p1600*p1804+p1601*p1805+p1602*p1806+p1603*p1807+p1604*p1808+p1605*p1809+p1606*p1810+p1607*p1811
- p2037: 2.3
- p1259: 0.16857; = if(p1232>0;0;p0730/100)
- p1976: 0.119333
- p1904: 0
- p2078: 0.117
- p0449: 0; = SQRT(2)*(IF((2*p0317-1)<0;-1;IF((2*p0317-1)>0;1;0))*SQRT(SQRT((2/(pi()*0.140012289)+LN(1-(2*p0317-1)^2)/2)^2-LN(1-(2*p0317-1)^2)/0.140012289)-(2/(pi()*0.140012289)+LN(1-(2*p0317-1)^2)/2)))
- p1725: 0.705252
- p1889: 0.000115666; = p1481*1000/p0818
- p2145: 1.61372e-7; = p2015*p2073*p2107/(p0818*1000)
- p2316: 0.00019611; = p2224*p2183
- p1357: 3633
- p0245: 1.408
- p3325: 0; = if(and(p1232=0;p3255<>0);p3267*p3289;0)
- p2657: 8.58645e-7; = p2266*(p1078+p1080)
- p2804: 0; = p2413*(p1019+p1021)
- p0003: 10000
- p2422: 0; = p2235*p2212
- p0184: 37.254
- p2714: 1.44444e-5; = p2323*(p1019+p1021)
- p0518: 0; = SQRT(2)*(IF((2*p0386-1)<0;-1;IF((2*p0386-1)>0;1;0))*SQRT(SQRT((2/(pi()*0.140012289)+LN(1-(2*p0386-1)^2)/2)^2-LN(1-(2*p0386-1)^2)/0.140012289)-(2/(pi()*0.140012289)+LN(1-(2*p0386-1)^2)/2)))
- p1087: 1.12447e6; = IF(p1071=0;p1081*(p0710/100)*p0703*1000;0)
- p0455: 0; = SQRT(2)*(IF((2*p0323-1)<0;-1;IF((2*p0323-1)>0;1;0))*SQRT(SQRT((2/(pi()*0.140012289)+LN(1-(2*p0323-1)^2)/2)^2-LN(1-(2*p0323-1)^2)/0.140012289)-(2/(pi()*0.140012289)+LN(1-(2*p0323-1)^2)/2)))
- p3253: 2.73608e7; = p1252*(p1277*(1-p3247)+p1280*(1-p3248)+p1281*(1-p3249)+p1282*(1-p3250))
- p2969: 4.43112e-8; = p2383*(p1079+p1081)
- p0789: 21.763; = p0129*(1+p0657*p0261/100)
- p2786: 0; = p2395*(p1019+p1021)
- p2530: 1.5262e-5; = p2334*p1014
- p2765: 0.000275846; = p2374*(p1019+p1021)
- p0519: 0; = SQRT(2)*(IF((2*p0387-1)<0;-1;IF((2*p0387-1)>0;1;0))*SQRT(SQRT((2/(pi()*0.140012289)+LN(1-(2*p0387-1)^2)/2)^2-LN(1-(2*p0387-1)^2)/0.140012289)-(2/(pi()*0.140012289)+LN(1-(2*p0387-1)^2)/2)))
- p1628: 0
- p3316: 0.836806; = if(and(p1232=0;p3253<>0);1-(p3312+p3313+p3314+p3315);0)
- p3163: 0; = p2382*p1082
- p0094: 3179.29
- p2751: 0.000231493; = p2360*(p1019+p1021)
- p0682: 5799.2; = p0022*(1+p0550*p0154/100)
- p2398: 0; = p2234*p2187
- p2773: 7.73858e-6; = p2382*(p1078+p1080)
- p3249: 0
- p2777: 2.73561e-6; = p2386*(p1078+p1080)
- p2024: 0.748682
- p1331: 0; = p1330*p0001/(p0818*p0002)
- p1082: 0; = IF(p1071=0;IF(p1073+p1078+p1079+p1080+p1081=1;0;1-(p1073+p1078+p1079+p1080+p1081));0)
- p1766: 0
- p1140: 3.49747e-5; = if(p1121=0;p1134*p0001/(p0818*p0002);0)
- p2425: 0; = p2235*p2215
- p2546: 6.35936e-5; = p2350*p1123
- p0847: -0.267484
- p0539: 0; = IF(p0275<0.5;-SQRT(p0007*EXP(p0407^2*p0008)-p0007);SQRT(p0007*EXP(p0407^2*p0008)-p0007))
- p1232: 0
- p0374: 0.5
- p0891: 226512; = IF(p3251=0;0;62.4*6272640/(12*12*12))
- p2264: 4.76468e-5; = p2226*p2210
- p2860: 0.000257813; = p2274*(p1129+p1131)
- p1212: 0.0990224; = if(p1211=0;0;if(p1193>0;0;(p1207+p1208+p1209)*p1210/(2000*p1211)))
- p2130: 3.28813e-7; = p2015*p2058*p2092/(p0818*1000)
- p0440: 0; = SQRT(2)*(IF((2*p0308-1)<0;-1;IF((2*p0308-1)>0;1;0))*SQRT(SQRT((2/(pi()*0.140012289)+LN(1-(2*p0308-1)^2)/2)^2-LN(1-(2*p0308-1)^2)/0.140012289)-(2/(pi()*0.140012289)+LN(1-(2*p0308-1)^2)/2)))
- p0877: 0.0224939; = p0876*p0001*p0003/(p0818*p0002)
- p1622: 0
- p1706: 0
- p0576: 0; = IF(p0312<0.5;-SQRT(p0007*EXP(p0444^2*p0008)-p0007);SQRT(p0007*EXP(p0444^2*p0008)-p0007))
- p3896: 0; = p1963*p3477
- p1009: 0; = p1005*p0001*p0004/(p0818*p0002)
- p0773: 96.939; = p0113*(1+p0641*p0245/100)
- p2101: 0.620397
- p4007: 1.40107e-8; = p1864*p3478
- p3198: 0; = p2417*p1082
- p1767: 5.73044e-6; = p1359*1000/p0818
- p0510: 0; = SQRT(2)*(IF((2*p0378-1)<0;-1;IF((2*p0378-1)>0;1;0))*SQRT(SQRT((2/(pi()*0.140012289)+LN(1-(2*p0378-1)^2)/2)^2-LN(1-(2*p0378-1)^2)/0.140012289)-(2/(pi()*0.140012289)+LN(1-(2*p0378-1)^2)/2)))
- p2580: 6.30689e-7; = p2384*p1073
- p2617: 0; = p2421*p1073
- p0738: 5799.2; = p0078*(1+p0606*p0210/100)
- p2346: 0.000100449; = p2228*p2214
- p2647: 9.36939e-6; = p2256*(p1019+p1021)
- p3135: 0; = p2354*p1023
- p2998: 0; = p2412*(p1020+p1022)
- p2126: 3.52355e-7; = p2015*p2054*p2088/(p0818*1000)
- p2554: 0.00028109; = p2358*p1014
- p2906: 6.49077e-6; = p2320*(p1020+p1022)
- p0321: 0.5
- p0718: 31.854; = p0058*(1+p0586*p0190/100)
- p1658: 0
- p2502: 1.3475e-5; = p2306*p1073
- p2243: 0.000405624; = p2222*p2188
- p3166: 0; = p2385*p1082
- p1224: 0.44; = IF(p1221=0;0;IF(p1193=0;1-p1223;0))
- p2463: 1.38408e-5; = p2267*p1073
- p2670: 2.76927e-5; = p2279*(p1019+p1021)
- p0884: 0; = IF(p0689=100;0;IF(p0689+p0688>100;100-p0689;p0688))
- p2506: 7.04255e-5; = p2310*p1073
- p3326: 0; = if(and(p1232=0;p3255<>0);p3268*p3289;0)
- p2004: 30
- p0695: 0
- p2033: 1.12112e-6; = p2015*p2029*p2031/(p0818*1000)
- p0589: 0; = IF(p0325<0.5;-SQRT(p0007*EXP(p0457^2*p0008)-p0007);SQRT(p0007*EXP(p0457^2*p0008)-p0007))
- p1738: 0
- p0186: 45.549
- p0658: 0; = IF(p0394<0.5;-SQRT(p0007*EXP(p0526^2*p0008)-p0007);SQRT(p0007*EXP(p0526^2*p0008)-p0007))
- p2236: 0; = 1-(p2230+p2231+p2232+p2233)
- p2504: 9.00978e-5; = p2308*p1073
- p1942: 0
- p2386: 1.00507e-5; = p2229*p2215
- p2877: 1.72662e-6; = p2291*(p1020+p1022)
- p2618: 0; = p2422*p1073
- p4101: 1.79525e-6; = p1962*p3478
- p0828: 0.0519028; = if(p0827=0;0;p0819-p0827/p0818)
- p1104: 0.261145; = IF(p1071=0;IF(p1096+p1101+p1102+p1103=1;0;1-(p1096+p1101+p1102+p1103));0)
- p1110: 3.88371e7; = IF(p1071=0;p1105*p1104*p1095;0)
- p1787: 0
- p0121: 2.233
- p1868: 0
- p1677: 0
- p1313: 0; = p1307*p1252/p0818
- p1873: 0
- p1046: 0.0238398; = IF(p1012=0;IF(p1037+p1044+p1045=1;0;IF(p1037+p1044+p1045+p1040>1;1-(p1037+p1044+p1045);p1040));0)
- p1703: 0
- p2075: 0.072
- p1937: 0
- p2524: 0.000796906; = p2328*p1014
- p1203: 3
- p1103: 0.652345; = IF(p1071=0;IF(p1096+p1101+p1102=1;0;IF(p1096+p1101+p1102+p1099>1;1-(p1096+p1101+p1102);p1099));0)
- p3179: 0; = p2398*p1023
- p0024: 4.431
- p2725: 6.82678e-6; = p2334*(p1019+p1021)
- p2799: 0; = p2408*(p1019+p1021)
- p3463: 0; = p3368*p1241
- p2179: 0.0023112; = p0970+p0971+p0972
- p0286: 0.5
- p3206: 0; = p2425*p1082
- p0085: 17274.6
- p2851: 0.000192334; = p2265*(p1079+p1081)
- p0954: 1.91005e-5; = if(and(p0683>0;or(p0807=56;p0807=100;and(p0807=60;p0901>0.06)));p0936;0)
- p1684: 0
- p1249: 0; = if(p1232>0;0;p1244*p0001/(p0818*p0002))
- p2353: 0.000113105; = p2232*p2221
- p2473: 0.000237365; = p2277*p1014
- p2286: 0.000322254; = p2223*p2192
- p1297: 0
- p2017: 9.46695e6; = p2015*p0898
- p1618: 0
- p3177: 0; = p2396*p1023
- p1699: 0
- p3541: 2.34228e-7; = p1810*p3476
- p2355: 0.000691204; = p2225*p2183
- p3180: 0; = p2399*p1023
- p0694: 0
- p2755: 0.000103607; = p2364*(p1019+p1021)
- p2139: 1.34252e-7; = p2015*p2067*p2101/(p0818*1000)
- p0514: 0; = SQRT(2)*(IF((2*p0382-1)<0;-1;IF((2*p0382-1)>0;1;0))*SQRT(SQRT((2/(pi()*0.140012289)+LN(1-(2*p0382-1)^2)/2)^2-LN(1-(2*p0382-1)^2)/0.140012289)-(2/(pi()*0.140012289)+LN(1-(2*p0382-1)^2)/2)))
- p1309: 0
- p3181: 0; = p2400*p1023
- p3313: 0.0182858; = if(and(p1232=0;p3253<>0);p3262*(p3278*(p3282*p1256+p3286*(p1253+p1257)+p1258*p3288+p3298*p3287));0)
- p1031: 6.14586e-6; = IF(p1012=0;p1025*p0001/(p0818*p0002);0)
- p1166: 1.1737e-6; = p1164/p0818
- p1261: 0.76584; = if(p1232>0;0;p0732/100)
- p2044: 2.15946e-8; = p2015*p2042*p2043/(p0818*1000)
- p2697: 8.74136e-6; = p2306*(p1078+p1080)
- p1312: 0; = IF(p1307+p1310+p1311=p1266;0;p1266-(p1307+p1310+p1311))
- p0456: 0; = SQRT(2)*(IF((2*p0324-1)<0;-1;IF((2*p0324-1)>0;1;0))*SQRT(SQRT((2/(pi()*0.140012289)+LN(1-(2*p0324-1)^2)/2)^2-LN(1-(2*p0324-1)^2)/0.140012289)-(2/(pi()*0.140012289)+LN(1-(2*p0324-1)^2)/2)))
- p0054: 9.636
- p2215: 0.000824419; = p1117-p2214
- p1910: 0
- p1818: 0
- p2335: 0.000352174; = p2224*p2203
- p3434: 0; = p3377*p1239
- p1830: 0
- p1645: 0
- p3096: 0; = p2315*p1023
- p0938: 0; = p0932*p0001/(p0818*p0002)
- p2990: 0; = p2404*(p1020+p1022)
- p2589: 0; = p2393*p1014
- p0775: 50.031; = p0115*(1+p0643*p0247/100)
- p2191: 0.000136208; = 8*1.00794*p2189/(2*14.0067)
- p5062: 1.03374e-5; = p1889*p3483
- p3194: 0; = p2413*p1023
- p0631: 0; = IF(p0367<0.5;-SQRT(p0007*EXP(p0499^2*p0008)-p0007);SQRT(p0007*EXP(p0499^2*p0008)-p0007))
- p3148: 0; = p2367*p1023
- p2603: 0; = p2407*p1014
- p0687: 0
- p3303: 0.000398148; = if(and(p1232=0;p3252<>0);p3259*p3289;0)
- p1795: 0
- p0679: 1756.12; = p0019*(1+p0547*p0151/100)
- p3159: 0; = p2378*p1082
- p1039: 0.0673925
- p0879: 0; = p0878*p0001*p0003/(p0818*p0002)
- p3365: 0; = if(p1232=0;p3244*p3359/p0818;0)
- p0913: 0.0151931
- p2312: 0.00728279; = p2231*p2219
- p0886: 0; = p0686*1000*p0687*p0689/100
- p2485: 0.00194144; = p2289*p1014
- p2706: 0.000198538; = p2315*(p1019+p1021)
- p1953: 0
- p0643: 0; = IF(p0379<0.5;-SQRT(p0007*EXP(p0511^2*p0008)-p0007);SQRT(p0007*EXP(p0511^2*p0008)-p0007))
- p3669: 8.61354e-8; = p1938*p3476
- p0386: 0.5
- p1682: 0
- p1295: 0; = p1291*p1252/p0818
- p3472: 1.28822e-5; = p3377*p1241
- p3040: 0; = p2259*p1082
- p3125: 0; = p2344*p1082
- p0714: 9.636; = p0054*(1+p0582*p0186/100)
- p2198: 2.10215e-5; = 22.98976928*p2197/14.0067
- p2529: 0.000106043; = p2333*p1014
- p2718: 3.60606e-5; = p2327*(p1019+p1021)
- p2490: 0.000258346; = p2294*p1014
- p2247: 0.000181541; = p2222*p2192
- p2858: 0.00286277; = p2272*(p1129+p1131)
- p1852: 0
- p1034: 3.02287e-5; = IF(p1012=0;p1028*p0001/(p0818*p0002);0)
- p3317: 1.17787e7; = if(and(p1232=0;p3253<>0);p3253*(p3261*p3277-p3312)/p3316;0)
- p1643: 0
- p3183: 0; = p2402*p1023
- p2805: 0; = p2414*(p1078+p1080)
- p3428: 0; = p3371*p1239
- p1638: 0.732906
- p1339: 1.79278e-5; = p1338*p0001/(p0818*p0002)
- p0197: 38.274
- p0897: 0.458721
- p1323: 0; = IF(((p0745*1000*p0750/100)+(p0754*1000*p0759/100))/p0801<0;0;((p0745*1000*p0750/100)+(p0754*1000*p0759/100))/p0801)
- p3099: 0; = p2318*p1023
- p2558: 0.000113816; = p2362*p1014
- p1148: 0.082617; = if(p1121=0;IF(p1146=1;0;1-p1146);0)
- p2038: 0.304457
- p3115: 0; = p2334*p1023
- p3475: 0.00173161; = p3380*p1241
- p3301: 0.130394; = if(and(p1232=0;p3252<>0);p3257*p3277*(p3297*p3290+(1-p3297)*p3294);0)
- p2329: 1.53692e-6; = p2224*p2197
- p2942: 1.47049e-5; = p2356*(p1020+p1022)
- p2689: 0.000146093; = p2298*(p1078+p1080)
- p3932: 8.26634e-7; = p1789*p3478
- p2741: 0.000242587; = p2350*(p1128+p1130)
- p3730: 0; = p1793*p3477
- p2116: 0.444424
- p2698: 1.54882e-5; = p2307*(p1078+p1080)
- p1161: 1.12645e6; = (p0722/100)*p0702*1000
- p1277: 0
- p1933: 0
- p1076: 0.09636; = IF(p1071=0;p0714/100;0)
- p2295: 7.48395e-5; = p2223*p2202
- p2511: 0.000443853; = p2315*p1014
- p2383: 1.43751e-7; = p2229*p2212
- p3264: 0.0887032
- p1235: 0.31321; = if(p1232>0;0;p0727/100)
- p1577: 0
- p2885: 5.35783e-5; = p2299*(p1079+p1081)
- p0476: 0; = SQRT(2)*(IF((2*p0344-1)<0;-1;IF((2*p0344-1)>0;1;0))*SQRT(SQRT((2/(pi()*0.140012289)+LN(1-(2*p0344-1)^2)/2)^2-LN(1-(2*p0344-1)^2)/0.140012289)-(2/(pi()*0.140012289)+LN(1-(2*p0344-1)^2)/2)))
- p5111: 1.19641e-7; = p1938*p3483
- p2557: 9.94344e-5; = p2361*p1014
- p2267: 3.29881e-5; = p2226*p2213
- p0142: 0
- p2734: 0.000291859; = p2343*(p1078+p1080)
- p2948: 6.43623e-5; = p2362*(p1020+p1022)
- p3357: 3.11446e7; = if(p1232=0;p3307+p3318+p3329+p3340+p3351;0)
- p2065: 0.0758824
- p5015: 2.09897e-8; = p1842*p3483
- p1982: 750
- p3131: 0; = p2350*p1132
- p0547: 0; = IF(p0283<0.5;-SQRT(p0007*EXP(p0415^2*p0008)-p0007);SQRT(p0007*EXP(p0415^2*p0008)-p0007))
- p0826: 0.120333; = 1-p0825/p0818
- p1864: 2.34854e-8; = p1456*1000/p0818
- p2091: 0.374844
- p2973: 2.70202e-7; = p2387*(p1079+p1081)
- p2957: 0.000492996; = p2371*(p1020+p1022)
- p0221: 37.927
- p5132: 2.33638e-5; = p1963*p3483
- p0196: 60.952
- p1613: 0
- p0235: 0
- p0378: 0.5
- p2716: 2.93956e-5; = p2325*(p1019+p1021)
- p0112: 54.785
- p0764: 100; = p0104*(1+p0632*p0236/100)
- p1585: 0.7961
- p4081: 7.98613e-7; = p1938*p3478
- p0198: 12.218
- p1736: 0.641
- p0856: 5.8e6; = p0801
- p0721: 12.58; = p0061*(1+p0589*p0193/100)
- p1112: 0.209482
- p1006: 0; = p1002*p0001*p0004/(p0818*p0002)
- p1359: 244
- p2106: 0.856281
- p2008: 0.0636916; = ((p1982*p1985+p1988*p1991+p1994*p1997+p2002*p2005)/p0818)*p0005*p0002/1000
- p0732: 76.584; = p0072*(1+p0600*p0204/100)
- p2364: 0.000466216; = p2225*p2192
- p1262: 0; = if(p1232>0;0;p0733/100)
- p0612: 0; = IF(p0348<0.5;-SQRT(p0007*EXP(p0480^2*p0008)-p0007);SQRT(p0007*EXP(p0480^2*p0008)-p0007))
- p2678: 0.00040983; = p2287*(p1019+p1021)
- p4775: 0; = p1808*p3482
- p1732: 0
- p2565: 4.41728e-6; = p2369*p1014
- p0053: 10.822
- p0335: 0.5
- p1083: 2.35861e6; = IF(p1071=0;p1073*(p0710/100)*p0703*1000;0)
- p0059: 45.057
- p3403: 0; = p3365*p1238
- p3539: 1.17869e-7; = p1808*p3476
- p2829: 0.00011396; = p2243*(p1020+p1022)
- p1678: 0
- p3640: 3.17341e-8; = p1909*p3476
- p1632: 0
- p0785: 35.434; = p0125*(1+p0653*p0257/100)
- p1563: 0.693253
- p1802: 2.56461e-5; = p1394*1000/p0818
- p0380: 0.5
- p2217: 0.000644412; = p1118-p2216
- p2987: 0; = p2401*(p1020+p1022)
- p4734: 0; = p1767*p3482
- p0819: 0.0798504; = p0808*p0809/p0818
- p3235: 0.118093
- p3632: 6.95128e-8; = p1901*p3476
- p3022: 0; = p2241*p1023
- p2864: 1.01642e-5; = p2278*(p1020+p1022)
- p2876: 1.05196e-6; = p2290*(p1020+p1022)
- p2066: 0.109412
- p0713: 10.822; = p0053*(1+p0581*p0185/100)
- p0822: 0.879667
- p2246: 2.24329e-5; = p2222*p2191
- p2740: 8.06456e-5; = p2349*(p1078+p1080)
- p0740: 98.496; = p0080*(1+p0608*p0212/100)
- p0487: 0; = SQRT(2)*(IF((2*p0355-1)<0;-1;IF((2*p0355-1)>0;1;0))*SQRT(SQRT((2/(pi()*0.140012289)+LN(1-(2*p0355-1)^2)/2)^2-LN(1-(2*p0355-1)^2)/0.140012289)-(2/(pi()*0.140012289)+LN(1-(2*p0355-1)^2)/2)))
- p2943: 5.06502e-5; = p2357*(p1020+p1022)
- p3039: 0; = p2258*p1082
- p3304: 0.0017178; = if(and(p1232=0;p3252<>0);p3260*p3289;0)
- p1456: 1
- p3274: 0.0768939
- p3344: 6.0841e6; = if(and(p1232=0;p3254<>0);p3254-(p3339+p3340+p3341+p3342+p3343);0)
- p3396: 0.00033751; = p3377*p1234
- p2500: 0.000254872; = p2304*p1073
- p2505: 7.85782e-6; = p2309*p1073
- p5234: 6.61805e-8; = p1855*p3484
- p0329: 0.5
- p0501: 0; = SQRT(2)*(IF((2*p0369-1)<0;-1;IF((2*p0369-1)>0;1;0))*SQRT(SQRT((2/(pi()*0.140012289)+LN(1-(2*p0369-1)^2)/2)^2-LN(1-(2*p0369-1)^2)/0.140012289)-(2/(pi()*0.140012289)+LN(1-(2*p0369-1)^2)/2)))
- p0140: 90.362
- p1829: 0
- p0607: 0; = IF(p0343<0.5;-SQRT(p0007*EXP(p0475^2*p0008)-p0007);SQRT(p0007*EXP(p0475^2*p0008)-p0007))
- p3395: 0.000144223; = p3376*p1234
- p0746: 2.825; = p0086*(1+p0614*p0218/100)
- p2591: 0; = p2395*p1014
- p2016: 0.000268015; = (p2014-p2015)/(p0818)
- p3142: 0; = p2361*p1023
- p0143: 0
- p0065: 6.9
- p1096: 0.00337596
- p3897: 2.54996e-6; = p1754*p3478
- p0787: 42.803; = p0127*(1+p0655*p0259/100)
- p0533: 0; = SQRT(2)*(IF((2*p0401-1)<0;-1;IF((2*p0401-1)>0;1;0))*SQRT(SQRT((2/(pi()*0.140012289)+LN(1-(2*p0401-1)^2)/2)^2-LN(1-(2*p0401-1)^2)/0.140012289)-(2/(pi()*0.140012289)+LN(1-(2*p0401-1)^2)/2)))
- p0691: 0
- p1970: 5.8e6; = p0801
- p2094: 0.922577
- p1136: 89657.9; = if(p1121=0;p1130*(p0716/100)*p0703*1000;0)
- p1001: 0; = if(p0978>0;0;if(and(p0687=0;p0691=0;p0695=0;p0699=0);0;IF(p0996+p0999+p1000=1;0;1-(p0996+p0999+p1000))))
- p0947: 0; = if(and(p0683=0;or(p0807=480;p0807=32;p0807=1;and(p0807=60;p0901<0.03)));p0935;0)
- p2620: 0; = p2424*p1073
- p1634: 0
- p3482: 0; = if(p1328+p1330+p1332+p1334+p1336+p1338+p1340+p1342+p1344=0;0;p1340/(p1328+p1330+p1332+p1334+p1336+p1338+p1340+p1342+p1344))
- p3279: 0.37
- p0763: 5798.99; = p0103*(1+p0631*p0235/100)
- p2826: 1.97228e-5; = p2240*(p1020+p1022)
- p1790: 0
- p0214: 1.177
- p1345: 5.8343e-6; = IF(p1318=0;p1344*p0001/(p0818*p0002);0)
- p0752: 0
- p3215: 0.450791; = p1222*3*15.9994/100.0869
- p0175: 0
- p3936: 5.56227e-6; = p1793*p3478
- p1980: 3521.6
- p0613: 0; = IF(p0349<0.5;-SQRT(p0007*EXP(p0481^2*p0008)-p0007);SQRT(p0007*EXP(p0481^2*p0008)-p0007))
- p2088: 0.798875
- p1855: 4.86148e-6; = p1447*1000/p0818
- p2227: 0.260472; = if(p0774*p0778+p0775*p0779+p0776*p0780+p0777*p0781=0;0;p0779*p0775/(p0774*p0778+p0775*p0779+p0776*p0780+p0777*p0781))
- p0220: 11.295
- p2147: 2.88455e-8; = p2015*p2075*p2109/(p0818*1000)
- p2255: 0.000292941; = p2222*p2201
- p0866: 0.0185091; = IF(p0858+p0864+p0865=1;0;IF(p0858+p0864+p0865+p0861>1;1-(p0858+p0864+p0865);p0861))
- p1400: 78
- p0466: 0; = SQRT(2)*(IF((2*p0334-1)<0;-1;IF((2*p0334-1)>0;1;0))*SQRT(SQRT((2/(pi()*0.140012289)+LN(1-(2*p0334-1)^2)/2)^2-LN(1-(2*p0334-1)^2)/0.140012289)-(2/(pi()*0.140012289)+LN(1-(2*p0334-1)^2)/2)))
- p1788: 0
- p3189: 0; = p2408*p1023
- p0888: 0; = p0686*1000*p0687*p0884/100
- p1743: 0
- p1597: 0
- p2552: 2.60035e-5; = p2356*p1014
- p2663: 0.00166717; = p2272*(p1128+p1130)
- p0238: 17.233
- p3410: 0; = p3372*p1238
- p0670: 604.821; = p0010*(1+p0538*p0142/100)
- p1324: 0.147519; = IF(((p0745*1000*p0751/100)+(p0754*1000*p0760/100))/p0801<0;0;((p0745*1000*p0751/100)+(p0754*1000*p0760/100))/p0801)
- p2720: 3.41549e-7; = p2329*(p1019+p1021)
- p2562: 0.000284142; = p2366*p1014
- p1230: 0.5
- p1194: 1.48
- p2474: 1.79739e-5; = p2278*p1014
- p1891: 0
- p1642: 0
- p1785: 0
- p2866: 0.000109872; = p2280*(p1020+p1022)
- p2399: 0; = p2234*p2188
- p1907: 0
- p2576: 2.1098e-6; = p2380*p1073
- p3283: 0.3
- p2112: 0.856281
- p2754: 1.28026e-5; = p2363*(p1019+p1021)
- p1990: 30
- p3358: 9.28281e6; = if(p1232=0;p3308+p3319+p3330+p3341+p3352;0)
- p2692: 6.4664e-5; = p2301*(p1078+p1080)
- p5317: 1.82236e-8; = p1938*p3484
- p1447: 207
- p2655: 1.29685e-5; = p2264*(p1078+p1080)
- p1799: 0
- p1700: 0
- p1032: 3.9089e-6; = IF(p1012=0;p1026*p0001/(p0818*p0002);0)
- p2452: 2.09463e-5; = p2256*p1014
- p1789: 1.38564e-6; = p1381*1000/p0818
- p1181: 0.00013981
- p0389: 0.5
- p2379: 1.11197e-5; = p2229*p2208
- p3232: 1.90442e-8; = p1182/p0818
- p3050: 0; = p2269*p1082
- p2209: 0.000412465; = 14.0067*p2208/30.973762
- p1941: 0
- p0799: 118.024; = p0139*(1+p0667*p0271/100)
- p1640: 0
- p4204: 9.44423e-7; = p1855*p3479
- p0174: 0
- p0634: 0; = IF(p0370<0.5;-SQRT(p0007*EXP(p0502^2*p0008)-p0007);SQRT(p0007*EXP(p0502^2*p0008)-p0007))
- p0461: 0; = SQRT(2)*(IF((2*p0329-1)<0;-1;IF((2*p0329-1)>0;1;0))*SQRT(SQRT((2/(pi()*0.140012289)+LN(1-(2*p0329-1)^2)/2)^2-LN(1-(2*p0329-1)^2)/0.140012289)-(2/(pi()*0.140012289)+LN(1-(2*p0329-1)^2)/2)))
- p2290: 3.74428e-6; = p2223*p2197
- p0646: 0; = IF(p0382<0.5;-SQRT(p0007*EXP(p0514^2*p0008)-p0007);SQRT(p0007*EXP(p0514^2*p0008)-p0007))
- p0109: 32.25
- p1575: 0
- p3421: 0; = p3364*p1239
- p3875: 0; = p1938*p3477
- p2313: 0.000465415; = p2231*p2220
- p0973: 9.841e7; = p0967+p0968+p0969
- p2818: 0; = p2427*(p1078+p1080)
- p0273: 0.5
- p0686: 0
- p2350: 0.000722737; = p2232*p2218
- p3246: 1; = IF(p3244+p3245=1;0;1-(p3244+p3245))
- p1921: 0
- p0122: 90.362
- p0966: 0.85342; = if(p0683=0;0;IF(p0684/100+p0965=1;0;1-(p0684/100+p0965)))
- p3328: 0; = if(and(p1232=0;p3255<>0);p3255*(p3265*p3277-p3323)/p3327;0)
- p1824: 0
- p4514: 0; = p1963*p3480
- p1985: 2.47342e9; = (if(p1057=0;0;p1050/p1057)+if(p1058=0;0;p1051/p1058)+if(p1059=0;0;p1052/p1059)+if(p1060=0;0;p1053/p1060)+if(p1061=0;0;p1054/p1061)+if(p1062=0;0;p1055/p1062)+if(p1063=0;0;p1056/p1063))*(1+p1157)
- p3914: 9.88318e-5; = p1771*p3478
- p0831: 0.356071; = 1-p0824
- p1916: 1.64398e-7; = p1508*1000/p0818
- p0309: 0.5
- p3210: 0; = p2429*p1132
- p3446: 0; = p3370*p1240
- p3386: 0; = p3367*p1234
- p4559: 2.5543e-8; = p1798*p3481
- p2338: 0.000306821; = p2228*p2206
- p2690: 4.73088e-5; = p2299*(p1078+p1080)
- p0009: 42.7409
- p0050: 96.939
- p3003: 0; = p2417*(p1079+p1081)
- p0079: 3.416
- p1219: 0; = if(p1218=0;0;SQRT(2)*(IF((2*p1218-1)<0;-1;IF((2*p1218-1)>0;1;0))*SQRT(SQRT((2/(pi()*0.140012289)+LN(1-(2*p1218-1)^2)/2)^2-LN(1-(2*p1218-1)^2)/0.140012289)-(2/(pi()*0.140012289)+LN(1-(2*p1218-1)^2)/2))))
- p3290: 0.195
- p2408: 0; = p2234*p2198
- p3137: 0; = p2356*p1023
- p2661: 5.23587e-6; = p2270*(p1078+p1080)
- p0443: 0; = SQRT(2)*(IF((2*p0311-1)<0;-1;IF((2*p0311-1)>0;1;0))*SQRT(SQRT((2/(pi()*0.140012289)+LN(1-(2*p0311-1)^2)/2)^2-LN(1-(2*p0311-1)^2)/0.140012289)-(2/(pi()*0.140012289)+LN(1-(2*p0311-1)^2)/2)))
- p0650: 0; = IF(p0386<0.5;-SQRT(p0007*EXP(p0518^2*p0008)-p0007);SQRT(p0007*EXP(p0518^2*p0008)-p0007))
- p1923: 0
- p3046: 0; = p2265*p1082
- p0779: 31.56; = p0119*(1+p0647*p0251/100)
- p0261: 32.432
- p2499: 1.94627e-5; = p2303*p1073
- p1040: 0.0238398
- p2391: 1.83515e-5; = p2233*p2220
- p1402: 155
- p1801: 0
- p3739: 0; = p1802*p3477
- p1019: 0.05058; = IF(p1012=0;IF(p1014=1;0;IF(p1014+p1015>1;1-p1014;p1015));0)
- p0582: 0; = IF(p0318<0.5;-SQRT(p0007*EXP(p0450^2*p0008)-p0007);SQRT(p0007*EXP(p0450^2*p0008)-p0007))
- p1586: 0
- p0796: 100; = p0136*(1+p0664*p0268/100)
- p3287: 0.745
- p1555: 0
- p3119: 0; = p2338*p1082
- p0157: 36.151
- p3025: 0; = p2244*p1023
- p2328: 0.00160401; = p2224*p2196
- p3477: 0; = if(p1328+p1330+p1332+p1334+p1336+p1338+p1340+p1342+p1344=0;0;p1330/(p1328+p1330+p1332+p1334+p1336+p1338+p1340+p1342+p1344))
- p2996: 0; = p2410*(p1020+p1022)
- p5280: 1.47068e-8; = p1901*p3484
- p3485: 2.75029e-7; = p1754*p3476
- p0447: 0; = SQRT(2)*(IF((2*p0315-1)<0;-1;IF((2*p0315-1)>0;1;0))*SQRT(SQRT((2/(pi()*0.140012289)+LN(1-(2*p0315-1)^2)/2)^2-LN(1-(2*p0315-1)^2)/0.140012289)-(2/(pi()*0.140012289)+LN(1-(2*p0315-1)^2)/2)))
- p0593: 0; = IF(p0329<0.5;-SQRT(p0007*EXP(p0461^2*p0008)-p0007);SQRT(p0007*EXP(p0461^2*p0008)-p0007))
- p1825: 0
- p1866: 0
- p0639: 0; = IF(p0375<0.5;-SQRT(p0007*EXP(p0507^2*p0008)-p0007);SQRT(p0007*EXP(p0507^2*p0008)-p0007))
- p2664: 0.00234939; = p2273*(p1128+p1130)
- p4059: 9.80752e-8; = p1916*p3478
- p3056: 0; = p2275*p1132
- p0102: 57.498
- p0188: 3.246
- p0189: 34.898
- p1121: 0
- p1228: 0.0243199; = IF(p1221=0;0;p0801*p1212*2000/(p1222+p1221*p1225)/p0818)
- p4147: 1.18623e-7; = p1798*p3479
- p1722: 0
- p3105: 0; = p2324*p1023
- p1667: 0
- p0583: 0; = IF(p0319<0.5;-SQRT(p0007*EXP(p0451^2*p0008)-p0007);SQRT(p0007*EXP(p0451^2*p0008)-p0007))
- p2055: 5.59471
- p2012: 0.00197104
- p3349: 0; = if(and(p1232=0;p3256<>0);1-(p3345+p3346+p3347+p3348);0)
- p3196: 0; = p2415*p1082
- p2518: 2.82117e-5; = p2322*p1014
- p0004: 0.0254
- p2753: 5.09103e-5; = p2362*(p1019+p1021)
- p2746: 0.000153606; = p2355*(p1019+p1021)
- p0668: 0; = IF(p0404<0.5;-SQRT(p0007*EXP(p0536^2*p0008)-p0007);SQRT(p0007*EXP(p0536^2*p0008)-p0007))
- p0737: 0
- p0952: 3.78044e-5; = if(and(p0683>0;or(p0807=56;p0807=100;and(p0807=60;p0901>0.06)));p0934;0)
- p4700: 1.96485e-8; = p1939*p3481
- p2333: 0.000213444; = p2224*p2201
- p3323: 0; = if(and(p1232=0;p3255<>0);p3265*p3277*(p3299*p3291+(1-p3299)*p3295);0)
- p1016: 0.03217; = IF(p1012=0;p0707/100;0)
- p2519: 3.2292e-5; = p2323*p1014
- p2968: 8.76412e-6; = p2382*(p1079+p1081)
- p3387: 0; = p3368*p1234
- p0500: 0; = SQRT(2)*(IF((2*p0368-1)<0;-1;IF((2*p0368-1)>0;1;0))*SQRT(SQRT((2/(pi()*0.140012289)+LN(1-(2*p0368-1)^2)/2)^2-LN(1-(2*p0368-1)^2)/0.140012289)-(2/(pi()*0.140012289)+LN(1-(2*p0368-1)^2)/2)))
- p2446: 0.00109371; = p2250*p1014
- p1758: 0
- p1946: 0
- p2110: 0.856281
- p0715: 20.003; = p0055*(1+p0583*p0187/100)
- p1844: 0
- p3095: 0; = p2314*p1132
- p0107: 21.205
- p2488: 6.71294e-6; = p2292*p1014
- p1565: 0
- p3595: 1.51115e-9; = p1864*p3476
- p1665: 0
- p2723: 0.000110639; = p2332*(p1019+p1021)
- p1600: 0.895638
- p1172: 6.92331e-8; = p1170/p0818
- p2123: 0.263965
- p3389: 0; = p3370*p1234
- p0742: 97.971; = p0082*(1+p0610*p0214/100)
- p1267: 0
- p2559: 2.86217e-5; = p2363*p1014
- p1761: 0
- p2315: 0.000893388; = p2224*p2182
- p0213: 7.406
- p0316: 0.5
- p2920: 8.63062e-6; = p2334*(p1020+p1022)
- p2259: 0.000551327; = p2226*p2205
- p2586: 2.52675e-5; = p2390*p1123
- p3199: 0; = p2418*p1082
- p3260: 0.0343561
- p2752: 4.44775e-5; = p2361*(p1019+p1021)
- p3202: 0; = p2421*p1082
- p1341: 0; = p1340*p0001/(p0818*p0002)
- p3443: 0; = p3367*p1240
- p1579: 0
- p2192: 0.00110229; = p1067-p2189-p2190-p2191
- p2013: 0.75
- p2636: 1.98241e-5; = p2245*(p1019+p1021)
- p3070: 0; = p2289*p1023
- p0400: 0.5
- p3953: 2.17167e-6; = p1810*p3478
- p2127: 1.0847e-6; = p2015*p2055*p2089/(p0818*1000)
- p1811: 0
- p0704: 100; = p0044*(1+p0572*p0176/100)
- p1174: 3.46165e-8; = p1170*p1173/p0818
- p0999: 0; = IF(p0996=1;0;IF(p0996+p0997>1;1-p0996;p0997))
- p2809: 0; = p2418*(p1078+p1080)
- p2035: 1.28777e-6; = p2015*p2029*(1-p2031)/(p0818*1000)
- p2275: 0.000777312; = p2230*p2221
- p2703: 0.00244447; = p2312*(p1128+p1130)
- p0636: 0; = IF(p0372<0.5;-SQRT(p0007*EXP(p0504^2*p0008)-p0007);SQRT(p0007*EXP(p0504^2*p0008)-p0007))
- p0485: 0; = SQRT(2)*(IF((2*p0353-1)<0;-1;IF((2*p0353-1)>0;1;0))*SQRT(SQRT((2/(pi()*0.140012289)+LN(1-(2*p0353-1)^2)/2)^2-LN(1-(2*p0353-1)^2)/0.140012289)-(2/(pi()*0.140012289)+LN(1-(2*p0353-1)^2)/2)))
- p1846: 0
- p1901: 1.08033e-6; = p1493*1000/p0818
- p3269: 0.851786
- p2989: 0; = p2403*(p1020+p1022)
- p3341: 7.99507e6; = if(and(p1232=0;p3254<>0);p3254*(p3271-p3336)/p3338;0)
- p0845: 0.5
- p2418: 0; = p2235*p2208
- p1061: 0.3
- p1817: 0
- p3061: 0; = p2280*p1023
- p1559: 0
- p1183: 0.000121529; = p0801*p0001/(p0818*p0002)
- p0736: 0
- p1308: 0
- p1783: 0
- p1008: 0; = p1004*p0001*p0004/(p0818*p0002)
- p2820: 0; = p2429*(p1128+p1130)
- p2100: 0.705744
- p2963: 2.50771e-6; = p2377*(p1079+p1081)
- p4905: 0; = p1938*p3482
- p1208: 0; = p1205*p0818*p0822/p0801
- p3013: 0; = p2427*(p1079+p1081)
- p2771: 1.36865e-6; = p2380*(p1078+p1080)
- p0982: 0; = if(p0886=0;0;min(1;(p0691*p0690*1000*p0693/100)/p0886))
- p2994: 0; = p2408*(p1020+p1022)
- p2447: 1.04796e-6; = p2251*p1014
- p3379: 0.000256352; = if(p1232=0;p3246*p3361/p0818;0)
- p1558: 0
- p2568: 0.000373758; = p2372*p1014
- p0523: 0; = SQRT(2)*(IF((2*p0391-1)<0;-1;IF((2*p0391-1)>0;1;0))*SQRT(SQRT((2/(pi()*0.140012289)+LN(1-(2*p0391-1)^2)/2)^2-LN(1-(2*p0391-1)^2)/0.140012289)-(2/(pi()*0.140012289)+LN(1-(2*p0391-1)^2)/2)))
- p2797: 0; = p2406*(p1019+p1021)
- p1660: 0.731714
- p2612: 0; = p2416*p1073
- p3247: 0
- p0957: 1.66997e-8; = if(and(p0683>0;or(p0807=56;p0807=100;and(p0807=60;p0901>0.06)));p0939;0)
- p0445: 0; = SQRT(2)*(IF((2*p0313-1)<0;-1;IF((2*p0313-1)>0;1;0))*SQRT(SQRT((2/(pi()*0.140012289)+LN(1-(2*p0313-1)^2)/2)^2-LN(1-(2*p0313-1)^2)/0.140012289)-(2/(pi()*0.140012289)+LN(1-(2*p0313-1)^2)/2)))
- p2062: 3.76588
- p0512: 0; = SQRT(2)*(IF((2*p0380-1)<0;-1;IF((2*p0380-1)>0;1;0))*SQRT(SQRT((2/(pi()*0.140012289)+LN(1-(2*p0380-1)^2)/2)^2-LN(1-(2*p0380-1)^2)/0.140012289)-(2/(pi()*0.140012289)+LN(1-(2*p0380-1)^2)/2)))
- p0648: 0; = IF(p0384<0.5;-SQRT(p0007*EXP(p0516^2*p0008)-p0007);SQRT(p0007*EXP(p0516^2*p0008)-p0007))
- p2226: 0.267545; = if(p0774*p0778+p0775*p0779+p0776*p0780+p0777*p0781=0;0;p0778*p0774/(p0774*p0778+p0775*p0779+p0776*p0780+p0777*p0781))
- p0550: 0; = IF(p0286<0.5;-SQRT(p0007*EXP(p0418^2*p0008)-p0007);SQRT(p0007*EXP(p0418^2*p0008)-p0007))
- p1762: 0
- p2533: 0.000397537; = p2337*p1073
- p1299: 0
- p1806: 0
- p1322: 0.685087; = IF(((p0745*1000*p0749/100)+(p0754*1000*p0758/100))/p0801<0;0;((p0745*1000*p0749/100)+(p0754*1000*p0758/100))/p0801)
- p1679: 0
- p2730: 0.000693382; = p2339*(p1078+p1080)
- p0838: 1.6416e10; = (p0833-p0836)*p0837
- p1746: 0
- p1588: 0
- p2902: 5.5097e-5; = p2316*(p1020+p1022)
- p0138: 96.939
- p0825: 3.74559e10; = p0818*p0822
- p4631: 1.96485e-9; = p1870*p3481
- p1840: 0
- p0996: 0; = if(p0888=0;0;if((p0691*p0690*1000*p0692/100)/p0888>1;1;(p0691*p0690*1000*p0692/100)/p0888))
- p0995: 0; = p0991*p0001*p0004/(p0818*p0002)
- p3459: 0; = p3364*p1241
- p3586: 3.12807e-7; = p1855*p3476
- p2053: 1.45647
- p1899: 0
- p0382: 0.5
- p2149: 1.78462e-8; = p2015*p2077*p2111/(p0818*1000)
- p2930: 1.67119e-6; = p2344*(p1079+p1081)
- p3145: 0; = p2364*p1023
- p0933: 797; = p0801*p0927
- p0967: 4.36055e6; = (p0684/100)*p0964*p0683*p0682*1000
- p2331: 5.5462e-6; = p2224*p2199
- p0199: 28.239
- p1272: 0.16857; = IF(p1267+p1270+p1271=p1259;0;p1259-(p1267+p1270+p1271))
- p4977: 6.2969e-9; = p1804*p3483
- p3063: 0; = p2282*p1023
- p2222: 0.164695; = if(p0765*p0769+p0766*p0770+p0767*p0771+p0768*p0772=0;0;p0769*p0765/(p0765*p0769+p0766*p0770+p0767*p0771+p0768*p0772))
- p0366: 0.5
- p2453: 0.000240133; = p2257*p1014
- p2593: 0; = p2397*p1014
- p2324: 1.63452e-5; = p2224*p2191
- p2842: 1.18451e-5; = p2256*(p1020+p1022)
- p0572: 0; = IF(p0308<0.5;-SQRT(p0007*EXP(p0440^2*p0008)-p0007);SQRT(p0007*EXP(p0440^2*p0008)-p0007))
- p2761: 4.34416e-6; = p2370*(p1019+p1021)
- p2641: 0.000489222; = p2250*(p1019+p1021)
- p3240: 1.60181e-9; = p3234*p1188*p3235/p0818
- p1926: 0
- p3149: 0; = p2368*p1023
- p0061: 12.58
- p2780: 6.83974e-5; = p2389*(p1128+p1130)
- p1753: 0
- p0474: 0; = SQRT(2)*(IF((2*p0342-1)<0;-1;IF((2*p0342-1)>0;1;0))*SQRT(SQRT((2/(pi()*0.140012289)+LN(1-(2*p0342-1)^2)/2)^2-LN(1-(2*p0342-1)^2)/0.140012289)-(2/(pi()*0.140012289)+LN(1-(2*p0342-1)^2)/2)))
- p0552: 0; = IF(p0288<0.5;-SQRT(p0007*EXP(p0420^2*p0008)-p0007);SQRT(p0007*EXP(p0420^2*p0008)-p0007))
- p1719: 0
- p1176: 566.641; = p1175*p0801
- p1094: 0; = IF(p1071=0;p1088*p0001/(p0818*p0002);0)
- p2566: 9.71186e-6; = p2370*p1014
- p1780: 0
- p2478: 0.000357722; = p2282*p1014
- p2049: 25.6942
- p2097: 0.40001
- p0861: 0.0185091; = p0673*1000/p0856
- p3329: 0; = if(and(p1232=0;p3255<>0);p3255*(p3266-p3324)/p3327;0)
- p3908: 5.0901e-5; = p1765*p3478
- p0800: 90.362; = p0140*(1+p0668*p0272/100)
- p3006: 0; = p2420*(p1079+p1081)
- p2822: 0; = p2431*(p1128+p1130)
- p2376: 2.51225e-5; = p2229*p2205
- p3195: 0; = p2414*p1082
- p3263: 0.0214527
- p1919: 0
- p3390: 0; = p3371*p1234
- p4983: 3.2534e-7; = p1810*p3483
- p3126: 0; = p2345*p1082
- p2043: 0.636483
- p1159: 0.5
- p0057: 8.799
- p0981: 0.000121529; = p0978*p0001/(p0818*p0002)
- p1983: 50
- p1847: 0
- p3520: 8.91577e-8; = p1789*p3476
- p3502: 1.06596e-5; = p1771*p3476
- p2109: 0.826583
- p0048: 17.165
- p2681: 8.32091e-7; = p2290*(p1019+p1021)
- p4771: 0; = p1804*p3482
- p0833: 3.7538e10; = p0830+p0832
- p0086: 2.825
- p0791: 0
- p3208: 0; = p2427*p1082
- p1994: 750
- p3074: 0; = p2293*p1023
- p2465: 9.25441e-5; = p2269*p1073
- p0857: 1.21529; = p0856*p0001*p0003/(p0818*p0002)
- p2366: 0.000571922; = p2225*p2195
- p2540: 2.27471e-6; = p2344*p1073
- p2733: 2.22871e-5; = p2342*(p1078+p1080)
- p3130: 0; = p2349*p1082
- p0928: 1.80423e6; = p0801*p0918
- p2925: 0.000785271; = p2339*(p1079+p1081)
- p1205: 0
- p2281: 5.62841e-5; = p2223*p2187
- p1708: 0
- p2204: 0.00227846; = p1109/p0818
- p1175: 9.76968e-5
- p0749: 23.002; = p0089*(1+p0617*p0221/100)
- p0191: 16.82
- p3690: 1.68208e-5; = p1963*p3476
- p0930: 911576; = p0801*p0924
- p0709: 24.878; = p0049*(1+p0577*p0181/100)
- p0633: 0; = IF(p0369<0.5;-SQRT(p0007*EXP(p0501^2*p0008)-p0007);SQRT(p0007*EXP(p0501^2*p0008)-p0007))
- p2277: 0.000477768; = p2223*p2183
- p0468: 0; = SQRT(2)*(IF((2*p0336-1)<0;-1;IF((2*p0336-1)>0;1;0))*SQRT(SQRT((2/(pi()*0.140012289)+LN(1-(2*p0336-1)^2)/2)^2-LN(1-(2*p0336-1)^2)/0.140012289)-(2/(pi()*0.140012289)+LN(1-(2*p0336-1)^2)/2)))
- p2747: 1.16315e-5; = p2356*(p1019+p1021)
- p2635: 1.73192e-5; = p2244*(p1019+p1021)
- p1858: 0
- p1696: 0
- p3220: 0.00145919; = p3216*p1228
- p2458: 0.000102387; = p2262*p1073
- p4326: 0; = p1771*p3480
- p0345: 0.5
- p0801: 5.8e6
- p0117: 33.096
- p0876: 107353; = p0866*p0856
- p2009: 0.00598475; = ((p1983*p1985+p1989*p1991+p1995*p1997+p2003*p2005+p1976*p1977+p1978*p1979+p1998*p1999)/p0818)*p0005*p0002/1000
- p1002: 0; = p0996*p0888
- p1521: 211
- p1920: 0
- p0113: 96.939
- p0439: 0; = SQRT(2)*(IF((2*p0307-1)<0;-1;IF((2*p0307-1)>0;1;0))*SQRT(SQRT((2/(pi()*0.140012289)+LN(1-(2*p0307-1)^2)/2)^2-LN(1-(2*p0307-1)^2)/0.140012289)-(2/(pi()*0.140012289)+LN(1-(2*p0307-1)^2)/2)))
- p1077: 0.20003; = IF(p1071=0;p0715/100;0)
- p4344: 0; = p1789*p3480
- p2870: 4.4488e-5; = p2284*(p1020+p1022)
- p5318: 6.39425e-9; = p1939*p3484
- p0119: 31.56
- p2177: 0.0642478; = p0895/p0818-(p2173+p2174+p2175+p2176)
- p2068: 0.153529
- p1180: 6.6539e-9; = p1176*p1179/p0818
- p0980: 0; = IF(p0977=0;0;p0977*p0001/(p0818*p0002))
- p4720: 1.09355e-5; = p1963*p3481
- p2918: 0.000139874; = p2332*(p1020+p1022)
- p3116: 0; = p2335*p1023
- p0921: 0.302778; = p0679*1000/p0801
- p1557: 0
- p4397: 0; = p1842*p3480
- p3407: 0; = p3369*p1238
- p1137: 659151; = if(p1121=0;p1131*(p0716/100)*p0703*1000;0)
- p0924: 0.157168; = IF(p0918+p0923=1;0;IF(p0918+p0923+p0920>1;1-(p0918+p0923);p0920))
- p2762: 0.000389957; = p2371*(p1019+p1021)
- p2601: 0; = p2405*p1014
- p1209: 133.598; = p1206*p0818*p0822/p0801
- p1253: 0; = if(p1232>0;0;p0735/100)
- p0638: 0; = IF(p0374<0.5;-SQRT(p0007*EXP(p0506^2*p0008)-p0007);SQRT(p0007*EXP(p0506^2*p0008)-p0007))
- p1797: 0
- p2443: 9.01933e-5; = p2247*p1014
- p0855: 0.54149; = p0854*p0001*p0003/(p0818*p0002)
- p1930: 0
- p0044: 100
- p2027: 0.428799
- p1717: 0
- p0334: 0.5
- p2206: 0.000667305; = 9*1.00794*p2204/30.973762
- p2306: 3.21161e-5; = p2227*p2213
- p0580: 0; = IF(p0316<0.5;-SQRT(p0007*EXP(p0448^2*p0008)-p0007);SQRT(p0007*EXP(p0448^2*p0008)-p0007))
- p1791: 0
- p0706: 5.058; = p0046*(1+p0574*p0178/100)
- p0401: 0.5
- p0241: 28.82
- p2961: 8.56237e-6; = p2375*(p1079+p1081)
- p3068: 0; = p2287*p1023
- p1043: 0.209016
- p2516: 1.1478e-5; = p2320*p1014
- p3409: 0; = p3371*p1238
- p3041: 0; = p2260*p1082
- p4039: 1.12086e-7; = p1896*p3478
- p5037: 2.09897e-9; = p1864*p3483
- p2375: 2.77773e-5; = p2229*p2204
- p1550: 0.783979
- p2498: 4.50768e-5; = p2302*p1073
- p4250: 2.09872e-7; = p1901*p3479
- p0993: 0; = p0989*p0001*p0004/(p0818*p0002)
- p2813: 0; = p2422*(p1078+p1080)
- p0223: 41.858
- p0553: 0; = IF(p0289<0.5;-SQRT(p0007*EXP(p0421^2*p0008)-p0007);SQRT(p0007*EXP(p0421^2*p0008)-p0007))
- p2903: 4.1721e-6; = p2317*(p1020+p1022)
- p3314: 0.00107264; = if(and(p1232=0;p3253<>0);p3263*p3289;0)
- p3441: 0; = p3365*p1240
- p2299: 0.000173814; = p2227*p2206
- p1035: 0; = IF(p1012=0;p1029*p0001/(p0818*p0002);0)
- p1263: 0.06559; = if(p1232>0;0;IF(p1259=1;0;IF(p1259+p1260>1;1-p1259;p1260)))
- p0797: 60.619; = p0137*(1+p0665*p0269/100)
- p1668: 0
- p0769: 32.25; = p0109*(1+p0637*p0241/100)
- p2070: 0.282
- p2384: 1.50318e-6; = p2229*p2213
- p3660: 3.18852e-7; = p1929*p3476
- p0666: 0; = IF(p0402<0.5;-SQRT(p0007*EXP(p0534^2*p0008)-p0007);SQRT(p0007*EXP(p0534^2*p0008)-p0007))
- p1654: 0
- p1027: 995397; = IF(p1012=0;p1021*(p0704/100)*p0703*1000;0)
- p2569: 5.37922e-5; = p2373*p1014
- p0592: 0; = IF(p0328<0.5;-SQRT(p0007*EXP(p0460^2*p0008)-p0007);SQRT(p0007*EXP(p0460^2*p0008)-p0007))
- p2309: 1.87283e-5; = p2227*p2216
- p0608: 0; = IF(p0344<0.5;-SQRT(p0007*EXP(p0476^2*p0008)-p0007);SQRT(p0007*EXP(p0476^2*p0008)-p0007))
- p2143: 6.50047e-8; = p2015*p2071*p2105/(p0818*1000)
- p0537: 0; = IF(p0273<0.5;-SQRT(p0007*EXP(p0405^2*p0008)-p0007);SQRT(p0007*EXP(p0405^2*p0008)-p0007))
- p0758: 0
- p0731: 6.559; = p0071*(1+p0599*p0203/100)
- p3414: 6.82831e-5; = p3376*p1238
- p3454: 0; = p3378*p1240
- p2832: 6.30251e-6; = p2246*(p1020+p1022)
- p3101: 0; = p2320*p1023
- p0252: 6.834
- p0946: 0; = if(and(p0683=0;or(p0807=480;p0807=32;p0807=1;and(p0807=60;p0901<0.03)));p0934;0)
- p1944: 0
- p3792: 0; = p1855*p3477
- p1552: 0
- p2182: 0.00744483; = p1050/p0818
- p1195: 0.45
- p2380: 5.02848e-6; = p2229*p2209
- p1723: 0
- p2457: 0.000621951; = p2261*p1073
- p3173: 0; = p2392*p1132
- p0210: 0
- p1989: 50
- p0502: 0; = SQRT(2)*(IF((2*p0370-1)<0;-1;IF((2*p0370-1)>0;1;0))*SQRT(SQRT((2/(pi()*0.140012289)+LN(1-(2*p0370-1)^2)/2)^2-LN(1-(2*p0370-1)^2)/0.140012289)-(2/(pi()*0.140012289)+LN(1-(2*p0370-1)^2)/2)))
- p2979: 0; = p2393*(p1020+p1022)
- p2602: 0; = p2406*p1014
- p1674: 0
- p3384: 0; = p3365*p1234
- p1626: 0
- p2672: 1.2508e-5; = p2281*(p1019+p1021)
- p1748: 0
- p4245: 3.64994e-8; = p1896*p3479
- p0610: 0; = IF(p0346<0.5;-SQRT(p0007*EXP(p0478^2*p0008)-p0007);SQRT(p0007*EXP(p0478^2*p0008)-p0007))
- p1569: 0
- p2311: 0.00516799; = p2231*p2218
- p0227: 34.998
- p3359: 2.17236e7; = if(p1232=0;p3309+p3320+p3331+p3342+p3353;0)
- p2882: 0.000241048; = p2296*(p1020+p1022)
- p2626: 0; = p2430*p1123
- p2060: 0.272353
- p2069: 0.190588
- p0218: 29.38
- p0702: 5798.99; = p0042*(1+p0570*p0174/100)
- p2183: 0.00163423; = p1064-p2182
- p2032: 0.448886
- p2359: 8.14282e-5; = p2225*p2187
- p2912: 0.000212673; = p2326*(p1020+p1022)
- p3024: 0; = p2243*p1023
- p2486: 1.86023e-6; = p2290*p1014
- p3267: 0.0170629
- p1288: 0
- p0407: 0; = SQRT(2)*(IF((2*p0275-1)<0;-1;IF((2*p0275-1)>0;1;0))*SQRT(SQRT((2/(pi()*0.140012289)+LN(1-(2*p0275-1)^2)/2)^2-LN(1-(2*p0275-1)^2)/0.140012289)-(2/(pi()*0.140012289)+LN(1-(2*p0275-1)^2)/2)))
- p1947: 0
- p3427: 0; = p3370*p1239
- p1804: 7.04563e-8; = p1396*1000/p0818
- p3408: 0; = p3370*p1238
- p2668: 0.000106174; = p2277*(p1019+p1021)
- p0344: 0.5
- p2980: 0; = p2394*(p1020+p1022)
- p0393: 0.5
- p4425: 0; = p1870*p3480
- p0656: 0; = IF(p0392<0.5;-SQRT(p0007*EXP(p0524^2*p0008)-p0007);SQRT(p0007*EXP(p0524^2*p0008)-p0007))
- p1151: 4.24164e7; = if(p1121=0;p1149*p1148*p1145;0)
- p2207: 0.00554058; = p1119-p2205-p2204-p2206
- p3036: 0; = p2255*p1023
- p3424: 0; = p3367*p1239
- p3779: 0; = p1842*p3477
- p2302: 0.000107436; = p2227*p2209
- p1286: 0.00514065; = p1282*p1252/p0818
- p0965: 0.10227; = IF(p0684/100=1;0;IF(p0684/100+p0685/100>1;1-p0684/100;p0685/100))
- p1163: 0.0086165
- p1396: 3
- p3375: 0.000731444; = if(p1232=0;p3246*p3357/p0818;0)
- p3291: 0.437
- p2368: 5.41698e-6; = p2225*p2197
- p3132: 0; = p2351*p1132
- p0893: 0.0686094; = 1000*(p0890+p0892)*p0001*p0003*p0004/(p0818*p0002)
- p2945: 2.28772e-5; = p2359*(p1020+p1022)
- p2919: 5.99671e-5; = p2333*(p1020+p1022)
- p2203: 0.00293476; = p1070-p2200-p2201-p2202
- p0072: 76.584
- p2372: 0.000752301; = p2225*p2201
- p2107: 0.881623
- p0805: 0
- p0022: 5799.2
- p1972: 0; = if(p0807=480;p1967*p0001/(p0818*p0002);0)
- p5319: 3.02448e-7; = p1940*p3484
- p0141: 83.3935
- p2310: 0.000167851; = p2227*p2217
- p0355: 0.5
- p3108: 0; = p2327*p1023
- p2189: 0.0004732; = p1053/p0818
- p3801: 0; = p1864*p3477
- p0870: 604821; = p0858*p0856
- p3351: 0; = if(and(p1232=0;p3256<>0);p3256*(p3274-p3346)/p3349;0)
- p2117: 0.585147
- p0898: 0.458721
- p0249: 4.807
- p2656: 0.000169828; = p2265*(p1078+p1080)
- p0123: 123.816
- p0319: 0.5
- p1905: 0
- p3910: 3.41862e-6; = p1767*p3478
- p0372: 0.5
- p2416: 0; = p2235*p2206
- p2873: 0.000518119; = p2287*(p1020+p1022)
- p2922: 0.000322927; = p2336*(p1079+p1081)
- p2888: 3.3117e-5; = p2302*(p1079+p1081)
- p1837: 0
- p0326: 0.5
- p3405: 0; = p3367*p1238
- p3741: 0; = p1804*p3477
- p1687: 0
- p1971: 0.00011629; = p1966*p0001/(p0818*p0002)
- p1343: 3.83032e-5; = p1342*p0001/(p0818*p0002)
- p1124: 0.31854; = if(p1121=0;p0718/100;0)
- p2607: 0; = p2411*p1014
- p1872: 0
- p1869: 0
- p2597: 0; = p2401*p1014
- p2691: 0.000392802; = p2300*(p1078+p1080)
- p0972: 0.00197243; = p0969/p0818
- p3133: 0; = p2352*p1132
- p0311: 0.5
- p3335: 0.0141479; = IF(or(p3254=0;p1232>0);0;p3270*(p3280*(p3283*p1256+p3286*(p1253+p1257)+p1258*p3288+p3300*p3287)))
- p2014: 3.20497e7; = p0833*p2011*p2013
- p3289: 0.05
- p0120: 68.877
- p2250: 0.00220142; = p2222*p2196
- p3016: 0; = p2430*(p1129+p1131)
- p0719: 45.057; = p0059*(1+p0587*p0191/100)
- p2213: 0.000123299; = p1116-p2212
- p2923: 0.000292063; = p2337*(p1079+p1081)
- p3373: 0; = if(p1232=0;p3245*p3361/p0818;0)
- p2621: 0; = p2425*p1073
- p0236: 0
- p2901: 0.000250997; = p2315*(p1020+p1022)
- p4103: 8.30362e-7; = p1754*p3479
- p1999: 1.19667e9; = (p1228+p1229)*p0818+p1164
- p2077: 0.043
- p2503: 2.38753e-5; = p2307*p1073
- p0394: 0.5
- p2440: 3.8719e-5; = p2244*p1014
- p1849: 0
- p3059: 0; = p2278*p1023
- p3330: 0; = if(and(p1232=0;p3255<>0);p3255*(p3267-p3325)/p3327;0)
- p0047: 3.217
- p1241: 0.02525; = if(p1232>0;0;IF(p1234+p1238+p1239+p1240=1;0;1-(p1234+p1238+p1239+p1240)))
- p1530: 57
- p0697: 0
- p0720: 1.711; = p0060*(1+p0588*p0192/100)
- p2897: 0.00297863; = p2311*(p1129+p1131)
- p1963g: 5.68904e-5; = p1667*p1871+p1668*p1872+p1669*p1873+p1670*p1874+p1671*p1875+p1672*p1876+p1673*p1877+p1674*p1878+p1675*p1879+p1676*p1880+p1677*p1881+p1678*p1882+p1679*p1883+p1680*p1884+p1681*p1885+p1682*p1886+p1683*p1887+p1684*p1888+p1685*p1889
- p3415: 0.000159796; = p3377*p1238
- p3064: 0; = p2283*p1023
- p4365: 0; = p1810*p3480
- p2874: 0.000111065; = p2288*(p1020+p1022)
- p3468: 0; = p3373*p1241
- p1951: 0
- p3340: 2.60715e7; = if(and(p1232=0;p3254<>0);p3254*(p3270-p3335)/p3338;0)
- p2347: 0.000379061; = p2228*p2215
- p2045: 30
- p3229: 1.1737e-6; = p1164/p0818
- p2758: 0.00125637; = p2367*(p1019+p1021)
- p1876: 0
- p1902: 0
- p2535: 0.00106886; = p2339*p1073
- p0493: 0; = SQRT(2)*(IF((2*p0361-1)<0;-1;IF((2*p0361-1)>0;1;0))*SQRT(SQRT((2/(pi()*0.140012289)+LN(1-(2*p0361-1)^2)/2)^2-LN(1-(2*p0361-1)^2)/0.140012289)-(2/(pi()*0.140012289)+LN(1-(2*p0361-1)^2)/2)))
- p1187: 0.00025142
- p2237: 0.00122613; = p2222*p2182
- p2294: 0.000519999; = p2223*p2201
- p4907: 0; = p1940*p3482
- p1284: 0; = p1280*p1252/p0818
- p4278: 9.62672e-7; = p1929*p3479
- p2939: 6.51894e-5; = p2353*(p1129+p1131)
- p0490: 0; = SQRT(2)*(IF((2*p0358-1)<0;-1;IF((2*p0358-1)>0;1;0))*SQRT(SQRT((2/(pi()*0.140012289)+LN(1-(2*p0358-1)^2)/2)^2-LN(1-(2*p0358-1)^2)/0.140012289)-(2/(pi()*0.140012289)+LN(1-(2*p0358-1)^2)/2)))
- p2216: 7.19012e-5; = p1108/p0818
- p3107: 0; = p2326*p1023
- p1229: 0.00378317; = IF(p1221=0;0;p1228*p1221)
- p2224: 0.120001; = if(p0765*p0769+p0766*p0770+p0767*p0771+p0768*p0772=0;0;p0771*p0767/(p0765*p0769+p0766*p0770+p0767*p0771+p0768*p0772))
- p1215: 0.0183471; = IF(p1214=0;0;(p1214-1.5)/(p1214-1)^2)
- p3877: 0; = p1940*p3477
- p1966: 5.55e6; = if(p0814=0;p0802;0)
- p3032: 0; = p2251*p1023
- p0905: 0.0207326; = p0904/p0818
- p3346: 0; = if(and(p1232=0;p3256<>0);p3274*(p3281*(p3285*p1256+p3286*(p1253+p1257)+p1258*p3288));0)
- p0906: 0.00342907
- p1225: 1.088; = IF(p1221=0;0;p1223+1.2*p1224)
- p0853: 0.0176991; = p0803/(p0802+p0803)
- p3256: 0; = p1252*(p1307*(1-p3247)+p1310*(1-p3248)+p1311*(1-p3249)+p1312*(1-p3250))
- p1963e: 1.72126e-7; = p1628*p1832+p1629*p1833+p1630*p1834+p1631*p1835+p1632*p1836+p1633*p1837+p1634*p1838+p1635*p1839+p1636*p1840+p1637*p1841+p1638*p1842+p1639*p1843+p1640*p1844+p1641*p1845+p1642*p1846+p1643*p1847+p1644*p1848+p1645*p1849+p1646*p1850
- p2830: 2.18955e-5; = p2244*(p1020+p1022)
- p3481: 0.0418312; = if(p1328+p1330+p1332+p1334+p1336+p1338+p1340+p1342+p1344=0;0;p1338/(p1328+p1330+p1332+p1334+p1336+p1338+p1340+p1342+p1344))
- p2956: 5.49202e-6; = p2370*(p1020+p1022)
- p0392: 0.5
- p2137: 2.28176e-8; = p2015*p2065*p2099/(p0818*1000)
- p0388: 0.5
- p2643: 7.69391e-7; = p2252*(p1019+p1021)
- p1560: 0
- p0594: 0; = IF(p0330<0.5;-SQRT(p0007*EXP(p0462^2*p0008)-p0007);SQRT(p0007*EXP(p0462^2*p0008)-p0007))
- p3020: 0; = p2239*p1023
- p0815: 0
- p2790: 0; = p2399*(p1019+p1021)
- p0858: 0.104279; = p0670*1000/p0856
- p5268: 1.57458e-6; = p1889*p3484
- p2650: 0.00015006; = p2259*(p1078+p1080)
- p2611: 0; = p2415*p1073
- p0810: 0
- p3464: 0; = p3369*p1241
- p1171: 0.000121529; = p0801*p0001/(p0818*p0002)
- p3138: 0; = p2357*p1023
- p0733: 0
- p0212: 1.224
- p3345: 0; = if(and(p1232=0;p3256<>0);p3273*p3277*p3293;0)
- p2320: 2.31029e-5; = p2224*p2187
- p1192: 1.71236e-8; = p1188*p1191/p0818
- p1914: 0
- p2999: 0; = p2413*(p1020+p1022)
- p3689: 1.93629e-7; = p1962*p3476
- p2887: 7.32335e-5; = p2301*(p1079+p1081)
- p1776: 0
- p1718: 0
- p3423: 0; = p3366*p1239
- p3178: 0; = p2397*p1023
- p2839: 2.13855e-6; = p2253*(p1020+p1022)
- p2342: 8.18837e-5; = p2228*p2210
- p3366: 0; = if(p1232=0;p3244*p3360/p0818;0)
- p2389: 0.000203776; = p2233*p2218
- p1102: 0.020586; = IF(p1071=0;IF(p1096+p1101=1;0;IF(p1096+p1101+p1098>1;1-(p1096+p1101);p1098));0)
- p1636: 0
- p1911: 0
- p1063: 0.455
- p4927: 3.82012e-7; = p1754*p3483
- p2827: 6.18961e-5; = p2241*(p1020+p1022)
- p1316: 0; = p1312*p1252/p0818
- p1823: 0
- p2201: 0.00177868; = 12.01*p2200/(2*14.0067)
- p2881: 2.10262e-5; = p2295*(p1020+p1022)
- p3049: 0; = p2268*p1082
- p1819: 0
- p4971: 5.45732e-8; = p1798*p3483
- p0956: 0; = if(and(p0683>0;or(p0807=56;p0807=100;and(p0807=60;p0901>0.06)));p0938;0)
- p3188: 0; = p2407*p1023
- p1321: 2.10383; = IF(((p0745*1000*p0748/100)+(p0754*1000*p0757/100))/p0801<0;0;((p0745*1000*p0748/100)+(p0754*1000*p0757/100))/p0801)
- p0139: 118.024
- p1266: 0; = if(p1232>0;0;IF(p1259+p1263+p1264+p1265=1;0;1-(p1259+p1263+p1264+p1265)))
- p0458: 0; = SQRT(2)*(IF((2*p0326-1)<0;-1;IF((2*p0326-1)>0;1;0))*SQRT(SQRT((2/(pi()*0.140012289)+LN(1-(2*p0326-1)^2)/2)^2-LN(1-(2*p0326-1)^2)/0.140012289)-(2/(pi()*0.140012289)+LN(1-(2*p0326-1)^2)/2)))
- p0931: 1.75612e6; = p0801*p0925
- p0586: 0; = IF(p0322<0.5;-SQRT(p0007*EXP(p0454^2*p0008)-p0007);SQRT(p0007*EXP(p0454^2*p0008)-p0007))
- p0671: 5062.43; = p0011*(1+p0539*p0143/100)
- p0016: 911.576
- p1207: 341.71; = if(p1193>0;0;(p1194*p1050/p1057+p1195*p1051/p1058+p1196*p1052/p1059+p1197*p1053/p1060+p1198*p1054/p1061+p1199*p1055/p1062+p1200*p1056/p1063)/(p0702*1000)+(p1201*p1109/p1114+p1202*p1110/p1115)/(p0702*1000)+p1203*p1170/p0801+p1204*p1176/p0801)
- p2951: 0.000749582; = p2365*(p1020+p1022)
- p2834: 0.000291882; = p2248*(p1020+p1022)
- p1928: 0
- p4528: 2.39711e-7; = p1767*p3481
- p0307: 0.5
- p3294: 0.279
- p0964: 0.000622222; = 56/90000
- p3261: 0.908439
- p2638: 4.03439e-5; = p2247*(p1019+p1021)
- p0505: 0; = SQRT(2)*(IF((2*p0373-1)<0;-1;IF((2*p0373-1)>0;1;0))*SQRT(SQRT((2/(pi()*0.140012289)+LN(1-(2*p0373-1)^2)/2)^2-LN(1-(2*p0373-1)^2)/0.140012289)-(2/(pi()*0.140012289)+LN(1-(2*p0373-1)^2)/2)))
- p4493: 0; = p1938*p3480
- p0839: 0.385537; = p0838/p0818
- p2414: 0; = p2235*p2204
- p2253: 7.61187e-6; = p2222*p2199
- p1959: 19512.1; = if(p0738*p0740*p0739>0;p0738*1000*(p0740/100)*p0739/1000;p1958)
- p3147: 0; = p2366*p1023
- p1571: 0
- p1059: 0.335
- p3726: 0; = p1789*p3477
- p1862: 0
- p1637: 0
- p2624: 0; = p2428*p1123
- p0600: 0; = IF(p0336<0.5;-SQRT(p0007*EXP(p0468^2*p0008)-p0007);SQRT(p0007*EXP(p0468^2*p0008)-p0007))
- p0457: 0; = SQRT(2)*(IF((2*p0325-1)<0;-1;IF((2*p0325-1)>0;1;0))*SQRT(SQRT((2/(pi()*0.140012289)+LN(1-(2*p0325-1)^2)/2)^2-LN(1-(2*p0325-1)^2)/0.140012289)-(2/(pi()*0.140012289)+LN(1-(2*p0325-1)^2)/2)))
- p1809: 0
- p1939: 4.69708e-7; = p1531*1000/p0818
- p2212: 1.17913e-5; = p1106/p0818
- p3352: 0; = if(and(p1232=0;p3256<>0);p3256*(p3275-p3347)/p3349;0)
- p0960: 0; = if(and(p0683>0;or(p0807=480;p0807=32;p0807=1;and(p0807=60;p0901<0.03)));p0936;0)
- p0318: 0.5
- p1737: 0
- p0336: 0.5
- p2210: 0.000178089; = 6*1.00794*p2208/30.973762
- p3350: 0; = if(and(p1232=0;p3256<>0);p3256*(p3273*p3277-p3345)/p3349;0)
- p2671: 8.69079e-5; = p2280*(p1019+p1021)
- p0645: 0; = IF(p0381<0.5;-SQRT(p0007*EXP(p0513^2*p0008)-p0007);SQRT(p0007*EXP(p0513^2*p0008)-p0007))
- p2323: 6.49973e-5; = p2224*p2190
- p2073: 0.377647
- p1024: 2.88106e6; = IF(p1012=0;p1014*(p0704/100)*p0703*1000;0)
- p2160: 3.47281e-8; = p2015*p2084*p2122/(p0818*1000)
- p2318: 5.11499e-5; = p2224*p2185
- p3228: 0.00189894; = p3224*p1229
- p2550: 0.0015644; = p2354*p1014
- p4721: 0; = p1754*p3482
- p1673: 0
- p2185: 0.000426245; = p1065-p2184
- p1271: 0; = IF(p1267+p1270=p1259;0;IF(p1267+p1270+p1269>p1259;p1259-(p1267+p1270);p1269))
- p1623: 0
- p0573: 0; = IF(p0309<0.5;-SQRT(p0007*EXP(p0441^2*p0008)-p0007);SQRT(p0007*EXP(p0441^2*p0008)-p0007))
- p3038: 0; = p2257*p1023
- p1234: 0.66154; = if(p1232>0;0;p0726/100)
- p1290: 0; = IF(p1287=p1264;0;IF(p1287+p1288>p1264;p1264-p1287;p1288))
- p0452: 0; = SQRT(2)*(IF((2*p0320-1)<0;-1;IF((2*p0320-1)>0;1;0))*SQRT(SQRT((2/(pi()*0.140012289)+LN(1-(2*p0320-1)^2)/2)^2-LN(1-(2*p0320-1)^2)/0.140012289)-(2/(pi()*0.140012289)+LN(1-(2*p0320-1)^2)/2)))
- p2175: 0.000124615; = p0895*p0908/p0818
- p1908: 0
- p0862: 0; = p0674*1000/p0856
- p1593: 0
- p5028: 4.34486e-7; = p1855*p3483
- p4738: 0; = p1771*p3482
- p2058: 1.24412
- p2121: 0.822447
- p0259: 9.907
- p2010: 0.00254766; = ((p1984*p1985+p1990*p1991+p1996*p1997+p2004*p2005)/p0818)*p0005*p0002/1000
- p2428: 0; = p2236*p2218
- p0051: 41.957
- p3300: 0; = if(p1293+p1294+p1295+p1296=0;0;p1293/(p1293+p1294+p1295+p1296))
- p1815: 0
- p2649: 0.000165918; = p2258*(p1078+p1080)
- p2430: 0; = p2236*p2220
- p2276: 0.0021765; = p2223*p2182
- p0287: 0.5
- p2042: 0.07
- p2711: 5.13417e-6; = p2320*(p1019+p1021)
- p2125: 6.04475e-7; = p2015*p2053*p2087/(p0818*1000)
- p1870: 4.69708e-8; = p1462*1000/p0818
- p1655: 0
- p2522: 0.000376081; = p2326*p1014
- p2631: 1.56007e-5; = p2240*(p1019+p1021)
- p1656: 0
- p3320: 2.75529e6; = if(and(p1232=0;p3253<>0);p3253*(p3264-p3315)/p3316;0)
- p0268: 0
- p1247: 5.54655e-6; = if(p1232>0;0;p1242*p0001/(p0818*p0002))
- p2319: 0.000160523; = p2224*p2186
- p2367: 0.00565347; = p2225*p2196
- p0056: 90.362
- p3184: 0; = p2403*p1023
- p2841: 8.23017e-5; = p2255*(p1020+p1022)
- p2407: 0; = p2234*p2197
- p0229: 44.497
- p3312: 0.1394; = if(and(p1232=0;p3253<>0);p3261*p3277*(p3298*p3290+(1-p3298)*p3294);0)
- p2800: 0; = p2409*(p1019+p1021)
- p3268: 0.0232481
- p1242: 264711; = if(p1232>0;0;p1234*(p0725/100)*p0723*1000)
- p5150: 2.25525e-6; = p1771*p3484
- p0918: 0.311074; = p0680*1000/p0801
- p2921: 9.89433e-5; = p2335*(p1020+p1022)
- p2967: 6.69252e-7; = p2381*(p1079+p1081)
- p0067: 31.321
- p2390: 0.000287163; = p2233*p2219
- p2248: 0.00103891; = p2222*p2193
- p0622: 0; = IF(p0358<0.5;-SQRT(p0007*EXP(p0490^2*p0008)-p0007);SQRT(p0007*EXP(p0490^2*p0008)-p0007))
- p1988: 750
- p2092: 0.54529
- p4809: 0; = p1842*p3482
- p1612: 0
- p1614: 0
- p0135: 145.744
- p1226: 5.8e6; = IF(p1221=0;0;IF(p1193=0;p0801;0))
- p0055: 20.003
- p3374: 0.00322867; = if(p1232=0;p3246*p3356/p0818;0)
- p1973: 0; = if(p0807=480;p1968*p0001/(p0818*p0002);0)
- p0883: 0.00532212; = p0882*p0001*p0003/(p0818*p0002)
- p3362: 0; = if(p1232=0;p3244*p3356/p0818;0)
- p2419: 0; = p2235*p2209
- p2454: 0.000255765; = p2258*p1073
- p1085: 608357; = IF(p1071=0;p1079*(p0710/100)*p0703*1000;0)
- p1303: 0; = p1297*p1252/p0818
- p1850: 0
- p3601: 3.02229e-9; = p1870*p3476
- p4258: 9.5811e-8; = p1909*p3479
- p0322: 0.5
- p1117: 0.00104288; = IF(p1071=0;p1107/(p1112*p0818);0)
- p1306: 0; = p1302*p1252/p0818
- p2962: 7.74401e-6; = p2376*(p1079+p1081)
- p1882: 0
- p4962: 1.23839e-7; = p1789*p3483
- p3244: 0; = p0791/100
- p3392: 0; = p3373*p1234
- p0765: 74.429; = p0105*(1+p0633*p0237/100)
- p3241: 1.91218e-10; = p3234*p1188*p3236/p0818
- p1101: 0.0625488; = IF(p1071=0;IF(p1096=1;0;IF(p1096+p1097>1;1-p1096;p1097));0)
- p0745: 17274.6; = p0085*(1+p0613*p0217/100)
- p3052: 0; = p2271*p1082
- p1765: 8.53225e-5; = p1357*1000/p0818
- p0253: 49.306
- p3010: 0; = p2424*(p1079+p1081)
- p3339: 9.80181e7; = if(and(p1232=0;p3254<>0);p3254*(p3269*p3277-p3334)/p3338;0)
- p3299: 0; = if(p1303+p1304+p1305+p1306=0;0;p1303/(p1303+p1304+p1305+p1306))
- p2729: 8.35105e-5; = p2338*(p1078+p1080)
- p4565: 2.94727e-9; = p1804*p3481
- p2128: 4.0304e-7; = p2015*p2056*p2090/(p0818*1000)
- p0544: 0; = IF(p0280<0.5;-SQRT(p0007*EXP(p0412^2*p0008)-p0007);SQRT(p0007*EXP(p0412^2*p0008)-p0007))
- p2455: 0.00023132; = p2259*p1073
- p2387: 8.76568e-7; = p2229*p2216
- p0402: 0.5
- p3136: 0; = p2355*p1023
- p1269: 0
- p1078: 0.17582; = IF(p1071=0;IF(p1073=1;0;IF(p1073+p1074>1;1-p1073;p1074));0)
- p3091: 0; = p2310*p1082
- p2260: 0.000178534; = p2226*p2206
- p1291: 0; = IF(p1287+p1290=p1264;0;IF(p1287+p1290+p1289>p1264;p1264-(p1287+p1290);p1289))
- p1603: 0
- p1774: 0
- p1968: 0; = if(p0807=480;p0802*p0811;0)
- p2154: 6.1454e-8; = p2015*p2082*p2116/(p0818*1000)
- p0071: 6.559
- p2285: 3.98205e-5; = p2223*p2191
- p2462: 1.32361e-6; = p2266*p1073
- p2651: 4.85933e-5; = p2260*(p1078+p1080)
- p2910: 4.59217e-6; = p2324*(p1020+p1022)
- p2063: 2.01468
- p1943: 0
- p3143: 0; = p2362*p1023
- p0007: 14; = p0006-1
- p3027: 0; = p2246*p1023
- p0270: 1.408
- p1845: 0
- p2307: 5.69042e-5; = p2227*p2214
- p3670: 3.02229e-8; = p1939*p3476
- p1041: 0.317801
- p2856: 5.92974e-6; = p2270*(p1079+p1081)
- p2090: 0.40001
- p0754: 3179.29; = p0094*(1+p0622*p0226/100)
- p0820: 0; = if(p0807=480;p0814;0)
- p2507: 0.000454732; = p2311*p1123
- p0256: 7.129
- p3838: 0; = p1901*p3477
- p2835: 6.25683e-5; = p2249*(p1020+p1022)
- p0977: 0; = IF(p0687=0;IF(OR(p0686=0;p0688=0);0;p0686*1000*p0688/100);0)
- p0774: 52.774; = p0114*(1+p0642*p0246/100)
- p2598: 0; = p2402*p1014
- p2477: 2.79631e-5; = p2281*p1014
- p0193: 41.771
- p2653: 6.64198e-5; = p2262*(p1078+p1080)
- p2811: 0; = p2420*(p1078+p1080)
- p0667: 0; = IF(p0403<0.5;-SQRT(p0007*EXP(p0535^2*p0008)-p0007);SQRT(p0007*EXP(p0535^2*p0008)-p0007))
- p0403: 0.5
- p0944: 0; = if(and(p0683=0;p0950=0);p0938;0)
- p2031: 0.465411
- p0018: 1327.28
- p0969: 8.39851e7; = p0966*p0964*p0683*p0682*1000
- p1843: 0
- p0729: 0
- p1190: 3.42473e-8; = p1188/p0818
- p3833: 0; = p1896*p3477
- p3426: 0; = p3369*p1239
- p1330: 0; = p1320*p0801
- p3895: 0; = p1962*p3477
- p0383: 0.5
- p1048: 0.000645242; = IF(p1012=0;IF(p1037+p1044+p1045+p1046+p1047=1;0;IF(p1037+p1044+p1045+p1046+p1047+p1042>1;1-(p1037+p1044+p1045+p1046+p1047);p1042));0)
- p3529: 3.92898e-8; = p1798*p3476
- p1198: 0.44
- p1974: 2.09532e-6; = p1969*p0001/(p0818*p0002)
- p1231: 0.0140515; = IF(p1221=0;0;p1230*(p1228+p1229))
- p1820: 0
- p1010: 0; = p0890
- p2467: 7.23376e-5; = p2271*p1073
- p0104: 100
- p0644: 0; = IF(p0380<0.5;-SQRT(p0007*EXP(p0512^2*p0008)-p0007);SQRT(p0007*EXP(p0512^2*p0008)-p0007))
- p1033: 2.08568e-5; = IF(p1012=0;p1027*p0001/(p0818*p0002);0)
- p2794: 0; = p2403*(p1019+p1021)
- p2403: 0; = p2234*p2192
- p1690: 0
- p5168: 1.8863e-8; = p1789*p3484
- p4883: 0; = p1916*p3482
- p2360: 0.00104168; = p2225*p2188
- p1704: 0
- p0782: 90.362; = p0122*(1+p0650*p0254/100)
- p1676: 0
- p1881: 0
- p0517: 0; = SQRT(2)*(IF((2*p0385-1)<0;-1;IF((2*p0385-1)>0;1;0))*SQRT(SQRT((2/(pi()*0.140012289)+LN(1-(2*p0385-1)^2)/2)^2-LN(1-(2*p0385-1)^2)/0.140012289)-(2/(pi()*0.140012289)+LN(1-(2*p0385-1)^2)/2)))
- p4732: 0; = p1765*p3482
- p2931: 1.74753e-5; = p2345*(p1079+p1081)
- p0551: 0; = IF(p0287<0.5;-SQRT(p0007*EXP(p0419^2*p0008)-p0007);SQRT(p0007*EXP(p0419^2*p0008)-p0007))
- p2373: 0.000108273; = p2225*p2202
- p2271: 0.000172409; = p2226*p2217
- p0823: 0.35
- p1861: 0
- p1157: 0.260052
- p0570: 0; = IF(p0306<0.5;-SQRT(p0007*EXP(p0438^2*p0008)-p0007);SQRT(p0007*EXP(p0438^2*p0008)-p0007))
- p4471: 0; = p1916*p3480
- p2531: 0.000174967; = p2335*p1014
- p0578: 0; = IF(p0314<0.5;-SQRT(p0007*EXP(p0446^2*p0008)-p0007);SQRT(p0007*EXP(p0446^2*p0008)-p0007))
- p1934: 0
- p1987: 400
- p1997: 1.57613e9; = (if(p1152=0;0;p1150/p1152)+if(p1153=0;0;p1151/p1153))*(1+p1157)
- p3118: 0; = p2337*p1082
- p2495: 7.29273e-5; = p2299*p1073
- p1793: 9.32371e-6; = p1385*1000/p0818
- p0459: 0; = SQRT(2)*(IF((2*p0327-1)<0;-1;IF((2*p0327-1)>0;1;0))*SQRT(SQRT((2/(pi()*0.140012289)+LN(1-(2*p0327-1)^2)/2)^2-LN(1-(2*p0327-1)^2)/0.140012289)-(2/(pi()*0.140012289)+LN(1-(2*p0327-1)^2)/2)))
- p4926: 0; = p1963*p3482
- p1302: 0; = IF(p1297+p1300+p1301=p1262;0;p1262-(p1297+p1300+p1301))
- p2402: 0; = p2234*p2191
- p0237: 14.188
- p0868: 0; = IF(p0858+p0864+p0865+p0866+p0867=1;0;IF(p0858+p0864+p0865+p0866+p0867+p0863>1;1-(p0858+p0864+p0865+p0866+p0867);p0863))
- p2026: 53.05
- p2406: 0; = p2234*p2196
- p0045: 49.682
- p1609: 0
- p0419: 0; = SQRT(2)*(IF((2*p0287-1)<0;-1;IF((2*p0287-1)>0;1;0))*SQRT(SQRT((2/(pi()*0.140012289)+LN(1-(2*p0287-1)^2)/2)^2-LN(1-(2*p0287-1)^2)/0.140012289)-(2/(pi()*0.140012289)+LN(1-(2*p0287-1)^2)/2)))
- p1020: 0.03217; = IF(p1012=0;IF(p1014+p1019=1;0;IF(p1014+p1019+p1016>1;1-(p1014+p1019);p1016));0)
- p1993: 400
- p3418: 0.0214795; = p3380*p1238
- p1287: 0
- p0817: 0
- p3276: 0.0887032
- p2162: 7.90219e-9; = p2015*p2086*p2124/(p0818*1000)
- p3187: 0; = p2406*p1023
- p1227: 0.000121529; = IF(p1221=0;0;p1226*p0001/(p0818*p0002))
- p2076: 0.057
- p2825: 5.72599e-6; = p2239*(p1020+p1022)
- p1984: 30
- p2405: 0; = p2234*p2195
- p0959: 0; = if(and(p0683>0;or(p0807=480;p0807=32;p0807=1;and(p0807=60;p0901<0.03)));p0935;0)
- p0368: 0.5
- p1165: 0.000121529; = p0801*p0001/(p0818*p0002)
- p1132: 0; = if(p1121=0;IF(p1123+p1128+p1129+p1130+p1131=1;0;1-(p1123+p1128+p1129+p1130+p1131));0)
- p3735: 0; = p1798*p3477
- p1326: 0.315178; = IF(((p0745*1000*p0753/100)+(p0754*1000*p0762/100))/p0801<0;0;((p0745*1000*p0753/100)+(p0754*1000*p0762/100))/p0801)
- p1100: 0.261145
- p4662: 4.51915e-8; = p1901*p3481
- p2539: 0.000449905; = p2343*p1073
- p2564: 2.69126e-6; = p2368*p1014
- p1975: 0.000121529; = p1970*p0001/(p0818*p0002)
- p5082: 4.40783e-8; = p1909*p3483
- p0116: 40.467
- p2534: 0.000128733; = p2338*p1073
- p0846: 0.447012; = p0841*p0845^3+p0842*p0845^2+p0843*p0845+p0844
- p3012: 0; = p2426*(p1079+p1081)
- p2644: 1.69159e-6; = p2253*(p1019+p1021)
- p1199: -0.29
- p2772: 5.90939e-7; = p2381*(p1078+p1080)
- p3807: 0; = p1870*p3477
- p2181: 0.0686094; = p0887+p0889+p0893+p2180
- p0730: 16.857; = p0070*(1+p0598*p0202/100)
- p4777: 0; = p1810*p3482
- p2202: 0.000255993; = 4*1.00794*p2201/(2*14.0067)
- p3078: 0; = p2297*p1082
- p2766: 7.56044e-6; = p2375*(p1078+p1080)
- p1134: 1.66918e6; = if(p1121=0;p1128*(p0716/100)*p0703*1000;0)
- p1390: 26
- p2437: 0.000109454; = p2241*p1014
- p2219: 0.015588; = p1154-p2218
- p0180: 34.104
- p1629: 0
- p5146: 7.80099e-8; = p1767*p3484
- p0406: 0; = SQRT(2)*(IF((2*p0274-1)<0;-1;IF((2*p0274-1)>0;1;0))*SQRT(SQRT((2/(pi()*0.140012289)+LN(1-(2*p0274-1)^2)/2)^2-LN(1-(2*p0274-1)^2)/0.140012289)-(2/(pi()*0.140012289)+LN(1-(2*p0274-1)^2)/2)))
- p3114: 0; = p2333*p1023
- p2326: 0.000756977; = p2224*p2193
- p2496: 0.00060551; = p2300*p1073
- p1935: 0
- p3360: 2.06608e8; = if(p1232=0;p3310+p3321+p3332+p3343+p3354;0)
- p2303: 4.63873e-5; = p2227*p2210
- p0794: 0
- p0640: 0; = IF(p0376<0.5;-SQRT(p0007*EXP(p0508^2*p0008)-p0007);SQRT(p0007*EXP(p0508^2*p0008)-p0007))
- p3221: 0.146975; = IF(p3216=0;0;p1223*12.0107/100.0869+(1-p1224)*12.0107/84.3139)
- p2040: 1.19
- p0387: 0.5
- p1955: 0
- p3029: 0; = p2248*p1023
- p2538: 3.4356e-5; = p2342*p1073
- p2686: 1.66316e-5; = p2295*(p1019+p1021)
- p0830: 2.41718e10; = p0825*p0821*p0824
- p3747: 0; = p1810*p3477
- p2131: 1.26695e-7; = p2015*p2059*p2093/(p0818*1000)
- p0813: 0; = if(p0807=480;1.56521739130435;0)
- p2172: 0.164074; = p2166-(p2167+p2168+p2169+p2170)
- p2401: 0; = p2234*p2190
- p0970: 0.000102409; = p0967/p0818
- p1014: 0.49682; = IF(p1012=0;p0705/100;0)
- p0991: 0; = p0987*p0886
- p2231: 0.467206; = if(p0783*p0787+p0784*p0788+p0785*p0789+p0786*p0790=0;0;p0788*p0784/(p0783*p0787+p0784*p0788+p0785*p0789+p0786*p0790))
- p1501: 21
- p1763: 0
- p1532: 946
- p3288: 0.505
- p0863: 0; = p0675*1000/p0856
- p1118: 0.000716313; = IF(p1071=0;p1108/(p1113*p0818);0)
- p1611: 0
- p1168: 5.8685e-7; = p1164*p1167/p0818
- p0082: 97.971
- p0260: 11.268
- p1189: 0.000121529; = p0801*p0001/(p0818*p0002)
- p2738: 0.000103173; = p2347*(p1078+p1080)
- p2341: 0.000189648; = p2228*p2209
- p0244: 13.876
- p2029: 4.97
- p3014: 0; = p2428*(p1129+p1131)
- p3429: 0; = p3372*p1239
- p2953: 0.00158834; = p2367*(p1020+p1022)
- p2461: 0.000261792; = p2265*p1073
- p4940: 5.12148e-7; = p1767*p3483
- p1981: 400
- p0011: 5062.43
- p1835: 0
- p4102: 0.000155955; = p1963*p3478
- p0949: 0; = if(and(p0683=0;or(p0807=480;p0807=32;p0807=1;and(p0807=60;p0901<0.03)));p0937;0)
- p1260: 0.06559; = if(p1232>0;0;p0731/100)
- p2927: 5.84589e-5; = p2341*(p1079+p1081)
- p3417: 8.02922e-5; = p3379*p1238
- p0475: 0; = SQRT(2)*(IF((2*p0343-1)<0;-1;IF((2*p0343-1)>0;1;0))*SQRT(SQRT((2/(pi()*0.140012289)+LN(1-(2*p0343-1)^2)/2)^2-LN(1-(2*p0343-1)^2)/0.140012289)-(2/(pi()*0.140012289)+LN(1-(2*p0343-1)^2)/2)))
- p1697: 0.705252
- p2067: 0.446471
- p2028: 1.10255e-5; = p2015*p2026*p2027/(p0818*1000)
- p2239: 2.03808e-5; = p2222*p2184
- p0315: 0.5
- p1566: 0
- p0852: 0.365262; = p0847*p0851^3+p0848*p0851^2+p0849*p0851+p0850
- p1958: 19384
- p0412: 0; = SQRT(2)*(IF((2*p0280-1)<0;-1;IF((2*p0280-1)>0;1;0))*SQRT(SQRT((2/(pi()*0.140012289)+LN(1-(2*p0280-1)^2)/2)^2-LN(1-(2*p0280-1)^2)/0.140012289)-(2/(pi()*0.140012289)+LN(1-(2*p0280-1)^2)/2)))
- p2908: 1.59536e-5; = p2322*(p1020+p1022)
- p1705: 0.453667
- p0103: 5798.99
- p2583: 3.67782e-7; = p2387*p1073
- p1131: 0.12579; = if(p1121=0;IF(p1123+p1128+p1129+p1130=1;0;IF(p1123+p1128+p1129+p1130+p1127>1;1-(p1123+p1128+p1129+p1130);p1127));0)
- p0451: 0; = SQRT(2)*(IF((2*p0319-1)<0;-1;IF((2*p0319-1)>0;1;0))*SQRT(SQRT((2/(pi()*0.140012289)+LN(1-(2*p0319-1)^2)/2)^2-LN(1-(2*p0319-1)^2)/0.140012289)-(2/(pi()*0.140012289)+LN(1-(2*p0319-1)^2)/2)))
- p2190: 0.000541639; = 32.065*p2189/(2*14.0067)
- p1255: 0; = if(p1232>0;0;p0737/100)
- p1810: 3.64024e-6; = p1402*1000/p0818
- p2220: 0.000996167; = p1151/p0818
- p3088: 0; = p2307*p1082
- p2605: 0; = p2409*p1014
- p1963h: 1.07111e-6; = p1686*p1890+p1687*p1891+p1688*p1892+p1689*p1893+p1690*p1894+p1691*p1895+p1692*p1896+p1693*p1897+p1694*p1898+p1695*p1899+p1696*p1900+p1697*p1901+p1698*p1902+p1699*p1903+p1700*p1904+p1701*p1905+p1702*p1906+p1703*p1907+p1704*p1908+p1705*p1909
- p3355: 0; = if(and(p1232=0;p3256<>0);p3256-(p3350+p3351+p3352+p3353+p3354);0)
- p3420: 0; = p3363*p1239
- p1728: 0
- p1567: 0.629912
- p0926: 0; = IF(p0918+p0923+p0924+p0925=1;0;IF(p0918+p0923+p0924+p0925+p0922>1;1-(p0918+p0923+p0924+p0925);p0922))
- p3462: 0; = p3367*p1241
- p1897: 0
- p2464: 2.45236e-5; = p2268*p1073
- p3086: 0; = p2305*p1082
- p1608: 0
- p0377: 0.5
- p0890: 0; = p0686*1000*p0687*p0885/100
- p3111: 0; = p2330*p1023
- p1335: 8.32578e-5; = p1334*p0001/(p0818*p0002)
- p0611: 0; = IF(p0347<0.5;-SQRT(p0007*EXP(p0479^2*p0008)-p0007);SQRT(p0007*EXP(p0479^2*p0008)-p0007))
- p0155: 0.865
- p0985: 0; = IF(p0982=1;0;IF(p0982+p0983>1;1-p0982;p0983))
- p0807: 56
- p0761: 0
- p2849: 3.40162e-5; = p2263*(p1079+p1081)
- p0359: 0.5
- p2493: 0.000249004; = p2297*p1073
- p1318: 0; = p1317*p0001/(p0818*p0002)
- p2810: 0; = p2419*(p1078+p1080)
- p1268: 0
- p2669: 8.03983e-6; = p2278*(p1019+p1021)
- p3043: 0; = p2262*p1082
- p1925: 0
- p1807: 0
- p0049: 24.878
- p2984: 0; = p2398*(p1020+p1022)
- p3394: 0.000483879; = p3375*p1234
- p2520: 8.1206e-6; = p2324*p1014
- p2750: 1.80958e-5; = p2359*(p1019+p1021)
- p1245: 0; = if(p1232>0;0;p1240*(p0725/100)*p0723*1000)
- p5275: 2.5577e-9; = p1896*p3484
- p1113: 0.100377
- p2006: 0.319694; = ((p1980*p1985+p1986*p1991+p1992*p1997+p2000*p2005)/p0818)*p0005*p0002/1000
- p0829: 0; = if(p0807=480;p0814*(1-p0824);0)
- p1179: 0.5
- p2436: 3.4877e-5; = p2240*p1014
- p2863: 0.000134229; = p2277*(p1020+p1022)
- p2022: 8.33069e-5; = p2018*p2015/p0818-p2021
- p2823: 0.000344481; = p2237*(p1020+p1022)
- p2251: 2.10933e-6; = p2222*p2197
- p2273: 0.00699951; = p2230*p2219
- p2134: 8.87818e-7; = p2015*p2062*p2096/(p0818*1000)
- p0463: 0; = SQRT(2)*(IF((2*p0331-1)<0;-1;IF((2*p0331-1)>0;1;0))*SQRT(SQRT((2/(pi()*0.140012289)+LN(1-(2*p0331-1)^2)/2)^2-LN(1-(2*p0331-1)^2)/0.140012289)-(2/(pi()*0.140012289)+LN(1-(2*p0331-1)^2)/2)))
- p3361: 1.09154e7; = if(p1232=0;p3311+p3322+p3333+p3344+p3355;0)
- p1000: 0; = IF(p0996+p0999=1;0;IF(p0996+p0999+p0998>1;1-(p0996+p0999);p0998))
- p2020: 534964; = p2015*p2018*p2019
- p1191: 0.5
- p1689: 0
- p3193: 0; = p2412*p1023
- p3185: 0; = p2404*p1023
- p1671: 0
- p0239: 8.681
- p0699: 0
- p1894: 0
- p2709: 1.1367e-5; = p2318*(p1019+p1021)
- p3257: 0.849747
- p1963: 0.000261419; = p1963a+p1963b+p1963c+p1963d+p1963e+p1963f+p1963g+p1963h+p1963i+p1963j+p1963k
- p2242: 3.17076e-5; = p2222*p2187
- p4072: 2.95627e-6; = p1929*p3478
- p0534: 0; = SQRT(2)*(IF((2*p0402-1)<0;-1;IF((2*p0402-1)>0;1;0))*SQRT(SQRT((2/(pi()*0.140012289)+LN(1-(2*p0402-1)^2)/2)^2-LN(1-(2*p0402-1)^2)/0.140012289)-(2/(pi()*0.140012289)+LN(1-(2*p0402-1)^2)/2)))
- p2861: 0.000448011; = p2275*(p1129+p1131)
- p3411: 0; = p3373*p1238
- p0460: 0; = SQRT(2)*(IF((2*p0328-1)<0;-1;IF((2*p0328-1)>0;1;0))*SQRT(SQRT((2/(pi()*0.140012289)+LN(1-(2*p0328-1)^2)/2)^2-LN(1-(2*p0328-1)^2)/0.140012289)-(2/(pi()*0.140012289)+LN(1-(2*p0328-1)^2)/2)))
- p3203: 0; = p2422*p1082
- p0723: 5799.18; = p0063*(1+p0591*p0195/100)
- p2890: 0.000187249; = p2304*(p1079+p1081)
- p1060: 0.21
- p0872: 5.06243e6; = p0864*p0856
- p1007: 0; = p1003*p0001*p0004/(p0818*p0002)
- p1782: 0
- p2883: 0.000182939; = p2297*(p1079+p1081)
- p1592: 0
- p0941: 0; = if(and(p0683=0;p0947=0);p0935;0)
- p2898: 0.00419751; = p2312*(p1129+p1131)
- p1929: 4.95542e-6; = p1521*1000/p0818
- p2662: 4.69263e-5; = p2271*(p1078+p1080)
- p3846: 0; = p1909*p3477
- p1805: 0
- p0908: 0.000997792
- p4719: 1.25882e-7; = p1962*p3481
- p3388: 0; = p3369*p1234
- p2370: 1.9548e-5; = p2225*p2199
- p0154: 0
- p2304: 0.000607459; = p2227*p2211
- p3708: 0; = p1771*p3477
- p1125: 0.45057; = if(p1121=0;p0719/100;0)
- p1197: 1.806
- p2713: 1.26192e-5; = p2322*(p1019+p1021)
- p3483: 0.0893732; = if(p1328+p1330+p1332+p1334+p1336+p1338+p1340+p1342+p1344=0;0;p1342/(p1328+p1330+p1332+p1334+p1336+p1338+p1340+p1342+p1344))
- p1707: 0
- p2528: 0.000247347; = p2332*p1014
- p2787: 0; = p2396*(p1019+p1021)
- p1688: 0
- p3324: 0; = if(and(p1232=0;p3255<>0);p3266*(p3279*(p3284*p1256+p3286*(p1253+p1257)+p1258*p3288+p3299*p3287));0)
- p2708: 3.30011e-6; = p2317*(p1019+p1021)
- p0127: 42.803
- p1109: 9.70158e7; = IF(p1071=0;p1105*p1103*p1095;0)
- p3347: 0; = if(and(p1232=0;p3256<>0);p3275*p3289;0)
- p2673: 0.000160011; = p2282*(p1019+p1021)
- p1142: 1.87862e-6; = if(p1121=0;p1136*p0001/(p0818*p0002);0)
- p0267: 3.843
- p1570: 0
- p1979: 9.841e7; = p0973
- p1711: 0
- p0089: 23.002
- p4191: 4.56243e-8; = p1842*p3479
- p3176: 0; = p2395*p1023
- p2171: 0.176365; = p2165*p0831
- p1177: 0.000121529; = p0801*p0001/(p0818*p0002)
- p1884: 0
- p1860: 0
- p1072: 0; = p1071*p0001/(p0818*p0002)
- p1317: 0
- p2613: 0; = p2417*p1073
- p1670: 0
- p2269: 0.000220569; = p2226*p2215
- p5338: 3.55876e-6; = p1963*p3484
- p1602: 0
- p3005: 0; = p2419*(p1079+p1081)
- p0064: 4.17
- p2441: 4.4319e-5; = p2245*p1014
- p0962: 0; = if(and(p0683>0;or(p0807=480;p0807=32;p0807=1;and(p0807=60;p0901<0.03)));p0938;0)
- p1079: 0.10822; = IF(p1071=0;IF(p1073+p1078=1;0;IF(p1073+p1078+p1075>1;1-(p1073+p1078);p1075));0)
- p1075: 0.10822; = IF(p1071=0;p0713/100;0)
- p1863: 0
- p0936: 1.91005e-5; = p0930*p0001/(p0818*p0002)
- p1193: 0; = IF(OR(p1036=0;p1095=0);0.0001*p0857;0)
- p3259: 0.00796296
- p1915: 0
- p3004: 0; = p2418*(p1079+p1081)
- p4288: 9.12486e-8; = p1939*p3479
- p4444: 0; = p1889*p3480
- p2459: 4.63007e-5; = p2263*p1073
- p1139: 9.66102e-6; = if(p1121=0;p1133*p0001/(p0818*p0002);0)
- p0370: 0.5
- p2543: 0.000159043; = p2347*p1073
- p1114: 0.216028
- p2297: 0.000593475; = p2227*p2204
- p0538: 0; = IF(p0274<0.5;-SQRT(p0007*EXP(p0406^2*p0008)-p0007);SQRT(p0007*EXP(p0406^2*p0008)-p0007))
- p1342: 1.82803e6; = p1326*p0801
- p2340: 0.000419378; = p2228*p2208
- p4451: 0; = p1896*p3480
- p3372: 0; = if(p1232=0;p3245*p3360/p0818;0)
- p3293: 0.3875
- p1747: 0
- p2988: 0; = p2402*(p1020+p1022)
- p2153: 7.88551e-10; = p2015*p2081*p2115/(p0818*1000)
- p3354: 0; = IF((p3350+p3351+p3352+p3353)+IF(p3349=0;0;(p3256*(p3273*(1-p3277))/p3349))>p3256;p3256-(p3350+p3351+p3352+p3353);IF(p3349=0;0;p3256*(p3273*(1-p3277))/p3349))
- p2833: 5.1004e-5; = p2247*(p1020+p1022)
- p2699: 5.84475e-5; = p2308*(p1078+p1080)
- p0277: 0.5
- p5181: 3.49126e-7; = p1802*p3484
- p0350: 0.5
- p4359: 0; = p1804*p3480
- p2640: 4.94912e-5; = p2249*(p1019+p1021)
- p3397: 0.00320997; = p3378*p1234
- p2792: 0; = p2401*(p1019+p1021)
- p1755: 0
- p2330: 2.5226e-6; = p2224*p2198
- p2230: 0.449034; = if(p0783*p0787+p0784*p0788+p0785*p0789+p0786*p0790=0;0;p0787*p0783/(p0783*p0787+p0784*p0788+p0785*p0789+p0786*p0790))
- p2079: 0.02
- p2256: 4.21608e-5; = p2222*p2202
- p1169: 0.000508261
- p0575: 0; = IF(p0311<0.5;-SQRT(p0007*EXP(p0443^2*p0008)-p0007);SQRT(p0007*EXP(p0443^2*p0008)-p0007))
- p2283: 0.00013834; = p2223*p2189
- p1038: 0.00623446
- p3106: 0; = p2325*p1023
- p5243: 3.19713e-10; = p1864*p3484
- p2619: 0; = p2423*p1073
- p3331: 0; = if(and(p1232=0;p3255<>0);p3255*(p3268-p3326)/p3327;0)
- p1963f: 1.51532e-6; = p1647*p1851+p1648*p1852+p1649*p1853+p1650*p1854+p1651*p1855+p1652*p1856+p1653*p1857+p1654*p1858+p1655*p1859+p1656*p1860+p1657*p1861+p1658*p1862+p1659*p1863+p1660*p1864+p1661*p1865+p1662*p1866+p1663*p1867+p1664*p1868+p1665*p1869+p1666*p1870
- p3223: 0.126838; = IF(p3216=0;0;(1-p1223)*24.3050/84.3139)
- p2950: 0.000130983; = p2364*(p1020+p1022)
- p4120: 3.21834e-5; = p1771*p3479
- p3033: 0; = p2252*p1023
- p3028: 0; = p2247*p1023
- p1216: 0.155559
- p3573: 1.51115e-8; = p1842*p3476
- p3146: 0; = p2365*p1023
- p1896: 1.87883e-7; = p1488*1000/p0818
- p4138: 2.69183e-7; = p1789*p3479
- p2064: 0.676706
- p0945: 0; = if(and(p0683=0;p0951=0);p0939;0)
- p0373: 0.5
- p2517: 0.000146834; = p2321*p1014
- p0136: 100
- p0703: 5798.99; = p0043*(1+p0571*p0175/100)
- p3055: 0; = p2274*p1132
- p3030: 0; = p2249*p1023
- p2674: 3.07433e-5; = p2283*(p1019+p1021)
- p0598: 0; = IF(p0334<0.5;-SQRT(p0007*EXP(p0466^2*p0008)-p0007);SQRT(p0007*EXP(p0466^2*p0008)-p0007))
- p1617: 0
- p4013: 2.80215e-8; = p1870*p3478
- p0587: 0; = IF(p0323<0.5;-SQRT(p0007*EXP(p0455^2*p0008)-p0007);SQRT(p0007*EXP(p0455^2*p0008)-p0007))
- p4699: 5.59981e-8; = p1938*p3481
- p0767: 21.205; = p0107*(1+p0635*p0239/100)
- p0798: 96.939; = p0138*(1+p0666*p0270/100)
- p0937: 3.67963e-5; = p0931*p0001/(p0818*p0002)
- p0248: 7.534
- p3141: 0; = p2360*p1023
- p1099: 0.652345
- p2480: 7.86706e-5; = p2284*p1014
- p3422: 0; = p3365*p1239
- p3140: 0; = p2359*p1023
- p1952: 0
- p1084: 988370; = IF(p1071=0;p1078*(p0710/100)*p0703*1000;0)
- p2214: 0.000218465; = p1107/p0818
- p3154: 0; = p2373*p1023
- p0940: 0; = if(and(p0683=0;p0946=0);p0934;0)
- p2115: 0.856281
- p0873: 1.06074; = p0872*p0001*p0003/(p0818*p0002)
- p3826: 0; = p1889*p3477
- p1898: 0
- p2476: 0.000194292; = p2280*p1014
- p2795: 0; = p2404*(p1019+p1021)
- p3258: 0.0491162
- p4044: 6.44494e-7; = p1901*p3478
- p4526: 3.56914e-6; = p1765*p3481
- p2157: 2.03283e-8; = p2015*p2086*p2119/(p0818*1000)
- p1641: 0
- p0571: 0; = IF(p0307<0.5;-SQRT(p0007*EXP(p0439^2*p0008)-p0007);SQRT(p0007*EXP(p0439^2*p0008)-p0007))
- p2891: 9.46729e-7; = p2305*(p1079+p1081)
- p1733: 0
- p3453: 0; = p3377*p1240
- p1152: 0.415074
- p0106: 80.794
- p2676: 8.84932e-6; = p2285*(p1019+p1021)
- p3192: 0; = p2411*p1023
- p1757: 0
- p2982: 0; = p2396*(p1020+p1022)
- p1074: 0.17582; = IF(p1071=0;p0712/100;0)
- p3322: 0; = if(and(p1232=0;p3253<>0);p3253-(p3317+p3318+p3319+p3320+p3321);0)
- p1856: 0
- p4966: 8.3329e-7; = p1793*p3483
- p2954: 1.5219e-6; = p2368*(p1020+p1022)
- p2579: 6.03136e-8; = p2383*p1073
- p0190: 22.308
- p1777: 0
- p3231: 1.33078e-8; = p1176/p0818
- p1258: 1; = if(p1232>0;0;IF(p1253+p1256+p1257=1;0;1-(p1253+p1256+p1257)))
- p2964: 2.08213e-5; = p2378*(p1079+p1081)
- p3273: 0.753577
- p3122: 0; = p2341*p1082
- p2744: 3.79638e-5; = p2353*(p1128+p1130)
- p0808: 1.7e6
- p1123: 0.08799; = if(p1121=0;p0717/100;0)
- p2596: 0; = p2400*p1014
- p3084: 0; = p2303*p1082
- p1098: 0.020586
- p0919: 0.228842; = p0678*1000/p0801
- p2573: 3.41333e-6; = p2377*p1073
- p2625: 0; = p2429*p1123
- p2257: 0.00048334; = p2222*p2203
- p3182: 0; = p2401*p1023
- p1363: 7054
- p0462: 0; = SQRT(2)*(IF((2*p0330-1)<0;-1;IF((2*p0330-1)>0;1;0))*SQRT(SQRT((2/(pi()*0.140012289)+LN(1-(2*p0330-1)^2)/2)^2-LN(1-(2*p0330-1)^2)/0.140012289)-(2/(pi()*0.140012289)+LN(1-(2*p0330-1)^2)/2)))
- p2615: 0; = p2419*p1073
- p2234: 0; = 1-(p2222+p2223+p2224+p2225)
- p0111: 82.478
- p2817: 0; = p2426*(p1078+p1080)
- p1049: 0.209016; = IF(p1012=0;IF(p1037+p1044+p1045+p1046+p1047+p1048=1;0;1-(p1037+p1044+p1045+p1046+p1047+p1048));0)
- p3496: 5.49e-6; = p1765*p3476
- p0741: 3.156; = p0081*(1+p0609*p0213/100)
- p1153: 0.365265
- p1827: 0
- p0616: 0; = IF(p0352<0.5;-SQRT(p0007*EXP(p0484^2*p0008)-p0007);SQRT(p0007*EXP(p0484^2*p0008)-p0007))
- p1652: 0
- p2150: 4.85582e-8; = p2015*p2078*p2112/(p0818*1000)
- p0353: 0.5
- p1026: 186554; = IF(p1012=0;p1020*(p0704/100)*p0703*1000;0)
- p0903: 0.0106556
- p1044: 0.00623446; = IF(p1012=0;IF(p1037=1;0;IF(p1037+p1038>1;1-p1037;p1038));0)
- p1854: 0
- p1759: 0
- p1605: 0
- p3002: 0; = p2416*(p1079+p1081)
- p4307: 5.84602e-7; = p1962*p3479
- p0414: 0; = SQRT(2)*(IF((2*p0282-1)<0;-1;IF((2*p0282-1)>0;1;0))*SQRT(SQRT((2/(pi()*0.140012289)+LN(1-(2*p0282-1)^2)/2)^2-LN(1-(2*p0282-1)^2)/0.140012289)-(2/(pi()*0.140012289)+LN(1-(2*p0282-1)^2)/2)))
- p4938: 7.62555e-6; = p1765*p3483
- p0871: 0.12673; = p0870*p0001*p0003/(p0818*p0002)
- p0271: 4.669
- p2782: 6.15969e-6; = p2391*(p1128+p1130)
- p3217: 0.00274334; = p3213*p1228
- p3164: 0; = p2383*p1082
- p4114: 1.65753e-5; = p1765*p3479
- p1184: 1.90442e-8; = p1182/p0818
- p3368: 0; = if(p1232=0;p3245*p3356/p0818;0)
- p0762: 57.498; = p0102*(1+p0630*p0234/100)
- p2168: 0.00339853; = p2166*(p0903)
- p3401: 0; = p3363*p1238
- p1584: 0
- p2938: 3.75139e-5; = p2352*(p1129+p1131)
- p1936: 0
- p5221: 3.19713e-9; = p1842*p3484
- p1644: 0
- p1986: 4200
- p3053: 0; = p2272*p1132
- p3009: 0; = p2423*(p1079+p1081)
- p0716: 90.362; = p0056*(1+p0584*p0188/100)
- p3941: 3.64279e-7; = p1798*p3478
- p0066: 66.154
- p2523: 8.06174e-5; = p2327*p1014
- p3285: 0.275
- p0942: 0; = if(and(p0683=0;p0948=0);p0936;0)
- p1734: 0.7899
- p1173: 0.5
- p1681: 0
- p3089: 0; = p2308*p1082
- p2785: 0; = p2394*(p1019+p1021)
- p0506: 0; = SQRT(2)*(IF((2*p0374-1)<0;-1;IF((2*p0374-1)>0;1;0))*SQRT(SQRT((2/(pi()*0.140012289)+LN(1-(2*p0374-1)^2)/2)^2-LN(1-(2*p0374-1)^2)/0.140012289)-(2/(pi()*0.140012289)+LN(1-(2*p0374-1)^2)/2)))
- p3448: 0; = p3372*p1240
- p1105: 0.436421
- p2278: 3.61779e-5; = p2223*p2184
- p0989: 0; = p0985*p0886
- p0177: 15.937
- p3097: 0; = p2316*p1023
- p2377: 8.13531e-6; = p2229*p2206
- p0728: 0
- p3092: 0; = p2311*p1132
- p1650: 0
- p2815: 0; = p2424*(p1078+p1080)
- p1013: 0; = p1012*p0001/(p0818*p0002)
- p2560: 0.000231625; = p2364*p1014
- p1143: 1.38113e-5; = if(p1121=0;p1137*p0001/(p0818*p0002);0)
- p2124: 0.263965
- p2410: 0; = p2234*p2200
- p0128: 51.468
- p1217: 9.53097
- p2003: 50
- p1949: 0
- p2268: 5.84493e-5; = p2226*p2214
- p2245: 8.92054e-5; = p2222*p2190
- p5133: 5.81877e-8; = p1754*p3484
- p0448: 0; = SQRT(2)*(IF((2*p0316-1)<0;-1;IF((2*p0316-1)>0;1;0))*SQRT(SQRT((2/(pi()*0.140012289)+LN(1-(2*p0316-1)^2)/2)^2-LN(1-(2*p0316-1)^2)/0.140012289)-(2/(pi()*0.140012289)+LN(1-(2*p0316-1)^2)/2)))
- p2166: 0.318942; = p2165*p0824
- p1715: 0
- p0156: 40.031
- p1090: 2.07096e-5; = IF(p1071=0;p1084*p0001/(p0818*p0002);0)
- p2140: 6.86522e-8; = p2015*p2068*p2102/(p0818*1000)
- p3008: 0; = p2422*(p1079+p1081)
- p0088: 67.755
- p2435: 1.01256e-5; = p2239*p1014
- p0479: 0; = SQRT(2)*(IF((2*p0347-1)<0;-1;IF((2*p0347-1)>0;1;0))*SQRT(SQRT((2/(pi()*0.140012289)+LN(1-(2*p0347-1)^2)/2)^2-LN(1-(2*p0347-1)^2)/0.140012289)-(2/(pi()*0.140012289)+LN(1-(2*p0347-1)^2)/2)))
- p3524: 5.99925e-7; = p1793*p3476
- p5131: 2.68949e-7; = p1962*p3483
- p0834: 0.00038
- p0887: 0; = 1000*p0886*p0001*p0003*p0004/(p0818*p0002)
- p2743: 2.18467e-5; = p2352*(p1128+p1130)
- p3160: 0; = p2379*p1082
- p0835: 1467.32; = -LN(1-p0669/100)/p0834
- p1248: 2.62605e-6; = if(p1232>0;0;p1243*p0001/(p0818*p0002))
- p3230: 6.92331e-8; = p1170/p0818
- p1917: 0
- p0060: 1.711
- p3037: 0; = p2256*p1023
- p0899: 2.58695e10; = p0825*p0896+p0827*p0897+(p0830+p0895)*p0824*p0898
- p3432: 0; = p3375*p1239
- p2344: 5.42153e-6; = p2228*p2212
- p1838: 0
- p3094: 0; = p2313*p1132
- p2164: 0.000172383; = (p2015/p0818)-(p2022)-(p2035+p2036+p2052)-(p2017/p0818)-(p2039+p2041+p2044+p2158+p2159+p2160+p2161+p2162)
- p1186: 9.52212e-9; = p1182*p1185/p0818
- p0579: 0; = IF(p0315<0.5;-SQRT(p0007*EXP(p0447^2*p0008)-p0007);SQRT(p0007*EXP(p0447^2*p0008)-p0007))
- p2909: 1.8261e-5; = p2323*(p1020+p1022)
- p0358: 0.5
- p2850: 1.46871e-5; = p2264*(p1079+p1081)
- p0672: 0
- p2997: 0; = p2411*(p1020+p1022)
- p2052: 5.97005e-7; = p2015*p2049*(1-p2050)/(p0818*1000)
- p2007: 0.0339688; = ((p1981*p1985+p1987*p1991+p1993*p1997+p2001*p2005)/p0818)*p0005*p0002/1000
- p3062: 0; = p2281*p1023
- p3026: 0; = p2245*p1023
- p2470: 3.9359e-5; = p2274*p1123
- p5043: 4.19794e-9; = p1870*p3483
- p1685: 0.491852
- p3275: 0.0214527
- p0513: 0; = SQRT(2)*(IF((2*p0381-1)<0;-1;IF((2*p0381-1)>0;1;0))*SQRT(SQRT((2/(pi()*0.140012289)+LN(1-(2*p0381-1)^2)/2)^2-LN(1-(2*p0381-1)^2)/0.140012289)-(2/(pi()*0.140012289)+LN(1-(2*p0381-1)^2)/2)))
- p2497: 9.96807e-5; = p2301*p1073
- p1768: 0
- p0511: 0; = SQRT(2)*(IF((2*p0379-1)<0;-1;IF((2*p0379-1)>0;1;0))*SQRT(SQRT((2/(pi()*0.140012289)+LN(1-(2*p0379-1)^2)/2)^2-LN(1-(2*p0379-1)^2)/0.140012289)-(2/(pi()*0.140012289)+LN(1-(2*p0379-1)^2)/2)))
- p0708: 17.165; = p0048*(1+p0576*p0180/100)
- p3308: 621377; = if(and(p1232=0;p3252<>0);p3252*(p3259-p3303)/p3305;0)
- p2041: 5.76776e-7; = p2015*p2040/(p0818*1000)
- p0178: 45.062
- p2002: 750
- p0548: 0; = IF(p0284<0.5;-SQRT(p0007*EXP(p0416^2*p0008)-p0007);SQRT(p0007*EXP(p0416^2*p0008)-p0007))
- p4822: 0; = p1855*p3482
- p1694: 0
- p3076: 0; = p2295*p1023
- p0739: 3.416; = p0079*(1+p0607*p0211/100)
- p1218: 0.5
- p0901: 0.0177532
- p3998: 2.90022e-6; = p1855*p3478
- p0192: 37.289
- p2349: 0.000296295; = p2228*p2217
- p3060: 0; = p2279*p1023
- p2238: 0.00026915; = p2222*p2183
- p0441: 0; = SQRT(2)*(IF((2*p0309-1)<0;-1;IF((2*p0309-1)>0;1;0))*SQRT(SQRT((2/(pi()*0.140012289)+LN(1-(2*p0309-1)^2)/2)^2-LN(1-(2*p0309-1)^2)/0.140012289)-(2/(pi()*0.140012289)+LN(1-(2*p0309-1)^2)/2)))
- p0642: 0; = IF(p0378<0.5;-SQRT(p0007*EXP(p0510^2*p0008)-p0007);SQRT(p0007*EXP(p0510^2*p0008)-p0007))
- p2261: 0.00148235; = p2226*p2207
- p3169: 0; = p2388*p1082
- p0821: 1.00219
- p3083: 0; = p2302*p1082
- p2680: 0.000868418; = p2289*(p1019+p1021)
- p3239: 0.013074; = IF(p3238+p3235+p3236=1;0;1-(p3238+p3235+p3236))
- p4896: 0; = p1929*p3482
- p3455: 0; = p3379*p1240
- p1236: 0; = if(p1232>0;0;p0728/100)
- p2742: 0.000341855; = p2351*(p1128+p1130)
- p4116: 1.11323e-6; = p1767*p3479
- p2532: 0.000439548; = p2336*p1073
- p1842: 2.34854e-7; = p1434*1000/p0818
- p4153: 1.36873e-8; = p1804*p3479
- p3484: 0.0136132; = IF(p1344=0;0;p1344/(p1328+p1330+p1332+p1334+p1336+p1338+p1340+p1342+p1344))
- p2448: 1.72006e-6; = p2252*p1014
- p0255: 7.145
- p0978: 5.8e6; = p0801
- p2544: 1.38708e-5; = p2348*p1073
- p1607: 0
- p3165: 0; = p2384*p1082
- p1050: 3.16998e8; = IF(p1012=0;p1037*p1036;0)
- p2298: 0.000536753; = p2227*p2205
- p2395: 0; = p2234*p2184
- p1924: 0
- p1305: 0; = p1301*p1252/p0818
- p1883: 0
- p0002: 0.453592
- p2074: 0.025
- p3080: 0; = p2299*p1082
- p0491: 0; = SQRT(2)*(IF((2*p0359-1)<0;-1;IF((2*p0359-1)>0;1;0))*SQRT(SQRT((2/(pi()*0.140012289)+LN(1-(2*p0359-1)^2)/2)^2-LN(1-(2*p0359-1)^2)/0.140012289)-(2/(pi()*0.140012289)+LN(1-(2*p0359-1)^2)/2)))
- p2609: 0; = p2413*p1014
- p1073: 0.41957; = IF(p1071=0;p0711/100;0)
- p1327: 0.0480075; = if(p1318=0;if(p1327a=0;1;if(p1327a<0;0;p1327a));0)
- p2748: 4.00641e-5; = p2357*(p1019+p1021)
- p0678: 1327.28; = p0018*(1+p0546*p0150/100)
- p0019: 1756.12
- p0454: 0; = SQRT(2)*(IF((2*p0322-1)<0;-1;IF((2*p0322-1)>0;1;0))*SQRT(SQRT((2/(pi()*0.140012289)+LN(1-(2*p0322-1)^2)/2)^2-LN(1-(2*p0322-1)^2)/0.140012289)-(2/(pi()*0.140012289)+LN(1-(2*p0322-1)^2)/2)))
- p0081: 3.156
- p1045: 0.0673925; = IF(p1012=0;IF(p1037+p1044=1;0;IF(p1037+p1044+p1039>1;1-(p1037+p1044);p1039));0)
- p2314: 0.00080877; = p2231*p2221
- p2572: 1.05406e-5; = p2376*p1073
- p2421: 0; = p2235*p2211
- p4550: 5.7963e-8; = p1789*p3481
- p0647: 0; = IF(p0383<0.5;-SQRT(p0007*EXP(p0515^2*p0008)-p0007);SQRT(p0007*EXP(p0515^2*p0008)-p0007))
- p3298: 0; = if(p1283+p1284+p1285+p1286=0;0;p1283/(p1283+p1284+p1285+p1286))
- p0187: 14.472
- p0581: 0; = IF(p0317<0.5;-SQRT(p0007*EXP(p0449^2*p0008)-p0007);SQRT(p0007*EXP(p0449^2*p0008)-p0007))
- p1149: 0.830148
- p1657: 0
- p2594: 0; = p2398*p1014
- p2623: 0; = p2427*p1073
- p0381: 0.5
- p2868: 0.00020229; = p2282*(p1020+p1022)
- p3327: 0; = if(and(p1232=0;p3255<>0);1-(p3323+p3324+p3325+p3326);0)
- p3123: 0; = p2342*p1082
- p0674: 0
- p1851: 0
- p3445: 0; = p3369*p1240
- p2471: 6.83957e-5; = p2275*p1123
- p1578: 0
- p0126: 95.614
- p0258: 6.685
- p2727: 0.00028514; = p2336*(p1078+p1080)
- p1675: 0
- p1564: 0
- p2048: 4.84685e-15; = p2015*p2046/(p0818*1000000000000)
- p1635: 0
- p2599: 0; = p2403*p1014
- p1587: 0
- p1011: 0; = p1010*p0001*p0004/(p0818*p0002)
- p2717: 0.000168223; = p2326*(p1019+p1021)
- p4863: 0; = p1896*p3482
- p2348: 3.30595e-5; = p2228*p2216
- p0114: 52.774
- p4906: 0; = p1939*p3482
- p1998: 78
- p0910: 0.00354399; = p0909/p0818
- p3437: 0; = p3380*p1239
- p4625: 9.82424e-10; = p1864*p3481
- p2985: 0; = p2399*(p1020+p1022)
- p1141: 4.94712e-5; = if(p1121=0;p1135*p0001/(p0818*p0002);0)
- p1606: 0.80434
- p1853: 0
- p0772: 54.785; = p0112*(1+p0640*p0244/100)
- p0692: 0
- p2429: 0; = p2236*p2219
- p3113: 0; = p2332*p1023
- p1296: 0.060023; = p1292*p1252/p0818
- p2587: 1.61475e-6; = p2391*p1123
- p4419: 0; = p1864*p3480
- p1816: 0
- p1893: 0
- p2434: 0.000133719; = p2238*p1014
- p1867: 0
- p3168: 0; = p2387*p1082
- p0330: 0.5
- p1508: 7
- p0504: 0; = SQRT(2)*(IF((2*p0372-1)<0;-1;IF((2*p0372-1)>0;1;0))*SQRT(SQRT((2/(pi()*0.140012289)+LN(1-(2*p0372-1)^2)/2)^2-LN(1-(2*p0372-1)^2)/0.140012289)-(2/(pi()*0.140012289)+LN(1-(2*p0372-1)^2)/2)))
- p4142: 1.81128e-6; = p1793*p3479
- p1749: 0
- p3031: 0; = p2250*p1023
- p1572: 0
- p2365: 0.00266802; = p2225*p2193
- p1145: 6.18456e8; = if(p1121=0;p0799*p0702*1000*p0800/100;0)
- p0734: 0
- p3377: 0.000510188; = if(p1232=0;p3246*p3359/p0818;0)
- p2229: 0.0121913; = if(p0774*p0778+p0775*p0779+p0776*p0780+p0777*p0781=0;0;p0781*p0777/(p0774*p0778+p0775*p0779+p0776*p0780+p0777*p0781))
- p5288: 6.71396e-9; = p1909*p3484
- p2108: 0.826583
- p3152: 0; = p2371*p1023
- p2118: 0.679049
- p1122: 0; = p1121*p0001/(p0818*p0002)
- p1977: 3.3372e9; = p1252+p1188
- p2852: 9.72434e-7; = p2266*(p1079+p1081)
- p2050: 0.952062
- p0376: 0.5
- p0750: 0
- p0747: 0
- p1332: 1.22022e7; = p1321*p0801
- p1698: 0
- p2146: 1.00158e-8; = p2015*p2074*p2108/(p0818*1000)
- p2781: 9.63863e-5; = p2390*(p1128+p1130)
- p1097: 0.0625488
- p0481: 0; = SQRT(2)*(IF((2*p0349-1)<0;-1;IF((2*p0349-1)>0;1;0))*SQRT(SQRT((2/(pi()*0.140012289)+LN(1-(2*p0349-1)^2)/2)^2-LN(1-(2*p0349-1)^2)/0.140012289)-(2/(pi()*0.140012289)+LN(1-(2*p0349-1)^2)/2)))
- p1071: 0
- p2085: 0.0335294
- p2138: 3.74258e-8; = p2015*p2066*p2100/(p0818*1000)
- p2072: 0.134
- p1196: 0.59
- p2936: 0.000416557; = p2350*(p1129+p1131)
- p0078: 5799.2
- p0725: 6.9; = p0065*(1+p0593*p0197/100)
- p0994: 0; = p0990*p0001*p0004/(p0818*p0002)
- p3200: 0; = p2419*p1082
- p3297: 0; = if(p1273+p1274+p1275+p1276=0;0;p1273/(p1273+p1274+p1275+p1276))
- p2788: 0; = p2397*(p1019+p1021)
- p0986: 0; = IF(p0982+p0985=1;0;IF(p0982+p0985+p0984>1;1-(p0982+p0985);p0984))
- p1250: 0; = if(p1232>0;0;p1245*p0001/(p0818*p0002))
- p2854: 1.8017e-5; = p2268*(p1079+p1081)
- p2300: 0.00144317; = p2227*p2207
- p1568: 0
- p0793: 0
- p1213: 56
- p3151: 0; = p2370*p1023
- p1201: 0.65
- p5089: 1.46928e-8; = p1916*p3483
- p2774: 3.91261e-8; = p2383*(p1078+p1080)
- p2952: 0.000160682; = p2366*(p1020+p1022)
- p0091: 4.953
- p1028: 1.44267e6; = IF(p1012=0;p1022*(p0704/100)*p0703*1000;0)
- p2547: 8.96167e-5; = p2351*p1123
- p1751: 0
- p1107: 9.30217e6; = IF(p1071=0;p1105*p1101*p1095;0)
- p1963i: 9.94674e-8; = p1706*p1910+p1707*p1911+p1708*p1912+p1709*p1913+p1710*p1914+p1711*p1915+p1712*p1916+p1713*p1917+p1714*p1918+p1715*p1919+p1716*p1920+p1717*p1921+p1718*p1922+p1719*p1923+p1720*p1924+p1721*p1925+p1722*p1926+p1723*p1927+p1724*p1928
- p2057: 3.28794
- p2508: 0.000640812; = p2312*p1123
- p1741: 0
- p0125: 35.434
- p3480: 0; = if(p1328+p1330+p1332+p1334+p1336+p1338+p1340+p1342+p1344=0;0;p1336/(p1328+p1330+p1332+p1334+p1336+p1338+p1340+p1342+p1344))
- p1647: 0
- p2878: 3.79615e-6; = p2292*(p1020+p1022)
- p0654: 0; = IF(p0390<0.5;-SQRT(p0007*EXP(p0522^2*p0008)-p0007);SQRT(p0007*EXP(p0522^2*p0008)-p0007))
- p1710: 0
- p1615: 0
- p1833: 0
- p1731: 0
- p0097: 15.658
- p2779: 2.1383e-6; = p2388*(p1078+p1080)
- p0619: 0; = IF(p0355<0.5;-SQRT(p0007*EXP(p0487^2*p0008)-p0007);SQRT(p0007*EXP(p0487^2*p0008)-p0007))
- p2645: 0.000151847; = p2254*(p1019+p1021)
- p2889: 1.42989e-5; = p2303*(p1079+p1081)
- p3469: 8.15239e-5; = p3374*p1241
- p0776: 40.467; = p0116*(1+p0644*p0248/100)
- p0609: 0; = IF(p0345<0.5;-SQRT(p0007*EXP(p0477^2*p0008)-p0007);SQRT(p0007*EXP(p0477^2*p0008)-p0007))
- p2595: 0; = p2399*p1014
- p2914: 0.000450647; = p2328*(p1020+p1022)
- p3378: 0.00485227; = if(p1232=0;p3246*p3360/p0818;0)
- p0507: 0; = SQRT(2)*(IF((2*p0375-1)<0;-1;IF((2*p0375-1)>0;1;0))*SQRT(SQRT((2/(pi()*0.140012289)+LN(1-(2*p0375-1)^2)/2)^2-LN(1-(2*p0375-1)^2)/0.140012289)-(2/(pi()*0.140012289)+LN(1-(2*p0375-1)^2)/2)))
- p4219: 9.12486e-9; = p1870*p3479
- p3296: 0.514
- p3007: 0; = p2421*(p1079+p1081)
- p3376: 0.000218011; = if(p1232=0;p3246*p3358/p0818;0)
- p2141: 8.42911e-8; = p2015*p2069*p2103/(p0818*1000)
- p2992: 0; = p2406*(p1020+p1022)
- p0342: 0.5
- p2381: 2.17113e-6; = p2229*p2210
- p2756: 0.000592915; = p2365*(p1019+p1021)
- p2327: 0.000162267; = p2224*p2195
- p3305: 0.856081; = if(and(p1232=0;p3252<>0);1-(p3301+p3302+p3303+p3304);0)
- p3213: 0.112803; = p1222*12.0107/100.0869
- p0911: 0.00344444
- p2378: 6.75469e-5; = p2229*p2207
- p5102: 4.42882e-7; = p1929*p3483
- p2944: 0.000158955; = p2358*(p1020+p1022)
- p0786: 95.614; = p0126*(1+p0654*p0258/100)
- p3071: 0; = p2290*p1023
- p2763: 0.000167184; = p2372*(p1019+p1021)
- p2677: 7.16144e-5; = p2286*(p1019+p1021)
- p4876: 0; = p1909*p3482
- p2702: 0.00173464; = p2311*(p1128+p1130)
- p0148: 0
- p0818: 4.25796e10; = p0806*p0807
- p2610: 0; = p2414*p1073
- p1948: 0
- p2472: 0.00108133; = p2276*p1014
- p0896: 0.443532
- p3498: 3.6872e-7; = p1767*p3476
- p4868: 0; = p1901*p3482
- p2634: 9.01418e-5; = p2243*(p1019+p1021)
- p3069: 0; = p2288*p1023
- p2862: 0.000611487; = p2276*(p1020+p1022)
- p1591: 0
- p2652: 0.000403467; = p2261*(p1078+p1080)
- p1150: 4.70994e8; = if(p1121=0;p1149*p1146*p1145;0)
- p2584: 3.29623e-6; = p2388*p1073
- p1813: 0
- p1760: 0
- p1886: 0
- p1775: 0
- p1701: 0
- p1310: 0; = IF(p1307=p1266;0;IF(p1307+p1308>p1266;p1266-p1307;p1308))
- p2843: 0.000135794; = p2257*(p1020+p1022)
- p0984: 0; = if(p0886=0;0;min(1;(p0699*p0698*1000*p0701/100)/p0886))
- p1493: 46
- p0850: 0.326261
- p1906: 0
- p3167: 0; = p2386*p1082

- p0478: 0; = SQRT(2)*(IF((2*p0346-1)<0;-1;IF((2*p0346-1)>0;1;0))*SQRT(SQRT((2/(pi()*0.140012289)+LN(1-(2*p0346-1)^2)/2)^2-LN(1-(2*p0346-1)^2)/0.140012289)-(2/(pi()*0.140012289)+LN(1-(2*p0346-1)^2)/2)))
- p2514: 2.54123e-5; = p2318*p1014
- p2382: 2.84319e-5; = p2229*p2211
- p1726: 0
- p2170: 0.00484571; = p2166*(p0913)
- p0541: 0; = IF(p0277<0.5;-SQRT(p0007*EXP(p0409^2*p0008)-p0007);SQRT(p0007*EXP(p0409^2*p0008)-p0007))
- p3321: 1.01846e7; = if(and(p1232=0;p3253<>0);IF((p3317+p3318+p3319+p3320)+(p3253*(p3261*(1-p3277))/p3316)>p3253;p3253-(p3317+p3318+p3319+p3320);p3253*(p3261*(1-p3277))/p3316);0)
- p0234: 15.863
- p3045: 0; = p2264*p1082
- p1067: 0.00225333; = IF(p1012=0;p1053/(p1060*p0818);0)
- p0806: 7.6035e8
- p0665: 0; = IF(p0401<0.5;-SQRT(p0007*EXP(p0533^2*p0008)-p0007);SQRT(p0007*EXP(p0533^2*p0008)-p0007))
- p3336: 0.000977444; = IF(or(p3254=0;p1232>0);0;p3271*p3289)
- p1054: 2.68596e8; = IF(p1012=0;p1047*p1036;0)
- p2726: 7.82636e-5; = p2335*(p1019+p1021)
- p1154: 0.0266494; = if(p1152*p0818=0;0;p1150/(p1152*p0818))
- p2086: 0.0617647
- p3342: 1.62874e7; = if(and(p1232=0;p3254<>0);p3254*(p3272-p3337)/p3338;0)
- p1648: 0
- p3067: 0; = p2286*p1023
- p1246: 10103.6; = if(p1232>0;0;p1241*(p0725/100)*p0723*1000)
- p3044: 0; = p2263*p1082
- p0369: 0.5
- p0524: 0; = SQRT(2)*(IF((2*p0392-1)<0;-1;IF((2*p0392-1)>0;1;0))*SQRT(SQRT((2/(pi()*0.140012289)+LN(1-(2*p0392-1)^2)/2)^2-LN(1-(2*p0392-1)^2)/0.140012289)-(2/(pi()*0.140012289)+LN(1-(2*p0392-1)^2)/2)))
- p3381: 0; = p3362*p1234
- p0420: 0; = SQRT(2)*(IF((2*p0288-1)<0;-1;IF((2*p0288-1)>0;1;0))*SQRT(SQRT((2/(pi()*0.140012289)+LN(1-(2*p0288-1)^2)/2)^2-LN(1-(2*p0288-1)^2)/0.140012289)-(2/(pi()*0.140012289)+LN(1-(2*p0288-1)^2)/2)))
- p2679: 8.78518e-5; = p2288*(p1019+p1021)
- p0655: 0; = IF(p0391<0.5;-SQRT(p0007*EXP(p0523^2*p0008)-p0007);SQRT(p0007*EXP(p0523^2*p0008)-p0007))
- p1709: 0
- p2684: 0.000269543; = p2293*(p1019+p1021)
- p0680: 1804.23; = p0020*(1+p0548*p0152/100)
- p2949: 1.61855e-5; = p2363*(p1020+p1022)
- p3058: 0; = p2277*p1023
- p2136: 2.80851e-7; = p2015*p2064*p2098/(p0818*1000)
- p3227: 0.000479849; = p3223*p1229
- p3382: 0; = p3363*p1234
- p1280: 0; = IF(p1277=p1263;0;IF(p1277+p1278>p1263;p1263-p1277;p1278))
- p1275: 0; = p1271*p1252/p0818
- p3457: 0; = p3362*p1241
- p0080: 98.496
- p2142: 1.11687e-7; = p2015*p2070*p2104/(p0818*1000)
- p4322: 0; = p1767*p3480
- p1211: 0.6
- p1772: 0
- p0194: 25.785
- p0635: 0; = IF(p0371<0.5;-SQRT(p0007*EXP(p0503^2*p0008)-p0007);SQRT(p0007*EXP(p0503^2*p0008)-p0007))
- p2581: 1.11747e-6; = p2385*p1073
- p3209: 0; = p2428*p1132
- p3479: 0.194266; = if(p1328+p1330+p1332+p1334+p1336+p1338+p1340+p1342+p1344=0;0;p1334/(p1328+p1330+p1332+p1334+p1336+p1338+p1340+p1342+p1344))
- p5177: 8.31253e-9; = p1798*p3484
- p2749: 0.000125733; = p2358*(p1019+p1021)
- p2129: 5.97358e-7; = p2015*p2057*p2091/(p0818*1000)
- p3211: 0; = p2430*p1132
- p0137: 60.619
- p0700: 0
- p2199: 4.62179e-5; = p1069-p2197-p2198
- p2113: 0.832356
- p3162: 0; = p2381*p1082
- p3671: 1.42955e-6; = p1940*p3476
- p2423: 0; = p2235*p2213
- p3476: 0.064344; = if(p1328+p1330+p1332+p1334+p1336+p1338+p1340+p1342+p1344=0;0;p1328/(p1328+p1330+p1332+p1334+p1336+p1338+p1340+p1342+p1344))
- p2289: 0.00390774; = p2223*p2196
- p0968: 1.00644e7; = p0965*p0964*p0683*p0682*1000
- p0939: 1.66997e-8; = p0933*p0001/(p0818*p0002)
- p3450: 0; = p3374*p1240
- p2739: 8.99814e-6; = p2348*(p1078+p1080)
- p0151: 0
- p0792: 0
- p2494: 0.000225205; = p2298*p1073
- p0347: 0.5
- p4238: 2.247e-5; = p1889*p3479
- p3139: 0; = p2358*p1023
- p1895: 0
- p3201: 0; = p2420*p1082
- p1481: 4925
- p2935: 9.13329e-5; = p2349*(p1079+p1081)
- p2466: 8.07118e-6; = p2270*p1073
- p0881: 0; = p0880*p0001*p0003/(p0818*p0002)
- p1066: 0.00399308; = IF(p1012=0;p1052/(p1059*p0818);0)
- p1329: 2.75763e-5; = p1328*p0001/(p0818*p0002)
- p2339: 0.00254751; = p2228*p2207
- p2886: 0.000444857; = p2300*(p1079+p1081)
- p1338: 855611; = p1324*p0801
- p1281: 0; = IF(p1277+p1280=p1263;0;IF(p1277+p1280+p1279>p1263;p1263-(p1277+p1280);p1279))
- p3348: 0; = if(and(p1232=0;p3256<>0);p3276*p3289;0)
- p0865: 0; = IF(p0858+p0864=1;0;IF(p0858+p0864+p0860>1;1-(p0858+p0864);p0860))
- p1978: 78
- p0203: 64.152
- p0927: 0.000137414; = IF(p0918+p0923+p0924+p0925+p0926=1;0;1-(p0918+p0923+p0924+p0925+p0926))
- p1222: 0.94
- p3047: 0; = p2266*p1082
- p1381: 59
- p1051: 5.26917e6; = IF(p1012=0;p1044*p1036;0)
- p3262: 0.0787162
- p0753: 0
- p2343: 0.0010723; = p2228*p2211
- p1055: 545339; = IF(p1012=0;p1048*p1036;0)
- p0390: 0.5
- p3255: 0; = p1252*(p1297*(1-p3247)+p1300*(1-p3248)+p1301*(1-p3249)+p1302*(1-p3250))
- p3647: 1.0578e-8; = p1916*p3476
- p2867: 1.5813e-5; = p2281*(p1020+p1022)
- p1155: 0.00272724; = if(p1153*p0818=0;0;p1151/(p1153*p0818))
- p2415: 0; = p2235*p2205
- p0777: 33.096; = p0117*(1+p0645*p0249/100)
- p3023: 0; = p2242*p1023
- p0217: 6.904
- p0288: 0.5
- p2816: 0; = p2425*(p1078+p1080)
- p0760: 0
- p1963b: 1.10311e-6; = p1569*p1773+p1570*p1774+p1571*p1775+p1572*p1776+p1573*p1777+p1574*p1778+p1575*p1779+p1576*p1780+p1577*p1781+p1578*p1782+p1579*p1783+p1580*p1784+p1581*p1785+p1582*p1786+p1583*p1787+p1584*p1788+p1585*p1789+p1586*p1790+p1587*p1791
- p3112: 0; = p2331*p1023
- p3620: 7.4424e-6; = p1889*p3476
- p2433: 0.000609165; = p2237*p1014
- p1158: 0.0238607; = p1156*p1157
- p0535: 0; = SQRT(2)*(IF((2*p0403-1)<0;-1;IF((2*p0403-1)>0;1;0))*SQRT(SQRT((2/(pi()*0.140012289)+LN(1-(2*p0403-1)^2)/2)^2-LN(1-(2*p0403-1)^2)/0.140012289)-(2/(pi()*0.140012289)+LN(1-(2*p0403-1)^2)/2)))
- p3098: 0; = p2317*p1023
- p0282: 0.5
- p2853: 1.01686e-5; = p2267*(p1079+p1081)
- p2409: 0; = p2234*p2199
- p0314: 0.5
- p1081: 0.20003; = IF(p1071=0;IF(p1073+p1078+p1079+p1080=1;0;IF(p1073+p1078+p1079+p1080+p1077>1;1-(p1073+p1078+p1079+p1080);p1077));0)
- p0308: 0.5
- p4151: 4.98217e-6; = p1802*p3479
- p1293: 0; = p1287*p1252/p0818
- p1273: 0; = p1267*p1252/p0818
- p1865: 0
- p1346: 182
- p2899: 0.000268247; = p2313*(p1129+p1131)
- p1812: 0
- p1918: 0
- p3161: 0; = p2380*p1082
- p2487: 3.05328e-6; = p2291*p1014
- p2084: 0.21
- p2233: 0.0184221; = if(p0783*p0787+p0784*p0788+p0785*p0789+p0786*p0790=0;0;p0790*p0786/(p0783*p0787+p0784*p0788+p0785*p0789+p0786*p0790))
- p1940: 2.22172e-5; = p1532*1000/p0818
- p2411: 0; = p2234*p2201
- p2186: 0.00133768; = p1052/p0818
- p0894: 0.22
- p5112: 4.19794e-8; = p1939*p3483
- p3431: 0; = p3374*p1239
- p0361: 0.5
- p1004: 0; = p1000*p0888
- p1337: 0; = p1336*p0001/(p0818*p0002)
- p2542: 4.21452e-5; = p2346*p1073
- p1223: 0.56
- p2397: 0; = p2234*p2186
- p0748: 67.755; = p0088*(1+p0616*p0220/100)
- p0707: 3.217; = p0047*(1+p0575*p0179/100)
- p2374: 0.00124126; = p2225*p2203
- p0346: 0.5
- p2056: 2.07882
- p0844: 0.409944
- p1210: 0.25
- p1106: 502068; = IF(p1071=0;p1105*p1096*p1095;0)
- p3369: 0; = if(p1232=0;p3245*p3357/p0818;0)
- p0882: 25400; = p0869*p0856
- p2879: 0.000340764; = p2293*(p1020+p1022)
- p2249: 0.000222703; = p2222*p2195
- p1062: 0.16
- p1220: 0; = IF(p1218<0.5;-SQRT(p1214*EXP(p1219^2*p1215)-p1214);SQRT(p1214*EXP(p1219^2*p1215)-p1214))
- p2715: 3.63238e-6; = p2324*(p1019+p1021)
- p2288: 0.000395319; = p2223*p2195
- p2019: 0.13105
- p1781: 0
- p0499: 0; = SQRT(2)*(IF((2*p0367-1)<0;-1;IF((2*p0367-1)>0;1;0))*SQRT(SQRT((2/(pi()*0.140012289)+LN(1-(2*p0367-1)^2)/2)^2-LN(1-(2*p0367-1)^2)/0.140012289)-(2/(pi()*0.140012289)+LN(1-(2*p0367-1)^2)/2)))
- p2659: 1.59087e-5; = p2268*(p1078+p1080)
- p2705: 0.000271464; = p2314*(p1128+p1130)
- p2071: 0.151
- p2701: 4.56858e-5; = p2310*(p1078+p1080)
- p0444: 0; = SQRT(2)*(IF((2*p0312-1)<0;-1;IF((2*p0312-1)>0;1;0))*SQRT(SQRT((2/(pi()*0.140012289)+LN(1-(2*p0312-1)^2)/2)^2-LN(1-(2*p0312-1)^2)/0.140012289)-(2/(pi()*0.140012289)+LN(1-(2*p0312-1)^2)/2)))
- p1025: 293313; = IF(p1012=0;p1019*(p0704/100)*p0703*1000;0)
- p1130: 0.01711; = if(p1121=0;IF(p1123+p1128+p1129=1;0;IF(p1123+p1128+p1129+p1126>1;1-(p1123+p1128+p1129);p1126));0)
- p1877: 0
- p0997: 0; = if(p0888=0;0;if((p0695*p0694*1000*p0696/100)/p0888>1;1;(p0695*p0694*1000*p0696/100)/p0888))
- p1714: 0
- p3471: 5.50477e-6; = p3376*p1241
- p1553: 0
- p1950: 0
- p1279: 0
- p1304: 0; = p1300*p1252/p0818
- p1252: 3.33719e9; = if(p1232>0;0;p0724*2000*p0723*1000*p0725/100)
- p2731: 0.000114146; = p2340*(p1078+p1080)
- p3460: 0; = p3365*p1241
- p3001: 0; = p2415*(p1079+p1081)
- p2244: 7.79338e-5; = p2222*p2189
- p0652: 0; = IF(p0388<0.5;-SQRT(p0007*EXP(p0520^2*p0008)-p0007);SQRT(p0007*EXP(p0520^2*p0008)-p0007))
- p2235: 0; = 1-(p2226+p2227+p2228+p2229)
- p3057: 0; = p2276*p1023
- p2728: 0.000257887; = p2337*(p1078+p1080)
- p2760: 1.97587e-6; = p2369*(p1019+p1021)
- p0058: 31.854
- p4670: 2.06309e-8; = p1909*p3481
- p1017: 0.17165; = IF(p1012=0;p0708/100;0)
- p2165: 0.495307; = (p0833-p2014)/p0818-p0839
- p2932: 3.09633e-5; = p2346*(p1079+p1081)
- p1954: 0
- p1922: 0
- p2840: 0.000191969; = p2254*(p1020+p1022)
- p4650: 4.83844e-6; = p1889*p3481
- p0450: 0; = SQRT(2)*(IF((2*p0318-1)<0;-1;IF((2*p0318-1)>0;1;0))*SQRT(SQRT((2/(pi()*0.140012289)+LN(1-(2*p0318-1)^2)/2)^2-LN(1-(2*p0318-1)^2)/0.140012289)-(2/(pi()*0.140012289)+LN(1-(2*p0318-1)^2)/2)))
- p0795: 145.744; = p0135*(1+p0663*p0267/100)
- p1319: 0.226911; = IF(((p0745*1000*p0746/100)+(p0754*1000*p0755/100))/p0801<0;0;((p0745*1000*p0746/100)+(p0754*1000*p0755/100))/p0801)
- p2205: 0.00206069; = 2*14.0067*p2204/30.973762
- p2806: 0; = p2415*(p1078+p1080)
- p2158: 7.16667e-8; = p2015*p2082*p2120/(p0818*1000)
- p2527: 2.75547e-6; = p2331*p1014
- p1029: 0; = IF(p1012=0;IF(p0801<p1023*(p0704/100)*p0703*1000;p0801;p1023*(p0704/100)*p0703*1000);0)
- p3172: 0; = p2391*p1132
- p0768: 112.518; = p0108*(1+p0636*p0240/100)
- p0324: 0.5
- p2928: 2.52407e-5; = p2342*(p1079+p1081)
- p2358: 0.000565778; = p2225*p2186
- p1580: 0
- p2588: 2.80601e-6; = p2392*p1123
- p1786: 0
- p1742: 0
- p3337: 0.00199123; = IF(or(p3254=0;p1232>0);0;p3272*p3289)
- p2284: 0.000158348; = p2223*p2190
- p2582: 4.21699e-6; = p2386*p1073
- p0988: 0; = p0982*p0886
- p0653: 0; = IF(p0389<0.5;-SQRT(p0007*EXP(p0521^2*p0008)-p0007);SQRT(p0007*EXP(p0521^2*p0008)-p0007))
- p0971: 0.000236367; = p0968/p0818
- p2660: 6.00345e-5; = p2269*(p1078+p1080)
- p0152: 0
- p4981: 1.63719e-7; = p1808*p3483
- p1214: 55; = IF(p1213=0;0;p1213-1)
- p2099: 0.620397
- p3186: 0; = p2405*p1023
- p2940: 0.000884661; = p2354*(p1020+p1022)
- p0657: 0; = IF(p0393<0.5;-SQRT(p0007*EXP(p0525^2*p0008)-p0007);SQRT(p0007*EXP(p0525^2*p0008)-p0007))
- p2087: 0.856281
- p2974: 2.42168e-6; = p2388*(p1079+p1081)
- p3226: 0.000848345; = p3222*p1229
- p1111: 0.0872841
- p3204: 0; = p2423*p1082
- p2606: 0; = p2410*p1014
- p2675: 3.51898e-5; = p2284*(p1019+p1021)
- p0975: 0.0011556; = p0973*p0974/p0818
- p2894: 6.61931e-5; = p2308*(p1079+p1081)
- p3465: 0; = p3370*p1241
- p2280: 0.000391072; = p2223*p2186
- p0323: 0.5
- p2354: 0.00314882; = p2225*p2182
- p0677: 0
- p2784: 0; = p2393*(p1019+p1021)
- p2105: 0.888194
- p3153: 0; = p2372*p1023
- p1069: 8.00469e-5; = IF(p1012=0;p1055/(p1062*p0818);0)
- p3035: 0; = p2254*p1023
- p0577: 0; = IF(p0313<0.5;-SQRT(p0007*EXP(p0445^2*p0008)-p0007);SQRT(p0007*EXP(p0445^2*p0008)-p0007))
- p0914: 4.31555e8; = p0825*p0911+p0827*p0912+(p0830+p0895)*p0824*p0913
- p3155: 0; = p2374*p1023
- p2023: 2.24
- p0005: 1.60934
- p0979: 0; = IF(p0976=0;0;p0976*p0001/(p0818*p0002))
- p3205: 0; = p2424*p1082
- p2424: 0; = p2235*p2214
- p1796: 0
- p3319: 666361; = if(and(p1232=0;p3253<>0);p3253*(p3263-p3314)/p3316;0)
- p0717: 8.799; = p0057*(1+p0585*p0189/100)
- p3433: 0; = p3376*p1239
- p2600: 0; = p2404*p1014
- p2630: 4.52923e-6; = p2239*(p1019+p1021)
- p1729: 0
- p3866: 0; = p1929*p3477
- p2911: 3.71628e-5; = p2325*(p1020+p1022)
- p1240: 0; = if(p1232>0;0;IF(p1234+p1238+p1239=1;0;IF(p1234+p1238+p1239+p1237>1;1-(p1234+p1238+p1239);p1237)))
- p1764: 0
- p2258: 0.000609589; = p2226*p2204
- p1233: 0; = p1232*p0001/(p0818*p0002)
- p3171: 0; = p2390*p1132
- p2526: 1.25328e-6; = p2330*p1014
- p0521: 0; = SQRT(2)*(IF((2*p0389-1)<0;-1;IF((2*p0389-1)>0;1;0))*SQRT(SQRT((2/(pi()*0.140012289)+LN(1-(2*p0389-1)^2)/2)^2-LN(1-(2*p0389-1)^2)/0.140012289)-(2/(pi()*0.140012289)+LN(1-(2*p0389-1)^2)/2)))
- p0584: 0; = IF(p0320<0.5;-SQRT(p0007*EXP(p0452^2*p0008)-p0007);SQRT(p0007*EXP(p0452^2*p0008)-p0007))
- p3212: 0; = p2431*p1132
- p0756: 0
- p4837: 0; = p1870*p3482
- p4616: 2.03362e-7; = p1855*p3481
- p3292: 0.258
- p0385: 0.5
- p2683: 3.00273e-6; = p2292*(p1019+p1021)
- p1964: 0.5
- p0900: 0.607556; = p0899/p0818
- p0885: 100; = IF(p0689+p0884=100;0;100-(p0689+p0884))
- p3150: 0; = p2369*p1023
- p3473: 0.00012252; = p3378*p1241
- p0216: 11.28
- p2197: 1.28075e-5; = p1055/p0818
- p3478: 0.596572; = if(p1328+p1330+p1332+p1334+p1336+p1338+p1340+p1342+p1344=0;0;p1332/(p1328+p1330+p1332+p1334+p1336+p1338+p1340+p1342+p1344))
- p3332: 0; = if(and(p1232=0;p3255<>0);IF((p3328+p3329+p3330+p3331)+(p3255*(p3265*(1-p3277))/p3327)>p3255;p3255-(p3328+p3329+p3330+p3331);p3255*(p3265*(1-p3277))/p3327);0)
- p0477: 0; = SQRT(2)*(IF((2*p0345-1)<0;-1;IF((2*p0345-1)>0;1;0))*SQRT(SQRT((2/(pi()*0.140012289)+LN(1-(2*p0345-1)^2)/2)^2-LN(1-(2*p0345-1)^2)/0.140012289)-(2/(pi()*0.140012289)+LN(1-(2*p0345-1)^2)/2)))
- p1133: 461075; = if(p1121=0;p1123*(p0716/100)*p0703*1000;0)
- p2152: 1.00858e-8; = p2015*p2080*p2114/(p0818*1000)
- p0874: 0; = p0865*p0856
- p0681: 0
- p2102: 0.922577
- p0310: 0.5
- p3440: 0; = p3364*p1240
- p1561: 0.52337
- p3318: 1.97588e6; = if(and(p1232=0;p3253<>0);p3253*(p3262-p3313)/p3316;0)
- p0961: 0; = if(and(p0683>0;or(p0807=480;p0807=32;p0807=1;and(p0807=60;p0901<0.03)));p0937;0)
- p2155: 5.95585e-8; = p2015*p2084*p2117/(p0818*1000)
- p3225: 0.000556031; = p3221*p1229
- p1770: 0
- p1631: 0
- p0590: 0; = IF(p0326<0.5;-SQRT(p0007*EXP(p0458^2*p0008)-p0007);SQRT(p0007*EXP(p0458^2*p0008)-p0007))
- p1931: 0
- p1963d: 0; = p1608*p1812+p1609*p1813+p1610*p1814+p1611*p1815+p1612*p1816+p1613*p1817+p1614*p1818+p1615*p1819+p1616*p1820+p1617*p1821+p1618*p1822+p1619*p1823+p1620*p1824+p1621*p1825+p1622*p1826+p1623*p1827+p1624*p1828+p1625*p1829+p1626*p1830+p1627*p1831
- p0399: 0.5
- p0689: 0
- p2814: 0; = p2423*(p1078+p1080)
- p2081: 0.0019
- p2541: 2.37863e-5; = p2345*p1073
- p2174: 0.00133079; = p0895*p0903/p0818
- p2509: 4.09519e-5; = p2313*p1123
- p1874: 0
- p0130: 2.274
- p2900: 0.000466143; = p2314*(p1129+p1131)
- p2983: 0; = p2397*(p1020+p1022)
- p2483: 0.00091622; = p2287*p1014
- p0867: 0; = IF(p0858+p0864+p0865+p0866=1;0;IF(p0858+p0864+p0865+p0866+p0862>1;1-(p0858+p0864+p0865+p0866);p0862))
- p1065: 0.000549994; = IF(p1012=0;p1051/(p1058*p0818);0)
- p0757: 15.658; = p0097*(1+p0625*p0229/100)
- p2357: 0.000180282; = p2225*p2185
- p1108: 3.06152e6; = IF(p1071=0;p1105*p1102*p1095;0)
- p0802: 5.55e6
- p1056: 1.76654e8; = IF(p1012=0;p1049*p1036;0)
- p0987: 0; = if(p0978>0;0;if(and(p0687=0;p0691=0;p0695=0;p0699=0);0;IF(p0982+p0985+p0986=1;0;1-(p0982+p0985+p0986))))
- p4494: 0; = p1939*p3480
- p2352: 6.50877e-5; = p2232*p2220
- p1836: 0
- p1826: 0
- p0755: 26.046; = p0095*(1+p0623*p0227/100)
- p0269: 7.437
- p2104: 0.817136
- p0814: 0; = if(p0807=480;p0810*p0812+p0811*p0813;0)
- p2223: 0.29235; = if(p0765*p0769+p0766*p0770+p0767*p0771+p0768*p0772=0;0;p0770*p0766/(p0765*p0769+p0766*p0770+p0767*p0771+p0768*p0772))
- p0176: 0
- p2551: 0.000343404; = p2355*p1014
- p3048: 0; = p2267*p1082
- p5183: 9.59138e-10; = p1804*p3484
- p2616: 0; = p2420*p1073
- p0013: 107.353
- p2252: 3.46214e-6; = p2222*p2198
- p2337: 0.000947488; = p2228*p2205
- p4348: 0; = p1793*p3480
- p1885: 0
- p2880: 0.000146094; = p2294*(p1020+p1022)
- p2789: 0; = p2398*(p1019+p1021)
- p0816: 0
- p1745: 0
- p0503: 0; = SQRT(2)*(IF((2*p0371-1)<0;-1;IF((2*p0371-1)>0;1;0))*SQRT(SQRT((2/(pi()*0.140012289)+LN(1-(2*p0371-1)^2)/2)^2-LN(1-(2*p0371-1)^2)/0.140012289)-(2/(pi()*0.140012289)+LN(1-(2*p0371-1)^2)/2)))
- p2955: 2.49796e-6; = p2369*(p1020+p1022)
- p4052: 2.94226e-7; = p1909*p3478
- p2865: 3.501e-5; = p2279*(p1020+p1022)
- p3219: 0.0109632; = p3215*p1228
- p2884: 0.000165454; = p2298*(p1079+p1081)
- p4515: 1.78801e-7; = p1754*p3481
- p0811: 0; = if(p0807=480;1-p0810;0)
- p1003: 0; = p0999*p0888
- p1659: 0
- p1744: 0
- p4082: 2.80215e-7; = p1939*p3478
- p0283: 0.5
- p0840: 0.137279; = p0839*p0831
- p2336: 0.00104762; = p2228*p2204
- p2642: 4.68757e-7; = p2251*(p1019+p1021)
- p3120: 0; = p2339*p1082
- p0331: 0.5
- p0875: 0; = p0874*p0001*p0003/(p0818*p0002)
- p1822: 0
- p4287: 2.60058e-7; = p1938*p3479
- p2977: 1.05771e-5; = p2391*(p1129+p1131)
- p2778: 2.38584e-7; = p2387*(p1078+p1080)
- p3242: 1.15936e-8; = p3234*p1188*p3238/p0818
- p0467: 0; = SQRT(2)*(IF((2*p0335-1)<0;-1;IF((2*p0335-1)>0;1;0))*SQRT(SQRT((2/(pi()*0.140012289)+LN(1-(2*p0335-1)^2)/2)^2-LN(1-(2*p0335-1)^2)/0.140012289)-(2/(pi()*0.140012289)+LN(1-(2*p0335-1)^2)/2)))
- p1162: 2.64553e-5; = p1161/p0818
- p1932: 0
- p2775: 4.09135e-7; = p2384*(p1078+p1080)
- p3175: 0; = p2394*p1023
- p1036: 8.45169e8; = IF(p1012=0;p0795*p0702*1000*p0796/100;0)
- p2798: 0; = p2407*(p1019+p1021)
- p2180: 2.06833e-8; = p3233*p1188/(p0818)
- p3393: 0.00213589; = p3374*p1234
- p3252: 7.03189e7; = p1252*(p1267*(1-p3247)+p1270*(1-p3248)+p1271*(1-p3249)+p1272*(1-p3250))
- p4353: 0; = p1798*p3480
- p3278: 0.46
- p1127: 0.1258; = if(p1121=0;p0721/100;0)
- p0976: 0; = IF(p0687=0;IF(OR(p0686=0;p0689=0);0;p0686*1000*p0689/100);0)
- p1721: 0
- p0780: 68.877; = p0120*(1+p0648*p0252/100)
- p2371: 0.00175475; = p2225*p2200
- p3015: 0; = p2429*(p1129+p1131)
- p2700: 5.09746e-6; = p2309*(p1078+p1080)
- p3081: 0; = p2300*p1082
- p2001: 400
- p4265: 3.1937e-8; = p1916*p3479
- p1724: 0
- p2082: 0.285294
- p3295: 0.58
- p1739: 0
- p1147: 0.082617
- p2694: 1.26257e-5; = p2303*(p1078+p1080)
- p2363: 5.76098e-5; = p2225*p2191
- p1091: 1.27471e-5; = IF(p1071=0;p1085*p0001/(p0818*p0002);0)
- p0124: 107.138
- p1289: 0
- p1573: 0
- p3343: 1.65014e8; = if(and(p1232=0;p3254<>0);IF((p3339+p3340+p3341+p3342)+(p3254*(p3269*(1-p3277))/p3338)>p3254;p3254-(p3339+p3340+p3341+p3342);p3254*(p3269*(1-p3277))/p3338);0)
- p0105: 74.429
- p2187: 0.000192523; = 4*1.00794*p2186/(2*14.0067)
- p0705: 49.682; = p0045*(1+p0573*p0177/100)
- p2735: 1.47563e-6; = p2344*(p1078+p1080)
- p3447: 0; = p3371*p1240
- p2362: 0.000229088; = p2225*p2190
- p2221: 0.00173108; = p1155-p2220
- p2266: 3.15469e-6; = p2226*p2212
- p0313: 0.5
- p1320: 0; = IF(((p0745*1000*p0747/100)+(p0754*1000*p0756/100))/p0801<0;0;((p0745*1000*p0747/100)+(p0754*1000*p0756/100))/p0801)
- p1754: 4.27435e-6; = p1346*1000/p0818
- p0696: 0
- p1064: 0.00907907; = IF(p1012=0;p1050/(p1057*p0818);0)
- p1167: 0.5
- p2926: 0.000129273; = p2340*(p1079+p1081)
- p3103: 0; = p2322*p1023
- p3416: 0.00151978; = p3378*p1238
- p4657: 7.85939e-9; = p1896*p3481
- p3315: 0.00443516; = if(and(p1232=0;p3253<>0);p3264*p3289;0)
- p0917: 0.958222; = (p0825+p0827+(p0830+p0895))/p0818-(p0900+p0905+p0910+p0915)
- p0118: 30.732
- p1554: 0
- p4554: 3.90022e-7; = p1793*p3481
- p1294: 0; = p1290*p1252/p0818
- p0842: -0.445511
- p1204: 0.980791
- p1556: 0
- p2801: 0; = p2410*(p1019+p1021)
- p0701: 0
- p4760: 0; = p1793*p3482
- p3017: 0; = p2431*(p1129+p1131)
- p1086: 541687; = IF(p1071=0;p1080*(p0710/100)*p0703*1000;0)
- p3270: 0.0747083
- p1601: 0
- p1394: 1092
- p2555: 4.04551e-5; = p2359*p1014
- p3406: 0; = p3368*p1238
- p3216: 0.06; = IF(OR(p1226=0;p1228=0);0;1-p3213-p3214-p3215)
- p2393: 0; = p2234*p2182
- p3121: 0; = p2340*p1082
- p0663: 0; = IF(p0399<0.5;-SQRT(p0007*EXP(p0531^2*p0008)-p0007);SQRT(p0007*EXP(p0531^2*p0008)-p0007))
- p0958: 0; = if(and(p0683>0;or(p0807=480;p0807=32;p0807=1;and(p0807=60;p0901<0.03)));p0934;0)
- p2005: 3.06476e7; = p1963*p0818+p1959*1000+p1170+p1176+p1182
- p1995: 50
- p0246: 8.279
- p3124: 0; = p2343*p1082
- p1576: 0
- p2704: 0.000156217; = p2313*(p1128+p1130)
- p3218: 0.00915414; = p3214*p1228
- p2757: 0.000127098; = p2366*(p1019+p1021)
- p3019: 0; = p2238*p1023
- p3302: 0.0114097; = if(and(p1232=0;p3252<>0);p3258*(p3278*(p3282*p1256+p3286*(p1253+p1257)+p1258*p3288+p3297*p3287));0)
- p2916: 7.08725e-7; = p2330*(p1020+p1022)
- p4571: 1.52276e-7; = p1810*p3481
- p1344: 278444; = IF(p1318=0;p1327*p0801;0)
- p0409: 0; = SQRT(2)*(IF((2*p0277-1)<0;-1;IF((2*p0277-1)>0;1;0))*SQRT(SQRT((2/(pi()*0.140012289)+LN(1-(2*p0277-1)^2)/2)^2-LN(1-(2*p0277-1)^2)/0.140012289)-(2/(pi()*0.140012289)+LN(1-(2*p0277-1)^2)/2)))
- p2510: 7.11637e-5; = p2314*p1123
- p1773: 0
- p4484: 0; = p1929*p3480
- p3245: 0; = IF(p3244=1;0;if(p3244+p0792/100>1;1-p3244;p0792/100))
- p0008: 0.0739645; = (p0007-1.5)/(p0007-1)^2
- p2039: 3.39402e-7; = p2015*p2037*p2038/(p0818*1000)
- p2093: 0.260958
- p0480: 0; = SQRT(2)*(IF((2*p0348-1)<0;-1;IF((2*p0348-1)>0;1;0))*SQRT(SQRT((2/(pi()*0.140012289)+LN(1-(2*p0348-1)^2)/2)^2-LN(1-(2*p0348-1)^2)/0.140012289)-(2/(pi()*0.140012289)+LN(1-(2*p0348-1)^2)/2)))
- p1784: 0
- p2658: 8.97871e-6; = p2267*(p1078+p1080)
- p2627: 0; = p2431*p1123
- p3951: 1.09284e-6; = p1808*p3478
- p1088: 0; = IF(p1071=0;p1082*(p0710/100)*p0703*1000;0)
- p2263: 0.000110353; = p2226*p2209
- p1821: 0
- p3425: 0; = p3368*p1239
- p3458: 0; = p3363*p1241
- p3691: 0; = p1754*p3477
- p0251: 18.715
- p3191: 0; = p2410*p1023
- p2047: 1.45406e-14; = p2015*p2045/(p0818*1000000000000)
- p1589: 0.897233
- p1156: 0.0917535; = p1064+p1065+p1066+p1067+p1068+p1069+p1070+p1116+p1117+p1118+p1119+p1120+p1154+p1155
- p2857: 5.31451e-5; = p2271*(p1079+p1081)
- p1963k: 1.50464e-6; = p1744*p1948+p1745*p1949+p1746*p1950+p1747*p1951+p1748*p1952+p1749*p1953+p1750*p1954+p1751*p1955+p1752*p1956+p1753*p1957+p1961*p1962
- p0328: 0.5
- p0275: 0.5
- p1871: 0
- p2369: 8.89111e-6; = p2225*p2198
- p2628: 0.000272482; = p2237*(p1019+p1021)
- p0254: 3.246
- p2796: 0; = p2405*(p1019+p1021)
- p2279: 0.000124613; = p2223*p2185
- p0803: 100000
- p2556: 0.000517529; = p2360*p1014
- p2122: 0.341195
- p2089: 0.40001
- p0726: 66.154; = p0066*(1+p0594*p0198/100)
- p2096: 0.486404
- p2427: 0; = p2235*p2217
- p1814: 0
- p0710: 96.939; = p0050*(1+p0578*p0182/100)
- p0306: 0.5
- p3254: 3.1947e8; = p1252*(p1287*(1-p3247)+p1290*(1-p3248)+p1291*(1-p3249)+p1292*(1-p3250))
- p0878: 0; = p0867*p0856
- p0712: 17.582; = p0052*(1+p0580*p0184/100)
- p1283: 0; = p1277*p1252/p0818
- p5074: 9.65525e-8; = p1901*p3483
- p1963a: 0.000156334; = p1550*p1754+p1551*p1755+p1552*p1756+p1553*p1757+p1554*p1758+p1555*p1759+p1556*p1760+p1557*p1761+p1558*p1762+p1559*p1763+p1560*p1764+p1561*p1765+p1562*p1766+p1563*p1767+p1564*p1768+p1565*p1769+p1566*p1770+p1567*p1771+p1568*p1772
- p1649: 0
- p2590: 0; = p2394*p1014
- p1144: 0; = if(p1121=0;p1138*p0001/(p0818*p0002);0)
- p2732: 5.16183e-5; = p2341*(p1078+p1080)
- p2301: 0.000237578; = p2227*p2208
- p0904: 8.82788e8; = p0825*p0901+p0827*p0902+(p0830+p0895)*p0824*p0903
- p3363: 0; = if(p1232=0;p3244*p3357/p0818;0)
- p0183: 13.588
- p0685: 10.227; = p0025*(1+p0553*p0157/100)
- p3412: 0.00101125; = p3374*p1238
- p1735: 0.749667
- p4677: 6.87697e-9; = p1916*p3481
- p2030: 10.68
- p5187: 2.49376e-8; = p1808*p3484
- p0211: 6.245
- p2869: 3.88667e-5; = p2283*(p1020+p1022)
- p1301: 0; = IF(p1297+p1300=p1265;0;IF(p1297+p1300+p1299>p1265;p1265-(p1297+p1300);p1299))
- p0688: 0
- p2574: 2.83406e-5; = p2378*p1073
- p3430: 0; = p3373*p1239
- p2614: 0; = p2418*p1073
- p3310: 3.14094e7; = if(and(p1232=0;p3252<>0);IF((p3306+p3307+p3308+p3309)+(p3252*(p3257*(1-p3277))/p3305)>p3252;p3252-(p3306+p3307+p3308+p3309);p3252*(p3257*(1-p3277))/p3305);0)
- p0902: 0.0130121
- p2445: 0.000110643; = p2249*p1014
- p3117: 0; = p2336*p1082
- p2947: 5.62298e-5; = p2361*(p1020+p1022)
- p1221: 0.155559; = p1216*(1+p1220*p1217/100)
- p2821: 0; = p2430*(p1128+p1130)
- p1594: 0.735896
- p1888: 0
- p2803: 0; = p2412*(p1019+p1021)
- p5113: 1.98562e-6; = p1940*p3483
- p0690: 0
- p2148: 2.36565e-8; = p2015*p2076*p2110/(p0818*1000)
- p2489: 0.000602593; = p2293*p1014
- p2193: 0.00630808; = p1054/p0818
- p0983: 0; = if(p0886=0;0;min(1;(p0695*p0694*1000*p0697/100)/p0886))
- p4309: 0; = p1754*p3480
- p3404: 0; = p3366*p1238
- p0371: 0.5
- p2254: 0.000683286; = p2222*p2200
- p2970: 4.63355e-7; = p2384*(p1079+p1081)
- p2848: 7.52219e-5; = p2262*(p1079+p1081)
- p2317: 1.485e-5; = p2224*p2184
- p3945: 1.52997e-5; = p1802*p3478
- p1962: 3.00928e-6; = p1960*1000/p0818
- p0784: 107.138; = p0124*(1+p0652*p0256/100)
- p1604: 0.92902
- p0185: 31.388
- p1848: 0
- p3075: 0; = p2294*p1023
- p3307: 3.09723e6; = if(and(p1232=0;p3252<>0);p3252*(p3258-p3302)/p3305;0)
- p1720: 0
- p3385: 0; = p3366*p1234
- p3745: 0; = p1808*p3477
- p0848: 0.158241
- p0348: 0.5
- p1238: 0.31321; = if(p1232>0;0;IF(p1234=1;0;IF(p1234+p1235>1;1-p1234;p1235)))
- p2604: 0; = p2408*p1014
- p3238: 0.854735; = IF(p3237+p3235+p3236>1;1-(p3235+p3236);p3237)
- p3224: 0.501945; = IF(p3216=0;0;1-p3221-p3222-p3223)
- p2133: 1.92556e-7; = p2015*p2061*p2095/(p0818*1000)
- p3370: 0; = if(p1232=0;p3245*p3358/p0818;0)
- p1462: 2
- p0759: 0
- p2232: 0.0653381; = if(p0783*p0787+p0784*p0788+p0785*p0789+p0786*p0790=0;0;p0789*p0785/(p0783*p0787+p0784*p0788+p0785*p0789+p0786*p0790))
- p2946: 0.000292661; = p2360*(p1020+p1022)
- p0675: 0
- p0669: 42.7409; = p0009*(1+p0537*p0141/100)
- p4357: 0; = p1802*p3480
- p2444: 0.000516151; = p2248*p1014
- p3853: 0; = p1916*p3477
- p3158: 0; = p2377*p1082
- p1792: 0
- p4569: 7.6629e-8; = p1808*p3481
- p2385: 2.66338e-6; = p2229*p2214
- p0851: 0.5
- p1890: 0
- p3334: 0.2408; = IF(or(p3254=0;p1232>0);0;p3269*p3277*(p3300*p3292+(1-p3300)*p3296))
- p3104: 0; = p2323*p1023
- p0046: 5.058
- p2034: 2.32363e-6; = p2015*p2030*p2032/(p0818*1000)
- p0932: 0; = p0801*p0926
- p1828: 0
- p2036: 2.85281e-6; = p2015*p2030*(1-p2032)/(p0818*1000)
- p2293: 0.0012129; = p2223*p2200
- p0860: 0; = p0672*1000/p0856
- p1340: 0; = p1325*p0801
- p2553: 8.95677e-5; = p2357*p1014
- p3087: 0; = p2306*p1082
- p0284: 0.5
- p2536: 0.000175958; = p2340*p1073
- p1385: 397
- p3214: 0.376406; = p1222*40.078/100.0869
- p2412: 0; = p2234*p2202
- p1292: 0.76584; = IF(p1287+p1290+p1291=p1261;0;p1261-(p1287+p1290+p1291))
- p2836: 0.000618489; = p2250*(p1020+p1022)
- p1237: 0; = if(p1232>0;0;p0729/100)
- p1666: 0.885279
- p1200: 0.84
- p2305: 3.0713e-6; = p2227*p2212
- p1610: 0
- p2629: 5.98132e-5; = p2238*(p1019+p1021)
- p2837: 5.92618e-7; = p2251*(p1020+p1022)
- p2225: 0.422953; = if(p0765*p0769+p0766*p0770+p0767*p0771+p0768*p0772=0;0;p0772*p0768/(p0765*p0769+p0766*p0770+p0767*p0771+p0768*p0772))
- p2654: 3.00358e-5; = p2263*(p1078+p1080)
- p0115: 50.031
- p2400: 0; = p2234*p2189
- p2241: 0.00022031; = p2222*p2186
- p1311: 0; = IF(p1307+p1310=p1266;0;IF(p1307+p1310+p1309>p1266;p1266-(p1307+p1310);p1309))
- p1756: 0
- p1551: 0
- p0242: 23.01
- p3236: 0.0140975
- p1068: 0.0210269; = IF(p1012=0;p1054/(p1061*p0818);0)
- p0849: 0.0657513
- p3222: 0.224242; = IF(p3216=0;0;p1223*40.078/100.0869)
- p2054: 0.91
- p2025: 8.1284e-7; = p2015*p2023*p2024/(p0818*1000)
- p2178: 0.0690604; = (p0895*p0831/(1-p0831))/(p0818)
- p0722: 19.425; = p0062*(1+p0590*p0194/100)
- p2722: 1.23253e-6; = p2331*(p1019+p1021)
- p0711: 41.957; = p0051*(1+p0579*p0183/100)
- p0804: 0
- p0509: 0; = SQRT(2)*(IF((2*p0377-1)<0;-1;IF((2*p0377-1)>0;1;0))*SQRT(SQRT((2/(pi()*0.140012289)+LN(1-(2*p0377-1)^2)/2)^2-LN(1-(2*p0377-1)^2)/0.140012289)-(2/(pi()*0.140012289)+LN(1-(2*p0377-1)^2)/2)))
- p3109: 0; = p2328*p1023
- p1434: 10
- p1669: 0
- p1598: 0.392863
- p0832: 1.33662e10; = p0831*p0830/(1-p0831)
- p1170: 2947.92; = p1169*p0801
- p0274: 0.5
- p0204: 12.576
- p1254: 0; = if(p1232>0;0;p0736/100)
- p1135: 2.36103e6; = if(p1121=0;p1129*(p0716/100)*p0703*1000;0)
- p1969: 100000; = p0803
- p0498: 0; = SQRT(2)*(IF((2*p0366-1)<0;-1;IF((2*p0366-1)>0;1;0))*SQRT(SQRT((2/(pi()*0.140012289)+LN(1-(2*p0366-1)^2)/2)^2-LN(1-(2*p0366-1)^2)/0.140012289)-(2/(pi()*0.140012289)+LN(1-(2*p0366-1)^2)/2)))
- p3266: 0.0545989
- p3129: 0; = p2348*p1082
- p3400: 0; = p3362*p1238
- p2986: 0; = p2400*(p1020+p1022)
- p0317: 0.5
- p0935: 2.78109e-5; = p0929*p0001/(p0818*p0002)
- p3190: 0; = p2409*p1023
- p0438: 0; = SQRT(2)*(IF((2*p0306-1)<0;-1;IF((2*p0306-1)>0;1;0))*SQRT(SQRT((2/(pi()*0.140012289)+LN(1-(2*p0306-1)^2)/2)^2-LN(1-(2*p0306-1)^2)/0.140012289)-(2/(pi()*0.140012289)+LN(1-(2*p0306-1)^2)/2)))
- p3077: 0; = p2296*p1023
- p2432: 0.0238607; = p1158
- p1244: 0; = if(p1232>0;0;p1239*(p0725/100)*p0723*1000)
- p2549: 9.95214e-6; = p2353*p1123
- p2791: 0; = p2400*(p1019+p1021)
- p0367: 0.5
- p2151: 8.06862e-9; = p2015*p2079*p2113/(p0818*1000)
- p0202: 26.914
- p2688: 0.000161532; = p2297*(p1078+p1080)
- p2240: 7.02005e-5; = p2222*p2185
- p2515: 7.97513e-5; = p2319*p1014
- p2512: 9.74312e-5; = p2316*p1014
- p1752: 0
- p2021: 1.25639e-5; = p2020/p0818
- p1116: 0.000135091; = IF(p1071=0;p1106/(p1111*p0818);0)
- p2824: 7.56177e-5; = p2238*(p1020+p1022)
- p2046: 10
- p3251: 2.92005e9; = p1252-(p3252+p3253+p3254+p3255+p3256)
- p0484: 0; = SQRT(2)*(IF((2*p0352-1)<0;-1;IF((2*p0352-1)>0;1;0))*SQRT(SQRT((2/(pi()*0.140012289)+LN(1-(2*p0352-1)^2)/2)^2-LN(1-(2*p0352-1)^2)/0.140012289)-(2/(pi()*0.140012289)+LN(1-(2*p0352-1)^2)/2)))
- p2296: 0.000857976; = p2223*p2203
- p2905: 4.50991e-5; = p2319*(p1020+p1022)
- p0084: 44.593
- p2159: 8.66195e-7; = p2015*p2083*p2121/(p0818*1000)
- p0909: 1.50902e8; = p0825*p0906+p0827*p0907+(p0830+p0895)*p0824*p0908
- p2875: 0.00109788; = p2289*(p1020+p1022)
- p3461: 0; = p3366*p1241
- p0953: 2.78109e-5; = if(and(p0683>0;or(p0807=56;p0807=100;and(p0807=60;p0901>0.06)));p0935;0)
- p3110: 0; = p2329*p1023
- p2537: 7.95705e-5; = p2341*p1073
- p2491: 3.71818e-5; = p2295*p1014
- p2971: 8.20986e-7; = p2385*(p1079+p1081)
- p4289: 4.31606e-6; = p1940*p3479
- p0766: 80.794; = p0106*(1+p0634*p0238/100)
- p3398: 0.000169587; = p3379*p1234
- p0864: 0.872832; = IF(p0858=1;0;IF(p0858+p0859>1;1-p0858;p0859))
- p1831: 0
- p1859: 0
- p0375: 0.5
- p1740: 0
- p0195: 0
- p0418: 0; = SQRT(2)*(IF((2*p0286-1)<0;-1;IF((2*p0286-1)>0;1;0))*SQRT(SQRT((2/(pi()*0.140012289)+LN(1-(2*p0286-1)^2)/2)^2-LN(1-(2*p0286-1)^2)/0.140012289)-(2/(pi()*0.140012289)+LN(1-(2*p0286-1)^2)/2)))
- p0836: 4.70601e9; = p0831*p0835*p0801/(1-p0831)
- p3072: 0; = p2291*p1023
- p0955: 3.67963e-5; = if(and(p0683>0;or(p0807=56;p0807=100;and(p0807=60;p0901>0.06)));p0937;0)
- p3034: 0; = p2253*p1023
- p1278: 0
- p2265: 0.000623953; = p2226*p2211
- p0907: 0.00295453
- p4157: 3.55869e-7; = p1808*p3479
- p1030: 6.03675e-5; = IF(p1012=0;p1024*p0001/(p0818*p0002);0)
- p3248: 0
- p3065: 0; = p2284*p1023
- p0325: 0.5
- p0895: 5.31779e9; = p0894*p0830
- p2639: 0.000230877; = p2248*(p1019+p1021)
- p3364: 0; = if(p1232=0;p3244*p3358/p0818;0)
- p2388: 7.85621e-6; = p2229*p2217
- p0783: 123.816; = p0123*(1+p0651*p0255/100)
- p2693: 2.92418e-5; = p2302*(p1078+p1080)
- p2913: 4.55889e-5; = p2327*(p1020+p1022)
- p0520: 0; = SQRT(2)*(IF((2*p0388-1)<0;-1;IF((2*p0388-1)>0;1;0))*SQRT(SQRT((2/(pi()*0.140012289)+LN(1-(2*p0388-1)^2)/2)^2-LN(1-(2*p0388-1)^2)/0.140012289)-(2/(pi()*0.140012289)+LN(1-(2*p0388-1)^2)/2)))
- p1625: 0
- p1661: 0
- p2468: 0.000437044; = p2272*p1123
- p0405: 0; = SQRT(2)*(IF((2*p0273-1)<0;-1;IF((2*p0273-1)>0;1;0))*SQRT(SQRT((2/(pi()*0.140012289)+LN(1-(2*p0273-1)^2)/2)^2-LN(1-(2*p0273-1)^2)/0.140012289)-(2/(pi()*0.140012289)+LN(1-(2*p0273-1)^2)/2)))
- p0095: 26.046
- p2577: 9.10943e-7; = p2381*p1073
- p1857: 0
- p2492: 0.00042626; = p2296*p1014
- p1596: 0
- p0595: 0; = IF(p0331<0.5;-SQRT(p0007*EXP(p0463^2*p0008)-p0007);SQRT(p0007*EXP(p0463^2*p0008)-p0007))
- p2855: 6.79904e-5; = p2269*(p1079+p1081)
- p4769: 0; = p1802*p3482
- p3402: 0; = p3364*p1238
- p2484: 0.000196402; = p2288*p1014
- p2685: 0.000115559; = p2294*(p1019+p1021)
- p0043: 5798.99
- p3533: 1.65017e-6; = p1802*p3476
- p2144: 5.56136e-8; = p2015*p2072*p2106/(p0818*1000)
- p2831: 2.50623e-5; = p2245*(p1020+p1022)
- p3435: 0; = p3378*p1239
- p1047: 0.317801; = IF(p1012=0;IF(p1037+p1044+p1045+p1046=1;0;IF(p1037+p1044+p1045+p1046+p1041>1;1-(p1037+p1044+p1045+p1046);p1041));0)
- p2632: 4.89595e-5; = p2241*(p1019+p1021)
- p1164: 49975.7; = p1163*p0801
- p2196: 0.0133666; = p1068-p2193-p2195
- p4975: 2.29207e-6; = p1802*p3483
- p1695: 0
- p1903: 0
- p1129: 0.45057; = if(p1121=0;IF(p1123+p1128=1;0;IF(p1123+p1128+p1125>1;1-(p1123+p1128);p1125));0)
- p3271: 0.0195489
- p0617: 0; = IF(p0353<0.5;-SQRT(p0007*EXP(p0485^2*p0008)-p0007);SQRT(p0007*EXP(p0485^2*p0008)-p0007))
- p2871: 1.11876e-5; = p2285*(p1020+p1022)
- p2548: 5.72707e-6; = p2352*p1123
- p2859: 0.00403424; = p2273*(p1129+p1131)
- p1662: 0
- p1963j: 1.91456e-5; = p1725*p1929+p1726*p1930+p1727*p1931+p1728*p1932+p1729*p1933+p1730*p1934+p1731*p1935+p1732*p1936+p1733*p1937+p1734*p1938+p1735*p1939+p1736*p1940+p1737*p1941+p1738*p1942+p1739*p1943+p1740*p1944+p1741*p1945+p1742*p1946+p1743*p1947
- p3079: 0; = p2298*p1082
- p3704: 0; = p1767*p3477
- p1627: 0
- p3021: 0; = p2240*p1023
- p2011: 0.00113839
- p4756: 0; = p1789*p3482
- p2981: 0; = p2395*(p1020+p1022)
- p3128: 0; = p2347*p1082
- p3100: 0; = p2319*p1023
- p2218: 0.0110615; = p1150/p0818
- p1996: 30
- p3442: 0; = p3366*p1240
- p0516: 0; = SQRT(2)*(IF((2*p0384-1)<0;-1;IF((2*p0384-1)>0;1;0))*SQRT(SQRT((2/(pi()*0.140012289)+LN(1-(2*p0384-1)^2)/2)^2-LN(1-(2*p0384-1)^2)/0.140012289)-(2/(pi()*0.140012289)+LN(1-(2*p0384-1)^2)/2)))
- p4308: 5.07849e-5; = p1963*p3479
- p2356: 5.23399e-5; = p2225*p2184
- p0651: 0; = IF(p0387<0.5;-SQRT(p0007*EXP(p0519^2*p0008)-p0007);SQRT(p0007*EXP(p0519^2*p0008)-p0007))
- p2228: 0.459791; = if(p0774*p0778+p0775*p0779+p0776*p0780+p0777*p0781=0;0;p0780*p0776/(p0774*p0778+p0775*p0779+p0776*p0780+p0777*p0781))
- p1713: 0
- p0262: 25.888
- p0391: 0.5
- p2111: 0.856281
- p2571: 1.16545e-5; = p2375*p1073
- p1839: 0
- p2449: 3.78173e-6; = p2253*p1014
- p2819: 0; = p2428*(p1128+p1130)
- p0915: 0.0101352; = p0914/p0818
- p1265: 0; = if(p1232>0;0;IF(p1259+p1263+p1264=1;0;IF(p1259+p1263+p1264+p1262>1;1-(p1259+p1263+p1264);p1262)))
- p2291: 6.14564e-6; = p2223*p2198
- p0343: 0.5
- p0744: 44.593; = p0084*(1+p0612*p0216/100)
- p3197: 0; = p2416*p1082
- p3985: 1.40107e-7; = p1842*p3478
- p3702: 0; = p1765*p3477
- p3051: 0; = p2270*p1082
- p2061: 0.518824
- p2745: 0.000699762; = p2354*(p1019+p1021)
- p3281: 0.46
- p1686: 0
- p2682: 1.36574e-6; = p2291*(p1019+p1021)
- p4856: 0; = p1889*p3482
- p2993: 0; = p2407*(p1020+p1022)
- p2665: 0.00015014; = p2274*(p1128+p1130)
- p2695: 0.000165338; = p2304*(p1078+p1080)
- p4831: 0; = p1864*p3482
- p2941: 0.000194194; = p2355*(p1020+p1022)
- p0912: 0.0117949
- p1879: 0
- p2719: 0.00035646; = p2328*(p1019+p1021)
- p2513: 7.37777e-6; = p2317*p1014
- p2321: 0.000295548; = p2224*p2188
- p1630: 0
- p2274: 0.000447312; = p2230*p2220
- p1900: 0
- p0698: 0
- p1334: 3.9735e6; = p1322*p0801
- p1531: 20
- p2479: 6.87302e-5; = p2283*p1014
- p0837: 0.5
- p2768: 2.21427e-6; = p2377*(p1078+p1080)
- p3474: 6.4729e-6; = p3379*p1241
- p4083: 1.32542e-5; = p1940*p3478
- p1089: 4.94205e-5; = IF(p1071=0;p1083*p0001/(p0818*p0002);0)
- p2015: 2.06377e7; = p0830*p2011*p2013
- p5069: 1.67917e-8; = p1896*p3483
- p2018: 0.1978
- p1336: 0; = p1323*p0801
- p1672: 0
- p1663: 0
- p3207: 0; = p2426*p1082
- p2847: 0.000456936; = p2261*(p1079+p1081)
- p0684: 4.431; = p0024*(1+p0552*p0156/100)
- p3280: 0.375
- p4464: 0; = p1909*p3480
- p1095: 3.40769e8; = IF(p1071=0;p0797*p0702*1000*p0798/100;0)
- p0951: 0; = if(and(p0683=0;or(p0807=480;p0807=32;p0807=1;and(p0807=60;p0901<0.03)));p0939;0)
- p3413: 0.000229096; = p3375*p1238
- p0923: 0.228842; = IF(p0918=1;0;IF(p0918+p0919>1;1-p0918;p0919))
- p3170: 0; = p2389*p1132
- p0929: 1.32728e6; = p0801*p0923
- p3444: 0; = p3368*p1240
- p2334: 3.07194e-5; = p2224*p2202
- p2188: 0.00246288; = p1066-p2186-p2187
- p2570: 0.000616685; = p2374*p1014
- p2937: 0.000587016; = p2351*(p1129+p1131)
- p3466: 0; = p3371*p1241
- p0880: 0; = p0868*p0856
- p3391: 0; = p3372*p1234
- p3265: 0.696292
- p0416: 0; = SQRT(2)*(IF((2*p0284-1)<0;-1;IF((2*p0284-1)>0;1;0))*SQRT(SQRT((2/(pi()*0.140012289)+LN(1-(2*p0284-1)^2)/2)^2-LN(1-(2*p0284-1)^2)/0.140012289)-(2/(pi()*0.140012289)+LN(1-(2*p0284-1)^2)/2)))
- p2051: 1.18566e-5; = p2015*p2049*p2050/(p0818*1000)
- p2915: 4.31796e-7; = p2329*(p1020+p1022)
- p3054: 0; = p2273*p1132
- p2838: 9.72687e-7; = p2252*(p1020+p1022)
- p1146: 0.917383
- p2450: 0.00033947; = p2254*p1014
- p0384: 0.5
- p1583: 0
- p1712: 0.60504
- p0948: 0; = if(and(p0683=0;or(p0807=480;p0807=32;p0807=1;and(p0807=60;p0901<0.03)));p0936;0)
- p1834: 0
- p1651: 0.299611
- p4563: 1.07281e-6; = p1802*p3481
- p2475: 6.19102e-5; = p2279*p1014
- p1750: 0
- p2812: 0; = p2421*(p1078+p1080)
- p3311: 4.83128e6; = if(and(p1232=0;p3252<>0);p3252-(p3306+p3307+p3308+p3309+p3310);0)
- p2585: 1.79303e-5; = p2389*p1123
- p3272: 0.0398246
- p1128: 0.31854; = if(p1121=0;IF(p1123=1;0;IF(p1123+p1124>1;1-p1123;p1124));0)
- p2156: 1.10354e-8; = p2015*p2085*p2118/(p0818*1000)
- p0992: 0; = p0988*p0001*p0004/(p0818*p0002)
- p1945: 0
- p3353: 0; = if(and(p1232=0;p3256<>0);p3256*(p3276-p3348)/p3349;0)
- p2351: 0.00101849; = p2232*p2219
- p3250: 0.875
- p0676: 911.576; = p0016*(1+p0544*p0148/100)
- p1264: 0.76584; = if(p1232>0;0;IF(p1259+p1263=1;0;IF(p1259+p1263+p1261>1;1-(p1259+p1263);p1261)))
- p3467: 0; = p3372*p1241
- p1702: 0
- p3380: 0.0685785; = p3251/p0818
- p0683: 27272.5; = p0023*(1+p0551*p0155/100)
- p3134: 0; = p2353*p1132
- p2482: 0.000160102; = p2286*p1014
- p0869: 0.00437931; = IF(p0858+p0864+p0865+p0866+p0867+p0868=1;0;1-(p0858+p0864+p0865+p0866+p0867+p0868))
- p0145: 0
- p1624: 0
- p1965: 0.000490544; = p1963+p1959*p1964*1000/p0818
- p3284: 0.275
- p2413: 0; = p2234*p2203
- p2687: 0.000190668; = p2296*(p1019+p1021)
- p2978: 1.83802e-5; = p2392*(p1129+p1131)
- p1274: 0; = p1270*p1252/p0818
- p1956: 0
- p1938: 1.33867e-6; = p1530*1000/p0818
- p0181: 29.319
- p2272: 0.00496698; = p2230*p2218
- p2917: 1.55821e-6; = p2331*(p1020+p1022)
- p1138: 0; = if(p1121=0;p1132*(p0716/100)*p0703*1000;0)
- p2392: 3.18901e-5; = p2233*p2221
- p0349: 0.5
- p2959: 3.04193e-5; = p2373*(p1020+p1022)
- p0508: 0; = SQRT(2)*(IF((2*p0376-1)<0;-1;IF((2*p0376-1)>0;1;0))*SQRT(SQRT((2/(pi()*0.140012289)+LN(1-(2*p0376-1)^2)/2)^2-LN(1-(2*p0376-1)^2)/0.140012289)-(2/(pi()*0.140012289)+LN(1-(2*p0376-1)^2)/2)))
- p2287: 0.00184417; = p2223*p2193
- p2808: 0; = p2417*(p1078+p1080)
- p2592: 0; = p2396*p1014
- p0532: 0; = SQRT(2)*(IF((2*p0400-1)<0;-1;IF((2*p0400-1)>0;1;0))*SQRT(SQRT((2/(pi()*0.140012289)+LN(1-(2*p0400-1)^2)/2)^2-LN(1-(2*p0400-1)^2)/0.140012289)-(2/(pi()*0.140012289)+LN(1-(2*p0400-1)^2)/2)))
- p1620: 0
- p4701: 9.29373e-7; = p1940*p3481
- p5189: 4.95555e-8; = p1810*p3484
- p3042: 0; = p2261*p1082
- p0536: 0; = SQRT(2)*(IF((2*p0404-1)<0;-1;IF((2*p0404-1)>0;1;0))*SQRT(SQRT((2/(pi()*0.140012289)+LN(1-(2*p0404-1)^2)/2)^2-LN(1-(2*p0404-1)^2)/0.140012289)-(2/(pi()*0.140012289)+LN(1-(2*p0404-1)^2)/2)))
- p2426: 0; = p2235*p2216
- p2991: 0; = p2405*(p1020+p1022)
- p4495: 0; = p1940*p3480
- p2059: 1.00168
- p1080: 0.09636; = IF(p1071=0;IF(p1073+p1078+p1079=1;0;IF(p1073+p1078+p1079+p1076>1;1-(p1073+p1078+p1079);p1076));0)

## Reference product
- corn grain; at harvest in 1998; at farm; 85%-91% moisture: 1 kg

## Inputs from technosphere
- CUTOFF pesticide, Paraquat dichloride; at point-of-sale; kg AI: 1.08033e-6 kg; = p1901
- CUTOFF seed storage; corn: 0.0011556 kg*a; = p0975
- CUTOFF local area trucking; class 6, average fuel: 0.00254766 metric ton*km; = p2010
- CUTOFF apply N fertilizer; broadcast with incorporation: 6.14586e-6 ha; = p1031
- CUTOFF bulk cargo rail transport; diesel: 0.0636916 metric ton*km; = p2008
- CUTOFF pesticide, 2,4-D; at point-of-sale; kg AI: 4.27435e-6 kg; = p1754
- CUTOFF pesticide, Dicamba; at point-of-sale; kg AI: 1.83186e-6 kg; = p1808
- CUTOFF harvest; corn residue management: 0.000121529 ha; = p1975
- CUTOFF apply pesticide; as foliar or directed spray: 1.79278e-5 ha; = p1339
- CUTOFF sewage sludge; at point-of-sale: 3.42473e-8 kg; = p1190
- CUTOFF pesticide formulation balance; at point-of-sale: 0.000261419 kg; = p1963
- CUTOFF harvest; corn silage: 2.09532e-6 ha; = p1974
- CUTOFF regional or national trucking; class 8, average fuel: 0.00598475 metric ton*km; = p2009
- CUTOFF sewage sludge storage: 1.71236e-8 kg*a; = p1192
- CUTOFF phosphatic fertilizer, other single phosphates; at point-of-sale: 0.000716313 kg; = p1118
- CUTOFF dolomite, pulverized; at point-of-sale: 0.00378317 kg; = p1229
- CUTOFF limestone, high-grade, pulverized; at point-of-sale: 0.0243199 kg; = p1228
- CUTOFF nitrogenous fertilizer, aqueous ammonia; at point-of-sale: 0.000549994 kg; = p1065
- CUTOFF apply gypsum; unspecified method: 0.000121529 ha; = p1165
- CUTOFF pesticide, Imazethapyr; at point-of-sale; kg AI: 2.34854e-8 kg; = p1864
- CUTOFF pesticide, Tebupirimfos; at point-of-sale; kg AI: 1.33867e-6 kg; = p1938
- CUTOFF N inhibitor appl svc; unspec rate & type, 1998 corn: 2.64553e-5 ha; = p1162
- CUTOFF apply manure; broadcast or spray with incorporation: 5.54655e-6 ha; = p1247
- CUTOFF pesticide, Alachlor; at point-of-sale; kg AI: 5.73044e-6 kg; = p1767
- CUTOFF apply pesticide; banded or side-dressed: 2.75763e-5 ha; = p1329
- CUTOFF pesticide, Cyanazine; at point-of-sale; kg AI: 2.56461e-5 kg; = p1802
- CUTOFF nitrogenous fertilizer, urea; at point-of-sale: 0.00911822 kg; = p1070
- CUTOFF phosphatic fertilizer, monoammonium phosphate; at point-of-sale: 0.0038348 kg; = p1120
- CUTOFF apply sewage sludge; unspecified method: 0.000121529 ha; = p1189
- CUTOFF prepare soil; for unspec. till, corn: 1.66997e-8 ha; = p0939
- CUTOFF apply manure; unspec. method: 2.11704e-7 ha; = p1251
- CUTOFF sulfuric acid storage: 6.6539e-9 kg*a; = p1180
- CUTOFF apply manure; broadcast without incorporation: 2.62605e-6 ha; = p1248
- corn silage; at harvest in 1998; at farm; 28%-40% moisture: 0.0798504 kg; = p0819
- CUTOFF apply mixed P fertilizer; with incorporation: 1.13501e-5 ha; = p1092
- CUTOFF pesticide, Glyphosate; at point-of-sale; kg AI: 4.86148e-6 kg; = p1855
- CUTOFF apply K fertilizer; broadcast with incorporation: 3.49747e-5 ha; = p1140
- CUTOFF apply mixed K fertilizer; without incorporation: 1.38113e-5 ha; = p1143
- CUTOFF irrig svc; unspec wat source & rate, 1998 corn: 0.000121529 ha; = p0981
- CUTOFF sulfur; at point-of-sale: 6.92331e-8 kg; = p1172
- CUTOFF pesticide, unspecified type; at point-of-sale; kg AI: 3.00928e-6 kg; = p1962
- CUTOFF apply pesticide; in seed furrow: 3.83032e-5 ha; = p1343
- CUTOFF apply sulfur; unspecified method: 0.000121529 ha; = p1171
- CUTOFF pesticide, Primisulfuron-methyl; at point-of-sale; kg AI: 4.93194e-7 kg; = p1909
- CUTOFF international vessel transport; average fuel: 0.319694 metric ton*km; = p2006
- CUTOFF sulfur storage: 3.46165e-8 kg*a; = p1174
- CUTOFF pesticide, Dicamba-potassium; at point-of-sale; kg AI: 3.64024e-6 kg; = p1810
- CUTOFF apply mixed N fertilizer; with incorporation: 2.08568e-5 ha; = p1033
- CUTOFF planting; for conventional till, corn; <15% residue: 3.78044e-5 ha; = p0952
- CUTOFF apply zinc compounds; unspecified method: 0.000121529 ha; = p1183
- CUTOFF pesticide, Tefluthrin; at point-of-sale; kg AI: 4.69708e-7 kg; = p1939
- CUTOFF potassic fertilizer, potassium chloride; at point-of-sale: 0.0266494 kg; = p1154
- CUTOFF sulfuric acid; at point-of-sale: 1.33078e-8 kg; = p1178
- CUTOFF apply N fertilizer; broadcast without incorporation: 3.9089e-6 ha; = p1032
- CUTOFF planting; for unspec. till, corn: 1.66997e-8 ha; = p0957
- CUTOFF prepare soil; for conventional till, corn; <15% residue: 3.78044e-5 ha; = p0934
- CUTOFF apply P fertilizer; broadcast without incorporation: 1.27471e-5 ha; = p1091
- CUTOFF apply mixed N fertilizer; without incorporation: 3.02287e-5 ha; = p1034
- CUTOFF gypsum storage: 5.8685e-7 kg*a; = p1168
- CUTOFF nitrogenous fertilizer, sodium nitrate; at point-of-sale: 8.00469e-5 kg; = p1069
- CUTOFF planting; for mulch till, corn: 2.78109e-5 ha; = p0953
- CUTOFF planting; for reduced till, corn; 15-30% residue: 3.67963e-5 ha; = p0955
- CUTOFF corn seeds; nonGMO herbicide resistant seed; at point-of-sale: 0.000236367 kg; = p0971
- CUTOFF dairy manure; from unspecified storage; at point-of-sale: 0.00514065 kg; = p1286
- CUTOFF apply P fertilizer; broadcast with incorporation: 2.07096e-5 ha; = p1090
- CUTOFF prepare soil; for mulch till, corn: 2.78109e-5 ha; = p0935
- CUTOFF pesticide, Prosulfuron; at point-of-sale; kg AI: 1.64398e-7 kg; = p1916
- CUTOFF nitrogenous fertilizer, ammonium sulfate; at point-of-sale: 0.00225333 kg; = p1067
- CUTOFF fertilizer filler materials; at point-of-sale: 0.0238607 kg; = p1158
- CUTOFF pesticide storage: 0.000490544 kg*a; = p1965
- corn residue; at harvest in 1998; at farm; 22%-91% moisture: 0.385537 kg; = p0839
- CUTOFF pesticide, Chlorpyrifos; at point-of-sale; kg AI: 9.32371e-6 kg; = p1793
- CUTOFF pesticide, Atrazine; at point-of-sale; kg AI: 0.000165666 kg; = p1771
- CUTOFF apply pesticide; broadcast with incorporation: 0.000255676 ha; = p1333
- CUTOFF pesticide, Nicosulfuron; at point-of-sale; kg AI: 1.87883e-7 kg; = p1896
- CUTOFF prepare soil; for no-till, corn: 1.91005e-5 ha; = p0936
- CUTOFF pesticide, Acetochlor; at point-of-sale; kg AI: 8.53225e-5 kg; = p1765
- CUTOFF zinc compounds; at point-of-sale: 1.90442e-8 kg; = p1184
- CUTOFF pesticide, Simazine; at point-of-sale; kg AI: 4.95542e-6 kg; = p1929
- CUTOFF nitrogenous fertilizer, nitrogen solutions; at point-of-sale: 0.0210269 kg; = p1068
- CUTOFF phosphatic fertilizer, superphos. grades 22% and under; at point-of-sale: 0.000135091 kg; = p1116
- CUTOFF zinc compounds storage: 9.52212e-9 kg*a; = p1186
- CUTOFF pesticide, Terbufos; at point-of-sale; kg AI: 2.22172e-5 kg; = p1940
- CUTOFF nitrogenous fertilizer, anhydrous ammonia; at point-of-sale: 0.00907907 kg; = p1064
- CUTOFF pesticide, Propazine; at point-of-sale; kg AI: 0.000115666 kg; = p1889
- CUTOFF pesticide, beta-Cyfluthrin; at point-of-sale; kg AI: 7.04563e-8 kg; = p1804
- CUTOFF corn seeds; seed, unspec. type; at point-of-sale: 0.00197243 kg; = p0972
- CUTOFF pesticide, Lambda-cyhalothrin; at point-of-sale; kg AI: 4.69708e-8 kg; = p1870
- CUTOFF liming materials storage: 0.0140515 kg*a; = p1231
- CUTOFF apply mixed P fertilizer; without incorporation: 2.35612e-5 ha; = p1093
- CUTOFF domestic barge transport; average fuel: 0.0339688 metric ton*km; = p2007
- CUTOFF apply P fertilizer; no broadcast application: 4.94205e-5 ha; = p1089
- CUTOFF pesticide, Clopyralid; at point-of-sale; kg AI: 6.10621e-7 kg; = p1798
- CUTOFF planting; for no-till, corn: 1.91005e-5 ha; = p0954
- CUTOFF hog manure; from unspecified storage; at point-of-sale: 0.060023 kg; = p1296
- CUTOFF pesticide, Flumetsulam; at point-of-sale; kg AI: 2.34854e-7 kg; = p1842
- CUTOFF apply K fertilizer; no broadcast application: 9.66102e-6 ha; = p1139
- CUTOFF phosphatic fertilizer, diammonium phosphate; at point-of-sale: 0.010547 kg; = p1119
- CUTOFF apply K fertilizer; broadcast without incorporation: 4.94712e-5 ha; = p1141
- CUTOFF apply sulfuric acid; unspecified method: 0.000121529 ha; = p1177
- CUTOFF prepare soil; for reduced till, corn; 15-30% residue: 3.67963e-5 ha; = p0937
- CUTOFF fertilizer storage: 0.0578071 kg*a; = p1160
- CUTOFF gypsum; at point-of-sale: 1.1737e-6 kg; = p1166
- CUTOFF pesticide, Chlorethoxyfos; at point-of-sale; kg AI: 1.38564e-6 kg; = p1789
- CUTOFF apply pesticide; unspecified application methods: 5.8343e-6 ha; = p1345
- CUTOFF potassic fertilizer, other single nutrients; at point-of-sale: 0.00272724 kg; = p1155
- CUTOFF nitrogenous fertilizer, ammonium nitrate; at point-of-sale: 0.00399308 kg; = p1066
- CUTOFF beef manure; from unspecified storage; at point-of-sale: 0.0132117 kg; = p1276
- CUTOFF corn seeds; GMO herbicide resistant seed; at point-of-sale: 0.000102409 kg; = p0970
- CUTOFF phosphatic fertilizer, superphosphate grades over 22%; at point-of-sale: 0.00104288 kg; = p1117
- CUTOFF apply mixed K fertilizer; with incorporation: 1.87862e-6 ha; = p1142
- CUTOFF apply pesticide; broadcast without incorporation: 8.32578e-5 ha; = p1335
- CUTOFF harvest; corn: 0.00011629 ha; = p1971
- CUTOFF apply N fertilizer; no broadcast application: 6.03675e-5 ha; = p1030
- CUTOFF apply liming materials; unspecified method: 0.000121529 ha; = p1227

## Inputs from nature
- Potassium; from plant uptake; biogenic: 0.0101352 kg; = p0915
- Transformation, from annual crop [natural resource, land]: 1.21529 m2; = 1.0 * (p0873+p0871+p0877+p0883)
- Transformation, to annual crop [natural resource, land]: 1.21529 m2; = 1.0 * (p0857)
- Dry matter except CNPK; from plant uptake: 0.958222 kg; = p0917
- Water, unspecified origin: 0.000623817 m3; = p0893*0.001+p0916*0.001
- Carbon dioxide: 2.2277 kg; = p0900*3.6666666667
- Occupation, annual crop [natural resource, land]: 0.54149 m2*year; = 1.0 * (p0855)
- Phosphorus: 0.00354399 kg; = p0910
- Nitrogen: 0.0207326 kg; = p0905

## Emissions to nature
- Monoammonium phosphate; broadcast w/o incorp. in fert. in spr. bef. plant.: 0.000272033 kg; = p2888*8.2142857143
- Other single phosphates; broadcast w/ incorp. in fert. after plant.; kg P: 2.38584e-7 kg; = p2778
- Metolachlor [soil, agricultural]: 0.000115666 kg; = 1.0 * (p4032+p4650+p5062+p4238+p5268+p3620)
- Cyfluthrin [soil, agricultural]: 7.04563e-8 kg; = 1.0 * (p3947+p4565+p4977+p3535+p5183+p4153)
- Superphosphate, grades<= 22%; no broadcast in fert. after plant.; kg P: 6.03136e-8 kg; = p2579
- Dicamba-potassium; broadcast without incorporation: 7.07176e-7 kg; = p4159
- Alachlor [soil, agricultural]: 5.73044e-6 kg; = 1.0 * (p3498+p3910+p4940+p5146+p4528+p4116)
- Other single phosphates; broadcast w/ incorp. in fert. at plant.; kg P: 8.99814e-6 kg; = p2739
- Sulfur dioxide [air, non-urban air or from high stacks]: 5.76776e-7 kg; = 1.0 * (p2041)
- Urea; broadcast w/ incorp. in fert. at plant.: 0.000237168 kg; = p2724*5
- Water: 0.382613 kg; = p2171+p3399+p3475+p3418+p2178+p2181
- Nonvolatile constituents; using unspec. method in man. at unknown time; exc.CNPK,biogenic: 6.4729e-6 kg; = p3474
- Ammonium sulfate; broadcast w/o incorp. in fert. after plant.: 0.000265083 kg; = p2947*4.7142857143
- Carbon [soil, agricultural]: 0.210123 kg; = 1.0 * (p3412+p3242+p3393+p3469+p3217+p2173+p3225+p2167)
- Potassium; using unspec. method in manure at an unknown time: 1.28822e-5 kg; = p3472
- Sodium nitrate; broadcast w/ incorp. in fert. after plant.: 7.30888e-6 kg; = p2759*6.0714285714
- Potassium chloride; broadcast w/o incorp. in fert. in spr. bef. plant.: 0.00660262 kg; = p2897*2.2166666667
- Aqueous ammonia; no broadcast in fert. at plant.: 8.95872e-6 kg; = p2513*1.2142857143
- Nitrogen solution; broadcast w/o incorp. in fert. at plant.; broadcast w/o incorp. in fert. at plant.; kg N: 0.000212673 kg; = p2912
- Nitrogen solution; broadcast w/ incorp. in fert. in spr. bef. plant.; broadcast w/ incorp. in fert. in spr. bef. plan...: 0.00040983 kg; = p2678
- Calcium [soil, agricultural]: 0.0100025 kg; = 1.0 * (p3218+p3226)
- Primisulfuron [soil, agricultural]: 4.93194e-7 kg; = 1.0 * (p5288+p3640+p5082+p4052+p4670+p4258)
- Methyl vinyl ether; from residue burning: 3.67617e-8 kg; = p2137*1.6111111111
- NMVOC, non-methane volatile organic compounds, unspecified origin [air, non-urban air or from high stacks]: 1.24536e-5 kg; = 1.0 * (p2052+p2051)
- Magnesium [soil, agricultural]: 0.000479849 kg; = 1.0 * (p3227)
- Other single K nutrients; no broadcast in fert. after plant.; kg K: 1.61475e-6 kg; = p2587
- Other single phosphates; broadcast w/ incorp. in fert. in spr. bef. plant.; kg P: 5.09746e-6 kg; = p2700
- Dioxins and furans (PCDD/F); from residue burning: 1.45406e-14 kg TEQ; = p2047
- Potassium chloride; broadcast w/o incorp. in fert. after plant.: 0.000260344 kg; = p2975*2.2166666667
- Urea; no broadcast in fert. in spr. bef. plant.: 0.00129173 kg; = p2490*5
- Monoammonium phosphate; broadcast w/ incorp. in fert. at plant.: 0.000424008 kg; = p2732*8.2142857143
- Ammonium nitrate; no broadcast in fert. in fall bef. plant.: 0.000515999 kg; = p2437*4.7142857143
- 1-Butene: 6.48826e-8 kg; = p2144*1.1666666667
- Nitrogen; in below-ground residue: 0.00133079 kg; = p2174
- Superphosphate, grades>22%; no broadcast in fert. after plant.; kg P: 1.11747e-6 kg; = p2581
- Acrylonitrile: 1.62465e-8 kg; = p2156*1.4722222222
- isobutene: 5.66512e-8 kg; = p2150*1.1666666667
- Volatile constituents; using unspec. method in man. at unknown time: 0.00012252 kg; = p3473
- Phosphorous; using unspec. method in manure at an unknown time: 5.50477e-6 kg; = p3471
- Methane: 1.08379e-6 kg; = p2025*1.3333333333
- Anhydrous ammonia; no broadcast in fert. at plant.: 0.000538965 kg; = p2511*1.2142857143
- Superphosphate, grades<= 22%; broadcast w/o incorp. in fert. in spr. bef. plant.; kg P: 9.46729e-7 kg; = p2891
- Pesticides, unspecified [soil, agricultural]: 3.00928e-6 kg; = 1.0 * (p5131+p5337+p3689+p4307+p4719+p4101)
- Superphosphate, grades>22%; no broadcast in fert. at plant.; kg P: 4.21452e-5 kg; = p2542
- Simazine [soil, agricultural]: 4.95542e-6 kg; = 1.0 * (p5102+p4278+p4690+p3660+p5308+p4072)
- Superphosphate, grades>22%; broadcast w/ incorp. in fert. at plant.; kg P: 2.73401e-5 kg; = p2737
- Phenol [air, non-urban air or from high stacks]: 2.51393e-7 kg; = 1.0 * (p2133*1.3055555556)
- Ammonium nitrate; broadcast w/o incorp. in fert. at plant.: 0.00021261 kg; = p2905*4.7142857143
- Pentane [air, non-urban air or from high stacks]: 1.02539e-8 kg; = 1.0 * (p2152*1.0166666667)
- Ammonium sulfate; no broadcast in fert. in fall bef. plant.: 0.000182533 kg; = p2440*4.7142857143
- Superphosphate, grades>22%; no broadcast in fert. in fall bef. plant.; kg P: 2.45236e-5 kg; = p2464
- Diammonium phosphate; broadcast w/o incorp. in fert. in spr. bef. plant.: 0.000779998 kg; = p2884*4.7142857143
- Monoammonium phosphate; no broadcast in fert. after plant.: 1.73305e-5 kg; = p2576*8.2142857143
- Superphosphate, grades<= 22%; broadcast w/ incorp. in fert. at plant.; kg P: 1.47563e-6 kg; = p2735
- Butane [air, non-urban air or from high stacks]: 2.94465e-8 kg; = 1.0 * (p2147*1.0208333333)
- Urea; no broadcast in fert. in fall bef. plant.: 0.000727694 kg; = p2451*5
- trans-2-Butene: 2.75993e-8 kg; = p2148*1.1666666667
- Nitrogen solution; no broadcast in fert. at plant.; no broadcast in fert. at plant.; kg N: 0.000376081 kg; = p2522
- Pesticide formulation balance; foliar or directed spray: 1.09355e-5 kg; = p4720
- Urea; broadcast w/o incorp. in fert. in fall bef. plant.: 0.000411508 kg; = p2841*5
- Aqueous ammonia; broadcast w/ incorp. in fert. in fall bef. plant.: 5.49977e-6 kg; = p2630*1.2142857143
- Imazethapyr [soil, agricultural]: 2.34854e-8 kg; = 1.0 * (p5243+p5037+p4625+p4213+p4007+p3595)
- Diammonium phosphate; no broadcast in fert. in spr. bef. plant.: 0.00106168 kg; = p2494*4.7142857143
- Aqueous ammonia; no broadcast in fert. after plant.: 3.15757e-5 kg; = p2552*1.2142857143
- Potassium; in below-ground residue; biogenic: 0.00189747 kg; = p2176
- Sulfur [soil, agricultural]: 6.92331e-8 kg; = 1.0 * (p3230)
- Sodium nitrate; no broadcast in fert. in fall bef. plant.: 6.36261e-6 kg; = p2447*6.0714285714
- Nonvolatile constituents; broadcast w/ incorp. in man. at unknown time; exc.CNPK,biogenic: 0.000169587 kg; = p3398
- Paraquat dichloride: 1.08033e-6 kg; = p4662+p4044+p4250+p3632+p5280+p5074
- Tefluthrin [soil, agricultural]: 4.69708e-7 kg; = 1.0 * (p4700+p5112+p5318+p4082+p4288+p3670)
- Superphosphate, grades<= 22%; broadcast w/ incorp. in fert. in spr. bef. plant.; kg P: 8.35947e-7 kg; = p2696
- Ammonium sulfate; no broadcast in fert. after plant.: 0.000468762 kg; = p2557*4.7142857143
- Diammonium phosphate; broadcast w/ incorp. in fert. after plant.: 3.22355e-5 kg; = p2767*4.7142857143
- Other single phosphates; no broadcast in fert. in fall bef. plant.; kg P: 8.07118e-6 kg; = p2466
- Propanenitrile: 3.10571e-8 kg; = p2157*1.5277777778
- Acetone [air, non-urban air or from high stacks]: 2.16296e-7 kg; = 1.0 * (p2139*1.6111111111)
- Superphosphate, grades>22%; broadcast w/ incorp. in fert. after plant.; kg P: 7.24918e-7 kg; = p2776
- Monoammonium phosphate; broadcast w/ incorp. in fert. in spr. bef. plant.: 0.000240201 kg; = p2693*8.2142857143
- Chlorethoxyfos; unspec. appl. method: 1.8863e-8 kg; = p5168
- Anhydrous ammonia; broadcast w/o incorp. in fert. in spr. bef. plant.: 0.00074252 kg; = p2862*1.2142857143
- Superphosphate, grades>22%; broadcast w/o incorp. in fert. in fall bef. plant.; kg P: 1.8017e-5 kg; = p2854
- Anhydrous ammonia; broadcast w/ incorp. in fert. at plant.: 0.000241082 kg; = p2706*1.2142857143
- Tebupirimphos [soil, agricultural]: 1.33867e-6 kg; = 1.0 * (p4081+p4699+p4287+p3669+p5111+p5317)
- Ammonium nitrate; no broadcast in fert. in spr. bef. plant.: 0.00091595 kg; = p2476*4.7142857143
- Ammonium sulfate; broadcast w/ incorp. in fert. after plant.: 0.000209679 kg; = p2752*4.7142857143
- Chlorethoxyfos; banded or side-dressed: 8.91577e-8 kg; = p3520
- Nonvolatile constituents; broadcast w/o incorp. in man. at unknown time; exc.CNPK,biogenic: 8.02922e-5 kg; = p3417
- Urea; no broadcast in fert. after plant.: 0.00186879 kg; = p2568*5
- Other single phosphates; broadcast w/ incorp. in fert. in fall bef. plant.; kg P: 5.23587e-6 kg; = p2661
- Propane [air, non-urban air or from high stacks]: 1.36506e-7 kg; = 1.0 * (p2142*1.2222222222)
- Clopyralid [soil, agricultural]: 6.10621e-7 kg; = 1.0 * (p3529+p4147+p4971+p5177+p3941+p4559)
- Ash: 9.58708e-5 kg; = p2022+p2021
- Nitrogen; broadcast w/ incorp. in manure at an unknown time: 0.000483879 kg; = p3394
- Chlorethoxyfos; broadcast with incorporation: 8.26634e-7 kg; = p3932
- Glycolaldehyde; from residue burning: 9.76509e-7 kg; = p2135*2.5
- Plant dry matter; from residue burning: 0.000172383 kg; = p2164
- Potassium; in above-ground residue left on field; biogenic: 0.00484571 kg; = p2170
- Monoammonium phosphate; no broadcast in fert. at plant.: 0.000653615 kg; = p2537*8.2142857143
- Potassium chloride; no broadcast in fert. in spr. bef. plant.: 0.00100799 kg; = p2507*2.2166666667
- Anhydrous ammonia; broadcast w/ incorp. in fert. after plant.: 0.000849711 kg; = p2745*1.2142857143
- Nitrogen; using unspec. method in manure at an unknown time: 1.8469e-5 kg; = p3470
- Carbon monoxide, fossil [air, non-urban air or from high stacks]: 2.57262e-5 kg; = 1.0 * (p2028*2.3333333333)
- Anhydrous ammonia; broadcast w/o incorp. in fert. in fall bef. plant.: 0.000418298 kg; = p2823*1.2142857143
- Other single phosphates; no broadcast in fert. in spr. bef. plant.; kg P: 7.85782e-6 kg; = p2505
- Ammonium nitrate; broadcast w/o incorp. in fert. in spr. bef. plant.: 0.000517966 kg; = p2866*4.7142857143
- Zinc compounds: 1.90442e-8 kg; = p3232
- Diammonium phosphate; broadcast w/ incorp. in fert. in fall bef. plant.: 0.000707426 kg; = p2650*4.7142857143
- Anhydrous ammonia; broadcast w/ incorp. in fert. in spr. bef. plant.: 0.00058733 kg; = p2667*1.2142857143
- Ammonium nitrate; broadcast w/o incorp. in fert. after plant.: 0.00074936 kg; = p2944*4.7142857143
- Aqueous ammonia; broadcast w/o incorp. in fert. in spr. bef. plant.: 1.23422e-5 kg; = p2864*1.2142857143
- Seeds; used in planting and sowing: 0.0023112 kg; = p2179
- Chlorpyrifos [soil, agricultural]: 9.32371e-6 kg; = 1.0 * (p4966+p3936+p3524+p4554+p5172+p4142)
- Formaldehyde [air, non-urban air or from high stacks]: 1.0076e-6 kg; = 1.0 * (p2128*2.5)
- Other single K nutrients; broadcast w/o incorp. in fert. in fall bef. plant.; kg K: 0.000257813 kg; = p2860
- Urea; broadcast w/ incorp. in fert. after plant.: 0.000835919 kg; = p2763*5
- Ammonium nitrate; broadcast w/ incorp. in fert. after plant.: 0.00059274 kg; = p2749*4.7142857143
- Dicamba-potassium; unspec. appl. method: 4.95555e-8 kg; = p5189
- Prosulfuron [soil, agricultural]: 1.64398e-7 kg; = 1.0 * (p4059+p3647+p4265+p5295+p5089+p4677)
- Other single K nutrients; broadcast w/ incorp. in fert. at plant.; kg K: 2.18467e-5 kg; = p2743
- Ethane [air, non-urban air or from high stacks]: 4.40443e-7 kg; = 1.0 * (p2126*1.25)
- Anhydrous ammonia; no broadcast in fert. after plant.: 0.00189962 kg; = p2550*1.2142857143
- Aqueous ammonia; no broadcast in fert. in fall bef. plant.: 1.22954e-5 kg; = p2435*1.2142857143
- Nitrogen solution; no broadcast in fert. after plant.; no broadcast in fert. after plant.; kg N: 0.00132553 kg; = p2561
- Nitrogen solution; broadcast w/o incorp. in fert. in fall bef. plant.; broadcast w/o incorp. in fert. in fall bef. pl...: 0.000291882 kg; = p2834
- Ammonium nitrate; broadcast w/ incorp. in fert. in fall bef. plant.: 0.000230809 kg; = p2632*4.7142857143
- Superphosphate, grades>22%; broadcast w/ incorp. in fert. in spr. bef. plant.; kg P: 1.54882e-5 kg; = p2698
- Anhydrous ammonia; broadcast w/o incorp. in fert. at plant.: 0.000304783 kg; = p2901*1.2142857143
- Dicamba-potassium; broadcast with incorporation: 2.17167e-6 kg; = p3953
- Ammonium sulfate; broadcast w/ incorp. in fert. in spr. bef. plant.: 0.000144933 kg; = p2674*4.7142857143
- Isoprene [air, non-urban air or from high stacks]: 1.82888e-7 kg; = 1.0 * (p2145*1.1333333333)
- Diammonium phosphate; broadcast w/o incorp. in fert. at plant.: 0.00137687 kg; = p2923*4.7142857143
- Other single phosphates; broadcast w/o incorp. in fert. in spr. bef. plant.; kg P: 5.77299e-6 kg; = p2895
- Potassium chloride; broadcast w/o incorp. in fert. in fall bef. plant.: 0.0063458 kg; = p2858*2.2166666667
- Ethene [air, non-urban air or from high stacks]: 7.0522e-7 kg; = 1.0 * (p2125*1.1666666667)
- Aqueous ammonia; broadcast w/o incorp. in fert. in fall bef. plant.: 6.95298e-6 kg; = p2825*1.2142857143
- Dinitrogen monoxide [air, non-urban air or from high stacks]: 3.39343e-8 kg; = 1.0 * (p2044*1.5714285714)
- Nitrogen solution; broadcast w/ incorp. in fert. after plant.; broadcast w/ incorp. in fert. after plant.; kg N: 0.000592915 kg; = p2756
- Particulates, < 10 um: 5.17644e-6 kg; = p2034+p2036
- Phosphorous; in above-ground residue left on field: 0.000318238 kg; = p2169
- Urea; no broadcast in fert. at plant.: 0.000530217 kg; = p2529*5
- Ammonium sulfate; no broadcast in fert. at plant.: 0.000132998 kg; = p2518*4.7142857143
- Other single K nutrients; no broadcast in fert. in fall bef. plant.; kg K: 3.9359e-5 kg; = p2470
- Monoammonium phosphate; broadcast w/ incorp. in fert. after plant.: 1.12425e-5 kg; = p2771*8.2142857143
- Ammonium sulfate; broadcast w/ incorp. in fert. at plant.: 5.94906e-5 kg; = p2713*4.7142857143
- Aqueous ammonia; no broadcast in fert. in spr. bef. plant.: 2.18255e-5 kg; = p2474*1.2142857143
- Nitrogen solution; broadcast w/o incorp. in fert. after plant.; broadcast w/o incorp. in fert. after plant.; kg N: 0.000749582 kg; = p2951
- Superphosphate, grades<= 22%; broadcast w/o incorp. in fert. after plant.; kg P: 4.43112e-8 kg; = p2969
- Plant dry matter; in aboveground residue left on field: 0.164074 kg; = p2172
- Nitrogen solution; broadcast w/ incorp. in fert. in fall bef. plant.; broadcast w/ incorp. in fert. in fall bef. plan...: 0.000230877 kg; = p2639
- Sodium nitrate; broadcast w/ incorp. in fert. at plant.: 2.07369e-6 kg; = p2720*6.0714285714
- Volatile constituents; broadcast w/o incorp. in man. at unknown time: 0.00151978 kg; = p3416
- Other single K nutrients; broadcast w/ incorp. in fert. after plant.; kg K: 6.15969e-6 kg; = p2782
- Nitrogen solution; broadcast w/ incorp. in fert. at plant.; broadcast w/ incorp. in fert. at plant.; kg N: 0.000168223 kg; = p2717
- Nitrogen; in above-ground residue left on field: 0.00339853 kg; = p2168
- Sodium nitrate; broadcast w/ incorp. in fert. in fall bef. plant.: 2.84603e-6 kg; = p2642*6.0714285714
- Pesticide formulation balance; unspec. appl. method: 3.55876e-6 kg; = p5338
- Superphosphate, grades<= 22%; broadcast w/o incorp. in fert. in fall bef. plant.; kg P: 9.72434e-7 kg; = p2852
- Aqueous ammonia; broadcast w/ incorp. in fert. in spr. bef. plant.: 9.76265e-6 kg; = p2669*1.2142857143
- Phosphorous; applied in sewage sludge: 1.91218e-10 kg; = p3241
- Cyanazine [soil, agricultural]: 2.56461e-5 kg; = 1.0 * (p4975+p3945+p3533+p4563+p4151+p5181)
- Carbon dioxide, in air: 0.000646137 kg; = p2163*3.6666666667
- Sodium nitrate; no broadcast in fert. at plant.: 4.63596e-6 kg; = p2525*6.0714285714
- Superphosphate, grades<= 22%; no broadcast in fert. in fall bef. plant.; kg P: 1.32361e-6 kg; = p2462
- Urea; broadcast w/o incorp. in fert. in spr. bef. plant.: 0.000730468 kg; = p2880*5
- Sodium nitrate; broadcast w/o incorp. in fert. after plant.: 9.24011e-6 kg; = p2954*6.0714285714
- Nitrogen; broadcast w/o incorp. in manure at an unknown time: 0.000229096 kg; = p3413
- Sodium nitrate; broadcast w/o incorp. in fert. in spr. bef. plant.: 6.38687e-6 kg; = p2876*6.0714285714
- Diammonium phosphate; broadcast w/ incorp. in fert. at plant.: 0.00121575 kg; = p2728*4.7142857143
- Ammonium nitrate; no broadcast in fert. at plant.: 0.00037597 kg; = p2515*4.7142857143
- I butane; from residue burning: 1.02245e-8 kg; = p2146*1.0208333333
- Superphosphate, grades>22%; broadcast w/o incorp. in fert. in spr. bef. plant.; kg P: 1.75407e-5 kg; = p2893
- Other single K nutrients; broadcast w/o incorp. in fert. in spr. bef. plant.; kg K: 0.000268247 kg; = p2899
- cis-2-Butene: 2.08205e-8 kg; = p2149*1.1666666667
- Water [air, non-urban air or from high stacks]: 2.68015e-7 m3; = 0.001 * (p2016)
- Urea; broadcast w/o incorp. in fert. at plant.: 0.000299836 kg; = p2919*5
- Plant dry matter; in below-ground residue: 0.0642478 kg; = p2177
- Ammonium sulfate; no broadcast in fert. in spr. bef. plant.: 0.000324014 kg; = p2479*4.7142857143
- Ammonium nitrate; broadcast w/ incorp. in fert. in spr. bef. plant.: 0.000409709 kg; = p2671*4.7142857143
- Hydrocyanic acid: 1.38271e-7 kg; = p2154*2.25
- Other single phosphates; no broadcast in fert. after plant.; kg P: 3.67782e-7 kg; = p2583
- Particulates, < 2.5 um [air, non-urban air or from high stacks]: 2.40889e-6 kg; = 1.0 * (p2033+p2035)
- Phosphorous; in below-ground residue: 0.000124615 kg; = p2175
- Dicamba-potassium; foliar or directed spray: 1.52276e-7 kg; = p4571
- Nitrogen; applied in sewage sludge: 1.60181e-9 kg; = p3240
- Benzene [air, non-urban air or from high stacks]: 7.43732e-8 kg; = 1.0 * (p2140*1.0833333333)
- Sodium nitrate; broadcast w/o incorp. in fert. in fall bef. plant.: 3.59804e-6 kg; = p2837*6.0714285714
- 2,4-D [soil, agricultural]: 4.27435e-6 kg; = 1.0 * (p4103+p3897+p5133+p4927+p3485+p4515)
- Monoammonium phosphate; no broadcast in fert. in fall bef. plant.: 0.000380327 kg; = p2459*8.2142857143
- Aqueous ammonia; broadcast w/o incorp. in fert. after plant.: 1.7856e-5 kg; = p2942*1.2142857143
- Dicamba [soil, agricultural]: 1.83186e-6 kg; = 1.0 * (p4157+p3951+p3539+p4569+p5187+p4981)
- Potassium chloride; broadcast w/ incorp. in fert. after plant.: 0.000151614 kg; = p2780*2.2166666667
- Toluene [air, non-urban air or from high stacks]: 9.23188e-8 kg; = 1.0 * (p2141*1.0952380952)
- Volatile constituents; broadcast w/ incorp. in man. at unknown time: 0.00320997 kg; = p3397
- Terbufos [soil, agricultural]: 2.22172e-5 kg; = 1.0 * (p5113+p3671+p4083+p4289+p5319+p4701)
- Urea; broadcast w/ incorp. in fert. in spr. bef. plant.: 0.000577797 kg; = p2685*5
- Diammonium phosphate; broadcast w/o incorp. in fert. in fall bef. plant.: 0.000801176 kg; = p2845*4.7142857143
- Ammonium nitrate; broadcast w/o incorp. in fert. in fall bef. plant.: 0.000291796 kg; = p2827*4.7142857143
- Oxygen; applied in dolomite: 0.00189894 kg; = p3228
- Acetol; from residue burning: 1.82496e-6 kg; = p2134*2.0555555556
- Nitrogen solution; no broadcast in fert. in fall bef. plant.; no broadcast in fert. in fall bef. plant.; kg N: 0.000516151 kg; = p2444
- Aqueous ammonia; broadcast w/ incorp. in fert. at plant.: 4.00728e-6 kg; = p2708*1.2142857143
- Aqueous ammonia; broadcast w/ incorp. in fert. after plant.: 1.4124e-5 kg; = p2747*1.2142857143
- Other single K nutrients; broadcast w/o incorp. in fert. after plant.; kg K: 1.05771e-5 kg; = p2977
- Sodium nitrate; broadcast w/ incorp. in fert. in spr. bef. plant.: 5.05198e-6 kg; = p2681*6.0714285714
- Superphosphate, grades<= 22%; broadcast w/ incorp. in fert. in fall bef. plant.; kg P: 8.58645e-7 kg; = p2657
- Diammonium phosphate; broadcast w/o incorp. in fert. after plant.: 3.65075e-5 kg; = p2962*4.7142857143
- Other single K nutrients; no broadcast in fert. in spr. bef. plant.; kg K: 4.09519e-5 kg; = p2509
- Other single K nutrients; broadcast w/o incorp. in fert. at plant.; kg K: 3.75139e-5 kg; = p2938
- Other single K nutrients; no broadcast in fert. at plant.; kg K: 5.72707e-6 kg; = p2548
- Monoammonium phosphate; no broadcast in fert. in spr. bef. plant.: 0.000370274 kg; = p2498*8.2142857143
- Dicamba-potassium; in seed furrow: 3.2534e-7 kg; = p4983
- Sodium nitrate; no broadcast in fert. in spr. bef. plant.: 1.12943e-5 kg; = p2486*6.0714285714
- Acetaldehyde [air, non-urban air or from high stacks]: 6.02823e-7 kg; = 1.0 * (p2130*1.8333333333)
- Formic acid [air, non-urban air or from high stacks]: 4.85665e-7 kg; = 1.0 * (p2131*3.8333333333)
- Pesticide formulation balance; broadcast without incorporation: 5.07849e-5 kg; = p4308
- Glyphosate [soil, agricultural]: 4.86148e-6 kg; = 1.0 * (p3998+p5234+p4616+p3586+p5028+p4204)
- Pesticide formulation balance; banded or side-dressed: 1.68208e-5 kg; = p3690
- Monoammonium phosphate; broadcast w/o incorp. in fert. at plant.: 0.000480198 kg; = p2927*8.2142857143
- Ammonium nitrate; broadcast w/ incorp. in fert. at plant.: 0.000168173 kg; = p2710*4.7142857143
- Other single phosphates; broadcast w/o incorp. in fert. after plant.; kg P: 2.70202e-7 kg; = p2973
- Butadiene [air, non-urban air or from high stacks]: 7.31303e-8 kg; = 1.0 * (p2143*1.125)
- Diammonium phosphate; broadcast w/ incorp. in fert. in spr. bef. plant.: 0.000688726 kg; = p2689*4.7142857143
- Monoammonium phosphate; broadcast w/o incorp. in fert. in fall bef. plant.: 0.000279419 kg; = p2849*8.2142857143
- Diammonium phosphate; no broadcast in fert. after plant.: 4.96916e-5 kg; = p2572*4.7142857143
- Ethyne [air, non-urban air or from high stacks]: 1.31934e-7 kg; = 1.0 * (p2132*1.0833333333)
- Anhydrous ammonia; broadcast w/o incorp. in fert. after plant.: 0.00107423 kg; = p2940*1.2142857143
- Superphosphate, grades>22%; broadcast w/o incorp. in fert. after plant.; kg P: 8.20986e-7 kg; = p2971
- Methanol [air, non-urban air or from high stacks]: 1.59295e-6 kg; = 1.0 * (p2129*2.6666666667)
- Chlorethoxyfos; broadcast without incorporation: 2.69183e-7 kg; = p4138
- Oxygen; applied in limestone: 0.0109632 kg; = p3219
- Other single phosphates; no broadcast in fert. at plant.; kg P: 1.38708e-5 kg; = p2544
- Superphosphate, grades>22%; broadcast w/o incorp. in fert. at plant.; kg P: 3.09633e-5 kg; = p2932
- Monoammonium phosphate; broadcast w/ incorp. in fert. in fall bef. plant.: 0.000246723 kg; = p2654*8.2142857143
- Sodium nitrate; no broadcast in fert. after plant.: 1.63398e-5 kg; = p2564*6.0714285714
- Superphosphate, grades<= 22%; no broadcast in fert. at plant.; kg P: 2.27471e-6 kg; = p2540
- Anhydrous ammonia; no broadcast in fert. in spr. bef. plant.: 0.00131304 kg; = p2472*1.2142857143
- Superphosphate, grades<= 22%; broadcast w/o incorp. in fert. at plant.; kg P: 1.67119e-6 kg; = p2930
- Aqueous ammonia; broadcast w/o incorp. in fert. at plant.: 5.06612e-6 kg; = p2903*1.2142857143
- Nitrogen dioxide: 1.11518e-6 kg; = p2039*3.2857142857
- Potassium chloride; no broadcast in fert. after plant.: 3.97454e-5 kg; = p2585*2.2166666667
- Propene [air, non-urban air or from high stacks]: 3.2766e-7 kg; = 1.0 * (p2136*1.1666666667)
- isopentane: 8.2031e-9 kg; = p2151*1.0166666667
- Diammonium phosphate; no broadcast in fert. in fall bef. plant.: 0.00109051 kg; = p2455*4.7142857143
- Acetonitrile [air, non-urban air or from high stacks]: 1.01746e-7 kg; = 1.0 * (p2155*1.7083333333)
- Other limestone constituents; applied in limestone: 0.00145919 kg; = p3220
- Potassium; broadcast w/o incorp. in manure at an unknown time: 0.000159796 kg; = p3415
- Nicosulfuron [soil, agricultural]: 1.87883e-7 kg; = 1.0 * (p5069+p4657+p4039+p4245+p3627+p5275)
- Furan [air, non-urban air or from high stacks]: 5.30199e-8 kg; = 1.0 * (p2138*1.4166666667)
- Ammonium sulfate; broadcast w/ incorp. in fert. in fall bef. plant.: 8.16477e-5 kg; = p2635*4.7142857143
- Other single K nutrients; broadcast w/ incorp. in fert. in fall bef. plant.; kg K: 0.00015014 kg; = p2665
- Ammonium sulfate; broadcast w/o incorp. in fert. at plant.: 7.52099e-5 kg; = p2908*4.7142857143
- Phosphorous; broadcast w/o incorp. in manure at an unknown time: 6.82831e-5 kg; = p3414
- cyclopentane: 8.01694e-10 kg; = p2153*1.0166666667
- Acetic acid [air, non-urban air or from high stacks]: 2.71174e-6 kg; = 1.0 * (p2127*2.5)
- Sulfuric acid [soil, agricultural]: 1.33078e-8 kg; = 1.0 * (p3231)
- Diammonium phosphate; no broadcast in fert. at plant.: 0.00187411 kg; = p2533*4.7142857143
- Other single phosphates; broadcast w/o incorp. in fert. in fall bef. plant.; kg P: 5.92974e-6 kg; = p2856
- Superphosphate, grades>22%; broadcast w/ incorp. in fert. in fall bef. plant.; kg P: 1.59087e-5 kg; = p2659
- Anhydrous ammonia; no broadcast in fert. in fall bef. plant.: 0.0007397 kg; = p2433*1.2142857143
- Urea; broadcast w/ incorp. in fert. in fall bef. plant.: 0.000325501 kg; = p2646*5
- Sewage sludge dry matter; applied in sewage sludge: 1.77336e-10 kg; = p3243
- Ammonia [air, non-urban air or from high stacks]: 1.05181e-6 kg; = 1.0 * (p2159*1.2142857143)
- Flumetsulam [soil, agricultural]: 2.34854e-7 kg; = 1.0 * (p3573+p3985+p5015+p5221+p4603+p4191)
- Superphosphate, grades<= 22%; no broadcast in fert. in spr. bef. plant.; kg P: 1.28863e-6 kg; = p2501
- Gypsum: 1.1737e-6 kg; = p3229
- Filler materials, applied with synthetic fertilizer: 0.0238607 kg; = p2432
- Other single K nutrients; broadcast w/ incorp. in fert. in spr. bef. plant.; kg K: 0.000156217 kg; = p2704
- Nitrogen solution; broadcast w/o incorp. in fert. in spr. bef. plant.; broadcast w/o incorp. in fert. in spr. bef. pl...: 0.000518119 kg; = p2873
- Superphosphate, grades<= 22%; broadcast w/ incorp. in fert. after plant.; kg P: 3.91261e-8 kg; = p2774
- Potassium chloride; broadcast w/ incorp. in fert. in spr. bef. plant.: 0.00384511 kg; = p2702*2.2166666667
- Chlorethoxyfos; foliar or directed spray: 5.7963e-8 kg; = p4550
- Nitrogen solution; no broadcast in fert. in spr. bef. plant.; no broadcast in fert. in spr. bef. plant.; kg N: 0.00091622 kg; = p2483
- Ammonium sulfate; broadcast w/o incorp. in fert. in fall bef. plant.: 0.000103222 kg; = p2830*4.7142857143
- Pesticide formulation balance; broadcast with incorporation: 0.000155955 kg; = p4102
- Sodium nitrate; broadcast w/o incorp. in fert. at plant.: 2.62162e-6 kg; = p2915*6.0714285714
- Potassium chloride; broadcast w/o incorp. in fert. at plant.: 0.000923367 kg; = p2936*2.2166666667
- Potassium chloride; broadcast w/ incorp. in fert. in fall bef. plant.: 0.00369555 kg; = p2663*2.2166666667
- Lambda-cyhalothrin [soil, agricultural]: 4.69708e-8 kg; = 1.0 * (p3601+p4013+p5249+p4631+p4219+p5043)
- Pesticide formulation balance; in seed furrow: 2.33638e-5 kg; = p5132
- Urea; broadcast w/o incorp. in fert. after plant.: 0.00105679 kg; = p2958*5
- Potassium; broadcast w/ incorp. in manure at an unknown time: 0.00033751 kg; = p3396
- Potassium chloride; broadcast w/ incorp. in fert. at plant.: 0.000537734 kg; = p2741*2.2166666667
- Potassium chloride; no broadcast in fert. in fall bef. plant.: 0.000968782 kg; = p2468*2.2166666667
- Dicamba-potassium; banded or side-dressed: 2.34228e-7 kg; = p3541
- Chlorethoxyfos; in seed furrow: 1.23839e-7 kg; = p4962
- Atrazine [soil, agricultural]: 0.000165666 kg; = 1.0 * (p3502+p3914+p4944+p5150+p4532+p4120)
- Superphosphate, grades>22%; no broadcast in fert. in spr. bef. plant.; kg P: 2.38753e-5 kg; = p2503
- Potassium chloride; no broadcast in fert. at plant.: 0.000140966 kg; = p2546*2.2166666667
- Phosphorous; broadcast w/ incorp. in manure at an unknown time: 0.000144223 kg; = p3395
- Acetochlor [soil, agricultural]: 8.53225e-5 kg; = 1.0 * (p4526+p4938+p3908+p5144+p3496+p4114)
- Monoammonium phosphate; broadcast w/o incorp. in fert. after plant.: 1.27324e-5 kg; = p2966*8.2142857143
- Ammonium nitrate; no broadcast in fert. after plant.: 0.00132514 kg; = p2554*4.7142857143
- Other single phosphates; broadcast w/o incorp. in fert. at plant.; kg P: 1.01906e-5 kg; = p2934
- Anhydrous ammonia; broadcast w/ incorp. in fert. in fall bef. plant.: 0.000330872 kg; = p2628*1.2142857143
- Ammonium sulfate; broadcast w/o incorp. in fert. in spr. bef. plant.: 0.000183229 kg; = p2869*4.7142857143

## Sampling procedure
A delete-a-group jackknife is used by the USDA to estimate the ARMS sample means and RSEs, based on a 15 sample delete-a-group jackknife. Because of this relatively small sample size, a Students t distribution is used to represent ARMS data probability density functions. Other representations of uncertainty are described in Cooper, J.S., Kahn, E., Noon, M. (2012). LCA Digital Commons Unit Process Data: field crop production Version 1. Prepared for the US Department of Agriculture National Agricultural Library. Retrieved from https://www.lcacommons.gov/discovery/docs/LCA%20Digital%20Commons%20Unit%20Process%20Data%20final%20updated.pdf

## Extrapolations
Data represent an aggregation of processes applied in Indiana in 1998. Data development is demonstrated by parameterization (exlicitly presents all raw and uncertainty data and all calculations). Flow data quality according to the LCADC convention is provided for all flows.
