# soybeans; at harvest in 2000; at farm; 85%-92% moisture

Dataset: EcoSpold 2, unit process
Geography: GLO
Time period: 2000-01-02 to 2001-01-01
Scenario: Business-as-Usual
System model: Allocation, ecoinvent default
Generated by: cooperjs@u.washington.edu
isCopyrightProtected: false

## General comment
This unit process/ gate-to-gate dataset represents the production of 1 kg soybeans coproduced with residue. The process technologies are an aggregation of those applied in Nebraska in 2000. Applicable classifications include ISIC 0111, NAIC 111110, UNSPSC 50407053; this dataset was prepared in ILCD format using the UWDFE Lab Excel to ILCD File Generator (beta version, August 2013)

Exchange "Metribuzin-soil agricultural" is the result of combining the following original LCA Commons flows: "Metribuzin; banded or side-dressed; kg AI", "Metribuzin; unspec. appl. method; kg AI", "Metribuzin; broadcast with incorporation; kg AI", "Metribuzin; foliar or directed spray; kg AI".
Exchange "NMVOC, non-methane volatile organic compounds, unspecified origin-air low population density" is the result of combining the following original LCA Commons flows: "NMVOCs; from residue burning; kg C, biogenic", "NMVOCs; from residue burning; kg except C, biogenic".
Exchange "Glyphosate-soil agricultural" is the result of combining the following original LCA Commons flows: "Glyphosate; broadcast with incorporation; kg AI", "Glyphosate; banded or side-dressed; kg AI", "Glyphosate; unspec. appl. method; kg AI", "Glyphosate; foliar or directed spray; kg AI".
Exchange "Imazethapyr-soil agricultural" is the result of combining the following original LCA Commons flows: "Imazethapyr; foliar or directed spray; kg AI", "Imazethapyr; banded or side-dressed; kg AI", "Imazethapyr; unspec. appl. method; kg AI", "Imazethapyr; broadcast with incorporation; kg AI".
Exchange "Sulfosate-soil agricultural" is the result of combining the following original LCA Commons flows: "Glyphosate-trimesium; unspec. appl. method; kg AI", "Glyphosate-trimesium; banded or side-dressed; kg AI", "Glyphosate-trimesium; broadcast with incorporation; kg AI", "Glyphosate-trimesium; foliar or directed spray; kg AI".
Exchange "Carbon-soil agricultural" is the result of combining the following original LCA Commons flows: "Carbon; applied in dolomite", "Carbon; in above-ground residue left on field; biogenic", "Carbon; applied in limestone", "Carbon; using unspec. method in manure at an unknown time", "Carbon; applied in sewage sludge", "Carbon; in below-ground residue; biogenic", "Carbon; broadcast w/o incorp. in manure at an unknown time".
Exchange "Particulates, < 2.5 um-air low population density" is the result of combining the following original LCA Commons flows: "PM2.5; from residue burning; kg C, biogenic", "PM2.5; from residue burning; kg except C, biogenic".
Exchange "Pesticides, unspecified-soil agricultural" is the result of combining the following original LCA Commons flows: "Unspecified pesticide; banded or side-dressed; kg AI", "Unspecified pesticide; unspec. appl. method; kg AI", "Unspecified pesticide; foliar or directed spray; kg AI", "Unspecified pesticide; broadcast with incorporation; kg AI".
Exchange "Ash-soil agricultural" is the result of combining the following original LCA Commons flows: "Ash; from residue burning; kg C, biogenic", "Ash; from residue burning; kg except C, biogenic".
Exchange "Trifluralin-soil agricultural" is the result of combining the following original LCA Commons flows: "Trifluralin; broadcast with incorporation; kg AI", "Trifluralin; foliar or directed spray; kg AI", "Trifluralin; unspec. appl. method; kg AI", "Trifluralin; banded or side-dressed; kg AI".
Exchange "Water-soil agricultural" is the result of combining the following original LCA Commons flows: "Water; broadcast w/o incorp. in manure", "Water; in above-ground residue left on field; biogenic", "Water; in below-ground residue; biogenic", "Water; from irrigation and applied with manure and sewage sludge", "Water; using unspec. method in manure".
Exchange "Pendimethalin-soil agricultural" is the result of combining the following original LCA Commons flows: "Pendimethalin; foliar or directed spray; kg AI", "Pendimethalin; broadcast with incorporation; kg AI", "Pendimethalin; unspec. appl. method; kg AI", "Pendimethalin; banded or side-dressed; kg AI".
Exchange "Chlorimuron-ethyl-soil agricultural" is the result of combining the following original LCA Commons flows: "Chlorimuron-ethyl; unspec. appl. method; kg AI", "Chlorimuron-ethyl; broadcast with incorporation; kg AI", "Chlorimuron-ethyl; foliar or directed spray; kg AI", "Chlorimuron-ethyl; banded or side-dressed; kg AI".
Exchange "Water, unspecified origin-resource in water" is the result of combining the following original LCA Commons flows: "Water; withdrawal from unspec. source, for soybeans, in 2000", "Water; from plant uptake; biogenic".
Exchange "Cloransulam-methyl-soil agricultural" is the result of combining the following original LCA Commons flows: "Cloransulam-methyl; foliar or directed spray; kg AI", "Cloransulam-methyl; broadcast with incorporation; kg AI", "Cloransulam-methyl; unspec. appl. method; kg AI", "Cloransulam-methyl; banded or side-dressed; kg AI".
Exchange "Metolachlor-soil agricultural" is the result of combining the following original LCA Commons flows: "Propazine; broadcast with incorporation; kg AI", "Propazine; unspec. appl. method; kg AI", "Propazine; foliar or directed spray; kg AI", "Propazine; banded or side-dressed; kg AI".
Exchange "Particulates, < 10 um-air low population density" is the result of combining the following original LCA Commons flows: "PM10; from residue burning; kg except C, biogenic", "PM10; from residue burning; kg C, biogenic".
Exchange "Flumetsulam-soil agricultural" is the result of combining the following original LCA Commons flows: "Flumetsulam; broadcast with incorporation; kg AI", "Flumetsulam; banded or side-dressed; kg AI", "Flumetsulam; unspec. appl. method; kg AI", "Flumetsulam; foliar or directed spray; kg AI".
Exchange "Transformation, from arable-resource land" is the result of combining the following original LCA Commons flows: "Transformation; from arable, from unspec. use to soybeans", "Transformation; from arable, from soy to soybeans", "Transformation; from arable, from corn to soybeans", "Transformation; from arable, from other to soybeans".
Exchange "Calcium-soil agricultural" is the result of combining the following original LCA Commons flows: "Calcium; applied in dolomite", "Calcium; applied in limestone".
Exchange "Alachlor-soil agricultural" is the result of combining the following original LCA Commons flows: "Alachlor; broadcast with incorporation; kg AI", "Alachlor; foliar or directed spray; kg AI", "Alachlor; banded or side-dressed; kg AI", "Alachlor; unspec. appl. method; kg AI".
Exchange "Acetic acid-2bdf9967-6dae-4183-88d1-8f612548c51e low population density" was originally named: "Acetic acid; from residue burning; kg C, biogenic" in this dataset.
Exchange "Ammonia-2bdf9967-6dae-4183-88d1-8f612548c51e low population density" was originally named: "Ammonia; from residue burning; kg N, biogenic" in this dataset.
Exchange "Nitrogen dioxide-2bdf9967-6dae-4183-88d1-8f612548c51e low population density" was originally named: "Nitrogen dioxide; from residue burning; kg N, biogenic" in this dataset.
Exchange "Carbon dioxide-c19fb2d9-98eb-4cd3-8761-81b71d8a9a1b unspecified" was originally named: "Carbon dioxide; from plant uptake; kg C, biogenic" in this dataset.
Exchange "Sulfuric acid-be1c0329-f1a8-4524-8420-a86d2a8dd358 agricultural" was originally named: "Sulfuric acid; as secondary application" in this dataset.
Exchange "Methanol-2bdf9967-6dae-4183-88d1-8f612548c51e low population density" was originally named: "Methanol; from residue burning; kg C, biogenic" in this dataset.
Exchange "Water, surface-c19fb2d9-98eb-4cd3-8761-81b71d8a9a1b in water" was originally named: "Water; withdrawal from surface water, for soybeans, in 2000" in this dataset.
Exchange "Sulfur dioxide-2bdf9967-6dae-4183-88d1-8f612548c51e low population density" was originally named: "Sulfur dioxide; from residue burning; biogenic" in this dataset.
Exchange "Phosphorus-c19fb2d9-98eb-4cd3-8761-81b71d8a9a1b unspecified" was originally named: "Phosphorous; from plant uptake; biogenic" in this dataset.
Exchange "Dinitrogen monoxide-2bdf9967-6dae-4183-88d1-8f612548c51e low population density" was originally named: "Dinitrogen monoxide; from residue burning; kg N, biogenic" in this dataset.
Exchange "Occupation, arable-c19fb2d9-98eb-4cd3-8761-81b71d8a9a1b land" was originally named: "Occupation; arable, as soybeans" in this dataset.
Exchange "Butane-2bdf9967-6dae-4183-88d1-8f612548c51e low population density" was originally named: "N butane; from residue burning; kg C, biogenic" in this dataset.
Exchange "Ethene-2bdf9967-6dae-4183-88d1-8f612548c51e low population density" was originally named: "Ethylene; from residue burning; kg C, biogenic" in this dataset.
Exchange "cis-2-Butene-2bdf9967-6dae-4183-88d1-8f612548c51e low population density" was originally named: "Cis 2 butene; from residue burning; kg C, biogenic" in this dataset.
Exchange "isopentane-2bdf9967-6dae-4183-88d1-8f612548c51e low population density" was originally named: "I pentane; from residue burning; kg C, biogenic" in this dataset.
Exchange "Carbon dioxide, in air-2bdf9967-6dae-4183-88d1-8f612548c51e low population density" was originally named: "Carbon dioxide; from residue burning; kg C, biogenic" in this dataset.
Exchange "Ethane-2bdf9967-6dae-4183-88d1-8f612548c51e low population density" was originally named: "Ethane; from residue burning; kg C, biogenic" in this dataset.
Exchange "Furan-2bdf9967-6dae-4183-88d1-8f612548c51e low population density" was originally named: "Furan; from residue burning; kg C, biogenic" in this dataset.
Exchange "Formaldehyde-2bdf9967-6dae-4183-88d1-8f612548c51e low population density" was originally named: "Formaldehyde; from residue burning; kg C, biogenic" in this dataset.
Exchange "Sulfur-be1c0329-f1a8-4524-8420-a86d2a8dd358 agricultural" was originally named: "Sulfur; as secondary application" in this dataset.
Exchange "Ethyne-2bdf9967-6dae-4183-88d1-8f612548c51e low population density" was originally named: "Acetylene; from residue burning; kg C, biogenic" in this dataset.
Exchange "Toluene-2bdf9967-6dae-4183-88d1-8f612548c51e low population density" was originally named: "Toluene; from residue burning; kg C, biogenic" in this dataset.
Exchange "Acrylonitrile-2bdf9967-6dae-4183-88d1-8f612548c51e low population density" was originally named: "Propenenitrile; from residue burning; kg C, biogenic" in this dataset.
Exchange "Formic acid-2bdf9967-6dae-4183-88d1-8f612548c51e low population density" was originally named: "Formic acid; from residue burning; kg C, biogenic" in this dataset.
Exchange "Phenol-2bdf9967-6dae-4183-88d1-8f612548c51e low population density" was originally named: "Phenol; from residue burning; kg C, biogenic" in this dataset.
Exchange "Isoprene-2bdf9967-6dae-4183-88d1-8f612548c51e low population density" was originally named: "Isoprene; from residue burning; kg C, biogenic" in this dataset.
Exchange "Butadiene-2bdf9967-6dae-4183-88d1-8f612548c51e low population density" was originally named: "1,3 butadiene; from residue burning; kg C, biogenic" in this dataset.
Exchange "Pentane-2bdf9967-6dae-4183-88d1-8f612548c51e low population density" was originally named: "N pentane; from residue burning; kg C, biogenic" in this dataset.
Exchange "trans-2-Butene-2bdf9967-6dae-4183-88d1-8f612548c51e low population density" was originally named: "Trans 2 butene; from residue burning; kg C, biogenic" in this dataset.
Exchange "Transformation, to arable-c19fb2d9-98eb-4cd3-8761-81b71d8a9a1b land" was originally named: "Transformation; to arable, to soybeans" in this dataset.
Exchange "Methane-2bdf9967-6dae-4183-88d1-8f612548c51e low population density" was originally named: "Methane; from residue burning; kg C, biogenic" in this dataset.
Exchange "Magnesium-be1c0329-f1a8-4524-8420-a86d2a8dd358 agricultural" was originally named: "Magnesium; applied in dolomite" in this dataset.
Exchange "Acetaldehyde-2bdf9967-6dae-4183-88d1-8f612548c51e low population density" was originally named: "Acetaldehyde; from residue burning; kg C, biogenic" in this dataset.
Exchange "Acetonitrile-2bdf9967-6dae-4183-88d1-8f612548c51e low population density" was originally named: "Acetonitrile; from residue burning; kg C, biogenic" in this dataset.
Exchange "Propene-2bdf9967-6dae-4183-88d1-8f612548c51e low population density" was originally named: "Propylene; from residue burning; kg C, biogenic" in this dataset.
Exchange "Acetone-2bdf9967-6dae-4183-88d1-8f612548c51e low population density" was originally named: "Acetone; from residue burning; kg C, biogenic" in this dataset.
Exchange "Benzene-2bdf9967-6dae-4183-88d1-8f612548c51e low population density" was originally named: "Benzene; from residue burning; kg C, biogenic" in this dataset.
Exchange "isobutene-2bdf9967-6dae-4183-88d1-8f612548c51e low population density" was originally named: "I butene; from residue burning; kg C, biogenic" in this dataset.
Exchange "Propane-2bdf9967-6dae-4183-88d1-8f612548c51e low population density" was originally named: "Propane; from residue burning; kg C, biogenic" in this dataset.
Exchange "1-Butene-2bdf9967-6dae-4183-88d1-8f612548c51e low population density" was originally named: "1 butene; from residue burning; kg C, biogenic" in this dataset.
Exchange "Zinc compounds-be1c0329-f1a8-4524-8420-a86d2a8dd358 agricultural" was originally named: "Zinc compounds; as secondary application" in this dataset.
Exchange "Carbon monoxide, fossil-2bdf9967-6dae-4183-88d1-8f612548c51e low population density" was originally named: "Carbon monoxide; from residue burning; kg C, biogenic" in this dataset.
Exchange "Water, ground-c19fb2d9-98eb-4cd3-8761-81b71d8a9a1b in water" was originally named: "Water; withdrawal from groundwater, for soybeans, in 2000" in this dataset.
Exchange "Water-2bdf9967-6dae-4183-88d1-8f612548c51e low population density" was originally named: "Water; from residue burning; biogenic" in this dataset.
Exchange "Hydrocyanic acid-2bdf9967-6dae-4183-88d1-8f612548c51e low population density" was originally named: "Hydrogen cyanide; from residue burning; kg C, biogenic" in this dataset.

## Geography
The unit process is assumed to represent production in Nebraska (US State).

## Technology
This process produces soybeans; at harvest in 2000; at farm; 85%-92% moisture. The process is assumed to represent production in Nebraska (US State). Yields and related inputs and outputs represent a single year of operation, in 2000. This dataset includes consideration of residue burning; soil preparation; planting or sowing; irrigation; application, storage, and transport of fertilizers, manures, liming materials, secondary materials, and pesticides; and harvest. Fate and transport of applications are not included as described in Cooper, J.S., Kahn, E., Noon, M. (2012) LCA Digital Commons Unit Process Data: field crop production Version 1 which is available at https://www.lcacommons.gov/discovery/docs/LCA%20Digital%20Commons%20Unit%20Process%20Data%20final%20updated.pdf

## Time period
Start and end dates match the underlying data obtained from the USDA Agricultural Resource Management Survey (ARMS).
## Parameters
- p3092: 0; = p2311*p1132
- p2931: 6.47848e-7; = p2345*(p1079+p1081)
- p2498: 3.90039e-5; = p2302*p1073
- p2875: 0.000207585; = p2289*(p1020+p1022)
- p2034: 7.14458e-6; = p2015*p2030*p2032/(p0818*1000)
- p1226: 4.65e6; = IF(p1221=0;0;IF(p1193=0;p0801;0))
- p1232: 0
- p1322: 0; = IF(((p0745*1000*p0749/100)+(p0754*1000*p0758/100))/p0801<0;0;((p0745*1000*p0749/100)+(p0754*1000*p0758/100))/p0801)
- p2270: 1.21846e-5; = p2226*p2216
- p2093: 0.260958
- p0197: 33.492
- p1828: 0
- p3358: 2.69935e6; = if(p1232=0;p3308+p3319+p3330+p3341+p3352;0)
- p3070: 1.15128e-5; = p2289*p1023
- p1585: 0
- p3049: 4.29905e-7; = p2268*p1082
- p0426: 0; = SQRT(2)*(IF((2*p0294-1)<0;-1;IF((2*p0294-1)>0;1;0))*SQRT(SQRT((2/(pi()*0.140012289)+LN(1-(2*p0294-1)^2)/2)^2-LN(1-(2*p0294-1)^2)/0.140012289)-(2/(pi()*0.140012289)+LN(1-(2*p0294-1)^2)/2)))
- p2902: 6.01227e-6; = p2316*(p1020+p1022)
- p2549: 0; = p2353*p1123
- p2233: 0; = if(p0783*p0787+p0784*p0788+p0785*p0789+p0786*p0790=0;0;p0790*p0786/(p0783*p0787+p0784*p0788+p0785*p0789+p0786*p0790))
- p4603: 6.93701e-8; = p1842*p3481
- p0890: 0; = p0686*1000*p0687*p0885/100
- p3191: 0; = p2410*p1023
- p1246: 99629.3; = if(p1232>0;0;p1241*(p0725/100)*p0723*1000)
- p2484: 4.86034e-5; = p2288*p1014
- p0533: 0; = SQRT(2)*(IF((2*p0401-1)<0;-1;IF((2*p0401-1)>0;1;0))*SQRT(SQRT((2/(pi()*0.140012289)+LN(1-(2*p0401-1)^2)/2)^2-LN(1-(2*p0401-1)^2)/0.140012289)-(2/(pi()*0.140012289)+LN(1-(2*p0401-1)^2)/2)))
- p1134: 0; = if(p1121=0;p1128*(p0716/100)*p0703*1000;0)
- p3002: 0; = p2416*(p1079+p1081)
- p1116: 1.5156e-5; = IF(p1071=0;p1106/(p1111*p0818);0)
- p2047: 5.38317e-14; = p2015*p2045/(p0818*1000000000000)
- p2146: 3.70803e-8; = p2015*p2074*p2108/(p0818*1000)
- p0697: 95.935; = p0037*(1+p0565*p0169/100)
- p2055: 5.59471
- p0924: 0.168608; = IF(p0918+p0923=1;0;IF(p0918+p0923+p0920>1;1-(p0918+p0923);p0920))
- p0771: 19.415; = p0111*(1+p0639*p0243/100)
- p0864: 0.0448161; = IF(p0858=1;0;IF(p0858+p0859>1;1-p0858;p0859))
- p1569: 0
- p4510: 0; = p1955*p3480
- p3238: 0.854735; = IF(p3237+p3235+p3236>1;1-(p3235+p3236);p3237)
- p1316: 0.0462555; = p1312*p1252/p0818
- p0700: 0
- p0835: 700.476; = -LN(1-p0669/100)/p0834
- p0433: 0; = SQRT(2)*(IF((2*p0301-1)<0;-1;IF((2*p0301-1)>0;1;0))*SQRT(SQRT((2/(pi()*0.140012289)+LN(1-(2*p0301-1)^2)/2)^2-LN(1-(2*p0301-1)^2)/0.140012289)-(2/(pi()*0.140012289)+LN(1-(2*p0301-1)^2)/2)))
- p1924: 0
- p2610: 0; = p2414*p1073
- p2721: 4.20708e-8; = p2330*(p1019+p1021)
- p3017: 0; = p2431*(p1129+p1131)
- p0749: 0
- p2070: 0.282
- p3258: 0.0491162
- p1950: 0
- p1333: 0.000421475; = p1332*p0001/(p0818*p0002)
- p2890: 0.000221026; = p2304*(p1079+p1081)
- p3454: 0; = p3378*p1240
- p1624: 0
- p1647: 0
- p3436: 0; = p3379*p1239
- p1050: 7.37717e6; = IF(p1012=0;p1037*p1036;0)
- p2052: 2.21022e-6; = p2015*p2049*(1-p2050)/(p0818*1000)
- p0512: 0; = SQRT(2)*(IF((2*p0380-1)<0;-1;IF((2*p0380-1)>0;1;0))*SQRT(SQRT((2/(pi()*0.140012289)+LN(1-(2*p0380-1)^2)/2)^2-LN(1-(2*p0380-1)^2)/0.140012289)-(2/(pi()*0.140012289)+LN(1-(2*p0380-1)^2)/2)))
- p0798: 19.922; = p0138*(1+p0666*p0270/100)
- p1858: 0
- p0843: 0.0111763
- p2490: 6.65329e-5; = p2294*p1014
- p0858: 0.878255; = p0670*1000/p0856
- p2156: 4.08549e-8; = p2015*p2085*p2118/(p0818*1000)
- p1212: 0.0727362; = if(p1211=0;0;if(p1193>0;0;(p1207+p1208+p1209)*p1210/(2000*p1211)))
- p0315: 0.5
- p1963d: 0; = p1608*p1812+p1609*p1813+p1610*p1814+p1611*p1815+p1612*p1816+p1613*p1817+p1614*p1818+p1615*p1819+p1616*p1820+p1617*p1821+p1618*p1822+p1619*p1823+p1620*p1824+p1621*p1825+p1622*p1826+p1623*p1827+p1624*p1828+p1625*p1829+p1626*p1830+p1627*p1831
- p1815: 0
- p2591: 0; = p2395*p1014
- p2017: 8.53509e6; = p2015*p0898
- p2421: 0; = p2235*p2211
- p1726: 0
- p1299: 0
- p3195: 0; = p2414*p1082
- p2984: 0; = p2398*(p1020+p1022)
- p0005: 1.60934
- p2895: 9.43037e-6; = p2309*(p1079+p1081)
- p2782: 0; = p2391*(p1128+p1130)
- p2958: 0; = p2372*(p1020+p1022)
- p0818: 1.0431e10; = p0806*p0807
- p0143: 0
- p2629: 4.8855e-6; = p2238*(p1019+p1021)
- p2752: 0; = p2361*(p1019+p1021)
- p1717: 0
- p2401: 0; = p2234*p2190
- p1298: 0
- p3282: 0.3
- p3226: 0.000845167; = p3222*p1229
- p2119: 0.679049
- p2095: 0.765734
- p0011: 208.395
- p3319: 0; = if(and(p1232=0;p3253<>0);p3253*(p3263-p3314)/p3316;0)
- p0978: 0
- p3030: 2.83225e-7; = p2249*p1023
- p0705: 55.503; = p0045*(1+p0573*p0177/100)
- p2181: 432.598; = p0887+p0889+p0893+p2180
- p0675: 0
- p1830: 0
- p0190: 37.687
- p3125: 3.89683e-9; = p2344*p1082
- p1668: 0
- p5268: 2.31992e-6; = p1889*p3484
- p1862: 0
- p1664: 0
- p0857: 3.97722; = p0856*p0001*p0003/(p0818*p0002)
- p3476: 0.09972; = if(p1328+p1330+p1332+p1334+p1336+p1338+p1340+p1342+p1344=0;0;p1328/(p1328+p1330+p1332+p1334+p1336+p1338+p1340+p1342+p1344))
- p2058: 1.24412
- p2268: 2.23327e-5; = p2226*p2214
- p2526: 1.21706e-7; = p2330*p1014
- p0813: 0; = if(p0807=480;1.56521739130435;0)
- p0768: 0
- p1112: 0.209482
- p1658: 0
- p3316: 0; = if(and(p1232=0;p3253<>0);1-(p3312+p3313+p3314+p3315);0)
- p1872: 0
- p2509: 0; = p2313*p1123
- p1820: 0
- p0149: 0
- p0764: 30.41; = p0104*(1+p0632*p0236/100)
- p2247: 1.74542e-5; = p2222*p2192
- p4694: 2.1921e-6; = p1933*p3481
- p2168: 0.018809; = p2166*(p0903)
- p1695: 0
- p0769: 13.329; = p0109*(1+p0637*p0241/100)
- p2211: 0.00118984; = p1120-p2209-p2208-p2210
- p1638: 0.732906
- p3345: 0.160606; = if(and(p1232=0;p3256<>0);p3273*p3277*p3293;0)
- p1769: 0
- p2515: 9.88946e-6; = p2319*p1014
- p2510: 0; = p2314*p1123
- p2658: 1.22623e-6; = p2267*(p1078+p1080)
- p0118: 20.346
- p1170: 2390.68; = p1169*p0801
- p1280: 0; = IF(p1277=p1263;0;IF(p1277+p1278>p1263;p1263-p1277;p1278))
- p2567: 0; = p2371*p1014
- p2644: 9.39467e-8; = p2253*(p1019+p1021)
- p0156: 14.261
- p1180: 3.03812e-8; = p1176*p1179/p0818
- p3892: 0; = p1955*p3477
- p2135: 1.44608e-6; = p2015*p2063*p2097/(p0818*1000)
- p2765: 0; = p2374*(p1019+p1021)
- p0155: 1.314
- p1609: 0
- p1711: 0
- p1014: 0.55503; = IF(p1012=0;p0705/100;0)
- p0598: 0; = IF(p0334<0.5;-SQRT(p0007*EXP(p0466^2*p0008)-p0007);SQRT(p0007*EXP(p0466^2*p0008)-p0007))
- p2239: 2.41327e-6; = p2222*p2184
- p1854: 0
- p1066: 0.000329354; = IF(p1012=0;p1052/(p1059*p0818);0)
- p1013: 0; = p1012*p0001/(p0818*p0002)
- p1622: 0
- p1741: 0
- p2627: 0; = p2431*p1123
- p0367: 0.5
- p2801: 0; = p2410*(p1019+p1021)
- p1295: 0; = p1291*p1252/p0818
- p2625: 0; = p2429*p1123
- p4252: 0; = p1903*p3479
- p0481: 0; = SQRT(2)*(IF((2*p0349-1)<0;-1;IF((2*p0349-1)>0;1;0))*SQRT(SQRT((2/(pi()*0.140012289)+LN(1-(2*p0349-1)^2)/2)^2-LN(1-(2*p0349-1)^2)/0.140012289)-(2/(pi()*0.140012289)+LN(1-(2*p0349-1)^2)/2)))
- p2398: 0; = p2234*p2187
- p1067: 0.000217534; = IF(p1012=0;p1053/(p1060*p0818);0)
- p0647: 0; = IF(p0383<0.5;-SQRT(p0007*EXP(p0515^2*p0008)-p0007);SQRT(p0007*EXP(p0515^2*p0008)-p0007))
- p0115: 45.699
- p1963e: 3.51311e-7; = p1628*p1832+p1629*p1833+p1630*p1834+p1631*p1835+p1632*p1836+p1633*p1837+p1634*p1838+p1635*p1839+p1636*p1840+p1637*p1841+p1638*p1842+p1639*p1843+p1640*p1844+p1641*p1845+p1642*p1846+p1643*p1847+p1644*p1848+p1645*p1849+p1646*p1850
- p1571: 0
- p0717: 0
- p2380: 0; = p2229*p2209
- p3403: 0; = p3365*p1238
- p3427: 0; = p3370*p1239
- p1057: 0.82
- p1269: 0
- p2263: 5.05078e-5; = p2226*p2209
- p2452: 2.3286e-6; = p2256*p1014
- p2824: 6.1065e-6; = p2238*(p1020+p1022)
- p2450: 3.77388e-5; = p2254*p1014
- p3161: 0; = p2380*p1082
- p2435: 1.33944e-6; = p2239*p1014
- p2053: 1.45647
- p2149: 6.60697e-8; = p2015*p2077*p2111/(p0818*1000)
- p0891: 226512; = IF(p3251=0;0;62.4*6272640/(12*12*12))
- p2367: 0; = p2225*p2196
- p5282: 2.30041e-5; = p1903*p3484
- p2106: 0.856281
- p1097: 0.0606187
- p0260: 176.288
- p0178: 70.291
- p1166: 1.92035e-6; = p1164/p0818
- p2300: 0.00136449; = p2227*p2207
- p0217: 12.089
- p2152: 3.73393e-8; = p2015*p2080*p2114/(p0818*1000)
- p3276: 0.0887032
- p1689: 0
- p3379: 0.00130999; = if(p1232=0;p3246*p3361/p0818;0)
- p1006: 0; = p1002*p0001*p0004/(p0818*p0002)
- p1056: 4.32409e6; = IF(p1012=0;p1049*p1036;0)
- p0167: 7.7
- p5146: 8.26066e-6; = p1767*p3484
- p2016: 0.000207384; = (p2014-p2015)/(p0818)
- p0064: 2.757
- p1725: 0
- p1041: 0.318938
- p1625: 0
- p0708: 0
- p1108: 529543; = IF(p1071=0;p1105*p1102*p1095;0)
- p0026: 2345.24
- p0298: 0.5
- p0595: 0; = IF(p0331<0.5;-SQRT(p0007*EXP(p0463^2*p0008)-p0007);SQRT(p0007*EXP(p0463^2*p0008)-p0007))
- p2075: 0.072
- p2021: 4.65136e-5; = p2020/p0818
- p2877: 2.19628e-7; = p2291*(p1020+p1022)
- p2087: 0.856281
- p1211: 0.6
- p3425: 0; = p3368*p1239
- p1330: 0; = p1320*p0801
- p1988: 750
- p2926: 2.17938e-5; = p2340*(p1079+p1081)
- p0033: 87.719
- p1161: 4.65e6; = p0801
- p2054: 0.91
- p0506: 0; = SQRT(2)*(IF((2*p0374-1)<0;-1;IF((2*p0374-1)>0;1;0))*SQRT(SQRT((2/(pi()*0.140012289)+LN(1-(2*p0374-1)^2)/2)^2-LN(1-(2*p0374-1)^2)/0.140012289)-(2/(pi()*0.140012289)+LN(1-(2*p0374-1)^2)/2)))
- p1279: 0
- p1294: 0; = p1290*p1252/p0818
- p0729: 0
- p1837: 0
- p2368: 0; = p2225*p2197
- p2112: 0.856281
- p2059: 1.00168
- p1265: 0; = if(p1232>0;0;IF(p1259+p1263+p1264=1;0;IF(p1259+p1263+p1264+p1262>1;1-(p1259+p1263+p1264);p1262)))
- p2712: 6.29405e-6; = p2321*(p1019+p1021)
- p1577: 0
- p0399: 0.5
- p2969: 0; = p2383*(p1079+p1081)
- p0823: 0
- p1654: 0
- p1102: 0.0330733; = IF(p1071=0;IF(p1096+p1101=1;0;IF(p1096+p1101+p1098>1;1-(p1096+p1101);p1098));0)
- p1581: 0
- p1241: 0.35156; = if(p1232>0;0;IF(p1234+p1238+p1239+p1240=1;0;1-(p1234+p1238+p1239+p1240)))
- p4102: 0.00014231; = p1963*p3478
- p2682: 1.75714e-7; = p2291*(p1019+p1021)
- p1816: 0
- p2356: 0; = p2225*p2184
- p3395: 0; = p3376*p1234
- p1160: 0.00708816; = (p1156+p1158)*p1159
- p3169: 0; = p2388*p1082
- p1681: 0
- p2738: 1.98447e-5; = p2347*(p1078+p1080)
- p1932: 0
- p1024: 784520; = IF(p1012=0;p1014*(p0704/100)*p0703*1000;0)
- p2467: 3.33478e-5; = p2271*p1073
- p1967: 0; = if(p0807=480;p0802*p0810;0)
- p0572: 0; = IF(p0308<0.5;-SQRT(p0007*EXP(p0440^2*p0008)-p0007);SQRT(p0007*EXP(p0440^2*p0008)-p0007))
- p1869: 0
- p4857: 0; = p1890*p3482
- p1257: 0; = if(p1232>0;0;IF(p1253+p1256=1;0;IF(p1253+p1256+p1255>1;1-(p1253+p1256);p1255)))
- p1564: 0
- p3128: 1.03434e-6; = p2347*p1082
- p3203: 0; = p2422*p1082
- p1990: 30
- p0684: 71.843; = p0024*(1+p0552*p0156/100)
- p2319: 1.78179e-5; = p2224*p2186
- p1752: 0
- p2855: 2.57929e-5; = p2269*(p1079+p1081)
- p3223: 0.126838; = IF(p3216=0;0;(1-p1223)*24.3050/84.3139)
- p3240: 9.68914e-9; = p3234*p1188*p3235/p0818
- p1635: 0
- p1797: 0
- p2387: 0; = p2229*p2216
- p1721: 0
- p2073: 0.377647
- p1162: 0.000445787; = p1161/p0818
- p2528: 3.71564e-5; = p2332*p1014
- p2542: 4.34803e-6; = p2346*p1073
- p0350: 0.5
- p1656: 0
- p1660: 0.731714
- p2324: 2.12351e-6; = p2224*p2191
- p3004: 0; = p2418*(p1079+p1081)
- p2025: 4.2318e-6; = p2015*p2023*p2024/(p0818*1000)
- p2120: 0.51828
- p2198: 1.35784e-6; = 22.98976928*p2197/14.0067
- p2257: 4.80974e-5; = p2222*p2203
- p3284: 0.275
- p4239: 0; = p1890*p3479
- p1887: 0
- p2552: 0; = p2356*p1014
- p1289: 0
- p2598: 0; = p2402*p1014
- p3010: 0; = p2424*(p1079+p1081)
- p2213: 1.38331e-5; = p1116-p2212
- p2593: 0; = p2397*p1014
- p1223: 0.56
- p2130: 1.21732e-6; = p2015*p2058*p2092/(p0818*1000)
- p0688: 7.04; = p0028*(1+p0556*p0160/100)
- p3116: 6.29824e-7; = p2335*p1023
- p3360: 8.53712e7; = if(p1232=0;p3310+p3321+p3332+p3343+p3354;0)
- p0728: 0
- p1286: 0; = p1282*p1252/p0818
- p0148: 0
- p2550: 0; = p2354*p1014
- p3194: 0; = p2413*p1023
- p0113: 19.922
- p0105: 11.578
- p0888: 1.40141e6; = p0686*1000*p0687*p0884/100
- p4758: 0; = p1791*p3482
- p3086: 1.54565e-8; = p2305*p1082
- p2520: 1.17861e-6; = p2324*p1014
- p0808: 0
- p2382: 0; = p2229*p2211
- p0807: 60
- p1178: 6.07624e-8; = p1176/p0818
- p2683: 3.86325e-7; = p2292*(p1019+p1021)
- p0643: 0; = IF(p0379<0.5;-SQRT(p0007*EXP(p0511^2*p0008)-p0007);SQRT(p0007*EXP(p0511^2*p0008)-p0007))
- p2077: 0.043
- p1984: 30
- p0913: 0.00989994
- p2379: 0; = p2229*p2208
- p0845: 0.5
- p2706: 2.19127e-5; = p2315*(p1019+p1021)
- p3133: 0; = p2352*p1132
- p2328: 0.000207254; = p2224*p2196
- p1273: 0; = p1267*p1252/p0818
- p1324: 0.289692; = IF(((p0745*1000*p0751/100)+(p0754*1000*p0760/100))/p0801<0;0;((p0745*1000*p0751/100)+(p0754*1000*p0760/100))/p0801)
- p2457: 0.000164769; = p2261*p1073
- p0686: 2345.24; = p0026*(1+p0554*p0158/100)
- p2676: 1.70163e-6; = p2285*(p1019+p1021)
- p2784: 0; = p2393*(p1019+p1021)
- p2113: 0.832356
- p0742: 97.641; = p0082*(1+p0610*p0214/100)
- p2205: 0.000836119; = 2*14.0067*p2204/30.973762
- p0914: 3.02283e8; = p0825*p0911+(p0830+p0895)*p0824*p0913
- p2196: 0.00128338; = p1068-p2193-p2195
- p4308: 0; = p1963*p3479
- p1859: 0
- p1237: 0; = if(p1232>0;0;p0729/100)
- p0160: 30.612
- p1900: 0
- p2572: 0; = p2376*p1073
- p2302: 0.000127727; = p2227*p2209
- p1671: 0
- p2173: 0.124066; = p0895*p0898/p0818
- p0284: 0.5
- p0715: 0
- p2897: 0; = p2311*(p1129+p1131)
- p1249: 0; = if(p1232>0;0;p1244*p0001/(p0818*p0002))
- p0281: 0.5
- p1940: 0
- p2781: 0; = p2390*(p1128+p1130)
- p3027: 2.86853e-8; = p2246*p1023
- p2734: 6.72459e-5; = p2343*(p1078+p1080)
- p4204: 0; = p1855*p3479
- p2229: 0; = if(p0774*p0778+p0775*p0779+p0776*p0780+p0777*p0781=0;0;p0781*p0777/(p0774*p0778+p0775*p0779+p0776*p0780+p0777*p0781))
- p1829: 0
- p0415: 0; = SQRT(2)*(IF((2*p0283-1)<0;-1;IF((2*p0283-1)>0;1;0))*SQRT(SQRT((2/(pi()*0.140012289)+LN(1-(2*p0283-1)^2)/2)^2-LN(1-(2*p0283-1)^2)/0.140012289)-(2/(pi()*0.140012289)+LN(1-(2*p0283-1)^2)/2)))
- p0644: 0; = IF(p0380<0.5;-SQRT(p0007*EXP(p0512^2*p0008)-p0007);SQRT(p0007*EXP(p0512^2*p0008)-p0007))
- p0730: 69.123; = p0070*(1+p0598*p0202/100)
- p2768: 0; = p2377*(p1078+p1080)
- p2684: 5.36447e-5; = p2293*(p1019+p1021)
- p2220: 0; = p1151/p0818
- p1089: 2.41856e-5; = IF(p1071=0;p1083*p0001/(p0818*p0002);0)
- p0631: 0; = IF(p0367<0.5;-SQRT(p0007*EXP(p0499^2*p0008)-p0007);SQRT(p0007*EXP(p0499^2*p0008)-p0007))
- p5338: 6.0795e-5; = p1963*p3484
- p1740: 0
- p2203: 0.000293237; = p1070-p2200-p2201-p2202
- p2838: 5.34094e-8; = p2252*(p1020+p1022)
- p1948: 0
- p1341: 0; = p1340*p0001/(p0818*p0002)
- p0474: 0; = SQRT(2)*(IF((2*p0342-1)<0;-1;IF((2*p0342-1)>0;1;0))*SQRT(SQRT((2/(pi()*0.140012289)+LN(1-(2*p0342-1)^2)/2)^2-LN(1-(2*p0342-1)^2)/0.140012289)-(2/(pi()*0.140012289)+LN(1-(2*p0342-1)^2)/2)))
- p1669: 0
- p2659: 8.24815e-6; = p2268*(p1078+p1080)
- p5312: 3.42568e-6; = p1933*p3484
- p2083: 2.17294
- p1731: 0
- p1874: 0
- p2482: 3.9837e-5; = p2286*p1014
- p0923: 0.220447; = IF(p0918=1;0;IF(p0918+p0919>1;1-p0918;p0919))
- p2723: 1.28441e-5; = p2332*(p1019+p1021)
- p2925: 0.000105284; = p2339*(p1079+p1081)
- p2254: 6.79941e-5; = p2222*p2200
- p3434: 0; = p3377*p1239
- p2769: 0; = p2378*(p1078+p1080)
- p3390: 0; = p3371*p1234
- p1281: 0; = IF(p1277+p1280=p1263;0;IF(p1277+p1280+p1279>p1263;p1263-(p1277+p1280);p1279))
- p3135: 0; = p2354*p1023
- p2346: 1.42385e-5; = p2228*p2214
- p2715: 4.07417e-7; = p2324*(p1019+p1021)
- p2275: 0; = p2230*p2221
- p1063: 0.455
- p0274: 0.5
- p2492: 0.000109776; = p2296*p1014
- p2133: 7.12877e-7; = p2015*p2061*p2095/(p0818*1000)
- p0461: 0; = SQRT(2)*(IF((2*p0329-1)<0;-1;IF((2*p0329-1)>0;1;0))*SQRT(SQRT((2/(pi()*0.140012289)+LN(1-(2*p0329-1)^2)/2)^2-LN(1-(2*p0329-1)^2)/0.140012289)-(2/(pi()*0.140012289)+LN(1-(2*p0329-1)^2)/2)))
- p4926: 0; = p1963*p3482
- p1561: 0
- p2966: 0; = p2380*(p1079+p1081)
- p0702: 4648.06; = p0042*(1+p0570*p0174/100)
- p2469: 0; = p2273*p1123
- p1803: 0
- p1971: 0.000391307; = p1966*p0001/(p0818*p0002)
- p2371: 0; = p2225*p2200
- p0081: 1.244
- p2962: 0; = p2376*(p1079+p1081)
- p1892: 0
- p1674: 0
- p1758: 0
- p3464: 0; = p3369*p1241
- p2309: 3.08132e-5; = p2227*p2216
- p2581: 0; = p2385*p1073
- p0431: 0; = SQRT(2)*(IF((2*p0299-1)<0;-1;IF((2*p0299-1)>0;1;0))*SQRT(SQRT((2/(pi()*0.140012289)+LN(1-(2*p0299-1)^2)/2)^2-LN(1-(2*p0299-1)^2)/0.140012289)-(2/(pi()*0.140012289)+LN(1-(2*p0299-1)^2)/2)))
- p3357: 1.03098e7; = if(p1232=0;p3307+p3318+p3329+p3340+p3351;0)
- p1743: 0
- p2408: 0; = p2234*p2198
- p3213: 0.112803; = p1222*12.0107/100.0869
- p0902: 0
- p1852: 0
- p1794: 0
- p3217: 0.00729005; = p3213*p1228
- p3159: 0; = p2378*p1082
- p2959: 0; = p2373*(p1020+p1022)
- p0613: 0; = IF(p0349<0.5;-SQRT(p0007*EXP(p0481^2*p0008)-p0007);SQRT(p0007*EXP(p0481^2*p0008)-p0007))
- p2881: 4.13729e-6; = p2295*(p1020+p1022)
- p0556: 0; = IF(p0292<0.5;-SQRT(p0007*EXP(p0424^2*p0008)-p0007);SQRT(p0007*EXP(p0424^2*p0008)-p0007))
- p3295: 0.58
- p2745: 0; = p2354*(p1019+p1021)
- p3406: 0; = p3368*p1238
- p1309: 0
- p3411: 0; = p3373*p1238
- p2909: 2.02502e-6; = p2323*(p1020+p1022)
- p2028: 5.29755e-5; = p2015*p2026*p2027/(p0818*1000)
- p2807: 0; = p2416*(p1078+p1080)
- p1338: 1.34707e6; = p1324*p0801
- p1620: 0
- p3061: 9.89766e-7; = p2280*p1023
- p0024: 71.843
- p2282: 0.000137016; = p2223*p2188
- p0848: 0
- p1805: 0
- p2118: 0.679049
- p1795: 0
- p0653: 0; = IF(p0389<0.5;-SQRT(p0007*EXP(p0521^2*p0008)-p0007);SQRT(p0007*EXP(p0521^2*p0008)-p0007))
- p1267: 0
- p0109: 13.329
- p1972: 0; = if(p0807=480;p1967*p0001/(p0818*p0002);0)
- p0780: 30.01; = p0120*(1+p0648*p0252/100)
- p3586: 2.91483e-5; = p1855*p3476
- p1779: 0
- p2968: 0; = p2382*(p1079+p1081)
- p4191: 0; = p1842*p3479
- p2777: 0; = p2386*(p1078+p1080)
- p0723: 4648.06; = p0063*(1+p0591*p0195/100)
- p1970: 4.65e6; = p0801
- p0449: 0; = SQRT(2)*(IF((2*p0317-1)<0;-1;IF((2*p0317-1)>0;1;0))*SQRT(SQRT((2/(pi()*0.140012289)+LN(1-(2*p0317-1)^2)/2)^2-LN(1-(2*p0317-1)^2)/0.140012289)-(2/(pi()*0.140012289)+LN(1-(2*p0317-1)^2)/2)))
- p1547: 492
- p0859: 0.0448161; = p0671*1000/p0856
- p2511: 6.33912e-5; = p2315*p1014
- p0446: 0; = SQRT(2)*(IF((2*p0314-1)<0;-1;IF((2*p0314-1)>0;1;0))*SQRT(SQRT((2/(pi()*0.140012289)+LN(1-(2*p0314-1)^2)/2)^2-LN(1-(2*p0314-1)^2)/0.140012289)-(2/(pi()*0.140012289)+LN(1-(2*p0314-1)^2)/2)))
- p2689: 0.000187432; = p2298*(p1078+p1080)
- p2276: 0.000477021; = p2223*p2182
- p3341: 0; = if(and(p1232=0;p3254<>0);p3254*(p3271-p3336)/p3338;0)
- p1897: 0
- p0478: 0; = SQRT(2)*(IF((2*p0346-1)<0;-1;IF((2*p0346-1)>0;1;0))*SQRT(SQRT((2/(pi()*0.140012289)+LN(1-(2*p0346-1)^2)/2)^2-LN(1-(2*p0346-1)^2)/0.140012289)-(2/(pi()*0.140012289)+LN(1-(2*p0346-1)^2)/2)))
- p2010: 0.000328557; = ((p1984*p1985+p1990*p1991+p1996*p1997+p2004*p2005)/p0818)*p0005*p0002/1000
- p2853: 1.01613e-6; = p2267*(p1079+p1081)
- p2174: 0.00700667; = p0895*p0903/p0818
- p1033: 0; = IF(p1012=0;p1027*p0001/(p0818*p0002);0)
- p1963k: 5.57467e-5; = p1744*p1948+p1745*p1949+p1746*p1950+p1747*p1951+p1748*p1952+p1749*p1953+p1750*p1954+p1751*p1955+p1752*p1956+p1753*p1957+p1961*p1962
- p3053: 0; = p2272*p1132
- p2231: 0; = if(p0783*p0787+p0784*p0788+p0785*p0789+p0786*p0790=0;0;p0788*p0784/(p0783*p0787+p0784*p0788+p0785*p0789+p0786*p0790))
- p1146: 0
- p0966: 0.07882; = if(p0683=0;0;IF(p0684/100+p0965=1;0;1-(p0684/100+p0965)))
- p2569: 0; = p2373*p1014
- p0906: 0.00672763
- p0671: 208.395; = p0011*(1+p0539*p0143/100)
- p3066: 1.17959e-7; = p2285*p1023
- p1683: 0
- p2743: 0; = p2352*(p1128+p1130)
- p1580: 0
- p1955: 4.71671e-5; = p1547*1000/p0818
- p2223: 0.674487; = if(p0765*p0769+p0766*p0770+p0767*p0771+p0768*p0772=0;0;p0770*p0766/(p0765*p0769+p0766*p0770+p0767*p0771+p0768*p0772))
- p2143: 2.40659e-7; = p2015*p2071*p2105/(p0818*1000)
- p1849: 0
- p3384: 0; = p3365*p1234
- p5170: 2.16815e-8; = p1791*p3484
- p1062: 0.16
- p0257: 18.759
- p2255: 2.91507e-5; = p2222*p2201
- p3440: 0; = p3364*p1240
- p2183: 0.000155247; = p1064-p2182
- p0609: 0; = IF(p0345<0.5;-SQRT(p0007*EXP(p0477^2*p0008)-p0007);SQRT(p0007*EXP(p0477^2*p0008)-p0007))
- p1599: 0
- p1277: 0
- p3108: 2.78854e-7; = p2327*p1023
- p0761: 0
- p5178: 6.50446e-8; = p1799*p3484
- p0373: 0.5
- p0846: 0.373043; = p0841*p0845^3+p0842*p0845^2+p0843*p0845+p0844
- p0241: 34.31
- p3410: 0; = p3372*p1238
- p3113: 8.90368e-7; = p2332*p1023
- p1149: 0
- p1308: 0
- p0282: 0.5
- p0136: 30.41
- p1623: 0
- p2568: 0; = p2372*p1014
- p3242: 7.01282e-8; = p3234*p1188*p3238/p0818
- p0826: 0.101167; = 1-p0825/p0818
- p0815: 0
- p2424: 0; = p2235*p2214
- p1903: 0.000101716; = p1495*1000/p0818
- p0946: 0; = if(and(p0683=0;or(p0807=480;p0807=32;p0807=1;and(p0807=60;p0901<0.03)));p0934;0)
- p2662: 4.03325e-5; = p2271*(p1078+p1080)
- p2345: 2.1168e-6; = p2228*p2213
- p0752: 0
- p1929: 0
- p4716: 6.82602e-6; = p1955*p3481
- p2024: 0.748682
- p2026: 68.85
- p3100: 2.36978e-7; = p2319*p1023
- p0273: 0.5
- p2741: 0; = p2350*(p1128+p1130)
- p2566: 0; = p2370*p1014
- p0642: 0; = IF(p0378<0.5;-SQRT(p0007*EXP(p0510^2*p0008)-p0007);SQRT(p0007*EXP(p0510^2*p0008)-p0007))
- p0239: 27.789
- p1137: 0; = if(p1121=0;p1131*(p0716/100)*p0703*1000;0)
- p1037: 0.372426
- p2134: 3.28686e-6; = p2015*p2062*p2096/(p0818*1000)
- p1922: 0
- p1893: 0
- p2003: 50
- p0128: 12.273
- p2918: 1.60541e-5; = p2332*(p1020+p1022)
- p3373: 0; = if(p1232=0;p3245*p3361/p0818;0)
- p0447: 0; = SQRT(2)*(IF((2*p0315-1)<0;-1;IF((2*p0315-1)>0;1;0))*SQRT(SQRT((2/(pi()*0.140012289)+LN(1-(2*p0315-1)^2)/2)^2-LN(1-(2*p0315-1)^2)/0.140012289)-(2/(pi()*0.140012289)+LN(1-(2*p0315-1)^2)/2)))
- p3279: 0.37
- p0322: 0.5
- p0237: 8.949
- p1612: 0
- p2445: 1.18194e-5; = p2249*p1014
- p0680: 1099.56; = p0020*(1+p0548*p0152/100)
- p1217: 0
- p1946: 0
- p0380: 0.5
- p0958: 0; = if(and(p0683>0;or(p0807=480;p0807=32;p0807=1;and(p0807=60;p0901<0.03)));p0934;0)
- p2950: 0; = p2364*(p1020+p1022)
- p1814: 0
- p3428: 0; = p3371*p1239
- p0029: 92.96
- p1770: 0
- p3474: 0.000460542; = p3379*p1241
- p3266: 0.0545989
- p0905: 0.0983707; = p0904/p0818
- p2699: 7.87128e-5; = p2308*(p1078+p1080)
- p3335: 0; = IF(or(p3254=0;p1232>0);0;p3270*(p3280*(p3283*p1256+p3286*(p1253+p1257)+p1258*p3288+p3300*p3287)))
- p0765: 11.578; = p0105*(1+p0633*p0237/100)
- p2305: 8.02934e-7; = p2227*p2212
- p2525: 7.41505e-8; = p2329*p1014
- p3144: 0; = p2363*p1023
- p2246: 2.15679e-6; = p2222*p2191
- p2117: 0.585147
- p0712: 36.933; = p0052*(1+p0580*p0184/100)
- p2884: 0.000155318; = p2298*(p1079+p1081)
- p1566: 0
- p1197: 1.806
- p2983: 0; = p2397*(p1020+p1022)
- p3165: 0; = p2384*p1082
- p2859: 0; = p2273*(p1129+p1131)
- p0477: 0; = SQRT(2)*(IF((2*p0345-1)<0;-1;IF((2*p0345-1)>0;1;0))*SQRT(SQRT((2/(pi()*0.140012289)+LN(1-(2*p0345-1)^2)/2)^2-LN(1-(2*p0345-1)^2)/0.140012289)-(2/(pi()*0.140012289)+LN(1-(2*p0345-1)^2)/2)))
- p1583: 0
- p1696: 0
- p1734: 0
- p3792: 0; = p1855*p3477
- p2985: 0; = p2399*(p1020+p1022)
- p2665: 0; = p2274*(p1128+p1130)
- p2287: 0.000408511; = p2223*p2193
- p0138: 19.922
- p2888: 3.90908e-5; = p2302*(p1079+p1081)
- p2463: 1.01387e-6; = p2267*p1073
- p0878: 232082; = p0867*p0856
- p2252: 2.22715e-7; = p2222*p2198
- p0165: 9.387
- p1861: 0
- p0885: 0; = IF(p0689+p0884=100;0;100-(p0689+p0884))
- p0389: 0.5
- p0487: 0; = SQRT(2)*(IF((2*p0355-1)<0;-1;IF((2*p0355-1)>0;1;0))*SQRT(SQRT((2/(pi()*0.140012289)+LN(1-(2*p0355-1)^2)/2)^2-LN(1-(2*p0355-1)^2)/0.140012289)-(2/(pi()*0.140012289)+LN(1-(2*p0355-1)^2)/2)))
- p2867: 2.56849e-6; = p2281*(p1020+p1022)
- p3376: 0.000258782; = if(p1232=0;p3246*p3358/p0818;0)
- p1998: 347
- p2608: 0; = p2412*p1014
- p0883: 0.107461; = p0882*p0001*p0003/(p0818*p0002)
- p0925: 0.275048; = IF(p0918+p0923+p0924=1;0;IF(p0918+p0923+p0924+p0921>1;1-(p0918+p0923+p0924);p0921))
- p1204: 0.980791
- p2899: 0; = p2313*(p1129+p1131)
- p3120: 6.6222e-6; = p2339*p1082
- p3320: 0; = if(and(p1232=0;p3253<>0);p3253*(p3264-p3315)/p3316;0)
- p3342: 0; = if(and(p1232=0;p3254<>0);p3254*(p3272-p3337)/p3338;0)
- p0770: 32.774; = p0110*(1+p0638*p0242/100)
- p0403: 0.5
- p4397: 0; = p1842*p3480
- p1011: 0; = p1010*p0001*p0004/(p0818*p0002)
- p3377: 0.00109057; = if(p1232=0;p3246*p3359/p0818;0)
- p1085: 283398; = IF(p1071=0;p1079*(p0710/100)*p0703*1000;0)
- p0614: 0; = IF(p0350<0.5;-SQRT(p0007*EXP(p0482^2*p0008)-p0007);SQRT(p0007*EXP(p0482^2*p0008)-p0007))
- p2778: 0; = p2387*(p1078+p1080)
- p2284: 3.52684e-5; = p2223*p2190
- p1567: 0
- p2501: 2.45192e-7; = p2305*p1073
- p0836: 3.76447e8; = p0831*p0835*p0801/(1-p0831)
- p3334: 0; = IF(or(p3254=0;p1232>0);0;p3269*p3277*(p3300*p3292+(1-p3300)*p3296))
- p2064: 0.676706
- p2808: 0; = p2417*(p1078+p1080)
- p1800: 0
- p2686: 3.31004e-6; = p2295*(p1019+p1021)
- p0270: 14.607
- p1131: 0; = if(p1121=0;IF(p1123+p1128+p1129+p1130=1;0;IF(p1123+p1128+p1129+p1130+p1127>1;1-(p1123+p1128+p1129+p1130);p1127));0)
- p1844: 0
- p1304: 0; = p1300*p1252/p0818
- p2477: 5.94465e-6; = p2281*p1014
- p1082: 0.01925; = IF(p1071=0;IF(p1073+p1078+p1079+p1080+p1081=1;0;1-(p1073+p1078+p1079+p1080+p1081));0)
- p2532: 4.32e-5; = p2336*p1073
- p1690: 0
- p1793: 0
- p0310: 0.5
- p0831: 0.1036; = 1-p0824
- p0342: 0.5
- p1225: 1.088; = IF(p1221=0;0;p1223+1.2*p1224)
- p1611: 0
- p2696: 2.96548e-7; = p2305*(p1078+p1080)
- p3460: 0; = p3365*p1241
- p2000: 4000
- p0106: 19.363
- p3089: 4.10262e-6; = p2308*p1082
- p3431: 0; = p3374*p1239
- p1192: 1.03579e-7; = p1188*p1191/p0818
- p0183: 32.589
- p0430: 0; = SQRT(2)*(IF((2*p0298-1)<0;-1;IF((2*p0298-1)>0;1;0))*SQRT(SQRT((2/(pi()*0.140012289)+LN(1-(2*p0298-1)^2)/2)^2-LN(1-(2*p0298-1)^2)/0.140012289)-(2/(pi()*0.140012289)+LN(1-(2*p0298-1)^2)/2)))
- p2109: 0.826583
- p3372: 0; = if(p1232=0;p3245*p3360/p0818;0)
- p2039: 1.72636e-6; = p2015*p2037*p2038/(p0818*1000)
- p2944: 0; = p2358*(p1020+p1022)
- p3283: 0.3
- p1640: 0
- p1111: 0.0872841
- p1604: 0
- p2121: 0.822447
- p0248: 13.543
- p3087: 1.61626e-7; = p2306*p1082
- p1821: 0
- p2995: 0; = p2409*(p1020+p1022)
- p2880: 2.87466e-5; = p2294*(p1020+p1022)
- p3323: 0; = if(and(p1232=0;p3255<>0);p3265*p3277*(p3299*p3291+(1-p3299)*p3295);0)
- p1860: 0
- p0137: 39.62
- p2310: 0.000276162; = p2227*p2217
- p3260: 0.0343561
- p3095: 0; = p2314*p1132
- p3430: 0; = p3373*p1239
- p1245: 0; = if(p1232>0;0;p1240*(p0725/100)*p0723*1000)
- p3012: 0; = p2426*(p1079+p1081)
- p1973: 0; = if(p0807=480;p1968*p0001/(p0818*p0002);0)
- p1084: 341994; = IF(p1071=0;p1078*(p0710/100)*p0703*1000;0)
- p2466: 3.72083e-6; = p2270*p1073
- p2607: 0; = p2411*p1014
- p3236: 0.0140975
- p1727: 0
- p0514: 0; = SQRT(2)*(IF((2*p0382-1)<0;-1;IF((2*p0382-1)>0;1;0))*SQRT(SQRT((2/(pi()*0.140012289)+LN(1-(2*p0382-1)^2)/2)^2-LN(1-(2*p0382-1)^2)/0.140012289)-(2/(pi()*0.140012289)+LN(1-(2*p0382-1)^2)/2)))
- p1704: 0
- p1666: 0
- p0454: 0; = SQRT(2)*(IF((2*p0322-1)<0;-1;IF((2*p0322-1)>0;1;0))*SQRT(SQRT((2/(pi()*0.140012289)+LN(1-(2*p0322-1)^2)/2)^2-LN(1-(2*p0322-1)^2)/0.140012289)-(2/(pi()*0.140012289)+LN(1-(2*p0322-1)^2)/2)))
- p0019: 1278.97
- p3400: 0; = p3362*p1238
- p0371: 0.5
- p3244: 0; = p0791/100
- p0676: 784.029; = p0016*(1+p0544*p0148/100)
- p2589: 0; = p2393*p1014
- p3166: 0; = p2385*p1082
- p0706: 19.186; = p0046*(1+p0574*p0178/100)
- p1035: 1.60793e-6; = IF(p1012=0;p1029*p0001/(p0818*p0002);0)
- p2651: 2.40011e-5; = p2260*(p1078+p1080)
- p0280: 0.5
- p2739: 2.86914e-6; = p2348*(p1078+p1080)
- p1074: 0.36933; = IF(p1071=0;p0712/100;0)
- p1284: 0; = p1280*p1252/p0818
- p0247: 12.837
- p0938: 3.93801e-5; = p0932*p0001/(p0818*p0002)
- p0079: 1.285
- p0025: 20.275
- p0834: 0.00059
- p1026: 338965; = IF(p1012=0;p1020*(p0704/100)*p0703*1000;0)
- p0908: 0.00297304
- p3942: 1.52258e-7; = p1799*p3478
- p2858: 0; = p2272*(p1129+p1131)
- p0856: 4.65e6; = p0801
- p0223: 28.03
- p3689: 3.67555e-6; = p1962*p3476
- p2612: 0; = p2416*p1073
- p2418: 0; = p2235*p2208
- p0943: 0; = if(and(p0683=0;p0949=0);p0937;0)
- p2940: 0; = p2354*(p1020+p1022)
- p1291: 0; = IF(p1287+p1290=p1264;0;IF(p1287+p1290+p1289>p1264;p1264-(p1287+p1290);p1289))
- p1447: 3049
- p0214: 1.276
- p1325: 0; = IF(((p0745*1000*p0752/100)+(p0754*1000*p0761/100))/p0801<0;0;((p0745*1000*p0752/100)+(p0754*1000*p0761/100))/p0801)
- p2128: 1.49213e-6; = p2015*p2056*p2090/(p0818*1000)
- p2035: 5.93784e-6; = p2015*p2029*(1-p2031)/(p0818*1000)
- p1755: 0
- p1555: 0
- p1271: 0; = IF(p1267+p1270=p1259;0;IF(p1267+p1270+p1269>p1259;p1259-(p1267+p1270);p1269))
- p2337: 0.000127947; = p2228*p2205
- p0035: 8.793
- p1618: 0
- p3382: 0; = p3363*p1234
- p0720: 0
- p0678: 1025.08; = p0018*(1+p0546*p0150/100)
- p1190: 2.07157e-7; = p1188/p0818
- p3078: 1.08016e-5; = p2297*p1082
- p2577: 0; = p2381*p1073
- p2226: 0.240014; = if(p0774*p0778+p0775*p0779+p0776*p0780+p0777*p0781=0;0;p0778*p0774/(p0774*p0778+p0775*p0779+p0776*p0780+p0777*p0781))
- p0383: 0.5
- p0088: 52.94
- p0235: 0
- p0007: 14; = p0006-1
- p0637: 0; = IF(p0373<0.5;-SQRT(p0007*EXP(p0505^2*p0008)-p0007);SQRT(p0007*EXP(p0505^2*p0008)-p0007))
- p1751: 0.791173
- p2244: 7.49289e-6; = p2222*p2189
- p2014: 2.08805e7; = p0833*p2011*p2013
- p2846: 1.98888e-5; = p2260*(p1079+p1081)
- p3328: 0; = if(and(p1232=0;p3255<>0);p3255*(p3265*p3277-p3323)/p3327;0)
- p0120: 30.01
- p3036: 3.87704e-7; = p2255*p1023
- p2444: 5.51377e-5; = p2248*p1014
- p2952: 0; = p2366*(p1020+p1022)
- p3450: 0; = p3374*p1240
- p3264: 0.0887032
- p2513: 1.31877e-6; = p2317*p1014
- p3093: 0; = p2312*p1132
- p2744: 0; = p2353*(p1128+p1130)
- p0937: 0.000109393; = p0931*p0001/(p0818*p0002)
- p3022: 2.40692e-7; = p2241*p1023
- p3289: 0.05
- p1292: 0; = IF(p1287+p1290+p1291=p1261;0;p1261-(p1287+p1290+p1291))
- p0656: 0; = IF(p0392<0.5;-SQRT(p0007*EXP(p0524^2*p0008)-p0007);SQRT(p0007*EXP(p0524^2*p0008)-p0007))
- p1359: 381
- p2600: 0; = p2404*p1014
- p0243: 37.697
- p0563: 0; = IF(p0299<0.5;-SQRT(p0007*EXP(p0431^2*p0008)-p0007);SQRT(p0007*EXP(p0431^2*p0008)-p0007))
- p1339: 0.000115217; = p1338*p0001/(p0818*p0002)
- p0933: 1945; = p0801*p0927
- p1673: 0
- p2711: 4.92005e-7; = p2320*(p1019+p1021)
- p3129: 1.49543e-7; = p2348*p1082
- p0082: 97.641
- p2232: 1; = if(p0783*p0787+p0784*p0788+p0785*p0789+p0786*p0790=0;0;p0789*p0785/(p0783*p0787+p0784*p0788+p0785*p0789+p0786*p0790))
- p2701: 0.000101995; = p2310*(p1078+p1080)
- p2805: 0; = p2414*(p1078+p1080)
- p0008: 0.0739645; = (p0007-1.5)/(p0007-1)^2
- p2798: 0; = p2407*(p1019+p1021)
- p3363: 0; = if(p1232=0;p3244*p3357/p0818;0)
- p0289: 0.5
- p3998: 0.000154745; = p1855*p3478
- p3090: 5.93154e-7; = p2309*p1082
- p2547: 0; = p2351*p1123
- p1128: 0; = if(p1121=0;IF(p1123=1;0;IF(p1123+p1124>1;1-p1123;p1124));0)
- p3296: 0.514
- p2656: 0.000105473; = p2265*(p1078+p1080)
- p1651: 0.299611
- p2415: 0; = p2235*p2205
- p2177: 0.1375; = p0895/p0818-(p2173+p2174+p2175+p2176)
- p2753: 0; = p2362*(p1019+p1021)
- p0043: 4648.06
- p2640: 4.08568e-6; = p2249*(p1019+p1021)
- p2385: 0; = p2229*p2214
- p2971: 0; = p2385*(p1079+p1081)
- p0787: 0
- p2487: 5.0832e-7; = p2291*p1014
- p1213: 0
- p3208: 0; = p2427*p1082
- p2176: 0.00269353; = p0895*p0913/p0818
- p2536: 2.17454e-5; = p2340*p1073
- p2030: 8.87
- p2948: 0; = p2362*(p1020+p1022)
- p2998: 0; = p2412*(p1020+p1022)
- p2647: 8.04937e-7; = p2256*(p1019+p1021)
- p2413: 0; = p2234*p2203
- p3076: 2.29456e-7; = p2295*p1023
- p2261: 0.00053957; = p2226*p2207
- p4650: 1.48452e-6; = p1889*p3481
- p1130: 0; = if(p1121=0;IF(p1123+p1128+p1129=1;0;IF(p1123+p1128+p1129+p1126>1;1-(p1123+p1128+p1129);p1126));0)
- p2074: 0.025
- p0510: 0; = SQRT(2)*(IF((2*p0378-1)<0;-1;IF((2*p0378-1)>0;1;0))*SQRT(SQRT((2/(pi()*0.140012289)+LN(1-(2*p0378-1)^2)/2)^2-LN(1-(2*p0378-1)^2)/0.140012289)-(2/(pi()*0.140012289)+LN(1-(2*p0378-1)^2)/2)))
- p0737: 0
- p4033: 5.93805e-6; = p1890*p3478
- p1168: 9.60173e-7; = p1164*p1167/p0818
- p1558: 0
- p1153: 0
- p0166: 15.004
- p1697: 0
- p1730: 0
- p1839: 0
- p0580: 0; = IF(p0316<0.5;-SQRT(p0007*EXP(p0448^2*p0008)-p0007);SQRT(p0007*EXP(p0448^2*p0008)-p0007))
- p2407: 0; = p2234*p2197
- p1672: 0
- p1587: 0.799395
- p0283: 0.5
- p2316: 2.5071e-5; = p2224*p2183
- p3170: 0; = p2389*p1132
- p2860: 0; = p2274*(p1129+p1131)
- p1763: 0
- p1663: 0
- p2103: 0.912485
- p2289: 0.000865623; = p2223*p2196
- p2992: 0; = p2406*(p1020+p1022)
- p3522: 9.55997e-9; = p1791*p3476
- p0419: 0; = SQRT(2)*(IF((2*p0287-1)<0;-1;IF((2*p0287-1)>0;1;0))*SQRT(SQRT((2/(pi()*0.140012289)+LN(1-(2*p0287-1)^2)/2)^2-LN(1-(2*p0287-1)^2)/0.140012289)-(2/(pi()*0.140012289)+LN(1-(2*p0287-1)^2)/2)))
- p0579: 0; = IF(p0315<0.5;-SQRT(p0007*EXP(p0447^2*p0008)-p0007);SQRT(p0007*EXP(p0447^2*p0008)-p0007))
- p1332: 4.9277e6; = p1321*p0801
- p1936: 0
- p2500: 0.000220535; = p2304*p1073
- p0639: 0; = IF(p0375<0.5;-SQRT(p0007*EXP(p0507^2*p0008)-p0007);SQRT(p0007*EXP(p0507^2*p0008)-p0007))
- p1327: 0.452714; = if(p1318=0;if(p1327a=0;1;if(p1327a<0;0;p1327a));0)
- p2837: 3.25401e-8; = p2251*(p1020+p1022)
- p1173: 0.5
- p3325: 0; = if(and(p1232=0;p3255<>0);p3267*p3289;0)
- p3105: 2.82427e-8; = p2324*p1023
- p2828: 6.24606e-7; = p2242*(p1020+p1022)
- p2865: 8.19716e-6; = p2279*(p1020+p1022)
- p0114: 45.802
- p2157: 7.5259e-8; = p2015*p2086*p2119/(p0818*1000)
- p0213: 5.502
- p0759: 0
- p0776: 19.798; = p0116*(1+p0644*p0248/100)
- p2072: 0.134
- p2770: 0; = p2379*(p1078+p1080)
- p3206: 0; = p2425*p1082
- p1207: 17.2736; = if(p1193>0;0;(p1194*p1050/p1057+p1195*p1051/p1058+p1196*p1052/p1059+p1197*p1053/p1060+p1198*p1054/p1061+p1199*p1055/p1062+p1200*p1056/p1063)/(p0702*1000)+(p1201*p1109/p1114+p1202*p1110/p1115)/(p0702*1000)+p1203*p1170/p0801+p1204*p1176/p0801)
- p1702: 0
- p1847: 0
- p2197: 8.27273e-7; = p1055/p0818
- p1933: 1.51472e-5; = p1525*1000/p0818
- p0476: 0; = SQRT(2)*(IF((2*p0344-1)<0;-1;IF((2*p0344-1)>0;1;0))*SQRT(SQRT((2/(pi()*0.140012289)+LN(1-(2*p0344-1)^2)/2)^2-LN(1-(2*p0344-1)^2)/0.140012289)-(2/(pi()*0.140012289)+LN(1-(2*p0344-1)^2)/2)))
- p1694: 0
- p1077: 0; = IF(p1071=0;p0715/100;0)
- p1938: 0
- p1707: 0
- p1916: 0
- p2129: 2.21152e-6; = p2015*p2057*p2091/(p0818*1000)
- p3934: 5.07526e-8; = p1791*p3478
- p3385: 0; = p3366*p1234
- p2975: 0; = p2389*(p1129+p1131)
- p1833: 0
- p1738: 0
- p1650: 0
- p0994: 0; = p0990*p0001*p0004/(p0818*p0002)
- p0570: 0; = IF(p0306<0.5;-SQRT(p0007*EXP(p0438^2*p0008)-p0007);SQRT(p0007*EXP(p0438^2*p0008)-p0007))
- p0502: 0; = SQRT(2)*(IF((2*p0370-1)<0;-1;IF((2*p0370-1)>0;1;0))*SQRT(SQRT((2/(pi()*0.140012289)+LN(1-(2*p0370-1)^2)/2)^2-LN(1-(2*p0370-1)^2)/0.140012289)-(2/(pi()*0.140012289)+LN(1-(2*p0370-1)^2)/2)))
- p2082: 0.285294
- p3365: 0; = if(p1232=0;p3244*p3359/p0818;0)
- p2540: 6.18168e-8; = p2344*p1073
- p3347: 0.00107264; = if(and(p1232=0;p3256<>0);p3275*p3289;0)
- p1691: 0
- p1842: 4.7934e-7; = p1434*1000/p0818
- p1008: 0; = p1004*p0001*p0004/(p0818*p0002)
- p0805: 0
- p2288: 8.7569e-5; = p2223*p2195
- p0641: 0; = IF(p0377<0.5;-SQRT(p0007*EXP(p0509^2*p0008)-p0007);SQRT(p0007*EXP(p0509^2*p0008)-p0007))
- p0619: 0; = IF(p0355<0.5;-SQRT(p0007*EXP(p0487^2*p0008)-p0007);SQRT(p0007*EXP(p0487^2*p0008)-p0007))
- p3119: 7.97574e-7; = p2338*p1082
- p2833: 4.18568e-6; = p2247*(p1020+p1022)
- p1342: 0; = p1326*p0801
- p0903: 0.0257527
- p3008: 0; = p2422*(p1079+p1081)
- p4719: 5.33419e-6; = p1962*p3481
- p0941: 0; = if(and(p0683=0;p0947=0);p0935;0)
- p0427: 0; = SQRT(2)*(IF((2*p0295-1)<0;-1;IF((2*p0295-1)>0;1;0))*SQRT(SQRT((2/(pi()*0.140012289)+LN(1-(2*p0295-1)^2)/2)^2-LN(1-(2*p0295-1)^2)/0.140012289)-(2/(pi()*0.140012289)+LN(1-(2*p0295-1)^2)/2)))
- p2091: 0.374844
- p2574: 0; = p2378*p1073
- p0086: 9.972
- p1276: 0.10355; = p1272*p1252/p0818
- p1563: 0.693253
- p1630: 0
- p0673: 0
- p2737: 5.25872e-6; = p2346*(p1078+p1080)
- p2546: 0; = p2350*p1123
- p1589: 0
- p2378: 0; = p2229*p2207
- p2868: 3.28578e-5; = p2282*(p1020+p1022)
- p0881: 0; = p0880*p0001*p0003/(p0818*p0002)
- p3317: 0; = if(and(p1232=0;p3253<>0);p3253*(p3261*p3277-p3312)/p3316;0)
- p1745: 0
- p2340: 7.12099e-5; = p2228*p2208
- p4831: 0; = p1864*p3482
- p2864: 2.37982e-6; = p2278*(p1020+p1022)
- p1104: 0.303167; = IF(p1071=0;IF(p1096+p1101+p1102+p1103=1;0;1-(p1096+p1101+p1102+p1103));0)
- p2462: 9.69578e-8; = p2266*p1073
- p1801: 0
- p0698: 0
- p4488: 0; = p1933*p3480
- p3207: 0; = p2426*p1082
- p3269: 0.851786
- p0028: 7.04
- p2185: 5.06784e-5; = p1065-p2184
- p3453: 0; = p3377*p1240
- p1836: 0
- p0777: 0
- p0877: 0; = p0876*p0001*p0003/(p0818*p0002)
- p2817: 0; = p2426*(p1078+p1080)
- p1761: 0
- p2427: 0; = p2235*p2217
- p3422: 0; = p3365*p1239
- p1142: 0; = if(p1121=0;p1136*p0001/(p0818*p0002);0)
- p1227: 0.000397722; = IF(p1221=0;0;p1226*p0001/(p0818*p0002))
- p2306: 8.39615e-6; = p2227*p2213
- p3201: 0; = p2420*p1082
- p0788: 12.273; = p0128*(1+p0656*p0260/100)
- p3062: 1.4245e-7; = p2281*p1023
- p3082: 5.43715e-6; = p2301*p1082
- p2861: 0; = p2275*(p1129+p1131)
- p2308: 0.000213123; = p2227*p2215
- p2879: 6.70517e-5; = p2293*(p1020+p1022)
- p3392: 0; = p3373*p1234
- p2126: 1.30448e-6; = p2015*p2054*p2088/(p0818*1000)
- p3259: 0.00796296
- p3291: 0.437
- p2913: 5.02797e-6; = p2327*(p1020+p1022)
- p3080: 3.16352e-6; = p2299*p1082
- p2495: 5.01841e-5; = p2299*p1073
- p1812: 0
- p1736: 0
- p3459: 0; = p3364*p1241
- p1637: 0
- p1254: 0; = if(p1232>0;0;p0736/100)
- p2916: 5.25852e-8; = p2330*(p1020+p1022)
- p3245: 0; = IF(p3244=1;0;if(p3244+p0792/100>1;1-p3244;p0792/100))
- p2842: 1.00611e-6; = p2256*(p1020+p1022)
- p0865: 0; = IF(p0858+p0864=1;0;IF(p0858+p0864+p0860>1;1-(p0858+p0864);p0860))
- p3073: 2.67806e-8; = p2292*p1023
- p1573: 0
- p0911: 0.0154167
- p3573: 4.77998e-8; = p1842*p3476
- p1032: 2.89922e-5; = IF(p1012=0;p1026*p0001/(p0818*p0002);0)
- p0407: 0; = SQRT(2)*(IF((2*p0275-1)<0;-1;IF((2*p0275-1)>0;1;0))*SQRT(SQRT((2/(pi()*0.140012289)+LN(1-(2*p0275-1)^2)/2)^2-LN(1-(2*p0275-1)^2)/0.140012289)-(2/(pi()*0.140012289)+LN(1-(2*p0275-1)^2)/2)))
- p1175: 0.000136304
- p1283: 0; = p1277*p1252/p0818
- p1813: 0
- p2874: 2.09999e-5; = p2288*(p1020+p1022)
- p2222: 0.164022; = if(p0765*p0769+p0766*p0770+p0767*p0771+p0768*p0772=0;0;p0769*p0765/(p0765*p0769+p0766*p0770+p0767*p0771+p0768*p0772))
- p1746: 0
- p2747: 0; = p2356*(p1019+p1021)
- p1110: 4.85406e6; = IF(p1071=0;p1105*p1104*p1095;0)
- p3309: 5.14753e6; = if(and(p1232=0;p3252<>0);p3252*(p3260-p3304)/p3305;0)
- p2688: 0.000207239; = p2297*(p1078+p1080)
- p1778: 0
- p3375: 0.000988382; = if(p1232=0;p3246*p3357/p0818;0)
- p0954: 6.70593e-5; = if(and(p0683>0;or(p0807=56;p0807=100;and(p0807=60;p0901>0.06)));p0936;0)
- p2553: 0; = p2357*p1014
- p1631: 0
- p3048: 6.39128e-8; = p2267*p1082
- p2999: 0; = p2413*(p1020+p1022)
- p2990: 0; = p2404*(p1020+p1022)
- p4238: 0; = p1889*p3479
- p0443: 0; = SQRT(2)*(IF((2*p0311-1)<0;-1;IF((2*p0311-1)>0;1;0))*SQRT(SQRT((2/(pi()*0.140012289)+LN(1-(2*p0311-1)^2)/2)^2-LN(1-(2*p0311-1)^2)/0.140012289)-(2/(pi()*0.140012289)+LN(1-(2*p0311-1)^2)/2)))
- p1043: 0.218296
- p2448: 1.23614e-7; = p2252*p1014
- p3251: 1.3673e9; = p1252-(p3252+p3253+p3254+p3255+p3256)
- p0918: 0.236464; = p0680*1000/p0801
- p3288: 0.505
- p0719: 0
- p0955: 0.000109393; = if(and(p0683>0;or(p0807=56;p0807=100;and(p0807=60;p0901>0.06)));p0937;0)
- p3278: 0.46
- p3067: 9.54601e-7; = p2286*p1023
- p2760: 0; = p2369*(p1019+p1021)
- p1772: 0
- p2202: 2.55785e-5; = 4*1.00794*p2201/(2*14.0067)
- p2746: 0; = p2355*(p1019+p1021)
- p0774: 45.802; = p0114*(1+p0642*p0246/100)
- p2933: 1.64446e-5; = p2347*(p1079+p1081)
- p1848: 0
- p1319: 0.199614; = IF(((p0745*1000*p0746/100)+(p0754*1000*p0755/100))/p0801<0;0;((p0745*1000*p0746/100)+(p0754*1000*p0755/100))/p0801)
- p3338: 0; = if(and(p1232=0;p3254<>0);1-(p3334+p3335+p3336+p3337);0)
- p1005: 1.40141e6; = p1001*p0888
- p0816: 0
- p1266: 0.30877; = if(p1232>0;0;IF(p1259+p1263+p1264+p1265=1;0;1-(p1259+p1263+p1264+p1265)))
- p0692: 0
- p0505: 0; = SQRT(2)*(IF((2*p0373-1)<0;-1;IF((2*p0373-1)>0;1;0))*SQRT(SQRT((2/(pi()*0.140012289)+LN(1-(2*p0373-1)^2)/2)^2-LN(1-(2*p0373-1)^2)/0.140012289)-(2/(pi()*0.140012289)+LN(1-(2*p0373-1)^2)/2)))
- p3456: 0; = p3380*p1240
- p2996: 0; = p2410*(p1020+p1022)
- p1873: 0
- p0794: 0
- p2264: 2.18076e-5; = p2226*p2210
- p0575: 0; = IF(p0311<0.5;-SQRT(p0007*EXP(p0443^2*p0008)-p0007);SQRT(p0007*EXP(p0443^2*p0008)-p0007))
- p0344: 0.5
- p3469: 0.00242352; = p3374*p1241
- p2910: 5.09239e-7; = p2324*(p1020+p1022)
- p2900: 0; = p2314*(p1129+p1131)
- p3020: 3.20965e-8; = p2239*p1023
- p2283: 3.08121e-5; = p2223*p2189
- p1114: 0.216028
- p2751: 0; = p2360*(p1019+p1021)
- p3429: 0; = p3372*p1239
- p3448: 0; = p3372*p1240
- p1193: 0; = IF(OR(p1036=0;p1095=0);0.0001*p0857;0)
- p2633: 4.99716e-7; = p2242*(p1019+p1021)
- p2320: 2.5644e-6; = p2224*p2187
- p0421: 0; = SQRT(2)*(IF((2*p0289-1)<0;-1;IF((2*p0289-1)>0;1;0))*SQRT(SQRT((2/(pi()*0.140012289)+LN(1-(2*p0289-1)^2)/2)^2-LN(1-(2*p0289-1)^2)/0.140012289)-(2/(pi()*0.140012289)+LN(1-(2*p0289-1)^2)/2)))
- p0758: 0
- p0672: 0
- p3423: 0; = p3366*p1239
- p3156: 0; = p2375*p1082
- p1251: 8.52146e-6; = if(p1232>0;0;p1246*p0001/(p0818*p0002))
- p1314: 0; = p1310*p1252/p0818
- p0634: 0; = IF(p0370<0.5;-SQRT(p0007*EXP(p0502^2*p0008)-p0007);SQRT(p0007*EXP(p0502^2*p0008)-p0007))
- p0934: 9.4047e-5; = p0928*p0001/(p0818*p0002)
- p1811: 0
- p2934: 2.37755e-6; = p2348*(p1079+p1081)
- p3471: 9.09772e-5; = p3376*p1241
- p2351: 0; = p2232*p2219
- p0195: 0
- p2936: 0; = p2350*(p1129+p1131)
- p2799: 0; = p2408*(p1019+p1021)
- p3311: 9.27636e6; = if(and(p1232=0;p3252<>0);p3252-(p3306+p3307+p3308+p3309+p3310);0)
- p0997: 0; = if(p0888=0;0;if((p0695*p0694*1000*p0696/100)/p0888>1;1;(p0695*p0694*1000*p0696/100)/p0888))
- p1659: 0
- p3595: 5.35358e-7; = p1864*p3476
- p1256: 0; = if(p1232>0;0;IF(p1253=1;0;IF(p1253+p1254>1;1-p1253;p1254)))
- p0345: 0.5
- p4972: 0; = p1799*p3483
- p0920: 0.168608; = p0676*1000/p0801
- p3248: 0
- p2031: 0.465411
- p2216: 5.07663e-5; = p1108/p0818
- p2318: 8.18411e-6; = p2224*p2185
- p0003: 10000
- p1605: 0
- p1311: 0; = IF(p1307+p1310=p1266;0;IF(p1307+p1310+p1309>p1266;p1266-(p1307+p1310);p1309))
- p3326: 0; = if(and(p1232=0;p3255<>0);p3268*p3289;0)
- p0669: 33.8523; = p0009*(1+p0537*p0141/100)
- p0987: 0; = if(p0978>0;0;if(and(p0687=0;p0691=0;p0695=0;p0699=0);0;IF(p0982+p0985+p0986=1;0;1-(p0982+p0985+p0986))))
- p0119: 51.568
- p2041: 2.79925e-6; = p2015*p2040/(p0818*1000)
- p2369: 0; = p2225*p2198
- p1835: 0
- p3312: 0; = if(and(p1232=0;p3253<>0);p3261*p3277*(p3298*p3290+(1-p3298)*p3294);0)
- p0703: 4648.06; = p0043*(1+p0571*p0175/100)
- p1871: 0
- p1042: 0.000435637
- p1560: 0
- p2481: 4.92262e-6; = p2285*p1014
- p2720: 2.5632e-8; = p2329*(p1019+p1021)
- p3329: 0; = if(and(p1232=0;p3255<>0);p3255*(p3266-p3324)/p3327;0)
- p1810: 0
- p2236: 0; = 1-(p2230+p2231+p2232+p2233)
- p3457: 0; = p3362*p1241
- p0709: 0
- p2212: 1.32288e-6; = p1106/p0818
- p2582: 0; = p2386*p1073
- p0030: 849.21
- p3407: 0; = p3369*p1238
- p1590: 0
- p1616: 0
- p1344: 2.10512e6; = IF(p1318=0;p1327*p0801;0)
- p2678: 7.83769e-5; = p2287*(p1019+p1021)
- p0967: 2.1821e8; = (p0684/100)*p0683*p0682*1000
- p2894: 6.52263e-5; = p2308*(p1079+p1081)
- p2748: 0; = p2357*(p1019+p1021)
- p1687: 0
- p1187: 0.0004647
- p1138: 0; = if(p1121=0;p1132*(p0716/100)*p0703*1000;0)
- p3079: 9.76921e-6; = p2298*p1082
- p0657: 0; = IF(p0393<0.5;-SQRT(p0007*EXP(p0525^2*p0008)-p0007);SQRT(p0007*EXP(p0525^2*p0008)-p0007))
- p2970: 0; = p2384*(p1079+p1081)
- p1068: 0.00201887; = IF(p1012=0;p1054/(p1061*p0818);0)
- p1775: 0
- p3182: 0; = p2401*p1023
- p3433: 0; = p3376*p1239
- p1105: 0.436421
- p1646: 0
- p1877: 0
- p3466: 0; = p3371*p1241
- p3029: 1.32125e-6; = p2248*p1023
- p0800: 0
- p0410: 0; = SQRT(2)*(IF((2*p0278-1)<0;-1;IF((2*p0278-1)>0;1;0))*SQRT(SQRT((2/(pi()*0.140012289)+LN(1-(2*p0278-1)^2)/2)^2-LN(1-(2*p0278-1)^2)/0.140012289)-(2/(pi()*0.140012289)+LN(1-(2*p0278-1)^2)/2)))
- p1015: 0.19186; = IF(p1012=0;p0706/100;0)
- p2700: 1.13802e-5; = p2309*(p1078+p1080)
- p3419: 0; = p3362*p1239
- p1963f: 9.15051e-5; = p1647*p1851+p1648*p1852+p1649*p1853+p1650*p1854+p1651*p1855+p1652*p1856+p1653*p1857+p1654*p1858+p1655*p1859+p1656*p1860+p1657*p1861+p1658*p1862+p1659*p1863+p1660*p1864+p1661*p1865+p1662*p1866+p1663*p1867+p1664*p1868+p1665*p1869+p1666*p1870
- p0921: 0.275048; = p0679*1000/p0801
- p2022: 0.000308417; = p2018*p2015/p0818-p2021
- p0876: 0; = p0866*p0856
- p0538: 0; = IF(p0274<0.5;-SQRT(p0007*EXP(p0406^2*p0008)-p0007);SQRT(p0007*EXP(p0406^2*p0008)-p0007))
- p1809: 0
- p3388: 0; = p3369*p1234
- p2357: 0; = p2225*p2185
- p0670: 4083.88; = p0010*(1+p0538*p0142/100)
- p2905: 4.27291e-6; = p2319*(p1020+p1022)
- p0078: 4648.06
- p1070: 0.000911082; = IF(p1012=0;p1056/(p1063*p0818);0)
- p2436: 4.61362e-6; = p2240*p1014
- p1644: 0
- p0694: 1496.03; = p0034*(1+p0562*p0166/100)
- p0725: 6.097; = p0065*(1+p0593*p0197/100)
- p2373: 0; = p2225*p2202
- p1919: 0
- p3293: 0.3875
- p1643: 0
- p1027: 0; = IF(p1012=0;p1021*(p0704/100)*p0703*1000;0)
- p0531: 0; = SQRT(2)*(IF((2*p0399-1)<0;-1;IF((2*p0399-1)>0;1;0))*SQRT(SQRT((2/(pi()*0.140012289)+LN(1-(2*p0399-1)^2)/2)^2-LN(1-(2*p0399-1)^2)/0.140012289)-(2/(pi()*0.140012289)+LN(1-(2*p0399-1)^2)/2)))
- p3026: 1.14069e-7; = p2245*p1023
- p4528: 5.28601e-6; = p1767*p3481
- p3736: 0; = p1799*p3477
- p0463: 0; = SQRT(2)*(IF((2*p0331-1)<0;-1;IF((2*p0331-1)>0;1;0))*SQRT(SQRT((2/(pi()*0.140012289)+LN(1-(2*p0331-1)^2)/2)^2-LN(1-(2*p0331-1)^2)/0.140012289)-(2/(pi()*0.140012289)+LN(1-(2*p0331-1)^2)/2)))
- p3151: 0; = p2370*p1023
- p1716: 0
- p2278: 9.92378e-6; = p2223*p2184
- p2178: 0.0314446; = (p0895*p0831/(1-p0831))/(p0818)
- p4720: 3.89028e-5; = p1963*p3481
- p1899: 0
- p0860: 0; = p0672*1000/p0856
- p3530: 2.86799e-8; = p1799*p3476
- p1969: 0; = p0803
- p2200: 0.000414543; = p1056/p0818
- p2161: 1.58815e-8; = p2015*p2085*p2123/(p0818*1000)
- p2545: 2.12613e-5; = p2349*p1073
- p3181: 0; = p2400*p1023
- p1680: 0
- p2420: 0; = p2235*p2210
- p0401: 0.5
- p2352: 0; = p2232*p2220
- p1135: 0; = if(p1121=0;p1129*(p0716/100)*p0703*1000;0)
- p1735: 0
- p2250: 0.000210503; = p2222*p2196
- p2094: 0.922577
- p0561: 0; = IF(p0297<0.5;-SQRT(p0007*EXP(p0429^2*p0008)-p0007);SQRT(p0007*EXP(p0429^2*p0008)-p0007))
- p2455: 6.12818e-5; = p2259*p1073
- p0275: 0.5
- p2354: 0; = p2225*p2182
- p0413: 0; = SQRT(2)*(IF((2*p0281-1)<0;-1;IF((2*p0281-1)>0;1;0))*SQRT(SQRT((2/(pi()*0.140012289)+LN(1-(2*p0281-1)^2)/2)^2-LN(1-(2*p0281-1)^2)/0.140012289)-(2/(pi()*0.140012289)+LN(1-(2*p0281-1)^2)/2)))
- p3252: 1.35016e8; = p1252*(p1267*(1-p3247)+p1270*(1-p3248)+p1271*(1-p3249)+p1272*(1-p3250))
- p2758: 0; = p2367*(p1019+p1021)
- p0424: 0; = SQRT(2)*(IF((2*p0292-1)<0;-1;IF((2*p0292-1)>0;1;0))*SQRT(SQRT((2/(pi()*0.140012289)+LN(1-(2*p0292-1)^2)/2)^2-LN(1-(2*p0292-1)^2)/0.140012289)-(2/(pi()*0.140012289)+LN(1-(2*p0292-1)^2)/2)))
- p0766: 19.363; = p0106*(1+p0634*p0238/100)
- p2339: 0.000344011; = p2228*p2207
- p2618: 0; = p2422*p1073
- p1568: 0
- p1586: 0
- p1943: 0
- p2882: 4.74308e-5; = p2296*(p1020+p1022)
- p2527: 2.67584e-7; = p2331*p1014
- p1196: 0.59
- p1060: 0.21
- p2063: 2.01468
- p2710: 3.41854e-6; = p2319*(p1019+p1021)
- p2089: 0.40001
- p0377: 0.5
- p2234: 0; = 1-(p2222+p2223+p2224+p2225)
- p2522: 5.42869e-5; = p2326*p1014
- p1598: 0
- p3084: 1.06161e-6; = p2303*p1082
- p3168: 0; = p2387*p1082
- p0331: 0.5
- p2502: 2.56393e-6; = p2306*p1073
- p1288: 0
- p3171: 0; = p2390*p1132
- p2350: 0; = p2232*p2218
- p2639: 1.90597e-5; = p2248*(p1019+p1021)
- p2296: 0.000197785; = p2223*p2203
- p0732: 0
- p3007: 0; = p2421*(p1079+p1081)
- p5028: 0; = p1855*p3483
- p1966: 4.575e6; = if(p0814=0;p0802;0)
- p1244: 0; = if(p1232>0;0;p1239*(p0725/100)*p0723*1000)
- p0328: 0.5
- p0151: 0
- p1261: 0; = if(p1232>0;0;p0732/100)
- p3235: 0.118093
- p3308: 1.19308e6; = if(and(p1232=0;p3252<>0);p3252*(p3259-p3303)/p3305;0)
- p2127: 4.01574e-6; = p2015*p2055*p2089/(p0818*1000)
- p0837: 0.5
- p3035: 9.04322e-7; = p2254*p1023
- p1209: 77.2036; = p1206*p0818*p0822/p0801
- p1083: 282768; = IF(p1071=0;p1073*(p0710/100)*p0703*1000;0)
- p0268: 26.183
- p1913: 0
- p1285: 0; = p1281*p1252/p0818
- p3016: 0; = p2430*(p1129+p1131)
- p0177: 46.416
- p0220: 18.232
- p2325: 1.71848e-5; = p2224*p2192
- p2465: 2.57356e-5; = p2269*p1073
- p1053: 476511; = IF(p1012=0;p1046*p1036;0)
- p3302: 0.0114097; = if(and(p1232=0;p3252<>0);p3258*(p3278*(p3282*p1256+p3286*(p1253+p1257)+p1258*p3288+p3297*p3287));0)
- p0544: 0; = IF(p0280<0.5;-SQRT(p0007*EXP(p0412^2*p0008)-p0007);SQRT(p0007*EXP(p0412^2*p0008)-p0007))
- p0246: 12.583
- p4101: 1.9513e-5; = p1962*p3478
- p3234: 0.39606; = 1-p3233
- p1552: 0
- p2714: 1.62011e-6; = p2323*(p1019+p1021)
- p3272: 0.0398246
- p5221: 1.08408e-7; = p1842*p3484
- p4116: 0; = p1767*p3479
- p1987: 400
- p2291: 9.15843e-7; = p2223*p2198
- p3704: 0; = p1767*p3477
- p1036: 1.98084e7; = IF(p1012=0;p0795*p0702*1000*p0796/100;0)
- p4734: 0; = p1767*p3482
- p3149: 0; = p2368*p1023
- p2757: 0; = p2366*(p1019+p1021)
- p0991: 0; = p0987*p0886
- p0308: 0.5
- p0842: -0.073175
- p0760: 0
- p1582: 0
- p0557: 0; = IF(p0293<0.5;-SQRT(p0007*EXP(p0425^2*p0008)-p0007);SQRT(p0007*EXP(p0425^2*p0008)-p0007))
- p2049: 25.6942
- p2535: 0.000105051; = p2339*p1073
- p2189: 4.56822e-5; = p1053/p0818
- p3263: 0.0214527
- p2585: 0; = p2389*p1123
- p1231: 0.0341978; = IF(p1221=0;0;p1230*(p1228+p1229))
- p0989: 1.25836e7; = p0985*p0886
- p0947: 0; = if(and(p0683=0;or(p0807=480;p0807=32;p0807=1;and(p0807=60;p0901<0.03)));p0935;0)
- p1177: 0.000397722; = p0801*p0001/(p0818*p0002)
- p2019: 0.13105
- p2044: 7.9947e-8; = p2015*p2042*p2043/(p0818*1000)
- p2789: 0; = p2398*(p1019+p1021)
- p1708: 0
- p2562: 0; = p2366*p1014
- p4282: 0; = p1933*p3479
- p0314: 0.5
- p2321: 3.28054e-5; = p2224*p2188
- p3132: 0; = p2351*p1132
- p3397: 0; = p3378*p1234
- p1220: 0; = IF(p1218<0.5;-SQRT(p1214*EXP(p1219^2*p1215)-p1214);SQRT(p1214*EXP(p1219^2*p1215)-p1214))
- p2763: 0; = p2372*(p1019+p1021)
- p2841: 6.99063e-6; = p2255*(p1020+p1022)
- p1023: 0.0133; = IF(p1012=0;IF(p1014+p1019+p1020+p1021+p1022=1;0;1-(p1014+p1019+p1020+p1021+p1022));0)
- p1188: 2160.86; = p1187*p0801
- p1826: 0
- p1210: 0.46
- p2061: 0.518824
- p0635: 0; = IF(p0371<0.5;-SQRT(p0007*EXP(p0503^2*p0008)-p0007);SQRT(p0007*EXP(p0503^2*p0008)-p0007))
- p0307: 0.5
- p3364: 0; = if(p1232=0;p3244*p3358/p0818;0)
- p2930: 6.19545e-8; = p2344*(p1079+p1081)
- p0554: 0; = IF(p0290<0.5;-SQRT(p0007*EXP(p0422^2*p0008)-p0007);SQRT(p0007*EXP(p0422^2*p0008)-p0007))
- p1282: 0; = IF(p1277+p1280+p1281=p1260;0;p1260-(p1277+p1280+p1281))
- p1208: 95.2695; = p1205*p0818*p0822/p0801
- p3262: 0.0787162
- p2269: 8.42766e-5; = p2226*p2215
- p1059: 0.335
- p1094: 1.52462e-6; = IF(p1071=0;p1088*p0001/(p0818*p0002);0)
- p1562: 0
- p2344: 2.02433e-7; = p2228*p2212
- p2425: 0; = p2235*p2215
- p0440: 0; = SQRT(2)*(IF((2*p0308-1)<0;-1;IF((2*p0308-1)>0;1;0))*SQRT(SQRT((2/(pi()*0.140012289)+LN(1-(2*p0308-1)^2)/2)^2-LN(1-(2*p0308-1)^2)/0.140012289)-(2/(pi()*0.140012289)+LN(1-(2*p0308-1)^2)/2)))
- p0158: 4.119
- p3374: 0.00689362; = if(p1232=0;p3246*p3356/p0818;0)
- p3077: 2.63054e-6; = p2296*p1023
- p0998: 0; = if(p0888=0;0;if((p0699*p0698*1000*p0700/100)/p0888>1;1;(p0699*p0698*1000*p0700/100)/p0888))
- p2341: 3.2202e-5; = p2228*p2209
- p1857: 0
- p2394: 0; = p2234*p2183
- p3212: 0; = p2431*p1132
- p1661: 0
- p2051: 4.38952e-5; = p2015*p2049*p2050/(p0818*1000)
- p2924: 1.26804e-5; = p2338*(p1079+p1081)
- p0868: 0; = IF(p0858+p0864+p0865+p0866+p0867=1;0;IF(p0858+p0864+p0865+p0866+p0867+p0863>1;1-(p0858+p0864+p0865+p0866+p0867);p0863))
- p3250: 0.875
- p1985: 5.61631e7; = (if(p1057=0;0;p1050/p1057)+if(p1058=0;0;p1051/p1058)+if(p1059=0;0;p1052/p1059)+if(p1060=0;0;p1053/p1060)+if(p1061=0;0;p1054/p1061)+if(p1062=0;0;p1055/p1062)+if(p1063=0;0;p1056/p1063))*(1+p1157)
- p4032: 5.43052e-6; = p1889*p3478
- p3498: 3.64235e-6; = p1767*p3476
- p2889: 1.68781e-5; = p2303*(p1079+p1081)
- p2809: 0; = p2418*(p1078+p1080)
- p2348: 7.76849e-6; = p2228*p2216
- p1000: 0; = IF(p0996+p0999=1;0;IF(p0996+p0999+p0998>1;1-(p0996+p0999);p0998))
- p4922: 0; = p1955*p3482
- p3204: 0; = p2423*p1082
- p2533: 3.90711e-5; = p2337*p1073
- p4514: 0; = p1963*p3480
- p0051: 30.537
- p2761: 0; = p2370*(p1019+p1021)
- p2849: 1.54579e-5; = p2263*(p1079+p1081)
- p0820: 0; = if(p0807=480;p0814;0)
- p2392: 0; = p2233*p2221
- p3141: 0; = p2360*p1023
- p1759: 0
- p1712: 0
- p1846: 0
- p0169: 3.697
- p1064: 0.000862482; = IF(p1012=0;p1050/(p1057*p0818);0)
- p0824: 0.8964
- p2994: 0; = p2408*(p1020+p1022)
- p3220: 0.0038776; = p3216*p1228
- p2417: 0; = p2235*p2207
- p1798: 0
- p0863: 0; = p0675*1000/p0856
- p1855: 0.000292302; = p1447*1000/p0818
- p2794: 0; = p2403*(p1019+p1021)
- p2365: 0; = p2225*p2193
- p1986: 4200
- p0801: 4.65e6
- p1594: 0
- p1976: 0.089
- p1983: 50
- p3441: 0; = p3365*p1240
- p3142: 0; = p2361*p1023
- p2754: 0; = p2363*(p1019+p1021)
- p0311: 0.5
- p3690: 2.68061e-5; = p1963*p3476
- p2839: 1.17426e-7; = p2253*(p1020+p1022)
- p3211: 0; = p2430*p1132
- p1942: 0
- p1335: 0; = p1334*p0001/(p0818*p0002)
- p0070: 69.123
- p1868: 0
- p3285: 0.275
- p2856: 3.72911e-6; = p2270*(p1079+p1081)
- p0786: 0
- p1632: 0
- p2772: 0; = p2381*(p1078+p1080)
- p2065: 0.0758824
- p2883: 0.000171731; = p2297*(p1079+p1081)
- p2981: 0; = p2395*(p1020+p1022)
- p0996: 0; = if(p0888=0;0;if((p0691*p0690*1000*p0692/100)/p0888>1;1;(p0691*p0690*1000*p0692/100)/p0888))
- p3331: 0; = if(and(p1232=0;p3255<>0);p3255*(p3268-p3326)/p3327;0)
- p2923: 3.91581e-5; = p2337*(p1079+p1081)
- p4870: 0; = p1903*p3482
- p0748: 52.94; = p0088*(1+p0616*p0220/100)
- p2657: 1.17266e-7; = p2266*(p1078+p1080)
- p3424: 0; = p3367*p1239
- p1009: 3.04457e-6; = p1005*p0001*p0004/(p0818*p0002)
- p3479: 0; = if(p1328+p1330+p1332+p1334+p1336+p1338+p1340+p1342+p1344=0;0;p1334/(p1328+p1330+p1332+p1334+p1336+p1338+p1340+p1342+p1344))
- p1771: 0
- p1313: 0; = p1307*p1252/p0818
- p2001: 400
- p2485: 0.000480446; = p2289*p1014
- p3473: 0.0028773; = p3378*p1241
- p0107: 7.826
- p3243: 1.07268e-9; = p3234*p1188*p3239/p0818
- p2475: 1.8972e-5; = p2279*p1014
- p2893: 1.72845e-5; = p2307*(p1079+p1081)
- p2208: 0.00046535; = p1110/p0818
- p3299: 0; = if(p1303+p1304+p1305+p1306=0;0;p1303/(p1303+p1304+p1305+p1306))
- p0022: 4648.06
- p0746: 9.972; = p0086*(1+p0614*p0218/100)
- p2922: 4.32962e-5; = p2336*(p1079+p1081)
- p2137: 8.44748e-8; = p2015*p2065*p2099/(p0818*1000)
- p0459: 0; = SQRT(2)*(IF((2*p0327-1)<0;-1;IF((2*p0327-1)>0;1;0))*SQRT(SQRT((2/(pi()*0.140012289)+LN(1-(2*p0327-1)^2)/2)^2-LN(1-(2*p0327-1)^2)/0.140012289)-(2/(pi()*0.140012289)+LN(1-(2*p0327-1)^2)/2)))
- p1260: 0; = if(p1232>0;0;p0731/100)
- p2314: 0; = p2231*p2221
- p1576: 0
- p0734: 0
- p2988: 0; = p2402*(p1020+p1022)
- p1030: 6.71013e-5; = IF(p1012=0;p1024*p0001/(p0818*p0002);0)
- p2932: 4.35771e-6; = p2346*(p1079+p1081)
- p1767: 3.65257e-5; = p1359*1000/p0818
- p2364: 0; = p2225*p2192
- p1219: 0; = if(p1218=0;0;SQRT(2)*(IF((2*p1218-1)<0;-1;IF((2*p1218-1)>0;1;0))*SQRT(SQRT((2/(pi()*0.140012289)+LN(1-(2*p1218-1)^2)/2)^2-LN(1-(2*p1218-1)^2)/0.140012289)-(2/(pi()*0.140012289)+LN(1-(2*p1218-1)^2)/2))))
- p2989: 0; = p2403*(p1020+p1022)
- p0714: 0
- p2313: 0; = p2231*p2220
- p2375: 0; = p2229*p2204
- p2667: 9.15212e-5; = p2276*(p1019+p1021)
- p3178: 0; = p2397*p1023
- p2559: 0; = p2363*p1014
- p3378: 0.00818437; = if(p1232=0;p3246*p3360/p0818;0)
- p0080: 97.35
- p2062: 3.76588
- p1963j: 7.38272e-6; = p1725*p1929+p1726*p1930+p1727*p1931+p1728*p1932+p1729*p1933+p1730*p1934+p1731*p1935+p1732*p1936+p1733*p1937+p1734*p1938+p1735*p1939+p1736*p1940+p1737*p1941+p1738*p1942+p1739*p1943+p1740*p1944+p1741*p1945+p1742*p1946+p1743*p1947
- p2045: 30
- p0871: 3.49301; = p0870*p0001*p0003/(p0818*p0002)
- p2090: 0.40001
- p2708: 4.55865e-7; = p2317*(p1019+p1021)
- p1215: 0; = IF(p1214=0;0;(p1214-1.5)/(p1214-1)^2)
- p2571: 0; = p2375*p1073
- p1722: 0
- p1597: 0
- p2478: 7.60479e-5; = p2282*p1014
- p2078: 0.117
- p2069: 0.190588
- p2978: 0; = p2392*(p1129+p1131)
- p2359: 0; = p2225*p2187
- p2358: 0; = p2225*p2186
- p1106: 13798.9; = IF(p1071=0;p1105*p1096*p1095;0)
- p1963: 0.000268814; = p1963a+p1963b+p1963c+p1963d+p1963e+p1963f+p1963g+p1963h+p1963i+p1963j+p1963k
- p3127: 2.74092e-7; = p2346*p1082
- p2060: 0.272353
- p3143: 0; = p2362*p1023
- p3292: 0.258
- p2613: 0; = p2417*p1073
- p0932: 460415; = p0801*p0926
- p2583: 0; = p2387*p1073
- p3304: 0.0017178; = if(and(p1232=0;p3252<>0);p3260*p3289;0)
- p1729: 0.4874
- p2663: 0; = p2272*(p1128+p1130)
- p0790: 0
- p0406: 0; = SQRT(2)*(IF((2*p0274-1)<0;-1;IF((2*p0274-1)>0;1;0))*SQRT(SQRT((2/(pi()*0.140012289)+LN(1-(2*p0274-1)^2)/2)^2-LN(1-(2*p0274-1)^2)/0.140012289)-(2/(pi()*0.140012289)+LN(1-(2*p0274-1)^2)/2)))
- p3418: 0.0849975; = p3380*p1238
- p2432: 0.00256542; = p1158
- p2594: 0; = p2398*p1014
- p3408: 0; = p3370*p1238
- p1107: 970578; = IF(p1071=0;p1105*p1101*p1095;0)
- p3343: 0; = if(and(p1232=0;p3254<>0);IF((p3339+p3340+p3341+p3342)+(p3254*(p3269*(1-p3277))/p3338)>p3254;p3254-(p3339+p3340+p3341+p3342);p3254*(p3269*(1-p3277))/p3338);0)
- p2145: 5.97428e-7; = p2015*p2073*p2107/(p0818*1000)
- p1171: 0.000397722; = p0801*p0001/(p0818*p0002)
- p1947: 0
- p2680: 0.000166078; = p2289*(p1019+p1021)
- p2159: 3.20681e-6; = p2015*p2083*p2121/(p0818*1000)
- p0393: 0.5
- p2920: 9.90583e-7; = p2334*(p1020+p1022)
- p4766: 0; = p1799*p3482
- p1329: 7.93907e-5; = p1328*p0001/(p0818*p0002)
- p1087: 0; = IF(p1071=0;p1081*(p0710/100)*p0703*1000;0)
- p2614: 0; = p2418*p1073
- p3286: 0.185
- p0146: 0
- p1980: 3521.6
- p2258: 0.000221888; = p2226*p2204
- p2963: 0; = p2377*(p1079+p1081)
- p2850: 6.67423e-6; = p2264*(p1079+p1081)
- p1804: 0
- p0817: 0
- p0174: 0
- p2852: 9.71737e-8; = p2266*(p1079+p1081)
- p4007: 2.84214e-6; = p1864*p3478
- p2709: 1.5702e-6; = p2318*(p1019+p1021)
- p2690: 6.06953e-5; = p2299*(p1078+p1080)
- p3336: 0; = IF(or(p3254=0;p1232>0);0;p3271*p3289)
- p2954: 0; = p2368*(p1020+p1022)
- p1963b: 7.66364e-8; = p1569*p1773+p1570*p1774+p1571*p1775+p1572*p1776+p1573*p1777+p1574*p1778+p1575*p1779+p1576*p1780+p1577*p1781+p1578*p1782+p1579*p1783+p1580*p1784+p1581*p1785+p1582*p1786+p1583*p1787+p1584*p1788+p1585*p1789+p1586*p1790+p1587*p1791
- p1963a: 2.53216e-5; = p1550*p1754+p1551*p1755+p1552*p1756+p1553*p1757+p1554*p1758+p1555*p1759+p1556*p1760+p1557*p1761+p1558*p1762+p1559*p1763+p1560*p1764+p1561*p1765+p1562*p1766+p1563*p1767+p1564*p1768+p1565*p1769+p1566*p1770+p1567*p1771+p1568*p1772
- p3162: 0; = p2381*p1082
- p0103: 4648.06
- p3446: 0; = p3370*p1240
- p2471: 0; = p2275*p1123
- p0682: 4648.06; = p0022*(1+p0550*p0154/100)
- p2609: 0; = p2413*p1014
- p1723: 0
- p3198: 0; = p2417*p1082
- p0756: 0
- p2160: 1.2857e-7; = p2015*p2084*p2122/(p0818*1000)
- p2464: 6.81975e-6; = p2268*p1073
- p2949: 0; = p2363*(p1020+p1022)
- p0726: 0
- p2866: 1.78463e-5; = p2280*(p1020+p1022)
- p0711: 30.537; = p0051*(1+p0579*p0183/100)
- p0799: 8.708; = p0139*(1+p0667*p0271/100)
- p2499: 1.68406e-5; = p2303*p1073
- p2219: 0; = p1154-p2218
- p1109: 9.64322e6; = IF(p1071=0;p1105*p1103*p1095;0)
- p3361: 1.36646e7; = if(p1232=0;p3311+p3322+p3333+p3344+p3355;0)
- p3006: 0; = p2420*(p1079+p1081)
- p1019: 0.19186; = IF(p1012=0;IF(p1014=1;0;IF(p1014+p1015>1;1-p1014;p1015));0)
- p3196: 0; = p2415*p1082
- p1334: 0; = p1322*p0801
- p2292: 2.01358e-6; = p2223*p2199
- p2847: 0.000165135; = p2261*(p1079+p1081)
- p1127: 0; = if(p1121=0;p0721/100;0)
- p2141: 3.1206e-7; = p2015*p2069*p2103/(p0818*1000)
- p1214: 0; = IF(p1213=0;0;p1213-1)
- p1700: 0
- p0872: 208395; = p0864*p0856
- p3042: 1.03867e-5; = p2261*p1082
- p0196: 35.923
- p1195: 0.45
- p1321: 1.05972; = IF(((p0745*1000*p0748/100)+(p0754*1000*p0757/100))/p0801<0;0;((p0745*1000*p0748/100)+(p0754*1000*p0757/100))/p0801)
- p1825: 0
- p1634: 0
- p1920: 0
- p2592: 0; = p2396*p1014
- p0701: 0
- p1780: 0
- p2071: 0.151
- p3313: 0; = if(and(p1232=0;p3253<>0);p3262*(p3278*(p3282*p1256+p3286*(p1253+p1257)+p1258*p3288+p3298*p3287));0)
- p2565: 0; = p2369*p1014
- p4444: 0; = p1889*p3480
- p2409: 0; = p2234*p2199
- p2496: 0.000416675; = p2300*p1073
- p2829: 7.99037e-6; = p2243*(p1020+p1022)
- p2826: 1.99339e-6; = p2240*(p1020+p1022)
- p1714: 0
- p3256: 6.03114e7; = p1252*(p1307*(1-p3247)+p1310*(1-p3248)+p1311*(1-p3249)+p1312*(1-p3250))
- p0142: 0
- p2755: 0; = p2364*(p1019+p1021)
- p1113: 0.100377
- p0586: 0; = IF(p0322<0.5;-SQRT(p0007*EXP(p0454^2*p0008)-p0007);SQRT(p0007*EXP(p0454^2*p0008)-p0007))
- p1017: 0; = IF(p1012=0;p0708/100;0)
- p0546: 0; = IF(p0282<0.5;-SQRT(p0007*EXP(p0414^2*p0008)-p0007);SQRT(p0007*EXP(p0414^2*p0008)-p0007))
- p1890: 1.12166e-5; = p1482*1000/p0818
- p0880: 0; = p0868*p0856
- p0648: 0; = IF(p0384<0.5;-SQRT(p0007*EXP(p0516^2*p0008)-p0007);SQRT(p0007*EXP(p0516^2*p0008)-p0007))
- p0695: 8.793; = p0035*(1+p0563*p0167/100)
- p0897: 0
- p1235: 0.64844; = if(p1232>0;0;p0727/100)
- p3274: 0.0768939
- p1525: 158
- p2281: 1.07105e-5; = p2223*p2187
- p2076: 0.057
- p2279: 3.41819e-5; = p2223*p2185
- p2832: 5.17221e-7; = p2246*(p1020+p1022)
- p2029: 6.19
- p1151: 0; = if(p1121=0;p1149*p1148*p1145;0)
- p0691: 7.949; = p0031*(1+p0559*p0163/100)
- p1870: 0
- p1880: 0
- p1045: 0.058101; = IF(p1012=0;IF(p1037+p1044=1;0;IF(p1037+p1044+p1039>1;1-(p1037+p1044);p1039));0)
- p4458: 0; = p1903*p3480
- p2827: 4.33988e-6; = p2241*(p1020+p1022)
- p1184: 6.65428e-8; = p1182/p0818
- p1602: 0
- p1754: 0
- p1303: 0; = p1297*p1252/p0818
- p1885: 0
- p2561: 0; = p2365*p1014
- p2626: 0; = p2430*p1123
- p3047: 6.11206e-9; = p2266*p1082
- p0212: 1.275
- p1270: 0; = IF(p1267=p1259;0;IF(p1267+p1268>p1259;p1259-p1267;p1268))
- p2056: 2.07882
- p3101: 3.41065e-8; = p2320*p1023
- p2503: 1.72461e-5; = p2307*p1073
- p3103: 9.81177e-8; = p2322*p1023
- p2652: 0.000199279; = p2261*(p1078+p1080)
- p2811: 0; = p2420*(p1078+p1080)
- p2322: 7.37727e-6; = p2224*p2189
- p1293: 0; = p1287*p1252/p0818
- p2601: 0; = p2405*p1014
- p3031: 2.79969e-6; = p2250*p1023
- p2259: 0.000200681; = p2226*p2205
- p2973: 0; = p2387*(p1079+p1081)
- p0664: 0; = IF(p0400<0.5;-SQRT(p0007*EXP(p0532^2*p0008)-p0007);SQRT(p0007*EXP(p0532^2*p0008)-p0007))
- p2260: 6.49855e-5; = p2226*p2206
- p0970: 0.0209194; = p0967/p0818
- p1937: 0
- p3467: 0; = p3372*p1241
- p2742: 0; = p2351*(p1128+p1130)
- p3353: 6.22815e6; = if(and(p1232=0;p3256<>0);p3256*(p3276-p3348)/p3349;0)
- p1575: 0
- p1002: 0; = p0996*p0888
- p2774: 0; = p2383*(p1078+p1080)
- p0091: 14.472
- p3322: 0; = if(and(p1232=0;p3253<>0);p3253-(p3317+p3318+p3319+p3320+p3321);0)
- p2840: 1.63057e-5; = p2254*(p1020+p1022)
- p0965: 0.20275; = IF(p0684/100=1;0;IF(p0684/100+p0685/100>1;1-p0684/100;p0685/100))
- p0806: 1.7385e8
- p1614: 0
- p2654: 1.86541e-5; = p2263*(p1078+p1080)
- p5106: 0; = p1933*p3483
- p1133: 0; = if(p1121=0;p1123*(p0716/100)*p0703*1000;0)
- p2929: 5.57242e-5; = p2343*(p1079+p1081)
- p2834: 2.38232e-5; = p2248*(p1020+p1022)
- p1079: 0.30605; = IF(p1071=0;IF(p1073+p1078=1;0;IF(p1073+p1078+p1075>1;1-(p1073+p1078);p1075));0)
- p3449: 0; = p3373*p1240
- p0537: 0; = IF(p0273<0.5;-SQRT(p0007*EXP(p0405^2*p0008)-p0007);SQRT(p0007*EXP(p0405^2*p0008)-p0007))
- p0699: 0
- p2111: 0.856281
- p2767: 0; = p2376*(p1078+p1080)
- p1914: 0
- p1773: 0
- p2872: 1.72122e-5; = p2286*(p1020+p1022)
- p2822: 0; = p2431*(p1128+p1130)
- p2518: 4.09461e-6; = p2322*p1014
- p3209: 0; = p2428*p1132
- p3227: 0.000478052; = p3223*p1229
- p1051: 153472; = IF(p1012=0;p1044*p1036;0)
- p0018: 1025.08
- p3413: 0.000640907; = p3375*p1238
- p0291: 0.5
- p1216: 0
- p1989: 50
- p1819: 0
- p2098: 0.856281
- p3340: 0; = if(and(p1232=0;p3254<>0);p3254*(p3270-p3335)/p3338;0)
- p1274: 0; = p1270*p1252/p0818
- p1183: 0.000397722; = p0801*p0001/(p0818*p0002)
- p0009: 33.8523
- p0679: 1278.97; = p0019*(1+p0547*p0151/100)
- p0355: 0.5
- p2125: 2.23787e-6; = p2015*p2053*p2087/(p0818*1000)
- p1831: 0
- p2927: 9.85541e-6; = p2341*(p1079+p1081)
- p1095: 3.66875e7; = IF(p1071=0;p0797*p0702*1000*p0798/100;0)
- p1781: 0
- p0666: 0; = IF(p0402<0.5;-SQRT(p0007*EXP(p0534^2*p0008)-p0007);SQRT(p0007*EXP(p0534^2*p0008)-p0007))
- p1952: 0
- p2937: 0; = p2351*(p1129+p1131)
- p1999: 7.13455e8; = (p1228+p1229)*p0818+p1164
- p2605: 0; = p2409*p1014
- p1596: 0
- p3050: 1.62232e-6; = p2269*p1082
- p2355: 0; = p2225*p2183
- p5334: 1.06673e-5; = p1955*p3484
- p0591: 0; = IF(p0327<0.5;-SQRT(p0007*EXP(p0459^2*p0008)-p0007);SQRT(p0007*EXP(p0459^2*p0008)-p0007))
- p1205: 0.04725
- p3096: 1.51902e-6; = p2315*p1023
- p2814: 0; = p2423*(p1078+p1080)
- p1118: 0.000505758; = IF(p1071=0;p1108/(p1113*p0818);0)
- p1022: 0; = IF(p1012=0;IF(p1014+p1019+p1020+p1021=1;0;IF(p1014+p1019+p1020+p1021+p1018>1;1-(p1014+p1019+p1020+p1021);p1018));0)
- p0754: 0
- p1963c: 1.2026e-7; = p1588*p1792+p1589*p1793+p1590*p1794+p1591*p1795+p1592*p1796+p1593*p1797+p1594*p1798+p1595*p1799+p1596*p1800+p1597*p1801+p1598*p1802+p1599*p1803+p1600*p1804+p1601*p1805+p1602*p1806+p1603*p1807+p1604*p1808+p1605*p1809+p1606*p1810+p1607*p1811
- p0014: 232.082
- p0608: 0; = IF(p0344<0.5;-SQRT(p0007*EXP(p0476^2*p0008)-p0007);SQRT(p0007*EXP(p0476^2*p0008)-p0007))
- p1239: 0; = if(p1232>0;0;IF(p1234+p1238=1;0;IF(p1234+p1238+p1236>1;1-(p1234+p1238);p1236)))
- p3117: 2.72325e-6; = p2336*p1082
- p1434: 5
- p2446: 0.000116835; = p2250*p1014
- p3122: 6.19888e-7; = p2341*p1082
- p0141: 79.2972
- p2360: 0; = p2225*p2188
- p2986: 0; = p2400*(p1020+p1022)
- p0375: 0.5
- p2307: 5.64762e-5; = p2227*p2214
- p3327: 0; = if(and(p1232=0;p3255<>0);1-(p3323+p3324+p3325+p3326);0)
- p0157: 49.275
- p2068: 0.153529
- p1591: 0
- p0900: 1.14331; = p0899/p0818
- p2588: 0; = p2392*p1123
- p2245: 8.5766e-6; = p2222*p2190
- p0053: 30.605
- p1482: 117
- p1921: 0
- p1733: 0
- p1648: 0
- p0886: 1.8505e7; = p0686*1000*p0687*p0689/100
- p4552: 1.3874e-8; = p1791*p3481
- p1790: 0
- p1172: 2.2919e-7; = p1170/p0818
- p3444: 0; = p3368*p1240
- p3145: 0; = p2364*p1023
- p0565: 0; = IF(p0301<0.5;-SQRT(p0007*EXP(p0433^2*p0008)-p0007);SQRT(p0007*EXP(p0433^2*p0008)-p0007))
- p2914: 4.97017e-5; = p2328*(p1020+p1022)
- p1075: 0.30605; = IF(p1071=0;p0713/100;0)
- p1789: 0
- p2192: 0.000106413; = p1067-p2189-p2190-p2191
- p0027: 8.488
- p1096: 0.000861829
- p0006: 15
- p5037: 0; = p1864*p3483
- p0129: 8.049
- p3214: 0.376406; = p1222*40.078/100.0869
- p0976: 0; = IF(p0687=0;IF(OR(p0686=0;p0689=0);0;p0686*1000*p0689/100);0)
- p1221: 0.0583196
- p1879: 0
- p1124: 0; = if(p1121=0;p0718/100;0)
- p3277: 0.55
- p0721: 0
- p0016: 784.029
- p3013: 0; = p2427*(p1079+p1081)
- p1996: 30
- p1642: 0
- p0718: 15.393; = p0058*(1+p0586*p0190/100)
- p3054: 0; = p2273*p1132
- p3071: 7.4212e-9; = p2290*p1023
- p0317: 0.5
- p3106: 2.28558e-7; = p2325*p1023
- p3462: 0; = p3367*p1241
- p1327a: 0.452714; = (p0745*1000/p0801)*(1-(p0746+p0747+p0748+p0749+p0750+p0751+p0752+p0753)/100)+(p0754*1000/p0801)*(1-(p0755+p0756+p0757+p0758+p0759+p0760+p0761+p0762)/100)
- p3779: 0; = p1842*p3477
- p2167: 0.333048; = p2166*(p0898)
- p1603: 0
- p1240: 0; = if(p1232>0;0;IF(p1234+p1238+p1239=1;0;IF(p1234+p1238+p1239+p1237>1;1-(p1234+p1238+p1239);p1237)))
- p1737: 0
- p3370: 0; = if(p1232=0;p3245*p3358/p0818;0)
- p2504: 6.50814e-5; = p2308*p1073
- p0034: 1496.03
- p1912: 0
- p0716: 0
- p2538: 4.24579e-6; = p2342*p1073
- p1119: 0.00427943; = IF(p1071=0;p1109/(p1114*p0818);0)
- p3187: 0; = p2406*p1023
- p2681: 1.07055e-7; = p2290*(p1019+p1021)
- p1302: 0; = IF(p1297+p1300+p1301=p1262;0;p1262-(p1297+p1300+p1301))
- p2186: 0.000110334; = p1052/p0818
- p3043: 2.15004e-6; = p2262*p1082
- p3827: 0; = p1890*p3477
- p3065: 4.6907e-7; = p2284*p1023
- p0784: 0
- p2655: 8.05422e-6; = p2264*(p1078+p1080)
- p1115: 0.237849
- p1791: 9.58681e-8; = p1383*1000/p0818
- p0085: 9308.09
- p3102: 4.36312e-7; = p2321*p1023
- p0981: 0; = p0978*p0001/(p0818*p0002)
- p3001: 0; = p2415*(p1079+p1081)
- p0293: 0.5
- p1931: 0
- p2791: 0; = p2400*(p1019+p1021)
- p3344: 0; = if(and(p1232=0;p3254<>0);p3254-(p3339+p3340+p3341+p3342+p3343);0)
- p3332: 0; = if(and(p1232=0;p3255<>0);IF((p3328+p3329+p3330+p3331)+(p3255*(p3265*(1-p3277))/p3327)>p3255;p3255-(p3328+p3329+p3330+p3331);p3255*(p3265*(1-p3277))/p3327);0)
- p0866: 0; = IF(p0858+p0864+p0865=1;0;IF(p0858+p0864+p0865+p0861>1;1-(p0858+p0864+p0865);p0861))
- p1495: 1061
- p1181: 0.000149271
- p1578: 0
- p3075: 1.5943e-6; = p2294*p1023
- p1092: 0; = IF(p1071=0;p1086*p0001/(p0818*p0002);0)
- p2773: 0; = p2382*(p1078+p1080)
- p2632: 3.47212e-6; = p2241*(p1019+p1021)
- p0852: 0; = p0847*p0851^3+p0848*p0851^2+p0849*p0851+p0850
- p1259: 0.69123; = if(p1232>0;0;p0730/100)
- p3097: 3.33444e-7; = p2316*p1023
- p2704: 0; = p2313*(p1128+p1130)
- p1025: 271189; = IF(p1012=0;p1019*(p0704/100)*p0703*1000;0)
- p2740: 2.57145e-5; = p2349*(p1078+p1080)
- p0211: 5.146
- p1843: 0
- p2399: 0; = p2234*p2188
- p3386: 0; = p3367*p1234
- p2199: 2.98535e-6; = p1069-p2197-p2198
- p3620: 1.02292e-6; = p1889*p3476
- p2635: 1.43759e-6; = p2244*(p1019+p1021)
- p0952: 9.4047e-5; = if(and(p0683>0;or(p0807=56;p0807=100;and(p0807=60;p0901>0.06)));p0934;0)
- p1744: 0
- p2870: 8.45772e-6; = p2284*(p1020+p1022)
- p4322: 0; = p1767*p3480
- p1617: 0
- p0442: 0; = SQRT(2)*(IF((2*p0310-1)<0;-1;IF((2*p0310-1)>0;1;0))*SQRT(SQRT((2/(pi()*0.140012289)+LN(1-(2*p0310-1)^2)/2)^2-LN(1-(2*p0310-1)^2)/0.140012289)-(2/(pi()*0.140012289)+LN(1-(2*p0310-1)^2)/2)))
- p1383: 1
- p2265: 0.00028558; = p2226*p2211
- p1129: 0; = if(p1121=0;IF(p1123+p1128=1;0;IF(p1123+p1128+p1125>1;1-(p1123+p1128);p1125));0)
- p2590: 0; = p2394*p1014
- p0245: 14.607
- p2543: 1.64081e-5; = p2347*p1073
- p5337: 8.33596e-6; = p1962*p3484
- p1236: 0; = if(p1232>0;0;p0728/100)
- p3686: 4.7035e-6; = p1955*p3476
- p3445: 0; = p3369*p1240
- p1883: 0
- p2957: 0; = p2371*(p1020+p1022)
- p0940: 0; = if(and(p0683=0;p0946=0);p0934;0)
- p0827: 0; = p0818*p0819*p0823
- p2556: 0; = p2360*p1014
- p2147: 1.06791e-7; = p2015*p2075*p2109/(p0818*1000)
- p0899: 1.19258e10; = p0825*p0896+(p0830+p0895)*p0824*p0898
- p3439: 0; = p3363*p1240
- p1774: 0
- p0745: 9308.09; = p0085*(1+p0613*p0217/100)
- p0152: 0
- p1703: 0
- p0986: 0; = IF(p0982+p0985=1;0;IF(p0982+p0985+p0984>1;1-(p0982+p0985);p0984))
- p3461: 0; = p3366*p1241
- p3115: 5.49383e-8; = p2334*p1023
- p3081: 2.62665e-5; = p2300*p1082
- p0606: 0; = IF(p0342<0.5;-SQRT(p0007*EXP(p0474^2*p0008)-p0007);SQRT(p0007*EXP(p0474^2*p0008)-p0007))
- p0020: 1099.56
- p1760: 0
- p2961: 0; = p2375*(p1079+p1081)
- p0869: 0.0270191; = IF(p0858+p0864+p0865+p0866+p0867+p0868=1;0;1-(p0858+p0864+p0865+p0866+p0867+p0868))
- p0236: 26.183
- p1878: 0
- p0755: 0
- p3046: 5.49741e-6; = p2265*p1082
- p0926: 0.099014; = IF(p0918+p0923+p0924+p0925=1;0;IF(p0918+p0923+p0924+p0925+p0922>1;1-(p0918+p0923+p0924+p0925);p0922))
- p0301: 0.5
- p0535: 0; = SQRT(2)*(IF((2*p0403-1)<0;-1;IF((2*p0403-1)>0;1;0))*SQRT(SQRT((2/(pi()*0.140012289)+LN(1-(2*p0403-1)^2)/2)^2-LN(1-(2*p0403-1)^2)/0.140012289)-(2/(pi()*0.140012289)+LN(1-(2*p0403-1)^2)/2)))
- p0581: 0; = IF(p0317<0.5;-SQRT(p0007*EXP(p0449^2*p0008)-p0007);SQRT(p0007*EXP(p0449^2*p0008)-p0007))
- p2813: 0; = p2422*(p1078+p1080)
- p2050: 0.952062
- p2964: 0; = p2378*(p1079+p1081)
- p1238: 0.64844; = if(p1232>0;0;IF(p1234=1;0;IF(p1234+p1235>1;1-p1234;p1235)))
- p1556: 0
- p2459: 1.54236e-5; = p2263*p1073
- p1817: 0
- p2405: 0; = p2234*p2195
- p0441: 0; = SQRT(2)*(IF((2*p0309-1)<0;-1;IF((2*p0309-1)>0;1;0))*SQRT(SQRT((2/(pi()*0.140012289)+LN(1-(2*p0309-1)^2)/2)^2-LN(1-(2*p0309-1)^2)/0.140012289)-(2/(pi()*0.140012289)+LN(1-(2*p0309-1)^2)/2)))
- p3230: 2.2919e-7; = p1170/p0818
- p2921: 1.13563e-5; = p2335*(p1020+p1022)
- p2917: 1.15614e-7; = p2331*(p1020+p1022)
- p3314: 0; = if(and(p1232=0;p3253<>0);p3263*p3289;0)
- p2707: 4.81011e-6; = p2316*(p1019+p1021)
- p0751: 14.472; = p0091*(1+p0619*p0223/100)
- p1169: 0.000514124
- p0545: 0; = IF(p0281<0.5;-SQRT(p0007*EXP(p0413^2*p0008)-p0007);SQRT(p0007*EXP(p0413^2*p0008)-p0007))
- p2411: 0; = p2234*p2201
- p1627: 0
- p2390: 0; = p2233*p2219
- p2480: 1.9575e-5; = p2284*p1014
- p3180: 0; = p2399*p1023
- p0942: 0; = if(and(p0683=0;p0948=0);p0936;0)
- p3351: 4.36295e6; = if(and(p1232=0;p3256<>0);p3256*(p3274-p3346)/p3349;0)
- p4445: 0; = p1890*p3480
- p1957: 0
- p0001: 0.404686
- p2980: 0; = p2394*(p1020+p1022)
- p0638: 0; = IF(p0374<0.5;-SQRT(p0007*EXP(p0506^2*p0008)-p0007);SQRT(p0007*EXP(p0506^2*p0008)-p0007))
- p2953: 0; = p2367*(p1020+p1022)
- p0633: 0; = IF(p0369<0.5;-SQRT(p0007*EXP(p0501^2*p0008)-p0007);SQRT(p0007*EXP(p0501^2*p0008)-p0007))
- p2616: 0; = p2420*p1073
- p1977: 1.56263e9; = p1252+p1188
- p2514: 4.54243e-6; = p2318*p1014
- p2007: 0.00438076; = ((p1981*p1985+p1987*p1991+p1993*p1997+p2001*p2005)/p0818)*p0005*p0002/1000
- p2717: 1.87656e-5; = p2326*(p1019+p1021)
- p3273: 0.753577
- p1670: 0
- p0182: 14.607
- p2066: 0.109412
- p0346: 0.5
- p1782: 0
- p0767: 7.826; = p0107*(1+p0635*p0239/100)
- p0830: 1.49369e10; = p0825*p0821*p0824
- p2472: 0.000264761; = p2276*p1014
- p1628: 0
- p3040: 3.8631e-6; = p2259*p1082
- p0775: 45.699; = p0115*(1+p0643*p0247/100)
- p1925: 0
- p2570: 0; = p2374*p1014
- p3257: 0.849747
- p0238: 19.698
- p2195: 0.000129831; = p2194*p2193
- p2449: 2.71778e-7; = p2253*p1014
- p1554: 0
- p0500: 0; = SQRT(2)*(IF((2*p0368-1)<0;-1;IF((2*p0368-1)>0;1;0))*SQRT(SQRT((2/(pi()*0.140012289)+LN(1-(2*p0368-1)^2)/2)^2-LN(1-(2*p0368-1)^2)/0.140012289)-(2/(pi()*0.140012289)+LN(1-(2*p0368-1)^2)/2)))
- p1584: 0
- p2898: 0; = p2312*(p1129+p1131)
- p1799: 2.87604e-7; = p1391*1000/p0818
- p0915: 0.0289793; = p0914/p0818
- p1824: 0
- p3481: 0.14472; = if(p1328+p1330+p1332+p1334+p1336+p1338+p1340+p1342+p1344=0;0;p1338/(p1328+p1330+p1332+p1334+p1336+p1338+p1340+p1342+p1344))
- p2732: 1.18932e-5; = p2341*(p1078+p1080)
- p2623: 0; = p2427*p1073
- p2576: 0; = p2380*p1073
- p2315: 0.000114212; = p2224*p2182
- p1154: 0; = if(p1152*p0818=0;0;p1150/(p1152*p0818))
- p2698: 2.08583e-5; = p2307*(p1078+p1080)
- p3085: 1.39021e-5; = p2304*p1082
- p2015: 1.87173e7; = p0830*p2011*p2013
- p2430: 0; = p2236*p2220
- p2105: 0.888194
- p1934: 0
- p2645: 1.30454e-5; = p2254*(p1019+p1021)
- p0378: 0.5
- p0047: 23.981
- p0935: 8.76766e-5; = p0929*p0001/(p0818*p0002)
- p3088: 1.08717e-6; = p2307*p1082
- p0919: 0.220447; = p0678*1000/p0801
- p1960: 384.473; = IF(p1959-p1958<0;0;p1959-p1958)
- p3034: 6.51252e-9; = p2253*p1023
- p2735: 7.47644e-8; = p2344*(p1078+p1080)
- p1040: 0.024056
- p1898: 0
- p2660: 3.11259e-5; = p2269*(p1078+p1080)
- p1675: 0
- p3475: 0.0460825; = p3380*p1241
- p1592: 0
- p2099: 0.620397
- p2286: 7.17745e-5; = p2223*p2192
- p0773: 19.922; = p0113*(1+p0641*p0245/100)
- p0992: 1.28642e-5; = p0988*p0001*p0004/(p0818*p0002)
- p3303: 0.000398148; = if(and(p1232=0;p3252<>0);p3259*p3289;0)
- p2946: 0; = p2360*(p1020+p1022)
- p2804: 0; = p2413*(p1019+p1021)
- p0154: 0
- p2863: 2.51109e-5; = p2277*(p1020+p1022)
- p0067: 64.844
- p1894: 0
- p2217: 0.000454991; = p1118-p2216
- p3356: 7.19073e7; = if(p1232=0;p3306+p3317+p3328+p3339+p3350;0)
- p3231: 6.07624e-8; = p1176/p0818
- p1156: 0.0116109; = p1064+p1065+p1066+p1067+p1068+p1069+p1070+p1116+p1117+p1118+p1119+p1120+p1154+p1155
- p2381: 0; = p2229*p2210
- p3315: 0; = if(and(p1232=0;p3253<>0);p3264*p3289;0)
- p2887: 8.64436e-5; = p2301*(p1079+p1081)
- p3420: 0; = p3363*p1239
- p3333: 0; = if(and(p1232=0;p3255<>0);p3255-(p3328+p3329+p3330+p3331+p3332);0)
- p1807: 0
- p1029: 18799.2; = IF(p1012=0;IF(p0801<p1023*(p0704/100)*p0703*1000;p0801;p1023*(p0704/100)*p0703*1000);0)
- p2673: 2.62879e-5; = p2282*(p1019+p1021)
- p1764: 0
- p3205: 0; = p2424*p1082
- p4346: 0; = p1791*p3480
- p2586: 0; = p2390*p1123
- p0063: 4648.06
- p1320: 0; = IF(((p0745*1000*p0747/100)+(p0754*1000*p0756/100))/p0801<0;0;((p0745*1000*p0747/100)+(p0754*1000*p0756/100))/p0801)
- p0789: 8.049; = p0129*(1+p0657*p0261/100)
- p2194: 0.214362
- p0953: 8.76766e-5; = if(and(p0683>0;or(p0807=56;p0807=100;and(p0807=60;p0901>0.06)));p0935;0)
- p3337: 0; = IF(or(p3254=0;p1232>0);0;p3272*p3289)
- p2649: 8.19498e-5; = p2258*(p1078+p1080)
- p2483: 0.000226736; = p2287*p1014
- p0343: 0.5
- p3109: 2.75648e-6; = p2328*p1023
- p1649: 0
- p1103: 0.602279; = IF(p1071=0;IF(p1096+p1101+p1102=1;0;IF(p1096+p1101+p1102+p1099>1;1-(p1096+p1101+p1102);p1099));0)
- p2945: 0; = p2359*(p1020+p1022)
- p2494: 0.000154973; = p2298*p1073
- p2579: 0; = p2383*p1073
- p3124: 3.50495e-6; = p2343*p1082
- p1076: 0; = IF(p1071=0;p0714/100;0)
- p0499: 0; = SQRT(2)*(IF((2*p0367-1)<0;-1;IF((2*p0367-1)>0;1;0))*SQRT(SQRT((2/(pi()*0.140012289)+LN(1-(2*p0367-1)^2)/2)^2-LN(1-(2*p0367-1)^2)/0.140012289)-(2/(pi()*0.140012289)+LN(1-(2*p0367-1)^2)/2)))
- p3253: 0; = p1252*(p1277*(1-p3247)+p1280*(1-p3248)+p1281*(1-p3249)+p1282*(1-p3250))
- p1888: 0
- p0968: 6.15816e7; = p0965*p0683*p0682*1000
- p2440: 4.15878e-6; = p2244*p1014
- p2724: 5.50655e-6; = p2333*(p1019+p1021)
- p0904: 1.02611e9; = p0825*p0901+(p0830+p0895)*p0824*p0903
- p2207: 0.00224807; = p1119-p2205-p2204-p2206
- p2648: 9.22797e-6; = p2257*(p1019+p1021)
- p0689: 92.96; = p0029*(1+p0557*p0161/100)
- p1802: 0
- p2766: 0; = p2375*(p1078+p1080)
- p1551: 0
- p0884: 7.04; = IF(p0689=100;0;IF(p0689+p0688>100;100-p0689;p0688))
- p0150: 0
- p0185: 36.441
- p3346: 0.0178625; = if(and(p1232=0;p3256<>0);p3274*(p3281*(p3285*p1256+p3286*(p1253+p1257)+p1258*p3288));0)
- p5062: 0; = p1889*p3483
- p1896: 0
- p1963i: 0; = p1706*p1910+p1707*p1911+p1708*p1912+p1709*p1913+p1710*p1914+p1711*p1915+p1712*p1916+p1713*p1917+p1714*p1918+p1715*p1919+p1716*p1920+p1717*p1921+p1718*p1922+p1719*p1923+p1720*p1924+p1721*p1925+p1722*p1926+p1723*p1927+p1724*p1928
- p2787: 0; = p2396*(p1019+p1021)
- p2370: 0; = p2225*p2199
- p0553: 0; = IF(p0289<0.5;-SQRT(p0007*EXP(p0421^2*p0008)-p0007);SQRT(p0007*EXP(p0421^2*p0008)-p0007))
- p1639: 0
- p2551: 0; = p2355*p1014
- p0727: 64.844; = p0067*(1+p0595*p0199/100)
- p2728: 4.72546e-5; = p2337*(p1078+p1080)
- p1100: 0.303167
- p2389: 0; = p2233*p2218
- p5063: 0; = p1890*p3483
- p0125: 5.491
- p2622: 0; = p2426*p1073
- p1031: 2.31952e-5; = IF(p1012=0;p1025*p0001/(p0818*p0002);0)
- p1018: 0; = IF(p1012=0;p0709/100;0)
- p3477: 0; = if(p1328+p1330+p1332+p1334+p1336+p1338+p1340+p1342+p1344=0;0;p1330/(p1328+p1330+p1332+p1334+p1336+p1338+p1340+p1342+p1344))
- p2210: 9.08597e-5; = 6*1.00794*p2208/30.973762
- p3009: 0; = p2423*(p1079+p1081)
- p1808: 0
- p0819: 0; = p0808*p0809/p0818
- p0532: 0; = SQRT(2)*(IF((2*p0400-1)<0;-1;IF((2*p0400-1)>0;1;0))*SQRT(SQRT((2/(pi()*0.140012289)+LN(1-(2*p0400-1)^2)/2)^2-LN(1-(2*p0400-1)^2)/0.140012289)-(2/(pi()*0.140012289)+LN(1-(2*p0400-1)^2)/2)))
- p1685: 0.491852
- p2976: 0; = p2390*(p1129+p1131)
- p1963h: 8.32645e-5; = p1686*p1890+p1687*p1891+p1688*p1892+p1689*p1893+p1690*p1894+p1691*p1895+p1692*p1896+p1693*p1897+p1694*p1898+p1695*p1899+p1696*p1900+p1697*p1901+p1698*p1902+p1699*p1903+p1700*p1904+p1701*p1905+p1702*p1906+p1703*p1907+p1704*p1908+p1705*p1909
- p2512: 1.39151e-5; = p2316*p1014
- p3380: 0.13108; = p3251/p0818
- p1768: 0
- p1123: 0; = if(p1121=0;p0717/100;0)
- p2376: 0; = p2229*p2205
- p2908: 1.76914e-6; = p2322*(p1020+p1022)
- p1595: 0.418143
- p0849: 0
- p3405: 0; = p3367*p1238
- p2391: 0; = p2233*p2220
- p4809: 0; = p1842*p3482
- p2372: 0; = p2225*p2201
- p1331: 0; = p1330*p0001/(p0818*p0002)
- p1557: 0
- p2040: 1.56
- p2788: 0; = p2397*(p1019+p1021)
- p0374: 0.5
- p1684: 0
- p2541: 6.46408e-7; = p2345*p1073
- p0960: 0; = if(and(p0683>0;or(p0807=480;p0807=32;p0807=1;and(p0807=60;p0901<0.03)));p0936;0)
- p1901: 0
- p2363: 0; = p2225*p2191
- p2396: 0; = p2234*p2185
- p2584: 0; = p2388*p1073
- p1905: 0
- p2416: 0; = p2235*p2206
- p3173: 0; = p2392*p1132
- p1629: 0
- p2237: 0.000116002; = p2222*p2182
- p2595: 0; = p2399*p1014
- p0814: 0; = if(p0807=480;p0810*p0812+p0811*p0813;0)
- p3190: 0; = p2409*p1023
- p1099: 0.602279
- p1054: 6.31766e6; = IF(p1012=0;p1047*p1036;0)
- p1619: 0
- p1904: 0
- p3840: 0; = p1903*p3477
- p0980: 0; = IF(p0977=0;0;p0977*p0001/(p0818*p0002))
- p3383: 0; = p3364*p1234
- p3005: 0; = p2419*(p1079+p1081)
- p1613: 0
- p0163: 12.616
- p0349: 0.5
- p1224: 0.44; = IF(p1221=0;0;IF(p1193=0;1-p1223;0))
- p1572: 0
- p0161: 3.311
- p2508: 0; = p2312*p1123
- p2731: 2.63e-5; = p2340*(p1078+p1080)
- p1550: 0
- p0559: 0; = IF(p0295<0.5;-SQRT(p0007*EXP(p0427^2*p0008)-p0007);SQRT(p0007*EXP(p0427^2*p0008)-p0007))
- p1607: 0
- p1301: 0; = IF(p1297+p1300=p1265;0;IF(p1297+p1300+p1299>p1265;p1265-(p1297+p1300);p1299))
- p1608: 0
- p5132: 0; = p1963*p3483
- p0475: 0; = SQRT(2)*(IF((2*p0343-1)<0;-1;IF((2*p0343-1)>0;1;0))*SQRT(SQRT((2/(pi()*0.140012289)+LN(1-(2*p0343-1)^2)/2)^2-LN(1-(2*p0343-1)^2)/0.140012289)-(2/(pi()*0.140012289)+LN(1-(2*p0343-1)^2)/2)))
- p0379: 0.5
- p2977: 0; = p2391*(p1129+p1131)
- p2906: 6.14968e-7; = p2320*(p1020+p1022)
- p1264: 0; = if(p1232>0;0;IF(p1259+p1263=1;0;IF(p1259+p1263+p1261>1;1-(p1259+p1263);p1261)))
- p1182: 694.108; = p1181*p0801
- p2580: 0; = p2384*p1073
- p0294: 0.5
- p0573: 0; = IF(p0309<0.5;-SQRT(p0007*EXP(p0441^2*p0008)-p0007);SQRT(p0007*EXP(p0441^2*p0008)-p0007))
- p2599: 0; = p2403*p1014
- p1739: 0
- p2615: 0; = p2419*p1073
- p0261: 258.119
- p1965: 0.000547525; = p1963+p1959*p1964*1000/p0818
- p2285: 8.8691e-6; = p2223*p2191
- p4419: 0; = p1864*p3480
- p0370: 0.5
- p2326: 9.78089e-5; = p2224*p2193
- p2086: 0.0617647
- p1783: 0
- p2298: 0.000507492; = p2227*p2205
- p0893: 0.131139; = 1000*(p0890+p0892)*p0001*p0003*p0004/(p0818*p0002)
- p4076: 8.01891e-6; = p1933*p3478
- p2771: 0; = p2380*(p1078+p1080)
- p3294: 0.279
- p4625: 7.76946e-7; = p1864*p3481
- p1954: 0
- p2575: 0; = p2379*p1073
- p1140: 0; = if(p1121=0;p1134*p0001/(p0818*p0002);0)
- p0738: 4648.06; = p0078*(1+p0606*p0210/100)
- p0977: 0; = IF(p0687=0;IF(OR(p0686=0;p0688=0);0;p0686*1000*p0688/100);0)
- p1456: 56
- p4560: 4.16221e-8; = p1799*p3481
- p1007: 0; = p1003*p0001*p0004/(p0818*p0002)
- p0736: 0
- p1307: 0
- p1222: 0.94
- p1850: 0
- p0681: 0
- p2638: 3.34876e-6; = p2247*(p1019+p1021)
- p2301: 0.000282449; = p2227*p2208
- p0778: 20.346; = p0118*(1+p0646*p0250/100)
- p2342: 1.39038e-5; = p2228*p2210
- p0329: 0.5
- p2820: 0; = p2429*(p1128+p1130)
- p1626: 0
- p2470: 0; = p2274*p1123
- p0550: 0; = IF(p0286<0.5;-SQRT(p0007*EXP(p0418^2*p0008)-p0007);SQRT(p0007*EXP(p0418^2*p0008)-p0007))
- p1975: 0.000397722; = p1970*p0001/(p0818*p0002)
- p3177: 0; = p2396*p1023
- p0448: 0; = SQRT(2)*(IF((2*p0316-1)<0;-1;IF((2*p0316-1)>0;1;0))*SQRT(SQRT((2/(pi()*0.140012289)+LN(1-(2*p0316-1)^2)/2)^2-LN(1-(2*p0316-1)^2)/0.140012289)-(2/(pi()*0.140012289)+LN(1-(2*p0316-1)^2)/2)))
- p3271: 0.0195489
- p2256: 4.19544e-6; = p2222*p2202
- p1610: 0
- p1290: 0; = IF(p1287=p1264;0;IF(p1287+p1288>p1264;p1264-p1287;p1288))
- p3349: 0.816024; = if(and(p1232=0;p3256<>0);1-(p3345+p3346+p3347+p3348);0)
- p1886: 0
- p2032: 0.448886
- p0286: 0.5
- p1982: 750
- p1300: 0; = IF(p1297=p1265;0;IF(p1297+p1298>p1265;p1265-p1297;p1298))
- p3183: 0; = p2402*p1023
- p0278: 0.5
- p5131: 0; = p1962*p3483
- p3438: 0; = p3362*p1240
- p3300: 0; = if(p1293+p1294+p1295+p1296=0;0;p1293/(p1293+p1294+p1295+p1296))
- p3249: 0
- p0269: 9.337
- p3197: 0; = p2416*p1082
- p0922: 0.099014; = p0677*1000/p0801
- p0847: 0
- p4616: 4.23019e-5; = p1855*p3481
- p3111: 2.91641e-9; = p2330*p1023
- p2437: 1.00445e-5; = p2241*p1014
- p1132: 0; = if(p1121=0;IF(p1123+p1128+p1129+p1130+p1131=1;0;1-(p1123+p1128+p1129+p1130+p1131));0)
- p0674: 232.082; = p0014*(1+p0542*p0146/100)
- p0957: 1.66359e-7; = if(and(p0683>0;or(p0807=56;p0807=100;and(p0807=60;p0901>0.06)));p0939;0)
- p0400: 0.5
- p0058: 15.393
- p0795: 14.014; = p0135*(1+p0663*p0267/100)
- p2461: 8.72075e-5; = p2265*p1073
- p1565: 0
- p0429: 0; = SQRT(2)*(IF((2*p0297-1)<0;-1;IF((2*p0297-1)>0;1;0))*SQRT(SQRT((2/(pi()*0.140012289)+LN(1-(2*p0297-1)^2)/2)^2-LN(1-(2*p0297-1)^2)/0.140012289)-(2/(pi()*0.140012289)+LN(1-(2*p0297-1)^2)/2)))
- p2713: 1.4154e-6; = p2322*(p1019+p1021)
- p2175: 0.00080889; = p0895*p0908/p0818
- p1120: 0.00195649; = IF(p1071=0;p1110/(p1115*p0818);0)
- p3301: 0.130394; = if(and(p1232=0;p3252<>0);p3257*p3277*(p3297*p3290+(1-p3297)*p3294);0)
- p0139: 8.708
- p2110: 0.856281
- p5128: 0; = p1955*p3483
- p0772: 0
- p1851: 0
- p0632: 0; = IF(p0368<0.5;-SQRT(p0007*EXP(p0500^2*p0008)-p0007);SQRT(p0007*EXP(p0500^2*p0008)-p0007))
- p2991: 0; = p2405*(p1020+p1022)
- p2736: 7.81799e-7; = p2345*(p1078+p1080)
- p0936: 6.70593e-5; = p0930*p0001/(p0818*p0002)
- p0610: 0; = IF(p0346<0.5;-SQRT(p0007*EXP(p0478^2*p0008)-p0007);SQRT(p0007*EXP(p0478^2*p0008)-p0007))
- p1863: 0
- p0838: 8.14339e9; = (p0833-p0836)*p0837
- p1093: 0; = IF(p1071=0;p1087*p0001/(p0818*p0002);0)
- p3139: 0; = p2358*p1023
- p0184: 33.193
- p0696: 0
- p2150: 1.79771e-7; = p2015*p2078*p2112/(p0818*1000)
- p2596: 0; = p2400*p1014
- p3261: 0.908439
- p2505: 9.40942e-6; = p2309*p1073
- p1098: 0.0330733
- p0414: 0; = SQRT(2)*(IF((2*p0282-1)<0;-1;IF((2*p0282-1)>0;1;0))*SQRT(SQRT((2/(pi()*0.140012289)+LN(1-(2*p0282-1)^2)/2)^2-LN(1-(2*p0282-1)^2)/0.140012289)-(2/(pi()*0.140012289)+LN(1-(2*p0282-1)^2)/2)))
- p1692: 0
- p2327: 2.09665e-5; = p2224*p2195
- p0663: 0; = IF(p0399<0.5;-SQRT(p0007*EXP(p0531^2*p0008)-p0007);SQRT(p0007*EXP(p0531^2*p0008)-p0007))
- p2242: 2.60459e-6; = p2222*p2187
- p0002: 0.453592
- p1806: 0
- p1715: 0
- p2947: 0; = p2361*(p1020+p1022)
- p2776: 0; = p2385*(p1078+p1080)
- p1174: 1.14595e-7; = p1170*p1173/p0818
- p1164: 20031.1; = p1163*p0801
- p2759: 0; = p2368*(p1019+p1021)
- p2402: 0; = p2234*p2191
- p2084: 0.21
- p2018: 0.1978
- p2488: 1.1176e-6; = p2292*p1014
- p0046: 19.186
- p1706: 0
- p2780: 0; = p2389*(p1128+p1130)
- p3140: 0; = p2359*p1023
- p3225: 0.000553948; = p3221*p1229
- p1665: 0
- p3321: 0; = if(and(p1232=0;p3253<>0);IF((p3317+p3318+p3319+p3320)+(p3253*(p3261*(1-p3277))/p3316)>p3253;p3253-(p3317+p3318+p3319+p3320);p3253*(p3261*(1-p3277))/p3316);0)
- p3398: 0; = p3379*p1234
- p0916: 0.298109; = p0826+(p0832*(1+p0894))/p0818
- p1337: 0; = p1336*p0001/(p0818*p0002)
- p2650: 7.41173e-5; = p2259*(p1078+p1080)
- p2857: 3.3422e-5; = p2271*(p1079+p1081)
- p3158: 0; = p2377*p1082
- p0757: 0
- p3442: 0; = p3366*p1240
- p3480: 0; = if(p1328+p1330+p1332+p1334+p1336+p1338+p1340+p1342+p1344=0;0;p1336/(p1328+p1330+p1332+p1334+p1336+p1338+p1340+p1342+p1344))
- p2862: 0.000114394; = p2276*(p1020+p1022)
- p0420: 0; = SQRT(2)*(IF((2*p0288-1)<0;-1;IF((2*p0288-1)>0;1;0))*SQRT(SQRT((2/(pi()*0.140012289)+LN(1-(2*p0288-1)^2)/2)^2-LN(1-(2*p0288-1)^2)/0.140012289)-(2/(pi()*0.140012289)+LN(1-(2*p0288-1)^2)/2)))
- p2816: 0; = p2425*(p1078+p1080)
- p2489: 0.000155188; = p2293*p1014
- p1218: 0
- p3019: 3.3867e-7; = p2238*p1023
- p2835: 5.10678e-6; = p2249*(p1020+p1022)
- p0984: 0; = if(p0886=0;0;min(1;(p0699*p0698*1000*p0701/100)/p0886))
- p1091: 2.42395e-5; = IF(p1071=0;p1085*p0001/(p0818*p0002);0)
- p2311: 0; = p2231*p2218
- p2800: 0; = p2409*(p1019+p1021)
- p2404: 0; = p2234*p2193
- p2941: 0; = p2355*(p1020+p1022)
- p2115: 0.856281
- p1633: 0
- p0287: 0.5
- p3228: 0.00189183; = p3224*p1229
- p2843: 1.15342e-5; = p2257*(p1020+p1022)
- p2878: 4.82876e-7; = p2292*(p1020+p1022)
- p2294: 0.000119873; = p2223*p2201
- p3463: 0; = p3368*p1241
- p1061: 0.3
- p3221: 0.146975; = IF(p3216=0;0;p1223*12.0107/100.0869+(1-p1224)*12.0107/84.3139)
- p2972: 0; = p2386*(p1079+p1081)
- p1787: 0
- p2539: 5.56004e-5; = p2343*p1073
- p2530: 2.29266e-6; = p2334*p1014
- p3239: 0.013074; = IF(p3238+p3235+p3236=1;0;1-(p3238+p3235+p3236))
- p0290: 0.5
- p2493: 0.00017135; = p2297*p1073
- p2603: 0; = p2407*p1014
- p1262: 0; = if(p1232>0;0;p0733/100)
- p2304: 0.000722189; = p2227*p2211
- p1200: 0.84
- p1705: 0
- p0042: 4648.06
- p3052: 2.10219e-6; = p2271*p1082
- p1653: 0
- p0368: 0.5
- p3216: 0.06; = IF(OR(p1226=0;p1228=0);0;1-p3213-p3214-p3215)
- p0677: 460.415; = p0017*(1+p0545*p0149/100)
- p0352: 0.5
- p3237: 0.854735
- p3188: 0; = p2407*p1023
- p2002: 750
- p1004: 0; = p1000*p0888
- p0930: 784029; = p0801*p0924
- p1961: 0.5
- p2171: 0.0844111; = p2165*p0831
- p2406: 0; = p2234*p2196
- p0065: 6.097
- p2023: 3.15
- p2619: 0; = p2423*p1073
- p2414: 0; = p2235*p2204
- p4213: 0; = p1864*p3479
- p2248: 9.93419e-5; = p2222*p2193
- p1923: 0
- p3063: 1.82231e-6; = p2282*p1023
- p2386: 0; = p2229*p2215
- p0802: 4.575e6
- p3148: 0; = p2367*p1023
- p3465: 0; = p3370*p1241
- p3003: 0; = p2417*(p1079+p1081)
- p1296: 0; = p1292*p1252/p0818
- p1233: 0; = p1232*p0001/(p0818*p0002)
- p1038: 0.00774783
- p1247: 0; = if(p1232>0;0;p1242*p0001/(p0818*p0002))
- p3060: 4.54619e-7; = p2279*p1023
- p4964: 0; = p1791*p3483
- p1713: 0
- p3219: 0.0291331; = p3215*p1228
- p3896: 0; = p1963*p3477
- p0562: 0; = IF(p0298<0.5;-SQRT(p0007*EXP(p0430^2*p0008)-p0007);SQRT(p0007*EXP(p0430^2*p0008)-p0007))
- p3268: 0.0232481
- p3233: 0.60394
- p2303: 5.51483e-5; = p2227*p2210
- p1323: 0; = IF(((p0745*1000*p0750/100)+(p0754*1000*p0759/100))/p0801<0;0;((p0745*1000*p0750/100)+(p0754*1000*p0759/100))/p0801)
- p2036: 8.77167e-6; = p2015*p2030*(1-p2032)/(p0818*1000)
- p0844: 0.375898
- p1865: 0
- p2312: 0; = p2231*p2219
- p0873: 0.178244; = p0872*p0001*p0003/(p0818*p0002)
- p2155: 2.20496e-7; = p2015*p2084*p2117/(p0818*1000)
- p2353: 0; = p2232*p2221
- p3339: 0; = if(and(p1232=0;p3254<>0);p3254*(p3269*p3277-p3334)/p3338;0)
- p3426: 0; = p3369*p1239
- p0552: 0; = IF(p0288<0.5;-SQRT(p0007*EXP(p0420^2*p0008)-p0007);SQRT(p0007*EXP(p0420^2*p0008)-p0007))
- p2144: 2.05892e-7; = p2015*p2072*p2106/(p0818*1000)
- p3039: 4.27134e-6; = p2258*p1082
- p2204: 0.000924477; = p1109/p0818
- p2046: 10
- p2666: 0; = p2275*(p1128+p1130)
- p1069: 5.17046e-6; = IF(p1012=0;p1055/(p1062*p0818);0)
- p3354: 2.50632e7; = IF((p3350+p3351+p3352+p3353)+IF(p3349=0;0;(p3256*(p3273*(1-p3277))/p3349))>p3256;p3256-(p3350+p3351+p3352+p3353);IF(p3349=0;0;p3256*(p3273*(1-p3277))/p3349))
- p1020: 0.23981; = IF(p1012=0;IF(p1014+p1019=1;0;IF(p1014+p1019+p1016>1;1-(p1014+p1019);p1016));0)
- p3104: 1.12309e-7; = p2323*p1023
- p2400: 0; = p2234*p2189
- p1667: 0
- p2943: 0; = p2357*(p1020+p1022)
- p3348: 0.00443516; = if(and(p1232=0;p3256<>0);p3276*p3289;0)
- p2793: 0; = p2402*(p1019+p1021)
- p2453: 2.66955e-5; = p2257*p1014
- p2726: 9.08557e-6; = p2335*(p1019+p1021)
- p2474: 5.508e-6; = p2278*p1014
- p3059: 1.31986e-7; = p2278*p1023
- p0593: 0; = IF(p0329<0.5;-SQRT(p0007*EXP(p0461^2*p0008)-p0007);SQRT(p0007*EXP(p0461^2*p0008)-p0007))
- p1155: 0; = if(p1153*p0818=0;0;p1151/(p1153*p0818))
- p4925: 0; = p1962*p3482
- p2333: 2.87009e-5; = p2224*p2201
- p0783: 0
- p2013: 0.75
- p1686: 0.505026
- p1641: 0
- p0693: 87.719; = p0033*(1+p0561*p0165/100)
- p1159: 0.5
- p1275: 0; = p1271*p1252/p0818
- p3184: 0; = p2403*p1023
- p2764: 0; = p2373*(p1019+p1021)
- p2138: 1.38557e-7; = p2015*p2066*p2100/(p0818*1000)
- p3152: 0; = p2371*p1023
- p2951: 0; = p2365*(p1020+p1022)
- p2848: 3.41829e-5; = p2262*(p1079+p1081)
- p2438: 1.44562e-6; = p2242*p1014
- p3443: 0; = p3367*p1240
- p2429: 0; = p2236*p2219
- p0295: 0.5
- p2434: 1.41332e-5; = p2238*p1014
- p1165: 0.000397722; = p0801*p0001/(p0818*p0002)
- p0839: 0.780691; = p0838/p0818
- p3058: 1.39267e-6; = p2277*p1023
- p2974: 0; = p2388*(p1079+p1081)
- p2224: 0.161491; = if(p0765*p0769+p0766*p0770+p0767*p0771+p0768*p0772=0;0;p0771*p0767/(p0765*p0769+p0766*p0770+p0767*p0771+p0768*p0772))
- p1340: 0; = p1325*p0801
- p0785: 5.491; = p0125*(1+p0653*p0257/100)
- p5269: 2.53674e-6; = p1890*p3484
- p2412: 0; = p2234*p2202
- p3318: 0; = if(and(p1232=0;p3253<>0);p3253*(p3262-p3313)/p3316;0)
- p1080: 0; = IF(p1071=0;IF(p1073+p1078+p1079=1;0;IF(p1073+p1078+p1079+p1076>1;1-(p1073+p1078+p1079);p1076));0)
- p0524: 0; = SQRT(2)*(IF((2*p0392-1)<0;-1;IF((2*p0392-1)>0;1;0))*SQRT(SQRT((2/(pi()*0.140012289)+LN(1-(2*p0392-1)^2)/2)^2-LN(1-(2*p0392-1)^2)/0.140012289)-(2/(pi()*0.140012289)+LN(1-(2*p0392-1)^2)/2)))
- p1579: 0
- p2756: 0; = p2365*(p1019+p1021)
- p1570: 0
- p0731: 0
- p0939: 1.66359e-7; = p0933*p0001/(p0818*p0002)
- p1652: 0
- p2009: 0.0252585; = ((p1983*p1985+p1989*p1991+p1995*p1997+p2003*p2005+p1976*p1977+p1978*p1979+p1998*p1999)/p0818)*p0005*p0002/1000
- p1136: 0; = if(p1121=0;p1130*(p0716/100)*p0703*1000;0)
- p2295: 1.72524e-5; = p2223*p2202
- p1071: 0
- p0747: 0
- p3107: 1.30086e-6; = p2326*p1023
- p2182: 0.000707235; = p1050/p0818
- p1840: 0
- p0416: 0; = SQRT(2)*(IF((2*p0284-1)<0;-1;IF((2*p0284-1)>0;1;0))*SQRT(SQRT((2/(pi()*0.140012289)+LN(1-(2*p0284-1)^2)/2)^2-LN(1-(2*p0284-1)^2)/0.140012289)-(2/(pi()*0.140012289)+LN(1-(2*p0284-1)^2)/2)))
- p2803: 0; = p2412*(p1019+p1021)
- p0402: 0.5
- p1720: 0
- p2410: 0; = p2234*p2200
- p1945: 0
- p2004: 30
- p3367: 0; = if(p1232=0;p3244*p3361/p0818;0)
- p1926: 0
- p3634: 1.01431e-5; = p1903*p3476
- p2886: 0.000417603; = p2300*(p1079+p1081)
- p3359: 1.13757e7; = if(p1232=0;p3309+p3320+p3331+p3342+p3353;0)
- p1047: 0.318938; = IF(p1012=0;IF(p1037+p1044+p1045+p1046=1;0;IF(p1037+p1044+p1045+p1046+p1041>1;1-(p1037+p1044+p1045+p1046);p1041));0)
- p2454: 6.77579e-5; = p2258*p1073
- p2631: 1.59481e-6; = p2240*(p1019+p1021)
- p1766: 0
- p1255: 0; = if(p1232>0;0;p0737/100)
- p1838: 0
- p2939: 0; = p2353*(p1129+p1131)
- p0974: 0.5
- p2215: 0.000351132; = p1117-p2214
- p3306: 5.31447e7; = if(and(p1232=0;p3252<>0);p3252*(p3257*p3277-p3301)/p3305;0)
- p1906: 0
- p2243: 3.33196e-5; = p2222*p2188
- p2079: 0.02
- p2885: 5.02959e-5; = p2299*(p1079+p1081)
- p1709: 0
- p2184: 1.47131e-5; = p1051/p0818
- p3895: 0; = p1962*p3477
- p3470: 0.000347476; = p3375*p1241
- p2336: 0.000141468; = p2228*p2204
- p2564: 0; = p2368*p1014
- p2578: 0; = p2382*p1073
- p2262: 0.000111691; = p2226*p2208
- p1699: 0.762907
- p2749: 0; = p2358*(p1019+p1021)
- p2506: 8.43316e-5; = p2310*p1073
- p0782: 0
- p0975: 0.0145591; = p0973*p0974/p0818
- p2238: 2.54639e-5; = p2222*p2183
- p3146: 0; = p2365*p1023
- p3451: 0; = p3375*p1240
- p2669: 1.90398e-6; = p2278*(p1019+p1021)
- p2081: 0.0019
- p1163: 0.00430777
- p2523: 1.1637e-5; = p2327*p1014
- p1336: 0; = p1323*p0801
- p2042: 0.07
- p2955: 0; = p2369*(p1020+p1022)
- p5015: 0; = p1842*p3483
- p1559: 0
- p3870: 0; = p1933*p3477
- p2388: 0; = p2229*p2217
- p3112: 6.41202e-9; = p2331*p1023
- p0882: 125639; = p0869*p0856
- p0894: 0.19
- p3176: 0; = p2395*p1023
- p2431: 0; = p2236*p2221
- p1606: 0
- p3482: 0; = if(p1328+p1330+p1332+p1334+p1336+p1338+p1340+p1342+p1344=0;0;p1340/(p1328+p1330+p1332+p1334+p1336+p1338+p1340+p1342+p1344))
- p2653: 4.12507e-5; = p2262*(p1078+p1080)
- p2904: 1.96263e-6; = p2318*(p1020+p1022)
- p2643: 4.27302e-8; = p2252*(p1019+p1021)
- p3396: 0; = p3377*p1234
- p2730: 0.000127053; = p2339*(p1078+p1080)
- p1065: 6.53915e-5; = IF(p1012=0;p1051/(p1058*p0818);0)
- p1345: 0.000180054; = IF(p1318=0;p1344*p0001/(p0818*p0002);0)
- p3186: 0; = p2405*p1023
- p1001: 1; = if(p0978>0;0;if(and(p0687=0;p0691=0;p0695=0;p0699=0);0;IF(p0996+p0999+p1000=1;0;1-(p0996+p0999+p1000))))
- p1121: 4.65e6; = p0801
- p1964: 0.5
- p0744: 0
- p3185: 0; = p2404*p1023
- p2919: 6.88275e-6; = p2333*(p1020+p1022)
- p2911: 4.12109e-6; = p2325*(p1020+p1022)
- p2702: 0; = p2311*(p1128+p1130)
- p1126: 0; = if(p1121=0;p0720/100;0)
- p2240: 8.31238e-6; = p2222*p2185
- p1055: 8629.28; = IF(p1012=0;p1048*p1036;0)
- p2335: 4.73552e-5; = p2224*p2203
- p2783: 0; = p2392*(p1128+p1130)
- p2180: 1.2511e-7; = p3233*p1188/(p0818)
- p1312: 0.30877; = IF(p1307+p1310+p1311=p1266;0;p1266-(p1307+p1310+p1311))
- p0503: 0; = SQRT(2)*(IF((2*p0371-1)<0;-1;IF((2*p0371-1)>0;1;0))*SQRT(SQRT((2/(pi()*0.140012289)+LN(1-(2*p0371-1)^2)/2)^2-LN(1-(2*p0371-1)^2)/0.140012289)-(2/(pi()*0.140012289)+LN(1-(2*p0371-1)^2)/2)))
- p2451: 1.61795e-5; = p2255*p1014
- p3032: 1.80469e-9; = p2251*p1023
- p0511: 0; = SQRT(2)*(IF((2*p0379-1)<0;-1;IF((2*p0379-1)>0;1;0))*SQRT(SQRT((2/(pi()*0.140012289)+LN(1-(2*p0379-1)^2)/2)^2-LN(1-(2*p0379-1)^2)/0.140012289)-(2/(pi()*0.140012289)+LN(1-(2*p0379-1)^2)/2)))
- p2323: 8.44425e-6; = p2224*p2190
- p2266: 3.17509e-7; = p2226*p2212
- p0762: 0
- p2374: 0; = p2225*p2203
- p2750: 0; = p2359*(p1019+p1021)
- p3064: 4.098e-7; = p2283*p1023
- p0176: 26.183
- p2815: 0; = p2424*(p1078+p1080)
- p3985: 2.53763e-7; = p1842*p3478
- p2116: 0.444424
- p3290: 0.195
- p2332: 6.69449e-5; = p2224*p2200
- p3098: 3.16012e-8; = p2317*p1023
- p1343: 0; = p1342*p0001/(p0818*p0002)
- p3270: 0.0747083
- p2935: 2.13087e-5; = p2349*(p1079+p1081)
- p1278: 0
- p4940: 0; = p1767*p3483
- p1078: 0.36933; = IF(p1071=0;IF(p1073=1;0;IF(p1073+p1074>1;1-p1073;p1074));0)
- p1657: 0
- p1117: 0.000444179; = IF(p1071=0;p1107/(p1112*p0818);0)
- p3199: 0; = p2418*p1082
- p2979: 0; = p2393*(p1020+p1022)
- p3417: 0.000849453; = p3379*p1238
- p1749: 0
- p1979: 3.03732e8; = p0973
- p0828: 0; = if(p0827=0;0;p0819-p0827/p0818)
- p2851: 8.74017e-5; = p2265*(p1079+p1081)
- p1818: 0
- p3447: 0; = p3371*p1240
- p3000: 0; = p2414*(p1079+p1081)
- p1750: 0
- p2043: 0.636483
- p3369: 0; = if(p1232=0;p3245*p3357/p0818;0)
- p4307: 0; = p1962*p3479
- p0045: 55.503
- p0963: 0; = if(and(p0683>0;or(p0807=480;p0807=32;p0807=1;and(p0807=60;p0901<0.03)));p0939;0)
- p3305: 0.856081; = if(and(p1232=0;p3252<>0);1-(p3301+p3302+p3303+p3304);0)
- p4410: 0; = p1855*p3480
- p3281: 0.46
- p4822: 0; = p1855*p3482
- p0829: 0; = if(p0807=480;p0814*(1-p0824);0)
- p2703: 0; = p2312*(p1128+p1130)
- p1203: 3
- p2349: 6.96249e-5; = p2228*p2217
- p3179: 0; = p2398*p1023
- p0004: 0.0254
- p3324: 0; = if(and(p1232=0;p3255<>0);p3266*(p3279*(p3284*p1256+p3286*(p1253+p1257)+p1258*p3288+p3299*p3287));0)
- p3468: 0; = p3373*p1241
- p0964: 0; = 56/90000
- p2620: 0; = p2424*p1073
- p1682: 0
- p1756: 0
- p3011: 0; = p2425*(p1079+p1081)
- p3094: 0; = p2313*p1132
- p0743: 0
- p2479: 1.71016e-5; = p2283*p1014
- p1992: 3900
- p2779: 0; = p2388*(p1078+p1080)
- p2241: 1.80971e-5; = p2222*p2186
- p1157: 0.22095
- p2892: 2.56964e-6; = p2306*(p1079+p1081)
- p3037: 5.57994e-8; = p2256*p1023
- p1315: 0; = p1311*p1252/p0818
- p2108: 0.826583
- p1601: 0
- p3051: 2.34554e-7; = p2270*p1082
- p1588: 0
- p1553: 0
- p0251: 26.238
- p2366: 0; = p2225*p2195
- p2624: 0; = p2428*p1123
- p2491: 9.57558e-6; = p2295*p1014
- p1039: 0.058101
- p2806: 0; = p2415*(p1078+p1080)
- p3121: 1.37079e-6; = p2340*p1082
- p3350: 1.87626e7; = if(and(p1232=0;p3256<>0);p3256*(p3273*p3277-p3345)/p3349;0)
- p3368: 0; = if(p1232=0;p3245*p3356/p0818;0)
- p2235: 0; = 1-(p2226+p2227+p2228+p2229)
- p0288: 0.5
- p2831: 2.05675e-6; = p2245*(p1020+p1022)
- p0959: 0; = if(and(p0683>0;or(p0807=480;p0807=32;p0807=1;and(p0807=60;p0901<0.03)));p0935;0)
- p0825: 9.37573e9; = p0818*p0822
- p2273: 0; = p2230*p2219
- p3472: 0.000383399; = p3377*p1241
- p2617: 0; = p2421*p1073
- p1765: 0
- p1902: 0
- p0252: 32.043
- p1058: 0.225
- p2679: 1.6801e-5; = p2288*(p1019+p1021)
- p2604: 0; = p2408*p1014
- p1206: 0.03829
- p0425: 0; = SQRT(2)*(IF((2*p0293-1)<0;-1;IF((2*p0293-1)>0;1;0))*SQRT(SQRT((2/(pi()*0.140012289)+LN(1-(2*p0293-1)^2)/2)^2-LN(1-(2*p0293-1)^2)/0.140012289)-(2/(pi()*0.140012289)+LN(1-(2*p0293-1)^2)/2)))
- p3389: 0; = p3370*p1234
- p2151: 2.98715e-8; = p2015*p2079*p2113/(p0818*1000)
- p3229: 1.92035e-6; = p1164/p0818
- p1939: 0
- p2080: 0.025
- p0539: 0; = IF(p0275<0.5;-SQRT(p0007*EXP(p0407^2*p0008)-p0007);SQRT(p0007*EXP(p0407^2*p0008)-p0007))
- p2225: 0; = if(p0765*p0769+p0766*p0770+p0767*p0771+p0768*p0772=0;0;p0772*p0768/(p0765*p0769+p0766*p0770+p0767*p0771+p0768*p0772))
- p0210: 0
- p0887: 402.021; = 1000*p0886*p0001*p0003*p0004/(p0818*p0002)
- p0218: 25.225
- p2169: 0.00217141; = p2166*(p0908)
- p3222: 0.224242; = IF(p3216=0;0;p1223*40.078/100.0869)
- p2554: 0; = p2358*p1014
- p2722: 9.2497e-8; = p2331*(p1019+p1021)
- p2166: 0.730368; = p2165*p0824
- p0948: 0; = if(and(p0683=0;or(p0807=480;p0807=32;p0807=1;and(p0807=60;p0901<0.03)));p0936;0)
- p0418: 0; = SQRT(2)*(IF((2*p0286-1)<0;-1;IF((2*p0286-1)>0;1;0))*SQRT(SQRT((2/(pi()*0.140012289)+LN(1-(2*p0286-1)^2)/2)^2-LN(1-(2*p0286-1)^2)/0.140012289)-(2/(pi()*0.140012289)+LN(1-(2*p0286-1)^2)/2)))
- p3164: 0; = p2383*p1082
- p3280: 0.375
- p2517: 1.8208e-5; = p2321*p1014
- p2997: 0; = p2411*(p1020+p1022)
- p2818: 0; = p2427*(p1078+p1080)
- p1125: 0; = if(p1121=0;p0719/100;0)
- p2102: 0.922577
- p0010: 4083.88
- p0971: 0.00590371; = p0968/p0818
- p2085: 0.0335294
- p1198: 0.44
- p4304: 0; = p1955*p3479
- p1777: 0
- p0973: 3.03732e8; = p0967+p0968+p0969
- p2280: 7.44185e-5; = p2223*p2186
- p3298: 0; = if(p1283+p1284+p1285+p1286=0;0;p1283/(p1283+p1284+p1285+p1286))
- p0861: 0; = p0673*1000/p0856
- p1167: 0.5
- p2928: 4.25525e-6; = p2342*(p1079+p1081)
- p0710: 19.922; = p0050*(1+p0578*p0182/100)
- p0405: 0; = SQRT(2)*(IF((2*p0273-1)<0;-1;IF((2*p0273-1)>0;1;0))*SQRT(SQRT((2/(pi()*0.140012289)+LN(1-(2*p0273-1)^2)/2)^2-LN(1-(2*p0273-1)^2)/0.140012289)-(2/(pi()*0.140012289)+LN(1-(2*p0273-1)^2)/2)))
- p1747: 0
- p2677: 1.37707e-5; = p2286*(p1019+p1021)
- p1911: 0
- p2486: 3.09698e-7; = p2290*p1014
- p0832: 1.72631e9; = p0831*p0830/(1-p0831)
- p0898: 0.456
- p3033: 2.96211e-9; = p2252*p1023
- p2188: 0.000203141; = p1066-p2186-p2187
- p0822: 0.898833
- p0548: 0; = IF(p0284<0.5;-SQRT(p0007*EXP(p0416^2*p0008)-p0007);SQRT(p0007*EXP(p0416^2*p0008)-p0007))
- p3404: 0; = p3366*p1238
- p1662: 0
- p2338: 4.14324e-5; = p2228*p2206
- p2343: 0.000182075; = p2228*p2211
- p1834: 0
- p0739: 1.285; = p0079*(1+p0607*p0211/100)
- p1010: 0; = p0890
- p0534: 0; = SQRT(2)*(IF((2*p0402-1)<0;-1;IF((2*p0402-1)>0;1;0))*SQRT(SQRT((2/(pi()*0.140012289)+LN(1-(2*p0402-1)^2)/2)^2-LN(1-(2*p0402-1)^2)/0.140012289)-(2/(pi()*0.140012289)+LN(1-(2*p0402-1)^2)/2)))
- p2441: 4.76027e-6; = p2245*p1014
- p2107: 0.881623
- p2854: 6.83493e-6; = p2268*(p1079+p1081)
- p1784: 0
- p0392: 0.5
- p0297: 0.5
- p1908: 0
- p0821: 1.77727
- p1202: 0.7
- p1853: 0
- p2602: 0; = p2406*p1014
- p3163: 0; = p2382*p1082
- p3371: 0; = if(p1232=0;p3245*p3359/p0818;0)
- p2519: 4.68681e-6; = p2323*p1014
- p3056: 0; = p2275*p1132
- p1788: 0
- p0690: 849.21; = p0030*(1+p0558*p0162/100)
- p2956: 0; = p2370*(p1020+p1022)
- p2170: 0.0072306; = p2166*(p0913)
- p2672: 2.05492e-6; = p2281*(p1019+p1021)
- p2845: 6.14183e-5; = p2259*(p1079+p1081)
- p2020: 485184; = p2015*p2018*p2019
- p0116: 19.798
- p2819: 0; = p2428*(p1128+p1130)
- p2795: 0; = p2404*(p1019+p1021)
- p0551: 0; = IF(p0287<0.5;-SQRT(p0007*EXP(p0419^2*p0008)-p0007);SQRT(p0007*EXP(p0419^2*p0008)-p0007))
- p2942: 0; = p2356*(p1020+p1022)
- p1143: 0; = if(p1121=0;p1137*p0001/(p0818*p0002);0)
- p3057: 6.34437e-6; = p2276*p1023

- p3483: 0; = if(p1328+p1330+p1332+p1334+p1336+p1338+p1340+p1342+p1344=0;0;p1342/(p1328+p1330+p1332+p1334+p1336+p1338+p1340+p1342+p1344))
- p2221: 0; = p1155-p2220
- p1034: 0; = IF(p1012=0;p1028*p0001/(p0818*p0002);0)
- p2393: 0; = p2234*p2182
- p2705: 0; = p2314*(p1128+p1130)
- p2695: 0.000266726; = p2304*(p1078+p1080)
- p2158: 2.65323e-7; = p2015*p2082*p2120/(p0818*1000)
- p3910: 1.93367e-5; = p1767*p3478
- p1028: 0; = IF(p1012=0;p1022*(p0704/100)*p0703*1000;0)
- p3044: 9.72276e-7; = p2263*p1082
- p1228: 0.0646266; = IF(p1221=0;0;p0801*p1212*2000/(p1222+p1221*p1225)/p0818)
- p2521: 9.5381e-6; = p2325*p1014
- p1822: 0
- p2733: 5.13508e-6; = p2342*(p1078+p1080)
- p0704: 30.41; = p0044*(1+p0572*p0176/100)
- p0023: 65.346
- p3175: 0; = p2394*p1023
- p2162: 2.92553e-8; = p2015*p2086*p2124/(p0818*1000)
- p3021: 1.10555e-7; = p2240*p1023
- p0853: 0; = p0803/(p0802+p0803)
- p0982: 0.319988; = if(p0886=0;0;min(1;(p0691*p0690*1000*p0693/100)/p0886))
- p1907: 0
- p2641: 4.0387e-5; = p2250*(p1019+p1021)
- p0961: 0; = if(and(p0683>0;or(p0807=480;p0807=32;p0807=1;and(p0807=60;p0901<0.03)));p0937;0)
- p1949: 0
- p1866: 0
- p2139: 4.97026e-7; = p2015*p2067*p2101/(p0818*1000)
- p0841: 0.0788022
- p1698: 0
- p0733: 0
- p1152: 0
- p3153: 0; = p2372*p1023
- p1179: 0.5
- p1786: 0
- p2154: 2.27513e-7; = p2015*p2082*p2116/(p0818*1000)
- p2907: 7.86707e-6; = p2321*(p1020+p1022)
- p1147: 0
- p1326: 0; = IF(((p0745*1000*p0753/100)+(p0754*1000*p0762/100))/p0801<0;0;((p0745*1000*p0753/100)+(p0754*1000*p0762/100))/p0801)
- p2012: 0.00327758
- p3381: 0; = p3362*p1234
- p0135: 14.014
- p2272: 0; = p2230*p2218
- p3255: 0; = p1252*(p1297*(1-p3247)+p1300*(1-p3248)+p1301*(1-p3249)+p1302*(1-p3250))
- p1003: 0; = p0999*p0888
- p3394: 0; = p3375*p1234
- p3412: 0.0044701; = p3374*p1238
- p1876: 0
- p2267: 3.32014e-6; = p2226*p2213
- p3172: 0; = p2391*p1132
- p3275: 0.0214527
- p1845: 0
- p1918: 0
- p0962: 0; = if(and(p0683>0;or(p0807=480;p0807=32;p0807=1;and(p0807=60;p0901<0.03)));p0938;0)
- p1915: 0
- p2661: 4.50016e-6; = p2270*(p1078+p1080)
- p3167: 0; = p2386*p1082
- p3157: 0; = p2376*p1082
- p1978: 347
- p1073: 0.30537; = IF(p1071=0;p0711/100;0)
- p2646: 5.59285e-6; = p2255*(p1019+p1021)
- p0867: 0.0499101; = IF(p0858+p0864+p0865+p0866=1;0;IF(p0858+p0864+p0865+p0866+p0862>1;1-(p0858+p0864+p0865+p0866);p0862))
- p0741: 1.244; = p0081*(1+p0609*p0213/100)
- p1088: 17825.2; = IF(p1071=0;p1082*(p0710/100)*p0703*1000;0)
- p2433: 6.43847e-5; = p2237*p1014
- p1305: 0; = p1301*p1252/p0818
- p3114: 3.81721e-7; = p2333*p1023
- p0949: 0; = if(and(p0683=0;or(p0807=480;p0807=32;p0807=1;and(p0807=60;p0901<0.03)));p0937;0)
- p2187: 1.58795e-5; = 4*1.00794*p2186/(2*14.0067)
- p3484: 0.22616; = IF(p1344=0;0;p1344/(p1328+p1330+p1332+p1334+p1336+p1338+p1340+p1342+p1344))
- p2271: 0.000109204; = p2226*p2217
- p3267: 0.0170629
- p2297: 0.000561122; = p2227*p2204
- p2299: 0.000164339; = p2227*p2206
- p2290: 5.57985e-7; = p2223*p2197
- p1864: 5.36861e-6; = p1456*1000/p0818
- p2423: 0; = p2235*p2213
- p0110: 32.774
- p3138: 0; = p2357*p1023
- p0369: 0.5
- p1693: 0
- p2531: 2.62836e-5; = p2335*p1014
- p2251: 1.35691e-7; = p2222*p2197
- p0685: 20.275; = p0025*(1+p0553*p0157/100)
- p0327: 0.5
- p0781: 0
- p1243: 183763; = if(p1232>0;0;p1238*(p0725/100)*p0723*1000)
- p1796: 0
- p3246: 1; = IF(p3244+p3245=1;0;1-(p3244+p3245))
- p2140: 2.54162e-7; = p2015*p2068*p2102/(p0818*1000)
- p3014: 0; = p2428*(p1129+p1131)
- p3091: 5.31612e-6; = p2310*p1082
- p0111: 19.415
- p2611: 0; = p2415*p1073
- p2442: 1.19708e-6; = p2246*p1014
- p0555: 0; = IF(p0291<0.5;-SQRT(p0007*EXP(p0423^2*p0008)-p0007);SQRT(p0007*EXP(p0423^2*p0008)-p0007))
- p1049: 0.218296; = IF(p1012=0;IF(p1037+p1044+p1045+p1046+p1047+p1048=1;0;1-(p1037+p1044+p1045+p1046+p1047+p1048));0)
- p2104: 0.817136
- p0162: 33.486
- p0874: 0; = p0865*p0856
- p3826: 0; = p1889*p3477
- p3265: 0.696292
- p2785: 0; = p2394*(p1019+p1021)
- p2428: 0; = p2236*p2218
- p0740: 97.35; = p0080*(1+p0608*p0212/100)
- p3126: 4.07485e-8; = p2345*p1082
- p0945: 0; = if(and(p0683=0;p0951=0);p0939;0)
- p2274: 0; = p2230*p2220
- p0944: 0; = if(and(p0683=0;p0950=0);p0938;0)
- p1615: 0
- p4140: 0; = p1791*p3479
- p1229: 0.003769; = IF(p1221=0;0;p1228*p1221)
- p1941: 0
- p1263: 0; = if(p1232>0;0;IF(p1259=1;0;IF(p1259+p1260>1;1-p1259;p1260)))
- p0879: 0.198504; = p0878*p0001*p0003/(p0818*p0002)
- p0995: 0; = p0991*p0001*p0004/(p0818*p0002)
- p3287: 0.745
- p0250: 43.466
- p0724: 2.757; = p0064*(1+p0592*p0196/100)
- p3355: 4.3882e6; = if(and(p1232=0;p3256<>0);p3256-(p3350+p3351+p3352+p3353+p3354);0)
- p3232: 6.65428e-8; = p1182/p0818
- p1655: 0
- p0515: 0; = SQRT(2)*(IF((2*p0383-1)<0;-1;IF((2*p0383-1)>0;1;0))*SQRT(SQRT((2/(pi()*0.140012289)+LN(1-(2*p0383-1)^2)/2)^2-LN(1-(2*p0383-1)^2)/0.140012289)-(2/(pi()*0.140012289)+LN(1-(2*p0383-1)^2)/2)))
- p1724: 0
- p0735: 0
- p2092: 0.54529
- p0809: 0
- p2165: 0.814779; = (p0833-p2014)/p0818-p0839
- p1600: 0
- p0750: 0
- p4046: 5.38485e-5; = p1903*p3478
- p2628: 2.22562e-5; = p2237*(p1019+p1021)
- p2634: 6.3927e-6; = p2243*(p1019+p1021)
- p1621: 0
- p2802: 0; = p2411*(p1019+p1021)
- p1185: 0.5
- p2674: 5.9116e-6; = p2283*(p1019+p1021)
- p0840: 0.0808796; = p0839*p0831
- p3023: 3.4641e-8; = p2242*p1023
- p3310: 6.03079e7; = if(and(p1232=0;p3252<>0);IF((p3306+p3307+p3308+p3309)+(p3252*(p3257*(1-p3277))/p3305)>p3252;p3252-(p3306+p3307+p3308+p3309);p3252*(p3257*(1-p3277))/p3305);0)
- p2630: 4.6301e-7; = p2239*(p1019+p1021)
- p0592: 0; = IF(p0328<0.5;-SQRT(p0007*EXP(p0460^2*p0008)-p0007);SQRT(p0007*EXP(p0460^2*p0008)-p0007))
- p1044: 0.00774783; = IF(p1012=0;IF(p1037=1;0;IF(p1037+p1038>1;1-p1037;p1038));0)
- p2558: 0; = p2362*p1014
- p0972: 0.0022951; = p0969/p0818
- p3297: 0; = if(p1273+p1274+p1275+p1276=0;0;p1273/(p1273+p1274+p1275+p1276))
- p2825: 5.78727e-7; = p2239*(p1020+p1022)
- p1122: 0.000397722; = p1121*p0001/(p0818*p0002)
- p0571: 0; = IF(p0307<0.5;-SQRT(p0007*EXP(p0439^2*p0008)-p0007);SQRT(p0007*EXP(p0439^2*p0008)-p0007))
- p2869: 7.38904e-6; = p2283*(p1020+p1022)
- p1242: 0; = if(p1232>0;0;p1234*(p0725/100)*p0723*1000)
- p0316: 0.5
- p0990: 0; = p0986*p0886
- p0833: 1.66632e10; = p0830+p0832
- p0507: 0; = SQRT(2)*(IF((2*p0375-1)<0;-1;IF((2*p0375-1)>0;1;0))*SQRT(SQRT((2/(pi()*0.140012289)+LN(1-(2*p0375-1)^2)/2)^2-LN(1-(2*p0375-1)^2)/0.140012289)-(2/(pi()*0.140012289)+LN(1-(2*p0375-1)^2)/2)))
- p2636: 1.64551e-6; = p2245*(p1019+p1021)
- p2403: 0; = p2234*p2192
- p0423: 0; = SQRT(2)*(IF((2*p0291-1)<0;-1;IF((2*p0291-1)>0;1;0))*SQRT(SQRT((2/(pi()*0.140012289)+LN(1-(2*p0291-1)^2)/2)^2-LN(1-(2*p0291-1)^2)/0.140012289)-(2/(pi()*0.140012289)+LN(1-(2*p0291-1)^2)/2)))
- p0951: 0; = if(and(p0683=0;or(p0807=480;p0807=32;p0807=1;and(p0807=60;p0901<0.03)));p0939;0)
- p3352: 1.50627e6; = if(and(p1232=0;p3256<>0);p3256*(p3275-p3347)/p3349;0)
- p0862: 0.0499101; = p0674*1000/p0856
- p4856: 0; = p1889*p3482
- p2716: 3.29708e-6; = p2325*(p1019+p1021)
- p1958: 5430
- p0292: 0.5
- p3393: 0; = p3374*p1234
- p2100: 0.705744
- p1258: 1; = if(p1232>0;0;IF(p1253+p1256+p1257=1;0;1-(p1253+p1256+p1257)))
- p2537: 9.83352e-6; = p2341*p1073
- p3134: 0; = p2353*p1132
- p2383: 0; = p2229*p2212
- p0242: 84.996
- p0501: 0; = SQRT(2)*(IF((2*p0369-1)<0;-1;IF((2*p0369-1)>0;1;0))*SQRT(SQRT((2/(pi()*0.140012289)+LN(1-(2*p0369-1)^2)/2)^2-LN(1-(2*p0369-1)^2)/0.140012289)-(2/(pi()*0.140012289)+LN(1-(2*p0369-1)^2)/2)))
- p2201: 0.000177724; = 12.01*p2200/(2*14.0067)
- p0810: 0
- p2048: 1.79439e-14; = p2015*p2046/(p0818*1000000000000)
- p2891: 2.45738e-7; = p2305*(p1079+p1081)
- p1016: 0.23981; = IF(p1012=0;p0707/100;0)
- p0999: 0; = IF(p0996=1;0;IF(p0996+p0997>1;1-p0996;p0997))
- p4900: 0; = p1933*p3482
- p3401: 0; = p3363*p1238
- p0334: 0.5
- p0558: 0; = IF(p0294<0.5;-SQRT(p0007*EXP(p0426^2*p0008)-p0007);SQRT(p0007*EXP(p0426^2*p0008)-p0007))
- p1974: 0; = p1969*p0001/(p0818*p0002)
- p2901: 2.73892e-5; = p2315*(p1020+p1022)
- p2317: 2.37603e-6; = p2224*p2184
- p2476: 4.13045e-5; = p2280*p1014
- p0722: 0
- p1306: 0; = p1302*p1252/p0818
- p3131: 0; = p2350*p1132
- p2277: 0.000104712; = p2223*p2183
- p1944: 0
- p0271: 163.359
- p3414: 0.000167804; = p3376*p1238
- p0929: 1.02508e6; = p0801*p0923
- p1081: 0; = IF(p1071=0;IF(p1073+p1078+p1079+p1080=1;0;IF(p1073+p1078+p1079+p1080+p1077>1;1-(p1073+p1078+p1079+p1080);p1077));0)
- p0687: 8.488; = p0027*(1+p0555*p0159/100)
- p2458: 3.4107e-5; = p2262*p1073
- p0855: 1.48367; = p0854*p0001*p0003/(p0818*p0002)
- p2797: 0; = p2406*(p1019+p1021)
- p3150: 0; = p2369*p1023
- p0616: 0; = IF(p0352<0.5;-SQRT(p0007*EXP(p0484^2*p0008)-p0007);SQRT(p0007*EXP(p0484^2*p0008)-p0007))
- p1719: 0
- p0050: 19.922
- p1248: 1.57175e-5; = if(p1232>0;0;p1243*p0001/(p0818*p0002))
- p3362: 0; = if(p1232=0;p3244*p3356/p0818;0)
- p0983: 0.68197; = if(p0886=0;0;min(1;(p0695*p0694*1000*p0697/100)/p0886))
- p3083: 2.45874e-6; = p2302*p1082
- p2685: 2.29987e-5; = p2294*(p1019+p1021)
- p1981: 400
- p0017: 460.415
- p2362: 0; = p2225*p2190
- p1909: 0
- p0484: 0; = SQRT(2)*(IF((2*p0352-1)<0;-1;IF((2*p0352-1)>0;1;0))*SQRT(SQRT((2/(pi()*0.140012289)+LN(1-(2*p0352-1)^2)/2)^2-LN(1-(2*p0352-1)^2)/0.140012289)-(2/(pi()*0.140012289)+LN(1-(2*p0352-1)^2)/2)))
- p0854: 1.73465e6; = p0801*((1-p0853)*p0846+p0853*p0852)
- p1993: 400
- p3455: 0; = p3379*p1240
- p3200: 0; = p2419*p1082
- p0910: 0.0105884; = p0909/p0818
- p3664: 1.51047e-6; = p1933*p3476
- p1875: 0
- p3458: 0; = p3363*p1241
- p1991: 9.17101e7; = (if(p1111=0;0;p1106/p1111)+if(p1112=0;0;p1107/p1112)+if(p1113=0;0;p1108/p1113)+if(p1114=0;0;p1109/p1114)+if(p1115=0;0;p1110/p1115))*(1+p1157)
- p2164: 0.000642561; = (p2015/p0818)-(p2022)-(p2035+p2036+p2052)-(p2017/p0818)-(p2039+p2041+p2044+p2158+p2159+p2160+p2161+p2162)
- p0031: 7.949
- p0889: 30.4457; = 1000*p0888*p0001*p0003*p0004/(p0818*p0002)
- p3074: 3.71873e-6; = p2293*p1023
- p2719: 3.97638e-5; = p2328*(p1019+p1021)
- p2193: 0.000605661; = p1054/p0818
- p3192: 0; = p2411*p1023
- p3402: 0; = p3364*p1238
- p1753: 0
- p1253: 0; = if(p1232>0;0;p0735/100)
- p0665: 0; = IF(p0401<0.5;-SQRT(p0007*EXP(p0533^2*p0008)-p0007);SQRT(p0007*EXP(p0533^2*p0008)-p0007))
- p1881: 0
- p5243: 1.21417e-6; = p1864*p3484
- p0542: 0; = IF(p0278<0.5;-SQRT(p0007*EXP(p0410^2*p0008)-p0007);SQRT(p0007*EXP(p0410^2*p0008)-p0007))
- p3452: 0; = p3376*p1240
- p3069: 1.16467e-6; = p2288*p1023
- p0422: 0; = SQRT(2)*(IF((2*p0290-1)<0;-1;IF((2*p0290-1)>0;1;0))*SQRT(SQRT((2/(pi()*0.140012289)+LN(1-(2*p0290-1)^2)/2)^2-LN(1-(2*p0290-1)^2)/0.140012289)-(2/(pi()*0.140012289)+LN(1-(2*p0290-1)^2)/2)))
- p2027: 0.428799
- p3189: 0; = p2408*p1023
- p0578: 0; = IF(p0314<0.5;-SQRT(p0007*EXP(p0446^2*p0008)-p0007);SQRT(p0007*EXP(p0446^2*p0008)-p0007))
- p1052: 1.15089e6; = IF(p1012=0;p1045*p1036;0)
- p2896: 8.45194e-5; = p2310*(p1079+p1081)
- p2293: 0.000279603; = p2223*p2200
- p3254: 0; = p1252*(p1287*(1-p3247)+p1290*(1-p3248)+p1291*(1-p3249)+p1292*(1-p3250))
- p1250: 0; = if(p1232>0;0;p1245*p0001/(p0818*p0002))
- p3387: 0; = p3368*p1234
- p3478: 0.5294; = if(p1328+p1330+p1332+p1334+p1336+p1338+p1340+p1342+p1344=0;0;p1332/(p1328+p1330+p1332+p1334+p1336+p1338+p1340+p1342+p1344))
- p0306: 0.5
- p0850: 0
- p2557: 0; = p2361*p1014
- p0979: 0; = IF(p0976=0;0;p0976*p0001/(p0818*p0002))
- p2915: 3.2038e-8; = p2329*(p1020+p1022)
- p2668: 2.009e-5; = p2277*(p1019+p1021)
- p0912: 0
- p2329: 1.33597e-7; = p2224*p2197
- p1230: 0.5
- p0851: 0
- p0683: 65.346; = p0023*(1+p0551*p0155/100)
- p2253: 4.89663e-7; = p2222*p2199
- p2331: 4.82107e-7; = p2224*p2199
- p1574: 0
- p0179: 58.7
- p3215: 0.450791; = p1222*3*15.9994/100.0869
- p2136: 1.03976e-6; = p2015*p2064*p2098/(p0818*1000)
- p1928: 0
- p1150: 0; = if(p1121=0;p1149*p1146*p1145;0)
- p2038: 0.304457
- p1101: 0.0606187; = IF(p1071=0;IF(p1096=1;0;IF(p1096+p1097>1;1-p1096;p1097));0)
- p3147: 0; = p2366*p1023
- p2560: 0; = p2364*p1014
- p2534: 1.26522e-5; = p2338*p1073
- p2796: 0; = p2405*(p1019+p1021)
- p3018: 1.54283e-6; = p2237*p1023
- p2179: 0.0291182; = p0970+p0971+p0972
- p0713: 30.605; = p0053*(1+p0581*p0185/100)
- p2844: 6.79088e-5; = p2258*(p1079+p1081)
- p3193: 0; = p2412*p1023
- p2873: 9.79649e-5; = p2287*(p1020+p1022)
- p2563: 0; = p2367*p1014
- p1328: 928203; = p1319*p0801
- p2230: 0; = if(p0783*p0787+p0784*p0788+p0785*p0789+p0786*p0790=0;0;p0787*p0783/(p0783*p0787+p0784*p0788+p0785*p0789+p0786*p0790))
- p1994: 750
- p1841: 0
- p1391: 3
- p2670: 6.55814e-6; = p2279*(p1019+p1021)
- p1072: 0; = p1071*p0001/(p0818*p0002)
- p2675: 6.7666e-6; = p2284*(p1019+p1021)
- p2172: 0.369109; = p2166-(p2167+p2168+p2169+p2170)
- p3068: 5.43319e-6; = p2287*p1023
- p0646: 0; = IF(p0382<0.5;-SQRT(p0007*EXP(p0514^2*p0008)-p0007);SQRT(p0007*EXP(p0514^2*p0008)-p0007))
- p3174: 0; = p2393*p1023
- p3130: 1.34028e-6; = p2349*p1082
- p1823: 0
- p1930: 0
- p3307: 5.94687e6; = if(and(p1232=0;p3252<>0);p3252*(p3258-p3302)/p3305;0)
- p4098: 2.49703e-5; = p1955*p3478
- p3224: 0.501945; = IF(p3216=0;0;1-p3221-p3222-p3223)
- p1272: 0.69123; = IF(p1267+p1270+p1271=p1259;0;p1259-(p1267+p1270+p1271))
- p1191: 0.5
- p2529: 1.59298e-5; = p2333*p1014
- p2131: 4.69048e-7; = p2015*p2059*p2093/(p0818*1000)
- p1287: 0
- p0466: 0; = SQRT(2)*(IF((2*p0334-1)<0;-1;IF((2*p0334-1)>0;1;0))*SQRT(SQRT((2/(pi()*0.140012289)+LN(1-(2*p0334-1)^2)/2)^2-LN(1-(2*p0334-1)^2)/0.140012289)-(2/(pi()*0.140012289)+LN(1-(2*p0334-1)^2)/2)))
- p3028: 2.3214e-7; = p2247*p1023
- p1748: 0
- p2214: 9.30475e-5; = p1107/p0818
- p1956: 0
- p2597: 0; = p2401*p1014
- p1176: 633.812; = p1175*p0801
- p2132: 4.50871e-7; = p2015*p2060*p2094/(p0818*1000)
- p2812: 0; = p2421*(p1078+p1080)
- p2993: 0; = p2407*(p1020+p1022)
- p0950: 0; = if(and(p0683=0;or(p0807=480;p0807=32;p0807=1;and(p0807=60;p0901<0.03)));p0938;0)
- p0104: 30.41
- p3118: 2.46297e-6; = p2337*p1082
- p1199: -0.29
- p3728: 0; = p1791*p3477
- p3366: 0; = if(p1232=0;p3244*p3360/p0818;0)
- p2456: 1.98446e-5; = p2260*p1073
- p2123: 0.263965
- p0607: 0; = IF(p0343<0.5;-SQRT(p0007*EXP(p0475^2*p0008)-p0007);SQRT(p0007*EXP(p0475^2*p0008)-p0007))
- p1882: 0
- p1742: 0
- p2727: 5.22483e-5; = p2336*(p1078+p1080)
- p0521: 0; = SQRT(2)*(IF((2*p0389-1)<0;-1;IF((2*p0389-1)>0;1;0))*SQRT(SQRT((2/(pi()*0.140012289)+LN(1-(2*p0389-1)^2)/2)^2-LN(1-(2*p0389-1)^2)/0.140012289)-(2/(pi()*0.140012289)+LN(1-(2*p0389-1)^2)/2)))
- p1148: 0; = if(p1121=0;IF(p1146=1;0;1-p1146);0)
- p0509: 0; = SQRT(2)*(IF((2*p0377-1)<0;-1;IF((2*p0377-1)>0;1;0))*SQRT(SQRT((2/(pi()*0.140012289)+LN(1-(2*p0377-1)^2)/2)^2-LN(1-(2*p0377-1)^2)/0.140012289)-(2/(pi()*0.140012289)+LN(1-(2*p0377-1)^2)/2)))
- p5234: 6.6107e-5; = p1855*p3484
- p2775: 0; = p2384*(p1078+p1080)
- p2361: 0; = p2225*p2189
- p1310: 0; = IF(p1307=p1266;0;IF(p1307+p1308>p1266;p1266-p1307;p1308))
- p1762: 0
- p3041: 1.25097e-6; = p2260*p1082
- p3137: 0; = p2356*p1023
- p3391: 0; = p3372*p1234
- p1832: 0
- p0574: 0; = IF(p0310<0.5;-SQRT(p0007*EXP(p0442^2*p0008)-p0007);SQRT(p0007*EXP(p0442^2*p0008)-p0007))
- p3015: 0; = p2429*(p1129+p1131)
- p2006: 0.0432109; = ((p1980*p1985+p1986*p1991+p1992*p1997+p2000*p2005)/p0818)*p0005*p0002/1000
- p1297: 0
- p2555: 0; = p2359*p1014
- p1997: 0; = (if(p1152=0;0;p1150/p1152)+if(p1153=0;0;p1151/p1153))*(1+p1157)
- p2096: 0.486404
- p4651: 1.62326e-6; = p1890*p3481
- p3432: 0; = p3375*p1239
- p2384: 0; = p2229*p2213
- p4664: 1.47203e-5; = p1903*p3481
- p1951: 0
- p0896: 0.497045
- p0956: 3.93801e-5; = if(and(p0683>0;or(p0807=56;p0807=100;and(p0807=60;p0901>0.06)));p0938;0)
- p0892: 6036.3; = if(p0891=0;0;(1-p1240)*p3251/p0891)
- p1728: 0
- p2419: 0; = p2235*p2209
- p2008: 0.00821393; = ((p1982*p1985+p1988*p1991+p1994*p1997+p2002*p2005)/p0818)*p0005*p0002/1000
- p1959: 5814.47; = if(p0738*p0740*p0739>0;p0738*1000*(p0740/100)*p0739/1000;p1958)
- p3416: 0.00530707; = p3378*p1238
- p2823: 2.78185e-5; = p2237*(p1020+p1022)
- p3202: 0; = p2421*p1082
- p0797: 39.62; = p0137*(1+p0665*p0269/100)
- p3210: 0; = p2429*p1132
- p2005: 8.62219e6; = p1963*p0818+p1959*1000+p1170+p1176+p1182
- p3218: 0.0243258; = p3214*p1228
- p2821: 0; = p2430*(p1128+p1130)
- p1792: 0
- p1012: 0
- p1189: 0.000397722; = p0801*p0001/(p0818*p0002)
- p2191: 1.31494e-5; = 8*1.00794*p2189/(2*14.0067)
- p0907: 0
- p0382: 0.5
- p0791: 0
- p0439: 0; = SQRT(2)*(IF((2*p0307-1)<0;-1;IF((2*p0307-1)>0;1;0))*SQRT(SQRT((2/(pi()*0.140012289)+LN(1-(2*p0307-1)^2)/2)^2-LN(1-(2*p0307-1)^2)/0.140012289)-(2/(pi()*0.140012289)+LN(1-(2*p0307-1)^2)/2)))
- p0482: 0; = SQRT(2)*(IF((2*p0350-1)<0;-1;IF((2*p0350-1)>0;1;0))*SQRT(SQRT((2/(pi()*0.140012289)+LN(1-(2*p0350-1)^2)/2)^2-LN(1-(2*p0350-1)^2)/0.140012289)-(2/(pi()*0.140012289)+LN(1-(2*p0350-1)^2)/2)))
- p2395: 0; = p2234*p2184
- p2903: 5.69796e-7; = p2317*(p1020+p1022)
- p1710: 0
- p1046: 0.024056; = IF(p1012=0;IF(p1037+p1044+p1045=1;0;IF(p1037+p1044+p1045+p1040>1;1-(p1037+p1044+p1045);p1040));0)
- p1186: 3.32714e-8; = p1182*p1185/p0818
- p2830: 1.79687e-6; = p2244*(p1020+p1022)
- p1963g: 5.04536e-6; = p1667*p1871+p1668*p1872+p1669*p1873+p1670*p1874+p1671*p1875+p1672*p1876+p1673*p1877+p1674*p1878+p1675*p1879+p1676*p1880+p1677*p1881+p1678*p1882+p1679*p1883+p1680*p1884+p1681*p1885+p1682*p1886+p1683*p1887+p1684*p1888+p1685*p1889
- p0044: 30.41
- p3025: 9.96555e-8; = p2244*p1023
- p0985: 0.680012; = IF(p0982=1;0;IF(p0982+p0983>1;1-p0982;p0983))
- p2377: 0; = p2229*p2206
- p2729: 1.53022e-5; = p2338*(p1078+p1080)
- p0460: 0; = SQRT(2)*(IF((2*p0328-1)<0;-1;IF((2*p0328-1)>0;1;0))*SQRT(SQRT((2/(pi()*0.140012289)+LN(1-(2*p0328-1)^2)/2)^2-LN(1-(2*p0328-1)^2)/0.140012289)-(2/(pi()*0.140012289)+LN(1-(2*p0328-1)^2)/2)))
- p1139: 0; = if(p1121=0;p1133*p0001/(p0818*p0002);0)
- p3160: 0; = p2379*p1082
- p2124: 0.263965
- p0779: 51.568; = p0119*(1+p0647*p0251/100)
- p4354: 0; = p1799*p3480
- p2792: 0; = p2401*(p1019+p1021)
- p1593: 0
- p1891: 0
- p0793: 0
- p2460: 6.6594e-6; = p2264*p1073
- p2443: 9.68759e-6; = p2247*p1014
- p1701: 0
- p0516: 0; = SQRT(2)*(IF((2*p0384-1)<0;-1;IF((2*p0384-1)>0;1;0))*SQRT(SQRT((2/(pi()*0.140012289)+LN(1-(2*p0384-1)^2)/2)^2-LN(1-(2*p0384-1)^2)/0.140012289)-(2/(pi()*0.140012289)+LN(1-(2*p0384-1)^2)/2)))
- p2938: 0; = p2352*(p1129+p1131)
- p2422: 0; = p2235*p2212
- p3241: 1.15665e-9; = p3234*p1188*p3236/p0818
- p0909: 1.10447e8
- p1318: 0; = p1317*p0001/(p0818*p0002)
- p2548: 0; = p2352*p1123
- p3409: 0; = p3371*p1238
- p2516: 1.42332e-6; = p2320*p1014
- p2507: 0; = p2311*p1123
- p2524: 0.000115032; = p2328*p1014
- p0969: 2.39401e7; = p0966*p0683*p0682*1000
- p3247: 0
- p3024: 4.43151e-7; = p2243*p1023
- p2101: 0.620397
- p1910: 0
- p2912: 2.34556e-5; = p2326*(p1020+p1022)
- p0159: 6.345
- p1145: 0; = if(p1121=0;p0799*p0702*1000*p0800/100;0)
- p1141: 0; = if(p1121=0;p1135*p0001/(p0818*p0002);0)
- p2218: 0; = p1150/p0818
- p1927: 0
- p3136: 0; = p2355*p1023
- p0875: 0; = p0874*p0001*p0003/(p0818*p0002)
- p0299: 0.5
- p3435: 0; = p3378*p1239
- p3421: 0; = p3364*p1239
- p1144: 0; = if(p1121=0;p1138*p0001/(p0818*p0002);0)
- p0438: 0; = SQRT(2)*(IF((2*p0306-1)<0;-1;IF((2*p0306-1)>0;1;0))*SQRT(SQRT((2/(pi()*0.140012289)+LN(1-(2*p0306-1)^2)/2)^2-LN(1-(2*p0306-1)^2)/0.140012289)-(2/(pi()*0.140012289)+LN(1-(2*p0306-1)^2)/2)))
- p2228: 0.153025; = if(p0774*p0778+p0775*p0779+p0776*p0780+p0777*p0781=0;0;p0780*p0776/(p0774*p0778+p0775*p0779+p0776*p0780+p0777*p0781))
- p2836: 5.04806e-5; = p2250*(p1020+p1022)
- p2067: 0.446471
- p0796: 30.41; = p0136*(1+p0664*p0268/100)
- p0309: 0.5
- p1867: 0
- p2762: 0; = p2371*(p1019+p1021)
- p2206: 0.000270757; = 9*1.00794*p2204/30.973762
- p1252: 1.56262e9; = if(p1232>0;0;p0724*2000*p0723*1000*p0725/100)
- p1086: 0; = IF(p1071=0;p1080*(p0710/100)*p0703*1000;0)
- p0707: 23.981; = p0047*(1+p0575*p0179/100)
- p2088: 0.798875
- p2664: 0; = p2273*(p1128+p1130)
- p2190: 5.22893e-5; = 32.065*p2189/(2*14.0067)
- p0267: 31.43
- p2587: 0; = p2391*p1123
- p0052: 36.933
- p0753: 0
- p1917: 0
- p2163: 0.000634572; = (p2017-p2020)/p0818-(p2025+p2028+p2033+p2034+p2051+p2125+p2126+p2127+p2128+p2129+p2130+p2131+p2132+p2133+p2134+p2135+p2136+p2137+p2138+p2139+p2140+p2141+p2142+p2143+p2144+p2145+p2146+p2147+p2148+p2149+p2150+p2151+p2152+p2153+p2154+p2155+p2156+p2157)
- p2033: 5.16945e-6; = p2015*p2029*p2031/(p0818*1000)
- p3437: 0; = p3380*p1239
- p0792: 0
- p0812: 0; = if(p0807=480;0.095/0.34;0)
- p2786: 0; = p2395*(p1019+p1021)
- p2637: 4.13802e-7; = p2246*(p1019+p1021)
- p2573: 0; = p2377*p1073
- p2691: 0.000503948; = p2300*(p1078+p1080)
- p1732: 0
- p2965: 0; = p2379*(p1079+p1081)
- p2334: 4.1307e-6; = p2224*p2202
- p3155: 0; = p2374*p1023
- p3055: 0; = p2274*p1132
- p1884: 0
- p0037: 95.935
- p0928: 1.09956e6; = p0801*p0918
- p2718: 4.02263e-6; = p2327*(p1019+p1021)
- p1678: 0
- p3110: 1.77684e-9; = p2329*p1023
- p2671: 1.42779e-5; = p2280*(p1019+p1021)
- p3045: 4.19797e-7; = p2264*p1082
- p0917: 1.32164
- p1636: 0
- p2982: 0; = p2396*(p1020+p1022)
- p0988: 5.92136e6; = p0982*p0886
- p2606: 0; = p2410*p1014
- p1201: 0.65
- p2057: 3.28794
- p1895: 0
- p0895: 2.83801e9; = p0894*p0830
- p3330: 0; = if(and(p1232=0;p3255<>0);p3255*(p3267-p3325)/p3327;0)
- p1962: 3.68587e-5; = p1960*1000/p0818
- p2987: 0; = p2401*(p1020+p1022)
- p0547: 0; = IF(p0283<0.5;-SQRT(p0007*EXP(p0415^2*p0008)-p0007);SQRT(p0007*EXP(p0415^2*p0008)-p0007))
- p4513: 0; = p1962*p3480
- p2693: 4.71734e-5; = p2302*(p1078+p1080)
- p1158: 0.00256542; = p1156*p1157
- p2153: 2.91936e-9; = p2015*p2081*p2115/(p0818*1000)
- p1679: 0
- p2468: 0; = p2272*p1123
- p2621: 0; = p2425*p1073
- p0803: 0
- p0412: 0; = SQRT(2)*(IF((2*p0280-1)<0;-1;IF((2*p0280-1)>0;1;0))*SQRT(SQRT((2/(pi()*0.140012289)+LN(1-(2*p0280-1)^2)/2)^2-LN(1-(2*p0280-1)^2)/0.140012289)-(2/(pi()*0.140012289)+LN(1-(2*p0280-1)^2)/2)))
- p0199: 33.674
- p1234: 0; = if(p1232>0;0;p0726/100)
- p2544: 2.37226e-6; = p2348*p1073
- p2447: 7.53126e-8; = p2251*p1014
- p1953: 0
- p1968: 0; = if(p0807=480;p0802*p0811;0)
- p0931: 1.27898e6; = p0801*p0925
- p0384: 0.5
- p1268: 0
- p2114: 0.832356
- p1856: 0
- p2725: 7.92516e-7; = p2334*(p1019+p1021)
- p2142: 4.13486e-7; = p2015*p2070*p2104/(p0818*1000)
- p2330: 2.19279e-7; = p2224*p2198
- p1889: 1.02579e-5; = p1481*1000/p0818
- p2148: 8.75807e-8; = p2015*p2076*p2110/(p0818*1000)
- p1757: 0
- p2037: 3.16
- p2497: 8.62515e-5; = p2301*p1073
- p1718: 0
- p2697: 3.10095e-6; = p2306*(p1078+p1080)
- p1677: 0
- p2097: 0.40001
- p2397: 0; = p2234*p2186
- p2960: 0; = p2374*(p1020+p1022)
- p2227: 0.606961; = if(p0774*p0778+p0775*p0779+p0776*p0780+p0777*p0781=0;0;p0779*p0775/(p0774*p0778+p0775*p0779+p0776*p0780+p0777*p0781))
- p1317: 0
- p2967: 0; = p2381*(p1079+p1081)
- p1090: 2.92513e-5; = IF(p1071=0;p1084*p0001/(p0818*p0002);0)
- p2249: 2.12951e-5; = p2222*p2195
- p2426: 0; = p2235*p2216
- p2790: 0; = p2399*(p1019+p1021)
- p0667: 0; = IF(p0403<0.5;-SQRT(p0007*EXP(p0535^2*p0008)-p0007);SQRT(p0007*EXP(p0535^2*p0008)-p0007))
- p2209: 0.000210437; = 14.0067*p2208/30.973762
- p0763: 4648.06; = p0103*(1+p0631*p0235/100)
- p1676: 0
- p2692: 0.000104317; = p2301*(p1078+p1080)
- p1194: 1.48
- p2347: 5.37317e-5; = p2228*p2215
- p2473: 5.81182e-5; = p2277*p1014
- p3123: 2.67648e-7; = p2342*p1082
- p2810: 0; = p2419*(p1078+p1080)
- p5076: 0; = p1903*p3483
- p3154: 0; = p2373*p1023
- p2876: 1.3381e-7; = p2290*(p1020+p1022)
- p1048: 0.000435637; = IF(p1012=0;IF(p1037+p1044+p1045+p1046+p1047=1;0;IF(p1037+p1044+p1045+p1046+p1047+p1042>1;1-(p1037+p1044+p1045+p1046+p1047);p1042));0)
- p3415: 0.000707166; = p3377*p1238
- p3399: 0; = p3380*p1234
- p1935: 0
- p2011: 0.00167079
- p2439: 1.84934e-5; = p2243*p1014
- p2687: 3.7947e-5; = p2296*(p1019+p1021)
- p0202: 20.171
- p1785: 0
- p0927: 0.00041828; = IF(p0918+p0923+p0924+p0925+p0926=1;0;1-(p0918+p0923+p0924+p0925+p0926))
- p3038: 6.39696e-7; = p2257*p1023
- p0901: 0.0656776
- p0175: 0
- p1481: 107
- p0811: 0; = if(p0807=480;1-p0810;0)
- p1021: 0; = IF(p1012=0;IF(p1014+p1019+p1020=1;0;IF(p1014+p1019+p1020+p1017>1;1-(p1014+p1019+p1020);p1017));0)
- p1776: 0
- p0525: 0; = SQRT(2)*(IF((2*p0393-1)<0;-1;IF((2*p0393-1)>0;1;0))*SQRT(SQRT((2/(pi()*0.140012289)+LN(1-(2*p0393-1)^2)/2)^2-LN(1-(2*p0393-1)^2)/0.140012289)-(2/(pi()*0.140012289)+LN(1-(2*p0393-1)^2)/2)))
- p2122: 0.341195
- p4148: 0; = p1799*p3479
- p1645: 0
- p2871: 2.1269e-6; = p2285*(p1020+p1022)
- p1827: 0
- p1995: 50
- p2694: 2.03679e-5; = p2303*(p1078+p1080)
- p1688: 0
- p3072: 1.21807e-8; = p2291*p1023
- p3801: 0; = p1864*p3477
- p0870: 4.08388e6; = p0858*p0856
- p3099: 1.08849e-7; = p2318*p1023
- p0804: 0
- p2642: 2.60337e-8; = p2251*(p1019+p1021)
- p3621: 1.11852e-6; = p1890*p3476
- p0993: 2.73379e-5; = p0989*p0001*p0004/(p0818*p0002)

## Reference product
- soybeans; at harvest in 2000; at farm; 85%-92% moisture: 1 kg

## Inputs from technosphere
- CUTOFF apply zinc compounds; unspecified method: 0.000397722 ha; = p1183
- CUTOFF apply P fertilizer; no broadcast application: 2.41856e-5 ha; = p1089
- CUTOFF planting; for mulch till, soybeans: 8.76766e-5 ha; = p0953
- CUTOFF soya seeds; unspec. type; at point-of-sale: 0.0022951 kg; = p0972
- CUTOFF harvest; soybeans residue management: 0.000397722 ha; = p1975
- CUTOFF N inhibitor appl svc; unspec rate & type, 2000 soybeans: 0.000445787 ha; = p1162
- CUTOFF planting; for ridge till, soybeans: 3.93801e-5 ha; = p0956
- CUTOFF apply pesticide; banded or side-dressed: 7.93907e-5 ha; = p1329
- CUTOFF harvest; soybeans: 0.000391307 ha; = p1971
- CUTOFF fertilizer storage: 0.00708816 kg*a; = p1160
- CUTOFF nitrogenous fertilizer, ammonium sulfate; at point-of-sale: 0.000217534 kg; = p1067
- CUTOFF zinc compounds storage: 3.32714e-8 kg*a; = p1186
- CUTOFF bulk cargo rail transport; diesel: 0.00821393 metric ton*km; = p2008
- CUTOFF apply P fertilizer; broadcast without incorporation: 2.42395e-5 ha; = p1091
- CUTOFF phosphatic fertilizer, superphosphate grades over 22%; at point-of-sale: 0.000444179 kg; = p1117
- CUTOFF apply single or mixed P fertilizer; unspec. method: 1.52462e-6 ha; = p1094
- CUTOFF pesticide, Alachlor; at point-of-sale; kg AI: 3.65257e-5 kg; = p1767
- CUTOFF pesticide, Pendimethalin; at point-of-sale; kg AI: 0.000101716 kg; = p1903
- CUTOFF sulfuric acid; at point-of-sale: 6.07624e-8 kg; = p1178
- CUTOFF nitrogenous fertilizer, aqueous ammonia; at point-of-sale: 6.53915e-5 kg; = p1065
- CUTOFF nitrogenous fertilizer, nitrogen solutions; at point-of-sale: 0.00201887 kg; = p1068
- CUTOFF apply single or mixed N fertilizer; unspec. method: 1.60793e-6 ha; = p1035
- CUTOFF pesticide, Chlorimuron-ethyl; at point-of-sale; kg AI: 9.58681e-8 kg; = p1791
- CUTOFF sulfur; at point-of-sale: 2.2919e-7 kg; = p1172
- CUTOFF liming materials storage: 0.0341978 kg*a; = p1231
- CUTOFF pesticide, unspecified type; at point-of-sale; kg AI: 3.68587e-5 kg; = p1962
- CUTOFF unspecified animal manure; from unspecified storage; at point-of-sale: 0.0462555 kg; = p1316
- CUTOFF pesticide, Glyphosate; at point-of-sale; kg AI: 0.000292302 kg; = p1855
- CUTOFF apply N fertilizer; broadcast without incorporation: 2.89922e-5 ha; = p1032
- CUTOFF soya seeds; GMO herbicide resistant seed; at point-of-sale: 0.0209194 kg; = p0970
- CUTOFF pesticide, Propazine; at point-of-sale; kg AI: 1.02579e-5 kg; = p1889
- CUTOFF apply liming materials; unspecified method: 0.000397722 ha; = p1227
- CUTOFF apply N fertilizer; no broadcast application: 6.71013e-5 ha; = p1030
- CUTOFF pesticide, Cloransulam-methyl; at point-of-sale; kg AI: 2.87604e-7 kg; = p1799
- CUTOFF beef manure; from unspecified storage; at point-of-sale: 0.10355 kg; = p1276
- CUTOFF prepare soil; for conventional till, soybeans; <15% residue: 9.4047e-5 ha; = p0934
- CUTOFF prepare soil; for mulch till, soybeans: 8.76766e-5 ha; = p0935
- CUTOFF gypsum storage: 9.60173e-7 kg*a; = p1168
- CUTOFF nitrogenous fertilizer, ammonium nitrate; at point-of-sale: 0.000329354 kg; = p1066
- CUTOFF phosphatic fertilizer, other single phosphates; at point-of-sale: 0.000505758 kg; = p1118
- CUTOFF pesticide storage: 0.000547525 kg*a; = p1965
- CUTOFF sewage sludge storage: 1.03579e-7 kg*a; = p1192
- CUTOFF planting; for reduced till, soybeans; 15-30% residue: 0.000109393 ha; = p0955
- CUTOFF planting; for unspec. till, soybeans: 1.66359e-7 ha; = p0957
- CUTOFF prepare soil; for unspec. till, soybeans: 1.66359e-7 ha; = p0939
- CUTOFF planting; for conventional till, soybeans; <15% residue: 9.4047e-5 ha; = p0952
- CUTOFF apply P fertilizer; broadcast with incorporation: 2.92513e-5 ha; = p1090
- CUTOFF apply manure; broadcast without incorporation: 1.57175e-5 ha; = p1248
- CUTOFF apply sulfuric acid; unspecified method: 0.000397722 ha; = p1177
- CUTOFF prepare soil; for ridge till, soybeans: 3.93801e-5 ha; = p0938
- CUTOFF phosphatic fertilizer, diammonium phosphate; at point-of-sale: 0.00427943 kg; = p1119
- CUTOFF soya seeds; nonGMO herbicide resistant seed; at point-of-sale: 0.00590371 kg; = p0971
- CUTOFF domestic barge transport; average fuel: 0.00438076 metric ton*km; = p2007
- CUTOFF nitrogenous fertilizer, urea; at point-of-sale: 0.000911082 kg; = p1070
- CUTOFF international vessel transport; average fuel: 0.0432109 metric ton*km; = p2006
- CUTOFF planting; for no-till, soybeans: 6.70593e-5 ha; = p0954
- CUTOFF apply sulfur; unspecified method: 0.000397722 ha; = p1171
- CUTOFF apply sewage sludge; unspecified method: 0.000397722 ha; = p1189
- CUTOFF pesticide, Imazethapyr; at point-of-sale; kg AI: 5.36861e-6 kg; = p1864
- CUTOFF prepare soil; for reduced till, soybeans; 15-30% residue: 0.000109393 ha; = p0937
- soybean residue; at harvest in 2000; at farm; 88%-94% moisture: 0.780691 kg; = p0839
- CUTOFF apply gypsum; unspecified method: 0.000397722 ha; = p1165
- CUTOFF prepare soil; for no-till, soybeans: 6.70593e-5 ha; = p0936
- CUTOFF irrigate; pressure, groundwater source, in 2000: 2.73379e-5 ha-m; = p0993
- CUTOFF pesticide, Flumetsulam; at point-of-sale; kg AI: 4.7934e-7 kg; = p1842
- CUTOFF pesticide, Trifluralin; at point-of-sale; kg AI: 4.71671e-5 kg; = p1955
- CUTOFF limestone, high-grade, pulverized; at point-of-sale: 0.0646266 kg; = p1228
- CUTOFF pesticide formulation balance; at point-of-sale: 0.000268814 kg; = p1963
- CUTOFF apply pesticide; unspecified application methods: 0.000180054 ha; = p1345
- CUTOFF phosphatic fertilizer, monoammonium phosphate; at point-of-sale: 0.00195649 kg; = p1120
- CUTOFF apply manure; unspec. method: 8.52146e-6 ha; = p1251
- CUTOFF gypsum; at point-of-sale: 1.92035e-6 kg; = p1166
- CUTOFF nitrogenous fertilizer, anhydrous ammonia; at point-of-sale: 0.000862482 kg; = p1064
- CUTOFF fertilizer filler materials; at point-of-sale: 0.00256542 kg; = p1158
- CUTOFF irrigate; unspecified irrigation method, surface water source, in 2000: 3.04457e-6 ha-m; = p1009
- CUTOFF sulfur storage: 1.14595e-7 kg*a; = p1174
- CUTOFF sulfuric acid storage: 3.03812e-8 kg*a; = p1180
- CUTOFF regional or national trucking; class 8, average fuel: 0.0252585 metric ton*km; = p2009
- CUTOFF nitrogenous fertilizer, sodium nitrate; at point-of-sale: 5.17046e-6 kg; = p1069
- CUTOFF irrigate; gravity, groundwater source, in 2000: 1.28642e-5 ha-m; = p0992
- CUTOFF pesticide, Glyphosate-trimesium; at point-of-sale; kg AI: 1.51472e-5 kg; = p1933
- CUTOFF sewage sludge; at point-of-sale: 2.07157e-7 kg; = p1190
- CUTOFF apply pesticide; as foliar or directed spray: 0.000115217 ha; = p1339
- CUTOFF pesticide, Metribuzin; at point-of-sale; kg AI: 1.12166e-5 kg; = p1890
- CUTOFF apply pesticide; broadcast with incorporation: 0.000421475 ha; = p1333
- CUTOFF dolomite, pulverized; at point-of-sale: 0.003769 kg; = p1229
- CUTOFF phosphatic fertilizer, superphos. grades 22% and under; at point-of-sale: 1.5156e-5 kg; = p1116
- CUTOFF K fertilizer appl svc; unspec rate, 2000 soybeans: 0.000397722 ha; = p1122
- CUTOFF local area trucking; class 6, average fuel: 0.000328557 metric ton*km; = p2010
- CUTOFF zinc compounds; at point-of-sale: 6.65428e-8 kg; = p1184
- CUTOFF apply N fertilizer; broadcast with incorporation: 2.31952e-5 ha; = p1031
- CUTOFF seed storage; soybeans: 0.0145591 kg*a; = p0975

## Inputs from nature
- Carbon dioxide: 4.19212 kg; = p0900*3.6666666667
- Transformation, from annual crop [natural resource, land]: 3.97722 m2; = 1.0 * (p0883+p0873+p0871+p0879)
- Water, surface: 30.4457 kg; = p0889
- Phosphorus: 0.0105884 kg; = p0910
- Potassium; from plant uptake; biogenic: 0.0289793 kg; = p0915
- Occupation, annual crop [natural resource, land]: 1.48367 m2*year; = 1.0 * (p0855)
- Water, ground: 402.021 kg; = p0887
- Nitrogen: 0.0983707 kg; = p0905
- Water, unspecified origin: 0.000429248 m3; = p0893*0.001+p0916*0.001
- Transformation, to annual crop [natural resource, land]: 3.97722 m2; = 1.0 * (p0857)
- Dry matter except CNPK; from plant uptake: 1.32164 kg; = p0917

## Emissions to nature
- Diammonium phosphate; broadcast w/ incorp. in fert. at plant.: 0.000222771 kg; = p2728*4.7142857143
- Other single phosphates; unspec. appl. method in fert. in spr. bef. plant.; kg P: 5.93154e-7 kg; = p3090
- Nonvolatile constituents; broadcast w/o incorp. in man. at unknown time; exc.CNPK,biogenic: 0.000849453 kg; = p3417
- Sodium nitrate; unspec. appl. method in fert. at plant.: 1.0788e-8 kg; = p3110*6.0714285714
- Sodium nitrate; broadcast w/ incorp. in fert. at plant.: 1.55623e-7 kg; = p2720*6.0714285714
- Filler materials, applied with synthetic fertilizer: 0.00256542 kg; = p2432
- Aqueous ammonia; no broadcast in fert. at plant.: 1.60136e-6 kg; = p2513*1.2142857143
- Aqueous ammonia; broadcast w/o incorp. in fert. in fall bef. plant.: 7.02739e-7 kg; = p2825*1.2142857143
- Ammonium nitrate; no broadcast in fert. at plant.: 4.66217e-5 kg; = p2515*4.7142857143
- Other single phosphates; broadcast w/o incorp. in fert. in fall bef. plant.; kg P: 3.72911e-6 kg; = p2856
- Pentane [air, non-urban air or from high stacks]: 3.79616e-8 kg; = 1.0 * (p2152*1.0166666667)
- cis-2-Butene: 7.70813e-8 kg; = p2149*1.1666666667
- Superphosphate, grades>22%; no broadcast in fert. at plant.; kg P: 4.34803e-6 kg; = p2542
- Calcium [soil, agricultural]: 0.025171 kg; = 1.0 * (p3226+p3218)
- Nitrogen solution; unspec. appl. method in fert. in spr. bef. plant.; unspec. appl. method in fert. in spr. bef. plan...: 5.43319e-6 kg; = p3068
- Isoprene [air, non-urban air or from high stacks]: 6.77086e-7 kg; = 1.0 * (p2145*1.1333333333)
- Monoammonium phosphate; no broadcast in fert. at plant.: 8.07753e-5 kg; = p2537*8.2142857143
- Carbon monoxide, fossil [air, non-urban air or from high stacks]: 0.000123609 kg; = 1.0 * (p2028*2.3333333333)
- Anhydrous ammonia; no broadcast in fert. at plant.: 7.6975e-5 kg; = p2511*1.2142857143
- Oxygen; applied in dolomite: 0.00189183 kg; = p3228
- Superphosphate, grades>22%; no broadcast in fert. in fall bef. plant.; kg P: 6.81975e-6 kg; = p2464
- Aqueous ammonia; unspec. appl. method in fert. at plant.: 3.83729e-8 kg; = p3098*1.2142857143
- Magnesium [soil, agricultural]: 0.000478052 kg; = 1.0 * (p3227)
- Plant dry matter; in aboveground residue left on field: 0.369109 kg; = p2172
- Sodium nitrate; broadcast w/o incorp. in fert. in fall bef. plant.: 1.97565e-7 kg; = p2837*6.0714285714
- Other single phosphates; broadcast w/ incorp. in fert. at plant.; kg P: 2.86914e-6 kg; = p2739
- isobutene: 2.09733e-7 kg; = p2150*1.1666666667
- Sodium nitrate; unspec. appl. method in fert. in spr. bef. plant.: 4.50573e-8 kg; = p3071*6.0714285714
- Anhydrous ammonia; broadcast w/ incorp. in fert. in fall bef. plant.: 2.70254e-5 kg; = p2628*1.2142857143
- Anhydrous ammonia; broadcast w/ incorp. in fert. in spr. bef. plant.: 0.000111133 kg; = p2667*1.2142857143
- Monoammonium phosphate; broadcast w/o incorp. in fert. in spr. bef. plant.: 0.000321103 kg; = p2888*8.2142857143
- Nitrogen solution; broadcast w/o incorp. in fert. at plant.; broadcast w/o incorp. in fert. at plant.; kg N: 2.34556e-5 kg; = p2912
- Furan [air, non-urban air or from high stacks]: 1.96289e-7 kg; = 1.0 * (p2138*1.4166666667)
- Aqueous ammonia; no broadcast in fert. in spr. bef. plant.: 6.68828e-6 kg; = p2474*1.2142857143
- Superphosphate, grades>22%; broadcast w/o incorp. in fert. at plant.; kg P: 4.35771e-6 kg; = p2932
- Other single phosphates; broadcast w/ incorp. in fert. in spr. bef. plant.; kg P: 1.13802e-5 kg; = p2700
- Superphosphate, grades<= 22%; broadcast w/ incorp. in fert. in fall bef. plant.; kg P: 1.17266e-7 kg; = p2657
- Sodium nitrate; broadcast w/o incorp. in fert. at plant.: 1.94516e-7 kg; = p2915*6.0714285714
- Pesticides, unspecified [soil, agricultural]: 3.68587e-5 kg; = 1.0 * (p3689+p5337+p4719+p4101)
- Butane [air, non-urban air or from high stacks]: 1.09016e-7 kg; = 1.0 * (p2147*1.0208333333)
- Ammonium sulfate; no broadcast in fert. in spr. bef. plant.: 8.06219e-5 kg; = p2479*4.7142857143
- Superphosphate, grades>22%; unspec. appl. method in fert. in fall bef. plant.; kg P: 4.29905e-7 kg; = p3049
- Alachlor [soil, agricultural]: 3.65257e-5 kg; = 1.0 * (p3910+p4528+p3498+p5146)
- Nitrogen; applied in sewage sludge: 9.68914e-9 kg; = p3240
- Nitrogen solution; broadcast w/ incorp. in fert. in fall bef. plant.; broadcast w/ incorp. in fert. in fall bef. plan...: 1.90597e-5 kg; = p2639
- Carbon [soil, agricultural]: 0.471852 kg; = 1.0 * (p3225+p2167+p3217+p3469+p3242+p2173+p3412)
- Ammonium sulfate; broadcast w/o incorp. in fert. in spr. bef. plant.: 3.4834e-5 kg; = p2869*4.7142857143
- Water [air, non-urban air or from high stacks]: 2.07384e-7 m3; = 0.001 * (p2016)
- Other single phosphates; no broadcast in fert. in fall bef. plant.; kg P: 3.72083e-6 kg; = p2466
- cyclopentane: 2.96801e-9 kg; = p2153*1.0166666667
- Urea; no broadcast in fert. in spr. bef. plant.: 0.000332664 kg; = p2490*5
- Aqueous ammonia; broadcast w/ incorp. in fert. in fall bef. plant.: 5.62227e-7 kg; = p2630*1.2142857143
- Superphosphate, grades<= 22%; unspec. appl. method in fert. in spr. bef. plant.; kg P: 1.54565e-8 kg; = p3086
- Phosphorous; applied in sewage sludge: 1.15665e-9 kg; = p3241
- Pesticide formulation balance; broadcast with incorporation: 0.00014231 kg; = p4102
- Nitrogen dioxide: 5.67231e-6 kg; = p2039*3.2857142857
- Diammonium phosphate; no broadcast in fert. in spr. bef. plant.: 0.000730586 kg; = p2494*4.7142857143
- Superphosphate, grades<= 22%; broadcast w/o incorp. in fert. in spr. bef. plant.; kg P: 2.45738e-7 kg; = p2891
- Other single phosphates; no broadcast in fert. at plant.; kg P: 2.37226e-6 kg; = p2544
- Anhydrous ammonia; broadcast w/o incorp. in fert. in fall bef. plant.: 3.37796e-5 kg; = p2823*1.2142857143
- Phosphorous; in below-ground residue: 0.00080889 kg; = p2175
- Pesticide formulation balance; banded or side-dressed: 2.68061e-5 kg; = p3690
- Nitrogen; using unspec. method in manure at an unknown time: 0.000347476 kg; = p3470
- Sodium nitrate; no broadcast in fert. in fall bef. plant.: 4.57255e-7 kg; = p2447*6.0714285714
- Superphosphate, grades>22%; broadcast w/o incorp. in fert. in fall bef. plant.; kg P: 6.83493e-6 kg; = p2854
- Dioxins and furans (PCDD/F); from residue burning: 5.38317e-14 kg TEQ; = p2047
- isopentane: 3.03693e-8 kg; = p2151*1.0166666667
- Sodium nitrate; broadcast w/ incorp. in fert. in fall bef. plant.: 1.58062e-7 kg; = p2642*6.0714285714
- Propanenitrile: 1.14979e-7 kg; = p2157*1.5277777778
- Metolachlor [soil, agricultural]: 1.02579e-5 kg; = 1.0 * (p4032+p5268+p4650+p3620)
- Particulates, < 2.5 um [air, non-urban air or from high stacks]: 1.11073e-5 kg; = 1.0 * (p2033+p2035)
- Ammonium nitrate; broadcast w/ incorp. in fert. at plant.: 1.6116e-5 kg; = p2710*4.7142857143
- Ammonia [air, non-urban air or from high stacks]: 3.89398e-6 kg; = 1.0 * (p2159*1.2142857143)
- Monoammonium phosphate; broadcast w/o incorp. in fert. in fall bef. plant.: 0.000126976 kg; = p2849*8.2142857143
- Ammonium sulfate; no broadcast in fert. at plant.: 1.93031e-5 kg; = p2518*4.7142857143
- Diammonium phosphate; broadcast w/ incorp. in fert. in spr. bef. plant.: 0.000883607 kg; = p2689*4.7142857143
- Particulates, < 10 um: 1.59162e-5 kg; = p2036+p2034
- Gypsum: 1.92035e-6 kg; = p3229
- Acetone [air, non-urban air or from high stacks]: 8.00765e-7 kg; = 1.0 * (p2139*1.6111111111)
- Cloransulam-methyl [soil, agricultural]: 2.87604e-7 kg; = 1.0 * (p4560+p3942+p5178+p3530)
- Nitrogen solution; broadcast w/ incorp. in fert. at plant.; broadcast w/ incorp. in fert. at plant.; kg N: 1.87656e-5 kg; = p2717
- Sulfuric acid [soil, agricultural]: 6.07624e-8 kg; = 1.0 * (p3231)
- Nitrogen solution; unspec. appl. method in fert. in fall bef. plant.; unspec. appl. method in fert. in fall bef. plan...: 1.32125e-6 kg; = p3029
- Aqueous ammonia; broadcast w/ incorp. in fert. in spr. bef. plant.: 2.31197e-6 kg; = p2669*1.2142857143
- Diammonium phosphate; unspec. appl. method in fert. in fall bef. plant.: 1.82118e-5 kg; = p3040*4.7142857143
- Ammonium nitrate; unspec. appl. method in fert. at plant.: 1.11718e-6 kg; = p3100*4.7142857143
- Ammonium nitrate; unspec. appl. method in fert. in fall bef. plant.: 1.13469e-6 kg; = p3022*4.7142857143
- Ammonium nitrate; broadcast w/ incorp. in fert. in fall bef. plant.: 1.63686e-5 kg; = p2632*4.7142857143
- Superphosphate, grades<= 22%; no broadcast in fert. in fall bef. plant.; kg P: 9.69578e-8 kg; = p2462
- Anhydrous ammonia; unspec. appl. method in fert. in fall bef. plant.: 1.87344e-6 kg; = p3018*1.2142857143
- Formaldehyde [air, non-urban air or from high stacks]: 3.73032e-6 kg; = 1.0 * (p2128*2.5)
- Superphosphate, grades>22%; broadcast w/ incorp. in fert. at plant.; kg P: 5.25872e-6 kg; = p2737
- Ammonium sulfate; unspec. appl. method in fert. at plant.: 4.62555e-7 kg; = p3103*4.7142857143
- Nitrogen solution; no broadcast in fert. in fall bef. plant.; no broadcast in fert. in fall bef. plant.; kg N: 5.51377e-5 kg; = p2444
- Superphosphate, grades>22%; unspec. appl. method in fert. at plant.; kg P: 2.74092e-7 kg; = p3127
- Sodium nitrate; no broadcast in fert. in spr. bef. plant.: 1.88031e-6 kg; = p2486*6.0714285714
- Potassium; broadcast w/o incorp. in manure at an unknown time: 0.000707166 kg; = p3415
- Trifluralin [soil, agricultural]: 4.71671e-5 kg; = 1.0 * (p4098+p4716+p5334+p3686)
- Ammonium sulfate; unspec. appl. method in fert. in fall bef. plant.: 4.69804e-7 kg; = p3025*4.7142857143
- Carbon dioxide, in air: 0.00232677 kg; = p2163*3.6666666667
- Ammonium sulfate; broadcast w/o incorp. in fert. in fall bef. plant.: 8.47096e-6 kg; = p2830*4.7142857143
- Volatile constituents; using unspec. method in man. at unknown time: 0.0028773 kg; = p3473
- Toluene [air, non-urban air or from high stacks]: 3.41781e-7 kg; = 1.0 * (p2141*1.0952380952)
- Phosphorous; using unspec. method in manure at an unknown time: 9.09772e-5 kg; = p3471
- Benzene [air, non-urban air or from high stacks]: 2.75343e-7 kg; = 1.0 * (p2140*1.0833333333)
- Chlorimuron-ethyl [soil, agricultural]: 9.58681e-8 kg; = 1.0 * (p5170+p3934+p4552+p3522)
- trans-2-Butene: 1.02177e-7 kg; = p2148*1.1666666667
- Nitrogen solution; no broadcast in fert. in spr. bef. plant.; no broadcast in fert. in spr. bef. plant.; kg N: 0.000226736 kg; = p2483
- Diammonium phosphate; unspec. appl. method in fert. at plant.: 1.16112e-5 kg; = p3118*4.7142857143
- Superphosphate, grades>22%; broadcast w/o incorp. in fert. in spr. bef. plant.; kg P: 1.72845e-5 kg; = p2893
- Superphosphate, grades<= 22%; no broadcast in fert. at plant.; kg P: 6.18168e-8 kg; = p2540
- Ammonium sulfate; broadcast w/o incorp. in fert. at plant.: 8.34025e-6 kg; = p2908*4.7142857143
- Hydrocyanic acid: 5.11905e-7 kg; = p2154*2.25
- Zinc compounds: 6.65428e-8 kg; = p3232
- Aqueous ammonia; no broadcast in fert. in fall bef. plant.: 1.62646e-6 kg; = p2435*1.2142857143
- Sulfur [soil, agricultural]: 2.2919e-7 kg; = 1.0 * (p3230)
- Anhydrous ammonia; unspec. appl. method in fert. in spr. bef. plant.: 7.70388e-6 kg; = p3057*1.2142857143
- Ammonium sulfate; broadcast w/ incorp. in fert. at plant.: 6.67262e-6 kg; = p2713*4.7142857143
- Ethyne [air, non-urban air or from high stacks]: 4.88443e-7 kg; = 1.0 * (p2132*1.0833333333)
- Anhydrous ammonia; broadcast w/ incorp. in fert. at plant.: 2.66083e-5 kg; = p2706*1.2142857143
- Phenol [air, non-urban air or from high stacks]: 9.30701e-7 kg; = 1.0 * (p2133*1.3055555556)
- Acetic acid [air, non-urban air or from high stacks]: 1.00393e-5 kg; = 1.0 * (p2127*2.5)
- Superphosphate, grades>22%; no broadcast in fert. in spr. bef. plant.; kg P: 1.72461e-5 kg; = p2503
- Ethene [air, non-urban air or from high stacks]: 2.61085e-6 kg; = 1.0 * (p2125*1.1666666667)
- Sulfur dioxide [air, non-urban air or from high stacks]: 2.79925e-6 kg; = 1.0 * (p2041)
- Diammonium phosphate; broadcast w/o incorp. in fert. at plant.: 0.000184602 kg; = p2923*4.7142857143
- Other single phosphates; unspec. appl. method in fert. in fall bef. plant.; kg P: 2.34554e-7 kg; = p3051
- Urea; no broadcast in fert. in fall bef. plant.: 8.08975e-5 kg; = p2451*5
- Phosphorous; broadcast w/o incorp. in manure at an unknown time: 0.000167804 kg; = p3414
- Diammonium phosphate; no broadcast in fert. at plant.: 0.000184192 kg; = p2533*4.7142857143
- Sewage sludge dry matter; applied in sewage sludge: 1.07268e-9 kg; = p3243
- Other limestone constituents; applied in limestone: 0.0038776 kg; = p3220
- Other single phosphates; broadcast w/o incorp. in fert. in spr. bef. plant.; kg P: 9.43037e-6 kg; = p2895
- Glycolaldehyde; from residue burning: 3.61521e-6 kg; = p2135*2.5
- Sulfosate [soil, agricultural]: 1.51472e-5 kg; = 1.0 * (p5312+p3664+p4076+p4694)
- Ammonium nitrate; broadcast w/o incorp. in fert. at plant.: 2.01437e-5 kg; = p2905*4.7142857143
- Ethane [air, non-urban air or from high stacks]: 1.6306e-6 kg; = 1.0 * (p2126*1.25)
- Methane: 5.6424e-6 kg; = p2025*1.3333333333
- Superphosphate, grades<= 22%; broadcast w/ incorp. in fert. in spr. bef. plant.; kg P: 2.96548e-7 kg; = p2696
- Ammonium sulfate; no broadcast in fert. in fall bef. plant.: 1.96057e-5 kg; = p2440*4.7142857143
- Volatile constituents; broadcast w/o incorp. in man. at unknown time: 0.00530707 kg; = p3416
- Propene [air, non-urban air or from high stacks]: 1.21305e-6 kg; = 1.0 * (p2136*1.1666666667)
- Diammonium phosphate; no broadcast in fert. in fall bef. plant.: 0.0002889 kg; = p2455*4.7142857143
- Ammonium nitrate; unspec. appl. method in fert. in spr. bef. plant.: 4.66604e-6 kg; = p3061*4.7142857143
- Monoammonium phosphate; broadcast w/ incorp. in fert. at plant.: 9.76938e-5 kg; = p2732*8.2142857143
- Acetaldehyde [air, non-urban air or from high stacks]: 2.23176e-6 kg; = 1.0 * (p2130*1.8333333333)
- Propane [air, non-urban air or from high stacks]: 5.05371e-7 kg; = 1.0 * (p2142*1.2222222222)
- Potassium; in below-ground residue; biogenic: 0.00269353 kg; = p2176
- Monoammonium phosphate; broadcast w/ incorp. in fert. in spr. bef. plant.: 0.000387495 kg; = p2693*8.2142857143
- Diammonium phosphate; broadcast w/o incorp. in fert. in fall bef. plant.: 0.000289543 kg; = p2845*4.7142857143
- Pesticide formulation balance; foliar or directed spray: 3.89028e-5 kg; = p4720
- Urea; unspec. appl. method in fert. in spr. bef. plant.: 7.97152e-6 kg; = p3075*5
- Ammonium nitrate; broadcast w/o incorp. in fert. in fall bef. plant.: 2.04594e-5 kg; = p2827*4.7142857143
- Anhydrous ammonia; unspec. appl. method in fert. at plant.: 1.84453e-6 kg; = p3096*1.2142857143
- Plant dry matter; from residue burning: 0.000642561 kg; = p2164
- Urea; broadcast w/o incorp. in fert. in spr. bef. plant.: 0.000143733 kg; = p2880*5
- Monoammonium phosphate; unspec. appl. method in fert. at plant.: 5.09194e-6 kg; = p3122*8.2142857143
- Monoammonium phosphate; no broadcast in fert. in fall bef. plant.: 0.000126694 kg; = p2459*8.2142857143
- Aqueous ammonia; unspec. appl. method in fert. in fall bef. plant.: 3.89743e-8 kg; = p3020*1.2142857143
- Other single phosphates; no broadcast in fert. in spr. bef. plant.; kg P: 9.40942e-6 kg; = p2505
- Nitrogen solution; unspec. appl. method in fert. at plant.; unspec. appl. method in fert. at plant.; kg N: 1.30086e-6 kg; = p3107
- Flumetsulam [soil, agricultural]: 4.7934e-7 kg; = 1.0 * (p3985+p3573+p5221+p4603)
- Superphosphate, grades>22%; unspec. appl. method in fert. in spr. bef. plant.; kg P: 1.08717e-6 kg; = p3088
- Sodium nitrate; unspec. appl. method in fert. in fall bef. plant.: 1.09571e-8 kg; = p3032*6.0714285714
- Nitrogen; broadcast w/o incorp. in manure at an unknown time: 0.000640907 kg; = p3413
- Anhydrous ammonia; broadcast w/o incorp. in fert. in spr. bef. plant.: 0.000138907 kg; = p2862*1.2142857143
- Pesticide formulation balance; unspec. appl. method: 6.0795e-5 kg; = p5338
- Monoammonium phosphate; unspec. appl. method in fert. in spr. bef. plant.: 2.01968e-5 kg; = p3083*8.2142857143
- Monoammonium phosphate; broadcast w/o incorp. in fert. at plant.: 8.09552e-5 kg; = p2927*8.2142857143
- Urea; broadcast w/ incorp. in fert. in fall bef. plant.: 2.79642e-5 kg; = p2646*5
- Water: 432.845 kg; = p3418+p2171+p2178+p2181+p3475
- Ammonium nitrate; broadcast w/ incorp. in fert. in spr. bef. plant.: 6.73103e-5 kg; = p2671*4.7142857143
- Other single phosphates; unspec. appl. method in fert. at plant.; kg P: 1.49543e-7 kg; = p3129
- Superphosphate, grades<= 22%; broadcast w/o incorp. in fert. in fall bef. plant.; kg P: 9.71737e-8 kg; = p2852
- Monoammonium phosphate; unspec. appl. method in fert. in fall bef. plant.: 7.98655e-6 kg; = p3044*8.2142857143
- I butane; from residue burning: 3.78528e-8 kg; = p2146*1.0208333333
- Nitrogen; in below-ground residue: 0.00700667 kg; = p2174
- Metribuzin [soil, agricultural]: 1.12166e-5 kg; = 1.0 * (p3621+p5269+p4033+p4651)
- Nitrogen solution; broadcast w/o incorp. in fert. in fall bef. plant.; broadcast w/o incorp. in fert. in fall bef. pl...: 2.38232e-5 kg; = p2834
- Ammonium sulfate; broadcast w/ incorp. in fert. in spr. bef. plant.: 2.7869e-5 kg; = p2674*4.7142857143
- Urea; no broadcast in fert. at plant.: 7.96492e-5 kg; = p2529*5
- Nitrogen solution; broadcast w/ incorp. in fert. in spr. bef. plant.; broadcast w/ incorp. in fert. in spr. bef. plan...: 7.83769e-5 kg; = p2678
- Sodium nitrate; no broadcast in fert. at plant.: 4.50199e-7 kg; = p2525*6.0714285714
- Formic acid [air, non-urban air or from high stacks]: 1.79802e-6 kg; = 1.0 * (p2131*3.8333333333)
- Urea; broadcast w/o incorp. in fert. in fall bef. plant.: 3.49531e-5 kg; = p2841*5
- Methanol [air, non-urban air or from high stacks]: 5.8974e-6 kg; = 1.0 * (p2129*2.6666666667)
- Superphosphate, grades>22%; broadcast w/ incorp. in fert. in spr. bef. plant.; kg P: 2.08583e-5 kg; = p2698
- Urea; unspec. appl. method in fert. at plant.: 1.90861e-6 kg; = p3114*5
- Nonvolatile constituents; using unspec. method in man. at unknown time; exc.CNPK,biogenic: 0.000460542 kg; = p3474
- Monoammonium phosphate; no broadcast in fert. in spr. bef. plant.: 0.00032039 kg; = p2498*8.2142857143
- 1-Butene: 2.40207e-7 kg; = p2144*1.1666666667
- Pendimethalin [soil, agricultural]: 0.000101716 kg; = 1.0 * (p4664+p4046+p5282+p3634)
- Acetol; from residue burning: 6.75632e-6 kg; = p2134*2.0555555556
- Nitrogen solution; broadcast w/o incorp. in fert. in spr. bef. plant.; broadcast w/o incorp. in fert. in spr. bef. pl...: 9.79649e-5 kg; = p2873
- Anhydrous ammonia; no broadcast in fert. in spr. bef. plant.: 0.000321495 kg; = p2472*1.2142857143
- Ammonium nitrate; broadcast w/o incorp. in fert. in spr. bef. plant.: 8.41326e-5 kg; = p2866*4.7142857143
- Glyphosate [soil, agricultural]: 0.000292302 kg; = 1.0 * (p3998+p3586+p5234+p4616)
- Aqueous ammonia; broadcast w/o incorp. in fert. in spr. bef. plant.: 2.88978e-6 kg; = p2864*1.2142857143
- Potassium; in above-ground residue left on field; biogenic: 0.0072306 kg; = p2170
- Ammonium sulfate; broadcast w/ incorp. in fert. in fall bef. plant.: 6.77719e-6 kg; = p2635*4.7142857143
- Monoammonium phosphate; broadcast w/ incorp. in fert. in fall bef. plant.: 0.00015323 kg; = p2654*8.2142857143
- Other single phosphates; broadcast w/ incorp. in fert. in fall bef. plant.; kg P: 4.50016e-6 kg; = p2661
- Acetonitrile [air, non-urban air or from high stacks]: 3.76681e-7 kg; = 1.0 * (p2155*1.7083333333)
- Ammonium nitrate; no broadcast in fert. in spr. bef. plant.: 0.000194721 kg; = p2476*4.7142857143
- Nitrogen; in above-ground residue left on field: 0.018809 kg; = p2168
- Diammonium phosphate; unspec. appl. method in fert. in spr. bef. plant.: 4.60549e-5 kg; = p3079*4.7142857143
- Methyl vinyl ether; from residue burning: 1.36098e-7 kg; = p2137*1.6111111111
- Urea; broadcast w/ incorp. in fert. at plant.: 2.75327e-5 kg; = p2724*5
- Dinitrogen monoxide [air, non-urban air or from high stacks]: 1.25631e-7 kg; = 1.0 * (p2044*1.5714285714)
- Seeds; used in planting and sowing: 0.0291182 kg; = p2179
- Potassium; using unspec. method in manure at an unknown time: 0.000383399 kg; = p3472
- Aqueous ammonia; unspec. appl. method in fert. in spr. bef. plant.: 1.60269e-7 kg; = p3059*1.2142857143
- Sodium nitrate; broadcast w/o incorp. in fert. in spr. bef. plant.: 8.1242e-7 kg; = p2876*6.0714285714
- Urea; unspec. appl. method in fert. in fall bef. plant.: 1.93852e-6 kg; = p3036*5
- Sodium nitrate; broadcast w/ incorp. in fert. in spr. bef. plant.: 6.49976e-7 kg; = p2681*6.0714285714
- Ammonium nitrate; no broadcast in fert. in fall bef. plant.: 4.73524e-5 kg; = p2437*4.7142857143
- Phosphorous; in above-ground residue left on field: 0.00217141 kg; = p2169
- Ammonium sulfate; unspec. appl. method in fert. in spr. bef. plant.: 1.93192e-6 kg; = p3064*4.7142857143
- NMVOC, non-methane volatile organic compounds, unspecified origin [air, non-urban air or from high stacks]: 4.61054e-5 kg; = 1.0 * (p2051+p2052)
- Ash: 0.000354931 kg; = p2021+p2022
- Superphosphate, grades<= 22%; unspec. appl. method in fert. at plant.; kg P: 3.89683e-9 kg; = p3125
- Superphosphate, grades<= 22%; broadcast w/o incorp. in fert. at plant.; kg P: 6.19545e-8 kg; = p2930
- Imazethapyr [soil, agricultural]: 5.36861e-6 kg; = 1.0 * (p4625+p3595+p5243+p4007)
- Nitrogen solution; no broadcast in fert. at plant.; no broadcast in fert. at plant.; kg N: 5.42869e-5 kg; = p2522
- Anhydrous ammonia; no broadcast in fert. in fall bef. plant.: 7.81814e-5 kg; = p2433*1.2142857143
- Other single phosphates; broadcast w/o incorp. in fert. at plant.; kg P: 2.37755e-6 kg; = p2934
- Urea; broadcast w/o incorp. in fert. at plant.: 3.44138e-5 kg; = p2919*5
- Superphosphate, grades<= 22%; no broadcast in fert. in spr. bef. plant.; kg P: 2.45192e-7 kg; = p2501
- Aqueous ammonia; broadcast w/o incorp. in fert. at plant.: 6.91895e-7 kg; = p2903*1.2142857143
- Plant dry matter; in below-ground residue: 0.1375 kg; = p2177
- Diammonium phosphate; broadcast w/o incorp. in fert. in spr. bef. plant.: 0.000732212 kg; = p2884*4.7142857143
- Diammonium phosphate; broadcast w/ incorp. in fert. in fall bef. plant.: 0.00034941 kg; = p2650*4.7142857143
- Oxygen; applied in limestone: 0.0291331 kg; = p3219
- Superphosphate, grades<= 22%; unspec. appl. method in fert. in fall bef. plant.; kg P: 6.11206e-9 kg; = p3047
- Urea; broadcast w/ incorp. in fert. in spr. bef. plant.: 0.000114994 kg; = p2685*5
- Superphosphate, grades>22%; broadcast w/ incorp. in fert. in fall bef. plant.; kg P: 8.24815e-6 kg; = p2659
- Superphosphate, grades<= 22%; broadcast w/ incorp. in fert. at plant.; kg P: 7.47644e-8 kg; = p2735
- Anhydrous ammonia; broadcast w/o incorp. in fert. at plant.: 3.32583e-5 kg; = p2901*1.2142857143
- Acrylonitrile: 6.01475e-8 kg; = p2156*1.4722222222
- Aqueous ammonia; broadcast w/ incorp. in fert. at plant.: 5.53551e-7 kg; = p2708*1.2142857143
- Butadiene [air, non-urban air or from high stacks]: 2.70741e-7 kg; = 1.0 * (p2143*1.125)

## Sampling procedure
A delete-a-group jackknife is used by the USDA to estimate the ARMS sample means and RSEs, based on a 15 sample delete-a-group jackknife. Because of this relatively small sample size, a Students t distribution is used to represent ARMS data probability density functions. Other representations of uncertainty are described in Cooper, J.S., Kahn, E., Noon, M. (2012). LCA Digital Commons Unit Process Data: field crop production Version 1. Prepared for the US Department of Agriculture National Agricultural Library. Retrieved from https://www.lcacommons.gov/discovery/docs/LCA%20Digital%20Commons%20Unit%20Process%20Data%20final%20updated.pdf

## Extrapolations
Data represent an aggregation of processes applied in Nebraska in 2000. Data development is demonstrated by parameterization (exlicitly presents all raw and uncertainty data and all calculations). Flow data quality according to the LCADC convention is provided for all flows.
