# cotton lint; at harvest in 1998; at farm; 90%-93% moisture

Dataset: EcoSpold 2, unit process
Geography: GLO
Time period: 1998-01-02 to 1999-01-01
Scenario: Business-as-Usual
System model: Allocation, ecoinvent default
Generated by: cooperjs@u.washington.edu
isCopyrightProtected: false

## General comment
This unit process/ gate-to-gate dataset represents the production of 1 kg cotton coproduced with cottonseed and residue. The process technologies are an aggregation of those applied in Louisiana in 1998. Applicable classifications include ISIC 0116, NAIC 111920, UNSPSC 11121802; this dataset was prepared in ILCD format using the UWDFE Lab Excel to ILCD File Generator (beta version, August 2013)

Exchange "S,S,S-tributyl phosphorotrithioate-soil agricultural" is the result of combining the following original LCA Commons flows: "Tribufos; broadcast without incorporation; kg AI", "Tribufos; foliar or directed spray; kg AI", "Tribufos; banded or side-dressed; kg AI", "Tribufos; broadcast with incorporation; kg AI", "Tribufos; unspec. appl. method; kg AI", "Tribufos; in seed furrow; kg AI".
Exchange "Cyanazine-soil agricultural" is the result of combining the following original LCA Commons flows: "Cyanazine; broadcast without incorporation; kg AI", "Cyanazine; in seed furrow; kg AI", "Cyanazine; unspec. appl. method; kg AI", "Cyanazine; foliar or directed spray; kg AI", "Cyanazine; banded or side-dressed; kg AI", "Cyanazine; broadcast with incorporation; kg AI".
Exchange "Metalaxil-soil agricultural" is the result of combining the following original LCA Commons flows: "Metalaxyl; in seed furrow; kg AI", "Metalaxyl; broadcast with incorporation; kg AI", "Metalaxyl; broadcast without incorporation; kg AI", "Metalaxyl; unspec. appl. method; kg AI", "Metalaxyl; foliar or directed spray; kg AI", "Metalaxyl; banded or side-dressed; kg AI".
Exchange "Dimethipin-soil agricultural" is the result of combining the following original LCA Commons flows: "Dimethipin; broadcast without incorporation; kg AI", "Dimethipin; banded or side-dressed; kg AI", "Dimethipin; unspec. appl. method; kg AI", "Dimethipin; foliar or directed spray; kg AI", "Dimethipin; in seed furrow; kg AI", "Dimethipin; broadcast with incorporation; kg AI".
Exchange "Ethephon-soil agricultural" is the result of combining the following original LCA Commons flows: "Ethephon; unspec. appl. method; kg AI", "Ethephon; broadcast with incorporation; kg AI", "Ethephon; foliar or directed spray; kg AI", "Ethephon; banded or side-dressed; kg AI", "Ethephon; broadcast without incorporation; kg AI", "Ethephon; in seed furrow; kg AI".
Exchange "Parathion-methyl-soil agricultural" is the result of combining the following original LCA Commons flows: "Methyl parathion; banded or side-dressed; kg AI", "Methyl parathion; unspec. appl. method; kg AI", "Methyl parathion; in seed furrow; kg AI", "Methyl parathion; broadcast with incorporation; kg AI", "Methyl parathion; foliar or directed spray; kg AI", "Methyl parathion; broadcast without incorporation; kg AI".
Exchange "Etridiazole-soil agricultural" is the result of combining the following original LCA Commons flows: "Etridiazole; unspec. appl. method; kg AI", "Etridiazole; foliar or directed spray; kg AI", "Etridiazole; broadcast with incorporation; kg AI", "Etridiazole; broadcast without incorporation; kg AI", "Etridiazole; banded or side-dressed; kg AI", "Etridiazole; in seed furrow; kg AI".
Exchange "Imidacloprid-soil agricultural" is the result of combining the following original LCA Commons flows: "Imidacloprid; banded or side-dressed; kg AI", "Imidacloprid; unspec. appl. method; kg AI", "Imidacloprid; broadcast without incorporation; kg AI", "Imidacloprid; broadcast with incorporation; kg AI", "Imidacloprid; foliar or directed spray; kg AI", "Imidacloprid; in seed furrow; kg AI".
Exchange "Sodium chlorate-soil agricultural" is the result of combining the following original LCA Commons flows: "Sodium chlorate; unspec. appl. method; kg AI", "Sodium chlorate; foliar or directed spray; kg AI", "Sodium chlorate; banded or side-dressed; kg AI", "Sodium chlorate; broadcast with incorporation; kg AI", "Sodium chlorate; in seed furrow; kg AI", "Sodium chlorate; broadcast without incorporation; kg AI".
Exchange "Deltamethrin-soil agricultural" is the result of combining the following original LCA Commons flows: "Deltamethrin; broadcast without incorporation; kg AI", "Deltamethrin; broadcast with incorporation; kg AI", "Deltamethrin; banded or side-dressed; kg AI", "Deltamethrin; foliar or directed spray; kg AI", "Deltamethrin; unspec. appl. method; kg AI", "Deltamethrin; in seed furrow; kg AI".
Exchange "Dimethoate-soil agricultural" is the result of combining the following original LCA Commons flows: "Dimethoate; in seed furrow; kg AI", "Dimethoate; foliar or directed spray; kg AI", "Dimethoate; banded or side-dressed; kg AI", "Dimethoate; broadcast with incorporation; kg AI", "Dimethoate; unspec. appl. method; kg AI", "Dimethoate; broadcast without incorporation; kg AI".
Exchange "NMVOC, non-methane volatile organic compounds, unspecified origin-air low population density" is the result of combining the following original LCA Commons flows: "NMVOCs; from residue burning; kg except C, biogenic", "NMVOCs; from residue burning; kg C, biogenic".
Exchange "Thiodicarb-soil agricultural" is the result of combining the following original LCA Commons flows: "Thiodicarb; broadcast with incorporation; kg AI", "Thiodicarb; banded or side-dressed; kg AI", "Thiodicarb; foliar or directed spray; kg AI", "Thiodicarb; broadcast without incorporation; kg AI", "Thiodicarb; in seed furrow; kg AI", "Thiodicarb; unspec. appl. method; kg AI".
Exchange "Glyphosate-soil agricultural" is the result of combining the following original LCA Commons flows: "Glyphosate; broadcast without incorporation; kg AI", "Glyphosate; foliar or directed spray; kg AI", "Glyphosate; banded or side-dressed; kg AI", "Glyphosate; in seed furrow; kg AI", "Glyphosate; broadcast with incorporation; kg AI", "Glyphosate; unspec. appl. method; kg AI".
Exchange "Carbofuran-soil agricultural" is the result of combining the following original LCA Commons flows: "Carbofuran; banded or side-dressed; kg AI", "Carbofuran; unspec. appl. method; kg AI", "Carbofuran; in seed furrow; kg AI", "Carbofuran; broadcast without incorporation; kg AI", "Carbofuran; broadcast with incorporation; kg AI", "Carbofuran; foliar or directed spray; kg AI".
Exchange "Norflurazon-soil agricultural" is the result of combining the following original LCA Commons flows: "Norflurazon; foliar or directed spray; kg AI", "Norflurazon; broadcast without incorporation; kg AI", "Norflurazon; unspec. appl. method; kg AI", "Norflurazon; in seed furrow; kg AI", "Norflurazon; banded or side-dressed; kg AI", "Norflurazon; broadcast with incorporation; kg AI".
Exchange "Mepiquat chloride-soil agricultural" is the result of combining the following original LCA Commons flows: "1,1-Dimethylpiperidinium chloride; banded or side-dressed; kg AI", "1,1-Dimethylpiperidinium chloride; unspec. appl. method; kg AI", "1,1-Dimethylpiperidinium chloride; broadcast with incorporation; kg AI", "1,1-Dimethylpiperidinium chloride; in seed furrow; kg AI", "1,1-Dimethylpiperidinium chloride; broadcast without incorporation; kg AI", "1,1-Dimethylpiperidinium chloride; foliar or directed spray; kg AI".
Exchange "Carbon-soil agricultural" is the result of combining the following original LCA Commons flows: "Carbon; applied in limestone", "Carbon; in below-ground residue; biogenic", "Carbon; in above-ground residue left on field; biogenic", "Carbon; applied in sewage sludge", "Carbon; applied in dolomite".
Exchange "Particulates, < 2.5 um-air low population density" is the result of combining the following original LCA Commons flows: "PM2.5; from residue burning; kg C, biogenic", "PM2.5; from residue burning; kg except C, biogenic".
Exchange "Thidiazuron-soil agricultural" is the result of combining the following original LCA Commons flows: "Thidiazuron; unspec. appl. method; kg AI", "Thidiazuron; banded or side-dressed; kg AI", "Thidiazuron; foliar or directed spray; kg AI", "Thidiazuron; in seed furrow; kg AI", "Thidiazuron; broadcast with incorporation; kg AI", "Thidiazuron; broadcast without incorporation; kg AI".
Exchange "Prometryn-soil agricultural" is the result of combining the following original LCA Commons flows: "Prometryn; unspec. appl. method; kg AI", "Prometryn; broadcast with incorporation; kg AI", "Prometryn; in seed furrow; kg AI", "Prometryn; banded or side-dressed; kg AI", "Prometryn; foliar or directed spray; kg AI", "Prometryn; broadcast without incorporation; kg AI".
Exchange "Clomazone-soil agricultural" is the result of combining the following original LCA Commons flows: "Clomazone; foliar or directed spray; kg AI", "Clomazone; banded or side-dressed; kg AI", "Clomazone; in seed furrow; kg AI", "Clomazone; broadcast without incorporation; kg AI", "Clomazone; broadcast with incorporation; kg AI", "Clomazone; unspec. appl. method; kg AI".
Exchange "Pesticides, unspecified-soil agricultural" is the result of combining the following original LCA Commons flows: "Unspecified pesticide; banded or side-dressed; kg AI", "Unspecified pesticide; broadcast with incorporation; kg AI", "Unspecified pesticide; broadcast without incorporation; kg AI", "Unspecified pesticide; foliar or directed spray; kg AI", "Unspecified pesticide; in seed furrow; kg AI", "Unspecified pesticide; unspec. appl. method; kg AI".
Exchange "Zeta-cypermethrin-soil agricultural" is the result of combining the following original LCA Commons flows: "Zeta-Cypermethrin; foliar or directed spray; kg AI", "Zeta-Cypermethrin; unspec. appl. method; kg AI", "Zeta-Cypermethrin; broadcast without incorporation; kg AI", "Zeta-Cypermethrin; broadcast with incorporation; kg AI", "Zeta-Cypermethrin; in seed furrow; kg AI", "Zeta-Cypermethrin; banded or side-dressed; kg AI".
Exchange "Fluazifop-P-butyl-soil agricultural" is the result of combining the following original LCA Commons flows: "Fluazifop-p-butyl; unspec. appl. method; kg AI", "Fluazifop-p-butyl; broadcast with incorporation; kg AI", "Fluazifop-p-butyl; broadcast without incorporation; kg AI", "Fluazifop-p-butyl; banded or side-dressed; kg AI", "Fluazifop-p-butyl; in seed furrow; kg AI", "Fluazifop-p-butyl; foliar or directed spray; kg AI".
Exchange "Clethodim-soil agricultural" is the result of combining the following original LCA Commons flows: "Clethodim; in seed furrow; kg AI", "Clethodim; unspec. appl. method; kg AI", "Clethodim; foliar or directed spray; kg AI", "Clethodim; broadcast with incorporation; kg AI", "Clethodim; broadcast without incorporation; kg AI", "Clethodim; banded or side-dressed; kg AI".
Exchange "Ash-soil agricultural" is the result of combining the following original LCA Commons flows: "Ash; from residue burning; kg except C, biogenic", "Ash; from residue burning; kg C, biogenic".
Exchange "Trifluralin-soil agricultural" is the result of combining the following original LCA Commons flows: "Trifluralin; unspec. appl. method; kg AI", "Trifluralin; broadcast with incorporation; kg AI", "Trifluralin; banded or side-dressed; kg AI", "Trifluralin; in seed furrow; kg AI", "Trifluralin; broadcast without incorporation; kg AI", "Trifluralin; foliar or directed spray; kg AI".
Exchange "Diuron-soil agricultural" is the result of combining the following original LCA Commons flows: "Diuron; broadcast without incorporation; kg AI", "Diuron; in seed furrow; kg AI", "Diuron; banded or side-dressed; kg AI", "Diuron; unspec. appl. method; kg AI", "Diuron; foliar or directed spray; kg AI", "Diuron; broadcast with incorporation; kg AI".
Exchange "Water-soil agricultural" is the result of combining the following original LCA Commons flows: "Water; in above-ground residue left on field; biogenic", "Water; from irrigation and applied with manure and sewage sludge", "Water; in below-ground residue; biogenic".
Exchange "Dicrotophos-soil agricultural" is the result of combining the following original LCA Commons flows: "Dicrotophos; foliar or directed spray; kg AI", "Dicrotophos; broadcast without incorporation; kg AI", "Dicrotophos; banded or side-dressed; kg AI", "Dicrotophos; unspec. appl. method; kg AI", "Dicrotophos; broadcast with incorporation; kg AI", "Dicrotophos; in seed furrow; kg AI".
Exchange "Quintozene-soil agricultural" is the result of combining the following original LCA Commons flows: "Quintozene; in seed furrow; kg AI", "Quintozene; foliar or directed spray; kg AI", "Quintozene; broadcast without incorporation; kg AI", "Quintozene; banded or side-dressed; kg AI", "Quintozene; unspec. appl. method; kg AI", "Quintozene; broadcast with incorporation; kg AI".
Exchange "Disulfoton-soil agricultural" is the result of combining the following original LCA Commons flows: "Disulfoton; unspec. appl. method; kg AI", "Disulfoton; banded or side-dressed; kg AI", "Disulfoton; broadcast with incorporation; kg AI", "Disulfoton; broadcast without incorporation; kg AI", "Disulfoton; in seed furrow; kg AI", "Disulfoton; foliar or directed spray; kg AI".
Exchange "Pendimethalin-soil agricultural" is the result of combining the following original LCA Commons flows: "Pendimethalin; foliar or directed spray; kg AI", "Pendimethalin; broadcast with incorporation; kg AI", "Pendimethalin; banded or side-dressed; kg AI", "Pendimethalin; unspec. appl. method; kg AI", "Pendimethalin; in seed furrow; kg AI", "Pendimethalin; broadcast without incorporation; kg AI".
Exchange "DSMA-soil agricultural" is the result of combining the following original LCA Commons flows: "Disodium methanearsonate; in seed furrow; kg AI", "Disodium methanearsonate; unspec. appl. method; kg AI", "Disodium methanearsonate; broadcast with incorporation; kg AI", "Disodium methanearsonate; foliar or directed spray; kg AI", "Disodium methanearsonate; broadcast without incorporation; kg AI", "Disodium methanearsonate; banded or side-dressed; kg AI".
Exchange "Oxamyl-soil agricultural" is the result of combining the following original LCA Commons flows: "Oxamyl; unspec. appl. method; kg AI", "Oxamyl; broadcast with incorporation; kg AI", "Oxamyl; foliar or directed spray; kg AI", "Oxamyl; in seed furrow; kg AI", "Oxamyl; banded or side-dressed; kg AI", "Oxamyl; broadcast without incorporation; kg AI".
Exchange "Water, unspecified origin-resource in water" is the result of combining the following original LCA Commons flows: "Water; withdrawal from unspec. source, for cotton, in 1998", "Water; from plant uptake; biogenic".
Exchange "Pyrithiobac sodium salt-soil agricultural" is the result of combining the following original LCA Commons flows: "Pyrithiobac-sodium; in seed furrow; kg AI", "Pyrithiobac-sodium; foliar or directed spray; kg AI", "Pyrithiobac-sodium; unspec. appl. method; kg AI", "Pyrithiobac-sodium; broadcast with incorporation; kg AI", "Pyrithiobac-sodium; banded or side-dressed; kg AI", "Pyrithiobac-sodium; broadcast without incorporation; kg AI".
Exchange "Profenofos-soil agricultural" is the result of combining the following original LCA Commons flows: "Profenofos; unspec. appl. method; kg AI", "Profenofos; foliar or directed spray; kg AI", "Profenofos; banded or side-dressed; kg AI", "Profenofos; broadcast with incorporation; kg AI", "Profenofos; broadcast without incorporation; kg AI", "Profenofos; in seed furrow; kg AI".
Exchange "Acephate-soil agricultural" is the result of combining the following original LCA Commons flows: "Acephate; banded or side-dressed; kg AI", "Acephate; broadcast with incorporation; kg AI", "Acephate; foliar or directed spray; kg AI", "Acephate; in seed furrow; kg AI", "Acephate; broadcast without incorporation; kg AI", "Acephate; unspec. appl. method; kg AI".
Exchange "Metolachlor-soil agricultural" is the result of combining the following original LCA Commons flows: "Propazine; in seed furrow; kg AI", "Propazine; unspec. appl. method; kg AI", "Propazine; foliar or directed spray; kg AI", "Propazine; banded or side-dressed; kg AI", "Propazine; broadcast without incorporation; kg AI", "Propazine; broadcast with incorporation; kg AI".
Exchange "Particulates, < 10 um-air low population density" is the result of combining the following original LCA Commons flows: "PM10; from residue burning; kg C, biogenic", "PM10; from residue burning; kg except C, biogenic".
Exchange "Malathion-soil agricultural" is the result of combining the following original LCA Commons flows: "Malathion ; broadcast without incorporation; kg AI", "Malathion ; broadcast with incorporation; kg AI", "Malathion ; in seed furrow; kg AI", "Malathion ; unspec. appl. method; kg AI", "Malathion ; foliar or directed spray; kg AI", "Malathion ; banded or side-dressed; kg AI".
Exchange "Cyfluthrin-soil agricultural" is the result of combining the following original LCA Commons flows: "Beta-Cyfluthrin; in seed furrow; kg AI", "Beta-Cyfluthrin; broadcast without incorporation; kg AI", "Beta-Cyfluthrin; unspec. appl. method; kg AI", "Beta-Cyfluthrin; broadcast with incorporation; kg AI", "Beta-Cyfluthrin; foliar or directed spray; kg AI", "Beta-Cyfluthrin; banded or side-dressed; kg AI".
Exchange "Bromoxynil-soil agricultural" is the result of combining the following original LCA Commons flows: "Bromoxynil; foliar or directed spray; kg AI", "Bromoxynil; in seed furrow; kg AI", "Bromoxynil; broadcast without incorporation; kg AI", "Bromoxynil; broadcast with incorporation; kg AI", "Bromoxynil; banded or side-dressed; kg AI", "Bromoxynil; unspec. appl. method; kg AI".
Exchange "Cypermethrin-soil agricultural" is the result of combining the following original LCA Commons flows: "Cypermethrin; broadcast with incorporation; kg AI", "Cypermethrin; broadcast without incorporation; kg AI", "Cypermethrin; banded or side-dressed; kg AI", "Cypermethrin; foliar or directed spray; kg AI", "Cypermethrin; in seed furrow; kg AI", "Cypermethrin; unspec. appl. method; kg AI".
Exchange "MSMA-soil agricultural" is the result of combining the following original LCA Commons flows: "MSMA; foliar or directed spray; kg AI", "MSMA; unspec. appl. method; kg AI", "MSMA; banded or side-dressed; kg AI", "MSMA; in seed furrow; kg AI", "MSMA; broadcast with incorporation; kg AI", "MSMA; broadcast without incorporation; kg AI".
Exchange "Transformation, from arable-resource land" is the result of combining the following original LCA Commons flows: "Transformation; from arable, from corn to cotton", "Transformation; from arable, from soy to cotton", "Transformation; from arable, from cotton to cotton", "Transformation; from arable, from unspec. use to cotton".
Exchange "Calcium-soil agricultural" is the result of combining the following original LCA Commons flows: "Calcium; applied in limestone", "Calcium; applied in dolomite".
Exchange "Lambda-cyhalothrin-soil agricultural" is the result of combining the following original LCA Commons flows: "Lambda-cyhalothrin; broadcast without incorporation; kg AI", "Lambda-cyhalothrin; in seed furrow; kg AI", "Lambda-cyhalothrin; unspec. appl. method; kg AI", "Lambda-cyhalothrin; foliar or directed spray; kg AI", "Lambda-cyhalothrin; broadcast with incorporation; kg AI", "Lambda-cyhalothrin; banded or side-dressed; kg AI".
Exchange "2,4-D-soil agricultural" is the result of combining the following original LCA Commons flows: "2,4-D; unspec. appl. method; kg AI", "2,4-D; broadcast with incorporation; kg AI", "2,4-D; banded or side-dressed; kg AI", "2,4-D; foliar or directed spray; kg AI", "2,4-D; in seed furrow; kg AI", "2,4-D; broadcast without incorporation; kg AI".
Exchange "Spinosad-soil agricultural" is the result of combining the following original LCA Commons flows: "Spinosad; broadcast without incorporation; kg AI", "Spinosad; banded or side-dressed; kg AI", "Spinosad; broadcast with incorporation; kg AI", "Spinosad; in seed furrow; kg AI", "Spinosad; foliar or directed spray; kg AI", "Spinosad; unspec. appl. method; kg AI".
Exchange "Quizalofop ethyl ester-soil agricultural" is the result of combining the following original LCA Commons flows: "Quizalofop, ethyl ; broadcast with incorporation; kg AI", "Quizalofop, ethyl ; in seed furrow; kg AI", "Quizalofop, ethyl ; banded or side-dressed; kg AI", "Quizalofop, ethyl ; unspec. appl. method; kg AI", "Quizalofop, ethyl ; foliar or directed spray; kg AI", "Quizalofop, ethyl ; broadcast without incorporation; kg AI".
Exchange "Paraquat dichloride-soil unspecified" is the result of combining the following original LCA Commons flows: "Paraquat dichloride; unspec. appl. method; kg AI", "Paraquat dichloride; foliar or directed spray; kg AI", "Paraquat dichloride; broadcast without incorporation; kg AI", "Paraquat dichloride; banded or side-dressed; kg AI", "Paraquat dichloride; in seed furrow; kg AI", "Paraquat dichloride; broadcast with incorporation; kg AI".
Exchange "Aldicarb-soil agricultural" is the result of combining the following original LCA Commons flows: "Aldicarb; broadcast with incorporation; kg AI", "Aldicarb; banded or side-dressed; kg AI", "Aldicarb; in seed furrow; kg AI", "Aldicarb; unspec. appl. method; kg AI", "Aldicarb; foliar or directed spray; kg AI", "Aldicarb; broadcast without incorporation; kg AI".
Exchange "Fluometuron-soil agricultural" is the result of combining the following original LCA Commons flows: "Fluometuron; broadcast without incorporation; kg AI", "Fluometuron; in seed furrow; kg AI", "Fluometuron; unspec. appl. method; kg AI", "Fluometuron; banded or side-dressed; kg AI", "Fluometuron; broadcast with incorporation; kg AI", "Fluometuron; foliar or directed spray; kg AI".
Exchange "Malathion-2bdf9967-6dae-4183-88d1-8f612548c51e low population density" was originally named: "Malathion ; broadcast by air; kg AI" in this dataset.
Exchange "Thidiazuron-2bdf9967-6dae-4183-88d1-8f612548c51e low population density" was originally named: "Thidiazuron; broadcast by air; kg AI" in this dataset.
Exchange "Thiodicarb-2bdf9967-6dae-4183-88d1-8f612548c51e low population density" was originally named: "Thiodicarb; broadcast by air; kg AI" in this dataset.
Exchange "Carbon monoxide, fossil-2bdf9967-6dae-4183-88d1-8f612548c51e low population density" was originally named: "Carbon monoxide; from residue burning; kg C, biogenic" in this dataset.
Exchange "Disulfoton-2bdf9967-6dae-4183-88d1-8f612548c51e low population density" was originally named: "Disulfoton; broadcast by air; kg AI" in this dataset.
Exchange "isobutene-2bdf9967-6dae-4183-88d1-8f612548c51e low population density" was originally named: "I butene; from residue burning; kg C, biogenic" in this dataset.
Exchange "Imidacloprid-2bdf9967-6dae-4183-88d1-8f612548c51e low population density" was originally named: "Imidacloprid; broadcast by air; kg AI" in this dataset.
Exchange "Cyfluthrin-2bdf9967-6dae-4183-88d1-8f612548c51e low population density" was originally named: "Beta-Cyfluthrin; broadcast by air; kg AI" in this dataset.
Exchange "1-Butene-2bdf9967-6dae-4183-88d1-8f612548c51e low population density" was originally named: "1 butene; from residue burning; kg C, biogenic" in this dataset.
Exchange "Zeta-cypermethrin-2bdf9967-6dae-4183-88d1-8f612548c51e low population density" was originally named: "Zeta-Cypermethrin; broadcast by air; kg AI" in this dataset.
Exchange "Acetaldehyde-2bdf9967-6dae-4183-88d1-8f612548c51e low population density" was originally named: "Acetaldehyde; from residue burning; kg C, biogenic" in this dataset.
Exchange "Metalaxil-2bdf9967-6dae-4183-88d1-8f612548c51e low population density" was originally named: "Metalaxyl; broadcast by air; kg AI" in this dataset.
Exchange "Sodium chlorate-2bdf9967-6dae-4183-88d1-8f612548c51e low population density" was originally named: "Sodium chlorate; broadcast by air; kg AI" in this dataset.
Exchange "Dimethoate-2bdf9967-6dae-4183-88d1-8f612548c51e low population density" was originally named: "Dimethoate; broadcast by air; kg AI" in this dataset.
Exchange "Water, surface-c19fb2d9-98eb-4cd3-8761-81b71d8a9a1b in water" was originally named: "Water; withdrawal from surface water, for cotton, in 1998" in this dataset.
Exchange "Profenofos-2bdf9967-6dae-4183-88d1-8f612548c51e low population density" was originally named: "Profenofos; broadcast by air; kg AI" in this dataset.
Exchange "Etridiazole-2bdf9967-6dae-4183-88d1-8f612548c51e low population density" was originally named: "Etridiazole; broadcast by air; kg AI" in this dataset.
Exchange "Pentane-2bdf9967-6dae-4183-88d1-8f612548c51e low population density" was originally named: "N pentane; from residue burning; kg C, biogenic" in this dataset.
Exchange "Propane-2bdf9967-6dae-4183-88d1-8f612548c51e low population density" was originally named: "Propane; from residue burning; kg C, biogenic" in this dataset.
Exchange "MSMA-2bdf9967-6dae-4183-88d1-8f612548c51e low population density" was originally named: "MSMA; broadcast by air; kg AI" in this dataset.
Exchange "Nitrogen dioxide-2bdf9967-6dae-4183-88d1-8f612548c51e low population density" was originally named: "Nitrogen dioxide; from residue burning; kg N, biogenic" in this dataset.
Exchange "Fluazifop-p-butyl-2bdf9967-6dae-4183-88d1-8f612548c51e low population density" was originally named: "Fluazifop-p-butyl; broadcast by air; kg AI" in this dataset.
Exchange "Magnesium-be1c0329-f1a8-4524-8420-a86d2a8dd358 agricultural" was originally named: "Magnesium; applied in dolomite" in this dataset.
Exchange "Acephate-2bdf9967-6dae-4183-88d1-8f612548c51e low population density" was originally named: "Acephate; broadcast by air; kg AI" in this dataset.
Exchange "Acrylonitrile-2bdf9967-6dae-4183-88d1-8f612548c51e low population density" was originally named: "Propenenitrile; from residue burning; kg C, biogenic" in this dataset.
Exchange "Lambda-cyhalothrin-2bdf9967-6dae-4183-88d1-8f612548c51e low population density" was originally named: "Lambda-cyhalothrin; broadcast by air; kg AI" in this dataset.
Exchange "Butadiene-2bdf9967-6dae-4183-88d1-8f612548c51e low population density" was originally named: "1,3 butadiene; from residue burning; kg C, biogenic" in this dataset.
Exchange "Water, ground-c19fb2d9-98eb-4cd3-8761-81b71d8a9a1b in water" was originally named: "Water; withdrawal from groundwater, for cotton, in 1998" in this dataset.
Exchange "Carbofuran-2bdf9967-6dae-4183-88d1-8f612548c51e low population density" was originally named: "Carbofuran; broadcast by air; kg AI" in this dataset.
Exchange "isopentane-2bdf9967-6dae-4183-88d1-8f612548c51e low population density" was originally named: "I pentane; from residue burning; kg C, biogenic" in this dataset.
Exchange "Dinitrogen monoxide-2bdf9967-6dae-4183-88d1-8f612548c51e low population density" was originally named: "Dinitrogen monoxide; from residue burning; kg N, biogenic" in this dataset.
Exchange "Aldicarb-2bdf9967-6dae-4183-88d1-8f612548c51e low population density" was originally named: "Aldicarb; broadcast by air; kg AI" in this dataset.
Exchange "Isoprene-2bdf9967-6dae-4183-88d1-8f612548c51e low population density" was originally named: "Isoprene; from residue burning; kg C, biogenic" in this dataset.
Exchange "Trifluralin-2bdf9967-6dae-4183-88d1-8f612548c51e low population density" was originally named: "Trifluralin; broadcast by air; kg AI" in this dataset.
Exchange "Oxamyl-2bdf9967-6dae-4183-88d1-8f612548c51e low population density" was originally named: "Oxamyl; broadcast by air; kg AI" in this dataset.
Exchange "Metolachlor-2bdf9967-6dae-4183-88d1-8f612548c51e low population density" was originally named: "Propazine; broadcast by air; kg AI" in this dataset.
Exchange "DSMA-2bdf9967-6dae-4183-88d1-8f612548c51e low population density" was originally named: "Disodium methanearsonate; broadcast by air; kg AI" in this dataset.
Exchange "Mepiquat chloride-2bdf9967-6dae-4183-88d1-8f612548c51e low population density" was originally named: "1,1-Dimethylpiperidinium chloride; broadcast by air; kg AI" in this dataset.
Exchange "Dicrotophos-2bdf9967-6dae-4183-88d1-8f612548c51e low population density" was originally named: "Dicrotophos; broadcast by air; kg AI" in this dataset.
Exchange "Occupation, arable-c19fb2d9-98eb-4cd3-8761-81b71d8a9a1b land" was originally named: "Occupation; arable, as cotton" in this dataset.
Exchange "Ethene-2bdf9967-6dae-4183-88d1-8f612548c51e low population density" was originally named: "Ethylene; from residue burning; kg C, biogenic" in this dataset.
Exchange "Parathion-methyl-2bdf9967-6dae-4183-88d1-8f612548c51e low population density" was originally named: "Methyl parathion; broadcast by air; kg AI" in this dataset.
Exchange "Methane-2bdf9967-6dae-4183-88d1-8f612548c51e low population density" was originally named: "Methane; from residue burning; kg C, biogenic" in this dataset.
Exchange "Cyanazine-2bdf9967-6dae-4183-88d1-8f612548c51e low population density" was originally named: "Cyanazine; broadcast by air; kg AI" in this dataset.
Exchange "Clethodim-2bdf9967-6dae-4183-88d1-8f612548c51e low population density" was originally named: "Clethodim; broadcast by air; kg AI" in this dataset.
Exchange "Water-2bdf9967-6dae-4183-88d1-8f612548c51e low population density" was originally named: "Water; from residue burning; biogenic" in this dataset.
Exchange "Pendimethalin-2bdf9967-6dae-4183-88d1-8f612548c51e low population density" was originally named: "Pendimethalin; broadcast by air; kg AI" in this dataset.
Exchange "Clomazone-2bdf9967-6dae-4183-88d1-8f612548c51e low population density" was originally named: "Clomazone; broadcast by air; kg AI" in this dataset.
Exchange "Sulfuric acid-be1c0329-f1a8-4524-8420-a86d2a8dd358 agricultural" was originally named: "Sulfuric acid; as secondary application" in this dataset.
Exchange "Methanol-2bdf9967-6dae-4183-88d1-8f612548c51e low population density" was originally named: "Methanol; from residue burning; kg C, biogenic" in this dataset.
Exchange "Deltamethrin-2bdf9967-6dae-4183-88d1-8f612548c51e low population density" was originally named: "Deltamethrin; broadcast by air; kg AI" in this dataset.
Exchange "2,4-D-2bdf9967-6dae-4183-88d1-8f612548c51e low population density" was originally named: "2,4-D; broadcast by air; kg AI" in this dataset.
Exchange "Bromoxynil-2bdf9967-6dae-4183-88d1-8f612548c51e low population density" was originally named: "Bromoxynil; broadcast by air; kg AI" in this dataset.
Exchange "Toluene-2bdf9967-6dae-4183-88d1-8f612548c51e low population density" was originally named: "Toluene; from residue burning; kg C, biogenic" in this dataset.
Exchange "Furan-2bdf9967-6dae-4183-88d1-8f612548c51e low population density" was originally named: "Furan; from residue burning; kg C, biogenic" in this dataset.
Exchange "Acetonitrile-2bdf9967-6dae-4183-88d1-8f612548c51e low population density" was originally named: "Acetonitrile; from residue burning; kg C, biogenic" in this dataset.
Exchange "Fluometuron-2bdf9967-6dae-4183-88d1-8f612548c51e low population density" was originally named: "Fluometuron; broadcast by air; kg AI" in this dataset.
Exchange "Cypermethrin-2bdf9967-6dae-4183-88d1-8f612548c51e low population density" was originally named: "Cypermethrin; broadcast by air; kg AI" in this dataset.
Exchange "Ethyne-2bdf9967-6dae-4183-88d1-8f612548c51e low population density" was originally named: "Acetylene; from residue burning; kg C, biogenic" in this dataset.
Exchange "Formic acid-2bdf9967-6dae-4183-88d1-8f612548c51e low population density" was originally named: "Formic acid; from residue burning; kg C, biogenic" in this dataset.
Exchange "Quizalofop ethyl ester-2bdf9967-6dae-4183-88d1-8f612548c51e low population density" was originally named: "Quizalofop, ethyl ; broadcast by air; kg AI" in this dataset.
Exchange "Ethane-2bdf9967-6dae-4183-88d1-8f612548c51e low population density" was originally named: "Ethane; from residue burning; kg C, biogenic" in this dataset.
Exchange "Glyphosate-2bdf9967-6dae-4183-88d1-8f612548c51e low population density" was originally named: "Glyphosate; broadcast by air; kg AI" in this dataset.
Exchange "Carbon dioxide-c19fb2d9-98eb-4cd3-8761-81b71d8a9a1b unspecified" was originally named: "Carbon dioxide; from plant uptake; kg C, biogenic" in this dataset.
Exchange "Prometryn-2bdf9967-6dae-4183-88d1-8f612548c51e low population density" was originally named: "Prometryn; broadcast by air; kg AI" in this dataset.
Exchange "Benzene-2bdf9967-6dae-4183-88d1-8f612548c51e low population density" was originally named: "Benzene; from residue burning; kg C, biogenic" in this dataset.
Exchange "Formaldehyde-2bdf9967-6dae-4183-88d1-8f612548c51e low population density" was originally named: "Formaldehyde; from residue burning; kg C, biogenic" in this dataset.
Exchange "Propene-2bdf9967-6dae-4183-88d1-8f612548c51e low population density" was originally named: "Propylene; from residue burning; kg C, biogenic" in this dataset.
Exchange "Tribufos-2bdf9967-6dae-4183-88d1-8f612548c51e low population density" was originally named: "Tribufos; broadcast by air; kg AI" in this dataset.
Exchange "Quintozene-2bdf9967-6dae-4183-88d1-8f612548c51e low population density" was originally named: "Quintozene; broadcast by air; kg AI" in this dataset.
Exchange "cis-2-Butene-2bdf9967-6dae-4183-88d1-8f612548c51e low population density" was originally named: "Cis 2 butene; from residue burning; kg C, biogenic" in this dataset.
Exchange "Acetone-2bdf9967-6dae-4183-88d1-8f612548c51e low population density" was originally named: "Acetone; from residue burning; kg C, biogenic" in this dataset.
Exchange "Phenol-2bdf9967-6dae-4183-88d1-8f612548c51e low population density" was originally named: "Phenol; from residue burning; kg C, biogenic" in this dataset.
Exchange "Diuron-2bdf9967-6dae-4183-88d1-8f612548c51e low population density" was originally named: "Diuron; broadcast by air; kg AI" in this dataset.
Exchange "Sulfur-be1c0329-f1a8-4524-8420-a86d2a8dd358 agricultural" was originally named: "Sulfur; as secondary application" in this dataset.
Exchange "Dimethipin-2bdf9967-6dae-4183-88d1-8f612548c51e low population density" was originally named: "Dimethipin; broadcast by air; kg AI" in this dataset.
Exchange "Ethephon-2bdf9967-6dae-4183-88d1-8f612548c51e low population density" was originally named: "Ethephon; broadcast by air; kg AI" in this dataset.
Exchange "Pyrithiobac sodium salt-2bdf9967-6dae-4183-88d1-8f612548c51e low population density" was originally named: "Pyrithiobac-sodium; broadcast by air; kg AI" in this dataset.
Exchange "Butane-2bdf9967-6dae-4183-88d1-8f612548c51e low population density" was originally named: "N butane; from residue burning; kg C, biogenic" in this dataset.
Exchange "Hydrocyanic acid-2bdf9967-6dae-4183-88d1-8f612548c51e low population density" was originally named: "Hydrogen cyanide; from residue burning; kg C, biogenic" in this dataset.
Exchange "Phosphorus-c19fb2d9-98eb-4cd3-8761-81b71d8a9a1b unspecified" was originally named: "Phosphorous; from plant uptake; biogenic" in this dataset.
Exchange "Norflurazon-2bdf9967-6dae-4183-88d1-8f612548c51e low population density" was originally named: "Norflurazon; broadcast by air; kg AI" in this dataset.
Exchange "Transformation, to arable-c19fb2d9-98eb-4cd3-8761-81b71d8a9a1b land" was originally named: "Transformation; to arable, to cotton" in this dataset.
Exchange "trans-2-Butene-2bdf9967-6dae-4183-88d1-8f612548c51e low population density" was originally named: "Trans 2 butene; from residue burning; kg C, biogenic" in this dataset.
Exchange "Acetic acid-2bdf9967-6dae-4183-88d1-8f612548c51e low population density" was originally named: "Acetic acid; from residue burning; kg C, biogenic" in this dataset.
Exchange "Ammonia-2bdf9967-6dae-4183-88d1-8f612548c51e low population density" was originally named: "Ammonia; from residue burning; kg N, biogenic" in this dataset.
Exchange "Carbon dioxide, in air-2bdf9967-6dae-4183-88d1-8f612548c51e low population density" was originally named: "Carbon dioxide; from residue burning; kg C, biogenic" in this dataset.
Exchange "Zinc compounds-be1c0329-f1a8-4524-8420-a86d2a8dd358 agricultural" was originally named: "Zinc compounds; as secondary application" in this dataset.

## Geography
The unit process is assumed to represent production in Louisiana (US State).

## Technology
This process produces cotton lint; at harvest in 1998; at farm; 90%-93% moisture. The process is assumed to represent production in Louisiana (US State). Yields and related inputs and outputs represent a single year of operation, in 1998. This dataset includes consideration of residue burning; soil preparation; planting or sowing; irrigation; application, storage, and transport of fertilizers, manures, liming materials, secondary materials, and pesticides; and harvest. Fate and transport of applications are not included as described in Cooper, J.S., Kahn, E., Noon, M. (2012) LCA Digital Commons Unit Process Data: field crop production Version 1 which is available at https://www.lcacommons.gov/discovery/docs/LCA%20Digital%20Commons%20Unit%20Process%20Data%20final%20updated.pdf

## Time period
Start and end dates match the underlying data obtained from the USDA Agricultural Resource Management Survey (ARMS).
## Parameters
- p3816: 1.1797e-6; = p1879*p3477
- p3596: 1.35699e-6; = p1865*p3476
- p0872: 19526; = p0864*p0856
- p2530: 1.91819e-5; = p2334*p1014
- p0748: 14.427; = p0088*(1+p0616*p0220/100)
- p1766: 0
- p2096: 0.486404
- p3001: 0; = p2415*(p1079+p1081)
- p2414: 0; = p2235*p2204
- p4252: 3.2118e-6; = p1903*p3479
- p4633: 0.000289935; = p1872*p3481
- p1750: 0
- p2258: 0.00474471; = p2226*p2204
- p0981: 0; = p0978*p0001/(p0818*p0002)
- p3153: 0; = p2372*p1023
- p5224: 6.1922e-6; = p1845*p3484
- p2903: 3.6386e-6; = p2317*(p1020+p1022)
- p0029: 91.747
- p2927: 0; = p2341*(p1079+p1081)
- p1083: 77594.3; = IF(p1071=0;p1073*(p0710/100)*p0703*1000;0)
- p2482: 0.000817312; = p2286*p1014
- p2891: 7.86575e-6; = p2305*(p1079+p1081)
- p2088: 0.798875
- p3055: 7.08058e-5; = p2274*p1132
- p0672: 454.096; = p0012*(1+p0540*p0144/100)
- p3070: 0; = p2289*p1023
- p0843: 0.117921
- p2387: 6.52512e-5; = p2229*p2216
- p1648: 0
- p2654: 0.000500006; = p2263*(p1078+p1080)
- p1963d: 0.000639826; = p1608*p1812+p1609*p1813+p1610*p1814+p1611*p1815+p1612*p1816+p1613*p1817+p1614*p1818+p1615*p1819+p1616*p1820+p1617*p1821+p1618*p1822+p1619*p1823+p1620*p1824+p1621*p1825+p1622*p1826+p1623*p1827+p1624*p1828+p1625*p1829+p1626*p1830+p1627*p1831
- p5067: 3.76791e-5; = p1894*p3483
- p0951: 0; = if(and(p0683=0;or(p0807=480;p0807=32;p0807=1;and(p0807=60;p0901<0.03)));p0939;0)
- p3928: 1.0977e-5; = p1785*p3478
- p0642: 0; = IF(p0378<0.5;-SQRT(p0007*EXP(p0510^2*p0008)-p0007);SQRT(p0007*EXP(p0510^2*p0008)-p0007))
- p0773: 68.642; = p0113*(1+p0641*p0245/100)
- p0424: 0; = SQRT(2)*(IF((2*p0292-1)<0;-1;IF((2*p0292-1)>0;1;0))*SQRT(SQRT((2/(pi()*0.140012289)+LN(1-(2*p0292-1)^2)/2)^2-LN(1-(2*p0292-1)^2)/0.140012289)-(2/(pi()*0.140012289)+LN(1-(2*p0292-1)^2)/2)))
- p1061: 0.3
- p1559: 0
- p4878: 0; = p1911*p3482
- p2539: 0; = p2343*p1073
- p4172: 2.18402e-6; = p1823*p3479
- p1480: 1067
- p1912: 0
- p2842: 2.50218e-5; = p2256*(p1020+p1022)
- p2779: 0.000340436; = p2388*(p1078+p1080)
- p3641: 3.12109e-5; = p1910*p3476
- p2658: 0.000149469; = p2267*(p1078+p1080)
- p0246: 10.207
- p0420: 0; = SQRT(2)*(IF((2*p0288-1)<0;-1;IF((2*p0288-1)>0;1;0))*SQRT(SQRT((2/(pi()*0.140012289)+LN(1-(2*p0288-1)^2)/2)^2-LN(1-(2*p0288-1)^2)/0.140012289)-(2/(pi()*0.140012289)+LN(1-(2*p0288-1)^2)/2)))
- p0453: 0; = SQRT(2)*(IF((2*p0321-1)<0;-1;IF((2*p0321-1)>0;1;0))*SQRT(SQRT((2/(pi()*0.140012289)+LN(1-(2*p0321-1)^2)/2)^2-LN(1-(2*p0321-1)^2)/0.140012289)-(2/(pi()*0.140012289)+LN(1-(2*p0321-1)^2)/2)))
- p0894: 0.2085
- p0709: 5.789; = p0049*(1+p0577*p0181/100)
- p2053: 1.45647
- p1577: 0
- p1832: 0.000474519; = p1424*1000/p0818
- p4988: 5.15937e-6; = p1815*p3483
- p4925: 0; = p1962*p3482
- p2673: 0.00198372; = p2282*(p1019+p1021)
- p3307: 0; = if(and(p1232=0;p3252<>0);p3252*(p3258-p3302)/p3305;0)
- p0692: 8.789; = p0032*(1+p0560*p0164/100)
- p0961: 0; = if(and(p0683>0;or(p0807=480;p0807=32;p0807=1;and(p0807=60;p0901<0.03)));p0937;0)
- p1715: 0
- p3366: 0; = if(p1232=0;p3244*p3360/p0818;0)
- p1692: 0
- p1125: 0.28373; = if(p1121=0;p0719/100;0)
- p2676: 0.000109708; = p2285*(p1019+p1021)
- p1292: 0; = IF(p1287+p1290+p1291=p1261;0;p1261-(p1287+p1290+p1291))
- p3167: 4.15235e-6; = p2386*p1082
- p2360: 0.0127688; = p2225*p2188
- p4706: 2.94849e-5; = p1945*p3481
- p2128: 1.49344e-5; = p2015*p2056*p2090/(p0818*1000)
- p3968: 6.03735e-5; = p1825*p3478
- p2665: 0.00118508; = p2274*(p1128+p1130)
- p0093: 1.922
- p1972: 0.00114176; = if(p0807=480;p1967*p0001/(p0818*p0002);0)
- p2341: 0; = p2228*p2209
- p1909: 0
- p1977: 134.51; = p1252+p1188
- p0405: 0; = SQRT(2)*(IF((2*p0273-1)<0;-1;IF((2*p0273-1)>0;1;0))*SQRT(SQRT((2/(pi()*0.140012289)+LN(1-(2*p0273-1)^2)/2)^2-LN(1-(2*p0273-1)^2)/0.140012289)-(2/(pi()*0.140012289)+LN(1-(2*p0273-1)^2)/2)))
- p2047: 5.3879e-13; = p2015*p2045/(p0818*1000000000000)
- p5115: 1.95431e-6; = p1942*p3483
- p3743: 4.83679e-5; = p1806*p3477
- p0124: 71.641
- p2928: 0; = p2342*(p1079+p1081)
- p4977: 4.69034e-7; = p1804*p3483
- p2855: 0.00034607; = p2269*(p1079+p1081)
- p3105: 0; = p2324*p1023
- p1328: 2.15611e6; = p1319*p0801
- p0814: 0.600863; = if(p0807=480;p0810*p0812+p0811*p0813;0)
- p1809: 0
- p1713: 0
- p1934: 0
- p1720: 0
- p0423: 0; = SQRT(2)*(IF((2*p0291-1)<0;-1;IF((2*p0291-1)>0;1;0))*SQRT(SQRT((2/(pi()*0.140012289)+LN(1-(2*p0291-1)^2)/2)^2-LN(1-(2*p0291-1)^2)/0.140012289)-(2/(pi()*0.140012289)+LN(1-(2*p0291-1)^2)/2)))
- p0637: 0; = IF(p0373<0.5;-SQRT(p0007*EXP(p0505^2*p0008)-p0007);SQRT(p0007*EXP(p0505^2*p0008)-p0007))
- p4812: 0; = p1845*p3482
- p0766: 51.844; = p0106*(1+p0634*p0238/100)
- p1964: 0.5
- p1770: 0
- p1848: 0
- p2265: 0.00485651; = p2226*p2211
- p0851: 0
- p5018: 2.5875e-5; = p1845*p3483
- p2618: 0; = p2422*p1073
- p2068: 0.153529
- p1251: 0; = if(p1232>0;0;p1246*p0001/(p0818*p0002))
- p4480: 0; = p1925*p3480
- p2392: 0.000742685; = p2233*p2221
- p0177: 14.869
- p0995: 1.46345e-5; = p0991*p0001*p0004/(p0818*p0002)
- p2846: 0.000280118; = p2260*(p1079+p1081)
- p0890: 12304.4; = p0686*1000*p0687*p0885/100
- p2186: 0.0104681; = p1052/p0818
- p2921: 8.62909e-5; = p2335*(p1020+p1022)
- p4074: 7.84071e-6; = p1931*p3478
- p0656: 0; = IF(p0392<0.5;-SQRT(p0007*EXP(p0524^2*p0008)-p0007);SQRT(p0007*EXP(p0524^2*p0008)-p0007))
- p2373: 0.0013272; = p2225*p2202
- p0108: 85.252
- p1950: 0
- p0711: 21.074; = p0051*(1+p0579*p0183/100)
- p5278: 9.1667e-7; = p1899*p3484
- p0255: 6.333
- p2372: 0.0092216; = p2225*p2201
- p1214: 3; = IF(p1213=0;0;p1213-1)
- p5169: 3.92859e-7; = p1790*p3484
- p2816: 0; = p2425*(p1078+p1080)
- p0297: 0.5
- p2359: 0.000998136; = p2225*p2187
- p3084: 3.27086e-6; = p2303*p1082
- p2233: 0.0642247; = if(p0783*p0787+p0784*p0788+p0785*p0789+p0786*p0790=0;0;p0790*p0786/(p0783*p0787+p0784*p0788+p0785*p0789+p0786*p0790))
- p1018: 0.05789; = IF(p1012=0;p0709/100;0)
- p2383: 1.07007e-5; = p2229*p2212
- p4362: 0; = p1807*p3480
- p2814: 0; = p2423*(p1078+p1080)
- p1319: 4.03012; = IF(((p0745*1000*p0746/100)+(p0754*1000*p0755/100))/p0801<0;0;((p0745*1000*p0746/100)+(p0754*1000*p0755/100))/p0801)
- p0537: 0; = IF(p0273<0.5;-SQRT(p0007*EXP(p0405^2*p0008)-p0007);SQRT(p0007*EXP(p0405^2*p0008)-p0007))
- p2492: 0.00217603; = p2296*p1014
- p3047: 1.36277e-7; = p2266*p1082
- p1833: 0
- p2384: 0.000111896; = p2229*p2213
- p1838: 0
- p4361: 0; = p1806*p3480
- p0314: 0.5
- p2284: 0.000995462; = p2223*p2190
- p2797: 0; = p2406*(p1019+p1021)
- p3080: 1.2256e-5; = p2299*p1082
- p1805: 0
- p2120: 0.51828
- p2496: 0.00386397; = p2300*p1073
- p3468: 0; = p3373*p1241
- p3338: 0; = if(and(p1232=0;p3254<>0);1-(p3334+p3335+p3336+p3337);0)
- p0286: 0.5
- p1948: 0
- p0971: 0; = p0968/p0818
- p2037: 3.44
- p0005: 1.60934
- p1038: 0.00623446
- p2440: 0.000117871; = p2244*p1014
- p1723: 0
- p0947: 0; = if(and(p0683=0;or(p0807=480;p0807=32;p0807=1;and(p0807=60;p0901<0.03)));p0935;0)
- p5330: 3.38607e-6; = p1951*p3484
- p0970: 0.00312353; = p0967/p0818
- p4658: 4.91415e-6; = p1897*p3481
- p5008: 4.69034e-7; = p1835*p3483
- p1944: 0
- p2728: 0; = p2337*(p1078+p1080)
- p3365: 0; = if(p1232=0;p3244*p3359/p0818;0)
- p2463: 5.41099e-5; = p2267*p1073
- p4443: 0; = p1888*p3480
- p2129: 2.21347e-5; = p2015*p2057*p2091/(p0818*1000)
- p1869: 0
- p1835: 1.95008e-5; = p1427*1000/p0818
- p1279: 0
- p3526: 5.42798e-6; = p1795*p3476
- p4980: 4.69034e-7; = p1807*p3483
- p0119: 59.254
- p1777: 0
- p1188: 134.51; = p1187*p0801
- p4308: 0.000178741; = p1963*p3479
- p1974: 0; = p1969*p0001/(p0818*p0002)
- p1166: 1.49825e-5; = p1164/p0818
- p1896: 0
- p0920: 0; = p0676*1000/p0801
- p3741: 7.07823e-6; = p1804*p3477
- p3911: 6.35098e-5; = p1768*p3478
- p2368: 6.64007e-5; = p2225*p2197
- p1808: 0
- p2925: 0; = p2339*(p1079+p1081)
- p1287: 0
- p3453: 0; = p3377*p1240
- p0322: 0.5
- p1042: 0.000645242
- p3312: 0; = if(and(p1232=0;p3253<>0);p3261*p3277*(p3298*p3290+(1-p3298)*p3294);0)
- p4129: 3.2118e-7; = p1780*p3479
- p1126: 0; = if(p1121=0;p0720/100;0)
- p5038: 1.56345e-7; = p1865*p3483
- p0275: 0.5
- p2229: 0.144068; = if(p0774*p0778+p0775*p0779+p0776*p0780+p0777*p0781=0;0;p0781*p0777/(p0774*p0778+p0775*p0779+p0776*p0780+p0777*p0781))
- p1712: 0
- p3286: 0
- p3099: 0; = p2318*p1023
- p2932: 0; = p2346*(p1079+p1081)
- p3401: 0; = p3363*p1238
- p1978: 188
- p1843: 0
- p4250: 1.34896e-6; = p1901*p3479
- p5057: 2.34517e-7; = p1884*p3483
- p0848: 0
- p4568: 2.68045e-6; = p1807*p3481
- p1607: 0
- p0499: 0; = SQRT(2)*(IF((2*p0367-1)<0;-1;IF((2*p0367-1)>0;1;0))*SQRT(SQRT((2/(pi()*0.140012289)+LN(1-(2*p0367-1)^2)/2)^2-LN(1-(2*p0367-1)^2)/0.140012289)-(2/(pi()*0.140012289)+LN(1-(2*p0367-1)^2)/2)))
- p4134: 8.99304e-7; = p1785*p3479
- p0824: 0.8615
- p1099: 0.652345
- p3010: 0; = p2424*(p1079+p1081)
- p3357: 0; = if(p1232=0;p3307+p3318+p3329+p3340+p3351;0)
- p1922: 0
- p0104: 99.414
- p0024: 17.697
- p2067: 0.446471
- p0650: 0; = IF(p0386<0.5;-SQRT(p0007*EXP(p0518^2*p0008)-p0007);SQRT(p0007*EXP(p0518^2*p0008)-p0007))
- p0359: 0.5
- p1867: 0
- p0106: 51.844
- p3344: 0; = if(and(p1232=0;p3254<>0);p3254-(p3339+p3340+p3341+p3342+p3343);0)
- p2480: 0.000401609; = p2284*p1014
- p2460: 7.81543e-5; = p2264*p1073
- p2628: 0.00201446; = p2237*(p1019+p1021)
- p1769: 0
- p2987: 0; = p2401*(p1020+p1022)
- p2065: 0.0758824
- p2252: 1.29791e-5; = p2222*p2198
- p3265: 0
- p4478: 0; = p1923*p3480
- p2466: 3.15538e-5; = p2270*p1073
- p1168: 7.49127e-6; = p1164*p1167/p0818
- p2793: 0; = p2402*(p1019+p1021)
- p3093: 0.00221286; = p2312*p1132
- p2281: 0.000353832; = p2223*p2187
- p2329: 2.37875e-6; = p2224*p2197
- p0717: 11.179; = p0057*(1+p0585*p0189/100)
- p2470: 0.000232259; = p2274*p1123
- p0929: 0; = p0801*p0923
- p3200: 0; = p2419*p1082
- p0158: 21.605
- p2620: 0; = p2424*p1073
- p0923: 0; = IF(p0918=1;0;IF(p0918+p0919>1;1-p0918;p0919))
- p4716: 3.70795e-5; = p1955*p3481
- p4254: 6.4236e-7; = p1905*p3479
- p2780: 0.00270695; = p2389*(p1128+p1130)
- p1850: 0
- p1856: 0
- p2371: 0.0215095; = p2225*p2200
- p2254: 0.00256156; = p2222*p2200
- p1726: 0.686898
- p2039: 1.88098e-5; = p2015*p2037*p2038/(p0818*1000)
- p3165: 6.21022e-7; = p2384*p1082
- p2160: 1.28683e-6; = p2015*p2084*p2122/(p0818*1000)
- p1323: 0; = IF(((p0745*1000*p0750/100)+(p0754*1000*p0759/100))/p0801<0;0;((p0745*1000*p0750/100)+(p0754*1000*p0759/100))/p0801)
- p0154: 0
- p2040: 0
- p3896: 0.00328261; = p1963*p3477
- p3196: 0; = p2415*p1082
- p1797: 0.000204758; = p1389*1000/p0818
- p0089: 6.402
- p1718: 0
- p2615: 0; = p2419*p1073
- p4686: 2.68045e-6; = p1925*p3481
- p1806: 0.000133255; = p1398*1000/p0818
- p3433: 0; = p3376*p1239
- p3370: 0; = if(p1232=0;p3245*p3358/p0818;0)
- p1903: 0.000162507; = p1495*1000/p0818
- p3359: 0; = if(p1232=0;p3309+p3320+p3331+p3342+p3353;0)
- p2906: 5.66077e-6; = p2320*(p1020+p1022)
- p2330: 3.90435e-6; = p2224*p2198
- p0938: 0; = p0932*p0001/(p0818*p0002)
- p3202: 0; = p2421*p1082
- p2583: 1.3751e-5; = p2387*p1073
- p1661: 0.776933
- p2792: 0; = p2401*(p1019+p1021)
- p0787: 32.715; = p0127*(1+p0655*p0259/100)
- p4342: 0; = p1787*p3480
- p2211: 0.0146906; = p1120-p2209-p2208-p2210
- p4523: 5.94166e-5; = p1762*p3481
- p2752: 0.00107516; = p2361*(p1019+p1021)
- p2749: 0.00303936; = p2358*(p1019+p1021)
- p4015: 0.000508862; = p1872*p3478
- p4995: 1.56345e-6; = p1822*p3483
- p3734: 7.43214e-5; = p1797*p3477
- p4100: 8.62478e-6; = p1957*p3478
- p2050: 0.952062
- p2058: 1.24412
- p4094: 0.000141917; = p1951*p3478
- p3108: 0; = p2327*p1023
- p0309: 0.5
- p4228: 6.4236e-8; = p1879*p3479
- p2672: 0.000155067; = p2281*(p1019+p1021)
- p3285: 0
- p2008: 0.468113; = ((p1982*p1985+p1988*p1991+p1994*p1997+p2002*p2005)/p0818)*p0005*p0002/1000
- p2528: 0.000310875; = p2332*p1014
- p1087: 0; = IF(p1071=0;p1081*(p0710/100)*p0703*1000;0)
- p3152: 0; = p2371*p1023
- p2152: 3.73721e-7; = p2015*p2080*p2114/(p0818*1000)
- p0959: 0; = if(and(p0683>0;or(p0807=480;p0807=32;p0807=1;and(p0807=60;p0901<0.03)));p0935;0)
- p1921: 0
- p2567: 0.00867777; = p2371*p1014
- p3051: 8.30994e-7; = p2270*p1082
- p0091: 25.84
- p4394: 0; = p1839*p3480
- p4027: 2.35221e-6; = p1884*p3478
- p4427: 0; = p1872*p3480
- p2796: 0; = p2405*(p1019+p1021)
- p2623: 0; = p2427*p1073
- p2473: 0.00121173; = p2277*p1014
- p2917: 1.35895e-6; = p2331*(p1020+p1022)
- p0896: 0.516338
- p4486: 0; = p1931*p3480
- p2043: 0.636483
- p1172: 8.83775e-7; = p1170/p0818
- p1730: 0
- p1229: 0.0110037; = IF(p1221=0;0;p1228*p1221)
- p1963e: 0.000720005; = p1628*p1832+p1629*p1833+p1630*p1834+p1631*p1835+p1632*p1836+p1633*p1837+p1634*p1838+p1635*p1839+p1636*p1840+p1637*p1841+p1638*p1842+p1639*p1843+p1640*p1844+p1641*p1845+p1642*p1846+p1643*p1847+p1644*p1848+p1645*p1849+p1646*p1850
- p5124: 1.41492e-5; = p1951*p3483
- p3442: 0; = p3366*p1240
- p2810: 0; = p2419*(p1078+p1080)
- p0704: 99.414; = p0044*(1+p0572*p0176/100)
- p1014: 0.40344; = IF(p1012=0;p0705/100;0)
- p1664: 0
- p1610: 0
- p2884: 0.00137465; = p2298*(p1079+p1081)
- p0057: 11.179
- p5075: 5.0812e-6; = p1902*p3483
- p3063: 0; = p2282*p1023
- p1387: 8
- p1875: 0
- p0805: 0
- p3256: 0; = p1252*(p1307*(1-p3247)+p1310*(1-p3248)+p1311*(1-p3249)+p1312*(1-p3250))
- p2296: 0.0053937; = p2223*p2203
- p0678: 0
- p1222: 0.94
- p2978: 0.000210722; = p2392*(p1129+p1131)
- p2856: 3.01823e-5; = p2270*(p1079+p1081)
- p0348: 0.5
- p1822: 6.50026e-5; = p1414*1000/p0818
- p2385: 0.00019826; = p2229*p2214
- p0859: 0.0364972; = p0671*1000/p0856
- p0511: 0; = SQRT(2)*(IF((2*p0379-1)<0;-1;IF((2*p0379-1)>0;1;0))*SQRT(SQRT((2/(pi()*0.140012289)+LN(1-(2*p0379-1)^2)/2)^2-LN(1-(2*p0379-1)^2)/0.140012289)-(2/(pi()*0.140012289)+LN(1-(2*p0379-1)^2)/2)))
- p4998: 6.01927e-6; = p1825*p3483
- p2027: 0.428799
- p2834: 0.000616578; = p2248*(p1020+p1022)
- p4791: 0; = p1824*p3482
- p1624: 0
- p4073: 8.31115e-5; = p1930*p3478
- p0877: 0; = p0876*p0001*p0003/(p0818*p0002)
- p1649: 0
- p2300: 0.0183353; = p2227*p2207
- p2920: 7.52698e-6; = p2334*(p1020+p1022)
- p0538: 0; = IF(p0274<0.5;-SQRT(p0007*EXP(p0406^2*p0008)-p0007);SQRT(p0007*EXP(p0406^2*p0008)-p0007))
- p0641: 0; = IF(p0377<0.5;-SQRT(p0007*EXP(p0509^2*p0008)-p0007);SQRT(p0007*EXP(p0509^2*p0008)-p0007))
- p0128: 62.751
- p0930: 0; = p0801*p0924
- p2731: 0; = p2340*(p1078+p1080)
- p3311: 0; = if(and(p1232=0;p3252<>0);p3252-(p3306+p3307+p3308+p3309+p3310);0)
- p3205: 0; = p2424*p1082
- p1334: 204128; = p1322*p0801
- p2118: 0.679049
- p0684: 17.697; = p0024*(1+p0552*p0156/100)
- p2314: 0.00721077; = p2231*p2221
- p2087: 0.856281
- p0664: 0; = IF(p0400<0.5;-SQRT(p0007*EXP(p0532^2*p0008)-p0007);SQRT(p0007*EXP(p0532^2*p0008)-p0007))
- p1112: 0.209482
- p2277: 0.0030035; = p2223*p2183
- p1801: 0
- p3218: 0.038145; = p3214*p1228
- p2298: 0.00681937; = p2227*p2205
- p2863: 0.000475485; = p2277*(p1020+p1022)
- p4452: 0; = p1897*p3480
- p3422: 0; = p3365*p1239
- p4377: 0; = p1822*p3480
- p2123: 0.263965
- p3250: 0
- p1090: 0.000621522; = IF(p1071=0;p1084*p0001/(p0818*p0002);0)
- p2297: 0.00754002; = p2227*p2204
- p3156: 1.14759e-5; = p2375*p1082
- p2062: 3.76588
- p4101: 2.04344e-5; = p1962*p3478
- p2143: 2.4087e-6; = p2015*p2071*p2105/(p0818*1000)
- p2266: 2.45544e-5; = p2226*p2212
- p2640: 0.000365889; = p2249*(p1019+p1021)
- p1145: 2.98533e7; = if(p1121=0;p0799*p0702*1000*p0800/100;0)
- p2902: 4.80515e-5; = p2316*(p1020+p1022)
- p3897: 7.05664e-6; = p1754*p3478
- p2382: 0.00211645; = p2229*p2211
- p3552: 4.07098e-6; = p1821*p3476
- p2831: 5.29421e-5; = p2245*(p1020+p1022)
- p2176: 0.000909728; = p0895*p0913/p0818
- p0194: 44.997
- p2605: 0; = p2409*p1014
- p2270: 0.000149729; = p2226*p2216
- p3111: 0; = p2330*p1023
- p2336: 0; = p2228*p2204
- p1162: 5.77584e-5; = p1161/p0818
- p3434: 0; = p3377*p1239
- p4926: 0; = p1963*p3482
- p3826: 7.43214e-5; = p1889*p3477
- p1044: 0.00623446; = IF(p1012=0;IF(p1037=1;0;IF(p1037+p1038>1;1-p1037;p1038));0)
- p2982: 0; = p2396*(p1020+p1022)
- p2580: 2.35809e-5; = p2384*p1073
- p2475: 0.000316048; = p2279*p1014
- p1985: 1.39865e8; = (if(p1057=0;0;p1050/p1057)+if(p1058=0;0;p1051/p1058)+if(p1059=0;0;p1052/p1059)+if(p1060=0;0;p1053/p1060)+if(p1061=0;0;p1054/p1061)+if(p1062=0;0;p1055/p1062)+if(p1063=0;0;p1056/p1063))*(1+p1157)
- p1955: 0.000269761; = p1547*1000/p0818
- p0342: 0.5
- p0985: 0; = IF(p0982=1;0;IF(p0982+p0983>1;1-p0982;p0983))
- p1592: 0
- p1787: 9.75039e-6; = p1379*1000/p0818
- p3176: 0; = p2395*p1023
- p0307: 0.5
- p1965: 0.0165094; = p1963+p1959*p1964*1000/p0818
- p2483: 0.00467725; = p2287*p1014
- p2413: 0; = p2234*p2203
- p1105: 0.436421
- p1647: 0
- p0223: 10.059
- p1311: 0; = IF(p1307+p1310=p1266;0;IF(p1307+p1310+p1309>p1266;p1266-(p1307+p1310);p1309))
- p3350: 0; = if(and(p1232=0;p3256<>0);p3256*(p3273*p3277-p3345)/p3349;0)
- p1918: 0
- p0229: 24.059
- p3277: 0
- p3838: 2.47738e-5; = p1901*p3477
- p3306: 0; = if(and(p1232=0;p3252<>0);p3252*(p3257*p3277-p3301)/p3305;0)
- p1863: 0
- p0829: 0.0832195; = if(p0807=480;p0814*(1-p0824);0)
- p0800: 72.495; = p0140*(1+p0668*p0272/100)
- p0383: 0.5
- p0394: 0.5
- p1617: 0.49725
- p1175: 9.76968e-5
- p0836: 276.788; = p0831*p0835*p0801/(1-p0831)
- p1605: 0
- p0556: 0; = IF(p0292<0.5;-SQRT(p0007*EXP(p0424^2*p0008)-p0007);SQRT(p0007*EXP(p0424^2*p0008)-p0007))
- p2391: 0.000427386; = p2233*p2220
- p3038: 0; = p2257*p1023
- p4243: 3.09618e-5; = p1894*p3479
- p2520: 1.02063e-5; = p2324*p1014
- p0612: 0; = IF(p0348<0.5;-SQRT(p0007*EXP(p0480^2*p0008)-p0007);SQRT(p0007*EXP(p0480^2*p0008)-p0007))
- p3046: 2.69536e-5; = p2265*p1082
- p5282: 9.35378e-7; = p1903*p3484
- p2374: 0.0152153; = p2225*p2203
- p0718: 57.04; = p0058*(1+p0586*p0190/100)
- p3443: 0; = p3367*p1240
- p4291: 1.6059e-6; = p1942*p3479
- p2433: 0.00185446; = p2237*p1014
- p0004: 0.0254
- p5263: 5.61227e-8; = p1884*p3484
- p3251: 0; = p1252-(p3252+p3253+p3254+p3255+p3256)
- p1320: 7.00718; = IF(((p0745*1000*p0747/100)+(p0754*1000*p0756/100))/p0801<0;0;((p0745*1000*p0747/100)+(p0754*1000*p0756/100))/p0801)
- p3831: 0.000568618; = p1894*p3477
- p1147: 0.082617
- p2344: 0; = p2228*p2212
- p0531: 0; = SQRT(2)*(IF((2*p0399-1)<0;-1;IF((2*p0399-1)>0;1;0))*SQRT(SQRT((2/(pi()*0.140012289)+LN(1-(2*p0399-1)^2)/2)^2-LN(1-(2*p0399-1)^2)/0.140012289)-(2/(pi()*0.140012289)+LN(1-(2*p0399-1)^2)/2)))
- p1179: 0.5
- p3654: 6.78497e-6; = p1923*p3476
- p3030: 0; = p2249*p1023
- p1322: 0.381547; = IF(((p0745*1000*p0749/100)+(p0754*1000*p0758/100))/p0801<0;0;((p0745*1000*p0749/100)+(p0754*1000*p0758/100))/p0801)
- p2746: 0.00371316; = p2355*(p1019+p1021)
- p2208: 0.00574553; = p1110/p0818
- p0293: 0.5
- p1173: 0.5
- p3377: 0; = if(p1232=0;p3246*p3359/p0818;0)
- p3400: 0; = p3362*p1238
- p2955: 1.72536e-5; = p2369*(p1020+p1022)
- p1169: 0.000508261
- p3348: 0; = if(and(p1232=0;p3256<>0);p3276*p3289;0)
- p3209: 0; = p2428*p1132
- p2564: 2.67887e-5; = p2368*p1014
- p4260: 1.11771e-5; = p1911*p3479
- p1096: 0.00337596
- p2948: 0.000444556; = p2362*(p1020+p1022)
- p1056: 9.98929e6; = IF(p1012=0;p1049*p1036;0)
- p0062: 3.313
- p2056: 2.07882
- p0189: 43.071
- p1244: 0; = if(p1232>0;0;p1239*(p0725/100)*p0723*1000)
- p0052: 58.213
- p2738: 0; = p2347*(p1078+p1080)
- p5045: 5.07338e-5; = p1872*p3483
- p0008: 0.0739645; = (p0007-1.5)/(p0007-1)^2
- p2234: 0; = 1-(p2222+p2223+p2224+p2225)
- p2026: 73.06
- p4238: 4.04687e-6; = p1889*p3479
- p3556: 5.22443e-5; = p1825*p3476
- p1788: 0
- p3082: 1.67521e-5; = p2301*p1082
- p0898: 0.45335
- p2429: 0; = p2236*p2219
- p0693: 88.668; = p0033*(1+p0561*p0165/100)
- p2320: 3.57575e-5; = p2224*p2187
- p3923: 3.92036e-6; = p1780*p3478
- p0313: 0.5
- p2338: 0; = p2228*p2206
- p3676: 4.47808e-5; = p1945*p3476
- p2616: 0; = p2420*p1073
- p1645: 0
- p2630: 3.34846e-5; = p2239*(p1019+p1021)
- p1728: 0
- p0009: 6.835
- p3327: 0; = if(and(p1232=0;p3255<>0);1-(p3323+p3324+p3325+p3326);0)
- p1652: 0
- p2788: 0; = p2397*(p1019+p1021)
- p0606: 0; = IF(p0342<0.5;-SQRT(p0007*EXP(p0474^2*p0008)-p0007);SQRT(p0007*EXP(p0474^2*p0008)-p0007))
- p3049: 2.5249e-6; = p2268*p1082
- p3142: 0; = p2361*p1023
- p0752: 0
- p1123: 0.11179; = if(p1121=0;p0717/100;0)
- p2753: 0.00123066; = p2362*(p1019+p1021)
- p2342: 0; = p2228*p2210
- p2904: 1.25329e-5; = p2318*(p1020+p1022)
- p0733: 0
- p3053: 0.000786231; = p2272*p1132
- p1757: 0
- p1283: 0; = p1277*p1252/p0818
- p2754: 0.00030948; = p2363*(p1019+p1021)
- p0312: 0.5
- p0482: 0; = SQRT(2)*(IF((2*p0350-1)<0;-1;IF((2*p0350-1)>0;1;0))*SQRT(SQRT((2/(pi()*0.140012289)+LN(1-(2*p0350-1)^2)/2)^2-LN(1-(2*p0350-1)^2)/0.140012289)-(2/(pi()*0.140012289)+LN(1-(2*p0350-1)^2)/2)))
- p2023: 3.3
- p2103: 0.912485
- p4752: 0; = p1785*p3482
- p2264: 0.000370856; = p2226*p2210
- p3403: 0; = p3365*p1238
- p2124: 0.263965
- p2980: 0; = p2394*(p1020+p1022)
- p0849: 0
- p1049: 0.209016; = IF(p1012=0;IF(p1037+p1044+p1045+p1046+p1047+p1048=1;0;1-(p1037+p1044+p1045+p1046+p1047+p1048));0)
- p3323: 0; = if(and(p1232=0;p3255<>0);p3265*p3277*(p3299*p3291+(1-p3299)*p3295);0)
- p3249: 0
- p1303: 0; = p1297*p1252/p0818
- p2231: 0.623562; = if(p0783*p0787+p0784*p0788+p0785*p0789+p0786*p0790=0;0;p0788*p0784/(p0783*p0787+p0784*p0788+p0785*p0789+p0786*p0790))
- p0794: 0
- p1837: 0
- p2106: 0.856281
- p1241: 0; = if(p1232>0;0;IF(p1234+p1238+p1239+p1240=1;0;1-(p1234+p1238+p1239+p1240)))
- p1579: 0
- p2278: 0.000227434; = p2223*p2184
- p1873: 0
- p2240: 0.000263174; = p2222*p2185
- p2079: 0.02
- p2812: 0; = p2421*(p1078+p1080)
- p2542: 0; = p2346*p1073
- p2222: 0.0788985; = if(p0765*p0769+p0766*p0770+p0767*p0771+p0768*p0772=0;0;p0769*p0765/(p0765*p0769+p0766*p0770+p0767*p0771+p0768*p0772))
- p2720: 1.04249e-6; = p2329*(p1019+p1021)
- p0326: 0.5
- p1280: 0; = IF(p1277=p1263;0;IF(p1277+p1278>p1263;p1263-p1277;p1278))
- p2994: 0; = p2408*(p1020+p1022)
- p2682: 1.69317e-5; = p2291*(p1019+p1021)
- p2207: 0.0349012; = p1119-p2205-p2204-p2206
- p2313: 0.00414952; = p2231*p2220
- p1789: 0
- p1870: 5.85023e-5; = p1462*1000/p0818
- p4379: 0; = p1824*p3480
- p2607: 0; = p2411*p1014
- p1239: 0; = if(p1232>0;0;IF(p1234+p1238=1;0;IF(p1234+p1238+p1236>1;1-(p1234+p1238);p1236)))
- p1857: 0
- p1829: 0
- p0925: 0; = IF(p0918+p0923+p0924=1;0;IF(p0918+p0923+p0924+p0921>1;1-(p0918+p0923+p0924);p0921))
- p1194: 1.48
- p0503: 0; = SQRT(2)*(IF((2*p0371-1)<0;-1;IF((2*p0371-1)>0;1;0))*SQRT(SQRT((2/(pi()*0.140012289)+LN(1-(2*p0371-1)^2)/2)^2-LN(1-(2*p0371-1)^2)/0.140012289)-(2/(pi()*0.140012289)+LN(1-(2*p0371-1)^2)/2)))
- p3610: 6.78497e-7; = p1879*p3476
- p1961: 0.5
- p1635: 0.921542
- p1666: 0.885279
- p2801: 0; = p2410*(p1019+p1021)
- p0010: 56.92
- p0726: 0
- p2388: 0.000584812; = p2229*p2217
- p2913: 3.97592e-5; = p2327*(p1020+p1022)
- p2454: 0.0009999; = p2258*p1073
- p3259: 0
- p1308: 0
- p0763: 536.405; = p0103*(1+p0631*p0235/100)
- p2444: 0.0015713; = p2248*p1014
- p0747: 3.997; = p0087*(1+p0615*p0219/100)
- p1198: 0.44
- p0927: 1; = IF(p0918+p0923+p0924+p0925+p0926=1;0;1-(p0918+p0923+p0924+p0925+p0926))
- p3408: 0; = p3370*p1238
- p1945: 0.000214509; = p1537*1000/p0818
- p4335: 0; = p1780*p3480
- p1901: 6.82527e-5; = p1493*1000/p0818
- p2874: 0.00039343; = p2288*(p1020+p1022)
- p2833: 0.000107742; = p2247*(p1020+p1022)
- p0570: 0; = IF(p0306<0.5;-SQRT(p0007*EXP(p0438^2*p0008)-p0007);SQRT(p0007*EXP(p0438^2*p0008)-p0007))
- p0095: 9.438
- p3484: 0.00575594; = IF(p1344=0;0;p1344/(p1328+p1330+p1332+p1334+p1336+p1338+p1340+p1342+p1344))
- p2343: 0; = p2228*p2211
- p4684: 4.46741e-6; = p1923*p3481
- p4757: 0; = p1790*p3482
- p3114: 0; = p2333*p1023
- p2774: 6.22922e-6; = p2383*(p1078+p1080)
- p2142: 4.13849e-6; = p2015*p2070*p2104/(p0818*1000)
- p4626: 8.93482e-7; = p1865*p3481
- p1773: 0
- p0023: 10.124
- p0442: 0; = SQRT(2)*(IF((2*p0310-1)<0;-1;IF((2*p0310-1)>0;1;0))*SQRT(SQRT((2/(pi()*0.140012289)+LN(1-(2*p0310-1)^2)/2)^2-LN(1-(2*p0310-1)^2)/0.140012289)-(2/(pi()*0.140012289)+LN(1-(2*p0310-1)^2)/2)))
- p0916: 0.804068; = p0826+p0828+p0829+(p0832*(1+p0894))/p0818
- p2811: 0; = p2420*(p1078+p1080)
- p3950: 4.70443e-6; = p1807*p3478
- p3229: 1.49825e-5; = p1164/p0818
- p0559: 0; = IF(p0295<0.5;-SQRT(p0007*EXP(p0427^2*p0008)-p0007);SQRT(p0007*EXP(p0427^2*p0008)-p0007))
- p2456: 0.000292846; = p2260*p1073
- p3092: 0.00157028; = p2311*p1132
- p0458: 0; = SQRT(2)*(IF((2*p0326-1)<0;-1;IF((2*p0326-1)>0;1;0))*SQRT(SQRT((2/(pi()*0.140012289)+LN(1-(2*p0326-1)^2)/2)^2-LN(1-(2*p0326-1)^2)/0.140012289)-(2/(pi()*0.140012289)+LN(1-(2*p0326-1)^2)/2)))
- p4788: 0; = p1821*p3482
- p2526: 1.57517e-6; = p2330*p1014
- p2347: 0; = p2228*p2215
- p3195: 0; = p2414*p1082
- p1276: 0; = p1272*p1252/p0818
- p2312: 0.0649313; = p2231*p2219
- p0827: 4.3247e8; = p0818*p0819*p0823
- p0444: 0; = SQRT(2)*(IF((2*p0312-1)<0;-1;IF((2*p0312-1)>0;1;0))*SQRT(SQRT((2/(pi()*0.140012289)+LN(1-(2*p0312-1)^2)/2)^2-LN(1-(2*p0312-1)^2)/0.140012289)-(2/(pi()*0.140012289)+LN(1-(2*p0312-1)^2)/2)))
- p2080: 0.025
- p4912: 0; = p1945*p3482
- p3474: 0; = p3379*p1241
- p1844: 0
- p3019: 0; = p2238*p1023
- p4645: 1.34022e-6; = p1884*p3481
- p1555: 0
- p1916: 0
- p3085: 4.28332e-5; = p2304*p1082
- p0756: 50.722; = p0096*(1+p0624*p0228/100)
- p1462: 18
- p1195: 0.45
- p1930: 0.000344514; = p1522*1000/p0818
- p0998: 0; = if(p0888=0;0;if((p0699*p0698*1000*p0700/100)/p0888>1;1;(p0699*p0698*1000*p0700/100)/p0888))
- p2257: 0.00181198; = p2222*p2203
- p2485: 0.00991096; = p2289*p1014
- p1220: 0; = IF(p1218<0.5;-SQRT(p1214*EXP(p1219^2*p1215)-p1214);SQRT(p1214*EXP(p1219^2*p1215)-p1214))
- p1304: 0; = p1300*p1252/p0818
- p2824: 0.000159737; = p2238*(p1020+p1022)
- p2283: 0.00086968; = p2223*p2189
- p1205: 0
- p0638: 0; = IF(p0374<0.5;-SQRT(p0007*EXP(p0506^2*p0008)-p0007);SQRT(p0007*EXP(p0506^2*p0008)-p0007))
- p1954: 0
- p0345: 0.5
- p0346: 0.5
- p2446: 0.00332954; = p2250*p1014
- p3213: 0.112803; = p1222*12.0107/100.0869
- p0668: 0; = IF(p0404<0.5;-SQRT(p0007*EXP(p0536^2*p0008)-p0007);SQRT(p0007*EXP(p0536^2*p0008)-p0007))
- p3179: 0; = p2398*p1023
- p1340: 0; = p1325*p0801
- p1025: 130270; = IF(p1012=0;p1019*(p0704/100)*p0703*1000;0)
- p2083: 2.17294
- p0576: 0; = IF(p0312<0.5;-SQRT(p0007*EXP(p0444^2*p0008)-p0007);SQRT(p0007*EXP(p0444^2*p0008)-p0007))
- p0967: 961047; = (p0684/100)*p0683*p0682*1000
- p1671: 0
- p5062: 4.92486e-6; = p1889*p3483
- p3862: 7.07823e-6; = p1925*p3477
- p2323: 0.000100599; = p2224*p2190
- p3076: 0; = p2295*p1023
- p1301: 0; = IF(p1297+p1300=p1265;0;IF(p1297+p1300+p1299>p1265;p1265-(p1297+p1300);p1299))
- p2046: 10
- p3356: 0; = if(p1232=0;p3306+p3317+p3328+p3339+p3350;0)
- p2213: 0.000776688; = p1116-p2212
- p2104: 0.817136
- p0722: 3.313; = p0062*(1+p0590*p0194/100)
- p1057: 0.82
- p0984: 0; = if(p0886=0;0;min(1;(p0699*p0698*1000*p0701/100)/p0886))
- p3469: 0; = p3374*p1241
- p0536: 0; = SQRT(2)*(IF((2*p0404-1)<0;-1;IF((2*p0404-1)>0;1;0))*SQRT(SQRT((2/(pi()*0.140012289)+LN(1-(2*p0404-1)^2)/2)^2-LN(1-(2*p0404-1)^2)/0.140012289)-(2/(pi()*0.140012289)+LN(1-(2*p0404-1)^2)/2)))
- p2975: 0.0013465; = p2389*(p1129+p1131)
- p2108: 0.826583
- p2908: 1.39136e-5; = p2322*(p1020+p1022)
- p4960: 2.34517e-7; = p1787*p3483
- p1993: 400
- p0215: 15.179
- p2141: 3.12335e-6; = p2015*p2069*p2103/(p0818*1000)
- p2857: 0.000270508; = p2271*(p1079+p1081)
- p0908: 0.0022
- p3411: 0; = p3373*p1238
- p1055: 30837.4; = IF(p1012=0;p1048*p1036;0)
- p1299: 0
- p1218: 0.5
- p1704: 0
- p3322: 0; = if(and(p1232=0;p3253<>0);p3253-(p3317+p3318+p3319+p3320+p3321);0)
- p2669: 9.96729e-5; = p2278*(p1019+p1021)
- p2335: 0.000545076; = p2224*p2203
- p4718: 4.91415e-6; = p1957*p3481
- p5174: 1.4966e-7; = p1795*p3484
- p2899: 0.00117734; = p2313*(p1129+p1131)
- p0658: 0; = IF(p0394<0.5;-SQRT(p0007*EXP(p0526^2*p0008)-p0007);SQRT(p0007*EXP(p0526^2*p0008)-p0007))
- p0933: 535000; = p0801*p0927
- p4420: 0; = p1865*p3480
- p3386: 0; = p3367*p1234
- p3299: 0; = if(p1303+p1304+p1305+p1306=0;0;p1303/(p1303+p1304+p1305+p1306))
- p1958: 4568
- p3982: 7.84071e-6; = p1839*p3478
- p3326: 0; = if(and(p1232=0;p3255<>0);p3268*p3289;0)
- p2132: 4.51267e-6; = p2015*p2060*p2094/(p0818*1000)
- p1691: 0
- p2859: 0.00922426; = p2273*(p1129+p1131)
- p2319: 0.00024845; = p2224*p2186
- p2036: 8.77938e-5; = p2015*p2030*(1-p2032)/(p0818*1000)
- p0906: 0.0041
- p0992: 3.02604e-5; = p0988*p0001*p0004/(p0818*p0002)
- p1097: 0.0625488
- p2003: 50
- p3151: 0; = p2370*p1023
- p2678: 0.00508082; = p2287*(p1019+p1021)
- p0645: 0; = IF(p0381<0.5;-SQRT(p0007*EXP(p0513^2*p0008)-p0007);SQRT(p0007*EXP(p0513^2*p0008)-p0007))
- p2562: 0.00282834; = p2366*p1014
- p3184: 0; = p2403*p1023
- p0094: 7139.69
- p0448: 0; = SQRT(2)*(IF((2*p0316-1)<0;-1;IF((2*p0316-1)>0;1;0))*SQRT(SQRT((2/(pi()*0.140012289)+LN(1-(2*p0316-1)^2)/2)^2-LN(1-(2*p0316-1)^2)/0.140012289)-(2/(pi()*0.140012289)+LN(1-(2*p0316-1)^2)/2)))
- p1724: 0
- p1321: 4.65721; = IF(((p0745*1000*p0748/100)+(p0754*1000*p0757/100))/p0801<0;0;((p0745*1000*p0748/100)+(p0754*1000*p0757/100))/p0801)
- p4994: 4.69034e-7; = p1821*p3483
- p2421: 0; = p2235*p2211
- p0429: 0; = SQRT(2)*(IF((2*p0297-1)<0;-1;IF((2*p0297-1)>0;1;0))*SQRT(SQRT((2/(pi()*0.140012289)+LN(1-(2*p0297-1)^2)/2)^2-LN(1-(2*p0297-1)^2)/0.140012289)-(2/(pi()*0.140012289)+LN(1-(2*p0297-1)^2)/2)))
- p1221: 0.108582; = p1216*(1+p1220*p1217/100)
- p2020: 143239; = p2015*p2018*p2019
- p1523: 10
- p2603: 0; = p2407*p1014
- p3137: 0; = p2356*p1023
- p2084: 0.21
- p1155: 0.0182184; = if(p1153*p0818=0;0;p1151/(p1153*p0818))
- p1110: 1.76779e6; = IF(p1071=0;p1105*p1104*p1095;0)
- p3228: 0.00552327; = p3224*p1229
- p3270: 0
- p2019: 0.13105
- p0190: 14.371
- p1116: 0.000850964; = IF(p1071=0;p1106/(p1111*p0818);0)
- p0579: 0; = IF(p0315<0.5;-SQRT(p0007*EXP(p0447^2*p0008)-p0007);SQRT(p0007*EXP(p0447^2*p0008)-p0007))
- p0783: 68.803; = p0123*(1+p0651*p0255/100)
- p2944: 0.00109792; = p2358*(p1020+p1022)
- p2063: 2.01468
- p2662: 0.000781182; = p2271*(p1078+p1080)
- p0628: 0; = IF(p0364<0.5;-SQRT(p0007*EXP(p0496^2*p0008)-p0007);SQRT(p0007*EXP(p0496^2*p0008)-p0007))
- p0183: 42.392
- p4968: 6.25379e-7; = p1795*p3483
- p1557: 0
- p1963b: 0.000112608; = p1569*p1773+p1570*p1774+p1571*p1775+p1572*p1776+p1573*p1777+p1574*p1778+p1575*p1779+p1576*p1780+p1577*p1781+p1578*p1782+p1579*p1783+p1580*p1784+p1581*p1785+p1582*p1786+p1583*p1787+p1584*p1788+p1585*p1789+p1586*p1790+p1587*p1791
- p0808: 236000
- p0428: 0; = SQRT(2)*(IF((2*p0296-1)<0;-1;IF((2*p0296-1)>0;1;0))*SQRT(SQRT((2/(pi()*0.140012289)+LN(1-(2*p0296-1)^2)/2)^2-LN(1-(2*p0296-1)^2)/0.140012289)-(2/(pi()*0.140012289)+LN(1-(2*p0296-1)^2)/2)))
- p0475: 0; = SQRT(2)*(IF((2*p0343-1)<0;-1;IF((2*p0343-1)>0;1;0))*SQRT(SQRT((2/(pi()*0.140012289)+LN(1-(2*p0343-1)^2)/2)^2-LN(1-(2*p0343-1)^2)/0.140012289)-(2/(pi()*0.140012289)+LN(1-(2*p0343-1)^2)/2)))
- p2515: 0.000100234; = p2319*p1014
- p0534: 0; = SQRT(2)*(IF((2*p0402-1)<0;-1;IF((2*p0402-1)>0;1;0))*SQRT(SQRT((2/(pi()*0.140012289)+LN(1-(2*p0402-1)^2)/2)^2-LN(1-(2*p0402-1)^2)/0.140012289)-(2/(pi()*0.140012289)+LN(1-(2*p0402-1)^2)/2)))
- p4300: 1.16267e-5; = p1951*p3479
- p0630: 0; = IF(p0366<0.5;-SQRT(p0007*EXP(p0498^2*p0008)-p0007);SQRT(p0007*EXP(p0498^2*p0008)-p0007))
- p2582: 0.000157669; = p2386*p1073
- p2418: 0; = p2235*p2208
- p2971: 3.99653e-5; = p2385*(p1079+p1081)
- p0640: 0; = IF(p0376<0.5;-SQRT(p0007*EXP(p0508^2*p0008)-p0007);SQRT(p0007*EXP(p0508^2*p0008)-p0007))
- p2556: 0.00515145; = p2360*p1014
- p5005: 1.14132e-5; = p1832*p3483
- p1111: 0.0872841
- p0680: 0
- p1212: 0.0308346; = if(p1211=0;0;if(p1193>0;0;(p1207+p1208+p1209)*p1210/(2000*p1211)))
- p3003: 0; = p2417*(p1079+p1081)
- p3776: 1.1797e-5; = p1839*p3477
- p2308: 0.00272822; = p2227*p2215
- p1030: 0.000623839; = IF(p1012=0;p1024*p0001/(p0818*p0002);0)
- p5310: 1.87076e-7; = p1931*p3484
- p3052: 7.44775e-6; = p2271*p1082
- p1101: 0.0625488; = IF(p1071=0;IF(p1096=1;0;IF(p1096+p1097>1;1-p1096;p1097));0)
- p1060: 0.21
- p1816: 0
- p2028: 0.000562642; = p2015*p2026*p2027/(p0818*1000)
- p3360: 0; = if(p1232=0;p3310+p3321+p3332+p3343+p3354;0)
- p2074: 0.025
- p0050: 68.642
- p3119: 0; = p2338*p1082
- p1129: 0.28373; = if(p1121=0;IF(p1123+p1128=1;0;IF(p1123+p1128+p1125>1;1-(p1123+p1128);p1125));0)
- p3145: 0; = p2364*p1023
- p2030: 8.87
- p3888: 0.000213526; = p1951*p3477
- p2464: 9.58735e-5; = p2268*p1073
- p0185: 31.156
- p2339: 0; = p2228*p2207
- p2625: 0; = p2429*p1123
- p1243: 0; = if(p1232>0;0;p1238*(p0725/100)*p0723*1000)
- p0022: 536.405
- p4671: 2.05501e-5; = p1910*p3481
- p3102: 0; = p2321*p1023
- p2415: 0; = p2235*p2205
- p1078: 0.58213; = IF(p1071=0;IF(p1073=1;0;IF(p1073+p1074>1;1-p1073;p1074));0)
- p1917: 0
- p3042: 6.4035e-5; = p2261*p1082
- p4400: 0; = p1845*p3480
- p0761: 0
- p1272: 0; = IF(p1267+p1270+p1271=p1259;0;p1259-(p1267+p1270+p1271))
- p0580: 0; = IF(p0316<0.5;-SQRT(p0007*EXP(p0448^2*p0008)-p0007);SQRT(p0007*EXP(p0448^2*p0008)-p0007))
- p0427: 0; = SQRT(2)*(IF((2*p0295-1)<0;-1;IF((2*p0295-1)>0;1;0))*SQRT(SQRT((2/(pi()*0.140012289)+LN(1-(2*p0295-1)^2)/2)^2-LN(1-(2*p0295-1)^2)/0.140012289)-(2/(pi()*0.140012289)+LN(1-(2*p0295-1)^2)/2)))
- p2641: 0.00361682; = p2250*(p1019+p1021)
- p1232: 535000; = p0801
- p1606: 0
- p2768: 0.000352531; = p2377*(p1078+p1080)
- p1231: 0.0561719; = IF(p1221=0;0;p1230*(p1228+p1229))
- p3378: 0; = if(p1232=0;p3246*p3360/p0818;0)
- p4117: 5.20312e-6; = p1768*p3479
- p1286: 0; = p1282*p1252/p0818
- p4378: 0; = p1823*p3480
- p2125: 2.23984e-5; = p2015*p2053*p2087/(p0818*1000)
- p0347: 0.5
- p3682: 0.000122808; = p1951*p3476
- p2739: 0; = p2348*(p1078+p1080)
- p0753: 1.922; = p0093*(1+p0621*p0225/100)
- p0504: 0; = SQRT(2)*(IF((2*p0372-1)<0;-1;IF((2*p0372-1)>0;1;0))*SQRT(SQRT((2/(pi()*0.140012289)+LN(1-(2*p0372-1)^2)/2)^2-LN(1-(2*p0372-1)^2)/0.140012289)-(2/(pi()*0.140012289)+LN(1-(2*p0372-1)^2)/2)))
- p2403: 0; = p2234*p2192
- p4576: 2.94849e-5; = p1815*p3481
- p1615: 0
- p2907: 7.24163e-5; = p2321*(p1020+p1022)
- p0982: 0.674027; = if(p0886=0;0;min(1;(p0691*p0690*1000*p0693/100)/p0886))
- p2835: 0.000132171; = p2249*(p1020+p1022)
- p1015: 0.24429; = IF(p1012=0;p0706/100;0)
- p1153: 0.365265
- p2966: 7.54548e-5; = p2380*(p1079+p1081)
- p1625: 0
- p5186: 1.12245e-7; = p1807*p3484
- p1785: 4.55018e-5; = p1377*1000/p0818
- p0676: 0
- p0118: 28.363
- p0053: 20.158
- p1859: 0
- p2328: 0.0024826; = p2224*p2196
- p2624: 0; = p2428*p1123
- p0989: 0; = p0985*p0886
- p3163: 1.17463e-5; = p2382*p1082
- p1154: 0.178022; = if(p1152*p0818=0;0;p1150/(p1152*p0818))
- p1201: 0.65
- p2147: 1.06885e-6; = p2015*p2075*p2109/(p0818*1000)
- p3662: 6.78497e-6; = p1931*p3476
- p1389: 63
- p0611: 0; = IF(p0347<0.5;-SQRT(p0007*EXP(p0479^2*p0008)-p0007);SQRT(p0007*EXP(p0479^2*p0008)-p0007))
- p1257: 0; = if(p1232>0;0;IF(p1253+p1256=1;0;IF(p1253+p1256+p1255>1;1-(p1253+p1256);p1255)))
- p0159: 15.346
- p3314: 0; = if(and(p1232=0;p3253<>0);p3263*p3289;0)
- p1736: 0
- p1907: 0
- p3039: 2.63331e-5; = p2258*p1082
- p0857: 15.5134; = p0856*p0001*p0003/(p0818*p0002)
- p1571: 0
- p2452: 6.3766e-5; = p2256*p1014
- p3421: 0; = p3364*p1239
- p1987: 400
- p0809: 2000
- p1493: 21
- p2242: 0.000118868; = p2222*p2187
- p0861: 0; = p0673*1000/p0856
- p3197: 0; = p2416*p1082
- p2417: 0; = p2235*p2207
- p2911: 3.24106e-5; = p2325*(p1020+p1022)
- p1584: 0
- p3130: 0; = p2349*p1082
- p1731: 0
- p1131: 0; = if(p1121=0;IF(p1123+p1128+p1129+p1130=1;0;IF(p1123+p1128+p1129+p1130+p1127>1;1-(p1123+p1128+p1129+p1130);p1127));0)
- p2888: 0.000275148; = p2302*(p1079+p1081)
- p1997: 7.6081e7; = (if(p1152=0;0;p1150/p1152)+if(p1153=0;0;p1151/p1153))*(1+p1157)
- p3428: 0; = p3371*p1239
- p4146: 4.04687e-6; = p1797*p3479
- p4691: 4.73546e-5; = p1930*p3481
- p1566: 0
- p3190: 0; = p2409*p1023
- p3223: 0.126838; = IF(p3216=0;0;(1-p1223)*24.3050/84.3139)
- p1039: 0.0673925
- p3298: 0; = if(p1283+p1284+p1285+p1286=0;0;p1283/(p1283+p1284+p1285+p1286))
- p0047: 10.043
- p0799: 76.77; = p0139*(1+p0667*p0271/100)
- p1799: 0
- p1783: 0
- p1767: 0
- p2593: 0; = p2397*p1014
- p1285: 0; = p1281*p1252/p0818
- p0374: 0.5
- p1553: 0
- p2138: 1.38679e-6; = p2015*p2066*p2100/(p0818*1000)
- p2410: 0; = p2234*p2200
- p2533: 0; = p2337*p1073
- p1627: 0
- p0698: 0
- p2910: 4.00495e-6; = p2324*(p1020+p1022)
- p2223: 0.234855; = if(p0765*p0769+p0766*p0770+p0767*p0771+p0768*p0772=0;0;p0770*p0766/(p0765*p0769+p0766*p0770+p0767*p0771+p0768*p0772))
- p3036: 0; = p2255*p1023
- p2837: 1.25186e-6; = p2251*(p1020+p1022)
- p2635: 0.000128041; = p2244*(p1019+p1021)
- p0523: 0; = SQRT(2)*(IF((2*p0391-1)<0;-1;IF((2*p0391-1)>0;1;0))*SQRT(SQRT((2/(pi()*0.140012289)+LN(1-(2*p0391-1)^2)/2)^2-LN(1-(2*p0391-1)^2)/0.140012289)-(2/(pi()*0.140012289)+LN(1-(2*p0391-1)^2)/2)))
- p2516: 1.4426e-5; = p2320*p1014
- p2782: 0.000243781; = p2391*(p1128+p1130)
- p3037: 0; = p2256*p1023
- p2709: 3.4695e-5; = p2318*(p1019+p1021)
- p0795: 89.622; = p0135*(1+p0663*p0267/100)
- p0447: 0; = SQRT(2)*(IF((2*p0315-1)<0;-1;IF((2*p0315-1)>0;1;0))*SQRT(SQRT((2/(pi()*0.140012289)+LN(1-(2*p0315-1)^2)/2)^2-LN(1-(2*p0315-1)^2)/0.140012289)-(2/(pi()*0.140012289)+LN(1-(2*p0315-1)^2)/2)))
- p1839: 3.25013e-5; = p1431*1000/p0818
- p0184: 15.754
- p2997: 0; = p2411*(p1020+p1022)
- p4792: 0; = p1825*p3482
- p2803: 0; = p2412*(p1019+p1021)
- p1936: 0
- p2823: 0.000727689; = p2237*(p1020+p1022)
- p3457: 0; = p3362*p1241
- p4898: 0; = p1931*p3482
- p2239: 7.64052e-5; = p2222*p2184
- p0907: 0.00734516
- p0817: 0
- p1967: 393750; = if(p0807=480;p0802*p0810;0)
- p3120: 0; = p2339*p1082
- p1618: 0.660002
- p2219: 0.10413; = p1154-p2218
- p2113: 0.832356
- p2991: 0; = p2405*(p1020+p1022)
- p0179: 45.07
- p1842: 0
- p2761: 0.000105012; = p2370*(p1019+p1021)
- p1063: 0.455
- p1898: 0
- p2609: 0; = p2413*p1014
- p1796: 0
- p0236: 0.406
- p1565: 0
- p5104: 7.81723e-7; = p1931*p3483
- p0663: 0; = IF(p0399<0.5;-SQRT(p0007*EXP(p0531^2*p0008)-p0007);SQRT(p0007*EXP(p0531^2*p0008)-p0007))
- p2634: 0.000666419; = p2243*(p1019+p1021)
- p4927: 7.03551e-7; = p1754*p3483
- p2381: 0.000161618; = p2229*p2210
- p0292: 0.5
- p0839: 1.51864; = p0838/p0818
- p2187: 0.00150659; = 4*1.00794*p2186/(2*14.0067)
- p2836: 0.00130651; = p2250*(p1020+p1022)
- p1986: 4200
- p3879: 2.94926e-5; = p1942*p3477
- p2847: 0.0023258; = p2261*(p1079+p1081)
- p3303: 0; = if(and(p1232=0;p3252<>0);p3259*p3289;0)
- p0212: 1.165
- p1074: 0.58213; = IF(p1071=0;p0712/100;0)
- p2901: 0.000218901; = p2315*(p1020+p1022)
- p1699: 0.762907
- p0351: 0.5
- p2750: 0.000437433; = p2359*(p1019+p1021)
- p3394: 0; = p3375*p1234
- p2875: 0.00388907; = p2289*(p1020+p1022)
- p3717: 5.89852e-6; = p1780*p3477
- p1984: 30
- p1880: 0
- p3440: 0; = p3364*p1240
- p1326: 0.464326; = IF(((p0745*1000*p0753/100)+(p0754*1000*p0762/100))/p0801<0;0;((p0745*1000*p0753/100)+(p0754*1000*p0762/100))/p0801)
- p1641: 0.347885
- p1330: 3.74884e6; = p1320*p0801
- p0058: 57.04
- p3930: 2.35221e-6; = p1787*p3478
- p1294: 0; = p1290*p1252/p0818
- p3727: 2.47738e-5; = p1790*p3477
- p0027: 4.512
- p0721: 0
- p1776: 0
- p3031: 0; = p2250*p1023
- p2596: 0; = p2400*p1014
- p2332: 0.00077056; = p2224*p2200
- p2293: 0.00762494; = p2223*p2200
- p1894: 0.00156656; = p1486*1000/p0818
- p0964: 0; = 56/90000
- p1883: 0
- p2764: 0.000581644; = p2373*(p1019+p1021)
- p4387: 0; = p1832*p3480
- p1247: 0; = if(p1232>0;0;p1242*p0001/(p0818*p0002))
- p1191: 0.5
- p0847: 0
- p0636: 0; = IF(p0372<0.5;-SQRT(p0007*EXP(p0504^2*p0008)-p0007);SQRT(p0007*EXP(p0504^2*p0008)-p0007))
- p3222: 0.224242; = IF(p3216=0;0;p1223*40.078/100.0869)
- p0520: 0; = SQRT(2)*(IF((2*p0388-1)<0;-1;IF((2*p0388-1)>0;1;0))*SQRT(SQRT((2/(pi()*0.140012289)+LN(1-(2*p0388-1)^2)/2)^2-LN(1-(2*p0388-1)^2)/0.140012289)-(2/(pi()*0.140012289)+LN(1-(2*p0388-1)^2)/2)))
- p1963: 0.00904373; = p1963a+p1963b+p1963c+p1963d+p1963e+p1963f+p1963g+p1963h+p1963i+p1963j+p1963k
- p2357: 0.00220987; = p2225*p2185
- p1100: 0.261145
- p3461: 0; = p3366*p1241
- p2370: 0.000239617; = p2225*p2199
- p2396: 0; = p2234*p2185
- p1966: 0; = if(p0814=0;p0802;0)
- p1804: 1.95008e-5; = p1396*1000/p0818
- p1522: 106
- p2105: 0.888194
- p1765: 0
- p2612: 0; = p2416*p1073
- p1274: 0; = p1270*p1252/p0818
- p0736: 0
- p5201: 3.74151e-7; = p1822*p3484
- p3127: 0; = p2346*p1082
- p0551: 0; = IF(p0287<0.5;-SQRT(p0007*EXP(p0419^2*p0008)-p0007);SQRT(p0007*EXP(p0419^2*p0008)-p0007))
- p2401: 0; = p2234*p2190
- p2869: 0.000137679; = p2283*(p1020+p1022)
- p0614: 0; = IF(p0350<0.5;-SQRT(p0007*EXP(p0482^2*p0008)-p0007);SQRT(p0007*EXP(p0482^2*p0008)-p0007))
- p2407: 0; = p2234*p2197
- p0884: 6.401; = IF(p0689=100;0;IF(p0689+p0688>100;100-p0689;p0688))
- p1002: 40724.9; = p0996*p0888
- p3362: 0; = if(p1232=0;p3244*p3356/p0818;0)
- p2251: 7.90765e-6; = p2222*p2197
- p2489: 0.0030762; = p2293*p1014
- p5052: 7.81723e-8; = p1879*p3483
- p2885: 0.000445147; = p2299*(p1079+p1081)
- p3396: 0; = p3377*p1234
- p2307: 0.000722961; = p2227*p2214
- p1781: 0
- p2303: 0.000589344; = p2227*p2210
- p3033: 0; = p2252*p1023
- p2976: 0.0018975; = p2390*(p1129+p1131)
- p4219: 1.15625e-6; = p1870*p3479
- p1327a: 0.111119; = (p0745*1000/p0801)*(1-(p0746+p0747+p0748+p0749+p0750+p0751+p0752+p0753)/100)+(p0754*1000/p0801)*(1-(p0755+p0756+p0757+p0758+p0759+p0760+p0761+p0762)/100)
- p3839: 7.66808e-5; = p1902*p3477
- p0895: 1.67859e8; = p0894*p0830
- p1931: 3.25013e-5; = p1523*1000/p0818
- p3143: 0; = p2362*p1023
- p3947: 4.70443e-6; = p1804*p3478
- p3056: 0.000123042; = p2275*p1132
- p3112: 0; = p2331*p1023
- p1189: 0.00155134; = p0801*p0001/(p0818*p0002)
- p1118: 0.0045122; = IF(p1071=0;p1108/(p1113*p0818);0)
- p2740: 0; = p2349*(p1078+p1080)
- p2735: 0; = p2344*(p1078+p1080)
- p3412: 0; = p3374*p1238
- p0738: 536.405; = p0078*(1+p0606*p0210/100)
- p3087: 2.26457e-6; = p2306*p1082
- p4640: 4.46741e-7; = p1879*p3481
- p1281: 0; = IF(p1277+p1280=p1263;0;IF(p1277+p1280+p1279>p1263;p1263-(p1277+p1280);p1279))
- p2935: 0; = p2349*(p1079+p1081)
- p1296: 0; = p1292*p1252/p0818
- p0837: 0.5
- p0873: 0.566196; = p0872*p0001*p0003/(p0818*p0002)
- p0976: 0; = IF(p0687=0;IF(OR(p0686=0;p0689=0);0;p0686*1000*p0689/100);0)
- p0798: 68.642; = p0138*(1+p0666*p0270/100)
- p4359: 0; = p1804*p3480
- p3025: 0; = p2244*p1023
- p1963f: 0.000133769; = p1647*p1851+p1648*p1852+p1649*p1853+p1650*p1854+p1651*p1855+p1652*p1856+p1653*p1857+p1654*p1858+p1655*p1859+p1656*p1860+p1657*p1861+p1658*p1862+p1659*p1863+p1660*p1864+p1661*p1865+p1662*p1866+p1663*p1867+p1664*p1868+p1665*p1869+p1666*p1870
- p3892: 9.79155e-5; = p1955*p3477
- p3555: 7.25992e-5; = p1824*p3476
- p1029: 0; = IF(p1012=0;IF(p0801<p1023*(p0704/100)*p0703*1000;p0801;p1023*(p0704/100)*p0703*1000);0)
- p2674: 0.000381137; = p2283*(p1019+p1021)
- p1151: 2.04747e6; = if(p1121=0;p1149*p1148*p1145;0)
- p1069: 0.00062641; = IF(p1012=0;p1055/(p1062*p0818);0)
- p0378: 0.5
- p0671: 19.526; = p0011*(1+p0539*p0143/100)
- p0357: 0.5
- p3022: 0; = p2241*p1023
- p1327: 0.111119; = if(p1318=0;if(p1327a=0;1;if(p1327a<0;0;p1327a));0)
- p2477: 0.00014275; = p2281*p1014
- p3067: 0; = p2286*p1023
- p3287: 0
- p1629: 0
- p0986: 0; = IF(p0982+p0985=1;0;IF(p0982+p0985+p0984>1;1-(p0982+p0985);p0984))
- p1117: 0.00656934; = IF(p1071=0;p1107/(p1112*p0818);0)
- p5336: 2.05783e-7; = p1957*p3484
- p1722: 0
- p2509: 0.000463874; = p2313*p1123
- p4054: 0.000136428; = p1911*p3478
- p1219: 0; = if(p1218=0;0;SQRT(2)*(IF((2*p1218-1)<0;-1;IF((2*p1218-1)>0;1;0))*SQRT(SQRT((2/(pi()*0.140012289)+LN(1-(2*p1218-1)^2)/2)^2-LN(1-(2*p1218-1)^2)/0.140012289)-(2/(pi()*0.140012289)+LN(1-(2*p1218-1)^2)/2))))
- p2968: 0.000426634; = p2382*(p1079+p1081)
- p2664: 0.0185441; = p2273*(p1128+p1130)
- p2189: 0.00370304; = p1053/p0818
- p3258: 0
- p2033: 5.17399e-5; = p2015*p2029*p2031/(p0818*1000)
- p2503: 0.000152357; = p2307*p1073
- p1339: 0.00411655; = p1338*p0001/(p0818*p0002)
- p4664: 2.23371e-5; = p1903*p3481
- p0759: 0
- p3078: 4.18471e-5; = p2297*p1082
- p2406: 0; = p2234*p2196
- p0822: 0.916
- p1132: 0.03408; = if(p1121=0;IF(p1123+p1128+p1129+p1130+p1131=1;0;1-(p1123+p1128+p1129+p1130+p1131));0)
- p1302: 0; = IF(p1297+p1300+p1301=p1262;0;p1262-(p1297+p1300+p1301))
- p0239: 50.749
- p3705: 9.55561e-5; = p1768*p3477
- p2522: 0.000472673; = p2326*p1014
- p0768: 85.252; = p0108*(1+p0636*p0240/100)
- p3964: 4.70443e-6; = p1821*p3478
- p1814: 0
- p0082: 94.42
- p2161: 1.58954e-7; = p2015*p2085*p2123/(p0818*1000)
- p1940: 0
- p0137: 42.127
- p1382: 21
- p0514: 0; = SQRT(2)*(IF((2*p0382-1)<0;-1;IF((2*p0382-1)>0;1;0))*SQRT(SQRT((2/(pi()*0.140012289)+LN(1-(2*p0382-1)^2)/2)^2-LN(1-(2*p0382-1)^2)/0.140012289)-(2/(pi()*0.140012289)+LN(1-(2*p0382-1)^2)/2)))
- p1932: 0
- p1700: 0
- p0691: 4.321; = p0031*(1+p0559*p0163/100)
- p2151: 2.98977e-7; = p2015*p2079*p2113/(p0818*1000)
- p3297: 0; = if(p1273+p1274+p1275+p1276=0;0;p1273/(p1273+p1274+p1275+p1276))
- p2852: 4.94968e-6; = p2266*(p1079+p1081)
- p4861: 0; = p1894*p3482
- p4754: 0; = p1787*p3482
- p4922: 0; = p1955*p3482
- p2017: 2.50514e6; = p2015*p0898
- p2531: 0.000219905; = p2335*p1014
- p3949: 3.21469e-5; = p1806*p3478
- p4376: 0; = p1821*p3480
- p1011: 9.06247e-7; = p1010*p0001*p0004/(p0818*p0002)
- p0417: 0; = SQRT(2)*(IF((2*p0285-1)<0;-1;IF((2*p0285-1)>0;1;0))*SQRT(SQRT((2/(pi()*0.140012289)+LN(1-(2*p0285-1)^2)/2)^2-LN(1-(2*p0285-1)^2)/0.140012289)-(2/(pi()*0.140012289)+LN(1-(2*p0285-1)^2)/2)))
- p0422: 0; = SQRT(2)*(IF((2*p0290-1)<0;-1;IF((2*p0290-1)>0;1;0))*SQRT(SQRT((2/(pi()*0.140012289)+LN(1-(2*p0290-1)^2)/2)^2-LN(1-(2*p0290-1)^2)/0.140012289)-(2/(pi()*0.140012289)+LN(1-(2*p0290-1)^2)/2)))
- p1260: 0; = if(p1232>0;0;p0731/100)
- p2767: 0.00108864; = p2376*(p1078+p1080)
- p1259: 0; = if(p1232>0;0;p0730/100)
- p2702: 0.026282; = p2311*(p1128+p1130)
- p1071: 0
- p1560: 0
- p2109: 0.826583
- p1952: 0
- p1897: 3.57514e-5; = p1489*1000/p0818
- p3154: 0; = p2373*p1023
- p0687: 4.512; = p0027*(1+p0555*p0159/100)
- p2642: 3.46553e-6; = p2251*(p1019+p1021)
- p2309: 0.00023794; = p2227*p2216
- p0758: 0
- p1329: 0.00625209; = p1328*p0001/(p0818*p0002)
- p3088: 4.01243e-6; = p2307*p1082
- p1001: 0.0423783; = if(p0978>0;0;if(and(p0687=0;p0691=0;p0695=0;p0699=0);0;IF(p0996+p0999+p1000=1;0;1-(p0996+p0999+p1000))))
- p0130: 10.808
- p2563: 0.0279582; = p2367*p1014
- p3465: 0; = p3370*p1241
- p1139: 0.000126054; = if(p1121=0;p1133*p0001/(p0818*p0002);0)
- p2032: 0.448886
- p0042: 536.405
- p2807: 0; = p2416*(p1078+p1080)
- p0983: 0; = if(p0886=0;0;min(1;(p0695*p0694*1000*p0697/100)/p0886))
- p4541: 2.23371e-6; = p1780*p3481
- p2541: 0; = p2345*p1073
- p0174: 0
- p3230: 8.83775e-7; = p1170/p0818
- p3472: 0; = p3377*p1241
- p4839: 0; = p1872*p3482
- p2013: 0.65
- p0163: 18.587
- p0032: 8.789
- p3933: 1.64655e-5; = p1790*p3478
- p0607: 0; = IF(p0343<0.5;-SQRT(p0007*EXP(p0475^2*p0008)-p0007);SQRT(p0007*EXP(p0475^2*p0008)-p0007))
- p1885: 0
- p3546: 4.47808e-5; = p1815*p3476
- p1593: 0.689607
- p3057: 0; = p2276*p1023
- p1550: 0.783979
- p2723: 0.000337698; = p2332*(p1019+p1021)
- p1847: 0
- p3260: 0
- p2517: 0.000184547; = p2321*p1014
- p0049: 5.789
- p3483: 0.0240521; = if(p1328+p1330+p1332+p1334+p1336+p1338+p1340+p1342+p1344=0;0;p1342/(p1328+p1330+p1332+p1334+p1336+p1338+p1340+p1342+p1344))
- p5166: 5.61227e-8; = p1787*p3484
- p1236: 0; = if(p1232>0;0;p0728/100)
- p0218: 8.156
- p1138: 13252.6; = if(p1121=0;p1132*(p0716/100)*p0703*1000;0)
- p2179: 0.01765; = p0970+p0971+p0972
- p2121: 0.822447
- p0113: 68.642
- p2524: 0.00100158; = p2328*p1014
- p5084: 1.3602e-5; = p1911*p3483
- p1953: 0
- p0044: 99.414
- p2216: 0.00045292; = p1108/p0818
- p1933: 0
- p4046: 3.92036e-5; = p1903*p3478
- p2004: 30
- p2469: 0.00363437; = p2273*p1123
- p1756: 0
- p3446: 0; = p3370*p1240
- p4872: 0; = p1905*p3482
- p0489: 0; = SQRT(2)*(IF((2*p0357-1)<0;-1;IF((2*p0357-1)>0;1;0))*SQRT(SQRT((2/(pi()*0.140012289)+LN(1-(2*p0357-1)^2)/2)^2-LN(1-(2*p0357-1)^2)/0.140012289)-(2/(pi()*0.140012289)+LN(1-(2*p0357-1)^2)/2)))
- p0181: 53.546
- p2732: 0; = p2341*(p1078+p1080)
- p2535: 0; = p2339*p1073
- p2227: 0.525347; = if(p0774*p0778+p0775*p0779+p0776*p0780+p0777*p0781=0;0;p0779*p0775/(p0774*p0778+p0775*p0779+p0776*p0780+p0777*p0781))
- p3998: 6.19416e-5; = p1855*p3478
- p2938: 0; = p2352*(p1129+p1131)
- p2853: 5.1758e-5; = p2267*(p1079+p1081)
- p0901: 0.01746
- p3174: 0; = p2393*p1023
- p2719: 0.001088; = p2328*(p1019+p1021)
- p3316: 0; = if(and(p1232=0;p3253<>0);1-(p3312+p3313+p3314+p3315);0)
- p2430: 0; = p2236*p2220
- p1312: 0; = IF(p1307+p1310+p1311=p1266;0;p1266-(p1307+p1310+p1311))
- p3381: 0; = p3362*p1234
- p2727: 0; = p2336*(p1078+p1080)
- p2733: 0; = p2342*(p1078+p1080)
- p4864: 0; = p1897*p3482
- p2942: 0.000101568; = p2356*(p1020+p1022)
- p0883: 0.129269; = p0882*p0001*p0003/(p0818*p0002)
- p0689: 91.747; = p0029*(1+p0557*p0161/100)
- p3825: 0.00125874; = p1888*p3477
- p1727: 0.836582
- p2670: 0.000343318; = p2279*(p1019+p1021)
- p2543: 0; = p2347*p1073
- p3354: 0; = IF((p3350+p3351+p3352+p3353)+IF(p3349=0;0;(p3256*(p3273*(1-p3277))/p3349))>p3256;p3256-(p3350+p3351+p3352+p3353);IF(p3349=0;0;p3256*(p3273*(1-p3277))/p3349))
- p3398: 0; = p3379*p1234
- p5183: 1.12245e-7; = p1804*p3484
- p4897: 0; = p1930*p3482
- p1906: 0
- p1372: 5
- p1791: 0
- p2486: 9.49638e-6; = p2290*p1014
- p3208: 0; = p2427*p1082
- p2633: 5.20939e-5; = p2242*(p1019+p1021)
- p1841: 0
- p2762: 0.00942652; = p2371*(p1019+p1021)
- p2627: 0; = p2431*p1123
- p3164: 5.9389e-8; = p2383*p1082
- p2984: 0; = p2398*(p1020+p1022)
- p3066: 0; = p2285*p1023
- p1160: 0.415521; = (p1156+p1158)*p1159
- p3318: 0; = if(and(p1232=0;p3253<>0);p3253*(p3262-p3313)/p3316;0)
- p1827: 0
- p1489: 11
- p3802: 2.35941e-6; = p1865*p3477
- p3430: 0; = p3373*p1239
- p2031: 0.465411
- p2621: 0; = p2425*p1073
- p0765: 39.088; = p0105*(1+p0633*p0237/100)
- p1707: 0.356204
- p1481: 63
- p4909: 0; = p1942*p3482
- p2965: 0.000166857; = p2379*(p1079+p1081)
- p3894: 1.29767e-5; = p1957*p3477
- p1310: 0; = IF(p1307=p1266;0;IF(p1307+p1308>p1266;p1266-p1307;p1308))
- p3661: 7.19207e-5; = p1930*p3476
- p1177: 0.00155134; = p0801*p0001/(p0818*p0002)
- p0743: 4.524; = p0083*(1+p0611*p0215/100)
- p3246: 1; = IF(p3244+p3245=1;0;1-(p3244+p3245))
- p0639: 0; = IF(p0375<0.5;-SQRT(p0007*EXP(p0507^2*p0008)-p0007);SQRT(p0007*EXP(p0507^2*p0008)-p0007))
- p0715: 0
- p4869: 0; = p1902*p3482
- p0735: 0
- p1597: 0
- p0788: 62.751; = p0128*(1+p0656*p0260/100)
- p3456: 0; = p3380*p1240
- p0690: 107.235; = p0030*(1+p0558*p0162/100)
- p0237: 31.15
- p4870: 0; = p1903*p3482
- p5334: 1.55273e-6; = p1955*p3484
- p3166: 1.10034e-6; = p2385*p1082
- p1517: 6
- p0390: 0.5
- p1022: 0.05788; = IF(p1012=0;IF(p1014+p1019+p1020+p1021=1;0;IF(p1014+p1019+p1020+p1021+p1018>1;1-(p1014+p1019+p1020+p1021);p1018));0)
- p2821: 0; = p2430*(p1128+p1130)
- p1315: 0; = p1311*p1252/p0818
- p2988: 0; = p2402*(p1020+p1022)
- p2592: 0; = p2396*p1014
- p5251: 1.21412e-5; = p1872*p3484
- p2127: 4.01927e-5; = p2015*p2055*p2089/(p0818*1000)
- p0918: 0; = p0680*1000/p0801
- p1915: 0
- p1608: 0
- p1646: 0
- p3807: 2.12347e-5; = p1870*p3477
- p2071: 0.151
- p0228: 11.887
- p2999: 0; = p2413*(p1020+p1022)
- p1413: 6
- p3302: 0; = if(and(p1232=0;p3252<>0);p3258*(p3278*(p3282*p1256+p3286*(p1253+p1257)+p1258*p3288+p3297*p3287));0)
- p4485: 0; = p1930*p3480
- p1150: 2.27352e7; = if(p1121=0;p1149*p1146*p1145;0)
- p0850: 0
- p4877: 0; = p1910*p3482
- p1911: 0.000565523; = p1503*1000/p0818
- p2197: 0.000100226; = p1055/p0818
- p2688: 0.00438927; = p2297*(p1078+p1080)
- p0775: 34.997; = p0115*(1+p0643*p0247/100)
- p3216: 0.06; = IF(OR(p1226=0;p1228=0);0;1-p3213-p3214-p3215)
- p2912: 0.000185477; = p2326*(p1020+p1022)
- p2358: 0.00693523; = p2225*p2186
- p1595: 0
- p0505: 0; = SQRT(2)*(IF((2*p0373-1)<0;-1;IF((2*p0373-1)>0;1;0))*SQRT(SQRT((2/(pi()*0.140012289)+LN(1-(2*p0373-1)^2)/2)^2-LN(1-(2*p0373-1)^2)/0.140012289)-(2/(pi()*0.140012289)+LN(1-(2*p0373-1)^2)/2)))
- p1213: 4
- p3402: 0; = p3364*p1238
- p3570: 6.78497e-6; = p1839*p3476
- p2808: 0; = p2417*(p1078+p1080)
- p1594: 0
- p2876: 3.72638e-6; = p2290*(p1020+p1022)
- p2180: 2.64027e-7; = p3233*p1188/(p0818)
- p3276: 0
- p2926: 0; = p2340*(p1079+p1081)
- p2457: 0.00243148; = p2261*p1073
- p1970: 535000; = p0801
- p3399: 0; = p3380*p1234
- p0866: 0; = IF(p0858+p0864+p0865=1;0;IF(p0858+p0864+p0865+p0861>1;1-(p0858+p0864+p0865);p0861))
- p2986: 0; = p2400*(p1020+p1022)
- p1187: 0.00025142
- p2256: 0.000158056; = p2222*p2202
- p1288: 0
- p0388: 0.5
- p1599: 0
- p0220: 19.406
- p3689: 1.76829e-5; = p1962*p3476
- p3345: 0; = if(and(p1232=0;p3256<>0);p3273*p3277*p3293;0)
- p3211: 0; = p2430*p1132
- p3106: 0; = p2325*p1023
- p2950: 0.000904712; = p2364*(p1020+p1022)
- p2136: 1.04068e-5; = p2015*p2064*p2098/(p0818*1000)
- p0178: 26.784
- p1982: 750
- p3759: 2.35941e-5; = p1822*p3477
- p2014: 6.4142e6; = p0833*p2011*p2013
- p4259: 2.95486e-6; = p1910*p3479
- p0518: 0; = SQRT(2)*(IF((2*p0386-1)<0;-1;IF((2*p0386-1)>0;1;0))*SQRT(SQRT((2/(pi()*0.140012289)+LN(1-(2*p0386-1)^2)/2)^2-LN(1-(2*p0386-1)^2)/0.140012289)-(2/(pi()*0.140012289)+LN(1-(2*p0386-1)^2)/2)))
- p2581: 4.17813e-5; = p2385*p1073
- p2974: 0.000117886; = p2388*(p1079+p1081)
- p3404: 0; = p3366*p1238
- p1570: 0
- p1815: 0.000214509; = p1407*1000/p0818
- p3444: 0; = p3368*p1240
- p1275: 0; = p1271*p1252/p0818
- p5096: 7.81723e-7; = p1923*p3483
- p1677: 0
- p4040: 8.62478e-6; = p1897*p3478
- p3008: 0; = p2422*(p1079+p1081)
- p3133: 0; = p2352*p1132
- p2897: 0.0130733; = p2311*(p1129+p1131)
- p2838: 2.05473e-6; = p2252*(p1020+p1022)
- p2376: 0.0018701; = p2229*p2205
- p3407: 0; = p3369*p1238
- p2896: 0.000429875; = p2310*(p1079+p1081)
- p2049: 25.6942
- p3337: 0; = IF(or(p3254=0;p1232>0);0;p3272*p3289)
- p2302: 0.00136496; = p2227*p2209
- p3636: 6.78497e-6; = p1905*p3476
- p0353: 0.5
- p1338: 1.41964e6; = p1324*p0801
- p0454: 0; = SQRT(2)*(IF((2*p0322-1)<0;-1;IF((2*p0322-1)>0;1;0))*SQRT(SQRT((2/(pi()*0.140012289)+LN(1-(2*p0322-1)^2)/2)^2-LN(1-(2*p0322-1)^2)/0.140012289)-(2/(pi()*0.140012289)+LN(1-(2*p0322-1)^2)/2)))
- p3198: 0; = p2417*p1082
- p3280: 0
- p1990: 30
- p2261: 0.0115378; = p2226*p2207
- p2784: 0; = p2393*(p1019+p1021)
- p2185: 0.0033356; = p1065-p2184
- p3410: 0; = p3372*p1238
- p3159: 2.79062e-5; = p2378*p1082
- p0115: 34.997
- p1045: 0.0673925; = IF(p1012=0;IF(p1037+p1044=1;0;IF(p1037+p1044+p1039>1;1-(p1037+p1044);p1039));0)
- p0085: 3188.5
- p1963k: 0.000416873; = p1744*p1948+p1745*p1949+p1746*p1950+p1747*p1951+p1748*p1952+p1749*p1953+p1750*p1954+p1751*p1955+p1752*p1956+p1753*p1957+p1961*p1962
- p3018: 0; = p2237*p1023
- p5128: 6.4883e-6; = p1955*p3483
- p2154: 2.27713e-6; = p2015*p2082*p2116/(p0818*1000)
- p2168: 0.0225811; = p2166*(p0903)
- p1828: 0
- p0121: 15.542
- p3535: 4.07098e-6; = p1804*p3476
- p2506: 0.000449409; = p2310*p1073
- p1735: 0
- p2765: 0.00666809; = p2374*(p1019+p1021)
- p1904: 0
- p2947: 0.000388384; = p2361*(p1020+p1022)
- p0643: 0; = IF(p0379<0.5;-SQRT(p0007*EXP(p0511^2*p0008)-p0007);SQRT(p0007*EXP(p0511^2*p0008)-p0007))
- p3121: 0; = p2340*p1082
- p1051: 297957; = IF(p1012=0;p1044*p1036;0)
- p1081: 0; = IF(p1071=0;IF(p1073+p1078+p1079+p1080=1;0;IF(p1073+p1078+p1079+p1080+p1077>1;1-(p1073+p1078+p1079+p1080);p1077));0)
- p1800: 0
- p1811: 0
- p4720: 0.00124309; = p1963*p3481
- p3342: 0; = if(and(p1232=0;p3254<>0);p3254*(p3272-p3337)/p3338;0)
- p0502: 0; = SQRT(2)*(IF((2*p0370-1)<0;-1;IF((2*p0370-1)>0;1;0))*SQRT(SQRT((2/(pi()*0.140012289)+LN(1-(2*p0370-1)^2)/2)^2-LN(1-(2*p0370-1)^2)/0.140012289)-(2/(pi()*0.140012289)+LN(1-(2*p0370-1)^2)/2)))
- p2540: 0; = p2344*p1073
- p1746: 0
- p3242: 1.47995e-7; = p3234*p1188*p3238/p0818
- p0513: 0; = SQRT(2)*(IF((2*p0381-1)<0;-1;IF((2*p0381-1)>0;1;0))*SQRT(SQRT((2/(pi()*0.140012289)+LN(1-(2*p0381-1)^2)/2)^2-LN(1-(2*p0381-1)^2)/0.140012289)-(2/(pi()*0.140012289)+LN(1-(2*p0381-1)^2)/2)))
- p5267: 1.9961e-5; = p1888*p3484
- p2523: 0.000101323; = p2327*p1014
- p4085: 1.96018e-5; = p1942*p3478
- p2286: 0.00202586; = p2223*p2192
- p5133: 1.68368e-7; = p1754*p3484
- p5194: 1.2347e-6; = p1815*p3484
- p2552: 0.000258837; = p2356*p1014
- p3204: 0; = p2423*p1082
- p0723: 536.405; = p0063*(1+p0591*p0195/100)
- p3013: 0; = p2427*(p1079+p1081)
- p2349: 0; = p2228*p2217
- p1050: 1.79254e7; = IF(p1012=0;p1037*p1036;0)
- p2217: 0.00405928; = p1118-p2216
- p2115: 0.856281
- p0750: 0
- p3313: 0; = if(and(p1232=0;p3253<>0);p3262*(p3278*(p3282*p1256+p3286*(p1253+p1257)+p1258*p3288+p3298*p3287));0)
- p0012: 454.096
- p0350: 0.5
- p3371: 0; = if(p1232=0;p3245*p3359/p0818;0)
- p4832: 0; = p1865*p3482
- p0936: 0; = p0930*p0001/(p0818*p0002)
- p1946: 0
- p1865: 6.50026e-6; = p1457*1000/p0818
- p2898: 0.018423; = p2312*(p1129+p1131)
- p2730: 0; = p2339*(p1078+p1080)
- p5309: 1.983e-6; = p1930*p3484
- p2923: 0; = p2337*(p1079+p1081)
- p2570: 0.00613845; = p2374*p1014
- p1447: 79
- p4506: 0; = p1951*p3480
- p2351: 0; = p2232*p2219
- p0371: 0.5
- p4449: 0; = p1894*p3480
- p0260: 19.398
- p2657: 1.42939e-5; = p2266*(p1078+p1080)
- p0942: 0; = if(and(p0683=0;p0948=0);p0936;0)
- p5204: 1.44048e-6; = p1825*p3484
- p2860: 0.000589488; = p2274*(p1129+p1131)
- p2983: 0; = p2397*(p1020+p1022)
- p4274: 3.85416e-7; = p1925*p3479
- p0844: 0.403763
- p0762: 2.621; = p0102*(1+p0630*p0234/100)
- p0714: 0
- p0649: 0; = IF(p0385<0.5;-SQRT(p0007*EXP(p0517^2*p0008)-p0007);SQRT(p0007*EXP(p0517^2*p0008)-p0007))
- p1774: 0
- p2276: 0.0136826; = p2223*p2182
- p0616: 0; = IF(p0352<0.5;-SQRT(p0007*EXP(p0484^2*p0008)-p0007);SQRT(p0007*EXP(p0484^2*p0008)-p0007))
- p1633: 0
- p2024: 0.748682
- p4789: 0; = p1822*p3482
- p1891: 0
- p0781: 15.542; = p0121*(1+p0649*p0253/100)
- p4294: 4.23958e-6; = p1945*p3479
- p3792: 9.31966e-5; = p1855*p3477
- p1398: 41
- p1926: 0
- p1854: 0
- p2958: 0.00145987; = p2372*(p1020+p1022)
- p0578: 0; = IF(p0314<0.5;-SQRT(p0007*EXP(p0446^2*p0008)-p0007);SQRT(p0007*EXP(p0446^2*p0008)-p0007))
- p1290: 0; = IF(p1287=p1264;0;IF(p1287+p1288>p1264;p1264-p1287;p1288))
- p3329: 0; = if(and(p1232=0;p3255<>0);p3255*(p3266-p3324)/p3327;0)
- p1199: -0.29
- p2451: 0.000443058; = p2255*p1014
- p0623: 0; = IF(p0359<0.5;-SQRT(p0007*EXP(p0491^2*p0008)-p0007);SQRT(p0007*EXP(p0491^2*p0008)-p0007))
- p0002: 0.453592
- p0021: 536.405
- p0492: 0; = SQRT(2)*(IF((2*p0360-1)<0;-1;IF((2*p0360-1)>0;1;0))*SQRT(SQRT((2/(pi()*0.140012289)+LN(1-(2*p0360-1)^2)/2)^2-LN(1-(2*p0360-1)^2)/0.140012289)-(2/(pi()*0.140012289)+LN(1-(2*p0360-1)^2)/2)))
- p2260: 0.00138961; = p2226*p2206
- p1017: 0.19396; = IF(p1012=0;p0708/100;0)
- p3867: 0.000125049; = p1930*p3477
- p3317: 0; = if(and(p1232=0;p3253<>0);p3253*(p3261*p3277-p3312)/p3316;0)
- p1772: 0
- p4136: 1.92708e-7; = p1787*p3479
- p1156: 0.659529; = p1064+p1065+p1066+p1067+p1068+p1069+p1070+p1116+p1117+p1118+p1119+p1120+p1154+p1155
- p0902: 0.0377084
- p2005: 7.37703e6; = p1963*p0818+p1959*1000+p1170+p1176+p1182
- p1176: 52.2678; = p1175*p0801
- p3462: 0; = p3367*p1241
- p1874: 0
- p1674: 0
- p1414: 20
- p3072: 0; = p2291*p1023
- p0958: 0; = if(and(p0683>0;or(p0807=480;p0807=32;p0807=1;and(p0807=60;p0901<0.03)));p0934;0)
- p1669: 0
- p0770: 40.599; = p0110*(1+p0638*p0242/100)
- p0498: 0; = SQRT(2)*(IF((2*p0366-1)<0;-1;IF((2*p0366-1)>0;1;0))*SQRT(SQRT((2/(pi()*0.140012289)+LN(1-(2*p0366-1)^2)/2)^2-LN(1-(2*p0366-1)^2)/0.140012289)-(2/(pi()*0.140012289)+LN(1-(2*p0366-1)^2)/2)))
- p3005: 0; = p2419*(p1079+p1081)
- p2474: 9.17559e-5; = p2278*p1014
- p0011: 19.526
- p2818: 0; = p2427*(p1078+p1080)
- p1929: 0
- p1135: 110333; = if(p1121=0;p1129*(p0716/100)*p0703*1000;0)
- p1612: 0
- p4890: 0; = p1923*p3482
- p3375: 0; = if(p1232=0;p3246*p3357/p0818;0)
- p2220: 0.00665454; = p1151/p0818
- p2604: 0; = p2408*p1014
- p1878: 0
- p1623: 0
- p2272: 0.0230702; = p2230*p2218
- p0540: 0; = IF(p0276<0.5;-SQRT(p0007*EXP(p0408^2*p0008)-p0007);SQRT(p0007*EXP(p0408^2*p0008)-p0007))
- p0373: 0.5
- p1552: 0
- p2864: 3.6005e-5; = p2278*(p1020+p1022)
- p0253: 33.122
- p0142: 0
- p0852: 0; = p0847*p0851^3+p0848*p0851^2+p0849*p0851+p0850
- p0271: 8.532
- p1698: 0.784351
- p2848: 0.000382879; = p2262*(p1079+p1081)
- p0864: 0.0364972; = IF(p0858=1;0;IF(p0858+p0859>1;1-p0858;p0859))
- p0865: 0.848778; = IF(p0858+p0864=1;0;IF(p0858+p0864+p0860>1;1-(p0858+p0864);p0860))
- p2504: 0.000574946; = p2308*p1073
- p4171: 1.28472e-6; = p1822*p3479
- p1763: 0
- p2442: 3.39285e-5; = p2246*p1014
- p0954: 0; = if(and(p0683>0;or(p0807=56;p0807=100;and(p0807=60;p0901>0.06)));p0936;0)
- p3642: 0.000118059; = p1911*p3476
- p5304: 1.12245e-7; = p1925*p3484
- p1665: 0
- p1246: 0; = if(p1232>0;0;p1241*(p0725/100)*p0723*1000)
- p0703: 536.405; = p0043*(1+p0571*p0175/100)
- p1871: 0
- p1040: 0.0238398
- p3320: 0; = if(and(p1232=0;p3253<>0);p3253*(p3264-p3315)/p3316;0)
- p0003: 10000
- p0285: 0.5
- p1054: 1.51883e7; = IF(p1012=0;p1047*p1036;0)
- p3032: 0; = p2251*p1023
- p2878: 1.34472e-5; = p2292*(p1020+p1022)
- p3576: 0.000224583; = p1845*p3476
- p0675: 0
- p2155: 2.2069e-6; = p2015*p2084*p2117/(p0818*1000)
- p1862: 0
- p2683: 3.72261e-5; = p2292*(p1019+p1021)
- p0535: 0; = SQRT(2)*(IF((2*p0403-1)<0;-1;IF((2*p0403-1)>0;1;0))*SQRT(SQRT((2/(pi()*0.140012289)+LN(1-(2*p0403-1)^2)/2)^2-LN(1-(2*p0403-1)^2)/0.140012289)-(2/(pi()*0.140012289)+LN(1-(2*p0403-1)^2)/2)))
- p1234: 0; = if(p1232>0;0;p0726/100)
- p2398: 0; = p2234*p2187
- p2655: 0.000215887; = p2264*(p1078+p1080)
- p1032: 0.000155295; = IF(p1012=0;p1026*p0001/(p0818*p0002);0)
- p2776: 0.000115413; = p2385*(p1078+p1080)
- p2895: 4.7964e-5; = p2309*(p1079+p1081)
- p0937: 0; = p0931*p0001/(p0818*p0002)
- p0892: 0; = if(p0891=0;0;(1-p1240)*p3251/p0891)
- p2081: 0.0019
- p2819: 0; = p2428*(p1128+p1130)
- p2744: 0; = p2353*(p1128+p1130)
- p4103: 5.78124e-7; = p1754*p3479
- p3310: 0; = if(and(p1232=0;p3252<>0);IF((p3306+p3307+p3308+p3309)+(p3252*(p3257*(1-p3277))/p3305)>p3252;p3252-(p3306+p3307+p3308+p3309);p3252*(p3257*(1-p3277))/p3305);0)
- p3263: 0
- p2939: 0; = p2353*(p1129+p1131)
- p1005: 1802.23; = p1001*p0888
- p0006: 15
- p2555: 0.000402688; = p2359*p1014
- p0818: 3.0768e8; = p0806*p0807
- p1905: 3.25013e-5; = p1497*1000/p0818
- p4924: 0; = p1957*p3482
- p2016: 0.00288731; = (p2014-p2015)/(p0818)
- p2487: 1.55868e-5; = p2291*p1014
- p2089: 0.40001
- p4357: 0; = p1802*p3480
- p1217: 48.8293
- p0910: 0.0200731; = p0909/p0818
- p0059: 28.373
- p2172: 0.677797; = p2166-(p2167+p2168+p2169+p2170)
- p4631: 8.04134e-6; = p1870*p3481
- p5200: 1.12245e-7; = p1821*p3484
- p2791: 0; = p2400*(p1019+p1021)
- p0679: 0
- p0830: 8.0508e8; = p0825*(p0821-p0814)*p0824
- p2411: 0; = p2234*p2201
- p1107: 423416; = IF(p1071=0;p1105*p1101*p1095;0)
- p2613: 0; = p2417*p1073
- p1293: 0; = p1287*p1252/p0818
- p2184: 0.000968399; = p1051/p0818
- p2877: 6.11627e-6; = p2291*(p1020+p1022)
- p2943: 0.000349845; = p2357*(p1020+p1022)
- p2459: 0.00018101; = p2263*p1073
- p1823: 0.000110504; = p1415*1000/p0818
- p1695: 0.8025
- p0288: 0.5
- p1013: 0; = p1012*p0001/(p0818*p0002)
- p2841: 0.000173856; = p2255*(p1020+p1022)
- p0191: 24.877
- p2829: 0.000240732; = p2243*(p1020+p1022)
- p3459: 0; = p3364*p1241
- p2668: 0.00131629; = p2277*(p1019+p1021)
- p2051: 0.000439338; = p2015*p2049*p2050/(p0818*1000)
- p2685: 0.00143263; = p2294*(p1019+p1021)
- p5324: 1.2347e-6; = p1945*p3484
- p1268: 0
- p0182: 9.91
- p3722: 1.65159e-5; = p1785*p3477
- p2025: 4.43721e-5; = p2015*p2023*p2024/(p0818*1000)
- p3958: 5.17487e-5; = p1815*p3478
- p1920: 0
- p3268: 0
- p0483: 0; = SQRT(2)*(IF((2*p0351-1)<0;-1;IF((2*p0351-1)>0;1;0))*SQRT(SQRT((2/(pi()*0.140012289)+LN(1-(2*p0351-1)^2)/2)^2-LN(1-(2*p0351-1)^2)/0.140012289)-(2/(pi()*0.140012289)+LN(1-(2*p0351-1)^2)/2)))
- p1650: 0
- p3147: 0; = p2366*p1023
- p2527: 3.46318e-6; = p2331*p1014
- p3761: 0.000126228; = p1824*p3477
- p2644: 1.25059e-5; = p2253*(p1019+p1021)
- p0478: 0; = SQRT(2)*(IF((2*p0346-1)<0;-1;IF((2*p0346-1)>0;1;0))*SQRT(SQRT((2/(pi()*0.140012289)+LN(1-(2*p0346-1)^2)/2)^2-LN(1-(2*p0346-1)^2)/0.140012289)-(2/(pi()*0.140012289)+LN(1-(2*p0346-1)^2)/2)))
- p0727: 0
- p2508: 0.00725867; = p2312*p1123
- p0258: 41.775
- p2763: 0.00404137; = p2372*(p1019+p1021)
- p0249: 28.412
- p3895: 3.07453e-5; = p1962*p3477
- p2569: 0.000535444; = p2373*p1014
- p0810: 0.75
- p0045: 40.344
- p1034: 8.94999e-5; = IF(p1012=0;p1028*p0001/(p0818*p0002);0)
- p2568: 0.00372036; = p2372*p1014
- p0811: 0.25; = if(p0807=480;1-p0810;0)
- p0796: 99.414; = p0136*(1+p0664*p0268/100)
- p2274: 0.00207764; = p2230*p2220
- p3048: 1.42503e-6; = p2267*p1082
- p1672: 0
- p3347: 0; = if(and(p1232=0;p3256<>0);p3275*p3289;0)
- p3240: 2.04475e-8; = p3234*p1188*p3235/p0818
- p3553: 1.35699e-5; = p1822*p3476
- p0825: 2.81835e8; = p0818*p0822
- p3086: 2.16564e-7; = p2305*p1082
- p0764: 99.414; = p0104*(1+p0632*p0236/100)
- p0269: 7.031
- p2826: 4.1663e-5; = p2240*(p1020+p1022)
- p2704: 0.00236688; = p2313*(p1128+p1130)
- p1853: 0
- p3290: 0
- p3438: 0; = p3362*p1240
- p3131: 0; = p2350*p1132
- p2262: 0.00189939; = p2226*p2208
- p1893: 0
- p3233: 0.60394
- p1564: 0.822
- p2215: 0.00519318; = p1117-p2214
- p3116: 0; = p2335*p1023
- p0176: 0.406
- p2091: 0.374844
- p0793: 0
- p4031: 0.000836604; = p1888*p3478
- p3762: 9.08372e-5; = p1825*p3477
- p5290: 3.25511e-6; = p1911*p3484
- p5211: 2.7313e-6; = p1832*p3484
- p4692: 4.46741e-6; = p1931*p3481
- p1250: 0; = if(p1232>0;0;p1245*p0001/(p0818*p0002))
- p1910: 0.000149506; = p1502*1000/p0818
- p0889: 31.3223; = 1000*p0888*p0001*p0003*p0004/(p0818*p0002)
- p2263: 0.000858926; = p2226*p2209
- p0386: 0.5
- p4184: 3.85416e-7; = p1835*p3479
- p3061: 0; = p2280*p1023
- p2979: 0; = p2393*(p1020+p1022)
- p2972: 0.000150816; = p2386*(p1079+p1081)
- p1264: 0; = if(p1232>0;0;IF(p1259+p1263=1;0;IF(p1259+p1263+p1261>1;1-(p1259+p1263);p1261)))
- p1224: 0.44; = IF(p1221=0;0;IF(p1193=0;1-p1223;0))
- p0344: 0.5
- p1007: 0; = p1003*p0001*p0004/(p0818*p0002)
- p3328: 0; = if(and(p1232=0;p3255<>0);p3255*(p3265*p3277-p3323)/p3327;0)
- p3234: 0.39606; = 1-p3233
- p0893: 9.06247; = 1000*(p0890+p0892)*p0001*p0003*p0004/(p0818*p0002)
- p0081: 3.522
- p2786: 0; = p2395*(p1019+p1021)
- p0617: 0; = IF(p0353<0.5;-SQRT(p0007*EXP(p0485^2*p0008)-p0007);SQRT(p0007*EXP(p0485^2*p0008)-p0007))
- p3171: 0.000227917; = p2390*p1132
- p0654: 0; = IF(p0390<0.5;-SQRT(p0007*EXP(p0522^2*p0008)-p0007);SQRT(p0007*EXP(p0522^2*p0008)-p0007))
- p2794: 0; = p2403*(p1019+p1021)
- p2182: 0.0582598; = p1050/p0818
- p2210: 0.00112182; = 6*1.00794*p2208/30.973762
- p4771: 0; = p1804*p3482
- p0904: 3.58969e7; = p0825*p0901+(p0830+p0895)*p0824*p0903
- p2271: 0.00134194; = p2226*p2217
- p2843: 0.000286855; = p2257*(p1020+p1022)
- p3188: 0; = p2407*p1023
- p2029: 6.19
- p3847: 5.42664e-5; = p1910*p3477
- p2914: 0.000393021; = p2328*(p1020+p1022)
- p0913: 0.0016675
- p2699: 0.00158818; = p2308*(p1078+p1080)
- p3069: 0; = p2288*p1023
- p0493: 0; = SQRT(2)*(IF((2*p0361-1)<0;-1;IF((2*p0361-1)>0;1;0))*SQRT(SQRT((2/(pi()*0.140012289)+LN(1-(2*p0361-1)^2)/2)^2-LN(1-(2*p0361-1)^2)/0.140012289)-(2/(pi()*0.140012289)+LN(1-(2*p0361-1)^2)/2)))
- p4963: 1.64162e-6; = p1790*p3483
- p0590: 0; = IF(p0326<0.5;-SQRT(p0007*EXP(p0458^2*p0008)-p0007);SQRT(p0007*EXP(p0458^2*p0008)-p0007))
- p3481: 0.137453; = if(p1328+p1330+p1332+p1334+p1336+p1338+p1340+p1342+p1344=0;0;p1338/(p1328+p1330+p1332+p1334+p1336+p1338+p1340+p1342+p1344))
- p1937: 0
- p2316: 0.000303528; = p2224*p2183
- p3940: 4.93965e-5; = p1797*p3478
- p0097: 28.455
- p3155: 0; = p2374*p1023
- p3361: 0; = if(p1232=0;p3311+p3322+p3333+p3344+p3355;0)
- p0882: 4458; = p0869*p0856
- p1277: 0
- p4139: 1.34896e-6; = p1790*p3479
- p2706: 0.000605985; = p2315*(p1019+p1021)
- p4248: 3.14756e-6; = p1899*p3479
- p3098: 0; = p2317*p1023
- p4822: 0; = p1855*p3482
- p2006: 2.33866; = ((p1980*p1985+p1986*p1991+p1992*p1997+p2000*p2005)/p0818)*p0005*p0002/1000
- p3454: 0; = p3378*p1240
- p2865: 0.000124017; = p2279*(p1020+p1022)
- p3437: 0; = p3380*p1239
- p3148: 0; = p2367*p1023
- p2097: 0.40001
- p0136: 99.414
- p4529: 3.6186e-5; = p1768*p3481
- p1779: 0
- p0242: 16.216
- p0175: 0
- p0674: 0
- p0376: 0.5
- p0153: 0
- p0574: 0; = IF(p0310<0.5;-SQRT(p0007*EXP(p0442^2*p0008)-p0007);SQRT(p0007*EXP(p0442^2*p0008)-p0007))
- p2015: 5.52583e6; = p0830*p2011*p2013
- p3257: 0
- p2845: 0.000865026; = p2259*(p1079+p1081)
- p0419: 0; = SQRT(2)*(IF((2*p0287-1)<0;-1;IF((2*p0287-1)>0;1;0))*SQRT(SQRT((2/(pi()*0.140012289)+LN(1-(2*p0287-1)^2)/2)^2-LN(1-(2*p0287-1)^2)/0.140012289)-(2/(pi()*0.140012289)+LN(1-(2*p0287-1)^2)/2)))
- p5076: 3.90862e-6; = p1903*p3483
- p3424: 0; = p3367*p1239
- p0425: 0; = SQRT(2)*(IF((2*p0293-1)<0;-1;IF((2*p0293-1)>0;1;0))*SQRT(SQRT((2/(pi()*0.140012289)+LN(1-(2*p0293-1)^2)/2)^2-LN(1-(2*p0293-1)^2)/0.140012289)-(2/(pi()*0.140012289)+LN(1-(2*p0293-1)^2)/2)))
- p1868: 0
- p1004: 0; = p1000*p0888
- p1476: 3
- p2090: 0.40001
- p1630: 0.784351
- p3282: 0
- p1872: 0.00210933; = p1464*1000/p0818
- p1491: 49
- p1851: 0
- p0259: 30.345
- p1094: 5.92556e-6; = IF(p1071=0;p1088*p0001/(p0818*p0002);0)
- p2073: 0.377647
- p2225: 0.662512; = if(p0765*p0769+p0766*p0770+p0767*p0771+p0768*p0772=0;0;p0772*p0768/(p0765*p0769+p0766*p0770+p0767*p0771+p0768*p0772))
- p1109: 4.41597e6; = IF(p1071=0;p1105*p1103*p1095;0)
- p2822: 0; = p2431*(p1128+p1130)
- p0790: 10.808; = p0130*(1+p0658*p0262/100)
- p3117: 0; = p2336*p1082
- p1892: 0
- p1703: 0
- p1971: 0; = p1966*p0001/(p0818*p0002)
- p0667: 0; = IF(p0403<0.5;-SQRT(p0007*EXP(p0535^2*p0008)-p0007);SQRT(p0007*EXP(p0535^2*p0008)-p0007))
- p1399: 6
- p2694: 0.000343075; = p2303*(p1078+p1080)
- p1679: 0
- p2157: 7.53251e-7; = p2015*p2086*p2119/(p0818*1000)
- p2232: 0; = if(p0783*p0787+p0784*p0788+p0785*p0789+p0786*p0790=0;0;p0789*p0785/(p0783*p0787+p0784*p0788+p0785*p0789+p0786*p0790))
- p3470: 0; = p3375*p1241
- p3565: 5.42798e-6; = p1834*p3476
- p2199: 0.00036168; = p1069-p2197-p2198
- p3136: 0; = p2355*p1023
- p0500: 0; = SQRT(2)*(IF((2*p0368-1)<0;-1;IF((2*p0368-1)>0;1;0))*SQRT(SQRT((2/(pi()*0.140012289)+LN(1-(2*p0368-1)^2)/2)^2-LN(1-(2*p0368-1)^2)/0.140012289)-(2/(pi()*0.140012289)+LN(1-(2*p0368-1)^2)/2)))
- p2862: 0.0021661; = p2276*(p1020+p1022)
- p4649: 0.000476673; = p1888*p3481
- p2785: 0; = p2394*(p1019+p1021)
- p1270: 0; = IF(p1267=p1259;0;IF(p1267+p1268>p1259;p1259-p1267;p1268))
- p3634: 3.39249e-5; = p1903*p3476
- p2566: 9.66712e-5; = p2370*p1014
- p1762: 0.000432267; = p1354*1000/p0818
- p4251: 4.17534e-6; = p1902*p3479
- p3191: 0; = p2410*p1023
- p2611: 0; = p2415*p1073
- p0262: 39.009
- p0734: 0
- p0978: 0
- p1048: 0.000645242; = IF(p1012=0;IF(p1037+p1044+p1045+p1046+p1047=1;0;IF(p1037+p1044+p1045+p1046+p1047+p1042>1;1-(p1037+p1044+p1045+p1046+p1047);p1042));0)
- p2575: 0.000174439; = p2379*p1073
- p3185: 0; = p2404*p1023
- p1980: 3521.6
- p3016: 0; = p2430*(p1129+p1131)
- p2751: 0.00559593; = p2360*(p1019+p1021)
- p3331: 0; = if(and(p1232=0;p3255<>0);p3255*(p3268-p3326)/p3327;0)
- p1888: 0.00346789; = p1480*1000/p0818
- p2135: 1.44736e-5; = p2015*p2063*p2097/(p0818*1000)
- p0887: 448.95; = 1000*p0886*p0001*p0003*p0004/(p0818*p0002)
- p1708: 0
- p1317: 0
- p3275: 0
- p3244: 0; = p0791/100
- p0392: 0.5
- p0688: 6.401; = p0028*(1+p0556*p0160/100)
- p2936: 0; = p2350*(p1129+p1131)
- p0833: 9.34509e8; = p0830+p0832
- p3975: 0.000114474; = p1832*p3478
- p1717: 0
- p1108: 139354; = IF(p1071=0;p1105*p1102*p1095;0)
- p0484: 0; = SQRT(2)*(IF((2*p0352-1)<0;-1;IF((2*p0352-1)>0;1;0))*SQRT(SQRT((2/(pi()*0.140012289)+LN(1-(2*p0352-1)^2)/2)^2-LN(1-(2*p0352-1)^2)/0.140012289)-(2/(pi()*0.140012289)+LN(1-(2*p0352-1)^2)/2)))
- p1289: 0
- p4053: 3.60673e-5; = p1910*p3478
- p2139: 4.97463e-6; = p2015*p2067*p2101/(p0818*1000)
- p2177: 0.286575; = p0895/p0818-(p2173+p2174+p2175+p2176)
- p0406: 0; = SQRT(2)*(IF((2*p0274-1)<0;-1;IF((2*p0274-1)>0;1;0))*SQRT(SQRT((2/(pi()*0.140012289)+LN(1-(2*p0274-1)^2)/2)^2-LN(1-(2*p0274-1)^2)/0.140012289)-(2/(pi()*0.140012289)+LN(1-(2*p0274-1)^2)/2)))
- p3460: 0; = p3365*p1241
- p1749: 0
- p0946: 0; = if(and(p0683=0;or(p0807=480;p0807=32;p0807=1;and(p0807=60;p0901<0.03)));p0934;0)
- p0621: 0; = IF(p0357<0.5;-SQRT(p0007*EXP(p0489^2*p0008)-p0007);SQRT(p0007*EXP(p0489^2*p0008)-p0007))
- p1947: 0
- p0804: 641000
- p2513: 9.27266e-6; = p2317*p1014
- p4773: 0; = p1806*p3482
- p2597: 0; = p2401*p1014
- p1639: 0
- p0343: 0.5
- p2957: 0.00340516; = p2371*(p1020+p1022)
- p1180: 8.49385e-8; = p1176*p1179/p0818
- p1591: 0.677771
- p0105: 39.088
- p3772: 7.07823e-6; = p1835*p3477
- p0897: 0.49875
- p0370: 0.5
- p1771: 0
- p2041: 0; = p2015*p2040/(p0818*1000)
- p2076: 0.057
- p0724: 0
- p2701: 0.00124141; = p2310*(p1078+p1080)
- p0063: 536.405
- p1261: 0; = if(p1232>0;0;p0732/100)
- p0815: 0
- p3024: 0; = p2243*p1023
- p5141: 2.4881e-6; = p1762*p3484
- p0613: 0; = IF(p0349<0.5;-SQRT(p0007*EXP(p0481^2*p0008)-p0007);SQRT(p0007*EXP(p0481^2*p0008)-p0007))
- p1973: 0.000380586; = if(p0807=480;p1968*p0001/(p0818*p0002);0)
- p0871: 1.65051; = p0870*p0001*p0003/(p0818*p0002)
- p0254: 9.499
- p4586: 3.43991e-5; = p1825*p3481
- p1743: 0
- p1021: 0.19396; = IF(p1012=0;IF(p1014+p1019+p1020=1;0;IF(p1014+p1019+p1020+p1017>1;1-(p1014+p1019+p1020);p1017));0)
- p2218: 0.0738923; = p1150/p0818
- p0270: 9.91
- p4037: 0.000377922; = p1894*p3478
- p2591: 0; = p2395*p1014
- p2310: 0.00213253; = p2227*p2217
- p2077: 0.043
- p2880: 0.000517514; = p2294*(p1020+p1022)
- p0731: 0
- p3905: 0.000104281; = p1762*p3478
- p2193: 0.0493641; = p1054/p0818
- p1780: 1.62507e-5; = p1372*1000/p0818
- p0490: 0; = SQRT(2)*(IF((2*p0358-1)<0;-1;IF((2*p0358-1)>0;1;0))*SQRT(SQRT((2/(pi()*0.140012289)+LN(1-(2*p0358-1)^2)/2)^2-LN(1-(2*p0358-1)^2)/0.140012289)-(2/(pi()*0.140012289)+LN(1-(2*p0358-1)^2)/2)))
- p1662: 0
- p1819: 0
- p3563: 9.90606e-5; = p1832*p3476
- p0114: 46.008
- p3390: 0; = p3371*p1234
- p1951: 0.000588274; = p1543*1000/p0818
- p2173: 0.247331; = p0895*p0898/p0818
- p2085: 0.0335294
- p3397: 0; = p3378*p1234
- p2018: 0.1978
- p1006: 2.99949e-6; = p1002*p0001*p0004/(p0818*p0002)
- p0744: 97.207; = p0084*(1+p0612*p0216/100)
- p3429: 0; = p3372*p1239
- p2178: 0.0877082; = (p0895*p0831/(1-p0831))/(p0818)
- p1752: 0
- p0155: 3.016
- p4593: 6.52242e-5; = p1832*p3481
- p4583: 8.93482e-6; = p1822*p3481
- p4066: 7.84071e-6; = p1923*p3478
- p2282: 0.00452645; = p2223*p2188
- p3183: 0; = p2402*p1023
- p1182: 74.7982; = p1181*p0801
- p2468: 0.00257901; = p2272*p1123
- p3266: 0
- p1305: 0; = p1301*p1252/p0818
- p1549: 11
- p2001: 400
- p0863: 0; = p0675*1000/p0856
- p1008: 0; = p1004*p0001*p0004/(p0818*p0002)
- p2647: 6.92679e-5; = p2256*(p1019+p1021)
- p2395: 0; = p2234*p2184
- p3340: 0; = if(and(p1232=0;p3254<>0);p3254*(p3270-p3335)/p3338;0)
- p5338: 5.20551e-5; = p1963*p3484
- p1314: 0; = p1310*p1252/p0818
- p2586: 0.000747618; = p2390*p1123
- p0655: 0; = IF(p0391<0.5;-SQRT(p0007*EXP(p0523^2*p0008)-p0007);SQRT(p0007*EXP(p0523^2*p0008)-p0007))
- p2447: 3.19026e-6; = p2251*p1014
- p3170: 0.000161734; = p2389*p1132
- p0701: 0
- p0922: 0; = p0677*1000/p0801
- p5131: 2.03732e-6; = p1962*p3483
- p5202: 6.36057e-7; = p1823*p3484
- p3335: 0; = IF(or(p3254=0;p1232>0);0;p3270*(p3280*(p3283*p1256+p3286*(p1253+p1257)+p1258*p3288+p3300*p3287)))
- p2711: 1.56707e-5; = p2320*(p1019+p1021)
- p1471: 1
- p4997: 8.36444e-6; = p1824*p3483
- p2075: 0.072
- p2502: 8.59884e-5; = p2306*p1073
- p1721: 0.5
- p2364: 0.00571481; = p2225*p2192
- p0268: 0.406
- p0221: 27.828
- p2772: 9.40826e-5; = p2381*(p1078+p1080)
- p1157: 0.260052
- p1676: 0
- p2112: 0.856281
- p1551: 0
- p0273: 0.5
- p2301: 0.0030184; = p2227*p2208
- p1988: 750
- p2953: 0.0109708; = p2367*(p1020+p1022)
- p1095: 1.55111e7; = IF(p1071=0;p0797*p0702*1000*p0798/100;0)
- p3091: 1.18355e-5; = p2310*p1082
- p2428: 0; = p2236*p2218
- p5118: 5.15937e-6; = p1945*p3483
- p1810: 0
- p0112: 69.647
- p1924: 0
- p0801: 535000
- p1855: 0.00025676; = p1447*1000/p0818
- p2636: 0.00014656; = p2245*(p1019+p1021)
- p1793: 0
- p2431: 0; = p2236*p2221
- p2393: 0; = p2234*p2182
- p1240: 0; = if(p1232>0;0;IF(p1234+p1238+p1239=1;0;IF(p1234+p1238+p1239+p1237>1;1-(p1234+p1238+p1239);p1237)))
- p3284: 0
- p1753: 0.92568
- p2248: 0.00389475; = p2222*p2193
- p2961: 0.000416813; = p2375*(p1079+p1081)
- p0247: 10.045
- p1273: 0; = p1267*p1252/p0818
- p0622: 0; = IF(p0358<0.5;-SQRT(p0007*EXP(p0490^2*p0008)-p0007);SQRT(p0007*EXP(p0490^2*p0008)-p0007))
- p3389: 0; = p3370*p1234
- p1158: 0.171512; = p1156*p1157
- p0760: 8.344; = p0100*(1+p0628*p0232/100)
- p1576: 0.47191
- p2558: 0.00113291; = p2362*p1014
- p0240: 8.593
- p2453: 0.000731027; = p2257*p1014
- p0123: 68.803
- p2048: 1.79597e-13; = p2015*p2046/(p0818*1000000000000)
- p2439: 0.000613486; = p2243*p1014
- p1084: 214340; = IF(p1071=0;p1078*(p0710/100)*p0703*1000;0)
- p4941: 6.33196e-6; = p1768*p3483
- p4551: 9.38156e-6; = p1790*p3481
- p3632: 1.42484e-5; = p1901*p3476
- p0481: 0; = SQRT(2)*(IF((2*p0349-1)<0;-1;IF((2*p0349-1)>0;1;0))*SQRT(SQRT((2/(pi()*0.140012289)+LN(1-(2*p0349-1)^2)/2)^2-LN(1-(2*p0349-1)^2)/0.140012289)-(2/(pi()*0.140012289)+LN(1-(2*p0349-1)^2)/2)))
- p0807: 480
- p4672: 7.7733e-5; = p1911*p3481
- p1159: 0.5
- p3054: 0.00110796; = p2273*p1132
- p1070: 0.071355; = IF(p1012=0;p1056/(p1063*p0818);0)
- p0921: 0; = p0679*1000/p0801
- p1036: 4.7792e7; = IF(p1012=0;p0795*p0702*1000*p0796/100;0)
- p0821: 3.91667
- p3182: 0; = p2401*p1023
- p2194: 0.214362
- p1457: 2
- p3363: 0; = if(p1232=0;p3244*p3357/p0818;0)
- p2481: 0.000100994; = p2285*p1014
- p3002: 0; = p2416*(p1079+p1081)
- p0932: 0; = p0801*p0926
- p3236: 0.0140975
- p0459: 0; = SQRT(2)*(IF((2*p0327-1)<0;-1;IF((2*p0327-1)>0;1;0))*SQRT(SQRT((2/(pi()*0.140012289)+LN(1-(2*p0327-1)^2)/2)^2-LN(1-(2*p0327-1)^2)/0.140012289)-(2/(pi()*0.140012289)+LN(1-(2*p0327-1)^2)/2)))
- p2553: 0.000891551; = p2357*p1014
- p1043: 0.209016
- p2111: 0.856281
- p2645: 0.0011226; = p2254*(p1019+p1021)
- p0007: 14; = p0006-1
- p0931: 0; = p0801*p0925
- p3385: 0; = p3366*p1234
- p1613: 0
- p1994: 750
- p3420: 0; = p3363*p1239
- p2399: 0; = p2234*p2188
- p0369: 0.5
- p2462: 5.1746e-6; = p2266*p1073
- p1589: 0
- p1792: 0
- p1820: 0
- p2478: 0.00182615; = p2282*p1014
- p4434: 0; = p1879*p3480
- p2305: 3.90205e-5; = p2227*p2212
- p2832: 1.33136e-5; = p2246*(p1020+p1022)
- p2250: 0.00825287; = p2222*p2196
- p1556: 0
- p2715: 1.10869e-5; = p2324*(p1019+p1021)
- p1186: 1.21552e-7; = p1182*p1185/p0818
- p1124: 0.5704; = if(p1121=0;p0718/100;0)
- p3966: 2.66584e-5; = p1823*p3478
- p4444: 0; = p1889*p3480
- p0443: 0; = SQRT(2)*(IF((2*p0311-1)<0;-1;IF((2*p0311-1)>0;1;0))*SQRT(SQRT((2/(pi()*0.140012289)+LN(1-(2*p0311-1)^2)/2)^2-LN(1-(2*p0311-1)^2)/0.140012289)-(2/(pi()*0.140012289)+LN(1-(2*p0311-1)^2)/2)))
- p3358: 0; = if(p1232=0;p3308+p3319+p3330+p3341+p3352;0)
- p3332: 0; = if(and(p1232=0;p3255<>0);IF((p3328+p3329+p3330+p3331)+(p3255*(p3265*(1-p3277))/p3327)>p3255;p3255-(p3328+p3329+p3330+p3331);p3255*(p3265*(1-p3277))/p3327);0)
- p3882: 7.78605e-5; = p1945*p3477
- p2497: 0.000636097; = p2301*p1073
- p2280: 0.00245849; = p2223*p2186
- p2734: 0; = p2343*(p1078+p1080)
- p2057: 3.28794
- p4721: 0; = p1754*p3482
- p1223: 0.56
- p0694: 0
- p0973: 5.43056e6; = p0967+p0968+p0969
- p3160: 4.59399e-6; = p2379*p1082
- p1062: 0.16
- p0377: 0.5
- p3079: 3.78475e-5; = p2298*p1082
- p0615: 0; = IF(p0351<0.5;-SQRT(p0007*EXP(p0483^2*p0008)-p0007);SQRT(p0007*EXP(p0483^2*p0008)-p0007))
- p2820: 0; = p2429*(p1128+p1130)
- p3134: 0; = p2353*p1132
- p3104: 0; = p2323*p1023
- p3062: 0; = p2281*p1023
- p3448: 0; = p3372*p1240
- p0102: 2.621
- p4068: 4.70443e-6; = p1925*p3478
- p2815: 0; = p2424*(p1078+p1080)
- p2009: 0.0490496; = ((p1983*p1985+p1989*p1991+p1995*p1997+p2003*p2005+p1976*p1977+p1978*p1979+p1998*p1999)/p0818)*p0005*p0002/1000
- p2150: 1.79929e-6; = p2015*p2078*p2112/(p0818*1000)
- p2408: 0; = p2234*p2198
- p3125: 0; = p2344*p1082
- p0945: 0; = if(and(p0683=0;p0951=0);p0939;0)
- p4425: 0; = p1870*p3480
- p3724: 3.53911e-6; = p1787*p3477
- p2861: 0.00102438; = p2275*(p1129+p1131)
- p1995: 50
- p3291: 0
- p4600: 4.46741e-6; = p1839*p3481
- p0867: 0; = IF(p0858+p0864+p0865+p0866=1;0;IF(p0858+p0864+p0865+p0866+p0862>1;1-(p0858+p0864+p0865+p0866);p0862))
- p2756: 0.0143327; = p2365*(p1019+p1021)
- p3169: 3.2457e-6; = p2388*p1082
- p0885: 1.852; = IF(p0689+p0884=100;0;100-(p0689+p0884))
- p0915: 0.0256048; = p0914/p0818
- p1242: 0; = if(p1232>0;0;p1234*(p0725/100)*p0723*1000)
- p2002: 750
- p1256: 0; = if(p1232>0;0;IF(p1253=1;0;IF(p1253+p1254>1;1-p1253;p1254)))
- p2493: 0.00158898; = p2297*p1073
- p2402: 0; = p2234*p2191
- p0399: 0.5
- p3842: 1.1797e-5; = p1905*p3477
- p0919: 0; = p0678*1000/p0801
- p3073: 0; = p2292*p1023
- p0677: 0
- p0842: -0.227484
- p3189: 0; = p2408*p1023
- p5164: 2.61906e-7; = p1785*p3484
- p0276: 0.5
- p3308: 0; = if(and(p1232=0;p3252<>0);p3252*(p3259-p3303)/p3305;0)
- p2458: 0.000400277; = p2262*p1073
- p2249: 0.000834886; = p2222*p2195
- p3186: 0; = p2405*p1023
- p2677: 0.000887832; = p2286*(p1019+p1021)
- p3673: 1.69624e-5; = p1942*p3476
- p3141: 0; = p2360*p1023
- p3690: 0.00188797; = p1963*p3476
- p3834: 1.29767e-5; = p1897*p3477
- p2070: 0.282
- p1174: 4.41887e-7; = p1170*p1173/p0818
- p1306: 0; = p1302*p1252/p0818
- p0225: 33.182
- p2659: 0.000264833; = p2268*(p1078+p1080)
- p1887: 0
- p3012: 0; = p2426*(p1079+p1081)
- p0742: 94.42; = p0082*(1+p0610*p0214/100)
- p5321: 4.67689e-7; = p1942*p3484
- p2805: 0; = p2414*(p1078+p1080)
- p2078: 0.117
- p1142: 0; = if(p1121=0;p1136*p0001/(p0818*p0002);0)
- p2849: 0.000173142; = p2263*(p1079+p1081)
- p5218: 1.87076e-7; = p1839*p3484
- p2879: 0.0012071; = p2293*(p1020+p1022)
- p3309: 0; = if(and(p1232=0;p3252<>0);p3252*(p3260-p3304)/p3305;0)
- p0828: 0.128478; = if(p0827=0;0;p0819-p0827/p0818)
- p2554: 0.00279795; = p2358*p1014
- p3628: 7.46347e-6; = p1897*p3476
- p3324: 0; = if(and(p1232=0;p3255<>0);p3266*(p3279*(p3284*p1256+p3286*(p1253+p1257)+p1258*p3288+p3299*p3287));0)
- p2069: 0.190588
- p4764: 0; = p1797*p3482
- p1979: 5.43056e6; = p0973
- p3215: 0.450791; = p1222*3*15.9994/100.0869
- p3272: 0
- p0375: 0.5
- p2651: 0.000808934; = p2260*(p1078+p1080)
- p2202: 0.00200328; = 4*1.00794*p2201/(2*14.0067)
- p0455: 0; = SQRT(2)*(IF((2*p0323-1)<0;-1;IF((2*p0323-1)>0;1;0))*SQRT(SQRT((2/(pi()*0.140012289)+LN(1-(2*p0323-1)^2)/2)^2-LN(1-(2*p0323-1)^2)/0.140012289)-(2/(pi()*0.140012289)+LN(1-(2*p0323-1)^2)/2)))
- p1427: 6
- p0088: 14.427
- p2416: 0; = p2235*p2206
- p3162: 8.96979e-7; = p2381*p1082
- p2871: 3.96302e-5; = p2285*(p1020+p1022)
- p2484: 0.00100262; = p2288*p1014
- p0156: 34.756
- p4856: 0; = p1889*p3482
- p0391: 0.5
- p1216: 0.108582
- p2275: 0.00361039; = p2230*p2221
- p1751: 0.791173
- p1298: 0
- p2870: 0.000157592; = p2284*(p1020+p1022)
- p1010: 12304.4; = p0890
- p0477: 0; = SQRT(2)*(IF((2*p0345-1)<0;-1;IF((2*p0345-1)>0;1;0))*SQRT(SQRT((2/(pi()*0.140012289)+LN(1-(2*p0345-1)^2)/2)^2-LN(1-(2*p0345-1)^2)/0.140012289)-(2/(pi()*0.140012289)+LN(1-(2*p0345-1)^2)/2)))
- p1515: 10
- p2725: 2.0837e-5; = p2334*(p1019+p1021)
- p5103: 8.28627e-6; = p1930*p3483
- p0840: 0.210331; = p0839*p0831
- p2710: 0.000108883; = p2319*(p1019+p1021)
- p0408: 0; = SQRT(2)*(IF((2*p0276-1)<0;-1;IF((2*p0276-1)>0;1;0))*SQRT(SQRT((2/(pi()*0.140012289)+LN(1-(2*p0276-1)^2)/2)^2-LN(1-(2*p0276-1)^2)/0.140012289)-(2/(pi()*0.140012289)+LN(1-(2*p0276-1)^2)/2)))
- p2209: 0.0025982; = 14.0067*p2208/30.973762
- p1686: 0
- p0103: 536.405
- p2572: 0.000394105; = p2376*p1073
- p0026: 147.248
- p3364: 0; = if(p1232=0;p3244*p3358/p0818;0)
- p4513: 0; = p1962*p3480
- p2450: 0.00103344; = p2254*p1014
- p1028: 30865.2; = IF(p1012=0;p1022*(p0704/100)*p0703*1000;0)
- p1165: 0.00155134; = p0801*p0001/(p0818*p0002)
- p2594: 0; = p2398*p1014
- p3058: 0; = p2277*p1023
- p0905: 0.116669; = p0904/p0818
- p2758: 0.0303705; = p2367*(p1019+p1021)
- p1146: 0.917383
- p2243: 0.00152064; = p2222*p2188
- p2315: 0.00138274; = p2224*p2182
- p1840: 0
- p2167: 0.584979; = p2166*(p0898)
- p2361: 0.00245331; = p2225*p2189
- p3132: 0; = p2351*p1132
- p4370: 0; = p1815*p3480
- p1416: 107
- p1103: 0.652345; = IF(p1071=0;IF(p1096+p1101+p1102=1;0;IF(p1096+p1101+p1102+p1099>1;1-(p1096+p1101+p1102);p1099));0)
- p2131: 4.6946e-6; = p2015*p2059*p2093/(p0818*1000)
- p0510: 0; = SQRT(2)*(IF((2*p0378-1)<0;-1;IF((2*p0378-1)>0;1;0))*SQRT(SQRT((2/(pi()*0.140012289)+LN(1-(2*p0378-1)^2)/2)^2-LN(1-(2*p0378-1)^2)/0.140012289)-(2/(pi()*0.140012289)+LN(1-(2*p0378-1)^2)/2)))
- p2331: 8.58412e-6; = p2224*p2199
- p2887: 0.000608449; = p2301*(p1079+p1081)
- p1626: 0
- p3476: 0.20876; = if(p1328+p1330+p1332+p1334+p1336+p1338+p1340+p1342+p1344=0;0;p1328/(p1328+p1330+p1332+p1334+p1336+p1338+p1340+p1342+p1344))
- p2306: 0.000408031; = p2227*p2213
- p4662: 9.38156e-6; = p1901*p3481
- p3269: 0
- p3376: 0; = if(p1232=0;p3246*p3358/p0818;0)
- p1583: 0.806008
- p0126: 42.841
- p0813: 1.56522; = if(p0807=480;1.56521739130435;0)
- p4567: 1.83164e-5; = p1806*p3481
- p1636: 0
- p0878: 0; = p0867*p0856
- p3369: 0; = if(p1232=0;p3245*p3357/p0818;0)
- p3447: 0; = p3371*p1240
- p3220: 0.0060804; = p3216*p1228
- p3173: 2.53107e-5; = p2392*p1132
- p0211: 7.45
- p2059: 1.00168
- p3445: 0; = p3369*p1240
- p1258: 0; = if(p1232>0;0;IF(p1253+p1256+p1257=1;0;1-(p1253+p1256+p1257)))
- p0272: 9.499
- p2510: 0.000806092; = p2314*p1123
- p1077: 0; = IF(p1071=0;p0715/100;0)
- p4747: 0; = p1780*p3482
- p2600: 0; = p2404*p1014
- p5289: 8.60547e-7; = p1910*p3484
- p2804: 0; = p2413*(p1019+p1021)
- p2717: 0.000513457; = p2326*(p1019+p1021)
- p1657: 0
- p0138: 68.642
- p2093: 0.260958
- p0438: 0; = SQRT(2)*(IF((2*p0306-1)<0;-1;IF((2*p0306-1)>0;1;0))*SQRT(SQRT((2/(pi()*0.140012289)+LN(1-(2*p0306-1)^2)/2)^2-LN(1-(2*p0306-1)^2)/0.140012289)-(2/(pi()*0.140012289)+LN(1-(2*p0306-1)^2)/2)))
- p1024: 215139; = IF(p1012=0;p1014*(p0704/100)*p0703*1000;0)
- p1817: 0
- p3081: 0.000101761; = p2300*p1082
- p1023: 0; = IF(p1012=0;IF(p1014+p1019+p1020+p1021+p1022=1;0;1-(p1014+p1019+p1020+p1021+p1022));0)
- p5213: 1.4966e-7; = p1834*p3484
- p2549: 0; = p2353*p1123
- p0244: 10.1
- p5098: 4.69034e-7; = p1925*p3483
- p1725: 0
- p2619: 0; = p2423*p1073
- p4719: 1.16429e-5; = p1962*p3481
- p2424: 0; = p2235*p2214
- p0914: 7.87808e6; = p0825*p0911+p0827*p0912+(p0830+p0895)*p0824*p0913
- p1927: 0
- p0051: 21.074
- p1900: 0
- p2760: 4.77632e-5; = p2369*(p1019+p1021)
- p3089: 1.51416e-5; = p2308*p1082
- p3168: 3.62144e-7; = p2387*p1082
- p3537: 2.78184e-5; = p1806*p3476
- p1747: 0.217583
- p2214: 0.00137616; = p1107/p0818
- p1651: 0.299611
- p2499: 0.000124198; = p2303*p1073
- p1335: 0.00059191; = p1334*p0001/(p0818*p0002)
- p1072: 0; = p1071*p0001/(p0818*p0002)
- p4156: 3.85416e-7; = p1807*p3479
- p1342: 248414; = p1326*p0801
- p0957: 0; = if(and(p0683>0;or(p0807=56;p0807=100;and(p0807=60;p0901>0.06)));p0939;0)
- p3193: 0; = p2412*p1023
- p2656: 0.00282712; = p2265*(p1078+p1080)
- p2714: 4.40877e-5; = p2323*(p1019+p1021)
- p1739: 0
- p3656: 4.07098e-6; = p1925*p3476
- p4935: 1.03969e-5; = p1762*p3483
- p1941: 0
- p1914: 0
- p5072: 3.83044e-6; = p1899*p3483
- p3100: 0; = p2319*p1023
- p1587: 0
- p1943: 0
- p3380: 0; = p3251/p0818
- p2653: 0.00110569; = p2262*(p1078+p1080)
- p2945: 0.000158015; = p2359*(p1020+p1022)
- p1598: 0.392863
- p2441: 0.000134919; = p2245*p1014
- p0164: 36.421
- p0695: 0
- p1206: 0.00953
- p4975: 6.17561e-6; = p1802*p3483
- p2789: 0; = p2398*(p1019+p1021)
- p2889: 0.0001188; = p2303*(p1079+p1081)
- p1248: 0; = if(p1232>0;0;p1243*p0001/(p0818*p0002))
- p0238: 17.225
- p3633: 4.41023e-5; = p1902*p3476
- p1821: 1.95008e-5; = p1413*1000/p0818
- p3821: 3.53911e-6; = p1884*p3477
- p3128: 0; = p2347*p1082
- p2755: 0.00250452; = p2364*(p1019+p1021)
- p2745: 0.0169155; = p2354*(p1019+p1021)
- p0274: 0.5
- p2434: 0.000407076; = p2238*p1014
- p0868: 0; = IF(p0858+p0864+p0865+p0866+p0867=1;0;IF(p0858+p0864+p0865+p0866+p0867+p0863>1;1-(p0858+p0864+p0865+p0866+p0867);p0863))
- p0046: 24.429
- p2900: 0.00204591; = p2314*(p1129+p1131)
- p0048: 19.396
- p1300: 0; = IF(p1297=p1265;0;IF(p1297+p1298>p1265;p1265-p1297;p1298))
- p2617: 0; = p2421*p1073
- p2086: 0.0617647
- p1729: 0
- p3977: 6.27257e-6; = p1834*p3478
- p1245: 0; = if(p1232>0;0;p1240*(p0725/100)*p0723*1000)
- p3691: 1.06173e-5; = p1754*p3477
- p2247: 0.000680576; = p2222*p2192
- p2404: 0; = p2234*p2193
- p1297: 0
- p0769: 18.09; = p0109*(1+p0637*p0241/100)
- p3349: 0; = if(and(p1232=0;p3256<>0);1-(p3345+p3346+p3347+p3348);0)
- p0652: 0; = IF(p0388<0.5;-SQRT(p0007*EXP(p0520^2*p0008)-p0007);SQRT(p0007*EXP(p0520^2*p0008)-p0007))
- p1960: 26.0619; = IF(p1959-p1958<0;0;p1959-p1958)
- p1295: 0; = p1291*p1252/p0818
- p1088: 2043.51; = IF(p1071=0;p1082*(p0710/100)*p0703*1000;0)
- p0117: 36.59
- p1341: 0; = p1340*p0001/(p0818*p0002)
- p4801: 0; = p1834*p3482
- p1631: 0.5
- p0180: 24.694
- p0001: 0.404686
- p2915: 3.76581e-7; = p2329*(p1020+p1022)
- p4855: 0; = p1888*p3482
- p4556: 3.57393e-6; = p1795*p3481
- p1266: 0; = if(p1232>0;0;IF(p1259+p1263+p1264+p1265=1;0;1-(p1259+p1263+p1264+p1265)))
- p4497: 0; = p1942*p3480
- p3388: 0; = p3369*p1234
- p1318: 0; = p1317*p0001/(p0818*p0002)
- p1697: 0.705252
- p1860: 0
- p0979: 0; = IF(p0976=0;0;p0976*p0001/(p0818*p0002))
- p0823: 0.91625
- p4170: 3.85416e-7; = p1821*p3479
- p4181: 9.37846e-6; = p1832*p3479
- p3436: 0; = p3379*p1239
- p1092: 0; = IF(p1071=0;p1086*p0001/(p0818*p0002);0)
- p2894: 0.000549955; = p2308*(p1079+p1081)
- p1876: 0
- p0195: 0
- p0835: 0.00321809; = -LN(1-p0669/100)/p0834
- p4352: 0; = p1797*p3480
- p2827: 0.000130751; = p2241*(p1020+p1022)
- p2010: 0.0187245; = ((p1984*p1985+p1990*p1991+p1996*p1997+p2004*p2005)/p0818)*p0005*p0002/1000
- p0087: 3.997
- p3034: 0; = p2253*p1023
- p2288: 0.00248519; = p2223*p2195
- p2918: 0.000121987; = p2332*(p1020+p1022)
- p2294: 0.00326899; = p2223*p2201
- p2345: 0; = p2228*p2213
- p4390: 0; = p1835*p3480
- p4660: 2.18903e-5; = p1899*p3481
- p2425: 0; = p2235*p2215
- p0235: 0
- p5061: 8.34099e-5; = p1888*p3483
- p0439: 0; = SQRT(2)*(IF((2*p0307-1)<0;-1;IF((2*p0307-1)>0;1;0))*SQRT(SQRT((2/(pi()*0.140012289)+LN(1-(2*p0307-1)^2)/2)^2-LN(1-(2*p0307-1)^2)/0.140012289)-(2/(pi()*0.140012289)+LN(1-(2*p0307-1)^2)/2)))
- p0084: 97.207
- p3758: 7.07823e-6; = p1821*p3477
- p3035: 0; = p2254*p1023
- p0043: 536.405
- p4221: 4.16892e-5; = p1872*p3479
- p0789: 0
- p2606: 0; = p2410*p1014
- p1537: 66
- p0560: 0; = IF(p0296<0.5;-SQRT(p0007*EXP(p0428^2*p0008)-p0007);SQRT(p0007*EXP(p0428^2*p0008)-p0007))
- p1942: 8.12533e-5; = p1534*1000/p0818
- p4650: 2.81447e-5; = p1889*p3481
- p1831: 0
- p4655: 0.000215329; = p1894*p3481
- p3435: 0; = p3378*p1239
- p0234: 11.419
- p0140: 72.495
- p1282: 0; = IF(p1277+p1280+p1281=p1260;0;p1260-(p1277+p1280+p1281))
- p1012: 0
- p1163: 0.0086165
- p1834: 2.6001e-5; = p1426*1000/p0818
- p4153: 3.85416e-7; = p1804*p3479
- p1068: 0.164547; = IF(p1012=0;p1054/(p1061*p0818);0)
- p3352: 0; = if(and(p1232=0;p3256<>0);p3256*(p3275-p3347)/p3349;0)
- p0382: 0.5
- p2133: 7.13504e-6; = p2015*p2061*p2095/(p0818*1000)
- p4233: 1.92708e-7; = p1884*p3479
- p0838: 4.67254e8; = (p0833-p0836)*p0837
- p4595: 3.57393e-6; = p1834*p3481
- p2448: 5.23631e-6; = p2252*p1014
- p2546: 0; = p2350*p1123
- p4510: 0; = p1955*p3480
- p0962: 0; = if(and(p0683>0;or(p0807=480;p0807=32;p0807=1;and(p0807=60;p0901<0.03)));p0938;0)
- p1919: 0
- p1263: 0; = if(p1232>0;0;IF(p1259=1;0;IF(p1259+p1260>1;1-p1259;p1260)))
- p2279: 0.000783383; = p2223*p2185
- p0552: 0; = IF(p0288<0.5;-SQRT(p0007*EXP(p0420^2*p0008)-p0007);SQRT(p0007*EXP(p0420^2*p0008)-p0007))
- p3126: 0; = p2345*p1082
- p2317: 2.2984e-5; = p2224*p2184
- p1431: 10
- p0740: 98.251; = p0080*(1+p0608*p0212/100)
- p3414: 0; = p3376*p1238
- p1534: 25
- p0213: 6.632
- p2650: 0.00249805; = p2259*(p1078+p1080)
- p0875: 13.1674; = p0874*p0001*p0003/(p0818*p0002)
- p3097: 0; = p2316*p1023
- p1554: 0
- p3026: 0; = p2245*p1023
- p2705: 0.00411303; = p2314*(p1128+p1130)
- p3238: 0.854735; = IF(p3237+p3235+p3236>1;1-(p3235+p3236);p3237)
- p1082: 0.00555; = IF(p1071=0;IF(p1073+p1078+p1079+p1080+p1081=1;0;1-(p1073+p1078+p1079+p1080+p1081));0)
- p2192: 0.00862597; = p1067-p2189-p2190-p2191
- p4155: 2.63368e-6; = p1806*p3479
- p0812: 0.279412; = if(p0807=480;0.095/0.34;0)
- p4584: 1.51892e-5; = p1823*p3481
- p1271: 0; = IF(p1267+p1270=p1259;0;IF(p1267+p1270+p1269>p1259;p1259-(p1267+p1270);p1269))
- p0665: 0; = IF(p0401<0.5;-SQRT(p0007*EXP(p0533^2*p0008)-p0007);SQRT(p0007*EXP(p0533^2*p0008)-p0007))
- p1670: 0
- p0404: 0.5
- p2170: 0.00215165; = p2166*(p0913)
- p2589: 0; = p2393*p1014
- p1128: 0.5704; = if(p1121=0;IF(p1123=1;0;IF(p1123+p1124>1;1-p1123;p1124));0)
- p0870: 56920; = p0858*p0856
- p1962: 8.47046e-5; = p1960*1000/p0818
- p1734: 0
- p0031: 4.321
- p1663: 0
- p0526: 0; = SQRT(2)*(IF((2*p0394-1)<0;-1;IF((2*p0394-1)>0;1;0))*SQRT(SQRT((2/(pi()*0.140012289)+LN(1-(2*p0394-1)^2)/2)^2-LN(1-(2*p0394-1)^2)/0.140012289)-(2/(pi()*0.140012289)+LN(1-(2*p0394-1)^2)/2)))
- p3782: 0.000390482; = p1845*p3477
- p1252: 0; = if(p1232>0;0;p0724*2000*p0723*1000*p0725/100)
- p1802: 0.00025676; = p1394*1000/p0818
- p1211: 0.6
- p2851: 0.000978975; = p2265*(p1079+p1081)
- p3988: 0.000259528; = p1845*p3478
- p2626: 0; = p2430*p1123
- p2959: 0.000210109; = p2373*(p1020+p1022)
- p1696: 0
- p3045: 2.05825e-6; = p2264*p1082
- p0952: 0; = if(and(p0683>0;or(p0807=56;p0807=100;and(p0807=60;p0901>0.06)));p0934;0)
- p0402: 0.5
- p2680: 0.0107661; = p2289*(p1019+p1021)
- p3343: 0; = if(and(p1232=0;p3254<>0);IF((p3339+p3340+p3341+p3342)+(p3254*(p3269*(1-p3277))/p3338)>p3254;p3254-(p3339+p3340+p3341+p3342);p3254*(p3269*(1-p3277))/p3338);0)
- p1184: 2.43104e-7; = p1182/p0818
- p2689: 0.00396976; = p2298*(p1078+p1080)
- p4045: 5.09646e-5; = p1902*p3478
- p0107: 33.941
- p1235: 0; = if(p1232>0;0;p0727/100)
- p0287: 0.5
- p3273: 0
- p1604: 0
- p1253: 0; = if(p1232>0;0;p0735/100)
- p0160: 35.556
- p0491: 0; = SQRT(2)*(IF((2*p0359-1)<0;-1;IF((2*p0359-1)>0;1;0))*SQRT(SQRT((2/(pi()*0.140012289)+LN(1-(2*p0359-1)^2)/2)^2-LN(1-(2*p0359-1)^2)/0.140012289)-(2/(pi()*0.140012289)+LN(1-(2*p0359-1)^2)/2)))
- p2022: 0.00308688; = p2018*p2015/p0818-p2021
- p2893: 0.000145734; = p2307*(p1079+p1081)
- p0111: 6.267
- p3480: 0; = if(p1328+p1330+p1332+p1334+p1336+p1338+p1340+p1342+p1344=0;0;p1336/(p1328+p1330+p1332+p1334+p1336+p1338+p1340+p1342+p1344))
- p1585: 0
- p2190: 0.00423862; = 32.065*p2189/(2*14.0067)
- p0446: 0; = SQRT(2)*(IF((2*p0314-1)<0;-1;IF((2*p0314-1)>0;1;0))*SQRT(SQRT((2/(pi()*0.140012289)+LN(1-(2*p0314-1)^2)/2)^2-LN(1-(2*p0314-1)^2)/0.140012289)-(2/(pi()*0.140012289)+LN(1-(2*p0314-1)^2)/2)))
- p3432: 0; = p3375*p1239
- p1923: 3.25013e-5; = p1515*1000/p0818
- p3252: 0; = p1252*(p1267*(1-p3247)+p1270*(1-p3248)+p1271*(1-p3249)+p1272*(1-p3250))
- p0217: 11.758
- p2205: 0.0129807; = 2*14.0067*p2204/30.973762
- p0666: 0; = IF(p0402<0.5;-SQRT(p0007*EXP(p0534^2*p0008)-p0007);SQRT(p0007*EXP(p0534^2*p0008)-p0007))
- p0296: 0.5
- p3463: 0; = p3368*p1241
- p1262: 0; = if(p1232>0;0;p0733/100)
- p2667: 0.00599641; = p2276*(p1019+p1021)
- p5280: 3.92859e-7; = p1901*p3484
- p4457: 0; = p1902*p3480
- p3227: 0.00139569; = p3223*p1229
- p0188: 9.499
- p4048: 7.84071e-6; = p1905*p3478
- p2700: 0.000138512; = p2309*(p1078+p1080)
- p0966: 0.82303; = if(p0683=0;0;IF(p0684/100+p0965=1;0;1-(p0684/100+p0965)))
- p0610: 0; = IF(p0346<0.5;-SQRT(p0007*EXP(p0478^2*p0008)-p0007);SQRT(p0007*EXP(p0478^2*p0008)-p0007))
- p3387: 0; = p3368*p1234
- p2954: 1.05119e-5; = p2368*(p1020+p1022)
- p1167: 0.5
- p4307: 1.67411e-6; = p1962*p3479
- p4246: 7.06596e-7; = p1897*p3479
- p3083: 7.5755e-6; = p2302*p1082
- p4466: 0; = p1911*p3480
- p2200: 0.0324665; = p1056/p0818
- p3458: 0; = p3363*p1241
- p2969: 2.15705e-6; = p2383*(p1079+p1081)
- p2422: 0; = p2235*p2212
- p0968: 0
- p3518: 2.03549e-6; = p1787*p3476
- p3450: 0; = p3374*p1240
- p0109: 18.09
- p1230: 0.5
- p0479: 0; = SQRT(2)*(IF((2*p0347-1)<0;-1;IF((2*p0347-1)>0;1;0))*SQRT(SQRT((2/(pi()*0.140012289)+LN(1-(2*p0347-1)^2)/2)^2-LN(1-(2*p0347-1)^2)/0.140012289)-(2/(pi()*0.140012289)+LN(1-(2*p0347-1)^2)/2)))
- p0572: 0; = IF(p0308<0.5;-SQRT(p0007*EXP(p0440^2*p0008)-p0007);SQRT(p0007*EXP(p0440^2*p0008)-p0007))
- p2514: 3.19392e-5; = p2318*p1014
- p2426: 0; = p2235*p2216
- p2134: 3.28975e-5; = p2015*p2062*p2096/(p0818*1000)
- p5302: 1.87076e-7; = p1923*p3484
- p1991: 3.97488e7; = (if(p1111=0;0;p1106/p1111)+if(p1112=0;0;p1107/p1112)+if(p1113=0;0;p1108/p1113)+if(p1114=0;0;p1109/p1114)+if(p1115=0;0;p1110/p1115))*(1+p1157)
- p1379: 3
- p2695: 0.0044927; = p2304*(p1078+p1080)
- p2525: 9.59685e-7; = p2329*p1014
- p2148: 8.76577e-7; = p2015*p2076*p2110/(p0818*1000)
- p2924: 0; = p2338*(p1079+p1081)
- p1784: 0
- p2244: 0.000292165; = p2222*p2189
- p0802: 525000
- p1102: 0.020586; = IF(p1071=0;IF(p1096+p1101=1;0;IF(p1096+p1101+p1098>1;1-(p1096+p1101);p1098));0)
- p2538: 0; = p2342*p1073
- p2585: 0.000530523; = p2389*p1123
- p0696: 0
- p0869: 0.00833271; = IF(p0858+p0864+p0865+p0866+p0867+p0868=1;0;1-(p0858+p0864+p0865+p0866+p0867+p0868))
- p0367: 0.5
- p1694: 0
- p3379: 0; = if(p1232=0;p3246*p3361/p0818;0)
- p2268: 0.000454937; = p2226*p2214
- p4616: 3.52926e-5; = p1855*p3481
- p1689: 0
- p2960: 0.00240873; = p2374*(p1020+p1022)
- p3336: 0; = IF(or(p3254=0;p1232>0);0;p3271*p3289)
- p1998: 188
- p2992: 0; = p2406*(p1020+p1022)
- p5083: 3.59593e-6; = p1910*p3483
- p3007: 0; = p2421*(p1079+p1081)
- p2101: 0.620397
- p3139: 0; = p2358*p1023
- p1210: 0.18
- p2291: 3.86347e-5; = p2223*p2198
- p2158: 2.65556e-6; = p2015*p2082*p2120/(p0818*1000)
- p2241: 0.000825916; = p2222*p2186
- p2334: 4.75459e-5; = p2224*p2202
- p2098: 0.856281
- p2164: 0.00650533; = (p2015/p0818)-(p2022)-(p2035+p2036+p2052)-(p2017/p0818)-(p2039+p2041+p2044+p2158+p2159+p2160+p2161+p2162)
- p1215: 0.375; = IF(p1214=0;0;(p1214-1.5)/(p1214-1)^2)
- p3315: 0; = if(and(p1232=0;p3253<>0);p3264*p3289;0)
- p1609: 0
- p2952: 0.00110984; = p2366*(p1020+p1022)
- p1075: 0.20158; = IF(p1071=0;p0713/100;0)
- p3769: 0.000172237; = p1832*p3477
- p0820: 0.600863; = if(p0807=480;p0814;0)
- p1992: 3900
- p2346: 0; = p2228*p2214
- p2149: 6.61277e-7; = p2015*p2077*p2111/(p0818*1000)
- p1667: 0
- p2632: 0.000361958; = p2241*(p1019+p1021)
- p2102: 0.922577
- p1495: 50
- p0741: 3.522; = p0081*(1+p0609*p0213/100)
- p2573: 0.000127621; = p2377*p1073
- p0401: 0.5
- p0955: 0; = if(and(p0683>0;or(p0807=56;p0807=100;and(p0807=60;p0901>0.06)));p0937;0)
- p3355: 0; = if(and(p1232=0;p3256<>0);p3256-(p3350+p3351+p3352+p3353+p3354);0)
- p2191: 0.0010659; = 8*1.00794*p2189/(2*14.0067)
- p0772: 69.647; = p0112*(1+p0640*p0244/100)
- p1786: 0
- p3511: 3.39249e-6; = p1780*p3476
- p3406: 0; = p3368*p1238
- p4111: 8.54339e-6; = p1762*p3479
- p1969: 0; = p0803
- p0144: 0
- p3619: 0.000723957; = p1888*p3476
- p3415: 0; = p3377*p1238
- p1782: 0
- p1968: 131250; = if(p0807=480;p0802*p0811;0)
- p2094: 0.922577
- p2693: 0.000794582; = p2302*(p1078+p1080)
- p0754: 7139.69; = p0094*(1+p0622*p0226/100)
- p0573: 0; = IF(p0309<0.5;-SQRT(p0007*EXP(p0441^2*p0008)-p0007);SQRT(p0007*EXP(p0441^2*p0008)-p0007))
- p2809: 0; = p2418*(p1078+p1080)
- p1590: 0
- p1053: 1.13935e6; = IF(p1012=0;p1046*p1036;0)
- p4345: 0; = p1790*p3480
- p1226: 535000; = IF(p1221=0;0;IF(p1193=0;p0801;0))
- p2956: 3.79338e-5; = p2370*(p1020+p1022)
- p3020: 0; = p2239*p1023
- p2946: 0.00202143; = p2360*(p1020+p1022)
- p2236: 0; = 1-(p2230+p2231+p2232+p2233)
- p1313: 0; = p1307*p1252/p0818
- p2839: 4.51754e-6; = p2253*(p1020+p1022)
- p0033: 88.668
- p0256: 11.169
- p0635: 0; = IF(p0371<0.5;-SQRT(p0007*EXP(p0503^2*p0008)-p0007);SQRT(p0007*EXP(p0503^2*p0008)-p0007))
- p2290: 2.35385e-5; = p2223*p2197
- p2326: 0.00117161; = p2224*p2193
- p0819: 1.53406; = p0808*p0809/p0818
- p3482: 0; = if(p1328+p1330+p1332+p1334+p1336+p1338+p1340+p1342+p1344=0;0;p1340/(p1328+p1330+p1332+p1334+p1336+p1338+p1340+p1342+p1344))
- p1415: 34
- p0251: 26.847
- p0381: 0.5
- p3157: 1.03791e-5; = p2376*p1082
- p4389: 0; = p1834*p3480
- p0577: 0; = IF(p0313<0.5;-SQRT(p0007*EXP(p0445^2*p0008)-p0007);SQRT(p0007*EXP(p0445^2*p0008)-p0007))
- p4174: 4.94617e-6; = p1825*p3479
- p2507: 0.00515088; = p2311*p1123
- p0080: 98.251
- p1928: 0
- p1881: 0
- p2557: 0.000989763; = p2361*p1014
- p1204: 0.980791
- p1225: 1.088; = IF(p1221=0;0;p1223+1.2*p1224)
- p3292: 0
- p3538: 4.07098e-6; = p1807*p3476
- p0651: 0; = IF(p0387<0.5;-SQRT(p0007*EXP(p0519^2*p0008)-p0007);SQRT(p0007*EXP(p0519^2*p0008)-p0007))
- p3467: 0; = p3372*p1241
- p2766: 0.00120369; = p2375*(p1078+p1080)
- p3603: 0.000440345; = p1872*p3476
- p3065: 0; = p2284*p1023
- p2230: 0.312213; = if(p0783*p0787+p0784*p0788+p0785*p0789+p0786*p0790=0;0;p0787*p0783/(p0783*p0787+p0784*p0788+p0785*p0789+p0786*p0790))
- p2996: 0; = p2410*(p1020+p1022)
- p2922: 0; = p2336*(p1079+p1081)
- p1085: 74221.6; = IF(p1071=0;p1079*(p0710/100)*p0703*1000;0)
- p3333: 0; = if(and(p1232=0;p3255<>0);p3255-(p3328+p3329+p3330+p3331+p3332);0)
- p1009: 1.32739e-7; = p1005*p0001*p0004/(p0818*p0002)
- p3028: 0; = p2247*p1023
- p0517: 0; = SQRT(2)*(IF((2*p0385-1)<0;-1;IF((2*p0385-1)>0;1;0))*SQRT(SQRT((2/(pi()*0.140012289)+LN(1-(2*p0385-1)^2)/2)^2-LN(1-(2*p0385-1)^2)/0.140012289)-(2/(pi()*0.140012289)+LN(1-(2*p0385-1)^2)/2)))
- p1981: 400
- p4237: 6.85398e-5; = p1888*p3479
- p2690: 0.00128551; = p2299*(p1078+p1080)
- p2964: 0.00101357; = p2378*(p1079+p1081)
- p2110: 0.856281
- p0953: 0; = if(and(p0683>0;or(p0807=56;p0807=100;and(p0807=60;p0901>0.06)));p0935;0)
- p2798: 0; = p2407*(p1019+p1021)
- p0122: 72.495
- p3367: 0; = if(p1232=0;p3244*p3361/p0818;0)
- p0948: 0; = if(and(p0683=0;or(p0807=480;p0807=32;p0807=1;and(p0807=60;p0901<0.03)));p0936;0)
- p1705: 0
- p1619: 0.938128
- p0900: 2.40902; = p0899/p0818
- p1884: 9.75039e-6; = p1476*1000/p0818
- p1999: 3.45705e7; = (p1228+p1229)*p0818+p1164
- p1426: 8
- p2337: 0; = p2228*p2205
- p3210: 0; = p2429*p1132
- p5130: 8.59896e-7; = p1957*p3483
- p0950: 0; = if(and(p0683=0;or(p0807=480;p0807=32;p0807=1;and(p0807=60;p0901<0.03)));p0938;0)

- p0960: 0; = if(and(p0683>0;or(p0807=480;p0807=32;p0807=1;and(p0807=60;p0901<0.03)));p0936;0)
- p0361: 0.5
- p1091: 0.000215221; = IF(p1071=0;p1085*p0001/(p0818*p0002);0)
- p0705: 40.344; = p0045*(1+p0573*p0177/100)
- p0943: 0; = if(and(p0683=0;p0949=0);p0937;0)
- p2931: 0; = p2345*(p1079+p1081)
- p2412: 0; = p2234*p2202
- p2886: 0.00369602; = p2300*(p1079+p1081)
- p4042: 3.84195e-5; = p1899*p3478
- p4500: 0; = p1945*p3480
- p1344: 59448.5; = IF(p1318=0;p1327*p0801;0)
- p2324: 2.52981e-5; = p2224*p2191
- p2064: 0.676706
- p1543: 181
- p2472: 0.00552012; = p2276*p1014
- p1185: 0.5
- p2602: 0; = p2406*p1014
- p0496: 0; = SQRT(2)*(IF((2*p0364-1)<0;-1;IF((2*p0364-1)>0;1;0))*SQRT(SQRT((2/(pi()*0.140012289)+LN(1-(2*p0364-1)^2)/2)^2-LN(1-(2*p0364-1)^2)/0.140012289)-(2/(pi()*0.140012289)+LN(1-(2*p0364-1)^2)/2)))
- p2237: 0.00459661; = p2222*p2182
- p0755: 9.438; = p0095*(1+p0623*p0227/100)
- p2066: 0.109412
- p2681: 1.03158e-5; = p2290*(p1019+p1021)
- p0707: 10.043; = p0047*(1+p0575*p0179/100)
- p3011: 0; = p2425*(p1079+p1081)
- p2156: 4.08908e-7; = p2015*p2085*p2118/(p0818*1000)
- p1601: 0
- p2675: 0.000436261; = p2284*(p1019+p1021)
- p0993: 0; = p0989*p0001*p0004/(p0818*p0002)
- p2352: 0; = p2232*p2220
- p0719: 28.373; = p0059*(1+p0587*p0191/100)
- p0311: 0.5
- p3044: 4.76704e-6; = p2263*p1082
- p2638: 0.000298263; = p2247*(p1019+p1021)
- p0917: 3.51325; = ((p0825+p0827+((p0830+p0895)+p0814*p0818))/p0818)-(p0900+p0905+p0910+p0915)
- p0751: 25.84; = p0091*(1+p0619*p0223/100)
- p2998: 0; = p2412*(p1020+p1022)
- p2348: 0; = p2228*p2216
- p2494: 0.00143711; = p2298*p1073
- p2479: 0.000350864; = p2283*p1014
- p2622: 0; = p2426*p1073
- p1331: 0.0108705; = p1330*p0001/(p0818*p0002)
- p1417: 77
- p3271: 0
- p1502: 46
- p2778: 3.79847e-5; = p2387*(p1078+p1080)
- p3341: 0; = if(and(p1232=0;p3254<>0);p3254*(p3271-p3336)/p3338;0)
- p2321: 0.000457433; = p2224*p2188
- p0441: 0; = SQRT(2)*(IF((2*p0309-1)<0;-1;IF((2*p0309-1)>0;1;0))*SQRT(SQRT((2/(pi()*0.140012289)+LN(1-(2*p0309-1)^2)/2)^2-LN(1-(2*p0309-1)^2)/0.140012289)-(2/(pi()*0.140012289)+LN(1-(2*p0309-1)^2)/2)))
- p3427: 0; = p3370*p1239
- p1086: 0; = IF(p1071=0;p1080*(p0710/100)*p0703*1000;0)
- p2181: 489.334; = p0887+p0889+p0893+p2180
- p2548: 0; = p2352*p1123
- p2737: 0; = p2346*(p1078+p1080)
- p0988: 410854; = p0982*p0886
- p0078: 536.405
- p0226: 14.045
- p3278: 0
- p2054: 0.91
- p2377: 0.000605587; = p2229*p2206
- p2035: 5.94305e-5; = p2015*p2029*(1-p2031)/(p0818*1000)
- p3319: 0; = if(and(p1232=0;p3253<>0);p3253*(p3263-p3314)/p3316;0)
- p1202: 0.7
- p0295: 0.5
- p0911: 0.0049
- p1852: 0
- p0591: 0; = IF(p0327<0.5;-SQRT(p0007*EXP(p0459^2*p0008)-p0007);SQRT(p0007*EXP(p0459^2*p0008)-p0007))
- p2757: 0.00307237; = p2366*(p1019+p1021)
- p0858: 0.106393; = p0670*1000/p0856
- p0729: 0
- p2449: 1.15126e-5; = p2253*p1014
- p2537: 0; = p2341*p1073
- p3014: 0; = p2428*(p1129+p1131)
- p2652: 0.00671652; = p2261*(p1078+p1080)
- p1861: 0
- p0096: 50.722
- p2144: 2.06072e-6; = p2015*p2072*p2106/(p0818*1000)
- p1113: 0.100377
- p0803: 0
- p3473: 0; = p3378*p1241
- p3212: 0; = p2431*p1132
- p1983: 50
- p3479: 0.0197641; = if(p1328+p1330+p1332+p1334+p1336+p1338+p1340+p1342+p1344=0;0;p1334/(p1328+p1330+p1332+p1334+p1336+p1338+p1340+p1342+p1344))
- p3239: 0.013074; = IF(p3238+p3235+p3236=1;0;1-(p3238+p3235+p3236))
- p3279: 0
- p0880: 0; = p0868*p0856
- p2532: 0; = p2336*p1073
- p2724: 0.000144779; = p2333*(p1019+p1021)
- p4606: 0.000147871; = p1845*p3481
- p5078: 7.81723e-7; = p1905*p3483
- p1908: 0
- p1935: 0
- p2153: 2.92192e-8; = p2015*p2081*p2115/(p0818*1000)
- p5176: 1.17858e-6; = p1797*p3484
- p0250: 27.539
- p0507: 0; = SQRT(2)*(IF((2*p0375-1)<0;-1;IF((2*p0375-1)>0;1;0))*SQRT(SQRT((2/(pi()*0.140012289)+LN(1-(2*p0375-1)^2)/2)^2-LN(1-(2*p0375-1)^2)/0.140012289)-(2/(pi()*0.140012289)+LN(1-(2*p0375-1)^2)/2)))
- p1193: 0; = IF(OR(p1036=0;p1095=0);0.0001*p0857;0)
- p0608: 0; = IF(p0344<0.5;-SQRT(p0007*EXP(p0476^2*p0008)-p0007);SQRT(p0007*EXP(p0476^2*p0008)-p0007))
- p0558: 0; = IF(p0294<0.5;-SQRT(p0007*EXP(p0426^2*p0008)-p0007);SQRT(p0007*EXP(p0426^2*p0008)-p0007))
- p3217: 0.0114314; = p3213*p1228
- p1120: 0.0241562; = IF(p1071=0;p1110/(p1115*p0818);0)
- p4953: 3.90862e-7; = p1780*p3483
- p3416: 0; = p3378*p1238
- p0539: 0; = IF(p0275<0.5;-SQRT(p0007*EXP(p0407^2*p0008)-p0007);SQRT(p0007*EXP(p0407^2*p0008)-p0007))
- p0854: 229066; = p0801*((1-p0853)*p0846+p0853*p0852)
- p1464: 649
- p2578: 0.000446021; = p2382*p1073
- p1975: 0.00155134; = p1970*p0001/(p0818*p0002)
- p2890: 0.00155573; = p2304*(p1079+p1081)
- p0506: 0; = SQRT(2)*(IF((2*p0374-1)<0;-1;IF((2*p0374-1)>0;1;0))*SQRT(SQRT((2/(pi()*0.140012289)+LN(1-(2*p0374-1)^2)/2)^2-LN(1-(2*p0374-1)^2)/0.140012289)-(2/(pi()*0.140012289)+LN(1-(2*p0374-1)^2)/2)))
- p3945: 6.19416e-5; = p1802*p3478
- p2866: 0.000389203; = p2280*(p1020+p1022)
- p1058: 0.225
- p2171: 0.207444; = p2165*p0831
- p0977: 0; = IF(p0687=0;IF(OR(p0686=0;p0688=0);0;p0686*1000*p0688/100);0)
- p2598: 0; = p2402*p1014
- p1685: 0.491852
- p4164: 4.23958e-6; = p1815*p3479
- p1497: 10
- p2646: 0.000481286; = p2255*(p1019+p1021)
- p2060: 0.272353
- p4380: 0; = p1825*p3480
- p2195: 0.0105818; = p2194*p2193
- p2327: 0.000251148; = p2224*p2195
- p1134: 221810; = if(p1121=0;p1128*(p0716/100)*p0703*1000;0)
- p0083: 4.524
- p1673: 0
- p1149: 0.830148
- p0912: 0.0117914
- p3113: 0; = p2332*p1023
- p3187: 0; = p2406*p1023
- p1882: 0
- p0327: 0.5
- p0587: 0; = IF(p0323<0.5;-SQRT(p0007*EXP(p0455^2*p0008)-p0007);SQRT(p0007*EXP(p0455^2*p0008)-p0007))
- p2238: 0.00100901; = p2222*p2183
- p0745: 3188.5; = p0085*(1+p0613*p0217/100)
- p1684: 0.698317
- p1890: 0
- p0899: 7.41208e8; = p0825*p0896+p0827*p0897+(p0830+p0895)*p0824*p0898
- p3135: 0; = p2354*p1023
- p0533: 0; = SQRT(2)*(IF((2*p0401-1)<0;-1;IF((2*p0401-1)>0;1;0))*SQRT(SQRT((2/(pi()*0.140012289)+LN(1-(2*p0401-1)^2)/2)^2-LN(1-(2*p0401-1)^2)/0.140012289)-(2/(pi()*0.140012289)+LN(1-(2*p0401-1)^2)/2)))
- p2576: 7.88835e-5; = p2380*p1073
- p2512: 0.000122455; = p2316*p1014
- p2471: 0.000403605; = p2275*p1123
- p1886: 0
- p3043: 1.05416e-5; = p2262*p1082
- p0987: 0.325973; = if(p0978>0;0;if(and(p0687=0;p0691=0;p0695=0;p0699=0);0;IF(p0982+p0985+p0986=1;0;1-(p0982+p0985+p0986))))
- p3094: 0.000141416; = p2313*p1132
- p1190: 4.37174e-7; = p1188/p0818
- p3353: 0; = if(and(p1232=0;p3256<>0);p3256*(p3276-p3348)/p3349;0)
- p4280: 6.4236e-7; = p1931*p3479
- p3264: 0
- p3566: 4.07098e-6; = p1835*p3476
- p0834: 22
- p0686: 147.248; = p0026*(1+p0554*p0158/100)
- p3413: 0; = p3375*p1238
- p0785: 0
- p2529: 0.000133279; = p2333*p1014
- p3744: 7.07823e-6; = p1807*p3477
- p3146: 0; = p2365*p1023
- p2432: 0.171512; = p1158
- p2521: 8.25958e-5; = p2325*p1014
- p2333: 0.000330357; = p2224*p2201
- p4802: 0; = p1835*p3482
- p0997: 0; = if(p0888=0;0;if((p0695*p0694*1000*p0696/100)/p0888>1;1;(p0695*p0694*1000*p0696/100)/p0888))
- p1333: 0.00722491; = p1332*p0001/(p0818*p0002)
- p2722: 3.76199e-6; = p2331*(p1019+p1021)
- p1209: 5.02035; = p1206*p0818*p0822/p0801
- p3615: 2.03549e-6; = p1884*p3476
- p1324: 2.65354; = IF(((p0745*1000*p0751/100)+(p0754*1000*p0760/100))/p0801<0;0;((p0745*1000*p0751/100)+(p0754*1000*p0760/100))/p0801)
- p2500: 0.00162643; = p2304*p1073
- p1628: 0.601994
- p1845: 0.00107579; = p1437*1000/p0818
- p4774: 0; = p1807*p3482
- p1052: 3.22082e6; = IF(p1012=0;p1045*p1036;0)
- p0924: 0; = IF(p0918+p0923=1;0;IF(p0918+p0923+p0920>1;1-(p0918+p0923);p0920))
- p2854: 9.17063e-5; = p2268*(p1079+p1081)
- p3180: 0; = p2399*p1023
- p2092: 0.54529
- p1148: 0.082617; = if(p1121=0;IF(p1146=1;0;1-p1146);0)
- p2648: 0.000794102; = p2257*(p1019+p1021)
- p2201: 0.0139192; = 12.01*p2200/(2*14.0067)
- p1307: 0
- p3478: 0.241243; = if(p1328+p1330+p1332+p1334+p1336+p1338+p1340+p1342+p1344=0;0;p1332/(p1328+p1330+p1332+p1334+p1336+p1338+p1340+p1342+p1344))
- p1170: 271.92; = p1169*p0801
- p1033: 0.00029992; = IF(p1012=0;p1027*p0001/(p0818*p0002);0)
- p2547: 0; = p2351*p1123
- p2289: 0.0245661; = p2223*p2196
- p0767: 33.941; = p0107*(1+p0635*p0239/100)
- p0771: 6.267; = p0111*(1+p0639*p0243/100)
- p2544: 0; = p2348*p1073
- p2114: 0.832356
- p1093: 0; = IF(p1071=0;p1087*p0001/(p0818*p0002);0)
- p0816: 0
- p0670: 56.92; = p0010*(1+p0538*p0142/100)
- p2691: 0.0106735; = p2300*(p1078+p1080)
- p1738: 0.54188
- p0778: 28.363; = p0118*(1+p0646*p0250/100)
- p1959: 4594.06; = if(p0738*p0740*p0739>0;p0738*1000*(p0740/100)*p0739/1000;p1958)
- p1360: 81
- p3426: 0; = p3369*p1239
- p4515: 4.02067e-6; = p1754*p3481
- p0928: 0; = p0801*p0918
- p3809: 0.000765628; = p1872*p3477
- p1161: 17771.1; = (p0722/100)*p0702*1000
- p0965: 0; = IF(p0684/100=1;0;IF(p0684/100+p0685/100>1;1-p0684/100;p0685/100))
- p4712: 8.08602e-5; = p1951*p3481
- p1041: 0.317801
- p0730: 0
- p2228: 0; = if(p0774*p0778+p0775*p0779+p0776*p0780+p0777*p0781=0;0;p0780*p0776/(p0774*p0778+p0775*p0779+p0776*p0780+p0777*p0781))
- p0028: 6.401
- p1825: 0.00025026; = p1417*1000/p0818
- p1547: 83
- p1790: 6.82527e-5; = p1382*1000/p0818
- p0634: 0; = IF(p0370<0.5;-SQRT(p0007*EXP(p0502^2*p0008)-p0007);SQRT(p0007*EXP(p0502^2*p0008)-p0007))
- p0509: 0; = SQRT(2)*(IF((2*p0377-1)<0;-1;IF((2*p0377-1)>0;1;0))*SQRT(SQRT((2/(pi()*0.140012289)+LN(1-(2*p0377-1)^2)/2)^2-LN(1-(2*p0377-1)^2)/0.140012289)-(2/(pi()*0.140012289)+LN(1-(2*p0377-1)^2)/2)))
- p0323: 0.5
- p2490: 0.00131884; = p2294*p1014
- p1644: 0
- p0791: 0
- p0290: 0.5
- p3351: 0; = if(and(p1232=0;p3256<>0);p3256*(p3274-p3346)/p3349;0)
- p5203: 2.00171e-6; = p1824*p3484
- p1824: 0.000347764; = p1416*1000/p0818
- p3419: 0; = p3362*p1239
- p2940: 0.00611042; = p2354*(p1020+p1022)
- p0586: 0; = IF(p0322<0.5;-SQRT(p0007*EXP(p0454^2*p0008)-p0007);SQRT(p0007*EXP(p0454^2*p0008)-p0007))
- p1655: 0
- p1866: 0
- p0317: 0.5
- p3115: 0; = p2334*p1023
- p0855: 6.64223; = p0854*p0001*p0003/(p0818*p0002)
- p0728: 0
- p0474: 0; = SQRT(2)*(IF((2*p0342-1)<0;-1;IF((2*p0342-1)>0;1;0))*SQRT(SQRT((2/(pi()*0.140012289)+LN(1-(2*p0342-1)^2)/2)^2-LN(1-(2*p0342-1)^2)/0.140012289)-(2/(pi()*0.140012289)+LN(1-(2*p0342-1)^2)/2)))
- p2571: 0.000435753; = p2375*p1073
- p0746: 46.488; = p0086*(1+p0614*p0218/100)
- p1026: 53555.5; = IF(p1012=0;p1020*(p0704/100)*p0703*1000;0)
- p2584: 0.000123243; = p2388*p1073
- p3096: 0; = p2315*p1023
- p0980: 0; = IF(p0977=0;0;p0977*p0001/(p0818*p0002))
- p3101: 0; = p2320*p1023
- p2476: 0.000991852; = p2280*p1014
- p2840: 0.00040552; = p2254*(p1020+p1022)
- p3405: 0; = p3367*p1238
- p2742: 0; = p2351*(p1128+p1130)
- p3330: 0; = if(and(p1232=0;p3255<>0);p3255*(p3267-p3325)/p3327;0)
- p4729: 0; = p1762*p3482
- p0846: 0.428161; = p0841*p0845^3+p0842*p0845^2+p0843*p0845+p0844
- p1122: 0; = p1121*p0001/(p0818*p0002)
- p1989: 50
- p1925: 1.95008e-5; = p1517*1000/p0818
- p1181: 0.00013981
- p2140: 2.54386e-6; = p2015*p2068*p2102/(p0818*1000)
- p1653: 0
- p0161: 4.763
- p3372: 0; = if(p1232=0;p3245*p3360/p0818;0)
- p0683: 10.124; = p0023*(1+p0551*p0155/100)
- p4958: 1.09441e-6; = p1785*p3483
- p3451: 0; = p3375*p1240
- p3334: 0; = IF(or(p3254=0;p1232>0);0;p3269*p3277*(p3300*p3292+(1-p3300)*p3296))
- p2519: 4.05858e-5; = p2323*p1014
- p1580: 0
- p3004: 0; = p2418*(p1079+p1081)
- p1706: 0.254333
- p3528: 4.27453e-5; = p1797*p3476
- p4512: 0; = p1957*p3480
- p1603: 0.948955
- p0267: 6.221
- p3620: 4.27453e-5; = p1889*p3476
- p2269: 0.00171679; = p2226*p2215
- p3499: 5.49583e-5; = p1768*p3476
- p1558: 0.399536
- p4279: 6.80902e-6; = p1930*p3479
- p0310: 0.5
- p1939: 0
- p3471: 0; = p3376*p1241
- p2844: 0.000956439; = p2258*(p1079+p1081)
- p3293: 0
- p1949: 0
- p1614: 0
- p1768: 0.000263261; = p1360*1000/p0818
- p2340: 0; = p2228*p2208
- p0673: 0
- p1680: 0.846551
- p3439: 0; = p3363*p1240
- p2909: 1.59259e-5; = p2323*(p1020+p1022)
- p3625: 0.000327036; = p1894*p3476
- p1573: 0
- p3395: 0; = p3376*p1234
- p2423: 0; = p2235*p2213
- p1745: 0
- p3441: 0; = p3365*p1240
- p3000: 0; = p2414*(p1079+p1081)
- p2951: 0.00517742; = p2365*(p1020+p1022)
- p1899: 0.000159256; = p1491*1000/p0818
- p2196: 0.104601; = p1068-p2193-p2195
- p3868: 1.1797e-5; = p1931*p3477
- p3068: 0; = p2287*p1023
- p2299: 0.00220829; = p2227*p2206
- p5074: 1.64162e-6; = p1901*p3483
- p3374: 0; = if(p1232=0;p3246*p3356/p0818;0)
- p3017: 0; = p2431*(p1129+p1131)
- p4454: 0; = p1899*p3480
- p1136: 0; = if(p1121=0;p1130*(p0716/100)*p0703*1000;0)
- p3261: 0
- p1568: 0
- p0315: 0.5
- p2777: 0.000435533; = p2386*(p1078+p1080)
- p2787: 0; = p2396*(p1019+p1021)
- p1996: 30
- p1337: 0; = p1336*p0001/(p0818*p0002)
- p2322: 8.7888e-5; = p2224*p2189
- p3175: 0; = p2394*p1023
- p5012: 7.81723e-7; = p1839*p3483
- p0725: 0
- p1228: 0.10134; = IF(p1221=0;0;p0801*p1212*2000/(p1222+p1221*p1225)/p0818)
- p0143: 0
- p0625: 0; = IF(p0361<0.5;-SQRT(p0007*EXP(p0493^2*p0008)-p0007);SQRT(p0007*EXP(p0493^2*p0008)-p0007))
- p3373: 0; = if(p1232=0;p3245*p3361/p0818;0)
- p5181: 1.4779e-6; = p1802*p3484
- p2226: 0.330585; = if(p0774*p0778+p0775*p0779+p0776*p0780+p0777*p0781=0;0;p0778*p0774/(p0774*p0778+p0775*p0779+p0776*p0780+p0777*p0781))
- p4663: 2.90382e-5; = p1902*p3481
- p1104: 0.261145; = IF(p1071=0;IF(p1096+p1101+p1102+p1103=1;0;1-(p1096+p1101+p1102+p1103));0)
- p2883: 0.00151992; = p2297*(p1079+p1081)
- p1080: 0; = IF(p1071=0;IF(p1073+p1078+p1079=1;0;IF(p1073+p1078+p1079+p1076>1;1-(p1073+p1078+p1079);p1076));0)
- p3140: 0; = p2359*p1023
- p2495: 0.000465375; = p2299*p1073
- p1795: 2.6001e-5; = p1387*1000/p0818
- p0975: 0.00882502; = p0973*p0974/p0818
- p1826: 0
- p0845: 0.5
- p0681: 536.405; = p0021*(1+p0549*p0153/100)
- p1710: 0
- p1141: 0.000319933; = if(p1121=0;p1135*p0001/(p0818*p0002);0)
- p3965: 1.56814e-5; = p1822*p3478
- p1325: 0; = IF(((p0745*1000*p0752/100)+(p0754*1000*p0761/100))/p0801<0;0;((p0745*1000*p0752/100)+(p0754*1000*p0761/100))/p0801)
- p2574: 0.00105963; = p2378*p1073
- p3466: 0; = p3371*p1241
- p3158: 3.36101e-6; = p2377*p1082
- p2438: 4.79561e-5; = p2242*p1014
- p2743: 0; = p2352*(p1128+p1130)
- p2437: 0.000333208; = p2241*p1014
- p4088: 5.17487e-5; = p1945*p3478
- p1027: 103431; = IF(p1012=0;p1021*(p0704/100)*p0703*1000;0)
- p4204: 5.07464e-6; = p1855*p3479
- p2559: 0.000284899; = p2363*p1014
- p3118: 0; = p2337*p1082
- p5284: 1.87076e-7; = p1905*p3484
- p0926: 0; = IF(p0918+p0923+p0924+p0925=1;0;IF(p0918+p0923+p0924+p0925+p0922>1;1-(p0918+p0923+p0924+p0925);p0922))
- p2183: 0.0127887; = p1064-p2182
- p0440: 0; = SQRT(2)*(IF((2*p0308-1)<0;-1;IF((2*p0308-1)>0;1;0))*SQRT(SQRT((2/(pi()*0.140012289)+LN(1-(2*p0308-1)^2)/2)^2-LN(1-(2*p0308-1)^2)/0.140012289)-(2/(pi()*0.140012289)+LN(1-(2*p0308-1)^2)/2)))
- p3262: 0
- p2116: 0.444424
- p2505: 5.01435e-5; = p2309*p1073
- p3449: 0; = p3373*p1240
- p2375: 0.00206773; = p2229*p2204
- p1638: 0
- p0624: 0; = IF(p0360<0.5;-SQRT(p0007*EXP(p0492^2*p0008)-p0007);SQRT(p0007*EXP(p0492^2*p0008)-p0007))
- p2465: 0.000361796; = p2269*p1073
- p2246: 8.40981e-5; = p2222*p2191
- p0379: 0.5
- p2698: 0.000420857; = p2307*(p1078+p1080)
- p3103: 0; = p2322*p1023
- p4013: 1.41133e-5; = p1870*p3478
- p1902: 0.000211258; = p1494*1000/p0818
- p2663: 0.0131592; = p2272*(p1128+p1130)
- p4546: 6.25438e-6; = p1785*p3481
- p0139: 76.77
- p1130: 0; = if(p1121=0;IF(p1123+p1128+p1129=1;0;IF(p1123+p1128+p1129+p1126>1;1-(p1123+p1128+p1129);p1126));0)
- p3029: 0; = p2248*p1023
- p1316: 0; = p1312*p1252/p0818
- p2198: 0.000164504; = 22.98976928*p2197/14.0067
- p2775: 6.51379e-5; = p2384*(p1078+p1080)
- p3516: 9.49896e-6; = p1785*p3476
- p0366: 0.5
- p0831: 0.1385; = 1-p0824
- p0699: 0
- p3161: 2.07746e-6; = p2380*p1082
- p5214: 1.12245e-7; = p1835*p3484
- p0320: 0.5
- p3064: 0; = p2283*p1023
- p0732: 0
- p4782: 0; = p1815*p3482
- p2795: 0; = p2404*(p1019+p1021)
- p1758: 0
- p1065: 0.004304; = IF(p1012=0;p1051/(p1058*p0818);0)
- p1733: 0
- p1719: 0.4576
- p2491: 0.000189811; = p2295*p1014
- p2072: 0.134
- p2916: 6.18097e-7; = p2330*(p1020+p1022)
- p2773: 0.00123205; = p2382*(p1078+p1080)
- p1424: 146
- p2166: 1.29035; = p2165*p0824
- p2660: 0.000999394; = p2269*(p1078+p1080)
- p1596: 0
- p0710: 68.642; = p0050*(1+p0578*p0182/100)
- p0165: 6.544
- p2137: 8.45491e-7; = p2015*p2065*p2099/(p0818*1000)
- p1682: 0
- p5244: 3.74151e-8; = p1865*p3484
- p1047: 0.317801; = IF(p1012=0;IF(p1037+p1044+p1045+p1046=1;0;IF(p1037+p1044+p1045+p1046+p1041>1;1-(p1037+p1044+p1045+p1046);p1041));0)
- p0832: 1.2943e8; = p0831*p0830/(1-p0831)
- p2587: 4.77775e-5; = p2391*p1123
- p0291: 0.5
- p0886: 609551; = p0686*1000*p0687*p0689/100
- p1578: 0
- p0940: 0; = if(and(p0683=0;p0946=0);p0934;0)
- p2666: 0.00205937; = p2275*(p1128+p1130)
- p0856: 535000; = p0801
- p3129: 0; = p2348*p1082
- p1171: 0.00155134; = p0801*p0001/(p0818*p0002)
- p3021: 0; = p2240*p1023
- p2830: 4.62526e-5; = p2244*(p1020+p1022)
- p4979: 3.20507e-6; = p1806*p3483
- p3296: 0
- p2729: 0; = p2338*(p1078+p1080)
- p3237: 0.854735
- p3015: 0; = p2429*(p1129+p1131)
- p1658: 0
- p3699: 0.000156901; = p1762*p3477
- p3248: 0
- p0779: 59.254; = p0119*(1+p0647*p0251/100)
- p4350: 0; = p1795*p3480
- p3060: 0; = p2279*p1023
- p2941: 0.00134131; = p2355*(p1020+p1022)
- p1963g: 0.00405885; = p1667*p1871+p1668*p1872+p1669*p1873+p1670*p1874+p1671*p1875+p1672*p1876+p1673*p1877+p1674*p1878+p1675*p1879+p1676*p1880+p1677*p1881+p1678*p1882+p1679*p1883+p1680*p1884+p1681*p1885+p1682*p1886+p1683*p1887+p1684*p1888+p1685*p1889
- p3107: 0; = p2326*p1023
- p0935: 0; = p0929*p0001/(p0818*p0002)
- p2390: 0.0066877; = p2233*p2219
- p1345: 0.000172383; = IF(p1318=0;p1344*p0001/(p0818*p0002);0)
- p2379: 0.000827747; = p2229*p2208
- p2455: 0.000904333; = p2259*p1073
- p2224: 0.023734; = if(p0765*p0769+p0766*p0770+p0767*p0771+p0768*p0772=0;0;p0771*p0767/(p0765*p0769+p0766*p0770+p0767*p0771+p0768*p0772))
- p4892: 0; = p1925*p3482
- p0355: 0.5
- p1693: 0.384846
- p5028: 6.17561e-6; = p1855*p3483
- p0214: 2.067
- p0585: 0; = IF(p0321<0.5;-SQRT(p0007*EXP(p0453^2*p0008)-p0007);SQRT(p0007*EXP(p0453^2*p0008)-p0007))
- p0245: 9.91
- p2679: 0.00108913; = p2288*(p1019+p1021)
- p1267: 0
- p1637: 0
- p2882: 0.000853876; = p2296*(p1020+p1022)
- p0792: 0
- p0939: 0.00155134; = p0933*p0001/(p0818*p0002)
- p2933: 0; = p2347*(p1079+p1081)
- p2206: 0.00420349; = 9*1.00794*p2204/30.973762
- p2362: 0.00280813; = p2225*p2190
- p1133: 43471.4; = if(p1121=0;p1123*(p0716/100)*p0703*1000;0)
- p2995: 0; = p2409*(p1020+p1022)
- p5258: 1.87076e-8; = p1879*p3484
- p4596: 2.68045e-6; = p1835*p3481
- p3254: 0; = p1252*(p1287*(1-p3247)+p1290*(1-p3248)+p1291*(1-p3249)+p1292*(1-p3250))
- p1284: 0; = p1280*p1252/p0818
- p3294: 0
- p2354: 0.0385978; = p2225*p2182
- p4306: 7.06596e-7; = p1957*p3479
- p5234: 1.4779e-6; = p1855*p3484
- p4996: 2.65786e-6; = p1823*p3483
- p0445: 0; = SQRT(2)*(IF((2*p0313-1)<0;-1;IF((2*p0313-1)>0;1;0))*SQRT(SQRT((2/(pi()*0.140012289)+LN(1-(2*p0313-1)^2)/2)^2-LN(1-(2*p0313-1)^2)/0.140012289)-(2/(pi()*0.140012289)+LN(1-(2*p0313-1)^2)/2)))
- p2461: 0.00102346; = p2265*p1073
- p0780: 0
- p4304: 5.33159e-6; = p1955*p3479
- p3247: 0
- p1197: 1.806
- p4309: 0; = p1754*p3480
- p0232: 33.778
- p2175: 0.00120024; = p0895*p0908/p0818
- p2550: 0.0155719; = p2354*p1014
- p3040: 2.38163e-5; = p2259*p1082
- p0963: 0.00155134; = if(and(p0683>0;or(p0807=480;p0807=32;p0807=1;and(p0807=60;p0901<0.03)));p0939;0)
- p0216: 1.736
- p2012: 0.0259651
- p0480: 0; = SQRT(2)*(IF((2*p0348-1)<0;-1;IF((2*p0348-1)>0;1;0))*SQRT(SQRT((2/(pi()*0.140012289)+LN(1-(2*p0348-1)^2)/2)^2-LN(1-(2*p0348-1)^2)/0.140012289)-(2/(pi()*0.140012289)+LN(1-(2*p0348-1)^2)/2)))
- p5273: 9.01704e-6; = p1894*p3484
- p2518: 3.54576e-5; = p2322*p1014
- p2082: 0.285294
- p2292: 8.49425e-5; = p2223*p2199
- p0969: 4.46952e6; = p0966*p0683*p0682*1000
- p2255: 0.0010982; = p2222*p2201
- p1963j: 0.000421044; = p1725*p1929+p1726*p1930+p1727*p1931+p1728*p1932+p1729*p1933+p1730*p1934+p1731*p1935+p1732*p1936+p1733*p1937+p1734*p1938+p1735*p1939+p1736*p1940+p1737*p1941+p1738*p1942+p1739*p1943+p1740*p1944+p1741*p1945+p1742*p1946+p1743*p1947
- p3050: 9.52818e-6; = p2269*p1082
- p1849: 0
- p1858: 0
- p2993: 0; = p2407*(p1020+p1022)
- p1759: 0
- p2872: 0.000320713; = p2286*(p1020+p1022)
- p3226: 0.0024675; = p3222*p1229
- p4173: 6.87325e-6; = p1824*p3479
- p0700: 0
- p3431: 0; = p3374*p1239
- p4548: 1.34022e-6; = p1787*p3481
- p5043: 1.4071e-6; = p1870*p3483
- p2747: 0.000281171; = p2356*(p1019+p1021)
- p2934: 0; = p2348*(p1079+p1081)
- p2577: 3.40594e-5; = p2381*p1073
- p1121: 0
- p0941: 0; = if(and(p0683=0;p0947=0);p0935;0)
- p2989: 0; = p2403*(p1020+p1022)
- p2400: 0; = p2234*p2189
- p2741: 0; = p2350*(p1128+p1130)
- p1278: 0
- p1616: 0
- p4514: 0; = p1963*p3480
- p2253: 2.8536e-5; = p2222*p2199
- p4317: 0; = p1762*p3480
- p2649: 0.00276204; = p2258*(p1078+p1080)
- p0219: 29.026
- p1895: 0
- p2637: 3.6856e-5; = p2246*(p1019+p1021)
- p2287: 0.0115934; = p2223*p2193
- p2363: 0.000706173; = p2225*p2191
- p4151: 5.07464e-6; = p1802*p3479
- p1588: 0
- p3688: 7.46347e-6; = p1957*p3476
- p0358: 0.5
- p2045: 30
- p3464: 0; = p3369*p1241
- p1572: 0
- p3771: 9.43763e-6; = p1834*p3477
- p4582: 2.68045e-6; = p1821*p3481
- p0797: 42.127; = p0137*(1+p0665*p0269/100)
- p0515: 0; = SQRT(2)*(IF((2*p0383-1)<0;-1;IF((2*p0383-1)>0;1;0))*SQRT(SQRT((2/(pi()*0.140012289)+LN(1-(2*p0383-1)^2)/2)^2-LN(1-(2*p0383-1)^2)/0.140012289)-(2/(pi()*0.140012289)+LN(1-(2*p0383-1)^2)/2)))
- p2643: 5.68811e-6; = p2252*(p1019+p1021)
- p2970: 2.25559e-5; = p2384*(p1079+p1081)
- p2311: 0.0460764; = p2231*p2218
- p2369: 0.000108986; = p2225*p2198
- p3382: 0; = p3363*p1234
- p2130: 1.21839e-5; = p2015*p2058*p2092/(p0818*1000)
- p2386: 0.000748171; = p2229*p2215
- p0874: 454096; = p0865*p0856
- p1913: 0
- p1079: 0.20158; = IF(p1071=0;IF(p1073+p1078=1;0;IF(p1073+p1078+p1075>1;1-(p1073+p1078);p1075));0)
- p0100: 8.344
- p2165: 1.49779; = (p0833-p2014)/p0818-p0839
- p2501: 8.22317e-6; = p2305*p1073
- p3686: 5.63153e-5; = p1955*p3476
- p2813: 0; = p2422*(p1078+p1080)
- p0487: 0; = SQRT(2)*(IF((2*p0355-1)<0;-1;IF((2*p0355-1)>0;1;0))*SQRT(SQRT((2/(pi()*0.140012289)+LN(1-(2*p0355-1)^2)/2)^2-LN(1-(2*p0355-1)^2)/0.140012289)-(2/(pi()*0.140012289)+LN(1-(2*p0355-1)^2)/2)))
- p0571: 0; = IF(p0307<0.5;-SQRT(p0007*EXP(p0439^2*p0008)-p0007);SQRT(p0007*EXP(p0439^2*p0008)-p0007))
- p1732: 0
- p0909: 6.1761e6; = p0825*p0906+p0827*p0907+(p0830+p0895)*p0824*p0908
- p2356: 0.000641576; = p2225*p2184
- p1963h: 0.00147166; = p1686*p1890+p1687*p1891+p1688*p1892+p1689*p1893+p1690*p1894+p1691*p1895+p1692*p1896+p1693*p1897+p1694*p1898+p1695*p1899+p1696*p1900+p1697*p1901+p1698*p1902+p1699*p1903+p1700*p1904+p1701*p1905+p1702*p1906+p1703*p1907+p1704*p1908+p1705*p1909
- p2671: 0.00107743; = p2280*(p1019+p1021)
- p2162: 2.9281e-7; = p2015*p2086*p2124/(p0818*1000)
- p1836: 0
- p0784: 71.641; = p0124*(1+p0652*p0256/100)
- p3138: 0; = p2357*p1023
- p2905: 3.93321e-5; = p2319*(p1020+p1022)
- p0400: 0.5
- p3194: 0; = p2413*p1023
- p3493: 9.02402e-5; = p1762*p3476
- p0646: 0; = IF(p0382<0.5;-SQRT(p0007*EXP(p0514^2*p0008)-p0007);SQRT(p0007*EXP(p0514^2*p0008)-p0007))
- p4214: 1.28472e-7; = p1865*p3479
- p3149: 0; = p2368*p1023
- p0757: 28.455; = p0097*(1+p0625*p0229/100)
- p4918: 0; = p1951*p3482
- p3301: 0; = if(and(p1232=0;p3252<>0);p3257*p3277*(p3297*p3290+(1-p3297)*p3294);0)
- p1889: 0.000204758; = p1481*1000/p0818
- p1755: 0
- p1227: 0.00155134; = IF(p1221=0;0;p1226*p0001/(p0818*p0002))
- p3554: 2.30689e-5; = p1823*p3476
- p1678: 0
- p1659: 0
- p1140: 0.000643182; = if(p1121=0;p1134*p0001/(p0818*p0002);0)
- p2759: 2.91001e-5; = p2368*(p1019+p1021)
- p0774: 46.008; = p0114*(1+p0642*p0246/100)
- p3274: 0
- p1741: 0.527618
- p0853: 0; = p0803/(p0802+p0803)
- p1354: 133
- p3321: 0; = if(and(p1232=0;p3253<>0);IF((p3317+p3318+p3319+p3320)+(p3253*(p3261*(1-p3277))/p3316)>p3253;p3253-(p3317+p3318+p3319+p3320);p3253*(p3261*(1-p3277))/p3316);0)
- p3752: 7.78605e-5; = p1815*p3477
- p2697: 0.000237527; = p2306*(p1078+p1080)
- p4102: 0.00218174; = p1963*p3478
- p0360: 0.5
- p2721: 1.71108e-6; = p2330*(p1019+p1021)
- p0682: 536.405; = p0022*(1+p0550*p0154/100)
- p5268: 1.17858e-6; = p1889*p3484
- p1778: 0
- p2806: 0; = p2415*(p1078+p1080)
- p5185: 7.6701e-7; = p1806*p3484
- p2781: 0.00381467; = p2390*(p1128+p1130)
- p2850: 7.47572e-5; = p2264*(p1079+p1081)
- p0550: 0; = IF(p0286<0.5;-SQRT(p0007*EXP(p0418^2*p0008)-p0007);SQRT(p0007*EXP(p0418^2*p0008)-p0007))
- p3199: 0; = p2418*p1082
- p2511: 0.000557852; = p2315*p1014
- p2467: 0.0002828; = p2271*p1073
- p1818: 0
- p1654: 0
- p0135: 89.622
- p4323: 0; = p1768*p3480
- p1019: 0.24429; = IF(p1012=0;IF(p1014=1;0;IF(p1014+p1015>1;1-p1014;p1015));0)
- p2221: 0.0115638; = p1155-p2220
- p3075: 0; = p2294*p1023
- p2614: 0; = p2418*p1073
- p2443: 0.000274572; = p2247*p1014
- p2825: 1.20957e-5; = p2239*(p1020+p1022)
- p1346: 9
- p2595: 0; = p2399*p1014
- p0860: 0.848778; = p0672*1000/p0856
- p2726: 0.000238879; = p2335*(p1019+p1021)
- p0739: 8.717; = p0079*(1+p0607*p0211/100)
- p3732: 9.43763e-6; = p1795*p3477
- p3455: 0; = p3379*p1240
- p0162: 25.053
- p1494: 65
- p2259: 0.00429123; = p2226*p2205
- p4098: 6.50779e-5; = p1955*p3478
- p1336: 0; = p1323*p0801
- p5132: 0.00021752; = p1963*p3483
- p3533: 5.36013e-5; = p1802*p3476
- p1621: 0.728628
- p2419: 0; = p2235*p2209
- p1046: 0.0238398; = IF(p1012=0;IF(p1037+p1044+p1045=1;0;IF(p1037+p1044+p1045+p1040>1;1-(p1037+p1044+p1045);p1040));0)
- p0972: 0.0145265; = p0969/p0818
- p4769: 0; = p1802*p3482
- p0716: 72.495; = p0056*(1+p0584*p0188/100)
- p0079: 8.717
- p0306: 0.5
- p3144: 0; = p2363*p1023
- p2099: 0.620397
- p0407: 0; = SQRT(2)*(IF((2*p0275-1)<0;-1;IF((2*p0275-1)>0;1;0))*SQRT(SQRT((2/(pi()*0.140012289)+LN(1-(2*p0275-1)^2)/2)^2-LN(1-(2*p0275-1)^2)/0.140012289)-(2/(pi()*0.140012289)+LN(1-(2*p0275-1)^2)/2)))
- p3423: 0; = p3366*p1239
- p1938: 0
- p2427: 0; = p2235*p2217
- p2397: 0; = p2234*p2186
- p3304: 0; = if(and(p1232=0;p3252<>0);p3260*p3289;0)
- p0956: 0; = if(and(p0683>0;or(p0807=56;p0807=100;and(p0807=60;p0901>0.06)));p0938;0)
- p3418: 0; = p3380*p1238
- p2146: 3.71129e-7; = p2015*p2074*p2108/(p0818*1000)
- p4008: 1.56814e-6; = p1865*p3478
- p2380: 0.000374317; = p2229*p2209
- p4851: 0; = p1884*p3482
- p2394: 0; = p2234*p2183
- p2044: 8.00172e-7; = p2015*p2042*p2043/(p0818*1000)
- p4044: 1.64655e-5; = p1901*p3478
- p1798: 0
- p1114: 0.216028
- p4868: 0; = p1901*p3482
- p1813: 0
- p2771: 0.000217901; = p2380*(p1078+p1080)
- p3225: 0.00161727; = p3221*p1229
- p3027: 0; = p2246*p1023
- p1031: 0.000377746; = IF(p1012=0;p1025*p0001/(p0818*p0002);0)
- p2981: 0; = p2395*(p1020+p1022)
- p0501: 0; = SQRT(2)*(IF((2*p0369-1)<0;-1;IF((2*p0369-1)>0;1;0))*SQRT(SQRT((2/(pi()*0.140012289)+LN(1-(2*p0369-1)^2)/2)^2-LN(1-(2*p0369-1)^2)/0.140012289)-(2/(pi()*0.140012289)+LN(1-(2*p0369-1)^2)/2)))
- p1291: 0; = IF(p1287+p1290=p1264;0;IF(p1287+p1290+p1289>p1264;p1264-(p1287+p1290);p1289))
- p2325: 0.000204729; = p2224*p2192
- p0632: 0; = IF(p0368<0.5;-SQRT(p0007*EXP(p0500^2*p0008)-p0007);SQRT(p0007*EXP(p0500^2*p0008)-p0007))
- p2365: 0.0327043; = p2225*p2193
- p1064: 0.0710485; = IF(p1012=0;p1050/(p1057*p0818);0)
- p3221: 0.146975; = IF(p3216=0;0;p1223*12.0107/100.0869+(1-p1224)*12.0107/84.3139)
- p3295: 0
- p1309: 0
- p1073: 0.21074; = IF(p1071=0;p0711/100;0)
- p2145: 5.97954e-6; = p2015*p2073*p2107/(p0818*1000)
- p1144: 3.84285e-5; = if(p1121=0;p1138*p0001/(p0818*p0002);0)
- p1396: 6
- p1269: 0
- p2273: 0.0325107; = p2230*p2219
- p1956: 0
- p0426: 0; = SQRT(2)*(IF((2*p0294-1)<0;-1;IF((2*p0294-1)>0;1;0))*SQRT(SQRT((2/(pi()*0.140012289)+LN(1-(2*p0294-1)^2)/2)^2-LN(1-(2*p0294-1)^2)/0.140012289)-(2/(pi()*0.140012289)+LN(1-(2*p0294-1)^2)/2)))
- p1561: 0
- p0372: 0.5
- p0737: 0
- p2588: 8.30247e-5; = p2392*p1123
- p0949: 0; = if(and(p0683=0;or(p0807=480;p0807=32;p0807=1;and(p0807=60;p0901<0.03)));p0937;0)
- p2055: 5.59471
- p0030: 107.235
- p2350: 0; = p2232*p2218
- p2716: 8.97225e-5; = p2325*(p1019+p1021)
- p2930: 0; = p2344*(p1079+p1081)
- p1437: 331
- p0786: 42.841; = p0126*(1+p0654*p0258/100)
- p3586: 5.36013e-5; = p1855*p3476
- p2703: 0.0370368; = p2312*(p1128+p1130)
- p2318: 7.91671e-5; = p2224*p2185
- p2034: 7.15086e-5; = p2015*p2030*p2032/(p0818*1000)
- p3305: 0; = if(and(p1232=0;p3252<>0);1-(p3301+p3302+p3303+p3304);0)
- p0321: 0.5
- p0944: 0; = if(and(p0683=0;p0950=0);p0938;0)
- p1668: 0.723486
- p2769: 0.00292704; = p2378*(p1078+p1080)
- p1035: 0; = IF(p1012=0;p1029*p0001/(p0818*p0002);0)
- p1020: 0.10043; = IF(p1012=0;IF(p1014+p1019=1;0;IF(p1014+p1019+p1016>1;1-(p1014+p1019);p1016));0)
- p3346: 0; = if(and(p1232=0;p3256<>0);p3274*(p3281*(p3285*p1256+p3286*(p1253+p1257)+p1258*p3288));0)
- p2389: 0.00474571; = p2233*p2218
- p1754: 2.92512e-5; = p1346*1000/p0818
- p2445: 0.000336826; = p2249*p1014
- p4465: 0; = p1910*p3480
- p2661: 8.71615e-5; = p2270*(p1078+p1080)
- p0532: 0; = SQRT(2)*(IF((2*p0400-1)<0;-1;IF((2*p0400-1)>0;1;0))*SQRT(SQRT((2/(pi()*0.140012289)+LN(1-(2*p0400-1)^2)/2)^2-LN(1-(2*p0400-1)^2)/0.140012289)-(2/(pi()*0.140012289)+LN(1-(2*p0400-1)^2)/2)))
- p1575: 0
- p2038: 0.304457
- p2881: 7.44819e-5; = p2295*(p1020+p1022)
- p1059: 0.335
- p0994: 0; = p0990*p0001*p0004/(p0818*p0002)
- p0996: 0.957622; = if(p0888=0;0;if((p0691*p0690*1000*p0692/100)/p0888>1;1;(p0691*p0690*1000*p0692/100)/p0888))
- p1660: 0
- p0485: 0; = SQRT(2)*(IF((2*p0353-1)<0;-1;IF((2*p0353-1)>0;1;0))*SQRT(SQRT((2/(pi()*0.140012289)+LN(1-(2*p0353-1)^2)/2)^2-LN(1-(2*p0353-1)^2)/0.140012289)-(2/(pi()*0.140012289)+LN(1-(2*p0353-1)^2)/2)))
- p2868: 0.000716582; = p2282*(p1020+p1022)
- p2799: 0; = p2408*(p1019+p1021)
- p2631: 0.000115336; = p2240*(p1019+p1021)
- p3206: 0; = p2425*p1082
- p1152: 0.415074
- p2355: 0.00847269; = p2225*p2183
- p1563: 0
- p0243: 48.9
- p3253: 0; = p1252*(p1277*(1-p3247)+p1280*(1-p3248)+p1281*(1-p3249)+p1282*(1-p3250))
- p2712: 0.00020047; = p2321*(p1019+p1021)
- p0647: 0; = IF(p0383<0.5;-SQRT(p0007*EXP(p0515^2*p0008)-p0007);SQRT(p0007*EXP(p0515^2*p0008)-p0007))
- p1581: 0.946298
- p2579: 2.25507e-6; = p2383*p1073
- p3848: 0.000205269; = p1911*p3477
- p2599: 0; = p2403*p1014
- p1701: 0.40781
- p4799: 0; = p1832*p3482
- p0806: 641000; = p0804+p0805
- p4456: 0; = p1901*p3480
- p0990: 0; = p0986*p0886
- p3232: 2.43104e-7; = p1182/p0818
- p0826: 0.084; = 1-p0825/p0818
- p2783: 0.000423627; = p2392*(p1128+p1130)
- p3409: 0; = p3371*p1238
- p0403: 0.5
- p3059: 0; = p2278*p1023
- p1203: 3
- p3224: 0.501945; = IF(p3216=0;0;1-p3221-p3222-p3223)
- p2892: 8.22508e-5; = p2306*(p1079+p1081)
- p1602: 0.730108
- p2095: 0.765734
- p2561: 0.0131942; = p2365*p1014
- p0934: 0; = p0928*p0001/(p0818*p0002)
- p0352: 0.5
- p4585: 4.78013e-5; = p1824*p3481
- p3521: 1.42484e-5; = p1790*p3476
- p1714: 0
- p2117: 0.585147
- p3967: 8.38956e-5; = p1824*p3478
- p1812: 0
- p4703: 1.11685e-5; = p1942*p3481
- p1089: 0.000225; = IF(p1071=0;p1083*p0001/(p0818*p0002);0)
- p2802: 0; = p2411*(p1019+p1021)
- p3231: 1.69877e-7; = p1176/p0818
- p3110: 0; = p2329*p1023
- p0782: 72.495; = p0122*(1+p0650*p0254/100)
- p1582: 0
- p0903: 0.0175
- p2042: 0.07
- p1764: 0
- p2488: 3.42692e-5; = p2292*p1014
- p1620: 0.633063
- p0056: 72.495
- p1675: 0.655218
- p4144: 5.13888e-7; = p1795*p3479
- p1178: 1.69877e-7; = p1176/p0818
- p3235: 0.118093
- p4762: 0; = p1795*p3482
- p0777: 36.59; = p0117*(1+p0645*p0249/100)
- p1037: 0.375071
- p2560: 0.00230558; = p2364*p1014
- p1076: 0; = IF(p1071=0;p0714/100;0)
- p1683: 0
- p0476: 0; = SQRT(2)*(IF((2*p0344-1)<0;-1;IF((2*p0344-1)>0;1;0))*SQRT(SQRT((2/(pi()*0.140012289)+LN(1-(2*p0344-1)^2)/2)^2-LN(1-(2*p0344-1)^2)/0.140012289)-(2/(pi()*0.140012289)+LN(1-(2*p0344-1)^2)/2)))
- p2212: 7.42756e-5; = p1106/p0818
- p4666: 4.46741e-6; = p1905*p3481
- p3393: 0; = p3374*p1234
- p3041: 7.71234e-6; = p2260*p1082
- p1807: 1.95008e-5; = p1399*1000/p0818
- p2267: 0.000256761; = p2226*p2213
- p3475: 0; = p3380*p1241
- p3203: 0; = p2422*p1082
- p2828: 1.8818e-5; = p2242*(p1020+p1022)
- p0702: 536.405; = p0042*(1+p0570*p0174/100)
- p0349: 0.5
- p1254: 0; = if(p1232>0;0;p0736/100)
- p0418: 0; = SQRT(2)*(IF((2*p0286-1)<0;-1;IF((2*p0286-1)>0;1;0))*SQRT(SQRT((2/(pi()*0.140012289)+LN(1-(2*p0286-1)^2)/2)^2-LN(1-(2*p0286-1)^2)/0.140012289)-(2/(pi()*0.140012289)+LN(1-(2*p0286-1)^2)/2)))
- p4439: 0; = p1884*p3480
- p0387: 0.5
- p3123: 0; = p2342*p1082
- p1688: 0
- p3281: 0
- p0888: 42527.2; = p0686*1000*p0687*p0884/100
- p4032: 4.93965e-5; = p1889*p3478
- p3267: 0
- p2601: 0; = p2405*p1014
- p5249: 3.36736e-7; = p1870*p3484
- p2736: 0; = p2345*(p1078+p1080)
- p2713: 3.85169e-5; = p2322*(p1019+p1021)
- p1164: 4609.83; = p1163*p0801
- p2748: 0.000968477; = p2357*(p1019+p1021)
- p2061: 0.518824
- p0364: 0.5
- p4565: 2.68045e-6; = p1804*p3481
- p0991: 198697; = p0987*p0886
- p1656: 0
- p0316: 0.5
- p2684: 0.00334163; = p2293*(p1019+p1021)
- p3219: 0.0456832; = p3215*p1228
- p1574: 0
- p2873: 0.00183536; = p2287*(p1020+p1022)
- p5281: 1.21599e-6; = p1902*p3484
- p2498: 0.000287651; = p2302*p1073
- p2126: 1.30563e-5; = p2015*p2054*p2088/(p0818*1000)
- p3201: 0; = p2420*p1082
- p0555: 0; = IF(p0291<0.5;-SQRT(p0007*EXP(p0423^2*p0008)-p0007);SQRT(p0007*EXP(p0423^2*p0008)-p0007))
- p3601: 1.2213e-5; = p1870*p3476
- p1119: 0.0664379; = IF(p1071=0;p1109/(p1114*p0818);0)
- p0891: 0; = IF(p3251=0;0;62.4*6272640/(12*12*12))
- p2534: 0; = p2338*p1073
- p1183: 0.00155134; = p0801*p0001/(p0818*p0002)
- p3860: 1.1797e-5; = p1923*p3477
- p0519: 0; = SQRT(2)*(IF((2*p0387-1)<0;-1;IF((2*p0387-1)>0;1;0))*SQRT(SQRT((2/(pi()*0.140012289)+LN(1-(2*p0387-1)^2)/2)^2-LN(1-(2*p0387-1)^2)/0.140012289)-(2/(pi()*0.140012289)+LN(1-(2*p0387-1)^2)/2)))
- p3122: 0; = p2341*p1082
- p2203: 0.022966; = p1070-p2200-p2201-p2202
- p0708: 19.396; = p0048*(1+p0576*p0180/100)
- p0557: 0; = IF(p0293<0.5;-SQRT(p0007*EXP(p0425^2*p0008)-p0007);SQRT(p0007*EXP(p0425^2*p0008)-p0007))
- p3241: 2.44094e-9; = p3234*p1188*p3236/p0818
- p1632: 0
- p1503: 174
- p0685: 0
- p0227: 16.469
- p2545: 0; = p2349*p1073
- p1600: 0.895638
- p0749: 6.402; = p0089*(1+p0617*p0221/100)
- p1794: 0
- p1963a: 0.000412039; = p1550*p1754+p1551*p1755+p1552*p1756+p1553*p1757+p1554*p1758+p1555*p1759+p1556*p1760+p1557*p1761+p1558*p1762+p1559*p1763+p1560*p1764+p1561*p1765+p1562*p1766+p1563*p1767+p1564*p1768+p1565*p1769+p1566*p1770+p1567*p1771+p1568*p1772
- p0294: 0.5
- p0141: 17.705
- p4558: 2.81447e-5; = p1797*p3481
- p1864: 0
- p4563: 3.52926e-5; = p1802*p3481
- p2159: 3.20963e-5; = p2015*p2083*p2121/(p0818*1000)
- p2718: 0.000110066; = p2327*(p1019+p1021)
- p1830: 0
- p1567: 0
- p3836: 5.78055e-5; = p1899*p3477
- p2565: 4.39694e-5; = p2369*p1014
- p4790: 0; = p1823*p3482
- p4194: 2.12621e-5; = p1845*p3479
- p1106: 22853.1; = IF(p1071=0;p1105*p1096*p1095;0)
- p4022: 7.84071e-7; = p1879*p3478
- p0449: 0; = SQRT(2)*(IF((2*p0317-1)<0;-1;IF((2*p0317-1)>0;1;0))*SQRT(SQRT((2/(pi()*0.140012289)+LN(1-(2*p0317-1)^2)/2)^2-LN(1-(2*p0317-1)^2)/0.140012289)-(2/(pi()*0.140012289)+LN(1-(2*p0317-1)^2)/2)))
- p2169: 0.00283876; = p2166*(p0908)
- p3009: 0; = p2423*(p1079+p1081)
- p1957: 3.57514e-5; = p1549*1000/p0818
- p1265: 0; = if(p1232>0;0;IF(p1259+p1263+p1264=1;0;IF(p1259+p1263+p1264+p1262>1;1-(p1259+p1263+p1264);p1262)))
- p3172: 1.45653e-5; = p2391*p1132
- p0720: 0
- p3391: 0; = p3372*p1234
- p2696: 2.2715e-5; = p2305*(p1078+p1080)
- p0631: 0; = IF(p0367<0.5;-SQRT(p0007*EXP(p0499^2*p0008)-p0007);SQRT(p0007*EXP(p0499^2*p0008)-p0007))
- p0669: 6.835; = p0009*(1+p0537*p0141/100)
- p0862: 0; = p0674*1000/p0856
- p3289: 0
- p5070: 8.59896e-7; = p1897*p3483
- p2011: 0.0105596
- p2990: 0; = p2404*(p1020+p1022)
- p2707: 0.000133021; = p2316*(p1019+p1021)
- p0609: 0; = IF(p0345<0.5;-SQRT(p0007*EXP(p0477^2*p0008)-p0007);SQRT(p0007*EXP(p0477^2*p0008)-p0007))
- p0241: 30.65
- p1143: 0; = if(p1121=0;p1137*p0001/(p0818*p0002);0)
- p3477: 0.362971; = if(p1328+p1330+p1332+p1334+p1336+p1338+p1340+p1342+p1344=0;0;p1330/(p1328+p1330+p1332+p1334+p1336+p1338+p1340+p1342+p1344))
- p3192: 0; = p2411*p1023
- p1702: 0
- p1737: 0
- p0713: 20.158; = p0053*(1+p0581*p0185/100)
- p4460: 0; = p1905*p3480
- p3109: 0; = p2328*p1023
- p1976: 0.1766
- p2610: 0; = p2414*p1073
- p0508: 0; = SQRT(2)*(IF((2*p0376-1)<0;-1;IF((2*p0376-1)>0;1;0))*SQRT(SQRT((2/(pi()*0.140012289)+LN(1-(2*p0376-1)^2)/2)^2-LN(1-(2*p0376-1)^2)/0.140012289)-(2/(pi()*0.140012289)+LN(1-(2*p0376-1)^2)/2)))
- p0452: 0; = SQRT(2)*(IF((2*p0320-1)<0;-1;IF((2*p0320-1)>0;1;0))*SQRT(SQRT((2/(pi()*0.140012289)+LN(1-(2*p0320-1)^2)/2)^2-LN(1-(2*p0320-1)^2)/0.140012289)-(2/(pi()*0.140012289)+LN(1-(2*p0320-1)^2)/2)))
- p3181: 0; = p2400*p1023
- p3425: 0; = p3368*p1239
- p1332: 2.4916e6; = p1321*p0801
- p4340: 0; = p1785*p3480
- p1963c: 0.000392959; = p1588*p1792+p1589*p1793+p1590*p1794+p1591*p1795+p1592*p1796+p1593*p1797+p1594*p1798+p1595*p1799+p1596*p1800+p1597*p1801+p1598*p1802+p1599*p1803+p1600*p1804+p1601*p1805+p1602*p1806+p1603*p1807+p1604*p1808+p1605*p1809+p1606*p1810+p1607*p1811
- p0549: 0; = IF(p0285<0.5;-SQRT(p0007*EXP(p0417^2*p0008)-p0007);SQRT(p0007*EXP(p0417^2*p0008)-p0007))
- p1748: 0
- p2590: 0; = p2394*p1014
- p1643: 0
- p3245: 0; = IF(p3244=1;0;if(p3244+p0792/100>1;1-p3244;p0792/100))
- p2949: 0.000111794; = p2363*(p1020+p1022)
- p1640: 0
- p2985: 0; = p2399*(p1020+p1022)
- p2973: 1.31533e-5; = p2387*(p1079+p1081)
- p2929: 0; = p2343*(p1079+p1081)
- p1016: 0.10043; = IF(p1012=0;p0707/100;0)
- p1760: 0
- p3383: 0; = p3364*p1234
- p1098: 0.020586
- p2304: 0.00771769; = p2227*p2211
- p2405: 0; = p2234*p2195
- p3074: 0; = p2293*p1023
- p3368: 0; = if(p1232=0;p3245*p3356/p0818;0)
- p1740: 0
- p3006: 0; = p2420*(p1079+p1081)
- p5147: 1.51531e-6; = p1768*p3484
- p4970: 4.92486e-6; = p1797*p3483
- p2295: 0.000470481; = p2223*p2202
- p3207: 0; = p2426*p1082
- p3283: 0
- p1127: 0; = if(p1121=0;p0721/100;0)
- p1622: 0
- p1879: 3.25013e-6; = p1471*1000/p0818
- p1207: 200.544; = if(p1193>0;0;(p1194*p1050/p1057+p1195*p1051/p1058+p1196*p1052/p1059+p1197*p1053/p1060+p1198*p1054/p1061+p1199*p1055/p1062+p1200*p1056/p1063)/(p0702*1000)+(p1201*p1109/p1114+p1202*p1110/p1115)/(p0702*1000)+p1203*p1170/p0801+p1204*p1176/p0801)
- p4806: 0; = p1839*p3482
- p3214: 0.376406; = p1222*40.078/100.0869
- p2119: 0.679049
- p5337: 4.87554e-7; = p1962*p3484
- p1642: 0
- p2409: 0; = p2234*p2199
- p2937: 0; = p2351*(p1129+p1131)
- p5007: 6.25379e-7; = p1834*p3483
- p0554: 0; = IF(p0290<0.5;-SQRT(p0007*EXP(p0422^2*p0008)-p0007);SQRT(p0007*EXP(p0422^2*p0008)-p0007))
- p0881: 0; = p0880*p0001*p0003/(p0818*p0002)
- p0581: 0; = IF(p0317<0.5;-SQRT(p0007*EXP(p0449^2*p0008)-p0007);SQRT(p0007*EXP(p0449^2*p0008)-p0007))
- p2639: 0.00170688; = p2248*(p1019+p1021)
- p4458: 0; = p1903*p3480
- p1846: 0
- p5276: 2.05783e-7; = p1897*p3484
- p2800: 0; = p2409*(p1019+p1021)
- p3090: 1.32057e-6; = p2309*p1082
- p4866: 0; = p1899*p3482
- p1003: 0; = p0999*p0888
- p1486: 482
- p4188: 6.4236e-7; = p1839*p3479
- p1569: 0
- p2435: 3.08249e-5; = p2239*p1014
- p3300: 0; = if(p1293+p1294+p1295+p1296=0;0;p1293/(p1293+p1294+p1295+p1296))
- p1963i: 0.000264089; = p1706*p1910+p1707*p1911+p1708*p1912+p1709*p1913+p1710*p1914+p1711*p1915+p1712*p1916+p1713*p1917+p1714*p1918+p1715*p1919+p1716*p1920+p1717*p1921+p1718*p1922+p1719*p1923+p1720*p1924+p1721*p1925+p1722*p1926+p1723*p1927+p1724*p1928
- p3255: 0; = p1252*(p1297*(1-p3247)+p1300*(1-p3248)+p1301*(1-p3249)+p1302*(1-p3250))
- p0210: 0
- p2420: 0; = p2235*p2210
- p2708: 1.00727e-5; = p2317*(p1019+p1021)
- p2686: 0.000206188; = p2295*(p1019+p1021)
- p1249: 0; = if(p1232>0;0;p1244*p0001/(p0818*p0002))
- p3150: 0; = p2369*p1023
- p3325: 0; = if(and(p1232=0;p3255<>0);p3267*p3289;0)
- p1611: 0.377871
- p0697: 0
- p0879: 0; = p0878*p0001*p0003/(p0818*p0002)
- p1067: 0.0176335; = IF(p1012=0;p1053/(p1060*p0818);0)
- p1716: 0
- p2790: 0; = p2399*(p1019+p1021)
- p0561: 0; = IF(p0297<0.5;-SQRT(p0007*EXP(p0429^2*p0008)-p0007);SQRT(p0007*EXP(p0429^2*p0008)-p0007))
- p1233: 0.00155134; = p1232*p0001/(p0818*p0002)
- p1237: 0; = if(p1232>0;0;p0729/100)
- p4183: 5.13888e-7; = p1834*p3479
- p1394: 79
- p0368: 0.5
- p0619: 0; = IF(p0355<0.5;-SQRT(p0007*EXP(p0487^2*p0008)-p0007);SQRT(p0007*EXP(p0487^2*p0008)-p0007))
- p0308: 0.5
- p2817: 0; = p2426*(p1078+p1080)
- p2692: 0.0017571; = p2301*(p1078+p1080)
- p2858: 0.0065457; = p2272*(p1129+p1131)
- p1115: 0.237849
- p1192: 2.18587e-7; = p1188*p1191/p0818
- p3452: 0; = p3376*p1240
- p0086: 46.488
- p2122: 0.341195
- p1744: 0
- p3095: 0.000245743; = p2314*p1132
- p3840: 5.89852e-5; = p1903*p3477
- p3178: 0; = p2397*p1023
- p3124: 0; = p2343*p1082
- p3978: 4.70443e-6; = p1835*p3478
- p2245: 0.000334421; = p2222*p2190
- p2770: 0.000481856; = p2379*(p1078+p1080)
- p2687: 0.00236379; = p2296*(p1019+p1021)
- p1238: 0; = if(p1232>0;0;IF(p1234=1;0;IF(p1234+p1235>1;1-p1234;p1235)))
- p1711: 0
- p2235: 0; = 1-(p2226+p2227+p2228+p2229)
- p0127: 32.715
- p3077: 0; = p2296*p1023
- p2536: 0; = p2340*p1073
- p2629: 0.0004422; = p2238*(p1019+p1021)
- p2000: 4000
- p1709: 0
- p3339: 0; = if(and(p1232=0;p3254<>0);p3254*(p3269*p3277-p3334)/p3338;0)
- p4410: 0; = p1855*p3480
- p4735: 0; = p1768*p3482
- p0524: 0; = SQRT(2)*(IF((2*p0392-1)<0;-1;IF((2*p0392-1)>0;1;0))*SQRT(SQRT((2/(pi()*0.140012289)+LN(1-(2*p0392-1)^2)/2)^2-LN(1-(2*p0392-1)^2)/0.140012289)-(2/(pi()*0.140012289)+LN(1-(2*p0392-1)^2)/2)))
- p2285: 0.000250333; = p2223*p2191
- p3417: 0; = p3379*p1238
- p4846: 0; = p1879*p3482
- p2007: 0.24966; = ((p1981*p1985+p1987*p1991+p1993*p1997+p2001*p2005)/p0818)*p0005*p0002/1000
- p2021: 0.000465545; = p2020/p0818
- p1066: 0.031248; = IF(p1012=0;p1052/(p1059*p0818);0)
- p4272: 6.4236e-7; = p1923*p3479
- p1343: 0.000720328; = p1342*p0001/(p0818*p0002)
- p0999: 0; = IF(p0996=1;0;IF(p0996+p0997>1;1-p0996;p0997))
- p0522: 0; = SQRT(2)*(IF((2*p0390-1)<0;-1;IF((2*p0390-1)>0;1;0))*SQRT(SQRT((2/(pi()*0.140012289)+LN(1-(2*p0390-1)^2)/2)^2-LN(1-(2*p0390-1)^2)/0.140012289)-(2/(pi()*0.140012289)+LN(1-(2*p0390-1)^2)/2)))
- p0841: 0.178461
- p0633: 0; = IF(p0369<0.5;-SQRT(p0007*EXP(p0501^2*p0008)-p0007);SQRT(p0007*EXP(p0501^2*p0008)-p0007))
- p2977: 0.000121262; = p2391*(p1129+p1131)
- p1377: 14
- p2107: 0.881623
- p1687: 0
- p0974: 0.5
- p3071: 0; = p2290*p1023
- p0385: 0.5
- p1000: 0; = IF(p0996+p0999=1;0;IF(p0996+p0999+p0998>1;1-(p0996+p0999);p0998))
- p1690: 0.624955
- p0575: 0; = IF(p0311<0.5;-SQRT(p0007*EXP(p0443^2*p0008)-p0007);SQRT(p0007*EXP(p0443^2*p0008)-p0007))
- p2367: 0.0692995; = p2225*p2196
- p3384: 0; = p3365*p1234
- p1208: 0; = p1205*p0818*p0822/p0801
- p3630: 3.32464e-5; = p1899*p3476
- p3739: 9.31966e-5; = p1802*p3477
- p2919: 5.22989e-5; = p2333*(p1020+p1022)
- p3023: 0; = p2242*p1023
- p1200: 0.84
- p4837: 0; = p1870*p3482
- p2962: 0.000376975; = p2376*(p1079+p1081)
- p3243: 2.26373e-9; = p3234*p1188*p3239/p0818
- p2967: 3.25789e-5; = p2381*(p1079+p1081)
- p2100: 0.705744
- p3177: 0; = p2396*p1023
- p3760: 4.01099e-5; = p1823*p3477
- p1877: 0
- p1562: 0
- p3288: 0
- p1742: 0
- p2353: 0; = p2232*p2221
- p3938: 6.27257e-6; = p1795*p3478
- p5159: 9.35378e-8; = p1780*p3484
- p3392: 0; = p3373*p1234
- p1634: 0
- p0712: 58.213; = p0052*(1+p0580*p0184/100)
- p2608: 0; = p2412*p1014
- p2204: 0.0143525; = p1109/p0818
- p2163: 0.00626927; = (p2017-p2020)/p0818-(p2025+p2028+p2033+p2034+p2051+p2125+p2126+p2127+p2128+p2129+p2130+p2131+p2132+p2133+p2134+p2135+p2136+p2137+p2138+p2139+p2140+p2141+p2142+p2143+p2144+p2145+p2146+p2147+p2148+p2149+p2150+p2151+p2152+p2153+p2154+p2155+p2156+p2157)
- p2188: 0.0192733; = p1066-p2186-p2187
- p2963: 0.000122074; = p2377*(p1079+p1081)
- p2436: 0.000106175; = p2240*p1014
- p2867: 5.60151e-5; = p2281*(p1020+p1022)
- p0584: 0; = IF(p0320<0.5;-SQRT(p0007*EXP(p0452^2*p0008)-p0007);SQRT(p0007*EXP(p0452^2*p0008)-p0007))
- p0876: 0; = p0866*p0856
- p1775: 0
- p1681: 0
- p1255: 0; = if(p1232>0;0;p0737/100)
- p1761: 0
- p2366: 0.00701055; = p2225*p2195
- p2174: 0.00954737; = p0895*p0903/p0818
- p2551: 0.00341822; = p2355*p1014
- p2052: 2.21216e-5; = p2015*p2049*(1-p2050)/(p0818*1000)
- p0110: 40.599
- p1196: 0.59
- p1407: 66
- p0776: 0
- p1803: 0
- p1137: 0; = if(p1121=0;p1131*(p0716/100)*p0703*1000;0)
- p0706: 24.429; = p0046*(1+p0574*p0178/100)
- p2378: 0.00502815; = p2229*p2207
- p3485: 6.10648e-6; = p1754*p3476
- p1586: 0.7915

## Reference product
- cotton lint; at harvest in 1998; at farm; 90%-93% moisture: 1 kg

## Inputs from technosphere
- CUTOFF pesticide, Metalaxyl; at point-of-sale; kg AI: 9.75039e-6 kg; = p1884
- cottonseed; at harvest in 1998; at farm; 90%-93% moisture: 1.53406 kg; = p0819
- CUTOFF pesticide, Oxamyl; at point-of-sale; kg AI: 0.000159256 kg; = p1899
- CUTOFF cotton seeds; seed, unspec. type; at point-of-sale: 0.0145265 kg; = p0972
- CUTOFF apply P fertilizer; broadcast with incorporation: 0.000621522 ha; = p1090
- CUTOFF pesticide, Lambda-cyhalothrin; at point-of-sale; kg AI: 5.85023e-5 kg; = p1870
- CUTOFF pesticide, Acephate; at point-of-sale; kg AI: 0.000432267 kg; = p1762
- CUTOFF apply mixed N fertilizer; with incorporation: 0.00029992 ha; = p1033
- CUTOFF apply K fertilizer; broadcast with incorporation: 0.000643182 ha; = p1140
- CUTOFF potassic fertilizer, potassium chloride; at point-of-sale: 0.178022 kg; = p1154
- CUTOFF apply gypsum; unspecified method: 0.00155134 ha; = p1165
- CUTOFF pesticide, Clethodim; at point-of-sale; kg AI: 2.6001e-5 kg; = p1795
- CUTOFF apply P fertilizer; broadcast without incorporation: 0.000215221 ha; = p1091
- CUTOFF apply pesticide; broadcast with incorporation: 0.00722491 ha; = p1333
- CUTOFF irrigate; unspecified irrigation method, groundwater source, in 1998: 1.46345e-5 ha-m; = p0995
- CUTOFF pesticide, Tribufos; at point-of-sale; kg AI: 0.000588274 kg; = p1951
- CUTOFF apply N fertilizer; broadcast without incorporation: 0.000155295 ha; = p1032
- CUTOFF pesticide, Zeta-Cypermethrin; at point-of-sale; kg AI: 3.57514e-5 kg; = p1957
- CUTOFF nitrogenous fertilizer, urea; at point-of-sale: 0.071355 kg; = p1070
- CUTOFF pesticide, Pyrithiobac-sodium; at point-of-sale; kg AI: 3.25013e-5 kg; = p1923
- CUTOFF liming materials storage: 0.0561719 kg*a; = p1231
- CUTOFF potassic fertilizer, other single nutrients; at point-of-sale: 0.0182184 kg; = p1155
- CUTOFF pesticide, Prometryn; at point-of-sale; kg AI: 0.000565523 kg; = p1911
- CUTOFF apply N fertilizer; broadcast with incorporation: 0.000377746 ha; = p1031
- CUTOFF apply sulfur; unspecified method: 0.00155134 ha; = p1171
- CUTOFF phosphatic fertilizer, superphosphate grades over 22%; at point-of-sale: 0.00656934 kg; = p1117
- CUTOFF apply K fertilizer; broadcast without incorporation: 0.000319933 ha; = p1141
- CUTOFF harvest; cotton, spindle picked: 0.00114176 ha; = p1972
- CUTOFF dolomite, pulverized; at point-of-sale: 0.0110037 kg; = p1229
- CUTOFF pesticide, Deltamethrin; at point-of-sale; kg AI: 1.95008e-5 kg; = p1807
- CUTOFF sulfuric acid storage: 8.49385e-8 kg*a; = p1180
- CUTOFF pesticide, Cypermethrin; at point-of-sale; kg AI: 0.000133255 kg; = p1806
- CUTOFF phosphatic fertilizer, monoammonium phosphate; at point-of-sale: 0.0241562 kg; = p1120
- CUTOFF apply pesticide; broadcast by air: 0.0108705 ha; = p1331
- CUTOFF zinc compounds storage: 1.21552e-7 kg*a; = p1186
- CUTOFF apply P fertilizer; no broadcast application: 0.000225 ha; = p1089
- CUTOFF nitrogenous fertilizer, anhydrous ammonia; at point-of-sale: 0.0710485 kg; = p1064
- CUTOFF pesticide, Ethephon; at point-of-sale; kg AI: 0.000474519 kg; = p1832
- CUTOFF bulk cargo rail transport; diesel: 0.468113 metric ton*km; = p2008
- CUTOFF pesticide, Profenofos; at point-of-sale; kg AI: 0.000149506 kg; = p1910
- CUTOFF pesticide, Norflurazon; at point-of-sale; kg AI: 3.57514e-5 kg; = p1897
- CUTOFF international vessel transport; average fuel: 2.33866 metric ton*km; = p2006
- CUTOFF pesticide, Disulfoton; at point-of-sale; kg AI: 0.000110504 kg; = p1823
- CUTOFF apply pesticide; as foliar or directed spray: 0.00411655 ha; = p1339
- CUTOFF pesticide, Fluazifop-p-butyl; at point-of-sale; kg AI: 3.25013e-5 kg; = p1839
- CUTOFF pesticide, Dimethoate; at point-of-sale; kg AI: 6.50026e-5 kg; = p1822
- CUTOFF irrigate; gravity, surface water source, in 1998: 2.99949e-6 ha-m; = p1006
- CUTOFF fertilizer filler materials; at point-of-sale: 0.171512 kg; = p1158
- CUTOFF local area trucking; class 6, average fuel: 0.0187245 metric ton*km; = p2010
- CUTOFF pesticide, Cacodylic acid; at point-of-sale; kg AI: 4.55018e-5 kg; = p1785
- CUTOFF pesticide, Quizalofop, ethyl ; at point-of-sale; kg AI: 1.95008e-5 kg; = p1925
- CUTOFF cotton seeds; GMO herbicide resistant seed; at point-of-sale: 0.00312353 kg; = p0970
- CUTOFF pesticide, Clomazone; at point-of-sale; kg AI: 0.000204758 kg; = p1797
- CUTOFF pesticide, Carbofuran; at point-of-sale; kg AI: 9.75039e-6 kg; = p1787
- CUTOFF apply mixed N fertilizer; without incorporation: 8.94999e-5 ha; = p1034
- CUTOFF apply pesticide; broadcast without incorporation: 0.00059191 ha; = p1335
- CUTOFF pesticide formulation balance; at point-of-sale: 0.00904373 kg; = p1963
- CUTOFF pesticide, Thidiazuron; at point-of-sale; kg AI: 8.12533e-5 kg; = p1942
- CUTOFF pesticide, Fluometuron; at point-of-sale; kg AI: 0.00107579 kg; = p1845
- CUTOFF pesticide, Paraquat dichloride; at point-of-sale; kg AI: 6.82527e-5 kg; = p1901
- CUTOFF fertilizer storage: 0.415521 kg*a; = p1160
- CUTOFF pesticide, Dimethipin; at point-of-sale; kg AI: 1.95008e-5 kg; = p1821
- CUTOFF pesticide, Etridiazole; at point-of-sale; kg AI: 2.6001e-5 kg; = p1834
- CUTOFF sowing; for unspec. till, cotton: 0.00155134 ha; = p0963
- CUTOFF harvest; cotton residue management: 0.00155134 ha; = p1975
- CUTOFF pesticide storage: 0.0165094 kg*a; = p1965
- CUTOFF apply pesticide; banded or side-dressed: 0.00625209 ha; = p1329
- CUTOFF pesticide, Spinosad; at point-of-sale; kg AI: 3.25013e-5 kg; = p1931
- CUTOFF regional or national trucking; class 8, average fuel: 0.0490496 metric ton*km; = p2009
- CUTOFF nitrogenous fertilizer, sodium nitrate; at point-of-sale: 0.00062641 kg; = p1069
- CUTOFF pesticide, Sodium chlorate; at point-of-sale; kg AI: 0.000344514 kg; = p1930
- CUTOFF apply pesticide; in seed furrow: 0.000720328 ha; = p1343
- CUTOFF sulfuric acid; at point-of-sale: 1.69877e-7 kg; = p1178
- CUTOFF phosphatic fertilizer, diammonium phosphate; at point-of-sale: 0.0664379 kg; = p1119
- CUTOFF N inhibitor appl svc; unspec rate & type, 1998 cotton: 5.77584e-5 ha; = p1162
- CUTOFF apply pesticide; unspecified application methods: 0.000172383 ha; = p1345
- CUTOFF pesticide, Quintozene; at point-of-sale; kg AI: 0.000211258 kg; = p1902
- CUTOFF pesticide, Fenoxaprop P; at point-of-sale; kg AI: 1.95008e-5 kg; = p1835
- CUTOFF domestic barge transport; average fuel: 0.24966 metric ton*km; = p2007
- CUTOFF pesticide, Diuron; at point-of-sale; kg AI: 0.000347764 kg; = p1824
- CUTOFF nitrogenous fertilizer, aqueous ammonia; at point-of-sale: 0.004304 kg; = p1065
- CUTOFF sulfur storage: 4.41887e-7 kg*a; = p1174
- CUTOFF pesticide, Glyphosate; at point-of-sale; kg AI: 0.00025676 kg; = p1855
- CUTOFF pesticide, Cyanazine; at point-of-sale; kg AI: 0.00025676 kg; = p1802
- CUTOFF apply single or mixed K fertilizer; unspec. method: 3.84285e-5 ha; = p1144
- CUTOFF pesticide, Aliphatic petroleum hydrocarbons; at point-of-sale; kg AI: 3.25013e-5 kg; = p1905
- CUTOFF sewage sludge storage: 2.18587e-7 kg*a; = p1192
- CUTOFF pesticide, unspecified type; at point-of-sale; kg AI: 8.47046e-5 kg; = p1962
- CUTOFF seed storage; cotton: 0.00882502 kg*a; = p0975
- CUTOFF irrigate; gravity, groundwater source, in 1998: 3.02604e-5 ha-m; = p0992
- CUTOFF pesticide, Bromoxynil; at point-of-sale; kg AI: 1.62507e-5 kg; = p1780
- CUTOFF apply N fertilizer; no broadcast application: 0.000623839 ha; = p1030
- cotton residue; at harvest in 1998; at farm; 80%-92% moisture: 1.51864 kg; = p0839
- CUTOFF phosphatic fertilizer, superphos. grades 22% and under; at point-of-sale: 0.000850964 kg; = p1116
- CUTOFF apply K fertilizer; no broadcast application: 0.000126054 ha; = p1139
- CUTOFF phosphatic fertilizer, other single phosphates; at point-of-sale: 0.0045122 kg; = p1118
- CUTOFF nitrogenous fertilizer, ammonium sulfate; at point-of-sale: 0.0176335 kg; = p1067
- CUTOFF limestone, high-grade, pulverized; at point-of-sale: 0.10134 kg; = p1228
- CUTOFF pesticide, Methyl parathion; at point-of-sale; kg AI: 0.00346789 kg; = p1888
- CUTOFF manure appl svc; unspec rate, 1998 cotton: 0.00155134 ha; = p1233
- CUTOFF pesticide, MSMA; at point-of-sale; kg AI: 0.00156656 kg; = p1894
- CUTOFF pesticide, Disodium methanearsonate; at point-of-sale; kg AI: 0.00025026 kg; = p1825
- CUTOFF nitrogenous fertilizer, nitrogen solutions; at point-of-sale: 0.164547 kg; = p1068
- CUTOFF apply liming materials; unspecified method: 0.00155134 ha; = p1227
- CUTOFF harvest; cotton, stripper harvested: 0.000380586 ha; = p1973
- CUTOFF apply zinc compounds; unspecified method: 0.00155134 ha; = p1183
- CUTOFF pesticide, Propazine; at point-of-sale; kg AI: 0.000204758 kg; = p1889
- CUTOFF apply single or mixed P fertilizer; unspec. method: 5.92556e-6 ha; = p1094
- CUTOFF pesticide, Aldicarb; at point-of-sale; kg AI: 0.000263261 kg; = p1768
- CUTOFF pesticide, Pendimethalin; at point-of-sale; kg AI: 0.000162507 kg; = p1903
- CUTOFF sewage sludge; at point-of-sale: 4.37174e-7 kg; = p1190
- CUTOFF pesticide, Thiodicarb; at point-of-sale; kg AI: 0.000214509 kg; = p1945
- CUTOFF pesticide, Dicrotophos; at point-of-sale; kg AI: 0.000214509 kg; = p1815
- CUTOFF apply sulfuric acid; unspecified method: 0.00155134 ha; = p1177
- CUTOFF apply sewage sludge; unspecified method: 0.00155134 ha; = p1189
- CUTOFF pesticide, 2,4-D; at point-of-sale; kg AI: 2.92512e-5 kg; = p1754
- CUTOFF gypsum storage: 7.49127e-6 kg*a; = p1168
- CUTOFF nitrogenous fertilizer, ammonium nitrate; at point-of-sale: 0.031248 kg; = p1066
- CUTOFF pesticide, beta-Cyfluthrin; at point-of-sale; kg AI: 1.95008e-5 kg; = p1804
- CUTOFF irrigate; unspecified irrigation method, surface water source, in 1998: 1.32739e-7 ha-m; = p1009
- CUTOFF pesticide, 1,1-Dimethylpiperidinium chloride; at point-of-sale; kg AI: 3.25013e-6 kg; = p1879
- CUTOFF sulfur; at point-of-sale: 8.83775e-7 kg; = p1172
- CUTOFF zinc compounds; at point-of-sale: 2.43104e-7 kg; = p1184
- CUTOFF pesticide, Malathion ; at point-of-sale; kg AI: 0.00210933 kg; = p1872
- CUTOFF irrigate; unspec. irrigation method, unspec. water source, in 1998: 9.06247e-7 ha-m; = p1011
- CUTOFF pesticide, Imidacloprid; at point-of-sale; kg AI: 6.50026e-6 kg; = p1865
- CUTOFF gypsum; at point-of-sale: 1.49825e-5 kg; = p1166
- CUTOFF prepare soil; for unspec. till, cotton: 0.00155134 ha; = p0939
- CUTOFF pesticide, Trifluralin; at point-of-sale; kg AI: 0.000269761 kg; = p1955
- CUTOFF pesticide, Chlorfenapyr; at point-of-sale; kg AI: 6.82527e-5 kg; = p1790

## Inputs from nature
- Carbon dioxide: 8.83308 kg; = p0900*3.6666666667
- Dry matter except CNPK; from plant uptake: 3.51325 kg; = p0917
- Water, surface: 31.3223 kg; = p0889
- Phosphorus: 0.0200731 kg; = p0910
- Transformation, to annual crop [natural resource, land]: 15.5134 m2; = 1.0 * (p0857)
- Potassium; from plant uptake; biogenic: 0.0256048 kg; = p0915
- Water, unspecified origin: 0.00986654 m3; = p0893*0.001+p0916*0.001
- Transformation, from annual crop [natural resource, land]: 15.5134 m2; = 1.0 * (p0871+p0873+p0875+p0883)
- Occupation, annual crop [natural resource, land]: 6.64223 m2*year; = 1.0 * (p0855)
- Water, ground: 448.95 kg; = p0887
- Nitrogen: 0.116669 kg; = p0905

## Emissions to nature
- isopentane: 3.0396e-7 kg; = p2151*1.0166666667
- Metolachlor [soil, agricultural]: 0.000130437 kg; = 1.0 * (p5062+p5268+p4650+p3620+p4238+p4032)
- Nitrogen solution; broadcast w/ incorp. in fert. in spr. bef. plant.; broadcast w/ incorp. in fert. in spr. bef. plan...: 0.00508082 kg; = p2678
- Superphosphate, grades<= 22%; no broadcast in fert. after plant.; kg P: 2.25507e-6 kg; = p2579
- Other single phosphates; broadcast w/o incorp. in fert. in spr. bef. plant.; kg P: 4.7964e-5 kg; = p2895
- Pyrithiobac sodium salt [soil, agricultural]: 2.07043e-5 kg; = 1.0 * (p5096+p4684+p5302+p4066+p3654+p4272)
- Oxygen; applied in dolomite: 0.00552327 kg; = p3228
- Fluometuron [soil, agricultural]: 0.000685311 kg; = 1.0 * (p4194+p5018+p5224+p3576+p3988+p4606)
- Nitrogen solution; broadcast w/ incorp. in fert. after plant.; broadcast w/ incorp. in fert. after plant.; kg N: 0.0143327 kg; = p2756
- Other single K nutrients; no broadcast in fert. after plant.; kg K: 4.77775e-5 kg; = p2587
- Aliphatic petroleum hydrocarbons; banded or side-dressed: 6.78497e-6 kg; = p3636
- Superphosphate, grades>22%; broadcast w/o incorp. in fert. in fall bef. plant.; kg P: 9.17063e-5 kg; = p2854
- Ammonium nitrate; broadcast w/ incorp. in fert. after plant.: 0.0143284 kg; = p2749*4.7142857143
- Nitrogen; applied in sewage sludge: 2.04475e-8 kg; = p3240
- Nitrogen solution; broadcast w/ incorp. in fert. in fall bef. plant.; broadcast w/ incorp. in fert. in fall bef. plan...: 0.00170688 kg; = p2639
- Other single phosphates; no broadcast in fert. after plant.; kg P: 1.3751e-5 kg; = p2583
- Potassium chloride; broadcast w/ incorp. in fert. in spr. bef. plant.: 0.0582584 kg; = p2702*2.2166666667
- Magnesium [soil, agricultural]: 0.00139569 kg; = 1.0 * (p3227)
- Nitrogen dioxide: 6.18035e-5 kg; = p2039*3.2857142857
- Superphosphate, grades>22%; no broadcast in fert. in fall bef. plant.; kg P: 9.58735e-5 kg; = p2464
- Tribufos: 0.000213526 kg; = p3888
- Sodium chlorate [air, non-urban air or from high stacks]: 0.000125049 kg; = 1.0 * (p3867)
- Diuron [soil, agricultural]: 0.000221536 kg; = 1.0 * (p4173+p4997+p3555+p5203+p4585+p3967)
- Acetol; from residue burning: 6.76226e-5 kg; = p2134*2.0555555556
- Dimethipin: 7.07823e-6 kg; = p3758
- Nitrogen solution; no broadcast in fert. in spr. bef. plant.; no broadcast in fert. in spr. bef. plant.; kg N: 0.00467725 kg; = p2483
- Other single K nutrients; unspec. appl. method in fert. in fall bef. plant.; kg K: 7.08058e-5 kg; = p3055
- Superphosphate, grades>22%; broadcast w/o incorp. in fert. in spr. bef. plant.; kg P: 0.000145734 kg; = p2893
- Sodium nitrate; broadcast w/o incorp. in fert. in spr. bef. plant.: 2.26245e-5 kg; = p2876*6.0714285714
- cyclopentane: 2.97062e-8 kg; = p2153*1.0166666667
- Acetaldehyde [air, non-urban air or from high stacks]: 2.23372e-5 kg; = 1.0 * (p2130*1.8333333333)
- Anhydrous ammonia; broadcast w/o incorp. in fert. after plant.: 0.0074198 kg; = p2940*1.2142857143
- Clomazone [soil, agricultural]: 0.000130437 kg; = 1.0 * (p4558+p3528+p4970+p4146+p3940+p5176)
- Phenol [air, non-urban air or from high stacks]: 9.31519e-6 kg; = 1.0 * (p2133*1.3055555556)
- Ammonium nitrate; broadcast w/o incorp. in fert. after plant.: 0.00517589 kg; = p2944*4.7142857143
- Benzene [air, non-urban air or from high stacks]: 2.75585e-6 kg; = 1.0 * (p2140*1.0833333333)
- Nitrogen solution; no broadcast in fert. at plant.; no broadcast in fert. at plant.; kg N: 0.000472673 kg; = p2522
- Phosphorous; in below-ground residue: 0.00120024 kg; = p2175
- Quintozene: 7.66808e-5 kg; = p3839
- Quizalofop ethyl ester [soil, agricultural]: 1.24226e-5 kg; = 1.0 * (p4068+p5098+p3656+p5304+p4686+p4274)
- Metalaxil [soil, agricultural]: 6.21128e-6 kg; = 1.0 * (p5057+p4027+p4233+p5263+p4645+p3615)
- Sodium nitrate; broadcast w/ incorp. in fert. in fall bef. plant.: 2.10407e-5 kg; = p2642*6.0714285714
- Phosphorous; in above-ground residue left on field: 0.00283876 kg; = p2169
- Thiodicarb [air, non-urban air or from high stacks]: 7.78605e-5 kg; = 1.0 * (p3882)
- Fluometuron: 0.000390482 kg; = p3782
- Nitrogen solution; broadcast w/o incorp. in fert. at plant.; broadcast w/o incorp. in fert. at plant.; kg N: 0.000185477 kg; = p2912
- Carbofuran [soil, agricultural]: 6.21128e-6 kg; = 1.0 * (p3518+p5166+p4960+p4136+p3930+p4548)
- Ammonium sulfate; no broadcast in fert. after plant.: 0.00466603 kg; = p2557*4.7142857143
- Ammonium nitrate; broadcast w/ incorp. in fert. in fall bef. plant.: 0.00170637 kg; = p2632*4.7142857143
- Ammonium sulfate; broadcast w/ incorp. in fert. in spr. bef. plant.: 0.00179679 kg; = p2674*4.7142857143
- Other single K nutrients; broadcast w/o incorp. in fert. in spr. bef. plant.; kg K: 0.00117734 kg; = p2899
- Potassium chloride; broadcast w/ incorp. in fert. after plant.: 0.00600042 kg; = p2780*2.2166666667
- Ammonium nitrate; no broadcast in fert. at plant.: 0.000472534 kg; = p2515*4.7142857143
- Urea; no broadcast in fert. in fall bef. plant.: 0.00221529 kg; = p2451*5
- Superphosphate, grades>22%; unspec. appl. method in fert. in spr. bef. plant.; kg P: 4.01243e-6 kg; = p3088
- Plant dry matter; in below-ground residue: 0.286575 kg; = p2177
- Potassium; in above-ground residue left on field; biogenic: 0.00215165 kg; = p2170
- Other limestone constituents; applied in limestone: 0.0060804 kg; = p3220
- Carbofuran: 3.53911e-6 kg; = p3724
- Potassium chloride; broadcast w/ incorp. in fert. in fall bef. plant.: 0.0291696 kg; = p2663*2.2166666667
- Chlorfenapyr; unspec. appl. method: 3.92859e-7 kg; = p5169
- Quintozene [soil, agricultural]: 0.000134578 kg; = 1.0 * (p5075+p4663+p4251+p3633+p5281+p4045)
- Pesticide formulation balance; foliar or directed spray: 0.00124309 kg; = p4720
- Nitrogen solution; no broadcast in fert. after plant.; no broadcast in fert. after plant.; kg N: 0.0131942 kg; = p2561
- Prometryn [soil, agricultural]: 0.000360254 kg; = 1.0 * (p5290+p4054+p5084+p3642+p4672+p4260)
- Other single phosphates; unspec. appl. method in fert. in spr. bef. plant.; kg P: 1.32057e-6 kg; = p3090
- Pesticide formulation balance; banded or side-dressed: 0.00188797 kg; = p3690
- Other single K nutrients; broadcast w/ incorp. in fert. in spr. bef. plant.; kg K: 0.00236688 kg; = p2704
- Other single K nutrients; broadcast w/o incorp. in fert. after plant.; kg K: 0.000121262 kg; = p2977
- Fluazifop-p-butyl [air, non-urban air or from high stacks]: 1.1797e-5 kg; = 1.0 * (p3776)
- Zeta-cypermethrin [air, non-urban air or from high stacks]: 1.29767e-5 kg; = 1.0 * (p3894)
- Pendimethalin [soil, agricultural]: 0.000103521 kg; = 1.0 * (p4664+p4046+p3634+p5282+p5076+p4252)
- Carbon monoxide, fossil [air, non-urban air or from high stacks]: 0.00131283 kg; = 1.0 * (p2028*2.3333333333)
- Acephate [air, non-urban air or from high stacks]: 0.000156901 kg; = 1.0 * (p3699)
- Urea; no broadcast in fert. in spr. bef. plant.: 0.0065942 kg; = p2490*5
- Trifluralin [air, non-urban air or from high stacks]: 9.79155e-5 kg; = 1.0 * (p3892)
- Plant dry matter; from residue burning: 0.00650533 kg; = p2164
- Monoammonium phosphate; broadcast w/o incorp. in fert. after plant.: 0.000619807 kg; = p2966*8.2142857143
- Acetonitrile [air, non-urban air or from high stacks]: 3.77012e-6 kg; = 1.0 * (p2155*1.7083333333)
- NMVOC, non-methane volatile organic compounds, unspecified origin [air, non-urban air or from high stacks]: 0.00046146 kg; = 1.0 * (p2052+p2051)
- Furan [air, non-urban air or from high stacks]: 1.96462e-6 kg; = 1.0 * (p2138*1.4166666667)
- Urea; broadcast w/ incorp. in fert. in fall bef. plant.: 0.00240643 kg; = p2646*5
- Cacodylic acid; broadcast by air: 1.65159e-5 kg; = p3722
- Aqueous ammonia; broadcast w/ incorp. in fert. in fall bef. plant.: 4.06599e-5 kg; = p2630*1.2142857143
- Ethene [air, non-urban air or from high stacks]: 2.61315e-5 kg; = 1.0 * (p2125*1.1666666667)
- Superphosphate, grades<= 22%; broadcast w/o incorp. in fert. in spr. bef. plant.; kg P: 7.86575e-6 kg; = p2891
- Anhydrous ammonia; no broadcast in fert. in fall bef. plant.: 0.00225184 kg; = p2433*1.2142857143
- Nitrogen solution; broadcast w/o incorp. in fert. in fall bef. plant.; broadcast w/o incorp. in fert. in fall bef. pl...: 0.000616578 kg; = p2834
- Carbon [soil, agricultural]: 0.845359 kg; = 1.0 * (p3217+p2173+p2167+p3242+p3225)
- Bromoxynil: 5.89852e-6 kg; = p3717
- Superphosphate, grades<= 22%; broadcast w/ incorp. in fert. after plant.; kg P: 6.22922e-6 kg; = p2774
- Cacodylic acid; foliar or directed spray: 6.25438e-6 kg; = p4546
- Ethyne [air, non-urban air or from high stacks]: 4.88872e-6 kg; = 1.0 * (p2132*1.0833333333)
- Other single K nutrients; no broadcast in fert. in spr. bef. plant.; kg K: 0.000463874 kg; = p2509
- Toluene [air, non-urban air or from high stacks]: 3.42081e-6 kg; = 1.0 * (p2141*1.0952380952)
- Diammonium phosphate; unspec. appl. method in fert. in spr. bef. plant.: 0.000178424 kg; = p3079*4.7142857143
- Potassium chloride; unspec. appl. method in fert. in spr. bef. plant.: 0.0034808 kg; = p3092*2.2166666667
- Ammonium nitrate; broadcast w/ incorp. in fert. in spr. bef. plant.: 0.00507932 kg; = p2671*4.7142857143
- Potassium chloride; broadcast w/o incorp. in fert. in fall bef. plant.: 0.0145096 kg; = p2858*2.2166666667
- Other single phosphates; broadcast w/o incorp. in fert. after plant.; kg P: 1.31533e-5 kg; = p2973
- Sodium chlorate: 0.000219465 kg; = p5309+p4691+p3661+p4073+p5103+p4279
- Acetone [air, non-urban air or from high stacks]: 8.01468e-6 kg; = 1.0 * (p2139*1.6111111111)
- Clethodim [air, non-urban air or from high stacks]: 9.43763e-6 kg; = 1.0 * (p3732)
- Lambda-cyhalothrin [soil, agricultural]: 3.72677e-5 kg; = 1.0 * (p4219+p5043+p5249+p4631+p4013+p3601)
- Seeds; used in planting and sowing: 0.01765 kg; = p2179
- Dinitrogen monoxide [air, non-urban air or from high stacks]: 1.25741e-6 kg; = 1.0 * (p2044*1.5714285714)
- Fenoxaprop P; foliar or directed spray: 2.68045e-6 kg; = p4596
- Other single K nutrients; broadcast w/ incorp. in fert. in fall bef. plant.; kg K: 0.00118508 kg; = p2665
- Superphosphate, grades<= 22%; unspec. appl. method in fert. after plant.; kg P: 5.9389e-8 kg; = p3164
- Propanenitrile: 1.1508e-6 kg; = p2157*1.5277777778
- Diammonium phosphate; broadcast w/o incorp. in fert. in fall bef. plant.: 0.00407798 kg; = p2845*4.7142857143
- Deltamethrin: 7.07823e-6 kg; = p3744
- Anhydrous ammonia; no broadcast in fert. at plant.: 0.000677392 kg; = p2511*1.2142857143
- Monoammonium phosphate; no broadcast in fert. after plant.: 0.000647972 kg; = p2576*8.2142857143
- Cyfluthrin [soil, agricultural]: 1.24226e-5 kg; = 1.0 * (p4977+p4153+p5183+p3947+p4565+p3535)
- Nitrogen solution; no broadcast in fert. in fall bef. plant.; no broadcast in fert. in fall bef. plant.; kg N: 0.0015713 kg; = p2444
- Superphosphate, grades>22%; broadcast w/ incorp. in fert. in fall bef. plant.; kg P: 0.000264833 kg; = p2659
- Other single K nutrients; broadcast w/o incorp. in fert. in fall bef. plant.; kg K: 0.000589488 kg; = p2860
- Other single phosphates; broadcast w/ incorp. in fert. in spr. bef. plant.; kg P: 0.000138512 kg; = p2700
- Methyl vinyl ether; from residue burning: 1.36218e-6 kg; = p2137*1.6111111111
- Superphosphate, grades>22%; unspec. appl. method in fert. after plant.; kg P: 1.10034e-6 kg; = p3166
- Oxamyl: 5.78055e-5 kg; = p3836
- Sewage sludge dry matter; applied in sewage sludge: 2.26373e-9 kg; = p3243
- Profenofos: 5.42664e-5 kg; = p3847
- Cyfluthrin [air, non-urban air or from high stacks]: 7.07823e-6 kg; = 1.0 * (p3741)
- Diammonium phosphate; no broadcast in fert. in fall bef. plant.: 0.00426329 kg; = p2455*4.7142857143
- Anhydrous ammonia; broadcast w/ incorp. in fert. at plant.: 0.000735839 kg; = p2706*1.2142857143
- Aqueous ammonia; no broadcast in fert. at plant.: 1.12597e-5 kg; = p2513*1.2142857143
- Sodium nitrate; broadcast w/o incorp. in fert. after plant.: 6.38222e-5 kg; = p2954*6.0714285714
- Superphosphate, grades<= 22%; broadcast w/o incorp. in fert. after plant.; kg P: 2.15705e-6 kg; = p2969
- Urea; broadcast w/ incorp. in fert. after plant.: 0.0202068 kg; = p2763*5
- Formic acid [air, non-urban air or from high stacks]: 1.7996e-5 kg; = 1.0 * (p2131*3.8333333333)
- Ammonium sulfate; no broadcast in fert. at plant.: 0.000167157 kg; = p2518*4.7142857143
- Pendimethalin [air, non-urban air or from high stacks]: 5.89852e-5 kg; = 1.0 * (p3840)
- Aqueous ammonia; broadcast w/ incorp. in fert. in spr. bef. plant.: 0.000121031 kg; = p2669*1.2142857143
- 1-Butene: 2.40418e-6 kg; = p2144*1.1666666667
- Ammonia [air, non-urban air or from high stacks]: 3.8974e-5 kg; = 1.0 * (p2159*1.2142857143)
- Aliphatic petroleum hydrocarbons; foliar or directed spray: 4.46741e-6 kg; = p4666
- Chlorfenapyr; broadcast without incorporation: 1.34896e-6 kg; = p4139
- Aqueous ammonia; no broadcast in fert. in spr. bef. plant.: 0.000111418 kg; = p2474*1.2142857143
- Diammonium phosphate; broadcast w/ incorp. in fert. in fall bef. plant.: 0.0117765 kg; = p2650*4.7142857143
- Anhydrous ammonia; broadcast w/ incorp. in fert. in fall bef. plant.: 0.00244614 kg; = p2628*1.2142857143
- Norflurazon [soil, agricultural]: 2.27747e-5 kg; = 1.0 * (p4658+p4246+p5276+p5070+p3628+p4040)
- Anhydrous ammonia; broadcast w/ incorp. in fert. after plant.: 0.0205402 kg; = p2745*1.2142857143
- Urea; broadcast w/o incorp. in fert. in fall bef. plant.: 0.00086928 kg; = p2841*5
- Glyphosate [soil, agricultural]: 0.000163564 kg; = 1.0 * (p4204+p4616+p3586+p5028+p3998+p5234)
- Sulfuric acid [soil, agricultural]: 1.69877e-7 kg; = 1.0 * (p3231)
- Nitrogen solution; broadcast w/ incorp. in fert. at plant.; broadcast w/ incorp. in fert. at plant.; kg N: 0.000513457 kg; = p2717
- Aldicarb [soil, agricultural]: 0.000167704 kg; = 1.0 * (p3911+p3499+p4941+p5147+p4529+p4117)
- Pentane [air, non-urban air or from high stacks]: 3.7995e-7 kg; = 1.0 * (p2152*1.0166666667)
- Superphosphate, grades<= 22%; no broadcast in fert. in fall bef. plant.; kg P: 5.1746e-6 kg; = p2462
- Filler materials, applied with synthetic fertilizer: 0.171512 kg; = p2432
- Ammonium nitrate; no broadcast in fert. in spr. bef. plant.: 0.00467587 kg; = p2476*4.7142857143
- Cacodylic acid; broadcast with incorporation: 1.0977e-5 kg; = p3928
- Potassium chloride; unspec. appl. method in fert. after plant.: 0.00035851 kg; = p3170*2.2166666667
- Thiodicarb [soil, agricultural]: 0.000136648 kg; = 1.0 * (p4088+p3676+p4706+p4294+p5118+p5324)
- Ammonium nitrate; broadcast w/o incorp. in fert. in spr. bef. plant.: 0.00183481 kg; = p2866*4.7142857143
- Ammonium sulfate; broadcast w/o incorp. in fert. at plant.: 6.55925e-5 kg; = p2908*4.7142857143
- Monoammonium phosphate; unspec. appl. method in fert. after plant.: 1.70648e-5 kg; = p3161*8.2142857143
- Sodium nitrate; broadcast w/ incorp. in fert. after plant.: 0.000176679 kg; = p2759*6.0714285714
- Other single phosphates; unspec. appl. method in fert. in fall bef. plant.; kg P: 8.30994e-7 kg; = p3051
- Superphosphate, grades>22%; unspec. appl. method in fert. in fall bef. plant.; kg P: 2.5249e-6 kg; = p3049
- Anhydrous ammonia; broadcast w/ incorp. in fert. in spr. bef. plant.: 0.00728136 kg; = p2667*1.2142857143
- Malathion: 0.000765628 kg; = p3809
- Dioxins and furans (PCDD/F); from residue burning: 5.3879e-13 kg TEQ; = p2047
- Ammonium nitrate; broadcast w/o incorp. in fert. in fall bef. plant.: 0.000616397 kg; = p2827*4.7142857143
- Ammonium sulfate; broadcast w/o incorp. in fert. in spr. bef. plant.: 0.000649058 kg; = p2869*4.7142857143
- Calcium [soil, agricultural]: 0.0406125 kg; = 1.0 * (p3218+p3226)
- Sulfur [soil, agricultural]: 8.83775e-7 kg; = 1.0 * (p3230)
- Cyanazine: 9.31966e-5 kg; = p3739
- DSMA [soil, agricultural]: 0.000159423 kg; = 1.0 * (p4998+p5204+p3968+p4586+p4174+p3556)
- Spinosad [soil, agricultural]: 2.07043e-5 kg; = 1.0 * (p4280+p3662+p4074+p5104+p4692+p5310)
- Nitrogen solution; broadcast w/o incorp. in fert. after plant.; broadcast w/o incorp. in fert. after plant.; kg N: 0.00517742 kg; = p2951
- Aliphatic petroleum hydrocarbons; broadcast by air: 1.1797e-5 kg; = p3842
- Other single phosphates; unspec. appl. method in fert. after plant.; kg P: 3.62144e-7 kg; = p3168
- Sodium nitrate; no broadcast in fert. at plant.: 5.82666e-6 kg; = p2525*6.0714285714
- Sodium nitrate; no broadcast in fert. in spr. bef. plant.: 5.76566e-5 kg; = p2486*6.0714285714
- Monoammonium phosphate; broadcast w/o incorp. in fert. in fall bef. plant.: 0.00142224 kg; = p2849*8.2142857143
- Aliphatic petroleum hydrocarbons; unspec. appl. method: 1.87076e-7 kg; = p5284
- Superphosphate, grades>22%; broadcast w/ incorp. in fert. in spr. bef. plant.; kg P: 0.000420857 kg; = p2698
- Mepiquat chloride [soil, agricultural]: 2.07043e-6 kg; = 1.0 * (p3610+p5258+p4022+p5052+p4228+p4640)
- Trifluralin [soil, agricultural]: 0.000171845 kg; = 1.0 * (p5334+p4098+p3686+p5128+p4304+p4716)
- Chlorfenapyr; banded or side-dressed: 1.42484e-5 kg; = p3521
- Ammonium nitrate; no broadcast in fert. in fall bef. plant.: 0.00157084 kg; = p2437*4.7142857143
- Fenoxaprop P; banded or side-dressed: 4.07098e-6 kg; = p3566
- Nitrogen; in below-ground residue: 0.00954737 kg; = p2174
- Methane: 5.91628e-5 kg; = p2025*1.3333333333
- Malathion [soil, agricultural]: 0.00134371 kg; = 1.0 * (p4221+p4015+p5045+p5251+p4633+p3603)
- Other single K nutrients; unspec. appl. method in fert. after plant.; kg K: 1.45653e-5 kg; = p3172
- Disulfoton: 4.01099e-5 kg; = p3760
- 2,4-D [soil, agricultural]: 1.86338e-5 kg; = 1.0 * (p5133+p3897+p3485+p4515+p4927+p4103)
- Anhydrous ammonia; broadcast w/o incorp. in fert. at plant.: 0.000265809 kg; = p2901*1.2142857143
- Diammonium phosphate; broadcast w/o incorp. in fert. after plant.: 0.00177717 kg; = p2962*4.7142857143
- Superphosphate, grades<= 22%; unspec. appl. method in fert. in fall bef. plant.; kg P: 1.36277e-7 kg; = p3047
- Particulates, < 2.5 um [air, non-urban air or from high stacks]: 0.00011117 kg; = 1.0 * (p2033+p2035)
- Nitrogen; in above-ground residue left on field: 0.0225811 kg; = p2168
- Diammonium phosphate; broadcast w/o incorp. in fert. in spr. bef. plant.: 0.00648049 kg; = p2884*4.7142857143
- cis-2-Butene: 7.7149e-7 kg; = p2149*1.1666666667
- 2,4-D [air, non-urban air or from high stacks]: 1.06173e-5 kg; = 1.0 * (p3691)
- Diammonium phosphate; unspec. appl. method in fert. after plant.: 4.89299e-5 kg; = p3157*4.7142857143
- Profenofos [soil, agricultural]: 9.52396e-5 kg; = 1.0 * (p5289+p4671+p3641+p4053+p4259+p5083)
- Ammonium nitrate; no broadcast in fert. after plant.: 0.0131903 kg; = p2554*4.7142857143
- Clomazone: 7.43214e-5 kg; = p3734
- Superphosphate, grades<= 22%; unspec. appl. method in fert. in spr. bef. plant.; kg P: 2.16564e-7 kg; = p3086
- Dicrotophos: 7.78605e-5 kg; = p3752
- Methyl parathion [air, non-urban air or from high stacks]: 0.00125874 kg; = 1.0 * (p3825)
- Monoammonium phosphate; no broadcast in fert. in spr. bef. plant.: 0.00236285 kg; = p2498*8.2142857143
- Monoammonium phosphate; broadcast w/ incorp. in fert. in spr. bef. plant.: 0.00652692 kg; = p2693*8.2142857143
- Ammonium sulfate; broadcast w/o incorp. in fert. after plant.: 0.00183095 kg; = p2947*4.7142857143
- Diammonium phosphate; no broadcast in fert. in spr. bef. plant.: 0.00677497 kg; = p2494*4.7142857143
- Zeta-cypermethrin [soil, agricultural]: 2.27747e-5 kg; = 1.0 * (p4718+p5336+p4306+p4100+p5130+p3688)
- Ammonium sulfate; broadcast w/ incorp. in fert. in fall bef. plant.: 0.000603622 kg; = p2635*4.7142857143
- Dimethoate: 2.35941e-5 kg; = p3759
- Aqueous ammonia; broadcast w/o incorp. in fert. at plant.: 4.4183e-6 kg; = p2903*1.2142857143
- Carbon dioxide, in air: 0.0229873 kg; = p2163*3.6666666667
- Urea; no broadcast in fert. after plant.: 0.0186018 kg; = p2568*5
- Quizalofop ethyl ester: 7.07823e-6 kg; = p3862
- Sodium nitrate; broadcast w/ incorp. in fert. at plant.: 6.3294e-6 kg; = p2720*6.0714285714
- Anhydrous ammonia; broadcast w/o incorp. in fert. in fall bef. plant.: 0.000883623 kg; = p2823*1.2142857143
- Monoammonium phosphate; unspec. appl. method in fert. in fall bef. plant.: 3.91578e-5 kg; = p3044*8.2142857143
- Glycolaldehyde; from residue burning: 3.61839e-5 kg; = p2135*2.5
- Dimethoate [soil, agricultural]: 4.14085e-5 kg; = 1.0 * (p4995+p4583+p3553+p3965+p5201+p4171)
- Urea; no broadcast in fert. at plant.: 0.000666397 kg; = p2529*5
- DSMA: 9.08372e-5 kg; = p3762
- Aqueous ammonia; broadcast w/ incorp. in fert. after plant.: 0.000341422 kg; = p2747*1.2142857143
- Superphosphate, grades>22%; no broadcast in fert. in spr. bef. plant.; kg P: 0.000152357 kg; = p2503
- Ammonium sulfate; broadcast w/ incorp. in fert. at plant.: 0.00018158 kg; = p2713*4.7142857143
- Superphosphate, grades>22%; no broadcast in fert. after plant.; kg P: 4.17813e-5 kg; = p2581
- Superphosphate, grades<= 22%; broadcast w/ incorp. in fert. in spr. bef. plant.; kg P: 2.2715e-5 kg; = p2696
- Lambda-cyhalothrin: 2.12347e-5 kg; = p3807
- Paraquat dichloride: 4.34789e-5 kg; = p5280+p4662+p4250+p3632+p5074+p4044
- Particulates, < 10 um: 0.000159302 kg; = p2034+p2036
- Ammonium sulfate; no broadcast in fert. in fall bef. plant.: 0.000555677 kg; = p2440*4.7142857143
- Paraquat dichloride: 2.47738e-5 kg; = p3838
- Aqueous ammonia; no broadcast in fert. after plant.: 0.000314303 kg; = p2552*1.2142857143
- Urea; broadcast w/o incorp. in fert. in spr. bef. plant.: 0.00258757 kg; = p2880*5
- Dimethipin [soil, agricultural]: 1.24226e-5 kg; = 1.0 * (p4170+p3552+p5200+p4582+p4994+p3964)
- Potassium chloride; no broadcast in fert. in fall bef. plant.: 0.00571682 kg; = p2468*2.2166666667
- Anhydrous ammonia; broadcast w/o incorp. in fert. in spr. bef. plant.: 0.00263026 kg; = p2862*1.2142857143
- Other single K nutrients; no broadcast in fert. in fall bef. plant.; kg K: 0.000232259 kg; = p2470
- Metolachlor [air, non-urban air or from high stacks]: 7.43214e-5 kg; = 1.0 * (p3826)
- Ammonium sulfate; broadcast w/ incorp. in fert. after plant.: 0.00506863 kg; = p2752*4.7142857143
- Ethephon [soil, agricultural]: 0.000302282 kg; = 1.0 * (p5211+p3975+p4593+p3563+p4181+p5005)
- Sodium nitrate; broadcast w/ incorp. in fert. in spr. bef. plant.: 6.26314e-5 kg; = p2681*6.0714285714
- Disulfoton [soil, agricultural]: 7.03945e-5 kg; = 1.0 * (p5202+p3554+p3966+p4172+p4996+p4584)
- Ammonium sulfate; no broadcast in fert. in spr. bef. plant.: 0.00165407 kg; = p2479*4.7142857143
- Monoammonium phosphate; broadcast w/ incorp. in fert. in fall bef. plant.: 0.0041072 kg; = p2654*8.2142857143
- Potassium chloride; no broadcast in fert. after plant.: 0.00117599 kg; = p2585*2.2166666667
- Monoammonium phosphate; broadcast w/ incorp. in fert. after plant.: 0.0017899 kg; = p2771*8.2142857143
- Acetic acid [air, non-urban air or from high stacks]: 0.000100482 kg; = 1.0 * (p2127*2.5)
- Other single phosphates; broadcast w/ incorp. in fert. after plant.; kg P: 3.79847e-5 kg; = p2778
- Aliphatic petroleum hydrocarbons; broadcast with incorporation: 7.84071e-6 kg; = p4048
- Imidacloprid: 2.35941e-6 kg; = p3802
- Cacodylic acid; in seed furrow: 1.09441e-6 kg; = p4958
- Monoammonium phosphate; unspec. appl. method in fert. in spr. bef. plant.: 6.22274e-5 kg; = p3083*8.2142857143
- Oxygen; applied in limestone: 0.0456832 kg; = p3219
- Aldicarb: 9.55561e-5 kg; = p3705
- Other single phosphates; no broadcast in fert. in fall bef. plant.; kg P: 3.15538e-5 kg; = p2466
- Ammonium nitrate; broadcast w/ incorp. in fert. at plant.: 0.000513306 kg; = p2710*4.7142857143
- S,S,S-tributyl phosphorotrithioate: 0.000374747 kg; = p4300+p4712+p3682+p4094+p5330+p5124
- Propene [air, non-urban air or from high stacks]: 1.21412e-5 kg; = 1.0 * (p2136*1.1666666667)
- Ethephon: 0.000172237 kg; = p3769
- Cacodylic acid; unspec. appl. method: 2.61906e-7 kg; = p5164
- Diammonium phosphate; unspec. appl. method in fert. in fall bef. plant.: 0.000112277 kg; = p3040*4.7142857143
- trans-2-Butene: 1.02267e-6 kg; = p2148*1.1666666667
- Pesticide formulation balance; broadcast by air: 0.00328261 kg; = p3896
- Thidiazuron: 2.94926e-5 kg; = p3879
- Superphosphate, grades<= 22%; broadcast w/ incorp. in fert. in fall bef. plant.; kg P: 1.42939e-5 kg; = p2657
- Oxamyl [soil, agricultural]: 0.000101451 kg; = 1.0 * (p5278+p4042+p4660+p5072+p3630+p4248)
- Cypermethrin: 4.83679e-5 kg; = p3743
- Aliphatic petroleum hydrocarbons; in seed furrow: 7.81723e-7 kg; = p5078
- Mepiquat chloride: 1.1797e-6 kg; = p3816
- Isoprene [air, non-urban air or from high stacks]: 6.77681e-6 kg; = 1.0 * (p2145*1.1333333333)
- Cacodylic acid; banded or side-dressed: 9.49896e-6 kg; = p3516
- Chlorfenapyr; broadcast by air: 2.47738e-5 kg; = p3727
- Plant dry matter; in aboveground residue left on field: 0.677797 kg; = p2172
- Chlorfenapyr; broadcast with incorporation: 1.64655e-5 kg; = p3933
- Chlorfenapyr; foliar or directed spray: 9.38156e-6 kg; = p4551
- I butane; from residue burning: 3.78861e-7 kg; = p2146*1.0208333333
- Cypermethrin [soil, agricultural]: 8.48875e-5 kg; = 1.0 * (p3949+p4155+p3537+p4567+p4979+p5185)
- Diuron: 0.000126228 kg; = p3761
- Acrylonitrile: 6.02003e-7 kg; = p2156*1.4722222222
- Potassium chloride; broadcast w/o incorp. in fert. in spr. bef. plant.: 0.0289791 kg; = p2897*2.2166666667
- Ash: 0.00355243 kg; = p2022+p2021
- Cyanazine [soil, agricultural]: 0.000163564 kg; = 1.0 * (p4151+p4975+p5181+p4563+p3533+p3945)
- Ethane [air, non-urban air or from high stacks]: 1.63203e-5 kg; = 1.0 * (p2126*1.25)
- Diammonium phosphate; broadcast w/ incorp. in fert. in spr. bef. plant.: 0.0187146 kg; = p2689*4.7142857143
- Hydrocyanic acid: 5.12355e-6 kg; = p2154*2.25
- Ammonium sulfate; broadcast w/o incorp. in fert. in fall bef. plant.: 0.000218048 kg; = p2830*4.7142857143
- MSMA [soil, agricultural]: 0.000997945 kg; = 1.0 * (p4655+p5273+p3625+p5067+p4037+p4243)
- Aqueous ammonia; broadcast w/ incorp. in fert. at plant.: 1.22312e-5 kg; = p2708*1.2142857143
- Pesticide formulation balance; in seed furrow: 0.00021752 kg; = p5132
- Cacodylic acid; broadcast without incorporation: 8.99304e-7 kg; = p4134
- Anhydrous ammonia; no broadcast in fert. in spr. bef. plant.: 0.006703 kg; = p2472*1.2142857143
- Potassium; in below-ground residue; biogenic: 0.000909728 kg; = p2176
- Dicrotophos [soil, agricultural]: 0.000136648 kg; = 1.0 * (p4576+p4164+p3546+p5194+p3958+p4988)
- Butane [air, non-urban air or from high stacks]: 1.09112e-6 kg; = 1.0 * (p2147*1.0208333333)
- Superphosphate, grades<= 22%; no broadcast in fert. in spr. bef. plant.; kg P: 8.22317e-6 kg; = p2501
- Pyrithiobac sodium salt: 1.1797e-5 kg; = p3860
- Pesticide formulation balance; broadcast with incorporation: 0.00218174 kg; = p4102
- Potassium chloride; no broadcast in fert. in spr. bef. plant.: 0.0114178 kg; = p2507*2.2166666667
- Phosphorous; applied in sewage sludge: 2.44094e-9 kg; = p3241
- Anhydrous ammonia; no broadcast in fert. after plant.: 0.0189087 kg; = p2550*1.2142857143
- Superphosphate, grades<= 22%; broadcast w/o incorp. in fert. in fall bef. plant.; kg P: 4.94968e-6 kg; = p2852
- Methyl parathion [soil, agricultural]: 0.00220914 kg; = 1.0 * (p3619+p5267+p5061+p4031+p4649+p4237)
- Deltamethrin [soil, agricultural]: 1.24226e-5 kg; = 1.0 * (p4156+p3950+p3538+p4568+p5186+p4980)
- Spinosad: 1.1797e-5 kg; = p3868
- Aliphatic petroleum hydrocarbons; broadcast without incorporation: 6.4236e-7 kg; = p4254
- Ammonium nitrate; broadcast w/o incorp. in fert. at plant.: 0.000185423 kg; = p2905*4.7142857143
- Other single phosphates; broadcast w/ incorp. in fert. in fall bef. plant.; kg P: 8.71615e-5 kg; = p2661
- Etridiazole: 9.43763e-6 kg; = p3771
- Monoammonium phosphate; broadcast w/o incorp. in fert. in spr. bef. plant.: 0.00226014 kg; = p2888*8.2142857143
- Sodium nitrate; no broadcast in fert. in fall bef. plant.: 1.93694e-5 kg; = p2447*6.0714285714
- Superphosphate, grades>22%; broadcast w/o incorp. in fert. after plant.; kg P: 3.99653e-5 kg; = p2971
- Prometryn: 0.000205269 kg; = p3848
- Nitrogen solution; broadcast w/o incorp. in fert. in spr. bef. plant.; broadcast w/o incorp. in fert. in spr. bef. pl...: 0.00183536 kg; = p2873
- Aqueous ammonia; no broadcast in fert. in fall bef. plant.: 3.74303e-5 kg; = p2435*1.2142857143
- Superphosphate, grades>22%; broadcast w/ incorp. in fert. after plant.; kg P: 0.000115413 kg; = p2776
- Urea; broadcast w/o incorp. in fert. at plant.: 0.000261494 kg; = p2919*5
- Pesticides, unspecified [soil, agricultural]: 5.39592e-5 kg; = 1.0 * (p3689+p4101+p4307+p4719+p5131+p5337)
- Aqueous ammonia; broadcast w/o incorp. in fert. after plant.: 0.000123332 kg; = p2942*1.2142857143
- Sodium nitrate; broadcast w/o incorp. in fert. in fall bef. plant.: 7.60058e-6 kg; = p2837*6.0714285714
- Sodium nitrate; no broadcast in fert. after plant.: 0.000162646 kg; = p2564*6.0714285714
- Diammonium phosphate; no broadcast in fert. after plant.: 0.00185793 kg; = p2572*4.7142857143
- Clethodim [soil, agricultural]: 1.65634e-5 kg; = 1.0 * (p4968+p5174+p4556+p3938+p4144+p3526)
- Fenoxaprop P; unspec. appl. method: 1.12245e-7 kg; = p5214
- Fenoxaprop P; in seed furrow: 4.69034e-7 kg; = p5008
- Fenoxaprop P; broadcast by air: 7.07823e-6 kg; = p3772
- Norflurazon: 1.29767e-5 kg; = p3834
- Etridiazole [soil, agricultural]: 1.65634e-5 kg; = 1.0 * (p5213+p4595+p3977+p4183+p3565+p5007)
- Gypsum: 1.49825e-5 kg; = p3229
- Imidacloprid [soil, agricultural]: 4.14085e-6 kg; = 1.0 * (p3596+p5244+p4214+p4008+p4626+p5038)
- Urea; broadcast w/ incorp. in fert. in spr. bef. plant.: 0.00716317 kg; = p2685*5
- Formaldehyde [air, non-urban air or from high stacks]: 3.7336e-5 kg; = 1.0 * (p2128*2.5)
- Methanol [air, non-urban air or from high stacks]: 5.90258e-5 kg; = 1.0 * (p2129*2.6666666667)
- Aqueous ammonia; broadcast w/o incorp. in fert. in fall bef. plant.: 1.46877e-5 kg; = p2825*1.2142857143
- Other single phosphates; broadcast w/o incorp. in fert. in fall bef. plant.; kg P: 3.01823e-5 kg; = p2856
- Thidiazuron [soil, agricultural]: 5.17606e-5 kg; = 1.0 * (p5321+p3673+p4703+p5115+p4085+p4291)
- Pesticides, unspecified: 3.07453e-5 kg; = p3895
- Other single K nutrients; unspec. appl. method in fert. in spr. bef. plant.; kg K: 0.000141416 kg; = p3094
- Sodium nitrate; broadcast w/o incorp. in fert. at plant.: 2.28638e-6 kg; = p2915*6.0714285714
- Glyphosate [air, non-urban air or from high stacks]: 9.31966e-5 kg; = 1.0 * (p3792)
- Urea; broadcast w/ incorp. in fert. at plant.: 0.000723895 kg; = p2724*5
- MSMA: 0.000568618 kg; = p3831
- Pesticide formulation balance; unspec. appl. method: 5.20551e-5 kg; = p5338
- Potassium chloride; broadcast w/o incorp. in fert. after plant.: 0.00298474 kg; = p2975*2.2166666667
- Propane [air, non-urban air or from high stacks]: 5.05815e-6 kg; = 1.0 * (p2142*1.2222222222)
- Fenoxaprop P; broadcast without incorporation: 3.85416e-7 kg; = p4184
- Butadiene [air, non-urban air or from high stacks]: 2.70979e-6 kg; = 1.0 * (p2143*1.125)
- Water: 489.63 kg; = p2171+p2181+p2178
- Potassium chloride; unspec. appl. method in fert. in fall bef. plant.: 0.00174281 kg; = p3053*2.2166666667
- isobutene: 2.09917e-6 kg; = p2150*1.1666666667
- Aqueous ammonia; broadcast w/o incorp. in fert. in spr. bef. plant.: 4.37204e-5 kg; = p2864*1.2142857143
- Diammonium phosphate; broadcast w/ incorp. in fert. after plant.: 0.00513217 kg; = p2767*4.7142857143
- Zinc compounds: 2.43104e-7 kg; = p3232
- Fenoxaprop P; broadcast with incorporation: 4.70443e-6 kg; = p3978
- Fluazifop-P-butyl [soil, agricultural]: 2.07043e-5 kg; = 1.0 * (p5218+p3982+p4188+p3570+p5012+p4600)
- Other single K nutrients; broadcast w/ incorp. in fert. after plant.; kg K: 0.000243781 kg; = p2782
- Pesticide formulation balance; broadcast without incorporation: 0.000178741 kg; = p4308
- Urea; broadcast w/o incorp. in fert. after plant.: 0.00729936 kg; = p2958*5
- Water [air, non-urban air or from high stacks]: 2.88731e-6 m3; = 0.001 * (p2016)
- Chlorfenapyr; in seed furrow: 1.64162e-6 kg; = p4963
- Bromoxynil [soil, agricultural]: 1.03521e-5 kg; = 1.0 * (p4541+p4953+p4129+p3923+p3511+p5159)
- Other single phosphates; no broadcast in fert. in spr. bef. plant.; kg P: 5.01435e-5 kg; = p2505
- Acephate [soil, agricultural]: 0.000275367 kg; = 1.0 * (p3493+p3905+p4523+p4935+p4111+p5141)
- Metalaxil: 3.53911e-6 kg; = p3821
- Monoammonium phosphate; no broadcast in fert. in fall bef. plant.: 0.00148687 kg; = p2459*8.2142857143

## Sampling procedure
A delete-a-group jackknife is used by the USDA to estimate the ARMS sample means and RSEs, based on a 15 sample delete-a-group jackknife. Because of this relatively small sample size, a Students t distribution is used to represent ARMS data probability density functions. Other representations of uncertainty are described in Cooper, J.S., Kahn, E., Noon, M. (2012). LCA Digital Commons Unit Process Data: field crop production Version 1. Prepared for the US Department of Agriculture National Agricultural Library. Retrieved from https://www.lcacommons.gov/discovery/docs/LCA%20Digital%20Commons%20Unit%20Process%20Data%20final%20updated.pdf

## Extrapolations
Data represent an aggregation of processes applied in Louisiana in 1998. Data development is demonstrated by parameterization (exlicitly presents all raw and uncertainty data and all calculations). Flow data quality according to the LCADC convention is provided for all flows.
