# peanuts; at harvest in 2004; at farm; 90%-95% moisture

Dataset: EcoSpold 2, unit process
Geography: GLO
Time period: 2004-01-02 to 2005-01-01
Scenario: Business-as-Usual
System model: Allocation, ecoinvent default
Generated by: cooperjs@u.washington.edu
isCopyrightProtected: false

## General comment
This unit process/ gate-to-gate dataset represents the production of 1 kg peanuts coproduced with residue. The process technologies are an aggregation of those applied in Texas in 2004. Applicable classifications include ISIC 0111, NAIC 111992, UNSPSC 50405500; this dataset was prepared in ILCD format using the UWDFE Lab Excel to ILCD File Generator (beta version, August 2013)

Exchange "Chlorothalonil-soil agricultural" is the result of combining the following original LCA Commons flows: "Chlorothalonil; in irrigation water; kg AI", "Chlorothalonil; broadcast with incorporation; kg AI", "Chlorothalonil; foliar or directed spray; kg AI", "Chlorothalonil; chiseled or injected/knifed in; kg AI", "Chlorothalonil; unspec. appl. method; kg AI", "Chlorothalonil; broadcast without incorporation; kg AI".
Exchange "S-Metolachlor-soil agricultural" is the result of combining the following original LCA Commons flows: "S-Metolachlor; broadcast without incorporation; kg AI", "S-Metolachlor; foliar or directed spray; kg AI", "S-Metolachlor; chiseled or injected/knifed in; kg AI", "S-Metolachlor; broadcast with incorporation; kg AI", "S-Metolachlor; in irrigation water; kg AI", "S-Metolachlor; unspec. appl. method; kg AI".
Exchange "NMVOC, non-methane volatile organic compounds, unspecified origin-air low population density" is the result of combining the following original LCA Commons flows: "NMVOCs; from residue burning; kg except C, biogenic", "NMVOCs; from residue burning; kg C, biogenic".
Exchange "Glyphosate-soil agricultural" is the result of combining the following original LCA Commons flows: "Glyphosate; broadcast without incorporation; kg AI", "Glyphosate; foliar or directed spray; kg AI", "Glyphosate; in irrigation water; kg AI", "Glyphosate; broadcast with incorporation; kg AI", "Glyphosate; unspec. appl. method; kg AI", "Glyphosate; chiseled or injected/knifed in; kg AI".
Exchange "Imazethapyr-soil agricultural" is the result of combining the following original LCA Commons flows: "Imazethapyr; in irrigation water; kg AI", "Imazethapyr; unspec. appl. method; kg AI", "Imazethapyr; broadcast without incorporation; kg AI", "Imazethapyr; broadcast with incorporation; kg AI", "Imazethapyr; foliar or directed spray; kg AI", "Imazethapyr; chiseled or injected/knifed in; kg AI".
Exchange "Carbon-soil agricultural" is the result of combining the following original LCA Commons flows: "Carbon; applied in dolomite", "Carbon; in above-ground residue left on field; biogenic", "Carbon; in below-ground residue; biogenic", "Carbon; applied in limestone", "Carbon; applied in sewage sludge".
Exchange "Particulates, < 2.5 um-air low population density" is the result of combining the following original LCA Commons flows: "PM2.5; from residue burning; kg except C, biogenic", "PM2.5; from residue burning; kg C, biogenic".
Exchange "Pesticides, unspecified-soil agricultural" is the result of combining the following original LCA Commons flows: "Unspecified pesticide; in irrigation water; kg AI", "Unspecified pesticide; unspec. appl. method; kg AI", "Unspecified pesticide; broadcast with incorporation; kg AI", "Unspecified pesticide; chiseled or injected/knifed in; kg AI", "Unspecified pesticide; foliar or directed spray; kg AI", "Unspecified pesticide; broadcast without incorporation; kg AI".
Exchange "Sethoxydim-soil agricultural" is the result of combining the following original LCA Commons flows: "Sethoxydim; foliar or directed spray; kg AI", "Sethoxydim; chiseled or injected/knifed in; kg AI", "Sethoxydim; broadcast without incorporation; kg AI", "Sethoxydim; broadcast with incorporation; kg AI", "Sethoxydim; in irrigation water; kg AI", "Sethoxydim; unspec. appl. method; kg AI".
Exchange "Ash-soil agricultural" is the result of combining the following original LCA Commons flows: "Ash; from residue burning; kg except C, biogenic", "Ash; from residue burning; kg C, biogenic".
Exchange "Trifluralin-soil agricultural" is the result of combining the following original LCA Commons flows: "Trifluralin; in irrigation water; kg AI", "Trifluralin; unspec. appl. method; kg AI", "Trifluralin; foliar or directed spray; kg AI", "Trifluralin; chiseled or injected/knifed in; kg AI", "Trifluralin; broadcast with incorporation; kg AI", "Trifluralin; broadcast without incorporation; kg AI".
Exchange "Water-soil agricultural" is the result of combining the following original LCA Commons flows: "Water; in below-ground residue; biogenic", "Water; in above-ground residue left on field; biogenic", "Water; from irrigation and applied with manure and sewage sludge".
Exchange "Pendimethalin-soil agricultural" is the result of combining the following original LCA Commons flows: "Pendimethalin; in irrigation water; kg AI", "Pendimethalin; unspec. appl. method; kg AI", "Pendimethalin; chiseled or injected/knifed in; kg AI", "Pendimethalin; broadcast without incorporation; kg AI", "Pendimethalin; broadcast with incorporation; kg AI", "Pendimethalin; foliar or directed spray; kg AI".
Exchange "Tebuconazole-soil agricultural" is the result of combining the following original LCA Commons flows: "Tebuconazole; in irrigation water; kg AI", "Tebuconazole; chiseled or injected/knifed in; kg AI", "Tebuconazole; broadcast without incorporation; kg AI", "Tebuconazole; broadcast with incorporation; kg AI", "Tebuconazole; foliar or directed spray; kg AI", "Tebuconazole; unspec. appl. method; kg AI".
Exchange "Ethalfluralin-soil agricultural" is the result of combining the following original LCA Commons flows: "Ethalfluralin; broadcast without incorporation; kg AI", "Ethalfluralin; foliar or directed spray; kg AI", "Ethalfluralin; unspec. appl. method; kg AI", "Ethalfluralin; broadcast with incorporation; kg AI", "Ethalfluralin; chiseled or injected/knifed in; kg AI", "Ethalfluralin; in irrigation water; kg AI".
Exchange "Water, unspecified origin-resource in water" is the result of combining the following original LCA Commons flows: "Water; withdrawal from unspec. source, for peanuts, in 2004", "Water; from plant uptake; biogenic".
Exchange "Pyraclostrobin (prop)-soil agricultural" is the result of combining the following original LCA Commons flows: "Pyraclostrobin; in irrigation water; kg AI", "Pyraclostrobin; broadcast without incorporation; kg AI", "Pyraclostrobin; unspec. appl. method; kg AI", "Pyraclostrobin; chiseled or injected/knifed in; kg AI", "Pyraclostrobin; broadcast with incorporation; kg AI", "Pyraclostrobin; foliar or directed spray; kg AI".
Exchange "Particulates, < 10 um-air low population density" is the result of combining the following original LCA Commons flows: "PM10; from residue burning; kg C, biogenic", "PM10; from residue burning; kg except C, biogenic".
Exchange "Azoxystrobin-soil agricultural" is the result of combining the following original LCA Commons flows: "Azoxystrobin; broadcast with incorporation; kg AI", "Azoxystrobin; foliar or directed spray; kg AI", "Azoxystrobin; in irrigation water; kg AI", "Azoxystrobin; chiseled or injected/knifed in; kg AI", "Azoxystrobin; unspec. appl. method; kg AI", "Azoxystrobin; broadcast without incorporation; kg AI".
Exchange "Transformation, from arable-resource land" is the result of combining the following original LCA Commons flows: "Transformation; from arable, from small grains to peanuts", "Transformation; from arable, from other to peanuts", "Transformation; from arable, from unspec. use to peanuts", "Transformation; from arable, from cotton to peanuts".
Exchange "Calcium-soil agricultural" is the result of combining the following original LCA Commons flows: "Calcium; applied in dolomite", "Calcium; applied in limestone".
Exchange "Propiconazole-soil agricultural" is the result of combining the following original LCA Commons flows: "Propiconazole; chiseled or injected/knifed in; kg AI", "Propiconazole; unspec. appl. method; kg AI", "Propiconazole; foliar or directed spray; kg AI", "Propiconazole; broadcast without incorporation; kg AI", "Propiconazole; broadcast with incorporation; kg AI", "Propiconazole; in irrigation water; kg AI".
Exchange "Isoprene-2bdf9967-6dae-4183-88d1-8f612548c51e low population density" was originally named: "Isoprene; from residue burning; kg C, biogenic" in this dataset.
Exchange "Water-2bdf9967-6dae-4183-88d1-8f612548c51e low population density" was originally named: "Water; from residue burning; biogenic" in this dataset.
Exchange "Toluene-2bdf9967-6dae-4183-88d1-8f612548c51e low population density" was originally named: "Toluene; from residue burning; kg C, biogenic" in this dataset.
Exchange "Acrylonitrile-2bdf9967-6dae-4183-88d1-8f612548c51e low population density" was originally named: "Propenenitrile; from residue burning; kg C, biogenic" in this dataset.
Exchange "Ammonia-2bdf9967-6dae-4183-88d1-8f612548c51e low population density" was originally named: "Ammonia; from residue burning; kg N, biogenic" in this dataset.
Exchange "isopentane-2bdf9967-6dae-4183-88d1-8f612548c51e low population density" was originally named: "I pentane; from residue burning; kg C, biogenic" in this dataset.
Exchange "Acetone-2bdf9967-6dae-4183-88d1-8f612548c51e low population density" was originally named: "Acetone; from residue burning; kg C, biogenic" in this dataset.
Exchange "Furan-2bdf9967-6dae-4183-88d1-8f612548c51e low population density" was originally named: "Furan; from residue burning; kg C, biogenic" in this dataset.
Exchange "Benzene-2bdf9967-6dae-4183-88d1-8f612548c51e low population density" was originally named: "Benzene; from residue burning; kg C, biogenic" in this dataset.
Exchange "Sulfuric acid-be1c0329-f1a8-4524-8420-a86d2a8dd358 agricultural" was originally named: "Sulfuric acid; as secondary application" in this dataset.
Exchange "Carbon dioxide, in air-2bdf9967-6dae-4183-88d1-8f612548c51e low population density" was originally named: "Carbon dioxide; from residue burning; kg C, biogenic" in this dataset.
Exchange "Acetaldehyde-2bdf9967-6dae-4183-88d1-8f612548c51e low population density" was originally named: "Acetaldehyde; from residue burning; kg C, biogenic" in this dataset.
Exchange "Hydrocyanic acid-2bdf9967-6dae-4183-88d1-8f612548c51e low population density" was originally named: "Hydrogen cyanide; from residue burning; kg C, biogenic" in this dataset.
Exchange "Dinitrogen monoxide-2bdf9967-6dae-4183-88d1-8f612548c51e low population density" was originally named: "Dinitrogen monoxide; from residue burning; kg N, biogenic" in this dataset.
Exchange "isobutene-2bdf9967-6dae-4183-88d1-8f612548c51e low population density" was originally named: "I butene; from residue burning; kg C, biogenic" in this dataset.
Exchange "Phosphorus-c19fb2d9-98eb-4cd3-8761-81b71d8a9a1b unspecified" was originally named: "Phosphorous; from plant uptake; biogenic" in this dataset.
Exchange "Carbon monoxide, fossil-2bdf9967-6dae-4183-88d1-8f612548c51e low population density" was originally named: "Carbon monoxide; from residue burning; kg C, biogenic" in this dataset.
Exchange "cis-2-Butene-2bdf9967-6dae-4183-88d1-8f612548c51e low population density" was originally named: "Cis 2 butene; from residue burning; kg C, biogenic" in this dataset.
Exchange "Acetonitrile-2bdf9967-6dae-4183-88d1-8f612548c51e low population density" was originally named: "Acetonitrile; from residue burning; kg C, biogenic" in this dataset.
Exchange "Water, ground-c19fb2d9-98eb-4cd3-8761-81b71d8a9a1b in water" was originally named: "Water; withdrawal from groundwater, for peanuts, in 2004" in this dataset.
Exchange "Ethene-2bdf9967-6dae-4183-88d1-8f612548c51e low population density" was originally named: "Ethylene; from residue burning; kg C, biogenic" in this dataset.
Exchange "Acetic acid-2bdf9967-6dae-4183-88d1-8f612548c51e low population density" was originally named: "Acetic acid; from residue burning; kg C, biogenic" in this dataset.
Exchange "Phenol-2bdf9967-6dae-4183-88d1-8f612548c51e low population density" was originally named: "Phenol; from residue burning; kg C, biogenic" in this dataset.
Exchange "Propene-2bdf9967-6dae-4183-88d1-8f612548c51e low population density" was originally named: "Propylene; from residue burning; kg C, biogenic" in this dataset.
Exchange "Ethyne-2bdf9967-6dae-4183-88d1-8f612548c51e low population density" was originally named: "Acetylene; from residue burning; kg C, biogenic" in this dataset.
Exchange "Nitrogen dioxide-2bdf9967-6dae-4183-88d1-8f612548c51e low population density" was originally named: "Nitrogen dioxide; from residue burning; kg N, biogenic" in this dataset.
Exchange "Zinc compounds-be1c0329-f1a8-4524-8420-a86d2a8dd358 agricultural" was originally named: "Zinc compounds; as secondary application" in this dataset.
Exchange "Formaldehyde-2bdf9967-6dae-4183-88d1-8f612548c51e low population density" was originally named: "Formaldehyde; from residue burning; kg C, biogenic" in this dataset.
Exchange "Occupation, arable-c19fb2d9-98eb-4cd3-8761-81b71d8a9a1b land" was originally named: "Occupation; arable, as peanuts" in this dataset.
Exchange "Methanol-2bdf9967-6dae-4183-88d1-8f612548c51e low population density" was originally named: "Methanol; from residue burning; kg C, biogenic" in this dataset.
Exchange "Magnesium-be1c0329-f1a8-4524-8420-a86d2a8dd358 agricultural" was originally named: "Magnesium; applied in dolomite" in this dataset.
Exchange "Butane-2bdf9967-6dae-4183-88d1-8f612548c51e low population density" was originally named: "N butane; from residue burning; kg C, biogenic" in this dataset.
Exchange "Ethane-2bdf9967-6dae-4183-88d1-8f612548c51e low population density" was originally named: "Ethane; from residue burning; kg C, biogenic" in this dataset.
Exchange "Formic acid-2bdf9967-6dae-4183-88d1-8f612548c51e low population density" was originally named: "Formic acid; from residue burning; kg C, biogenic" in this dataset.
Exchange "Sulfur-be1c0329-f1a8-4524-8420-a86d2a8dd358 agricultural" was originally named: "Sulfur; as secondary application" in this dataset.
Exchange "Methane-2bdf9967-6dae-4183-88d1-8f612548c51e low population density" was originally named: "Methane; from residue burning; kg C, biogenic" in this dataset.
Exchange "Butadiene-2bdf9967-6dae-4183-88d1-8f612548c51e low population density" was originally named: "1,3 butadiene; from residue burning; kg C, biogenic" in this dataset.
Exchange "Carbon dioxide-c19fb2d9-98eb-4cd3-8761-81b71d8a9a1b unspecified" was originally named: "Carbon dioxide; from plant uptake; kg C, biogenic" in this dataset.
Exchange "Pentane-2bdf9967-6dae-4183-88d1-8f612548c51e low population density" was originally named: "N pentane; from residue burning; kg C, biogenic" in this dataset.
Exchange "Transformation, to arable-c19fb2d9-98eb-4cd3-8761-81b71d8a9a1b land" was originally named: "Transformation; to arable, to peanuts" in this dataset.
Exchange "Propane-2bdf9967-6dae-4183-88d1-8f612548c51e low population density" was originally named: "Propane; from residue burning; kg C, biogenic" in this dataset.
Exchange "1-Butene-2bdf9967-6dae-4183-88d1-8f612548c51e low population density" was originally named: "1 butene; from residue burning; kg C, biogenic" in this dataset.
Exchange "trans-2-Butene-2bdf9967-6dae-4183-88d1-8f612548c51e low population density" was originally named: "Trans 2 butene; from residue burning; kg C, biogenic" in this dataset.

## Geography
The unit process is assumed to represent production in Texas (US State).

## Technology
This process produces peanuts; at harvest in 2004; at farm; 90%-95% moisture. The process is assumed to represent production in Texas (US State). Yields and related inputs and outputs represent a single year of operation, in 2004. This dataset includes consideration of residue burning; soil preparation; planting or sowing; irrigation; application, storage, and transport of fertilizers, manures, liming materials, secondary materials, and pesticides; and harvest. Fate and transport of applications are not included as described in Cooper, J.S., Kahn, E., Noon, M. (2012) LCA Digital Commons Unit Process Data: field crop production Version 1 which is available at https://www.lcacommons.gov/discovery/docs/LCA%20Digital%20Commons%20Unit%20Process%20Data%20final%20updated.pdf

## Time period
Start and end dates match the underlying data obtained from the USDA Agricultural Resource Management Survey (ARMS).
## Parameters
- p1180: 6.4492e-8; = p1176*p1179/p0818
- p1693: 0
- p1629: 0
- p0127: 11.143
- p3069: 4.51361e-9; = p2288*p1023
- p2435: 1.38703e-6; = p2239*p1014
- p2950: 0.000121256; = p2364*(p1020+p1022)
- p2102: 0.922577
- p1883: 0
- p2711: 1.87048e-6; = p2320*(p1019+p1021)
- p2454: 6.82003e-5; = p2258*p1073
- p1510: 10
- p2652: 0.000236087; = p2261*(p1078+p1080)
- p2307: 0.000163106; = p2227*p2214
- p2542: 0; = p2346*p1073
- p0500: 0; = SQRT(2)*(IF((2*p0368-1)<0;-1;IF((2*p0368-1)>0;1;0))*SQRT(SQRT((2/(pi()*0.140012289)+LN(1-(2*p0368-1)^2)/2)^2-LN(1-(2*p0368-1)^2)/0.140012289)-(2/(pi()*0.140012289)+LN(1-(2*p0368-1)^2)/2)))
- p2291: 2.77049e-6; = p2223*p2198
- p3903: 5.19068e-7; = p1760*p3478
- p0381: 0.5
- p3170: 0; = p2389*p1132
- p3243: 2.80407e-10; = p3234*p1188*p3239/p0818
- p1230: 0.5
- p1040: 0.0254495
- p1904: 0
- p0352: 0.5
- p4079: 6.22881e-6; = p1936*p3478
- p0914: 1.74613e7; = p0825*p0911+(p0830+p0895)*p0824*p0913
- p1634: 0
- p1931: 0
- p1201: 0.65
- p3064: 1.62163e-9; = p2283*p1023
- p1717: 0
- p2523: 1.18718e-5; = p2327*p1014
- p2087: 0.856281
- p2488: 1.88827e-6; = p2292*p1014
- p0748: 42.846; = p0088*(1+p0616*p0220/100)
- p3214: 0.376406; = p1222*40.078/100.0869
- p3240: 2.53282e-9; = p3234*p1188*p3235/p0818
- p1130: 0; = if(p1121=0;IF(p1123+p1128+p1129=1;0;IF(p1123+p1128+p1129+p1126>1;1-(p1123+p1128+p1129);p1126));0)
- p2873: 0.000449146; = p2287*(p1020+p1022)
- p0815: 0
- p0869: 0.03485; = IF(p0858+p0864+p0865+p0866+p0867+p0868=1;0;1-(p0858+p0864+p0865+p0866+p0867+p0868))
- p2663: 0; = p2272*(p1128+p1130)
- p2552: 3.42536e-5; = p2356*p1014
- p2551: 0.00021456; = p2355*p1014
- p3686: 0; = p1955*p3476
- p2479: 5.02706e-5; = p2283*p1014
- p1650: 0
- p2149: 3.31651e-8; = p2015*p2077*p2111/(p0818*1000)
- p3270: 0
- p1640: 0
- p1682: 0
- p2869: 3.4591e-5; = p2283*(p1020+p1022)
- p2608: 0; = p2412*p1014
- p3482: 0.0599288; = if(p1328+p1330+p1332+p1334+p1336+p1338+p1340+p1342+p1344=0;0;p1340/(p1328+p1330+p1332+p1334+p1336+p1338+p1340+p1342+p1344))
- p2065: 0.0758824
- p1739: 0
- p1600: 0
- p1140: 7.93557e-5; = if(p1121=0;p1134*p0001/(p0818*p0002);0)
- p0377: 0.5
- p0832: 1.10698e8; = p0831*p0830/(1-p0831)
- p4458: 1.51148e-6; = p1903*p3480
- p1197: 1.806
- p1271: 0; = IF(p1267+p1270=p1259;0;IF(p1267+p1270+p1269>p1259;p1259-(p1267+p1270);p1269))
- p2997: 0; = p2411*(p1020+p1022)
- p5139: 2.11174e-7; = p1760*p3484
- p3246: 1; = IF(p3244+p3245=1;0;1-(p3244+p3245))
- p1300: 0; = IF(p1297=p1265;0;IF(p1297+p1298>p1265;p1265-p1297;p1298))
- p1930: 0
- p0572: 0; = IF(p0308<0.5;-SQRT(p0007*EXP(p0440^2*p0008)-p0007);SQRT(p0007*EXP(p0440^2*p0008)-p0007))
- p0808: 0
- p4514: 5.09785e-6; = p1963*p3480
- p3306: 0; = if(and(p1232=0;p3252<>0);p3252*(p3257*p3277-p3301)/p3305;0)
- p2893: 2.66075e-5; = p2307*(p1079+p1081)
- p3428: 0; = p3371*p1239
- p1852: 0
- p3297: 0; = if(p1273+p1274+p1275+p1276=0;0;p1273/(p1273+p1274+p1275+p1276))
- p1962: 6.4117e-5; = p1960*1000/p0818
- p0851: 0
- p2874: 9.62797e-5; = p2288*(p1020+p1022)
- p2613: 0; = p2417*p1073
- p0180: 38.546
- p2748: 0.000181422; = p2357*(p1019+p1021)
- p2452: 1.87947e-6; = p2256*p1014
- p2444: 3.97749e-5; = p2248*p1014
- p1741: 0
- p2559: 2.17753e-5; = p2363*p1014
- p2388: 7.43177e-5; = p2229*p2217
- p1313: 0; = p1307*p1252/p0818
- p3291: 0
- p1896: 0
- p3479: 0.233825; = if(p1328+p1330+p1332+p1334+p1336+p1338+p1340+p1342+p1344=0;0;p1334/(p1328+p1330+p1332+p1334+p1336+p1338+p1340+p1342+p1344))
- p1863: 0
- p4688: 4.35461e-6; = p1927*p3481
- p2911: 6.83668e-6; = p2325*(p1020+p1022)
- p1665: 0
- p0517: 0; = SQRT(2)*(IF((2*p0385-1)<0;-1;IF((2*p0385-1)>0;1;0))*SQRT(SQRT((2/(pi()*0.140012289)+LN(1-(2*p0385-1)^2)/2)^2-LN(1-(2*p0385-1)^2)/0.140012289)-(2/(pi()*0.140012289)+LN(1-(2*p0385-1)^2)/2)))
- p2886: 0.0011147; = p2300*(p1079+p1081)
- p3337: 0; = IF(or(p3254=0;p1232>0);0;p3272*p3289)
- p1716: 0
- p2783: 0; = p2392*(p1128+p1130)
- p0898: 0.482098
- p2875: 0.000951728; = p2289*(p1020+p1022)
- p2267: 5.06903e-6; = p2226*p2213
- p0516: 0; = SQRT(2)*(IF((2*p0384-1)<0;-1;IF((2*p0384-1)>0;1;0))*SQRT(SQRT((2/(pi()*0.140012289)+LN(1-(2*p0384-1)^2)/2)^2-LN(1-(2*p0384-1)^2)/0.140012289)-(2/(pi()*0.140012289)+LN(1-(2*p0384-1)^2)/2)))
- p2463: 1.71921e-6; = p2267*p1073
- p1567: 0
- p1621: 0
- p2394: 0; = p2234*p2183
- p3155: 1.71648e-8; = p2374*p1023
- p3344: 0; = if(and(p1232=0;p3254<>0);p3254-(p3339+p3340+p3341+p3342+p3343);0)
- p0237: 6.642
- p0864: 0; = IF(p0858=1;0;IF(p0858+p0859>1;1-p0858;p0859))
- p3013: 0; = p2427*(p1079+p1081)
- p2744: 0; = p2353*(p1128+p1130)
- p1554: 0.775367
- p1225: 1.088; = IF(p1221=0;0;p1223+1.2*p1224)
- p0887: 1018.11; = 1000*p0886*p0001*p0003*p0004/(p0818*p0002)
- p0980: 0; = IF(p0977=0;0;p0977*p0001/(p0818*p0002))
- p2651: 2.84342e-5; = p2260*(p1078+p1080)
- p1631: 0
- p3048: 7.55286e-8; = p2267*p1082
- p0478: 0; = SQRT(2)*(IF((2*p0346-1)<0;-1;IF((2*p0346-1)>0;1;0))*SQRT(SQRT((2/(pi()*0.140012289)+LN(1-(2*p0346-1)^2)/2)^2-LN(1-(2*p0346-1)^2)/0.140012289)-(2/(pi()*0.140012289)+LN(1-(2*p0346-1)^2)/2)))
- p2226: 0.0616926; = if(p0774*p0778+p0775*p0779+p0776*p0780+p0777*p0781=0;0;p0778*p0774/(p0774*p0778+p0775*p0779+p0776*p0780+p0777*p0781))
- p0795: 65.404; = p0135*(1+p0663*p0267/100)
- p1599: 0
- p3228: 0.00381733; = p3224*p1229
- p3649: 0; = p1918*p3476
- p3697: 0; = p1760*p3477
- p0957: 0; = if(and(p0683>0;or(p0807=56;p0807=100;and(p0807=60;p0901>0.06)));p0939;0)
- p0821: 1.51412
- p1606: 0
- p2043: 0.636483
- p0775: 61.79; = p0115*(1+p0643*p0247/100)
- p1073: 0.33916; = IF(p1071=0;p0711/100;0)
- p2060: 0.272353
- p0217: 17.876
- p1911: 0
- p1338: 54923.2; = p1324*p0801
- p1124: 0.47934; = if(p1121=0;p0718/100;0)
- p2155: 1.10683e-7; = p2015*p2084*p2117/(p0818*1000)
- p2296: 0.00114064; = p2223*p2203
- p2447: 3.18853e-8; = p2251*p1014
- p3405: 0; = p3367*p1238
- p1959: 410.531; = if(p0738*p0740*p0739>0;p0738*1000*(p0740/100)*p0739/1000;p1958)
- p1199: -0.29
- p2407: 0; = p2234*p2197
- p0729: 0
- p0848: 0
- p0678: 0
- p1694: 0
- p1101: 0.0327715; = IF(p1071=0;IF(p1096=1;0;IF(p1096+p1097>1;1-p1096;p1097));0)
- p2177: 0.123358; = p0895/p0818-(p2173+p2174+p2175+p2176)
- p1043: 0.25306
- p0425: 0; = SQRT(2)*(IF((2*p0293-1)<0;-1;IF((2*p0293-1)>0;1;0))*SQRT(SQRT((2/(pi()*0.140012289)+LN(1-(2*p0293-1)^2)/2)^2-LN(1-(2*p0293-1)^2)/0.140012289)-(2/(pi()*0.140012289)+LN(1-(2*p0293-1)^2)/2)))
- p3022: 1.9581e-10; = p2241*p1023
- p2921: 2.06439e-5; = p2335*(p1020+p1022)
- p3312: 0; = if(and(p1232=0;p3253<>0);p3261*p3277*(p3298*p3290+(1-p3298)*p3294);0)
- p3072: 2.77049e-11; = p2291*p1023
- p2896: 0.000137167; = p2310*(p1079+p1081)
- p0800: 62.139; = p0140*(1+p0668*p0272/100)
- p0940: 0; = if(and(p0683=0;p0946=0);p0934;0)
- p2635: 4.71031e-6; = p2244*(p1019+p1021)
- p1082: 0.0149; = IF(p1071=0;IF(p1073+p1078+p1079+p1080+p1081=1;0;1-(p1073+p1078+p1079+p1080+p1081));0)
- p2353: 0; = p2232*p2221
- p1827: 0
- p1100: 0.382423
- p0837: 0.5
- p3354: 0; = IF((p3350+p3351+p3352+p3353)+IF(p3349=0;0;(p3256*(p3273*(1-p3277))/p3349))>p3256;p3256-(p3350+p3351+p3352+p3353);IF(p3349=0;0;p3256*(p3273*(1-p3277))/p3349))
- p3353: 0; = if(and(p1232=0;p3256<>0);p3256*(p3276-p3348)/p3349;0)
- p2876: 3.60055e-7; = p2290*(p1020+p1022)
- p2314: 0.00187915; = p2231*p2221
- p0713: 16.313; = p0053*(1+p0581*p0185/100)
- p3315: 0; = if(and(p1232=0;p3253<>0);p3264*p3289;0)
- p2071: 0.151
- p1025: 77250.3; = IF(p1012=0;p1019*(p0704/100)*p0703*1000;0)
- p1314: 0; = p1310*p1252/p0818
- p1089: 6.98399e-5; = IF(p1071=0;p1083*p0001/(p0818*p0002);0)
- p0448: 0; = SQRT(2)*(IF((2*p0316-1)<0;-1;IF((2*p0316-1)>0;1;0))*SQRT(SQRT((2/(pi()*0.140012289)+LN(1-(2*p0316-1)^2)/2)^2-LN(1-(2*p0316-1)^2)/0.140012289)-(2/(pi()*0.140012289)+LN(1-(2*p0316-1)^2)/2)))
- p0819: 0; = p0808*p0809/p0818
- p0936: 4.18382e-5; = p0930*p0001/(p0818*p0002)
- p0720: 0
- p0370: 0.5
- p2398: 0; = p2234*p2187
- p2008: 0.0607076; = ((p1982*p1985+p1988*p1991+p1994*p1997+p2002*p2005)/p0818)*p0005*p0002/1000
- p0732: 0
- p3216: 0.06; = IF(OR(p1226=0;p1228=0);0;1-p3213-p3214-p3215)
- p2367: 0.00671418; = p2225*p2196
- p0714: 0
- p3057: 2.09526e-8; = p2276*p1023
- p1006: 0; = p1002*p0001*p0004/(p0818*p0002)
- p0738: 240; = p0078*(1+p0606*p0210/100)
- p2429: 0; = p2236*p2219
- p1688: 0
- p0215: 48.642
- p0680: 162.453; = p0020*(1+p0548*p0152/100)
- p1677: 0
- p0670: 0
- p2276: 0.00209526; = p2223*p2182
- p1901: 0
- p1160: 0.055031; = (p1156+p1158)*p1159
- p1851: 0
- p2510: 0.000698857; = p2314*p1123
- p1136: 0; = if(p1121=0;p1130*(p0716/100)*p0703*1000;0)
- p1727: 0
- p2418: 0; = p2235*p2208
- p2475: 7.84032e-5; = p2279*p1014
- p2992: 0; = p2406*(p1020+p1022)
- p3273: 0
- p3201: 0; = p2420*p1082
- p1898: 0
- p1224: 0.44; = IF(p1221=0;0;IF(p1193=0;1-p1223;0))
- p3236: 0.0140975
- p2308: 0.000615511; = p2227*p2215
- p0812: 0; = if(p0807=480;0.095/0.34;0)
- p3374: 0; = if(p1232=0;p3246*p3356/p0818;0)
- p2412: 0; = p2234*p2202
- p0394: 0.5
- p1328: 0; = p1319*p0801
- p2009: 0.0292821; = ((p1983*p1985+p1989*p1991+p1995*p1997+p2003*p2005+p1976*p1977+p1978*p1979+p1998*p1999)/p0818)*p0005*p0002/1000
- p1746: 0
- p2330: 2.35066e-7; = p2224*p2198
- p0935: 0; = p0929*p0001/(p0818*p0002)
- p2831: 2.41268e-6; = p2245*(p1020+p1022)
- p2529: 1.81832e-5; = p2333*p1014
- p3010: 0; = p2424*(p1079+p1081)
- p3171: 0; = p2390*p1132
- p2703: 0.00581803; = p2312*(p1128+p1130)
- p3112: 5.16816e-12; = p2331*p1023
- p2520: 1.22774e-6; = p2324*p1014
- p1279: 0
- p1948: 0
- p1697: 0
- p0611: 0; = IF(p0347<0.5;-SQRT(p0007*EXP(p0479^2*p0008)-p0007);SQRT(p0007*EXP(p0479^2*p0008)-p0007))
- p1800: 0
- p0690: 0
- p2027: 0.428799
- p0358: 0.5
- p2145: 2.99892e-7; = p2015*p2073*p2107/(p0818*1000)
- p1047: 0.330448; = IF(p1012=0;IF(p1037+p1044+p1045+p1046=1;0;IF(p1037+p1044+p1045+p1046+p1041>1;1-(p1037+p1044+p1045+p1046);p1041));0)
- p1622: 0
- p1240: 0; = if(p1232>0;0;IF(p1234+p1238+p1239=1;0;IF(p1234+p1238+p1239+p1237>1;1-(p1234+p1238+p1239);p1237)))
- p0103: 240
- p2532: 0; = p2336*p1073
- p3412: 0; = p3374*p1238
- p0705: 31; = p0045*(1+p0573*p0177/100)
- p2562: 0.00021056; = p2366*p1014
- p1605: 0
- p3473: 0; = p3378*p1241
- p2439: 1.1176e-5; = p2243*p1014
- p1985: 3.93823e7; = (if(p1057=0;0;p1050/p1057)+if(p1058=0;0;p1051/p1058)+if(p1059=0;0;p1052/p1059)+if(p1060=0;0;p1053/p1060)+if(p1061=0;0;p1054/p1061)+if(p1062=0;0;p1055/p1062)+if(p1063=0;0;p1056/p1063))*(1+p1157)
- p1801: 0
- p3364: 0; = if(p1232=0;p3244*p3358/p0818;0)
- p2191: 0.000123726; = 8*1.00794*p2189/(2*14.0067)
- p1965: 0.000565944; = p1963+p1959*p1964*1000/p0818
- p3190: 0; = p2409*p1023
- p3402: 0; = p3364*p1238
- p1045: 0.0504301; = IF(p1012=0;IF(p1037+p1044=1;0;IF(p1037+p1044+p1039>1;1-(p1037+p1044);p1039));0)
- p2570: 0.00053211; = p2374*p1014
- p2122: 0.341195
- p3005: 0; = p2419*(p1079+p1081)
- p0375: 0.5
- p2270: 6.71363e-6; = p2226*p2216
- p3220: 0.00576532; = p3216*p1228
- p0687: 18.387; = p0027*(1+p0555*p0159/100)
- p2323: 1.57489e-5; = p2224*p2190
- p2820: 0; = p2429*(p1128+p1130)
- p0376: 0.5
- p1337: 9.72334e-6; = p1336*p0001/(p0818*p0002)
- p3087: 1.05546e-6; = p2306*p1082
- p0272: 13.669
- p3339: 0; = if(and(p1232=0;p3254<>0);p3254*(p3269*p3277-p3334)/p3338;0)
- p0439: 0; = SQRT(2)*(IF((2*p0307-1)<0;-1;IF((2*p0307-1)>0;1;0))*SQRT(SQRT((2/(pi()*0.140012289)+LN(1-(2*p0307-1)^2)/2)^2-LN(1-(2*p0307-1)^2)/0.140012289)-(2/(pi()*0.140012289)+LN(1-(2*p0307-1)^2)/2)))
- p0514: 0; = SQRT(2)*(IF((2*p0382-1)<0;-1;IF((2*p0382-1)>0;1;0))*SQRT(SQRT((2/(pi()*0.140012289)+LN(1-(2*p0382-1)^2)/2)^2-LN(1-(2*p0382-1)^2)/0.140012289)-(2/(pi()*0.140012289)+LN(1-(2*p0382-1)^2)/2)))
- p3360: 0; = if(p1232=0;p3310+p3321+p3332+p3343+p3354;0)
- p1290: 0; = IF(p1287=p1264;0;IF(p1287+p1288>p1264;p1264-p1287;p1288))
- p2084: 0.21
- p2074: 0.025
- p2924: 0; = p2338*(p1079+p1081)
- p2213: 8.2166e-5; = p1116-p2212
- p2506: 0.00028518; = p2310*p1073
- p1811: 0
- p0617: 0; = IF(p0353<0.5;-SQRT(p0007*EXP(p0485^2*p0008)-p0007);SQRT(p0007*EXP(p0485^2*p0008)-p0007))
- p1841: 0
- p2354: 0.00315304; = p2225*p2182
- p1712: 0
- p1651: 0.299611
- p2346: 0; = p2228*p2214
- p3432: 0; = p3375*p1239
- p2377: 7.27397e-5; = p2229*p2206
- p2253: 3.71171e-7; = p2222*p2199
- p1644: 0
- p2694: 0.000179427; = p2303*(p1078+p1080)
- p3333: 0; = if(and(p1232=0;p3255<>0);p3255-(p3328+p3329+p3330+p3331+p3332);0)
- p3167: 8.10587e-7; = p2386*p1082
- p1316: 0; = p1312*p1252/p0818
- p0884: 0; = IF(p0689=100;0;IF(p0689+p0688>100;100-p0689;p0688))
- p2752: 0.000116324; = p2361*(p1019+p1021)
- p2446: 8.42818e-5; = p2250*p1014
- p2755: 0.000270969; = p2364*(p1019+p1021)
- p0169: 4.08
- p2664: 0; = p2273*(p1128+p1130)
- p2219: 0.0121376; = p1154-p2218
- p0299: 0.5
- p0745: 519.516; = p0085*(1+p0613*p0217/100)
- p1608: 0
- p0784: 67.535; = p0124*(1+p0652*p0256/100)
- p0679: 0
- p1002: 0; = p0996*p0888
- p0090: 1.686
- p2883: 0.0004584; = p2297*(p1079+p1081)
- p1685: 0
- p1105: 0.436421
- p2266: 4.84758e-7; = p2226*p2212
- p3892: 0; = p1955*p3477
- p5091: 0; = p1918*p3483
- p2076: 0.057
- p3472: 0; = p3377*p1241
- p3219: 0.0433159; = p3215*p1228
- p0476: 0; = SQRT(2)*(IF((2*p0344-1)<0;-1;IF((2*p0344-1)>0;1;0))*SQRT(SQRT((2/(pi()*0.140012289)+LN(1-(2*p0344-1)^2)/2)^2-LN(1-(2*p0344-1)^2)/0.140012289)-(2/(pi()*0.140012289)+LN(1-(2*p0344-1)^2)/2)))
- p3081: 0.000101815; = p2300*p1082
- p2007: 0.0323774; = ((p1981*p1985+p1987*p1991+p1993*p1997+p2001*p2005)/p0818)*p0005*p0002/1000
- p1752: 0
- p0769: 8.553; = p0109*(1+p0637*p0241/100)
- p0056: 62.139
- p2160: 6.45383e-8; = p2015*p2084*p2122/(p0818*1000)
- p1664: 0
- p0760: 0
- p0541: 0; = IF(p0277<0.5;-SQRT(p0007*EXP(p0409^2*p0008)-p0007);SQRT(p0007*EXP(p0409^2*p0008)-p0007))
- p1661: 0
- p0557: 0; = IF(p0293<0.5;-SQRT(p0007*EXP(p0425^2*p0008)-p0007);SQRT(p0007*EXP(p0425^2*p0008)-p0007))
- p2406: 0; = p2234*p2196
- p0854: 105596; = p0801*((1-p0853)*p0846+p0853*p0852)
- p2530: 2.61697e-6; = p2334*p1014
- p2561: 0.000982267; = p2365*p1014
- p1191: 0.5
- p0820: 0; = if(p0807=480;p0814;0)
- p1826: 0
- p1647: 0
- p1763: 0
- p2936: 0; = p2350*(p1129+p1131)
- p1820: 0
- p2693: 0.000415564; = p2302*(p1078+p1080)
- p1293: 0; = p1287*p1252/p0818
- p1247: 0; = if(p1232>0;0;p1242*p0001/(p0818*p0002))
- p0686: 208.535; = p0026*(1+p0554*p0158/100)
- p3381: 0; = p3362*p1234
- p2362: 0.000279325; = p2225*p2190
- p2951: 0.000675895; = p2365*(p1020+p1022)
- p2360: 0.000890318; = p2225*p2188
- p2302: 0.000860719; = p2227*p2209
- p3086: 1.00935e-7; = p2305*p1082
- p3078: 4.18695e-5; = p2297*p1082
- p2311: 0.00861305; = p2231*p2218
- p3040: 2.70982e-6; = p2259*p1082
- p1889: 0
- p3325: 0; = if(and(p1232=0;p3255<>0);p3267*p3289;0)
- p2333: 5.86553e-5; = p2224*p2201
- p2988: 0; = p2402*(p1020+p1022)
- p0189: 51.753
- p0948: 0; = if(and(p0683=0;or(p0807=480;p0807=32;p0807=1;and(p0807=60;p0901<0.03)));p0936;0)
- p2306: 7.08361e-5; = p2227*p2213
- p0995: 0; = p0991*p0001*p0004/(p0818*p0002)
- p3209: 0; = p2428*p1132
- p1345: 0.000100528; = IF(p1318=0;p1344*p0001/(p0818*p0002);0)
- p1776: 0
- p0648: 0; = IF(p0384<0.5;-SQRT(p0007*EXP(p0516^2*p0008)-p0007);SQRT(p0007*EXP(p0516^2*p0008)-p0007))
- p1574: 0
- p3207: 0; = p2426*p1082
- p2024: 0.748682
- p0889: 0; = 1000*p0888*p0001*p0003*p0004/(p0818*p0002)
- p1952: 0
- p2946: 0.000189914; = p2360*(p1020+p1022)
- p0122: 62.139
- p2373: 0.000149725; = p2225*p2202
- p0410: 0; = SQRT(2)*(IF((2*p0278-1)<0;-1;IF((2*p0278-1)>0;1;0))*SQRT(SQRT((2/(pi()*0.140012289)+LN(1-(2*p0278-1)^2)/2)^2-LN(1-(2*p0278-1)^2)/0.140012289)-(2/(pi()*0.140012289)+LN(1-(2*p0278-1)^2)/2)))
- p3916: 1.40148e-5; = p1773*p3478
- p0789: 0
- p3378: 0; = if(p1232=0;p3246*p3360/p0818;0)
- p1923: 0
- p2870: 3.9594e-5; = p2284*(p1020+p1022)
- p1941: 0
- p2340: 0; = p2228*p2208
- p2101: 0.620397
- p2740: 0; = p2349*(p1078+p1080)
- p1836: 0
- p0119: 78.089
- p1890: 0
- p1815: 0
- p0960: 4.18382e-5; = if(and(p0683>0;or(p0807=480;p0807=32;p0807=1;and(p0807=60;p0901<0.03)));p0936;0)
- p0782: 62.139; = p0122*(1+p0650*p0254/100)
- p3689: 0; = p1962*p3476
- p0906: 0.0035023
- p0386: 0.5
- p0805: 0
- p0092: 6.155
- p1066: 0.00254254; = IF(p1012=0;p1052/(p1059*p0818);0)
- p0047: 9.908
- p3411: 0; = p3373*p1238
- p3299: 0; = if(p1303+p1304+p1305+p1306=0;0;p1303/(p1303+p1304+p1305+p1306))
- p4419: 2.04254e-8; = p1864*p3480
- p1902: 0
- p2796: 0; = p2405*(p1019+p1021)
- p0787: 11.143; = p0127*(1+p0655*p0259/100)
- p2225: 0.567732; = if(p0765*p0769+p0766*p0770+p0767*p0771+p0768*p0772=0;0;p0772*p0768/(p0765*p0769+p0766*p0770+p0767*p0771+p0768*p0772))
- p1972: 0; = if(p0807=480;p1967*p0001/(p0818*p0002);0)
- p0441: 0; = SQRT(2)*(IF((2*p0309-1)<0;-1;IF((2*p0309-1)>0;1;0))*SQRT(SQRT((2/(pi()*0.140012289)+LN(1-(2*p0309-1)^2)/2)^2-LN(1-(2*p0309-1)^2)/0.140012289)-(2/(pi()*0.140012289)+LN(1-(2*p0309-1)^2)/2)))
- p0813: 0; = if(p0807=480;1.56521739130435;0)
- p2329: 1.43216e-7; = p2224*p2197
- p1932: 0
- p2964: 9.85228e-5; = p2378*(p1079+p1081)
- p3423: 0; = p3366*p1239
- p2072: 0.134
- p2660: 2.12658e-5; = p2269*(p1078+p1080)
- p0224: 14
- p0927: 0.166075; = IF(p0918+p0923+p0924+p0925+p0926=1;0;1-(p0918+p0923+p0924+p0925+p0926))
- p3324: 0; = if(and(p1232=0;p3255<>0);p3266*(p3279*(p3284*p1256+p3286*(p1253+p1257)+p1258*p3288+p3299*p3287));0)
- p1921: 0
- p2674: 7.72999e-5; = p2283*(p1019+p1021)
- p0242: 13.762
- p1127: 0; = if(p1121=0;p0721/100;0)
- p0312: 0.5
- p0945: 0; = if(and(p0683=0;p0951=0);p0939;0)
- p0043: 240
- p0035: 18.645
- p2599: 0; = p2403*p1014
- p0481: 0; = SQRT(2)*(IF((2*p0349-1)<0;-1;IF((2*p0349-1)>0;1;0))*SQRT(SQRT((2/(pi()*0.140012289)+LN(1-(2*p0349-1)^2)/2)^2-LN(1-(2*p0349-1)^2)/0.140012289)-(2/(pi()*0.140012289)+LN(1-(2*p0349-1)^2)/2)))
- p2470: 0; = p2274*p1123
- p0740: 95.136; = p0080*(1+p0608*p0212/100)
- p2549: 0; = p2353*p1123
- p1087: 0; = IF(p1071=0;p1081*(p0710/100)*p0703*1000;0)
- p1204: 0.980791
- p2516: 1.21643e-6; = p2320*p1014
- p1996: 30
- p0378: 0.5
- p0835: 446.789; = -LN(1-p0669/100)/p0834
- p3303: 0; = if(and(p1232=0;p3252<>0);p3259*p3289;0)
- p2334: 8.44183e-6; = p2224*p2202
- p3061: 3.21339e-9; = p2280*p1023
- p3475: 0; = p3380*p1241
- p2035: 2.96618e-6; = p2015*p2029*(1-p2031)/(p0818*1000)
- p0323: 0.5
- p2837: 2.19401e-8; = p2251*(p1020+p1022)
- p1864: 1.24425e-6; = p1456*1000/p0818
- p1939: 0
- p2726: 4.61326e-5; = p2335*(p1019+p1021)
- p1149: 0.830148
- p2827: 4.17682e-6; = p2241*(p1020+p1022)
- p1158: 0.0196502; = p1156*p1157
- p2235: 0; = 1-(p2226+p2227+p2228+p2229)
- p2762: 0.00115669; = p2371*(p1019+p1021)
- p3382: 0; = p3363*p1234
- p0246: 7.83
- p1054: 4.48558e6; = IF(p1012=0;p1047*p1036;0)
- p5109: 0; = p1936*p3483
- p0796: 86.477; = p0136*(1+p0664*p0268/100)
- p2261: 0.000488986; = p2226*p2207
- p1093: 0; = IF(p1071=0;p1087*p0001/(p0818*p0002);0)
- p1733: 0
- p1575: 0
- p2403: 0; = p2234*p2192
- p1927: 4.23043e-5; = p1519*1000/p0818
- p2499: 0.000126042; = p2303*p1073
- p1252: 0; = if(p1232>0;0;p0724*2000*p0723*1000*p0725/100)
- p5037: 0; = p1864*p3483
- p1740: 0
- p1643: 0
- p1256: 0; = if(p1232>0;0;IF(p1253=1;0;IF(p1253+p1254>1;1-p1253;p1254)))
- p3459: 0; = p3364*p1241
- p2758: 0.00320052; = p2367*(p1019+p1021)
- p2586: 0; = p2390*p1123
- p3193: 0; = p2412*p1023
- p0637: 0; = IF(p0373<0.5;-SQRT(p0007*EXP(p0505^2*p0008)-p0007);SQRT(p0007*EXP(p0505^2*p0008)-p0007))
- p2812: 0; = p2421*(p1078+p1080)
- p3030: 2.75039e-10; = p2249*p1023
- p0053: 16.313
- p0344: 0.5
- p0921: 0; = p0679*1000/p0801
- p0581: 0; = IF(p0317<0.5;-SQRT(p0007*EXP(p0449^2*p0008)-p0007);SQRT(p0007*EXP(p0449^2*p0008)-p0007))
- p1909: 0
- p0904: 5.37711e7; = p0825*p0901+(p0830+p0895)*p0824*p0903
- p0920: 0.157037; = p0676*1000/p0801
- p0831: 0.097625; = 1-p0824
- p2140: 1.27582e-7; = p2015*p2068*p2102/(p0818*1000)
- p3342: 0; = if(and(p1232=0;p3254<>0);p3254*(p3272-p3337)/p3338;0)
- p5132: 0; = p1963*p3483
- p2983: 0; = p2397*(p1020+p1022)
- p0682: 240; = p0022*(1+p0550*p0154/100)
- p1046: 0.0254495; = IF(p1012=0;IF(p1037+p1044+p1045=1;0;IF(p1037+p1044+p1045+p1040>1;1-(p1037+p1044+p1045);p1040));0)
- p1770: 0
- p1961: 0.5
- p4720: 3.19659e-5; = p1963*p3481
- p1924: 0
- p3206: 0; = p2425*p1082
- p0641: 0; = IF(p0377<0.5;-SQRT(p0007*EXP(p0509^2*p0008)-p0007);SQRT(p0007*EXP(p0509^2*p0008)-p0007))
- p0267: 7.293
- p1031: 8.57549e-5; = IF(p1012=0;p1025*p0001/(p0818*p0002);0)
- p3208: 0; = p2427*p1082
- p2413: 0; = p2234*p2203
- p2949: 1.49835e-5; = p2363*(p1020+p1022)
- p1331: 0; = p1330*p0001/(p0818*p0002)
- p3009: 0; = p2423*(p1079+p1081)
- p1649: 0
- p1555: 0
- p1075: 0.16313; = IF(p1071=0;p0713/100;0)
- p0987: 0; = if(p0978>0;0;if(and(p0687=0;p0691=0;p0695=0;p0699=0);0;IF(p0982+p0985+p0986=1;0;1-(p0982+p0985+p0986))))
- p0620: 0; = IF(p0356<0.5;-SQRT(p0007*EXP(p0488^2*p0008)-p0007);SQRT(p0007*EXP(p0488^2*p0008)-p0007))
- p2571: 8.42351e-5; = p2375*p1073
- p3792: 0; = p1855*p3477
- p2728: 0; = p2337*(p1078+p1080)
- p1903: 9.20742e-5; = p1495*1000/p0818
- p2348: 0; = p2228*p2216
- p2501: 2.29752e-6; = p2305*p1073
- p3007: 0; = p2421*(p1079+p1081)
- p0050: 77.291
- p3634: 0; = p1903*p3476
- p1866: 0
- p3156: 3.70062e-6; = p2375*p1082
- p0946: 0; = if(and(p0683=0;or(p0807=480;p0807=32;p0807=1;and(p0807=60;p0901<0.03)));p0934;0)
- p1607: 0
- p2287: 0.0021056; = p2223*p2193
- p2205: 0.00294795; = 2*14.0067*p2204/30.973762
- p0078: 240
- p0091: 10.572
- p3056: 0; = p2275*p1132
- p2738: 0; = p2347*(p1078+p1080)
- p0085: 519.516
- p1097: 0.0327715
- p0356: 0.5
- p1258: 0; = if(p1232>0;0;IF(p1253+p1256+p1257=1;0;1-(p1253+p1256+p1257)))
- p0895: 2.04642e8; = p0894*p0830
- p3452: 0; = p3376*p1240
- p0836: 1.16008e7; = p0831*p0835*p0801/(1-p0831)
- p2241: 1.9581e-5; = p2222*p2186
- p2289: 0.00446171; = p2223*p2196
- p2877: 5.90973e-7; = p2291*(p1020+p1022)
- p2625: 0; = p2429*p1123
- p0695: 18.645; = p0035*(1+p0563*p0167/100)
- p1278: 0
- p2508: 0.00451397; = p2312*p1123
- p2786: 0; = p2395*(p1019+p1021)
- p1719: 0
- p3039: 2.99618e-6; = p2258*p1082
- p2109: 0.826583
- p2553: 0.000117985; = p2357*p1014
- p3410: 0; = p3372*p1238
- p2094: 0.922577
- p1780: 0
- p2629: 1.33596e-5; = p2238*(p1019+p1021)
- p2518: 4.26527e-6; = p2322*p1014
- p1021: 0.10447; = IF(p1012=0;IF(p1014+p1019+p1020=1;0;IF(p1014+p1019+p1020+p1017>1;1-(p1014+p1019+p1020);p1017));0)
- p2262: 0.000136204; = p2226*p2208
- p2300: 0.00683322; = p2227*p2207
- p2605: 0; = p2409*p1014
- p2560: 0.00017622; = p2364*p1014
- p4903: 8.94794e-7; = p1936*p3482
- p2075: 0.072
- p2082: 0.285294
- p1680: 0
- p2948: 5.95827e-5; = p2362*(p1020+p1022)
- p3058: 4.59935e-9; = p2277*p1023
- p1193: 0; = IF(OR(p1036=0;p1095=0);0.0001*p0857;0)
- p2197: 4.4741e-6; = p1055/p0818
- p2654: 2.97377e-5; = p2263*(p1078+p1080)
- p2723: 6.52165e-5; = p2332*(p1019+p1021)
- p1963k: 4.87936e-5; = p1744*p1948+p1745*p1949+p1746*p1950+p1747*p1951+p1748*p1952+p1749*p1953+p1750*p1954+p1751*p1955+p1752*p1956+p1753*p1957+p1961*p1962
- p1055: 3595.84; = IF(p1012=0;p1048*p1036;0)
- p1298: 0
- p0419: 0; = SQRT(2)*(IF((2*p0287-1)<0;-1;IF((2*p0287-1)>0;1;0))*SQRT(SQRT((2/(pi()*0.140012289)+LN(1-(2*p0287-1)^2)/2)^2-LN(1-(2*p0287-1)^2)/0.140012289)-(2/(pi()*0.140012289)+LN(1-(2*p0287-1)^2)/2)))
- p0949: 0; = if(and(p0683=0;or(p0807=480;p0807=32;p0807=1;and(p0807=60;p0901<0.03)));p0937;0)
- p2775: 3.02279e-6; = p2384*(p1078+p1080)
- p2059: 1.00168
- p1200: 0.84
- p2500: 0.00165057; = p2304*p1073
- p3282: 0
- p0045: 31
- p1251: 0; = if(p1232>0;0;p1246*p0001/(p0818*p0002))
- p1654: 0
- p1148: 0.111546; = if(p1121=0;IF(p1146=1;0;1-p1146);0)
- p1305: 0; = p1301*p1252/p0818
- p3140: 6.9596e-10; = p2359*p1023
- p0250: 73.341
- p2031: 0.465411
- p2906: 8.37021e-7; = p2320*(p1020+p1022)
- p2763: 0.000495899; = p2372*(p1019+p1021)
- p1552: 0
- p1645: 0
- p2210: 0.000431071; = 6*1.00794*p2208/30.973762
- p1583: 0
- p0910: 0.00559751; = p0909/p0818
- p3198: 0; = p2417*p1082
- p2778: 4.00351e-6; = p2387*(p1078+p1080)
- p3095: 6.4267e-6; = p2314*p1132
- p0128: 83.876
- p1662: 0
- p1784: 0
- p2425: 0; = p2235*p2215
- p3394: 0; = p3375*p1234
- p1908: 0
- p1963a: 1.75178e-5; = p1550*p1754+p1551*p1755+p1552*p1756+p1553*p1757+p1554*p1758+p1555*p1759+p1556*p1760+p1557*p1761+p1558*p1762+p1559*p1763+p1560*p1764+p1561*p1765+p1562*p1766+p1563*p1767+p1564*p1768+p1565*p1769+p1566*p1770+p1567*p1771+p1568*p1772
- p2784: 0; = p2393*(p1019+p1021)
- p0830: 1.02321e9; = p0825*p0821*p0824
- p4483: 2.04254e-8; = p1928*p3480
- p2627: 0; = p2431*p1123
- p2062: 3.76588
- p1022: 0.11423; = IF(p1012=0;IF(p1014+p1019+p1020+p1021=1;0;IF(p1014+p1019+p1020+p1021+p1018>1;1-(p1014+p1019+p1020+p1021);p1018));0)
- p0554: 0; = IF(p0290<0.5;-SQRT(p0007*EXP(p0422^2*p0008)-p0007);SQRT(p0007*EXP(p0422^2*p0008)-p0007))
- p1270: 0; = IF(p1267=p1259;0;IF(p1267+p1268>p1259;p1259-p1267;p1268))
- p2275: 0; = p2230*p2221
- p1188: 43.5224; = p1187*p0801
- p0130: 11.7
- p3417: 0; = p3379*p1238
- p3431: 0; = p3374*p1239
- p1876: 0
- p2905: 5.81577e-6; = p2319*(p1020+p1022)
- p0979: 0; = IF(p0976=0;0;p0976*p0001/(p0818*p0002))
- p0642: 0; = IF(p0378<0.5;-SQRT(p0007*EXP(p0510^2*p0008)-p0007);SQRT(p0007*EXP(p0510^2*p0008)-p0007))
- p0915: 0.0217262; = p0914/p0818
- p2619: 0; = p2423*p1073
- p2143: 1.20804e-7; = p2015*p2071*p2105/(p0818*1000)
- p2091: 0.374844
- p3461: 0; = p3366*p1241
- p0974: 0.5
- p2477: 1.43369e-5; = p2281*p1014
- p1614: 0
- p1987: 400
- p3292: 0
- p2765: 0.000818213; = p2374*(p1019+p1021)
- p1248: 0; = if(p1232>0;0;p1243*p0001/(p0818*p0002))
- p0585: 0; = IF(p0321<0.5;-SQRT(p0007*EXP(p0453^2*p0008)-p0007);SQRT(p0007*EXP(p0453^2*p0008)-p0007))
- p2185: 0.000670379; = p1065-p2184
- p0996: 0; = if(p0888=0;0;if((p0691*p0690*1000*p0692/100)/p0888>1;1;(p0691*p0690*1000*p0692/100)/p0888))
- p2178: 0.0275471; = (p0895*p0831/(1-p0831))/(p0818)
- p3317: 0; = if(and(p1232=0;p3253<>0);p3253*(p3261*p3277-p3312)/p3316;0)
- p0322: 0.5
- p0632: 0; = IF(p0368<0.5;-SQRT(p0007*EXP(p0500^2*p0008)-p0007);SQRT(p0007*EXP(p0500^2*p0008)-p0007))
- p0849: 0
- p2208: 0.00220778; = p1110/p0818
- p3127: 0; = p2346*p1082
- p0555: 0; = IF(p0291<0.5;-SQRT(p0007*EXP(p0423^2*p0008)-p0007);SQRT(p0007*EXP(p0423^2*p0008)-p0007))
- p2731: 0; = p2340*(p1078+p1080)
- p0487: 0; = SQRT(2)*(IF((2*p0355-1)<0;-1;IF((2*p0355-1)>0;1;0))*SQRT(SQRT((2/(pi()*0.140012289)+LN(1-(2*p0355-1)^2)/2)^2-LN(1-(2*p0355-1)^2)/0.140012289)-(2/(pi()*0.140012289)+LN(1-(2*p0355-1)^2)/2)))
- p2943: 8.11848e-5; = p2357*(p1020+p1022)
- p1762: 0
- p1981: 400
- p3347: 0; = if(and(p1232=0;p3256<>0);p3275*p3289;0)
- p1722: 0
- p3481: 0.102935; = if(p1328+p1330+p1332+p1334+p1336+p1338+p1340+p1342+p1344=0;0;p1338/(p1328+p1330+p1332+p1334+p1336+p1338+p1340+p1342+p1344))
- p2737: 0; = p2346*(p1078+p1080)
- p1352: 1
- p0722: 0
- p3365: 0; = if(p1232=0;p3244*p3359/p0818;0)
- p2517: 1.55614e-5; = p2321*p1014
- p3011: 0; = p2425*(p1079+p1081)
- p2468: 0; = p2272*p1123
- p1767: 0
- p2856: 1.09519e-6; = p2270*(p1079+p1081)
- p3314: 0; = if(and(p1232=0;p3253<>0);p3263*p3289;0)
- p2465: 1.49386e-5; = p2269*p1073
- p0256: 34.587
- p2181: 1081.14; = p0887+p0889+p0893+p2180
- p2318: 2.14587e-5; = p2224*p2185
- p3384: 0; = p3365*p1234
- p3182: 0; = p2401*p1023
- p0245: 4.184
- p3586: 0; = p1855*p3476
- p3096: 1.77775e-9; = p2315*p1023
- p2536: 0; = p2340*p1073
- p5297: 2.11174e-6; = p1918*p3484
- p2004: 30
- p0109: 8.553
- p2620: 0; = p2424*p1073
- p1000: 0; = IF(p0996+p0999=1;0;IF(p0996+p0999+p0998>1;1-(p0996+p0999);p0998))
- p0652: 0; = IF(p0388<0.5;-SQRT(p0007*EXP(p0520^2*p0008)-p0007);SQRT(p0007*EXP(p0520^2*p0008)-p0007))
- p2051: 2.20341e-5; = p2015*p2049*p2050/(p0818*1000)
- p0865: 0.271379; = IF(p0858+p0864=1;0;IF(p0858+p0864+p0860>1;1-(p0858+p0864);p0860))
- p1286: 0; = p1282*p1252/p0818
- p2813: 0; = p2422*(p1078+p1080)
- p2871: 9.95686e-6; = p2285*(p1020+p1022)
- p0401: 0.5
- p2754: 3.34834e-5; = p2363*(p1019+p1021)
- p3028: 2.30183e-10; = p2247*p1023
- p3446: 0; = p3370*p1240
- p0790: 11.7; = p0130*(1+p0658*p0262/100)
- p2848: 2.2219e-5; = p2262*(p1079+p1081)
- p0309: 0.5
- p1734: 0
- p1112: 0.209482
- p2860: 0; = p2274*(p1129+p1131)
- p1282: 0; = IF(p1277+p1280+p1281=p1260;0;p1260-(p1277+p1280+p1281))
- p1084: 89560.5; = IF(p1071=0;p1078*(p0710/100)*p0703*1000;0)
- p1897: 0
- p2641: 0.000129598; = p2250*(p1019+p1021)
- p2419: 0; = p2235*p2209
- p2180: 3.27049e-8; = p3233*p1188/(p0818)
- p1266: 0; = if(p1232>0;0;IF(p1259+p1263+p1264+p1265=1;0;1-(p1259+p1263+p1264+p1265)))
- p0728: 0
- p2588: 0; = p2392*p1123
- p2527: 1.60213e-7; = p2331*p1014
- p3340: 0; = if(and(p1232=0;p3254<>0);p3254*(p3270-p3335)/p3338;0)
- p0574: 0; = IF(p0310<0.5;-SQRT(p0007*EXP(p0442^2*p0008)-p0007);SQRT(p0007*EXP(p0442^2*p0008)-p0007))
- p3376: 0; = if(p1232=0;p3246*p3358/p0818;0)
- p0674: 46.021; = p0014*(1+p0542*p0146/100)
- p2818: 0; = p2427*(p1078+p1080)
- p3139: 4.83566e-9; = p2358*p1023
- p1652: 0
- p3275: 0
- p3012: 0; = p2426*(p1079+p1081)
- p3053: 0; = p2272*p1132
- p3226: 0.00170537; = p3222*p1229
- p0532: 0; = SQRT(2)*(IF((2*p0400-1)<0;-1;IF((2*p0400-1)>0;1;0))*SQRT(SQRT((2/(pi()*0.140012289)+LN(1-(2*p0400-1)^2)/2)^2-LN(1-(2*p0400-1)^2)/0.140012289)-(2/(pi()*0.140012289)+LN(1-(2*p0400-1)^2)/2)))
- p1556: 0.897823
- p2114: 0.832356
- p2188: 0.0015682; = p1066-p2186-p2187
- p5243: 2.11174e-7; = p1864*p3484
- p0607: 0; = IF(p0343<0.5;-SQRT(p0007*EXP(p0475^2*p0008)-p0007);SQRT(p0007*EXP(p0475^2*p0008)-p0007))
- p0431: 0; = SQRT(2)*(IF((2*p0299-1)<0;-1;IF((2*p0299-1)>0;1;0))*SQRT(SQRT((2/(pi()*0.140012289)+LN(1-(2*p0299-1)^2)/2)^2-LN(1-(2*p0299-1)^2)/0.140012289)-(2/(pi()*0.140012289)+LN(1-(2*p0299-1)^2)/2)))
- p1967: 0; = if(p0807=480;p0802*p0810;0)
- p0044: 86.477
- p4071: 5.19068e-7; = p1928*p3478
- p2489: 0.000499873; = p2293*p1014
- p5152: 5.70171e-6; = p1773*p3484
- p3729: 0; = p1792*p3477
- p0933: 39858; = p0801*p0927
- p2299: 0.00082299; = p2227*p2206
- p3224: 0.501945; = IF(p3216=0;0;1-p3221-p3222-p3223)
- p1294: 0; = p1290*p1252/p0818
- p3504: 0; = p1773*p3476
- p1234: 0; = if(p1232>0;0;p0726/100)
- p0088: 42.846
- p3041: 8.77508e-7; = p2260*p1082
- p2068: 0.153529
- p1588: 0.587329
- p1167: 0.5
- p0587: 0; = IF(p0323<0.5;-SQRT(p0007*EXP(p0455^2*p0008)-p0007);SQRT(p0007*EXP(p0455^2*p0008)-p0007))
- p3178: 0; = p2397*p1023
- p3318: 0; = if(and(p1232=0;p3253<>0);p3253*(p3262-p3313)/p3316;0)
- p1564: 0
- p3074: 1.61249e-8; = p2293*p1023
- p3262: 0
- p2153: 1.46543e-9; = p2015*p2081*p2115/(p0818*1000)
- p3237: 0.854735
- p1862: 0
- p2054: 0.91
- p1825: 0
- p2972: 8.87457e-6; = p2386*(p1079+p1081)
- p3183: 0; = p2402*p1023
- p3187: 0; = p2406*p1023
- p1566: 0
- p2872: 8.05773e-5; = p2286*(p1020+p1022)
- p0961: 0; = if(and(p0683>0;or(p0807=480;p0807=32;p0807=1;and(p0807=60;p0901<0.03)));p0937;0)
- p2286: 0.000377748; = p2223*p2192
- p2161: 7.97203e-9; = p2015*p2085*p2123/(p0818*1000)
- p1578: 0
- p0399: 0.5
- p1998: 267
- p1085: 30260.4; = IF(p1071=0;p1079*(p0710/100)*p0703*1000;0)
- p0484: 0; = SQRT(2)*(IF((2*p0352-1)<0;-1;IF((2*p0352-1)>0;1;0))*SQRT(SQRT((2/(pi()*0.140012289)+LN(1-(2*p0352-1)^2)/2)^2-LN(1-(2*p0352-1)^2)/0.140012289)-(2/(pi()*0.140012289)+LN(1-(2*p0352-1)^2)/2)))
- p3426: 0; = p3369*p1239
- p2249: 2.75039e-5; = p2222*p2195
- p0619: 0; = IF(p0355<0.5;-SQRT(p0007*EXP(p0487^2*p0008)-p0007);SQRT(p0007*EXP(p0487^2*p0008)-p0007))
- p0715: 0
- p3200: 0; = p2419*p1082
- p2339: 0; = p2228*p2207
- p2522: 5.53823e-5; = p2326*p1014
- p1683: 0
- p2801: 0; = p2410*(p1019+p1021)
- p1632: 0
- p2385: 1.44161e-5; = p2229*p2214
- p1143: 0; = if(p1121=0;p1137*p0001/(p0818*p0002);0)
- p1757: 0
- p3134: 0; = p2353*p1132
- p0083: 0.23
- p2192: 0.00100127; = p1067-p2189-p2190-p2191
- p2379: 0.000168227; = p2229*p2208
- p1132: 0.00342; = if(p1121=0;IF(p1123+p1128+p1129+p1130+p1131=1;0;1-(p1123+p1128+p1129+p1130+p1131));0)
- p0938: 0; = p0932*p0001/(p0818*p0002)
- p3380: 0; = p3251/p0818
- p1832: 0
- p3033: 1.68821e-12; = p2252*p1023
- p0718: 47.934; = p0058*(1+p0586*p0190/100)
- p3345: 0; = if(and(p1232=0;p3256<>0);p3273*p3277*p3293;0)
- p1701: 0
- p1821: 0
- p0891: 0; = IF(p3251=0;0;62.4*6272640/(12*12*12))
- p0384: 0.5
- p2995: 0; = p2409*(p1020+p1022)
- p3158: 1.08382e-6; = p2377*p1082
- p2297: 0.00281003; = p2227*p2204
- p1915: 0
- p0913: 0.0119672
- p2089: 0.40001
- p1674: 0
- p0317: 0.5
- p2990: 0; = p2404*(p1020+p1022)
- p1155: 0.00296053; = if(p1153*p0818=0;0;p1151/(p1153*p0818))
- p1079: 0.16313; = IF(p1071=0;IF(p1073+p1078=1;0;IF(p1073+p1078+p1075>1;1-(p1073+p1078);p1075));0)
- p2157: 3.77779e-8; = p2015*p2086*p2119/(p0818*1000)
- p2026: 63.9
- p3147: 6.79227e-9; = p2366*p1023
- p2453: 2.15467e-5; = p2257*p1014
- p1329: 0; = p1328*p0001/(p0818*p0002)
- p3082: 2.836e-5; = p2301*p1082
- p2670: 0.000120559; = p2279*(p1019+p1021)
- p1267: 0
- p1854: 0
- p2239: 4.47428e-6; = p2222*p2184
- p0951: 0; = if(and(p0683=0;or(p0807=480;p0807=32;p0807=1;and(p0807=60;p0901<0.03)));p0939;0)
- p3470: 0; = p3375*p1241
- p0241: 73.375
- p0814: 0; = if(p0807=480;p0810*p0812+p0811*p0813;0)
- p3307: 0; = if(and(p1232=0;p3252<>0);p3252*(p3258-p3302)/p3305;0)
- p0917: 1.25148
- p0942: 0; = if(and(p0683=0;p0948=0);p0936;0)
- p2135: 7.25893e-7; = p2015*p2063*p2097/(p0818*1000)
- p0184: 27.466
- p2971: 2.3517e-6; = p2385*(p1079+p1081)
- p1748: 0
- p2928: 0; = p2342*(p1079+p1081)
- p1791: 0
- p2981: 0; = p2395*(p1020+p1022)
- p2910: 8.44802e-7; = p2324*(p1020+p1022)
- p3077: 1.14064e-8; = p2296*p1023
- p3018: 1.27676e-9; = p2237*p1023
- p2537: 0; = p2341*p1073
- p2858: 0; = p2272*(p1129+p1131)
- p3454: 0; = p3378*p1240
- p1840: 0
- p4482: 6.94464e-7; = p1927*p3480
- p0140: 62.139
- p1845: 0
- p2033: 2.58234e-6; = p2015*p2029*p2031/(p0818*1000)
- p2934: 0; = p2348*(p1079+p1081)
- p2497: 0.000645541; = p2301*p1073
- p3092: 2.94566e-5; = p2311*p1132
- p1899: 0
- p3367: 0; = if(p1232=0;p3244*p3361/p0818;0)
- p4719: 6.59991e-6; = p1962*p3481
- p0001: 0.404686
- p2935: 0; = p2349*(p1079+p1081)
- p0853: 0; = p0803/(p0802+p0803)
- p1603: 0
- p1982: 750
- p2746: 0.000329924; = p2355*(p1019+p1021)
- p1096: 0.00136107
- p1893: 0
- p2195: 0.00119639; = p2194*p2193
- p2038: 0.304457
- p3223: 0.126838; = IF(p3216=0;0;(1-p1223)*24.3050/84.3139)
- p2264: 2.65939e-5; = p2226*p2210
- p2422: 0; = p2235*p2212
- p3484: 0.169721; = IF(p1344=0;0;p1344/(p1328+p1330+p1332+p1334+p1336+p1338+p1340+p1342+p1344))
- p1604: 0
- p2127: 2.01579e-6; = p2015*p2055*p2089/(p0818*1000)
- p1205: 0.04725
- p1142: 0; = if(p1121=0;p1136*p0001/(p0818*p0002);0)
- p1017: 0.10447; = IF(p1012=0;p0708/100;0)
- p2295: 9.94956e-5; = p2223*p2202
- p1700: 0
- p1315: 0; = p1311*p1252/p0818
- p2721: 1.12051e-7; = p2330*(p1019+p1021)
- p2284: 0.000185617; = p2223*p2190
- p2003: 50
- p4831: 7.45661e-8; = p1864*p3482
- p1001: 1; = if(p0978>0;0;if(and(p0687=0;p0691=0;p0695=0;p0699=0);0;IF(p0996+p0999+p1000=1;0;1-(p0996+p0999+p1000))))
- p1321: 0.927466; = IF(((p0745*1000*p0748/100)+(p0754*1000*p0757/100))/p0801<0;0;((p0745*1000*p0748/100)+(p0754*1000*p0757/100))/p0801)
- p2662: 2.9051e-5; = p2271*(p1078+p1080)
- p4922: 1.26762e-6; = p1955*p3482
- p0778: 9.57; = p0118*(1+p0646*p0250/100)
- p1943: 0
- p3037: 6.06282e-11; = p2256*p1023
- p2965: 2.74429e-5; = p2379*(p1079+p1081)
- p3343: 0; = if(and(p1232=0;p3254<>0);IF((p3339+p3340+p3341+p3342)+(p3254*(p3269*(1-p3277))/p3338)>p3254;p3254-(p3339+p3340+p3341+p3342);p3254*(p3269*(1-p3277))/p3338);0)
- p1595: 0
- p0638: 0; = IF(p0374<0.5;-SQRT(p0007*EXP(p0506^2*p0008)-p0007);SQRT(p0007*EXP(p0506^2*p0008)-p0007))
- p1568: 0
- p2013: 0.75
- p1796: 0
- p2378: 0.000603953; = p2229*p2207
- p0079: 1.798
- p2645: 4.68377e-5; = p2254*(p1019+p1021)
- p1797: 0
- p1032: 2.28274e-5; = IF(p1012=0;p1026*p0001/(p0818*p0002);0)
- p0124: 67.535
- p3099: 2.14587e-10; = p2318*p1023
- p1576: 0
- p1689: 0
- p1106: 6315.18; = IF(p1071=0;p1105*p1096*p1095;0)
- p2581: 4.88937e-6; = p2385*p1073
- p0785: 0
- p2138: 6.95516e-8; = p2015*p2066*p2100/(p0818*1000)
- p3231: 1.28984e-7; = p1176/p0818
- p1785: 0
- p2066: 0.109412
- p0649: 0; = IF(p0385<0.5;-SQRT(p0007*EXP(p0517^2*p0008)-p0007);SQRT(p0007*EXP(p0517^2*p0008)-p0007))
- p3466: 0; = p3371*p1241
- p0706: 37.221; = p0046*(1+p0574*p0178/100)
- p0034: 205.644
- p4101: 2.6748e-5; = p1962*p3478
- p2710: 1.29964e-5; = p2319*(p1019+p1021)
- p1994: 750
- p0774: 36.08; = p0114*(1+p0642*p0246/100)
- p1698: 0
- p0742: 93.523; = p0082*(1+p0610*p0214/100)
- p0511: 0; = SQRT(2)*(IF((2*p0379-1)<0;-1;IF((2*p0379-1)>0;1;0))*SQRT(SQRT((2/(pi()*0.140012289)+LN(1-(2*p0379-1)^2)/2)^2-LN(1-(2*p0379-1)^2)/0.140012289)-(2/(pi()*0.140012289)+LN(1-(2*p0379-1)^2)/2)))
- p3036: 4.21256e-10; = p2255*p1023
- p2309: 9.38182e-5; = p2227*p2216
- p2955: 8.89322e-7; = p2369*(p1020+p1022)
- p2828: 6.01139e-7; = p2242*(p1020+p1022)
- p0270: 4.184
- p1519: 34
- p2980: 0; = p2394*(p1020+p1022)
- p2768: 3.51195e-5; = p2377*(p1078+p1080)
- p0533: 0; = SQRT(2)*(IF((2*p0401-1)<0;-1;IF((2*p0401-1)>0;1;0))*SQRT(SQRT((2/(pi()*0.140012289)+LN(1-(2*p0401-1)^2)/2)^2-LN(1-(2*p0401-1)^2)/0.140012289)-(2/(pi()*0.140012289)+LN(1-(2*p0401-1)^2)/2)))
- p0701: 0
- p3357: 0; = if(p1232=0;p3307+p3318+p3329+p3340+p3351;0)
- p0977: 0; = IF(p0687=0;IF(OR(p0686=0;p0688=0);0;p0686*1000*p0688/100);0)
- p0971: 0; = p0968/p0818
- p0080: 95.136
- p2350: 0; = p2232*p2218
- p2326: 0.000178652; = p2224*p2193
- p1754: 0
- p0783: 0
- p4553: 1.1655e-5; = p1792*p3481
- p1808: 0
- p0310: 0.5
- p1120: 0.00928229; = IF(p1071=0;p1110/(p1115*p0818);0)
- p1848: 0
- p2105: 0.888194
- p1260: 0; = if(p1232>0;0;p0731/100)
- p2146: 1.86133e-8; = p2015*p2074*p2108/(p0818*1000)
- p2611: 0; = p2415*p1073
- p1934: 0
- p1711: 0
- p3049: 1.73911e-7; = p2268*p1082
- p2158: 1.33184e-7; = p2015*p2082*p2120/(p0818*1000)
- p1264: 0; = if(p1232>0;0;IF(p1259+p1263=1;0;IF(p1259+p1263+p1261>1;1-(p1259+p1263);p1261)))
- p3133: 0; = p2352*p1132
- p3131: 0; = p2350*p1132
- p3045: 3.96249e-7; = p2264*p1082
- p3076: 9.94956e-10; = p2295*p1023
- p0750: 1.686; = p0090*(1+p0618*p0222/100)
- p0881: 0; = p0880*p0001*p0003/(p0818*p0002)
- p1963: 0.000310543; = p1963a+p1963b+p1963c+p1963d+p1963e+p1963f+p1963g+p1963h+p1963i+p1963j+p1963k
- p1212: 0.165089; = if(p1211=0;0;if(p1193>0;0;(p1207+p1208+p1209)*p1210/(2000*p1211)))
- p2770: 8.12219e-5; = p2379*(p1078+p1080)
- p1088: 2763.93; = IF(p1071=0;p1082*(p0710/100)*p0703*1000;0)
- p2568: 0.000322499; = p2372*p1014
- p0348: 0.5
- p1594: 0
- p3286: 0
- p2792: 0; = p2401*(p1019+p1021)
- p2800: 0; = p2409*(p1019+p1021)
- p0985: 1; = IF(p0982=1;0;IF(p0982+p0983>1;1-p0982;p0983))
- p0918: 0.676887; = p0680*1000/p0801
- p1759: 0
- p3276: 0
- p2793: 0; = p2402*(p1019+p1021)
- p2288: 0.000451361; = p2223*p2195
- p2485: 0.00138313; = p2289*p1014
- p3465: 0; = p3370*p1241
- p2671: 0.000153176; = p2280*(p1019+p1021)
- p0291: 0.5
- p0723: 240; = p0063*(1+p0591*p0195/100)
- p2491: 3.08436e-5; = p2295*p1014
- p1011: 6.30305e-6; = p1010*p0001*p0004/(p0818*p0002)
- p2410: 0; = p2234*p2200
- p2037: 2.8
- p0922: 0; = p0677*1000/p0801
- p3094: 3.69832e-6; = p2313*p1132
- p0765: 17.486; = p0105*(1+p0633*p0237/100)
- p0316: 0.5
- p0756: 0
- p2067: 0.446471
- p1274: 0; = p1270*p1252/p0818
- p0012: 65.131
- p3247: 0
- p0106: 33.755
- p2018: 0.1978
- p1284: 0; = p1280*p1252/p0818
- p2684: 0.000768643; = p2293*(p1019+p1021)
- p1563: 0
- p2554: 0.000149905; = p2358*p1014
- p0818: 8.037e8; = p0806*p0807
- p3289: 0
- p2271: 6.01707e-5; = p2226*p2217
- p2836: 5.79941e-5; = p2250*(p1020+p1022)
- p1833: 0
- p1144: 5.66188e-7; = if(p1121=0;p1138*p0001/(p0818*p0002);0)
- p0954: 0; = if(and(p0683>0;or(p0807=56;p0807=100;and(p0807=60;p0901>0.06)));p0936;0)
- p2697: 3.42004e-5; = p2306*(p1078+p1080)
- p3001: 0; = p2415*(p1079+p1081)
- p1807: 0
- p3455: 0; = p3379*p1240
- p0459: 0; = SQRT(2)*(IF((2*p0327-1)<0;-1;IF((2*p0327-1)>0;1;0))*SQRT(SQRT((2/(pi()*0.140012289)+LN(1-(2*p0327-1)^2)/2)^2-LN(1-(2*p0327-1)^2)/0.140012289)-(2/(pi()*0.140012289)+LN(1-(2*p0327-1)^2)/2)))
- p0347: 0.5
- p0540: 0; = IF(p0276<0.5;-SQRT(p0007*EXP(p0408^2*p0008)-p0007);SQRT(p0007*EXP(p0408^2*p0008)-p0007))
- p2209: 0.000998386; = 14.0067*p2208/30.973762
- p2514: 6.65221e-6; = p2318*p1014
- p3300: 0; = if(p1293+p1294+p1295+p1296=0;0;p1293/(p1293+p1294+p1295+p1296))
- p0188: 13.669
- p3658: 0; = p1927*p3476
- p2716: 1.52778e-5; = p2325*(p1019+p1021)
- p2932: 0; = p2346*(p1079+p1081)
- p0885: 5.83; = IF(p0689+p0884=100;0;100-(p0689+p0884))
- p0353: 0.5
- p2917: 1.10242e-7; = p2331*(p1020+p1022)
- p1857: 0
- p3024: 3.60516e-10; = p2243*p1023
- p2963: 1.1866e-5; = p2377*(p1079+p1081)
- p2424: 0; = p2235*p2214
- p1169: 0.000945116
- p4697: 1.53692e-6; = p1936*p3481
- p1910: 0
- p4285: 3.49122e-6; = p1936*p3479
- p5076: 0; = p1903*p3483
- p2743: 0; = p2352*(p1128+p1130)
- p2994: 0; = p2408*(p1020+p1022)
- p4965: 0; = p1792*p3483
- p2162: 1.46853e-8; = p2015*p2086*p2124/(p0818*1000)
- p2119: 0.679049
- p2804: 0; = p2413*(p1019+p1021)
- p0536: 0; = SQRT(2)*(IF((2*p0404-1)<0;-1;IF((2*p0404-1)>0;1;0))*SQRT(SQRT((2/(pi()*0.140012289)+LN(1-(2*p0404-1)^2)/2)^2-LN(1-(2*p0404-1)^2)/0.140012289)-(2/(pi()*0.140012289)+LN(1-(2*p0404-1)^2)/2)))
- p2658: 2.44738e-6; = p2267*(p1078+p1080)
- p2432: 0.0196502; = p1158
- p2705: 0.000900753; = p2314*(p1128+p1130)
- p1963i: 3.52825e-5; = p1706*p1910+p1707*p1911+p1708*p1912+p1709*p1913+p1710*p1914+p1711*p1915+p1712*p1916+p1713*p1917+p1714*p1918+p1715*p1919+p1716*p1920+p1717*p1921+p1718*p1922+p1719*p1923+p1720*p1924+p1721*p1925+p1722*p1926+p1723*p1927+p1724*p1928
- p3451: 0; = p3375*p1240
- p2293: 0.00161249; = p2223*p2200
- p3346: 0; = if(and(p1232=0;p3256<>0);p3274*(p3281*(p3285*p1256+p3286*(p1253+p1257)+p1258*p3288));0)
- p2922: 0; = p2336*(p1079+p1081)
- p2959: 3.19379e-5; = p2373*(p1020+p1022)
- p2807: 0; = p2416*(p1078+p1080)
- p3151: 9.16632e-11; = p2370*p1023
- p0501: 0; = SQRT(2)*(IF((2*p0369-1)<0;-1;IF((2*p0369-1)>0;1;0))*SQRT(SQRT((2/(pi()*0.140012289)+LN(1-(2*p0369-1)^2)/2)^2-LN(1-(2*p0369-1)^2)/0.140012289)-(2/(pi()*0.140012289)+LN(1-(2*p0369-1)^2)/2)))
- p4277: 2.90935e-7; = p1928*p3479
- p3328: 0; = if(and(p1232=0;p3255<>0);p3255*(p3265*p3277-p3323)/p3327;0)
- p1870: 0
- p0301: 0.5
- p0089: 24.015
- p2589: 0; = p2393*p1014
- p0712: 48.281; = p0052*(1+p0580*p0184/100)
- p1049: 0.25306; = IF(p1012=0;IF(p1037+p1044+p1045+p1046+p1047+p1048=1;0;1-(p1037+p1044+p1045+p1046+p1047+p1048));0)
- p4616: 6.27577e-6; = p1855*p3481
- p1804: 0
- p2310: 0.000840842; = p2227*p2217
- p2335: 9.67789e-5; = p2224*p2203
- p3453: 0; = p3377*p1240
- p2696: 3.27063e-6; = p2305*(p1078+p1080)
- p0507: 0; = SQRT(2)*(IF((2*p0375-1)<0;-1;IF((2*p0375-1)>0;1;0))*SQRT(SQRT((2/(pi()*0.140012289)+LN(1-(2*p0375-1)^2)/2)^2-LN(1-(2*p0375-1)^2)/0.140012289)-(2/(pi()*0.140012289)+LN(1-(2*p0375-1)^2)/2)))
- p2978: 0; = p2392*(p1129+p1131)
- p1297: 0
- p1131: 0; = if(p1121=0;IF(p1123+p1128+p1129+p1130=1;0;IF(p1123+p1128+p1129+p1130+p1127>1;1-(p1123+p1128+p1129+p1130);p1127));0)
- p3460: 0; = p3365*p1241
- p0841: 0.28778
- p0685: 0
- p2653: 6.57607e-5; = p2262*(p1078+p1080)
- p1874: 0
- p0509: 0; = SQRT(2)*(IF((2*p0377-1)<0;-1;IF((2*p0377-1)>0;1;0))*SQRT(SQRT((2/(pi()*0.140012289)+LN(1-(2*p0377-1)^2)/2)^2-LN(1-(2*p0377-1)^2)/0.140012289)-(2/(pi()*0.140012289)+LN(1-(2*p0377-1)^2)/2)))
- p2011: 0.00094333
- p0059: 14.534
- p3437: 0; = p3380*p1239
- p2592: 0; = p2396*p1014
- p1233: 0.000266422; = p1232*p0001/(p0818*p0002)
- p3150: 4.16915e-11; = p2369*p1023
- p1788: 0
- p3046: 5.18904e-6; = p2265*p1082
- p1077: 0; = IF(p1071=0;p0715/100;0)
- p3418: 0; = p3380*p1238
- p0369: 0.5
- p3188: 0; = p2407*p1023
- p2265: 0.000348257; = p2226*p2211
- p5338: 5.27056e-5; = p1963*p3484
- p4141: 2.64751e-5; = p1792*p3479
- p1990: 30
- p2847: 7.97682e-5; = p2261*(p1079+p1081)
- p1145: 9.38557e6; = if(p1121=0;p0799*p0702*1000*p0800/100;0)
- p3211: 0; = p2430*p1132
- p2304: 0.00486665; = p2227*p2211
- p3083: 1.28247e-5; = p2302*p1082
- p3149: 2.54009e-11; = p2368*p1023
- p1976: 0.0332
- p1630: 0
- p2597: 0; = p2401*p1014
- p2618: 0; = p2422*p1073
- p0700: 0
- p0731: 0
- p2434: 8.68817e-6; = p2238*p1014
- p3421: 0; = p3364*p1239
- p2779: 3.58813e-5; = p2388*(p1078+p1080)
- p2859: 0; = p2273*(p1129+p1131)
- p3232: 4.26494e-8; = p1182/p0818
- p1907: 0
- p1187: 0.000181343
- p3126: 0; = p2345*p1082
- p2637: 1.35584e-6; = p2246*(p1019+p1021)
- p2712: 2.39284e-5; = p2321*(p1019+p1021)
- p0146: 0
- p1318: 0; = p1317*p0001/(p0818*p0002)
- p1235: 0; = if(p1232>0;0;p0727/100)
- p0505: 0; = SQRT(2)*(IF((2*p0373-1)<0;-1;IF((2*p0373-1)>0;1;0))*SQRT(SQRT((2/(pi()*0.140012289)+LN(1-(2*p0373-1)^2)/2)^2-LN(1-(2*p0373-1)^2)/0.140012289)-(2/(pi()*0.140012289)+LN(1-(2*p0373-1)^2)/2)))
- p1963g: 0; = p1667*p1871+p1668*p1872+p1669*p1873+p1670*p1874+p1671*p1875+p1672*p1876+p1673*p1877+p1674*p1878+p1675*p1879+p1676*p1880+p1677*p1881+p1678*p1882+p1679*p1883+p1680*p1884+p1681*p1885+p1682*p1886+p1683*p1887+p1684*p1888+p1685*p1889
- p2201: 0.00183241; = 12.01*p2200/(2*14.0067)
- p4122: 7.85525e-6; = p1773*p3479
- p0115: 61.79
- p0631: 0; = IF(p0367<0.5;-SQRT(p0007*EXP(p0499^2*p0008)-p0007);SQRT(p0007*EXP(p0499^2*p0008)-p0007))
- p3272: 0
- p2939: 0; = p2353*(p1129+p1131)
- p1342: 0; = p1326*p0801
- p1118: 0.00108415; = IF(p1071=0;p1108/(p1113*p0818);0)
- p2846: 9.60724e-6; = p2260*(p1079+p1081)
- p2806: 0; = p2415*(p1078+p1080)
- p2404: 0; = p2234*p2193
- p1942: 0
- p2610: 0; = p2414*p1073
- p1189: 0.000266422; = p0801*p0001/(p0818*p0002)
- p2469: 0; = p2273*p1123
- p1619: 0
- p5087: 0; = p1914*p3483
- p3280: 0
- p2496: 0.00231756; = p2300*p1073
- p0438: 0; = SQRT(2)*(IF((2*p0306-1)<0;-1;IF((2*p0306-1)>0;1;0))*SQRT(SQRT((2/(pi()*0.140012289)+LN(1-(2*p0306-1)^2)/2)^2-LN(1-(2*p0306-1)^2)/0.140012289)-(2/(pi()*0.140012289)+LN(1-(2*p0306-1)^2)/2)))
- p4625: 1.28077e-7; = p1864*p3481
- p2892: 1.15555e-5; = p2306*(p1079+p1081)
- p3091: 1.25286e-5; = p2310*p1082
- p3093: 4.15106e-5; = p2312*p1132
- p1057: 0.82
- p2251: 1.02856e-7; = p2222*p2197
- p2486: 5.23262e-7; = p2290*p1014
- p3383: 0; = p3364*p1234
- p2547: 0; = p2351*p1123
- p1069: 2.79632e-5; = IF(p1012=0;p1055/(p1062*p0818);0)
- p3471: 0; = p3376*p1241
- p1259: 0; = if(p1232>0;0;p0730/100)
- p2246: 2.84434e-6; = p2222*p2191
- p0867: 0.191754; = IF(p0858+p0864+p0865+p0866=1;0;IF(p0858+p0864+p0865+p0866+p0862>1;1-(p0858+p0864+p0865+p0866);p0862))
- p3283: 0
- p0967: 0
- p2940: 0.000672574; = p2354*(p1020+p1022)
- p0858: 0; = p0670*1000/p0856
- p1793: 0
- p2331: 5.16816e-7; = p2224*p2199
- p1598: 0
- p1900: 0
- p3242: 1.83321e-8; = p3234*p1188*p3238/p0818
- p1755: 0
- p3429: 0; = p3372*p1239
- p2079: 0.02
- p1065: 0.000865005; = IF(p1012=0;p1051/(p1058*p0818);0)
- p1783: 0
- p2467: 2.04075e-5; = p2271*p1073
- p1177: 0.000266422; = p0801*p0001/(p0818*p0002)
- p2998: 0; = p2412*(p1020+p1022)
- p2352: 0; = p2232*p2220
- p0912: 0
- p0847: 0
- p1175: 0.000431935
- p2133: 3.57844e-7; = p2015*p2061*p2095/(p0818*1000)
- p1602: 0
- p2081: 0.0019
- p2855: 7.18522e-6; = p2269*(p1079+p1081)
- p2049: 25.6942
- p2612: 0; = p2416*p1073
- p0111: 4.689
- p1208: 147.437; = p1205*p0818*p0822/p0801
- p4521: 1.28077e-7; = p1760*p3481
- p3146: 3.1686e-8; = p2365*p1023
- p1335: 0.000138497; = p1334*p0001/(p0818*p0002)
- p3089: 9.17112e-6; = p2308*p1082
- p3388: 0; = p3369*p1234
- p3073: 6.09121e-11; = p2292*p1023
- p2111: 0.856281
- p0811: 0; = if(p0807=480;1-p0810;0)
- p2539: 0; = p2343*p1073
- p3267: 0
- p4798: 1.64045e-6; = p1831*p3482
- p4061: 5.19068e-6; = p1918*p3478
- p2417: 0; = p2235*p2207
- p1687: 0
- p2400: 0; = p2234*p2189
- p2790: 0; = p2399*(p1019+p1021)
- p2719: 0.000180452; = p2328*(p1019+p1021)
- p2540: 0; = p2344*p1073
- p0383: 0.5
- p3331: 0; = if(and(p1232=0;p3255<>0);p3255*(p3268-p3326)/p3327;0)
- p3050: 6.56285e-7; = p2269*p1082
- p3341: 0; = if(and(p1232=0;p3254<>0);p3254*(p3271-p3336)/p3338;0)
- p2342: 0; = p2228*p2210
- p1196: 0.59
- p2791: 0; = p2400*(p1019+p1021)
- p1423: 22
- p1026: 20563.5; = IF(p1012=0;p1020*(p0704/100)*p0703*1000;0)
- p2729: 0; = p2338*(p1078+p1080)
- p0249: 46.544
- p0792: 0
- p0923: 0; = IF(p0918=1;0;IF(p0918+p0919>1;1-p0918;p0919))
- p1853: 0
- p2464: 3.95864e-6; = p2268*p1073
- p0643: 0; = IF(p0379<0.5;-SQRT(p0007*EXP(p0511^2*p0008)-p0007);SQRT(p0007*EXP(p0511^2*p0008)-p0007))
- p2212: 7.85764e-6; = p1106/p0818
- p2528: 4.24123e-5; = p2332*p1014
- p1202: 0.7
- p2617: 0; = p2421*p1073
- p1626: 0
- p2841: 8.9858e-6; = p2255*(p1020+p1022)
- p3128: 0; = p2347*p1082
- p0110: 72.711
- p0932: 0; = p0801*p0926
- p2622: 0; = p2426*p1073
- p3174: 0; = p2393*p1023
- p0744: 4.131; = p0084*(1+p0612*p0216/100)
- p3595: 0; = p1864*p3476
- p0290: 0.5
- p0999: 0; = IF(p0996=1;0;IF(p0996+p0997>1;1-p0996;p0997))
- p1495: 74
- p2431: 0; = p2236*p2221
- p1855: 6.0968e-5; = p1447*1000/p0818
- p2215: 0.000713959; = p1117-p2214
- p0524: 0; = SQRT(2)*(IF((2*p0392-1)<0;-1;IF((2*p0392-1)>0;1;0))*SQRT(SQRT((2/(pi()*0.140012289)+LN(1-(2*p0392-1)^2)/2)^2-LN(1-(2*p0392-1)^2)/0.140012289)-(2/(pi()*0.140012289)+LN(1-(2*p0392-1)^2)/2)))
- p2233: 0; = if(p0783*p0787+p0784*p0788+p0785*p0789+p0786*p0790=0;0;p0790*p0786/(p0783*p0787+p0784*p0788+p0785*p0789+p0786*p0790))
- p1747: 0
- p1831: 2.73734e-5; = p1423*1000/p0818
- p4308: 7.26126e-5; = p1963*p3479
- p3427: 0; = p3370*p1239
- p3304: 0; = if(and(p1232=0;p3252<>0);p3260*p3289;0)
- p2672: 2.20455e-5; = p2281*(p1019+p1021)
- p0586: 0; = IF(p0322<0.5;-SQRT(p0007*EXP(p0454^2*p0008)-p0007);SQRT(p0007*EXP(p0454^2*p0008)-p0007))
- p1326: 0; = IF(((p0745*1000*p0753/100)+(p0754*1000*p0762/100))/p0801<0;0;((p0745*1000*p0753/100)+(p0754*1000*p0762/100))/p0801)
- p1956: 0
- p4931: 0; = p1758*p3483
- p3387: 0; = p3368*p1234
- p3422: 0; = p3365*p1239
- p3974: 1.14195e-5; = p1831*p3478
- p3935: 4.72351e-5; = p1792*p3478
- p1030: 7.14221e-5; = IF(p1012=0;p1024*p0001/(p0818*p0002);0)
- p3255: 0; = p1252*(p1297*(1-p3247)+p1300*(1-p3248)+p1301*(1-p3249)+p1302*(1-p3250))
- p1745: 0
- p2427: 0; = p2235*p2217
- p0306: 0.5
- p2370: 9.16632e-6; = p2225*p2199
- p2156: 2.0508e-8; = p2015*p2085*p2118/(p0818*1000)
- p3415: 0; = p3377*p1238
- p3998: 2.54343e-5; = p1855*p3478
- p0158: 5.48
- p3114: 5.86553e-10; = p2333*p1023
- p2942: 2.35698e-5; = p2356*(p1020+p1022)
- p3115: 8.44183e-11; = p2334*p1023
- p3355: 0; = if(and(p1232=0;p3256<>0);p3256-(p3350+p3351+p3352+p3353+p3354);0)
- p2376: 0.000224626; = p2229*p2205
- p1989: 50
- p2718: 1.82551e-5; = p2327*(p1019+p1021)
- p3478: 0.417175; = if(p1328+p1330+p1332+p1334+p1336+p1338+p1340+p1342+p1344=0;0;p1332/(p1328+p1330+p1332+p1334+p1336+p1338+p1340+p1342+p1344))
- p0112: 83.375
- p1571: 0
- p1147: 0.111546
- p1334: 124762; = p1322*p0801
- p2361: 0.00024403; = p2225*p2189
- p2048: 9.00733e-15; = p2015*p2046/(p0818*1000000000000)
- p1010: 223542; = p0890
- p4895: 7.45661e-8; = p1928*p3482
- p0816: 0
- p2681: 8.04608e-7; = p2290*(p1019+p1021)
- p2317: 6.22996e-6; = p2224*p2184
- p1912: 0
- p0710: 77.291; = p0050*(1+p0578*p0182/100)
- p2823: 2.72345e-5; = p2237*(p1020+p1022)
- p2646: 2.00804e-5; = p2255*(p1019+p1021)
- p1830: 0
- p1980: 3521.6
- p1705: 0
- p4263: 8.72805e-7; = p1914*p3479
- p2513: 1.93129e-6; = p2317*p1014
- p3173: 0; = p2392*p1132
- p1949: 0
- p2844: 3.28031e-5; = p2258*(p1079+p1081)
- p1340: 31976.2; = p1325*p0801
- p2538: 0; = p2342*p1073
- p0764: 86.477; = p0104*(1+p0632*p0236/100)
- p1917: 0
- p2399: 0; = p2234*p2188
- p2190: 0.000492001; = 32.065*p2189/(2*14.0067)
- p1569: 0.819138
- p3444: 0; = p3368*p1240
- p1960: 51.5309; = IF(p1959-p1958<0;0;p1959-p1958)
- p3084: 5.5373e-6; = p2303*p1082
- p5337: 1.0882e-5; = p1962*p3484
- p0416: 0; = SQRT(2)*(IF((2*p0284-1)<0;-1;IF((2*p0284-1)>0;1;0))*SQRT(SQRT((2/(pi()*0.140012289)+LN(1-(2*p0284-1)^2)/2)^2-LN(1-(2*p0284-1)^2)/0.140012289)-(2/(pi()*0.140012289)+LN(1-(2*p0284-1)^2)/2)))
- p0117: 24.909
- p2165: 0.711649; = (p0833-p2014)/p0818-p0839
- p4689: 1.28077e-7; = p1928*p3481
- p2416: 0; = p2235*p2206
- p0371: 0.5
- p3395: 0; = p3376*p1234
- p0838: 5.61154e8; = (p0833-p0836)*p0837
- p2868: 0.000126202; = p2282*(p1020+p1022)
- p1887: 0
- p1262: 0; = if(p1232>0;0;p0733/100)
- p3361: 0; = if(p1232=0;p3311+p3322+p3333+p3344+p3355;0)
- p3386: 0; = p3367*p1234
- p2482: 0.000117102; = p2286*p1014
- p2391: 0; = p2233*p2220
- p2996: 0; = p2410*(p1020+p1022)
- p1350: 17
- p1308: 0
- p3157: 3.34693e-6; = p2376*p1082
- p1744: 0
- p3311: 0; = if(and(p1232=0;p3252<>0);p3252-(p3306+p3307+p3308+p3309+p3310);0)
- p0503: 0; = SQRT(2)*(IF((2*p0371-1)<0;-1;IF((2*p0371-1)>0;1;0))*SQRT(SQRT((2/(pi()*0.140012289)+LN(1-(2*p0371-1)^2)/2)^2-LN(1-(2*p0371-1)^2)/0.140012289)-(2/(pi()*0.140012289)+LN(1-(2*p0371-1)^2)/2)))
- p2833: 4.91002e-6; = p2247*(p1020+p1022)
- p2338: 0; = p2228*p2206
- p0944: 0; = if(and(p0683=0;p0950=0);p0938;0)
- p2016: 9.74474e-5; = (p2014-p2015)/(p0818)
- p1168: 6.89879e-7; = p1164*p1167/p0818
- p1668: 0
- p0875: 0.723014; = p0874*p0001*p0003/(p0818*p0002)
- p1731: 0
- p0950: 0; = if(and(p0683=0;or(p0807=480;p0807=32;p0807=1;and(p0807=60;p0901<0.03)));p0938;0)
- p3161: 1.13351e-6; = p2380*p1082
- p0107: 44.411
- p2789: 0; = p2398*(p1019+p1021)
- p2732: 0; = p2341*(p1078+p1080)
- p2232: 0; = if(p0783*p0787+p0784*p0788+p0785*p0789+p0786*p0790=0;0;p0789*p0785/(p0783*p0787+p0784*p0788+p0785*p0789+p0786*p0790))
- p1078: 0.48281; = IF(p1071=0;IF(p1073=1;0;IF(p1073+p1074>1;1-p1073;p1074));0)
- p3476: 0; = if(p1328+p1330+p1332+p1334+p1336+p1338+p1340+p1342+p1344=0;0;p1328/(p1328+p1330+p1332+p1334+p1336+p1338+p1340+p1342+p1344))
- p2902: 8.32415e-6; = p2316*(p1020+p1022)
- p0871: 0; = p0870*p0001*p0003/(p0818*p0002)
- p2476: 9.96152e-5; = p2280*p1014
- p3351: 0; = if(and(p1232=0;p3256<>0);p3256*(p3274-p3346)/p3349;0)
- p4822: 3.65374e-6; = p1855*p3482
- p2012: 0.441843
- p2511: 5.51102e-5; = p2315*p1014
- p1195: 0.45
- p2448: 5.23346e-8; = p2252*p1014
- p3447: 0; = p3371*p1240
- p3110: 1.43216e-12; = p2329*p1023
- p2938: 0; = p2352*(p1129+p1131)
- p1997: 2.31985e7; = (if(p1152=0;0;p1150/p1152)+if(p1153=0;0;p1151/p1153))*(1+p1157)
- p3284: 0
- p0970: 0; = p0967/p0818
- p2243: 3.60516e-5; = p2222*p2188
- p2472: 0.00064953; = p2276*p1014
- p0739: 1.798; = p0079*(1+p0607*p0211/100)
- p3168: 1.23552e-7; = p2387*p1082
- p0770: 72.711; = p0110*(1+p0638*p0242/100)
- p2392: 0; = p2233*p2221
- p0762: 0
- p2913: 8.16897e-6; = p2327*(p1020+p1022)
- p1243: 0; = if(p1232>0;0;p1238*(p0725/100)*p0723*1000)
- p1946: 0
- p3403: 0; = p3365*p1238
- p1695: 0
- p2050: 0.952062
- p3464: 0; = p3369*p1241
- p3063: 5.91634e-9; = p2282*p1023
- p1591: 0
- p3278: 0
- p2120: 0.51828
- p1310: 0; = IF(p1307=p1266;0;IF(p1307+p1308>p1266;p1266-p1307;p1308))
- p3855: 0; = p1918*p3477
- p2782: 0; = p2391*(p1128+p1130)
- p2436: 4.77754e-6; = p2240*p1014
- p2850: 4.33826e-6; = p2264*(p1079+p1081)
- p3015: 0; = p2429*(p1129+p1131)
- p1037: 0.328824
- p1303: 0; = p1297*p1252/p0818
- p2481: 1.44701e-5; = p2285*p1014
- p2898: 0.00176408; = p2312*(p1129+p1131)
- p0616: 0; = IF(p0352<0.5;-SQRT(p0007*EXP(p0484^2*p0008)-p0007);SQRT(p0007*EXP(p0484^2*p0008)-p0007))
- p3260: 0
- p2507: 0.00320319; = p2311*p1123
- p1613: 0
- p0409: 0; = SQRT(2)*(IF((2*p0277-1)<0;-1;IF((2*p0277-1)>0;1;0))*SQRT(SQRT((2/(pi()*0.140012289)+LN(1-(2*p0277-1)^2)/2)^2-LN(1-(2*p0277-1)^2)/0.140012289)-(2/(pi()*0.140012289)+LN(1-(2*p0277-1)^2)/2)))
- p2602: 0; = p2406*p1014
- p0683: 86.321; = p0023*(1+p0551*p0155/100)
- p4870: 5.51789e-6; = p1903*p3482
- p3014: 0; = p2428*(p1129+p1131)
- p3181: 0; = p2400*p1023
- p2349: 0; = p2228*p2217
- p0656: 0; = IF(p0392<0.5;-SQRT(p0007*EXP(p0524^2*p0008)-p0007);SQRT(p0007*EXP(p0524^2*p0008)-p0007))
- p0565: 0; = IF(p0301<0.5;-SQRT(p0007*EXP(p0433^2*p0008)-p0007);SQRT(p0007*EXP(p0433^2*p0008)-p0007))
- p2252: 1.68821e-7; = p2222*p2198
- p2316: 3.90237e-5; = p2224*p2183
- p2802: 0; = p2411*(p1019+p1021)
- p2471: 0; = p2275*p1123
- p2301: 0.00190335; = p2227*p2208
- p2117: 0.585147
- p1633: 0
- p1506: 3
- p2657: 2.34046e-7; = p2266*(p1078+p1080)
- p4519: 2.17731e-6; = p1758*p3481
- p1170: 226.828; = p1169*p0801
- p2097: 0.40001
- p2357: 0.000380595; = p2225*p2185
- p3467: 0; = p3372*p1241
- p0211: 16.188
- p2845: 2.96679e-5; = p2259*(p1079+p1081)
- p0449: 0; = SQRT(2)*(IF((2*p0317-1)<0;-1;IF((2*p0317-1)>0;1;0))*SQRT(SQRT((2/(pi()*0.140012289)+LN(1-(2*p0317-1)^2)/2)^2-LN(1-(2*p0317-1)^2)/0.140012289)-(2/(pi()*0.140012289)+LN(1-(2*p0317-1)^2)/2)))
- p3169: 1.10733e-6; = p2388*p1082
- p0934: 0.000180338; = p0928*p0001/(p0818*p0002)
- p3062: 4.6248e-10; = p2281*p1023
- p1838: 0
- p1221: 0.0791463; = p1216*(1+p1220*p1217/100)
- p3244: 0; = p0791/100
- p1291: 0; = IF(p1287+p1290=p1264;0;IF(p1287+p1290+p1289>p1264;p1264-(p1287+p1290);p1289))
- p1038: 0.0115234
- p2866: 6.85449e-5; = p2280*(p1020+p1022)
- p2974: 1.21234e-5; = p2388*(p1079+p1081)
- p0254: 13.669
- p1860: 0
- p2576: 2.58014e-5; = p2380*p1073
- p4070: 1.76483e-5; = p1927*p3478
- p1584: 0
- p2961: 4.05156e-5; = p2375*(p1079+p1081)
- p1582: 0
- p1839: 0
- p0809: 0
- p0730: 0
- p3409: 0; = p3371*p1238
- p1091: 3.35918e-5; = IF(p1071=0;p1085*p0001/(p0818*p0002);0)
- p0222: 49.894
- p0374: 0.5
- p2269: 4.4046e-5; = p2226*p2215
- p3132: 0; = p2351*p1132
- p3385: 0; = p3366*p1234
- p0991: 0; = p0987*p0886
- p4513: 1.05254e-6; = p1962*p3480
- p2312: 0.0121376; = p2231*p2219
- p1846: 0
- p1559: 0
- p1625: 0
- p3113: 1.36814e-9; = p2332*p1023
- p0862: 0.191754; = p0674*1000/p0856
- p3301: 0; = if(and(p1232=0;p3252<>0);p3257*p3277*(p3297*p3290+(1-p3297)*p3294);0)
- p0911: 0.00561077
- p2564: 7.87428e-7; = p2368*p1014
- p1166: 1.37976e-6; = p1164/p0818
- p2055: 5.59471
- p3873: 0; = p1936*p3477
- p0825: 7.48888e8; = p0818*p0822
- p0990: 0; = p0986*p0886
- p1782: 0
- p2130: 6.11061e-7; = p2015*p2058*p2092/(p0818*1000)
- p1812: 0
- p0901: 0.0425476
- p2263: 6.15931e-5; = p2226*p2209
- p2207: 0.00792616; = p1119-p2205-p2204-p2206
- p1714: 0.804436
- p2521: 9.93564e-6; = p2325*p1014
- p2753: 0.000133148; = p2362*(p1019+p1021)
- p1117: 0.000903153; = IF(p1071=0;p1107/(p1112*p0818);0)
- p4925: 3.84246e-6; = p1962*p3482
- p1906: 0
- p3279: 0
- p0803: 0
- p1557: 0
- p2172: 0.311114; = p2166-(p2167+p2168+p2169+p2170)
- p2909: 3.3594e-6; = p2323*(p1020+p1022)
- p0671: 0
- p0284: 0.5
- p1207: 160.686; = if(p1193>0;0;(p1194*p1050/p1057+p1195*p1051/p1058+p1196*p1052/p1059+p1197*p1053/p1060+p1198*p1054/p1061+p1199*p1055/p1062+p1200*p1056/p1063)/(p0702*1000)+(p1201*p1109/p1114+p1202*p1110/p1115)/(p0702*1000)+p1203*p1170/p0801+p1204*p1176/p0801)
- p3229: 1.37976e-6; = p1164/p0818
- p2777: 2.62657e-5; = p2386*(p1078+p1080)
- p2509: 0.000402165; = p2313*p1123
- p0105: 17.486
- p1123: 0.3719; = if(p1121=0;p0717/100;0)
- p0273: 0.5
- p2578: 0.000145885; = p2382*p1073
- p2395: 0; = p2234*p2184
- p1074: 0.48281; = IF(p1071=0;p0712/100;0)
- p1829: 0
- p3468: 0; = p3373*p1241
- p1164: 1108.91; = p1163*p0801
- p2830: 2.10782e-6; = p2244*(p1020+p1022)
- p3895: 0; = p1962*p3477
- p0121: 17.121
- p2355: 0.00069213; = p2225*p2183
- p3400: 0; = p3362*p1238
- p1935: 0
- p4885: 7.45661e-7; = p1918*p3482
- p1764: 0
- p2720: 6.8268e-8; = p2329*(p1019+p1021)
- p3801: 0; = p1864*p3477
- p1223: 0.56
- p2727: 0; = p2336*(p1078+p1080)
- p2742: 0; = p2351*(p1128+p1130)
- p3439: 0; = p3363*p1240
- p3042: 7.28589e-6; = p2261*p1082
- p3071: 1.68794e-11; = p2290*p1023
- p3438: 0; = p3362*p1240
- p4740: 2.01329e-6; = p1773*p3482
- p1137: 0; = if(p1121=0;p1131*(p0716/100)*p0703*1000;0)
- p1749: 0
- p3436: 0; = p3379*p1239
- p1969: 0; = p0803
- p2867: 9.86515e-6; = p2281*(p1020+p1022)
- p5028: 0; = p1855*p3483
- p0827: 0; = p0818*p0819*p0823
- p1872: 0
- p3051: 1.00033e-7; = p2270*p1082
- p0639: 0; = IF(p0375<0.5;-SQRT(p0007*EXP(p0507^2*p0008)-p0007);SQRT(p0007*EXP(p0507^2*p0008)-p0007))
- p0952: 0; = if(and(p0683>0;or(p0807=56;p0807=100;and(p0807=60;p0901>0.06)));p0934;0)
- p1577: 0
- p1302: 0; = IF(p1297+p1300+p1301=p1262;0;p1262-(p1297+p1300+p1301))
- p2639: 6.11609e-5; = p2248*(p1019+p1021)
- p2861: 0; = p2275*(p1129+p1131)
- p2929: 0; = p2343*(p1079+p1081)
- p0930: 37689; = p0801*p0924
- p2690: 0.000397348; = p2299*(p1078+p1080)
- p0023: 86.321
- p2113: 0.832356
- p3458: 0; = p3363*p1241
- p1109: 2.61964e6; = IF(p1071=0;p1105*p1103*p1095;0)
- p3118: 0; = p2337*p1082
- p3251: 0; = p1252-(p3252+p3253+p3254+p3255+p3256)
- p2914: 8.07505e-5; = p2328*(p1020+p1022)
- p0452: 0; = SQRT(2)*(IF((2*p0320-1)<0;-1;IF((2*p0320-1)>0;1;0))*SQRT(SQRT((2/(pi()*0.140012289)+LN(1-(2*p0320-1)^2)/2)^2-LN(1-(2*p0320-1)^2)/0.140012289)-(2/(pi()*0.140012289)+LN(1-(2*p0320-1)^2)/2)))
- p1678: 0
- p3865: 0; = p1928*p3477
- p1789: 0
- p2596: 0; = p2400*p1014
- p2411: 0; = p2234*p2201
- p0571: 0; = IF(p0307<0.5;-SQRT(p0007*EXP(p0439^2*p0008)-p0007);SQRT(p0007*EXP(p0439^2*p0008)-p0007))
- p3233: 0.60394
- p0027: 18.387
- p0531: 0; = SQRT(2)*(IF((2*p0399-1)<0;-1;IF((2*p0399-1)>0;1;0))*SQRT(SQRT((2/(pi()*0.140012289)+LN(1-(2*p0399-1)^2)/2)^2-LN(1-(2*p0399-1)^2)/0.140012289)-(2/(pi()*0.140012289)+LN(1-(2*p0399-1)^2)/2)))
- p2182: 0.00555374; = p1050/p0818
- p1528: 12
- p1210: 0.46
- p1161: 240000; = p0801
- p0856: 240000; = p0801
- p3659: 0; = p1928*p3476
- p4926: 1.86105e-5; = p1963*p3482
- p0293: 0.5
- p2259: 0.000181867; = p2226*p2205
- p2028: 2.46803e-5; = p2015*p2026*p2027/(p0818*1000)
- p0768: 44.299; = p0108*(1+p0636*p0240/100)
- p4213: 2.90935e-7; = p1864*p3479
- p1983: 50
- p2717: 8.51601e-5; = p2326*(p1019+p1021)
- p0743: 0.23; = p0083*(1+p0611*p0215/100)
- p3217: 0.010839; = p3213*p1228
- p2544: 0; = p2348*p1073
- p0667: 0; = IF(p0403<0.5;-SQRT(p0007*EXP(p0535^2*p0008)-p0007);SQRT(p0007*EXP(p0535^2*p0008)-p0007))
- p2282: 0.000591634; = p2223*p2188
- p2189: 0.000429834; = p1053/p0818
- p4046: 3.8411e-5; = p1903*p3478
- p2466: 2.277e-6; = p2270*p1073
- p3443: 0; = p3367*p1240
- p3145: 5.68451e-9; = p2364*p1023
- p2086: 0.0617647
- p2624: 0; = p2428*p1123
- p0908: 0.00169306
- p2336: 0; = p2228*p2204
- p0646: 0; = IF(p0382<0.5;-SQRT(p0007*EXP(p0514^2*p0008)-p0007);SQRT(p0007*EXP(p0514^2*p0008)-p0007))
- p0402: 0.5
- p2320: 3.92397e-6; = p2224*p2187
- p2319: 2.72644e-5; = p2224*p2186
- p3210: 0; = p2429*p1132
- p0926: 0; = IF(p0918+p0923+p0924+p0925=1;0;IF(p0918+p0923+p0924+p0925+p0922>1;1-(p0918+p0923+p0924+p0925);p0922))
- p4664: 9.47769e-6; = p1903*p3481
- p0081: 1.149
- p1242: 0; = if(p1232>0;0;p1234*(p0725/100)*p0723*1000)
- p2692: 0.000918958; = p2301*(p1078+p1080)
- p0287: 0.5
- p2661: 3.24141e-6; = p2270*(p1078+p1080)
- p1672: 0
- p1333: 0.000247097; = p1332*p0001/(p0818*p0002)
- p2405: 0; = p2234*p2195
- p1312: 0; = IF(p1307+p1310+p1311=p1266;0;p1266-(p1307+p1310+p1311))
- p2565: 1.29244e-6; = p2369*p1014
- p1211: 0.6
- p2455: 6.16819e-5; = p2259*p1073
- p4592: 2.81769e-6; = p1831*p3481
- p0321: 0.5
- p3205: 0; = p2424*p1082
- p2887: 0.000310494; = p2301*(p1079+p1081)
- p0422: 0; = SQRT(2)*(IF((2*p0290-1)<0;-1;IF((2*p0290-1)>0;1;0))*SQRT(SQRT((2/(pi()*0.140012289)+LN(1-(2*p0290-1)^2)/2)^2-LN(1-(2*p0290-1)^2)/0.140012289)-(2/(pi()*0.140012289)+LN(1-(2*p0290-1)^2)/2)))
- p1190: 5.41525e-8; = p1188/p0818
- p0114: 36.08
- p0716: 62.139; = p0056*(1+p0584*p0188/100)
- p1306: 0; = p1302*p1252/p0818
- p0550: 0; = IF(p0286<0.5;-SQRT(p0007*EXP(p0418^2*p0008)-p0007);SQRT(p0007*EXP(p0418^2*p0008)-p0007))
- p3189: 0; = p2408*p1023
- p2389: 0; = p2233*p2218
- p0226: 37.422
- p2687: 0.00054372; = p2296*(p1019+p1021)
- p2040: 0
- p2010: 0.00242831; = ((p1984*p1985+p1990*p1991+p1996*p1997+p2004*p2005)/p0818)*p0005*p0002/1000
- p3248: 0
- p3266: 0
- p2278: 7.34265e-5; = p2223*p2184
- p2952: 0.000144886; = p2366*(p1020+p1022)
- p1241: 0; = if(p1232>0;0;IF(p1234+p1238+p1239+p1240=1;0;1-(p1234+p1238+p1239+p1240)))
- p2567: 0.000752231; = p2371*p1014
- p2816: 0; = p2425*(p1078+p1080)
- p2148: 4.3963e-8; = p2015*p2076*p2110/(p0818*1000)
- p2863: 9.81086e-5; = p2277*(p1020+p1022)
- p0975: 0.0128885; = p0973*p0974/p0818
- p2966: 1.241e-5; = p2380*(p1079+p1081)
- p1880: 0
- p2222: 0.0229891; = if(p0765*p0769+p0766*p0770+p0767*p0771+p0768*p0772=0;0;p0769*p0765/(p0765*p0769+p0766*p0770+p0767*p0771+p0768*p0772))
- p1344: 90557.9; = IF(p1318=0;p1327*p0801;0)
- p0152: 0
- p0925: 0; = IF(p0918+p0923+p0924=1;0;IF(p0918+p0923+p0924+p0921>1;1-(p0918+p0923+p0924);p0921))
- p0704: 86.477; = p0044*(1+p0572*p0176/100)
- p1760: 1.24425e-6; = p1352*1000/p0818
- p5306: 7.17993e-6; = p1927*p3484
- p2240: 1.54114e-5; = p2222*p2185
- p1637: 0
- p2772: 1.58586e-5; = p2381*(p1078+p1080)
- p0210: 0
- p0757: 0
- p3213: 0.112803; = p1222*12.0107/100.0869
- p2449: 1.15063e-7; = p2253*p1014
- p1913: 0
- p4304: 4.9459e-6; = p1955*p3479
- p2039: 7.67857e-7; = p2015*p2037*p2038/(p0818*1000)
- p1581: 0
- p2274: 0; = p2230*p2220
- p2492: 0.000353598; = p2296*p1014
- p2587: 0; = p2391*p1123
- p0259: 42.591
- p3645: 0; = p1914*p3476
- p0963: 4.4246e-5; = if(and(p0683>0;or(p0807=480;p0807=32;p0807=1;and(p0807=60;p0901<0.03)));p0939;0)
- p0997: 0; = if(p0888=0;0;if((p0695*p0694*1000*p0696/100)/p0888>1;1;(p0695*p0694*1000*p0696/100)/p0888))
- p1828: 0
- p2090: 0.40001
- p2093: 0.260958
- p0758: 0
- p2386: 5.44018e-5; = p2229*p2215
- p0902: 0
- p2184: 0.000194626; = p1051/p0818
- p1616: 0
- p0635: 0; = IF(p0371<0.5;-SQRT(p0007*EXP(p0503^2*p0008)-p0007);SQRT(p0007*EXP(p0503^2*p0008)-p0007))
- p2495: 0.000279125; = p2299*p1073
- p0828: 0; = if(p0827=0;0;p0819-p0827/p0818)
- p1141: 2.40613e-5; = if(p1121=0;p1135*p0001/(p0818*p0002);0)
- p1769: 0
- p1798: 0
- p2337: 0; = p2228*p2205
- p3144: 7.02429e-10; = p2363*p1023
- p0894: 0.2
- p2443: 7.13566e-6; = p2247*p1014
- p0606: 0; = IF(p0342<0.5;-SQRT(p0007*EXP(p0474^2*p0008)-p0007);SQRT(p0007*EXP(p0474^2*p0008)-p0007))
- p0354: 0.5
- p1936: 1.49309e-5; = p1528*1000/p0818
- p2573: 2.46704e-5; = p2377*p1073
- p2217: 0.000975331; = p1118-p2216
- p1963f: 1.91771e-5; = p1647*p1851+p1648*p1852+p1649*p1853+p1650*p1854+p1651*p1855+p1652*p1856+p1653*p1857+p1654*p1858+p1655*p1859+p1656*p1860+p1657*p1861+p1658*p1862+p1659*p1863+p1660*p1864+p1661*p1865+p1662*p1866+p1663*p1867+p1664*p1868+p1665*p1869+p1666*p1870
- p3414: 0; = p3376*p1238
- p2724: 2.79598e-5; = p2333*(p1019+p1021)
- p2000: 4000
- p3052: 8.96543e-7; = p2271*p1082
- p3129: 0; = p2348*p1082
- p1034: 2.63179e-5; = IF(p1012=0;p1028*p0001/(p0818*p0002);0)
- p2749: 0.000230506; = p2358*(p1019+p1021)
- p3159: 8.9989e-6; = p2378*p1082
- p0262: 31.654
- p3119: 0; = p2338*p1082
- p2070: 0.282
- p3302: 0; = if(and(p1232=0;p3252<>0);p3258*(p3278*(p3282*p1256+p3286*(p1253+p1257)+p1258*p3288+p3297*p3287));0)
- p3027: 2.84434e-11; = p2246*p1023
- p2380: 7.60744e-5; = p2229*p2209
- p2237: 0.000127676; = p2222*p2182
- p2371: 0.00242655; = p2225*p2200
- p2451: 1.30589e-5; = p2255*p1014
- p3320: 0; = if(and(p1232=0;p3253<>0);p3253*(p3264-p3315)/p3316;0)
- p3310: 0; = if(and(p1232=0;p3252<>0);IF((p3306+p3307+p3308+p3309)+(p3252*(p3257*(1-p3277))/p3305)>p3252;p3252-(p3306+p3307+p3308+p3309);p3252*(p3257*(1-p3277))/p3305);0)
- p2154: 1.14205e-7; = p2015*p2082*p2116/(p0818*1000)
- p3106: 3.20505e-10; = p2325*p1023
- p0857: 2.66422; = p0856*p0001*p0003/(p0818*p0002)
- p2450: 3.046e-5; = p2254*p1014
- p1227: 0.000266422; = IF(p1221=0;0;p1226*p0001/(p0818*p0002))
- p1725: 0
- p3288: 0
- p1881: 0
- p0694: 205.644; = p0034*(1+p0562*p0166/100)
- p2769: 0.000291594; = p2378*(p1078+p1080)
- p0736: 0
- p3252: 0; = p1252*(p1267*(1-p3247)+p1270*(1-p3248)+p1271*(1-p3249)+p1272*(1-p3250))
- p2374: 0.00171648; = p2225*p2203
- p2908: 2.93492e-6; = p2322*(p1020+p1022)
- p1343: 0; = p1342*p0001/(p0818*p0002)
- p2409: 0; = p2234*p2199
- p1947: 0
- p1856: 0
- p2322: 1.37589e-5; = p2224*p2189
- p0155: 4.137
- p1324: 0.228847; = IF(((p0745*1000*p0751/100)+(p0754*1000*p0760/100))/p0801<0;0;((p0745*1000*p0751/100)+(p0754*1000*p0760/100))/p0801)
- p2461: 0.000118115; = p2265*p1073
- p0016: 37.689
- p2173: 0.122754; = p0895*p0898/p0818
- p2879: 0.000343961; = p2293*(p1020+p1022)
- p2852: 7.90786e-8; = p2266*(p1079+p1081)
- p1790: 0
- p3222: 0.224242; = IF(p3216=0;0;p1223*40.078/100.0869)
- p1953: 0
- p1090: 9.94203e-5; = IF(p1071=0;p1084*p0001/(p0818*p0002);0)
- p3070: 4.46171e-8; = p2289*p1023
- p1172: 2.8223e-7; = p1170/p0818
- p0082: 93.523
- p3375: 0; = if(p1232=0;p3246*p3357/p0818;0)
- p0622: 0; = IF(p0358<0.5;-SQRT(p0007*EXP(p0490^2*p0008)-p0007);SQRT(p0007*EXP(p0490^2*p0008)-p0007))
- p1275: 0; = p1271*p1252/p0818
- p2991: 0; = p2405*(p1020+p1022)
- p0953: 0; = if(and(p0683>0;or(p0807=56;p0807=100;and(p0807=60;p0901>0.06)));p0935;0)
- p1771: 0
- p2555: 2.15748e-5; = p2359*p1014
- p1060: 0.21
- p2843: 1.48262e-5; = p2257*(p1020+p1022)
- p0903: 0.0197726
- p2363: 7.02429e-5; = p2225*p2191
- p3335: 0; = IF(or(p3254=0;p1232>0);0;p3270*(p3280*(p3283*p1256+p3286*(p1253+p1257)+p1258*p3288+p3300*p3287)))
- p3523: 0; = p1792*p3476
- p3366: 0; = if(p1232=0;p3244*p3360/p0818;0)
- p1814: 0
- p2764: 7.13711e-5; = p2373*(p1019+p1021)
- p0485: 0; = SQRT(2)*(IF((2*p0353-1)<0;-1;IF((2*p0353-1)>0;1;0))*SQRT(SQRT((2/(pi()*0.140012289)+LN(1-(2*p0353-1)^2)/2)^2-LN(1-(2*p0353-1)^2)/0.140012289)-(2/(pi()*0.140012289)+LN(1-(2*p0353-1)^2)/2)))
- p3143: 2.79325e-9; = p2362*p1023
- p2957: 0.000517608; = p2371*(p1020+p1022)
- p3103: 1.37589e-10; = p2322*p1023
- p3294: 0
- p0888: 0; = p0686*1000*p0687*p0884/100
- p1671: 0
- p0570: 0; = IF(p0306<0.5;-SQRT(p0007*EXP(p0438^2*p0008)-p0007);SQRT(p0007*EXP(p0438^2*p0008)-p0007))
- p1157: 0.217341
- p2052: 1.10947e-6; = p2015*p2049*(1-p2050)/(p0818*1000)
- p2321: 5.0198e-5; = p2224*p2188
- p0138: 77.291
- p3323: 0; = if(and(p1232=0;p3255<>0);p3265*p3277*(p3299*p3291+(1-p3299)*p3295);0)
- p2601: 0; = p2405*p1014
- p4473: 2.04254e-7; = p1918*p3480
- p2785: 0; = p2394*(p1019+p1021)
- p2840: 2.09594e-5; = p2254*(p1020+p1022)
- p2042: 0.07
- p3008: 0; = p2422*(p1079+p1081)
- p1928: 1.24425e-6; = p1520*1000/p0818
- p3298: 0; = if(p1283+p1284+p1285+p1286=0;0;p1283/(p1283+p1284+p1285+p1286))
- p2676: 2.22504e-5; = p2285*(p1019+p1021)
- p0223: 32.69
- p1999: 8.33397e7; = (p1228+p1229)*p0818+p1164
- p1052: 684552; = IF(p1012=0;p1045*p1036;0)
- p0523: 0; = SQRT(2)*(IF((2*p0391-1)<0;-1;IF((2*p0391-1)>0;1;0))*SQRT(SQRT((2/(pi()*0.140012289)+LN(1-(2*p0391-1)^2)/2)^2-LN(1-(2*p0391-1)^2)/0.140012289)-(2/(pi()*0.140012289)+LN(1-(2*p0391-1)^2)/2)))
- p2014: 802238; = p0833*p2011*p2013
- p4881: 2.23698e-7; = p1914*p3482
- p0490: 0; = SQRT(2)*(IF((2*p0358-1)<0;-1;IF((2*p0358-1)>0;1;0))*SQRT(SQRT((2/(pi()*0.140012289)+LN(1-(2*p0358-1)^2)/2)^2-LN(1-(2*p0358-1)^2)/0.140012289)-(2/(pi()*0.140012289)+LN(1-(2*p0358-1)^2)/2)))
- p2691: 0.00329915; = p2300*(p1078+p1080)
- p0726: 0
- p2525: 4.43968e-8; = p2329*p1014
- p2121: 0.822447
- p0703: 240; = p0043*(1+p0571*p0175/100)
- p2238: 2.80264e-5; = p2222*p2183
- p3235: 0.118093
- p1115: 0.237849
- p1009: 0; = p1005*p0001*p0004/(p0818*p0002)
- p1558: 0
- p2166: 0.642175; = p2165*p0824
- p3396: 0; = p3377*p1234
- p1737: 0
- p1586: 0
- p1150: 6.92231e6; = if(p1121=0;p1149*p1146*p1145;0)
- p4679: 1.28077e-6; = p1918*p3481
- p0548: 0; = IF(p0284<0.5;-SQRT(p0007*EXP(p0416^2*p0008)-p0007);SQRT(p0007*EXP(p0416^2*p0008)-p0007))
- p0798: 77.291; = p0138*(1+p0666*p0270/100)
- p2569: 4.64149e-5; = p2373*p1014
- p1818: 0
- p1165: 0.000266422; = p0801*p0001/(p0818*p0002)
- p3416: 0; = p3378*p1238
- p0897: 0
- p2242: 2.81815e-6; = p2222*p2187
- p1095: 1.06317e7; = IF(p1071=0;p0797*p0702*1000*p0798/100;0)
- p3025: 9.8815e-11; = p2244*p1023
- p3293: 0
- p3362: 0; = if(p1232=0;p3244*p3356/p0818;0)
- p1004: 0; = p1000*p0888
- p0698: 0
- p1520: 1
- p1822: 0
- p0022: 240
- p0992: 0; = p0988*p0001*p0004/(p0818*p0002)
- p3407: 0; = p3369*p1238
- p1710: 0.757148
- p2838: 3.60113e-8; = p2252*(p1020+p1022)
- p0475: 0; = SQRT(2)*(IF((2*p0343-1)<0;-1;IF((2*p0343-1)>0;1;0))*SQRT(SQRT((2/(pi()*0.140012289)+LN(1-(2*p0343-1)^2)/2)^2-LN(1-(2*p0343-1)^2)/0.140012289)-(2/(pi()*0.140012289)+LN(1-(2*p0343-1)^2)/2)))
- p1209: 122.545; = p1206*p0818*p0822/p0801
- p1963b: 2.75186e-5; = p1569*p1773+p1570*p1774+p1571*p1775+p1572*p1776+p1573*p1777+p1574*p1778+p1575*p1779+p1576*p1780+p1577*p1781+p1578*p1782+p1579*p1783+p1580*p1784+p1581*p1785+p1582*p1786+p1583*p1787+p1584*p1788+p1585*p1789+p1586*p1790+p1587*p1791
- p3430: 0; = p3373*p1239
- p0445: 0; = SQRT(2)*(IF((2*p0313-1)<0;-1;IF((2*p0313-1)>0;1;0))*SQRT(SQRT((2/(pi()*0.140012289)+LN(1-(2*p0313-1)^2)/2)^2-LN(1-(2*p0313-1)^2)/0.140012289)-(2/(pi()*0.140012289)+LN(1-(2*p0313-1)^2)/2)))
- p3177: 0; = p2396*p1023
- p1255: 0; = if(p1232>0;0;p0737/100)
- p1873: 0
- p2169: 0.00108724; = p2166*(p0908)
- p2999: 0; = p2413*(p1020+p1022)
- p3186: 0; = p2405*p1023
- p3021: 1.54114e-10; = p2240*p1023
- p0797: 57.314; = p0137*(1+p0665*p0269/100)
- p0137: 57.314
- p3269: 0
- p1285: 0; = p1281*p1252/p0818
- p3433: 0; = p3376*p1239
- p3259: 0
- p3075: 6.91313e-9; = p2294*p1023
- p1656: 0
- p2923: 0; = p2337*(p1079+p1081)
- p1018: 0.11423; = IF(p1012=0;p0709/100;0)
- p0645: 0; = IF(p0381<0.5;-SQRT(p0007*EXP(p0513^2*p0008)-p0007);SQRT(p0007*EXP(p0513^2*p0008)-p0007))
- p1086: 0; = IF(p1071=0;p1080*(p0710/100)*p0703*1000;0)
- p2805: 0; = p2414*(p1078+p1080)
- p1062: 0.16
- p3398: 0; = p3379*p1234
- p2968: 7.01683e-5; = p2382*(p1079+p1081)
- p1296: 0; = p1292*p1252/p0818
- p2423: 0; = p2235*p2213
- p3277: 0
- p4759: 6.78552e-6; = p1792*p3482
- p3067: 3.77748e-9; = p2286*p1023
- p2821: 0; = p2430*(p1128+p1130)
- p2546: 0; = p2350*p1123
- p3462: 0; = p3367*p1241
- p1273: 0; = p1267*p1252/p0818
- p2803: 0; = p2412*(p1019+p1021)
- p1134: 71485.7; = if(p1121=0;p1128*(p0716/100)*p0703*1000;0)
- p0998: 0; = if(p0888=0;0;if((p0699*p0698*1000*p0700/100)/p0888>1;1;(p0699*p0698*1000*p0700/100)/p0888))
- p3066: 4.66779e-10; = p2285*p1023
- p0177: 47.251
- p3379: 0; = if(p1232=0;p3246*p3361/p0818;0)
- p2780: 0; = p2389*(p1128+p1130)
- p0379: 0.5
- p1036: 1.35743e7; = IF(p1012=0;p0795*p0702*1000*p0796/100;0)
- p0941: 0; = if(and(p0683=0;p0947=0);p0935;0)
- p1016: 0.09908; = IF(p1012=0;p0707/100;0)
- p0260: 10.939
- p2358: 0.000483566; = p2225*p2186
- p3690: 0; = p1963*p3476
- p1280: 0; = IF(p1277=p1263;0;IF(p1277+p1278>p1263;p1263-p1277;p1278))
- p4252: 2.15292e-5; = p1903*p3479
- p2683: 2.90356e-6; = p2292*(p1019+p1021)
- p2110: 0.856281
- p3308: 0; = if(and(p1232=0;p3252<>0);p3252*(p3259-p3303)/p3305;0)
- p2593: 0; = p2397*p1014
- p2533: 0; = p2337*p1073
- p2774: 2.89073e-7; = p2383*(p1078+p1080)
- p0929: 0; = p0801*p0923
- p0668: 0; = IF(p0404<0.5;-SQRT(p0007*EXP(p0536^2*p0008)-p0007);SQRT(p0007*EXP(p0536^2*p0008)-p0007))
- p3348: 0; = if(and(p1232=0;p3256<>0);p3276*p3289;0)
- p3212: 0; = p2431*p1132
- p0684: 0
- p1966: 235000; = if(p0814=0;p0802;0)
- p1892: 0
- p0443: 0; = SQRT(2)*(IF((2*p0311-1)<0;-1;IF((2*p0311-1)>0;1;0))*SQRT(SQRT((2/(pi()*0.140012289)+LN(1-(2*p0311-1)^2)/2)^2-LN(1-(2*p0311-1)^2)/0.140012289)-(2/(pi()*0.140012289)+LN(1-(2*p0311-1)^2)/2)))
- p1933: 0
- p3191: 0; = p2410*p1023
- p1226: 240000; = IF(p1221=0;0;IF(p1193=0;p0801;0))
- p2144: 1.03352e-7; = p2015*p2072*p2106/(p0818*1000)
- p2543: 0; = p2347*p1073
- p2677: 0.000180065; = p2286*(p1019+p1021)
- p2134: 1.64991e-6; = p2015*p2062*p2096/(p0818*1000)
- p2341: 0; = p2228*p2209
- p2428: 0; = p2236*p2218
- p1113: 0.100377
- p1978: 267
- p1319: 0; = IF(((p0745*1000*p0746/100)+(p0754*1000*p0755/100))/p0801<0;0;((p0745*1000*p0746/100)+(p0754*1000*p0755/100))/p0801)
- p2673: 0.00028202; = p2282*(p1019+p1021)
- p2829: 7.69016e-6; = p2243*(p1020+p1022)
- p2644: 1.7693e-7; = p2253*(p1019+p1021)
- p2487: 8.58852e-7; = p2291*p1014
- p4276: 9.89179e-6; = p1927*p3479
- p1799: 0
- p3316: 0; = if(and(p1232=0;p3253<>0);1-(p3312+p3313+p3314+p3315);0)
- p1702: 0
- p1663: 0
- p1217: 29.3663
- p0051: 33.916
- p2366: 0.000679227; = p2225*p2195
- p0868: 0; = IF(p0858+p0864+p0865+p0866+p0867=1;0;IF(p0858+p0864+p0865+p0866+p0867+p0863>1;1-(p0858+p0864+p0865+p0866+p0867);p0863))
- p2797: 0; = p2406*(p1019+p1021)
- p2421: 0; = p2235*p2211
- p0403: 0.5
- p3695: 0; = p1758*p3477
- p0943: 0; = if(and(p0683=0;p0949=0);p0937;0)
- p2760: 1.98735e-6; = p2369*(p1019+p1021)
- p1834: 0
- p1735: 0
- p2440: 3.06327e-6; = p2244*p1014
- p1029: 2.07545; = IF(p1012=0;IF(p0801<p1023*(p0704/100)*p0703*1000;p0801;p1023*(p0704/100)*p0703*1000);0)
- p3480: 0.0164159; = if(p1328+p1330+p1332+p1334+p1336+p1338+p1340+p1342+p1344=0;0;p1336/(p1328+p1330+p1332+p1334+p1336+p1338+p1340+p1342+p1344))
- p0104: 86.477
- p2046: 10
- p1035: 2.30394e-9; = IF(p1012=0;p1029*p0001/(p0818*p0002);0)
- p1332: 222592; = p1321*p0801
- p2880: 0.000147464; = p2294*(p1020+p1022)
- p3864: 0; = p1927*p3477
- p2088: 0.798875
- p2947: 5.20541e-5; = p2361*(p1020+p1022)
- p4204: 1.42558e-5; = p1855*p3479
- p0976: 0; = IF(p0687=0;IF(OR(p0686=0;p0689=0);0;p0686*1000*p0689/100);0)
- p2759: 1.21081e-6; = p2368*(p1019+p1021)
- p0551: 0; = IF(p0287<0.5;-SQRT(p0007*EXP(p0419^2*p0008)-p0007);SQRT(p0007*EXP(p0419^2*p0008)-p0007))
- p3441: 0; = p3365*p1240
- p2985: 0; = p2399*(p1020+p1022)
- p1110: 1.7744e6; = IF(p1071=0;p1105*p1104*p1095;0)
- p3165: 9.32864e-8; = p2384*p1082
- p2788: 0; = p2397*(p1019+p1021)
- p1721: 0
- p2590: 0; = p2394*p1014
- p2814: 0; = p2423*(p1078+p1080)
- p2773: 0.000207675; = p2382*(p1078+p1080)
- p0890: 223542; = p0686*1000*p0687*p0885/100
- p2273: 0; = p2230*p2219
- p0781: 17.121; = p0121*(1+p0649*p0253/100)
- p2993: 0; = p2407*(p1020+p1022)
- p1809: 0
- p4315: 2.04254e-8; = p1760*p3480
- p1307: 0
- p2194: 0.214362
- p1159: 0.5
- p1648: 0
- p4675: 3.84231e-7; = p1914*p3481
- p2100: 0.705744
- p0672: 65.131; = p0012*(1+p0540*p0144/100)
- p2244: 9.8815e-6; = p2222*p2189
- p5128: 0; = p1955*p3483
- p2756: 0.00151041; = p2365*(p1019+p1021)
- p1007: 0; = p1003*p0001*p0004/(p0818*p0002)
- p3296: 0
- p2442: 8.81746e-7; = p2246*p1014
- p2606: 0; = p2410*p1014
- p1122: 0; = p1121*p0001/(p0818*p0002)
- p0969: 2.0717e7; = p0966*p0683*p0682*1000
- p2835: 5.86686e-6; = p2249*(p1020+p1022)
- p0446: 0; = SQRT(2)*(IF((2*p0314-1)<0;-1;IF((2*p0314-1)>0;1;0))*SQRT(SQRT((2/(pi()*0.140012289)+LN(1-(2*p0314-1)^2)/2)^2-LN(1-(2*p0314-1)^2)/0.140012289)-(2/(pi()*0.140012289)+LN(1-(2*p0314-1)^2)/2)))
- p2458: 4.61949e-5; = p2262*p1073
- p3392: 0; = p3373*p1234
- p2701: 0.000405967; = p2310*(p1078+p1080)
- p2642: 4.90293e-8; = p2251*(p1019+p1021)
- p0190: 31.704
- p3281: 0
- p2001: 400
- p2659: 5.6353e-6; = p2268*(p1078+p1080)
- p1895: 0
- p1646: 0
- p3137: 1.10495e-9; = p2356*p1023
- p2584: 2.52056e-5; = p2388*p1073
- p2548: 0; = p2352*p1123
- p1611: 0
- p0663: 0; = IF(p0399<0.5;-SQRT(p0007*EXP(p0531^2*p0008)-p0007);SQRT(p0007*EXP(p0531^2*p0008)-p0007))
- p3667: 0; = p1936*p3476
- p1715: 0
- p2085: 0.0335294
- p0823: 0
- p1194: 1.48
- p0161: 3.989
- p3085: 7.25131e-5; = p2304*p1082
- p2029: 6.16
- p2279: 0.000252913; = p2223*p2185
- p3321: 0; = if(and(p1232=0;p3253<>0);IF((p3317+p3318+p3319+p3320)+(p3253*(p3261*(1-p3277))/p3316)>p3253;p3253-(p3317+p3318+p3319+p3320);p3253*(p3261*(1-p3277))/p3316);0)
- p0584: 0; = IF(p0320<0.5;-SQRT(p0007*EXP(p0452^2*p0008)-p0007);SQRT(p0007*EXP(p0452^2*p0008)-p0007))
- p2686: 4.74276e-5; = p2295*(p1019+p1021)
- p0724: 0
- p1610: 0
- p3121: 0; = p2340*p1082
- p1019: 0.37221; = IF(p1012=0;IF(p1014=1;0;IF(p1014+p1015>1;1-p1014;p1015));0)
- p1056: 3.43511e6; = IF(p1012=0;p1049*p1036;0)
- p2248: 0.000128306; = p2222*p2193
- p0696: 0
- p2656: 0.000168142; = p2265*(p1078+p1080)
- p0707: 9.908; = p0047*(1+p0575*p0179/100)
- p3227: 0.00096461; = p3223*p1229
- p2112: 0.856281
- p2139: 2.49493e-7; = p2015*p2067*p2101/(p0818*1000)
- p2343: 0; = p2228*p2211
- p2142: 2.07558e-7; = p2015*p2070*p2104/(p0818*1000)
- p3135: 3.15304e-8; = p2354*p1023
- p0252: 35.186
- p3391: 0; = p3372*p1234
- p2556: 0.000275998; = p2360*p1014
- p2849: 1.00477e-5; = p2263*(p1079+p1081)
- p5334: 3.58996e-6; = p1955*p3484
- p2247: 2.30183e-5; = p2222*p2192
- p0708: 10.447; = p0048*(1+p0576*p0180/100)
- p2897: 0.00125182; = p2311*(p1129+p1131)
- p0454: 0; = SQRT(2)*(IF((2*p0322-1)<0;-1;IF((2*p0322-1)>0;1;0))*SQRT(SQRT((2/(pi()*0.140012289)+LN(1-(2*p0322-1)^2)/2)^2-LN(1-(2*p0322-1)^2)/0.140012289)-(2/(pi()*0.140012289)+LN(1-(2*p0322-1)^2)/2)))
- p2585: 0; = p2389*p1123
- p0185: 46.652
- p3319: 0; = if(and(p1232=0;p3253<>0);p3253*(p3263-p3314)/p3316;0)
- p1051: 156421; = IF(p1012=0;p1044*p1036;0)
- p2736: 0; = p2345*(p1078+p1080)
- p0741: 1.149; = p0081*(1+p0609*p0213/100)
- p1753: 0
- p1639: 0
- p1768: 0
- p1865: 0
- p1871: 0
- p2393: 0; = p2234*p2182
- p0826: 0.0682; = 1-p0825/p0818
- p2920: 1.80073e-6; = p2334*(p1020+p1022)
- p0181: 57.232
- p2147: 5.36062e-8; = p2015*p2075*p2109/(p0818*1000)
- p2595: 0; = p2399*p1014
- p2053: 1.45647
- p3373: 0; = if(p1232=0;p3245*p3361/p0818;0)
- p2598: 0; = p2402*p1014
- p1063: 0.455
- p2607: 0; = p2411*p1014
- p1736: 0
- p2824: 5.9783e-6; = p2238*(p1020+p1022)
- p0579: 0; = IF(p0315<0.5;-SQRT(p0007*EXP(p0447^2*p0008)-p0007);SQRT(p0007*EXP(p0447^2*p0008)-p0007))
- p2168: 0.0126974; = p2166*(p0903)
- p4491: 2.45105e-7; = p1936*p3480
- p1080: 0; = IF(p1071=0;IF(p1073+p1078+p1079=1;0;IF(p1073+p1078+p1079+p1076>1;1-(p1073+p1078+p1079);p1076));0)
- p1824: 0
- p0320: 0.5
- p0455: 0; = SQRT(2)*(IF((2*p0323-1)<0;-1;IF((2*p0323-1)>0;1;0))*SQRT(SQRT((2/(pi()*0.140012289)+LN(1-(2*p0323-1)^2)/2)^2-LN(1-(2*p0323-1)^2)/0.140012289)-(2/(pi()*0.140012289)+LN(1-(2*p0323-1)^2)/2)))
- p2989: 0; = p2403*(p1020+p1022)
- p0236: 3.779
- p1729: 0
- p1083: 62913.6; = IF(p1071=0;p1073*(p0710/100)*p0703*1000;0)
- p0928: 162453; = p0801*p0918
- p5234: 1.03475e-5; = p1855*p3484
- p3117: 0; = p2336*p1082
- p2150: 9.02399e-8; = p2015*p2078*p2112/(p0818*1000)
- p1288: 0
- p0755: 0
- p2937: 0; = p2351*(p1129+p1131)
- p2550: 0.000977441; = p2354*p1014
- p1447: 49
- p2640: 1.31106e-5; = p2249*(p1019+p1021)
- p1590: 0
- p1774: 0
- p2915: 3.05493e-8; = p2329*(p1020+p1022)
- p1653: 0
- p0691: 0
- p0873: 0; = p0872*p0001*p0003/(p0818*p0002)
- p2179: 0.0257771; = p0970+p0971+p0972
- p1973: 0; = if(p0807=480;p1968*p0001/(p0818*p0002);0)
- p1076: 0; = IF(p1071=0;p0714/100;0)
- p1957: 0
- p0238: 12.521
- p1623: 0
- p3199: 0; = p2418*p1082
- p1945: 0
- p2519: 4.88216e-6; = p2323*p1014
- p0675: 0
- p1553: 0
- p2730: 0; = p2339*(p1078+p1080)
- p1691: 0
- p1673: 0
- p2131: 2.35449e-7; = p2015*p2059*p2093/(p0818*1000)
- p3100: 2.72644e-10; = p2319*p1023
- p2196: 0.0118263; = p1068-p2193-p2195
- p0216: 29.819
- p3477: 0; = if(p1328+p1330+p1332+p1334+p1336+p1338+p1340+p1342+p1344=0;0;p1330/(p1328+p1330+p1332+p1334+p1336+p1338+p1340+p1342+p1344))
- p2630: 2.1328e-6; = p2239*(p1019+p1021)
- p1773: 3.35946e-5; = p1365*1000/p0818
- p0183: 45.17
- p0576: 0; = IF(p0312<0.5;-SQRT(p0007*EXP(p0444^2*p0008)-p0007);SQRT(p0007*EXP(p0444^2*p0008)-p0007))
- p1249: 0; = if(p1232>0;0;p1244*p0001/(p0818*p0002))
- p3440: 0; = p3364*p1240
- p2095: 0.765734
- p3562: 0; = p1831*p3476
- p2808: 0; = p2417*(p1078+p1080)
- p2628: 6.08604e-5; = p2237*(p1019+p1021)
- p0280: 0.5
- p0777: 24.909; = p0117*(1+p0645*p0249/100)
- p2171: 0.0694748; = p2165*p0831
- p0113: 77.291
- p5137: 3.58996e-6; = p1758*p3484
- p3202: 0; = p2421*p1082
- p0754: 14.054; = p0094*(1+p0622*p0226/100)
- p3457: 0; = p3362*p1241
- p3285: 0
- p2798: 0; = p2407*(p1019+p1021)
- p2609: 0; = p2413*p1014
- p3079: 3.78677e-5; = p2298*p1082
- p2757: 0.000323774; = p2366*(p1019+p1021)
- p0833: 1.13391e9; = p0830+p0832
- p2776: 6.96024e-6; = p2385*(p1078+p1080)
- p1835: 0
- p0899: 8.95194e8; = p0825*p0896+(p0830+p0895)*p0824*p0898
- p3371: 0; = if(p1232=0;p3245*p3359/p0818;0)
- p2199: 1.61455e-5; = p1069-p2197-p2198
- p3017: 0; = p2431*(p1129+p1131)
- p1692: 0
- p1914: 3.73274e-6; = p1506*1000/p0818
- p1322: 0.519841; = IF(((p0745*1000*p0749/100)+(p0754*1000*p0758/100))/p0801<0;0;((p0745*1000*p0749/100)+(p0754*1000*p0758/100))/p0801)
- p0136: 86.477
- p3192: 0; = p2411*p1023
- p3164: 8.9211e-9; = p2383*p1082
- p3256: 0; = p1252*(p1307*(1-p3247)+p1310*(1-p3248)+p1311*(1-p3249)+p1312*(1-p3250))
- p2061: 0.518824
- p0499: 0; = SQRT(2)*(IF((2*p0367-1)<0;-1;IF((2*p0367-1)>0;1;0))*SQRT(SQRT((2/(pi()*0.140012289)+LN(1-(2*p0367-1)^2)/2)^2-LN(1-(2*p0367-1)^2)/0.140012289)-(2/(pi()*0.140012289)+LN(1-(2*p0367-1)^2)/2)))
- p0852: 0; = p0847*p0851^3+p0848*p0851^2+p0849*p0851+p0850
- p3474: 0; = p3379*p1241
- p2689: 0.00122704; = p2298*(p1078+p1080)
- p1192: 2.70763e-8; = p1188*p1191/p0818
- p3489: 0; = p1758*p3476
- p1679: 0
- p2224: 0.0320099; = if(p0765*p0769+p0766*p0770+p0767*p0771+p0768*p0772=0;0;p0771*p0767/(p0765*p0769+p0766*p0770+p0767*p0771+p0768*p0772))
- p0824: 0.902375
- p1015: 0.37221; = IF(p1012=0;p0706/100;0)
- p1174: 1.41115e-7; = p1170*p1173/p0818
- p1795: 0
- p0972: 0.0257771; = p0969/p0818
- p1918: 1.24425e-5; = p1510*1000/p0818
- p0988: 0; = p0982*p0886
- p4007: 5.19068e-7; = p1864*p3478
- p0120: 2.741
- p1323: 0.036496; = IF(((p0745*1000*p0750/100)+(p0754*1000*p0759/100))/p0801<0;0;((p0745*1000*p0750/100)+(p0754*1000*p0759/100))/p0801)
- p1287: 0
- p0442: 0; = SQRT(2)*(IF((2*p0310-1)<0;-1;IF((2*p0310-1)>0;1;0))*SQRT(SQRT((2/(pi()*0.140012289)+LN(1-(2*p0310-1)^2)/2)^2-LN(1-(2*p0310-1)^2)/0.140012289)-(2/(pi()*0.140012289)+LN(1-(2*p0310-1)^2)/2)))
- p2685: 0.000329535; = p2294*(p1019+p1021)
- p0989: 3.61079e6; = p0985*p0886
- p2745: 0.00150299; = p2354*(p1019+p1021)
- p0882: 8364; = p0869*p0856
- p5293: 6.33523e-7; = p1914*p3484
- p4534: 3.45808e-6; = p1773*p3481
- p0688: 0
- p2851: 5.68112e-5; = p2265*(p1079+p1081)
- p1905: 0
- p0610: 0; = IF(p0346<0.5;-SQRT(p0007*EXP(p0478^2*p0008)-p0007);SQRT(p0007*EXP(p0478^2*p0008)-p0007))
- p1229: 0.00760506; = IF(p1221=0;0;p1228*p1221)
- p1877: 0
- p0271: 30.409
- p0759: 0
- p2667: 0.000998767; = p2276*(p1019+p1021)
- p2294: 0.000691313; = p2223*p2201
- p1709: 0
- p0314: 0.5
- p2695: 0.00234967; = p2304*(p1078+p1080)
- p0049: 11.423
- p1882: 0
- p1125: 0.14534; = if(p1121=0;p0719/100;0)
- p0966: 1; = if(p0683=0;0;IF(p0684/100+p0965=1;0;1-(p0684/100+p0965)))
- p3330: 0; = if(and(p1232=0;p3255<>0);p3255*(p3267-p3325)/p3327;0)
- p3043: 2.02944e-6; = p2262*p1082
- p4510: 3.47232e-7; = p1955*p3480
- p0609: 0; = IF(p0345<0.5;-SQRT(p0007*EXP(p0477^2*p0008)-p0007);SQRT(p0007*EXP(p0477^2*p0008)-p0007))
- p3469: 0; = p3374*p1241
- p3038: 6.95054e-10; = p2257*p1023
- p0542: 0; = IF(p0278<0.5;-SQRT(p0007*EXP(p0410^2*p0008)-p0007);SQRT(p0007*EXP(p0410^2*p0008)-p0007))
- p0213: 22.344
- p0636: 0; = IF(p0372<0.5;-SQRT(p0007*EXP(p0504^2*p0008)-p0007);SQRT(p0007*EXP(p0504^2*p0008)-p0007))
- p0879: 0.510875; = p0878*p0001*p0003/(p0818*p0002)
- p3327: 0; = if(and(p1232=0;p3255<>0);1-(p3323+p3324+p3325+p3326);0)
- p3154: 1.49725e-9; = p2373*p1023
- p0515: 0; = SQRT(2)*(IF((2*p0383-1)<0;-1;IF((2*p0383-1)>0;1;0))*SQRT(SQRT((2/(pi()*0.140012289)+LN(1-(2*p0383-1)^2)/2)^2-LN(1-(2*p0383-1)^2)/0.140012289)-(2/(pi()*0.140012289)+LN(1-(2*p0383-1)^2)/2)))
- p1023: 1e-5; = IF(p1012=0;IF(p1014+p1019+p1020+p1021+p1022=1;0;1-(p1014+p1019+p1020+p1021+p1022));0)
- p4386: 4.49359e-7; = p1831*p3480
- p0520: 0; = SQRT(2)*(IF((2*p0388-1)<0;-1;IF((2*p0388-1)>0;1;0))*SQRT(SQRT((2/(pi()*0.140012289)+LN(1-(2*p0388-1)^2)/2)^2-LN(1-(2*p0388-1)^2)/0.140012289)-(2/(pi()*0.140012289)+LN(1-(2*p0388-1)^2)/2)))
- p2926: 0; = p2340*(p1079+p1081)
- p1456: 1
- p2198: 7.34353e-6; = 22.98976928*p2197/14.0067
- p3334: 0; = IF(or(p3254=0;p1232>0);0;p3269*p3277*(p3300*p3292+(1-p3300)*p3296))
- p0504: 0; = SQRT(2)*(IF((2*p0372-1)<0;-1;IF((2*p0372-1)>0;1;0))*SQRT(SQRT((2/(pi()*0.140012289)+LN(1-(2*p0372-1)^2)/2)^2-LN(1-(2*p0372-1)^2)/0.140012289)-(2/(pi()*0.140012289)+LN(1-(2*p0372-1)^2)/2)))
- p0002: 0.453592
- p0767: 44.411; = p0107*(1+p0635*p0239/100)
- p2078: 0.117
- p2426: 0; = p2235*p2216
- p1963e: 0; = p1628*p1832+p1629*p1833+p1630*p1834+p1631*p1835+p1632*p1836+p1633*p1837+p1634*p1838+p1635*p1839+p1636*p1840+p1637*p1841+p1638*p1842+p1639*p1843+p1640*p1844+p1641*p1845+p1642*p1846+p1643*p1847+p1644*p1848+p1645*p1849+p1646*p1850
- p2351: 0; = p2232*p2219
- p2415: 0; = p2235*p2205
- p3329: 0; = if(and(p1232=0;p3255<>0);p3255*(p3266-p3324)/p3327;0)
- p2669: 3.50009e-5; = p2278*(p1019+p1021)
- p0013: 120.484
- p0612: 0; = IF(p0348<0.5;-SQRT(p0007*EXP(p0480^2*p0008)-p0007);SQRT(p0007*EXP(p0480^2*p0008)-p0007))
- p2381: 3.28465e-5; = p2229*p2210
- p0372: 0.5
- p3116: 9.67789e-10; = p2335*p1023
- p0573: 0; = IF(p0309<0.5;-SQRT(p0007*EXP(p0441^2*p0008)-p0007);SQRT(p0007*EXP(p0441^2*p0008)-p0007))
- p1963j: 1.06842e-5; = p1725*p1929+p1726*p1930+p1727*p1931+p1728*p1932+p1729*p1933+p1730*p1934+p1731*p1935+p1732*p1936+p1733*p1937+p1734*p1938+p1735*p1939+p1736*p1940+p1737*p1941+p1738*p1942+p1739*p1943+p1740*p1944+p1741*p1945+p1742*p1946+p1743*p1947
- p3254: 0; = p1252*(p1287*(1-p3247)+p1290*(1-p3248)+p1291*(1-p3249)+p1292*(1-p3250))
- p2741: 0; = p2350*(p1128+p1130)
- p2722: 2.46356e-7; = p2331*(p1019+p1021)
- p1153: 0.365265
- p0006: 15
- p2437: 6.07011e-6; = p2241*p1014
- p1138: 510.037; = if(p1121=0;p1132*(p0716/100)*p0703*1000;0)
- p3102: 5.0198e-10; = p2321*p1023
- p2459: 2.08899e-5; = p2263*p1073
- p1276: 0; = p1272*p1252/p0818
- p1181: 0.000142822
- p2356: 0.000110495; = p2225*p2184
- p1869: 0
- p1779: 0
- p0878: 46021; = p0867*p0856
- p2430: 0; = p2236*p2220
- p3322: 0; = if(and(p1232=0;p3253<>0);p3253-(p3317+p3318+p3319+p3320+p3321);0)
- p2256: 6.06282e-6; = p2222*p2202
- p0900: 1.11384; = p0899/p0818
- p3107: 1.78652e-9; = p2326*p1023
- p2502: 2.40248e-5; = p2306*p1073
- p0880: 0; = p0868*p0856
- p0959: 0; = if(and(p0683>0;or(p0807=480;p0807=32;p0807=1;and(p0807=60;p0901<0.03)));p0935;0)
- p2176: 0.00304715; = p0895*p0913/p0818
- p0084: 4.131
- p0735: 0
- p2364: 0.000568451; = p2225*p2192
- p1878: 0
- p1064: 0.00677286; = IF(p1012=0;p1050/(p1057*p0818);0)
- p2794: 0; = p2403*(p1019+p1021)
- p1642: 0
- p2682: 1.32064e-6; = p2291*(p1019+p1021)
- p1786: 0
- p1272: 0; = IF(p1267+p1270+p1271=p1259;0;p1259-(p1267+p1270+p1271))
- p1718: 0
- p0247: 18.212
- p2713: 6.55861e-6; = p2322*(p1019+p1021)
- p3369: 0; = if(p1232=0;p3245*p3357/p0818;0)
- p2954: 5.41827e-7; = p2368*(p1020+p1022)
- p3184: 0; = p2403*p1023
- p1885: 0
- p2771: 3.67295e-5; = p2380*(p1078+p1080)
- p2211: 0.00564504; = p1120-p2209-p2208-p2210
- p0749: 24.015; = p0089*(1+p0617*p0221/100)
- p1215: 0.277778; = IF(p1214=0;0;(p1214-1.5)/(p1214-1)^2)
- p2255: 4.21256e-5; = p2222*p2201
- p2375: 0.000248364; = p2229*p2204
- p0981: 0; = p0978*p0001/(p0818*p0002)
- p2714: 7.50719e-6; = p2323*(p1019+p1021)
- p0214: 3.709
- p0046: 37.221
- p0773: 77.291; = p0113*(1+p0641*p0245/100)
- p1589: 0
- p0939: 4.4246e-5; = p0933*p0001/(p0818*p0002)
- p0843: 0.257182
- p0746: 0
- p1013: 0; = p1012*p0001/(p0818*p0002)
- p3350: 0; = if(and(p1232=0;p3256<>0);p3256*(p3273*p3277-p3345)/p3349;0)
- p0277: 0.5
- p3258: 0
- p1868: 0
- p5315: 2.53409e-6; = p1936*p3484
- p0408: 0; = SQRT(2)*(IF((2*p0276-1)<0;-1;IF((2*p0276-1)>0;1;0))*SQRT(SQRT((2/(pi()*0.140012289)+LN(1-(2*p0276-1)^2)/2)^2-LN(1-(2*p0276-1)^2)/0.140012289)-(2/(pi()*0.140012289)+LN(1-(2*p0276-1)^2)/2)))
- p4469: 6.12763e-8; = p1914*p3480
- p0965: 0; = IF(p0684/100=1;0;IF(p0684/100+p0685/100>1;1-p0684/100;p0685/100))
- p3026: 1.13107e-10; = p2245*p1023
- p0780: 2.741; = p0120*(1+p0648*p0252/100)
- p0702: 240; = p0042*(1+p0570*p0174/100)
- p2280: 0.000321339; = p2223*p2186
- p2103: 0.912485
- p1920: 0
- p0544: 0; = IF(p0280<0.5;-SQRT(p0007*EXP(p0412^2*p0008)-p0007);SQRT(p0007*EXP(p0412^2*p0008)-p0007))
- p0191: 62.973
- p4727: 7.45661e-8; = p1760*p3482
- p2580: 2.12342e-6; = p2384*p1073
- p3179: 0; = p2398*p1023
- p0373: 0.5
- p0253: 32.994
- p1012: 0
- p2473: 0.00014258; = p2277*p1014
- p2047: 2.7022e-14; = p2015*p2045/(p0818*1000000000000)
- p2857: 9.81565e-6; = p2271*(p1079+p1081)
- p2787: 0; = p2396*(p1019+p1021)
- p3239: 0.013074; = IF(p3238+p3235+p3236=1;0;1-(p3238+p3235+p3236))
- p2603: 0; = p2407*p1014
- p3399: 0; = p3380*p1234
- p2604: 0; = p2408*p1014
- p3138: 3.80595e-9; = p2357*p1023
- p0175: 0
- p1070: 0.00939366; = IF(p1012=0;p1056/(p1063*p0818);0)
- p1311: 0; = IF(p1307+p1310=p1266;0;IF(p1307+p1310+p1309>p1266;p1266-(p1307+p1310);p1309))
- p0860: 0.271379; = p0672*1000/p0856
- p2125: 1.12335e-6; = p2015*p2053*p2087/(p0818*1000)
- p1041: 0.330448
- p2460: 9.01958e-6; = p2264*p1073
- p1327a: 0.377325; = (p0745*1000/p0801)*(1-(p0746+p0747+p0748+p0749+p0750+p0751+p0752+p0753)/100)+(p0754*1000/p0801)*(1-(p0755+p0756+p0757+p0758+p0759+p0760+p0761+p0762)/100)
- p3449: 0; = p3373*p1240
- p0405: 0; = SQRT(2)*(IF((2*p0273-1)<0;-1;IF((2*p0273-1)>0;1;0))*SQRT(SQRT((2/(pi()*0.140012289)+LN(1-(2*p0273-1)^2)/2)^2-LN(1-(2*p0273-1)^2)/0.140012289)-(2/(pi()*0.140012289)+LN(1-(2*p0273-1)^2)/2)))
- p2478: 0.000183407; = p2282*p1014
- p2907: 1.07077e-5; = p2321*(p1020+p1022)
- p0094: 14.054
- p3356: 0; = if(p1232=0;p3306+p3317+p3328+p3339+p3350;0)
- p3290: 0
- p0669: 12.5442; = p0009*(1+p0537*p0141/100)
- p2236: 0; = 1-(p2230+p2231+p2232+p2233)
- p2960: 0.000366143; = p2374*(p1020+p1022)
- p1991: 2.5876e7; = (if(p1111=0;0;p1106/p1111)+if(p1112=0;0;p1107/p1112)+if(p1113=0;0;p1108/p1113)+if(p1114=0;0;p1109/p1114)+if(p1115=0;0;p1110/p1115))*(1+p1157)
- p4102: 0.000129551; = p1963*p3478
- p2369: 4.16915e-6; = p2225*p2198
- p1730: 0
- p0958: 0.000180338; = if(and(p0683>0;or(p0807=480;p0807=32;p0807=1;and(p0807=60;p0901<0.03)));p0934;0)
- p1778: 0
- p1916: 0
- p1339: 6.09698e-5; = p1338*p0001/(p0818*p0002)
- p3088: 2.43028e-6; = p2307*p1082
- p2141: 1.56645e-7; = p2015*p2069*p2103/(p0818*1000)
- p2678: 0.0010037; = p2287*(p1019+p1021)
- p1244: 0; = if(p1232>0;0;p1239*(p0725/100)*p0723*1000)
- p2504: 0.000208757; = p2308*p1073
- p0144: 0
- p3241: 3.02359e-10; = p3234*p1188*p3236/p0818
- p0717: 37.19; = p0057*(1+p0585*p0189/100)
- p1684: 0
- p3152: 2.42655e-8; = p2371*p1023
- p2281: 4.6248e-5; = p2223*p2187
- p2328: 0.00037856; = p2224*p2196
- p3125: 0; = p2344*p1082
- p3261: 0
- p2020: 18765.2; = p2015*p2018*p2019
- p1743: 0
- p0518: 0; = SQRT(2)*(IF((2*p0386-1)<0;-1;IF((2*p0386-1)>0;1;0))*SQRT(SQRT((2/(pi()*0.140012289)+LN(1-(2*p0386-1)^2)/2)^2-LN(1-(2*p0386-1)^2)/0.140012289)-(2/(pi()*0.140012289)+LN(1-(2*p0386-1)^2)/2)))
- p3047: 7.22289e-9; = p2266*p1082
- p3215: 0.450791; = p1222*3*15.9994/100.0869
- p2647: 2.89002e-6; = p2256*(p1019+p1021)
- p1958: 359
- p1879: 0
- p2083: 2.17294
- p0839: 0.698213; = p0838/p0818
- p1238: 0; = if(p1232>0;0;IF(p1234=1;0;IF(p1234+p1235>1;1-p1234;p1235)))
- p0368: 0.5
- p2927: 0; = p2341*(p1079+p1081)
- p2408: 0; = p2234*p2198
- p2017: 349000; = p2015*p0898
- p2815: 0; = p2424*(p1078+p1080)
- p1979: 2.0717e7; = p0973
- p1986: 4200
- p2096: 0.486404
- p1246: 0; = if(p1232>0;0;p1241*(p0725/100)*p0723*1000)
- p0447: 0; = SQRT(2)*(IF((2*p0315-1)<0;-1;IF((2*p0315-1)>0;1;0))*SQRT(SQRT((2/(pi()*0.140012289)+LN(1-(2*p0315-1)^2)/2)^2-LN(1-(2*p0315-1)^2)/0.140012289)-(2/(pi()*0.140012289)+LN(1-(2*p0315-1)^2)/2)))
- p3274: 0
- p2761: 4.3694e-6; = p2370*(p1019+p1021)
- p3401: 0; = p3363*p1238
- p1301: 0; = IF(p1297+p1300=p1265;0;IF(p1297+p1300+p1299>p1265;p1265-(p1297+p1300);p1299))
- p1819: 0
- p2462: 1.64411e-7; = p2266*p1073
- p1929: 0
- p0776: 0
- p2137: 4.24039e-8; = p2015*p2065*p2099/(p0818*1000)
- p2638: 1.09723e-5; = p2247*(p1019+p1021)
- p2313: 0.00108138; = p2231*p2220
- p2118: 0.679049
- p1592: 0
- p2688: 0.00135671; = p2297*(p1078+p1080)
- p3044: 9.17736e-7; = p2263*p1082
- p1126: 0; = if(p1121=0;p0720/100;0)
- p2254: 9.82581e-5; = p2222*p2200
- p0385: 0.5
- p1384: 91
- p1198: 0.44
- p2735: 0; = p2344*(p1078+p1080)
- p3020: 4.47428e-11; = p2239*p1023
- p2441: 3.50631e-6; = p2245*p1014
- p2216: 0.000108824; = p1108/p0818
- p0139: 62.934
- p1686: 0
- p0014: 46.021
- p0268: 3.779
- p0844: 0.392862
- p2383: 5.98731e-7; = p2229*p2212
- p2679: 0.000215155; = p2288*(p1019+p1021)
- p0534: 0; = SQRT(2)*(IF((2*p0402-1)<0;-1;IF((2*p0402-1)>0;1;0))*SQRT(SQRT((2/(pi()*0.140012289)+LN(1-(2*p0402-1)^2)/2)^2-LN(1-(2*p0402-1)^2)/0.140012289)-(2/(pi()*0.140012289)+LN(1-(2*p0402-1)^2)/2)))
- p2167: 0.309591; = p2166*(p0898)
- p0244: 18.407
- p2666: 0; = p2275*(p1128+p1130)
- p0822: 0.9318
- p1963h: 7.0244e-5; = p1686*p1890+p1687*p1891+p1688*p1892+p1689*p1893+p1690*p1894+p1691*p1895+p1692*p1896+p1693*p1897+p1694*p1898+p1695*p1899+p1696*p1900+p1697*p1901+p1698*p1902+p1699*p1903+p1700*p1904+p1701*p1905+p1702*p1906+p1703*p1907+p1704*p1908+p1705*p1909
- p2152: 1.87433e-8; = p2015*p2080*p2114/(p0818*1000)
- p1657: 0
- p3238: 0.854735; = IF(p3237+p3235+p3236>1;1-(p3235+p3236);p3237)
- p1615: 0
- p3142: 2.4403e-9; = p2361*p1023
- p1968: 0; = if(p0807=480;p0802*p0811;0)
- p0692: 0
- p3352: 0; = if(and(p1232=0;p3256<>0);p3256*(p3275-p3347)/p3349;0)
- p1837: 0
- p2515: 8.45197e-6; = p2319*p1014
- p0159: 19.361
- p3271: 0
- p0212: 2.932
- p0924: 0.157037; = IF(p0918+p0923=1;0;IF(p0918+p0923+p0920>1;1-(p0918+p0923);p0920))
- p2402: 0; = p2234*p2191
- p2494: 0.000861961; = p2298*p1073
- p0842: -0.469763
- p0699: 0
- p2698: 7.87493e-5; = p2307*(p1078+p1080)
- p4933: 0; = p1760*p3483
- p0737: 0
- p1850: 0
- p1027: 21682.2; = IF(p1012=0;p1021*(p0704/100)*p0703*1000;0)
- p2885: 0.000134254; = p2299*(p1079+p1081)
- p0751: 10.572; = p0091*(1+p0619*p0223/100)
- p3059: 7.34265e-10; = p2278*p1023
- p2397: 0; = p2234*p2186
- p0633: 0; = IF(p0369<0.5;-SQRT(p0007*EXP(p0501^2*p0008)-p0007);SQRT(p0007*EXP(p0501^2*p0008)-p0007))
- p3023: 2.81815e-11; = p2242*p1023
- p5100: 0; = p1927*p3483
- p0681: 0
- p0391: 0.5
- p0346: 0.5
- p3225: 0.00111775; = p3221*p1229
- p2739: 0; = p2348*(p1078+p1080)
- p2023: 2.82
- p2583: 2.81235e-6; = p2387*p1073
- p0404: 0.5
- p0278: 0.5
- p3035: 9.82581e-10; = p2254*p1023
- p2021: 2.33485e-5; = p2020/p0818
- p0810: 0
- p1728: 0
- p1560: 0
- p2975: 0; = p2389*(p1129+p1131)
- p1810: 0
- p0786: 0
- p1330: 0; = p1320*p0801
- p0029: 94.17
- p0508: 0; = SQRT(2)*(IF((2*p0376-1)<0;-1;IF((2*p0376-1)>0;1;0))*SQRT(SQRT((2/(pi()*0.140012289)+LN(1-(2*p0376-1)^2)/2)^2-LN(1-(2*p0376-1)^2)/0.140012289)-(2/(pi()*0.140012289)+LN(1-(2*p0376-1)^2)/2)))
- p1635: 0
- p1919: 0
- p2767: 0.000108452; = p2376*(p1078+p1080)
- p1675: 0
- p1185: 0.5
- p0664: 0; = IF(p0400<0.5;-SQRT(p0007*EXP(p0532^2*p0008)-p0007);SQRT(p0007*EXP(p0532^2*p0008)-p0007))
- p1067: 0.00204683; = IF(p1012=0;p1053/(p1060*p0818);0)
- p1081: 0; = IF(p1071=0;IF(p1073+p1078+p1079+p1080=1;0;IF(p1073+p1078+p1079+p1080+p1077>1;1-(p1073+p1078+p1079+p1080);p1077));0)
- p4307: 1.49921e-5; = p1962*p3479
- p3257: 0
- p2258: 0.000201086; = p2226*p2204
- p2041: 0; = p2015*p2040/(p0818*1000)
- p0608: 0; = IF(p0344<0.5;-SQRT(p0007*EXP(p0476^2*p0008)-p0007);SQRT(p0007*EXP(p0476^2*p0008)-p0007))
- p0956: 0; = if(and(p0683>0;or(p0807=56;p0807=100;and(p0807=60;p0901>0.06)));p0938;0)
- p2347: 0; = p2228*p2215
- p0486: 0; = SQRT(2)*(IF((2*p0354-1)<0;-1;IF((2*p0354-1)>0;1;0))*SQRT(SQRT((2/(pi()*0.140012289)+LN(1-(2*p0354-1)^2)/2)^2-LN(1-(2*p0354-1)^2)/0.140012289)-(2/(pi()*0.140012289)+LN(1-(2*p0354-1)^2)/2)))
- p2080: 0.025
- p1365: 27
- p3393: 0; = p3374*p1234
- p2034: 3.43677e-6; = p2015*p2030*p2032/(p0818*1000)
- p2984: 0; = p2398*(p1020+p1022)
- p1823: 0
- p1341: 3.54965e-5; = p1340*p0001/(p0818*p0002)
- p0850: 0
- p2631: 7.34631e-6; = p2240*(p1019+p1021)
- p3029: 1.28306e-9; = p2248*p1023
- p3016: 0; = p2430*(p1129+p1131)
- p0058: 47.934
- p0174: 0
- p1593: 0
- p2979: 0; = p2393*(p1020+p1022)
- p1781: 0
- p1219: 0; = if(p1218=0;0;SQRT(2)*(IF((2*p1218-1)<0;-1;IF((2*p1218-1)>0;1;0))*SQRT(SQRT((2/(pi()*0.140012289)+LN(1-(2*p1218-1)^2)/2)^2-LN(1-(2*p1218-1)^2)/0.140012289)-(2/(pi()*0.140012289)+LN(1-(2*p1218-1)^2)/2))))
- p0978: 0
- p2809: 0; = p2418*(p1078+p1080)
- p1707: 0
- p1742: 0
- p0763: 240; = p0103*(1+p0631*p0235/100)
- p0791: 0
- p2483: 0.000652737; = p2287*p1014
- p0893: 63.0305; = 1000*(p0890+p0892)*p0001*p0003*p0004/(p0818*p0002)
- p2503: 5.53191e-5; = p2307*p1073
- p1042: 0.000264901
- p0580: 0; = IF(p0316<0.5;-SQRT(p0007*EXP(p0448^2*p0008)-p0007);SQRT(p0007*EXP(p0448^2*p0008)-p0007))
- p0807: 1
- p2382: 0.000430138; = p2229*p2211
- p2680: 0.00212681; = p2289*(p1019+p1021)
- p1092: 0; = IF(p1071=0;p1086*p0001/(p0818*p0002);0)
- p1886: 0
- p1108: 87461.8; = IF(p1071=0;p1105*p1102*p1095;0)
- p0747: 0
- p3111: 2.35066e-12; = p2330*p1023
- p0919: 0; = p0678*1000/p0801
- p2123: 0.263965
- p3218: 0.0361684; = p3214*p1228
- p2345: 0; = p2228*p2213
- p0178: 26.062
- p3141: 8.90318e-9; = p2360*p1023
- p2918: 2.91838e-5; = p2332*(p1020+p1022)
- p1765: 0
- p0141: 123.815
- p0859: 0; = p0671*1000/p0856
- p1888: 0
- p0982: 0; = if(p0886=0;0;min(1;(p0691*p0690*1000*p0693/100)/p0886))
- p2822: 0; = p2431*(p1128+p1130)
- p1984: 30
- p2623: 0; = p2427*p1073
- p3370: 0; = if(p1232=0;p3245*p3358/p0818;0)
- p0479: 0; = SQRT(2)*(IF((2*p0347-1)<0;-1;IF((2*p0347-1)>0;1;0))*SQRT(SQRT((2/(pi()*0.140012289)+LN(1-(2*p0347-1)^2)/2)^2-LN(1-(2*p0347-1)^2)/0.140012289)-(2/(pi()*0.140012289)+LN(1-(2*p0347-1)^2)/2)))
- p2493: 0.00095305; = p2297*p1073
- p5004: 0; = p1831*p3483
- p3309: 0; = if(and(p1232=0;p3252<>0);p3252*(p3260-p3304)/p3305;0)
- p1955: 2.11522e-5; = p1547*1000/p0818
- p0618: 0; = IF(p0354<0.5;-SQRT(p0007*EXP(p0486^2*p0008)-p0007);SQRT(p0007*EXP(p0486^2*p0008)-p0007))
- p1151: 869104; = if(p1121=0;p1149*p1148*p1145;0)
- p2365: 0.0031686; = p2225*p2193
- p2218: 0.00861305; = p1150/p0818
- p1964: 0.5
- p0367: 0.5
- p0009: 12.5442
- p1597: 0
- p3265: 0
- p1214: 4; = IF(p1213=0;0;p1213-1)
- p0709: 11.423; = p0049*(1+p0577*p0181/100)
- p3264: 0
- p2344: 0; = p2228*p2212
- p2164: 0.000300742; = (p2015/p0818)-(p2022)-(p2035+p2036+p2052)-(p2017/p0818)-(p2039+p2041+p2044+p2158+p2159+p2160+p2161+p2162)
- p1732: 0.715577
- p2116: 0.444424
- p0510: 0; = SQRT(2)*(IF((2*p0378-1)<0;-1;IF((2*p0378-1)>0;1;0))*SQRT(SQRT((2/(pi()*0.140012289)+LN(1-(2*p0378-1)^2)/2)^2-LN(1-(2*p0378-1)^2)/0.140012289)-(2/(pi()*0.140012289)+LN(1-(2*p0378-1)^2)/2)))

- p2223: 0.377269; = if(p0765*p0769+p0766*p0770+p0767*p0771+p0768*p0772=0;0;p0770*p0766/(p0765*p0769+p0766*p0770+p0767*p0771+p0768*p0772))
- p1184: 4.26494e-8; = p1182/p0818
- p1245: 0; = if(p1232>0;0;p1240*(p0725/100)*p0723*1000)
- p0697: 95.494; = p0037*(1+p0565*p0169/100)
- p0872: 0; = p0864*p0856
- p2073: 0.377647
- p0892: 0; = if(p0891=0;0;(1-p1240)*p3251/p0891)
- p1894: 0
- p2600: 0; = p2404*p1014
- p3358: 0; = if(p1232=0;p3308+p3319+p3330+p3341+p3352;0)
- p2387: 8.2921e-6; = p2229*p2216
- p0752: 6.155; = p0092*(1+p0620*p0224/100)
- p3419: 0; = p3362*p1239
- p2888: 0.000140409; = p2302*(p1079+p1081)
- p2889: 6.06241e-5; = p2303*(p1079+p1081)
- p3003: 0; = p2417*(p1079+p1081)
- p3080: 1.22625e-5; = p2299*p1082
- p1003: 0; = p0999*p0888
- p1950: 0
- p0063: 240
- p1299: 0
- p1163: 0.00462046
- p0964: 0; = 56/90000
- p4347: 1.85871e-6; = p1792*p3480
- p2899: 0.000157168; = p2313*(p1129+p1131)
- p0802: 235000
- p0423: 0; = SQRT(2)*(IF((2*p0291-1)<0;-1;IF((2*p0291-1)>0;1;0))*SQRT(SQRT((2/(pi()*0.140012289)+LN(1-(2*p0291-1)^2)/2)^2-LN(1-(2*p0291-1)^2)/0.140012289)-(2/(pi()*0.140012289)+LN(1-(2*p0291-1)^2)/2)))
- p0655: 0; = IF(p0391<0.5;-SQRT(p0007*EXP(p0523^2*p0008)-p0007);SQRT(p0007*EXP(p0523^2*p0008)-p0007))
- p0870: 0; = p0858*p0856
- p3185: 0; = p2404*p1023
- p3123: 0; = p2342*p1082
- p2733: 0; = p2342*(p1078+p1080)
- p0240: 15.165
- p3019: 2.80264e-10; = p2238*p1023
- p0931: 0; = p0801*p0925
- p4946: 0; = p1773*p3483
- p0355: 0.5
- p1805: 0
- p2327: 3.82962e-5; = p2224*p2195
- p1039: 0.0504301
- p1058: 0.225
- p1183: 0.000266422; = p0801*p0001/(p0818*p0002)
- p1327: 0.377325; = if(p1318=0;if(p1327a=0;1;if(p1327a<0;0;p1327a));0)
- p2903: 1.32891e-6; = p2317*(p1020+p1022)
- p0806: 8.037e8
- p0433: 0; = SQRT(2)*(IF((2*p0301-1)<0;-1;IF((2*p0301-1)>0;1;0))*SQRT(SQRT((2/(pi()*0.140012289)+LN(1-(2*p0301-1)^2)/2)^2-LN(1-(2*p0301-1)^2)/0.140012289)-(2/(pi()*0.140012289)+LN(1-(2*p0301-1)^2)/2)))
- p3234: 0.39606; = 1-p3233
- p0665: 0; = IF(p0401<0.5;-SQRT(p0007*EXP(p0533^2*p0008)-p0007);SQRT(p0007*EXP(p0533^2*p0008)-p0007))
- p3032: 1.02856e-12; = p2251*p1023
- p2891: 1.10507e-6; = p2305*(p1079+p1081)
- p0721: 0
- p2204: 0.00325948; = p1109/p0818
- p2956: 1.95527e-6; = p2370*(p1020+p1022)
- p3287: 0
- p1231: 0.0518469; = IF(p1221=0;0;p1230*(p1228+p1229))
- p1253: 0; = if(p1232>0;0;p0735/100)
- p1053: 345458; = IF(p1012=0;p1046*p1036;0)
- p3180: 0; = p2399*p1023
- p1690: 0
- p1102: 0.01885; = IF(p1071=0;IF(p1096+p1101=1;0;IF(p1096+p1101+p1098>1;1-(p1096+p1101);p1098));0)
- p1103: 0.564594; = IF(p1071=0;IF(p1096+p1101+p1102=1;0;IF(p1096+p1101+p1102+p1099>1;1-(p1096+p1101+p1102);p1099));0)
- p2962: 3.66433e-5; = p2376*(p1079+p1081)
- p2220: 0.00108138; = p1151/p0818
- p0947: 0; = if(and(p0683=0;or(p0807=480;p0807=32;p0807=1;and(p0807=60;p0901<0.03)));p0935;0)
- p2106: 0.856281
- p1304: 0; = p1300*p1252/p0818
- p1875: 0
- p2734: 0; = p2343*(p1078+p1080)
- p1601: 0
- p0794: 0
- p0658: 0; = IF(p0394<0.5;-SQRT(p0007*EXP(p0526^2*p0008)-p0007);SQRT(p0007*EXP(p0526^2*p0008)-p0007))
- p5282: 1.56269e-5; = p1903*p3484
- p1156: 0.0904118; = p1064+p1065+p1066+p1067+p1068+p1069+p1070+p1116+p1117+p1118+p1119+p1120+p1154+p1155
- p1186: 2.13247e-8; = p1182*p1185/p0818
- p0578: 0; = IF(p0314<0.5;-SQRT(p0007*EXP(p0446^2*p0008)-p0007);SQRT(p0007*EXP(p0446^2*p0008)-p0007))
- p1708: 0
- p0418: 0; = SQRT(2)*(IF((2*p0286-1)<0;-1;IF((2*p0286-1)>0;1;0))*SQRT(SQRT((2/(pi()*0.140012289)+LN(1-(2*p0286-1)^2)/2)^2-LN(1-(2*p0286-1)^2)/0.140012289)-(2/(pi()*0.140012289)+LN(1-(2*p0286-1)^2)/2)))
- p3263: 0
- p2668: 0.000219242; = p2277*(p1019+p1021)
- p2810: 0; = p2419*(p1078+p1080)
- p0840: 0.0681631; = p0839*p0831
- p1954: 0
- p2708: 2.9697e-6; = p2317*(p1019+p1021)
- p1609: 0
- p3424: 0; = p3367*p1239
- p2193: 0.00558117; = p1054/p0818
- p2925: 0; = p2339*(p1079+p1081)
- p2675: 8.84799e-5; = p2284*(p1019+p1021)
- p2572: 7.61842e-5; = p2376*p1073
- p0453: 0; = SQRT(2)*(IF((2*p0321-1)<0;-1;IF((2*p0321-1)>0;1;0))*SQRT(SQRT((2/(pi()*0.140012289)+LN(1-(2*p0321-1)^2)/2)^2-LN(1-(2*p0321-1)^2)/0.140012289)-(2/(pi()*0.140012289)+LN(1-(2*p0321-1)^2)/2)))
- p1995: 50
- p2115: 0.856281
- p0239: 28.95
- p1283: 0; = p1277*p1252/p0818
- p2912: 3.81084e-5; = p2326*(p1020+p1022)
- p0392: 0.5
- p1171: 0.000266422; = p0801*p0001/(p0818*p0002)
- p3368: 0; = if(p1232=0;p3245*p3356/p0818;0)
- p3068: 2.1056e-8; = p2287*p1023
- p1867: 0
- p2632: 9.33386e-6; = p2241*(p1019+p1021)
- p3000: 0; = p2414*(p1079+p1081)
- p2221: 0.00187915; = p1155-p2220
- p1612: 0
- p3483: 0; = if(p1328+p1330+p1332+p1334+p1336+p1338+p1340+p1342+p1344=0;0;p1342/(p1328+p1330+p1332+p1334+p1336+p1338+p1340+p1342+p1344))
- p2854: 1.90404e-6; = p2268*(p1079+p1081)
- p0693: 0
- p1133: 55462.8; = if(p1121=0;p1123*(p0716/100)*p0703*1000;0)
- p2126: 6.54811e-7; = p2015*p2054*p2088/(p0818*1000)
- p0251: 11.527
- p0666: 0; = IF(p0402<0.5;-SQRT(p0007*EXP(p0534^2*p0008)-p0007);SQRT(p0007*EXP(p0534^2*p0008)-p0007))
- p5210: 4.64583e-6; = p1831*p3484
- p1008: 0; = p1004*p0001*p0004/(p0818*p0002)
- p2268: 1.16719e-5; = p2226*p2214
- p2002: 750
- p3491: 0; = p1760*p3476
- p3097: 3.90237e-10; = p2316*p1023
- p0037: 95.494
- p2545: 0; = p2349*p1073
- p0994: 0; = p0990*p0001*p0004/(p0818*p0002)
- p3249: 0
- p3230: 2.8223e-7; = p1170/p0818
- p2751: 0.000424397; = p2360*(p1019+p1021)
- p3413: 0; = p3375*p1238
- p2250: 0.000271877; = p2222*p2196
- p2490: 0.000214307; = p2294*p1014
- p2136: 5.2193e-7; = p2015*p2064*p2098/(p0818*1000)
- p0480: 0; = SQRT(2)*(IF((2*p0348-1)<0;-1;IF((2*p0348-1)>0;1;0))*SQRT(SQRT((2/(pi()*0.140012289)+LN(1-(2*p0348-1)^2)/2)^2-LN(1-(2*p0348-1)^2)/0.140012289)-(2/(pi()*0.140012289)+LN(1-(2*p0348-1)^2)/2)))
- p0962: 0; = if(and(p0683>0;or(p0807=480;p0807=32;p0807=1;and(p0807=60;p0901<0.03)));p0938;0)
- p2967: 5.35825e-6; = p2381*(p1079+p1081)
- p2202: 0.000263726; = 4*1.00794*p2201/(2*14.0067)
- p1107: 152055; = IF(p1071=0;p1105*p1101*p1095;0)
- p0135: 65.404
- p0727: 0
- p1570: 0
- p2524: 0.000117353; = p2328*p1014
- p0020: 162.453
- p2706: 8.47416e-5; = p2315*(p1019+p1021)
- p0905: 0.0669044; = p0904/p0818
- p0804: 0
- p3768: 0; = p1831*p3477
- p1775: 0
- p1620: 0
- p2077: 0.043
- p1641: 0
- p2044: 4.01311e-8; = p2015*p2042*p2043/(p0818*1000)
- p3710: 0; = p1773*p3477
- p1992: 3900
- p3002: 0; = p2416*(p1079+p1081)
- p2151: 1.49946e-8; = p2015*p2079*p2113/(p0818*1000)
- p0753: 0
- p0474: 0; = SQRT(2)*(IF((2*p0342-1)<0;-1;IF((2*p0342-1)>0;1;0))*SQRT(SQRT((2/(pi()*0.140012289)+LN(1-(2*p0342-1)^2)/2)^2-LN(1-(2*p0342-1)^2)/0.140012289)-(2/(pi()*0.140012289)+LN(1-(2*p0342-1)^2)/2)))
- p0955: 0; = if(and(p0683>0;or(p0807=56;p0807=100;and(p0807=60;p0901>0.06)));p0937;0)
- p0689: 94.17; = p0029*(1+p0557*p0161/100)
- p0535: 0; = SQRT(2)*(IF((2*p0403-1)<0;-1;IF((2*p0403-1)>0;1;0))*SQRT(SQRT((2/(pi()*0.140012289)+LN(1-(2*p0403-1)^2)/2)^2-LN(1-(2*p0403-1)^2)/0.140012289)-(2/(pi()*0.140012289)+LN(1-(2*p0403-1)^2)/2)))
- p1926: 0
- p1713: 0
- p2878: 1.29932e-6; = p2292*(p1020+p1022)
- p1579: 0
- p2557: 7.56494e-5; = p2361*p1014
- p1803: 0
- p1562: 0
- p2036: 4.21946e-6; = p2015*p2030*(1-p2032)/(p0818*1000)
- p5307: 2.11174e-7; = p1928*p3484
- p2799: 0; = p2408*(p1019+p1021)
- p1676: 0
- p1154: 0.0207506; = if(p1152*p0818=0;0;p1150/(p1152*p0818))
- p0647: 0; = IF(p0383<0.5;-SQRT(p0007*EXP(p0515^2*p0008)-p0007);SQRT(p0007*EXP(p0515^2*p0008)-p0007))
- p2916: 5.01418e-8; = p2330*(p1020+p1022)
- p1218: 0.5
- p0042: 240
- p3450: 0; = p3374*p1240
- p0886: 3.61079e6; = p0686*1000*p0687*p0689/100
- p3176: 0; = p2395*p1023
- p2704: 0.000518348; = p2313*(p1128+p1130)
- p1681: 0
- p1014: 0.31; = IF(p1012=0;p0705/100;0)
- p0863: 0; = p0675*1000/p0856
- p1152: 0.415074
- p2058: 1.24412
- p1638: 0
- p3221: 0.146975; = IF(p3216=0;0;p1223*12.0107/100.0869+(1-p1224)*12.0107/84.3139)
- p1220: 0; = IF(p1218<0.5;-SQRT(p1214*EXP(p1219^2*p1215)-p1214);SQRT(p1214*EXP(p1219^2*p1215)-p1214))
- p3389: 0; = p3370*p1234
- p0315: 0.5
- p0563: 0; = IF(p0299<0.5;-SQRT(p0007*EXP(p0431^2*p0008)-p0007);SQRT(p0007*EXP(p0431^2*p0008)-p0007))
- p3425: 0; = p3368*p1239
- p2582: 1.84509e-5; = p2386*p1073
- p3463: 0; = p3368*p1241
- p0167: 19.035
- p2766: 0.000119913; = p2375*(p1078+p1080)
- p0005: 1.60934
- p0430: 0; = SQRT(2)*(IF((2*p0298-1)<0;-1;IF((2*p0298-1)>0;1;0))*SQRT(SQRT((2/(pi()*0.140012289)+LN(1-(2*p0298-1)^2)/2)^2-LN(1-(2*p0298-1)^2)/0.140012289)-(2/(pi()*0.140012289)+LN(1-(2*p0298-1)^2)/2)))
- p1891: 0
- p2865: 5.3949e-5; = p2279*(p1020+p1022)
- p1844: 0
- p0166: 6.223
- p1971: 0.000260872; = p1966*p0001/(p0818*p0002)
- p2895: 1.53046e-5; = p2309*(p1079+p1081)
- p1806: 0
- p0345: 0.5
- p1627: 0.541556
- p2401: 0; = p2234*p2190
- p2129: 1.11012e-6; = p2015*p2057*p2091/(p0818*1000)
- p1104: 0.382423; = IF(p1071=0;IF(p1096+p1101+p1102+p1103=1;0;1-(p1096+p1101+p1102+p1103));0)
- p2884: 0.000414588; = p2298*(p1079+p1081)
- p2702: 0.00412858; = p2311*(p1128+p1130)
- p1121: 0
- p3851: 0; = p1914*p3477
- p3060: 2.52913e-9; = p2279*p1023
- p5171: 1.92169e-5; = p1792*p3484
- p0220: 27.285
- p0007: 14; = p0006-1
- p3406: 0; = p3368*p1238
- p1659: 0
- p2234: 0; = 1-(p2222+p2223+p2224+p2225)
- p0984: 0; = if(p0886=0;0;min(1;(p0699*p0698*1000*p0701/100)/p0886))
- p1573: 0
- p0145: 0
- p3336: 0; = IF(or(p3254=0;p1232>0);0;p3271*p3289)
- p1596: 0
- p2390: 0; = p2233*p2219
- p4328: 5.51487e-7; = p1773*p3480
- p2019: 0.13105
- p0343: 0.5
- p1028: 23707.8; = IF(p1012=0;p1022*(p0704/100)*p0703*1000;0)
- p1756: 0
- p2614: 0; = p2418*p1073
- p1317: 0
- p1050: 4.46354e6; = IF(p1012=0;p1037*p1036;0)
- p1254: 0; = if(p1232>0;0;p0736/100)
- p0195: 0
- p2941: 0.000147638; = p2355*(p1020+p1022)
- p3408: 0; = p3370*p1238
- p0876: 120484; = p0866*p0856
- p0118: 9.57
- p2811: 0; = p2420*(p1078+p1080)
- p2894: 0.000100408; = p2308*(p1079+p1081)
- p1766: 0
- p1618: 0
- p1696: 0
- p2795: 0; = p2404*(p1019+p1021)
- p2945: 1.48455e-5; = p2359*(p1020+p1022)
- p1884: 0
- p1024: 64338.9; = IF(p1012=0;p1014*(p0704/100)*p0703*1000;0)
- p1751: 0.791173
- p2574: 0.000204837; = p2378*p1073
- p0488: 0; = SQRT(2)*(IF((2*p0356-1)<0;-1;IF((2*p0356-1)>0;1;0))*SQRT(SQRT((2/(pi()*0.140012289)+LN(1-(2*p0356-1)^2)/2)^2-LN(1-(2*p0356-1)^2)/0.140012289)-(2/(pi()*0.140012289)+LN(1-(2*p0356-1)^2)/2)))
- p2842: 1.29326e-6; = p2256*(p1020+p1022)
- p2257: 6.95054e-5; = p2222*p2203
- p1787: 0
- p3197: 0; = p2416*p1082
- p1325: 0.133234; = IF(((p0745*1000*p0752/100)+(p0754*1000*p0761/100))/p0801<0;0;((p0745*1000*p0752/100)+(p0754*1000*p0761/100))/p0801)
- p1628: 0
- p2272: 0; = p2230*p2218
- p0444: 0; = SQRT(2)*(IF((2*p0312-1)<0;-1;IF((2*p0312-1)>0;1;0))*SQRT(SQRT((2/(pi()*0.140012289)+LN(1-(2*p0312-1)^2)/2)^2-LN(1-(2*p0312-1)^2)/0.140012289)-(2/(pi()*0.140012289)+LN(1-(2*p0312-1)^2)/2)))
- p1669: 0
- p0733: 0
- p4725: 1.26762e-6; = p1758*p3482
- p2187: 0.000122586; = 4*1.00794*p2186/(2*14.0067)
- p1944: 0
- p2396: 0; = p2234*p2185
- p0799: 62.934; = p0139*(1+p0667*p0271/100)
- p3901: 8.82415e-6; = p1758*p3478
- p2655: 1.28398e-5; = p2264*(p1078+p1080)
- p2098: 0.856281
- p0562: 0; = IF(p0298<0.5;-SQRT(p0007*EXP(p0430^2*p0008)-p0007);SQRT(p0007*EXP(p0430^2*p0008)-p0007))
- p2715: 1.88786e-6; = p2324*(p1019+p1021)
- p3390: 0; = p3371*p1234
- p0883: 0.0928481; = p0882*p0001*p0003/(p0818*p0002)
- p2245: 1.13107e-5; = p2222*p2190
- p0577: 0; = IF(p0313<0.5;-SQRT(p0007*EXP(p0445^2*p0008)-p0007);SQRT(p0007*EXP(p0445^2*p0008)-p0007))
- p1295: 0; = p1291*p1252/p0818
- p2025: 1.9017e-6; = p2015*p2023*p2024/(p0818*1000)
- p2817: 0; = p2426*(p1078+p1080)
- p3434: 0; = p3377*p1239
- p2834: 2.7369e-5; = p2248*(p1020+p1022)
- p4410: 1.00085e-6; = p1855*p3480
- p3896: 0; = p1963*p3477
- p3404: 0; = p3366*p1238
- p1858: 0
- p4267: 2.90935e-6; = p1918*p3479
- p3305: 0; = if(and(p1232=0;p3252<>0);1-(p3301+p3302+p3303+p3304);0)
- p2285: 4.66779e-5; = p2223*p2191
- p0711: 33.916; = p0051*(1+p0579*p0183/100)
- p1309: 0
- p0477: 0; = SQRT(2)*(IF((2*p0345-1)<0;-1;IF((2*p0345-1)>0;1;0))*SQRT(SQRT((2/(pi()*0.140012289)+LN(1-(2*p0345-1)^2)/2)^2-LN(1-(2*p0345-1)^2)/0.140012289)-(2/(pi()*0.140012289)+LN(1-(2*p0345-1)^2)/2)))
- p2535: 0; = p2339*p1073
- p2707: 1.86018e-5; = p2316*(p1019+p1021)
- p2643: 8.04737e-8; = p2252*(p1019+p1021)
- p2128: 7.49005e-7; = p2015*p2056*p2090/(p0818*1000)
- p0286: 0.5
- p2825: 9.54409e-7; = p2239*(p1020+p1022)
- p3163: 6.40905e-6; = p2382*p1082
- p0412: 0; = SQRT(2)*(IF((2*p0280-1)<0;-1;IF((2*p0280-1)>0;1;0))*SQRT(SQRT((2/(pi()*0.140012289)+LN(1-(2*p0280-1)^2)/2)^2-LN(1-(2*p0280-1)^2)/0.140012289)-(2/(pi()*0.140012289)+LN(1-(2*p0280-1)^2)/2)))
- p1667: 0
- p2982: 0; = p2396*(p1020+p1022)
- p2006: 0.309255; = ((p1980*p1985+p1986*p1991+p1992*p1997+p2000*p2005)/p0818)*p0005*p0002/1000
- p1792: 0.000113226; = p1384*1000/p0818
- p2032: 0.448886
- p2229: 0.0761974; = if(p0774*p0778+p0775*p0779+p0776*p0780+p0777*p0781=0;0;p0781*p0777/(p0774*p0778+p0775*p0779+p0776*p0780+p0777*p0781))
- p2438: 8.73625e-7; = p2242*p1014
- p0973: 2.0717e7; = p0967+p0968+p0969
- p1585: 0
- p2108: 0.826583
- p1761: 0
- p1277: 0
- p2292: 6.09121e-6; = p2223*p2199
- p0057: 37.19
- p1182: 34.2773; = p1181*p0801
- p0993: 0.000101811; = p0989*p0001*p0004/(p0818*p0002)
- p3456: 0; = p3380*p1240
- p1061: 0.3
- p1128: 0.47934; = if(p1121=0;IF(p1123=1;0;IF(p1123+p1124>1;1-p1123;p1124));0)
- p4313: 3.47232e-7; = p1758*p3480
- p3031: 2.71877e-9; = p2250*p1023
- p1550: 0
- p3326: 0; = if(and(p1232=0;p3255<>0);p3268*p3289;0)
- p3435: 0; = p3378*p1239
- p0866: 0.502017; = IF(p0858+p0864+p0865=1;0;IF(p0858+p0864+p0865+p0861>1;1-(p0858+p0864+p0865);p0861))
- p2057: 3.28794
- p2186: 0.00085175; = p1052/p0818
- p4057: 1.5572e-6; = p1914*p3478
- p2890: 0.000793896; = p2304*(p1079+p1081)
- p0276: 0.5
- p2634: 1.71851e-5; = p2243*(p1019+p1021)
- p1257: 0; = if(p1232>0;0;IF(p1253+p1256=1;0;IF(p1253+p1256+p1255>1;1-(p1253+p1256);p1255)))
- p3840: 0; = p1903*p3477
- p0502: 0; = SQRT(2)*(IF((2*p0370-1)<0;-1;IF((2*p0370-1)>0;1;0))*SQRT(SQRT((2/(pi()*0.140012289)+LN(1-(2*p0370-1)^2)/2)^2-LN(1-(2*p0370-1)^2)/0.140012289)-(2/(pi()*0.140012289)+LN(1-(2*p0370-1)^2)/2)))
- p1699: 0.762907
- p1794: 0
- p2977: 0; = p2391*(p1129+p1131)
- p4098: 8.82415e-6; = p1955*p3478
- p2512: 1.20974e-5; = p2316*p1014
- p1216: 0.0791463
- p3004: 0; = p2418*(p1079+p1081)
- p3195: 0; = p2414*p1082
- p1292: 0; = IF(p1287+p1290+p1291=p1261;0;p1261-(p1287+p1290+p1291))
- p3250: 0
- p3338: 0; = if(and(p1232=0;p3254<>0);1-(p3334+p3335+p3336+p3337);0)
- p1139: 6.15688e-5; = if(p1121=0;p1133*p0001/(p0818*p0002);0)
- p3175: 0; = p2394*p1023
- p3160: 2.50659e-6; = p2379*p1082
- p3148: 6.71418e-8; = p2367*p1023
- p1173: 0.5
- p0766: 33.755; = p0106*(1+p0634*p0238/100)
- p2372: 0.00104032; = p2225*p2201
- p2986: 0; = p2400*(p1020+p1022)
- p1005: 0; = p1001*p0888
- p2456: 1.99742e-5; = p2260*p1073
- p2498: 0.000291921; = p2302*p1073
- p1044: 0.0115234; = IF(p1012=0;IF(p1037=1;0;IF(p1037+p1038>1;1-p1037;p1038));0)
- p0634: 0; = IF(p0370<0.5;-SQRT(p0007*EXP(p0502^2*p0008)-p0007);SQRT(p0007*EXP(p0502^2*p0008)-p0007))
- p1336: 8759.04; = p1323*p0801
- p0673: 120.484; = p0013*(1+p0541*p0145/100)
- p3377: 0; = if(p1232=0;p3246*p3359/p0818;0)
- p2170: 0.00768504; = p2166*(p0913)
- p2005: 660479; = p1963*p0818+p1959*1000+p1170+p1176+p1182
- p2616: 0; = p2420*p1073
- p1114: 0.216028
- p2104: 0.817136
- p1704: 0
- p0003: 10000
- p2781: 0; = p2390*(p1128+p1130)
- p3090: 1.39789e-6; = p2309*p1082
- p3136: 6.9213e-9; = p2355*p1023
- p0308: 0.5
- p2206: 0.000954623; = 9*1.00794*p2204/30.973762
- p2484: 0.000139922; = p2288*p1014
- p1072: 0; = p1071*p0001/(p0818*p0002)
- p2174: 0.00503459; = p0895*p0903/p0818
- p3098: 6.22996e-11; = p2317*p1023
- p0829: 0; = if(p0807=480;p0814*(1-p0824);0)
- p0779: 78.089; = p0119*(1+p0647*p0251/100)
- p0640: 0; = IF(p0376<0.5;-SQRT(p0007*EXP(p0508^2*p0008)-p0007);SQRT(p0007*EXP(p0508^2*p0008)-p0007))
- p0026: 208.535
- p3122: 0; = p2341*p1082
- p2953: 0.0014322; = p2367*(p1020+p1022)
- p1178: 1.28984e-7; = p1176/p0818
- p1237: 0; = if(p1232>0;0;p0729/100)
- p3203: 0; = p2422*p1082
- p2626: 0; = p2430*p1123
- p0382: 0.5
- p0907: 0
- p3359: 0; = if(p1232=0;p3309+p3320+p3331+p3342+p3353;0)
- p1777: 0
- p1547: 17
- p2750: 3.3175e-5; = p2359*(p1019+p1021)
- p1842: 0
- p3006: 0; = p2420*(p1079+p1081)
- p3253: 0; = p1252*(p1277*(1-p3247)+p1280*(1-p3248)+p1281*(1-p3249)+p1282*(1-p3250))
- p1116: 9.00236e-5; = IF(p1071=0;p1106/(p1111*p0818);0)
- p1723: 0.507159
- p0725: 0
- p0793: 0
- p2534: 0; = p2338*p1073
- p3442: 0; = p3366*p1240
- p3332: 0; = if(and(p1232=0;p3255<>0);IF((p3328+p3329+p3330+p3331)+(p3255*(p3265*(1-p3277))/p3327)>p3255;p3255-(p3328+p3329+p3330+p3331);p3255*(p3265*(1-p3277))/p3327);0)
- p1129: 0.14534; = if(p1121=0;IF(p1123+p1128=1;0;IF(p1123+p1128+p1125>1;1-(p1123+p1128);p1125));0)
- p0968: 0
- p0575: 0; = IF(p0311<0.5;-SQRT(p0007*EXP(p0443^2*p0008)-p0007);SQRT(p0007*EXP(p0443^2*p0008)-p0007))
- p3166: 2.148e-7; = p2385*p1082
- p2747: 5.26709e-5; = p2356*(p1019+p1021)
- p3105: 3.96044e-11; = p2324*p1023
- p2725: 4.02405e-6; = p2334*(p1019+p1021)
- p1203: 3
- p1320: 0; = IF(((p0745*1000*p0747/100)+(p0754*1000*p0756/100))/p0801<0;0;((p0745*1000*p0747/100)+(p0754*1000*p0756/100))/p0801)
- p0937: 0; = p0931*p0001/(p0818*p0002)
- p2056: 2.07882
- p0909: 4.49872e6
- p1232: 240000; = p0801
- p3268: 0
- p0855: 1.17222; = p0854*p0001*p0003/(p0818*p0002)
- p1033: 2.40692e-5; = IF(p1012=0;p1027*p0001/(p0818*p0002);0)
- p1119: 0.0150882; = IF(p1071=0;p1109/(p1114*p0818);0)
- p3194: 0; = p2413*p1023
- p2069: 0.190588
- p0506: 0; = SQRT(2)*(IF((2*p0374-1)<0;-1;IF((2*p0374-1)>0;1;0))*SQRT(SQRT((2/(pi()*0.140012289)+LN(1-(2*p0374-1)^2)/2)^2-LN(1-(2*p0374-1)^2)/0.140012289)-(2/(pi()*0.140012289)+LN(1-(2*p0374-1)^2)/2)))
- p2636: 5.39157e-6; = p2245*(p1019+p1021)
- p0834: 0.0003
- p0861: 0.502017; = p0673*1000/p0856
- p2577: 1.11402e-5; = p2381*p1073
- p1624: 0
- p1098: 0.01885
- p1977: 43.5224; = p1252+p1188
- p2987: 0; = p2401*(p1020+p1022)
- p1099: 0.564594
- p2933: 0; = p2347*(p1079+p1081)
- p1726: 0
- p1269: 0
- p2591: 0; = p2395*p1014
- p0877: 1.33748; = p0876*p0001*p0003/(p0818*p0002)
- p2709: 1.0229e-5; = p2318*(p1019+p1021)
- p0154: 0
- p0108: 44.299
- p2474: 2.27622e-5; = p2278*p1014
- p2839: 7.91745e-8; = p2253*(p1020+p1022)
- p3445: 0; = p3369*p1240
- p4109: 2.90935e-7; = p1760*p3479
- p1135: 21675.1; = if(p1121=0;p1129*(p0716/100)*p0703*1000;0)
- p1706: 0
- p1772: 0
- p4894: 2.53525e-6; = p1927*p3482
- p0845: 0.5
- p0307: 0.5
- p1565: 0
- p0772: 83.375; = p0112*(1+p0640*p0244/100)
- p3349: 0; = if(and(p1232=0;p3256<>0);1-(p3345+p3346+p3347+p3348);0)
- p2433: 3.95795e-5; = p2237*p1014
- p1239: 0; = if(p1232>0;0;IF(p1234+p1238=1;0;IF(p1234+p1238+p1236>1;1-(p1234+p1238);p1236)))
- p1861: 0
- p2699: 0.000297175; = p2308*(p1078+p1080)
- p3120: 0; = p2339*p1082
- p1561: 0
- p2958: 0.00022191; = p2372*(p1020+p1022)
- p2973: 1.35269e-6; = p2387*(p1079+p1081)
- p0788: 83.876; = p0128*(1+p0656*p0260/100)
- p0400: 0.5
- p3101: 3.92397e-11; = p2320*p1023
- p3295: 0
- p0613: 0; = IF(p0349<0.5;-SQRT(p0007*EXP(p0481^2*p0008)-p0007);SQRT(p0007*EXP(p0481^2*p0008)-p0007))
- p1816: 0
- p1281: 0; = IF(p1277+p1280=p1263;0;IF(p1277+p1280+p1279>p1263;p1263-(p1277+p1280);p1279))
- p0298: 0.5
- p2045: 30
- p1228: 0.0960886; = IF(p1221=0;0;p0801*p1212*2000/(p1222+p1221*p1225)/p0818)
- p2315: 0.000177775; = p2224*p2182
- p0243: 37.944
- p2566: 2.84156e-6; = p2370*p1014
- p0513: 0; = SQRT(2)*(IF((2*p0381-1)<0;-1;IF((2*p0381-1)>0;1;0))*SQRT(SQRT((2/(pi()*0.140012289)+LN(1-(2*p0381-1)^2)/2)^2-LN(1-(2*p0381-1)^2)/0.140012289)-(2/(pi()*0.140012289)+LN(1-(2*p0381-1)^2)/2)))
- p3108: 3.82962e-10; = p2327*p1023
- p2563: 0.0020814; = p2367*p1014
- p1974: 0; = p1969*p0001/(p0818*p0002)
- p2832: 6.06727e-7; = p2246*(p1020+p1022)
- p1179: 0.5
- p1813: 0
- p1738: 0
- p0004: 0.0254
- p3153: 1.04032e-8; = p2372*p1023
- p3372: 0; = if(p1232=0;p3245*p3360/p0818;0)
- p0771: 4.689; = p0111*(1+p0639*p0243/100)
- p3420: 0; = p3363*p1239
- p3124: 0; = p2343*p1082
- p1670: 0
- p0676: 37.689; = p0016*(1+p0544*p0148/100)
- p2650: 8.78071e-5; = p2259*(p1078+p1080)
- p0677: 0
- p0182: 4.184
- p0650: 0; = IF(p0386<0.5;-SQRT(p0007*EXP(p0518^2*p0008)-p0007);SQRT(p0007*EXP(p0518^2*p0008)-p0007))
- p1963d: 1.48242e-5; = p1608*p1812+p1609*p1813+p1610*p1814+p1611*p1815+p1612*p1816+p1613*p1817+p1614*p1818+p1615*p1819+p1616*p1820+p1617*p1821+p1618*p1822+p1619*p1823+p1620*p1824+p1621*p1825+p1622*p1826+p1623*p1827+p1624*p1828+p1625*p1829+p1626*p1830+p1627*p1831
- p2230: 0; = if(p0783*p0787+p0784*p0788+p0785*p0789+p0786*p0790=0;0;p0787*p0783/(p0783*p0787+p0784*p0788+p0785*p0789+p0786*p0790))
- p1940: 0
- p1261: 0; = if(p1232>0;0;p0732/100)
- p0052: 48.281
- p1206: 0.0392725
- p0986: 0; = IF(p0982+p0985=1;0;IF(p0982+p0985+p0984>1;1-(p0982+p0985);p0984))
- p2976: 0; = p2390*(p1129+p1131)
- p2881: 2.12234e-5; = p2295*(p1020+p1022)
- p2862: 0.000446939; = p2276*(p1020+p1022)
- p2030: 8.5
- p0327: 0.5
- p0311: 0.5
- p2901: 3.79211e-5; = p2315*(p1020+p1022)
- p2277: 0.000459935; = p2223*p2183
- p2615: 0; = p2419*p1073
- p1222: 0.94
- p2594: 0; = p2398*p1014
- p2283: 0.000162163; = p2223*p2189
- p2064: 0.676706
- p1938: 0
- p1587: 0
- p0388: 0.5
- p0235: 0
- p0846: 0.439985; = p0841*p0845^3+p0842*p0845^2+p0843*p0845+p0844
- p0719: 14.534; = p0059*(1+p0587*p0191/100)
- p1068: 0.0186039; = IF(p1012=0;p1054/(p1061*p0818);0)
- p2332: 0.000136814; = p2224*p2200
- p0440: 0; = SQRT(2)*(IF((2*p0308-1)<0;-1;IF((2*p0308-1)>0;1;0))*SQRT(SQRT((2/(pi()*0.140012289)+LN(1-(2*p0308-1)^2)/2)^2-LN(1-(2*p0308-1)^2)/0.140012289)-(2/(pi()*0.140012289)+LN(1-(2*p0308-1)^2)/2)))
- p2183: 0.00121911; = p1064-p2182
- p4716: 2.17731e-6; = p1955*p3481
- p0817: 0
- p2579: 2.03066e-7; = p2383*p1073
- p1703: 0
- p2648: 3.31319e-5; = p2257*(p1019+p1021)
- p2359: 6.9596e-5; = p2225*p2187
- p1758: 2.11522e-5; = p1350*1000/p0818
- p0801: 240000
- p2124: 0.263965
- p0591: 0; = IF(p0327<0.5;-SQRT(p0007*EXP(p0459^2*p0008)-p0007);SQRT(p0007*EXP(p0459^2*p0008)-p0007))
- p2480: 5.75413e-5; = p2284*p1014
- p1963c: 6.65011e-5; = p1588*p1792+p1589*p1793+p1590*p1794+p1591*p1795+p1592*p1796+p1593*p1797+p1594*p1798+p1595*p1799+p1596*p1800+p1597*p1801+p1598*p1802+p1599*p1803+p1600*p1804+p1601*p1805+p1602*p1806+p1603*p1807+p1604*p1808+p1605*p1809+p1606*p1810+p1607*p1811
- p3109: 3.7856e-9; = p2328*p1023
- p2457: 0.000165844; = p2261*p1073
- p3313: 0; = if(and(p1232=0;p3253<>0);p3262*(p3278*(p3282*p1256+p3286*(p1253+p1257)+p1258*p3288+p3298*p3287));0)
- p0916: 0.233482; = p0826+(p0832*(1+p0894))/p0818
- p2526: 7.28703e-8; = p2330*p1014
- p1268: 0
- p2575: 5.7056e-5; = p2379*p1073
- p3104: 1.57489e-10; = p2323*p1023
- p1993: 400
- p1937: 0
- p2633: 1.34335e-6; = p2242*(p1019+p1021)
- p0148: 0
- p1658: 0
- p3034: 3.71171e-12; = p2253*p1023
- p3196: 0; = p2415*p1082
- p2420: 0; = p2235*p2210
- p2015: 723919; = p0830*p2011*p2013
- p2063: 2.01468
- p1048: 0.000264901; = IF(p1012=0;IF(p1037+p1044+p1045+p1046+p1047=1;0;IF(p1037+p1044+p1045+p1046+p1047+p1042>1;1-(p1037+p1044+p1045+p1046+p1047);p1042));0)
- p3245: 0; = IF(p3244=1;0;if(p3244+p0792/100>1;1-p3244;p0792/100))
- p1162: 0.000298619; = p1161/p0818
- p2558: 8.65906e-5; = p2362*p1014
- p2324: 3.96044e-6; = p2224*p2191
- p0761: 0
- p2665: 0; = p2274*(p1128+p1130)
- p0176: 3.779
- p1951: 0
- p2531: 3.00015e-5; = p2335*p1014
- p0048: 10.447
- p1617: 0
- p0983: 1; = if(p0886=0;0;min(1;(p0695*p0694*1000*p0697/100)/p0886))
- p2231: 1; = if(p0783*p0787+p0784*p0788+p0785*p0789+p0786*p0790=0;0;p0788*p0784/(p0783*p0787+p0784*p0788+p0785*p0789+p0786*p0790))
- p2022: 0.000154816; = p2018*p2015/p0818-p2021
- p2930: 0; = p2344*(p1079+p1081)
- p1750: 0
- p1970: 240000; = p0801
- p2970: 1.02133e-6; = p2384*(p1079+p1081)
- p1849: 0
- p1975: 0.000266422; = p1970*p0001/(p0818*p0002)
- p2541: 0; = p2345*p1073
- p0874: 65131; = p0865*p0856
- p2325: 3.20505e-5; = p2224*p2192
- p1572: 0
- p1551: 0
- p4107: 4.9459e-6; = p1758*p3479
- p1922: 0
- p1580: 0
- p2092: 0.54529
- p3065: 1.85617e-9; = p2284*p1023
- p2290: 1.68794e-6; = p2223*p2197
- p2214: 0.000189194; = p1107/p0818
- p0269: 15.356
- p2700: 4.52964e-5; = p2309*(p1078+p1080)
- p1988: 750
- p2826: 3.28741e-6; = p2240*(p1020+p1022)
- p1720: 0
- p2649: 9.70863e-5; = p2258*(p1078+p1080)
- p2368: 2.54009e-6; = p2225*p2197
- p1071: 0
- p1636: 0
- p2904: 4.57737e-6; = p2318*(p1020+p1022)
- p1289: 0
- p0896: 0.482098
- p2305: 6.77415e-6; = p2227*p2212
- p2900: 0.000273116; = p2314*(p1129+p1131)
- p1213: 5
- p1176: 103.664; = p1175*p0801
- p0179: 46.917
- p1660: 0.731714
- p1843: 0
- p2864: 1.56626e-5; = p2278*(p1020+p1022)
- p1655: 0
- p2931: 0; = p2345*(p1079+p1081)
- p2203: 0.00302341; = p1070-p2200-p2201-p2202
- p1020: 0.09908; = IF(p1012=0;IF(p1014+p1019=1;0;IF(p1014+p1019+p1016>1;1-(p1014+p1019);p1016));0)
- p2384: 6.26083e-6; = p2229*p2213
- p1094: 3.06821e-6; = IF(p1071=0;p1088*p0001/(p0818*p0002);0)
- p3448: 0; = p3372*p1240
- p1817: 0
- p0313: 0.5
- p1666: 0
- p1847: 0
- p1111: 0.0872841
- p2621: 0; = p2425*p1073
- p2132: 2.26324e-7; = p2015*p2060*p2094/(p0818*1000)
- p2260: 5.88932e-5; = p2226*p2206
- p2944: 0.000103149; = p2358*(p1020+p1022)
- p0221: 29.567
- p2919: 1.25118e-5; = p2333*(p1020+p1022)
- p1724: 0.797375
- p3397: 0; = p3378*p1234
- p2882: 0.00024331; = p2296*(p1020+p1022)
- p2228: 0; = if(p0774*p0778+p0775*p0779+p0776*p0780+p0777*p0781=0;0;p0780*p0776/(p0774*p0778+p0775*p0779+p0776*p0780+p0777*p0781))
- p1250: 0; = if(p1232>0;0;p1245*p0001/(p0818*p0002))
- p1263: 0; = if(p1232>0;0;IF(p1259=1;0;IF(p1259+p1260>1;1-p1259;p1260)))
- p1146: 0.888454
- p3130: 0; = p2349*p1082
- p2298: 0.00254146; = p2227*p2205
- p2853: 8.26912e-7; = p2267*(p1079+p1081)
- p0537: 0; = IF(p0273<0.5;-SQRT(p0007*EXP(p0405^2*p0008)-p0007);SQRT(p0007*EXP(p0405^2*p0008)-p0007))
- p2099: 0.620397
- p3204: 0; = p2423*p1082
- p0526: 0; = SQRT(2)*(IF((2*p0394-1)<0;-1;IF((2*p0394-1)>0;1;0))*SQRT(SQRT((2/(pi()*0.140012289)+LN(1-(2*p0394-1)^2)/2)^2-LN(1-(2*p0394-1)^2)/0.140012289)-(2/(pi()*0.140012289)+LN(1-(2*p0394-1)^2)/2)))
- p2200: 0.00427412; = p1056/p0818
- p0342: 0.5
- p4180: 6.40057e-6; = p1831*p3479
- p3363: 0; = if(p1232=0;p3244*p3357/p0818;0)
- p1236: 0; = if(p1232>0;0;p0728/100)
- p2969: 9.7671e-8; = p2383*(p1079+p1081)
- p0349: 0.5
- p2303: 0.000371631; = p2227*p2210
- p3055: 0; = p2274*p1132
- p1802: 0
- p2445: 8.52621e-6; = p2249*p1014
- p5131: 0; = p1962*p3483
- p3162: 4.89412e-7; = p2381*p1082
- p1265: 0; = if(p1232>0;0;IF(p1259+p1263+p1264=1;0;IF(p1259+p1263+p1264+p1262>1;1-(p1259+p1263+p1264);p1262)))
- p3054: 0; = p2273*p1132
- p2227: 0.86211; = if(p0774*p0778+p0775*p0779+p0776*p0780+p0777*p0781=0;0;p0779*p0775/(p0774*p0778+p0775*p0779+p0776*p0780+p0777*p0781))
- p2107: 0.881623
- p2175: 0.000431096; = p0895*p0908/p0818
- p2163: 0.000344341; = (p2017-p2020)/p0818-(p2025+p2028+p2033+p2034+p2051+p2125+p2126+p2127+p2128+p2129+p2130+p2131+p2132+p2133+p2134+p2135+p2136+p2137+p2138+p2139+p2140+p2141+p2142+p2143+p2144+p2145+p2146+p2147+p2148+p2149+p2150+p2151+p2152+p2153+p2154+p2155+p2156+p2157)
- p2159: 1.60973e-6; = p2015*p2083*p2121/(p0818*1000)
- p0734: 0
- p0008: 0.0739645; = (p0007-1.5)/(p0007-1)^2
- p1859: 0
- p2505: 3.18194e-5; = p2309*p1073
- p2819: 0; = p2428*(p1128+p1130)
- p5101: 0; = p1928*p3483
- p2414: 0; = p2235*p2204
- p3172: 0; = p2391*p1132
- p1059: 0.335
- p1925: 0

## Reference product
- peanuts; at harvest in 2004; at farm; 90%-95% moisture: 1 kg

## Inputs from technosphere
- CUTOFF potassic fertilizer, other single nutrients; at point-of-sale: 0.00296053 kg; = p1155
- CUTOFF pesticide storage: 0.000565944 kg*a; = p1965
- CUTOFF phosphatic fertilizer, diammonium phosphate; at point-of-sale: 0.0150882 kg; = p1119
- CUTOFF manure appl svc; unspec rate, 2004 peanuts: 0.000266422 ha; = p1233
- CUTOFF pesticide, Trifluralin; at point-of-sale; kg AI: 2.11522e-5 kg; = p1955
- CUTOFF apply pesticide; chiseled or injected/knifed in: 9.72334e-6 ha; = p1337
- CUTOFF fertilizer storage: 0.055031 kg*a; = p1160
- CUTOFF peanut seeds; unspec. type; at point-of-sale: 0.0257771 kg; = p0972
- CUTOFF apply N fertilizer; no broadcast application: 7.14221e-5 ha; = p1030
- CUTOFF apply zinc compounds; unspecified method: 0.000266422 ha; = p1183
- CUTOFF pesticide, Pendimethalin; at point-of-sale; kg AI: 9.20742e-5 kg; = p1903
- CUTOFF apply pesticide; as foliar or directed spray: 6.09698e-5 ha; = p1339
- CUTOFF seed storage; peanuts: 0.0128885 kg*a; = p0975
- CUTOFF sulfur; at point-of-sale: 2.8223e-7 kg; = p1172
- CUTOFF apply single or mixed K fertilizer; unspec. method: 5.66188e-7 ha; = p1144
- CUTOFF gypsum storage: 6.89879e-7 kg*a; = p1168
- CUTOFF nitrogenous fertilizer, anhydrous ammonia; at point-of-sale: 0.00677286 kg; = p1064
- CUTOFF nitrogenous fertilizer, urea; at point-of-sale: 0.00939366 kg; = p1070
- CUTOFF phosphatic fertilizer, monoammonium phosphate; at point-of-sale: 0.00928229 kg; = p1120
- CUTOFF nitrogenous fertilizer, sodium nitrate; at point-of-sale: 2.79632e-5 kg; = p1069
- CUTOFF gypsum; at point-of-sale: 1.37976e-6 kg; = p1166
- CUTOFF apply K fertilizer; no broadcast application: 6.15688e-5 ha; = p1139
- CUTOFF apply single or mixed N fertilizer; unspec. method: 2.30394e-9 ha; = p1035
- CUTOFF prepare soil; for conventional till, peanuts; <15% residue: 0.000180338 ha; = p0934
- CUTOFF pesticide, Propiconazole; at point-of-sale; kg AI: 3.73274e-6 kg; = p1914
- CUTOFF harvest; peanuts residue management: 0.000266422 ha; = p1975
- CUTOFF bulk cargo rail transport; diesel: 0.0607076 metric ton*km; = p2008
- CUTOFF apply K fertilizer; broadcast with incorporation: 7.93557e-5 ha; = p1140
- CUTOFF prepare soil; for unspec. till, peanuts: 4.4246e-5 ha; = p0939
- CUTOFF apply sulfuric acid; unspecified method: 0.000266422 ha; = p1177
- CUTOFF international vessel transport; average fuel: 0.309255 metric ton*km; = p2006
- CUTOFF apply mixed N fertilizer; with incorporation: 2.40692e-5 ha; = p1033
- CUTOFF regional or national trucking; class 8, average fuel: 0.0292821 metric ton*km; = p2009
- CUTOFF apply pesticide; in irrigation water: 3.54965e-5 ha; = p1341
- CUTOFF apply N fertilizer; broadcast with incorporation: 8.57549e-5 ha; = p1031
- CUTOFF apply P fertilizer; broadcast without incorporation: 3.35918e-5 ha; = p1091
- CUTOFF pesticide, Ethalfluralin; at point-of-sale; kg AI: 2.73734e-5 kg; = p1831
- CUTOFF pesticide, unspecified type; at point-of-sale; kg AI: 6.4117e-5 kg; = p1962
- CUTOFF pesticide, Glyphosate; at point-of-sale; kg AI: 6.0968e-5 kg; = p1855
- CUTOFF sulfuric acid; at point-of-sale: 1.28984e-7 kg; = p1178
- CUTOFF apply pesticide; broadcast with incorporation: 0.000247097 ha; = p1333
- CUTOFF liming materials storage: 0.0518469 kg*a; = p1231
- CUTOFF pesticide, Imazethapyr; at point-of-sale; kg AI: 1.24425e-6 kg; = p1864
- CUTOFF domestic barge transport; average fuel: 0.0323774 metric ton*km; = p2007
- CUTOFF local area trucking; class 6, average fuel: 0.00242831 metric ton*km; = p2010
- CUTOFF phosphatic fertilizer, superphos. grades 22% and under; at point-of-sale: 9.00236e-5 kg; = p1116
- CUTOFF apply N fertilizer; broadcast without incorporation: 2.28274e-5 ha; = p1032
- CUTOFF apply P fertilizer; broadcast with incorporation: 9.94203e-5 ha; = p1090
- CUTOFF irrigate; unspec. irrigation method, unspec. water source, in 2004: 6.30305e-6 ha-m; = p1011
- CUTOFF N inhibitor appl svc; unspec rate & type, 2004 peanuts: 0.000298619 ha; = p1162
- CUTOFF apply sulfur; unspecified method: 0.000266422 ha; = p1171
- CUTOFF nitrogenous fertilizer, nitrogen solutions; at point-of-sale: 0.0186039 kg; = p1068
- CUTOFF nitrogenous fertilizer, aqueous ammonia; at point-of-sale: 0.000865005 kg; = p1065
- CUTOFF zinc compounds storage: 2.13247e-8 kg*a; = p1186
- CUTOFF apply P fertilizer; no broadcast application: 6.98399e-5 ha; = p1089
- CUTOFF harvest; peanuts: 0.000260872 ha; = p1971
- CUTOFF apply pesticide; broadcast without incorporation: 0.000138497 ha; = p1335
- CUTOFF pesticide, Imazapic; at point-of-sale; kg AI: 1.24425e-6 kg; = p1760
- CUTOFF prepare soil; for no-till, peanuts: 4.18382e-5 ha; = p0936
- CUTOFF sewage sludge storage: 2.70763e-8 kg*a; = p1192
- CUTOFF pesticide, Chlorothalonil; at point-of-sale; kg AI: 0.000113226 kg; = p1792
- CUTOFF limestone, high-grade, pulverized; at point-of-sale: 0.0960886 kg; = p1228
- peanut residue; at harvest in 2004; at farm; 85%-92% moisture: 0.698213 kg; = p0839
- CUTOFF zinc compounds; at point-of-sale: 4.26494e-8 kg; = p1184
- CUTOFF pesticide, S-Metolachlor; at point-of-sale; kg AI: 4.23043e-5 kg; = p1927
- CUTOFF apply K fertilizer; broadcast without incorporation: 2.40613e-5 ha; = p1141
- CUTOFF phosphatic fertilizer, superphosphate grades over 22%; at point-of-sale: 0.000903153 kg; = p1117
- CUTOFF pesticide, Sethoxydim; at point-of-sale; kg AI: 1.24425e-6 kg; = p1928
- CUTOFF sewage sludge; at point-of-sale: 5.41525e-8 kg; = p1190
- CUTOFF fertilizer filler materials; at point-of-sale: 0.0196502 kg; = p1158
- CUTOFF sulfur storage: 1.41115e-7 kg*a; = p1174
- CUTOFF sulfuric acid storage: 6.4492e-8 kg*a; = p1180
- CUTOFF sowing; for no-till, peanuts: 4.18382e-5 ha; = p0960
- CUTOFF pesticide, Butoxone; at point-of-sale; kg AI: 2.11522e-5 kg; = p1758
- CUTOFF apply mixed N fertilizer; without incorporation: 2.63179e-5 ha; = p1034
- CUTOFF nitrogenous fertilizer, ammonium nitrate; at point-of-sale: 0.00254254 kg; = p1066
- CUTOFF apply pesticide; unspecified application methods: 0.000100528 ha; = p1345
- CUTOFF potassic fertilizer, potassium chloride; at point-of-sale: 0.0207506 kg; = p1154
- CUTOFF pesticide, Azoxystrobin; at point-of-sale; kg AI: 3.35946e-5 kg; = p1773
- CUTOFF nitrogenous fertilizer, ammonium sulfate; at point-of-sale: 0.00204683 kg; = p1067
- CUTOFF apply single or mixed P fertilizer; unspec. method: 3.06821e-6 ha; = p1094
- CUTOFF dolomite, pulverized; at point-of-sale: 0.00760506 kg; = p1229
- CUTOFF pesticide formulation balance; at point-of-sale: 0.000310543 kg; = p1963
- CUTOFF irrigate; pressure, groundwater source, in 2004: 0.000101811 ha-m; = p0993
- CUTOFF sowing; for unspec. till, peanuts: 4.4246e-5 ha; = p0963
- CUTOFF pesticide, Pyraclostrobin; at point-of-sale; kg AI: 1.24425e-5 kg; = p1918
- CUTOFF apply gypsum; unspecified method: 0.000266422 ha; = p1165
- CUTOFF pesticide, Tebuconazole; at point-of-sale; kg AI: 1.49309e-5 kg; = p1936
- CUTOFF apply sewage sludge; unspecified method: 0.000266422 ha; = p1189
- CUTOFF apply liming materials; unspecified method: 0.000266422 ha; = p1227
- CUTOFF phosphatic fertilizer, other single phosphates; at point-of-sale: 0.00108415 kg; = p1118
- CUTOFF sowing; for conventional till, peanuts; <15% residue: 0.000180338 ha; = p0958

## Inputs from nature
- Transformation, from annual crop [natural resource, land]: 2.66422 m2; = 1.0 * (p0877+p0879+p0883+p0875)
- Phosphorus: 0.00559751 kg; = p0910
- Dry matter except CNPK; from plant uptake: 1.25148 kg; = p0917
- Carbon dioxide: 4.08408 kg; = p0900*3.6666666667
- Occupation, annual crop [natural resource, land]: 1.17222 m2*year; = 1.0 * (p0855)
- Water, ground: 1018.11 kg; = p0887
- Transformation, to annual crop [natural resource, land]: 2.66422 m2; = 1.0 * (p0857)
- Potassium; from plant uptake; biogenic: 0.0217262 kg; = p0915
- Nitrogen: 0.0669044 kg; = p0905
- Water, unspecified origin: 0.063264 m3; = p0893*0.001+p0916*0.001

## Emissions to nature
- Calcium [soil, agricultural]: 0.0378737 kg; = 1.0 * (p3226+p3218)
- Imazapic; broadcast with incorporation: 5.19068e-7 kg; = p3903
- Monoammonium phosphate; broadcast w/ incorp. in fert. in spr. bef. plant.: 0.00341356 kg; = p2693*8.2142857143
- Anhydrous ammonia; broadcast w/o incorp. in fert. in fall bef. plant.: 3.30705e-5 kg; = p2823*1.2142857143
- Urea; unspec. appl. method in fert. after plant.: 5.2016e-8 kg; = p3153*5
- Urea; no broadcast in fert. in fall bef. plant.: 6.52946e-5 kg; = p2451*5
- Sodium nitrate; unspec. appl. method in fert. in spr. bef. plant.: 1.02482e-10 kg; = p3071*6.0714285714
- Trifluralin [soil, agricultural]: 2.11522e-5 kg; = 1.0 * (p4922+p5334+p4716+p4510+p4098+p4304)
- Methane: 2.5356e-6 kg; = p2025*1.3333333333
- Ammonium sulfate; unspec. appl. method in fert. at plant.: 6.48636e-10 kg; = p3103*4.7142857143
- Acetol; from residue burning: 3.39148e-6 kg; = p2134*2.0555555556
- Toluene [air, non-urban air or from high stacks]: 1.71564e-7 kg; = 1.0 * (p2141*1.0952380952)
- Superphosphate, grades<= 22%; no broadcast in fert. in spr. bef. plant.; kg P: 2.29752e-6 kg; = p2501
- Diammonium phosphate; no broadcast in fert. in spr. bef. plant.: 0.00406353 kg; = p2494*4.7142857143
- Dioxins and furans (PCDD/F); from residue burning: 2.7022e-14 kg TEQ; = p2047
- Plant dry matter; from residue burning: 0.000300742 kg; = p2164
- Furan [air, non-urban air or from high stacks]: 9.85315e-8 kg; = 1.0 * (p2138*1.4166666667)
- Ammonium sulfate; unspec. appl. method in fert. after plant.: 1.15043e-8 kg; = p3142*4.7142857143
- Monoammonium phosphate; no broadcast in fert. in spr. bef. plant.: 0.00239793 kg; = p2498*8.2142857143
- Sodium nitrate; unspec. appl. method in fert. after plant.: 1.5422e-10 kg; = p3149*6.0714285714
- Potassium; in above-ground residue left on field; biogenic: 0.00768504 kg; = p2170
- Aqueous ammonia; no broadcast in fert. after plant.: 4.15936e-5 kg; = p2552*1.2142857143
- Monoammonium phosphate; unspec. appl. method in fert. after plant.: 9.31097e-6 kg; = p3161*8.2142857143
- Aqueous ammonia; no broadcast in fert. at plant.: 2.34513e-6 kg; = p2513*1.2142857143
- Other single K nutrients; broadcast w/ incorp. in fert. in spr. bef. plant.; kg K: 0.000518348 kg; = p2704
- Acrylonitrile: 3.01923e-8 kg; = p2156*1.4722222222
- Anhydrous ammonia; no broadcast in fert. in spr. bef. plant.: 0.000788715 kg; = p2472*1.2142857143
- Other single phosphates; broadcast w/o incorp. in fert. in fall bef. plant.; kg P: 1.09519e-6 kg; = p2856
- cis-2-Butene: 3.86926e-8 kg; = p2149*1.1666666667
- Diammonium phosphate; broadcast w/o incorp. in fert. after plant.: 0.000172747 kg; = p2962*4.7142857143
- Ethane [air, non-urban air or from high stacks]: 8.18514e-7 kg; = 1.0 * (p2126*1.25)
- Potassium chloride; broadcast w/o incorp. in fert. in spr. bef. plant.: 0.00277487 kg; = p2897*2.2166666667
- Other single K nutrients; unspec. appl. method in fert. in spr. bef. plant.; kg K: 3.69832e-6 kg; = p3094
- Diammonium phosphate; broadcast w/ incorp. in fert. in fall bef. plant.: 0.000413948 kg; = p2650*4.7142857143
- Plant dry matter; in aboveground residue left on field: 0.311114 kg; = p2172
- Other single phosphates; broadcast w/o incorp. in fert. after plant.; kg P: 1.35269e-6 kg; = p2973
- Ammonium nitrate; broadcast w/o incorp. in fert. in spr. bef. plant.: 0.00032314 kg; = p2866*4.7142857143
- Tebuconazole [soil, agricultural]: 1.49309e-5 kg; = 1.0 * (p4903+p4491+p4285+p4079+p4697+p5315)
- Urea; broadcast w/o incorp. in fert. in spr. bef. plant.: 0.00073732 kg; = p2880*5
- Butoxone; broadcast without incorporation: 4.9459e-6 kg; = p4107
- Potassium chloride; broadcast w/ incorp. in fert. in spr. bef. plant.: 0.00915169 kg; = p2702*2.2166666667
- Dinitrogen monoxide [air, non-urban air or from high stacks]: 6.30631e-8 kg; = 1.0 * (p2044*1.5714285714)
- Superphosphate, grades<= 22%; unspec. appl. method in fert. in spr. bef. plant.; kg P: 1.00935e-7 kg; = p3086
- Nitrogen dioxide: 2.52296e-6 kg; = p2039*3.2857142857
- isobutene: 1.0528e-7 kg; = p2150*1.1666666667
- Anhydrous ammonia; unspec. appl. method in fert. in fall bef. plant.: 1.55035e-9 kg; = p3018*1.2142857143
- Other single phosphates; broadcast w/ incorp. in fert. after plant.; kg P: 4.00351e-6 kg; = p2778
- Oxygen; applied in dolomite: 0.00381733 kg; = p3228
- Butoxone; in irrigation water: 1.26762e-6 kg; = p4725
- Ammonia [air, non-urban air or from high stacks]: 1.95467e-6 kg; = 1.0 * (p2159*1.2142857143)
- Filler materials, applied with synthetic fertilizer: 0.0196502 kg; = p2432
- Nitrogen solution; broadcast w/o incorp. in fert. after plant.; broadcast w/o incorp. in fert. after plant.; kg N: 0.000675895 kg; = p2951
- Pesticide formulation balance; broadcast without incorporation: 7.26126e-5 kg; = p4308
- Hydrocyanic acid: 2.56962e-7 kg; = p2154*2.25
- Monoammonium phosphate; broadcast w/ incorp. in fert. in fall bef. plant.: 0.000244274 kg; = p2654*8.2142857143
- Monoammonium phosphate; broadcast w/o incorp. in fert. after plant.: 0.000101939 kg; = p2966*8.2142857143
- Gypsum: 1.37976e-6 kg; = p3229
- Sodium nitrate; broadcast w/o incorp. in fert. in spr. bef. plant.: 2.18605e-6 kg; = p2876*6.0714285714
- Urea; unspec. appl. method in fert. in fall bef. plant.: 2.10628e-9 kg; = p3036*5
- Nitrogen; in above-ground residue left on field: 0.0126974 kg; = p2168
- Propane [air, non-urban air or from high stacks]: 2.53682e-7 kg; = 1.0 * (p2142*1.2222222222)
- Phosphorous; in above-ground residue left on field: 0.00108724 kg; = p2169
- Nitrogen solution; broadcast w/ incorp. in fert. after plant.; broadcast w/ incorp. in fert. after plant.; kg N: 0.00151041 kg; = p2756
- 1-Butene: 1.20577e-7 kg; = p2144*1.1666666667
- Other single K nutrients; broadcast w/o incorp. in fert. in spr. bef. plant.; kg K: 0.000157168 kg; = p2899
- Imazapic; unspec. appl. method: 2.11174e-7 kg; = p5139
- Propene [air, non-urban air or from high stacks]: 6.08919e-7 kg; = 1.0 * (p2136*1.1666666667)
- Nitrogen solution; no broadcast in fert. at plant.; no broadcast in fert. at plant.; kg N: 5.53823e-5 kg; = p2522
- Aqueous ammonia; unspec. appl. method in fert. after plant.: 1.34173e-9 kg; = p3137*1.2142857143
- Imazapic; foliar or directed spray: 1.28077e-7 kg; = p4521
- Carbon dioxide, in air: 0.00126258 kg; = p2163*3.6666666667
- Anhydrous ammonia; broadcast w/o incorp. in fert. at plant.: 4.60471e-5 kg; = p2901*1.2142857143
- Superphosphate, grades>22%; broadcast w/o incorp. in fert. in fall bef. plant.; kg P: 1.90404e-6 kg; = p2854
- Superphosphate, grades<= 22%; broadcast w/ incorp. in fert. in fall bef. plant.; kg P: 2.34046e-7 kg; = p2657
- Aqueous ammonia; broadcast w/o incorp. in fert. in fall bef. plant.: 1.15893e-6 kg; = p2825*1.2142857143
- Ammonium nitrate; broadcast w/ incorp. in fert. in fall bef. plant.: 4.40025e-5 kg; = p2632*4.7142857143
- Ammonium nitrate; broadcast w/o incorp. in fert. at plant.: 2.74172e-5 kg; = p2905*4.7142857143
- Azoxystrobin [soil, agricultural]: 3.35946e-5 kg; = 1.0 * (p3916+p4534+p4740+p4328+p5152+p4122)
- Seeds; used in planting and sowing: 0.0257771 kg; = p2179
- Ammonium nitrate; no broadcast in fert. in spr. bef. plant.: 0.000469614 kg; = p2476*4.7142857143
- cyclopentane: 1.48986e-9 kg; = p2153*1.0166666667
- Urea; broadcast w/o incorp. in fert. in fall bef. plant.: 4.4929e-5 kg; = p2841*5
- Aqueous ammonia; unspec. appl. method in fert. in spr. bef. plant.: 8.91607e-10 kg; = p3059*1.2142857143
- Particulates, < 2.5 um [air, non-urban air or from high stacks]: 5.54852e-6 kg; = 1.0 * (p2035+p2033)
- Monoammonium phosphate; no broadcast in fert. in fall bef. plant.: 0.000171596 kg; = p2459*8.2142857143
- Sodium nitrate; broadcast w/ incorp. in fert. after plant.: 7.35135e-6 kg; = p2759*6.0714285714
- Anhydrous ammonia; broadcast w/ incorp. in fert. at plant.: 0.000102901 kg; = p2706*1.2142857143
- Chlorothalonil [soil, agricultural]: 0.000113226 kg; = 1.0 * (p4759+p3935+p4553+p4347+p5171+p4141)
- Ammonium sulfate; broadcast w/ incorp. in fert. at plant.: 3.09192e-5 kg; = p2713*4.7142857143
- Ammonium sulfate; unspec. appl. method in fert. in fall bef. plant.: 4.65842e-10 kg; = p3025*4.7142857143
- Nitrogen solution; broadcast w/ incorp. in fert. in spr. bef. plant.; broadcast w/ incorp. in fert. in spr. bef. plan...: 0.0010037 kg; = p2678
- Ammonium nitrate; no broadcast in fert. after plant.: 0.000706696 kg; = p2554*4.7142857143
- Monoammonium phosphate; broadcast w/o incorp. in fert. in fall bef. plant.: 8.25345e-5 kg; = p2849*8.2142857143
- Other single phosphates; no broadcast in fert. after plant.; kg P: 2.81235e-6 kg; = p2583
- Superphosphate, grades>22%; unspec. appl. method in fert. in spr. bef. plant.; kg P: 2.43028e-6 kg; = p3088
- Sodium nitrate; unspec. appl. method in fert. at plant.: 8.69523e-12 kg; = p3110*6.0714285714
- Other single phosphates; unspec. appl. method in fert. in fall bef. plant.; kg P: 1.00033e-7 kg; = p3051
- Nitrogen; in below-ground residue: 0.00503459 kg; = p2174
- Imazapic; in irrigation water: 7.45661e-8 kg; = p4727
- Nitrogen solution; no broadcast in fert. after plant.; no broadcast in fert. after plant.; kg N: 0.000982267 kg; = p2561
- Nitrogen solution; unspec. appl. method in fert. at plant.; unspec. appl. method in fert. at plant.; kg N: 1.78652e-9 kg; = p3107
- Sodium nitrate; broadcast w/ incorp. in fert. in fall bef. plant.: 2.97678e-7 kg; = p2642*6.0714285714
- Water: 1081.24 kg; = p2178+p2171+p2181
- Ammonium nitrate; broadcast w/ incorp. in fert. after plant.: 0.00108667 kg; = p2749*4.7142857143
- Aqueous ammonia; broadcast w/o incorp. in fert. in spr. bef. plant.: 1.90189e-5 kg; = p2864*1.2142857143
- Urea; broadcast w/ incorp. in fert. at plant.: 0.000139799 kg; = p2724*5
- Glycolaldehyde; from residue burning: 1.81473e-6 kg; = p2135*2.5
- Ash: 0.000178165 kg; = p2022+p2021
- Carbon monoxide, fossil [air, non-urban air or from high stacks]: 5.75874e-5 kg; = 1.0 * (p2028*2.3333333333)
- Other single phosphates; no broadcast in fert. in spr. bef. plant.; kg P: 3.18194e-5 kg; = p2505
- Monoammonium phosphate; broadcast w/ incorp. in fert. after plant.: 0.000301707 kg; = p2771*8.2142857143
- Other single phosphates; unspec. appl. method in fert. in spr. bef. plant.; kg P: 1.39789e-6 kg; = p3090
- Sulfur [soil, agricultural]: 2.8223e-7 kg; = 1.0 * (p3230)
- Nitrogen; applied in sewage sludge: 2.53282e-9 kg; = p3240
- Diammonium phosphate; unspec. appl. method in fert. in spr. bef. plant.: 0.000178519 kg; = p3079*4.7142857143
- Imazapic; chiseled or injected/knifed in: 2.04254e-8 kg; = p4315
- Urea; broadcast w/ incorp. in fert. after plant.: 0.0024795 kg; = p2763*5
- Superphosphate, grades>22%; broadcast w/o incorp. in fert. in spr. bef. plant.; kg P: 2.66075e-5 kg; = p2893
- Pesticide formulation balance; chiseled or injected/knifed in: 5.09785e-6 kg; = p4514
- NMVOC, non-methane volatile organic compounds, unspecified origin [air, non-urban air or from high stacks]: 2.31436e-5 kg; = 1.0 * (p2052+p2051)
- Pentane [air, non-urban air or from high stacks]: 1.90557e-8 kg; = 1.0 * (p2152*1.0166666667)
- Ammonium sulfate; broadcast w/o incorp. in fert. after plant.: 0.000245398 kg; = p2947*4.7142857143
- Potassium; in below-ground residue; biogenic: 0.00304715 kg; = p2176
- Carbon [soil, agricultural]: 0.444302 kg; = 1.0 * (p3225+p2167+p2173+p3217+p3242)
- Aqueous ammonia; broadcast w/o incorp. in fert. at plant.: 1.61368e-6 kg; = p2903*1.2142857143
- Butoxone; chiseled or injected/knifed in: 3.47232e-7 kg; = p4313
- Ammonium nitrate; no broadcast in fert. in fall bef. plant.: 2.86162e-5 kg; = p2437*4.7142857143
- Propiconazole [soil, agricultural]: 3.73274e-6 kg; = 1.0 * (p4469+p5293+p4675+p4263+p4057+p4881)
- Ammonium sulfate; broadcast w/o incorp. in fert. in spr. bef. plant.: 0.000163072 kg; = p2869*4.7142857143
- Formic acid [air, non-urban air or from high stacks]: 9.02553e-7 kg; = 1.0 * (p2131*3.8333333333)
- Monoammonium phosphate; broadcast w/o incorp. in fert. in spr. bef. plant.: 0.00115336 kg; = p2888*8.2142857143
- Diammonium phosphate; broadcast w/o incorp. in fert. in fall bef. plant.: 0.000139863 kg; = p2845*4.7142857143
- Acetaldehyde [air, non-urban air or from high stacks]: 1.12028e-6 kg; = 1.0 * (p2130*1.8333333333)
- Ethalfluralin [soil, agricultural]: 2.73734e-5 kg; = 1.0 * (p4180+p4592+p5210+p3974+p4386+p4798)
- Ammonium nitrate; unspec. appl. method in fert. at plant.: 1.28532e-9 kg; = p3100*4.7142857143
- Methanol [air, non-urban air or from high stacks]: 2.96033e-6 kg; = 1.0 * (p2129*2.6666666667)
- Superphosphate, grades>22%; broadcast w/o incorp. in fert. after plant.; kg P: 2.3517e-6 kg; = p2971
- Aqueous ammonia; unspec. appl. method in fert. at plant.: 7.56495e-11 kg; = p3098*1.2142857143
- Sodium nitrate; broadcast w/o incorp. in fert. in fall bef. plant.: 1.33208e-7 kg; = p2837*6.0714285714
- Monoammonium phosphate; no broadcast in fert. after plant.: 0.00021194 kg; = p2576*8.2142857143
- Aqueous ammonia; broadcast w/ incorp. in fert. at plant.: 3.60606e-6 kg; = p2708*1.2142857143
- Anhydrous ammonia; broadcast w/ incorp. in fert. after plant.: 0.00182506 kg; = p2745*1.2142857143
- Sodium nitrate; broadcast w/o incorp. in fert. at plant.: 1.85478e-7 kg; = p2915*6.0714285714
- Other single phosphates; broadcast w/ incorp. in fert. in fall bef. plant.; kg P: 3.24141e-6 kg; = p2661
- Superphosphate, grades<= 22%; broadcast w/o incorp. in fert. after plant.; kg P: 9.7671e-8 kg; = p2969
- Water [air, non-urban air or from high stacks]: 9.74474e-8 m3; = 0.001 * (p2016)
- Pesticides, unspecified [soil, agricultural]: 6.4117e-5 kg; = 1.0 * (p4925+p5337+p4101+p4513+p4719+p4307)
- Isoprene [air, non-urban air or from high stacks]: 3.39878e-7 kg; = 1.0 * (p2145*1.1333333333)
- Ammonium sulfate; broadcast w/ incorp. in fert. in spr. bef. plant.: 0.000364414 kg; = p2674*4.7142857143
- Acetone [air, non-urban air or from high stacks]: 4.01961e-7 kg; = 1.0 * (p2139*1.6111111111)
- Other single phosphates; unspec. appl. method in fert. after plant.; kg P: 1.23552e-7 kg; = p3168
- Nitrogen solution; no broadcast in fert. in fall bef. plant.; no broadcast in fert. in fall bef. plant.; kg N: 3.97749e-5 kg; = p2444
- Butadiene [air, non-urban air or from high stacks]: 1.35904e-7 kg; = 1.0 * (p2143*1.125)
- Potassium chloride; unspec. appl. method in fert. in spr. bef. plant.: 6.52955e-5 kg; = p3092*2.2166666667
- Diammonium phosphate; unspec. appl. method in fert. in fall bef. plant.: 1.27748e-5 kg; = p3040*4.7142857143
- Phosphorous; in below-ground residue: 0.000431096 kg; = p2175
- Oxygen; applied in limestone: 0.0433159 kg; = p3219
- Sewage sludge dry matter; applied in sewage sludge: 2.80407e-10 kg; = p3243
- Superphosphate, grades<= 22%; no broadcast in fert. after plant.; kg P: 2.03066e-7 kg; = p2579
- Diammonium phosphate; unspec. appl. method in fert. after plant.: 1.57784e-5 kg; = p3157*4.7142857143
- Diammonium phosphate; no broadcast in fert. after plant.: 0.000359154 kg; = p2572*4.7142857143
- Anhydrous ammonia; no broadcast in fert. after plant.: 0.00118689 kg; = p2550*1.2142857143
- Aqueous ammonia; broadcast w/ incorp. in fert. in fall bef. plant.: 2.58983e-6 kg; = p2630*1.2142857143
- Urea; no broadcast in fert. in spr. bef. plant.: 0.00107154 kg; = p2490*5
- Anhydrous ammonia; unspec. appl. method in fert. at plant.: 2.15869e-9 kg; = p3096*1.2142857143
- Urea; broadcast w/o incorp. in fert. at plant.: 6.25589e-5 kg; = p2919*5
- Ammonium nitrate; broadcast w/o incorp. in fert. after plant.: 0.000486276 kg; = p2944*4.7142857143
- Benzene [air, non-urban air or from high stacks]: 1.38214e-7 kg; = 1.0 * (p2140*1.0833333333)
- Phenol [air, non-urban air or from high stacks]: 4.67185e-7 kg; = 1.0 * (p2133*1.3055555556)
- Propanenitrile: 5.77162e-8 kg; = p2157*1.5277777778
- Superphosphate, grades>22%; unspec. appl. method in fert. in fall bef. plant.; kg P: 1.73911e-7 kg; = p3049
- S-Metolachlor: 4.23043e-5 kg; = p4276+p4688+p4482+p4070+p4894+p5306
- Aqueous ammonia; no broadcast in fert. in spr. bef. plant.: 2.76398e-5 kg; = p2474*1.2142857143
- Ammonium sulfate; no broadcast in fert. after plant.: 0.000356633 kg; = p2557*4.7142857143
- Superphosphate, grades>22%; broadcast w/ incorp. in fert. after plant.; kg P: 6.96024e-6 kg; = p2776
- Aqueous ammonia; broadcast w/ incorp. in fert. after plant.: 6.39576e-5 kg; = p2747*1.2142857143
- Acetonitrile [air, non-urban air or from high stacks]: 1.89083e-7 kg; = 1.0 * (p2155*1.7083333333)
- Nitrogen solution; unspec. appl. method in fert. after plant.; unspec. appl. method in fert. after plant.; kg N: 3.1686e-8 kg; = p3146
- Superphosphate, grades>22%; unspec. appl. method in fert. after plant.; kg P: 2.148e-7 kg; = p3166
- Glyphosate [soil, agricultural]: 6.0968e-5 kg; = 1.0 * (p4204+p4616+p4822+p3998+p5234+p4410)
- Ammonium nitrate; unspec. appl. method in fert. in spr. bef. plant.: 1.51489e-8 kg; = p3061*4.7142857143
- Sodium nitrate; broadcast w/o incorp. in fert. after plant.: 3.28966e-6 kg; = p2954*6.0714285714
- Ethyne [air, non-urban air or from high stacks]: 2.45184e-7 kg; = 1.0 * (p2132*1.0833333333)
- Ammonium sulfate; no broadcast in fert. in fall bef. plant.: 1.44411e-5 kg; = p2440*4.7142857143
- Pesticide formulation balance; unspec. appl. method: 5.27056e-5 kg; = p5338
- Zinc compounds: 4.26494e-8 kg; = p3232
- Particulates, < 10 um: 7.65623e-6 kg; = p2034+p2036
- Potassium chloride; no broadcast in fert. in spr. bef. plant.: 0.00710041 kg; = p2507*2.2166666667
- Urea; unspec. appl. method in fert. in spr. bef. plant.: 3.45657e-8 kg; = p3075*5
- Sodium nitrate; no broadcast in fert. after plant.: 4.78081e-6 kg; = p2564*6.0714285714
- Nitrogen solution; broadcast w/o incorp. in fert. at plant.; broadcast w/o incorp. in fert. at plant.; kg N: 3.81084e-5 kg; = p2912
- Ammonium sulfate; no broadcast in fert. at plant.: 2.01077e-5 kg; = p2518*4.7142857143
- Plant dry matter; in below-ground residue: 0.123358 kg; = p2177
- trans-2-Butene: 5.12902e-8 kg; = p2148*1.1666666667
- Butoxone; unspec. appl. method: 3.58996e-6 kg; = p5137
- Superphosphate, grades>22%; no broadcast in fert. in fall bef. plant.; kg P: 3.95864e-6 kg; = p2464
- Diammonium phosphate; no broadcast in fert. in fall bef. plant.: 0.000290786 kg; = p2455*4.7142857143
- Ammonium nitrate; unspec. appl. method in fert. in fall bef. plant.: 9.23104e-10 kg; = p3022*4.7142857143
- Monoammonium phosphate; unspec. appl. method in fert. in fall bef. plant.: 7.53855e-6 kg; = p3044*8.2142857143
- Butane [air, non-urban air or from high stacks]: 5.4723e-8 kg; = 1.0 * (p2147*1.0208333333)
- Nitrogen solution; unspec. appl. method in fert. in spr. bef. plant.; unspec. appl. method in fert. in spr. bef. plan...: 2.1056e-8 kg; = p3068
- Ammonium sulfate; broadcast w/ incorp. in fert. after plant.: 0.000548386 kg; = p2752*4.7142857143
- Aqueous ammonia; broadcast w/ incorp. in fert. in spr. bef. plant.: 4.25011e-5 kg; = p2669*1.2142857143
- Phosphorous; applied in sewage sludge: 3.02359e-10 kg; = p3241
- Superphosphate, grades<= 22%; broadcast w/ incorp. in fert. after plant.; kg P: 2.89073e-7 kg; = p2774
- Sulfuric acid [soil, agricultural]: 1.28984e-7 kg; = 1.0 * (p3231)
- Urea; broadcast w/o incorp. in fert. after plant.: 0.00110955 kg; = p2958*5
- Anhydrous ammonia; broadcast w/o incorp. in fert. after plant.: 0.000816697 kg; = p2940*1.2142857143
- Urea; no broadcast in fert. at plant.: 9.09158e-5 kg; = p2529*5
- Formaldehyde [air, non-urban air or from high stacks]: 1.87251e-6 kg; = 1.0 * (p2128*2.5)
- Diammonium phosphate; broadcast w/ incorp. in fert. after plant.: 0.000511273 kg; = p2767*4.7142857143
- Pyraclostrobin (prop) [soil, agricultural]: 1.24425e-5 kg; = 1.0 * (p4885+p4267+p5297+p4473+p4061+p4679)
- Nitrogen solution; unspec. appl. method in fert. in fall bef. plant.; unspec. appl. method in fert. in fall bef. plan...: 1.28306e-9 kg; = p3029
- Ammonium sulfate; broadcast w/o incorp. in fert. at plant.: 1.3836e-5 kg; = p2908*4.7142857143
- Butoxone; foliar or directed spray: 2.17731e-6 kg; = p4519
- Anhydrous ammonia; no broadcast in fert. in fall bef. plant.: 4.80608e-5 kg; = p2433*1.2142857143
- Anhydrous ammonia; broadcast w/ incorp. in fert. in fall bef. plant.: 7.3902e-5 kg; = p2628*1.2142857143
- Superphosphate, grades<= 22%; broadcast w/o incorp. in fert. in spr. bef. plant.; kg P: 1.10507e-6 kg; = p2891
- Ammonium nitrate; unspec. appl. method in fert. after plant.: 2.27967e-8 kg; = p3139*4.7142857143
- Diammonium phosphate; broadcast w/ incorp. in fert. in spr. bef. plant.: 0.00578462 kg; = p2689*4.7142857143
- Anhydrous ammonia; unspec. appl. method in fert. in spr. bef. plant.: 2.54424e-8 kg; = p3057*1.2142857143
- Superphosphate, grades>22%; no broadcast in fert. after plant.; kg P: 4.88937e-6 kg; = p2581
- Nitrogen solution; no broadcast in fert. in spr. bef. plant.; no broadcast in fert. in spr. bef. plant.; kg N: 0.000652737 kg; = p2483
- Ethene [air, non-urban air or from high stacks]: 1.31057e-6 kg; = 1.0 * (p2125*1.1666666667)
- Superphosphate, grades<= 22%; no broadcast in fert. in fall bef. plant.; kg P: 1.64411e-7 kg; = p2462
- I butane; from residue burning: 1.9001e-8 kg; = p2146*1.0208333333
- Butoxone; broadcast with incorporation: 8.82415e-6 kg; = p3901
- Superphosphate, grades<= 22%; unspec. appl. method in fert. in fall bef. plant.; kg P: 7.22289e-9 kg; = p3047
- Ammonium sulfate; broadcast w/o incorp. in fert. in fall bef. plant.: 9.93688e-6 kg; = p2830*4.7142857143
- Anhydrous ammonia; unspec. appl. method in fert. after plant.: 3.82869e-8 kg; = p3135*1.2142857143
- Monoammonium phosphate; unspec. appl. method in fert. in spr. bef. plant.: 0.000105346 kg; = p3083*8.2142857143
- Anhydrous ammonia; broadcast w/ incorp. in fert. in spr. bef. plant.: 0.00121279 kg; = p2667*1.2142857143
- Ammonium nitrate; no broadcast in fert. at plant.: 3.9845e-5 kg; = p2515*4.7142857143
- Other limestone constituents; applied in limestone: 0.00576532 kg; = p3220
- Other single K nutrients; no broadcast in fert. in spr. bef. plant.; kg K: 0.000402165 kg; = p2509
- Superphosphate, grades>22%; broadcast w/ incorp. in fert. in fall bef. plant.; kg P: 5.6353e-6 kg; = p2659
- Sodium nitrate; no broadcast in fert. in spr. bef. plant.: 3.17695e-6 kg; = p2486*6.0714285714
- Pesticide formulation balance; broadcast with incorporation: 0.000129551 kg; = p4102
- Aqueous ammonia; no broadcast in fert. in fall bef. plant.: 1.68425e-6 kg; = p2435*1.2142857143
- Sodium nitrate; unspec. appl. method in fert. in fall bef. plant.: 6.24481e-12 kg; = p3032*6.0714285714
- Ammonium nitrate; broadcast w/o incorp. in fert. in fall bef. plant.: 1.96907e-5 kg; = p2827*4.7142857143
- Urea; unspec. appl. method in fert. at plant.: 2.93277e-9 kg; = p3114*5
- Nitrogen solution; broadcast w/o incorp. in fert. in fall bef. plant.; broadcast w/o incorp. in fert. in fall bef. pl...: 2.7369e-5 kg; = p2834
- Sodium nitrate; broadcast w/ incorp. in fert. at plant.: 4.14484e-7 kg; = p2720*6.0714285714
- Imazapic; broadcast without incorporation: 2.90935e-7 kg; = p4109
- Urea; broadcast w/ incorp. in fert. in fall bef. plant.: 0.000100402 kg; = p2646*5
- Urea; broadcast w/ incorp. in fert. in spr. bef. plant.: 0.00164768 kg; = p2685*5
- Aqueous ammonia; broadcast w/o incorp. in fert. after plant.: 2.86204e-5 kg; = p2942*1.2142857143
- Magnesium [soil, agricultural]: 0.00096461 kg; = 1.0 * (p3227)
- Anhydrous ammonia; no broadcast in fert. at plant.: 6.69195e-5 kg; = p2511*1.2142857143
- Superphosphate, grades<= 22%; broadcast w/ incorp. in fert. in spr. bef. plant.; kg P: 3.27063e-6 kg; = p2696
- Superphosphate, grades>22%; broadcast w/ incorp. in fert. in spr. bef. plant.; kg P: 7.87493e-5 kg; = p2698
- Ammonium sulfate; unspec. appl. method in fert. in spr. bef. plant.: 7.64484e-9 kg; = p3064*4.7142857143
- Sodium nitrate; broadcast w/ incorp. in fert. in spr. bef. plant.: 4.88512e-6 kg; = p2681*6.0714285714
- Urea; no broadcast in fert. after plant.: 0.00161249 kg; = p2568*5
- Ammonium sulfate; no broadcast in fert. in spr. bef. plant.: 0.00023699 kg; = p2479*4.7142857143
- isopentane: 1.52445e-8 kg; = p2151*1.0166666667
- Sethoxydim [soil, agricultural]: 1.24425e-6 kg; = 1.0 * (p4689+p4483+p4277+p4071+p4895+p5307)
- Imazethapyr [soil, agricultural]: 1.24425e-6 kg; = 1.0 * (p4831+p5243+p4213+p4007+p4625+p4419)
- Nitrogen solution; broadcast w/ incorp. in fert. at plant.; broadcast w/ incorp. in fert. at plant.; kg N: 8.51601e-5 kg; = p2717
- Pesticide formulation balance; in irrigation water: 1.86105e-5 kg; = p4926
- Ammonium sulfate; broadcast w/ incorp. in fert. in fall bef. plant.: 2.22058e-5 kg; = p2635*4.7142857143
- Ammonium nitrate; broadcast w/ incorp. in fert. at plant.: 6.12688e-5 kg; = p2710*4.7142857143
- Aqueous ammonia; unspec. appl. method in fert. in fall bef. plant.: 5.43306e-11 kg; = p3020*1.2142857143
- Other single phosphates; broadcast w/ incorp. in fert. in spr. bef. plant.; kg P: 4.52964e-5 kg; = p2700
- Ammonium nitrate; broadcast w/ incorp. in fert. in spr. bef. plant.: 0.000722115 kg; = p2671*4.7142857143
- Nitrogen solution; broadcast w/ incorp. in fert. in fall bef. plant.; broadcast w/ incorp. in fert. in fall bef. plan...: 6.11609e-5 kg; = p2639
- Superphosphate, grades<= 22%; broadcast w/o incorp. in fert. in fall bef. plant.; kg P: 7.90786e-8 kg; = p2852
- Other single phosphates; broadcast w/o incorp. in fert. in spr. bef. plant.; kg P: 1.53046e-5 kg; = p2895
- Pesticide formulation balance; foliar or directed spray: 3.19659e-5 kg; = p4720
- Other single phosphates; no broadcast in fert. in fall bef. plant.; kg P: 2.277e-6 kg; = p2466
- Superphosphate, grades>22%; no broadcast in fert. in spr. bef. plant.; kg P: 5.53191e-5 kg; = p2503
- Pendimethalin [soil, agricultural]: 9.20742e-5 kg; = 1.0 * (p4870+p5282+p4458+p4252+p4046+p4664)
- Methyl vinyl ether; from residue burning: 6.83175e-8 kg; = p2137*1.6111111111
- Diammonium phosphate; broadcast w/o incorp. in fert. in spr. bef. plant.: 0.00195449 kg; = p2884*4.7142857143
- Nitrogen solution; broadcast w/o incorp. in fert. in spr. bef. plant.; broadcast w/o incorp. in fert. in spr. bef. pl...: 0.000449146 kg; = p2873
- Superphosphate, grades<= 22%; unspec. appl. method in fert. after plant.; kg P: 8.9211e-9 kg; = p3164
- Acetic acid [air, non-urban air or from high stacks]: 5.03947e-6 kg; = 1.0 * (p2127*2.5)
- Sodium nitrate; no broadcast in fert. in fall bef. plant.: 1.93589e-7 kg; = p2447*6.0714285714
- Anhydrous ammonia; broadcast w/o incorp. in fert. in spr. bef. plant.: 0.000542712 kg; = p2862*1.2142857143
- Sodium nitrate; no broadcast in fert. at plant.: 2.69552e-7 kg; = p2525*6.0714285714

## Sampling procedure
A delete-a-group jackknife is used by the USDA to estimate the ARMS sample means and RSEs, based on a 15 sample delete-a-group jackknife. Because of this relatively small sample size, a Students t distribution is used to represent ARMS data probability density functions. Other representations of uncertainty are described in Cooper, J.S., Kahn, E., Noon, M. (2012). LCA Digital Commons Unit Process Data: field crop production Version 1. Prepared for the US Department of Agriculture National Agricultural Library. Retrieved from https://www.lcacommons.gov/discovery/docs/LCA%20Digital%20Commons%20Unit%20Process%20Data%20final%20updated.pdf

## Extrapolations
Data represent an aggregation of processes applied in Texas in 2004. Data development is demonstrated by parameterization (exlicitly presents all raw and uncertainty data and all calculations). Flow data quality according to the LCADC convention is provided for all flows.
