# winter wheat; at harvest in 1996; at farm; 86%-90% moisture

Dataset: EcoSpold 2, unit process
Geography: GLO
Time period: 1996-01-02 to 1997-01-01
Scenario: Business-as-Usual
System model: Allocation, ecoinvent default
Generated by: cooperjs@u.washington.edu
isCopyrightProtected: false

## General comment
This unit process/ gate-to-gate dataset represents the production of 1 kg winter wheat coproduced with residue. The process technologies are an aggregation of those applied in Washington in 1996. Applicable classifications include ISIC 0111, NAIC 111140, UNSPSC 50221101; this dataset was prepared in ILCD format using the UWDFE Lab Excel to ILCD File Generator (beta version, August 2013)

Exchange "Diclofop-methyl-soil agricultural" is the result of combining the following original LCA Commons flows: "Diclofop-methyl; broadcast with incorporation; kg AI", "Diclofop-methyl; foliar or directed spray; kg AI", "Diclofop-methyl; unspec. appl. method; kg AI", "Diclofop-methyl; broadcast without incorporation; kg AI".
Exchange "Metribuzin-soil agricultural" is the result of combining the following original LCA Commons flows: "Metribuzin; foliar or directed spray; kg AI", "Metribuzin; broadcast with incorporation; kg AI", "Metribuzin; unspec. appl. method; kg AI", "Metribuzin; broadcast without incorporation; kg AI".
Exchange "NMVOC, non-methane volatile organic compounds, unspecified origin-air low population density" is the result of combining the following original LCA Commons flows: "NMVOCs; from residue burning; kg except C, biogenic", "NMVOCs; from residue burning; kg C, biogenic".
Exchange "Glyphosate-soil agricultural" is the result of combining the following original LCA Commons flows: "Glyphosate; broadcast with incorporation; kg AI", "Glyphosate; foliar or directed spray; kg AI", "Glyphosate; unspec. appl. method; kg AI", "Glyphosate; broadcast without incorporation; kg AI".
Exchange "Dicamba-soil agricultural" is the result of combining the following original LCA Commons flows: "Dicamba; broadcast with incorporation; kg AI", "Dicamba; foliar or directed spray; kg AI", "Dicamba; broadcast without incorporation; kg AI", "Dicamba; unspec. appl. method; kg AI".
Exchange "Chlorsulfuron-soil agricultural" is the result of combining the following original LCA Commons flows: "Chlorsulfuron; broadcast with incorporation; kg AI", "Chlorsulfuron; broadcast without incorporation; kg AI", "Chlorsulfuron; foliar or directed spray; kg AI", "Chlorsulfuron; unspec. appl. method; kg AI".
Exchange "Carbon-soil agricultural" is the result of combining the following original LCA Commons flows: "Carbon; in below-ground residue; biogenic", "Carbon; applied in sewage sludge", "Carbon; applied in dolomite", "Carbon; applied in limestone", "Carbon; in above-ground residue left on field; biogenic".
Exchange "Particulates, < 2.5 um-air low population density" is the result of combining the following original LCA Commons flows: "PM2.5; from residue burning; kg except C, biogenic", "PM2.5; from residue burning; kg C, biogenic".
Exchange "Ash-soil agricultural" is the result of combining the following original LCA Commons flows: "Ash; from residue burning; kg except C, biogenic", "Ash; from residue burning; kg C, biogenic".
Exchange "Water-soil agricultural" is the result of combining the following original LCA Commons flows: "Water; in above-ground residue left on field; biogenic", "Water; from irrigation and applied with manure and sewage sludge", "Water; in below-ground residue; biogenic".
Exchange "Water, unspecified origin-resource in water" is the result of combining the following original LCA Commons flows: "Water; withdrawal from unspec. source, for winter wheat, in 1996", "Water; from plant uptake; biogenic".
Exchange "Metsulfuron-methyl-soil agricultural" is the result of combining the following original LCA Commons flows: "Metsulfuron-methyl; unspec. appl. method; kg AI", "Metsulfuron-methyl; foliar or directed spray; kg AI", "Metsulfuron-methyl; broadcast with incorporation; kg AI", "Metsulfuron-methyl; broadcast without incorporation; kg AI".
Exchange "Particulates, < 10 um-air low population density" is the result of combining the following original LCA Commons flows: "PM10; from residue burning; kg C, biogenic", "PM10; from residue burning; kg except C, biogenic".
Exchange "Bromoxynil-soil agricultural" is the result of combining the following original LCA Commons flows: "Bromoxynil; broadcast without incorporation; kg AI", "Bromoxynil; broadcast with incorporation; kg AI", "Bromoxynil; foliar or directed spray; kg AI", "Bromoxynil; unspec. appl. method; kg AI".
Exchange "MCPA-soil agricultural" is the result of combining the following original LCA Commons flows: "MCPA; broadcast without incorporation; kg AI", "MCPA; broadcast with incorporation; kg AI", "MCPA; unspec. appl. method; kg AI", "MCPA; foliar or directed spray; kg AI".
Exchange "Triasulfuron-soil agricultural" is the result of combining the following original LCA Commons flows: "Triasulfuron; broadcast without incorporation; kg AI", "Triasulfuron; unspec. appl. method; kg AI", "Triasulfuron; broadcast with incorporation; kg AI", "Triasulfuron; foliar or directed spray; kg AI".
Exchange "Tribenuron-methyl-soil agricultural" is the result of combining the following original LCA Commons flows: "Tribenuron-methyl; unspec. appl. method; kg AI", "Tribenuron-methyl; broadcast without incorporation; kg AI", "Tribenuron-methyl; broadcast with incorporation; kg AI", "Tribenuron-methyl; foliar or directed spray; kg AI".
Exchange "Calcium-soil agricultural" is the result of combining the following original LCA Commons flows: "Calcium; applied in dolomite", "Calcium; applied in limestone".
Exchange "2,4-D-soil agricultural" is the result of combining the following original LCA Commons flows: "2,4-D; unspec. appl. method; kg AI", "2,4-D; broadcast with incorporation; kg AI", "2,4-D; broadcast without incorporation; kg AI", "2,4-D; foliar or directed spray; kg AI".
Exchange "Propiconazole-soil agricultural" is the result of combining the following original LCA Commons flows: "Propiconazole; unspec. appl. method; kg AI", "Propiconazole; broadcast without incorporation; kg AI", "Propiconazole; foliar or directed spray; kg AI", "Propiconazole; broadcast with incorporation; kg AI".
Exchange "Diclofop-methyl-2bdf9967-6dae-4183-88d1-8f612548c51e low population density" was originally named: "Diclofop-methyl; broadcast by air; kg AI" in this dataset.
Exchange "Ethane-2bdf9967-6dae-4183-88d1-8f612548c51e low population density" was originally named: "Ethane; from residue burning; kg C, biogenic" in this dataset.
Exchange "Formic acid-2bdf9967-6dae-4183-88d1-8f612548c51e low population density" was originally named: "Formic acid; from residue burning; kg C, biogenic" in this dataset.
Exchange "Transformation, from arable-c19fb2d9-98eb-4cd3-8761-81b71d8a9a1b land" was originally named: "Transformation; from arable, from unspec. use to wheat" in this dataset.
Exchange "Ethene-2bdf9967-6dae-4183-88d1-8f612548c51e low population density" was originally named: "Ethylene; from residue burning; kg C, biogenic" in this dataset.
Exchange "Sulfur dioxide-2bdf9967-6dae-4183-88d1-8f612548c51e low population density" was originally named: "Sulfur dioxide; from residue burning; biogenic" in this dataset.
Exchange "Acetaldehyde-2bdf9967-6dae-4183-88d1-8f612548c51e low population density" was originally named: "Acetaldehyde; from residue burning; kg C, biogenic" in this dataset.
Exchange "Isoprene-2bdf9967-6dae-4183-88d1-8f612548c51e low population density" was originally named: "Isoprene; from residue burning; kg C, biogenic" in this dataset.
Exchange "trans-2-Butene-2bdf9967-6dae-4183-88d1-8f612548c51e low population density" was originally named: "Trans 2 butene; from residue burning; kg C, biogenic" in this dataset.
Exchange "Propiconazole-2bdf9967-6dae-4183-88d1-8f612548c51e low population density" was originally named: "Propiconazole; broadcast by air; kg AI" in this dataset.
Exchange "Acetonitrile-2bdf9967-6dae-4183-88d1-8f612548c51e low population density" was originally named: "Acetonitrile; from residue burning; kg C, biogenic" in this dataset.
Exchange "Methanol-2bdf9967-6dae-4183-88d1-8f612548c51e low population density" was originally named: "Methanol; from residue burning; kg C, biogenic" in this dataset.
Exchange "Butadiene-2bdf9967-6dae-4183-88d1-8f612548c51e low population density" was originally named: "1,3 butadiene; from residue burning; kg C, biogenic" in this dataset.
Exchange "Acrylonitrile-2bdf9967-6dae-4183-88d1-8f612548c51e low population density" was originally named: "Propenenitrile; from residue burning; kg C, biogenic" in this dataset.
Exchange "Acetic acid-2bdf9967-6dae-4183-88d1-8f612548c51e low population density" was originally named: "Acetic acid; from residue burning; kg C, biogenic" in this dataset.
Exchange "Butane-2bdf9967-6dae-4183-88d1-8f612548c51e low population density" was originally named: "N butane; from residue burning; kg C, biogenic" in this dataset.
Exchange "Sulfur-be1c0329-f1a8-4524-8420-a86d2a8dd358 agricultural" was originally named: "Sulfur; as secondary application" in this dataset.
Exchange "Phosphorus-c19fb2d9-98eb-4cd3-8761-81b71d8a9a1b unspecified" was originally named: "Phosphorous; from plant uptake; biogenic" in this dataset.
Exchange "Propene-2bdf9967-6dae-4183-88d1-8f612548c51e low population density" was originally named: "Propylene; from residue burning; kg C, biogenic" in this dataset.
Exchange "2,4-D-2bdf9967-6dae-4183-88d1-8f612548c51e low population density" was originally named: "2,4-D; broadcast by air; kg AI" in this dataset.
Exchange "Phenol-2bdf9967-6dae-4183-88d1-8f612548c51e low population density" was originally named: "Phenol; from residue burning; kg C, biogenic" in this dataset.
Exchange "MCPA-2bdf9967-6dae-4183-88d1-8f612548c51e low population density" was originally named: "MCPA; broadcast by air; kg AI" in this dataset.
Exchange "Dinitrogen monoxide-2bdf9967-6dae-4183-88d1-8f612548c51e low population density" was originally named: "Dinitrogen monoxide; from residue burning; kg N, biogenic" in this dataset.
Exchange "Transformation, to arable-c19fb2d9-98eb-4cd3-8761-81b71d8a9a1b land" was originally named: "Transformation; to arable, to wheat" in this dataset.
Exchange "Water-2bdf9967-6dae-4183-88d1-8f612548c51e low population density" was originally named: "Water; from residue burning; biogenic" in this dataset.
Exchange "Formaldehyde-2bdf9967-6dae-4183-88d1-8f612548c51e low population density" was originally named: "Formaldehyde; from residue burning; kg C, biogenic" in this dataset.
Exchange "Glyphosate-2bdf9967-6dae-4183-88d1-8f612548c51e low population density" was originally named: "Glyphosate; broadcast by air; kg AI" in this dataset.
Exchange "Methane-2bdf9967-6dae-4183-88d1-8f612548c51e low population density" was originally named: "Methane; from residue burning; kg C, biogenic" in this dataset.
Exchange "isobutene-2bdf9967-6dae-4183-88d1-8f612548c51e low population density" was originally named: "I butene; from residue burning; kg C, biogenic" in this dataset.
Exchange "Metsulfuron-methyl-2bdf9967-6dae-4183-88d1-8f612548c51e low population density" was originally named: "Metsulfuron-methyl; broadcast by air; kg AI" in this dataset.
Exchange "Chlorsulfuron-2bdf9967-6dae-4183-88d1-8f612548c51e low population density" was originally named: "Chlorsulfuron; broadcast by air; kg AI" in this dataset.
Exchange "Nitrogen dioxide-2bdf9967-6dae-4183-88d1-8f612548c51e low population density" was originally named: "Nitrogen dioxide; from residue burning; kg N, biogenic" in this dataset.
Exchange "1-Butene-2bdf9967-6dae-4183-88d1-8f612548c51e low population density" was originally named: "1 butene; from residue burning; kg C, biogenic" in this dataset.
Exchange "Magnesium-be1c0329-f1a8-4524-8420-a86d2a8dd358 agricultural" was originally named: "Magnesium; applied in dolomite" in this dataset.
Exchange "Tribenuron-methyl-2bdf9967-6dae-4183-88d1-8f612548c51e low population density" was originally named: "Tribenuron-methyl; broadcast by air; kg AI" in this dataset.
Exchange "Carbon dioxide-c19fb2d9-98eb-4cd3-8761-81b71d8a9a1b unspecified" was originally named: "Carbon dioxide; from plant uptake; kg C, biogenic" in this dataset.
Exchange "Benzene-2bdf9967-6dae-4183-88d1-8f612548c51e low population density" was originally named: "Benzene; from residue burning; kg C, biogenic" in this dataset.
Exchange "Sulfuric acid-be1c0329-f1a8-4524-8420-a86d2a8dd358 agricultural" was originally named: "Sulfuric acid; as secondary application" in this dataset.
Exchange "Dicamba-2bdf9967-6dae-4183-88d1-8f612548c51e low population density" was originally named: "Dicamba; broadcast by air; kg AI" in this dataset.
Exchange "Triasulfuron-2bdf9967-6dae-4183-88d1-8f612548c51e low population density" was originally named: "Triasulfuron; broadcast by air; kg AI" in this dataset.
Exchange "Ethyne-2bdf9967-6dae-4183-88d1-8f612548c51e low population density" was originally named: "Acetylene; from residue burning; kg C, biogenic" in this dataset.
Exchange "Carbon dioxide, in air-2bdf9967-6dae-4183-88d1-8f612548c51e low population density" was originally named: "Carbon dioxide; from residue burning; kg C, biogenic" in this dataset.
Exchange "Occupation, arable-c19fb2d9-98eb-4cd3-8761-81b71d8a9a1b land" was originally named: "Occupation; arable, as wheat" in this dataset.
Exchange "Hydrocyanic acid-2bdf9967-6dae-4183-88d1-8f612548c51e low population density" was originally named: "Hydrogen cyanide; from residue burning; kg C, biogenic" in this dataset.
Exchange "isopentane-2bdf9967-6dae-4183-88d1-8f612548c51e low population density" was originally named: "I pentane; from residue burning; kg C, biogenic" in this dataset.
Exchange "Carbon monoxide, fossil-2bdf9967-6dae-4183-88d1-8f612548c51e low population density" was originally named: "Carbon monoxide; from residue burning; kg C, biogenic" in this dataset.
Exchange "Toluene-2bdf9967-6dae-4183-88d1-8f612548c51e low population density" was originally named: "Toluene; from residue burning; kg C, biogenic" in this dataset.
Exchange "Bromoxynil-2bdf9967-6dae-4183-88d1-8f612548c51e low population density" was originally named: "Bromoxynil; broadcast by air; kg AI" in this dataset.
Exchange "Propane-2bdf9967-6dae-4183-88d1-8f612548c51e low population density" was originally named: "Propane; from residue burning; kg C, biogenic" in this dataset.
Exchange "Ammonia-2bdf9967-6dae-4183-88d1-8f612548c51e low population density" was originally named: "Ammonia; from residue burning; kg N, biogenic" in this dataset.
Exchange "Zinc compounds-be1c0329-f1a8-4524-8420-a86d2a8dd358 agricultural" was originally named: "Zinc compounds; as secondary application" in this dataset.
Exchange "Furan-2bdf9967-6dae-4183-88d1-8f612548c51e low population density" was originally named: "Furan; from residue burning; kg C, biogenic" in this dataset.
Exchange "Pentane-2bdf9967-6dae-4183-88d1-8f612548c51e low population density" was originally named: "N pentane; from residue burning; kg C, biogenic" in this dataset.
Exchange "Metribuzin-2bdf9967-6dae-4183-88d1-8f612548c51e low population density" was originally named: "Metribuzin; broadcast by air; kg AI" in this dataset.
Exchange "cis-2-Butene-2bdf9967-6dae-4183-88d1-8f612548c51e low population density" was originally named: "Cis 2 butene; from residue burning; kg C, biogenic" in this dataset.
Exchange "Acetone-2bdf9967-6dae-4183-88d1-8f612548c51e low population density" was originally named: "Acetone; from residue burning; kg C, biogenic" in this dataset.

## Geography
The unit process is assumed to represent production in Washington (US State).

## Technology
This process produces winter wheat; at harvest in 1996; at farm; 86%-90% moisture. The process is assumed to represent production in Washington (US State). Yields and related inputs and outputs represent a single year of operation, in 1996. This dataset includes consideration of residue burning; soil preparation; planting or sowing; irrigation; application, storage, and transport of fertilizers, manures, liming materials, secondary materials, and pesticides; and harvest. Fate and transport of applications are not included as described in Cooper, J.S., Kahn, E., Noon, M. (2012) LCA Digital Commons Unit Process Data: field crop production Version 1 which is available at https://www.lcacommons.gov/discovery/docs/LCA%20Digital%20Commons%20Unit%20Process%20Data%20final%20updated.pdf

## Time period
Start and end dates match the underlying data obtained from the USDA Agricultural Resource Management Survey (ARMS).
## Parameters
- p0677: 0
- p2378: 0; = p2229*p2207
- p3006: 0; = p2420*(p1079+p1081)
- p2962: 0; = p2376*(p1079+p1081)
- p0022: 2353.55
- p2382: 0; = p2229*p2211
- p1656: 0
- p0799: 23.874; = p0139*(1+p0667*p0271/100)
- p2832: 1.38996e-5; = p2246*(p1020+p1022)
- p0986: 0; = IF(p0982+p0985=1;0;IF(p0982+p0985+p0984>1;1-(p0982+p0985);p0984))
- p4103: 1.73397e-6; = p1754*p3479
- p4555: 1.22415e-7; = p1794*p3481
- p2302: 0; = p2227*p2209
- p2805: 0; = p2414*(p1078+p1080)
- p2179: 0; = p0970+p0971+p0972
- p2386: 0; = p2229*p2215
- p0949: 0.000100064; = if(and(p0683=0;or(p0807=480;p0807=32;p0807=1;and(p0807=60;p0901<0.03)));p0937;0)
- p0514: 0; = SQRT(2)*(IF((2*p0382-1)<0;-1;IF((2*p0382-1)>0;1;0))*SQRT(SQRT((2/(pi()*0.140012289)+LN(1-(2*p0382-1)^2)/2)^2-LN(1-(2*p0382-1)^2)/0.140012289)-(2/(pi()*0.140012289)+LN(1-(2*p0382-1)^2)/2)))
- p1758: 0
- p1288: 0
- p0798: 25.016; = p0138*(1+p0666*p0270/100)
- p3157: 0; = p2376*p1082
- p2585: 0; = p2389*p1123
- p0578: 0; = IF(p0314<0.5;-SQRT(p0007*EXP(p0446^2*p0008)-p0007);SQRT(p0007*EXP(p0446^2*p0008)-p0007))
- p3228: 0.000176329; = p3224*p1229
- p0059: 73.078
- p2164: 0.0221056; = (p2015/p0818)-(p2022)-(p2035+p2036+p2052)-(p2017/p0818)-(p2039+p2041+p2044+p2158+p2159+p2160+p2161+p2162)
- p0997: 0; = if(p0888=0;0;if((p0695*p0694*1000*p0696/100)/p0888>1;1;(p0695*p0694*1000*p0696/100)/p0888))
- p2234: 0; = 1-(p2222+p2223+p2224+p2225)
- p1340: 0; = p1325*p0801
- p2541: 5.02915e-6; = p2345*p1073
- p2344: 6.95709e-7; = p2228*p2212
- p0753: 0
- p3379: 0; = if(p1232=0;p3246*p3361/p0818;0)
- p1737: 0
- p2529: 7.86562e-5; = p2333*p1014
- p3186: 0; = p2405*p1023
- p3586: 0; = p1855*p3476
- p0939: 4.1984e-6; = p0933*p0001/(p0818*p0002)
- p2024: 0.748682
- p1722: 0
- p2653: 0; = p2262*(p1078+p1080)
- p2950: 1.85828e-5; = p2364*(p1020+p1022)
- p2899: 0; = p2313*(p1129+p1131)
- p1947: 0
- p1747: 0
- p3106: 6.1837e-6; = p2325*p1023
- p0181: 37.363
- p1678: 0
- p0087: 32.451
- p0412: 0; = SQRT(2)*(IF((2*p0280-1)<0;-1;IF((2*p0280-1)>0;1;0))*SQRT(SQRT((2/(pi()*0.140012289)+LN(1-(2*p0280-1)^2)/2)^2-LN(1-(2*p0280-1)^2)/0.140012289)-(2/(pi()*0.140012289)+LN(1-(2*p0280-1)^2)/2)))
- p2597: 0; = p2401*p1014
- p3314: 0; = if(and(p1232=0;p3253<>0);p3263*p3289;0)
- p1989: 50
- p1447: 137
- p1225: 1.088; = IF(p1221=0;0;p1223+1.2*p1224)
- p1700: 0
- p1234: 0; = if(p1232>0;0;p0726/100)
- p1059: 0.335
- p2749: 1.47706e-5; = p2358*(p1019+p1021)
- p2970: 0; = p2384*(p1079+p1081)
- p1214: 14; = IF(p1213=0;0;p1213-1)
- p2967: 0; = p2381*(p1079+p1081)
- p3169: 0; = p2388*p1082
- p2757: 1.30912e-5; = p2366*(p1019+p1021)
- p2503: 0; = p2307*p1073
- p3330: 0; = if(and(p1232=0;p3255<>0);p3255*(p3267-p3325)/p3327;0)
- p0302: 0.5
- p4092: 1.61312e-7; = p1949*p3478
- p2833: 0.000112484; = p2247*(p1020+p1022)
- p1909: 0
- p1184: 2.69313e-8; = p1182/p0818
- p2919: 1.5171e-5; = p2333*(p1020+p1022)
- p4927: 0; = p1754*p3483
- p2651: 0; = p2260*(p1078+p1080)
- p2255: 0.00123291; = p2222*p2201
- p0679: 1106.99; = p0019*(1+p0547*p0151/100)
- p3385: 0; = p3366*p1234
- p0175: 0
- p2458: 3.5063e-5; = p2262*p1073
- p4498: 0; = p1943*p3480
- p0103: 2353.44
- p1824: 0
- p3434: 0; = p3377*p1239
- p1642: 0
- p1963d: 1.14428e-6; = p1608*p1812+p1609*p1813+p1610*p1814+p1611*p1815+p1612*p1816+p1613*p1817+p1614*p1818+p1615*p1819+p1616*p1820+p1617*p1821+p1618*p1822+p1619*p1823+p1620*p1824+p1621*p1825+p1622*p1826+p1623*p1827+p1624*p1828+p1625*p1829+p1626*p1830+p1627*p1831
- p1615: 0
- p0741: 0.533; = p0081*(1+p0609*p0213/100)
- p0813: 0; = if(p0807=480;1.56521739130435;0)
- p0148: 0
- p2850: 0; = p2264*(p1079+p1081)
- p0684: 0
- p2921: 2.50315e-5; = p2335*(p1020+p1022)
- p0245: 19.656
- p1090: 0; = IF(p1071=0;p1084*p0001/(p0818*p0002);0)
- p1586: 0
- p0308: 0.5
- p1674: 0
- p1699: 0
- p3258: 0
- p0959: 0; = if(and(p0683>0;or(p0807=480;p0807=32;p0807=1;and(p0807=60;p0901<0.03)));p0935;0)
- p2708: 9.69272e-7; = p2317*(p1019+p1021)
- p3212: 0; = p2431*p1132
- p2664: 0; = p2273*(p1128+p1130)
- p2569: 2.06181e-5; = p2373*p1014
- p2209: 5.81556e-5; = 14.0067*p2208/30.973762
- p4101: 0; = p1962*p3478
- p1754: 5.51165e-5; = p1346*1000/p0818
- p2014: 7.036e8; = p0833*p2011*p2013
- p2806: 0; = p2415*(p1078+p1080)
- p2787: 0; = p2396*(p1019+p1021)
- p3153: 1.67466e-5; = p2372*p1023
- p0644: 0; = IF(p0380<0.5;-SQRT(p0007*EXP(p0512^2*p0008)-p0007);SQRT(p0007*EXP(p0512^2*p0008)-p0007))
- p1135: 162095; = if(p1121=0;p1129*(p0716/100)*p0703*1000;0)
- p0965: 0; = IF(p0684/100=1;0;IF(p0684/100+p0685/100>1;1-p0684/100;p0685/100))
- p0384: 0.5
- p1794: 4.05268e-7; = p1386*1000/p0818
- p2500: 0; = p2304*p1073
- p3279: 0
- p3416: 0; = p3378*p1238
- p0821: 1.51364
- p3200: 0; = p2419*p1082
- p1880: 0
- p2484: 0; = p2288*p1014
- p1884: 0
- p2509: 0; = p2313*p1123
- p3402: 0; = p3364*p1238
- p0698: 190.649; = p0038*(1+p0566*p0170/100)
- p2885: 0; = p2299*(p1079+p1081)
- p1596: 0
- p0716: 9.425; = p0056*(1+p0584*p0188/100)
- p1066: 0.00425533; = IF(p1012=0;p1052/(p1059*p0818);0)
- p2840: 0.000390126; = p2254*(p1020+p1022)
- p4675: 6.42681e-7; = p1914*p3481
- p2790: 0; = p2399*(p1019+p1021)
- p5063: 0; = p1890*p3483
- p0483: 0; = SQRT(2)*(IF((2*p0351-1)<0;-1;IF((2*p0351-1)>0;1;0))*SQRT(SQRT((2/(pi()*0.140012289)+LN(1-(2*p0351-1)^2)/2)^2-LN(1-(2*p0351-1)^2)/0.140012289)-(2/(pi()*0.140012289)+LN(1-(2*p0351-1)^2)/2)))
- p3476: 0; = if(p1328+p1330+p1332+p1334+p1336+p1338+p1340+p1342+p1344=0;0;p1328/(p1328+p1330+p1332+p1334+p1336+p1338+p1340+p1342+p1344))
- p3432: 0; = p3375*p1239
- p0809: 0
- p1738: 0
- p2822: 0; = p2431*(p1128+p1130)
- p2999: 0; = p2413*(p1020+p1022)
- p1224: 0.44; = IF(p1221=0;0;IF(p1193=0;1-p1223;0))
- p2453: 0.00143079; = p2257*p1014
- p3161: 0; = p2380*p1082
- p3998: 4.41995e-6; = p1855*p3478
- p3034: 2.41433e-6; = p2253*p1023
- p2253: 2.93643e-5; = p2222*p2199
- p2038: 0.304457
- p0079: 0.547
- p2248: 0.00469303; = p2222*p2193
- p1829: 0
- p2168: 0.00680999; = p2166*(p0903)
- p3357: 0; = if(p1232=0;p3307+p3318+p3329+p3340+p3351;0)
- p3143: 5.53416e-6; = p2362*p1023
- p2988: 0; = p2402*(p1020+p1022)
- p2342: 1.52065e-5; = p2228*p2210
- p3015: 0; = p2429*(p1129+p1131)
- p1222: 0.94
- p1859: 0
- p2421: 0; = p2235*p2211
- p1698: 0
- p2551: 0.000164406; = p2355*p1014
- p0272: 34.002
- p2299: 0; = p2227*p2206
- p0682: 2353.55; = p0022*(1+p0550*p0154/100)
- p1230: 0.5
- p2994: 0; = p2408*(p1020+p1022)
- p3292: 0
- p1579: 0
- p3057: 0; = p2276*p1023
- p3145: 1.12625e-5; = p2364*p1023
- p2303: 0; = p2227*p2210
- p3216: 0.06; = IF(OR(p1226=0;p1228=0);0;1-p3213-p3214-p3215)
- p1088: 181743; = IF(p1071=0;p1082*(p0710/100)*p0703*1000;0)
- p2101: 0.620397
- p2889: 0; = p2303*(p1079+p1081)
- p1713: 0
- p3003: 0; = p2417*(p1079+p1081)
- p1228: 0.0133229; = IF(p1221=0;0;p0801*p1212*2000/(p1222+p1221*p1225)/p0818)
- p1633: 0
- p2789: 0; = p2398*(p1019+p1021)
- p2652: 0; = p2261*(p1078+p1080)
- p2330: 1.21145e-6; = p2224*p2198
- p3469: 0; = p3374*p1241
- p2783: 0; = p2392*(p1128+p1130)
- p3350: 0; = if(and(p1232=0;p3256<>0);p3256*(p3273*p3277-p3345)/p3349;0)
- p1996: 30
- p2464: 1.11969e-5; = p2268*p1073
- p1814: 0
- p1190: 7.25092e-8; = p1188/p0818
- p3011: 0; = p2425*(p1079+p1081)
- p2537: 2.43471e-5; = p2341*p1073
- p2317: 1.23051e-5; = p2224*p2184
- p2372: 0.00020368; = p2225*p2201
- p3072: 0; = p2291*p1023
- p1621: 0
- p1741: 0
- p1764: 0
- p2703: 0; = p2312*(p1128+p1130)
- p1108: 78330.4; = IF(p1071=0;p1105*p1102*p1095;0)
- p3087: 0; = p2306*p1082
- p2161: 5.44493e-7; = p2015*p2085*p2123/(p0818*1000)
- p3256: 0; = p1252*(p1307*(1-p3247)+p1310*(1-p3248)+p1311*(1-p3249)+p1312*(1-p3250))
- p1988: 750
- p1921: 0
- p3317: 0; = if(and(p1232=0;p3253<>0);p3253*(p3261*p3277-p3312)/p3316;0)
- p0372: 0.5
- p0249: 0.826
- p2445: 0.000707574; = p2249*p1014
- p2533: 0.000133395; = p2337*p1073
- p3543: 0; = p1812*p3476
- p2028: 0.00145459; = p2015*p2026*p2027/(p0818*1000)
- p2898: 0; = p2312*(p1129+p1131)
- p3426: 0; = p3369*p1239
- p3227: 4.4557e-5; = p3223*p1229
- p1711: 0
- p0446: 0; = SQRT(2)*(IF((2*p0314-1)<0;-1;IF((2*p0314-1)>0;1;0))*SQRT(SQRT((2/(pi()*0.140012289)+LN(1-(2*p0314-1)^2)/2)^2-LN(1-(2*p0314-1)^2)/0.140012289)-(2/(pi()*0.140012289)+LN(1-(2*p0314-1)^2)/2)))
- p3342: 0; = if(and(p1232=0;p3254<>0);p3254*(p3272-p3337)/p3338;0)
- p1304: 0; = p1300*p1252/p0818
- p2442: 7.20644e-5; = p2246*p1014
- p1976: 0.003
- p3083: 0; = p2302*p1082
- p2434: 0.000995176; = p2238*p1014
- p0755: 0
- p2459: 1.58559e-5; = p2263*p1073
- p1103: 0.663396; = IF(p1071=0;IF(p1096+p1101+p1102=1;0;IF(p1096+p1101+p1102+p1099>1;1-(p1096+p1101+p1102);p1099));0)
- p2058: 1.24412
- p2075: 0.072
- p1089: 3.67894e-5; = IF(p1071=0;p1083*p0001/(p0818*p0002);0)
- p3359: 0; = if(p1232=0;p3309+p3320+p3331+p3342+p3353;0)
- p1311: 0; = IF(p1307+p1310=p1266;0;IF(p1307+p1310+p1309>p1266;p1266-(p1307+p1310);p1309))
- p2938: 0; = p2352*(p1129+p1131)
- p1132: 0.26922; = if(p1121=0;IF(p1123+p1128+p1129+p1130+p1131=1;0;1-(p1123+p1128+p1129+p1130+p1131));0)
- p1058: 0.225
- p0842: 0.152728
- p1775: 0
- p0554: 0; = IF(p0290<0.5;-SQRT(p0007*EXP(p0422^2*p0008)-p0007);SQRT(p0007*EXP(p0422^2*p0008)-p0007))
- p2513: 8.65479e-6; = p2317*p1014
- p0655: 0; = IF(p0391<0.5;-SQRT(p0007*EXP(p0523^2*p0008)-p0007);SQRT(p0007*EXP(p0523^2*p0008)-p0007))
- p2991: 0; = p2405*(p1020+p1022)
- p1177: 0.000216944; = p0801*p0001/(p0818*p0002)
- p1833: 0
- p2478: 0; = p2282*p1014
- p1630: 0
- p0822: 0.8849
- p1331: 0.000166594; = p1330*p0001/(p0818*p0002)
- p3190: 0; = p2409*p1023
- p2524: 0.000634426; = p2328*p1014
- p2208: 0.000128603; = p1110/p0818
- p0250: 39.557
- p2583: 0; = p2387*p1073
- p2422: 0; = p2235*p2212
- p1728: 0
- p0640: 0; = IF(p0376<0.5;-SQRT(p0007*EXP(p0508^2*p0008)-p0007);SQRT(p0007*EXP(p0508^2*p0008)-p0007))
- p1629: 0
- p0777: 3.372; = p0117*(1+p0645*p0249/100)
- p2343: 0.000199135; = p2228*p2211
- p2189: 0.000447042; = p1053/p0818
- p3792: 4.50434e-6; = p1855*p3477
- p1822: 0
- p2068: 0.153529
- p2906: 2.01017e-6; = p2320*(p1020+p1022)
- p1294: 0; = p1290*p1252/p0818
- p0327: 0.5
- p3431: 0; = p3374*p1239
- p1849: 0
- p2052: 7.5777e-5; = p2015*p2049*(1-p2050)/(p0818*1000)
- p3130: 1.32974e-5; = p2349*p1082
- p1817: 0
- p0779: 0
- p3691: 1.78859e-5; = p1754*p3477
- p0720: 0
- p3272: 0
- p0814: 0; = if(p0807=480;p0810*p0812+p0811*p0813;0)
- p0722: 0
- p0435: 0; = SQRT(2)*(IF((2*p0303-1)<0;-1;IF((2*p0303-1)>0;1;0))*SQRT(SQRT((2/(pi()*0.140012289)+LN(1-(2*p0303-1)^2)/2)^2-LN(1-(2*p0303-1)^2)/0.140012289)-(2/(pi()*0.140012289)+LN(1-(2*p0303-1)^2)/2)))
- p0893: 58.6642; = 1000*(p0890+p0892)*p0001*p0003*p0004/(p0818*p0002)
- p3193: 0; = p2412*p1023
- p3361: 0; = if(p1232=0;p3311+p3322+p3333+p3344+p3355;0)
- p3098: 1.01172e-6; = p2317*p1023
- p1144: 5.39793e-6; = if(p1121=0;p1138*p0001/(p0818*p0002);0)
- p4410: 0; = p1855*p3480
- p3117: 6.58624e-5; = p2336*p1082
- p1064: 0.0098722; = IF(p1012=0;p1050/(p1057*p0818);0)
- p2587: 0; = p2391*p1123
- p2663: 0; = p2272*(p1128+p1130)
- p1067: 0.00212877; = IF(p1012=0;p1053/(p1060*p0818);0)
- p2893: 0; = p2307*(p1079+p1081)
- p2601: 0; = p2405*p1014
- p1593: 0
- p1744: 0
- p0938: 0; = p0932*p0001/(p0818*p0002)
- p0570: 0; = IF(p0306<0.5;-SQRT(p0007*EXP(p0438^2*p0008)-p0007);SQRT(p0007*EXP(p0438^2*p0008)-p0007))
- p3411: 0; = p3373*p1238
- p2644: 2.31303e-6; = p2253*(p1019+p1021)
- p0122: 9.425
- p3435: 0; = p3378*p1239
- p2519: 2.59931e-5; = p2323*p1014
- p2394: 0; = p2234*p2183
- p1891: 1.01317e-7; = p1483*1000/p0818
- p2791: 0; = p2400*(p1019+p1021)
- p0271: 27.907
- p5338: 1.8725e-6; = p1963*p3484
- p3137: 1.84268e-6; = p2356*p1023
- p1035: 1.74905e-5; = IF(p1012=0;p1029*p0001/(p0818*p0002);0)
- p0401: 0.5
- p0641: 0; = IF(p0377<0.5;-SQRT(p0007*EXP(p0509^2*p0008)-p0007);SQRT(p0007*EXP(p0509^2*p0008)-p0007))
- p1030: 0.000149623; = IF(p1012=0;p1024*p0001/(p0818*p0002);0)
- p1042: 0.000519971
- p1145: 5.29553e6; = if(p1121=0;p0799*p0702*1000*p0800/100;0)
- p2972: 0; = p2386*(p1079+p1081)
- p2291: 0; = p2223*p2198
- p2427: 0; = p2235*p2217
- p2134: 0.000112689; = p2015*p2062*p2096/(p0818*1000)
- p3013: 0; = p2427*(p1079+p1081)
- p1900: 0
- p0947: 1.26699e-5; = if(and(p0683=0;or(p0807=480;p0807=32;p0807=1;and(p0807=60;p0901<0.03)));p0935;0)
- p2890: 0; = p2304*(p1079+p1081)
- p2417: 0; = p2235*p2207
- p0727: 0
- p1882: 0
- p2720: 5.81388e-8; = p2329*(p1019+p1021)
- p0861: 0; = p0673*1000/p0856
- p1940: 0
- p3310: 0; = if(and(p1232=0;p3252<>0);IF((p3306+p3307+p3308+p3309)+(p3252*(p3257*(1-p3277))/p3305)>p3252;p3252-(p3306+p3307+p3308+p3309);p3252*(p3257*(1-p3277))/p3305);0)
- p2160: 4.40799e-6; = p2015*p2084*p2122/(p0818*1000)
- p3413: 0; = p3375*p1238
- p0377: 0.5
- p2856: 0; = p2270*(p1079+p1081)
- p3120: 0.000160159; = p2339*p1082
- p2307: 0; = p2227*p2214
- p1932: 0
- p0369: 0.5
- p0810: 0
- p1299: 0
- p1146: 0.929457
- p2224: 0.0722226; = if(p0765*p0769+p0766*p0770+p0767*p0771+p0768*p0772=0;0;p0771*p0767/(p0765*p0769+p0766*p0770+p0767*p0771+p0768*p0772))
- p0307: 0.5
- p2754: 1.3333e-6; = p2363*(p1019+p1021)
- p2105: 0.888194
- p2098: 0.856281
- p1730: 0
- p0481: 0; = SQRT(2)*(IF((2*p0349-1)<0;-1;IF((2*p0349-1)>0;1;0))*SQRT(SQRT((2/(pi()*0.140012289)+LN(1-(2*p0349-1)^2)/2)^2-LN(1-(2*p0349-1)^2)/0.140012289)-(2/(pi()*0.140012289)+LN(1-(2*p0349-1)^2)/2)))
- p1099: 0.663396
- p0985: 0; = IF(p0982=1;0;IF(p0982+p0983>1;1-p0982;p0983))
- p1776: 0
- p2310: 0; = p2227*p2217
- p1870: 0
- p2600: 0; = p2404*p1014
- p3380: 0; = p3251/p0818
- p1003: 0; = p0999*p0888
- p2163: 0.0224526; = (p2017-p2020)/p0818-(p2025+p2028+p2033+p2034+p2051+p2125+p2126+p2127+p2128+p2129+p2130+p2131+p2132+p2133+p2134+p2135+p2136+p2137+p2138+p2139+p2140+p2141+p2142+p2143+p2144+p2145+p2146+p2147+p2148+p2149+p2150+p2151+p2152+p2153+p2154+p2155+p2156+p2157)
- p2159: 0.000109945; = p2015*p2083*p2121/(p0818*1000)
- p1576: 0.47191
- p1897: 0
- p2667: 0; = p2276*(p1019+p1021)
- p1760: 0
- p1268: 0
- p1166: 1.17502e-6; = p1164/p0818
- p1554: 0
- p2522: 0.000299403; = p2326*p1014
- p2614: 0; = p2418*p1073
- p0899: 9.5546e9; = p0825*p0896+(p0830+p0895)*p0824*p0898
- p2715: 7.32051e-7; = p2324*(p1019+p1021)
- p2269: 6.11216e-5; = p2226*p2215
- p4573: 7.34492e-7; = p1812*p3481
- p3077: 0; = p2296*p1023
- p0732: 0
- p2543: 6.48809e-5; = p2347*p1073
- p1128: 0; = if(p1121=0;IF(p1123=1;0;IF(p1123+p1124>1;1-p1123;p1124));0)
- p3348: 0; = if(and(p1232=0;p3256<>0);p3276*p3289;0)
- p2929: 0; = p2343*(p1079+p1081)
- p3114: 9.19473e-6; = p2333*p1023
- p2182: 0.0080952; = p1050/p0818
- p1846: 0
- p4093: 9.67872e-8; = p1950*p3478
- p1788: 0
- p0591: 0; = IF(p0327<0.5;-SQRT(p0007*EXP(p0459^2*p0008)-p0007);SQRT(p0007*EXP(p0459^2*p0008)-p0007))
- p1680: 0
- p1559: 0
- p2507: 0; = p2311*p1123
- p2989: 0; = p2403*(p1020+p1022)
- p2670: 0; = p2279*(p1019+p1021)
- p0829: 0; = if(p0807=480;p0814*(1-p0824);0)
- p1836: 0
- p2690: 0; = p2299*(p1078+p1080)
- p0817: 0
- p2951: 0.000105178; = p2365*(p1020+p1022)
- p0016: 109.019
- p0696: 0
- p2275: 5.45992e-5; = p2230*p2221
- p2328: 0.000902006; = p2224*p2196
- p3078: 0; = p2297*p1082
- p2630: 1.0686e-5; = p2239*(p1019+p1021)
- p2128: 5.11574e-5; = p2015*p2056*p2090/(p0818*1000)
- p5123: 0; = p1950*p3483
- p0645: 0; = IF(p0381<0.5;-SQRT(p0007*EXP(p0513^2*p0008)-p0007);SQRT(p0007*EXP(p0513^2*p0008)-p0007))
- p2875: 0; = p2289*(p1020+p1022)
- p2237: 0.00644569; = p2222*p2182
- p3195: 0; = p2414*p1082
- p2854: 0; = p2268*(p1079+p1081)
- p1845: 0
- p2011: 0.0626144
- p0887: 0; = 1000*p0886*p0001*p0003*p0004/(p0818*p0002)
- p0703: 2353.44; = p0043*(1+p0571*p0175/100)
- p1979: 0; = p0973
- p0123: 34.295
- p3810: 9.33747e-6; = p1873*p3477
- p1056: 3.56474e7; = IF(p1012=0;p1049*p1036;0)
- p2403: 0; = p2234*p2192
- p2567: 0.000334151; = p2371*p1014
- p2170: 0.00633645; = p2166*(p0913)
- p2717: 3.35309e-5; = p2326*(p1019+p1021)
- p2279: 0; = p2223*p2185
- p2887: 0; = p2301*(p1079+p1081)
- p2930: 0; = p2344*(p1079+p1081)
- p1542: 3
- p1924: 0
- p0283: 0.5
- p2015: 6.07207e8; = p0830*p2011*p2013
- p2548: 0; = p2352*p1123
- p4016: 9.16252e-6; = p1873*p3478
- p2776: 0; = p2385*(p1078+p1080)
- p1322: 0.0744462; = IF(((p0745*1000*p0749/100)+(p0754*1000*p0758/100))/p0801<0;0;((p0745*1000*p0749/100)+(p0754*1000*p0758/100))/p0801)
- p3355: 0; = if(and(p1232=0;p3256<>0);p3256-(p3350+p3351+p3352+p3353+p3354);0)
- p2525: 5.1913e-7; = p2329*p1014
- p2726: 1.45343e-5; = p2335*(p1019+p1021)
- p1335: 1.61506e-5; = p1334*p0001/(p0818*p0002)
- p3076: 0; = p2295*p1023
- p2786: 0; = p2395*(p1019+p1021)
- p1638: 0
- p2866: 0; = p2280*(p1020+p1022)
- p4307: 0; = p1962*p3479
- p1018: 0.13566; = IF(p1012=0;p0709/100;0)
- p0963: 0; = if(and(p0683>0;or(p0807=480;p0807=32;p0807=1;and(p0807=60;p0901<0.03)));p0939;0)
- p3178: 0; = p2397*p1023
- p0135: 82.429
- p2365: 0.000775303; = p2225*p2193
- p3421: 0; = p3364*p1239
- p2702: 0; = p2311*(p1128+p1130)
- p0346: 0.5
- p2227: 0; = if(p0774*p0778+p0775*p0779+p0776*p0780+p0777*p0781=0;0;p0779*p0775/(p0774*p0778+p0775*p0779+p0776*p0780+p0777*p0781))
- p1047: 0.299887; = IF(p1012=0;IF(p1037+p1044+p1045+p1046=1;0;IF(p1037+p1044+p1045+p1046+p1041>1;1-(p1037+p1044+p1045+p1046);p1041));0)
- p2433: 0.00453358; = p2237*p1014
- p1292: 0; = IF(p1287+p1290+p1291=p1261;0;p1261-(p1287+p1290+p1291))
- p2355: 0.000233747; = p2225*p2183
- p0236: 0.003
- p2060: 0.272353
- p2151: 1.02414e-6; = p2015*p2079*p2113/(p0818*1000)
- p2258: 0.000138946; = p2226*p2204
- p0574: 0; = IF(p0310<0.5;-SQRT(p0007*EXP(p0442^2*p0008)-p0007);SQRT(p0007*EXP(p0442^2*p0008)-p0007))
- p0765: 64.322; = p0105*(1+p0633*p0237/100)
- p1765: 0
- p2809: 0; = p2418*(p1078+p1080)
- p0212: 3.809
- p3052: 8.65985e-6; = p2271*p1082
- p1060: 0.21
- p1736: 0
- p2574: 0; = p2378*p1073
- p1238: 0; = if(p1232>0;0;IF(p1234=1;0;IF(p1234+p1235>1;1-p1234;p1235)))
- p3248: 0
- p1970: 2.4e6; = p0801
- p3440: 0; = p3364*p1240
- p1702: 0
- p3285: 0
- p0935: 1.26699e-5; = p0929*p0001/(p0818*p0002)
- p2624: 0; = p2428*p1123
- p0729: 0
- p2933: 0; = p2347*(p1079+p1081)
- p2928: 0; = p2342*(p1079+p1081)
- p2217: 7.1128e-5; = p1118-p2216
- p1885: 0
- p3338: 0; = if(and(p1232=0;p3254<>0);1-(p3334+p3335+p3336+p3337);0)
- p1243: 0; = if(p1232>0;0;p1238*(p0725/100)*p0723*1000)
- p3039: 4.28925e-5; = p2258*p1082
- p0981: 0; = p0978*p0001/(p0818*p0002)
- p2456: 2.81316e-5; = p2260*p1073
- p2671: 0; = p2280*(p1019+p1021)
- p2480: 0; = p2284*p1014
- p0971: 0; = p0968/p0818
- p0270: 19.656
- p1483: 1
- p1591: 0
- p2045: 30
- p2616: 0; = p2420*p1073
- p2578: 0; = p2382*p1073
- p0884: 0; = IF(p0689=100;0;IF(p0689+p0688>100;100-p0689;p0688))
- p5187: 4.53151e-8; = p1808*p3484
- p1272: 0; = IF(p1267+p1270+p1271=p1259;0;p1259-(p1267+p1270+p1271))
- p1750: 0
- p2739: 0; = p2348*(p1078+p1080)
- p2036: 0.000224111; = p2015*p2030*(1-p2032)/(p0818*1000)
- p1306: 0; = p1302*p1252/p0818
- p2247: 0.000829163; = p2222*p2192
- p3463: 0; = p3368*p1241
- p0509: 0; = SQRT(2)*(IF((2*p0377-1)<0;-1;IF((2*p0377-1)>0;1;0))*SQRT(SQRT((2/(pi()*0.140012289)+LN(1-(2*p0377-1)^2)/2)^2-LN(1-(2*p0377-1)^2)/0.140012289)-(2/(pi()*0.140012289)+LN(1-(2*p0377-1)^2)/2)))
- p2371: 0.000475085; = p2225*p2200
- p3265: 0
- p1716: 0
- p3165: 0; = p2384*p1082
- p2460: 6.84607e-6; = p2264*p1073
- p2558: 4.73419e-5; = p2362*p1014
- p2975: 0; = p2389*(p1129+p1131)
- p2611: 0; = p2415*p1073
- p3163: 0; = p2382*p1082
- p2751: 2.7195e-5; = p2360*(p1019+p1021)
- p3255: 0; = p1252*(p1297*(1-p3247)+p1300*(1-p3248)+p1301*(1-p3249)+p1302*(1-p3250))
- p1286: 0; = p1282*p1252/p0818
- p2050: 0.952062
- p3173: 0; = p2392*p1132
- p2461: 8.9652e-5; = p2265*p1073
- p0678: 140.164; = p0018*(1+p0546*p0150/100)
- p2294: 0; = p2223*p2201
- p1908: 0
- p2549: 0; = p2353*p1123
- p0422: 0; = SQRT(2)*(IF((2*p0290-1)<0;-1;IF((2*p0290-1)>0;1;0))*SQRT(SQRT((2/(pi()*0.140012289)+LN(1-(2*p0290-1)^2)/2)^2-LN(1-(2*p0290-1)^2)/0.140012289)-(2/(pi()*0.140012289)+LN(1-(2*p0290-1)^2)/2)))
- p3401: 0; = p3363*p1238
- p3125: 2.14765e-7; = p2344*p1082
- p0211: 11.27
- p0670: 0
- p1049: 0.183763; = IF(p1012=0;IF(p1037+p1044+p1045+p1046+p1047+p1048=1;0;1-(p1037+p1044+p1045+p1046+p1047+p1048));0)
- p3332: 0; = if(and(p1232=0;p3255<>0);IF((p3328+p3329+p3330+p3331)+(p3255*(p3265*(1-p3277))/p3327)>p3255;p3255-(p3328+p3329+p3330+p3331);p3255*(p3265*(1-p3277))/p3327);0)
- p3176: 0; = p2395*p1023
- p3475: 0; = p3380*p1241
- p2968: 0; = p2382*(p1079+p1081)
- p3017: 0; = p2431*(p1129+p1131)
- p0171: 41.339
- p0415: 0; = SQRT(2)*(IF((2*p0283-1)<0;-1;IF((2*p0283-1)>0;1;0))*SQRT(SQRT((2/(pi()*0.140012289)+LN(1-(2*p0283-1)^2)/2)^2-LN(1-(2*p0283-1)^2)/0.140012289)-(2/(pi()*0.140012289)+LN(1-(2*p0283-1)^2)/2)))
- p1301: 0; = IF(p1297+p1300=p1265;0;IF(p1297+p1300+p1299>p1265;p1265-(p1297+p1300);p1299))
- p0019: 1106.99
- p2065: 0.0758824
- p2326: 0.000425681; = p2224*p2193
- p0650: 0; = IF(p0386<0.5;-SQRT(p0007*EXP(p0518^2*p0008)-p0007);SQRT(p0007*EXP(p0518^2*p0008)-p0007))
- p4775: 0; = p1808*p3482
- p1663: 0
- p4469: 0; = p1914*p3480
- p1998: 436
- p0811: 0; = if(p0807=480;1-p0810;0)
- p1178: 9.79146e-8; = p1176/p0818
- p2470: 0; = p2274*p1123
- p0138: 25.016
- p2836: 0.00134906; = p2250*(p1020+p1022)
- p0150: 0
- p2764: 2.30908e-6; = p2373*(p1019+p1021)
- p2763: 1.60439e-5; = p2372*(p1019+p1021)
- p1780: 1.98582e-5; = p1372*1000/p0818
- p0548: 0; = IF(p0284<0.5;-SQRT(p0007*EXP(p0416^2*p0008)-p0007);SQRT(p0007*EXP(p0416^2*p0008)-p0007))
- p1887: 0
- p3127: 7.67753e-6; = p2346*p1082
- p1002: 0; = p0996*p0888
- p2817: 0; = p2426*(p1078+p1080)
- p1578: 0
- p2973: 0; = p2387*(p1079+p1081)
- p1574: 0
- p0903: 0.0129401
- p2356: 2.24116e-5; = p2225*p2184
- p3290: 0
- p3179: 0; = p2398*p1023
- p1718: 0
- p3199: 0; = p2418*p1082
- p2389: 0; = p2233*p2218
- p2995: 0; = p2409*(p1020+p1022)
- p0378: 0.5
- p2771: 0; = p2380*(p1078+p1080)
- p2918: 3.53864e-5; = p2332*(p1020+p1022)
- p2113: 0.832356
- p2195: 0.00126345; = p2194*p2193
- p2981: 0; = p2395*(p1020+p1022)
- p3107: 3.49995e-5; = p2326*p1023
- p2135: 4.95788e-5; = p2015*p2063*p2097/(p0818*1000)
- p4761: 0; = p1794*p3482
- p1729: 0
- p2721: 9.54255e-8; = p2330*(p1019+p1021)
- p2896: 0; = p2310*(p1079+p1081)
- p1083: 406993; = IF(p1071=0;p1073*(p0710/100)*p0703*1000;0)
- p2167: 0.241374; = p2166*(p0898)
- p2125: 7.67251e-5; = p2015*p2053*p2087/(p0818*1000)
- p1209: 85.4291; = p1206*p0818*p0822/p0801
- p2697: 0; = p2306*(p1078+p1080)
- p0639: 0; = IF(p0375<0.5;-SQRT(p0007*EXP(p0507^2*p0008)-p0007);SQRT(p0007*EXP(p0507^2*p0008)-p0007))
- p3113: 2.14468e-5; = p2332*p1023
- p1962: 0; = p1960*1000/p0818
- p1717: 0
- p1055: 100867; = IF(p1012=0;p1048*p1036;0)
- p3381: 0; = p3362*p1234
- p0841: -0.151962
- p3226: 7.87741e-5; = p3222*p1229
- p3437: 0; = p3380*p1239
- p0669: 29.4127; = p0009*(1+p0537*p0141/100)
- p4916: 0; = p1949*p3482
- p2510: 0; = p2314*p1123
- p2639: 0.00036967; = p2248*(p1019+p1021)
- p0840: 0.090189; = p0839*p0831
- p1712: 0
- p0788: 0
- p1270: 0; = IF(p1267=p1259;0;IF(p1267+p1268>p1259;p1259-p1267;p1268))
- p0852: 0; = p0847*p0851^3+p0848*p0851^2+p0849*p0851+p0850
- p2586: 0; = p2390*p1123
- p1649: 0
- p1757: 0
- p2141: 1.06989e-5; = p2015*p2069*p2103/(p0818*1000)
- p2825: 1.84037e-5; = p2239*(p1020+p1022)
- p3235: 0.118093
- p1240: 0; = if(p1232>0;0;IF(p1234+p1238+p1239=1;0;IF(p1234+p1238+p1239+p1237>1;1-(p1234+p1238+p1239);p1237)))
- p4652: 3.06039e-8; = p1891*p3481
- p1072: 0; = p1071*p0001/(p0818*p0002)
- p1972: 0; = if(p0807=480;p1967*p0001/(p0818*p0002);0)
- p3418: 0; = p3380*p1238
- p0027: 13.402
- p2284: 0; = p2223*p2190
- p2647: 1.39772e-5; = p2256*(p1019+p1021)
- p1207: 159.532; = if(p1193>0;0;(p1194*p1050/p1057+p1195*p1051/p1058+p1196*p1052/p1059+p1197*p1053/p1060+p1198*p1054/p1061+p1199*p1055/p1062+p1200*p1056/p1063)/(p0702*1000)+(p1201*p1109/p1114+p1202*p1110/p1115)/(p0702*1000)+p1203*p1170/p0801+p1204*p1176/p0801)
- p0306: 0.5
- p2582: 0; = p2386*p1073
- p2731: 0; = p2340*(p1078+p1080)
- p2561: 0.00054531; = p2365*p1014
- p2821: 0; = p2430*(p1128+p1130)
- p2910: 1.26076e-6; = p2324*(p1020+p1022)
- p3038: 0.000167256; = p2257*p1023
- p2088: 0.798875
- p1604: 0.92902
- p0442: 0; = SQRT(2)*(IF((2*p0310-1)<0;-1;IF((2*p0310-1)>0;1;0))*SQRT(SQRT((2/(pi()*0.140012289)+LN(1-(2*p0310-1)^2)/2)^2-LN(1-(2*p0310-1)^2)/0.140012289)-(2/(pi()*0.140012289)+LN(1-(2*p0310-1)^2)/2)))
- p4222: 9.05232e-7; = p1873*p3479
- p2755: 1.07899e-5; = p2364*(p1019+p1021)
- p0141: 92.9145
- p0843: -0.0709004
- p2747: 1.76536e-6; = p2356*(p1019+p1021)
- p0182: 19.656
- p2635: 2.80383e-5; = p2244*(p1019+p1021)
- p0836: 2.2493e8; = p0831*p0835*p0801/(1-p0831)
- p2251: 8.13718e-6; = p2222*p2197
- p1097: 0.0773317
- p1918: 0
- p1341: 0; = p1340*p0001/(p0818*p0002)
- p1769: 0
- p1682: 0
- p3895: 0; = p1962*p3477
- p1658: 0
- p0536: 0; = SQRT(2)*(IF((2*p0404-1)<0;-1;IF((2*p0404-1)>0;1;0))*SQRT(SQRT((2/(pi()*0.140012289)+LN(1-(2*p0404-1)^2)/2)^2-LN(1-(2*p0404-1)^2)/0.140012289)-(2/(pi()*0.140012289)+LN(1-(2*p0404-1)^2)/2)))
- p3129: 1.48367e-6; = p2348*p1082
- p1813: 0
- p1255: 0; = if(p1232>0;0;p0737/100)
- p2280: 0; = p2223*p2186
- p2869: 0; = p2283*(p1020+p1022)
- p0958: 0; = if(and(p0683>0;or(p0807=480;p0807=32;p0807=1;and(p0807=60;p0901<0.03)));p0934;0)
- p1837: 0
- p5252: 6.77341e-7; = p1873*p3484
- p2678: 0; = p2287*(p1019+p1021)
- p0091: 30.206
- p3014: 0; = p2428*(p1129+p1131)
- p3124: 6.14731e-5; = p2343*p1082
- p0736: 0
- p1019: 0.07877; = IF(p1012=0;IF(p1014=1;0;IF(p1014+p1015>1;1-p1014;p1015));0)
- p1935: 0
- p0857: 2.16944; = p0856*p0001*p0003/(p0818*p0002)
- p2965: 0; = p2379*(p1079+p1081)
- p2295: 0; = p2223*p2202
- p0259: 37.192
- p3420: 0; = p3363*p1239
- p3335: 0; = IF(or(p3254=0;p1232>0);0;p3270*(p3280*(p3283*p1256+p3286*(p1253+p1257)+p1258*p3288+p3300*p3287)))
- p5322: 1.431e-8; = p1943*p3484
- p1791: 0
- p0794: 0
- p4721: 0; = p1754*p3482
- p1021: 0; = IF(p1012=0;IF(p1014+p1019+p1020=1;0;IF(p1014+p1019+p1020+p1017>1;1-(p1014+p1019+p1020);p1017));0)
- p2165: 0.609816; = (p0833-p2014)/p0818-p0839
- p2257: 0.00203425; = p2222*p2203
- p0177: 10.318
- p2019: 0.13105
- p1037: 0.411884
- p3383: 0; = p3364*p1234
- p1651: 0.299611
- p0715: 0
- p1140: 0; = if(p1121=0;p1134*p0001/(p0818*p0002);0)
- p2046: 10
- p1697: 0
- p2090: 0.40001
- p1901: 0
- p0619: 0; = IF(p0355<0.5;-SQRT(p0007*EXP(p0487^2*p0008)-p0007);SQRT(p0007*EXP(p0487^2*p0008)-p0007))
- p1555: 0
- p0804: 0
- p1266: 0; = if(p1232>0;0;IF(p1259+p1263+p1264+p1265=1;0;1-(p1259+p1263+p1264+p1265)))
- p2608: 0; = p2412*p1014
- p2384: 0; = p2229*p2213
- p2120: 0.51828
- p0705: 70.335; = p0045*(1+p0573*p0177/100)
- p3261: 0
- p2239: 0.000135661; = p2222*p2184
- p2863: 0; = p2277*(p1020+p1022)
- p2610: 0; = p2414*p1073
- p2475: 0; = p2279*p1014
- p2946: 4.6836e-5; = p2360*(p1020+p1022)
- p2908: 4.37999e-6; = p2322*(p1020+p1022)
- p2222: 0.796237; = if(p0765*p0769+p0766*p0770+p0767*p0771+p0768*p0772=0;0;p0769*p0765/(p0765*p0769+p0766*p0770+p0767*p0771+p0768*p0772))
- p1170: 866.514; = p1169*p0801
- p2581: 0; = p2385*p1073
- p2347: 9.38535e-5; = p2228*p2215
- p3267: 0
- p0009: 29.4127
- p2366: 0.000166195; = p2225*p2195
- p1566: 0
- p2361: 5.88043e-5; = p2225*p2189
- p2622: 0; = p2426*p1073
- p2814: 0; = p2423*(p1078+p1080)
- p0833: 1.322e10; = p0830+p0832
- p2405: 0; = p2234*p2195
- p3384: 0; = p3365*p1234
- p3453: 0; = p3377*p1240
- p3276: 0
- p2277: 0; = p2223*p2183
- p2535: 0.000358659; = p2339*p1073
- p1130: 0; = if(p1121=0;IF(p1123+p1128+p1129=1;0;IF(p1123+p1128+p1129+p1126>1;1-(p1123+p1128+p1129);p1126));0)
- p0844: 0.834472
- p2982: 0; = p2396*(p1020+p1022)
- p0768: 43.211; = p0108*(1+p0636*p0240/100)
- p1704: 0
- p1770: 0
- p1826: 0
- p3391: 0; = p3372*p1234
- p1185: 0.5
- p0082: 95.208
- p1643: 0
- p1085: 0; = IF(p1071=0;p1079*(p0710/100)*p0703*1000;0)
- p2145: 2.04827e-5; = p2015*p2073*p2107/(p0818*1000)
- p1937: 0
- p2322: 3.22865e-5; = p2224*p2189
- p0692: 0
- p2370: 4.85108e-6; = p2225*p2199
- p1810: 0
- p3154: 2.41021e-6; = p2373*p1023
- p3337: 0; = IF(or(p3254=0;p1232>0);0;p3272*p3289)
- p2357: 7.71954e-5; = p2225*p2185
- p3897: 1.75508e-5; = p1754*p3478
- p5337: 0; = p1962*p3484
- p2241: 0.00113506; = p2222*p2186
- p1883: 0
- p2418: 0; = p2235*p2208
- p2618: 0; = p2422*p1073
- p1305: 0; = p1301*p1252/p0818
- p0998: 0; = if(p0888=0;0;if((p0699*p0698*1000*p0700/100)/p0888>1;1;(p0699*p0698*1000*p0700/100)/p0888))
- p1990: 30
- p0916: 0.340805; = p0826+(p0832*(1+p0894))/p0818
- p2476: 0; = p2280*p1014
- p0110: 0.376
- p1565: 0
- p0381: 0.5
- p3423: 0; = p3366*p1239
- p0984: 0; = if(p0886=0;0;min(1;(p0699*p0698*1000*p0701/100)/p0886))
- p1599: 0
- p0693: 0
- p1848: 0
- p3135: 8.75519e-5; = p2354*p1023
- p2724: 8.80891e-6; = p2333*(p1019+p1021)
- p2877: 0; = p2291*(p1020+p1022)
- p3937: 1.2905e-7; = p1794*p3478
- p1664: 0
- p3388: 0; = p3369*p1234
- p1985: 5.50289e8; = (if(p1057=0;0;p1050/p1057)+if(p1058=0;0;p1051/p1058)+if(p1059=0;0;p1052/p1059)+if(p1060=0;0;p1053/p1060)+if(p1061=0;0;p1054/p1061)+if(p1062=0;0;p1055/p1062)+if(p1063=0;0;p1056/p1063))*(1+p1157)
- p0088: 31.843
- p1076: 0; = IF(p1071=0;p0714/100;0)
- p2325: 7.52092e-5; = p2224*p2192
- p1631: 0
- p1122: 0; = p1121*p0001/(p0818*p0002)
- p1327: 0.0557045; = if(p1318=0;if(p1327a=0;1;if(p1327a<0;0;p1327a));0)
- p2400: 0; = p2234*p2189
- p3074: 0; = p2293*p1023
- p0537: 0; = IF(p0273<0.5;-SQRT(p0007*EXP(p0405^2*p0008)-p0007);SQRT(p0007*EXP(p0405^2*p0008)-p0007))
- p1033: 0; = IF(p1012=0;p1027*p0001/(p0818*p0002);0)
- p2992: 0; = p2406*(p1020+p1022)
- p1010: 2.55508e6; = p0890
- p0831: 0.137; = 1-p0824
- p0005: 1.60934
- p3221: 0.146975; = IF(p3216=0;0;p1223*12.0107/100.0869+(1-p1224)*12.0107/84.3139)
- p1906: 0
- p0978: 0
- p2530: 1.13204e-5; = p2334*p1014
- p2462: 3.13212e-7; = p2266*p1073
- p2879: 0; = p2293*(p1020+p1022)
- p3316: 0; = if(and(p1232=0;p3253<>0);1-(p3312+p3313+p3314+p3315);0)
- p0343: 0.5
- p1572: 0
- p1588: 0
- p2039: 3.72734e-5; = p2015*p2037*p2038/(p0818*1000)
- p2599: 0; = p2403*p1014
- p3112: 2.18992e-7; = p2331*p1023
- p2214: 4.10673e-5; = p1107/p0818
- p3174: 0; = p2393*p1023
- p0116: 21.121
- p1890: 4.35664e-6; = p1482*1000/p0818
- p0219: 20.508
- p3070: 0; = p2289*p1023
- p3465: 0; = p3370*p1241
- p1983: 50
- p1685: 0
- p3210: 0; = p2429*p1132
- p1684: 0
- p0917: 1.27956
- p0776: 21.121; = p0116*(1+p0644*p0248/100)
- p3198: 0; = p2417*p1082
- p2665: 0; = p2274*(p1128+p1130)
- p2176: 0.00320104; = p0895*p0913/p0818
- p4446: 0; = p1891*p3480
- p2012: 0.109717
- p2804: 0; = p2413*(p1019+p1021)
- p0832: 1.81115e9; = p0831*p0830/(1-p0831)
- p1867: 0
- p4057: 6.77511e-7; = p1914*p3478
- p1017: 0; = IF(p1012=0;p0708/100;0)
- p2122: 0.341195
- p2819: 0; = p2428*(p1128+p1130)
- p0438: 0; = SQRT(2)*(IF((2*p0306-1)<0;-1;IF((2*p0306-1)>0;1;0))*SQRT(SQRT((2/(pi()*0.140012289)+LN(1-(2*p0306-1)^2)/2)^2-LN(1-(2*p0306-1)^2)/0.140012289)-(2/(pi()*0.140012289)+LN(1-(2*p0306-1)^2)/2)))
- p2360: 0.000345246; = p2225*p2188
- p2059: 1.00168
- p2798: 0; = p2407*(p1019+p1021)
- p2723: 2.05468e-5; = p2332*(p1019+p1021)
- p1001: 1; = if(p0978>0;0;if(and(p0687=0;p0691=0;p0695=0;p0699=0);0;IF(p0996+p0999+p1000=1;0;1-(p0996+p0999+p1000))))
- p2226: 0.394396; = if(p0774*p0778+p0775*p0779+p0776*p0780+p0777*p0781=0;0;p0778*p0774/(p0774*p0778+p0775*p0779+p0776*p0780+p0777*p0781))
- p0837: 0.5
- p2588: 0; = p2392*p1123
- p3442: 0; = p3366*p1240
- p1091: 0; = IF(p1071=0;p1085*p0001/(p0818*p0002);0)
- p2523: 6.41805e-5; = p2327*p1014
- p1949: 5.06586e-7; = p1541*1000/p0818
- p0382: 0.5
- p1216: 0.0263674
- p4925: 0; = p1962*p3482
- p1123: 0; = if(p1121=0;p0717/100;0)
- p3356: 0; = if(p1232=0;p3306+p3317+p3328+p3339+p3350;0)
- p2348: 4.8062e-6; = p2228*p2216
- p2042: 0.07
- p0445: 0; = SQRT(2)*(IF((2*p0313-1)<0;-1;IF((2*p0313-1)>0;1;0))*SQRT(SQRT((2/(pi()*0.140012289)+LN(1-(2*p0313-1)^2)/2)^2-LN(1-(2*p0313-1)^2)/0.140012289)-(2/(pi()*0.140012289)+LN(1-(2*p0313-1)^2)/2)))
- p0018: 140.164
- p2440: 0.000250358; = p2244*p1014
- p1086: 0; = IF(p1071=0;p1080*(p0710/100)*p0703*1000;0)
- p0195: 0
- p3266: 0
- p2408: 0; = p2234*p2198
- p0911: 0.00475556
- p3102: 1.55854e-5; = p2321*p1023
- p2066: 0.109412
- p0989: 0; = p0985*p0886
- p2080: 0.025
- p3604: 0; = p1873*p3476
- p1868: 0
- p3289: 0
- p2685: 0; = p2294*(p1019+p1021)
- p2175: 0.000525934; = p0895*p0908/p0818
- p2419: 0; = p2235*p2209
- p0391: 0.5
- p0697: 0
- p3050: 1.88682e-5; = p2269*p1082
- p3320: 0; = if(and(p1232=0;p3253<>0);p3253*(p3264-p3315)/p3316;0)
- p0860: 0; = p0672*1000/p0856
- p1623: 0
- p2272: 0.000413978; = p2230*p2218
- p2072: 0.134
- p2827: 0.000153983; = p2241*(p1020+p1022)
- p3399: 0; = p3380*p1234
- p3291: 0
- p1742: 0
- p4515: 1.66485e-5; = p1754*p3481
- p0943: 0; = if(and(p0683=0;p0949=0);p0937;0)
- p1012: 0
- p0931: 1.10699e6; = p0801*p0925
- p2313: 0; = p2231*p2220
- p0845: 0.5
- p1250: 0; = if(p1232>0;0;p1245*p0001/(p0818*p0002))
- p2886: 0; = p2300*(p1079+p1081)
- p2628: 0.000507727; = p2237*(p1019+p1021)
- p1160: 0.0300884; = (p1156+p1158)*p1159
- p1839: 0
- p5328: 1.1925e-8; = p1949*p3484
- p4204: 4.36679e-7; = p1855*p3479
- p0866: 0; = IF(p0858+p0864+p0865=1;0;IF(p0858+p0864+p0865+p0861>1;1-(p0858+p0864+p0865);p0861))
- p3400: 0; = p3362*p1238
- p2699: 0; = p2308*(p1078+p1080)
- p2657: 0; = p2266*(p1078+p1080)
- p1332: 1.80846e6; = p1321*p0801
- p2186: 0.00142554; = p1052/p0818
- p2121: 0.822447
- p1939: 0
- p2577: 0; = p2381*p1073
- p0386: 0.5
- p2974: 0; = p2388*(p1079+p1081)
- p0926: 0; = IF(p0918+p0923+p0924+p0925=1;0;IF(p0918+p0923+p0924+p0925+p0922>1;1-(p0918+p0923+p0924+p0925);p0922))
- p1963g: 1.50552e-5; = p1667*p1871+p1668*p1872+p1669*p1873+p1670*p1874+p1671*p1875+p1672*p1876+p1673*p1877+p1674*p1878+p1675*p1879+p1676*p1880+p1677*p1881+p1678*p1882+p1679*p1883+p1680*p1884+p1681*p1885+p1682*p1886+p1683*p1887+p1684*p1888+p1685*p1889
- p2085: 0.0335294
- p2187: 0.000205167; = 4*1.00794*p2186/(2*14.0067)
- p0689: 0
- p1051: 1.68162e6; = IF(p1012=0;p1044*p1036;0)
- p2668: 0; = p2277*(p1019+p1021)
- p1004: 0; = p1000*p0888
- p2020: 1.57398e7; = p2015*p2018*p2019
- p1946: 0
- p2428: 0; = p2236*p2218
- p3297: 0; = if(p1273+p1274+p1275+p1276=0;0;p1273/(p1273+p1274+p1275+p1276))
- p2552: 1.57632e-5; = p2356*p1014
- p2527: 1.87336e-6; = p2331*p1014
- p2845: 0; = p2259*(p1079+p1081)
- p1329: 0; = p1328*p0001/(p0818*p0002)
- p3334: 0; = IF(or(p3254=0;p1232>0);0;p3269*p3277*(p3300*p3292+(1-p3300)*p3296))
- p2792: 0; = p2401*(p1019+p1021)
- p3301: 0; = if(and(p1232=0;p3252<>0);p3257*p3277*(p3297*p3290+(1-p3297)*p3294);0)
- p1661: 0
- p1934: 0
- p2139: 1.70405e-5; = p2015*p2067*p2101/(p0818*1000)
- p2734: 0; = p2343*(p1078+p1080)
- p3303: 0; = if(and(p1232=0;p3252<>0);p3259*p3289;0)
- p3100: 8.46504e-6; = p2319*p1023
- p1563: 0
- p2204: 0.0003523; = p1109/p0818
- p1028: 319258; = IF(p1012=0;p1022*(p0704/100)*p0703*1000;0)
- p2321: 0.000189558; = p2224*p2188
- p1683: 0
- p1982: 750
- p3084: 0; = p2303*p1082
- p0724: 0
- p3012: 0; = p2426*(p1079+p1081)
- p1000: 0; = IF(p0996+p0999=1;0;IF(p0996+p0999+p0998>1;1-(p0996+p0999);p0998))
- p3141: 2.83861e-5; = p2360*p1023
- p1963a: 4.32102e-5; = p1550*p1754+p1551*p1755+p1552*p1756+p1553*p1757+p1554*p1758+p1555*p1759+p1556*p1760+p1557*p1761+p1558*p1762+p1559*p1763+p1560*p1764+p1561*p1765+p1562*p1766+p1563*p1767+p1564*p1768+p1565*p1769+p1566*p1770+p1567*p1771+p1568*p1772
- p2505: 0; = p2309*p1073
- p0910: 0.00590066; = p0909/p0818
- p3091: 0; = p2310*p1082
- p0531: 0; = SQRT(2)*(IF((2*p0399-1)<0;-1;IF((2*p0399-1)>0;1;0))*SQRT(SQRT((2/(pi()*0.140012289)+LN(1-(2*p0399-1)^2)/2)^2-LN(1-(2*p0399-1)^2)/0.140012289)-(2/(pi()*0.140012289)+LN(1-(2*p0399-1)^2)/2)))
- p0800: 9.425; = p0140*(1+p0668*p0272/100)
- p2368: 1.34429e-6; = p2225*p2197
- p3182: 0; = p2401*p1023
- p1283: 0; = p1277*p1252/p0818
- p1109: 3.4772e6; = IF(p1071=0;p1105*p1103*p1095;0)
- p0002: 0.453592
- p2426: 0; = p2235*p2216
- p0912: 0
- p1197: 1.806
- p1167: 0.5
- p3880: 1.97271e-7; = p1943*p3477
- p2289: 0; = p2223*p2196
- p2143: 8.25095e-6; = p2015*p2071*p2105/(p0818*1000)
- p2634: 0.000164616; = p2243*(p1019+p1021)
- p1879: 0
- p2397: 0; = p2234*p2186
- p0999: 0; = IF(p0996=1;0;IF(p0996+p0997>1;1-p0996;p0997))
- p3369: 0; = if(p1232=0;p3245*p3357/p0818;0)
- p2976: 0; = p2390*(p1129+p1131)
- p3252: 0; = p1252*(p1267*(1-p3247)+p1270*(1-p3248)+p1271*(1-p3249)+p1272*(1-p3250))
- p1100: 0.242165
- p1639: 0
- p2550: 0.000748962; = p2354*p1014
- p1864: 0
- p2640: 7.92431e-5; = p2249*(p1019+p1021)
- p0808: 0
- p2106: 0.856281
- p3731: 1.31514e-7; = p1794*p3477
- p1842: 0
- p1157: 0.24835
- p0797: 20.4; = p0137*(1+p0665*p0269/100)
- p0933: 46446; = p0801*p0927
- p2740: 0; = p2349*(p1078+p1080)
- p0154: 0
- p2811: 0; = p2420*(p1078+p1080)
- p2110: 0.856281
- p2542: 1.7193e-5; = p2346*p1073
- p1783: 0
- p2205: 0.000318628; = 2*14.0067*p2204/30.973762
- p1951: 0
- p1115: 0.237849
- p3387: 0; = p3368*p1234
- p2947: 7.97739e-6; = p2361*(p1020+p1022)
- p2681: 0; = p2290*(p1019+p1021)
- p0761: 0
- p4651: 1.31597e-6; = p1890*p3481
- p3093: 0; = p2312*p1132
- p0371: 0.5
- p2188: 0.00262463; = p1066-p2186-p2187
- p4240: 3.18744e-9; = p1891*p3479
- p3358: 0; = if(p1232=0;p3308+p3319+p3330+p3341+p3352;0)
- p3159: 0; = p2378*p1082
- p3044: 7.08045e-6; = p2263*p1082
- p1256: 0; = if(p1232>0;0;IF(p1253=1;0;IF(p1253+p1254>1;1-p1253;p1254)))
- p3207: 0; = p2426*p1082
- p2958: 2.76313e-5; = p2372*(p1020+p1022)
- p2801: 0; = p2410*(p1019+p1021)
- p3048: 1.46254e-6; = p2267*p1082
- p1648: 0
- p3471: 0; = p3376*p1241
- p2486: 0; = p2290*p1014
- p0675: 0
- p2267: 4.73775e-6; = p2226*p2213
- p3250: 0
- p0915: 0.0189815; = p0914/p0818
- p2431: 0; = p2236*p2221
- p1038: 0.0086688
- p3225: 5.16308e-5; = p3221*p1229
- p0881: 0; = p0880*p0001*p0003/(p0818*p0002)
- p1558: 0
- p1155: 8.60189e-5; = if(p1153*p0818=0;0;p1151/(p1153*p0818))
- p1567: 0
- p0151: 0
- p1174: 4.38963e-8; = p1170*p1173/p0818
- p2842: 2.40719e-5; = p2256*(p1020+p1022)
- p0955: 0; = if(and(p0683>0;or(p0807=56;p0807=100;and(p0807=60;p0901>0.06)));p0937;0)
- p2512: 9.02674e-5; = p2316*p1014
- p1784: 0
- p3428: 0; = p3371*p1239
- p1054: 5.81739e7; = IF(p1012=0;p1047*p1036;0)
- p2144: 7.05896e-6; = p2015*p2072*p2106/(p0818*1000)
- p2693: 0; = p2302*(p1078+p1080)
- p2308: 0; = p2227*p2215
- p2915: 1.00128e-7; = p2329*(p1020+p1022)
- p2718: 7.18774e-6; = p2327*(p1019+p1021)
- p1020: 0; = IF(p1012=0;IF(p1014+p1019=1;0;IF(p1014+p1019+p1016>1;1-(p1014+p1019);p1016));0)
- p1627: 0
- p1005: 0; = p1001*p0888
- p2927: 0; = p2341*(p1079+p1081)
- p2406: 0; = p2234*p2196
- p3311: 0; = if(and(p1232=0;p3252<>0);p3252-(p3306+p3307+p3308+p3309+p3310);0)
- p2359: 2.69878e-5; = p2225*p2187
- p0742: 95.208; = p0082*(1+p0610*p0214/100)
- p0746: 0
- p3035: 0.000236445; = p2254*p1023
- p2481: 0; = p2285*p1014
- p2961: 0; = p2375*(p1079+p1081)
- p2376: 0; = p2229*p2205
- p1677: 0
- p3134: 0; = p2353*p1132
- p2884: 0; = p2298*(p1079+p1081)
- p1192: 3.62546e-8; = p1188*p1191/p0818
- p0507: 0; = SQRT(2)*(IF((2*p0375-1)<0;-1;IF((2*p0375-1)>0;1;0))*SQRT(SQRT((2/(pi()*0.140012289)+LN(1-(2*p0375-1)^2)/2)^2-LN(1-(2*p0375-1)^2)/0.140012289)-(2/(pi()*0.140012289)+LN(1-(2*p0375-1)^2)/2)))
- p2498: 0; = p2302*p1073
- p2329: 7.38083e-7; = p2224*p2197
- p0505: 0; = SQRT(2)*(IF((2*p0373-1)<0;-1;IF((2*p0373-1)>0;1;0))*SQRT(SQRT((2/(pi()*0.140012289)+LN(1-(2*p0373-1)^2)/2)^2-LN(1-(2*p0373-1)^2)/0.140012289)-(2/(pi()*0.140012289)+LN(1-(2*p0373-1)^2)/2)))
- p2483: 0; = p2287*p1014
- p1309: 0
- p0951: 4.1984e-6; = if(and(p0683=0;or(p0807=480;p0807=32;p0807=1;and(p0807=60;p0901<0.03)));p0939;0)
- p0685: 0
- p0914: 1.87348e8; = p0825*p0911+(p0830+p0895)*p0824*p0913
- p3690: 0; = p1963*p3476
- p2826: 6.33906e-5; = p2240*(p1020+p1022)
- p1721: 0
- p0856: 2.4e6; = p0801
- p0992: 0; = p0988*p0001*p0004/(p0818*p0002)
- p1077: 0; = IF(p1071=0;p0715/100;0)
- p1710: 0.757148
- p1344: 133691; = IF(p1318=0;p1327*p0801;0)
- p2016: 0.00976628; = (p2014-p2015)/(p0818)
- p1843: 0
- p2100: 0.705744
- p2728: 0; = p2337*(p1078+p1080)
- p2756: 6.10706e-5; = p2365*(p1019+p1021)
- p1928: 0
- p1137: 0; = if(p1121=0;p1131*(p0716/100)*p0703*1000;0)
- p2894: 0; = p2308*(p1079+p1081)
- p2425: 0; = p2235*p2215
- p2849: 0; = p2263*(p1079+p1081)
- p1662: 0
- p0242: 39.091
- p1929: 0
- p3031: 0.000817628; = p2250*p1023
- p0924: 0.0454246; = IF(p0918+p0923=1;0;IF(p0918+p0923+p0920>1;1-(p0918+p0923);p0920))
- p2768: 0; = p2377*(p1078+p1080)
- p1748: 0
- p2260: 4.06938e-5; = p2226*p2206
- p3036: 0.00010137; = p2255*p1023
- p0117: 3.372
- p3273: 0
- p1327a: 0.0557045; = (p0745*1000/p0801)*(1-(p0746+p0747+p0748+p0749+p0750+p0751+p0752+p0753)/100)+(p0754*1000/p0801)*(1-(p0755+p0756+p0757+p0758+p0759+p0760+p0761+p0762)/100)
- p1689: 0
- p1094: 1.64283e-5; = IF(p1071=0;p1088*p0001/(p0818*p0002);0)
- p1121: 0
- p1172: 8.77927e-8; = p1170/p0818
- p2380: 0; = p2229*p2209
- p2041: 2.7069e-5; = p2015*p2040/(p0818*1000)
- p3043: 1.56574e-5; = p2262*p1082
- p5293: 5.00851e-8; = p1914*p3484
- p1337: 0; = p1336*p0001/(p0818*p0002)
- p1325: 0; = IF(((p0745*1000*p0752/100)+(p0754*1000*p0761/100))/p0801<0;0;((p0745*1000*p0752/100)+(p0754*1000*p0761/100))/p0801)
- p2282: 0; = p2223*p2188
- p2912: 5.77479e-5; = p2326*(p1020+p1022)
- p5173: 9.54002e-9; = p1794*p3484
- p2349: 4.30754e-5; = p2228*p2217
- p3304: 0; = if(and(p1232=0;p3252<>0);p3260*p3289;0)
- p0112: 25.008
- p3096: 4.80705e-5; = p2315*p1023
- p2945: 3.66117e-6; = p2359*(p1020+p1022)
- p1303: 0; = p1297*p1252/p0818
- p3024: 0.000171825; = p2243*p1023
- p0636: 0; = IF(p0372<0.5;-SQRT(p0007*EXP(p0504^2*p0008)-p0007);SQRT(p0007*EXP(p0504^2*p0008)-p0007))
- p2468: 0; = p2272*p1123
- p0942: 0; = if(and(p0683=0;p0948=0);p0936;0)
- p2772: 0; = p2381*(p1078+p1080)
- p3280: 0
- p0547: 0; = IF(p0283<0.5;-SQRT(p0007*EXP(p0415^2*p0008)-p0007);SQRT(p0007*EXP(p0415^2*p0008)-p0007))
- p3086: 0; = p2305*p1082
- p2446: 0.00699439; = p2250*p1014
- p1110: 1.26931e6; = IF(p1071=0;p1105*p1104*p1095;0)
- p2149: 2.26519e-6; = p2015*p2077*p2111/(p0818*1000)
- p0848: 0
- p1063: 0.455
- p3027: 8.42416e-6; = p2246*p1023
- p2049: 25.6942
- p3407: 0; = p3369*p1238
- p0699: 13.402; = p0039*(1+p0567*p0171/100)
- p2966: 0; = p2380*(p1079+p1081)
- p2273: 0.000583381; = p2230*p2219
- p3349: 0; = if(and(p1232=0;p3256<>0);1-(p3345+p3346+p3347+p3348);0)
- p0721: 0
- p1856: 0
- p3213: 0.112803; = p1222*12.0107/100.0869
- p1653: 0
- p1024: 1.65524e6; = IF(p1012=0;p1014*(p0704/100)*p0703*1000;0)
- p2263: 2.29364e-5; = p2226*p2209
- p0874: 0; = p0865*p0856
- p3477: 0.32451; = if(p1328+p1330+p1332+p1334+p1336+p1338+p1340+p1342+p1344=0;0;p1330/(p1328+p1330+p1332+p1334+p1336+p1338+p1340+p1342+p1344))
- p0683: 0
- p2540: 4.80944e-7; = p2344*p1073
- p0922: 0; = p0677*1000/p0801
- p0648: 0; = IF(p0384<0.5;-SQRT(p0007*EXP(p0516^2*p0008)-p0007);SQRT(p0007*EXP(p0516^2*p0008)-p0007))
- p2244: 0.000355951; = p2222*p2189
- p0871: 0; = p0870*p0001*p0003/(p0818*p0002)
- p1789: 0
- p3325: 0; = if(and(p1232=0;p3255<>0);p3267*p3289;0)
- p1790: 0
- p2076: 0.057
- p4504: 0; = p1949*p3480
- p0969: 0
- p1069: 6.38722e-5; = IF(p1012=0;p1055/(p1062*p0818);0)
- p0633: 0; = IF(p0369<0.5;-SQRT(p0007*EXP(p0501^2*p0008)-p0007);SQRT(p0007*EXP(p0501^2*p0008)-p0007))
- p2546: 0; = p2350*p1123
- p1723: 0
- p0937: 0.000100064; = p0931*p0001/(p0818*p0002)
- p0778: 42.3; = p0118*(1+p0646*p0250/100)
- p0806: 1.645e8
- p1016: 0; = IF(p1012=0;p0707/100;0)
- p1720: 0
- p1310: 0; = IF(p1307=p1266;0;IF(p1307+p1308>p1266;p1266-p1307;p1308))
- p2086: 0.0617647
- p0988: 0; = p0982*p0886
- p1778: 0
- p1013: 0; = p1012*p0001/(p0818*p0002)
- p3376: 0; = if(p1232=0;p3246*p3358/p0818;0)
- p0803: 0
- p1261: 0; = if(p1232>0;0;p0732/100)
- p1984: 30
- p0907: 0
- p2812: 0; = p2421*(p1078+p1080)
- p2694: 0; = p2303*(p1078+p1080)
- p2173: 0.121937; = p0895*p0898/p0818
- p4157: 6.05613e-8; = p1808*p3479
- p0373: 0.5
- p1045: 0.0725313; = IF(p1012=0;IF(p1037+p1044=1;0;IF(p1037+p1044+p1039>1;1-(p1037+p1044);p1039));0)
- p2369: 2.20643e-6; = p2225*p2198
- p0351: 0.5
- p2831: 5.52723e-5; = p2245*(p1020+p1022)
- p0726: 0
- p2688: 0; = p2297*(p1078+p1080)
- p2339: 0.000518818; = p2228*p2207
- p3123: 4.69425e-6; = p2342*p1082
- p1910: 0
- p1295: 0; = p1291*p1252/p0818
- p0769: 101.694; = p0109*(1+p0637*p0241/100)
- p1818: 0
- p2358: 0.000187516; = p2225*p2186
- p2598: 0; = p2402*p1014
- p0701: 0
- p3394: 0; = p3375*p1234
- p3211: 0; = p2430*p1132
- p2793: 0; = p2402*(p1019+p1021)
- p1050: 7.98996e7; = IF(p1012=0;p1037*p1036;0)
- p0001: 0.404686
- p1251: 0; = if(p1232>0;0;p1246*p0001/(p0818*p0002))
- p1164: 11597.4; = p1163*p0801
- p2201: 0.00154842; = 12.01*p2200/(2*14.0067)
- p2926: 0; = p2340*(p1079+p1081)
- p4034: 3.22624e-8; = p1891*p3478
- p0020: 997.38
- p3392: 0; = p3373*p1234
- p0905: 0.0341917; = p0904/p0818
- p0838: 6.49756e9; = (p0833-p0836)*p0837
- p3162: 0; = p2381*p1082
- p2732: 0; = p2341*(p1078+p1080)
- p1009: 0; = p1005*p0001*p0004/(p0818*p0002)
- p2298: 0; = p2227*p2205
- p2816: 0; = p2425*(p1078+p1080)
- p0930: 109019; = p0801*p0924
- p0786: 0
- p1125: 0.73078; = if(p1121=0;p0719/100;0)
- p0968: 0
- p1237: 0; = if(p1232>0;0;p0729/100)
- p2474: 0; = p2278*p1014
- p1607: 0
- p1252: 0; = if(p1232>0;0;p0724*2000*p0723*1000*p0725/100)
- p2127: 0.000137679; = p2015*p2055*p2089/(p0818*1000)
- p4129: 6.24738e-7; = p1780*p3479
- p2477: 0; = p2281*p1014
- p4967: 0; = p1794*p3483
- p2183: 0.001777; = p1064-p2182
- p2686: 0; = p2295*(p1019+p1021)
- p3482: 0; = if(p1328+p1330+p1332+p1334+p1336+p1338+p1340+p1342+p1344=0;0;p1340/(p1328+p1330+p1332+p1334+p1336+p1338+p1340+p1342+p1344))
- p1967: 0; = if(p0807=480;p0802*p0810;0)
- p0847: 0
- p0375: 0.5
- p2240: 0.000467276; = p2222*p2185
- p0764: 99.997; = p0104*(1+p0632*p0236/100)
- p1208: 0; = p1205*p0818*p0822/p0801
- p1242: 0; = if(p1232>0;0;p1234*(p0725/100)*p0723*1000)
- p1194: 1.48
- p0897: 0
- p1082: 0.3087; = IF(p1071=0;IF(p1073+p1078+p1079+p1080+p1081=1;0;1-(p1073+p1078+p1079+p1080+p1081));0)
- p1078: 0; = IF(p1071=0;IF(p1073=1;0;IF(p1073+p1074>1;1-p1073;p1074));0)
- p2287: 0; = p2223*p2193
- p0710: 25.016; = p0050*(1+p0578*p0182/100)
- p2660: 0; = p2269*(p1078+p1080)
- p1950: 3.03951e-7; = p1542*1000/p0818
- p3456: 0; = p3380*p1240
- p2111: 0.856281
- p1692: 0
- p1759: 0
- p1173: 0.5
- p2363: 1.69265e-5; = p2225*p2191
- p1552: 0
- p0252: 30.094
- p2794: 0; = p2403*(p1019+p1021)
- p2925: 0; = p2339*(p1079+p1081)
- p0864: 0; = IF(p0858=1;0;IF(p0858+p0859>1;1-p0858;p0859))
- p2964: 0; = p2378*(p1079+p1081)
- p1206: 0.023475
- p2990: 0; = p2404*(p1020+p1022)
- p2902: 1.74105e-5; = p2316*(p1020+p1022)
- p2959: 3.97676e-6; = p2373*(p1020+p1022)
- p0240: 15.068
- p2138: 4.75041e-6; = p2015*p2066*p2100/(p0818*1000)
- p3189: 0; = p2408*p1023
- p1850: 0
- p3305: 0; = if(and(p1232=0;p3252<>0);1-(p3301+p3302+p3303+p3304);0)
- p0807: 60
- p0812: 0; = if(p0807=480;0.095/0.34;0)
- p1612: 0
- p2650: 0; = p2259*(p1078+p1080)
- p1739: 0.583082
- p0352: 0.5
- p2000: 4000
- p3045: 3.05711e-6; = p2264*p1082
- p1977: 715.666; = p1252+p1188
- p0750: 0
- p2733: 0; = p2342*(p1078+p1080)
- p2206: 0.00010318; = 9*1.00794*p2204/30.973762
- p2609: 0; = p2413*p1014
- p1894: 0
- p3222: 0.224242; = IF(p3216=0;0;p1223*40.078/100.0869)
- p1892: 0
- p3372: 0; = if(p1232=0;p3245*p3360/p0818;0)
- p3460: 0; = p3365*p1241
- p3257: 0
- p0851: 0
- p0632: 0; = IF(p0368<0.5;-SQRT(p0007*EXP(p0500^2*p0008)-p0007);SQRT(p0007*EXP(p0500^2*p0008)-p0007))
- p0546: 0; = IF(p0282<0.5;-SQRT(p0007*EXP(p0414^2*p0008)-p0007);SQRT(p0007*EXP(p0414^2*p0008)-p0007))
- p2153: 1.0009e-7; = p2015*p2081*p2115/(p0818*1000)
- p2506: 0; = p2310*p1073
- p0320: 0.5
- p3209: 0; = p2428*p1132
- p2030: 6.61
- p2748: 6.08068e-6; = p2357*(p1019+p1021)
- p2089: 0.40001
- p0243: 40.879
- p2662: 0; = p2271*(p1078+p1080)
- p2424: 0; = p2235*p2214
- p2488: 0; = p2292*p1014
- p2631: 3.68073e-5; = p2240*(p1019+p1021)
- p3373: 0; = if(p1232=0;p3245*p3361/p0818;0)
- p3294: 0
- p2297: 0; = p2227*p2204
- p1346: 544
- p1183: 0.000216944; = p0801*p0001/(p0818*p0002)
- p2235: 0; = 1-(p2226+p2227+p2228+p2229)
- p1203: 3
- p1345: 1.20847e-5; = IF(p1318=0;p1344*p0001/(p0818*p0002);0)
- p3525: 0; = p1794*p3476
- p1326: 0; = IF(((p0745*1000*p0753/100)+(p0754*1000*p0762/100))/p0801<0;0;((p0745*1000*p0753/100)+(p0754*1000*p0762/100))/p0801)
- p0787: 47.713; = p0127*(1+p0655*p0259/100)
- p1802: 0
- p0771: 17.133; = p0111*(1+p0639*p0243/100)
- p3347: 0; = if(and(p1232=0;p3256<>0);p3275*p3289;0)
- p4309: 0; = p1754*p3480
- p0889: 0; = 1000*p0888*p0001*p0003*p0004/(p0818*p0002)
- p3309: 0; = if(and(p1232=0;p3252<>0);p3252*(p3260-p3304)/p3305;0)
- p2210: 2.51097e-5; = 6*1.00794*p2208/30.973762
- p0975: 0; = p0973*p0974/p0818
- p2454: 9.60532e-5; = p2258*p1073
- p0687: 13.402; = p0027*(1+p0555*p0159/100)
- p2859: 0.000426324; = p2273*(p1129+p1131)
- p0310: 0.5
- p4953: 0; = p1780*p3483
- p1180: 4.89573e-8; = p1176*p1179/p0818
- p2983: 0; = p2397*(p1020+p1022)
- p1156: 0.048205; = p1064+p1065+p1066+p1067+p1068+p1069+p1070+p1116+p1117+p1118+p1119+p1120+p1154+p1155
- p1158: 0.0119717; = p1156*p1157
- p2868: 0; = p2282*(p1020+p1022)
- p3449: 0; = p3373*p1240
- p0801: 2.4e6
- p0152: 0
- p1324: 0.714788; = IF(((p0745*1000*p0751/100)+(p0754*1000*p0760/100))/p0801<0;0;((p0745*1000*p0751/100)+(p0754*1000*p0760/100))/p0801)
- p2429: 0; = p2236*p2219
- p0105: 64.322
- p1290: 0; = IF(p1287=p1264;0;IF(p1287+p1288>p1264;p1264-p1287;p1288))
- p0775: 0
- p2909: 5.01347e-6; = p2323*(p1020+p1022)
- p1044: 0.0086688; = IF(p1012=0;IF(p1037=1;0;IF(p1037+p1038>1;1-p1037;p1038));0)
- p1866: 0
- p2296: 0; = p2223*p2203
- p2709: 3.3386e-6; = p2318*(p1019+p1021)
- p1279: 0
- p1603: 0
- p0752: 0
- p1933: 0
- p1881: 0
- p3061: 0; = p2280*p1023
- p1193: 0; = IF(OR(p1036=0;p1095=0);0.0001*p0857;0)
- p3467: 0; = p3372*p1241
- p0709: 13.566; = p0049*(1+p0577*p0181/100)
- p2750: 2.12583e-6; = p2359*(p1019+p1021)
- p2813: 0; = p2422*(p1078+p1080)
- p0049: 13.566
- p2007: 0.0176308; = ((p1981*p1985+p1987*p1991+p1993*p1997+p2001*p2005)/p0818)*p0005*p0002/1000
- p0510: 0; = SQRT(2)*(IF((2*p0378-1)<0;-1;IF((2*p0378-1)>0;1;0))*SQRT(SQRT((2/(pi()*0.140012289)+LN(1-(2*p0378-1)^2)/2)^2-LN(1-(2*p0378-1)^2)/0.140012289)-(2/(pi()*0.140012289)+LN(1-(2*p0378-1)^2)/2)))
- p5191: 5.72401e-8; = p1812*p3484
- p2140: 8.71392e-6; = p2015*p2068*p2102/(p0818*1000)
- p2511: 0.000411218; = p2315*p1014
- p3367: 0; = if(p1232=0;p3244*p3361/p0818;0)
- p2409: 0; = p2234*p2199
- p0608: 0; = IF(p0344<0.5;-SQRT(p0007*EXP(p0476^2*p0008)-p0007);SQRT(p0007*EXP(p0476^2*p0008)-p0007))
- p1832: 0
- p2193: 0.00589401; = p1054/p0818
- p3214: 0.376406; = p1222*40.078/100.0869
- p3060: 0; = p2279*p1023
- p2580: 0; = p2384*p1073
- p0747: 32.451; = p0087*(1+p0615*p0219/100)
- p2589: 0; = p2393*p1014
- p4917: 0; = p1950*p3482
- p2069: 0.190588
- p0269: 11.958
- p3183: 0; = p2402*p1023
- p2937: 0; = p2351*(p1129+p1131)
- p1973: 0; = if(p0807=480;p1968*p0001/(p0818*p0002);0)
- p1696: 0
- p2565: 1.5519e-6; = p2369*p1014
- p1535: 6
- p0946: 9.01563e-5; = if(and(p0683=0;or(p0807=480;p0807=32;p0807=1;and(p0807=60;p0901<0.03)));p0934;0)
- p2797: 0; = p2406*(p1019+p1021)
- p2466: 2.16378e-6; = p2270*p1073
- p0921: 0.461246; = p0679*1000/p0801
- p2491: 0; = p2295*p1014
- p1959: 1225.32; = if(p0738*p0740*p0739>0;p0738*1000*(p0740/100)*p0739/1000;p1958)
- p1118: 7.90642e-5; = IF(p1071=0;p1108/(p1113*p0818);0)
- p2963: 0; = p2377*(p1079+p1081)
- p1695: 0
- p1714: 0
- p1074: 0; = IF(p1071=0;p0712/100;0)
- p0785: 0
- p2467: 1.93928e-5; = p2271*p1073
- p1176: 966.417; = p1175*p0801
- p0767: 34.63; = p0107*(1+p0635*p0239/100)
- p0291: 0.5
- p1616: 0
- p0221: 54.56
- p1215: 0.0739645; = IF(p1214=0;0;(p1214-1.5)/(p1214-1)^2)
- p4161: 7.64985e-8; = p1812*p3479
- p1801: 0
- p1165: 0.000216944; = p0801*p0001/(p0818*p0002)
- p2684: 0; = p2293*(p1019+p1021)
- p1274: 0; = p1270*p1252/p0818
- p2351: 0; = p2232*p2219
- p3206: 0; = p2425*p1082
- p0823: 0
- p4505: 0; = p1950*p3480
- p2070: 0.282
- p2538: 1.05123e-5; = p2342*p1073
- p1124: 0; = if(p1121=0;p0718/100;0)
- p2633: 1.2868e-5; = p2242*(p1019+p1021)
- p3365: 0; = if(p1232=0;p3244*p3359/p0818;0)
- p1179: 0.5
- p2700: 0; = p2309*(p1078+p1080)
- p1787: 0
- p3217: 0.00150286; = p3213*p1228
- p1249: 0; = if(p1232>0;0;p1244*p0001/(p0818*p0002))
- p0892: 0; = if(p0891=0;0;(1-p1240)*p3251/p0891)
- p0571: 0; = IF(p0307<0.5;-SQRT(p0007*EXP(p0439^2*p0008)-p0007);SQRT(p0007*EXP(p0439^2*p0008)-p0007))
- p2719: 7.1051e-5; = p2328*(p1019+p1021)
- p2555: 1.89819e-5; = p2359*p1014
- p0440: 0; = SQRT(2)*(IF((2*p0308-1)<0;-1;IF((2*p0308-1)>0;1;0))*SQRT(SQRT((2/(pi()*0.140012289)+LN(1-(2*p0308-1)^2)/2)^2-LN(1-(2*p0308-1)^2)/0.140012289)-(2/(pi()*0.140012289)+LN(1-(2*p0308-1)^2)/2)))
- p2146: 1.27129e-6; = p2015*p2074*p2108/(p0818*1000)
- p0950: 0; = if(and(p0683=0;or(p0807=480;p0807=32;p0807=1;and(p0807=60;p0901<0.03)));p0938;0)
- p1756: 0
- p2437: 0.000798347; = p2241*p1014
- p2625: 0; = p2429*p1123
- p2706: 4.60534e-5; = p2315*(p1019+p1021)
- p2057: 3.28794
- p3088: 0; = p2307*p1082
- p1175: 0.000402674
- p0906: 0.00392517
- p5133: 1.29744e-6; = p1754*p3484
- p2203: 0.00255483; = p1070-p2200-p2201-p2202
- p0387: 0.5
- p2810: 0; = p2419*(p1078+p1080)
- p3220: 0.000799376; = p3216*p1228
- p1611: 0
- p2769: 0; = p2378*(p1078+p1080)
- p3621: 0; = p1890*p3476
- p2534: 4.31967e-5; = p2338*p1073
- p1708: 0
- p3168: 0; = p2387*p1082
- p3128: 2.89726e-5; = p2347*p1082
- p2917: 3.61329e-7; = p2331*(p1020+p1022)
- p1195: 0.45
- p2097: 0.40001
- p2737: 0; = p2346*(p1078+p1080)
- p1220: 0; = IF(p1218<0.5;-SQRT(p1214*EXP(p1219^2*p1215)-p1214);SQRT(p1214*EXP(p1219^2*p1215)-p1214))
- p2759: 1.0589e-7; = p2368*(p1019+p1021)
- p2881: 0; = p2295*(p1020+p1022)
- p2922: 0; = p2336*(p1079+p1081)
- p3343: 0; = if(and(p1232=0;p3254<>0);IF((p3339+p3340+p3341+p3342)+(p3254*(p3269*(1-p3277))/p3338)>p3254;p3254-(p3339+p3340+p3341+p3342);p3254*(p3269*(1-p3277))/p3338);0)
- p2900: 0; = p2314*(p1129+p1131)
- p2807: 0; = p2416*(p1078+p1080)
- p2345: 7.27492e-6; = p2228*p2213
- p2619: 0; = p2423*p1073
- p2323: 3.69562e-5; = p2224*p2190
- p0927: 0.0193525; = IF(p0918+p0923+p0924+p0925+p0926=1;0;1-(p0918+p0923+p0924+p0925+p0926))
- p1080: 0; = IF(p1071=0;IF(p1073+p1078+p1079=1;0;IF(p1073+p1078+p1079+p1076>1;1-(p1073+p1078+p1079);p1076));0)
- p2920: 2.18344e-6; = p2334*(p1020+p1022)
- p2562: 0.000116893; = p2366*p1014
- p1740: 0
- p3081: 0; = p2300*p1082
- p2752: 4.63201e-6; = p2361*(p1019+p1021)
- p2605: 0; = p2409*p1014
- p0898: 0.45865
- p2254: 0.00287576; = p2222*p2200
- p2641: 0.00078332; = p2250*(p1019+p1021)
- p2675: 0; = p2284*(p1019+p1021)
- p0957: 0; = if(and(p0683>0;or(p0807=56;p0807=100;and(p0807=60;p0901>0.06)));p0939;0)
- p2591: 0; = p2395*p1014
- p1641: 0
- p3069: 0; = p2288*p1023
- p0085: 5679.31
- p2691: 0; = p2300*(p1078+p1080)
- p2315: 0.000584656; = p2224*p2182
- p1911: 0
- p2048: 6.15204e-13; = p2015*p2046/(p0818*1000000000000)
- p3322: 0; = if(and(p1232=0;p3253<>0);p3253-(p3317+p3318+p3319+p3320+p3321);0)
- p3041: 1.25622e-5; = p2260*p1082
- p1102: 0.0149443; = IF(p1071=0;IF(p1096+p1101=1;0;IF(p1096+p1101+p1098>1;1-(p1096+p1101);p1098));0)
- p2648: 0.000160238; = p2257*(p1019+p1021)
- p1953: 0
- p3511: 0; = p1780*p3476
- p1338: 1.71549e6; = p1324*p0801
- p1163: 0.00483226
- p2023: 2.12
- p2778: 0; = p2387*(p1078+p1080)
- p3828: 3.28784e-8; = p1891*p3477
- p2689: 0; = p2298*(p1078+p1080)
- p4779: 0; = p1812*p3482
- p1052: 1.407e7; = IF(p1012=0;p1045*p1036;0)
- p1672: 0
- p0680: 997.38; = p0020*(1+p0548*p0152/100)
- p3331: 0; = if(and(p1232=0;p3255<>0);p3255*(p3268-p3326)/p3327;0)
- p0681: 0
- p0579: 0; = IF(p0315<0.5;-SQRT(p0007*EXP(p0447^2*p0008)-p0007);SQRT(p0007*EXP(p0447^2*p0008)-p0007))
- p2256: 0.000177443; = p2222*p2202
- p0127: 47.713
- p3318: 0; = if(and(p1232=0;p3253<>0);p3253*(p3262-p3313)/p3316;0)
- p0006: 15
- p2079: 0.02
- p3053: 0.000111451; = p2272*p1132
- p1318: 0; = p1317*p0001/(p0818*p0002)
- p0792: 0
- p3170: 0; = p2389*p1132
- p1773: 0
- p2712: 1.49314e-5; = p2321*(p1019+p1021)
- p3004: 0; = p2418*(p1079+p1081)
- p2404: 0; = p2234*p2193
- p1752: 0
- p0140: 9.425
- p2948: 9.13116e-6; = p2362*(p1020+p1022)
- p1767: 0
- p3293: 0
- p3464: 0; = p3369*p1241
- p1400: 19
- p1302: 0; = IF(p1297+p1300+p1301=p1262;0;p1262-(p1297+p1300+p1301))
- p1551: 0
- p0518: 0; = SQRT(2)*(IF((2*p0386-1)<0;-1;IF((2*p0386-1)>0;1;0))*SQRT(SQRT((2/(pi()*0.140012289)+LN(1-(2*p0386-1)^2)/2)^2-LN(1-(2*p0386-1)^2)/0.140012289)-(2/(pi()*0.140012289)+LN(1-(2*p0386-1)^2)/2)))
- p2642: 6.40966e-7; = p2251*(p1019+p1021)
- p1119: 0.0016308; = IF(p1071=0;p1109/(p1114*p0818);0)
- p2166: 0.526271; = p2165*p0824
- p0349: 0.5
- p3485: 0; = p1754*p3476
- p3451: 0; = p3375*p1240
- p3010: 0; = p2424*(p1079+p1081)
- p1007: 0; = p1003*p0001*p0004/(p0818*p0002)
- p1223: 0.56
- p2835: 0.000136475; = p2249*(p1020+p1022)
- p3340: 0; = if(and(p1232=0;p3254<>0);p3254*(p3270-p3335)/p3338;0)
- p1654: 0
- p1053: 4.4123e6; = IF(p1012=0;p1046*p1036;0)
- p3201: 0; = p2420*p1082
- p1315: 0; = p1311*p1252/p0818
- p2180: 4.37912e-8; = p3233*p1188/(p0818)
- p1291: 0; = IF(p1287+p1290=p1264;0;IF(p1287+p1290+p1289>p1264;p1264-(p1287+p1290);p1289))
- p0719: 73.078; = p0059*(1+p0587*p0191/100)
- p2874: 0; = p2288*(p1020+p1022)
- p4367: 0; = p1812*p3480
- p2262: 5.07204e-5; = p2226*p2208
- p3851: 6.90447e-7; = p1914*p3477
- p1188: 715.666; = p1187*p0801
- p1873: 2.87741e-5; = p1465*1000/p0818
- p1204: 0.980791
- p2913: 1.23789e-5; = p2327*(p1020+p1022)
- p0896: 0.458
- p0694: 0
- p2071: 0.151
- p3951: 6.12986e-7; = p1808*p3478
- p2407: 0; = p2234*p2197
- p3062: 0; = p2281*p1023
- p1235: 0; = if(p1232>0;0;p0727/100)
- p0613: 0; = IF(p0349<0.5;-SQRT(p0007*EXP(p0481^2*p0008)-p0007);SQRT(p0007*EXP(p0481^2*p0008)-p0007))
- p2444: 0.00330084; = p2248*p1014
- p0499: 0; = SQRT(2)*(IF((2*p0367-1)<0;-1;IF((2*p0367-1)>0;1;0))*SQRT(SQRT((2/(pi()*0.140012289)+LN(1-(2*p0367-1)^2)/2)^2-LN(1-(2*p0367-1)^2)/0.140012289)-(2/(pi()*0.140012289)+LN(1-(2*p0367-1)^2)/2)))
- p3197: 0; = p2416*p1082
- p4445: 0; = p1890*p3480
- p3827: 1.41377e-6; = p1890*p3477
- p2828: 2.21616e-5; = p2242*(p1020+p1022)
- p0039: 13.402
- p0880: 0; = p0868*p0856
- p2095: 0.765734
- p2053: 1.45647
- p1966: 2.35e6; = if(p0814=0;p0802;0)
- p2891: 0; = p2305*(p1079+p1081)
- p1271: 0; = IF(p1267+p1270=p1259;0;IF(p1267+p1270+p1269>p1259;p1259-(p1267+p1270);p1269))
- p1169: 0.000361047
- p3378: 0; = if(p1232=0;p3246*p3360/p0818;0)
- p0870: 0; = p0858*p0856
- p5132: 0; = p1963*p3483
- p0631: 0; = IF(p0367<0.5;-SQRT(p0007*EXP(p0499^2*p0008)-p0007);SQRT(p0007*EXP(p0499^2*p0008)-p0007))
- p3110: 6.06851e-8; = p2329*p1023
- p1601: 0
- p3246: 1; = IF(p3244+p3245=1;0;1-(p3244+p3245))
- p2682: 0; = p2291*(p1019+p1021)
- p0876: 0; = p0866*p0856
- p2037: 1.99
- p3067: 0; = p2286*p1023
- p1974: 0; = p1969*p0001/(p0818*p0002)
- p0783: 34.295; = p0123*(1+p0651*p0255/100)
- p1964: 0.5
- p3139: 1.54176e-5; = p2358*p1023
- p1241: 0; = if(p1232>0;0;IF(p1234+p1238+p1239+p1240=1;0;1-(p1234+p1238+p1239+p1240)))
- p2367: 0.00164285; = p2225*p2196
- p3749: 7.89082e-7; = p1812*p3477
- p2218: 0.000413978; = p1150/p0818
- p2518: 2.27087e-5; = p2322*p1014
- p1725: 0
- p2547: 0; = p2351*p1123
- p3689: 0; = p1962*p3476
- p2463: 3.27521e-6; = p2267*p1073
- p1265: 0; = if(p1232>0;0;IF(p1259+p1263+p1264=1;0;IF(p1259+p1263+p1264+p1262>1;1-(p1259+p1263+p1264);p1262)))
- p2119: 0.679049
- p1640: 0
- p2494: 0; = p2298*p1073
- p0672: 0
- p0925: 0.461246; = IF(p0918+p0923+p0924=1;0;IF(p0918+p0923+p0924+p0921>1;1-(p0918+p0923+p0924);p0921))
- p1834: 0
- p1963f: 4.15873e-6; = p1647*p1851+p1648*p1852+p1649*p1853+p1650*p1854+p1651*p1855+p1652*p1856+p1653*p1857+p1654*p1858+p1655*p1859+p1656*p1860+p1657*p1861+p1658*p1862+p1659*p1863+p1660*p1864+p1661*p1865+p1662*p1866+p1663*p1867+p1664*p1868+p1665*p1869+p1666*p1870
- p2623: 0; = p2427*p1073
- p1809: 0
- p2236: 0; = 1-(p2230+p2231+p2232+p2233)
- p1079: 0; = IF(p1071=0;IF(p1073+p1078=1;0;IF(p1073+p1078+p1075>1;1-(p1073+p1078);p1075));0)
- p1981: 400
- p1963i: 1.61095e-6; = p1706*p1910+p1707*p1911+p1708*p1912+p1709*p1913+p1710*p1914+p1711*p1915+p1712*p1916+p1713*p1917+p1714*p1918+p1715*p1919+p1716*p1920+p1717*p1921+p1718*p1922+p1719*p1923+p1720*p1924+p1721*p1925+p1722*p1926+p1723*p1927+p1724*p1928
- p2062: 3.76588
- p3430: 0; = p3373*p1239
- p1298: 0
- p0533: 0; = SQRT(2)*(IF((2*p0401-1)<0;-1;IF((2*p0401-1)>0;1;0))*SQRT(SQRT((2/(pi()*0.140012289)+LN(1-(2*p0401-1)^2)/2)^2-LN(1-(2*p0401-1)^2)/0.140012289)-(2/(pi()*0.140012289)+LN(1-(2*p0401-1)^2)/2)))
- p3339: 0; = if(and(p1232=0;p3254<>0);p3254*(p3269*p3277-p3334)/p3338;0)
- p3103: 2.6546e-6; = p2322*p1023
- p4985: 0; = p1812*p3483
- p2381: 0; = p2229*p2210
- p4299: 9.56231e-9; = p1950*p3479
- p2487: 0; = p2291*p1014
- p0828: 0; = if(p0827=0;0;p0819-p0827/p0818)
- p1114: 0.216028
- p2104: 0.817136
- p0872: 0; = p0864*p0856
- p2870: 0; = p2284*(p1020+p1022)
- p0695: 0
- p1609: 0
- p0967: 0
- p0796: 99.997; = p0136*(1+p0664*p0268/100)
- p0751: 30.206; = p0091*(1+p0619*p0223/100)
- p3251: 0; = p1252-(p3252+p3253+p3254+p3255+p3256)
- p3397: 0; = p3378*p1234
- p0738: 2353.55; = p0078*(1+p0606*p0210/100)
- p3298: 0; = if(p1283+p1284+p1285+p1286=0;0;p1283/(p1283+p1284+p1285+p1286))
- p0081: 0.533
- p2212: 1.14879e-6; = p1106/p0818
- p1267: 0
- p3446: 0; = p3370*p1240
- p4840: 0; = p1873*p3482
- p1321: 0.753525; = IF(((p0745*1000*p0748/100)+(p0754*1000*p0757/100))/p0801<0;0;((p0745*1000*p0748/100)+(p0754*1000*p0757/100))/p0801)
- p0478: 0; = SQRT(2)*(IF((2*p0346-1)<0;-1;IF((2*p0346-1)>0;1;0))*SQRT(SQRT((2/(pi()*0.140012289)+LN(1-(2*p0346-1)^2)/2)^2-LN(1-(2*p0346-1)^2)/0.140012289)-(2/(pi()*0.140012289)+LN(1-(2*p0346-1)^2)/2)))
- p0476: 0; = SQRT(2)*(IF((2*p0344-1)<0;-1;IF((2*p0344-1)>0;1;0))*SQRT(SQRT((2/(pi()*0.140012289)+LN(1-(2*p0344-1)^2)/2)^2-LN(1-(2*p0344-1)^2)/0.140012289)-(2/(pi()*0.140012289)+LN(1-(2*p0344-1)^2)/2)))
- p3622: 0; = p1891*p3476
- p0879: 0; = p0878*p0001*p0003/(p0818*p0002)
- p1598: 0
- p1871: 0
- p2150: 6.16342e-6; = p2015*p2078*p2112/(p0818*1000)
- p2471: 0; = p2275*p1123
- p2895: 0; = p2309*(p1079+p1081)
- p3302: 0; = if(and(p1232=0;p3252<>0);p3258*(p3278*(p3282*p1256+p3286*(p1253+p1257)+p1258*p3288+p3297*p3287));0)
- p0974: 0
- p2196: 0.0124892; = p1068-p2193-p2195
- p1926: 0
- p1675: 0
- p1943: 6.07903e-7; = p1535*1000/p0818
- p3254: 0; = p1252*(p1287*(1-p3247)+p1290*(1-p3248)+p1291*(1-p3249)+p1292*(1-p3250))
- p1029: 193494; = IF(p1012=0;IF(p0801<p1023*(p0704/100)*p0703*1000;p0801;p1023*(p0704/100)*p0703*1000);0)
- p3156: 0; = p2375*p1082
- p2017: 2.78495e8; = p2015*p0898
- p0795: 82.429; = p0135*(1+p0663*p0267/100)
- p2758: 0.000129407; = p2367*(p1019+p1021)
- p1232: 2.4e6; = p0801
- p0895: 2.62405e9; = p0894*p0830
- p0183: 24.816
- p1057: 0.82
- p2084: 0.21
- p3028: 6.81738e-5; = p2247*p1023
- p1766: 0
- p2436: 0.000328658; = p2240*p1014
- p3111: 9.9605e-8; = p2330*p1023
- p1202: 0.7
- p1139: 0; = if(p1121=0;p1133*p0001/(p0818*p0002);0)
- p0111: 17.133
- p1963b: 9.37126e-6; = p1569*p1773+p1570*p1774+p1571*p1775+p1572*p1776+p1573*p1777+p1574*p1778+p1575*p1779+p1576*p1780+p1577*p1781+p1578*p1782+p1579*p1783+p1580*p1784+p1581*p1785+p1582*p1786+p1583*p1787+p1584*p1788+p1585*p1789+p1586*p1790+p1587*p1791
- p2846: 0; = p2260*(p1079+p1081)
- p1733: 0
- p1914: 2.12766e-6; = p1506*1000/p0818
- p1889: 0
- p2108: 0.826583
- p2575: 0; = p2379*p1073
- p2852: 0; = p2266*(p1079+p1081)
- p3389: 0; = p3370*p1234
- p3362: 0; = if(p1232=0;p3244*p3356/p0818;0)
- p2449: 2.06534e-5; = p2253*p1014
- p3462: 0; = p3367*p1241
- p2004: 30
- p3405: 0; = p3367*p1238
- p2904: 5.74984e-6; = p2318*(p1020+p1022)
- p2373: 2.93142e-5; = p2225*p2202
- p2901: 7.93145e-5; = p2315*(p1020+p1022)
- p1006: 0; = p1002*p0001*p0004/(p0818*p0002)
- p1798: 0
- p1931: 0
- p0970: 0; = p0967/p0818
- p3444: 0; = p3368*p1240
- p1907: 0
- p2374: 0.000336064; = p2225*p2203
- p2131: 1.60812e-5; = p2015*p2059*p2093/(p0818*1000)
- p3253: 0; = p1252*(p1277*(1-p3247)+p1280*(1-p3248)+p1281*(1-p3249)+p1282*(1-p3250))
- p1062: 0.16
- p1955: 0
- p2883: 0; = p2297*(p1079+p1081)
- p2785: 0; = p2394*(p1019+p1021)
- p3090: 0; = p2309*p1082
- p2438: 0.0001149; = p2242*p1014
- p0246: 32.161
- p1106: 11338.5; = IF(p1071=0;p1105*p1096*p1095;0)
- p3404: 0; = p3366*p1238
- p1217: 31.7856
- p1628: 0
- p1620: 0
- p1876: 0
- p3175: 0; = p2394*p1023
- p1592: 0
- p1625: 0
- p1239: 0; = if(p1232>0;0;IF(p1234+p1238=1;0;IF(p1234+p1238+p1236>1;1-(p1234+p1238);p1236)))
- p3455: 0; = p3379*p1240
- p5131: 0; = p1962*p3483
- p4263: 6.69362e-8; = p1914*p3479
- p0707: 0
- p3274: 0
- p3149: 1.10527e-7; = p2368*p1023
- p1404: 24
- p2061: 0.518824
- p3247: 0
- p0763: 2353.44; = p0103*(1+p0631*p0235/100)
- p3064: 0; = p2283*p1023
- p0107: 34.63
- p3425: 0; = p3368*p1239
- p2736: 0; = p2345*(p1078+p1080)
- p0702: 2353.44; = p0042*(1+p0570*p0174/100)
- p1150: 4.08596e6; = if(p1121=0;p1149*p1146*p1145;0)
- p2338: 6.24862e-5; = p2228*p2206
- p2654: 0; = p2263*(p1078+p1080)
- p2093: 0.260958
- p2490: 0; = p2294*p1014
- p1706: 0
- p1896: 0
- p0700: 0
- p0928: 997380; = p0801*p0918
- p1244: 0; = if(p1232>0;0;p1239*(p0725/100)*p0723*1000)
- p0966: 0; = if(p0683=0;0;IF(p0684/100+p0965=1;0;1-(p0684/100+p0965)))
- p2960: 4.55904e-5; = p2374*(p1020+p1022)
- p3351: 0; = if(and(p1232=0;p3256<>0);p3256*(p3274-p3346)/p3349;0)
- p0853: 0; = p0803/(p0802+p0803)
- p2130: 4.17357e-5; = p2015*p2058*p2092/(p0818*1000)
- p1644: 0
- p3152: 3.90615e-5; = p2371*p1023
- p2508: 0; = p2312*p1123
- p1920: 0
- p0635: 0; = IF(p0371<0.5;-SQRT(p0007*EXP(p0503^2*p0008)-p0007);SQRT(p0007*EXP(p0503^2*p0008)-p0007))
- p0248: 8.259
- p3419: 0; = p3362*p1239
- p3429: 0; = p3372*p1239
- p2931: 0; = p2345*(p1079+p1081)
- p3032: 6.69039e-7; = p2251*p1023
- p1732: 0
- p1899: 0
- p2853: 0; = p2267*(p1079+p1081)
- p0577: 0; = IF(p0313<0.5;-SQRT(p0007*EXP(p0445^2*p0008)-p0007);SQRT(p0007*EXP(p0445^2*p0008)-p0007))
- p1151: 310112; = if(p1121=0;p1149*p1148*p1145;0)
- p1141: 1.46523e-5; = if(p1121=0;p1135*p0001/(p0818*p0002);0)
- p1602: 0
- p3324: 0; = if(and(p1232=0;p3255<>0);p3266*(p3279*(p3284*p1256+p3286*(p1253+p1257)+p1258*p3288+p3299*p3287));0)
- p2993: 0; = p2407*(p1020+p1022)
- p2178: 0.042205; = (p0895*p0831/(1-p0831))/(p0818)
- p0991: 0; = p0987*p0886
- p1482: 43
- p3263: 0
- p2903: 1.66931e-6; = p2317*(p1020+p1022)
- p0303: 0.5
- p1971: 0.000212424; = p1966*p0001/(p0818*p0002)
- p2566: 3.41201e-6; = p2370*p1014
- p3097: 1.05521e-5; = p2316*p1023
- p2669: 0; = p2278*(p1019+p1021)
- p2843: 0.000275966; = p2257*(p1020+p1022)
- p1806: 0
- p1314: 0; = p1310*p1252/p0818
- p1786: 0
- p0665: 0; = IF(p0401<0.5;-SQRT(p0007*EXP(p0533^2*p0008)-p0007);SQRT(p0007*EXP(p0533^2*p0008)-p0007))
- p2571: 0; = p2375*p1073
- p2745: 8.38782e-5; = p2354*(p1019+p1021)
- p2760: 1.73801e-7; = p2369*(p1019+p1021)
- p2955: 2.99325e-7; = p2369*(p1020+p1022)
- p1212: 0.0265375; = if(p1211=0;0;if(p1193>0;0;(p1207+p1208+p1209)*p1210/(2000*p1211)))
- p3326: 0; = if(and(p1232=0;p3255<>0);p3268*p3289;0)
- p1888: 0
- p2907: 2.57154e-5; = p2321*(p1020+p1022)
- p2184: 0.000170377; = p1051/p0818
- p1257: 0; = if(p1232>0;0;IF(p1253+p1256=1;0;IF(p1253+p1256+p1255>1;1-(p1253+p1256);p1255)))
- p0402: 0.5
- p0996: 0; = if(p0888=0;0;if((p0691*p0690*1000*p0692/100)/p0888>1;1;(p0691*p0690*1000*p0692/100)/p0888))
- p0280: 0.5
- p1779: 0
- p2334: 1.6095e-5; = p2224*p2202
- p2815: 0; = p2424*(p1078+p1080)
- p1116: 1.31615e-5; = IF(p1071=0;p1106/(p1111*p0818);0)
- p3108: 7.50255e-6; = p2327*p1023
- p0875: 0; = p0874*p0001*p0003/(p0818*p0002)
- p0158: 58.35
- p2396: 0; = p2234*p2185
- p1963e: 0; = p1628*p1832+p1629*p1833+p1630*p1834+p1631*p1835+p1632*p1836+p1633*p1837+p1634*p1838+p1635*p1839+p1636*p1840+p1637*p1841+p1638*p1842+p1639*p1843+p1640*p1844+p1641*p1845+p1642*p1846+p1643*p1847+p1644*p1848+p1645*p1849+p1646*p1850
- p1803: 0
- p3445: 0; = p3369*p1240
- p2199: 3.68789e-5; = p1069-p2197-p2198
- p3352: 0; = if(and(p1232=0;p3256<>0);p3256*(p3275-p3347)/p3349;0)
- p0118: 42.3
- p1610: 0
- p2133: 2.44409e-5; = p2015*p2061*p2095/(p0818*1000)
- p1797: 0
- p1671: 0
- p1762: 0
- p3171: 0; = p2390*p1132
- p1693: 0
- p3481: 0.30206; = if(p1328+p1330+p1332+p1334+p1336+p1338+p1340+p1342+p1344=0;0;p1338/(p1328+p1330+p1332+p1334+p1336+p1338+p1340+p1342+p1344))
- p1093: 0; = IF(p1071=0;p1087*p0001/(p0818*p0002);0)
- p2074: 0.025
- p2646: 9.71161e-5; = p2255*(p1019+p1021)
- p0080: 95.178
- p1101: 0.0773317; = IF(p1071=0;IF(p1096=1;0;IF(p1096+p1097>1;1-p1096;p1097));0)
- p2638: 6.53132e-5; = p2247*(p1019+p1021)
- p0886: 0; = p0686*1000*p0687*p0689/100
- p1289: 0
- p0885: 100; = IF(p0689+p0884=100;0;100-(p0689+p0884))
- p2142: 1.41763e-5; = p2015*p2070*p2104/(p0818*1000)
- p2392: 0; = p2233*p2221
- p3223: 0.126838; = IF(p3216=0;0;(1-p1223)*24.3050/84.3139)
- p3454: 0; = p3378*p1240
- p2077: 0.043
- p3461: 0; = p3366*p1241
- p2872: 0; = p2286*(p1020+p1022)
- p3398: 0; = p3379*p1234
- p3144: 1.3917e-6; = p2363*p1023
- p2861: 3.99e-5; = p2275*(p1129+p1131)
- p2025: 9.76456e-5; = p2015*p2023*p2024/(p0818*1000)
- p2290: 0; = p2223*p2197
- p3049: 4.99996e-6; = p2268*p1082
- p0447: 0; = SQRT(2)*(IF((2*p0315-1)<0;-1;IF((2*p0315-1)>0;1;0))*SQRT(SQRT((2/(pi()*0.140012289)+LN(1-(2*p0315-1)^2)/2)^2-LN(1-(2*p0315-1)^2)/0.140012289)-(2/(pi()*0.140012289)+LN(1-(2*p0315-1)^2)/2)))
- p3089: 0; = p2308*p1082
- p3037: 1.45894e-5; = p2256*p1023
- p0309: 0.5
- p3068: 0; = p2287*p1023
- p0982: 0; = if(p0886=0;0;min(1;(p0691*p0690*1000*p0693/100)/p0886))
- p0439: 0; = SQRT(2)*(IF((2*p0307-1)<0;-1;IF((2*p0307-1)>0;1;0))*SQRT(SQRT((2/(pi()*0.140012289)+LN(1-(2*p0307-1)^2)/2)^2-LN(1-(2*p0307-1)^2)/0.140012289)-(2/(pi()*0.140012289)+LN(1-(2*p0307-1)^2)/2)))
- p0663: 0; = IF(p0399<0.5;-SQRT(p0007*EXP(p0531^2*p0008)-p0007);SQRT(p0007*EXP(p0531^2*p0008)-p0007))
- p4881: 0; = p1914*p3482
- p3196: 0; = p2415*p1082
- p3427: 0; = p3370*p1239
- p2377: 0; = p2229*p2206
- p0114: 18.231
- p1323: 0; = IF(((p0745*1000*p0750/100)+(p0754*1000*p0759/100))/p0801<0;0;((p0745*1000*p0750/100)+(p0754*1000*p0759/100))/p0801)
- p1339: 0.000155069; = p1338*p0001/(p0818*p0002)
- p0867: 0; = IF(p0858+p0864+p0865+p0866=1;0;IF(p0858+p0864+p0865+p0866+p0862>1;1-(p0858+p0864+p0865+p0866);p0862))
- p2590: 0; = p2394*p1014
- p2450: 0.00202267; = p2254*p1014
- p3458: 0; = p3363*p1241
- p1968: 0; = if(p0807=480;p0802*p0811;0)
- p1282: 0; = IF(p1277+p1280+p1281=p1260;0;p1260-(p1277+p1280+p1281))
- p1200: 0.84
- p3275: 0
- p3172: 0; = p2391*p1132
- p0956: 0; = if(and(p0683>0;or(p0807=56;p0807=100;and(p0807=60;p0901>0.06)));p0938;0)
- p3466: 0; = p3371*p1241
- p2420: 0; = p2235*p2210
- p0139: 23.874
- p1597: 0
- p2202: 0.000222852; = 4*1.00794*p2201/(2*14.0067)
- p1330: 1.84299e6; = p1320*p0801
- p5116: 0; = p1943*p3483
- p2276: 0; = p2223*p2182
- p1191: 0.5
- p1707: 0
- p3239: 0.013074; = IF(p3238+p3235+p3236=1;0;1-(p3238+p3235+p3236))
- p3315: 0; = if(and(p1232=0;p3253<>0);p3264*p3289;0)
- p3382: 0; = p3363*p1234
- p1987: 400
- p3368: 0; = if(p1232=0;p3245*p3356/p0818;0)
- p2626: 0; = p2430*p1123
- p0475: 0; = SQRT(2)*(IF((2*p0343-1)<0;-1;IF((2*p0343-1)>0;1;0))*SQRT(SQRT((2/(pi()*0.140012289)+LN(1-(2*p0343-1)^2)/2)^2-LN(1-(2*p0343-1)^2)/0.140012289)-(2/(pi()*0.140012289)+LN(1-(2*p0343-1)^2)/2)))
- p0003: 10000
- p0477: 0; = SQRT(2)*(IF((2*p0345-1)<0;-1;IF((2*p0345-1)>0;1;0))*SQRT(SQRT((2/(pi()*0.140012289)+LN(1-(2*p0345-1)^2)/2)^2-LN(1-(2*p0345-1)^2)/0.140012289)-(2/(pi()*0.140012289)+LN(1-(2*p0345-1)^2)/2)))
- p3259: 0
- p1254: 0; = if(p1232>0;0;p0736/100)
- p3122: 1.08722e-5; = p2341*p1082
- p2032: 0.448886
- p3025: 2.92663e-5; = p2244*p1023
- p1687: 0.556632
- p2707: 1.01093e-5; = p2316*(p1019+p1021)
- p1703: 0
- p2612: 0; = p2416*p1073
- p0772: 25.008; = p0112*(1+p0640*p0244/100)
- p3059: 0; = p2278*p1023
- p0940: 0; = if(and(p0683=0;p0946=0);p0934;0)
- p0008: 0.0739645; = (p0007-1.5)/(p0007-1)^2
- p2834: 0.000636656; = p2248*(p1020+p1022)
- p2911: 1.02029e-5; = p2325*(p1020+p1022)
- p4102: 2.53296e-5; = p1963*p3478
- p3029: 0.000385861; = p2248*p1023
- p1895: 0
- p1694: 0
- p2637: 8.07068e-6; = p2246*(p1019+p1021)
- p2225: 0.131541; = if(p0765*p0769+p0766*p0770+p0767*p0771+p0768*p0772=0;0;p0772*p0768/(p0765*p0769+p0766*p0770+p0767*p0771+p0768*p0772))
- p2314: 0; = p2231*p2221
- p2156: 1.4007e-6; = p2015*p2085*p2118/(p0818*1000)
- p2073: 0.377647
- p2413: 0; = p2234*p2203
- p1902: 0
- p0223: 27.308
- p1877: 0
- p0671: 0
- p0504: 0; = SQRT(2)*(IF((2*p0372-1)<0;-1;IF((2*p0372-1)>0;1;0))*SQRT(SQRT((2/(pi()*0.140012289)+LN(1-(2*p0372-1)^2)/2)^2-LN(1-(2*p0372-1)^2)/0.140012289)-(2/(pi()*0.140012289)+LN(1-(2*p0372-1)^2)/2)))
- p3066: 0; = p2285*p1023
- p1582: 0
- p2744: 0; = p2353*(p1128+p1130)
- p2942: 3.04035e-6; = p2356*(p1020+p1022)
- p1307: 0
- p0516: 0; = SQRT(2)*(IF((2*p0384-1)<0;-1;IF((2*p0384-1)>0;1;0))*SQRT(SQRT((2/(pi()*0.140012289)+LN(1-(2*p0384-1)^2)/2)^2-LN(1-(2*p0384-1)^2)/0.140012289)-(2/(pi()*0.140012289)+LN(1-(2*p0384-1)^2)/2)))
- p0819: 0; = p0808*p0809/p0818
- p3353: 0; = if(and(p1232=0;p3256<>0);p3256*(p3276-p3348)/p3349;0)
- p1112: 0.209482
- p1820: 0
- p0089: 3.146
- p1297: 0
- p3393: 0; = p3374*p1234
- p3184: 0; = p2403*p1023
- p0404: 0.5
- p3283: 0
- p1386: 4
- p1561: 0
- p3208: 0; = p2427*p1082
- p0976: 0; = IF(p0687=0;IF(OR(p0686=0;p0689=0);0;p0686*1000*p0689/100);0)
- p0953: 0; = if(and(p0683>0;or(p0807=56;p0807=100;and(p0807=60;p0901>0.06)));p0935;0)
- p1812: 2.43161e-6; = p1404*1000/p0818
- p3219: 0.00600586; = p3215*p1228
- p3354: 0; = IF((p3350+p3351+p3352+p3353)+IF(p3349=0;0;(p3256*(p3273*(1-p3277))/p3349))>p3256;p3256-(p3350+p3351+p3352+p3353);IF(p3349=0;0;p3256*(p3273*(1-p3277))/p3349))
- p2117: 0.585147
- p2914: 0.000122366; = p2328*(p1020+p1022)
- p3224: 0.501945; = IF(p3216=0;0;1-p3221-p3222-p3223)
- p1893: 0
- p0744: 0
- p2029: 4.03
- p2383: 0; = p2229*p2212
- p1104: 0.242165; = IF(p1071=0;IF(p1096+p1101+p1102+p1103=1;0;1-(p1096+p1101+p1102+p1103));0)
- p1665: 0
- p1793: 0
- p2620: 0; = p2424*p1073
- p1626: 0
- p3281: 0
- p1312: 0; = IF(p1307+p1310+p1311=p1266;0;p1266-(p1307+p1310+p1311))
- p1107: 405335; = IF(p1071=0;p1105*p1101*p1095;0)
- p2799: 0; = p2408*(p1019+p1021)
- p2346: 2.48705e-5; = p2228*p2214
- p0773: 25.016; = p0113*(1+p0641*p0245/100)
- p2935: 0; = p2349*(p1079+p1081)
- p2232: 0; = if(p0783*p0787+p0784*p0788+p0785*p0789+p0786*p0790=0;0;p0789*p0785/(p0783*p0787+p0784*p0788+p0785*p0789+p0786*p0790))
- p3236: 0.0140975
- p1189: 0.000216944; = p0801*p0001/(p0818*p0002)
- p1229: 0.00035129; = IF(p1221=0;0;p1228*p1221)
- p2035: 0.000132539; = p2015*p2029*(1-p2031)/(p0818*1000)
- p3231: 9.79146e-8; = p1176/p0818
- p2301: 0; = p2227*p2208
- p1679: 0
- p3194: 0; = p2413*p1023
- p1831: 0
- p2971: 0; = p2385*(p1079+p1081)
- p1465: 284
- p2741: 0; = p2350*(p1128+p1130)
- p2674: 0; = p2283*(p1019+p1021)
- p1275: 0; = p1271*p1252/p0818
- p0713: 0
- p2876: 0; = p2290*(p1020+p1022)
- p2953: 0.000222868; = p2367*(p1020+p1022)
- p1655: 0
- p1153: 0.365265
- p2521: 5.28984e-5; = p2325*p1014
- p2081: 0.0019
- p0544: 0; = IF(p0280<0.5;-SQRT(p0007*EXP(p0412^2*p0008)-p0007);SQRT(p0007*EXP(p0412^2*p0008)-p0007))
- p2649: 0; = p2258*(p1078+p1080)
- p2318: 4.23842e-5; = p2224*p2185
- p3955: 7.74298e-7; = p1812*p3478
- p1168: 5.87509e-7; = p1164*p1167/p0818
- p1647: 0
- p0863: 0; = p0675*1000/p0856
- p3681: 0; = p1950*p3476
- p2114: 0.832356
- p0934: 9.01563e-5; = p0928*p0001/(p0818*p0002)
- p2124: 0.263965
- p2455: 8.68728e-5; = p2259*p1073
- p3167: 0; = p2386*p1082
- p0637: 0; = IF(p0373<0.5;-SQRT(p0007*EXP(p0505^2*p0008)-p0007);SQRT(p0007*EXP(p0505^2*p0008)-p0007))
- p1070: 0.00793779; = IF(p1012=0;p1056/(p1063*p0818);0)
- p3375: 0; = if(p1232=0;p3246*p3357/p0818;0)
- p0827: 0; = p0818*p0819*p0823
- p3269: 0
- p1343: 0; = p1342*p0001/(p0818*p0002)
- p5064: 0; = p1891*p3483
- p2545: 2.9778e-5; = p2349*p1073
- p0007: 14; = p0006-1
- p3287: 0
- p1919: 0
- p0519: 0; = SQRT(2)*(IF((2*p0387-1)<0;-1;IF((2*p0387-1)>0;1;0))*SQRT(SQRT((2/(pi()*0.140012289)+LN(1-(2*p0387-1)^2)/2)^2-LN(1-(2*p0387-1)^2)/0.140012289)-(2/(pi()*0.140012289)+LN(1-(2*p0387-1)^2)/2)))
- p0313: 0.5
- p2311: 0; = p2231*p2218
- p2132: 1.5458e-5; = p2015*p2060*p2094/(p0818*1000)
- p2683: 0; = p2292*(p1019+p1021)
- p3408: 0; = p3370*p1238
- p0890: 2.55508e6; = p0686*1000*p0687*p0885/100
- p2354: 0.00106485; = p2225*p2182
- p1264: 0; = if(p1232>0;0;IF(p1259+p1263=1;0;IF(p1259+p1263+p1261>1;1-(p1259+p1263);p1261)))
- p0780: 56.065; = p0120*(1+p0648*p0252/100)
- p2031: 0.465411
- p3364: 0; = if(p1232=0;p3244*p3358/p0818;0)
- p2570: 0.000236371; = p2374*p1014
- p2051: 0.00150494; = p2015*p2049*p2050/(p0818*1000)
- p2465: 4.22534e-5; = p2269*p1073
- p3021: 3.84194e-5; = p2240*p1023
- p2337: 0.000192962; = p2228*p2205
- p2375: 0; = p2229*p2204
- p2722: 2.09803e-7; = p2331*(p1019+p1021)
- p3080: 0; = p2299*p1082
- p0961: 0; = if(and(p0683>0;or(p0807=480;p0807=32;p0807=1;and(p0807=60;p0901<0.03)));p0937;0)
- p2905: 1.3967e-5; = p2319*(p1020+p1022)
- p2603: 0; = p2407*p1014
- p2123: 0.263965
- p2243: 0.00208983; = p2222*p2188
- p1916: 0
- p1113: 0.100377
- p0923: 0.0584017; = IF(p0918=1;0;IF(p0918+p0919>1;1-p0918;p0919))
- p2672: 0; = p2281*(p1019+p1021)
- p2779: 0; = p2388*(p1078+p1080)
- p0188: 34.002
- p2823: 0.000874423; = p2237*(p1020+p1022)
- p3923: 6.32343e-6; = p1780*p3478
- p1213: 15
- p2109: 0.826583
- p0400: 0.5
- p1580: 0
- p2126: 4.47239e-5; = p2015*p2054*p2088/(p0818*1000)
- p2595: 0; = p2399*p1014
- p1219: 0; = if(p1218=0;0;SQRT(2)*(IF((2*p1218-1)<0;-1;IF((2*p1218-1)>0;1;0))*SQRT(SQRT((2/(pi()*0.140012289)+LN(1-(2*p1218-1)^2)/2)^2-LN(1-(2*p1218-1)^2)/0.140012289)-(2/(pi()*0.140012289)+LN(1-(2*p1218-1)^2)/2))))
- p1015: 0.07877; = IF(p1012=0;p0706/100;0)
- p1162: 0.000243161; = p1161/p0818
- p3443: 0; = p3367*p1240
- p1781: 0
- p1218: 0.5
- p0855: 1.77505; = p0854*p0001*p0003/(p0818*p0002)
- p1171: 0.000216944; = p0801*p0001/(p0818*p0002)
- p1129: 0.73078; = if(p1121=0;IF(p1123+p1128=1;0;IF(p1123+p1128+p1125>1;1-(p1123+p1128);p1125));0)
- p1963j: 3.54457e-7; = p1725*p1929+p1726*p1930+p1727*p1931+p1728*p1932+p1729*p1933+p1730*p1934+p1731*p1935+p1732*p1936+p1733*p1937+p1734*p1938+p1735*p1939+p1736*p1940+p1737*p1941+p1738*p1942+p1739*p1943+p1740*p1944+p1741*p1945+p1742*p1946+p1743*p1947
- p1564: 0
- p2710: 8.10984e-6; = p2319*(p1019+p1021)
- p3345: 0; = if(and(p1232=0;p3256<>0);p3273*p3277*p3293;0)
- p0050: 25.016
- p1182: 265.812; = p1181*p0801
- p1731: 0
- p2112: 0.856281
- p2753: 5.30194e-6; = p2362*(p1019+p1021)
- p2656: 0; = p2265*(p1078+p1080)
- p2003: 50
- p3115: 1.32333e-6; = p2334*p1023
- p0615: 0; = IF(p0351<0.5;-SQRT(p0007*EXP(p0483^2*p0008)-p0007);SQRT(p0007*EXP(p0483^2*p0008)-p0007))
- p2099: 0.620397
- p0607: 0; = IF(p0343<0.5;-SQRT(p0007*EXP(p0475^2*p0008)-p0007);SQRT(p0007*EXP(p0475^2*p0008)-p0007))
- p2824: 0.000191946; = p2238*(p1020+p1022)
- p2777: 0; = p2386*(p1078+p1080)
- p0740: 95.178; = p0080*(1+p0608*p0212/100)
- p2986: 0; = p2400*(p1020+p1022)
- p0830: 1.14089e10; = p0825*p0821*p0824
- p2563: 0.0011555; = p2367*p1014
- p0987: 1; = if(p0978>0;0;if(and(p0687=0;p0691=0;p0695=0;p0699=0);0;IF(p0982+p0985+p0986=1;0;1-(p0982+p0985+p0986))))
- p1963h: 2.25661e-6; = p1686*p1890+p1687*p1891+p1688*p1892+p1689*p1893+p1690*p1894+p1691*p1895+p1692*p1896+p1693*p1897+p1694*p1898+p1695*p1899+p1696*p1900+p1697*p1901+p1698*p1902+p1699*p1903+p1700*p1904+p1701*p1905+p1702*p1906+p1703*p1907+p1704*p1908+p1705*p1909
- p2091: 0.374844
- p2469: 0; = p2273*p1123
- p0210: 0
- p1105: 0.436421
- p1027: 0; = IF(p1012=0;p1021*(p0704/100)*p0703*1000;0)
- p2923: 0; = p2337*(p1079+p1081)
- p3474: 0; = p3379*p1241
- p2215: 0.000154975; = p1117-p2214
- p0506: 0; = SQRT(2)*(IF((2*p0374-1)<0;-1;IF((2*p0374-1)>0;1;0))*SQRT(SQRT((2/(pi()*0.140012289)+LN(1-(2*p0374-1)^2)/2)^2-LN(1-(2*p0374-1)^2)/0.140012289)-(2/(pi()*0.140012289)+LN(1-(2*p0374-1)^2)/2)))
- p1034: 2.88587e-5; = IF(p1012=0;p1028*p0001/(p0818*p0002);0)
- p2278: 0; = p2223*p2184
- p1761: 0
- p3433: 0; = p3376*p1239
- p1948: 0
- p1858: 0
- p3403: 0; = p3365*p1238
- p3033: 1.09812e-6; = p2252*p1023
- p2725: 1.2678e-6; = p2334*(p1019+p1021)
- p1805: 0
- p1774: 0
- p2393: 0; = p2234*p2182
- p2880: 0; = p2294*(p1020+p1022)
- p1280: 0; = IF(p1277=p1263;0;IF(p1277+p1278>p1263;p1263-p1277;p1278))
- p2152: 1.28017e-6; = p2015*p2080*p2114/(p0818*1000)
- p2064: 0.676706
- p4086: 1.93574e-7; = p1943*p3478
- p3395: 0; = p3376*p1234
- p0990: 0; = p0986*p0886
- p3286: 0
- p3138: 6.34701e-6; = p2357*p1023
- p3249: 0
- p2940: 0.000144457; = p2354*(p1020+p1022)
- p1954: 0
- p0344: 0.5
- p0802: 2.35e6
- p0826: 0.1151; = 1-p0825/p0818
- p0691: 0
- p3480: 0; = if(p1328+p1330+p1332+p1334+p1336+p1338+p1340+p1342+p1344=0;0;p1336/(p1328+p1330+p1332+p1334+p1336+p1338+p1340+p1342+p1344))
- p0290: 0.5
- p2579: 0; = p2383*p1073
- p2857: 0; = p2271*(p1079+p1081)
- p3148: 0.000135075; = p2367*p1023
- p2596: 0; = p2400*p1014
- p1040: 0.0227455
- p3370: 0; = if(p1232=0;p3245*p3358/p0818;0)
- p1800: 0
- p0805: 0
- p3422: 0; = p3365*p1239
- p2401: 0; = p2234*p2190
- p2266: 4.53077e-7; = p2226*p2212
- p1506: 21
- p0723: 2353.71; = p0063*(1+p0591*p0195/100)
- p0567: 0; = IF(p0303<0.5;-SQRT(p0007*EXP(p0435^2*p0008)-p0007);SQRT(p0007*EXP(p0435^2*p0008)-p0007))
- p1075: 0; = IF(p1071=0;p0713/100;0)
- p3745: 6.2469e-7; = p1808*p3477
- p5028: 0; = p1855*p3483
- p1562: 0
- p0217: 15.024
- p0174: 0
- p1823: 0
- p2078: 0.117
- p1844: 0
- p2829: 0.000283506; = p2243*(p1020+p1022)
- p2320: 1.48177e-5; = p2224*p2187
- p0609: 0; = IF(p0345<0.5;-SQRT(p0007*EXP(p0477^2*p0008)-p0007);SQRT(p0007*EXP(p0477^2*p0008)-p0007))
- p3887: 9.86353e-8; = p1950*p3477
- p0239: 35.418
- p2767: 0; = p2376*(p1078+p1080)
- p2892: 0; = p2306*(p1079+p1081)
- p1811: 0
- p2087: 0.856281
- p2735: 0; = p2344*(p1078+p1080)
- p1855: 1.38804e-5; = p1447*1000/p0818
- p3055: 8.45881e-6; = p2274*p1132
- p0972: 0; = p0969/p0818
- p2305: 0; = p2227*p2212
- p0977: 0; = IF(p0687=0;IF(OR(p0686=0;p0688=0);0;p0686*1000*p0688/100);0)
- p1857: 0
- p2177: 0.136757; = p0895/p0818-(p2173+p2174+p2175+p2176)
- p3164: 0; = p2383*p1082
- p1796: 0
- p2627: 0; = p2431*p1123
- p1120: 0.000540689; = IF(p1071=0;p1110/(p1115*p0818);0)
- p0452: 0; = SQRT(2)*(IF((2*p0320-1)<0;-1;IF((2*p0320-1)>0;1;0))*SQRT(SQRT((2/(pi()*0.140012289)+LN(1-(2*p0320-1)^2)/2)^2-LN(1-(2*p0320-1)^2)/0.140012289)-(2/(pi()*0.140012289)+LN(1-(2*p0320-1)^2)/2)))
- p3040: 3.8793e-5; = p2259*p1082
- p0835: 590.373; = -LN(1-p0669/100)/p0834
- p4711: 9.18116e-8; = p1950*p3481
- p1260: 0; = if(p1232>0;0;p0731/100)
- p1147: 0.070543
- p3187: 0; = p2406*p1023
- p3329: 0; = if(and(p1232=0;p3255<>0);p3255*(p3266-p3324)/p3327;0)
- p0816: 0
- p0862: 0; = p0674*1000/p0856
- p1560: 0
- p2021: 0.00159471; = p2020/p0818
- p0758: 0
- p0904: 3.37472e8; = p0825*p0901+(p0830+p0895)*p0824*p0903
- p4981: 0; = p1808*p3483
- p3457: 0; = p3362*p1241
- p1676: 0
- p2602: 0; = p2406*p1014
- p2495: 0; = p2299*p1073
- p1084: 0; = IF(p1071=0;p1078*(p0710/100)*p0703*1000;0)
- p1134: 0; = if(p1121=0;p1128*(p0716/100)*p0703*1000;0)
- p1023: 0.08222; = IF(p1012=0;IF(p1014+p1019+p1020+p1021+p1022=1;0;1-(p1014+p1019+p1020+p1021+p1022));0)
- p1734: 0
- p2022: 0.010574; = p2018*p2015/p0818-p2021
- p1660: 0
- p1317: 0
- p3424: 0; = p3367*p1239
- p3150: 1.81413e-7; = p2369*p1023
- p1862: 0
- p2544: 3.32253e-6; = p2348*p1073
- p2157: 2.58024e-6; = p2015*p2086*p2119/(p0818*1000)
- p3008: 0; = p2422*(p1079+p1081)
- p0646: 0; = IF(p0382<0.5;-SQRT(p0007*EXP(p0514^2*p0008)-p0007);SQRT(p0007*EXP(p0514^2*p0008)-p0007))
- p3218: 0.00501483; = p3214*p1228
- p0104: 99.997
- p1986: 4200
- p0759: 0
- p2136: 3.56481e-5; = p2015*p2064*p2098/(p0818*1000)
- p4569: 5.81473e-7; = p1808*p3481
- p2802: 0; = p2411*(p1019+p1021)
- p1278: 0
- p2559: 1.19053e-5; = p2363*p1014
- p1568: 0
- p2606: 0; = p2410*p1014
- p1999: 1.34976e8; = (p1228+p1229)*p0818+p1164
- p3101: 1.21831e-6; = p2320*p1023
- p1095: 1.20102e7; = IF(p1071=0;p0797*p0702*1000*p0798/100;0)
- p1978: 436
- p0725: 0
- p1584: 0
- p2838: 1.81186e-6; = p2252*(p1020+p1022)
- p1258: 0; = if(p1232>0;0;IF(p1253+p1256+p1257=1;0;1-(p1253+p1256+p1257)))
- p4239: 1.3706e-7; = p1890*p3479
- p0113: 25.016
- p2673: 0; = p2282*(p1019+p1021)
- p1313: 0; = p1307*p1252/p0818
- p2283: 0; = p2223*p2189
- p3441: 0; = p3365*p1240
- p2738: 0; = p2347*(p1078+p1080)
- p2252: 1.33559e-5; = p2222*p2198
- p0728: 0
- p0839: 0.658314; = p0838/p0818
- p1541: 5
- p2261: 0.000337878; = p2226*p2207
- p3132: 0; = p2351*p1132
- p1827: 0
- p1691: 0
- p4428: 0; = p1873*p3480
- p2716: 5.92423e-6; = p2325*(p1019+p1021)
- p1613: 0
- p1980: 3521.6
- p2265: 0.000129686; = p2226*p2211
- p2969: 0; = p2383*(p1079+p1081)
- p1777: 0
- p4926: 0; = p1963*p3482
- p5159: 4.67461e-7; = p1780*p3484
- p2713: 2.54321e-6; = p2322*(p1019+p1021)
- p3374: 0; = if(p1232=0;p3246*p3356/p0818;0)
- p1316: 0; = p1312*p1252/p0818
- p1821: 0
- p0414: 0; = SQRT(2)*(IF((2*p0282-1)<0;-1;IF((2*p0282-1)>0;1;0))*SQRT(SQRT((2/(pi()*0.140012289)+LN(1-(2*p0282-1)^2)/2)^2-LN(1-(2*p0282-1)^2)/0.140012289)-(2/(pi()*0.140012289)+LN(1-(2*p0282-1)^2)/2)))
- p2882: 0; = p2296*(p1020+p1022)
- p3717: 6.44417e-6; = p1780*p3477
- p2412: 0; = p2234*p2202
- p0044: 99.997
- p3886: 1.64392e-7; = p1949*p3477
- p2800: 0; = p2409*(p1019+p1021)
- p1065: 0.000757233; = IF(p1012=0;p1051/(p1058*p0818);0)
- p3136: 1.92187e-5; = p2355*p1023
- p1196: 0.59
- p2300: 0; = p2227*p2207
- p1032: 0; = IF(p1012=0;p1026*p0001/(p0818*p0002);0)
- p1585: 0
- p2873: 0; = p2287*(p1020+p1022)
- p3109: 7.41629e-5; = p2328*p1023
- p2782: 0; = p2391*(p1128+p1130)
- p0859: 0; = p0671*1000/p0856
- p4710: 1.53019e-7; = p1949*p3481
- p2865: 0; = p2279*(p1020+p1022)
- p3452: 0; = p3376*p1240
- p1092: 0; = IF(p1071=0;p1086*p0001/(p0818*p0002);0)
- p1961: 0
- p0873: 0; = p0872*p0001*p0003/(p0818*p0002)
- p2934: 0; = p2348*(p1079+p1081)
- p1594: 0
- p2231: 0; = if(p0783*p0787+p0784*p0788+p0785*p0789+p0786*p0790=0;0;p0788*p0784/(p0783*p0787+p0784*p0788+p0785*p0789+p0786*p0790))
- p3260: 0
- p2773: 0; = p2382*(p1078+p1080)
- p1636: 0
- p2249: 0.00100601; = p2222*p2195
- p2172: 0.27071; = p2166-(p2167+p2168+p2169+p2170)
- p2451: 0.000867165; = p2255*p1014
- p2803: 0; = p2412*(p1019+p1021)
- p0718: 0
- p1583: 0
- p0888: 0; = p0686*1000*p0687*p0884/100
- p0584: 0; = IF(p0320<0.5;-SQRT(p0007*EXP(p0452^2*p0008)-p0007);SQRT(p0007*EXP(p0452^2*p0008)-p0007))
- p2286: 0; = p2223*p2192
- p1606: 0
- p2658: 0; = p2267*(p1078+p1080)
- p2711: 1.16719e-6; = p2320*(p1019+p1021)
- p1913: 0
- p0714: 0
- p0731: 0
- p1199: -0.29
- p4513: 0; = p1962*p3480
- p1792: 0
- p2765: 2.64718e-5; = p2374*(p1019+p1021)
- p3121: 2.40422e-5; = p2340*p1082
- p1036: 1.93986e8; = IF(p1012=0;p0795*p0702*1000*p0796/100;0)
- p2607: 0; = p2411*p1014
- p0909: 5.82395e7
- p2818: 0; = p2427*(p1078+p1080)
- p0865: 0; = IF(p0858+p0864=1;0;IF(p0858+p0864+p0860>1;1-(p0858+p0864);p0860))
- p0877: 0; = p0876*p0001*p0003/(p0818*p0002)
- p2200: 0.0036117; = p1056/p0818
- p1852: 0
- p1246: 0; = if(p1232>0;0;p1241*(p0725/100)*p0723*1000)
- p1269: 0
- p2083: 2.17294
- p2457: 0.000233575; = p2261*p1073
- p1851: 0
- p1957: 0
- p1705: 0
- p3142: 4.83489e-6; = p2361*p1023
- p3296: 0
- p2592: 0; = p2396*p1014
- p0638: 0; = IF(p0374<0.5;-SQRT(p0007*EXP(p0506^2*p0008)-p0007);SQRT(p0007*EXP(p0506^2*p0008)-p0007))
- p2775: 0; = p2384*(p1078+p1080)
- p2497: 0; = p2301*p1073
- p1300: 0; = IF(p1297=p1265;0;IF(p1297+p1298>p1265;p1265-p1297;p1298))
- p3238: 0.854735; = IF(p3237+p3235+p3236>1;1-(p3235+p3236);p3237)
- p1098: 0.0149443
- p2043: 0.636483
- p3065: 0; = p2284*p1023
- p2207: 0.000856696; = p1119-p2205-p2204-p2206
- p3063: 0; = p2282*p1023
- p3094: 0; = p2313*p1132
- p1904: 0
- p0902: 0
- p2220: 3.14197e-5; = p1151/p0818
- p1263: 0; = if(p1232>0;0;IF(p1259=1;0;IF(p1259+p1260>1;1-p1259;p1260)))
- p0550: 0; = IF(p0286<0.5;-SQRT(p0007*EXP(p0418^2*p0008)-p0007);SQRT(p0007*EXP(p0418^2*p0008)-p0007))
- p1828: 0
- p3312: 0; = if(and(p1232=0;p3253<>0);p3261*p3277*(p3298*p3290+(1-p3298)*p3294);0)
- p2228: 0.605604; = if(p0774*p0778+p0775*p0779+p0776*p0780+p0777*p0781=0;0;p0780*p0776/(p0774*p0778+p0775*p0779+p0776*p0780+p0777*p0781))
- p1336: 0; = p1323*p0801
- p0063: 2353.71
- p0667: 0; = IF(p0403<0.5;-SQRT(p0007*EXP(p0535^2*p0008)-p0007);SQRT(p0007*EXP(p0535^2*p0008)-p0007))
- p1210: 0.13
- p2526: 8.5207e-7; = p2330*p1014
- p2353: 0; = p2232*p2221
- p2851: 0; = p2265*(p1079+p1081)
- p2698: 0; = p2307*(p1078+p1080)
- p3308: 0; = if(and(p1232=0;p3252<>0);p3252*(p3259-p3303)/p3305;0)
- p3341: 0; = if(and(p1232=0;p3254<>0);p3254*(p3271-p3336)/p3338;0)
- p3470: 0; = p3375*p1241
- p4857: 0; = p1890*p3482
- p3054: 0.000157058; = p2273*p1132
- p0936: 9.85457e-6; = p0930*p0001/(p0818*p0002)
- p1556: 0
- p0735: 0
- p1709: 0
- p3131: 0; = p2350*p1132
- p1136: 0; = if(p1121=0;p1130*(p0716/100)*p0703*1000;0)
- p0178: 48.933
- p2808: 0; = p2417*(p1078+p1080)
- p3328: 0; = if(and(p1232=0;p3255<>0);p3255*(p3265*p3277-p3323)/p3327;0)
- p1825: 0
- p0983: 0; = if(p0886=0;0;min(1;(p0695*p0694*1000*p0697/100)/p0886))
- p0789: 0
- p0038: 190.649
- p2985: 0; = p2399*(p1020+p1022)
- p0046: 7.877
- p3447: 0; = p3371*p1240
- p1669: 0.523221
- p2096: 0.486404
- p0980: 0; = IF(p0977=0;0;p0977*p0001/(p0818*p0002))
- p0108: 43.211
- p2009: 0.00655637; = ((p1983*p1985+p1989*p1991+p1995*p1997+p2003*p2005+p1976*p1977+p1978*p1979+p1998*p1999)/p0818)*p0005*p0002/1000
- p3140: 2.21894e-6; = p2359*p1023
- p3896: 2.58133e-5; = p1963*p3477
- p1944: 0
- p0901: 0.0206965
- p0176: 0.003
- p2233: 0; = if(p0783*p0787+p0784*p0788+p0785*p0789+p0786*p0790=0;0;p0790*p0786/(p0783*p0787+p0784*p0788+p0785*p0789+p0786*p0790))
- p3410: 0; = p3372*p1238
- p1749: 0
- p2774: 0; = p2383*(p1078+p1080)
- p3459: 0; = p3364*p1241
- p3412: 0; = p3374*p1238
- p2473: 0; = p2277*p1014
- p3439: 0; = p3363*p1240
- p3023: 1.34316e-5; = p2242*p1023
- p0878: 0; = p0867*p0856
- p0501: 0; = SQRT(2)*(IF((2*p0369-1)<0;-1;IF((2*p0369-1)>0;1;0))*SQRT(SQRT((2/(pi()*0.140012289)+LN(1-(2*p0369-1)^2)/2)^2-LN(1-(2*p0369-1)^2)/0.140012289)-(2/(pi()*0.140012289)+LN(1-(2*p0369-1)^2)/2)))
- p2839: 3.98356e-6; = p2253*(p1020+p1022)
- p2515: 7.24141e-5; = p2319*p1014
- p2621: 0; = p2425*p1073
- p1043: 0.183763
- p3058: 0; = p2277*p1023
- p3336: 0; = IF(or(p3254=0;p1232>0);0;p3271*p3289)
- p2984: 0; = p2398*(p1020+p1022)
- p2924: 0; = p2338*(p1079+p1081)
- p2352: 0; = p2232*p2220
- p1941: 0
- p3277: 0
- p2192: 0.00104135; = p1067-p2189-p2190-p2191
- p0286: 0.5
- p2676: 0; = p2285*(p1019+p1021)
- p0267: 7.697
- p2281: 0; = p2223*p2187
- p1875: 0
- p3450: 0; = p3374*p1240
- p3299: 0; = if(p1303+p1304+p1305+p1306=0;0;p1303/(p1303+p1304+p1305+p1306))
- p0617: 0; = IF(p0353<0.5;-SQRT(p0007*EXP(p0485^2*p0008)-p0007);SQRT(p0007*EXP(p0485^2*p0008)-p0007))
- p4634: 8.69149e-6; = p1873*p3481
- p1161: 2.4e6; = p0801
- p1126: 0; = if(p1121=0;p0720/100;0)
- p2485: 0; = p2289*p1014
- p1287: 0
- p2102: 0.922577
- p2006: 0.157187; = ((p1980*p1985+p1986*p1991+p1992*p1997+p2000*p2005)/p0818)*p0005*p0002/1000
- p0434: 0; = SQRT(2)*(IF((2*p0302-1)<0;-1;IF((2*p0302-1)>0;1;0))*SQRT(SQRT((2/(pi()*0.140012289)+LN(1-(2*p0302-1)^2)/2)^2-LN(1-(2*p0302-1)^2)/0.140012289)-(2/(pi()*0.140012289)+LN(1-(2*p0302-1)^2)/2)))
- p4349: 0; = p1794*p3480
- p2661: 0; = p2270*(p1078+p1080)
- p2482: 0; = p2286*p1014
- p0004: 0.0254
- p2018: 0.1978
- p2554: 0.000131889; = p2358*p1014
- p0825: 8.73396e9; = p0818*p0822
- p3386: 0; = p3367*p1234
- p0523: 0; = SQRT(2)*(IF((2*p0391-1)<0;-1;IF((2*p0391-1)>0;1;0))*SQRT(SQRT((2/(pi()*0.140012289)+LN(1-(2*p0391-1)^2)/2)^2-LN(1-(2*p0391-1)^2)/0.140012289)-(2/(pi()*0.140012289)+LN(1-(2*p0391-1)^2)/2)))
- p1840: 0
- p2185: 0.000586855; = p1065-p2184
- p3288: 0
- p0376: 0.5
- p4720: 2.40275e-5; = p1963*p3481
- p2388: 0; = p2229*p2217
- p1666: 0
- p2197: 1.02196e-5; = p1055/p0818
- p2350: 0; = p2232*p2218
- p0159: 41.339
- p0941: 0; = if(and(p0683=0;p0947=0);p0935;0)
- p0416: 0; = SQRT(2)*(IF((2*p0284-1)<0;-1;IF((2*p0284-1)>0;1;0))*SQRT(SQRT((2/(pi()*0.140012289)+LN(1-(2*p0284-1)^2)/2)^2-LN(1-(2*p0284-1)^2)/0.140012289)-(2/(pi()*0.140012289)+LN(1-(2*p0284-1)^2)/2)))
- p2553: 5.42954e-5; = p2357*p1014
- p2766: 0; = p2375*(p1078+p1080)
- p2040: 0.44
- p1991: 3.03072e7; = (if(p1111=0;0;p1106/p1111)+if(p1112=0;0;p1107/p1112)+if(p1113=0;0;p1108/p1113)+if(p1114=0;0;p1109/p1114)+if(p1115=0;0;p1110/p1115))*(1+p1157)
- p0484: 0; = SQRT(2)*(IF((2*p0352-1)<0;-1;IF((2*p0352-1)>0;1;0))*SQRT(SQRT((2/(pi()*0.140012289)+LN(1-(2*p0352-1)^2)/2)^2-LN(1-(2*p0352-1)^2)/0.140012289)-(2/(pi()*0.140012289)+LN(1-(2*p0352-1)^2)/2)))
- p4616: 4.19273e-6; = p1855*p3481
- p3019: 0.000116334; = p2238*p1023
- p2341: 3.52192e-5; = p2228*p2209
- p1600: 0
- p3271: 0
- p0737: 0
- p2115: 0.856281
- p0824: 0.863
- p1903: 0
- p0883: 2.16944; = p0882*p0001*p0003/(p0818*p0002)
- p1248: 0; = if(p1232>0;0;p1243*p0001/(p0818*p0002))
- p1014: 0.70335; = IF(p1012=0;p0705/100;0)
- p3116: 1.51709e-5; = p2335*p1023
- p2502: 0; = p2306*p1073
- p3484: 0.02354; = IF(p1344=0;0;p1344/(p1328+p1330+p1332+p1334+p1336+p1338+p1340+p1342+p1344))
- p1595: 0
- p3307: 0; = if(and(p1232=0;p3252<>0);p3252*(p3258-p3302)/p3305;0)
- p0908: 0.00197823
- p2692: 0; = p2301*(p1078+p1080)
- p1771: 0
- p3327: 0; = if(and(p1232=0;p3255<>0);1-(p3323+p3324+p3325+p3326);0)
- p1587: 0
- p5087: 0; = p1914*p3483
- p3079: 0; = p2298*p1082
- p1872: 0
- p1605: 0
- p3215: 0.450791; = p1222*3*15.9994/100.0869
- p0616: 0; = IF(p0352<0.5;-SQRT(p0007*EXP(p0484^2*p0008)-p0007);SQRT(p0007*EXP(p0484^2*p0008)-p0007))
- p3344: 0; = if(and(p1232=0;p3254<>0);p3254-(p3339+p3340+p3341+p3342+p3343);0)
- p2636: 3.20935e-5; = p2245*(p1019+p1021)
- p0532: 0; = SQRT(2)*(IF((2*p0400-1)<0;-1;IF((2*p0400-1)>0;1;0))*SQRT(SQRT((2/(pi()*0.140012289)+LN(1-(2*p0400-1)^2)/2)^2-LN(1-(2*p0400-1)^2)/0.140012289)-(2/(pi()*0.140012289)+LN(1-(2*p0400-1)^2)/2)))
- p0566: 0; = IF(p0302<0.5;-SQRT(p0007*EXP(p0434^2*p0008)-p0007);SQRT(p0007*EXP(p0434^2*p0008)-p0007))
- p3018: 0.000529965; = p2237*p1023
- p1553: 0
- p2594: 0; = p2398*p1014
- p1861: 0
- p4308: 2.5025e-6; = p1963*p3479
- p3473: 0; = p3378*p1241
- p2844: 0; = p2258*(p1079+p1081)
- p1645: 0
- p2447: 5.72329e-6; = p2251*p1014
- p1211: 0.6
- p0315: 0.5
- p1735: 0
- p2677: 0; = p2286*(p1019+p1021)
- p3202: 0; = p2421*p1082
- p2387: 0; = p2229*p2216
- p0919: 0.0584017; = p0678*1000/p0801
- p3264: 0
- p3245: 0; = IF(p3244=1;0;if(p3244+p0792/100>1;1-p3244;p0792/100))
- p1646: 0
- p1863: 0
- p1958: 1287
- p3268: 0
- p1333: 0.000163473; = p1332*p0001/(p0818*p0002)
- p2274: 3.14197e-5; = p2230*p2220
- p2336: 0.000213354; = p2228*p2204
- p0051: 69.13
- p0973: 0; = p0967+p0968+p0969
- p2615: 0; = p2419*p1073
- p2705: 0; = p2314*(p1128+p1130)
- p2082: 0.285294
- p1688: 0
- p2613: 0; = p2417*p1073
- p2864: 0; = p2278*(p1020+p1022)
- p2679: 0; = p2288*(p1019+p1021)
- p1917: 0
- p0237: 6.62
- p2860: 2.29609e-5; = p2274*(p1129+p1131)
- p2332: 0.000260846; = p2224*p2200
- p1022: 0.13566; = IF(p1012=0;IF(p1014+p1019+p1020+p1021=1;0;IF(p1014+p1019+p1020+p1021+p1018>1;1-(p1014+p1019+p1020+p1021);p1018));0)
- p1111: 0.0872841
- p3233: 0.60394
- p3002: 0; = p2416*(p1079+p1081)
- p1039: 0.0725313
- p2118: 0.679049
- p2492: 0; = p2296*p1014
- p2729: 0; = p2338*(p1078+p1080)
- p3191: 0; = p2410*p1023
- p0849: 0
- p0790: 0
- p2335: 0.000184516; = p2224*p2203
- p3323: 0; = if(and(p1232=0;p3255<>0);p3265*p3277*(p3299*p3291+(1-p3299)*p3295);0)
- p1853: 0
- p1231: 0.00683711; = IF(p1221=0;0;p1230*(p1228+p1229))
- p2516: 1.0422e-5; = p2320*p1014
- p0900: 0.968045; = p0899/p0818
- p0960: 0; = if(and(p0683>0;or(p0807=480;p0807=32;p0807=1;and(p0807=60;p0901<0.03)));p0936;0)
- p2379: 0; = p2229*p2208
- p3001: 0; = p2415*(p1079+p1081)
- p2005: 2.01253e6; = p1963*p0818+p1959*1000+p1170+p1176+p1182
- p4335: 0; = p1780*p3480
- p2576: 0; = p2380*p1073
- p3539: 0; = p1808*p3476
- p0459: 0; = SQRT(2)*(IF((2*p0327-1)<0;-1;IF((2*p0327-1)>0;1;0))*SQRT(SQRT((2/(pi()*0.140012289)+LN(1-(2*p0327-1)^2)/2)^2-LN(1-(2*p0327-1)^2)/0.140012289)-(2/(pi()*0.140012289)+LN(1-(2*p0327-1)^2)/2)))
- p1590: 0.477952
- p1198: 0.44
- p1952: 0
- p2171: 0.0835448; = p2165*p0831
- p0704: 99.997; = p0044*(1+p0572*p0176/100)
- p1008: 0; = p1004*p0001*p0004/(p0818*p0002)
- p0712: 0
- p1320: 0.767913; = IF(((p0745*1000*p0747/100)+(p0754*1000*p0756/100))/p0801<0;0;((p0745*1000*p0747/100)+(p0754*1000*p0756/100))/p0801)
- p2629: 0.000111452; = p2238*(p1019+p1021)
- p0674: 0
- p0954: 0; = if(and(p0683>0;or(p0807=56;p0807=100;and(p0807=60;p0901>0.06)));p0936;0)
- p2092: 0.54529
- p2539: 0.000137662; = p2343*p1073
- p2398: 0; = p2234*p2187
- p3478: 0.31843; = if(p1328+p1330+p1332+p1334+p1336+p1338+p1340+p1342+p1344=0;0;p1332/(p1328+p1330+p1332+p1334+p1336+p1338+p1340+p1342+p1344))
- p2528: 0.000183466; = p2332*p1014
- p1334: 178671; = p1322*p0801
- p1637: 0
- p3409: 0; = p3371*p1238
- p3284: 0
- p2568: 0.000143258; = p2372*p1014
- p3240: 3.39139e-9; = p3234*p1188*p3235/p0818
- p1869: 0
- p3155: 2.76312e-5; = p2374*p1023
- p2980: 0; = p2394*(p1020+p1022)
- p0791: 0
- p2746: 1.84123e-5; = p2355*(p1019+p1021)
- p1807: 0
- p1819: 0
- p2888: 0; = p2302*(p1079+p1081)
- p1715: 0
- p3042: 0.000104303; = p2261*p1082
- p3234: 0.39606; = 1-p3233
- p0834: 0.00059
- p2820: 0; = p2429*(p1128+p1130)
- p3007: 0; = p2421*(p1079+p1081)
- p3188: 0; = p2407*p1023
- p0818: 9.87e9; = p0806*p0807
- p0690: 0
- p2978: 0; = p2392*(p1129+p1131)
- p2939: 0; = p2353*(p1129+p1131)
- p0868: 0; = IF(p0858+p0864+p0865+p0866+p0867=1;0;IF(p0858+p0864+p0865+p0866+p0867+p0863>1;1-(p0858+p0864+p0865+p0866+p0867);p0863))
- p0487: 0; = SQRT(2)*(IF((2*p0355-1)<0;-1;IF((2*p0355-1)>0;1;0))*SQRT(SQRT((2/(pi()*0.140012289)+LN(1-(2*p0355-1)^2)/2)^2-LN(1-(2*p0355-1)^2)/0.140012289)-(2/(pi()*0.140012289)+LN(1-(2*p0355-1)^2)/2)))
- p2410: 0; = p2234*p2200
- p1841: 0
- p2194: 0.214362
- p2306: 0; = p2227*p2213
- p1581: 0
- p0770: 0.376; = p0110*(1+p0638*p0242/100)
- p4719: 0; = p1962*p3481
- p1253: 0; = if(p1232>0;0;p0735/100)
- p3479: 0.03146; = if(p1328+p1330+p1332+p1334+p1336+p1338+p1340+p1342+p1344=0;0;p1334/(p1328+p1330+p1332+p1334+p1336+p1338+p1340+p1342+p1344))
- p2479: 0; = p2283*p1014
- p2472: 0; = p2276*p1014
- p2795: 0; = p2404*(p1019+p1021)
- p2784: 0; = p2393*(p1019+p1021)
- p2385: 0; = p2229*p2214
- p1860: 0
- p0534: 0; = SQRT(2)*(IF((2*p0402-1)<0;-1;IF((2*p0402-1)>0;1;0))*SQRT(SQRT((2/(pi()*0.140012289)+LN(1-(2*p0402-1)^2)/2)^2-LN(1-(2*p0402-1)^2)/0.140012289)-(2/(pi()*0.140012289)+LN(1-(2*p0402-1)^2)/2)))
- p1159: 0.5
- p1815: 0
- p2271: 2.80526e-5; = p2226*p2217
- p5269: 1.02555e-7; = p1890*p3484
- p1915: 0
- p1960: 0; = IF(p1959-p1958<0;0;p1959-p1958)
- p3151: 3.98856e-7; = p2370*p1023
- p1293: 0; = p1287*p1252/p0818
- p0254: 34.002
- p4298: 1.59372e-8; = p1949*p3479
- p3680: 0; = p1949*p3476
- p1719: 0
- p3166: 0; = p2385*p1082
- p1945: 0
- p2364: 0.00013698; = p2225*p2192
- p2391: 0; = p2233*p2220
- p1233: 0.000216944; = p1232*p0001/(p0818*p0002)
- p0314: 0.5
- p1619: 0
- p2439: 0.00146988; = p2243*p1014
- p2399: 0; = p2234*p2188
- p0136: 99.997
- p2223: 0; = if(p0765*p0769+p0766*p0770+p0767*p0771+p0768*p0772=0;0;p0770*p0766/(p0765*p0769+p0766*p0770+p0767*p0771+p0768*p0772))
- p0268: 0.003
- p0323: 0.5
- p1808: 1.92503e-6; = p1400*1000/p0818
- p0137: 20.4
- p1835: 0
- p2499: 0; = p2303*p1073
- p3047: 1.39865e-7; = p2266*p1082
- p1923: 0
- p1746: 0.615605
- p2216: 7.93621e-6; = p1108/p0818
- p2174: 0.00344026; = p0895*p0903/p0818
- p0858: 0; = p0670*1000/p0856
- p1247: 0; = if(p1232>0;0;p1242*p0001/(p0818*p0002))
- p3177: 0; = p2396*p1023
- p2390: 0; = p2233*p2219
- p3147: 1.36646e-5; = p2366*p1023
- p1571: 0
- p3241: 4.04853e-10; = p3234*p1188*p3236/p0818
- p3300: 0; = if(p1293+p1294+p1295+p1296=0;0;p1293/(p1293+p1294+p1295+p1296))
- p2514: 2.98109e-5; = p2318*p1014
- p2181: 58.6642; = p0887+p0889+p0893+p2180
- p1142: 0; = if(p1121=0;p1136*p0001/(p0818*p0002);0)
- p1011: 5.86642e-6; = p1010*p0001*p0004/(p0818*p0002)
- p2063: 2.01468
- p3366: 0; = if(p1232=0;p3244*p3360/p0818;0)
- p1768: 0
- p1804: 0
- p2504: 0; = p2308*p1073
- p3262: 0
- p2452: 0.000124805; = p2256*p1014
- p1912: 0
- p0784: 0
- p2008: 0.0330578; = ((p1982*p1985+p1988*p1991+p1994*p1997+p2002*p2005)/p0818)*p0005*p0002/1000
- p1319: 0; = IF(((p0745*1000*p0746/100)+(p0754*1000*p0755/100))/p0801<0;0;((p0745*1000*p0746/100)+(p0754*1000*p0755/100))/p0801)
- p1328: 0; = p1319*p0801
- p2056: 2.07882
- p1152: 0.415074
- p1285: 0; = p1281*p1252/p0818
- p2493: 0; = p2297*p1073
- p2780: 0; = p2389*(p1128+p1130)
- p2430: 0; = p2236*p2220
- p0920: 0.0454246; = p0676*1000/p0801
- p1276: 0; = p1272*p1252/p0818
- p0717: 0
- p2047: 1.84561e-12; = p2015*p2045/(p0818*1000000000000)
- p0994: 0; = p0990*p0001*p0004/(p0818*p0002)
- p2340: 7.78822e-5; = p2228*p2208
- p0368: 0.5
- p3118: 5.95675e-5; = p2337*p1082
- p2584: 0; = p2388*p1073
- p1577: 0
- p2714: 2.91104e-6; = p2323*(p1019+p1021)
- p3371: 0; = if(p1232=0;p3245*p3359/p0818;0)
- p1031: 1.67566e-5; = IF(p1012=0;p1025*p0001/(p0818*p0002);0)
- p3133: 0; = p2352*p1132
- p3192: 0; = p2411*p1023
- p2448: 9.39386e-6; = p2252*p1014
- p2116: 0.444424
- p3645: 0; = p1914*p3476
- p1753: 0
- p3396: 0; = p3377*p1234
- p1673: 0
- p2362: 6.73092e-5; = p2225*p2190
- p1726: 0
- p0026: 190.649
- p5329: 7.15502e-9; = p1950*p3484
- p2730: 0; = p2339*(p1078+p1080)
- p1117: 0.000196042; = IF(p1071=0;p1107/(p1112*p0818);0)
- p1975: 0.000216944; = p1970*p0001/(p0818*p0002)
- p0993: 0; = p0989*p0001*p0004/(p0818*p0002)
- p2309: 0; = p2227*p2216
- p1632: 0
- p2423: 0; = p2235*p2213
- p0964: 0; = 56/90000

- p0455: 0; = SQRT(2)*(IF((2*p0323-1)<0;-1;IF((2*p0323-1)>0;1;0))*SQRT(SQRT((2/(pi()*0.140012289)+LN(1-(2*p0323-1)^2)/2)^2-LN(1-(2*p0323-1)^2)/0.140012289)-(2/(pi()*0.140012289)+LN(1-(2*p0323-1)^2)/2)))
- p0418: 0; = SQRT(2)*(IF((2*p0286-1)<0;-1;IF((2*p0286-1)>0;1;0))*SQRT(SQRT((2/(pi()*0.140012289)+LN(1-(2*p0286-1)^2)/2)^2-LN(1-(2*p0286-1)^2)/0.140012289)-(2/(pi()*0.140012289)+LN(1-(2*p0286-1)^2)/2)))
- p3232: 2.69313e-8; = p1182/p0818
- p0757: 0
- p3119: 1.92895e-5; = p2338*p1082
- p1635: 0
- p2395: 0; = p2234*p2184
- p0485: 0; = SQRT(2)*(IF((2*p0353-1)<0;-1;IF((2*p0353-1)>0;1;0))*SQRT(SQRT((2/(pi()*0.140012289)+LN(1-(2*p0353-1)^2)/2)^2-LN(1-(2*p0353-1)^2)/0.140012289)-(2/(pi()*0.140012289)+LN(1-(2*p0353-1)^2)/2)))
- p1087: 0; = IF(p1071=0;p1081*(p0710/100)*p0703*1000;0)
- p2191: 0.000128679; = 8*1.00794*p2189/(2*14.0067)
- p0745: 5679.31; = p0085*(1+p0613*p0217/100)
- p1942: 0
- p2268: 1.61968e-5; = p2226*p2214
- p1963c: 1.98209e-6; = p1588*p1792+p1589*p1793+p1590*p1794+p1591*p1795+p1592*p1796+p1593*p1797+p1594*p1798+p1595*p1799+p1596*p1800+p1597*p1801+p1598*p1802+p1599*p1803+p1600*p1804+p1601*p1805+p1602*p1806+p1603*p1807+p1604*p1808+p1605*p1809+p1606*p1810+p1607*p1811
- p2402: 0; = p2234*p2191
- p0774: 18.231; = p0114*(1+p0642*p0246/100)
- p0405: 0; = SQRT(2)*(IF((2*p0273-1)<0;-1;IF((2*p0273-1)>0;1;0))*SQRT(SQRT((2/(pi()*0.140012289)+LN(1-(2*p0273-1)^2)/2)^2-LN(1-(2*p0273-1)^2)/0.140012289)-(2/(pi()*0.140012289)+LN(1-(2*p0273-1)^2)/2)))
- p2013: 0.85
- p1650: 0
- p1221: 0.0263674; = p1216*(1+p1220*p1217/100)
- p0345: 0.5
- p3472: 0; = p3377*p1241
- p2285: 0; = p2223*p2191
- p1701: 0
- p3448: 0; = p3372*p1240
- p2848: 0; = p2262*(p1079+p1081)
- p2319: 0.000102956; = p2224*p2186
- p2026: 55.14
- p0995: 0; = p0991*p0001*p0004/(p0818*p0002)
- p2435: 9.54169e-5; = p2239*p1014
- p0850: 0
- p2270: 3.13001e-6; = p2226*p2216
- p3278: 0
- p1148: 0.070543; = if(p1121=0;IF(p1146=1;0;1-p1146);0)
- p2572: 0; = p2376*p1073
- p0664: 0; = IF(p0400<0.5;-SQRT(p0007*EXP(p0532^2*p0008)-p0007);SQRT(p0007*EXP(p0532^2*p0008)-p0007))
- p0213: 11.251
- p0711: 69.13; = p0051*(1+p0579*p0183/100)
- p3082: 0; = p2301*p1082
- p2229: 0; = if(p0774*p0778+p0775*p0779+p0776*p0780+p0777*p0781=0;0;p0781*p0777/(p0774*p0778+p0775*p0779+p0776*p0780+p0777*p0781))
- p0869: 1; = IF(p0858+p0864+p0865+p0866+p0867+p0868=1;0;1-(p0858+p0864+p0865+p0866+p0867+p0868))
- p2617: 0; = p2421*p1073
- p1149: 0.830148
- p3360: 0; = if(p1232=0;p3310+p3321+p3332+p3343+p3354;0)
- p3026: 3.34991e-5; = p2245*p1023
- p1838: 0
- p3160: 0; = p2379*p1082
- p2643: 1.05204e-6; = p2252*(p1019+p1021)
- p0962: 0; = if(and(p0683>0;or(p0807=480;p0807=32;p0807=1;and(p0807=60;p0901<0.03)));p0938;0)
- p3230: 8.77927e-8; = p1170/p0818
- p0512: 0; = SQRT(2)*(IF((2*p0380-1)<0;-1;IF((2*p0380-1)>0;1;0))*SQRT(SQRT((2/(pi()*0.140012289)+LN(1-(2*p0380-1)^2)/2)^2-LN(1-(2*p0380-1)^2)/0.140012289)-(2/(pi()*0.140012289)+LN(1-(2*p0380-1)^2)/2)))
- p0854: 1.9637e6; = p0801*((1-p0853)*p0846+p0853*p0852)
- p3099: 3.48483e-6; = p2318*p1023
- p0078: 2353.55
- p2107: 0.881623
- p2837: 1.10389e-6; = p2251*(p1020+p1022)
- p1048: 0.000519971; = IF(p1012=0;IF(p1037+p1044+p1045+p1046+p1047=1;0;IF(p1037+p1044+p1045+p1046+p1047+p1042>1;1-(p1037+p1044+p1045+p1046+p1047);p1042));0)
- p2952: 2.25461e-5; = p2366*(p1020+p1022)
- p1236: 0; = if(p1232>0;0;p0728/100)
- p3105: 7.64113e-7; = p2324*p1023
- p0952: 0; = if(and(p0683>0;or(p0807=56;p0807=100;and(p0807=60;p0901>0.06)));p0934;0)
- p1284: 0; = p1280*p1252/p0818
- p2213: 1.20127e-5; = p1116-p2212
- p1569: 0
- p0913: 0.0120403
- p3095: 0; = p2314*p1132
- p2238: 0.00141491; = p2222*p2183
- p3468: 0; = p3373*p1241
- p3282: 0
- p1686: 0.505026
- p2520: 6.5366e-6; = p2324*p1014
- p3085: 0; = p2304*p1082
- p0109: 101.694
- p3005: 0; = p2419*(p1079+p1081)
- p0043: 2353.44
- p1096: 0.00216322
- p1187: 0.000298194
- p3073: 0; = p2292*p1023
- p1259: 0; = if(p1232>0;0;p0730/100)
- p0220: 22.763
- p2977: 0; = p2391*(p1129+p1131)
- p4292: 1.91246e-8; = p1943*p3479
- p1550: 0.783979
- p2054: 0.91
- p1727: 0
- p0743: 0
- p1878: 0
- p1073: 0.6913; = IF(p1071=0;p0711/100;0)
- p3417: 0; = p3379*p1238
- p2441: 0.000286568; = p2245*p1014
- p1905: 0
- p0273: 0.5
- p0572: 0; = IF(p0308<0.5;-SQRT(p0007*EXP(p0440^2*p0008)-p0007);SQRT(p0007*EXP(p0440^2*p0008)-p0007))
- p1061: 0.3
- p1181: 0.000110755
- p1993: 400
- p0749: 3.146; = p0089*(1+p0617*p0221/100)
- p0042: 2353.44
- p0748: 31.843; = p0088*(1+p0616*p0220/100)
- p1273: 0; = p1267*p1252/p0818
- p2632: 8.9409e-5; = p2241*(p1019+p1021)
- p2415: 0; = p2235*p2205
- p0708: 0
- p1573: 0
- p2957: 6.44501e-5; = p2371*(p1020+p1022)
- p2158: 9.09655e-6; = p2015*p2082*p2120/(p0818*1000)
- p2288: 0; = p2223*p2195
- p2414: 0; = p2235*p2204
- p1589: 0
- p2761: 3.82119e-7; = p2370*(p1019+p1021)
- p1025: 185375; = IF(p1012=0;p1019*(p0704/100)*p0703*1000;0)
- p1622: 0
- p2727: 0; = p2336*(p1078+p1080)
- p1046: 0.0227455; = IF(p1012=0;IF(p1037+p1044+p1045=1;0;IF(p1037+p1044+p1045+p1040>1;1-(p1037+p1044+p1045);p1040));0)
- p0474: 0; = SQRT(2)*(IF((2*p0342-1)<0;-1;IF((2*p0342-1)>0;1;0))*SQRT(SQRT((2/(pi()*0.140012289)+LN(1-(2*p0342-1)^2)/2)^2-LN(1-(2*p0342-1)^2)/0.140012289)-(2/(pi()*0.140012289)+LN(1-(2*p0342-1)^2)/2)))
- p0676: 109.019; = p0016*(1+p0544*p0148/100)
- p0535: 0; = SQRT(2)*(IF((2*p0403-1)<0;-1;IF((2*p0403-1)>0;1;0))*SQRT(SQRT((2/(pi()*0.140012289)+LN(1-(2*p0403-1)^2)/2)^2-LN(1-(2*p0403-1)^2)/0.140012289)-(2/(pi()*0.140012289)+LN(1-(2*p0403-1)^2)/2)))
- p4143: 1.27497e-8; = p1794*p3479
- p1226: 2.4e6; = IF(p1221=0;0;IF(p1193=0;p0801;0))
- p2198: 1.67738e-5; = 22.98976928*p2197/14.0067
- p1608: 0.470583
- p3020: 1.1154e-5; = p2239*p1023
- p0979: 0; = IF(p0976=0;0;p0976*p0001/(p0818*p0002))
- p2010: 0.00132231; = ((p1984*p1985+p1990*p1991+p1996*p1997+p2004*p2005)/p0818)*p0005*p0002/1000
- p1227: 0.000216944; = IF(p1221=0;0;p1226*p0001/(p0818*p0002))
- p1745: 0.4234
- p1969: 0; = p0803
- p1965: 0.000141618; = p1963+p1959*p1964*1000/p0818
- p4033: 1.38728e-6; = p1890*p3478
- p3414: 0; = p3376*p1238
- p0754: 0
- p0734: 0
- p3030: 8.27138e-5; = p2249*p1023
- p0170: 58.35
- p4910: 0; = p1943*p3482
- p1898: 0
- p0642: 0; = IF(p0378<0.5;-SQRT(p0007*EXP(p0510^2*p0008)-p0007);SQRT(p0007*EXP(p0510^2*p0008)-p0007))
- p0282: 0.5
- p1296: 0; = p1292*p1252/p0818
- p5122: 0; = p1949*p3483
- p3180: 0; = p2399*p1023
- p1668: 0
- p2531: 0.000129779; = p2335*p1014
- p0403: 0.5
- p0399: 0.5
- p1997: 1.33485e7; = (if(p1152=0;0;p1150/p1152)+if(p1153=0;0;p1151/p1153))*(1+p1157)
- p3333: 0; = if(and(p1232=0;p3255<>0);p3255-(p3328+p3329+p3330+p3331+p3332);0)
- p2155: 7.55968e-6; = p2015*p2084*p2117/(p0818*1000)
- p3071: 0; = p2290*p1023
- p2411: 0; = p2234*p2201
- p1143: 0; = if(p1121=0;p1137*p0001/(p0818*p0002);0)
- p2242: 0.000163361; = p2222*p2187
- p1570: 0
- p0762: 0
- p2148: 3.00269e-6; = p2015*p2076*p2110/(p0818*1000)
- p3056: 1.46992e-5; = p2275*p1132
- p0610: 0; = IF(p0346<0.5;-SQRT(p0007*EXP(p0478^2*p0008)-p0007);SQRT(p0007*EXP(p0478^2*p0008)-p0007))
- p2496: 0; = p2300*p1073
- p4541: 5.99835e-6; = p1780*p3481
- p2878: 0; = p2292*(p1020+p1022)
- p0891: 0; = IF(p3251=0;0;62.4*6272640/(12*12*12))
- p3406: 0; = p3368*p1238
- p2162: 1.00301e-6; = p2015*p2086*p2124/(p0818*1000)
- p1927: 0
- p0668: 0; = IF(p0404<0.5;-SQRT(p0007*EXP(p0536^2*p0008)-p0007);SQRT(p0007*EXP(p0536^2*p0008)-p0007))
- p2147: 3.66132e-6; = p2015*p2075*p2109/(p0818*1000)
- p2293: 0; = p2223*p2200
- p1081: 0; = IF(p1071=0;IF(p1073+p1078+p1079+p1080=1;0;IF(p1073+p1078+p1079+p1080+p1077>1;1-(p1073+p1078+p1079+p1080);p1077));0)
- p0500: 0; = SQRT(2)*(IF((2*p0368-1)<0;-1;IF((2*p0368-1)>0;1;0))*SQRT(SQRT((2/(pi()*0.140012289)+LN(1-(2*p0368-1)^2)/2)^2-LN(1-(2*p0368-1)^2)/0.140012289)-(2/(pi()*0.140012289)+LN(1-(2*p0368-1)^2)/2)))
- p2044: 2.74097e-6; = p2015*p2042*p2043/(p0818*1000)
- p2944: 2.54384e-5; = p2358*(p1020+p1022)
- p1127: 0; = if(p1121=0;p0721/100;0)
- p0214: 3.812
- p0929: 140164; = p0801*p0923
- p2034: 0.00018254; = p2015*p2030*p2032/(p0818*1000)
- p0380: 0.5
- p1634: 0
- p0882: 2.4e6; = p0869*p0856
- p3436: 0; = p3379*p1239
- p0355: 0.5
- p2219: 0.000583381; = p1154-p2218
- p0766: 0
- p1925: 0
- p1755: 0
- p0918: 0.415575; = p0680*1000/p0801
- p2154: 7.80027e-6; = p2015*p2082*p2116/(p0818*1000)
- p3046: 4.00341e-5; = p2265*p1082
- p0945: 0; = if(and(p0683=0;p0951=0);p0939;0)
- p1308: 0
- p2867: 0; = p2281*(p1020+p1022)
- p2871: 0; = p2285*(p1020+p1022)
- p2593: 0; = p2397*p1014
- p1865: 0
- p3185: 0; = p2404*p1023
- p4858: 0; = p1891*p3482
- p0056: 9.425
- p3295: 0
- p1154: 0.000997359; = if(p1152*p0818=0;0;p1150/(p1152*p0818))
- p2333: 0.000111831; = p2224*p2201
- p1133: 0; = if(p1121=0;p1123*(p0716/100)*p0703*1000;0)
- p1071: 0
- p2001: 400
- p2687: 0; = p2296*(p1019+p1021)
- p2560: 9.63451e-5; = p2364*p1014
- p2169: 0.00104109; = p2166*(p0908)
- p3051: 9.66235e-7; = p2270*p1082
- p2847: 0; = p2261*(p1079+p1081)
- p2246: 0.000102459; = p2222*p2191
- p1930: 0
- p0756: 0
- p1938: 0
- p2604: 0; = p2408*p1014
- p1624: 0
- p2916: 1.64345e-7; = p2330*(p1020+p1022)
- p2701: 0; = p2310*(p1078+p1080)
- p3321: 0; = if(and(p1232=0;p3253<>0);IF((p3317+p3318+p3319+p3320)+(p3253*(p3261*(1-p3277))/p3316)>p3253;p3253-(p3317+p3318+p3319+p3320);p3253*(p3261*(1-p3277))/p3316);0)
- p2557: 4.136e-5; = p2361*p1014
- p3158: 0; = p2377*p1082
- p1995: 50
- p5234: 3.26746e-7; = p1855*p3484
- p0894: 0.23
- p0573: 0; = IF(p0309<0.5;-SQRT(p0007*EXP(p0441^2*p0008)-p0007);SQRT(p0007*EXP(p0441^2*p0008)-p0007))
- p1724: 0
- p2855: 0; = p2269*(p1079+p1081)
- p0423: 0; = SQRT(2)*(IF((2*p0291-1)<0;-1;IF((2*p0291-1)>0;1;0))*SQRT(SQRT((2/(pi()*0.140012289)+LN(1-(2*p0291-1)^2)/2)^2-LN(1-(2*p0291-1)^2)/0.140012289)-(2/(pi()*0.140012289)+LN(1-(2*p0291-1)^2)/2)))
- p1041: 0.299887
- p3319: 0; = if(and(p1232=0;p3253<>0);p3253*(p3263-p3314)/p3316;0)
- p1874: 0
- p3242: 2.45463e-8; = p3234*p1188*p3238/p0818
- p1922: 0
- p1963: 7.95454e-5; = p1963a+p1963b+p1963c+p1963d+p1963e+p1963f+p1963g+p1963h+p1963i+p1963j+p1963k
- p1936: 0
- p2536: 5.38399e-5; = p2340*p1073
- p0235: 0
- p1763: 0
- p2680: 0; = p2289*(p1019+p1021)
- p2696: 0; = p2305*(p1078+p1080)
- p1245: 0; = if(p1232>0;0;p1240*(p0725/100)*p0723*1000)
- p1785: 0
- p1186: 1.34657e-8; = p1182*p1185/p0818
- p2932: 0; = p2346*(p1079+p1081)
- p3270: 0
- p1670: 0
- p2796: 0; = p2405*(p1019+p1021)
- p1772: 0
- p0730: 0
- p1681: 0
- p1618: 0
- p2501: 0; = p2305*p1073
- p1068: 0.0196467; = IF(p1012=0;p1054/(p1061*p0818);0)
- p0666: 0; = IF(p0402<0.5;-SQRT(p0007*EXP(p0534^2*p0008)-p0007);SQRT(p0007*EXP(p0534^2*p0008)-p0007))
- p2055: 5.59471
- p2998: 0; = p2412*(p1020+p1022)
- p0244: 25.489
- p1782: 0
- p1799: 0
- p3306: 0; = if(and(p1232=0;p3252<>0);p3252*(p3257*p3277-p3301)/p3305;0)
- p4704: 1.83623e-7; = p1943*p3481
- p3146: 6.37454e-5; = p2365*p1023
- p1277: 0
- p2304: 0; = p2227*p2211
- p1659: 0
- p0555: 0; = IF(p0291<0.5;-SQRT(p0007*EXP(p0423^2*p0008)-p0007);SQRT(p0007*EXP(p0423^2*p0008)-p0007))
- p2250: 0.00994439; = p2222*p2196
- p2230: 1; = if(p0783*p0787+p0784*p0788+p0785*p0789+p0786*p0790=0;0;p0787*p0783/(p0783*p0787+p0784*p0788+p0785*p0789+p0786*p0790))
- p1262: 0; = if(p1232>0;0;p0733/100)
- p1994: 750
- p1992: 3900
- p0651: 0; = IF(p0387<0.5;-SQRT(p0007*EXP(p0519^2*p0008)-p0007);SQRT(p0007*EXP(p0519^2*p0008)-p0007))
- p4747: 0; = p1780*p3482
- p0255: 28.335
- p0241: 10.622
- p0353: 0.5
- p2532: 0.000147492; = p2336*p1073
- p0284: 0.5
- p4514: 0; = p1963*p3480
- p1830: 0
- p2211: 0.000328822; = p1120-p2209-p2208-p2210
- p2949: 2.29625e-6; = p2363*(p1020+p1022)
- p3415: 0; = p3377*p1238
- p2292: 0; = p2223*p2199
- p2221: 5.45992e-5; = p1155-p2220
- p3204: 0; = p2423*p1082
- p2489: 0; = p2293*p1014
- p1342: 0; = p1326*p0801
- p2645: 0.000226524; = p2254*(p1019+p1021)
- p3674: 0; = p1943*p3476
- p3104: 3.03854e-6; = p2323*p1023
- p0815: 0
- p0782: 9.425; = p0122*(1+p0650*p0254/100)
- p2936: 0; = p2350*(p1129+p1131)
- p2573: 0; = p2377*p1073
- p3009: 0; = p2423*(p1079+p1081)
- p1205: 0
- p2312: 0; = p2231*p2219
- p3075: 0; = p2294*p1023
- p0191: 22.302
- p0948: 9.85457e-6; = if(and(p0683=0;or(p0807=480;p0807=32;p0807=1;and(p0807=60;p0901<0.03)));p0936;0)
- p2324: 9.29352e-6; = p2224*p2191
- p2987: 0; = p2401*(p1020+p1022)
- p5270: 2.38501e-9; = p1891*p3484
- p0441: 0; = SQRT(2)*(IF((2*p0309-1)<0;-1;IF((2*p0309-1)>0;1;0))*SQRT(SQRT((2/(pi()*0.140012289)+LN(1-(2*p0309-1)^2)/2)^2-LN(1-(2*p0309-1)^2)/0.140012289)-(2/(pi()*0.140012289)+LN(1-(2*p0309-1)^2)/2)))
- p2103: 0.912485
- p1617: 0
- p3377: 0; = if(p1232=0;p3246*p3359/p0818;0)
- p2564: 9.45505e-7; = p2368*p1014
- p2259: 0.000125666; = p2226*p2205
- p3363: 0; = if(p1232=0;p3244*p3357/p0818;0)
- p0820: 0; = if(p0807=480;p0814;0)
- p2862: 0; = p2276*(p1020+p1022)
- p3237: 0.854735
- p3000: 0; = p2414*(p1079+p1081)
- p0686: 190.649; = p0026*(1+p0554*p0158/100)
- p0508: 0; = SQRT(2)*(IF((2*p0376-1)<0;-1;IF((2*p0376-1)>0;1;0))*SQRT(SQRT((2/(pi()*0.140012289)+LN(1-(2*p0376-1)^2)/2)^2-LN(1-(2*p0376-1)^2)/0.140012289)-(2/(pi()*0.140012289)+LN(1-(2*p0376-1)^2)/2)))
- p4822: 0; = p1855*p3482
- p1557: 0
- p2137: 2.89621e-6; = p2015*p2065*p2099/(p0818*1000)
- p1657: 0
- p2956: 6.58097e-7; = p2370*(p1020+p1022)
- p1816: 0
- p3016: 0; = p2430*(p1129+p1131)
- p2897: 0; = p2311*(p1129+p1131)
- p2941: 3.17102e-5; = p2355*(p1020+p1022)
- p2033: 0.000115388; = p2015*p2029*p2031/(p0818*1000)
- p2704: 0; = p2313*(p1128+p1130)
- p1743: 0
- p2695: 0; = p2304*(p1078+p1080)
- p0503: 0; = SQRT(2)*(IF((2*p0371-1)<0;-1;IF((2*p0371-1)>0;1;0))*SQRT(SQRT((2/(pi()*0.140012289)+LN(1-(2*p0371-1)^2)/2)^2-LN(1-(2*p0371-1)^2)/0.140012289)-(2/(pi()*0.140012289)+LN(1-(2*p0371-1)^2)/2)))
- p3229: 1.17502e-6; = p1164/p0818
- p1652: 0
- p1886: 0
- p0760: 0
- p2316: 0.000128339; = p2224*p2183
- p2027: 0.428799
- p0739: 0.547; = p0079*(1+p0607*p0211/100)
- p2416: 0; = p2235*p2206
- p2129: 7.58218e-5; = p2015*p2057*p2091/(p0818*1000)
- p2666: 0; = p2275*(p1128+p1130)
- p0342: 0.5
- p1795: 0
- p3313: 0; = if(and(p1232=0;p3253<>0);p3262*(p3278*(p3282*p1256+p3286*(p1253+p1257)+p1258*p3288+p3298*p3287));0)
- p3346: 0; = if(and(p1232=0;p3256<>0);p3274*(p3281*(p3285*p1256+p3286*(p1253+p1257)+p1258*p3288));0)
- p0513: 0; = SQRT(2)*(IF((2*p0381-1)<0;-1;IF((2*p0381-1)>0;1;0))*SQRT(SQRT((2/(pi()*0.140012289)+LN(1-(2*p0381-1)^2)/2)^2-LN(1-(2*p0381-1)^2)/0.140012289)-(2/(pi()*0.140012289)+LN(1-(2*p0381-1)^2)/2)))
- p2788: 0; = p2397*(p1019+p1021)
- p2067: 0.446471
- p2655: 0; = p2264*(p1078+p1080)
- p2830: 4.82883e-5; = p2244*(p1020+p1022)
- p0688: 0
- p3126: 2.24577e-6; = p2345*p1082
- p0781: 0
- p2659: 0; = p2268*(p1078+p1080)
- p0932: 0; = p0801*p0926
- p0846: 0.818208; = p0841*p0845^3+p0842*p0845^2+p0843*p0845+p0844
- p1751: 0
- p0944: 0; = if(and(p0683=0;p0950=0);p0938;0)
- p1690: 0
- p2264: 9.90318e-6; = p2226*p2210
- p0793: 0
- p0045: 70.335
- p2556: 0.000242829; = p2360*p1014
- p3022: 9.3325e-5; = p2241*p1023
- p0374: 0.5
- p1575: 0
- p2094: 0.922577
- p3203: 0; = p2422*p1082
- p1854: 0
- p4363: 0; = p1808*p3480
- p2781: 0; = p2390*(p1128+p1130)
- p1956: 0
- p0733: 0
- p2943: 1.04723e-5; = p2357*(p1020+p1022)
- p0367: 0.5
- p2742: 0; = p2351*(p1128+p1130)
- p3244: 0; = p0791/100
- p2979: 0; = p2393*(p1020+p1022)
- p3181: 0; = p2400*p1023
- p3483: 0; = if(p1328+p1330+p1332+p1334+p1336+p1338+p1340+p1342+p1344=0;0;p1342/(p1328+p1330+p1332+p1334+p1336+p1338+p1340+p1342+p1344))
- p1201: 0.65
- p2743: 0; = p2352*(p1128+p1130)
- p1667: 0
- p0120: 56.065
- p1138: 59716.1; = if(p1121=0;p1132*(p0716/100)*p0703*1000;0)
- p3092: 0; = p2311*p1132
- p2954: 1.82366e-7; = p2368*(p1020+p1022)
- p2858: 0.000302527; = p2272*(p1129+p1131)
- p2762: 3.74225e-5; = p2371*(p1019+p1021)
- p1847: 0
- p2190: 0.000511698; = 32.065*p2189/(2*14.0067)
- p2517: 0.000133325; = p2321*p1014
- p1372: 196
- p2331: 2.66349e-6; = p2224*p2199
- p2770: 0; = p2379*(p1078+p1080)
- p0673: 0
- p2327: 9.12497e-5; = p2224*p2195
- p3205: 0; = p2424*p1082
- p1963k: 4.01602e-7; = p1744*p1948+p1745*p1949+p1746*p1950+p1747*p1951+p1748*p1952+p1749*p1953+p1750*p1954+p1751*p1955+p1752*p1956+p1753*p1957+p1961*p1962
- p3390: 0; = p3371*p1234
- p2997: 0; = p2411*(p1020+p1022)
- p0587: 0; = IF(p0323<0.5;-SQRT(p0007*EXP(p0455^2*p0008)-p0007);SQRT(p0007*EXP(p0455^2*p0008)-p0007))
- p1614: 0
- p2245: 0.000407433; = p2222*p2190
- p0706: 7.877; = p0046*(1+p0574*p0178/100)
- p1026: 0; = IF(p1012=0;p1020*(p0704/100)*p0703*1000;0)
- p3243: 3.7546e-10; = p3234*p1188*p3239/p0818
- p5046: 0; = p1873*p3483
- p2443: 0.000583192; = p2247*p1014
- p2432: 0.0119717; = p1158
- p3438: 0; = p3362*p1240
- p2996: 0; = p2410*(p1020+p1022)
- p1131: 0; = if(p1121=0;IF(p1123+p1128+p1129+p1130=1;0;IF(p1123+p1128+p1129+p1130+p1127>1;1-(p1123+p1128+p1129+p1130);p1127));0)
- p2841: 0.000167256; = p2255*(p1020+p1022)
- p2002: 750
- p0606: 0; = IF(p0342<0.5;-SQRT(p0007*EXP(p0474^2*p0008)-p0007);SQRT(p0007*EXP(p0474^2*p0008)-p0007))
- p1281: 0; = IF(p1277+p1280=p1263;0;IF(p1277+p1280+p1279>p1263;p1263-(p1277+p1280);p1279))

## Reference product
- winter wheat; at harvest in 1996; at farm; 86%-90% moisture: 1 kg

## Inputs from technosphere
- CUTOFF local area trucking; class 6, average fuel: 0.00132231 metric ton*km; = p2010
- CUTOFF nitrogenous fertilizer, ammonium nitrate; at point-of-sale: 0.00425533 kg; = p1066
- CUTOFF phosphatic fertilizer, superphos. grades 22% and under; at point-of-sale: 1.31615e-5 kg; = p1116
- CUTOFF pesticide, Propiconazole; at point-of-sale; kg AI: 2.12766e-6 kg; = p1914
- CUTOFF sowing svc; for unspec till, 1996 winter wheat: 4.1984e-6 ha; = p0951
- CUTOFF phosphatic fertilizer, other single phosphates; at point-of-sale: 7.90642e-5 kg; = p1118
- CUTOFF pesticide, Bromoxynil; at point-of-sale; kg AI: 1.98582e-5 kg; = p1780
- CUTOFF pesticide, Thifensulfuron methyl; at point-of-sale; kg AI: 6.07903e-7 kg; = p1943
- CUTOFF apply liming materials; unspecified method: 0.000216944 ha; = p1227
- CUTOFF sowing svc; for conventional till, 1996 winter wheat: 9.01563e-5 ha; = p0946
- CUTOFF sulfuric acid storage: 4.89573e-8 kg*a; = p1180
- CUTOFF limestone, high-grade, pulverized; at point-of-sale: 0.0133229 kg; = p1228
- CUTOFF harvest; winter: 0.000212424 ha; = p1971
- CUTOFF sulfur; at point-of-sale: 8.77927e-8 kg; = p1172
- CUTOFF pesticide, Diclofop-methyl; at point-of-sale; kg AI: 2.43161e-6 kg; = p1812
- CUTOFF prepare soil; for mulch till, wheat: 1.26699e-5 ha; = p0935
- CUTOFF apply pesticide; broadcast with incorporation: 0.000163473 ha; = p1333
- CUTOFF pesticide, Triasulfuron; at point-of-sale; kg AI: 5.06586e-7 kg; = p1949
- CUTOFF apply zinc compounds; unspecified method: 0.000216944 ha; = p1183
- CUTOFF potassic fertilizer, potassium chloride; at point-of-sale: 0.000997359 kg; = p1154
- CUTOFF sulfur storage: 4.38963e-8 kg*a; = p1174
- CUTOFF fertilizer storage: 0.0300884 kg*a; = p1160
- CUTOFF prepare soil; for reduced till, wheat; 15-30% residue: 0.000100064 ha; = p0937
- CUTOFF pesticide, Metribuzin; at point-of-sale; kg AI: 4.35664e-6 kg; = p1890
- CUTOFF apply mixed N fertilizer; without incorporation: 2.88587e-5 ha; = p1034
- CUTOFF pesticide, MCPA; at point-of-sale; kg AI: 2.87741e-5 kg; = p1873
- CUTOFF bulk cargo rail transport; diesel: 0.0330578 metric ton*km; = p2008
- CUTOFF sowing svc; for mulch till, 1996 winter wheat: 1.26699e-5 ha; = p0947
- CUTOFF apply N fertilizer; broadcast with incorporation: 1.67566e-5 ha; = p1031
- CUTOFF apply sulfuric acid; unspecified method: 0.000216944 ha; = p1177
- CUTOFF pesticide storage: 0.000141618 kg*a; = p1965
- CUTOFF N inhibitor appl svc; unspec rate & type, 1996 winter wheat: 0.000243161 ha; = p1162
- CUTOFF nitrogenous fertilizer, aqueous ammonia; at point-of-sale: 0.000757233 kg; = p1065
- CUTOFF regional or national trucking; class 8, average fuel: 0.00655637 metric ton*km; = p2009
- CUTOFF nitrogenous fertilizer, anhydrous ammonia; at point-of-sale: 0.0098722 kg; = p1064
- CUTOFF international vessel transport; average fuel: 0.157187 metric ton*km; = p2006
- CUTOFF apply pesticide; unspecified application methods: 1.20847e-5 ha; = p1345
- CUTOFF nitrogenous fertilizer, nitrogen solutions; at point-of-sale: 0.0196467 kg; = p1068
- CUTOFF pesticide, Chlorsulfuron; at point-of-sale; kg AI: 4.05268e-7 kg; = p1794
- CUTOFF sowing svc; for reduced till, 1996 winter wheat: 0.000100064 ha; = p0949
- CUTOFF zinc compounds; at point-of-sale: 2.69313e-8 kg; = p1184
- CUTOFF apply gypsum; unspecified method: 0.000216944 ha; = p1165
- CUTOFF nitrogenous fertilizer, urea; at point-of-sale: 0.00793779 kg; = p1070
- CUTOFF prepare soil; for unspec. till, wheat: 4.1984e-6 ha; = p0939
- CUTOFF nitrogenous fertilizer, sodium nitrate; at point-of-sale: 6.38722e-5 kg; = p1069
- CUTOFF apply K fertilizer; broadcast without incorporation: 1.46523e-5 ha; = p1141
- CUTOFF pesticide, Metsulfuron-methyl; at point-of-sale; kg AI: 1.01317e-7 kg; = p1891
- CUTOFF apply pesticide; as foliar or directed spray: 0.000155069 ha; = p1339
- CUTOFF potassic fertilizer, other single nutrients; at point-of-sale: 8.60189e-5 kg; = p1155
- CUTOFF apply sewage sludge; unspecified method: 0.000216944 ha; = p1189
- CUTOFF liming materials storage: 0.00683711 kg*a; = p1231
- CUTOFF pesticide, Tribenuron-methyl; at point-of-sale; kg AI: 3.03951e-7 kg; = p1950
- CUTOFF sowing svc; for no-till, 1996 winter wheat: 9.85457e-6 ha; = p0948
- CUTOFF zinc compounds storage: 1.34657e-8 kg*a; = p1186
- CUTOFF gypsum; at point-of-sale: 1.17502e-6 kg; = p1166
- CUTOFF harvest; winter wheat residue management: 0.000216944 ha; = p1975
- CUTOFF pesticide, Glyphosate; at point-of-sale; kg AI: 1.38804e-5 kg; = p1855
- CUTOFF apply pesticide; broadcast without incorporation: 1.61506e-5 ha; = p1335
- CUTOFF prepare soil; for no-till, wheat: 9.85457e-6 ha; = p0936
- CUTOFF dolomite, pulverized; at point-of-sale: 0.00035129 kg; = p1229
- CUTOFF pesticide formulation balance; at point-of-sale: 7.95454e-5 kg; = p1963
- CUTOFF apply pesticide; broadcast by air: 0.000166594 ha; = p1331
- CUTOFF pesticide, 2,4-D; at point-of-sale; kg AI: 5.51165e-5 kg; = p1754
- CUTOFF pesticide, Dicamba; at point-of-sale; kg AI: 1.92503e-6 kg; = p1808
- CUTOFF domestic barge transport; average fuel: 0.0176308 metric ton*km; = p2007
- CUTOFF prepare soil; for conventional till, wheat; <15% residue: 9.01563e-5 ha; = p0934
- CUTOFF apply single or mixed N fertilizer; unspec. method: 1.74905e-5 ha; = p1035
- CUTOFF irrigate; unspec. irrigation method, unspec. water source, in 1996: 5.86642e-6 ha-m; = p1011
- CUTOFF phosphatic fertilizer, monoammonium phosphate; at point-of-sale: 0.000540689 kg; = p1120
- CUTOFF apply N fertilizer; no broadcast application: 0.000149623 ha; = p1030
- CUTOFF sulfuric acid; at point-of-sale: 9.79146e-8 kg; = p1178
- CUTOFF apply single or mixed K fertilizer; unspec. method: 5.39793e-6 ha; = p1144
- winter wheat residue; at harvest in 1996; at farm; 83%-90% moisture: 0.658314 kg; = p0839
- CUTOFF nitrogenous fertilizer, ammonium sulfate; at point-of-sale: 0.00212877 kg; = p1067
- CUTOFF sewage sludge storage: 3.62546e-8 kg*a; = p1192
- CUTOFF sewage sludge; at point-of-sale: 7.25092e-8 kg; = p1190
- CUTOFF apply sulfur; unspecified method: 0.000216944 ha; = p1171
- CUTOFF manure appl svc; unspec rate, 1996 winter wheat: 0.000216944 ha; = p1233
- CUTOFF apply single or mixed P fertilizer; unspec. method: 1.64283e-5 ha; = p1094
- CUTOFF apply P fertilizer; no broadcast application: 3.67894e-5 ha; = p1089
- CUTOFF phosphatic fertilizer, superphosphate grades over 22%; at point-of-sale: 0.000196042 kg; = p1117
- CUTOFF fertilizer filler materials; at point-of-sale: 0.0119717 kg; = p1158
- CUTOFF gypsum storage: 5.87509e-7 kg*a; = p1168
- CUTOFF phosphatic fertilizer, diammonium phosphate; at point-of-sale: 0.0016308 kg; = p1119

## Inputs from nature
- Occupation, annual crop [natural resource, land]: 1.77505 m2*year; = 1.0 * (p0855)
- Water, unspecified origin: 0.0590051 m3; = p0893*0.001+p0916*0.001
- Transformation, from annual crop [natural resource, land]: 2.16944 m2; = 1.0 * (p0883)
- Dry matter except CNPK; from plant uptake: 1.27956 kg; = p0917
- Transformation, to annual crop [natural resource, land]: 2.16944 m2; = 1.0 * (p0857)
- Carbon dioxide: 3.5495 kg; = p0900*3.6666666667
- Potassium; from plant uptake; biogenic: 0.0189815 kg; = p0915
- Nitrogen: 0.0341917 kg; = p0905
- Phosphorus: 0.00590066 kg; = p0910

## Emissions to nature
- Acetic acid [air, non-urban air or from high stacks]: 0.000344198 kg; = 1.0 * (p2127*2.5)
- Dioxins and furans (PCDD/F); from residue burning: 1.84561e-12 kg TEQ; = p2047
- Nitrogen solution; no broadcast in fert. in fall bef. plant.; no broadcast in fert. in fall bef. plant.; kg N: 0.00330084 kg; = p2444
- Butadiene [air, non-urban air or from high stacks]: 9.28232e-6 kg; = 1.0 * (p2143*1.125)
- Butane [air, non-urban air or from high stacks]: 3.7376e-6 kg; = 1.0 * (p2147*1.0208333333)
- Phosphorous; applied in sewage sludge: 4.04853e-10 kg; = p3241
- Superphosphate, grades>22%; no broadcast in fert. at plant.; kg P: 1.7193e-5 kg; = p2542
- Particulates, < 2.5 um [air, non-urban air or from high stacks]: 0.000247927 kg; = 1.0 * (p2035+p2033)
- Tribenuron-methyl: 9.86353e-8 kg; = p3887
- Plant dry matter; in aboveground residue left on field: 0.27071 kg; = p2172
- Methanol [air, non-urban air or from high stacks]: 0.000202191 kg; = 1.0 * (p2129*2.6666666667)
- Ammonia [air, non-urban air or from high stacks]: 0.000133505 kg; = 1.0 * (p2159*1.2142857143)
- Diclofop-methyl: 7.89082e-7 kg; = p3749
- MCPA [soil, agricultural]: 1.94366e-5 kg; = 1.0 * (p4222+p4016+p5252+p4634)
- Acetaldehyde [air, non-urban air or from high stacks]: 7.65155e-5 kg; = 1.0 * (p2130*1.8333333333)
- Ammonium sulfate; unspec. appl. method in fert. after plant.: 2.2793e-5 kg; = p3142*4.7142857143
- Thifensulfuron methyl; broadcast by air: 1.97271e-7 kg; = p3880
- Thifensulfuron methyl; broadcast without incorporation: 1.91246e-8 kg; = p4292
- Metribuzin [air, non-urban air or from high stacks]: 1.41377e-6 kg; = 1.0 * (p3827)
- Other single phosphates; no broadcast in fert. in fall bef. plant.; kg P: 2.16378e-6 kg; = p2466
- Benzene [air, non-urban air or from high stacks]: 9.44008e-6 kg; = 1.0 * (p2140*1.0833333333)
- Acrylonitrile: 2.06215e-6 kg; = p2156*1.4722222222
- Ammonium sulfate; broadcast w/ incorp. in fert. at plant.: 1.19894e-5 kg; = p2713*4.7142857143
- Ammonium nitrate; no broadcast in fert. at plant.: 0.000341381 kg; = p2515*4.7142857143
- Sodium nitrate; broadcast w/ incorp. in fert. in fall bef. plant.: 3.89158e-6 kg; = p2642*6.0714285714
- Nitrogen solution; broadcast w/o incorp. in fert. in fall bef. plant.; broadcast w/o incorp. in fert. in fall bef. pl...: 0.000636656 kg; = p2834
- Glycolaldehyde; from residue burning: 0.000123947 kg; = p2135*2.5
- Aqueous ammonia; unspec. appl. method in fert. after plant.: 2.23754e-6 kg; = p3137*1.2142857143
- Sodium nitrate; no broadcast in fert. at plant.: 3.15186e-6 kg; = p2525*6.0714285714
- Particulates, < 10 um: 0.00040665 kg; = p2034+p2036
- Anhydrous ammonia; broadcast w/ incorp. in fert. after plant.: 0.000101852 kg; = p2745*1.2142857143
- Sodium nitrate; broadcast w/ incorp. in fert. at plant.: 3.52985e-7 kg; = p2720*6.0714285714
- Anhydrous ammonia; broadcast w/ incorp. in fert. in fall bef. plant.: 0.000616526 kg; = p2628*1.2142857143
- Diammonium phosphate; no broadcast in fert. in fall bef. plant.: 0.000409543 kg; = p2455*4.7142857143
- Anhydrous ammonia; broadcast w/o incorp. in fert. at plant.: 9.63105e-5 kg; = p2901*1.2142857143
- Oxygen; applied in dolomite: 0.000176329 kg; = p3228
- Ammonium sulfate; unspec. appl. method in fert. at plant.: 1.25145e-5 kg; = p3103*4.7142857143
- Zinc compounds: 2.69313e-8 kg; = p3232
- Metsulfuron-methyl [soil, agricultural]: 6.84387e-8 kg; = 1.0 * (p5270+p4652+p4034+p4240)
- Sodium nitrate; broadcast w/o incorp. in fert. after plant.: 1.10722e-6 kg; = p2954*6.0714285714
- Sodium nitrate; broadcast w/ incorp. in fert. after plant.: 6.42901e-7 kg; = p2759*6.0714285714
- Potassium; in above-ground residue left on field; biogenic: 0.00633645 kg; = p2170
- Superphosphate, grades<= 22%; unspec. appl. method in fert. at plant.; kg P: 2.14765e-7 kg; = p3125
- Other single phosphates; no broadcast in fert. at plant.; kg P: 3.32253e-6 kg; = p2544
- Chlorsulfuron [soil, agricultural]: 2.73755e-7 kg; = 1.0 * (p3937+p4143+p4555+p5173)
- Other single phosphates; unspec. appl. method in fert. in fall bef. plant.; kg P: 9.66235e-7 kg; = p3051
- Monoammonium phosphate; unspec. appl. method in fert. in fall bef. plant.: 5.81609e-5 kg; = p3044*8.2142857143
- Anhydrous ammonia; broadcast w/o incorp. in fert. in fall bef. plant.: 0.0010618 kg; = p2823*1.2142857143
- Plant dry matter; in below-ground residue: 0.136757 kg; = p2177
- Tribenuron-methyl [soil, agricultural]: 2.05316e-7 kg; = 1.0 * (p5329+p4299+p4093+p4711)
- Other single K nutrients; unspec. appl. method in fert. in fall bef. plant.; kg K: 8.45881e-6 kg; = p3055
- Aqueous ammonia; no broadcast in fert. after plant.: 1.9141e-5 kg; = p2552*1.2142857143
- trans-2-Butene: 3.50314e-6 kg; = p2148*1.1666666667
- Sewage sludge dry matter; applied in sewage sludge: 3.7546e-10 kg; = p3243
- Urea; broadcast w/ incorp. in fert. in fall bef. plant.: 0.000485581 kg; = p2646*5
- Aqueous ammonia; broadcast w/o incorp. in fert. at plant.: 2.02702e-6 kg; = p2903*1.2142857143
- Ash: 0.0121687 kg; = p2022+p2021
- Propiconazole [air, non-urban air or from high stacks]: 6.90447e-7 kg; = 1.0 * (p3851)
- Aqueous ammonia; no broadcast in fert. at plant.: 1.05094e-5 kg; = p2513*1.2142857143
- Urea; no broadcast in fert. at plant.: 0.000393281 kg; = p2529*5
- Diammonium phosphate; no broadcast in fert. at plant.: 0.000628861 kg; = p2533*4.7142857143
- MCPA: 9.33747e-6 kg; = p3810
- Potassium; in below-ground residue; biogenic: 0.00320104 kg; = p2176
- Potassium chloride; unspec. appl. method in fert. in fall bef. plant.: 0.00024705 kg; = p3053*2.2166666667
- Urea; broadcast w/ incorp. in fert. after plant.: 8.02195e-5 kg; = p2763*5
- Urea; unspec. appl. method in fert. in fall bef. plant.: 0.000506848 kg; = p3036*5
- Aqueous ammonia; no broadcast in fert. in fall bef. plant.: 0.000115863 kg; = p2435*1.2142857143
- Pesticide formulation balance; unspec. appl. method: 1.8725e-6 kg; = p5338
- Acetonitrile [air, non-urban air or from high stacks]: 1.29145e-5 kg; = 1.0 * (p2155*1.7083333333)
- Phenol [air, non-urban air or from high stacks]: 3.19089e-5 kg; = 1.0 * (p2133*1.3055555556)
- Ammonium sulfate; broadcast w/o incorp. in fert. in fall bef. plant.: 0.000227645 kg; = p2830*4.7142857143
- Ammonium nitrate; unspec. appl. method in fert. at plant.: 3.99066e-5 kg; = p3100*4.7142857143
- Metsulfuron-methyl: 3.28784e-8 kg; = p3828
- Ammonium nitrate; no broadcast in fert. after plant.: 0.000621765 kg; = p2554*4.7142857143
- Aqueous ammonia; broadcast w/o incorp. in fert. after plant.: 3.69186e-6 kg; = p2942*1.2142857143
- Formaldehyde [air, non-urban air or from high stacks]: 0.000127893 kg; = 1.0 * (p2128*2.5)
- Urea; broadcast w/o incorp. in fert. in fall bef. plant.: 0.000836281 kg; = p2841*5
- Monoammonium phosphate; no broadcast in fert. in fall bef. plant.: 0.000130245 kg; = p2459*8.2142857143
- Methyl vinyl ether; from residue burning: 4.66611e-6 kg; = p2137*1.6111111111
- Propiconazole [soil, agricultural]: 1.43721e-6 kg; = 1.0 * (p5293+p4263+p4675+p4057)
- Sodium nitrate; no broadcast in fert. after plant.: 5.74057e-6 kg; = p2564*6.0714285714
- 2,4-D [air, non-urban air or from high stacks]: 1.78859e-5 kg; = 1.0 * (p3691)
- Sodium nitrate; broadcast w/o incorp. in fert. at plant.: 6.07922e-7 kg; = p2915*6.0714285714
- Carbon dioxide, in air: 0.0823263 kg; = p2163*3.6666666667
- Other single phosphates; unspec. appl. method in fert. at plant.; kg P: 1.48367e-6 kg; = p3129
- Carbon [soil, agricultural]: 0.364866 kg; = 1.0 * (p2173+p3242+p3225+p3217+p2167)
- Anhydrous ammonia; no broadcast in fert. at plant.: 0.000499336 kg; = p2511*1.2142857143
- Anhydrous ammonia; unspec. appl. method in fert. at plant.: 5.83713e-5 kg; = p3096*1.2142857143
- Superphosphate, grades<= 22%; no broadcast in fert. at plant.; kg P: 4.80944e-7 kg; = p2540
- Other limestone constituents; applied in limestone: 0.000799376 kg; = p3220
- Anhydrous ammonia; no broadcast in fert. after plant.: 0.000909453 kg; = p2550*1.2142857143
- Ammonium nitrate; broadcast w/o incorp. in fert. in fall bef. plant.: 0.000725919 kg; = p2827*4.7142857143
- Aqueous ammonia; broadcast w/ incorp. in fert. at plant.: 1.17697e-6 kg; = p2708*1.2142857143
- Dicamba [air, non-urban air or from high stacks]: 6.2469e-7 kg; = 1.0 * (p3745)
- Urea; no broadcast in fert. after plant.: 0.000716292 kg; = p2568*5
- Ethane [air, non-urban air or from high stacks]: 5.59049e-5 kg; = 1.0 * (p2126*1.25)
- Aqueous ammonia; unspec. appl. method in fert. at plant.: 1.22852e-6 kg; = p3098*1.2142857143
- Sodium nitrate; unspec. appl. method in fert. in fall bef. plant.: 4.06202e-6 kg; = p3032*6.0714285714
- Urea; broadcast w/ incorp. in fert. at plant.: 4.40446e-5 kg; = p2724*5
- Glyphosate [soil, agricultural]: 9.3761e-6 kg; = 1.0 * (p3998+p4616+p5234+p4204)
- I butane; from residue burning: 1.29778e-6 kg; = p2146*1.0208333333
- Carbon monoxide, fossil [air, non-urban air or from high stacks]: 0.00339404 kg; = 1.0 * (p2028*2.3333333333)
- Sodium nitrate; unspec. appl. method in fert. at plant.: 3.68446e-7 kg; = p3110*6.0714285714
- Monoammonium phosphate; unspec. appl. method in fert. at plant.: 8.93072e-5 kg; = p3122*8.2142857143
- Nitrogen solution; broadcast w/ incorp. in fert. at plant.; broadcast w/ incorp. in fert. at plant.; kg N: 3.35309e-5 kg; = p2717
- Nitrogen solution; unspec. appl. method in fert. in fall bef. plant.; unspec. appl. method in fert. in fall bef. plan...: 0.000385861 kg; = p3029
- Urea; no broadcast in fert. in fall bef. plant.: 0.00433583 kg; = p2451*5
- Triasulfuron: 1.64392e-7 kg; = p3886
- Ethene [air, non-urban air or from high stacks]: 8.95127e-5 kg; = 1.0 * (p2125*1.1666666667)
- Sodium nitrate; no broadcast in fert. in fall bef. plant.: 3.47485e-5 kg; = p2447*6.0714285714
- Thifensulfuron methyl; foliar or directed spray: 1.83623e-7 kg; = p4704
- Urea; broadcast w/o incorp. in fert. at plant.: 7.58548e-5 kg; = p2919*5
- Gypsum: 1.17502e-6 kg; = p3229
- Formic acid [air, non-urban air or from high stacks]: 6.16448e-5 kg; = 1.0 * (p2131*3.8333333333)
- Bromoxynil: 6.44417e-6 kg; = p3717
- Ammonium nitrate; unspec. appl. method in fert. after plant.: 7.26829e-5 kg; = p3139*4.7142857143
- Nitrogen solution; no broadcast in fert. at plant.; no broadcast in fert. at plant.; kg N: 0.000299403 kg; = p2522
- Toluene [air, non-urban air or from high stacks]: 1.17179e-5 kg; = 1.0 * (p2141*1.0952380952)
- 1-Butene: 8.23545e-6 kg; = p2144*1.1666666667
- Water: 58.79 kg; = p2171+p2181+p2178
- Phosphorous; in above-ground residue left on field: 0.00104109 kg; = p2169
- Ammonium sulfate; broadcast w/ incorp. in fert. after plant.: 2.18366e-5 kg; = p2752*4.7142857143
- isopentane: 1.04121e-6 kg; = p2151*1.0166666667
- Nitrogen solution; broadcast w/o incorp. in fert. at plant.; broadcast w/o incorp. in fert. at plant.; kg N: 5.77479e-5 kg; = p2912
- Methane: 0.000130194 kg; = p2025*1.3333333333
- Acetol; from residue burning: 0.000231639 kg; = p2134*2.0555555556
- Diammonium phosphate; unspec. appl. method in fert. in fall bef. plant.: 0.000182881 kg; = p3040*4.7142857143
- Metribuzin [soil, agricultural]: 2.94286e-6 kg; = 1.0 * (p4651+p4033+p5269+p4239)
- Ammonium sulfate; no broadcast in fert. after plant.: 0.000194983 kg; = p2557*4.7142857143
- Ammonium sulfate; broadcast w/ incorp. in fert. in fall bef. plant.: 0.00013218 kg; = p2635*4.7142857143
- Glyphosate [air, non-urban air or from high stacks]: 4.50434e-6 kg; = 1.0 * (p3792)
- Ammonium sulfate; no broadcast in fert. at plant.: 0.000107055 kg; = p2518*4.7142857143
- Anhydrous ammonia; unspec. appl. method in fert. in fall bef. plant.: 0.000643529 kg; = p3018*1.2142857143
- Superphosphate, grades>22%; unspec. appl. method in fert. at plant.; kg P: 7.67753e-6 kg; = p3127
- Furan [air, non-urban air or from high stacks]: 6.72974e-6 kg; = 1.0 * (p2138*1.4166666667)
- 2,4-D [soil, agricultural]: 3.72307e-5 kg; = 1.0 * (p5133+p3897+p4103+p4515)
- Ammonium sulfate; broadcast w/o incorp. in fert. after plant.: 3.76077e-5 kg; = p2947*4.7142857143
- Ammonium nitrate; broadcast w/ incorp. in fert. after plant.: 6.96331e-5 kg; = p2749*4.7142857143
- Sodium nitrate; unspec. appl. method in fert. after plant.: 6.71059e-7 kg; = p3149*6.0714285714
- Nitrogen solution; unspec. appl. method in fert. after plant.; unspec. appl. method in fert. after plant.; kg N: 6.37454e-5 kg; = p3146
- Ammonium nitrate; broadcast w/ incorp. in fert. in fall bef. plant.: 0.000421499 kg; = p2632*4.7142857143
- Aqueous ammonia; unspec. appl. method in fert. in fall bef. plant.: 1.35442e-5 kg; = p3020*1.2142857143
- Ammonium sulfate; no broadcast in fert. in fall bef. plant.: 0.00118026 kg; = p2440*4.7142857143
- Nitrogen solution; broadcast w/ incorp. in fert. after plant.; broadcast w/ incorp. in fert. after plant.; kg N: 6.10706e-5 kg; = p2756
- Anhydrous ammonia; no broadcast in fert. in fall bef. plant.: 0.00550506 kg; = p2433*1.2142857143
- Thifensulfuron methyl; unspec. appl. method: 1.431e-8 kg; = p5322
- Chlorsulfuron: 1.31514e-7 kg; = p3731
- Ammonium sulfate; unspec. appl. method in fert. in fall bef. plant.: 0.00013797 kg; = p3025*4.7142857143
- Oxygen; applied in limestone: 0.00600586 kg; = p3219
- Monoammonium phosphate; no broadcast in fert. at plant.: 0.000199994 kg; = p2537*8.2142857143
- Plant dry matter; from residue burning: 0.0221056 kg; = p2164
- Ammonium nitrate; broadcast w/ incorp. in fert. at plant.: 3.82321e-5 kg; = p2710*4.7142857143
- Propane [air, non-urban air or from high stacks]: 1.73266e-5 kg; = 1.0 * (p2142*1.2222222222)
- Nitrogen solution; broadcast w/o incorp. in fert. after plant.; broadcast w/o incorp. in fert. after plant.; kg N: 0.000105178 kg; = p2951
- Superphosphate, grades<= 22%; no broadcast in fert. in fall bef. plant.; kg P: 3.13212e-7 kg; = p2462
- Superphosphate, grades>22%; no broadcast in fert. in fall bef. plant.; kg P: 1.11969e-5 kg; = p2464
- Other single K nutrients; broadcast w/o incorp. in fert. in fall bef. plant.; kg K: 2.29609e-5 kg; = p2860
- Acetone [air, non-urban air or from high stacks]: 2.74541e-5 kg; = 1.0 * (p2139*1.6111111111)
- Anhydrous ammonia; unspec. appl. method in fert. after plant.: 0.000106313 kg; = p3135*1.2142857143
- NMVOC, non-methane volatile organic compounds, unspecified origin [air, non-urban air or from high stacks]: 0.00158072 kg; = 1.0 * (p2052+p2051)
- Nitrogen solution; broadcast w/ incorp. in fert. in fall bef. plant.; broadcast w/ incorp. in fert. in fall bef. plan...: 0.00036967 kg; = p2639
- Pesticide formulation balance; broadcast with incorporation: 2.53296e-5 kg; = p4102
- Filler materials, applied with synthetic fertilizer: 0.0119717 kg; = p2432
- Ammonium nitrate; broadcast w/o incorp. in fert. after plant.: 0.000119924 kg; = p2944*4.7142857143
- Magnesium [soil, agricultural]: 4.4557e-5 kg; = 1.0 * (p3227)
- Anhydrous ammonia; broadcast w/o incorp. in fert. after plant.: 0.000175413 kg; = p2940*1.2142857143
- Pesticide formulation balance; foliar or directed spray: 2.40275e-5 kg; = p4720
- Pentane [air, non-urban air or from high stacks]: 1.30151e-6 kg; = 1.0 * (p2152*1.0166666667)
- Ammonium nitrate; broadcast w/o incorp. in fert. at plant.: 6.58444e-5 kg; = p2905*4.7142857143
- Calcium [soil, agricultural]: 0.00509361 kg; = 1.0 * (p3226+p3218)
- Sodium nitrate; broadcast w/o incorp. in fert. in fall bef. plant.: 6.70219e-6 kg; = p2837*6.0714285714
- Propene [air, non-urban air or from high stacks]: 4.15894e-5 kg; = 1.0 * (p2136*1.1666666667)
- Potassium chloride; broadcast w/o incorp. in fert. in fall bef. plant.: 0.000670601 kg; = p2858*2.2166666667
- cyclopentane: 1.01758e-7 kg; = p2153*1.0166666667
- Anhydrous ammonia; broadcast w/ incorp. in fert. at plant.: 5.5922e-5 kg; = p2706*1.2142857143
- Ammonium sulfate; broadcast w/o incorp. in fert. at plant.: 2.06485e-5 kg; = p2908*4.7142857143
- Diclofop-methyl [soil, agricultural]: 1.64253e-6 kg; = 1.0 * (p3955+p4573+p5191+p4161)
- Thifensulfuron methyl; broadcast with incorporation: 1.93574e-7 kg; = p4086
- cis-2-Butene: 2.64272e-6 kg; = p2149*1.1666666667
- Nitrogen solution; no broadcast in fert. after plant.; no broadcast in fert. after plant.; kg N: 0.00054531 kg; = p2561
- Aqueous ammonia; broadcast w/o incorp. in fert. in fall bef. plant.: 2.23474e-5 kg; = p2825*1.2142857143
- Nitrogen; in below-ground residue: 0.00344026 kg; = p2174
- Pesticide formulation balance; broadcast without incorporation: 2.5025e-6 kg; = p4308
- Ammonium nitrate; unspec. appl. method in fert. in fall bef. plant.: 0.00043996 kg; = p3022*4.7142857143
- Superphosphate, grades<= 22%; unspec. appl. method in fert. in fall bef. plant.; kg P: 1.39865e-7 kg; = p3047
- Sulfuric acid [soil, agricultural]: 9.79146e-8 kg; = 1.0 * (p3231)
- Diammonium phosphate; unspec. appl. method in fert. at plant.: 0.000280818 kg; = p3118*4.7142857143
- Phosphorous; in below-ground residue: 0.000525934 kg; = p2175
- Sulfur dioxide [air, non-urban air or from high stacks]: 2.7069e-5 kg; = 1.0 * (p2041)
- Isoprene [air, non-urban air or from high stacks]: 2.32138e-5 kg; = 1.0 * (p2145*1.1333333333)
- Nitrogen solution; unspec. appl. method in fert. at plant.; unspec. appl. method in fert. at plant.; kg N: 3.49995e-5 kg; = p3107
- Water [air, non-urban air or from high stacks]: 9.76628e-6 m3; = 0.001 * (p2016)
- Sulfur [soil, agricultural]: 8.77927e-8 kg; = 1.0 * (p3230)
- Urea; unspec. appl. method in fert. after plant.: 8.37329e-5 kg; = p3153*5
- Urea; broadcast w/o incorp. in fert. after plant.: 0.000138156 kg; = p2958*5
- Dicamba [soil, agricultural]: 1.30034e-6 kg; = 1.0 * (p3951+p4569+p4157+p5187)
- isobutene: 7.19066e-6 kg; = p2150*1.1666666667
- Aqueous ammonia; broadcast w/ incorp. in fert. after plant.: 2.14365e-6 kg; = p2747*1.2142857143
- Propanenitrile: 3.94204e-6 kg; = p2157*1.5277777778
- Nitrogen dioxide: 0.00012247 kg; = p2039*3.2857142857
- Superphosphate, grades>22%; unspec. appl. method in fert. in fall bef. plant.; kg P: 4.99996e-6 kg; = p3049
- Triasulfuron [soil, agricultural]: 3.42194e-7 kg; = 1.0 * (p4298+p5328+p4092+p4710)
- Nitrogen; in above-ground residue left on field: 0.00680999 kg; = p2168
- Aqueous ammonia; broadcast w/ incorp. in fert. in fall bef. plant.: 1.29758e-5 kg; = p2630*1.2142857143
- Dinitrogen monoxide [air, non-urban air or from high stacks]: 4.30724e-6 kg; = 1.0 * (p2044*1.5714285714)
- Nitrogen; applied in sewage sludge: 3.39139e-9 kg; = p3240
- Ammonium nitrate; no broadcast in fert. in fall bef. plant.: 0.00376364 kg; = p2437*4.7142857143
- Bromoxynil [soil, agricultural]: 1.3414e-5 kg; = 1.0 * (p4129+p3923+p4541+p5159)
- Urea; unspec. appl. method in fert. at plant.: 4.59737e-5 kg; = p3114*5
- Ethyne [air, non-urban air or from high stacks]: 1.67462e-5 kg; = 1.0 * (p2132*1.0833333333)
- Pesticide formulation balance; broadcast by air: 2.58133e-5 kg; = p3896
- Hydrocyanic acid: 1.75506e-5 kg; = p2154*2.25

## Sampling procedure
A delete-a-group jackknife is used by the USDA to estimate the ARMS sample means and RSEs, based on a 15 sample delete-a-group jackknife. Because of this relatively small sample size, a Students t distribution is used to represent ARMS data probability density functions. Other representations of uncertainty are described in Cooper, J.S., Kahn, E., Noon, M. (2012). LCA Digital Commons Unit Process Data: field crop production Version 1. Prepared for the US Department of Agriculture National Agricultural Library. Retrieved from https://www.lcacommons.gov/discovery/docs/LCA%20Digital%20Commons%20Unit%20Process%20Data%20final%20updated.pdf

## Extrapolations
Data represent an aggregation of processes applied in Washington in 1996. Data development is demonstrated by parameterization (exlicitly presents all raw and uncertainty data and all calculations). Flow data quality according to the LCADC convention is provided for all flows.
