# CUTOFF gypsum; at point-of-sale

Dataset: EcoSpold 2, unit process
Geography: GLO
Time period: 1996-01-02 to 2010-01-01
Scenario: Business-as-Usual
System model: Allocation, ecoinvent default
Generated by: cooperjs@u.washington.edu
isCopyrightProtected: false

## General comment
This unit process/ gate-to-gate dataset provides a crosswalk between the exchange "CUTOFF gypsum; at point-of-sale" in the USDA LCA Commons to the exchange "gypsum, mineral, at mine" in the ecoinvent 2.2 database. As a result of the crosswalk, the geographic representativeness is reduced, with the ecoinvent 2.2 data representing operations in Switzerland as opposed to operation in South Carolina (US State). The impact on the temporal representativeness is not known. Applicable classifications include ISIC 0810, NAIC 212399, UNSPSC 11111601. This dataset was prepared in ILCD format using the UWDFE Lab Excel to ILCD File Generator (beta version, August 2013).

## Geography
Operations in Switzerland are used as a surrogate for operations in South Carolina (US State).

## Technology
This process produces gypsum, mineral, at mine in South Carolina (US State), measured on a per kg basis. Included processes are listed in the meta data for the "gypsum, mineral, at mine" dataset in the ecoinvent 2.2 database.

## Time period
Start and end dates match the underlying data obtained from the USDA Agricultural Resource Management Survey (ARMS) for all data contained within the USDA Digital Commons.

## Reference product
- CUTOFF gypsum; at point-of-sale: 1 kg

## Inputs from technosphere
- gypsum, mineral, at mine: 1 kg

## Sampling procedure
Boundary conditions are described in the meta data for the "gypsum, mineral, at mine" dataset in the ecoinvent 2.2 database. Uncertainty is not estimated.

## Extrapolations
No quantitative transformation has been performed. Flow data quality according to the LCADC convention is provided for all flows.
