# rice; at harvest in 2006; at farm; 63%-90% moisture

Dataset: EcoSpold 2, unit process
Geography: GLO
Time period: 2006-01-02 to 2007-01-01
Scenario: Business-as-Usual
System model: Allocation, ecoinvent default
Generated by: cooperjs@u.washington.edu
isCopyrightProtected: false

## General comment
This unit process/ gate-to-gate dataset represents the production of 1 kg rice coproduced with residue. The process technologies are an aggregation of those applied in Arkansas in 2006. Applicable classifications include ISIC 0112, NAIC 111160, UNSPSC 50221101; this dataset was prepared in ILCD format using the UWDFE Lab Excel to ILCD File Generator (beta version, August 2013)

Exchange "Sodium chlorate-soil agricultural" is the result of combining the following original LCA Commons flows: "Sodium chlorate; unspec. appl. method; kg AI", "Sodium chlorate; foliar or directed spray; kg AI", "Sodium chlorate; broadcast without incorporation; kg AI", "Sodium chlorate; broadcast with incorporation; kg AI".
Exchange "Bensulfuron methyl ester-soil agricultural" is the result of combining the following original LCA Commons flows: "Bensulfuron-methyl; broadcast with incorporation; kg AI", "Bensulfuron-methyl; unspec. appl. method; kg AI", "Bensulfuron-methyl; foliar or directed spray; kg AI", "Bensulfuron-methyl; broadcast without incorporation; kg AI".
Exchange "NMVOC, non-methane volatile organic compounds, unspecified origin-air low population density" is the result of combining the following original LCA Commons flows: "NMVOCs; from residue burning; kg except C, biogenic", "NMVOCs; from residue burning; kg C, biogenic".
Exchange "Glyphosate-soil agricultural" is the result of combining the following original LCA Commons flows: "Glyphosate; unspec. appl. method; kg AI", "Glyphosate; foliar or directed spray; kg AI", "Glyphosate; broadcast with incorporation; kg AI", "Glyphosate; broadcast without incorporation; kg AI".
Exchange "Imazethapyr-soil agricultural" is the result of combining the following original LCA Commons flows: "Imazethapyr; broadcast with incorporation; kg AI", "Imazethapyr; foliar or directed spray; kg AI", "Imazethapyr; unspec. appl. method; kg AI", "Imazethapyr; broadcast without incorporation; kg AI".
Exchange "Carbon-soil agricultural" is the result of combining the following original LCA Commons flows: "Carbon; applied in sewage sludge", "Carbon; in above-ground residue left on field; biogenic", "Carbon; in below-ground residue; biogenic".
Exchange "Quinclorac-soil agricultural" is the result of combining the following original LCA Commons flows: "Quinclorac; unspec. appl. method; kg AI", "Quinclorac; foliar or directed spray; kg AI", "Quinclorac; broadcast without incorporation; kg AI", "Quinclorac; broadcast with incorporation; kg AI".
Exchange "Particulates, < 2.5 um-air low population density" is the result of combining the following original LCA Commons flows: "PM2.5; from residue burning; kg C, biogenic", "PM2.5; from residue burning; kg except C, biogenic".
Exchange "Clomazone-soil agricultural" is the result of combining the following original LCA Commons flows: "Clomazone; broadcast without incorporation; kg AI", "Clomazone; unspec. appl. method; kg AI", "Clomazone; foliar or directed spray; kg AI", "Clomazone; broadcast with incorporation; kg AI".
Exchange "Pesticides, unspecified-soil agricultural" is the result of combining the following original LCA Commons flows: "Unspecified pesticide; broadcast without incorporation; kg AI", "Unspecified pesticide; broadcast with incorporation; kg AI", "Unspecified pesticide; foliar or directed spray; kg AI", "Unspecified pesticide; unspec. appl. method; kg AI".
Exchange "Zeta-cypermethrin-soil agricultural" is the result of combining the following original LCA Commons flows: "Zeta-Cypermethrin; broadcast without incorporation; kg AI", "Zeta-Cypermethrin; foliar or directed spray; kg AI", "Zeta-Cypermethrin; unspec. appl. method; kg AI", "Zeta-Cypermethrin; broadcast with incorporation; kg AI".
Exchange "Ash-soil agricultural" is the result of combining the following original LCA Commons flows: "Ash; from residue burning; kg C, biogenic", "Ash; from residue burning; kg except C, biogenic".
Exchange "Water-soil agricultural" is the result of combining the following original LCA Commons flows: "Water; in below-ground residue; biogenic", "Water; from irrigation and applied with manure and sewage sludge", "Water; in above-ground residue left on field; biogenic".
Exchange "2,4-D, dimethylamine salt-soil agricultural" is the result of combining the following original LCA Commons flows: "2,4-D, dimethylamine salt; broadcast without incorporation; kg AI", "2,4-D, dimethylamine salt; unspec. appl. method; kg AI", "2,4-D, dimethylamine salt; broadcast with incorporation; kg AI", "2,4-D, dimethylamine salt; foliar or directed spray; kg AI".
Exchange "Propanil-soil agricultural" is the result of combining the following original LCA Commons flows: "Propanil; broadcast without incorporation; kg AI", "Propanil; foliar or directed spray; kg AI", "Propanil; broadcast with incorporation; kg AI", "Propanil; unspec. appl. method; kg AI".
Exchange "Molinate-soil agricultural" is the result of combining the following original LCA Commons flows: "Molinate; broadcast with incorporation; kg AI", "Molinate; broadcast without incorporation; kg AI", "Molinate; foliar or directed spray; kg AI", "Molinate; unspec. appl. method; kg AI".
Exchange "Acifluorfen-soil agricultural" is the result of combining the following original LCA Commons flows: "Acifluorfen; foliar or directed spray; kg AI", "Acifluorfen; broadcast with incorporation; kg AI", "Acifluorfen; unspec. appl. method; kg AI", "Acifluorfen; broadcast without incorporation; kg AI".
Exchange "Halosulfuron-methyl-soil agricultural" is the result of combining the following original LCA Commons flows: "Halosulfuron-methyl; foliar or directed spray; kg AI", "Halosulfuron-methyl; unspec. appl. method; kg AI", "Halosulfuron-methyl; broadcast without incorporation; kg AI", "Halosulfuron-methyl; broadcast with incorporation; kg AI".
Exchange "Water, unspecified origin-resource in water" is the result of combining the following original LCA Commons flows: "Water; withdrawal from unspec. source, for rice, in 2006", "Water; from plant uptake; biogenic".
Exchange "Carfentrazone ethyl ester-soil agricultural" is the result of combining the following original LCA Commons flows: "Carfentrazone-ethyl; foliar or directed spray; kg AI", "Carfentrazone-ethyl; broadcast with incorporation; kg AI", "Carfentrazone-ethyl; broadcast without incorporation; kg AI", "Carfentrazone-ethyl; unspec. appl. method; kg AI".
Exchange "Particulates, < 10 um-air low population density" is the result of combining the following original LCA Commons flows: "PM10; from residue burning; kg C, biogenic", "PM10; from residue burning; kg except C, biogenic".
Exchange "Triclopyr-soil agricultural" is the result of combining the following original LCA Commons flows: "Triclopyr; unspec. appl. method; kg AI", "Triclopyr; broadcast with incorporation; kg AI", "Triclopyr; foliar or directed spray; kg AI", "Triclopyr; broadcast without incorporation; kg AI".
Exchange "Azoxystrobin-soil agricultural" is the result of combining the following original LCA Commons flows: "Azoxystrobin; broadcast without incorporation; kg AI", "Azoxystrobin; foliar or directed spray; kg AI", "Azoxystrobin; unspec. appl. method; kg AI", "Azoxystrobin; broadcast with incorporation; kg AI".
Exchange "Transformation, from arable-resource land" is the result of combining the following original LCA Commons flows: "Transformation; from arable, from unspec. use to rice", "Transformation; from arable, from other to rice", "Transformation; from arable, from soy to rice".
Exchange "Lambda-cyhalothrin-soil agricultural" is the result of combining the following original LCA Commons flows: "Lambda-cyhalothrin; broadcast with incorporation; kg AI", "Lambda-cyhalothrin; broadcast without incorporation; kg AI", "Lambda-cyhalothrin; foliar or directed spray; kg AI", "Lambda-cyhalothrin; unspec. appl. method; kg AI".
Exchange "Imazamox-soil agricultural" is the result of combining the following original LCA Commons flows: "Imazamox; broadcast with incorporation; kg AI", "Imazamox; foliar or directed spray; kg AI", "Imazamox; broadcast without incorporation; kg AI", "Imazamox; unspec. appl. method; kg AI".
Exchange "Propiconazole-soil agricultural" is the result of combining the following original LCA Commons flows: "Propiconazole; broadcast with incorporation; kg AI", "Propiconazole; broadcast without incorporation; kg AI", "Propiconazole; unspec. appl. method; kg AI", "Propiconazole; foliar or directed spray; kg AI".
Exchange "Trifloxystrobin-soil agricultural" is the result of combining the following original LCA Commons flows: "Trifloxystrobin; broadcast with incorporation; kg AI", "Trifloxystrobin; broadcast without incorporation; kg AI", "Trifloxystrobin; foliar or directed spray; kg AI", "Trifloxystrobin; unspec. appl. method; kg AI".
Exchange "Phenol-2bdf9967-6dae-4183-88d1-8f612548c51e low population density" was originally named: "Phenol; from residue burning; kg C, biogenic" in this dataset.
Exchange "Propiconazole-2bdf9967-6dae-4183-88d1-8f612548c51e low population density" was originally named: "Propiconazole; broadcast by air; kg AI" in this dataset.
Exchange "Bensulfuron methyl ester-2bdf9967-6dae-4183-88d1-8f612548c51e low population density" was originally named: "Bensulfuron-methyl; broadcast by air; kg AI" in this dataset.
Exchange "Zeta-cypermethrin-2bdf9967-6dae-4183-88d1-8f612548c51e low population density" was originally named: "Zeta-Cypermethrin; broadcast by air; kg AI" in this dataset.
Exchange "Formic acid-2bdf9967-6dae-4183-88d1-8f612548c51e low population density" was originally named: "Formic acid; from residue burning; kg C, biogenic" in this dataset.
Exchange "Dinitrogen monoxide-2bdf9967-6dae-4183-88d1-8f612548c51e low population density" was originally named: "Dinitrogen monoxide; from residue burning; kg N, biogenic" in this dataset.
Exchange "trans-2-Butene-2bdf9967-6dae-4183-88d1-8f612548c51e low population density" was originally named: "Trans 2 butene; from residue burning; kg C, biogenic" in this dataset.
Exchange "Carbon dioxide-c19fb2d9-98eb-4cd3-8761-81b71d8a9a1b unspecified" was originally named: "Carbon dioxide; from plant uptake; kg C, biogenic" in this dataset.
Exchange "Nitrogen dioxide-2bdf9967-6dae-4183-88d1-8f612548c51e low population density" was originally named: "Nitrogen dioxide; from residue burning; kg N, biogenic" in this dataset.
Exchange "Lambda-cyhalothrin-2bdf9967-6dae-4183-88d1-8f612548c51e low population density" was originally named: "Lambda-cyhalothrin; broadcast by air; kg AI" in this dataset.
Exchange "Methanol-2bdf9967-6dae-4183-88d1-8f612548c51e low population density" was originally named: "Methanol; from residue burning; kg C, biogenic" in this dataset.
Exchange "Carfentrazone ethyl ester-2bdf9967-6dae-4183-88d1-8f612548c51e low population density" was originally named: "Carfentrazone-ethyl; broadcast by air; kg AI" in this dataset.
Exchange "Acetaldehyde-2bdf9967-6dae-4183-88d1-8f612548c51e low population density" was originally named: "Acetaldehyde; from residue burning; kg C, biogenic" in this dataset.
Exchange "Ethyne-2bdf9967-6dae-4183-88d1-8f612548c51e low population density" was originally named: "Acetylene; from residue burning; kg C, biogenic" in this dataset.
Exchange "Carbon dioxide, in air-2bdf9967-6dae-4183-88d1-8f612548c51e low population density" was originally named: "Carbon dioxide; from residue burning; kg C, biogenic" in this dataset.
Exchange "Pentane-2bdf9967-6dae-4183-88d1-8f612548c51e low population density" was originally named: "N pentane; from residue burning; kg C, biogenic" in this dataset.
Exchange "Imazamox-2bdf9967-6dae-4183-88d1-8f612548c51e low population density" was originally named: "Imazamox; broadcast by air; kg AI" in this dataset.
Exchange "Occupation, arable-c19fb2d9-98eb-4cd3-8761-81b71d8a9a1b land" was originally named: "Occupation; arable, as rice" in this dataset.
Exchange "Glyphosate-2bdf9967-6dae-4183-88d1-8f612548c51e low population density" was originally named: "Glyphosate; broadcast by air; kg AI" in this dataset.
Exchange "Triclopyr-2bdf9967-6dae-4183-88d1-8f612548c51e low population density" was originally named: "Triclopyr; broadcast by air; kg AI" in this dataset.
Exchange "Zinc compounds-be1c0329-f1a8-4524-8420-a86d2a8dd358 agricultural" was originally named: "Zinc compounds; as secondary application" in this dataset.
Exchange "Hydrocyanic acid-2bdf9967-6dae-4183-88d1-8f612548c51e low population density" was originally named: "Hydrogen cyanide; from residue burning; kg C, biogenic" in this dataset.
Exchange "Toluene-2bdf9967-6dae-4183-88d1-8f612548c51e low population density" was originally named: "Toluene; from residue burning; kg C, biogenic" in this dataset.
Exchange "Transformation, to arable-c19fb2d9-98eb-4cd3-8761-81b71d8a9a1b land" was originally named: "Transformation; to arable, to rice" in this dataset.
Exchange "Acifluorfen-2bdf9967-6dae-4183-88d1-8f612548c51e low population density" was originally named: "Acifluorfen; broadcast by air; kg AI" in this dataset.
Exchange "Propanil-2bdf9967-6dae-4183-88d1-8f612548c51e low population density" was originally named: "Propanil; broadcast by air; kg AI" in this dataset.
Exchange "Acetic acid-2bdf9967-6dae-4183-88d1-8f612548c51e low population density" was originally named: "Acetic acid; from residue burning; kg C, biogenic" in this dataset.
Exchange "Water, surface-c19fb2d9-98eb-4cd3-8761-81b71d8a9a1b in water" was originally named: "Water; withdrawal from surface water, for rice, in 2006" in this dataset.
Exchange "cis-2-Butene-2bdf9967-6dae-4183-88d1-8f612548c51e low population density" was originally named: "Cis 2 butene; from residue burning; kg C, biogenic" in this dataset.
Exchange "Carbon monoxide, fossil-2bdf9967-6dae-4183-88d1-8f612548c51e low population density" was originally named: "Carbon monoxide; from residue burning; kg C, biogenic" in this dataset.
Exchange "Halosulfuron-methyl-2bdf9967-6dae-4183-88d1-8f612548c51e low population density" was originally named: "Halosulfuron-methyl; broadcast by air; kg AI" in this dataset.
Exchange "Propane-2bdf9967-6dae-4183-88d1-8f612548c51e low population density" was originally named: "Propane; from residue burning; kg C, biogenic" in this dataset.
Exchange "Sulfur-be1c0329-f1a8-4524-8420-a86d2a8dd358 agricultural" was originally named: "Sulfur; as secondary application" in this dataset.
Exchange "Phosphorus-c19fb2d9-98eb-4cd3-8761-81b71d8a9a1b unspecified" was originally named: "Phosphorous; from plant uptake; biogenic" in this dataset.
Exchange "Acetonitrile-2bdf9967-6dae-4183-88d1-8f612548c51e low population density" was originally named: "Acetonitrile; from residue burning; kg C, biogenic" in this dataset.
Exchange "Water-2bdf9967-6dae-4183-88d1-8f612548c51e low population density" was originally named: "Water; from residue burning; biogenic" in this dataset.
Exchange "Ammonia-2bdf9967-6dae-4183-88d1-8f612548c51e low population density" was originally named: "Ammonia; from residue burning; kg N, biogenic" in this dataset.
Exchange "Sulfuric acid-be1c0329-f1a8-4524-8420-a86d2a8dd358 agricultural" was originally named: "Sulfuric acid; as secondary application" in this dataset.
Exchange "Ethene-2bdf9967-6dae-4183-88d1-8f612548c51e low population density" was originally named: "Ethylene; from residue burning; kg C, biogenic" in this dataset.
Exchange "Molinate-2bdf9967-6dae-4183-88d1-8f612548c51e low population density" was originally named: "Molinate; broadcast by air; kg AI" in this dataset.
Exchange "Sodium chlorate-2bdf9967-6dae-4183-88d1-8f612548c51e low population density" was originally named: "Sodium chlorate; broadcast by air; kg AI" in this dataset.
Exchange "Butadiene-2bdf9967-6dae-4183-88d1-8f612548c51e low population density" was originally named: "1,3 butadiene; from residue burning; kg C, biogenic" in this dataset.
Exchange "Ethane-2bdf9967-6dae-4183-88d1-8f612548c51e low population density" was originally named: "Ethane; from residue burning; kg C, biogenic" in this dataset.
Exchange "Benzene-2bdf9967-6dae-4183-88d1-8f612548c51e low population density" was originally named: "Benzene; from residue burning; kg C, biogenic" in this dataset.
Exchange "Water, ground-c19fb2d9-98eb-4cd3-8761-81b71d8a9a1b in water" was originally named: "Water; withdrawal from groundwater, for rice, in 2006" in this dataset.
Exchange "Quinclorac-2bdf9967-6dae-4183-88d1-8f612548c51e low population density" was originally named: "Quinclorac; broadcast by air; kg AI" in this dataset.
Exchange "Butane-2bdf9967-6dae-4183-88d1-8f612548c51e low population density" was originally named: "N butane; from residue burning; kg C, biogenic" in this dataset.
Exchange "Methane-2bdf9967-6dae-4183-88d1-8f612548c51e low population density" was originally named: "Methane; from residue burning; kg C, biogenic" in this dataset.
Exchange "Propene-2bdf9967-6dae-4183-88d1-8f612548c51e low population density" was originally named: "Propylene; from residue burning; kg C, biogenic" in this dataset.
Exchange "Furan-2bdf9967-6dae-4183-88d1-8f612548c51e low population density" was originally named: "Furan; from residue burning; kg C, biogenic" in this dataset.
Exchange "Isoprene-2bdf9967-6dae-4183-88d1-8f612548c51e low population density" was originally named: "Isoprene; from residue burning; kg C, biogenic" in this dataset.
Exchange "Formaldehyde-2bdf9967-6dae-4183-88d1-8f612548c51e low population density" was originally named: "Formaldehyde; from residue burning; kg C, biogenic" in this dataset.
Exchange "Azoxystrobin-2bdf9967-6dae-4183-88d1-8f612548c51e low population density" was originally named: "Azoxystrobin; broadcast by air; kg AI" in this dataset.
Exchange "Acetone-2bdf9967-6dae-4183-88d1-8f612548c51e low population density" was originally named: "Acetone; from residue burning; kg C, biogenic" in this dataset.
Exchange "Clomazone-2bdf9967-6dae-4183-88d1-8f612548c51e low population density" was originally named: "Clomazone; broadcast by air; kg AI" in this dataset.
Exchange "isobutene-2bdf9967-6dae-4183-88d1-8f612548c51e low population density" was originally named: "I butene; from residue burning; kg C, biogenic" in this dataset.
Exchange "1-Butene-2bdf9967-6dae-4183-88d1-8f612548c51e low population density" was originally named: "1 butene; from residue burning; kg C, biogenic" in this dataset.
Exchange "Acrylonitrile-2bdf9967-6dae-4183-88d1-8f612548c51e low population density" was originally named: "Propenenitrile; from residue burning; kg C, biogenic" in this dataset.
Exchange "isopentane-2bdf9967-6dae-4183-88d1-8f612548c51e low population density" was originally named: "I pentane; from residue burning; kg C, biogenic" in this dataset.
Exchange "Trifloxystrobin-2bdf9967-6dae-4183-88d1-8f612548c51e low population density" was originally named: "Trifloxystrobin; broadcast by air; kg AI" in this dataset.
Exchange "Sulfur dioxide-2bdf9967-6dae-4183-88d1-8f612548c51e low population density" was originally named: "Sulfur dioxide; from residue burning; biogenic" in this dataset.
Exchange "pursuit-2bdf9967-6dae-4183-88d1-8f612548c51e low population density" was originally named: "Imazethapyr; broadcast by air; kg AI" in this dataset.

## Geography
The unit process is assumed to represent production in Arkansas (US State).

## Technology
This process produces rice; at harvest in 2006; at farm; 63%-90% moisture. The process is assumed to represent production in Arkansas (US State). Yields and related inputs and outputs represent a single year of operation, in 2006. This dataset includes consideration of residue burning; soil preparation; planting or sowing; irrigation; application, storage, and transport of fertilizers, manures, liming materials, secondary materials, and pesticides; and harvest. Fate and transport of applications are not included as described in Cooper, J.S., Kahn, E., Noon, M. (2012) LCA Digital Commons Unit Process Data: field crop production Version 1 which is available at https://www.lcacommons.gov/discovery/docs/LCA%20Digital%20Commons%20Unit%20Process%20Data%20final%20updated.pdf

## Time period
Start and end dates match the underlying data obtained from the USDA Agricultural Resource Management Survey (ARMS).
## Parameters
- p1187: 0.000268732
- p1202: 0
- p2216: 4.38321e-5; = p1108/p0818
- p1762: 0
- p3459: 0; = p3364*p1241
- p3270: 0
- p3442: 0; = p3366*p1240
- p5158: 1.23446e-9; = p1779*p3484
- p3411: 0; = p3373*p1238
- p2467: 0; = p2271*p1073
- p3037: 8.08704e-9; = p2256*p1023
- p2812: 0; = p2421*(p1078+p1080)
- p0779: 59.397; = p0119*(1+p0647*p0251/100)
- p1131: 0; = if(p1121=0;IF(p1123+p1128+p1129+p1130=1;0;IF(p1123+p1128+p1129+p1130+p1127>1;1-(p1123+p1128+p1129+p1130);p1127));0)
- p0245: 5.182
- p1236: 0; = if(p1232>0;0;p0728/100)
- p2761: 4.49193e-7; = p2370*(p1019+p1021)
- p1946: 0
- p3097: 0; = p2316*p1023
- p1599: 0
- p4410: 0; = p1855*p3480
- p2069: 0.190588
- p3393: 0; = p3374*p1234
- p2630: 5.89996e-8; = p2239*(p1019+p1021)
- p1014: 0; = IF(p1012=0;p0705/100;0)
- p3191: 0; = p2410*p1023
- p3476: 0; = if(p1328+p1330+p1332+p1334+p1336+p1338+p1340+p1342+p1344=0;0;p1328/(p1328+p1330+p1332+p1334+p1336+p1338+p1340+p1342+p1344))
- p0725: 0
- p1853: 0
- p0739: 2.586; = p0079*(1+p0607*p0211/100)
- p4002: 2.13353e-7; = p1859*p3478
- p3392: 0; = p3373*p1234
- p0878: 393362; = p0867*p0856
- p1600: 0
- p2275: 0.000123322; = p2230*p2221
- p0812: 0; = if(p0807=480;0.095/0.34;0)
- p0117: 55.057
- p3083: 4.40337e-6; = p2302*p1082
- p2651: 8.41127e-6; = p2260*(p1078+p1080)
- p0219: 3.561
- p0383: 0.5
- p2949: 0.000205779; = p2363*(p1020+p1022)
- p1744: 0
- p0188: 6.652
- p0388: 0.5
- p1285: 0; = p1281*p1252/p0818
- p3192: 0; = p2411*p1023
- p1427: 3
- p0317: 0.5
- p2606: 0; = p2410*p1014
- p2711: 0; = p2320*(p1019+p1021)
- p1200: 0
- p3294: 0
- p3211: 0; = p2430*p1132
- p3027: 3.95366e-9; = p2246*p1023
- p4035: 7.58588e-7; = p1892*p3478
- p2229: 0.268051; = if(p0774*p0778+p0775*p0779+p0776*p0780+p0777*p0781=0;0;p0781*p0777/(p0774*p0778+p0775*p0779+p0776*p0780+p0777*p0781))
- p0721: 0
- p1447: 398
- p2114: 0.832356
- p3444: 0; = p3368*p1240
- p2991: 0; = p2405*(p1020+p1022)
- p1307: 0
- p2992: 0; = p2406*(p1020+p1022)
- p2263: 3.37725e-5; = p2226*p2209
- p2938: 3.01726e-5; = p2352*(p1129+p1131)
- p3183: 0; = p2402*p1023
- p3896: 0.000136823; = p1963*p3477
- p1805: 3.6245e-6; = p1397*1000/p0818
- p3889: 6.29762e-6; = p1952*p3477
- p0572: 0; = IF(p0308<0.5;-SQRT(p0007*EXP(p0440^2*p0008)-p0007);SQRT(p0007*EXP(p0440^2*p0008)-p0007))
- p1254: 0; = if(p1232>0;0;p0736/100)
- p1084: 311678; = IF(p1071=0;p1078*(p0710/100)*p0703*1000;0)
- p3519: 0; = p1788*p3476
- p0931: 152108; = p0801*p0925
- p2353: 8.24287e-5; = p2232*p2221
- p1107: 692522; = IF(p1071=0;p1105*p1101*p1095;0)
- p3330: 0; = if(and(p1232=0;p3255<>0);p3255*(p3267-p3325)/p3327;0)
- p0833: 1.18209e10; = p0830+p0832
- p2589: 0; = p2393*p1014
- p4517: 8.55901e-8; = p1756*p3481
- p3089: 2.43706e-6; = p2308*p1082
- p2514: 0; = p2318*p1014
- p3099: 0; = p2318*p1023
- p3179: 0; = p2398*p1023
- p2412: 0; = p2234*p2202
- p3137: 3.27011e-7; = p2356*p1023
- p2287: 0.000776396; = p2223*p2193
- p3146: 1.10922e-5; = p2365*p1023
- p3437: 0; = p3380*p1239
- p2036: 9.6895e-5; = p2015*p2030*(1-p2032)/(p0818*1000)
- p1551: 0
- p2878: 2.50703e-6; = p2292*(p1020+p1022)
- p3590: 0; = p1859*p3476
- p1757: 0
- p1658: 0
- p3038: 9.27116e-8; = p2257*p1023
- p2166: 0.504197; = p2165*p0824
- p2629: 4.54976e-7; = p2238*(p1019+p1021)
- p1987: 400
- p2628: 2.07267e-6; = p2237*(p1019+p1021)
- p3712: 3.74858e-7; = p1775*p3477
- p4301: 3.06197e-7; = p1952*p3479
- p2127: 0.000118872; = p2015*p2055*p2089/(p0818*1000)
- p2965: 0.000190599; = p2379*(p1079+p1081)
- p1950: 0
- p2660: 6.11269e-6; = p2269*(p1078+p1080)
- p2366: 0.00184322; = p2225*p2195
- p3240: 1.83008e-9; = p3234*p1188*p3235/p0818
- p0477: 0; = SQRT(2)*(IF((2*p0345-1)<0;-1;IF((2*p0345-1)>0;1;0))*SQRT(SQRT((2/(pi()*0.140012289)+LN(1-(2*p0345-1)^2)/2)^2-LN(1-(2*p0345-1)^2)/0.140012289)-(2/(pi()*0.140012289)+LN(1-(2*p0345-1)^2)/2)))
- p2368: 7.8287e-6; = p2225*p2197
- p3478: 0.228916; = if(p1328+p1330+p1332+p1334+p1336+p1338+p1340+p1342+p1344=0;0;p1332/(p1328+p1330+p1332+p1334+p1336+p1338+p1340+p1342+p1344))
- p3316: 0; = if(and(p1232=0;p3253<>0);1-(p3312+p3313+p3314+p3315);0)
- p1698: 0
- p0262: 28.289
- p2430: 0; = p2236*p2220
- p1087: 0; = IF(p1071=0;p1081*(p0710/100)*p0703*1000;0)
- p0742: 94.13; = p0082*(1+p0610*p0214/100)
- p2966: 8.61913e-5; = p2380*(p1079+p1081)
- p1829: 0
- p1780: 0
- p0478: 0; = SQRT(2)*(IF((2*p0346-1)<0;-1;IF((2*p0346-1)>0;1;0))*SQRT(SQRT((2/(pi()*0.140012289)+LN(1-(2*p0346-1)^2)/2)^2-LN(1-(2*p0346-1)^2)/0.140012289)-(2/(pi()*0.140012289)+LN(1-(2*p0346-1)^2)/2)))
- p1828: 0
- p0844: 0.38473
- p2974: 6.92447e-5; = p2388*(p1079+p1081)
- p0242: 28.231
- p1183: 0.000129903; = p0801*p0001/(p0818*p0002)
- p0766: 81.887; = p0106*(1+p0634*p0238/100)
- p0822: 0.849286
- p1961: 0.5
- p0737: 0
- p1788: 4.14229e-7; = p1380*1000/p0818
- p3143: 1.07406e-6; = p2362*p1023
- p1858: 0
- p1612: 0
- p1977: 377.838; = p1252+p1188
- p2415: 0; = p2235*p2205
- p2276: 0.000804096; = p2223*p2182
- p2676: 3.00595e-7; = p2285*(p1019+p1021)
- p2109: 0.826583
- p2713: 0; = p2322*(p1019+p1021)
- p0512: 0; = SQRT(2)*(IF((2*p0380-1)<0;-1;IF((2*p0380-1)>0;1;0))*SQRT(SQRT((2/(pi()*0.140012289)+LN(1-(2*p0380-1)^2)/2)^2-LN(1-(2*p0380-1)^2)/0.140012289)-(2/(pi()*0.140012289)+LN(1-(2*p0380-1)^2)/2)))
- p4507: 0; = p1952*p3480
- p2364: 0.00169442; = p2225*p2192
- p2646: 6.92577e-7; = p2255*(p1019+p1021)
- p0954: 9.22605e-6; = if(and(p0683>0;or(p0807=56;p0807=100;and(p0807=60;p0901>0.06)));p0936;0)
- p0879: 0.363434; = p0878*p0001*p0003/(p0818*p0002)
- p4513: 0; = p1962*p3480
- p4549: 3.29193e-9; = p1788*p3481
- p3161: 2.01722e-6; = p2380*p1082
- p1066: 0.00302464; = IF(p1012=0;p1052/(p1059*p0818);0)
- p2818: 0; = p2427*(p1078+p1080)
- p3432: 0; = p3375*p1239
- p0810: 0
- p0809: 0
- p4414: 0; = p1859*p3480
- p3153: 3.83868e-6; = p2372*p1023
- p2053: 1.45647
- p3088: 6.45805e-7; = p2307*p1082
- p0531: 0; = SQRT(2)*(IF((2*p0399-1)<0;-1;IF((2*p0399-1)>0;1;0))*SQRT(SQRT((2/(pi()*0.140012289)+LN(1-(2*p0399-1)^2)/2)^2-LN(1-(2*p0399-1)^2)/0.140012289)-(2/(pi()*0.140012289)+LN(1-(2*p0399-1)^2)/2)))
- p0678: 104.626; = p0018*(1+p0546*p0150/100)
- p2110: 0.856281
- p3319: 0; = if(and(p1232=0;p3253<>0);p3253*(p3263-p3314)/p3316;0)
- p2607: 0; = p2411*p1014
- p1238: 0; = if(p1232>0;0;IF(p1234=1;0;IF(p1234+p1235>1;1-p1234;p1235)))
- p0990: 0; = p0986*p0886
- p3177: 0; = p2396*p1023
- p2008: 0.0643243; = ((p1982*p1985+p1988*p1991+p1994*p1997+p2002*p2005)/p0818)*p0005*p0002/1000
- p4321: 0; = p1766*p3480
- p0640: 0; = IF(p0376<0.5;-SQRT(p0007*EXP(p0508^2*p0008)-p0007);SQRT(p0007*EXP(p0508^2*p0008)-p0007))
- p2824: 2.8123e-5; = p2238*(p1020+p1022)
- p2285: 1.89054e-5; = p2223*p2191
- p4620: 7.40683e-9; = p1859*p3481
- p1119: 0.00588592; = IF(p1071=0;p1109/(p1114*p0818);0)
- p1647: 0
- p1065: 0.00124487; = IF(p1012=0;p1051/(p1058*p0818);0)
- p0259: 24.464
- p1944: 0
- p5238: 3.70338e-9; = p1859*p3484
- p2163: 0.0153129; = (p2017-p2020)/p0818-(p2025+p2028+p2033+p2034+p2051+p2125+p2126+p2127+p2128+p2129+p2130+p2131+p2132+p2133+p2134+p2135+p2136+p2137+p2138+p2139+p2140+p2141+p2142+p2143+p2144+p2145+p2146+p2147+p2148+p2149+p2150+p2151+p2152+p2153+p2154+p2155+p2156+p2157)
- p0294: 0.5
- p1259: 0; = if(p1232>0;0;p0730/100)
- p2062: 3.76588
- p3188: 0; = p2407*p1023
- p1223: 0
- p2933: 1.38377e-5; = p2347*(p1079+p1081)
- p2579: 0; = p2383*p1073
- p3112: 0; = p2331*p1023
- p3199: 0; = p2418*p1082
- p4219: 3.64521e-9; = p1870*p3479
- p2442: 0; = p2246*p1014
- p3439: 0; = p3363*p1240
- p2724: 0; = p2333*(p1019+p1021)
- p2483: 0; = p2287*p1014
- p3349: 0; = if(and(p1232=0;p3256<>0);1-(p3345+p3346+p3347+p3348);0)
- p2725: 0; = p2334*(p1019+p1021)
- p3156: 5.24543e-6; = p2375*p1082
- p2477: 0; = p2281*p1014
- p3109: 0; = p2328*p1023
- p0624: 0; = IF(p0360<0.5;-SQRT(p0007*EXP(p0492^2*p0008)-p0007);SQRT(p0007*EXP(p0492^2*p0008)-p0007))
- p0387: 0.5
- p2584: 0; = p2388*p1073
- p1631: 0.5
- p0853: 0; = p0803/(p0802+p0803)
- p3162: 8.70971e-7; = p2381*p1082
- p0834: 0.00059
- p3150: 1.65759e-8; = p2369*p1023
- p3285: 0
- p1839: 0
- p0711: 0
- p1161: 459644; = (p0722/100)*p0702*1000
- p0448: 0; = SQRT(2)*(IF((2*p0316-1)<0;-1;IF((2*p0316-1)>0;1;0))*SQRT(SQRT((2/(pi()*0.140012289)+LN(1-(2*p0316-1)^2)/2)^2-LN(1-(2*p0316-1)^2)/0.140012289)-(2/(pi()*0.140012289)+LN(1-(2*p0316-1)^2)/2)))
- p1143: 0; = if(p1121=0;p1137*p0001/(p0818*p0002);0)
- p0251: 6.625
- p0454: 0; = SQRT(2)*(IF((2*p0322-1)<0;-1;IF((2*p0322-1)>0;1;0))*SQRT(SQRT((2/(pi()*0.140012289)+LN(1-(2*p0322-1)^2)/2)^2-LN(1-(2*p0322-1)^2)/0.140012289)-(2/(pi()*0.140012289)+LN(1-(2*p0322-1)^2)/2)))
- p3110: 0; = p2329*p1023
- p1237: 0; = if(p1232>0;0;p0729/100)
- p2484: 0; = p2288*p1014
- p3021: 1.64877e-8; = p2240*p1023
- p2324: 0; = p2224*p2191
- p1722: 0
- p2946: 0.00165937; = p2360*(p1020+p1022)
- p0673: 0
- p2888: 0.000188146; = p2302*(p1079+p1081)
- p2781: 0.00036429; = p2390*(p1128+p1130)
- p1855: 4.12158e-5; = p1447*1000/p0818
- p1919: 0
- p2897: 0.00210756; = p2311*(p1129+p1131)
- p1345: 1.82899e-6; = IF(p1318=0;p1344*p0001/(p0818*p0002);0)
- p0480: 0; = SQRT(2)*(IF((2*p0348-1)<0;-1;IF((2*p0348-1)>0;1;0))*SQRT(SQRT((2/(pi()*0.140012289)+LN(1-(2*p0348-1)^2)/2)^2-LN(1-(2*p0348-1)^2)/0.140012289)-(2/(pi()*0.140012289)+LN(1-(2*p0348-1)^2)/2)))
- p1820: 0
- p2516: 0; = p2320*p1014
- p0004: 0.0254
- p0273: 0.5
- p2700: 8.38744e-6; = p2309*(p1078+p1080)
- p3420: 0; = p3363*p1239
- p5176: 1.57188e-7; = p1797*p3484
- p2618: 0; = p2422*p1073
- p2755: 2.69413e-5; = p2364*(p1019+p1021)
- p3395: 0; = p3376*p1234
- p3429: 0; = p3372*p1239
- p2895: 1.68652e-5; = p2309*(p1079+p1081)
- p4514: 0; = p1963*p3480
- p2015: 5.12922e8; = p0830*p2011*p2013
- p2446: 0; = p2250*p1014
- p2865: 7.74846e-5; = p2279*(p1020+p1022)
- p2208: 0.00108132; = p1110/p0818
- p2478: 0; = p2282*p1014
- p1806: 0
- p1556: 0
- p4828: 0; = p1861*p3482
- p2708: 0; = p2317*(p1019+p1021)
- p3175: 0; = p2394*p1023
- p2059: 1.00168
- p3281: 0
- p1675: 0
- p4241: 1.16647e-7; = p1892*p3479
- p2556: 0; = p2360*p1014
- p2874: 0.000163569; = p2288*(p1020+p1022)
- p2330: 0; = p2224*p2198
- p3119: 4.4564e-7; = p2338*p1082
- p3077: 5.71885e-7; = p2296*p1023
- p3250: 0
- p2278: 2.2889e-5; = p2223*p2184
- p0550: 0; = IF(p0286<0.5;-SQRT(p0007*EXP(p0418^2*p0008)-p0007);SQRT(p0007*EXP(p0418^2*p0008)-p0007))
- p2174: 0.00128667; = p0895*p0903/p0818
- p2798: 0; = p2407*(p1019+p1021)
- p0880: 0; = p0868*p0856
- p2309: 2.56473e-5; = p2227*p2216
- p2117: 0.585147
- p3187: 0; = p2406*p1023
- p1963d: 0; = p1608*p1812+p1609*p1813+p1610*p1814+p1611*p1815+p1612*p1816+p1613*p1817+p1614*p1818+p1615*p1819+p1616*p1820+p1617*p1821+p1618*p1822+p1619*p1823+p1620*p1824+p1621*p1825+p1622*p1826+p1623*p1827+p1624*p1828+p1625*p1829+p1626*p1830+p1627*p1831
- p3318: 0; = if(and(p1232=0;p3253<>0);p3253*(p3262-p3313)/p3316;0)
- p2067: 0.446471
- p1813: 0
- p2520: 0; = p2324*p1014
- p2550: 0; = p2354*p1014
- p1344: 19796.1; = IF(p1318=0;p1327*p0801;0)
- p0773: 67.792; = p0113*(1+p0641*p0245/100)
- p2537: 0; = p2341*p1073
- p1234: 0; = if(p1232>0;0;p0726/100)
- p2243: 2.47145e-5; = p2222*p2188
- p1522: 269
- p2766: 0.000111463; = p2375*(p1078+p1080)
- p1137: 0; = if(p1121=0;p1131*(p0716/100)*p0703*1000;0)
- p3164: 6.3368e-9; = p2383*p1082
- p1736: 0
- p1997: 1.64987e8; = (if(p1152=0;0;p1150/p1152)+if(p1153=0;0;p1151/p1153))*(1+p1157)
- p3189: 0; = p2408*p1023
- p2931: 8.21296e-7; = p2345*(p1079+p1081)
- p2559: 0; = p2363*p1014
- p2051: 0.00129937; = p2015*p2049*p2050/(p0818*1000)
- p0798: 67.792; = p0138*(1+p0666*p0270/100)
- p3247: 0
- p3132: 7.60912e-6; = p2351*p1132
- p1963c: 2.99003e-5; = p1588*p1792+p1589*p1793+p1590*p1794+p1591*p1795+p1592*p1796+p1593*p1797+p1594*p1798+p1595*p1799+p1596*p1800+p1597*p1801+p1598*p1802+p1599*p1803+p1600*p1804+p1601*p1805+p1602*p1806+p1603*p1807+p1604*p1808+p1605*p1809+p1606*p1810+p1607*p1811
- p2729: 9.46964e-6; = p2338*(p1078+p1080)
- p0780: 8.804; = p0120*(1+p0648*p0252/100)
- p3055: 1.20573e-6; = p2274*p1132
- p2747: 4.0306e-6; = p2356*(p1019+p1021)
- p2748: 1.38832e-5; = p2357*(p1019+p1021)
- p2762: 0.00011036; = p2371*(p1019+p1021)
- p0805: 0
- p5087: 0; = p1914*p3483
- p1816: 0
- p3383: 0; = p3364*p1234
- p2317: 0; = p2224*p2184
- p2071: 0.151
- p2852: 6.97634e-8; = p2266*(p1079+p1081)
- p2551: 0; = p2355*p1014
- p2409: 0; = p2234*p2199
- p2369: 1.28496e-5; = p2225*p2198
- p0005: 1.60934
- p1719: 0
- p0874: 0; = p0865*p0856
- p0895: 1.71762e9; = p0894*p0830
- p1900: 0
- p1077: 0; = IF(p1071=0;p0715/100;0)
- p4154: 1.27582e-7; = p1805*p3479
- p1674: 0
- p1178: 5.37786e-8; = p1176/p0818
- p2103: 0.912485
- p2205: 0.00115; = 2*14.0067*p2204/30.973762
- p1777: 0
- p1329: 0; = p1328*p0001/(p0818*p0002)
- p1595: 0
- p0025: 14.495
- p1625: 0
- p1960: 44.1605; = IF(p1959-p1958<0;0;p1959-p1958)
- p2305: 8.98799e-7; = p2227*p2212
- p3363: 0; = if(p1232=0;p3244*p3357/p0818;0)
- p2393: 0; = p2234*p2182
- p0027: 24.199
- p3464: 0; = p3369*p1241
- p4881: 0; = p1914*p3482
- p0746: 0
- p2779: 3.4437e-5; = p2388*(p1078+p1080)
- p3487: 0; = p1756*p3476
- p2801: 0; = p2410*(p1019+p1021)
- p0272: 6.652
- p0226: 21.62
- p5336: 4.11486e-10; = p1957*p3484
- p0091: 0.82
- p0058: 34.692
- p1062: 0.16
- p3338: 0; = if(and(p1232=0;p3254<>0);1-(p3334+p3335+p3336+p3337);0)
- p3194: 0; = p2413*p1023
- p0885: 3.239; = IF(p0689+p0884=100;0;100-(p0689+p0884))
- p3320: 0; = if(and(p1232=0;p3253<>0);p3253*(p3264-p3315)/p3316;0)
- p2088: 0.798875
- p2404: 0; = p2234*p2193
- p1695: 0
- p0687: 24.199; = p0027*(1+p0555*p0159/100)
- p0657: 0; = IF(p0393<0.5;-SQRT(p0007*EXP(p0525^2*p0008)-p0007);SQRT(p0007*EXP(p0525^2*p0008)-p0007))
- p2144: 6.09471e-6; = p2015*p2072*p2106/(p0818*1000)
- p2041: 7.33012e-5; = p2015*p2040/(p0818*1000)
- p2033: 0.000142394; = p2015*p2029*p2031/(p0818*1000)
- p1224: 0; = IF(p1221=0;0;IF(p1193=0;1-p1223;0))
- p2602: 0; = p2406*p1014
- p0774: 68.049; = p0114*(1+p0642*p0246/100)
- p1616: 0
- p1086: 0; = IF(p1071=0;p1080*(p0710/100)*p0703*1000;0)
- p2523: 0; = p2327*p1014
- p4057: 7.82294e-7; = p1914*p3478
- p0930: 99858; = p0801*p0924
- p3312: 0; = if(and(p1232=0;p3253<>0);p3261*p3277*(p3298*p3290+(1-p3298)*p3294);0)
- p2113: 0.832356
- p3462: 0; = p3367*p1241
- p3007: 0; = p2421*(p1079+p1081)
- p2836: 0.000262122; = p2250*(p1020+p1022)
- p2596: 0; = p2400*p1014
- p0899: 7.54814e9; = p0825*p0896+(p0830+p0895)*p0824*p0898
- p1336: 0; = p1323*p0801
- p2397: 0; = p2234*p2186
- p2916: 0; = p2330*(p1020+p1022)
- p0965: 0.14495; = IF(p0684/100=1;0;IF(p0684/100+p0685/100>1;1-p0684/100;p0685/100))
- p3115: 0; = p2334*p1023
- p1740: 0
- p4261: 6.44108e-6; = p1912*p3479
- p0417: 0; = SQRT(2)*(IF((2*p0285-1)<0;-1;IF((2*p0285-1)>0;1;0))*SQRT(SQRT((2/(pi()*0.140012289)+LN(1-(2*p0285-1)^2)/2)^2-LN(1-(2*p0285-1)^2)/0.140012289)-(2/(pi()*0.140012289)+LN(1-(2*p0285-1)^2)/2)))
- p3103: 0; = p2322*p1023
- p0971: 0.000975338; = p0968/p0818
- p1790: 0
- p1348: 104
- p0425: 0; = SQRT(2)*(IF((2*p0293-1)<0;-1;IF((2*p0293-1)>0;1;0))*SQRT(SQRT((2/(pi()*0.140012289)+LN(1-(2*p0293-1)^2)/2)^2-LN(1-(2*p0293-1)^2)/0.140012289)-(2/(pi()*0.140012289)+LN(1-(2*p0293-1)^2)/2)))
- p2979: 0; = p2393*(p1020+p1022)
- p0655: 0; = IF(p0391<0.5;-SQRT(p0007*EXP(p0523^2*p0008)-p0007);SQRT(p0007*EXP(p0523^2*p0008)-p0007))
- p2726: 0; = p2335*(p1019+p1021)
- p1732: 0
- p2625: 0; = p2429*p1123
- p2003: 50
- p0849: 0
- p1156: 0.0935759; = p1064+p1065+p1066+p1067+p1068+p1069+p1070+p1116+p1117+p1118+p1119+p1120+p1154+p1155
- p2045: 30
- p3419: 0; = p3362*p1239
- p0769: 3.531; = p0109*(1+p0637*p0241/100)
- p1995: 50
- p3160: 4.46079e-6; = p2379*p1082
- p0403: 0.5
- p3045: 2.24415e-7; = p2264*p1082
- p1641: 0
- p0213: 7.905
- p1069: 5.40636e-5; = IF(p1012=0;p1055/(p1062*p0818);0)
- p2718: 0; = p2327*(p1019+p1021)
- p0670: 0
- p0698: 0
- p3050: 2.87663e-7; = p2269*p1082
- p3867: 2.01674e-5; = p1930*p3477
- p3018: 1.6816e-7; = p2237*p1023
- p0794: 0
- p3940: 9.05565e-6; = p1797*p3478
- p0713: 65.758; = p0053*(1+p0581*p0185/100)
- p2241: 1.34234e-5; = p2222*p2186
- p2465: 0; = p2269*p1073
- p0957: 1.75784e-6; = if(and(p0683>0;or(p0807=56;p0807=100;and(p0807=60;p0901>0.06)));p0939;0)
- p2254: 0.0001016; = p2222*p2200
- p3978: 7.11176e-8; = p1835*p3478
- p2264: 1.45819e-5; = p2226*p2210
- p1562: 0.5
- p2077: 0.043
- p2277: 0.000176509; = p2223*p2183
- p0175: 0.012
- p0717: 0
- p0008: 0.0739645; = (p0007-1.5)/(p0007-1)^2
- p4653: 2.63354e-8; = p1892*p3481
- p2980: 0; = p2394*(p1020+p1022)
- p1861: 3.10672e-7; = p1453*1000/p0818
- p0615: 0; = IF(p0351<0.5;-SQRT(p0007*EXP(p0483^2*p0008)-p0007);SQRT(p0007*EXP(p0483^2*p0008)-p0007))
- p0427: 0; = SQRT(2)*(IF((2*p0295-1)<0;-1;IF((2*p0295-1)>0;1;0))*SQRT(SQRT((2/(pi()*0.140012289)+LN(1-(2*p0295-1)^2)/2)^2-LN(1-(2*p0295-1)^2)/0.140012289)-(2/(pi()*0.140012289)+LN(1-(2*p0295-1)^2)/2)))
- p0967: 0
- p1104: 0.437795; = IF(p1071=0;IF(p1096+p1101+p1102+p1103=1;0;1-(p1096+p1101+p1102+p1103));0)
- p2401: 0; = p2234*p2190
- p1232: 1.406e6; = p0801
- p1677: 0
- p1779: 3.10672e-7; = p1371*1000/p0818
- p2674: 1.04429e-6; = p2283*(p1019+p1021)
- p2764: 6.80955e-6; = p2373*(p1019+p1021)
- p0821: 1.44138
- p2142: 1.22398e-5; = p2015*p2070*p2104/(p0818*1000)
- p3171: 1.78407e-5; = p2390*p1132
- p1963i: 0.000100055; = p1706*p1910+p1707*p1911+p1708*p1912+p1709*p1913+p1710*p1914+p1711*p1915+p1712*p1916+p1713*p1917+p1714*p1918+p1715*p1919+p1716*p1920+p1717*p1921+p1718*p1922+p1719*p1923+p1720*p1924+p1721*p1925+p1722*p1926+p1723*p1927+p1724*p1928
- p1121: 0
- p0421: 0; = SQRT(2)*(IF((2*p0289-1)<0;-1;IF((2*p0289-1)>0;1;0))*SQRT(SQRT((2/(pi()*0.140012289)+LN(1-(2*p0289-1)^2)/2)^2-LN(1-(2*p0289-1)^2)/0.140012289)-(2/(pi()*0.140012289)+LN(1-(2*p0289-1)^2)/2)))
- p0487: 0; = SQRT(2)*(IF((2*p0355-1)<0;-1;IF((2*p0355-1)>0;1;0))*SQRT(SQRT((2/(pi()*0.140012289)+LN(1-(2*p0355-1)^2)/2)^2-LN(1-(2*p0355-1)^2)/0.140012289)-(2/(pi()*0.140012289)+LN(1-(2*p0355-1)^2)/2)))
- p2068: 0.153529
- p0110: 20.042
- p2220: 0.000724145; = p1151/p0818
- p1453: 3
- p1715: 0
- p4343: 0; = p1788*p3480
- p0724: 0
- p1558: 0
- p4512: 0; = p1957*p3480
- p3684: 0; = p1953*p3476
- p1654: 0
- p3031: 3.44051e-7; = p2250*p1023
- p2935: 2.00866e-5; = p2349*(p1079+p1081)
- p1633: 0
- p2857: 1.78416e-5; = p2271*(p1079+p1081)
- p0307: 0.5
- p0924: 0.0710228; = IF(p0918+p0923=1;0;IF(p0918+p0923+p0920>1;1-(p0918+p0923);p0920))
- p0645: 0; = IF(p0381<0.5;-SQRT(p0007*EXP(p0513^2*p0008)-p0007);SQRT(p0007*EXP(p0513^2*p0008)-p0007))
- p0996: 1; = if(p0888=0;0;if((p0691*p0690*1000*p0692/100)/p0888>1;1;(p0691*p0690*1000*p0692/100)/p0888))
- p1629: 0
- p0999: 0; = IF(p0996=1;0;IF(p0996+p0997>1;1-p0996;p0997))
- p2280: 8.28012e-5; = p2223*p2186
- p0517: 0; = SQRT(2)*(IF((2*p0385-1)<0;-1;IF((2*p0385-1)>0;1;0))*SQRT(SQRT((2/(pi()*0.140012289)+LN(1-(2*p0385-1)^2)/2)^2-LN(1-(2*p0385-1)^2)/0.140012289)-(2/(pi()*0.140012289)+LN(1-(2*p0385-1)^2)/2)))
- p0138: 67.792
- p2534: 0; = p2338*p1073
- p0941: 0; = if(and(p0683=0;p0947=0);p0935;0)
- p0255: 19.702
- p4007: 8.77118e-7; = p1864*p3478
- p0122: 59.95
- p0933: 19026; = p0801*p0927
- p2553: 0; = p2357*p1014
- p3497: 0; = p1766*p3476
- p3463: 0; = p3368*p1241
- p2273: 0.000670043; = p2230*p2219
- p2097: 0.40001
- p2372: 0.00297572; = p2225*p2201
- p1733: 0
- p3230: 1.00267e-7; = p1170/p0818
- p3142: 9.38343e-7; = p2361*p1023
- p0767: 0
- p2239: 3.71067e-6; = p2222*p2184
- p2546: 0; = p2350*p1123
- p3165: 6.62628e-8; = p2384*p1082
- p2042: 0.07
- p1929: 0
- p2123: 0.263965
- p2427: 0; = p2235*p2217
- p2500: 0; = p2304*p1073
- p4675: 2.71584e-8; = p1914*p3481
- p1266: 0; = if(p1232>0;0;IF(p1259+p1263+p1264+p1265=1;0;1-(p1259+p1263+p1264+p1265)))
- p2037: 3.12
- p3061: 1.06814e-7; = p2280*p1023
- p0867: 0.279774; = IF(p0858+p0864+p0865+p0866=1;0;IF(p0858+p0864+p0865+p0866+p0862>1;1-(p0858+p0864+p0865+p0866);p0862))
- p3307: 0; = if(and(p1232=0;p3252<>0);p3252*(p3258-p3302)/p3305;0)
- p3252: 0; = p1252*(p1267*(1-p3247)+p1270*(1-p3248)+p1271*(1-p3249)+p1272*(1-p3250))
- p1597: 0
- p3279: 0
- p0712: 32.703; = p0052*(1+p0580*p0184/100)
- p1991: 1.3551e8; = (if(p1111=0;0;p1106/p1111)+if(p1112=0;0;p1107/p1112)+if(p1113=0;0;p1108/p1113)+if(p1114=0;0;p1109/p1114)+if(p1115=0;0;p1110/p1115))*(1+p1157)
- p1037: 0.337958
- p3184: 0; = p2403*p1023
- p1227: 0; = IF(p1221=0;0;p1226*p0001/(p0818*p0002))
- p3326: 0; = if(and(p1232=0;p3255<>0);p3268*p3289;0)
- p2418: 0; = p2235*p2208
- p3176: 0; = p2395*p1023
- p1046: 0.0276045; = IF(p1012=0;IF(p1037+p1044+p1045=1;0;IF(p1037+p1044+p1045+p1040>1;1-(p1037+p1044+p1045);p1040));0)
- p1645: 0
- p1776: 0
- p0955: 1.40535e-5; = if(and(p0683>0;or(p0807=56;p0807=100;and(p0807=60;p0901>0.06)));p0937;0)
- p2957: 0.00682158; = p2371*(p1020+p1022)
- p1293: 0; = p1287*p1252/p0818
- p1241: 0; = if(p1232>0;0;IF(p1234+p1238+p1239+p1240=1;0;1-(p1234+p1238+p1239+p1240)))
- p2118: 0.679049
- p2351: 0.000447859; = p2232*p2219
- p2468: 0; = p2272*p1123
- p2076: 0.057
- p0719: 63.609; = p0059*(1+p0587*p0191/100)
- p2540: 0; = p2344*p1073
- p3073: 3.29063e-9; = p2292*p1023
- p2460: 0; = p2264*p1073
- p2558: 0; = p2362*p1014
- p3355: 0; = if(and(p1232=0;p3256<>0);p3256-(p3350+p3351+p3352+p3353+p3354);0)
- p2555: 0; = p2359*p1014
- p4714: 1.15217e-8; = p1953*p3481
- p3136: 2.52175e-6; = p2355*p1023
- p1743: 0
- p0943: 0; = if(and(p0683=0;p0949=0);p0937;0)
- p3295: 0
- p2518: 0; = p2322*p1014
- p0458: 0; = SQRT(2)*(IF((2*p0326-1)<0;-1;IF((2*p0326-1)>0;1;0))*SQRT(SQRT((2/(pi()*0.140012289)+LN(1-(2*p0326-1)^2)/2)^2-LN(1-(2*p0326-1)^2)/0.140012289)-(2/(pi()*0.140012289)+LN(1-(2*p0326-1)^2)/2)))
- p2908: 0; = p2322*(p1020+p1022)
- p3095: 1.46005e-5; = p2314*p1132
- p0669: 12.1324; = p0009*(1+p0537*p0141/100)
- p2153: 8.64175e-8; = p2015*p2081*p2115/(p0818*1000)
- p0733: 0
- p0524: 0; = SQRT(2)*(IF((2*p0392-1)<0;-1;IF((2*p0392-1)>0;1;0))*SQRT(SQRT((2/(pi()*0.140012289)+LN(1-(2*p0392-1)^2)/2)^2-LN(1-(2*p0392-1)^2)/0.140012289)-(2/(pi()*0.140012289)+LN(1-(2*p0392-1)^2)/2)))
- p0003: 10000
- p1170: 968.224; = p1169*p0801
- p1773: 6.42055e-6; = p1365*1000/p0818
- p1371: 3
- p3223: 0; = IF(p3216=0;0;(1-p1223)*24.3050/84.3139)
- p2237: 0.000130357; = p2222*p2182
- p2070: 0.282
- p1798: 0
- p0953: 9.66658e-6; = if(and(p0683>0;or(p0807=56;p0807=100;and(p0807=60;p0901>0.06)));p0935;0)
- p3404: 0; = p3366*p1238
- p2061: 0.518824
- p2137: 2.50059e-6; = p2015*p2065*p2099/(p0818*1000)
- p2411: 0; = p2234*p2201
- p3433: 0; = p3376*p1239
- p0912: 0
- p1012: 0
- p0919: 0.0744139; = p0678*1000/p0801
- p2958: 0.00292457; = p2372*(p1020+p1022)
- p3067: 1.97363e-7; = p2286*p1023
- p3239: 0.013074; = IF(p3238+p3235+p3236=1;0;1-(p3238+p3235+p3236))
- p0982: 0.992478; = if(p0886=0;0;min(1;(p0691*p0690*1000*p0693/100)/p0886))
- p3216: 0; = IF(OR(p1226=0;p1228=0);0;1-p3213-p3214-p3215)
- p1331: 0.000333237; = p1330*p0001/(p0818*p0002)
- p2454: 0; = p2258*p1073
- p1916: 0
- p0267: 4.981
- p0313: 0.5
- p2269: 1.86915e-5; = p2226*p2215
- p0586: 0; = IF(p0322<0.5;-SQRT(p0007*EXP(p0454^2*p0008)-p0007);SQRT(p0007*EXP(p0454^2*p0008)-p0007))
- p0738: 1405.99; = p0078*(1+p0606*p0210/100)
- p3057: 1.03728e-6; = p2276*p1023
- p1796: 0
- p1171: 0.000129903; = p0801*p0001/(p0818*p0002)
- p2388: 0.000105302; = p2229*p2217
- p1640: 0
- p2581: 0; = p2385*p1073
- p0757: 0
- p4631: 8.22981e-10; = p1870*p3481
- p2185: 0.000964778; = p1065-p2184
- p2407: 0; = p2234*p2197
- p2868: 0.000149829; = p2282*(p1020+p1022)
- p2318: 0; = p2224*p2185
- p2720: 0; = p2329*(p1019+p1021)
- p2944: 0.000901265; = p2358*(p1020+p1022)
- p2940: 0.00875233; = p2354*(p1020+p1022)
- p3246: 1; = IF(p3244+p3245=1;0;1-(p3244+p3245))
- p3321: 0; = if(and(p1232=0;p3253<>0);IF((p3317+p3318+p3319+p3320)+(p3253*(p3261*(1-p3277))/p3316)>p3253;p3253-(p3317+p3318+p3319+p3320);p3253*(p3261*(1-p3277))/p3316);0)
- p2250: 0.000266706; = p2222*p2196
- p0804: 0
- p3506: 0; = p1775*p3476
- p2774: 1.34654e-7; = p2383*(p1078+p1080)
- p3426: 0; = p3369*p1239
- p1993: 400
- p2775: 1.40805e-6; = p2384*(p1078+p1080)
- p1872: 0
- p2902: 0; = p2316*(p1020+p1022)
- p2443: 0; = p2247*p1014
- p2653: 2.44235e-5; = p2262*(p1078+p1080)
- p0584: 0; = IF(p0320<0.5;-SQRT(p0007*EXP(p0452^2*p0008)-p0007);SQRT(p0007*EXP(p0452^2*p0008)-p0007))
- p0369: 0.5
- p2339: 0.000240424; = p2228*p2207
- p1963a: 9.79281e-6; = p1550*p1754+p1551*p1755+p1552*p1756+p1553*p1757+p1554*p1758+p1555*p1759+p1556*p1760+p1557*p1761+p1558*p1762+p1559*p1763+p1560*p1764+p1561*p1765+p1562*p1766+p1563*p1767+p1564*p1768+p1565*p1769+p1566*p1770+p1567*p1771+p1568*p1772
- p0164: 25.468
- p2472: 0; = p2276*p1014
- p2200: 0.0076692; = p1056/p0818
- p1261: 0; = if(p1232>0;0;p0732/100)
- p4924: 0; = p1957*p3482
- p1177: 0.000129903; = p0801*p0001/(p0818*p0002)
- p0549: 0; = IF(p0285<0.5;-SQRT(p0007*EXP(p0417^2*p0008)-p0007);SQRT(p0007*EXP(p0417^2*p0008)-p0007))
- p4334: 0; = p1779*p3480
- p3013: 0; = p2427*(p1079+p1081)
- p0212: 1.482
- p1787: 0
- p0311: 0.5
- p0399: 0.5
- p0094: 153.64
- p0106: 81.887
- p3407: 0; = p3369*p1238
- p4279: 9.8056e-7; = p1930*p3479
- p0490: 0; = SQRT(2)*(IF((2*p0358-1)<0;-1;IF((2*p0358-1)>0;1;0))*SQRT(SQRT((2/(pi()*0.140012289)+LN(1-(2*p0358-1)^2)/2)^2-LN(1-(2*p0358-1)^2)/0.140012289)-(2/(pi()*0.140012289)+LN(1-(2*p0358-1)^2)/2)))
- p2258: 8.78194e-5; = p2226*p2204
- p2354: 0.00890541; = p2225*p2182
- p2334: 0; = p2224*p2202
- p2517: 0; = p2321*p1014
- p3094: 8.40201e-6; = p2313*p1132
- p4536: 4.11491e-9; = p1775*p3481
- p5271: 1.31676e-8; = p1892*p3484
- p1936: 0
- p2466: 0; = p2270*p1073
- p1240: 0; = if(p1232>0;0;IF(p1234+p1238+p1239=1;0;IF(p1234+p1238+p1239+p1237>1;1-(p1234+p1238+p1239);p1237)))
- p0257: 11.024
- p1775: 5.17786e-7; = p1367*1000/p0818
- p0665: 0; = IF(p0401<0.5;-SQRT(p0007*EXP(p0533^2*p0008)-p0007);SQRT(p0007*EXP(p0533^2*p0008)-p0007))
- p0861: 0; = p0673*1000/p0856
- p2202: 0.000473213; = 4*1.00794*p2201/(2*14.0067)
- p2952: 0.00181153; = p2366*(p1020+p1022)
- p2325: 0; = p2224*p2192
- p0410: 0; = SQRT(2)*(IF((2*p0278-1)<0;-1;IF((2*p0278-1)>0;1;0))*SQRT(SQRT((2/(pi()*0.140012289)+LN(1-(2*p0278-1)^2)/2)^2-LN(1-(2*p0278-1)^2)/0.140012289)-(2/(pi()*0.140012289)+LN(1-(2*p0278-1)^2)/2)))
- p1090: 2.87965e-5; = IF(p1071=0;p1084*p0001/(p0818*p0002);0)
- p1047: 0.326315; = IF(p1012=0;IF(p1037+p1044+p1045+p1046=1;0;IF(p1037+p1044+p1045+p1046+p1041>1;1-(p1037+p1044+p1045+p1046);p1041));0)
- p2645: 1.61544e-6; = p2254*(p1019+p1021)
- p0752: 0
- p3111: 0; = p2330*p1023
- p2831: 1.1978e-5; = p2245*(p1020+p1022)
- p1866: 0
- p2475: 0; = p2279*p1014
- p2927: 2.50025e-5; = p2341*(p1079+p1081)
- p3035: 1.31064e-7; = p2254*p1023
- p2609: 0; = p2413*p1014
- p0124: 77.666
- p1133: 0; = if(p1121=0;p1123*(p0716/100)*p0703*1000;0)
- p1845: 0
- p0663: 0; = IF(p0399<0.5;-SQRT(p0007*EXP(p0531^2*p0008)-p0007);SQRT(p0007*EXP(p0531^2*p0008)-p0007))
- p3158: 1.53626e-6; = p2377*p1082
- p2232: 0.0655041; = if(p0783*p0787+p0784*p0788+p0785*p0789+p0786*p0790=0;0;p0789*p0785/(p0783*p0787+p0784*p0788+p0785*p0789+p0786*p0790))
- p3299: 0; = if(p1303+p1304+p1305+p1306=0;0;p1303/(p1303+p1304+p1305+p1306))
- p3300: 0; = if(p1293+p1294+p1295+p1296=0;0;p1293/(p1293+p1294+p1295+p1296))
- p2599: 0; = p2403*p1014
- p1910: 0
- p2936: 0.000202155; = p2350*(p1129+p1131)
- p1205: 0
- p3131: 5.39956e-6; = p2350*p1132
- p1207: 0; = if(p1193>0;0;(p1194*p1050/p1057+p1195*p1051/p1058+p1196*p1052/p1059+p1197*p1053/p1060+p1198*p1054/p1061+p1199*p1055/p1062+p1200*p1056/p1063)/(p0702*1000)+(p1201*p1109/p1114+p1202*p1110/p1115)/(p0702*1000)+p1203*p1170/p0801+p1204*p1176/p0801)
- p5184: 1.4402e-8; = p1805*p3484
- p1123: 0; = if(p1121=0;p0717/100;0)
- p1917: 0
- p2004: 30
- p3236: 0.0140975
- p3226: 0; = p3222*p1229
- p2635: 1.69297e-7; = p2244*(p1019+p1021)
- p0938: 0; = p0932*p0001/(p0818*p0002)
- p2638: 3.94364e-7; = p2247*(p1019+p1021)
- p2736: 4.0845e-7; = p2345*(p1078+p1080)
- p2083: 2.17294
- p1117: 0.000342348; = IF(p1071=0;p1107/(p1112*p0818);0)
- p2455: 0; = p2259*p1073
- p2178: 0.0179914; = (p0895*p0831/(1-p0831))/(p0818)
- p2858: 0.000302444; = p2272*(p1129+p1131)
- p0254: 6.652
- p2482: 0; = p2286*p1014
- p1998: 268
- p3306: 0; = if(and(p1232=0;p3252<>0);p3252*(p3257*p3277-p3301)/p3305;0)
- p3129: 5.24528e-8; = p2348*p1082
- p2988: 0; = p2402*(p1020+p1022)
- p1134: 292388; = if(p1121=0;p1128*(p0716/100)*p0703*1000;0)
- p4534: 5.10248e-8; = p1773*p3481
- p0944: 0; = if(and(p0683=0;p0950=0);p0938;0)
- p2405: 0; = p2234*p2195
- p3056: 2.09524e-6; = p2275*p1132
- p1819: 0
- p2675: 1.19533e-6; = p2284*(p1019+p1021)
- p2381: 5.65933e-5; = p2229*p2210
- p3207: 0; = p2426*p1082
- p1060: 0.21
- p1311: 0; = IF(p1307+p1310=p1266;0;IF(p1307+p1310+p1309>p1266;p1266-(p1307+p1310);p1309))
- p2213: 1.60625e-5; = p1116-p2212
- p1053: 7.76116e6; = IF(p1012=0;p1046*p1036;0)
- p3126: 1.92216e-8; = p2345*p1082
- p2463: 0; = p2267*p1073
- p0832: 1.08584e9; = p0831*p0830/(1-p0831)
- p2247: 2.48028e-5; = p2222*p2192
- p2616: 0; = p2420*p1073
- p2453: 0; = p2257*p1014
- p0475: 0; = SQRT(2)*(IF((2*p0343-1)<0;-1;IF((2*p0343-1)>0;1;0))*SQRT(SQRT((2/(pi()*0.140012289)+LN(1-(2*p0343-1)^2)/2)^2-LN(1-(2*p0343-1)^2)/0.140012289)-(2/(pi()*0.140012289)+LN(1-(2*p0343-1)^2)/2)))
- p1257: 0; = if(p1232>0;0;IF(p1253+p1256=1;0;IF(p1253+p1256+p1255>1;1-(p1253+p1256);p1255)))
- p0500: 0; = SQRT(2)*(IF((2*p0368-1)<0;-1;IF((2*p0368-1)>0;1;0))*SQRT(SQRT((2/(pi()*0.140012289)+LN(1-(2*p0368-1)^2)/2)^2-LN(1-(2*p0368-1)^2)/0.140012289)-(2/(pi()*0.140012289)+LN(1-(2*p0368-1)^2)/2)))
- p1109: 1.22785e7; = IF(p1071=0;p1105*p1103*p1095;0)
- p1593: 0.689607
- p2923: 5.88008e-5; = p2337*(p1079+p1081)
- p0178: 45.147
- p2889: 8.12354e-5; = p2303*(p1079+p1081)
- p0819: 0; = p0808*p0809/p0818
- p2025: 8.31142e-5; = p2015*p2023*p2024/(p0818*1000)
- p0911: 0.00460377
- p0723: 0
- p1010: 1.10201e6; = p0890
- p3595: 0; = p1864*p3476
- p1751: 0
- p3340: 0; = if(and(p1232=0;p3254<>0);p3254*(p3270-p3335)/p3338;0)
- p1923: 0
- p2776: 6.28665e-6; = p2385*(p1078+p1080)
- p0210: 0.012
- p2582: 0; = p2386*p1073
- p0505: 0; = SQRT(2)*(IF((2*p0373-1)<0;-1;IF((2*p0373-1)>0;1;0))*SQRT(SQRT((2/(pi()*0.140012289)+LN(1-(2*p0373-1)^2)/2)^2-LN(1-(2*p0373-1)^2)/0.140012289)-(2/(pi()*0.140012289)+LN(1-(2*p0373-1)^2)/2)))
- p0979: 0; = IF(p0976=0;0;p0976*p0001/(p0818*p0002))
- p2175: 0.000157286; = p0895*p0908/p0818
- p0083: 0.093
- p1717: 0
- p2192: 0.00187222; = p1067-p2189-p2190-p2191
- p1694: 0
- p0428: 0; = SQRT(2)*(IF((2*p0296-1)<0;-1;IF((2*p0296-1)>0;1;0))*SQRT(SQRT((2/(pi()*0.140012289)+LN(1-(2*p0296-1)^2)/2)^2-LN(1-(2*p0296-1)^2)/0.140012289)-(2/(pi()*0.140012289)+LN(1-(2*p0296-1)^2)/2)))
- p2856: 1.9907e-6; = p2270*(p1079+p1081)
- p3074: 8.0846e-7; = p2293*p1023
- p2671: 1.31654e-6; = p2280*(p1019+p1021)
- p2759: 1.24476e-7; = p2368*(p1019+p1021)
- p2669: 3.63935e-7; = p2278*(p1019+p1021)
- p3450: 0; = p3374*p1240
- p2052: 6.54259e-5; = p2015*p2049*(1-p2050)/(p0818*1000)
- p0850: 0
- p0372: 0.5
- p3467: 0; = p3372*p1241
- p2848: 4.911e-5; = p2262*(p1079+p1081)
- p2918: 0; = p2332*(p1020+p1022)
- p1750: 0
- p0764: 97.026; = p0104*(1+p0632*p0236/100)
- p2207: 0.003092; = p1119-p2205-p2204-p2206
- p1876: 0
- p2099: 0.620397
- p2148: 2.59253e-6; = p2015*p2076*p2110/(p0818*1000)
- p3117: 1.5216e-6; = p2336*p1082
- p2986: 0; = p2400*(p1020+p1022)
- p1643: 0
- p1265: 0; = if(p1232>0;0;IF(p1259+p1263+p1264=1;0;IF(p1259+p1263+p1264+p1262>1;1-(p1259+p1263+p1264);p1262)))
- p2337: 8.94199e-5; = p2228*p2205
- p1665: 0
- p1870: 1.03557e-7; = p1462*1000/p0818
- p2985: 0; = p2399*(p1020+p1022)
- p2754: 3.32911e-6; = p2363*(p1019+p1021)
- p2898: 0.00296999; = p2312*(p1129+p1131)
- p0349: 0.5
- p2130: 3.60347e-5; = p2015*p2058*p2092/(p0818*1000)
- p0913: 0.0133938
- p0047: 89.697
- p3217: 0; = p3213*p1228
- p1203: 0
- p2655: 4.76871e-6; = p2264*(p1078+p1080)
- p1571: 0.798225
- p3046: 2.9388e-6; = p2265*p1082
- p4952: 0; = p1779*p3483
- p0214: 1.464
- p1222: 0
- p0782: 59.95; = p0122*(1+p0650*p0254/100)
- p0761: 0
- p2732: 1.24343e-5; = p2341*(p1078+p1080)
- p0191: 11.702
- p0945: 0; = if(and(p0683=0;p0951=0);p0939;0)
- p3309: 0; = if(and(p1232=0;p3252<>0);p3252*(p3260-p3304)/p3305;0)
- p1080: 0; = IF(p1071=0;IF(p1073+p1078+p1079=1;0;IF(p1073+p1078+p1079+p1076>1;1-(p1073+p1078+p1079);p1076));0)
- p1009: 0; = p1005*p0001*p0004/(p0818*p0002)
- p1943: 0
- p4508: 0; = p1953*p3480
- p3227: 0; = p3223*p1229
- p2608: 0; = p2412*p1014
- p2876: 6.94725e-7; = p2290*(p1020+p1022)
- p1050: 9.50186e7; = IF(p1012=0;p1037*p1036;0)
- p2563: 0; = p2367*p1014
- p2321: 0; = p2224*p2188
- p2926: 5.52894e-5; = p2340*(p1079+p1081)
- p0376: 0.5
- p4004: 7.11176e-8; = p1861*p3478
- p1704: 0
- p0412: 0; = SQRT(2)*(IF((2*p0280-1)<0;-1;IF((2*p0280-1)>0;1;0))*SQRT(SQRT((2/(pi()*0.140012289)+LN(1-(2*p0280-1)^2)/2)^2-LN(1-(2*p0280-1)^2)/0.140012289)-(2/(pi()*0.140012289)+LN(1-(2*p0280-1)^2)/2)))
- p1145: 6.48601e7; = if(p1121=0;p0799*p0702*1000*p0800/100;0)
- p0049: 8.584
- p3060: 1.01703e-7; = p2279*p1023
- p4540: 2.46894e-9; = p1779*p3481
- p2227: 0.585126; = if(p0774*p0778+p0775*p0779+p0776*p0780+p0777*p0781=0;0;p0779*p0775/(p0774*p0778+p0775*p0779+p0776*p0780+p0777*p0781))
- p5167: 1.64595e-9; = p1788*p3484
- p3104: 0; = p2323*p1023
- p1911: 0
- p0346: 0.5
- p2869: 6.45499e-5; = p2283*(p1020+p1022)
- p1856: 0
- p3096: 0; = p2315*p1023
- p1091: 5.79029e-5; = IF(p1071=0;p1085*p0001/(p0818*p0002);0)
- p3222: 0; = IF(p3216=0;0;p1223*40.078/100.0869)
- p0085: 4828.36
- p2155: 6.52704e-6; = p2015*p2084*p2117/(p0818*1000)
- p0654: 0; = IF(p0390<0.5;-SQRT(p0007*EXP(p0522^2*p0008)-p0007);SQRT(p0007*EXP(p0522^2*p0008)-p0007))
- p2666: 4.27828e-5; = p2275*(p1128+p1130)
- p2945: 0.000129712; = p2359*(p1020+p1022)
- p4723: 0; = p1756*p3482
- p2780: 0.000258507; = p2389*(p1128+p1130)
- p2356: 0.000253497; = p2225*p2184
- p1552: 0.80831
- p0452: 0; = SQRT(2)*(IF((2*p0320-1)<0;-1;IF((2*p0320-1)>0;1;0))*SQRT(SQRT((2/(pi()*0.140012289)+LN(1-(2*p0320-1)^2)/2)^2-LN(1-(2*p0320-1)^2)/0.140012289)-(2/(pi()*0.140012289)+LN(1-(2*p0320-1)^2)/2)))
- p1248: 0; = if(p1232>0;0;p1243*p0001/(p0818*p0002))
- p3348: 0; = if(and(p1232=0;p3256<>0);p3276*p3289;0)
- p3197: 0; = p2416*p1082
- p3436: 0; = p3379*p1239
- p4691: 2.21382e-7; = p1930*p3481
- p2621: 0; = p2425*p1073
- p0542: 0; = IF(p0278<0.5;-SQRT(p0007*EXP(p0410^2*p0008)-p0007);SQRT(p0007*EXP(p0410^2*p0008)-p0007))
- p1160: 0.0584725; = (p1156+p1158)*p1159
- p2617: 0; = p2421*p1073
- p0522: 0; = SQRT(2)*(IF((2*p0390-1)<0;-1;IF((2*p0390-1)>0;1;0))*SQRT(SQRT((2/(pi()*0.140012289)+LN(1-(2*p0390-1)^2)/2)^2-LN(1-(2*p0390-1)^2)/0.140012289)-(2/(pi()*0.140012289)+LN(1-(2*p0390-1)^2)/2)))
- p1583: 0
- p2167: 0.191696; = p2166*(p0898)
- p0510: 0; = SQRT(2)*(IF((2*p0378-1)<0;-1;IF((2*p0378-1)>0;1;0))*SQRT(SQRT((2/(pi()*0.140012289)+LN(1-(2*p0378-1)^2)/2)^2-LN(1-(2*p0378-1)^2)/0.140012289)-(2/(pi()*0.140012289)+LN(1-(2*p0378-1)^2)/2)))
- p3382: 0; = p3363*p1234
- p3218: 0; = p3214*p1228
- p0694: 0
- p1609: 0
- p2323: 0; = p2224*p2190
- p2429: 0; = p2236*p2219
- p3212: 0; = p2431*p1132
- p2095: 0.765734
- p2246: 3.06485e-6; = p2222*p2191
- p3114: 0; = p2333*p1023
- p3688: 0; = p1957*p3476
- p1578: 0
- p1770: 0
- p2604: 0; = p2408*p1014
- p2648: 1.14272e-6; = p2257*(p1019+p1021)
- p2126: 3.86146e-5; = p2015*p2054*p2088/(p0818*1000)
- p1618: 0
- p1335: 1.62024e-5; = p1334*p0001/(p0818*p0002)
- p0842: -0.137826
- p1637: 0
- p3140: 1.70256e-7; = p2359*p1023
- p1604: 0
- p2428: 0; = p2236*p2218
- p0675: 0
- p3365: 0; = if(p1232=0;p3244*p3359/p0818;0)
- p1725: 0
- p1935: 0
- p5293: 1.35791e-8; = p1914*p3484
- p0864: 0.704137; = IF(p0858=1;0;IF(p0858+p0859>1;1-p0858;p0859))
- p1794: 0
- p1260: 0; = if(p1232>0;0;p0731/100)
- p1676: 0
- p2670: 1.25355e-6; = p2279*(p1019+p1021)
- p3703: 1.5744e-6; = p1766*p3477
- p2374: 0.00490982; = p2225*p2203
- p2656: 6.24481e-5; = p2265*(p1078+p1080)
- p1212: 0; = if(p1211=0;0;if(p1193>0;0;(p1207+p1208+p1209)*p1210/(2000*p1211)))
- p3245: 0; = IF(p3244=1;0;if(p3244+p0792/100>1;1-p3244;p0792/100))
- p1952: 8.6988e-6; = p1544*1000/p0818
- p0964: 0; = 56/90000
- p1670: 0
- p3438: 0; = p3362*p1240
- p2049: 25.6942
- p4013: 2.37059e-8; = p1870*p3478
- p1691: 0
- p2485: 0; = p2289*p1014
- p1886: 0
- p3244: 0; = p0791/100
- p0888: 2.97395e6; = p0686*1000*p0687*p0884/100
- p3036: 5.61902e-8; = p2255*p1023
- p3010: 0; = p2424*(p1079+p1081)
- p0617: 0; = IF(p0353<0.5;-SQRT(p0007*EXP(p0485^2*p0008)-p0007);SQRT(p0007*EXP(p0485^2*p0008)-p0007))
- p1138: 14319.3; = if(p1121=0;p1132*(p0716/100)*p0703*1000;0)
- p2219: 0.00683711; = p1154-p2218
- p0696: 0
- p3344: 0; = if(and(p1232=0;p3254<>0);p3254-(p3339+p3340+p3341+p3342+p3343);0)
- p2917: 0; = p2331*(p1020+p1022)
- p2209: 0.000488987; = 14.0067*p2208/30.973762
- p2823: 0.000128116; = p2237*(p1020+p1022)
- p2816: 0; = p2425*(p1078+p1080)
- p0656: 0; = IF(p0392<0.5;-SQRT(p0007*EXP(p0524^2*p0008)-p0007);SQRT(p0007*EXP(p0524^2*p0008)-p0007))
- p0009: 12.1324
- p0740: 94.369; = p0080*(1+p0608*p0212/100)
- p1763: 0
- p2259: 7.9426e-5; = p2226*p2205
- p1290: 0; = IF(p1287=p1264;0;IF(p1287+p1288>p1264;p1264-p1287;p1288))
- p2756: 0.000136718; = p2365*(p1019+p1021)
- p3181: 0; = p2400*p1023
- p0722: 32.695; = p0062*(1+p0590*p0194/100)
- p2262: 7.46829e-5; = p2226*p2208
- p2977: 7.0744e-5; = p2391*(p1129+p1131)
- p3894: 7.49716e-8; = p1957*p3477
- p0768: 97.521; = p0108*(1+p0636*p0240/100)
- p0419: 0; = SQRT(2)*(IF((2*p0287-1)<0;-1;IF((2*p0287-1)>0;1;0))*SQRT(SQRT((2/(pi()*0.140012289)+LN(1-(2*p0287-1)^2)/2)^2-LN(1-(2*p0287-1)^2)/0.140012289)-(2/(pi()*0.140012289)+LN(1-(2*p0287-1)^2)/2)))
- p0014: 393.362
- p2912: 0; = p2326*(p1020+p1022)
- p2081: 0.0019
- p2964: 0.000545012; = p2378*(p1079+p1081)
- p2850: 9.58874e-6; = p2264*(p1079+p1081)
- p3398: 0; = p3379*p1234
- p1908: 0
- p4919: 0; = p1952*p3482
- p2093: 0.260958
- p1544: 84
- p1079: 0.65758; = IF(p1071=0;IF(p1073+p1078=1;0;IF(p1073+p1078+p1075>1;1-(p1073+p1078);p1075));0)
- p3725: 2.99887e-7; = p1788*p3477
- p0059: 63.609
- p2121: 0.822447
- p1729: 0
- p1174: 5.01333e-8; = p1170*p1173/p0818
- p2561: 0; = p2365*p1014
- p2375: 0.000340834; = p2229*p2204
- p1312: 0; = IF(p1307+p1310+p1311=p1266;0;p1266-(p1307+p1310+p1311))
- p2796: 0; = p2405*(p1019+p1021)
- p1875: 0
- p0976: 0; = IF(p0687=0;IF(OR(p0686=0;p0689=0);0;p0686*1000*p0689/100);0)
- p1142: 0; = if(p1121=0;p1136*p0001/(p0818*p0002);0)
- p2115: 0.856281
- p2172: 0.301655; = p2166-(p2167+p2168+p2169+p2170)
- p1878: 0
- p1661: 0
- p3303: 0; = if(and(p1232=0;p3252<>0);p3259*p3289;0)
- p0668: 0; = IF(p0404<0.5;-SQRT(p0007*EXP(p0536^2*p0008)-p0007);SQRT(p0007*EXP(p0536^2*p0008)-p0007))
- p1572: 0
- p2615: 0; = p2419*p1073
- p1089: 0; = IF(p1071=0;p1083*p0001/(p0818*p0002);0)
- p3000: 0; = p2414*(p1079+p1081)
- p2223: 0.0817182; = if(p0765*p0769+p0766*p0770+p0767*p0771+p0768*p0772=0;0;p0770*p0766/(p0765*p0769+p0766*p0770+p0767*p0771+p0768*p0772))
- p0352: 0.5
- p0745: 4828.36; = p0085*(1+p0613*p0217/100)
- p1688: 0.698812
- p2011: 0.0637066
- p2512: 0; = p2316*p1014
- p1176: 519.313; = p1175*p0801
- p3329: 0; = if(and(p1232=0;p3255<>0);p3255*(p3266-p3324)/p3327;0)
- p0570: 0; = IF(p0306<0.5;-SQRT(p0007*EXP(p0438^2*p0008)-p0007);SQRT(p0007*EXP(p0438^2*p0008)-p0007))
- p1333: 0.000105369; = p1332*p0001/(p0818*p0002)
- p0474: 0; = SQRT(2)*(IF((2*p0342-1)<0;-1;IF((2*p0342-1)>0;1;0))*SQRT(SQRT((2/(pi()*0.140012289)+LN(1-(2*p0342-1)^2)/2)^2-LN(1-(2*p0342-1)^2)/0.140012289)-(2/(pi()*0.140012289)+LN(1-(2*p0342-1)^2)/2)))
- p2690: 7.12599e-5; = p2299*(p1078+p1080)
- p1730: 0
- p1073: 0; = IF(p1071=0;p0711/100;0)
- p3455: 0; = p3379*p1240
- p2578: 0; = p2382*p1073
- p3066: 2.43879e-8; = p2285*p1023
- p2800: 0; = p2409*(p1019+p1021)
- p0221: 36.523
- p5043: 0; = p1870*p3483
- p0150: 24.718
- p1989: 50
- p4673: 1.45421e-6; = p1912*p3481
- p1250: 0; = if(p1232>0;0;p1245*p0001/(p0818*p0002))
- p3410: 0; = p3372*p1238
- p2159: 9.49266e-5; = p2015*p2083*p2121/(p0818*1000)
- p0351: 0.5
- p2221: 0.00125837; = p1155-p2220
- p1825: 0
- p0683: 46.214; = p0023*(1+p0551*p0155/100)
- p2948: 0.00081829; = p2362*(p1020+p1022)
- p1198: 0
- p1859: 9.32015e-7; = p1451*1000/p0818
- p0426: 0; = SQRT(2)*(IF((2*p0294-1)<0;-1;IF((2*p0294-1)>0;1;0))*SQRT(SQRT((2/(pi()*0.140012289)+LN(1-(2*p0294-1)^2)/2)^2-LN(1-(2*p0294-1)^2)/0.140012289)-(2/(pi()*0.140012289)+LN(1-(2*p0294-1)^2)/2)))
- p1554: 0
- p1871: 0
- p1324: 0.0281597; = IF(((p0745*1000*p0751/100)+(p0754*1000*p0760/100))/p0801<0;0;((p0745*1000*p0751/100)+(p0754*1000*p0760/100))/p0801)
- p1027: 0; = IF(p1012=0;p1021*(p0704/100)*p0703*1000;0)
- p4772: 0; = p1805*p3482
- p0053: 65.758
- p2591: 0; = p2395*p1014
- p1024: 0; = IF(p1012=0;p1014*(p0704/100)*p0703*1000;0)
- p0790: 18.196; = p0130*(1+p0658*p0262/100)
- p0348: 0.5
- p2091: 0.374844
- p3796: 6.74745e-7; = p1859*p3477
- p4184: 1.09356e-8; = p1835*p3479
- p2657: 3.4695e-8; = p2266*(p1078+p1080)
- p1699: 0
- p0405: 0; = SQRT(2)*(IF((2*p0273-1)<0;-1;IF((2*p0273-1)>0;1;0))*SQRT(SQRT((2/(pi()*0.140012289)+LN(1-(2*p0273-1)^2)/2)^2-LN(1-(2*p0273-1)^2)/0.140012289)-(2/(pi()*0.140012289)+LN(1-(2*p0273-1)^2)/2)))
- p0829: 0; = if(p0807=480;p0814*(1-p0824);0)
- p1076: 0; = IF(p1071=0;p0714/100;0)
- p0622: 0; = IF(p0358<0.5;-SQRT(p0007*EXP(p0490^2*p0008)-p0007);SQRT(p0007*EXP(p0490^2*p0008)-p0007))
- p2932: 3.66691e-6; = p2346*(p1079+p1081)
- p1277: 0
- p2693: 9.35695e-5; = p2302*(p1078+p1080)
- p1305: 0; = p1301*p1252/p0818
- p2859: 0.000426208; = p2273*(p1129+p1131)
- p2358: 0.000917028; = p2225*p2186
- p1860: 0
- p3053: 8.07831e-6; = p2272*p1132
- p3361: 0; = if(p1232=0;p3311+p3322+p3333+p3344+p3355;0)
- p1912: 0.000182986; = p1504*1000/p0818
- p3396: 0; = p3377*p1234
- p2955: 1.26287e-5; = p2369*(p1020+p1022)
- p3623: 0; = p1892*p3476
- p2236: 0; = 1-(p2230+p2231+p2232+p2233)
- p2022: 0.00912962; = p2018*p2015/p0818-p2021
- p3286: 0
- p4926: 0; = p1963*p3482
- p1712: 0
- p1255: 0; = if(p1232>0;0;p0737/100)
- p0547: 0; = IF(p0283<0.5;-SQRT(p0007*EXP(p0415^2*p0008)-p0007);SQRT(p0007*EXP(p0415^2*p0008)-p0007))
- p2839: 4.06428e-7; = p2253*(p1020+p1022)
- p2530: 0; = p2334*p1014
- p3006: 0; = p2420*(p1079+p1081)
- p3276: 0
- p4485: 0; = p1930*p3480
- p4929: 0; = p1756*p3483
- p1588: 0
- p2002: 750
- p2787: 0; = p2396*(p1019+p1021)
- p3167: 1.11644e-6; = p2386*p1082
- p1973: 0; = if(p0807=480;p1968*p0001/(p0818*p0002);0)
- p2256: 6.26903e-6; = p2222*p2202
- p5337: 1.81714e-8; = p1962*p3484
- p1148: 0.129871; = if(p1121=0;IF(p1146=1;0;1-p1146);0)
- p2864: 2.24955e-5; = p2278*(p1020+p1022)
- p2877: 1.14028e-6; = p2291*(p1020+p1022)
- p3228: 0; = p3224*p1229
- p0918: 0.732846; = p0680*1000/p0801
- p1325: 0; = IF(((p0745*1000*p0752/100)+(p0754*1000*p0761/100))/p0801<0;0;((p0745*1000*p0752/100)+(p0754*1000*p0761/100))/p0801)
- p2963: 6.56409e-5; = p2377*(p1079+p1081)
- p2435: 0; = p2239*p1014
- p2894: 0.00010413; = p2308*(p1079+p1081)
- p2647: 9.96775e-8; = p2256*(p1019+p1021)
- p2884: 0.000442481; = p2298*(p1079+p1081)
- p3918: 1.18529e-7; = p1775*p3478
- p2056: 2.07882
- p3328: 0; = if(and(p1232=0;p3255<>0);p3255*(p3265*p3277-p3323)/p3327;0)
- p1706: 0
- p2206: 0.000372399; = 9*1.00794*p2204/30.973762
- p0381: 0.5
- p3655: 0; = p1924*p3476
- p2136: 3.07786e-5; = p2015*p2064*p2098/(p0818*1000)
- p1672: 0
- p0753: 0
- p3413: 0; = p3375*p1238
- p0648: 0; = IF(p0384<0.5;-SQRT(p0007*EXP(p0516^2*p0008)-p0007);SQRT(p0007*EXP(p0516^2*p0008)-p0007))
- p1909: 0
- p0926: 0; = IF(p0918+p0923+p0924+p0925=1;0;IF(p0918+p0923+p0924+p0925+p0922>1;1-(p0918+p0923+p0924+p0925);p0922))
- p3253: 0; = p1252*(p1277*(1-p3247)+p1280*(1-p3248)+p1281*(1-p3249)+p1282*(1-p3250))
- p3354: 0; = IF((p3350+p3351+p3352+p3353)+IF(p3349=0;0;(p3256*(p3273*(1-p3277))/p3349))>p3256;p3256-(p3350+p3351+p3352+p3353);IF(p3349=0;0;p3256*(p3273*(1-p3277))/p3349))
- p3041: 3.95833e-7; = p2260*p1082
- p3998: 9.43494e-6; = p1855*p3478
- p1881: 0
- p2238: 2.86149e-5; = p2222*p2183
- p2335: 0; = p2224*p2203
- p1081: 0; = IF(p1071=0;IF(p1073+p1078+p1079+p1080=1;0;IF(p1073+p1078+p1079+p1080+p1077>1;1-(p1073+p1078+p1079+p1080);p1077));0)
- p2594: 0; = p2398*p1014
- p4208: 3.28069e-8; = p1859*p3479
- p0030: 1396.35
- p0130: 18.196
- p2387: 1.17493e-5; = p2229*p2216
- p3107: 0; = p2326*p1023
- p1095: 5.46512e7; = IF(p1071=0;p0797*p0702*1000*p0798/100;0)
- p1975: 0.000129903; = p1970*p0001/(p0818*p0002)
- p0536: 0; = SQRT(2)*(IF((2*p0404-1)<0;-1;IF((2*p0404-1)>0;1;0))*SQRT(SQRT((2/(pi()*0.140012289)+LN(1-(2*p0404-1)^2)/2)^2-LN(1-(2*p0404-1)^2)/0.140012289)-(2/(pi()*0.140012289)+LN(1-(2*p0404-1)^2)/2)))
- p1102: 0.0177463; = IF(p1071=0;IF(p1096+p1101=1;0;IF(p1096+p1101+p1098>1;1-(p1096+p1101);p1098));0)
- p3592: 0; = p1861*p3476
- p1568: 0
- p1157: 0.249736
- p3423: 0; = p3366*p1239
- p1570: 0
- p1605: 0
- p0026: 1405.97
- p1587: 0
- p2131: 1.38846e-5; = p2015*p2059*p2093/(p0818*1000)
- p2005: 5.25794e6; = p1963*p0818+p1959*1000+p1170+p1176+p1182
- p2887: 0.000416057; = p2301*(p1079+p1081)
- p0394: 0.5
- p5145: 8.64122e-9; = p1766*p3484
- p2680: 2.6158e-5; = p2289*(p1019+p1021)
- p2627: 0; = p2431*p1123
- p3102: 0; = p2321*p1023
- p1184: 3.01739e-8; = p1182/p0818
- p0775: 56.489; = p0115*(1+p0643*p0247/100)
- p3209: 0; = p2428*p1132
- p2886: 0.0011897; = p2300*(p1079+p1081)
- p1602: 0
- p2770: 9.47896e-5; = p2379*(p1078+p1080)
- p1018: 0.08584; = IF(p1012=0;p0709/100;0)
- p3479: 0.0351999; = if(p1328+p1330+p1332+p1334+p1336+p1338+p1340+p1342+p1344=0;0;p1334/(p1328+p1330+p1332+p1334+p1336+p1338+p1340+p1342+p1344))
- p2502: 0; = p2306*p1073
- p2292: 2.55088e-6; = p2223*p2199
- p3205: 0; = p2424*p1082
- p3742: 2.62401e-6; = p1805*p3477
- p1048: 0.000297097; = IF(p1012=0;IF(p1037+p1044+p1045+p1046+p1047=1;0;IF(p1037+p1044+p1045+p1046+p1047+p1042>1;1-(p1037+p1044+p1045+p1046+p1047);p1042));0)
- p0525: 0; = SQRT(2)*(IF((2*p0393-1)<0;-1;IF((2*p0393-1)>0;1;0))*SQRT(SQRT((2/(pi()*0.140012289)+LN(1-(2*p0393-1)^2)/2)^2-LN(1-(2*p0393-1)^2)/0.140012289)-(2/(pi()*0.140012289)+LN(1-(2*p0393-1)^2)/2)))
- p0401: 0.5
- p0533: 0; = SQRT(2)*(IF((2*p0401-1)<0;-1;IF((2*p0401-1)>0;1;0))*SQRT(SQRT((2/(pi()*0.140012289)+LN(1-(2*p0401-1)^2)/2)^2-LN(1-(2*p0401-1)^2)/0.140012289)-(2/(pi()*0.140012289)+LN(1-(2*p0401-1)^2)/2)))
- p0446: 0; = SQRT(2)*(IF((2*p0314-1)<0;-1;IF((2*p0314-1)>0;1;0))*SQRT(SQRT((2/(pi()*0.140012289)+LN(1-(2*p0314-1)^2)/2)^2-LN(1-(2*p0314-1)^2)/0.140012289)-(2/(pi()*0.140012289)+LN(1-(2*p0314-1)^2)/2)))
- p1949: 0
- p0414: 0; = SQRT(2)*(IF((2*p0282-1)<0;-1;IF((2*p0282-1)>0;1;0))*SQRT(SQRT((2/(pi()*0.140012289)+LN(1-(2*p0282-1)^2)/2)^2-LN(1-(2*p0282-1)^2)/0.140012289)-(2/(pi()*0.140012289)+LN(1-(2*p0282-1)^2)/2)))
- p1964: 0.5
- p0407: 0; = SQRT(2)*(IF((2*p0275-1)<0;-1;IF((2*p0275-1)>0;1;0))*SQRT(SQRT((2/(pi()*0.140012289)+LN(1-(2*p0275-1)^2)/2)^2-LN(1-(2*p0275-1)^2)/0.140012289)-(2/(pi()*0.140012289)+LN(1-(2*p0275-1)^2)/2)))
- p0699: 0
- p2498: 0; = p2302*p1073
- p3371: 0; = if(p1232=0;p3245*p3359/p0818;0)
- p1545: 14
- p0894: 0.16
- p0235: 0.012
- p2012: 0.120003
- p1297: 0
- p0292: 0.5
- p3225: 0; = p3221*p1229
- p3440: 0; = p3364*p1240
- p0148: 33.337
- p1580: 0
- p2833: 2.43764e-5; = p2247*(p1020+p1022)
- p1708: 0.485855
- p0997: 0; = if(p0888=0;0;if((p0695*p0694*1000*p0696/100)/p0888>1;1;(p0695*p0694*1000*p0696/100)/p0888))
- p0539: 0; = IF(p0275<0.5;-SQRT(p0007*EXP(p0407^2*p0008)-p0007);SQRT(p0007*EXP(p0407^2*p0008)-p0007))
- p0216: 20.999
- p3364: 0; = if(p1232=0;p3244*p3358/p0818;0)
- p2027: 0.428799
- p2753: 1.32384e-5; = p2362*(p1019+p1021)
- p2853: 7.29504e-7; = p2267*(p1079+p1081)
- p2348: 3.40824e-6; = p2228*p2216
- p0876: 0; = p0866*p0856
- p0271: 3.93
- p0153: 24.417
- p0744: 10.396; = p0084*(1+p0612*p0216/100)
- p1004: 0; = p1000*p0888
- p1122: 0; = p1121*p0001/(p0818*p0002)
- p3456: 0; = p3380*p1240
- p1797: 3.95588e-5; = p1389*1000/p0818
- p2572: 0; = p2376*p1073
- p2641: 4.24063e-6; = p2250*(p1019+p1021)
- p2391: 0.000111217; = p2233*p2220
- p2706: 0; = p2315*(p1019+p1021)
- p3291: 0
- p2701: 7.51721e-5; = p2310*(p1078+p1080)
- p1286: 0; = p1282*p1252/p0818
- p5132: 0; = p1963*p3483
- p4128: 1.09356e-8; = p1779*p3479
- p1304: 0; = p1300*p1252/p0818
- p1278: 0
- p2925: 0.000158098; = p2339*(p1079+p1081)
- p1220: 0; = IF(p1218<0.5;-SQRT(p1214*EXP(p1219^2*p1215)-p1214);SQRT(p1214*EXP(p1219^2*p1215)-p1214))
- p0518: 0; = SQRT(2)*(IF((2*p0386-1)<0;-1;IF((2*p0386-1)>0;1;0))*SQRT(SQRT((2/(pi()*0.140012289)+LN(1-(2*p0386-1)^2)/2)^2-LN(1-(2*p0386-1)^2)/0.140012289)-(2/(pi()*0.140012289)+LN(1-(2*p0386-1)^2)/2)))
- p1901: 0
- p2667: 1.27851e-5; = p2276*(p1019+p1021)
- p2417: 0; = p2235*p2207
- p1921: 0
- p0418: 0; = SQRT(2)*(IF((2*p0286-1)<0;-1;IF((2*p0286-1)>0;1;0))*SQRT(SQRT((2/(pi()*0.140012289)+LN(1-(2*p0286-1)^2)/2)^2-LN(1-(2*p0286-1)^2)/0.140012289)-(2/(pi()*0.140012289)+LN(1-(2*p0286-1)^2)/2)))
- p2978: 0.000122935; = p2392*(p1129+p1131)
- p3232: 3.01739e-8; = p1182/p0818
- p2973: 7.72607e-6; = p2387*(p1079+p1081)
- p0143: 5.625
- p2612: 0; = p2416*p1073
- p4566: 2.88044e-8; = p1805*p3481
- p0826: 0.150714; = 1-p0825/p0818
- p0515: 0; = SQRT(2)*(IF((2*p0383-1)<0;-1;IF((2*p0383-1)>0;1;0))*SQRT(SQRT((2/(pi()*0.140012289)+LN(1-(2*p0383-1)^2)/2)^2-LN(1-(2*p0383-1)^2)/0.140012289)-(2/(pi()*0.140012289)+LN(1-(2*p0383-1)^2)/2)))
- p0868: 0; = IF(p0858+p0864+p0865+p0866+p0867=1;0;IF(p0858+p0864+p0865+p0866+p0867+p0863>1;1-(p0858+p0864+p0865+p0866+p0867);p0863))
- p1365: 62
- p2783: 6.70478e-5; = p2392*(p1128+p1130)
- p0526: 0; = SQRT(2)*(IF((2*p0394-1)<0;-1;IF((2*p0394-1)>0;1;0))*SQRT(SQRT((2/(pi()*0.140012289)+LN(1-(2*p0394-1)^2)/2)^2-LN(1-(2*p0394-1)^2)/0.140012289)-(2/(pi()*0.140012289)+LN(1-(2*p0394-1)^2)/2)))
- p4469: 0; = p1914*p3480
- p2047: 1.5935e-12; = p2015*p2045/(p0818*1000000000000)
- p3071: 9.11871e-10; = p2290*p1023
- p2919: 0; = p2333*(p1020+p1022)
- p3081: 2.78437e-5; = p2300*p1082
- p1983: 50
- p3470: 0; = p3375*p1241
- p3359: 0; = if(p1232=0;p3309+p3320+p3331+p3342+p3353;0)
- p1231: 0; = IF(p1221=0;0;p1230*(p1228+p1229))
- p3233: 0.60394
- p2058: 1.24412
- p1963e: 1.55336e-7; = p1628*p1832+p1629*p1833+p1630*p1834+p1631*p1835+p1632*p1836+p1633*p1837+p1634*p1838+p1635*p1839+p1636*p1840+p1637*p1841+p1638*p1842+p1639*p1843+p1640*p1844+p1641*p1845+p1642*p1846+p1643*p1847+p1644*p1848+p1645*p1849+p1646*p1850
- p3293: 0
- p2179: 0.00672879; = p0970+p0971+p0972
- p2819: 0; = p2428*(p1128+p1130)
- p3133: 8.05911e-7; = p2352*p1132
- p0632: 0; = IF(p0368<0.5;-SQRT(p0007*EXP(p0500^2*p0008)-p0007);SQRT(p0007*EXP(p0500^2*p0008)-p0007))
- p2730: 7.86257e-5; = p2339*(p1078+p1080)
- p0803: 0
- p0507: 0; = SQRT(2)*(IF((2*p0375-1)<0;-1;IF((2*p0375-1)>0;1;0))*SQRT(SQRT((2/(pi()*0.140012289)+LN(1-(2*p0375-1)^2)/2)^2-LN(1-(2*p0375-1)^2)/0.140012289)-(2/(pi()*0.140012289)+LN(1-(2*p0375-1)^2)/2)))
- p0759: 0
- p2829: 2.42896e-5; = p2243*(p1020+p1022)
- p1678: 0
- p3269: 0
- p2772: 1.85077e-5; = p2381*(p1078+p1080)
- p1671: 0
- p2160: 3.80587e-6; = p2015*p2084*p2122/(p0818*1000)
- p0956: 0; = if(and(p0683>0;or(p0807=56;p0807=100;and(p0807=60;p0901>0.06)));p0938;0)
- p0370: 0.5
- p2315: 0; = p2224*p2182
- p4622: 2.46894e-9; = p1861*p3481
- p0514: 0; = SQRT(2)*(IF((2*p0382-1)<0;-1;IF((2*p0382-1)>0;1;0))*SQRT(SQRT((2/(pi()*0.140012289)+LN(1-(2*p0382-1)^2)/2)^2-LN(1-(2*p0382-1)^2)/0.140012289)-(2/(pi()*0.140012289)+LN(1-(2*p0382-1)^2)/2)))
- p2742: 0.000155371; = p2351*(p1128+p1130)
- p5240: 1.23446e-9; = p1861*p3484
- p2079: 0.02
- p0776: 50.645; = p0116*(1+p0644*p0248/100)
- p3305: 0; = if(and(p1232=0;p3252<>0);1-(p3301+p3302+p3303+p3304);0)
- p2013: 0.75
- p2476: 0; = p2280*p1014
- p3201: 0; = p2420*p1082
- p2357: 0.000873157; = p2225*p2185
- p3406: 0; = p3368*p1238
- p1956: 0
- p2893: 2.75938e-5; = p2307*(p1079+p1081)
- p3025: 1.37354e-8; = p2244*p1023
- p5214: 1.23446e-9; = p1835*p3484
- p3390: 0; = p3371*p1234
- p1271: 0; = IF(p1267+p1270=p1259;0;IF(p1267+p1270+p1269>p1259;p1259-(p1267+p1270);p1269))
- p3370: 0; = if(p1232=0;p3245*p3358/p0818;0)
- p2867: 1.17121e-5; = p2281*(p1020+p1022)
- p1155: 0.00198252; = if(p1153*p0818=0;0;p1151/(p1153*p0818))
- p2313: 0.000494527; = p2231*p2220
- p1034: 1.08181e-5; = IF(p1012=0;p1028*p0001/(p0818*p0002);0)
- p1848: 0
- p3457: 0; = p3362*p1241
- p0898: 0.3802
- p1151: 6.99271e6; = if(p1121=0;p1149*p1148*p1145;0)
- p4146: 1.39247e-6; = p1797*p3479
- p2230: 0.0980008; = if(p0783*p0787+p0784*p0788+p0785*p0789+p0786*p0790=0;0;p0787*p0783/(p0783*p0787+p0784*p0788+p0785*p0789+p0786*p0790))
- p1218: 0
- p1567: 0
- p2737: 1.82364e-6; = p2346*(p1078+p1080)
- p1017: 0; = IF(p1012=0;p0708/100;0)
- p1668: 0
- p1295: 0; = p1291*p1252/p0818
- p1549: 1
- p1586: 0
- p0994: 0; = p0990*p0001*p0004/(p0818*p0002)
- p1092: 0; = IF(p1071=0;p1086*p0001/(p0818*p0002);0)
- p2414: 0; = p2235*p2204
- p2782: 3.85834e-5; = p2391*(p1128+p1130)
- p0270: 5.182
- p0174: 0.012
- p3449: 0; = p3373*p1240
- p0887: 702.783; = 1000*p0886*p0001*p0003*p0004/(p0818*p0002)
- p2658: 3.628e-7; = p2267*(p1078+p1080)
- p2032: 0.448886
- p2573: 0; = p2377*p1073
- p3020: 4.78676e-9; = p2239*p1023
- p0152: 4.88
- p1581: 0
- p2687: 7.04882e-6; = p2296*(p1019+p1021)
- p0519: 0; = SQRT(2)*(IF((2*p0387-1)<0;-1;IF((2*p0387-1)>0;1;0))*SQRT(SQRT((2/(pi()*0.140012289)+LN(1-(2*p0387-1)^2)/2)^2-LN(1-(2*p0387-1)^2)/0.140012289)-(2/(pi()*0.140012289)+LN(1-(2*p0387-1)^2)/2)))
- p2619: 0; = p2423*p1073
- p3124: 3.30858e-6; = p2343*p1082
- p2434: 0; = p2238*p1014
- p2332: 0; = p2224*p2200
- p3016: 0; = p2430*(p1129+p1131)
- p0096: 89.158
- p2921: 0; = p2335*(p1020+p1022)
- p1173: 0.5
- p1656: 0
- p0606: 0; = IF(p0342<0.5;-SQRT(p0007*EXP(p0474^2*p0008)-p0007);SQRT(p0007*EXP(p0474^2*p0008)-p0007))
- p1563: 0
- p0917: 1.31205
- p0811: 0; = if(p0807=480;1-p0810;0)
- p1303: 0; = p1297*p1252/p0818
- p2152: 1.1053e-6; = p2015*p2080*p2114/(p0818*1000)
- p3263: 0
- p0023: 46.214
- p4210: 1.09356e-8; = p1861*p3479
- p3292: 0
- p2552: 0; = p2356*p1014
- p3238: 0.854735; = IF(p3237+p3235+p3236>1;1-(p3235+p3236);p3237)
- p1132: 0.01699; = if(p1121=0;IF(p1123+p1128+p1129+p1130+p1131=1;0;1-(p1123+p1128+p1129+p1130+p1131));0)
- p1127: 0; = if(p1121=0;p0721/100;0)
- p0286: 0.5
- p0402: 0.5
- p1622: 0
- p0690: 1396.35; = p0030*(1+p0558*p0162/100)
- p2832: 3.01217e-6; = p2246*(p1020+p1022)
- p3434: 0; = p3377*p1239
- p2308: 0.000158354; = p2227*p2215
- p0679: 152.108; = p0019*(1+p0547*p0151/100)
- p1585: 0
- p1045: 0.0348009; = IF(p1012=0;IF(p1037+p1044=1;0;IF(p1037+p1044+p1039>1;1-(p1037+p1044);p1039));0)
- p2184: 0.000280097; = p1051/p0818
- p1928: 0
- p0253: 17.074
- p4095: 1.99129e-6; = p1952*p3478
- p3248: 0
- p2394: 0; = p2234*p2183
- p0146: 13.122
- p2574: 0; = p2378*p1073
- p0392: 0.5
- p2050: 0.952062
- p2509: 0; = p2313*p1123
- p3353: 0; = if(and(p1232=0;p3256<>0);p3256*(p3276-p3348)/p3349;0)
- p2846: 1.69131e-5; = p2260*(p1079+p1081)
- p0062: 32.695
- p0523: 0; = SQRT(2)*(IF((2*p0391-1)<0;-1;IF((2*p0391-1)>0;1;0))*SQRT(SQRT((2/(pi()*0.140012289)+LN(1-(2*p0391-1)^2)/2)^2-LN(1-(2*p0391-1)^2)/0.140012289)-(2/(pi()*0.140012289)+LN(1-(2*p0391-1)^2)/2)))
- p3689: 0; = p1962*p3476
- p1128: 0.34692; = if(p1121=0;IF(p1123=1;0;IF(p1123+p1124>1;1-p1123;p1124));0)
- p1025: 21688.3; = IF(p1012=0;p1019*(p0704/100)*p0703*1000;0)
- p1720: 0.68908
- p0269: 4.683
- p3047: 1.63274e-9; = p2266*p1082
- p2222: 0.0132478; = if(p0765*p0769+p0766*p0770+p0767*p0771+p0768*p0772=0;0;p0769*p0765/(p0765*p0769+p0766*p0770+p0767*p0771+p0768*p0772))
- p1064: 0.0119998; = IF(p1012=0;p1050/(p1057*p0818);0)
- p4352: 0; = p1797*p3480
- p1761: 0
- p2024: 0.748682
- p1818: 0
- p2637: 4.87312e-8; = p2246*(p1019+p1021)
- p0685: 14.495; = p0025*(1+p0553*p0157/100)
- p1690: 0
- p0914: 1.89225e8; = p0825*p0911+(p0830+p0895)*p0824*p0913
- p1322: 0.124727; = IF(((p0745*1000*p0749/100)+(p0754*1000*p0758/100))/p0801<0;0;((p0745*1000*p0749/100)+(p0754*1000*p0758/100))/p0801)
- p2505: 0; = p2309*p1073
- p1462: 1
- p2786: 0; = p2395*(p1019+p1021)
- p3260: 0
- p2499: 0; = p2303*p1073
- p1994: 750
- p3086: 1.38325e-8; = p2305*p1082
- p2763: 4.7314e-5; = p2372*(p1019+p1021)
- p1051: 2.70475e6; = IF(p1012=0;p1044*p1036;0)
- p2805: 0; = p2414*(p1078+p1080)
- p3203: 0; = p2422*p1082
- p2527: 0; = p2331*p1014
- p1028: 117090; = IF(p1012=0;p1022*(p0704/100)*p0703*1000;0)
- p0963: 0; = if(and(p0683>0;or(p0807=480;p0807=32;p0807=1;and(p0807=60;p0901<0.03)));p0939;0)
- p0896: 0.396106
- p0179: 3.212
- p1681: 0
- p0136: 97.026
- p1951: 0
- p0701: 0
- p0137: 57.343
- p0686: 1405.97; = p0026*(1+p0554*p0158/100)
- p1703: 0
- p2060: 0.272353
- p0797: 57.343; = p0137*(1+p0665*p0269/100)
- p2525: 0; = p2329*p1014
- p3237: 0.854735
- p0649: 0; = IF(p0385<0.5;-SQRT(p0007*EXP(p0517^2*p0008)-p0007);SQRT(p0007*EXP(p0517^2*p0008)-p0007))
- p4837: 0; = p1870*p3482
- p2362: 0.000832602; = p2225*p2190
- p3235: 0.118093
- p3466: 0; = p3371*p1241
- p1613: 0
- p1036: 2.81156e8; = IF(p1012=0;p0795*p0702*1000*p0796/100;0)
- p2632: 2.13432e-7; = p2241*(p1019+p1021)
- p2203: 0.00542501; = p1070-p2200-p2201-p2202
- p0223: 37.723
- p3367: 0; = if(p1232=0;p3244*p3361/p0818;0)
- p2882: 0.000435701; = p2296*(p1020+p1022)
- p2086: 0.0617647
- p2569: 0; = p2373*p1014
- p2347: 2.10434e-5; = p2228*p2215
- p0638: 0; = IF(p0374<0.5;-SQRT(p0007*EXP(p0506^2*p0008)-p0007);SQRT(p0007*EXP(p0506^2*p0008)-p0007))
- p2402: 0; = p2234*p2191
- p0647: 0; = IF(p0383<0.5;-SQRT(p0007*EXP(p0515^2*p0008)-p0007);SQRT(p0007*EXP(p0515^2*p0008)-p0007))
- p2297: 0.000744002; = p2227*p2204
- p0290: 0.5
- p2956: 2.77655e-5; = p2370*(p1020+p1022)
- p0241: 41.295
- p1767: 0
- p3220: 0; = p3216*p1228
- p0554: 0; = IF(p0290<0.5;-SQRT(p0007*EXP(p0422^2*p0008)-p0007);SQRT(p0007*EXP(p0422^2*p0008)-p0007))
- p2841: 4.28096e-5; = p2255*(p1020+p1022)
- p0848: 0
- p2760: 2.04308e-7; = p2369*(p1019+p1021)
- p0830: 1.07351e10; = p0825*p0821*p0824
- p2928: 1.07953e-5; = p2342*(p1079+p1081)
- p1803: 0
- p2304: 0.00161776; = p2227*p2211
- p2288: 0.000166429; = p2223*p2195
- p3414: 0; = p3376*p1238
- p2610: 0; = p2414*p1073
- p2147: 3.16119e-6; = p2015*p2075*p2109/(p0818*1000)
- p0577: 0; = IF(p0313<0.5;-SQRT(p0007*EXP(p0445^2*p0008)-p0007);SQRT(p0007*EXP(p0445^2*p0008)-p0007))
- p5243: 1.5225e-8; = p1864*p3484
- p3308: 0; = if(and(p1232=0;p3252<>0);p3252*(p3259-p3303)/p3305;0)
- p0795: 206.119; = p0135*(1+p0663*p0267/100)
- p3895: 3.31078e-6; = p1962*p3477
- p1892: 3.31383e-6; = p1484*1000/p0818
- p2643: 2.99064e-9; = p2252*(p1019+p1021)
- p0995: 5.28646e-7; = p0991*p0001*p0004/(p0818*p0002)
- p0785: 68.52; = p0125*(1+p0653*p0257/100)
- p2094: 0.922577
- p1914: 3.41739e-6; = p1506*1000/p0818
- p3229: 7.07351e-7; = p1164/p0818
- p2284: 7.51781e-5; = p2223*p2190
- p0516: 0; = SQRT(2)*(IF((2*p0384-1)<0;-1;IF((2*p0384-1)>0;1;0))*SQRT(SQRT((2/(pi()*0.140012289)+LN(1-(2*p0384-1)^2)/2)^2-LN(1-(2*p0384-1)^2)/0.140012289)-(2/(pi()*0.140012289)+LN(1-(2*p0384-1)^2)/2)))
- p1026: 1.22351e6; = IF(p1012=0;p1020*(p0704/100)*p0703*1000;0)
- p0385: 0.5
- p1686: 0
- p1300: 0; = IF(p1297=p1265;0;IF(p1297+p1298>p1265;p1265-p1297;p1298))
- p3254: 0; = p1252*(p1287*(1-p3247)+p1290*(1-p3248)+p1291*(1-p3249)+p1292*(1-p3250))
- p2365: 0.00859863; = p2225*p2193
- p0154: 0.012
- p1842: 0
- p3070: 2.12226e-6; = p2289*p1023
- p0715: 0
- p1862: 0
- p3076: 4.98844e-8; = p2295*p1023
- p0560: 0; = IF(p0296<0.5;-SQRT(p0007*EXP(p0428^2*p0008)-p0007);SQRT(p0007*EXP(p0428^2*p0008)-p0007))
- p0718: 34.692; = p0058*(1+p0586*p0190/100)
- p1734: 0
- p3148: 2.35041e-5; = p2367*p1023
- p2204: 0.00127153; = p1109/p0818
- p2809: 0; = p2418*(p1078+p1080)
- p0747: 71.863; = p0087*(1+p0615*p0219/100)
- p0481: 0; = SQRT(2)*(IF((2*p0349-1)<0;-1;IF((2*p0349-1)>0;1;0))*SQRT(SQRT((2/(pi()*0.140012289)+LN(1-(2*p0349-1)^2)/2)^2-LN(1-(2*p0349-1)^2)/0.140012289)-(2/(pi()*0.140012289)+LN(1-(2*p0349-1)^2)/2)))
- p2649: 2.87196e-5; = p2258*(p1078+p1080)
- p0513: 0; = SQRT(2)*(IF((2*p0381-1)<0;-1;IF((2*p0381-1)>0;1;0))*SQRT(SQRT((2/(pi()*0.140012289)+LN(1-(2*p0381-1)^2)/2)^2-LN(1-(2*p0381-1)^2)/0.140012289)-(2/(pi()*0.140012289)+LN(1-(2*p0381-1)^2)/2)))
- p0750: 0
- p3475: 0; = p3380*p1241
- p3042: 3.28658e-6; = p2261*p1082
- p3409: 0; = p3371*p1238
- p3427: 0; = p3370*p1239
- p0754: 153.64; = p0094*(1+p0622*p0226/100)
- p3536: 0; = p1805*p3476
- p1358: 21
- p3474: 0; = p3379*p1241
- p2541: 0; = p2345*p1073
- p1680: 0
- p1812: 0
- p5234: 1.63772e-7; = p1855*p3484
- p3009: 0; = p2423*(p1079+p1081)
- p2758: 0.000289702; = p2367*(p1019+p1021)
- p3801: 2.77395e-6; = p1864*p3477
- p1553: 0
- p2046: 10
- p1313: 0; = p1307*p1252/p0818
- p5085: 0; = p1912*p3483
- p2469: 0; = p2273*p1123
- p2903: 0; = p2317*(p1020+p1022)
- p1068: 0.0316696; = IF(p1012=0;p1054/(p1061*p0818);0)
- p2038: 0.304457
- p3091: 3.53759e-6; = p2310*p1082
- p1256: 0; = if(p1232>0;0;IF(p1253=1;0;IF(p1253+p1254>1;1-p1253;p1254)))
- p0104: 97.026
- p2962: 0.000202704; = p2376*(p1079+p1081)
- p2743: 1.6456e-5; = p2352*(p1128+p1130)
- p0748: 23.62; = p0088*(1+p0616*p0220/100)
- p0904: 2.10266e8; = p0825*p0901+(p0830+p0895)*p0824*p0903
- p2440: 0; = p2244*p1014
- p0873: 0.914694; = p0872*p0001*p0003/(p0818*p0002)
- p0743: 0.093; = p0083*(1+p0611*p0215/100)
- p2303: 0.000123537; = p2227*p2210
- p1327: 0.0140797; = if(p1318=0;if(p1327a=0;1;if(p1327a<0;0;p1327a));0)
- p0847: 0
- p1766: 2.1747e-6; = p1358*1000/p0818
- p0422: 0; = SQRT(2)*(IF((2*p0290-1)<0;-1;IF((2*p0290-1)>0;1;0))*SQRT(SQRT((2/(pi()*0.140012289)+LN(1-(2*p0290-1)^2)/2)^2-LN(1-(2*p0290-1)^2)/0.140012289)-(2/(pi()*0.140012289)+LN(1-(2*p0290-1)^2)/2)))
- p1963k: 5.59975e-6; = p1744*p1948+p1745*p1949+p1746*p1950+p1747*p1951+p1748*p1952+p1749*p1953+p1750*p1954+p1751*p1955+p1752*p1956+p1753*p1957+p1961*p1962
- p1957: 1.03557e-7; = p1549*1000/p0818
- p1969: 0; = p0803
- p0883: 0.0208999; = p0882*p0001*p0003/(p0818*p0002)
- p2983: 0; = p2397*(p1020+p1022)
- p2135: 4.28064e-5; = p2015*p2063*p2097/(p0818*1000)
- p2311: 0.00331331; = p2231*p2218
- p2116: 0.444424
- p0479: 0; = SQRT(2)*(IF((2*p0347-1)<0;-1;IF((2*p0347-1)>0;1;0))*SQRT(SQRT((2/(pi()*0.140012289)+LN(1-(2*p0347-1)^2)/2)^2-LN(1-(2*p0347-1)^2)/0.140012289)-(2/(pi()*0.140012289)+LN(1-(2*p0347-1)^2)/2)))
- p2543: 0; = p2347*p1073
- p2554: 0; = p2358*p1014
- p3274: 0
- p3118: 1.37617e-6; = p2337*p1082
- p1963: 0.000188991; = p1963a+p1963b+p1963c+p1963d+p1963e+p1963f+p1963g+p1963h+p1963i+p1963j+p1963k
- p1885: 0
- p0256: 4.447
- p0968: 9.41835e6; = p0965*p0683*p0682*1000
- p2170: 0.00675314; = p2166*(p0913)
- p0345: 0.5
- p0674: 393.362; = p0014*(1+p0542*p0146/100)
- p2319: 0; = p2224*p2186
- p0011: 990.017
- p2261: 0.000213553; = p2226*p2207
- p1887: 0
- p0714: 0
- p1067: 0.00382726; = IF(p1012=0;p1053/(p1060*p0818);0)
- p1302: 0; = IF(p1297+p1300+p1301=p1262;0;p1262-(p1297+p1300+p1301))
- p1088: 14667.6; = IF(p1071=0;p1082*(p0710/100)*p0703*1000;0)
- p0548: 0; = IF(p0284<0.5;-SQRT(p0007*EXP(p0416^2*p0008)-p0007);SQRT(p0007*EXP(p0416^2*p0008)-p0007))
- p1292: 0; = IF(p1287+p1290+p1291=p1261;0;p1261-(p1287+p1290+p1291))
- p3267: 0
- p0636: 0; = IF(p0372<0.5;-SQRT(p0007*EXP(p0504^2*p0008)-p0007);SQRT(p0007*EXP(p0504^2*p0008)-p0007))
- p2880: 0.000264068; = p2294*(p1020+p1022)
- p0123: 88.843
- p1147: 0.129871
- p3272: 0
- p0856: 1.406e6; = p0801
- p2837: 1.12626e-7; = p2251*(p1020+p1022)
- p0347: 0.5
- p2268: 4.95313e-6; = p2226*p2214
- p4137: 1.45808e-8; = p1788*p3479
- p1003: 0; = p0999*p0888
- p1097: 0.0290355
- p0886: 2.99471e7; = p0686*1000*p0687*p0689/100
- p2723: 0; = p2332*(p1019+p1021)
- p3327: 0; = if(and(p1232=0;p3255<>0);1-(p3323+p3324+p3325+p3326);0)
- p2149: 1.95577e-6; = p2015*p2077*p2111/(p0818*1000)
- p4764: 0; = p1797*p3482
- p1850: 0
- p3397: 0; = p3378*p1234
- p3113: 0; = p2332*p1023
- p3195: 0; = p2414*p1082
- p1938: 0
- p1005: 0; = p1001*p0888
- p2459: 0; = p2263*p1073
- p2588: 0; = p2392*p1123
- p3001: 0; = p2415*(p1079+p1081)
- p2564: 0; = p2368*p1014
- p0590: 0; = IF(p0326<0.5;-SQRT(p0007*EXP(p0458^2*p0008)-p0007);SQRT(p0007*EXP(p0458^2*p0008)-p0007))
- p1731: 0
- p2668: 2.80649e-6; = p2277*(p1019+p1021)
- p0969: 5.55582e7; = p0966*p0683*p0682*1000
- p3351: 0; = if(and(p1232=0;p3256<>0);p3256*(p3274-p3346)/p3349;0)
- p1191: 0.5
- p2814: 0; = p2423*(p1078+p1080)
- p0165: 3.209
- p0155: 12.868
- p3358: 0; = if(p1232=0;p3308+p3319+p3330+p3341+p3352;0)
- p3185: 0; = p2404*p1023
- p2281: 1.1917e-5; = p2223*p2187
- p0161: 3.18
- p1683: 0
- p4826: 0; = p1859*p3482
- p3079: 1.03558e-5; = p2298*p1082
- p1577: 0
- p1565: 0
- p3065: 9.69797e-8; = p2284*p1023
- p1630: 0
- p0977: 0; = IF(p0687=0;IF(OR(p0686=0;p0688=0);0;p0686*1000*p0688/100);0)
- p2924: 1.90412e-5; = p2338*(p1079+p1081)
- p2883: 0.000489241; = p2297*(p1079+p1081)
- p2029: 5.76
- p0666: 0; = IF(p0402<0.5;-SQRT(p0007*EXP(p0534^2*p0008)-p0007);SQRT(p0007*EXP(p0534^2*p0008)-p0007))
- p0961: 0; = if(and(p0683>0;or(p0807=480;p0807=32;p0807=1;and(p0807=60;p0901<0.03)));p0937;0)
- p3116: 0; = p2335*p1023
- p2508: 0; = p2312*p1123
- p2171: 0.0509987; = p2165*p0831
- p3302: 0; = if(and(p1232=0;p3252<>0);p3258*(p3278*(p3282*p1256+p3286*(p1253+p1257)+p1258*p3288+p3297*p3287));0)
- p0125: 68.52
- p5065: 0; = p1892*p3483
- p3019: 3.69132e-8; = p2238*p1023
- p2234: 0; = 1-(p2222+p2223+p2224+p2225)
- p3798: 2.24915e-7; = p1861*p3477
- p1149: 0.830148
- p2746: 3.10821e-5; = p2355*(p1019+p1021)
- p2055: 5.59471
- p3149: 1.0099e-8; = p2368*p1023
- p3807: 7.49716e-8; = p1870*p3477
- p3139: 1.18297e-6; = p2358*p1023
- p1709: 0
- p4879: 0; = p1912*p3482
- p0393: 0.5
- p3028: 3.19956e-8; = p2247*p1023
- p1569: 0.819138
- p2981: 0; = p2395*(p1020+p1022)
- p1094: 1.35516e-6; = IF(p1071=0;p1088*p0001/(p0818*p0002);0)
- p1841: 0
- p0378: 0.5
- p3477: 0.723964; = if(p1328+p1330+p1332+p1334+p1336+p1338+p1340+p1342+p1344=0;0;p1330/(p1328+p1330+p1332+p1334+p1336+p1338+p1340+p1342+p1344))
- p1843: 0
- p0194: 11.241
- p1169: 0.000688638
- p2370: 2.82511e-5; = p2225*p2199
- p3851: 2.47406e-6; = p1914*p3477
- p1940: 0
- p1922: 0
- p3458: 0; = p3363*p1241
- p1341: 0; = p1340*p0001/(p0818*p0002)
- p2307: 4.19627e-5; = p2227*p2214
- p3090: 3.94712e-7; = p2309*p1082
- p4425: 0; = p1870*p3480
- p1219: 0; = if(p1218=0;0;SQRT(2)*(IF((2*p1218-1)<0;-1;IF((2*p1218-1)>0;1;0))*SQRT(SQRT((2/(pi()*0.140012289)+LN(1-(2*p1218-1)^2)/2)^2-LN(1-(2*p1218-1)^2)/0.140012289)-(2/(pi()*0.140012289)+LN(1-(2*p1218-1)^2)/2))))
- p3170: 1.26601e-5; = p2389*p1132
- p2398: 0; = p2234*p2187
- p3242: 1.32458e-8; = p3234*p1188*p3238/p0818
- p3337: 0; = IF(or(p3254=0;p1232>0);0;p3272*p3289)
- p0852: 0; = p0847*p0851^3+p0848*p0851^2+p0849*p0851+p0850
- p3461: 0; = p3366*p1241
- p0368: 0.5
- p0787: 8.489; = p0127*(1+p0655*p0259/100)
- p4859: 0; = p1892*p3482
- p2461: 0; = p2265*p1073
- p1342: 0; = p1326*p0801
- p2187: 0.00014583; = 4*1.00794*p2186/(2*14.0067)
- p1857: 0
- p1823: 0
- p1959: 3431.16; = if(p0738*p0740*p0739>0;p0738*1000*(p0740/100)*p0739/1000;p1958)
- p2969: 2.70757e-7; = p2383*(p1079+p1081)
- p0342: 0.5
- p0499: 0; = SQRT(2)*(IF((2*p0367-1)<0;-1;IF((2*p0367-1)>0;1;0))*SQRT(SQRT((2/(pi()*0.140012289)+LN(1-(2*p0367-1)^2)/2)^2-LN(1-(2*p0367-1)^2)/0.140012289)-(2/(pi()*0.140012289)+LN(1-(2*p0367-1)^2)/2)))
- p1804: 0
- p2731: 2.74967e-5; = p2340*(p1078+p1080)
- p1895: 0
- p0007: 14; = p0006-1
- p1904: 0
- p1044: 0.00962013; = IF(p1012=0;IF(p1037=1;0;IF(p1037+p1038>1;1-p1037;p1038));0)
- p2788: 0; = p2397*(p1019+p1021)
- p0109: 3.531
- p3948: 8.29706e-7; = p1805*p3478
- p0983: 0; = if(p0886=0;0;min(1;(p0695*p0694*1000*p0697/100)/p0886))
- p3122: 5.85158e-7; = p2341*p1082
- p2078: 0.117
- p0260: 7.485
- p0502: 0; = SQRT(2)*(IF((2*p0370-1)<0;-1;IF((2*p0370-1)>0;1;0))*SQRT(SQRT((2/(pi()*0.140012289)+LN(1-(2*p0370-1)^2)/2)^2-LN(1-(2*p0370-1)^2)/0.140012289)-(2/(pi()*0.140012289)+LN(1-(2*p0370-1)^2)/2)))
- p0799: 76.957; = p0139*(1+p0667*p0271/100)
- p1696: 0
- p1030: 0; = IF(p1012=0;p1024*p0001/(p0818*p0002);0)
- p2495: 0; = p2299*p1073
- p0974: 0.5
- p1146: 0.870129
- p1216: 0
- p1771: 0
- p2201: 0.00328797; = 12.01*p2200/(2*14.0067)
- p1830: 0
- p4920: 0; = p1953*p3482
- p3003: 0; = p2417*(p1079+p1081)
- p2929: 0.000141368; = p2343*(p1079+p1081)
- p0217: 4.527
- p1035: 1.62574e-7; = IF(p1012=0;p1029*p0001/(p0818*p0002);0)
- p1139: 0; = if(p1121=0;p1133*p0001/(p0818*p0002);0)
- p0843: 0.065135
- p1965: 0.000366652; = p1963+p1959*p1964*1000/p0818
- p0287: 0.5
- p2290: 7.06877e-7; = p2223*p2197
- p0081: 2.309
- p2048: 5.31168e-13; = p2015*p2046/(p0818*1000000000000)
- p2245: 1.21875e-5; = p2222*p2190
- p2817: 0; = p2426*(p1078+p1080)
- p2107: 0.881623
- p1610: 0
- p1601: 0.722925
- p1963g: 0; = p1667*p1871+p1668*p1872+p1669*p1873+p1670*p1874+p1671*p1875+p1672*p1876+p1673*p1877+p1674*p1878+p1675*p1879+p1676*p1880+p1677*p1881+p1678*p1882+p1679*p1883+p1680*p1884+p1681*p1885+p1682*p1886+p1683*p1887+p1684*p1888+p1685*p1889
- p3072: 1.49669e-9; = p2291*p1023
- p3772: 2.24915e-7; = p1835*p3477
- p0182: 5.182
- p1020: 0.89697; = IF(p1012=0;IF(p1014+p1019=1;0;IF(p1014+p1019+p1016>1;1-(p1014+p1019);p1016));0)
- p0973: 6.49766e7; = p0967+p0968+p0969
- p0575: 0; = IF(p0311<0.5;-SQRT(p0007*EXP(p0443^2*p0008)-p0007);SQRT(p0007*EXP(p0443^2*p0008)-p0007))
- p0042: 1405.86
- p3015: 0; = p2429*(p1129+p1131)
- p2441: 0; = p2245*p1014
- p1742: 0
- p3289: 0
- p1890: 0
- p3282: 0
- p0784: 77.666; = p0124*(1+p0652*p0256/100)
- p1953: 1.4498e-6; = p1545*1000/p0818
- p3266: 0
- p1083: 0; = IF(p1071=0;p1073*(p0710/100)*p0703*1000;0)
- p1214: 0; = IF(p1213=0;0;p1213-1)
- p3011: 0; = p2425*(p1079+p1081)
- p0429: 0; = SQRT(2)*(IF((2*p0297-1)<0;-1;IF((2*p0297-1)>0;1;0))*SQRT(SQRT((2/(pi()*0.140012289)+LN(1-(2*p0297-1)^2)/2)^2-LN(1-(2*p0297-1)^2)/0.140012289)-(2/(pi()*0.140012289)+LN(1-(2*p0297-1)^2)/2)))
- p3034: 5.33463e-10; = p2253*p1023
- p1907: 0
- p0802: 1.4e6
- p2507: 0; = p2311*p1123
- p0807: 100
- p1723: 0
- p2825: 3.64688e-6; = p2239*(p1020+p1022)
- p1660: 0.731714
- p2515: 0; = p2319*p1014
- p1884: 0
- p1075: 0.65758; = IF(p1071=0;p0713/100;0)
- p1564: 0
- p1795: 0
- p0079: 2.586
- p0970: 0; = p0967/p0818
- p2728: 2.9243e-5; = p2337*(p1078+p1080)
- p0126: 64.956
- p1113: 0.100377
- p5249: 4.11486e-10; = p1870*p3484
- p2274: 7.09668e-5; = p2230*p2220
- p1741: 0
- p2583: 0; = p2387*p1073
- p2031: 0.465411
- p0902: 0
- p2344: 1.1944e-7; = p2228*p2212
- p1321: 0.811138; = IF(((p0745*1000*p0748/100)+(p0754*1000*p0757/100))/p0801<0;0;((p0745*1000*p0748/100)+(p0754*1000*p0757/100))/p0801)
- p4746: 0; = p1779*p3482
- p3373: 0; = if(p1232=0;p3245*p3361/p0818;0)
- p1735: 0
- p2373: 0.000428273; = p2225*p2202
- p1793: 0
- p1288: 0
- p1042: 0.000297097
- p2828: 1.89872e-6; = p2242*(p1020+p1022)
- p1317: 0
- p3298: 0; = if(p1283+p1284+p1285+p1286=0;0;p1283/(p1283+p1284+p1285+p1286))
- p3342: 0; = if(and(p1232=0;p3254<>0);p3254*(p3272-p3337)/p3338;0)
- p2503: 0; = p2307*p1073
- p2697: 3.07362e-6; = p2306*(p1078+p1080)
- p2873: 0.000763049; = p2287*(p1020+p1022)
- p0316: 0.5
- p5131: 0; = p1962*p3483
- p0900: 0.781664; = p0899/p0818
- p1172: 1.00267e-7; = p1170/p0818
- p4720: 1.50194e-6; = p1963*p3481
- p1071: 0
- p2328: 0; = p2224*p2196
- p2526: 0; = p2330*p1014
- p1141: 4.95315e-5; = if(p1121=0;p1135*p0001/(p0818*p0002);0)
- p1226: 0; = IF(p1221=0;0;IF(p1193=0;p0801;0))
- p1272: 0; = IF(p1267+p1270+p1271=p1259;0;p1259-(p1267+p1270+p1271))
- p1152: 0.415074
- p3120: 3.70012e-6; = p2339*p1082
- p2098: 0.856281
- p1282: 0; = IF(p1277+p1280+p1281=p1260;0;p1260-(p1277+p1280+p1281))
- p2684: 9.96474e-6; = p2293*(p1019+p1021)
- p0644: 0; = IF(p0380<0.5;-SQRT(p0007*EXP(p0512^2*p0008)-p0007);SQRT(p0007*EXP(p0512^2*p0008)-p0007))
- p1338: 39592.6; = p1324*p0801
- p2433: 0; = p2237*p1014
- p1894: 0
- p0278: 0.5
- p2289: 0.00164516; = p2223*p2196
- p2571: 0; = p2375*p1073
- p3683: 0; = p1952*p3476
- p1838: 0
- p2822: 0; = p2431*(p1128+p1130)
- p1167: 0.5
- p2462: 0; = p2266*p1073
- p0927: 0.013532; = IF(p0918+p0923+p0924+p0925+p0926=1;0;1-(p0918+p0923+p0924+p0925+p0926))
- p2644: 6.57524e-9; = p2253*(p1019+p1021)
- p3386: 0; = p3367*p1234
- p0727: 0
- p3166: 2.95849e-7; = p2385*p1082
- p2528: 0; = p2332*p1014
- p3190: 0; = p2409*p1023
- p3643: 0; = p1912*p3476
- p2698: 1.37231e-5; = p2307*(p1078+p1080)
- p2217: 0.000392844; = p1118-p2216
- p4948: 0; = p1775*p3483
- p2704: 0.000171561; = p2313*(p1128+p1130)
- p0680: 1030.38; = p0020*(1+p0548*p0152/100)
- p2900: 0.000546629; = p2314*(p1129+p1131)
- p1584: 0.886972
- p2705: 0.000298129; = p2314*(p1128+p1130)
- p2456: 0; = p2260*p1073
- p2389: 0.000745148; = p2233*p2218
- p0949: 0; = if(and(p0683=0;or(p0807=480;p0807=32;p0807=1;and(p0807=60;p0901<0.03)));p0937;0)
- p1136: 0; = if(p1121=0;p1130*(p0716/100)*p0703*1000;0)
- p1112: 0.209482
- p1559: 0
- p0424: 0; = SQRT(2)*(IF((2*p0292-1)<0;-1;IF((2*p0292-1)>0;1;0))*SQRT(SQRT((2/(pi()*0.140012289)+LN(1-(2*p0292-1)^2)/2)^2-LN(1-(2*p0292-1)^2)/0.140012289)-(2/(pi()*0.140012289)+LN(1-(2*p0292-1)^2)/2)))
- p2842: 6.16126e-6; = p2256*(p1020+p1022)
- p3472: 0; = p3377*p1241
- p0553: 0; = IF(p0289<0.5;-SQRT(p0007*EXP(p0421^2*p0008)-p0007);SQRT(p0007*EXP(p0421^2*p0008)-p0007))
- p3690: 0; = p1963*p3476
- p2967: 3.72146e-5; = p2381*(p1079+p1081)
- p0846: 0.392884; = p0841*p0845^3+p0842*p0845^2+p0843*p0845+p0844
- p1181: 0.000207236
- p0631: 0; = IF(p0367<0.5;-SQRT(p0007*EXP(p0499^2*p0008)-p0007);SQRT(p0007*EXP(p0499^2*p0008)-p0007))
- p2190: 0.000919968; = 32.065*p2189/(2*14.0067)
- p2251: 1.14596e-7; = p2222*p2197
- p1624: 0
- p2030: 3.31
- p1310: 0; = IF(p1307=p1266;0;IF(p1307+p1308>p1266;p1266-p1307;p1308))
- p3377: 0; = if(p1232=0;p3246*p3359/p0818;0)
- p0950: 0; = if(and(p0683=0;or(p0807=480;p0807=32;p0807=1;and(p0807=60;p0901<0.03)));p0938;0)
- p3324: 0; = if(and(p1232=0;p3255<>0);p3266*(p3279*(p3284*p1256+p3286*(p1253+p1257)+p1258*p3288+p3299*p3287));0)
- p1724: 0
- p2249: 2.69808e-5; = p2222*p2195
- p2678: 1.23447e-5; = p2287*(p1019+p1021)
- p4263: 1.20292e-7; = p1914*p3479
- p3314: 0; = if(and(p1232=0;p3253<>0);p3263*p3289;0)
- p1323: 0; = IF(((p0745*1000*p0750/100)+(p0754*1000*p0759/100))/p0801<0;0;((p0745*1000*p0750/100)+(p0754*1000*p0759/100))/p0801)
- p2739: 1.1146e-6; = p2348*(p1078+p1080)
- p2338: 2.89565e-5; = p2228*p2206
- p1619: 0
- p1154: 0.0116888; = if(p1152*p0818=0;0;p1150/(p1152*p0818))
- p3277: 0
- p2585: 0; = p2389*p1123
- p1728: 0
- p2215: 0.000270632; = p1117-p2214
- p3251: 0; = p1252-(p3252+p3253+p3254+p3255+p3256)
- p1608: 0
- p1150: 4.68508e7; = if(p1121=0;p1149*p1146*p1145;0)
- p3379: 0; = if(p1232=0;p3246*p3361/p0818;0)
- p2950: 0.00166529; = p2364*(p1020+p1022)
- p1714: 0
- p0484: 0; = SQRT(2)*(IF((2*p0352-1)<0;-1;IF((2*p0352-1)>0;1;0))*SQRT(SQRT((2/(pi()*0.140012289)+LN(1-(2*p0352-1)^2)/2)^2-LN(1-(2*p0352-1)^2)/0.140012289)-(2/(pi()*0.140012289)+LN(1-(2*p0352-1)^2)/2)))
- p2282: 0.00015245; = p2223*p2188
- p0987: 0.00752219; = if(p0978>0;0;if(and(p0687=0;p0691=0;p0695=0;p0699=0);0;IF(p0982+p0985+p0986=1;0;1-(p0982+p0985+p0986))))
- p3528: 0; = p1797*p3476
- p3468: 0; = p3373*p1241
- p0390: 0.5
- p0323: 0.5
- p0185: 10.284
- p2620: 0; = p2424*p1073
- p0903: 0.00723373
- p1100: 0.437795
- p0870: 0; = p0858*p0856
- p1550: 0
- p2260: 2.57202e-5; = p2226*p2206
- p1262: 0; = if(p1232>0;0;p0733/100)
- p1108: 423265; = IF(p1071=0;p1105*p1102*p1095;0)
- p0908: 0.000884267
- p0859: 0.704137; = p0671*1000/p0856
- p0988: 2.97218e7; = p0982*p0886
- p2568: 0; = p2372*p1014
- p2597: 0; = p2401*p1014
- p0697: 0
- p3601: 0; = p1870*p3476
- p1334: 175366; = p1322*p0801
- p3645: 0; = p1914*p3476
- p0921: 0.108185; = p0679*1000/p0801
- p0980: 0; = IF(p0977=0;0;p0977*p0001/(p0818*p0002))
- p1652: 0
- p0763: 1405.86; = p0103*(1+p0631*p0235/100)
- p3017: 0; = p2431*(p1129+p1131)
- p2481: 0; = p2285*p1014
- p1821: 0
- p3424: 0; = p3367*p1239
- p3430: 0; = p3373*p1239
- p3482: 0; = if(p1328+p1330+p1332+p1334+p1336+p1338+p1340+p1342+p1344=0;0;p1340/(p1328+p1330+p1332+p1334+p1336+p1338+p1340+p1342+p1344))
- p2590: 0; = p2394*p1014
- p3258: 0
- p0559: 0; = IF(p0295<0.5;-SQRT(p0007*EXP(p0427^2*p0008)-p0007);SQRT(p0007*EXP(p0427^2*p0008)-p0007))
- p2218: 0.00485174; = p1150/p0818
- p2333: 0; = p2224*p2201
- p3105: 0; = p2324*p1023
- p0993: 0; = p0989*p0001*p0004/(p0818*p0002)
- p0032: 8.801
- p2901: 0; = p2315*(p1020+p1022)
- p1098: 0.0177463
- p2043: 0.636483
- p2438: 0; = p2242*p1014
- p1701: 0
- p2233: 0.153584; = if(p0783*p0787+p0784*p0788+p0785*p0789+p0786*p0790=0;0;p0790*p0786/(p0783*p0787+p0784*p0788+p0785*p0789+p0786*p0790))
- p1314: 0; = p1310*p1252/p0818
- p1760: 0
- p2194: 0.214362
- p2193: 0.00950089; = p1054/p0818
- p3304: 0; = if(and(p1232=0;p3252<>0);p3260*p3289;0)
- p1339: 3.65803e-6; = p1338*p0001/(p0818*p0002)
- p1576: 0
- p1999: 6830.53; = (p1228+p1229)*p0818+p1164
- p2437: 0; = p2241*p1014
- p3360: 0; = if(p1232=0;p3310+p3321+p3332+p3343+p3354;0)
- p0111: 5.645
- p0992: 6.97496e-5; = p0988*p0001*p0004/(p0818*p0002)
- p0932: 0; = p0801*p0926
- p3389: 0; = p3370*p1234
- p3394: 0; = p3375*p1234
- p0728: 0
- p0440: 0; = SQRT(2)*(IF((2*p0308-1)<0;-1;IF((2*p0308-1)>0;1;0))*SQRT(SQRT((2/(pi()*0.140012289)+LN(1-(2*p0308-1)^2)/2)^2-LN(1-(2*p0308-1)^2)/0.140012289)-(2/(pi()*0.140012289)+LN(1-(2*p0308-1)^2)/2)))
- p1298: 0
- p2804: 0; = p2413*(p1019+p1021)
- p1644: 0
- p2937: 0.000284878; = p2351*(p1129+p1131)
- p1749: 0.797401
- p0158: 0.012
- p0732: 0
- p1230: 0
- p4946: 0; = p1773*p3483
- p0261: 40.171
- p3085: 2.48974e-5; = p2304*p1082
- p2342: 1.64167e-5; = p2228*p2210
- p0825: 8.20113e9; = p0818*p0822
- p0006: 15
- p2605: 0; = p2409*p1014
- p3387: 0; = p3368*p1234
- p2210: 0.000211129; = 6*1.00794*p2208/30.973762
- p0613: 0; = IF(p0349<0.5;-SQRT(p0007*EXP(p0481^2*p0008)-p0007);SQRT(p0007*EXP(p0481^2*p0008)-p0007))
- p1963f: 1.5908e-5; = p1647*p1851+p1648*p1852+p1649*p1853+p1650*p1854+p1651*p1855+p1652*p1856+p1653*p1857+p1654*p1858+p1655*p1859+p1656*p1860+p1657*p1861+p1658*p1862+p1659*p1863+p1660*p1864+p1661*p1865+p1662*p1866+p1663*p1867+p1664*p1868+p1665*p1869+p1666*p1870
- p2750: 2.0985e-6; = p2359*(p1019+p1021)
- p2075: 0.072
- p3288: 0
- p2225: 0.905034; = if(p0765*p0769+p0766*p0770+p0767*p0771+p0768*p0772=0;0;p0772*p0768/(p0765*p0769+p0766*p0770+p0767*p0771+p0768*p0772))
- p1614: 0
- p2349: 3.05462e-5; = p2228*p2217
- p2681: 1.12393e-8; = p2290*(p1019+p1021)
- p3441: 0; = p3365*p1240
- p2300: 0.00180921; = p2227*p2207
- p4596: 2.46894e-9; = p1835*p3481
- p0907: 0
- p3039: 1.35154e-6; = p2258*p1082
- p0078: 1405.99
- p1963h: 2.31574e-6; = p1686*p1890+p1687*p1891+p1688*p1892+p1689*p1893+p1690*p1894+p1691*p1895+p1692*p1896+p1693*p1897+p1694*p1898+p1695*p1899+p1696*p1900+p1697*p1901+p1698*p1902+p1699*p1903+p1700*p1904+p1701*p1905+p1702*p1906+p1703*p1907+p1704*p1908+p1705*p1909
- p1105: 0.436421
- p4733: 0; = p1766*p3482
- p0520: 0; = SQRT(2)*(IF((2*p0388-1)<0;-1;IF((2*p0388-1)>0;1;0))*SQRT(SQRT((2/(pi()*0.140012289)+LN(1-(2*p0388-1)^2)/2)^2-LN(1-(2*p0388-1)^2)/0.140012289)-(2/(pi()*0.140012289)+LN(1-(2*p0388-1)^2)/2)))
- p2727: 3.23333e-5; = p2336*(p1078+p1080)
- p1163: 0.00485813
- p1752: 0
- p0160: 25.422
- p2773: 0.000242366; = p2382*(p1078+p1080)
- p0211: 8.898
- p1253: 0; = if(p1232>0;0;p0735/100)
- p2087: 0.856281
- p1566: 0
- p1689: 0
- p0736: 0
- p1085: 626711; = IF(p1071=0;p1079*(p0710/100)*p0703*1000;0)
- p1927: 0
- p2419: 0; = p2235*p2209
- p0653: 0; = IF(p0389<0.5;-SQRT(p0007*EXP(p0521^2*p0008)-p0007);SQRT(p0007*EXP(p0521^2*p0008)-p0007))
- p2821: 0; = p2430*(p1128+p1130)
- p1211: 0
- p4802: 0; = p1835*p3482
- p1626: 0
- p3296: 0
- p2408: 0; = p2234*p2198
- p0504: 0; = SQRT(2)*(IF((2*p0372-1)<0;-1;IF((2*p0372-1)>0;1;0))*SQRT(SQRT((2/(pi()*0.140012289)+LN(1-(2*p0372-1)^2)/2)^2-LN(1-(2*p0372-1)^2)/0.140012289)-(2/(pi()*0.140012289)+LN(1-(2*p0372-1)^2)/2)))
- p2519: 0; = p2323*p1014
- p4330: 0; = p1775*p3480
- p5332: 5.76081e-9; = p1953*p3484
- p2663: 0.000164952; = p2272*(p1128+p1130)
- p2909: 0; = p2323*(p1020+p1022)
- p0019: 152.108
- p3052: 4.17565e-7; = p2271*p1082
- p0118: 5.82
- p3388: 0; = p3369*p1234
- p1245: 0; = if(p1232>0;0;p1240*(p0725/100)*p0723*1000)
- p3849: 0.000132475; = p1912*p3477
- p2531: 0; = p2335*p1014
- p2802: 0; = p2411*(p1019+p1021)
- p3710: 4.64824e-6; = p1773*p3477
- p2942: 0.000249139; = p2356*(p1020+p1022)
- p2989: 0; = p2403*(p1020+p1022)
- p2457: 0; = p2261*p1073
- p2413: 0; = p2234*p2203
- p3168: 1.80821e-7; = p2387*p1082
- p2420: 0; = p2235*p2210
- p0946: 0; = if(and(p0683=0;or(p0807=480;p0807=32;p0807=1;and(p0807=60;p0901<0.03)));p0934;0)
- p2133: 2.11023e-5; = p2015*p2061*p2095/(p0818*1000)
- p0326: 0.5
- p2784: 0; = p2393*(p1019+p1021)
- p5303: 4.93784e-8; = p1924*p3484
- p2421: 0; = p2235*p2211
- p0872: 990017; = p0864*p0856
- p2847: 0.000140428; = p2261*(p1079+p1081)
- p1835: 3.10672e-7; = p1427*1000/p0818
- p2976: 0.000667939; = p2390*(p1129+p1131)
- p1754: 0
- p0835: 219.218; = -LN(1-p0669/100)/p0834
- p5130: 0; = p1957*p3483
- p2181: 798.435; = p0887+p0889+p0893+p2180
- p1306: 0; = p1302*p1252/p0818
- p2603: 0; = p2407*p1014
- p0112: 186.382
- p2436: 0; = p2240*p1014
- p0382: 0.5
- p3375: 0; = if(p1232=0;p3246*p3357/p0818;0)
- p1592: 0
- p0031: 24.205
- p4447: 0; = p1892*p3480
- p0800: 59.95; = p0140*(1+p0668*p0272/100)
- p1269: 0
- p1755: 0
- p2939: 5.2432e-5; = p2353*(p1129+p1131)
- p0869: 0.0160889; = IF(p0858+p0864+p0865+p0866+p0867+p0868=1;0;1-(p0858+p0864+p0865+p0866+p0867+p0868))
- p0236: 1.891
- p1327a: 0.0140797; = (p0745*1000/p0801)*(1-(p0746+p0747+p0748+p0749+p0750+p0751+p0752+p0753)/100)+(p0754*1000/p0801)*(1-(p0755+p0756+p0757+p0758+p0759+p0760+p0761+p0762)/100)
- p0607: 0; = IF(p0343<0.5;-SQRT(p0007*EXP(p0475^2*p0008)-p0007);SQRT(p0007*EXP(p0475^2*p0008)-p0007))
- p3317: 0; = if(and(p1232=0;p3253<>0);p3253*(p3261*p3277-p3312)/p3316;0)
- p1896: 0
- p1023: 0.00129; = IF(p1012=0;IF(p1014+p1019+p1020+p1021+p1022=1;0;1-(p1014+p1019+p1020+p1021+p1022));0)
- p2624: 0; = p2428*p1123
- p2450: 0; = p2254*p1014
- p1615: 0
- p3268: 0
- p0476: 0; = SQRT(2)*(IF((2*p0344-1)<0;-1;IF((2*p0344-1)>0;1;0))*SQRT(SQRT((2/(pi()*0.140012289)+LN(1-(2*p0344-1)^2)/2)^2-LN(1-(2*p0344-1)^2)/0.140012289)-(2/(pi()*0.140012289)+LN(1-(2*p0344-1)^2)/2)))
- p3415: 0; = p3377*p1238
- p1103: 0.514802; = IF(p1071=0;IF(p1096+p1101+p1102=1;0;IF(p1096+p1101+p1102+p1099>1;1-(p1096+p1101+p1102);p1099));0)
- p2510: 0; = p2314*p1123
- p2018: 0.1978
- p1591: 0
- p2642: 1.82207e-9; = p2251*(p1019+p1021)
- p1879: 0
- p0756: 89.158; = p0096*(1+p0624*p0228/100)
- p1210: 0
- p3022: 1.73161e-8; = p2241*p1023
- p2947: 0.000714894; = p2361*(p1020+p1022)
- p2191: 0.000231348; = 8*1.00794*p2189/(2*14.0067)
- p3350: 0; = if(and(p1232=0;p3256<>0);p3256*(p3273*p3277-p3345)/p3349;0)
- p4416: 0; = p1861*p3480
- p1016: 0.89697; = IF(p1012=0;p0707/100;0)
- p2827: 1.31926e-5; = p2241*(p1020+p1022)
- p2154: 6.73475e-6; = p2015*p2082*p2116/(p0818*1000)
- p2576: 0; = p2380*p1073
- p1246: 0; = if(p1232>0;0;p1241*(p0725/100)*p0723*1000)
- p1264: 0; = if(p1232>0;0;IF(p1259+p1263=1;0;IF(p1259+p1263+p1261>1;1-(p1259+p1263);p1261)))
- p2998: 0; = p2412*(p1020+p1022)
- p1274: 0; = p1270*p1252/p0818
- p2490: 0; = p2294*p1014
- p3380: 0; = p3251/p0818
- p2119: 0.679049
- p2134: 9.72962e-5; = p2015*p2062*p2096/(p0818*1000)
- p1799: 0
- p3311: 0; = if(and(p1232=0;p3252<>0);p3252-(p3306+p3307+p3308+p3309+p3310);0)
- p1193: 0; = IF(OR(p1036=0;p1095=0);0.0001*p0857;0)
- p1235: 0; = if(p1232>0;0;p0727/100)
- p1947: 0
- p0176: 1.891
- p1976: 0.0644545
- p1800: 0
- p1233: 0.000129903; = p1232*p0001/(p0818*p0002)
- p4115: 7.65493e-8; = p1766*p3479
- p2892: 6.18033e-6; = p2306*(p1079+p1081)
- p0783: 88.843; = p0123*(1+p0651*p0255/100)
- p0129: 7.357
- p0555: 0; = IF(p0291<0.5;-SQRT(p0007*EXP(p0423^2*p0008)-p0007);SQRT(p0007*EXP(p0423^2*p0008)-p0007))
- p2180: 2.36308e-8; = p3233*p1188/(p0818)
- p3861: 8.9966e-6; = p1924*p3477
- p1201: 0
- p0089: 3.632
- p1267: 0
- p1693: 0
- p2975: 0.000473981; = p2389*(p1129+p1131)
- p2752: 1.15656e-5; = p2361*(p1019+p1021)
- p2105: 0.888194
- p1814: 0
- p1621: 0
- p2266: 1.06091e-7; = p2226*p2212
- p2744: 2.85961e-5; = p2353*(p1128+p1130)
- p1206: 0
- p1924: 1.24269e-5; = p1516*1000/p0818
- p2714: 0; = p2323*(p1019+p1021)
- p0344: 0.5
- p2911: 0; = p2325*(p1020+p1022)
- p2845: 5.22289e-5; = p2259*(p1079+p1081)
- p0121: 27.918
- p2767: 0.00010081; = p2376*(p1078+p1080)
- p1836: 0
- p1343: 0; = p1342*p0001/(p0818*p0002)
- p1700: 0
- p0877: 0; = p0876*p0001*p0003/(p0818*p0002)
- p2293: 0.000626713; = p2223*p2200
- p2768: 3.26448e-5; = p2377*(p1078+p1080)
- p2367: 0.0182202; = p2225*p2196
- p0796: 97.026; = p0136*(1+p0664*p0268/100)
- p0151: 21.744
- p1074: 0.32703; = IF(p1071=0;p0712/100;0)
- p1653: 0
- p0084: 10.396
- p2021: 0.00137688; = p2020/p0818
- p2010: 0.00257297; = ((p1984*p1985+p1990*p1991+p1996*p1997+p2004*p2005)/p0818)*p0005*p0002/1000
- p2424: 0; = p2235*p2214
- p1834: 0
- p1837: 0
- p2279: 7.88399e-5; = p2223*p2185
- p2757: 2.93071e-5; = p2366*(p1019+p1021)
- p0991: 225267; = p0987*p0886
- p0642: 0; = IF(p0378<0.5;-SQRT(p0007*EXP(p0510^2*p0008)-p0007);SQRT(p0007*EXP(p0510^2*p0008)-p0007))
- p3284: 0
- p3322: 0; = if(and(p1232=0;p3253<>0);p3253-(p3317+p3318+p3319+p3320+p3321);0)
- p0374: 0.5
- p3200: 0; = p2419*p1082
- p3418: 0; = p3380*p1238
- p0103: 1405.86
- p2854: 3.25708e-6; = p2268*(p1079+p1081)
- p0306: 0.5
- p0707: 89.697; = p0047*(1+p0575*p0179/100)
- p2941: 0.00192124; = p2355*(p1020+p1022)
- p4961: 0; = p1788*p3483
- p1015: 0.0159; = IF(p1012=0;p0706/100;0)
- p0684: 0
- p1221: 0
- p0770: 20.042; = p0110*(1+p0638*p0242/100)
- p1158: 0.0233692; = p1156*p1157
- p1874: 0
- p2592: 0; = p2396*p1014
- p2066: 0.109412
- p2151: 8.84242e-7; = p2015*p2079*p2113/(p0818*1000)
- p0781: 27.918; = p0121*(1+p0649*p0253/100)
- p1242: 0; = if(p1232>0;0;p1234*(p0725/100)*p0723*1000)
- p0285: 0.5
- p3059: 2.95268e-8; = p2278*p1023
- p4925: 0; = p1962*p3482
- p0308: 0.5
- p0703: 1405.86; = p0043*(1+p0571*p0175/100)
- p1746: 0
- p2020: 1.32958e7; = p2015*p2018*p2019
- p2235: 0; = 1-(p2226+p2227+p2228+p2229)
- p2196: 0.0201321; = p1068-p2193-p2195
- p0909: 3.63886e7
- p1228: 0; = IF(p1221=0;0;p0801*p1212*2000/(p1222+p1221*p1225)/p0818)
- p0658: 0; = IF(p0394<0.5;-SQRT(p0007*EXP(p0526^2*p0008)-p0007);SQRT(p0007*EXP(p0526^2*p0008)-p0007))
- p0827: 0; = p0818*p0819*p0823
- p2549: 0; = p2353*p1123
- p3345: 0; = if(and(p1232=0;p3256<>0);p3273*p3277*p3293;0)
- p0940: 0; = if(and(p0683=0;p0946=0);p0934;0)
- p1582: 0
- p1287: 0
- p2677: 2.43261e-6; = p2286*(p1019+p1021)
- p1934: 0
- p4970: 0; = p1797*p3483
- p0772: 186.382; = p0112*(1+p0640*p0244/100)
- p0682: 1405.99; = p0022*(1+p0550*p0154/100)
- p1185: 0.5
- p2538: 0; = p2342*p1073
- p2580: 0; = p2384*p1073
- p1802: 0
- p1061: 0.3
- p0824: 0.908143
- p0884: 8.741; = IF(p0689=100;0;IF(p0689+p0688>100;100-p0689;p0688))
- p3372: 0; = if(p1232=0;p3245*p3360/p0818;0)
- p4273: 4.37425e-7; = p1924*p3479
- p2189: 0.000803724; = p1053/p0818
- p4978: 0; = p1805*p3483
- p3032: 1.47829e-10; = p2251*p1023
- p2910: 0; = p2324*(p1020+p1022)
- p1941: 0
- p0650: 0; = IF(p0386<0.5;-SQRT(p0007*EXP(p0518^2*p0008)-p0007);SQRT(p0007*EXP(p0518^2*p0008)-p0007))
- p2139: 1.47128e-5; = p2015*p2067*p2101/(p0818*1000)
- p3346: 0; = if(and(p1232=0;p3256<>0);p3274*(p3281*(p3285*p1256+p3286*(p1253+p1257)+p1258*p3288));0)
- p3078: 1.14502e-5; = p2297*p1082
- p4625: 3.04503e-8; = p1864*p3481
- p1299: 0
- p0501: 0; = SQRT(2)*(IF((2*p0369-1)<0;-1;IF((2*p0369-1)>0;1;0))*SQRT(SQRT((2/(pi()*0.140012289)+LN(1-(2*p0369-1)^2)/2)^2-LN(1-(2*p0369-1)^2)/0.140012289)-(2/(pi()*0.140012289)+LN(1-(2*p0369-1)^2)/2)))
- p3206: 0; = p2425*p1082
- p2106: 0.856281
- p0238: 19.862
- p0375: 0.5
- p0929: 104626; = p0801*p0923
- p1899: 0
- p2662: 8.87306e-6; = p2271*(p1078+p1080)
- p2881: 3.80053e-5; = p2295*(p1020+p1022)
- p1985: 8.28783e8; = (if(p1057=0;0;p1050/p1057)+if(p1058=0;0;p1051/p1058)+if(p1059=0;0;p1052/p1059)+if(p1060=0;0;p1053/p1060)+if(p1061=0;0;p1054/p1061)+if(p1062=0;0;p1055/p1062)+if(p1063=0;0;p1056/p1063))*(1+p1157)
- p4467: 0; = p1912*p3480
- p1397: 35
- p0574: 0; = IF(p0310<0.5;-SQRT(p0007*EXP(p0442^2*p0008)-p0007);SQRT(p0007*EXP(p0442^2*p0008)-p0007))
- p2270: 3.02732e-6; = p2226*p2216
- p4897: 0; = p1930*p3482
- p2352: 4.74345e-5; = p2232*p2220
- p1786: 0
- p2529: 0; = p2333*p1014
- p0676: 99.858; = p0016*(1+p0544*p0148/100)
- p1966: 1.4e6; = if(p0814=0;p0802;0)
- p2652: 6.98382e-5; = p2261*(p1078+p1080)
- p1598: 0
- p1078: 0.32703; = IF(p1071=0;IF(p1073=1;0;IF(p1073+p1074>1;1-p1073;p1074));0)
- p2769: 0.000271047; = p2378*(p1078+p1080)
- p1052: 9.78448e6; = IF(p1012=0;p1045*p1036;0)
- p3374: 0; = if(p1232=0;p3246*p3356/p0818;0)
- p2896: 0.000151153; = p2310*(p1079+p1081)
- p2470: 0; = p2274*p1123
- p1873: 0
- p0355: 0.5
- p2141: 9.23748e-6; = p2015*p2069*p2103/(p0818*1000)
- p3465: 0; = p3370*p1241
- p1575: 0.2888
- p0960: 0; = if(and(p0683>0;or(p0807=480;p0807=32;p0807=1;and(p0807=60;p0901<0.03)));p0936;0)
- p3147: 2.37775e-6; = p2366*p1023
- p2689: 0.000220056; = p2298*(p1078+p1080)
- p3221: 0; = IF(p3216=0;0;p1223*12.0107/100.0869+(1-p1224)*12.0107/84.3139)
- p1106: 14833.1; = IF(p1071=0;p1105*p1096*p1095;0)
- p2659: 1.61982e-6; = p2268*(p1078+p1080)
- p2562: 0; = p2366*p1014
- p2875: 0.00161688; = p2289*(p1020+p1022)
- p3271: 0
- p2840: 9.98536e-5; = p2254*(p1020+p1022)
- p3008: 0; = p2422*(p1079+p1081)
- p0360: 0.5
- p2432: 0.0233692; = p1158
- p1114: 0.216028
- p4101: 1.04686e-6; = p1962*p3478
- p0291: 0.5
- p1579: 0
- p3231: 5.37786e-8; = p1176/p0818
- p1826: 0
- p1041: 0.326315
- p2063: 2.01468
- p0839: 0.610457; = p0838/p0818
- p2860: 4.51413e-5; = p2274*(p1129+p1131)
- p2544: 0; = p2348*p1073
- p1937: 0
- p2479: 0; = p2283*p1014
- p1783: 0
- p0641: 0; = IF(p0377<0.5;-SQRT(p0007*EXP(p0509^2*p0008)-p0007);SQRT(p0007*EXP(p0509^2*p0008)-p0007))
- p1484: 32
- p1893: 0
- p2793: 0; = p2402*(p1019+p1021)
- p1607: 0
- p2464: 0; = p2268*p1073
- p0578: 0; = IF(p0314<0.5;-SQRT(p0007*EXP(p0446^2*p0008)-p0007);SQRT(p0007*EXP(p0446^2*p0008)-p0007))
- p2849: 2.22081e-5; = p2263*(p1079+p1081)
- p3290: 0
- p2751: 2.68454e-5; = p2360*(p1019+p1021)
- p0379: 0.5
- p0758: 0
- p2458: 0; = p2262*p1073
- p2765: 7.80661e-5; = p2374*(p1019+p1021)
- p0546: 0; = IF(p0282<0.5;-SQRT(p0007*EXP(p0414^2*p0008)-p0007);SQRT(p0007*EXP(p0414^2*p0008)-p0007))
- p1844: 0
- p3471: 0; = p3376*p1241
- p2719: 0; = p2328*(p1019+p1021)
- p1831: 0
- p5032: 0; = p1859*p3483
- p3310: 0; = if(and(p1232=0;p3252<>0);IF((p3306+p3307+p3308+p3309)+(p3252*(p3257*(1-p3277))/p3305)>p3252;p3252-(p3306+p3307+p3308+p3309);p3252*(p3257*(1-p3277))/p3305);0)
- p0163: 6.943
- p1144: 1.32299e-6; = if(p1121=0;p1138*p0001/(p0818*p0002);0)
- p1001: 0; = if(p0978>0;0;if(and(p0687=0;p0691=0;p0695=0;p0699=0);0;IF(p0996+p0999+p1000=1;0;1-(p0996+p0999+p1000))))
- p3100: 0; = p2319*p1023
- p1611: 0
- p3431: 0; = p3374*p1239
- p1124: 0.34692; = if(p1121=0;p0718/100;0)
- p3916: 1.46976e-6; = p1773*p3478
- p1291: 0; = IF(p1287+p1290=p1264;0;IF(p1287+p1290+p1289>p1264;p1264-(p1287+p1290);p1289))
- p3024: 3.18817e-8; = p2243*p1023
- p2168: 0.00364723; = p2166*(p0903)
- p0511: 0; = SQRT(2)*(IF((2*p0379-1)<0;-1;IF((2*p0379-1)>0;1;0))*SQRT(SQRT((2/(pi()*0.140012289)+LN(1-(2*p0379-1)^2)/2)^2-LN(1-(2*p0379-1)^2)/0.140012289)-(2/(pi()*0.140012289)+LN(1-(2*p0379-1)^2)/2)))
- p1753: 0.92568
- p1687: 0
- p3087: 1.44644e-7; = p2306*p1082
- p2100: 0.705744
- p4831: 0; = p1864*p3482
- p3332: 0; = if(and(p1232=0;p3255<>0);IF((p3328+p3329+p3330+p3331)+(p3255*(p3265*(1-p3277))/p3327)>p3255;p3255-(p3328+p3329+p3330+p3331);p3255*(p3265*(1-p3277))/p3327);0)
- p1781: 0
- p0284: 0.5
- p0890: 1.10201e6; = p0686*1000*p0687*p0885/100
- p3693: 7.79705e-6; = p1756*p3477
- p5103: 0; = p1930*p3483
- p1194: 0
- p2445: 0; = p2249*p1014
- p0709: 8.584; = p0049*(1+p0577*p0181/100)
- p1294: 0; = p1290*p1252/p0818
- p3198: 0; = p2417*p1082
- p1906: 0
- p1933: 0
- p3323: 0; = if(and(p1232=0;p3255<>0);p3265*p3277*(p3299*p3291+(1-p3299)*p3295);0)
- p2312: 0.00466914; = p2231*p2219
- p2794: 0; = p2403*(p1019+p1021)
- p2090: 0.40001
- p0400: 0.5
- p4055: 4.18883e-5; = p1912*p3478
- p2340: 8.408e-5; = p2228*p2208
- p1832: 0
- p0671: 990.017; = p0011*(1+p0539*p0143/100)
- p2306: 9.39859e-6; = p2227*p2213
- p1516: 120
- p4360: 0; = p1805*p3480
- p2951: 0.00845082; = p2365*(p1020+p1022)
- p2385: 1.92235e-5; = p2229*p2214
- p2183: 0.00215997; = p1064-p2182
- p0237: 23.106
- p3193: 0; = p2412*p1023
- p1620: 0
- p2623: 0; = p2427*p1073
- p0677: 0
- p3234: 0.39606; = 1-p3233
- p2733: 5.36874e-6; = p2342*(p1078+p1080)
- p3331: 0; = if(and(p1232=0;p3255<>0);p3255*(p3268-p3326)/p3327;0)
- p1337: 0; = p1336*p0001/(p0818*p0002)
- p1664: 0
- p2506: 0; = p2310*p1073
- p3141: 2.17802e-6; = p2360*p1023
- p2792: 0; = p2401*(p1019+p1021)
- p3264: 0
- p3399: 0; = p3380*p1234
- p1851: 0
- p3661: 0; = p1930*p3476
- p3026: 1.57219e-8; = p2245*p1023
- p2650: 2.59747e-5; = p2259*(p1078+p1080)
- p1963j: 1.91348e-5; = p1725*p1929+p1726*p1930+p1727*p1931+p1728*p1932+p1729*p1933+p1730*p1934+p1731*p1935+p1732*p1936+p1733*p1937+p1734*p1938+p1735*p1939+p1736*p1940+p1737*p1941+p1738*p1942+p1739*p1943+p1740*p1944+p1741*p1945+p1742*p1946+p1743*p1947
- p2694: 4.04003e-5; = p2303*(p1078+p1080)
- p3425: 0; = p3368*p1239
- p1110: 1.04418e7; = IF(p1071=0;p1105*p1104*p1095;0)
- p2082: 0.285294
- p2810: 0; = p2419*(p1078+p1080)
- p0975: 0.00336439; = p0973*p0974/p0818
- p0688: 8.741; = p0028*(1+p0556*p0160/100)
- p2905: 0; = p2319*(p1020+p1022)
- p1865: 0
- p2188: 0.00186555; = p1066-p2186-p2187
- p2577: 0; = p2381*p1073
- p5338: 7.50961e-7; = p1963*p3484
- p2672: 1.8948e-7; = p2281*(p1019+p1021)
- p0619: 0; = IF(p0355<0.5;-SQRT(p0007*EXP(p0487^2*p0008)-p0007);SQRT(p0007*EXP(p0487^2*p0008)-p0007))
- p2494: 0; = p2298*p1073
- p1702: 0
- p1247: 0; = if(p1232>0;0;p1242*p0001/(p0818*p0002))
- p0777: 55.057; = p0117*(1+p0645*p0249/100)
- p0282: 0.5
- p0320: 0.5
- p0443: 0; = SQRT(2)*(IF((2*p0311-1)<0;-1;IF((2*p0311-1)>0;1;0))*SQRT(SQRT((2/(pi()*0.140012289)+LN(1-(2*p0311-1)^2)/2)^2-LN(1-(2*p0311-1)^2)/0.140012289)-(2/(pi()*0.140012289)+LN(1-(2*p0311-1)^2)/2)))
- p0817: 60000
- p5126: 0; = p1953*p3483
- p0492: 0; = SQRT(2)*(IF((2*p0360-1)<0;-1;IF((2*p0360-1)>0;1;0))*SQRT(SQRT((2/(pi()*0.140012289)+LN(1-(2*p0360-1)^2)/2)^2-LN(1-(2*p0360-1)^2)/0.140012289)-(2/(pi()*0.140012289)+LN(1-(2*p0360-1)^2)/2)))
- p2073: 0.377647
- p0159: 6.911
- p3004: 0; = p2418*(p1079+p1081)
- p0934: 9.51988e-5; = p0928*p0001/(p0818*p0002)
- p2521: 0; = p2325*p1014
- p1002: 2.97395e6; = p0996*p0888
- p0693: 87.938; = p0033*(1+p0561*p0165/100)
- p1456: 37
- p3174: 0; = p2393*p1023
- p1772: 0
- p0220: 10.098
- p2423: 0; = p2235*p2213
- p3243: 2.02608e-10; = p3234*p1188*p3239/p0818
- p3473: 0; = p3378*p1241
- p1628: 0
- p2778: 3.84236e-6; = p2387*(p1078+p1080)
- p1784: 0
- p2026: 52.63
- p3159: 1.27555e-5; = p2378*p1082
- p2522: 0; = p2326*p1014
- p2396: 0; = p2234*p2185
- p0082: 94.13
- p1243: 0; = if(p1232>0;0;p1238*(p0725/100)*p0723*1000)
- p1204: 0
- p2386: 7.25432e-5; = p2229*p2215
- p3163: 1.14057e-5; = p2382*p1082
- p3448: 0; = p3372*p1240
- p2851: 0.000125568; = p2265*(p1079+p1081)
- p0423: 0; = SQRT(2)*(IF((2*p0291-1)<0;-1;IF((2*p0291-1)>0;1;0))*SQRT(SQRT((2/(pi()*0.140012289)+LN(1-(2*p0291-1)^2)/2)^2-LN(1-(2*p0291-1)^2)/0.140012289)-(2/(pi()*0.140012289)+LN(1-(2*p0291-1)^2)/2)))
- p5125: 0; = p1952*p3483
- p0962: 0; = if(and(p0683>0;or(p0807=480;p0807=32;p0807=1;and(p0807=60;p0901<0.03)));p0938;0)
- p2346: 5.57637e-6; = p2228*p2214
- p0925: 0.108185; = IF(p0918+p0923+p0924=1;0;IF(p0918+p0923+p0924+p0921>1;1-(p0918+p0923+p0924);p0921))
- p2611: 0; = p2415*p1073
- p0928: 1.03038e6; = p0801*p0918
- p3362: 0; = if(p1232=0;p3244*p3356/p0818;0)
- p3402: 0; = p3364*p1238
- p0731: 0
- p3134: 1.40046e-6; = p2353*p1132
- p2382: 0.000741112; = p2229*p2211
- p1792: 0
- p3400: 0; = p3362*p1238
- p3381: 0; = p3362*p1234
- p0295: 0.5
- p1380: 4
- p2686: 6.14854e-7; = p2295*(p1019+p1021)
- p2702: 0.00114945; = p2311*(p1128+p1130)
- p2377: 9.98219e-5; = p2229*p2206
- p5331: 3.45649e-8; = p1952*p3484
- p2834: 0.000123702; = p2248*(p1020+p1022)
- p2640: 4.28995e-7; = p2249*(p1019+p1021)
- p2231: 0.682911; = if(p0783*p0787+p0784*p0788+p0785*p0789+p0786*p0790=0;0;p0788*p0784/(p0783*p0787+p0784*p0788+p0785*p0789+p0786*p0790))
- p0836: 3.1176e7; = p0831*p0835*p0801/(1-p0831)
- p3586: 0; = p1855*p3476
- p0936: 9.22605e-6; = p0930*p0001/(p0818*p0002)
- p2403: 0; = p2234*p2192
- p3152: 8.95375e-6; = p2371*p1023
- p2722: 0; = p2331*(p1019+p1021)
- p3135: 1.1488e-5; = p2354*p1023
- p2006: 0.313892; = ((p1980*p1985+p1986*p1991+p1992*p1997+p2000*p2005)/p0818)*p0005*p0002/1000
- p1049: 0.263405; = IF(p1012=0;IF(p1037+p1044+p1045+p1046+p1047+p1048=1;0;1-(p1037+p1044+p1045+p1046+p1047+p1048));0)
- p1000: 0; = IF(p0996+p0999=1;0;IF(p0996+p0999+p0998>1;1-(p0996+p0999);p0998))
- p2871: 1.85804e-5; = p2285*(p1020+p1022)
- p0726: 0
- p1849: 0
- p2132: 1.33465e-5; = p2015*p2060*p2094/(p0818*1000)
- p2614: 0; = p2418*p1073
- p0135: 206.119
- p1882: 0
- p0845: 0.5
- p3051: 4.65904e-8; = p2270*p1082
- p0246: 31.896
- p2326: 0; = p2224*p2193
- p3416: 0; = p3378*p1238
- p2035: 0.000163559; = p2015*p2029*(1-p2031)/(p0818*1000)
- p2654: 1.10446e-5; = p2263*(p1078+p1080)
- p1716: 0
- p3352: 0; = if(and(p1232=0;p3256<>0);p3256*(p3275-p3347)/p3349;0)
- p1590: 0
- p3062: 1.53729e-8; = p2281*p1023
- p2164: 0.0232322; = (p2015/p0818)-(p2022)-(p2035+p2036+p2052)-(p2017/p0818)-(p2039+p2041+p2044+p2158+p2159+p2160+p2161+p2162)
- p2129: 6.54646e-5; = p2015*p2057*p2091/(p0818*1000)
- p2471: 0; = p2275*p1123
- p2255: 4.35583e-5; = p2222*p2201
- p2320: 0; = p2224*p2187
- p3297: 0; = if(p1273+p1274+p1275+p1276=0;0;p1273/(p1273+p1274+p1275+p1276))
- p0087: 71.863
- p3391: 0; = p3372*p1234
- p0537: 0; = IF(p0273<0.5;-SQRT(p0007*EXP(p0405^2*p0008)-p0007);SQRT(p0007*EXP(p0405^2*p0008)-p0007))
- p2371: 0.00694089; = p2225*p2200
- p0532: 0; = SQRT(2)*(IF((2*p0400-1)<0;-1;IF((2*p0400-1)>0;1;0))*SQRT(SQRT((2/(pi()*0.140012289)+LN(1-(2*p0400-1)^2)/2)^2-LN(1-(2*p0400-1)^2)/0.140012289)-(2/(pi()*0.140012289)+LN(1-(2*p0400-1)^2)/2)))
- p0741: 2.309; = p0081*(1+p0609*p0213/100)
- p0729: 0
- p0609: 0; = IF(p0345<0.5;-SQRT(p0007*EXP(p0477^2*p0008)-p0007);SQRT(p0007*EXP(p0477^2*p0008)-p0007))
- p1756: 1.07699e-5; = p1348*1000/p0818
- p0897: 0
- p2862: 0.000790274; = p2276*(p1020+p1022)
- p2156: 1.20937e-6; = p2015*p2085*p2118/(p0818*1000)
- p2987: 0; = p2401*(p1020+p1022)
- p2316: 0; = p2224*p2183
- p2214: 7.17156e-5; = p1107/p0818
- p2570: 0; = p2374*p1014
- p2806: 0; = p2415*(p1078+p1080)
- p0534: 0; = SQRT(2)*(IF((2*p0402-1)<0;-1;IF((2*p0402-1)>0;1;0))*SQRT(SQRT((2/(pi()*0.140012289)+LN(1-(2*p0402-1)^2)/2)^2-LN(1-(2*p0402-1)^2)/0.140012289)-(2/(pi()*0.140012289)+LN(1-(2*p0402-1)^2)/2)))
- p1869: 0
- p2165: 0.555196; = (p0833-p2014)/p0818-p0839
- p0716: 59.95; = p0056*(1+p0584*p0188/100)
- p2922: 6.50146e-5; = p2336*(p1079+p1081)
- p1316: 0; = p1312*p1252/p0818
- p2019: 0.13105
- p1897: 0
- p2096: 0.486404
- p2452: 0; = p2256*p1014
- p2140: 7.52361e-6; = p2015*p2068*p2102/(p0818*1000)
- p0508: 0; = SQRT(2)*(IF((2*p0376-1)<0;-1;IF((2*p0376-1)>0;1;0))*SQRT(SQRT((2/(pi()*0.140012289)+LN(1-(2*p0376-1)^2)/2)^2-LN(1-(2*p0376-1)^2)/0.140012289)-(2/(pi()*0.140012289)+LN(1-(2*p0376-1)^2)/2)))
- p3275: 0
- p2835: 2.6517e-5; = p2249*(p1020+p1022)
- p2157: 2.22778e-6; = p2015*p2086*p2119/(p0818*1000)
- p1140: 2.70142e-5; = if(p1121=0;p1134*p0001/(p0818*p0002);0)
- p0296: 0.5
- p2040: 1.38
- p3278: 0
- p2636: 1.93782e-7; = p2245*(p1019+p1021)
- p0384: 0.5
- p1710: 0.757148
- p2808: 0; = p2417*(p1078+p1080)
- p0706: 1.59; = p0046*(1+p0574*p0178/100)
- p0108: 97.521
- p2143: 7.12388e-6; = p2015*p2071*p2105/(p0818*1000)
- p0115: 56.489
- p2557: 0; = p2361*p1014
- p1970: 1.406e6; = p0801
- p3401: 0; = p3363*p1238
- p2879: 0.00061594; = p2293*(p1020+p1022)
- p2811: 0; = p2420*(p1078+p1080)
- p1846: 0
- p0139: 76.957
- p2639: 2.00127e-6; = p2248*(p1019+p1021)
- p3173: 3.28359e-6; = p2392*p1132
- p2492: 0; = p2296*p1014
- p1197: 0
- p3014: 0; = p2428*(p1129+p1131)
- p1667: 0
- p2601: 0; = p2405*p1014
- p2473: 0; = p2277*p1014
- p1913: 0
- p1099: 0.514802
- p2971: 1.2641e-5; = p2385*(p1079+p1081)
- p0771: 5.645; = p0111*(1+p0639*p0243/100)
- p2914: 0; = p2328*(p1020+p1022)
- p0786: 64.956; = p0126*(1+p0654*p0258/100)
- p2380: 0.000131074; = p2229*p2209
- p1126: 0; = if(p1121=0;p0720/100;0)
- p2710: 0; = p2319*(p1019+p1021)
- p1623: 0
- p2327: 0; = p2224*p2195
- p2383: 4.11748e-7; = p2229*p2212
- p1697: 0
- p2696: 2.93934e-7; = p2305*(p1078+p1080)
- p1968: 0; = if(p0807=480;p0802*p0811;0)
- p2511: 0; = p2315*p1014
- p3417: 0; = p3379*p1238
- p2593: 0; = p2397*p1014
- p1840: 0
- p0672: 0
- p2009: 0.00560482; = ((p1983*p1985+p1989*p1991+p1995*p1997+p2003*p2005+p1976*p1977+p1978*p1979+p1998*p1999)/p0818)*p0005*p0002/1000
- p0485: 0; = SQRT(2)*(IF((2*p0353-1)<0;-1;IF((2*p0353-1)>0;1;0))*SQRT(SQRT((2/(pi()*0.140012289)+LN(1-(2*p0353-1)^2)/2)^2-LN(1-(2*p0353-1)^2)/0.140012289)-(2/(pi()*0.140012289)+LN(1-(2*p0353-1)^2)/2)))
- p2741: 0.000110254; = p2350*(p1128+p1130)
- p2228: 0.0777567; = if(p0774*p0778+p0775*p0779+p0776*p0780+p0777*p0781=0;0;p0780*p0776/(p0774*p0778+p0775*p0779+p0776*p0780+p0777*p0781))
- p1646: 0
- p0561: 0; = IF(p0297<0.5;-SQRT(p0007*EXP(p0429^2*p0008)-p0007);SQRT(p0007*EXP(p0429^2*p0008)-p0007))
- p2064: 0.676706
- p2145: 1.76848e-5; = p2015*p2073*p2107/(p0818*1000)
- p1930: 2.78569e-5; = p1522*1000/p0818
- p1196: 0
- p4740: 0; = p1773*p3482
- p1249: 0; = if(p1232>0;0;p1244*p0001/(p0818*p0002))
- p3169: 1.6206e-6; = p2388*p1082
- p3483: 0; = if(p1328+p1330+p1332+p1334+p1336+p1338+p1340+p1342+p1344=0;0;p1342/(p1328+p1330+p1332+p1334+p1336+p1338+p1340+p1342+p1344))

- p2378: 0.000828814; = p2229*p2207
- p2431: 0; = p2236*p2221
- p2890: 0.00106381; = p2304*(p1079+p1081)
- p2138: 4.1015e-6; = p2015*p2066*p2100/(p0818*1000)
- p2548: 0; = p2352*p1123
- p3084: 1.90123e-6; = p2303*p1082
- p1955: 0
- p3435: 0; = p3378*p1239
- p0689: 88.02; = p0029*(1+p0557*p0161/100)
- p0815: 8.9485e7
- p0915: 0.0195956; = p0914/p0818
- p1932: 0
- p3792: 2.98387e-5; = p1855*p3477
- p2930: 7.85415e-8; = p2344*(p1079+p1081)
- p3064: 8.47258e-8; = p2283*p1023
- p1055: 83530.4; = IF(p1012=0;p1048*p1036;0)
- p0052: 32.703
- p3265: 0
- p1239: 0; = if(p1232>0;0;IF(p1234+p1238=1;0;IF(p1234+p1238+p1236>1;1-(p1234+p1238);p1236)))
- p2112: 0.856281
- p2416: 0; = p2235*p2206
- p3829: 2.39909e-6; = p1892*p3477
- p2054: 0.91
- p0828: 0; = if(p0827=0;0;p0819-p0827/p0818)
- p0581: 0; = IF(p0317<0.5;-SQRT(p0007*EXP(p0449^2*p0008)-p0007);SQRT(p0007*EXP(p0449^2*p0008)-p0007))
- p2904: 0; = p2318*(p1020+p1022)
- p2480: 0; = p2284*p1014
- p0858: 0; = p0670*1000/p0856
- p0862: 0.279774; = p0674*1000/p0856
- p3301: 0; = if(and(p1232=0;p3252<>0);p3257*p3277*(p3297*p3290+(1-p3297)*p3294);0)
- p4124: 1.8226e-8; = p1775*p3479
- p2626: 0; = p2430*p1123
- p3255: 0; = p1252*(p1297*(1-p3247)+p1300*(1-p3248)+p1301*(1-p3249)+p1302*(1-p3250))
- p1972: 0; = if(p0807=480;p1967*p0001/(p0818*p0002);0)
- p2257: 7.18694e-5; = p2222*p2203
- p2226: 0.0690662; = if(p0774*p0778+p0775*p0779+p0776*p0780+p0777*p0781=0;0;p0778*p0774/(p0774*p0778+p0775*p0779+p0776*p0780+p0777*p0781))
- p3335: 0; = IF(or(p3254=0;p1232>0);0;p3270*(p3280*(p3283*p1256+p3286*(p1253+p1257)+p1258*p3288+p3300*p3287)))
- p1258: 0; = if(p1232>0;0;IF(p1253+p1256+p1257=1;0;1-(p1253+p1256+p1257)))
- p0215: 47.203
- p0029: 88.02
- p2017: 1.95013e8; = p2015*p0898
- p1847: 0
- p0704: 97.026; = p0044*(1+p0572*p0176/100)
- p1984: 30
- p1902: 0
- p0889: 69.7912; = 1000*p0888*p0001*p0003*p0004/(p0818*p0002)
- p4479: 0; = p1924*p3480
- p5152: 2.55122e-8; = p1773*p3484
- p1186: 1.50869e-8; = p1182*p1185/p0818
- p2972: 4.7703e-5; = p2386*(p1079+p1081)
- p1883: 0
- p2970: 2.83126e-6; = p2384*(p1079+p1081)
- p2791: 0; = p2400*(p1019+p1021)
- p2807: 0; = p2416*(p1078+p1080)
- p1007: 0; = p1003*p0001*p0004/(p0818*p0002)
- p2161: 4.70116e-7; = p2015*p2085*p2123/(p0818*1000)
- p3280: 0
- p1810: 0
- p2343: 0.000214983; = p2228*p2211
- p0275: 0.5
- p0113: 67.792
- p3178: 0; = p2397*p1023
- p0749: 3.632; = p0089*(1+p0617*p0221/100)
- p0557: 0; = IF(p0293<0.5;-SQRT(p0007*EXP(p0425^2*p0008)-p0007);SQRT(p0007*EXP(p0425^2*p0008)-p0007))
- p2444: 0; = p2248*p1014
- p1189: 0.000129903; = p0801*p0001/(p0818*p0002)
- p2954: 7.69413e-6; = p2368*(p1020+p1022)
- p0806: 9.6565e7; = p0815+p0816+p0817
- p3058: 2.27696e-7; = p2277*p1023
- p2685: 4.27212e-6; = p2294*(p1019+p1021)
- p0947: 0; = if(and(p0683=0;or(p0807=480;p0807=32;p0807=1;and(p0807=60;p0901<0.03)));p0935;0)
- p2283: 6.56789e-5; = p2223*p2189
- p2920: 0; = p2334*(p1020+p1022)
- p4096: 3.31882e-7; = p1953*p3478
- p2322: 0; = p2224*p2189
- p1948: 0
- p1926: 0
- p4718: 8.22981e-10; = p1957*p3481
- p1769: 0
- p1594: 0
- p2547: 0; = p2351*p1123
- p1268: 0
- p0823: 0
- p1275: 0; = p1271*p1252/p0818
- p1179: 0.5
- p1903: 0
- p2360: 0.00168839; = p2225*p2188
- p2039: 5.0456e-5; = p2015*p2037*p2038/(p0818*1000)
- p2240: 1.27812e-5; = p2222*p2185
- p1276: 0; = p1272*p1252/p0818
- p1319: 0; = IF(((p0745*1000*p0746/100)+(p0754*1000*p0755/100))/p0801<0;0;((p0745*1000*p0746/100)+(p0754*1000*p0755/100))/p0801)
- p2272: 0.000475474; = p2230*p2218
- p0841: 0.0803508
- p3368: 0; = if(p1232=0;p3245*p3356/p0818;0)
- p0445: 0; = SQRT(2)*(IF((2*p0313-1)<0;-1;IF((2*p0313-1)>0;1;0))*SQRT(SQRT((2/(pi()*0.140012289)+LN(1-(2*p0313-1)^2)/2)^2-LN(1-(2*p0313-1)^2)/0.140012289)-(2/(pi()*0.140012289)+LN(1-(2*p0313-1)^2)/2)))
- p1038: 0.00962013
- p3283: 0
- p0989: 0; = p0985*p0886
- p1283: 0; = p1277*p1252/p0818
- p2298: 0.000672893; = p2227*p2205
- p2314: 0.000859359; = p2231*p2221
- p0905: 0.0217746; = p0904/p0818
- p2361: 0.000727398; = p2225*p2189
- p2084: 0.21
- p2600: 0; = p2404*p1014
- p2735: 3.90606e-8; = p2344*(p1078+p1080)
- p1939: 0
- p2734: 7.03058e-5; = p2343*(p1078+p1080)
- p2586: 0; = p2390*p1123
- p3899: 2.46541e-6; = p1756*p3478
- p4100: 2.37059e-8; = p1957*p3478
- p0556: 0; = IF(p0292<0.5;-SQRT(p0007*EXP(p0424^2*p0008)-p0007);SQRT(p0007*EXP(p0424^2*p0008)-p0007))
- p4390: 0; = p1835*p3480
- p2815: 0; = p2424*(p1078+p1080)
- p3422: 0; = p3365*p1239
- p3446: 0; = p3370*p1240
- p2673: 2.42395e-6; = p2282*(p1019+p1021)
- p3484: 0.00397352; = IF(p1344=0;0;p1344/(p1328+p1330+p1332+p1334+p1336+p1338+p1340+p1342+p1344))
- p0643: 0; = IF(p0379<0.5;-SQRT(p0007*EXP(p0511^2*p0008)-p0007);SQRT(p0007*EXP(p0511^2*p0008)-p0007))
- p3403: 0; = p3365*p1238
- p0610: 0; = IF(p0346<0.5;-SQRT(p0007*EXP(p0478^2*p0008)-p0007);SQRT(p0007*EXP(p0478^2*p0008)-p0007))
- p2158: 7.85397e-6; = p2015*p2082*p2120/(p0818*1000)
- p2633: 3.07176e-8; = p2242*(p1019+p1021)
- p4328: 0; = p1773*p3480
- p2533: 0; = p2337*p1073
- p1942: 0
- p0293: 0.5
- p1118: 0.000436676; = IF(p1071=0;p1108/(p1113*p0818);0)
- p0088: 23.62
- p2994: 0; = p2408*(p1020+p1022)
- p0837: 0.5
- p1244: 0; = if(p1232>0;0;p1239*(p0725/100)*p0723*1000)
- p1738: 0
- p1642: 0
- p0959: 0; = if(and(p0683>0;or(p0807=480;p0807=32;p0807=1;and(p0807=60;p0901<0.03)));p0935;0)
- p1330: 3.60679e6; = p1320*p0801
- p1270: 0; = IF(p1267=p1259;0;IF(p1267+p1268>p1259;p1259-p1267;p1268))
- p1040: 0.0276045
- p1225: 0; = IF(p1221=0;0;p1223+1.2*p1224)
- p0692: 8.801; = p0032*(1+p0560*p0164/100)
- p0891: 0; = IF(p3251=0;0;62.4*6272640/(12*12*12))
- p1705: 0
- p2560: 0; = p2364*p1014
- p1721: 0
- p3510: 0; = p1779*p3476
- p2101: 0.620397
- p0734: 0
- p1684: 0
- p3909: 4.97823e-7; = p1766*p3478
- p3357: 0; = if(p1232=0;p3307+p3318+p3329+p3340+p3351;0)
- p1669: 0
- p2830: 1.04645e-5; = p2244*(p1020+p1022)
- p0322: 0.5
- p0789: 7.357; = p0129*(1+p0657*p0261/100)
- p0651: 0; = IF(p0387<0.5;-SQRT(p0007*EXP(p0519^2*p0008)-p0007);SQRT(p0007*EXP(p0519^2*p0008)-p0007))
- p1817: 0
- p2740: 9.98953e-6; = p2349*(p1078+p1080)
- p2491: 0; = p2295*p1014
- p1918: 0
- p2838: 1.84857e-7; = p2252*(p1020+p1022)
- p0544: 0; = IF(p0280<0.5;-SQRT(p0007*EXP(p0412^2*p0008)-p0007);SQRT(p0007*EXP(p0412^2*p0008)-p0007))
- p2176: 0.00238238; = p0895*p0913/p0818
- p1596: 0
- p1281: 0; = IF(p1277+p1280=p1263;0;IF(p1277+p1280+p1279>p1263;p1263-(p1277+p1280);p1279))
- p2447: 0; = p2251*p1014
- p2162: 8.66003e-7; = p2015*p2086*p2124/(p0818*1000)
- p1561: 0
- p3453: 0; = p3377*p1240
- p1029: 1759.62; = IF(p1012=0;IF(p0801<p1023*(p0704/100)*p0703*1000;p0801;p1023*(p0704/100)*p0703*1000);0)
- p3385: 0; = p3366*p1234
- p0808: 0
- p0691: 24.205; = p0031*(1+p0559*p0163/100)
- p2345: 1.24897e-6; = p2228*p2213
- p1111: 0.0872841
- p0778: 5.82; = p0118*(1+p0646*p0250/100)
- p1768: 0
- p0127: 8.489
- p1011: 2.58613e-6; = p1010*p0001*p0004/(p0818*p0002)
- p1867: 0
- p0710: 67.792; = p0050*(1+p0578*p0182/100)
- p1308: 0
- p2199: 3.12155e-5; = p1069-p2197-p2198
- p1166: 7.07351e-7; = p1164/p0818
- p1685: 0
- p1013: 0; = p1012*p0001/(p0818*p0002)
- p1801: 0
- p3186: 0; = p2405*p1023
- p2265: 0.000190955; = p2226*p2211
- p0608: 0; = IF(p0344<0.5;-SQRT(p0007*EXP(p0476^2*p0008)-p0007);SQRT(p0007*EXP(p0476^2*p0008)-p0007))
- p1639: 0
- p3262: 0
- p1920: 0
- p3208: 0; = p2427*p1082
- p1815: 0
- p1811: 0
- p3412: 0; = p3374*p1238
- p2425: 0; = p2235*p2215
- p0128: 67.668
- p0162: 0.488
- p2613: 0; = p2417*p1073
- p2995: 0; = p2409*(p1020+p1022)
- p1659: 0
- p1301: 0; = IF(p1297+p1300=p1265;0;IF(p1297+p1300+p1299>p1265;p1265-(p1297+p1300);p1299))
- p3249: 0
- p1739: 0
- p1195: 0
- p3447: 0; = p3371*p1240
- p3224: 0; = IF(p3216=0;0;1-p3221-p3222-p3223)
- p1367: 5
- p3445: 0; = p3369*p1240
- p1129: 0.63609; = if(p1121=0;IF(p1123+p1128=1;0;IF(p1123+p1128+p1125>1;1-(p1123+p1128);p1125));0)
- p4308: 6.65249e-6; = p1963*p3479
- p2906: 0; = p2320*(p1020+p1022)
- p0415: 0; = SQRT(2)*(IF((2*p0283-1)<0;-1;IF((2*p0283-1)>0;1;0))*SQRT(SQRT((2/(pi()*0.140012289)+LN(1-(2*p0283-1)^2)/2)^2-LN(1-(2*p0283-1)^2)/0.140012289)-(2/(pi()*0.140012289)+LN(1-(2*p0283-1)^2)/2)))
- p2350: 0.000317808; = p2232*p2218
- p2943: 0.000858147; = p2357*(p1020+p1022)
- p1164: 6830.53; = p1163*p0801
- p0314: 0.5
- p2524: 0; = p2328*p1014
- p1827: 0
- p2426: 0; = p2235*p2216
- p0033: 87.938
- p3931: 9.48235e-8; = p1788*p3478
- p5135: 4.27946e-8; = p1756*p3484
- p3005: 0; = p2419*(p1079+p1081)
- p4755: 0; = p1788*p3482
- p1974: 0; = p1969*p0001/(p0818*p0002)
- p1978: 268
- p2717: 0; = p2326*(p1019+p1021)
- p2355: 0.00195485; = p2225*p2183
- p3029: 1.62367e-7; = p2248*p1023
- p0857: 1.29903; = p0856*p0001*p0003/(p0818*p0002)
- p1284: 0; = p1280*p1252/p0818
- p3451: 0; = p3375*p1240
- p2248: 0.000125866; = p2222*p2193
- p2709: 0; = p2318*(p1019+p1021)
- p4204: 1.45079e-6; = p1855*p3479
- p2536: 0; = p2340*p1073
- p1979: 6.49766e7; = p0973
- p0016: 99.858
- p1880: 0
- p2384: 4.30558e-6; = p2229*p2213
- p2984: 0; = p2398*(p1020+p1022)
- p0916: 0.281152; = p0826+(p0832*(1+p0894))/p0818
- p0998: 0; = if(p0888=0;0;if((p0699*p0698*1000*p0700/100)/p0888>1;1;(p0699*p0698*1000*p0700/100)/p0888))
- p0875: 0; = p0874*p0001*p0003/(p0818*p0002)
- p0922: 0; = p0677*1000/p0801
- p0978: 0
- p2486: 0; = p2290*p1014
- p0866: 0; = IF(p0858+p0864+p0865=1;0;IF(p0858+p0864+p0865+p0861>1;1-(p0858+p0864+p0865);p0861))
- p1101: 0.0290355; = IF(p1071=0;IF(p1096=1;0;IF(p1096+p1097>1;1-p1096;p1097));0)
- p2128: 4.41693e-5; = p2015*p2056*p2090/(p0818*1000)
- p3504: 0; = p1773*p3476
- p1635: 0
- p1748: 0.236958
- p1557: 0
- p3339: 0; = if(and(p1232=0;p3254<>0);p3254*(p3269*p3277-p3334)/p3338;0)
- p2016: 0.00537268; = (p2014-p2015)/(p0818)
- p2177: 0.106418; = p0895/p0818-(p2173+p2174+p2175+p2176)
- p0881: 0; = p0880*p0001*p0003/(p0818*p0002)
- p2089: 0.40001
- p2359: 0.000131981; = p2225*p2187
- p0664: 0; = IF(p0400<0.5;-SQRT(p0007*EXP(p0532^2*p0008)-p0007);SQRT(p0007*EXP(p0532^2*p0008)-p0007))
- p3336: 0; = IF(or(p3254=0;p1232>0);0;p3271*p3289)
- p1056: 7.40577e7; = IF(p1012=0;p1049*p1036;0)
- p1925: 0
- p2501: 0; = p2305*p1073
- p0141: 102.801
- p0958: 0; = if(and(p0683>0;or(p0807=480;p0807=32;p0807=1;and(p0807=60;p0901<0.03)));p0934;0)
- p0611: 0; = IF(p0347<0.5;-SQRT(p0007*EXP(p0479^2*p0008)-p0007);SQRT(p0007*EXP(p0479^2*p0008)-p0007))
- p2997: 0; = p2411*(p1020+p1022)
- p2065: 0.0758824
- p3356: 0; = if(p1232=0;p3306+p3317+p3328+p3339+p3350;0)
- p3063: 1.9666e-7; = p2282*p1023
- p3214: 0; = p1222*40.078/100.0869
- p1057: 0.82
- p1632: 0
- p2291: 1.16023e-6; = p2223*p2198
- p1711: 0
- p1854: 0
- p4822: 0; = p1855*p3482
- p3157: 4.74409e-6; = p2376*p1082
- p1251: 0; = if(p1232>0;0;p1246*p0001/(p0818*p0002))
- p3108: 0; = p2327*p1023
- p1070: 0.0168554; = IF(p1012=0;p1056/(p1063*p0818);0)
- p1663: 0
- p0801: 1.406e6
- p2111: 0.856281
- p0705: 0
- p1638: 0
- p2707: 0; = p2316*(p1019+p1021)
- p1863: 0
- p2007: 0.0343063; = ((p1981*p1985+p1987*p1991+p1993*p1997+p2001*p2005)/p0818)*p0005*p0002/1000
- p0258: 16.305
- p1033: 0; = IF(p1012=0;p1027*p0001/(p0818*p0002);0)
- p5008: 0; = p1835*p3483
- p0249: 12.268
- p3325: 0; = if(and(p1232=0;p3255<>0);p3267*p3289;0)
- p2244: 1.06476e-5; = p2222*p2189
- p1309: 0
- p3454: 0; = p3378*p1240
- p1289: 0
- p1726: 0.686898
- p2108: 0.826583
- p2211: 0.00276481; = p1120-p2209-p2208-p2210
- p3343: 0; = if(and(p1232=0;p3254<>0);IF((p3339+p3340+p3341+p3342)+(p3254*(p3269*(1-p3277))/p3338)>p3254;p3254-(p3339+p3340+p3341+p3342);p3254*(p3269*(1-p3277))/p3338);0)
- p1168: 3.53675e-7; = p1164*p1167/p0818
- p0280: 0.5
- p1032: 0.000113042; = IF(p1012=0;p1026*p0001/(p0818*p0002);0)
- p1058: 0.225
- p0022: 1405.99
- p0404: 0.5
- p0838: 5.89488e9; = (p0833-p0836)*p0837
- p1252: 0; = if(p1232>0;0;p0724*2000*p0723*1000*p0725/100)
- p3287: 0
- p1971: 0.000129348; = p1966*p0001/(p0818*p0002)
- p4558: 3.14379e-7; = p1797*p3481
- p0633: 0; = IF(p0369<0.5;-SQRT(p0007*EXP(p0501^2*p0008)-p0007);SQRT(p0007*EXP(p0501^2*p0008)-p0007))
- p2566: 0; = p2370*p1014
- p2000: 4000
- p0923: 0.0744139; = IF(p0918=1;0;IF(p0918+p0919>1;1-p0918;p0919))
- p2661: 9.90024e-7; = p2270*(p1078+p1080)
- p2820: 0; = p2429*(p1128+p1130)
- p0814: 0; = if(p0807=480;p0810*p0812+p0811*p0813;0)
- p0860: 0; = p0672*1000/p0856
- p0391: 0.5
- p0865: 0; = IF(p0858+p0864=1;0;IF(p0858+p0864+p0860>1;1-(p0858+p0864);p0860))
- p1981: 400
- p0612: 0; = IF(p0348<0.5;-SQRT(p0007*EXP(p0480^2*p0008)-p0007);SQRT(p0007*EXP(p0480^2*p0008)-p0007))
- p4891: 0; = p1924*p3482
- p1180: 2.68893e-8; = p1176*p1179/p0818
- p0571: 0; = IF(p0307<0.5;-SQRT(p0007*EXP(p0439^2*p0008)-p0007);SQRT(p0007*EXP(p0439^2*p0008)-p0007))
- p1603: 0
- p1759: 0
- p4419: 0; = p1864*p3480
- p2777: 2.37238e-5; = p2386*(p1078+p1080)
- p1560: 0
- p1031: 2.00382e-6; = IF(p1012=0;p1025*p0001/(p0818*p0002);0)
- p1745: 0
- p3040: 1.22237e-6; = p2259*p1082
- p2295: 3.86701e-5; = p2223*p2202
- p2448: 0; = p2252*p1014
- p1958: 3387
- p0939: 1.75784e-6; = p0933*p0001/(p0818*p0002)
- p0247: 5.855
- p1115: 0.237849
- p3043: 1.14937e-6; = p2262*p1082
- p1059: 0.335
- p1389: 382
- p1655: 0.483107
- p3384: 0; = p3365*p1234
- p2001: 400
- p2813: 0; = p2422*(p1078+p1080)
- p0863: 0; = p0675*1000/p0856
- p2102: 0.922577
- p0720: 0
- p1296: 0; = p1292*p1252/p0818
- p3273: 0
- p1648: 0
- p0730: 0
- p0985: 0; = IF(p0982=1;0;IF(p0982+p0983>1;1-p0982;p0983))
- p0984: 0; = if(p0886=0;0;min(1;(p0699*p0698*1000*p0701/100)/p0886))
- p1039: 0.0348009
- p1945: 0
- p2488: 0; = p2292*p1014
- p2993: 0; = p2407*(p1020+p1022)
- p2785: 0; = p2394*(p1019+p1021)
- p0558: 0; = IF(p0294<0.5;-SQRT(p0007*EXP(p0426^2*p0008)-p0007);SQRT(p0007*EXP(p0426^2*p0008)-p0007))
- p2885: 0.000143287; = p2299*(p1079+p1081)
- p0935: 9.66658e-6; = p0929*p0001/(p0818*p0002)
- p2622: 0; = p2426*p1073
- p1650: 0
- p1022: 0.08584; = IF(p1012=0;IF(p1014+p1019+p1020+p1021=1;0;IF(p1014+p1019+p1020+p1021+p1018>1;1-(p1014+p1019+p1020+p1021);p1018));0)
- p2299: 0.0002179; = p2227*p2206
- p0367: 0.5
- p3144: 2.70098e-7; = p2363*p1023
- p1054: 9.17453e7; = IF(p1012=0;p1047*p1036;0)
- p3155: 6.33366e-6; = p2374*p1023
- p0002: 0.453592
- p0952: 9.51988e-5; = if(and(p0683>0;or(p0807=56;p0807=100;and(p0807=60;p0901>0.06)));p0934;0)
- p1096: 0.000621911
- p3716: 2.24915e-7; = p1779*p3477
- p3106: 0; = p2325*p1023
- p3366: 0; = if(p1232=0;p3244*p3360/p0818;0)
- p1657: 0.687857
- p2379: 0.00028985; = p2229*p2208
- p1758: 0
- p3002: 0; = p2416*(p1079+p1081)
- p2224: 0; = if(p0765*p0769+p0766*p0770+p0767*p0771+p0768*p0772=0;0;p0771*p0767/(p0765*p0769+p0766*p0770+p0767*p0771+p0768*p0772))
- p0449: 0; = SQRT(2)*(IF((2*p0317-1)<0;-1;IF((2*p0317-1)>0;1;0))*SQRT(SQRT((2/(pi()*0.140012289)+LN(1-(2*p0317-1)^2)/2)^2-LN(1-(2*p0317-1)^2)/0.140012289)-(2/(pi()*0.140012289)+LN(1-(2*p0317-1)^2)/2)))
- p1824: 0
- p1573: 0
- p2296: 0.000443322; = p2223*p2203
- p0157: 20.258
- p3138: 1.12637e-6; = p2357*p1023
- p1891: 0
- p0483: 0; = SQRT(2)*(IF((2*p0351-1)<0;-1;IF((2*p0351-1)>0;1;0))*SQRT(SQRT((2/(pi()*0.140012289)+LN(1-(2*p0351-1)^2)/2)^2-LN(1-(2*p0351-1)^2)/0.140012289)-(2/(pi()*0.140012289)+LN(1-(2*p0351-1)^2)/2)))
- p2799: 0; = p2408*(p1019+p1021)
- p2960: 0.00482542; = p2374*(p1020+p1022)
- p1666: 0.885279
- p1263: 0; = if(p1232>0;0;IF(p1259=1;0;IF(p1259+p1260>1;1-p1259;p1260)))
- p0972: 0.00575345; = p0969/p0818
- p0951: 0; = if(and(p0683=0;or(p0807=480;p0807=32;p0807=1;and(p0807=60;p0901<0.03)));p0939;0)
- p3481: 0.00794712; = if(p1328+p1330+p1332+p1334+p1336+p1338+p1340+p1342+p1344=0;0;p1338/(p1328+p1330+p1332+p1334+p1336+p1338+p1340+p1342+p1344))
- p3080: 3.35348e-6; = p2299*p1082
- p0416: 0; = SQRT(2)*(IF((2*p0284-1)<0;-1;IF((2*p0284-1)>0;1;0))*SQRT(SQRT((2/(pi()*0.140012289)+LN(1-(2*p0284-1)^2)/2)^2-LN(1-(2*p0284-1)^2)/0.140012289)-(2/(pi()*0.140012289)+LN(1-(2*p0284-1)^2)/2)))
- p2301: 0.00063271; = p2227*p2208
- p0765: 75.35; = p0105*(1+p0633*p0237/100)
- p2982: 0; = p2396*(p1020+p1022)
- p0695: 0
- p1135: 536103; = if(p1121=0;p1129*(p0716/100)*p0703*1000;0)
- p0116: 50.645
- p3054: 1.1384e-5; = p2273*p1132
- p2341: 3.8022e-5; = p2228*p2209
- p3460: 0; = p3365*p1241
- p0637: 0; = IF(p0373<0.5;-SQRT(p0007*EXP(p0505^2*p0008)-p0007);SQRT(p0007*EXP(p0505^2*p0008)-p0007))
- p2072: 0.134
- p1707: 0
- p0813: 0; = if(p0807=480;1.56521739130435;0)
- p2085: 0.0335294
- p2535: 0; = p2339*p1073
- p2376: 0.000308258; = p2229*p2205
- p2395: 0; = p2234*p2184
- p2542: 0; = p2346*p1073
- p2863: 0.000173475; = p2277*(p1020+p1022)
- p2120: 0.51828
- p1217: 0
- p2691: 0.000591666; = p2300*(p1078+p1080)
- p3101: 0; = p2320*p1023
- p5028: 0; = p1855*p3483
- p0760: 0
- p0816: 7.02e6
- p1175: 0.000369355
- p1809: 0
- p0358: 0.5
- p1954: 0
- p2173: 0.0676267; = p0895*p0898/p0818
- p2749: 1.45808e-5; = p2358*(p1019+p1021)
- p1785: 0
- p2999: 0; = p2413*(p1020+p1022)
- p2182: 0.00983986; = p1050/p0818
- p5309: 1.1069e-7; = p1930*p3484
- p0920: 0.0710228; = p0676*1000/p0801
- p2271: 2.71322e-5; = p2226*p2217
- p0820: 0; = if(p0807=480;p0814;0)
- p2703: 0.00161982; = p2312*(p1128+p1130)
- p2439: 0; = p2243*p1014
- p0791: 0
- p2699: 5.17864e-5; = p2308*(p1078+p1080)
- p1504: 1767
- p1898: 0
- p0708: 0
- p3093: 7.93287e-5; = p2312*p1132
- p1982: 750
- p1852: 0
- p2400: 0; = p2234*p2189
- p0310: 0.5
- p2399: 0; = p2234*p2188
- p2044: 2.36656e-6; = p2015*p2042*p2043/(p0818*1000)
- p3069: 2.14694e-7; = p2288*p1023
- p3421: 0; = p3364*p1239
- p3068: 1.00155e-6; = p2287*p1023
- p3092: 5.62931e-5; = p2311*p1132
- p3241: 2.18469e-10; = p3234*p1188*p3236/p0818
- p3121: 1.29399e-6; = p2340*p1082
- p3048: 1.70733e-8; = p2267*p1082
- p2587: 0; = p2391*p1123
- p3219: 0; = p3215*p1228
- p1727: 0
- p1326: 0; = IF(((p0745*1000*p0753/100)+(p0754*1000*p0762/100))/p0801<0;0;((p0745*1000*p0753/100)+(p0754*1000*p0762/100))/p0801)
- p3890: 1.0496e-6; = p1953*p3477
- p0652: 0; = IF(p0388<0.5;-SQRT(p0007*EXP(p0520^2*p0008)-p0007);SQRT(p0007*EXP(p0520^2*p0008)-p0007))
- p4067: 2.84471e-6; = p1924*p3478
- p1651: 0.299611
- p2124: 0.263965
- p0634: 0; = IF(p0370<0.5;-SQRT(p0007*EXP(p0502^2*p0008)-p0007);SQRT(p0007*EXP(p0502^2*p0008)-p0007))
- p1188: 377.838; = p1187*p0801
- p0535: 0; = SQRT(2)*(IF((2*p0403-1)<0;-1;IF((2*p0403-1)>0;1;0))*SQRT(SQRT((2/(pi()*0.140012289)+LN(1-(2*p0403-1)^2)/2)^2-LN(1-(2*p0403-1)^2)/0.140012289)-(2/(pi()*0.140012289)+LN(1-(2*p0403-1)^2)/2)))
- p0762: 0
- p2286: 0.000152994; = p2223*p2192
- p0521: 0; = SQRT(2)*(IF((2*p0389-1)<0;-1;IF((2*p0389-1)>0;1;0))*SQRT(SQRT((2/(pi()*0.140012289)+LN(1-(2*p0389-1)^2)/2)^2-LN(1-(2*p0389-1)^2)/0.140012289)-(2/(pi()*0.140012289)+LN(1-(2*p0389-1)^2)/2)))
- p3452: 0; = p3376*p1240
- p2310: 0.000229863; = p2227*p2217
- p2683: 4.05589e-8; = p2292*(p1019+p1021)
- p0119: 59.397
- p2692: 0.000206915; = p2301*(p1078+p1080)
- p1182: 291.374; = p1181*p0801
- p4306: 3.64521e-9; = p1957*p3479
- p2712: 0; = p2321*(p1019+p1021)
- p2028: 0.00119872; = p2015*p2026*p2027/(p0818*1000)
- p2487: 0; = p2291*p1014
- p5034: 0; = p1861*p3483
- p0646: 0; = IF(p0382<0.5;-SQRT(p0007*EXP(p0514^2*p0008)-p0007);SQRT(p0007*EXP(p0514^2*p0008)-p0007))
- p2092: 0.54529
- p3256: 0; = p1252*(p1307*(1-p3247)+p1310*(1-p3248)+p1311*(1-p3249)+p1312*(1-p3250))
- p1451: 9
- p0681: 19.019; = p0021*(1+p0549*p0153/100)
- p0892: 0; = if(p0891=0;0;(1-p1240)*p3251/p0891)
- p2539: 0; = p2343*p1073
- p1574: 0
- p2057: 3.28794
- p0080: 94.369
- p1213: 0
- p1199: 0
- p1996: 30
- p2789: 0; = p2398*(p1019+p1021)
- p0639: 0; = IF(p0375<0.5;-SQRT(p0007*EXP(p0507^2*p0008)-p0007);SQRT(p0007*EXP(p0507^2*p0008)-p0007))
- p0343: 0.5
- p3408: 0; = p3370*p1238
- p1692: 0
- p1747: 0
- p1063: 0.455
- p0105: 75.35
- p2329: 0; = p2224*p2197
- p3315: 0; = if(and(p1232=0;p3253<>0);p3264*p3289;0)
- p1617: 0
- p2406: 0; = p2234*p2196
- p2513: 0; = p2317*p1014
- p3566: 0; = p1835*p3476
- p1280: 0; = IF(p1277=p1263;0;IF(p1277+p1278>p1263;p1263-p1277;p1278))
- p0551: 0; = IF(p0287<0.5;-SQRT(p0007*EXP(p0419^2*p0008)-p0007);SQRT(p0007*EXP(p0419^2*p0008)-p0007))
- p2080: 0.025
- p2861: 7.84438e-5; = p2275*(p1129+p1131)
- p1679: 0
- p1931: 0
- p1208: 0; = p1205*p0818*p0822/p0801
- p2252: 1.88091e-7; = p2222*p2198
- p1737: 0
- p2790: 0; = p2399*(p1019+p1021)
- p0855: 0.510368; = p0854*p0001*p0003/(p0818*p0002)
- p0851: 0
- p2634: 3.9296e-7; = p2243*(p1019+p1021)
- p2074: 0.025
- p2294: 0.000268687; = p2223*p2201
- p3734: 2.86392e-5; = p1797*p3477
- p4302: 5.10329e-8; = p1953*p3479
- p2866: 8.13779e-5; = p2280*(p1020+p1022)
- p3405: 0; = p3367*p1238
- p3376: 0; = if(p1232=0;p3246*p3358/p0818;0)
- p1915: 0
- p0831: 0.0918571; = 1-p0824
- p2186: 0.00101325; = p1052/p0818
- p4616: 3.27547e-7; = p1855*p3481
- p1130: 0; = if(p1121=0;IF(p1123+p1128+p1129=1;0;IF(p1123+p1128+p1129+p1126>1;1-(p1123+p1128+p1129);p1126));0)
- p3130: 4.70106e-7; = p2349*p1082
- p0700: 0
- p0021: 19.019
- p0948: 0; = if(and(p0683=0;or(p0807=480;p0807=32;p0807=1;and(p0807=60;p0901<0.03)));p0936;0)
- p1229: 0; = IF(p1221=0;0;p1228*p1221)
- p3369: 0; = if(p1232=0;p3245*p3357/p0818;0)
- p2451: 0; = p2255*p1014
- p0580: 0; = IF(p0316<0.5;-SQRT(p0007*EXP(p0448^2*p0008)-p0007);SQRT(p0007*EXP(p0448^2*p0008)-p0007))
- p2195: 0.00203663; = p2194*p2193
- p3480: 0; = if(p1328+p1330+p1332+p1334+p1336+p1338+p1340+p1342+p1344=0;0;p1336/(p1328+p1330+p1332+p1334+p1336+p1338+p1340+p1342+p1344))
- p2497: 0; = p2301*p1073
- p2489: 0; = p2293*p1014
- p3128: 3.23858e-7; = p2347*p1082
- p1589: 0
- p2253: 4.13537e-7; = p2222*p2199
- p2302: 0.000286119; = p2227*p2209
- p1340: 0; = p1325*p0801
- p2267: 1.10938e-6; = p2226*p2213
- p2968: 0.00048734; = p2382*(p1079+p1081)
- p2410: 0; = p2234*p2200
- p0240: 7.249
- p1782: 0
- p0268: 1.891
- p1279: 0
- p2422: 0; = p2235*p2212
- p0283: 0.5
- p2390: 0.00105007; = p2233*p2219
- p2934: 2.24119e-6; = p2348*(p1079+p1081)
- p4742: 0; = p1775*p3482
- p1988: 750
- p1682: 0
- p0289: 0.5
- p1864: 3.83162e-6; = p1456*1000/p0818
- p0986: 0; = IF(p0982+p0985=1;0;IF(p0982+p0985+p0984>1;1-(p0982+p0985);p0984))
- p3341: 0; = if(and(p1232=0;p3254<>0);p3254*(p3271-p3336)/p3338;0)
- p1332: 1.14046e6; = p1321*p0801
- p3033: 2.42637e-10; = p2252*p1023
- p3334: 0; = IF(or(p3254=0;p1232>0);0;p3269*p3277*(p3300*p3292+(1-p3300)*p3296))
- p3030: 3.48053e-8; = p2249*p1023
- p0882: 22621; = p0869*p0856
- p0389: 0.5
- p0050: 67.792
- p0788: 67.668; = p0128*(1+p0656*p0260/100)
- p0906: 0.00321767
- p2575: 0; = p2379*p1073
- p3127: 8.58203e-8; = p2346*p1082
- p2496: 0; = p2300*p1073
- p0044: 97.026
- p2331: 0; = p2224*p2199
- p2855: 1.22912e-5; = p2269*(p1079+p1081)
- p2996: 0; = p2410*(p1020+p1022)
- p2907: 0; = p2321*(p1020+p1022)
- p0854: 552395; = p0801*((1-p0853)*p0846+p0853*p0852)
- p2899: 0.000314564; = p2313*(p1129+p1131)
- p3261: 0
- p0373: 0.5
- p1320: 2.56528; = IF(((p0745*1000*p0747/100)+(p0754*1000*p0756/100))/p0801<0;0;((p0745*1000*p0747/100)+(p0754*1000*p0756/100))/p0801)
- p2631: 2.03221e-7; = p2240*(p1019+p1021)
- p2990: 0; = p2404*(p1020+p1022)
- p2242: 1.93193e-6; = p2222*p2187
- p0509: 0; = SQRT(2)*(IF((2*p0377-1)<0;-1;IF((2*p0377-1)>0;1;0))*SQRT(SQRT((2/(pi()*0.140012289)+LN(1-(2*p0377-1)^2)/2)^2-LN(1-(2*p0377-1)^2)/0.140012289)-(2/(pi()*0.140012289)+LN(1-(2*p0377-1)^2)/2)))
- p2695: 0.000529057; = p2304*(p1078+p1080)
- p0377: 0.5
- p0439: 0; = SQRT(2)*(IF((2*p0307-1)<0;-1;IF((2*p0307-1)>0;1;0))*SQRT(SQRT((2/(pi()*0.140012289)+LN(1-(2*p0307-1)^2)/2)^2-LN(1-(2*p0307-1)^2)/0.140012289)-(2/(pi()*0.140012289)+LN(1-(2*p0307-1)^2)/2)))
- p0120: 8.804
- p2104: 0.817136
- p0190: 19.533
- p0910: 0.0037683; = p0909/p0818
- p4527: 1.72826e-8; = p1766*p3481
- p1889: 0
- p3215: 0; = p1222*3*15.9994/100.0869
- p1209: 0; = p1206*p0818*p0822/p0801
- p1627: 0
- p1986: 4200
- p3347: 0; = if(and(p1232=0;p3256<>0);p3275*p3289;0)
- p4102: 4.32631e-5; = p1963*p3478
- p3922: 7.11176e-8; = p1779*p3478
- p1807: 0
- p2688: 0.000243311; = p2297*(p1078+p1080)
- p5154: 2.05743e-9; = p1775*p3484
- p4311: 0; = p1756*p3480
- p3098: 0; = p2317*p1023
- p1990: 30
- p0455: 0; = SQRT(2)*(IF((2*p0323-1)<0;-1;IF((2*p0323-1)>0;1;0))*SQRT(SQRT((2/(pi()*0.140012289)+LN(1-(2*p0323-1)^2)/2)^2-LN(1-(2*p0323-1)^2)/0.140012289)-(2/(pi()*0.140012289)+LN(1-(2*p0323-1)^2)/2)))
- p0114: 68.049
- p2034: 7.89216e-5; = p2015*p2030*p2032/(p0818*1000)
- p2363: 0.000209378; = p2225*p2191
- p5037: 0; = p1864*p3483
- p1967: 0; = if(p0807=480;p0802*p0810;0)
- p1718: 0
- p1116: 1.75986e-5; = IF(p1071=0;p1106/(p1111*p0818);0)
- p1315: 0; = p1311*p1252/p0818
- p3145: 2.1858e-6; = p2364*p1023
- p0001: 0.404686
- p2665: 2.46198e-5; = p2274*(p1128+p1130)
- p3313: 0; = if(and(p1232=0;p3253<>0);p3262*(p3278*(p3282*p1256+p3286*(p1253+p1257)+p1258*p3288+p3298*p3287));0)
- p1963b: 6.12976e-6; = p1569*p1773+p1570*p1774+p1571*p1775+p1572*p1776+p1573*p1777+p1574*p1778+p1575*p1779+p1576*p1780+p1577*p1781+p1578*p1782+p1579*p1783+p1580*p1784+p1581*p1785+p1582*p1786+p1583*p1787+p1584*p1788+p1585*p1789+p1586*p1790+p1587*p1791
- p4713: 6.91304e-8; = p1952*p3481
- p4105: 3.79101e-7; = p1756*p3479
- p0735: 0
- p2961: 0.000224126; = p2375*(p1079+p1081)
- p2682: 1.84476e-8; = p2291*(p1019+p1021)
- p1673: 0
- p0228: 10.757
- p2771: 4.2865e-5; = p2380*(p1078+p1080)
- p1019: 0.0159; = IF(p1012=0;IF(p1014=1;0;IF(p1014+p1015>1;1-p1014;p1015));0)
- p2014: 5.64804e8; = p0833*p2011*p2013
- p3204: 0; = p2423*p1082
- p2679: 2.64623e-6; = p2288*(p1019+p1021)
- p1328: 0; = p1319*p0801
- p0871: 0; = p0870*p0001*p0003/(p0818*p0002)
- p2474: 0; = p2278*p1014
- p1634: 0
- p1159: 0.5
- p2212: 1.53608e-6; = p1106/p0818
- p2146: 1.09764e-6; = p2015*p2074*p2108/(p0818*1000)
- p2915: 0; = p2329*(p1020+p1022)
- p0386: 0.5
- p0353: 0.5
- p3428: 0; = p3371*p1239
- p1125: 0.63609; = if(p1121=0;p0719/100;0)
- p0056: 59.95
- p2197: 8.65017e-6; = p1055/p0818
- p0181: 30.326
- p2738: 6.88183e-6; = p2347*(p1078+p1080)
- p3210: 0; = p2429*p1132
- p0442: 0; = SQRT(2)*(IF((2*p0310-1)<0;-1;IF((2*p0310-1)>0;1;0))*SQRT(SQRT((2/(pi()*0.140012289)+LN(1-(2*p0310-1)^2)/2)^2-LN(1-(2*p0310-1)^2)/0.140012289)-(2/(pi()*0.140012289)+LN(1-(2*p0310-1)^2)/2)))
- p0901: 0.0156639
- p1833: 0
- p4122: 2.26003e-7; = p1773*p3479
- p2150: 5.3215e-6; = p2015*p2078*p2112/(p0818*1000)
- p2872: 0.000150364; = p2286*(p1020+p1022)
- p4939: 0; = p1766*p3483
- p3023: 2.49218e-9; = p2242*p1023
- p2198: 1.41979e-5; = 22.98976928*p2197/14.0067
- p1506: 33
- p1888: 0
- p3469: 0; = p3374*p1241
- p3443: 0; = p3367*p1240
- p3259: 0
- p0046: 1.59
- p1808: 0
- p2721: 0; = p2330*(p1019+p1021)
- p1162: 4.75995e-5; = p1161/p0818
- p1980: 3521.6
- p2891: 5.91032e-7; = p2305*(p1079+p1081)
- p0942: 0; = if(and(p0683=0;p0948=0);p0936;0)
- p1649: 0
- p2745: 0.000141596; = p2354*(p1019+p1021)
- p1043: 0.263405
- p1877: 0
- p0043: 1405.86
- p2504: 0; = p2308*p1073
- p1008: 0; = p1004*p0001*p0004/(p0818*p0002)
- p0184: 18.749
- p2797: 0; = p2406*(p1019+p1021)
- p3213: 0; = p1222*12.0107/100.0869
- p3333: 0; = if(and(p1232=0;p3255<>0);p3255-(p3328+p3329+p3330+p3331+p3332);0)
- p1992: 3900
- p2336: 9.88695e-5; = p2228*p2204
- p4719: 3.63433e-8; = p1962*p3481
- p1662: 0
- p0840: 0.0560749; = p0839*p0831
- p3257: 0
- p2803: 0; = p2412*(p1019+p1021)
- p5097: 0; = p1924*p3483
- p0248: 21.214
- p2844: 5.77483e-5; = p2258*(p1079+p1081)
- p0506: 0; = SQRT(2)*(IF((2*p0374-1)<0;-1;IF((2*p0374-1)>0;1;0))*SQRT(SQRT((2/(pi()*0.140012289)+LN(1-(2*p0374-1)^2)/2)^2-LN(1-(2*p0374-1)^2)/0.140012289)-(2/(pi()*0.140012289)+LN(1-(2*p0374-1)^2)/2)))
- p1192: 1.95639e-8; = p1188*p1191/p0818
- p1006: 6.97912e-6; = p1002*p0001*p0004/(p0818*p0002)
- p1789: 0
- p0751: 0.82; = p0091*(1+p0619*p0223/100)
- p0792: 0
- p1082: 0.01539; = IF(p1071=0;IF(p1073+p1078+p1079+p1080+p1081=1;0;1-(p1073+p1078+p1079+p1080+p1081));0)
- p4213: 1.34873e-7; = p1864*p3479
- p4685: 9.87578e-8; = p1924*p3481
- p1555: 0
- p0818: 9.6565e9; = p0806*p0807
- p0616: 0; = IF(p0352<0.5;-SQRT(p0007*EXP(p0484^2*p0008)-p0007);SQRT(p0007*EXP(p0484^2*p0008)-p0007))
- p1215: 0; = IF(p1214=0;0;(p1214-1.5)/(p1214-1)^2)
- p0297: 0.5
- p2392: 0.000193266; = p2233*p2221
- p4307: 1.60974e-7; = p1962*p3479
- p2567: 0; = p2371*p1014
- p2870: 7.38858e-5; = p2284*(p1020+p1022)
- p1778: 0
- p2122: 0.341195
- p2959: 0.000420911; = p2373*(p1020+p1022)
- p4073: 6.37688e-6; = p1930*p3478
- p1636: 0
- p0438: 0; = SQRT(2)*(IF((2*p0306-1)<0;-1;IF((2*p0306-1)>0;1;0))*SQRT(SQRT((2/(pi()*0.140012289)+LN(1-(2*p0306-1)^2)/2)^2-LN(1-(2*p0306-1)^2)/0.140012289)-(2/(pi()*0.140012289)+LN(1-(2*p0306-1)^2)/2)))
- p1120: 0.00454625; = IF(p1071=0;p1110/(p1115*p0818);0)
- p3378: 0; = if(p1232=0;p3246*p3360/p0818;0)
- p2169: 0.000445845; = p2166*(p0908)
- p1153: 0.365265
- p1273: 0; = p1267*p1252/p0818
- p2598: 0; = p2402*p1014
- p2532: 0; = p2336*p1073
- p3182: 0; = p2401*p1023
- p0966: 0.85505; = if(p0683=0;0;IF(p0684/100+p0965=1;0;1-(p0684/100+p0965)))
- p1713: 0
- p0244: 3.617
- p0140: 59.95
- p1021: 0; = IF(p1012=0;IF(p1014+p1019+p1020=1;0;IF(p1014+p1019+p1020+p1017>1;1-(p1014+p1019+p1020);p1017));0)
- p1905: 0
- p0981: 0; = p0978*p0001/(p0818*p0002)
- p2023: 2.09
- p1318: 0; = p1317*p0001/(p0818*p0002)
- p3154: 5.52473e-7; = p2373*p1023
- p2715: 0; = p2324*(p1019+p1021)
- p2716: 0; = p2325*(p1019+p1021)
- p1606: 0
- p1165: 0.000129903; = p0801*p0001/(p0818*p0002)
- p2826: 1.25615e-5; = p2240*(p1020+p1022)
- p1764: 0
- p0380: 0.5
- p3123: 2.52652e-7; = p2342*p1082
- p3082: 9.73741e-6; = p2301*p1082
- p0020: 1030.38
- p0587: 0; = IF(p0323<0.5;-SQRT(p0007*EXP(p0455^2*p0008)-p0007);SQRT(p0007*EXP(p0455^2*p0008)-p0007))
- p0893: 25.8613; = 1000*(p0890+p0892)*p0001*p0003*p0004/(p0818*p0002)
- p0243: 49.49
- p3151: 3.64439e-8; = p2370*p1023
- p2913: 0; = p2327*(p1020+p1022)
- p3202: 0; = p2421*p1082
- p1765: 0
- p2449: 0; = p2253*p1014
- p1093: 0; = IF(p1071=0;p1087*p0001/(p0818*p0002);0)
- p2795: 0; = p2404*(p1019+p1021)
- p0937: 1.40535e-5; = p0931*p0001/(p0818*p0002)
- p0667: 0; = IF(p0403<0.5;-SQRT(p0007*EXP(p0535^2*p0008)-p0007);SQRT(p0007*EXP(p0535^2*p0008)-p0007))
- p2125: 6.62445e-5; = p2015*p2053*p2087/(p0818*1000)
- p2493: 0; = p2297*p1073
- p1072: 0; = p1071*p0001/(p0818*p0002)
- p0252: 31.5
- p1791: 0
- p5291: 7.27097e-7; = p1912*p3484
- p3125: 1.83819e-9; = p2344*p1082
- p1962: 4.57314e-6; = p1960*1000/p0818
- p0702: 1405.86; = p0042*(1+p0570*p0174/100)
- p2843: 7.0634e-5; = p2257*(p1020+p1022)
- p2953: 0.017907; = p2367*(p1020+p1022)
- p2664: 0.000232451; = p2273*(p1128+p1130)
- p3172: 1.88958e-6; = p2391*p1132
- p2595: 0; = p2399*p1014
- p1774: 0
- p3075: 3.46606e-7; = p2294*p1023
- p0755: 0
- p2565: 0; = p2369*p1014
- p3012: 0; = p2426*(p1079+p1081)
- p3180: 0; = p2399*p1023
- p0793: 0
- p1190: 3.91278e-8; = p1188/p0818
- p3044: 5.19758e-7; = p2263*p1082
- p0028: 8.741
- p1868: 0
- p1822: 0
- p2545: 0; = p2349*p1073
- p0018: 104.626
- p3196: 0; = p2415*p1082
- p0250: 25.946
- p3049: 7.62286e-8; = p2268*p1082

## Reference product
- rice; at harvest in 2006; at farm; 63%-90% moisture: 1 kg

## Inputs from technosphere
- CUTOFF domestic barge transport; average fuel: 0.0343063 metric ton*km; = p2007
- CUTOFF pesticide, Molinate; at point-of-sale; kg AI: 3.31383e-6 kg; = p1892
- CUTOFF apply mixed N fertilizer; without incorporation: 1.08181e-5 ha; = p1034
- CUTOFF prepare soil; for conventional till, rice; <15% residue: 9.51988e-5 ha; = p0934
- CUTOFF planting; for no-till, rice: 9.22605e-6 ha; = p0954
- CUTOFF pesticide, Clomazone; at point-of-sale; kg AI: 3.95588e-5 kg; = p1797
- CUTOFF pesticide, Triclopyr; at point-of-sale; kg AI: 8.6988e-6 kg; = p1952
- CUTOFF nitrogenous fertilizer, sodium nitrate; at point-of-sale: 5.40636e-5 kg; = p1069
- CUTOFF nitrogenous fertilizer, aqueous ammonia; at point-of-sale: 0.00124487 kg; = p1065
- CUTOFF N inhibitor appl svc; unspec rate & type, 2006 rice: 4.75995e-5 ha; = p1162
- CUTOFF prepare soil; for mulch till, rice: 9.66658e-6 ha; = p0935
- CUTOFF pesticide, Fenoxaprop P; at point-of-sale; kg AI: 3.10672e-7 kg; = p1835
- CUTOFF local area trucking; class 6, average fuel: 0.00257297 metric ton*km; = p2010
- CUTOFF apply single or mixed N fertilizer; unspec. method: 1.62574e-7 ha; = p1035
- CUTOFF manure appl svc; unspec rate, 2006 rice: 0.000129903 ha; = p1233
- CUTOFF seed storage; rice: 0.00336439 kg*a; = p0975
- CUTOFF gypsum storage: 3.53675e-7 kg*a; = p1168
- rice residue; at harvest in 2006; at farm; 90%-93% moisture: 0.610457 kg; = p0839
- CUTOFF apply zinc compounds; unspecified method: 0.000129903 ha; = p1183
- CUTOFF potassic fertilizer, other single nutrients; at point-of-sale: 0.00198252 kg; = p1155
- CUTOFF apply P fertilizer; broadcast with incorporation: 2.87965e-5 ha; = p1090
- CUTOFF pesticide, Trifloxystrobin; at point-of-sale; kg AI: 1.4498e-6 kg; = p1953
- CUTOFF rice seeds; unspec. type; at point-of-sale: 0.00575345 kg; = p0972
- CUTOFF pesticide, Azoxystrobin; at point-of-sale; kg AI: 6.42055e-6 kg; = p1773
- CUTOFF harvest; rice: 0.000129348 ha; = p1971
- CUTOFF pesticide, Propiconazole; at point-of-sale; kg AI: 3.41739e-6 kg; = p1914
- CUTOFF harvest; rice residue management: 0.000129903 ha; = p1975
- CUTOFF apply pesticide; broadcast without incorporation: 1.62024e-5 ha; = p1335
- CUTOFF fertilizer filler materials; at point-of-sale: 0.0233692 kg; = p1158
- CUTOFF apply sewage sludge; unspecified method: 0.000129903 ha; = p1189
- CUTOFF sulfur storage: 5.01333e-8 kg*a; = p1174
- CUTOFF gypsum; at point-of-sale: 7.07351e-7 kg; = p1166
- CUTOFF pesticide formulation balance; at point-of-sale: 0.000188991 kg; = p1963
- CUTOFF apply pesticide; unspecified application methods: 1.82899e-6 ha; = p1345
- CUTOFF pesticide, Propanil; at point-of-sale; kg AI: 0.000182986 kg; = p1912
- CUTOFF sulfuric acid; at point-of-sale: 5.37786e-8 kg; = p1178
- CUTOFF pesticide, Halosulfuron-methyl; at point-of-sale; kg AI: 9.32015e-7 kg; = p1859
- CUTOFF planting; for conventional till, rice; <15% residue: 9.51988e-5 ha; = p0952
- CUTOFF sulfur; at point-of-sale: 1.00267e-7 kg; = p1172
- CUTOFF nitrogenous fertilizer, ammonium nitrate; at point-of-sale: 0.00302464 kg; = p1066
- CUTOFF bulk cargo rail transport; diesel: 0.0643243 metric ton*km; = p2008
- CUTOFF pesticide, Quinclorac; at point-of-sale; kg AI: 1.24269e-5 kg; = p1924
- CUTOFF pesticide storage: 0.000366652 kg*a; = p1965
- CUTOFF irrigate; gravity, groundwater source, in 2006: 6.97496e-5 ha-m; = p0992
- CUTOFF apply gypsum; unspecified method: 0.000129903 ha; = p1165
- CUTOFF regional or national trucking; class 8, average fuel: 0.00560482 metric ton*km; = p2009
- CUTOFF apply pesticide; broadcast with incorporation: 0.000105369 ha; = p1333
- CUTOFF planting; for mulch till, rice: 9.66658e-6 ha; = p0953
- CUTOFF zinc compounds storage: 1.50869e-8 kg*a; = p1186
- CUTOFF apply sulfur; unspecified method: 0.000129903 ha; = p1171
- CUTOFF pesticide, Glyphosate; at point-of-sale; kg AI: 4.12158e-5 kg; = p1855
- CUTOFF rice seeds; nonGMO herbicide resistant seed; at point-of-sale: 0.000975338 kg; = p0971
- CUTOFF apply single or mixed P fertilizer; unspec. method: 1.35516e-6 ha; = p1094
- CUTOFF apply single or mixed K fertilizer; unspec. method: 1.32299e-6 ha; = p1144
- CUTOFF sewage sludge; at point-of-sale: 3.91278e-8 kg; = p1190
- CUTOFF nitrogenous fertilizer, nitrogen solutions; at point-of-sale: 0.0316696 kg; = p1068
- CUTOFF international vessel transport; average fuel: 0.313892 metric ton*km; = p2006
- CUTOFF phosphatic fertilizer, superphosphate grades over 22%; at point-of-sale: 0.000342348 kg; = p1117
- CUTOFF pesticide, Sodium chlorate; at point-of-sale; kg AI: 2.78569e-5 kg; = p1930
- CUTOFF pesticide, Imazethapyr; at point-of-sale; kg AI: 3.83162e-6 kg; = p1864
- CUTOFF apply K fertilizer; broadcast with incorporation: 2.70142e-5 ha; = p1140
- CUTOFF pesticide, Acifluorfen; at point-of-sale; kg AI: 2.1747e-6 kg; = p1766
- CUTOFF fertilizer storage: 0.0584725 kg*a; = p1160
- CUTOFF phosphatic fertilizer, monoammonium phosphate; at point-of-sale: 0.00454625 kg; = p1120
- CUTOFF nitrogenous fertilizer, ammonium sulfate; at point-of-sale: 0.00382726 kg; = p1067
- CUTOFF apply N fertilizer; broadcast without incorporation: 0.000113042 ha; = p1032
- CUTOFF prepare soil; for unspec. till, rice: 1.75784e-6 ha; = p0939
- CUTOFF pesticide, 2,4-D, dimethylamine salt; at point-of-sale; kg AI: 1.07699e-5 kg; = p1756
- CUTOFF nitrogenous fertilizer, anhydrous ammonia; at point-of-sale: 0.0119998 kg; = p1064
- CUTOFF pesticide, Bensulfuron-methyl; at point-of-sale; kg AI: 5.17786e-7 kg; = p1775
- CUTOFF apply pesticide; as foliar or directed spray: 3.65803e-6 ha; = p1339
- CUTOFF prepare soil; for no-till, rice: 9.22605e-6 ha; = p0936
- CUTOFF sulfuric acid storage: 2.68893e-8 kg*a; = p1180
- CUTOFF pesticide, Lambda-cyhalothrin; at point-of-sale; kg AI: 1.03557e-7 kg; = p1870
- CUTOFF apply sulfuric acid; unspecified method: 0.000129903 ha; = p1177
- CUTOFF apply pesticide; broadcast by air: 0.000333237 ha; = p1331
- CUTOFF zinc compounds; at point-of-sale: 3.01739e-8 kg; = p1184
- CUTOFF potassic fertilizer, potassium chloride; at point-of-sale: 0.0116888 kg; = p1154
- CUTOFF phosphatic fertilizer, other single phosphates; at point-of-sale: 0.000436676 kg; = p1118
- CUTOFF pesticide, Carfentrazone-ethyl; at point-of-sale; kg AI: 4.14229e-7 kg; = p1788
- CUTOFF irrigate; unspec. irrigation method, unspec. water source, in 2006: 2.58613e-6 ha-m; = p1011
- CUTOFF sewage sludge storage: 1.95639e-8 kg*a; = p1192
- CUTOFF pesticide, Cyhalofop-butyl; at point-of-sale; kg AI: 3.6245e-6 kg; = p1805
- CUTOFF nitrogenous fertilizer, urea; at point-of-sale: 0.0168554 kg; = p1070
- CUTOFF pesticide, Zeta-Cypermethrin; at point-of-sale; kg AI: 1.03557e-7 kg; = p1957
- CUTOFF phosphatic fertilizer, superphos. grades 22% and under; at point-of-sale: 1.75986e-5 kg; = p1116
- CUTOFF planting; for reduced till, rice; 15-30% residue: 1.40535e-5 ha; = p0955
- CUTOFF irrigate; gravity, surface water source, in 2006: 6.97912e-6 ha-m; = p1006
- CUTOFF prepare soil; for reduced till, rice; 15-30% residue: 1.40535e-5 ha; = p0937
- CUTOFF pesticide, Bispyribac-sodium; at point-of-sale; kg AI: 3.10672e-7 kg; = p1779
- CUTOFF apply K fertilizer; broadcast without incorporation: 4.95315e-5 ha; = p1141
- CUTOFF apply N fertilizer; broadcast with incorporation: 2.00382e-6 ha; = p1031
- CUTOFF planting; for unspec. till, rice: 1.75784e-6 ha; = p0957
- CUTOFF irrigate; unspecified irrigation method, groundwater source, in 2006: 5.28646e-7 ha-m; = p0995
- CUTOFF pesticide, unspecified type; at point-of-sale; kg AI: 4.57314e-6 kg; = p1962
- CUTOFF pesticide, Imazamox; at point-of-sale; kg AI: 3.10672e-7 kg; = p1861
- CUTOFF phosphatic fertilizer, diammonium phosphate; at point-of-sale: 0.00588592 kg; = p1119
- CUTOFF apply P fertilizer; broadcast without incorporation: 5.79029e-5 ha; = p1091

## Inputs from nature
- Nitrogen: 0.0217746 kg; = p0905
- Transformation, from annual crop [natural resource, land]: 1.29903 m2; = 1.0 * (p0883+p0879+p0873)
- Water, unspecified origin: 0.0261425 m3; = p0893*0.001+p0916*0.001
- Carbon dioxide: 2.8661 kg; = p0900*3.6666666667
- Transformation, to annual crop [natural resource, land]: 1.29903 m2; = 1.0 * (p0857)
- Phosphorus: 0.0037683 kg; = p0910
- Water, ground: 702.783 kg; = p0887
- Potassium; from plant uptake; biogenic: 0.0195956 kg; = p0915
- Water, surface: 69.7912 kg; = p0889
- Dry matter except CNPK; from plant uptake: 1.31205 kg; = p0917
- Occupation, annual crop [natural resource, land]: 0.510368 m2*year; = 1.0 * (p0855)

## Emissions to nature
- Nitrogen; applied in sewage sludge: 1.83008e-9 kg; = p3240
- Aqueous ammonia; unspec. appl. method in fert. in spr. bef. plant.: 3.5854e-8 kg; = p3059*1.2142857143
- Nitrogen solution; unspec. appl. method in fert. in fall bef. plant.; unspec. appl. method in fert. in fall bef. plan...: 1.62367e-7 kg; = p3029
- Diammonium phosphate; broadcast w/o incorp. in fert. at plant.: 0.000277204 kg; = p2923*4.7142857143
- Acetaldehyde [air, non-urban air or from high stacks]: 6.60635e-5 kg; = 1.0 * (p2130*1.8333333333)
- Nitrogen solution; unspec. appl. method in fert. after plant.; unspec. appl. method in fert. after plant.; kg N: 1.10922e-5 kg; = p3146
- Aqueous ammonia; broadcast w/o incorp. in fert. after plant.: 0.000302527 kg; = p2942*1.2142857143
- Cyhalofop-butyl; broadcast without incorporation: 1.27582e-7 kg; = p4154
- Other single K nutrients; broadcast w/ incorp. in fert. in spr. bef. plant.; kg K: 0.000171561 kg; = p2704
- Sulfur [soil, agricultural]: 1.00267e-7 kg; = 1.0 * (p3230)
- Molinate: 2.39909e-6 kg; = p3829
- Benzene [air, non-urban air or from high stacks]: 8.15057e-6 kg; = 1.0 * (p2140*1.0833333333)
- Methanol [air, non-urban air or from high stacks]: 0.000174572 kg; = 1.0 * (p2129*2.6666666667)
- Urea; broadcast w/o incorp. in fert. in fall bef. plant.: 0.000214048 kg; = p2841*5
- Propane [air, non-urban air or from high stacks]: 1.49598e-5 kg; = 1.0 * (p2142*1.2222222222)
- Potassium chloride; broadcast w/o incorp. in fert. in spr. bef. plant.: 0.00467176 kg; = p2897*2.2166666667
- Potassium chloride; broadcast w/o incorp. in fert. after plant.: 0.00105066 kg; = p2975*2.2166666667
- Other single phosphates; unspec. appl. method in fert. at plant.; kg P: 5.24528e-8 kg; = p3129
- Superphosphate, grades>22%; broadcast w/o incorp. in fert. after plant.; kg P: 1.2641e-5 kg; = p2971
- Anhydrous ammonia; broadcast w/o incorp. in fert. in fall bef. plant.: 0.000155569 kg; = p2823*1.2142857143
- Propene [air, non-urban air or from high stacks]: 3.59083e-5 kg; = 1.0 * (p2136*1.1666666667)
- Sodium nitrate; broadcast w/ incorp. in fert. in spr. bef. plant.: 6.82388e-8 kg; = p2681*6.0714285714
- Fenoxaprop P; foliar or directed spray: 2.46894e-9 kg; = p4596
- Aqueous ammonia; unspec. appl. method in fert. after plant.: 3.97085e-7 kg; = p3137*1.2142857143
- 2,4-D, dimethylamine salt: 2.9729e-6 kg; = p4105+p5135+p3899+p4517
- Ammonium sulfate; unspec. appl. method in fert. in spr. bef. plant.: 3.99422e-7 kg; = p3064*4.7142857143
- Imazethapyr [soil, agricultural]: 1.05767e-6 kg; = 1.0 * (p4007+p4625+p5243+p4213)
- Glyphosate [soil, agricultural]: 1.13771e-5 kg; = 1.0 * (p5234+p4616+p3998+p4204)
- Nitrogen solution; broadcast w/ incorp. in fert. in fall bef. plant.; broadcast w/ incorp. in fert. in fall bef. plan...: 2.00127e-6 kg; = p2639
- Potassium chloride; broadcast w/ incorp. in fert. at plant.: 0.000244397 kg; = p2741*2.2166666667
- Potassium chloride; unspec. appl. method in fert. after plant.: 2.80631e-5 kg; = p3170*2.2166666667
- Butadiene [air, non-urban air or from high stacks]: 8.01436e-6 kg; = 1.0 * (p2143*1.125)
- Diammonium phosphate; broadcast w/o incorp. in fert. after plant.: 0.000955607 kg; = p2962*4.7142857143
- I butane; from residue burning: 1.1205e-6 kg; = p2146*1.0208333333
- Superphosphate, grades<= 22%; broadcast w/o incorp. in fert. in fall bef. plant.; kg P: 6.97634e-8 kg; = p2852
- Water: 798.504 kg; = p2178+p2181+p2171
- Urea; unspec. appl. method in fert. in fall bef. plant.: 2.80951e-7 kg; = p3036*5
- Superphosphate, grades<= 22%; unspec. appl. method in fert. at plant.; kg P: 1.83819e-9 kg; = p3125
- Azoxystrobin [soil, agricultural]: 1.7723e-6 kg; = 1.0 * (p4122+p4534+p5152+p3916)
- Superphosphate, grades>22%; broadcast w/o incorp. in fert. in fall bef. plant.; kg P: 3.25708e-6 kg; = p2854
- Acifluorfen [air, non-urban air or from high stacks]: 1.5744e-6 kg; = 1.0 * (p3703)
- Potassium chloride; broadcast w/o incorp. in fert. at plant.: 0.00044811 kg; = p2936*2.2166666667
- Propanil: 0.000132475 kg; = p3849
- Other single phosphates; unspec. appl. method in fert. after plant.; kg P: 1.80821e-7 kg; = p3168
- Other single K nutrients; unspec. appl. method in fert. at plant.; kg K: 8.05911e-7 kg; = p3133
- Pesticide formulation balance; foliar or directed spray: 1.50194e-6 kg; = p4720
- Sodium nitrate; broadcast w/o incorp. in fert. in fall bef. plant.: 6.838e-7 kg; = p2837*6.0714285714
- Toluene [air, non-urban air or from high stacks]: 1.01172e-5 kg; = 1.0 * (p2141*1.0952380952)
- Ethyne [air, non-urban air or from high stacks]: 1.44587e-5 kg; = 1.0 * (p2132*1.0833333333)
- Methyl vinyl ether; from residue burning: 4.02872e-6 kg; = p2137*1.6111111111
- Monoammonium phosphate; broadcast w/o incorp. in fert. in spr. bef. plant.: 0.00154549 kg; = p2888*8.2142857143
- Pesticide formulation balance; broadcast by air: 0.000136823 kg; = p3896
- Clomazone: 2.86392e-5 kg; = p3734
- Sodium chlorate [air, non-urban air or from high stacks]: 2.01674e-5 kg; = 1.0 * (p3867)
- Propiconazole [soil, agricultural]: 9.43323e-7 kg; = 1.0 * (p4057+p4263+p5293+p4675)
- Diammonium phosphate; unspec. appl. method in fert. in spr. bef. plant.: 4.88203e-5 kg; = p3079*4.7142857143
- Anhydrous ammonia; broadcast w/o incorp. in fert. in spr. bef. plant.: 0.000959618 kg; = p2862*1.2142857143
- Ammonia [air, non-urban air or from high stacks]: 0.000115268 kg; = 1.0 * (p2159*1.2142857143)
- Ammonium sulfate; broadcast w/o incorp. in fert. in spr. bef. plant.: 0.000304307 kg; = p2869*4.7142857143
- Formic acid [air, non-urban air or from high stacks]: 5.32241e-5 kg; = 1.0 * (p2131*3.8333333333)
- Other single K nutrients; broadcast w/o incorp. in fert. after plant.; kg K: 7.0744e-5 kg; = p2977
- Other single K nutrients; unspec. appl. method in fert. after plant.; kg K: 1.88958e-6 kg; = p3172
- isopentane: 8.98979e-7 kg; = p2151*1.0166666667
- Superphosphate, grades>22%; broadcast w/ incorp. in fert. after plant.; kg P: 6.28665e-6 kg; = p2776
- Sewage sludge dry matter; applied in sewage sludge: 2.02608e-10 kg; = p3243
- Carbon dioxide, in air: 0.0561472 kg; = p2163*3.6666666667
- Fenoxaprop P; broadcast without incorporation: 1.09356e-8 kg; = p4184
- Other single phosphates; broadcast w/ incorp. in fert. in spr. bef. plant.; kg P: 8.38744e-6 kg; = p2700
- Nitrogen solution; broadcast w/o incorp. in fert. in spr. bef. plant.; broadcast w/o incorp. in fert. in spr. bef. pl...: 0.000763049 kg; = p2873
- Triclopyr [soil, agricultural]: 2.40119e-6 kg; = 1.0 * (p5331+p4095+p4713+p4301)
- Anhydrous ammonia; unspec. appl. method in fert. after plant.: 1.39497e-5 kg; = p3135*1.2142857143
- Superphosphate, grades<= 22%; broadcast w/o incorp. in fert. at plant.; kg P: 7.85415e-8 kg; = p2930
- Sodium nitrate; broadcast w/o incorp. in fert. in spr. bef. plant.: 4.21798e-6 kg; = p2876*6.0714285714
- Isoprene [air, non-urban air or from high stacks]: 2.00428e-5 kg; = 1.0 * (p2145*1.1333333333)
- Ammonium nitrate; broadcast w/ incorp. in fert. in fall bef. plant.: 1.00618e-6 kg; = p2632*4.7142857143
- Quinclorac [soil, agricultural]: 3.43027e-6 kg; = 1.0 * (p5303+p4685+p4273+p4067)
- Potassium chloride; broadcast w/ incorp. in fert. in spr. bef. plant.: 0.00254795 kg; = p2702*2.2166666667
- Bispyribac-sodium; broadcast by air: 2.24915e-7 kg; = p3716
- Trifloxystrobin [air, non-urban air or from high stacks]: 1.0496e-6 kg; = 1.0 * (p3890)
- Fenoxaprop P; broadcast with incorporation: 7.11176e-8 kg; = p3978
- Diammonium phosphate; unspec. appl. method in fert. at plant.: 6.48767e-6 kg; = p3118*4.7142857143
- Phosphorous; in below-ground residue: 0.000157286 kg; = p2175
- Fenoxaprop P; unspec. appl. method: 1.23446e-9 kg; = p5214
- Cyhalofop-butyl; broadcast with incorporation: 8.29706e-7 kg; = p3948
- Imazamox [air, non-urban air or from high stacks]: 2.24915e-7 kg; = 1.0 * (p3798)
- Carbon [soil, agricultural]: 0.259323 kg; = 1.0 * (p3242+p2167+p2173)
- Pesticide formulation balance; broadcast without incorporation: 6.65249e-6 kg; = p4308
- Ammonium sulfate; broadcast w/o incorp. in fert. in fall bef. plant.: 4.93329e-5 kg; = p2830*4.7142857143
- Ash: 0.0105065 kg; = p2021+p2022
- Acifluorfen [soil, agricultural]: 6.00297e-7 kg; = 1.0 * (p4527+p3909+p5145+p4115)
- Nitrogen solution; unspec. appl. method in fert. in spr. bef. plant.; unspec. appl. method in fert. in spr. bef. plan...: 1.00155e-6 kg; = p3068
- Dioxins and furans (PCDD/F); from residue burning: 1.5935e-12 kg TEQ; = p2047
- Other single K nutrients; broadcast w/ incorp. in fert. in fall bef. plant.; kg K: 2.46198e-5 kg; = p2665
- Superphosphate, grades>22%; broadcast w/ incorp. in fert. at plant.; kg P: 1.82364e-6 kg; = p2737
- Other single phosphates; broadcast w/o incorp. in fert. in fall bef. plant.; kg P: 1.9907e-6 kg; = p2856
- Anhydrous ammonia; broadcast w/ incorp. in fert. in spr. bef. plant.: 1.55248e-5 kg; = p2667*1.2142857143
- Superphosphate, grades<= 22%; unspec. appl. method in fert. in fall bef. plant.; kg P: 1.63274e-9 kg; = p3047
- Sodium nitrate; unspec. appl. method in fert. after plant.: 6.13155e-8 kg; = p3149*6.0714285714
- Ethane [air, non-urban air or from high stacks]: 4.82683e-5 kg; = 1.0 * (p2126*1.25)
- Acetol; from residue burning: 0.000199998 kg; = p2134*2.0555555556
- Monoammonium phosphate; broadcast w/o incorp. in fert. after plant.: 0.000708 kg; = p2966*8.2142857143
- Bispyribac-sodium; broadcast without incorporation: 1.09356e-8 kg; = p4128
- Monoammonium phosphate; broadcast w/o incorp. in fert. in fall bef. plant.: 0.000182424 kg; = p2849*8.2142857143
- trans-2-Butene: 3.02461e-6 kg; = p2148*1.1666666667
- Glyphosate [air, non-urban air or from high stacks]: 2.98387e-5 kg; = 1.0 * (p3792)
- Monoammonium phosphate; unspec. appl. method in fert. at plant.: 4.80666e-6 kg; = p3122*8.2142857143
- Bensulfuron methyl ester: 3.74858e-7 kg; = p3712
- Monoammonium phosphate; broadcast w/ incorp. in fert. at plant.: 0.000102139 kg; = p2732*8.2142857143
- Ammonium sulfate; broadcast w/ incorp. in fert. in spr. bef. plant.: 4.9231e-6 kg; = p2674*4.7142857143
- Lambda-cyhalothrin: 7.49716e-8 kg; = p3807
- Bispyribac-sodium; broadcast with incorporation: 7.11176e-8 kg; = p3922
- Sulfur dioxide [air, non-urban air or from high stacks]: 7.33012e-5 kg; = 1.0 * (p2041)
- Monoammonium phosphate; unspec. appl. method in fert. in spr. bef. plant.: 3.61705e-5 kg; = p3083*8.2142857143
- Sodium nitrate; broadcast w/o incorp. in fert. after plant.: 4.67143e-5 kg; = p2954*6.0714285714
- Diammonium phosphate; broadcast w/ incorp. in fert. at plant.: 0.00013786 kg; = p2728*4.7142857143
- Nitrogen solution; broadcast w/ incorp. in fert. after plant.; broadcast w/ incorp. in fert. after plant.; kg N: 0.000136718 kg; = p2756
- Trifloxystrobin [soil, agricultural]: 4.00198e-7 kg; = 1.0 * (p4096+p4302+p4714+p5332)
- Halosulfuron-methyl [soil, agricultural]: 2.5727e-7 kg; = 1.0 * (p4620+p5238+p4208+p4002)
- Monoammonium phosphate; broadcast w/ incorp. in fert. in fall bef. plant.: 9.07236e-5 kg; = p2654*8.2142857143
- Aqueous ammonia; broadcast w/ incorp. in fert. in spr. bef. plant.: 4.41921e-7 kg; = p2669*1.2142857143
- Ethene [air, non-urban air or from high stacks]: 7.72853e-5 kg; = 1.0 * (p2125*1.1666666667)
- Sodium nitrate; broadcast w/ incorp. in fert. after plant.: 7.55749e-7 kg; = p2759*6.0714285714
- Plant dry matter; in aboveground residue left on field: 0.301655 kg; = p2172
- Aqueous ammonia; broadcast w/o incorp. in fert. in fall bef. plant.: 4.42835e-6 kg; = p2825*1.2142857143
- Urea; unspec. appl. method in fert. in spr. bef. plant.: 1.73303e-6 kg; = p3075*5
- Potassium chloride; unspec. appl. method in fert. at plant.: 1.1969e-5 kg; = p3131*2.2166666667
- Carbon monoxide, fossil [air, non-urban air or from high stacks]: 0.00279702 kg; = 1.0 * (p2028*2.3333333333)
- Monoammonium phosphate; unspec. appl. method in fert. after plant.: 1.657e-5 kg; = p3161*8.2142857143
- Particulates, < 10 um: 0.000175817 kg; = p2034+p2036
- Bispyribac-sodium; foliar or directed spray: 2.46894e-9 kg; = p4540
- Nitrogen; in below-ground residue: 0.00128667 kg; = p2174
- Seeds; used in planting and sowing: 0.00672879 kg; = p2179
- NMVOC, non-methane volatile organic compounds, unspecified origin [air, non-urban air or from high stacks]: 0.00136479 kg; = 1.0 * (p2052+p2051)
- Pesticides, unspecified [soil, agricultural]: 1.26235e-6 kg; = 1.0 * (p4307+p4101+p4719+p5337)
- Propanenitrile: 3.40356e-6 kg; = p2157*1.5277777778
- isobutene: 6.20842e-6 kg; = p2150*1.1666666667
- Cyhalofop-butyl; broadcast by air: 2.62401e-6 kg; = p3742
- Superphosphate, grades>22%; unspec. appl. method in fert. in fall bef. plant.; kg P: 7.62286e-8 kg; = p3049
- Ammonium sulfate; broadcast w/o incorp. in fert. after plant.: 0.00337021 kg; = p2947*4.7142857143
- Plant dry matter; in below-ground residue: 0.106418 kg; = p2177
- Formaldehyde [air, non-urban air or from high stacks]: 0.000110423 kg; = 1.0 * (p2128*2.5)
- Other single phosphates; broadcast w/o incorp. in fert. in spr. bef. plant.; kg P: 1.68652e-5 kg; = p2895
- Ammonium sulfate; unspec. appl. method in fert. after plant.: 4.42362e-6 kg; = p3142*4.7142857143
- Superphosphate, grades<= 22%; unspec. appl. method in fert. after plant.; kg P: 6.3368e-9 kg; = p3164
- Potassium chloride; unspec. appl. method in fert. in spr. bef. plant.: 0.000124783 kg; = p3092*2.2166666667
- Hydrocyanic acid: 1.51532e-5 kg; = p2154*2.25
- Furan [air, non-urban air or from high stacks]: 5.81046e-6 kg; = 1.0 * (p2138*1.4166666667)
- Ammonium nitrate; broadcast w/ incorp. in fert. after plant.: 6.87378e-5 kg; = p2749*4.7142857143
- Nitrogen solution; broadcast w/o incorp. in fert. in fall bef. plant.; broadcast w/o incorp. in fert. in fall bef. pl...: 0.000123702 kg; = p2834
- Nitrogen solution; broadcast w/ incorp. in fert. in spr. bef. plant.; broadcast w/ incorp. in fert. in spr. bef. plan...: 1.23447e-5 kg; = p2678
- Bensulfuron methyl ester [soil, agricultural]: 1.42928e-7 kg; = 1.0 * (p3918+p5154+p4536+p4124)
- Anhydrous ammonia; unspec. appl. method in fert. in spr. bef. plant.: 1.25956e-6 kg; = p3057*1.2142857143
- Phosphorous; in above-ground residue left on field: 0.000445845 kg; = p2169
- Butane [air, non-urban air or from high stacks]: 3.22705e-6 kg; = 1.0 * (p2147*1.0208333333)
- Anhydrous ammonia; broadcast w/ incorp. in fert. in fall bef. plant.: 2.51681e-6 kg; = p2628*1.2142857143
- Diammonium phosphate; broadcast w/ incorp. in fert. in spr. bef. plant.: 0.00103741 kg; = p2689*4.7142857143
- Pesticides, unspecified: 3.31078e-6 kg; = p3895
- Monoammonium phosphate; broadcast w/ incorp. in fert. after plant.: 0.000352105 kg; = p2771*8.2142857143
- Superphosphate, grades<= 22%; broadcast w/ incorp. in fert. in fall bef. plant.; kg P: 3.4695e-8 kg; = p2657
- Phosphorous; applied in sewage sludge: 2.18469e-10 kg; = p3241
- Superphosphate, grades<= 22%; broadcast w/ incorp. in fert. in spr. bef. plant.; kg P: 2.93934e-7 kg; = p2696
- Potassium chloride; unspec. appl. method in fert. in fall bef. plant.: 1.79069e-5 kg; = p3053*2.2166666667
- Potassium; in above-ground residue left on field; biogenic: 0.00675314 kg; = p2170
- Zeta-cypermethrin [soil, agricultural]: 2.85856e-8 kg; = 1.0 * (p4306+p4718+p5336+p4100)
- Phenol [air, non-urban air or from high stacks]: 2.75502e-5 kg; = 1.0 * (p2133*1.3055555556)
- Sulfuric acid [soil, agricultural]: 5.37786e-8 kg; = 1.0 * (p3231)
- Potassium chloride; broadcast w/o incorp. in fert. in fall bef. plant.: 0.000670418 kg; = p2858*2.2166666667
- Acetone [air, non-urban air or from high stacks]: 2.37039e-5 kg; = 1.0 * (p2139*1.6111111111)
- Azoxystrobin [air, non-urban air or from high stacks]: 4.64824e-6 kg; = 1.0 * (p3710)
- Other single phosphates; broadcast w/ incorp. in fert. in fall bef. plant.; kg P: 9.90024e-7 kg; = p2661
- Lambda-cyhalothrin [soil, agricultural]: 2.85856e-8 kg; = 1.0 * (p4013+p4219+p4631+p5249)
- Anhydrous ammonia; broadcast w/o incorp. in fert. after plant.: 0.0106278 kg; = p2940*1.2142857143
- Ammonium nitrate; unspec. appl. method in fert. after plant.: 5.57684e-6 kg; = p3139*4.7142857143
- Propanil [soil, agricultural]: 5.05107e-5 kg; = 1.0 * (p4261+p4673+p4055+p5291)
- Ammonium nitrate; broadcast w/o incorp. in fert. in spr. bef. plant.: 0.000383638 kg; = p2866*4.7142857143
- Superphosphate, grades>22%; broadcast w/ incorp. in fert. in spr. bef. plant.; kg P: 1.37231e-5 kg; = p2698
- Cyhalofop-butyl; foliar or directed spray: 2.88044e-8 kg; = p4566
- Pesticide formulation balance; broadcast with incorporation: 4.32631e-5 kg; = p4102
- Other single phosphates; broadcast w/ incorp. in fert. at plant.; kg P: 1.1146e-6 kg; = p2739
- Filler materials, applied with synthetic fertilizer: 0.0233692 kg; = p2432
- Plant dry matter; from residue burning: 0.0232322 kg; = p2164
- Superphosphate, grades>22%; broadcast w/o incorp. in fert. in spr. bef. plant.; kg P: 2.75938e-5 kg; = p2893
- Sodium nitrate; unspec. appl. method in fert. in fall bef. plant.: 8.9753e-10 kg; = p3032*6.0714285714
- Aqueous ammonia; broadcast w/ incorp. in fert. in fall bef. plant.: 7.16424e-8 kg; = p2630*1.2142857143
- Pentane [air, non-urban air or from high stacks]: 1.12372e-6 kg; = 1.0 * (p2152*1.0166666667)
- Bispyribac-sodium; unspec. appl. method: 1.23446e-9 kg; = p5158
- Urea; broadcast w/ incorp. in fert. in fall bef. plant.: 3.46289e-6 kg; = p2646*5
- Urea; unspec. appl. method in fert. after plant.: 1.91934e-5 kg; = p3153*5
- Dinitrogen monoxide [air, non-urban air or from high stacks]: 3.71887e-6 kg; = 1.0 * (p2044*1.5714285714)
- Pesticide formulation balance; unspec. appl. method: 7.50961e-7 kg; = p5338
- Acetonitrile [air, non-urban air or from high stacks]: 1.11504e-5 kg; = 1.0 * (p2155*1.7083333333)
- Superphosphate, grades<= 22%; broadcast w/ incorp. in fert. at plant.; kg P: 3.90606e-8 kg; = p2735
- Other single K nutrients; unspec. appl. method in fert. in spr. bef. plant.; kg K: 8.40201e-6 kg; = p3094
- Zinc compounds: 3.01739e-8 kg; = p3232
- cyclopentane: 8.78578e-8 kg; = p2153*1.0166666667
- Other single K nutrients; broadcast w/o incorp. in fert. in fall bef. plant.; kg K: 4.51413e-5 kg; = p2860
- 2,4-D, dimethylamine salt; broadcast by air: 7.79705e-6 kg; = p3693
- Superphosphate, grades<= 22%; broadcast w/o incorp. in fert. in spr. bef. plant.; kg P: 5.91032e-7 kg; = p2891
- Urea; broadcast w/o incorp. in fert. in spr. bef. plant.: 0.00132034 kg; = p2880*5
- Monoammonium phosphate; broadcast w/ incorp. in fert. in spr. bef. plant.: 0.000768606 kg; = p2693*8.2142857143
- Nitrogen; in above-ground residue left on field: 0.00364723 kg; = p2168
- Other single phosphates; broadcast w/o incorp. in fert. at plant.; kg P: 2.24119e-6 kg; = p2934
- Propiconazole [air, non-urban air or from high stacks]: 2.47406e-6 kg; = 1.0 * (p3851)
- Other single phosphates; unspec. appl. method in fert. in spr. bef. plant.; kg P: 3.94712e-7 kg; = p3090
- Superphosphate, grades>22%; broadcast w/ incorp. in fert. in fall bef. plant.; kg P: 1.61982e-6 kg; = p2659
- Gypsum: 7.07351e-7 kg; = p3229
- Diammonium phosphate; unspec. appl. method in fert. after plant.: 2.2365e-5 kg; = p3157*4.7142857143
- Potassium chloride; broadcast w/ incorp. in fert. in fall bef. plant.: 0.000365643 kg; = p2663*2.2166666667
- Ammonium nitrate; broadcast w/ incorp. in fert. in spr. bef. plant.: 6.20654e-6 kg; = p2671*4.7142857143
- Superphosphate, grades>22%; broadcast w/o incorp. in fert. at plant.; kg P: 3.66691e-6 kg; = p2932
- Anhydrous ammonia; unspec. appl. method in fert. in fall bef. plant.: 2.04194e-7 kg; = p3018*1.2142857143
- Ammonium nitrate; unspec. appl. method in fert. in spr. bef. plant.: 5.0355e-7 kg; = p3061*4.7142857143
- Ammonium sulfate; broadcast w/ incorp. in fert. in fall bef. plant.: 7.98112e-7 kg; = p2635*4.7142857143
- Superphosphate, grades<= 22%; broadcast w/o incorp. in fert. after plant.; kg P: 2.70757e-7 kg; = p2969
- Superphosphate, grades<= 22%; unspec. appl. method in fert. in spr. bef. plant.; kg P: 1.38325e-8 kg; = p3086
- Urea; broadcast w/ incorp. in fert. after plant.: 0.00023657 kg; = p2763*5
- Halosulfuron-methyl: 6.74745e-7 kg; = p3796
- Cyhalofop-butyl; unspec. appl. method: 1.4402e-8 kg; = p5184
- Molinate [soil, agricultural]: 9.14738e-7 kg; = 1.0 * (p4035+p4241+p4653+p5271)
- Urea; broadcast w/o incorp. in fert. after plant.: 0.0146228 kg; = p2958*5
- Other single K nutrients; broadcast w/ incorp. in fert. at plant.; kg K: 1.6456e-5 kg; = p2743
- Methane: 0.000110819 kg; = p2025*1.3333333333
- Other single phosphates; unspec. appl. method in fert. in fall bef. plant.; kg P: 4.65904e-8 kg; = p3051
- Water [air, non-urban air or from high stacks]: 5.37268e-6 m3; = 0.001 * (p2016)
- Triclopyr: 6.29762e-6 kg; = p3889
- Carfentrazone-ethyl [air, non-urban air or from high stacks]: 2.99887e-7 kg; = 1.0 * (p3725)
- Other single phosphates; broadcast w/ incorp. in fert. after plant.; kg P: 3.84236e-6 kg; = p2778
- Superphosphate, grades<= 22%; broadcast w/ incorp. in fert. after plant.; kg P: 1.34654e-7 kg; = p2774
- Diammonium phosphate; broadcast w/ incorp. in fert. after plant.: 0.000475246 kg; = p2767*4.7142857143
- Aqueous ammonia; broadcast w/o incorp. in fert. in spr. bef. plant.: 2.7316e-5 kg; = p2864*1.2142857143
- Superphosphate, grades>22%; unspec. appl. method in fert. after plant.; kg P: 2.95849e-7 kg; = p3166
- Nitrogen dioxide: 0.000165784 kg; = p2039*3.2857142857
- Potassium; in below-ground residue; biogenic: 0.00238238 kg; = p2176
- Other single K nutrients; broadcast w/o incorp. in fert. at plant.; kg K: 3.01726e-5 kg; = p2938
- Ammonium nitrate; broadcast w/o incorp. in fert. in fall bef. plant.: 6.21938e-5 kg; = p2827*4.7142857143
- Urea; broadcast w/ incorp. in fert. in spr. bef. plant.: 2.13606e-5 kg; = p2685*5
- 1-Butene: 7.1105e-6 kg; = p2144*1.1666666667
- Quinclorac: 8.9966e-6 kg; = p3861
- Ammonium sulfate; broadcast w/ incorp. in fert. after plant.: 5.45237e-5 kg; = p2752*4.7142857143
- Clomazone [soil, agricultural]: 1.09197e-5 kg; = 1.0 * (p4146+p5176+p4558+p3940)
- Aqueous ammonia; unspec. appl. method in fert. in fall bef. plant.: 5.81249e-9 kg; = p3020*1.2142857143
- Nitrogen solution; broadcast w/o incorp. in fert. after plant.; broadcast w/o incorp. in fert. after plant.; kg N: 0.00845082 kg; = p2951
- Acetic acid [air, non-urban air or from high stacks]: 0.00029718 kg; = 1.0 * (p2127*2.5)
- Monoammonium phosphate; broadcast w/o incorp. in fert. at plant.: 0.000205378 kg; = p2927*8.2142857143
- Carfentrazone ethyl ester [soil, agricultural]: 1.14342e-7 kg; = 1.0 * (p4549+p3931+p4137+p5167)
- Ammonium nitrate; broadcast w/o incorp. in fert. after plant.: 0.00424882 kg; = p2944*4.7142857143
- Sodium chlorate: 7.68951e-6 kg; = p5309+p4691+p4279+p4073
- Other single phosphates; broadcast w/o incorp. in fert. after plant.; kg P: 7.72607e-6 kg; = p2973
- cis-2-Butene: 2.28173e-6 kg; = p2149*1.1666666667
- Diammonium phosphate; unspec. appl. method in fert. in fall bef. plant.: 5.76258e-6 kg; = p3040*4.7142857143
- Other single K nutrients; broadcast w/o incorp. in fert. in spr. bef. plant.; kg K: 0.000314564 kg; = p2899
- Superphosphate, grades>22%; unspec. appl. method in fert. in spr. bef. plant.; kg P: 6.45805e-7 kg; = p3088
- Fenoxaprop P; broadcast by air: 2.24915e-7 kg; = p3772
- Monoammonium phosphate; unspec. appl. method in fert. in fall bef. plant.: 4.26944e-6 kg; = p3044*8.2142857143
- Acrylonitrile: 1.78046e-6 kg; = p2156*1.4722222222
- Zeta-cypermethrin [air, non-urban air or from high stacks]: 7.49716e-8 kg; = 1.0 * (p3894)
- Ammonium sulfate; unspec. appl. method in fert. in fall bef. plant.: 6.47525e-8 kg; = p3025*4.7142857143
- Other single K nutrients; broadcast w/ incorp. in fert. after plant.; kg K: 3.85834e-5 kg; = p2782
- Sodium nitrate; unspec. appl. method in fert. in spr. bef. plant.: 5.53636e-9 kg; = p3071*6.0714285714
- Ammonium nitrate; unspec. appl. method in fert. in fall bef. plant.: 8.16333e-8 kg; = p3022*4.7142857143
- Glycolaldehyde; from residue burning: 0.000107016 kg; = p2135*2.5
- Imazamox [soil, agricultural]: 8.57567e-8 kg; = 1.0 * (p4004+p4622+p4210+p5240)
- Superphosphate, grades>22%; unspec. appl. method in fert. at plant.; kg P: 8.58203e-8 kg; = p3127
- Aqueous ammonia; broadcast w/ incorp. in fert. after plant.: 4.8943e-6 kg; = p2747*1.2142857143
- Diammonium phosphate; broadcast w/o incorp. in fert. in spr. bef. plant.: 0.00208598 kg; = p2884*4.7142857143
- Diammonium phosphate; broadcast w/o incorp. in fert. in fall bef. plant.: 0.000246222 kg; = p2845*4.7142857143
- pursuit: 2.77395e-6 kg; = p3801
- Diammonium phosphate; broadcast w/ incorp. in fert. in fall bef. plant.: 0.000122452 kg; = p2650*4.7142857143
- Other single K nutrients; unspec. appl. method in fert. in fall bef. plant.; kg K: 1.20573e-6 kg; = p3055
- Sodium nitrate; broadcast w/ incorp. in fert. in fall bef. plant.: 1.10626e-8 kg; = p2642*6.0714285714
- Potassium chloride; broadcast w/ incorp. in fert. after plant.: 0.000573023 kg; = p2780*2.2166666667
- Anhydrous ammonia; broadcast w/ incorp. in fert. after plant.: 0.000171938 kg; = p2745*1.2142857143
- Particulates, < 2.5 um [air, non-urban air or from high stacks]: 0.000305953 kg; = 1.0 * (p2033+p2035)

## Sampling procedure
A delete-a-group jackknife is used by the USDA to estimate the ARMS sample means and RSEs, based on a 15 sample delete-a-group jackknife. Because of this relatively small sample size, a Students t distribution is used to represent ARMS data probability density functions. Other representations of uncertainty are described in Cooper, J.S., Kahn, E., Noon, M. (2012). LCA Digital Commons Unit Process Data: field crop production Version 1. Prepared for the US Department of Agriculture National Agricultural Library. Retrieved from https://www.lcacommons.gov/discovery/docs/LCA%20Digital%20Commons%20Unit%20Process%20Data%20final%20updated.pdf

## Extrapolations
Data represent an aggregation of processes applied in Arkansas in 2006. Data development is demonstrated by parameterization (exlicitly presents all raw and uncertainty data and all calculations). Flow data quality according to the LCADC convention is provided for all flows.
