# cotton lint; at harvest in 1996; at farm; 90%-93% moisture

Dataset: EcoSpold 2, unit process
Geography: GLO
Time period: 1996-01-02 to 1997-01-01
Scenario: Business-as-Usual
System model: Allocation, ecoinvent default
Generated by: cooperjs@u.washington.edu
isCopyrightProtected: false

## General comment
This unit process/ gate-to-gate dataset represents the production of 1 kg cotton coproduced with cottonseed and residue. The process technologies are an aggregation of those applied in Mississippi in 1996. Applicable classifications include ISIC 0116, NAIC 111920, UNSPSC 11121802; this dataset was prepared in ILCD format using the UWDFE Lab Excel to ILCD File Generator (beta version, August 2013)

Exchange "S,S,S-tributyl phosphorotrithioate-soil agricultural" is the result of combining the following original LCA Commons flows: "Tribufos; broadcast with incorporation; kg AI", "Tribufos; broadcast without incorporation; kg AI", "Tribufos; unspec. appl. method; kg AI", "Tribufos; foliar or directed spray; kg AI", "Tribufos; banded or side-dressed; kg AI", "Tribufos; in seed furrow; kg AI".
Exchange "Tralomethrin-soil agricultural" is the result of combining the following original LCA Commons flows: "Tralomethrin; unspec. appl. method; kg AI", "Tralomethrin; broadcast without incorporation; kg AI", "Tralomethrin; broadcast with incorporation; kg AI", "Tralomethrin; in seed furrow; kg AI", "Tralomethrin; banded or side-dressed; kg AI", "Tralomethrin; foliar or directed spray; kg AI".
Exchange "Cyanazine-soil agricultural" is the result of combining the following original LCA Commons flows: "Cyanazine; broadcast without incorporation; kg AI", "Cyanazine; broadcast with incorporation; kg AI", "Cyanazine; foliar or directed spray; kg AI", "Cyanazine; banded or side-dressed; kg AI", "Cyanazine; unspec. appl. method; kg AI", "Cyanazine; in seed furrow; kg AI".
Exchange "Dimethipin-soil agricultural" is the result of combining the following original LCA Commons flows: "Dimethipin; broadcast without incorporation; kg AI", "Dimethipin; unspec. appl. method; kg AI", "Dimethipin; foliar or directed spray; kg AI", "Dimethipin; in seed furrow; kg AI", "Dimethipin; banded or side-dressed; kg AI", "Dimethipin; broadcast with incorporation; kg AI".
Exchange "Ethephon-soil agricultural" is the result of combining the following original LCA Commons flows: "Ethephon; in seed furrow; kg AI", "Ethephon; unspec. appl. method; kg AI", "Ethephon; broadcast with incorporation; kg AI", "Ethephon; broadcast without incorporation; kg AI", "Ethephon; foliar or directed spray; kg AI", "Ethephon; banded or side-dressed; kg AI".
Exchange "Parathion-methyl-soil agricultural" is the result of combining the following original LCA Commons flows: "Methyl parathion; banded or side-dressed; kg AI", "Methyl parathion; foliar or directed spray; kg AI", "Methyl parathion; in seed furrow; kg AI", "Methyl parathion; unspec. appl. method; kg AI", "Methyl parathion; broadcast with incorporation; kg AI", "Methyl parathion; broadcast without incorporation; kg AI".
Exchange "Imidacloprid-soil agricultural" is the result of combining the following original LCA Commons flows: "Imidacloprid; unspec. appl. method; kg AI", "Imidacloprid; banded or side-dressed; kg AI", "Imidacloprid; in seed furrow; kg AI", "Imidacloprid; foliar or directed spray; kg AI", "Imidacloprid; broadcast with incorporation; kg AI", "Imidacloprid; broadcast without incorporation; kg AI".
Exchange "Sodium chlorate-soil agricultural" is the result of combining the following original LCA Commons flows: "Sodium chlorate; broadcast with incorporation; kg AI", "Sodium chlorate; unspec. appl. method; kg AI", "Sodium chlorate; foliar or directed spray; kg AI", "Sodium chlorate; banded or side-dressed; kg AI", "Sodium chlorate; in seed furrow; kg AI", "Sodium chlorate; broadcast without incorporation; kg AI".
Exchange "Dimethoate-soil agricultural" is the result of combining the following original LCA Commons flows: "Dimethoate; banded or side-dressed; kg AI", "Dimethoate; broadcast with incorporation; kg AI", "Dimethoate; unspec. appl. method; kg AI", "Dimethoate; in seed furrow; kg AI", "Dimethoate; foliar or directed spray; kg AI", "Dimethoate; broadcast without incorporation; kg AI".
Exchange "Methomyl-soil agricultural" is the result of combining the following original LCA Commons flows: "Methomyl; in seed furrow; kg AI", "Methomyl; banded or side-dressed; kg AI", "Methomyl; broadcast without incorporation; kg AI", "Methomyl; foliar or directed spray; kg AI", "Methomyl; unspec. appl. method; kg AI", "Methomyl; broadcast with incorporation; kg AI".
Exchange "NMVOC, non-methane volatile organic compounds, unspecified origin-air low population density" is the result of combining the following original LCA Commons flows: "NMVOCs; from residue burning; kg except C, biogenic", "NMVOCs; from residue burning; kg C, biogenic".
Exchange "Thiodicarb-soil agricultural" is the result of combining the following original LCA Commons flows: "Thiodicarb; unspec. appl. method; kg AI", "Thiodicarb; broadcast with incorporation; kg AI", "Thiodicarb; in seed furrow; kg AI", "Thiodicarb; broadcast without incorporation; kg AI", "Thiodicarb; banded or side-dressed; kg AI", "Thiodicarb; foliar or directed spray; kg AI".
Exchange "Glyphosate-soil agricultural" is the result of combining the following original LCA Commons flows: "Glyphosate; banded or side-dressed; kg AI", "Glyphosate; foliar or directed spray; kg AI", "Glyphosate; broadcast without incorporation; kg AI", "Glyphosate; unspec. appl. method; kg AI", "Glyphosate; in seed furrow; kg AI", "Glyphosate; broadcast with incorporation; kg AI".
Exchange "Carbofuran-soil agricultural" is the result of combining the following original LCA Commons flows: "Carbofuran; unspec. appl. method; kg AI", "Carbofuran; broadcast without incorporation; kg AI", "Carbofuran; banded or side-dressed; kg AI", "Carbofuran; foliar or directed spray; kg AI", "Carbofuran; in seed furrow; kg AI", "Carbofuran; broadcast with incorporation; kg AI".
Exchange "Norflurazon-soil agricultural" is the result of combining the following original LCA Commons flows: "Norflurazon; broadcast with incorporation; kg AI", "Norflurazon; banded or side-dressed; kg AI", "Norflurazon; in seed furrow; kg AI", "Norflurazon; foliar or directed spray; kg AI", "Norflurazon; broadcast without incorporation; kg AI", "Norflurazon; unspec. appl. method; kg AI".
Exchange "Esfenvalerate-soil agricultural" is the result of combining the following original LCA Commons flows: "Esfenvalerate; broadcast without incorporation; kg AI", "Esfenvalerate; unspec. appl. method; kg AI", "Esfenvalerate; foliar or directed spray; kg AI", "Esfenvalerate; broadcast with incorporation; kg AI", "Esfenvalerate; banded or side-dressed; kg AI", "Esfenvalerate; in seed furrow; kg AI".
Exchange "Mepiquat chloride-soil agricultural" is the result of combining the following original LCA Commons flows: "1,1-Dimethylpiperidinium chloride; broadcast without incorporation; kg AI", "1,1-Dimethylpiperidinium chloride; banded or side-dressed; kg AI", "1,1-Dimethylpiperidinium chloride; in seed furrow; kg AI", "1,1-Dimethylpiperidinium chloride; broadcast with incorporation; kg AI", "1,1-Dimethylpiperidinium chloride; foliar or directed spray; kg AI", "1,1-Dimethylpiperidinium chloride; unspec. appl. method; kg AI".
Exchange "Carbon-soil agricultural" is the result of combining the following original LCA Commons flows: "Carbon; applied in dolomite", "Carbon; applied in limestone", "Carbon; in above-ground residue left on field; biogenic", "Carbon; in below-ground residue; biogenic", "Carbon; applied in sewage sludge".
Exchange "Particulates, < 2.5 um-air low population density" is the result of combining the following original LCA Commons flows: "PM2.5; from residue burning; kg except C, biogenic", "PM2.5; from residue burning; kg C, biogenic".
Exchange "Thidiazuron-soil agricultural" is the result of combining the following original LCA Commons flows: "Thidiazuron; foliar or directed spray; kg AI", "Thidiazuron; in seed furrow; kg AI", "Thidiazuron; unspec. appl. method; kg AI", "Thidiazuron; broadcast without incorporation; kg AI", "Thidiazuron; banded or side-dressed; kg AI", "Thidiazuron; broadcast with incorporation; kg AI".
Exchange "Prometryn-soil agricultural" is the result of combining the following original LCA Commons flows: "Prometryn; banded or side-dressed; kg AI", "Prometryn; in seed furrow; kg AI", "Prometryn; broadcast with incorporation; kg AI", "Prometryn; unspec. appl. method; kg AI", "Prometryn; broadcast without incorporation; kg AI", "Prometryn; foliar or directed spray; kg AI".
Exchange "Clomazone-soil agricultural" is the result of combining the following original LCA Commons flows: "Clomazone; in seed furrow; kg AI", "Clomazone; banded or side-dressed; kg AI", "Clomazone; unspec. appl. method; kg AI", "Clomazone; foliar or directed spray; kg AI", "Clomazone; broadcast without incorporation; kg AI", "Clomazone; broadcast with incorporation; kg AI".
Exchange "Zeta-cypermethrin-soil agricultural" is the result of combining the following original LCA Commons flows: "Zeta-Cypermethrin; unspec. appl. method; kg AI", "Zeta-Cypermethrin; in seed furrow; kg AI", "Zeta-Cypermethrin; broadcast with incorporation; kg AI", "Zeta-Cypermethrin; broadcast without incorporation; kg AI", "Zeta-Cypermethrin; banded or side-dressed; kg AI", "Zeta-Cypermethrin; foliar or directed spray; kg AI".
Exchange "Clethodim-soil agricultural" is the result of combining the following original LCA Commons flows: "Clethodim; unspec. appl. method; kg AI", "Clethodim; in seed furrow; kg AI", "Clethodim; broadcast without incorporation; kg AI", "Clethodim; foliar or directed spray; kg AI", "Clethodim; broadcast with incorporation; kg AI", "Clethodim; banded or side-dressed; kg AI".
Exchange "Lactofen-soil agricultural" is the result of combining the following original LCA Commons flows: "Lactofen; banded or side-dressed; kg AI", "Lactofen; broadcast without incorporation; kg AI", "Lactofen; in seed furrow; kg AI", "Lactofen; broadcast with incorporation; kg AI", "Lactofen; unspec. appl. method; kg AI", "Lactofen; foliar or directed spray; kg AI".
Exchange "Ash-soil agricultural" is the result of combining the following original LCA Commons flows: "Ash; from residue burning; kg C, biogenic", "Ash; from residue burning; kg except C, biogenic".
Exchange "Trifluralin-soil agricultural" is the result of combining the following original LCA Commons flows: "Trifluralin; banded or side-dressed; kg AI", "Trifluralin; in seed furrow; kg AI", "Trifluralin; unspec. appl. method; kg AI", "Trifluralin; broadcast with incorporation; kg AI", "Trifluralin; broadcast without incorporation; kg AI", "Trifluralin; foliar or directed spray; kg AI".
Exchange "Diuron-soil agricultural" is the result of combining the following original LCA Commons flows: "Diuron; broadcast without incorporation; kg AI", "Diuron; banded or side-dressed; kg AI", "Diuron; broadcast with incorporation; kg AI", "Diuron; in seed furrow; kg AI", "Diuron; foliar or directed spray; kg AI", "Diuron; unspec. appl. method; kg AI".
Exchange "Water-soil agricultural" is the result of combining the following original LCA Commons flows: "Water; in below-ground residue; biogenic", "Water; from irrigation and applied with manure and sewage sludge", "Water; in above-ground residue left on field; biogenic".
Exchange "Dicrotophos-soil agricultural" is the result of combining the following original LCA Commons flows: "Dicrotophos; in seed furrow; kg AI", "Dicrotophos; broadcast without incorporation; kg AI", "Dicrotophos; broadcast with incorporation; kg AI", "Dicrotophos; banded or side-dressed; kg AI", "Dicrotophos; unspec. appl. method; kg AI", "Dicrotophos; foliar or directed spray; kg AI".
Exchange "Disulfoton-soil agricultural" is the result of combining the following original LCA Commons flows: "Disulfoton; unspec. appl. method; kg AI", "Disulfoton; broadcast without incorporation; kg AI", "Disulfoton; foliar or directed spray; kg AI", "Disulfoton; broadcast with incorporation; kg AI", "Disulfoton; in seed furrow; kg AI", "Disulfoton; banded or side-dressed; kg AI".
Exchange "Pendimethalin-soil agricultural" is the result of combining the following original LCA Commons flows: "Pendimethalin; broadcast without incorporation; kg AI", "Pendimethalin; foliar or directed spray; kg AI", "Pendimethalin; in seed furrow; kg AI", "Pendimethalin; banded or side-dressed; kg AI", "Pendimethalin; unspec. appl. method; kg AI", "Pendimethalin; broadcast with incorporation; kg AI".
Exchange "Oxamyl-soil agricultural" is the result of combining the following original LCA Commons flows: "Oxamyl; unspec. appl. method; kg AI", "Oxamyl; broadcast without incorporation; kg AI", "Oxamyl; foliar or directed spray; kg AI", "Oxamyl; in seed furrow; kg AI", "Oxamyl; broadcast with incorporation; kg AI", "Oxamyl; banded or side-dressed; kg AI".
Exchange "Pyrithiobac sodium salt-soil agricultural" is the result of combining the following original LCA Commons flows: "Pyrithiobac-sodium; broadcast without incorporation; kg AI", "Pyrithiobac-sodium; broadcast with incorporation; kg AI", "Pyrithiobac-sodium; in seed furrow; kg AI", "Pyrithiobac-sodium; banded or side-dressed; kg AI", "Pyrithiobac-sodium; unspec. appl. method; kg AI", "Pyrithiobac-sodium; foliar or directed spray; kg AI".
Exchange "Profenofos-soil agricultural" is the result of combining the following original LCA Commons flows: "Profenofos; broadcast without incorporation; kg AI", "Profenofos; in seed furrow; kg AI", "Profenofos; banded or side-dressed; kg AI", "Profenofos; unspec. appl. method; kg AI", "Profenofos; foliar or directed spray; kg AI", "Profenofos; broadcast with incorporation; kg AI".
Exchange "Acephate-soil agricultural" is the result of combining the following original LCA Commons flows: "Acephate; foliar or directed spray; kg AI", "Acephate; unspec. appl. method; kg AI", "Acephate; broadcast with incorporation; kg AI", "Acephate; banded or side-dressed; kg AI", "Acephate; broadcast without incorporation; kg AI", "Acephate; in seed furrow; kg AI".
Exchange "Metolachlor-soil agricultural" is the result of combining the following original LCA Commons flows: "Propazine; unspec. appl. method; kg AI", "Propazine; broadcast with incorporation; kg AI", "Propazine; broadcast without incorporation; kg AI", "Propazine; in seed furrow; kg AI", "Propazine; banded or side-dressed; kg AI", "Propazine; foliar or directed spray; kg AI".
Exchange "Particulates, < 10 um-air low population density" is the result of combining the following original LCA Commons flows: "PM10; from residue burning; kg C, biogenic", "PM10; from residue burning; kg except C, biogenic".
Exchange "Malathion-soil agricultural" is the result of combining the following original LCA Commons flows: "Malathion ; broadcast without incorporation; kg AI", "Malathion ; unspec. appl. method; kg AI", "Malathion ; in seed furrow; kg AI", "Malathion ; broadcast with incorporation; kg AI", "Malathion ; foliar or directed spray; kg AI", "Malathion ; banded or side-dressed; kg AI".
Exchange "Cyfluthrin-soil agricultural" is the result of combining the following original LCA Commons flows: "Beta-Cyfluthrin; banded or side-dressed; kg AI", "Beta-Cyfluthrin; foliar or directed spray; kg AI", "Beta-Cyfluthrin; unspec. appl. method; kg AI", "Beta-Cyfluthrin; broadcast with incorporation; kg AI", "Beta-Cyfluthrin; in seed furrow; kg AI", "Beta-Cyfluthrin; broadcast without incorporation; kg AI".
Exchange "Cypermethrin-soil agricultural" is the result of combining the following original LCA Commons flows: "Cypermethrin; unspec. appl. method; kg AI", "Cypermethrin; broadcast without incorporation; kg AI", "Cypermethrin; foliar or directed spray; kg AI", "Cypermethrin; banded or side-dressed; kg AI", "Cypermethrin; in seed furrow; kg AI", "Cypermethrin; broadcast with incorporation; kg AI".
Exchange "MSMA-soil agricultural" is the result of combining the following original LCA Commons flows: "MSMA; foliar or directed spray; kg AI", "MSMA; broadcast without incorporation; kg AI", "MSMA; broadcast with incorporation; kg AI", "MSMA; unspec. appl. method; kg AI", "MSMA; in seed furrow; kg AI", "MSMA; banded or side-dressed; kg AI".
Exchange "Transformation, from arable-resource land" is the result of combining the following original LCA Commons flows: "Transformation; from arable, from other to cotton", "Transformation; from arable, from unspec. use to cotton", "Transformation; from arable, from cotton to cotton", "Transformation; from arable, from corn to cotton".
Exchange "Calcium-soil agricultural" is the result of combining the following original LCA Commons flows: "Calcium; applied in limestone", "Calcium; applied in dolomite".
Exchange "Lambda-cyhalothrin-soil agricultural" is the result of combining the following original LCA Commons flows: "Lambda-cyhalothrin; foliar or directed spray; kg AI", "Lambda-cyhalothrin; broadcast with incorporation; kg AI", "Lambda-cyhalothrin; in seed furrow; kg AI", "Lambda-cyhalothrin; banded or side-dressed; kg AI", "Lambda-cyhalothrin; broadcast without incorporation; kg AI", "Lambda-cyhalothrin; unspec. appl. method; kg AI".
Exchange "Paraquat dichloride-soil unspecified" is the result of combining the following original LCA Commons flows: "Paraquat dichloride; broadcast without incorporation; kg AI", "Paraquat dichloride; in seed furrow; kg AI", "Paraquat dichloride; banded or side-dressed; kg AI", "Paraquat dichloride; unspec. appl. method; kg AI", "Paraquat dichloride; broadcast with incorporation; kg AI", "Paraquat dichloride; foliar or directed spray; kg AI".
Exchange "Aldicarb-soil agricultural" is the result of combining the following original LCA Commons flows: "Aldicarb; in seed furrow; kg AI", "Aldicarb; broadcast with incorporation; kg AI", "Aldicarb; broadcast without incorporation; kg AI", "Aldicarb; foliar or directed spray; kg AI", "Aldicarb; banded or side-dressed; kg AI", "Aldicarb; unspec. appl. method; kg AI".
Exchange "Fluometuron-soil agricultural" is the result of combining the following original LCA Commons flows: "Fluometuron; broadcast with incorporation; kg AI", "Fluometuron; in seed furrow; kg AI", "Fluometuron; broadcast without incorporation; kg AI", "Fluometuron; banded or side-dressed; kg AI", "Fluometuron; foliar or directed spray; kg AI", "Fluometuron; unspec. appl. method; kg AI".
Exchange "Esfenvalerate-2bdf9967-6dae-4183-88d1-8f612548c51e low population density" was originally named: "Esfenvalerate; broadcast by air; kg AI" in this dataset.
Exchange "trans-2-Butene-2bdf9967-6dae-4183-88d1-8f612548c51e low population density" was originally named: "Trans 2 butene; from residue burning; kg C, biogenic" in this dataset.
Exchange "Clethodim-2bdf9967-6dae-4183-88d1-8f612548c51e low population density" was originally named: "Clethodim; broadcast by air; kg AI" in this dataset.
Exchange "Clomazone-2bdf9967-6dae-4183-88d1-8f612548c51e low population density" was originally named: "Clomazone; broadcast by air; kg AI" in this dataset.
Exchange "isopentane-2bdf9967-6dae-4183-88d1-8f612548c51e low population density" was originally named: "I pentane; from residue burning; kg C, biogenic" in this dataset.
Exchange "Transformation, to arable-c19fb2d9-98eb-4cd3-8761-81b71d8a9a1b land" was originally named: "Transformation; to arable, to cotton" in this dataset.
Exchange "Acrylonitrile-2bdf9967-6dae-4183-88d1-8f612548c51e low population density" was originally named: "Propenenitrile; from residue burning; kg C, biogenic" in this dataset.
Exchange "MSMA-2bdf9967-6dae-4183-88d1-8f612548c51e low population density" was originally named: "MSMA; broadcast by air; kg AI" in this dataset.
Exchange "Trifluralin-2bdf9967-6dae-4183-88d1-8f612548c51e low population density" was originally named: "Trifluralin; broadcast by air; kg AI" in this dataset.
Exchange "Parathion-methyl-2bdf9967-6dae-4183-88d1-8f612548c51e low population density" was originally named: "Methyl parathion; broadcast by air; kg AI" in this dataset.
Exchange "Magnesium-be1c0329-f1a8-4524-8420-a86d2a8dd358 agricultural" was originally named: "Magnesium; applied in dolomite" in this dataset.
Exchange "Zinc compounds-be1c0329-f1a8-4524-8420-a86d2a8dd358 agricultural" was originally named: "Zinc compounds; as secondary application" in this dataset.
Exchange "Acetaldehyde-2bdf9967-6dae-4183-88d1-8f612548c51e low population density" was originally named: "Acetaldehyde; from residue burning; kg C, biogenic" in this dataset.
Exchange "Imidacloprid-2bdf9967-6dae-4183-88d1-8f612548c51e low population density" was originally named: "Imidacloprid; broadcast by air; kg AI" in this dataset.
Exchange "Propane-2bdf9967-6dae-4183-88d1-8f612548c51e low population density" was originally named: "Propane; from residue burning; kg C, biogenic" in this dataset.
Exchange "Thidiazuron-2bdf9967-6dae-4183-88d1-8f612548c51e low population density" was originally named: "Thidiazuron; broadcast by air; kg AI" in this dataset.
Exchange "Pentane-2bdf9967-6dae-4183-88d1-8f612548c51e low population density" was originally named: "N pentane; from residue burning; kg C, biogenic" in this dataset.
Exchange "Ethephon-2bdf9967-6dae-4183-88d1-8f612548c51e low population density" was originally named: "Ethephon; broadcast by air; kg AI" in this dataset.
Exchange "Dimethipin-2bdf9967-6dae-4183-88d1-8f612548c51e low population density" was originally named: "Dimethipin; broadcast by air; kg AI" in this dataset.
Exchange "Prometryn-2bdf9967-6dae-4183-88d1-8f612548c51e low population density" was originally named: "Prometryn; broadcast by air; kg AI" in this dataset.
Exchange "Lambda-cyhalothrin-2bdf9967-6dae-4183-88d1-8f612548c51e low population density" was originally named: "Lambda-cyhalothrin; broadcast by air; kg AI" in this dataset.
Exchange "Thiodicarb-2bdf9967-6dae-4183-88d1-8f612548c51e low population density" was originally named: "Thiodicarb; broadcast by air; kg AI" in this dataset.
Exchange "cis-2-Butene-2bdf9967-6dae-4183-88d1-8f612548c51e low population density" was originally named: "Cis 2 butene; from residue burning; kg C, biogenic" in this dataset.
Exchange "Zeta-cypermethrin-2bdf9967-6dae-4183-88d1-8f612548c51e low population density" was originally named: "Zeta-Cypermethrin; broadcast by air; kg AI" in this dataset.
Exchange "Cyanazine-2bdf9967-6dae-4183-88d1-8f612548c51e low population density" was originally named: "Cyanazine; broadcast by air; kg AI" in this dataset.
Exchange "Acetic acid-2bdf9967-6dae-4183-88d1-8f612548c51e low population density" was originally named: "Acetic acid; from residue burning; kg C, biogenic" in this dataset.
Exchange "Furan-2bdf9967-6dae-4183-88d1-8f612548c51e low population density" was originally named: "Furan; from residue burning; kg C, biogenic" in this dataset.
Exchange "Phosphorus-c19fb2d9-98eb-4cd3-8761-81b71d8a9a1b unspecified" was originally named: "Phosphorous; from plant uptake; biogenic" in this dataset.
Exchange "Acephate-2bdf9967-6dae-4183-88d1-8f612548c51e low population density" was originally named: "Acephate; broadcast by air; kg AI" in this dataset.
Exchange "Formaldehyde-2bdf9967-6dae-4183-88d1-8f612548c51e low population density" was originally named: "Formaldehyde; from residue burning; kg C, biogenic" in this dataset.
Exchange "Methomyl-2bdf9967-6dae-4183-88d1-8f612548c51e low population density" was originally named: "Methomyl; broadcast by air; kg AI" in this dataset.
Exchange "Isoprene-2bdf9967-6dae-4183-88d1-8f612548c51e low population density" was originally named: "Isoprene; from residue burning; kg C, biogenic" in this dataset.
Exchange "Acetonitrile-2bdf9967-6dae-4183-88d1-8f612548c51e low population density" was originally named: "Acetonitrile; from residue burning; kg C, biogenic" in this dataset.
Exchange "Benzene-2bdf9967-6dae-4183-88d1-8f612548c51e low population density" was originally named: "Benzene; from residue burning; kg C, biogenic" in this dataset.
Exchange "Carbon dioxide, in air-2bdf9967-6dae-4183-88d1-8f612548c51e low population density" was originally named: "Carbon dioxide; from residue burning; kg C, biogenic" in this dataset.
Exchange "Sodium chlorate-2bdf9967-6dae-4183-88d1-8f612548c51e low population density" was originally named: "Sodium chlorate; broadcast by air; kg AI" in this dataset.
Exchange "Pendimethalin-2bdf9967-6dae-4183-88d1-8f612548c51e low population density" was originally named: "Pendimethalin; broadcast by air; kg AI" in this dataset.
Exchange "Profenofos-2bdf9967-6dae-4183-88d1-8f612548c51e low population density" was originally named: "Profenofos; broadcast by air; kg AI" in this dataset.
Exchange "Dimethoate-2bdf9967-6dae-4183-88d1-8f612548c51e low population density" was originally named: "Dimethoate; broadcast by air; kg AI" in this dataset.
Exchange "Sulfur-be1c0329-f1a8-4524-8420-a86d2a8dd358 agricultural" was originally named: "Sulfur; as secondary application" in this dataset.
Exchange "Dicrotophos-2bdf9967-6dae-4183-88d1-8f612548c51e low population density" was originally named: "Dicrotophos; broadcast by air; kg AI" in this dataset.
Exchange "Water, unspecified origin-c19fb2d9-98eb-4cd3-8761-81b71d8a9a1b in water" was originally named: "Water; from plant uptake; biogenic" in this dataset.
Exchange "Tribufos-2bdf9967-6dae-4183-88d1-8f612548c51e low population density" was originally named: "Tribufos; broadcast by air; kg AI" in this dataset.
Exchange "Lactofen-2bdf9967-6dae-4183-88d1-8f612548c51e low population density" was originally named: "Lactofen; broadcast by air; kg AI" in this dataset.
Exchange "Formic acid-2bdf9967-6dae-4183-88d1-8f612548c51e low population density" was originally named: "Formic acid; from residue burning; kg C, biogenic" in this dataset.
Exchange "Carbon dioxide-c19fb2d9-98eb-4cd3-8761-81b71d8a9a1b unspecified" was originally named: "Carbon dioxide; from plant uptake; kg C, biogenic" in this dataset.
Exchange "Ethyne-2bdf9967-6dae-4183-88d1-8f612548c51e low population density" was originally named: "Acetylene; from residue burning; kg C, biogenic" in this dataset.
Exchange "Water-2bdf9967-6dae-4183-88d1-8f612548c51e low population density" was originally named: "Water; from residue burning; biogenic" in this dataset.
Exchange "Fluometuron-2bdf9967-6dae-4183-88d1-8f612548c51e low population density" was originally named: "Fluometuron; broadcast by air; kg AI" in this dataset.
Exchange "Carbon monoxide, fossil-2bdf9967-6dae-4183-88d1-8f612548c51e low population density" was originally named: "Carbon monoxide; from residue burning; kg C, biogenic" in this dataset.
Exchange "Diuron-2bdf9967-6dae-4183-88d1-8f612548c51e low population density" was originally named: "Diuron; broadcast by air; kg AI" in this dataset.
Exchange "Tralomethrin-2bdf9967-6dae-4183-88d1-8f612548c51e low population density" was originally named: "Tralomethrin; broadcast by air; kg AI" in this dataset.
Exchange "Disulfoton-2bdf9967-6dae-4183-88d1-8f612548c51e low population density" was originally named: "Disulfoton; broadcast by air; kg AI" in this dataset.
Exchange "Acetone-2bdf9967-6dae-4183-88d1-8f612548c51e low population density" was originally named: "Acetone; from residue burning; kg C, biogenic" in this dataset.
Exchange "Glyphosate-2bdf9967-6dae-4183-88d1-8f612548c51e low population density" was originally named: "Glyphosate; broadcast by air; kg AI" in this dataset.
Exchange "Hydrocyanic acid-2bdf9967-6dae-4183-88d1-8f612548c51e low population density" was originally named: "Hydrogen cyanide; from residue burning; kg C, biogenic" in this dataset.
Exchange "Carbofuran-2bdf9967-6dae-4183-88d1-8f612548c51e low population density" was originally named: "Carbofuran; broadcast by air; kg AI" in this dataset.
Exchange "Cyfluthrin-2bdf9967-6dae-4183-88d1-8f612548c51e low population density" was originally named: "Beta-Cyfluthrin; broadcast by air; kg AI" in this dataset.
Exchange "Cypermethrin-2bdf9967-6dae-4183-88d1-8f612548c51e low population density" was originally named: "Cypermethrin; broadcast by air; kg AI" in this dataset.
Exchange "Malathion-2bdf9967-6dae-4183-88d1-8f612548c51e low population density" was originally named: "Malathion ; broadcast by air; kg AI" in this dataset.
Exchange "Nitrogen dioxide-2bdf9967-6dae-4183-88d1-8f612548c51e low population density" was originally named: "Nitrogen dioxide; from residue burning; kg N, biogenic" in this dataset.
Exchange "Butadiene-2bdf9967-6dae-4183-88d1-8f612548c51e low population density" was originally named: "1,3 butadiene; from residue burning; kg C, biogenic" in this dataset.
Exchange "Norflurazon-2bdf9967-6dae-4183-88d1-8f612548c51e low population density" was originally named: "Norflurazon; broadcast by air; kg AI" in this dataset.
Exchange "Butane-2bdf9967-6dae-4183-88d1-8f612548c51e low population density" was originally named: "N butane; from residue burning; kg C, biogenic" in this dataset.
Exchange "Ethene-2bdf9967-6dae-4183-88d1-8f612548c51e low population density" was originally named: "Ethylene; from residue burning; kg C, biogenic" in this dataset.
Exchange "Aldicarb-2bdf9967-6dae-4183-88d1-8f612548c51e low population density" was originally named: "Aldicarb; broadcast by air; kg AI" in this dataset.
Exchange "Oxamyl-2bdf9967-6dae-4183-88d1-8f612548c51e low population density" was originally named: "Oxamyl; broadcast by air; kg AI" in this dataset.
Exchange "Propene-2bdf9967-6dae-4183-88d1-8f612548c51e low population density" was originally named: "Propylene; from residue burning; kg C, biogenic" in this dataset.
Exchange "Methane-2bdf9967-6dae-4183-88d1-8f612548c51e low population density" was originally named: "Methane; from residue burning; kg C, biogenic" in this dataset.
Exchange "Ammonia-2bdf9967-6dae-4183-88d1-8f612548c51e low population density" was originally named: "Ammonia; from residue burning; kg N, biogenic" in this dataset.
Exchange "isobutene-2bdf9967-6dae-4183-88d1-8f612548c51e low population density" was originally named: "I butene; from residue burning; kg C, biogenic" in this dataset.
Exchange "Ethane-2bdf9967-6dae-4183-88d1-8f612548c51e low population density" was originally named: "Ethane; from residue burning; kg C, biogenic" in this dataset.
Exchange "Phenol-2bdf9967-6dae-4183-88d1-8f612548c51e low population density" was originally named: "Phenol; from residue burning; kg C, biogenic" in this dataset.
Exchange "Occupation, arable-c19fb2d9-98eb-4cd3-8761-81b71d8a9a1b land" was originally named: "Occupation; arable, as cotton" in this dataset.
Exchange "Metolachlor-2bdf9967-6dae-4183-88d1-8f612548c51e low population density" was originally named: "Propazine; broadcast by air; kg AI" in this dataset.
Exchange "Toluene-2bdf9967-6dae-4183-88d1-8f612548c51e low population density" was originally named: "Toluene; from residue burning; kg C, biogenic" in this dataset.
Exchange "1-Butene-2bdf9967-6dae-4183-88d1-8f612548c51e low population density" was originally named: "1 butene; from residue burning; kg C, biogenic" in this dataset.
Exchange "Dinitrogen monoxide-2bdf9967-6dae-4183-88d1-8f612548c51e low population density" was originally named: "Dinitrogen monoxide; from residue burning; kg N, biogenic" in this dataset.
Exchange "Methanol-2bdf9967-6dae-4183-88d1-8f612548c51e low population density" was originally named: "Methanol; from residue burning; kg C, biogenic" in this dataset.
Exchange "Pyrithiobac sodium salt-2bdf9967-6dae-4183-88d1-8f612548c51e low population density" was originally named: "Pyrithiobac-sodium; broadcast by air; kg AI" in this dataset.
Exchange "Sulfuric acid-be1c0329-f1a8-4524-8420-a86d2a8dd358 agricultural" was originally named: "Sulfuric acid; as secondary application" in this dataset.
Exchange "Mepiquat chloride-2bdf9967-6dae-4183-88d1-8f612548c51e low population density" was originally named: "1,1-Dimethylpiperidinium chloride; broadcast by air; kg AI" in this dataset.

## Geography
The unit process is assumed to represent production in Mississippi (US State).

## Technology
This process produces cotton lint; at harvest in 1996; at farm; 90%-93% moisture. The process is assumed to represent production in Mississippi (US State). Yields and related inputs and outputs represent a single year of operation, in 1996. This dataset includes consideration of residue burning; soil preparation; planting or sowing; irrigation; application, storage, and transport of fertilizers, manures, liming materials, secondary materials, and pesticides; and harvest. Fate and transport of applications are not included as described in Cooper, J.S., Kahn, E., Noon, M. (2012) LCA Digital Commons Unit Process Data: field crop production Version 1 which is available at https://www.lcacommons.gov/discovery/docs/LCA%20Digital%20Commons%20Unit%20Process%20Data%20final%20updated.pdf

## Time period
Start and end dates match the underlying data obtained from the USDA Agricultural Resource Management Survey (ARMS).
## Parameters
- p2406: 0; = p2234*p2196
- p1264: 0; = if(p1232>0;0;IF(p1259+p1263=1;0;IF(p1259+p1263+p1261>1;1-(p1259+p1263);p1261)))
- p3418: 0; = p3380*p1238
- p3178: 0; = p2397*p1023
- p2838: 0; = p2252*(p1020+p1022)
- p2461: 0; = p2265*p1073
- p4352: 0; = p1797*p3480
- p0964: 0; = 56/90000
- p3499: 4.52265e-5; = p1768*p3476
- p2505: 8.60931e-6; = p2309*p1073
- p0905: 0.120069; = p0904/p0818
- p3476: 0.221334; = if(p1328+p1330+p1332+p1334+p1336+p1338+p1340+p1342+p1344=0;0;p1328/(p1328+p1330+p1332+p1334+p1336+p1338+p1340+p1342+p1344))
- p0826: 0.084; = 1-p0825/p0818
- p0312: 0.5
- p4376: 0; = p1821*p3480
- p1916: 0
- p2534: 1.42134e-5; = p2338*p1073
- p0632: 0; = IF(p0368<0.5;-SQRT(p0007*EXP(p0500^2*p0008)-p0007);SQRT(p0007*EXP(p0500^2*p0008)-p0007))
- p0248: 12.583
- p4649: 0.00014651; = p1888*p3481
- p2204: 0.00454623; = p1109/p0818
- p2320: 7.44333e-6; = p2224*p2187
- p0549: 0; = IF(p0285<0.5;-SQRT(p0007*EXP(p0417^2*p0008)-p0007);SQRT(p0007*EXP(p0417^2*p0008)-p0007))
- p4296: 3.28192e-7; = p1947*p3479
- p2988: 0; = p2402*(p1020+p1022)
- p2541: 1.65478e-6; = p2345*p1073
- p0951: 0; = if(and(p0683=0;or(p0807=480;p0807=32;p0807=1;and(p0807=60;p0901<0.03)));p0939;0)
- p0723: 1118.79; = p0063*(1+p0591*p0195/100)
- p0727: 0
- p0399: 0.5
- p1952: 0
- p2957: 0.00210601; = p2371*(p1020+p1022)
- p2864: 9.47639e-5; = p2278*(p1020+p1022)
- p3153: 3.59513e-5; = p2372*p1023
- p4975: 1.38192e-5; = p1802*p3483
- p2485: 0.0241139; = p2289*p1014
- p0875: 10.3315; = p0874*p0001*p0003/(p0818*p0002)
- p3378: 0; = if(p1232=0;p3246*p3360/p0818;0)
- p1017: 0.09724; = IF(p1012=0;p0708/100;0)
- p5061: 2.32391e-5; = p1888*p3483
- p2011: 0.00454386
- p4510: 0; = p1955*p3480
- p5103: 2.41836e-5; = p1930*p3483
- p2316: 6.44684e-5; = p2224*p2183
- p1873: 0
- p1838: 0
- p2384: 0; = p2229*p2213
- p1228: 0.0723071; = IF(p1221=0;0;p0801*p1212*2000/(p1222+p1221*p1225)/p0818)
- p1605: 0
- p0713: 52.079; = p0053*(1+p0581*p0185/100)
- p1990: 30
- p1232: 1.12e6; = p0801
- p2437: 0; = p2241*p1014
- p2833: 0; = p2247*(p1020+p1022)
- p3576: 0.000168616; = p1845*p3476
- p2354: 0.025607; = p2225*p2182
- p1921: 0
- p0306: 0.5
- p2739: 4.43654e-6; = p2348*(p1078+p1080)
- p0408: 0; = SQRT(2)*(IF((2*p0276-1)<0;-1;IF((2*p0276-1)>0;1;0))*SQRT(SQRT((2/(pi()*0.140012289)+LN(1-(2*p0276-1)^2)/2)^2-LN(1-(2*p0276-1)^2)/0.140012289)-(2/(pi()*0.140012289)+LN(1-(2*p0276-1)^2)/2)))
- p1227: 0.00110968; = IF(p1221=0;0;p1226*p0001/(p0818*p0002))
- p3456: 0; = p3380*p1240
- p3257: 0
- p0714: 0
- p2333: 5.61758e-5; = p2224*p2201
- p2989: 0; = p2403*(p1020+p1022)
- p3041: 0; = p2260*p1082
- p2023: 3.3
- p1115: 0.237849
- p2451: 0; = p2255*p1014
- p1936: 0
- p2755: 0.000554748; = p2364*(p1019+p1021)
- p4248: 5.41517e-6; = p1899*p3479
- p1644: 0
- p1880: 0
- p0236: 0.898
- p3130: 0; = p2349*p1082
- p1059: 0.335
- p0136: 98.332
- p4996: 1.8641e-6; = p1823*p3483
- p0953: 0; = if(and(p0683>0;or(p0807=56;p0807=100;and(p0807=60;p0901>0.06)));p0935;0)
- p0085: 7731.84
- p0251: 13.372
- p4054: 4.06214e-5; = p1911*p3478
- p0014: 55.837
- p5200: 4.04231e-7; = p1821*p3484
- p0218: 10.211
- p2120: 0.51828
- p2020: 180391; = p2015*p2018*p2019
- p2186: 0.00886221; = p1052/p0818
- p0578: 0; = IF(p0314<0.5;-SQRT(p0007*EXP(p0446^2*p0008)-p0007);SQRT(p0007*EXP(p0446^2*p0008)-p0007))
- p5249: 1.38593e-6; = p1870*p3484
- p0651: 0; = IF(p0387<0.5;-SQRT(p0007*EXP(p0519^2*p0008)-p0007);SQRT(p0007*EXP(p0519^2*p0008)-p0007))
- p2690: 0.000454234; = p2299*(p1078+p1080)
- p0750: 0
- p3836: 3.31211e-5; = p1899*p3477
- p2144: 8.86746e-7; = p2015*p2072*p2106/(p0818*1000)
- p0476: 0; = SQRT(2)*(IF((2*p0344-1)<0;-1;IF((2*p0344-1)>0;1;0))*SQRT(SQRT((2/(pi()*0.140012289)+LN(1-(2*p0344-1)^2)/2)^2-LN(1-(2*p0344-1)^2)/0.140012289)-(2/(pi()*0.140012289)+LN(1-(2*p0344-1)^2)/2)))
- p2498: 6.3088e-5; = p2302*p1073
- p2452: 0; = p2256*p1014
- p2822: 0; = p2431*(p1128+p1130)
- p3260: 0
- p0823: 0.91625
- p2336: 0.000512248; = p2228*p2204
- p0971: 0; = p0968/p0818
- p2709: 3.58558e-6; = p2318*(p1019+p1021)
- p2162: 1.25999e-7; = p2015*p2086*p2124/(p0818*1000)
- p4466: 0; = p1911*p3480
- p2493: 0.000382179; = p2297*p1073
- p0406: 0; = SQRT(2)*(IF((2*p0274-1)<0;-1;IF((2*p0274-1)>0;1;0))*SQRT(SQRT((2/(pi()*0.140012289)+LN(1-(2*p0274-1)^2)/2)^2-LN(1-(2*p0274-1)^2)/0.140012289)-(2/(pi()*0.140012289)+LN(1-(2*p0274-1)^2)/2)))
- p4279: 5.32219e-5; = p1930*p3479
- p0226: 14.294
- p4691: 0.000152464; = p1930*p3481
- p3078: 0; = p2297*p1082
- p2570: 0.00517143; = p2374*p1014
- p2669: 8.65748e-5; = p2278*(p1019+p1021)
- p2732: 3.25104e-5; = p2341*(p1078+p1080)
- p2546: 0; = p2350*p1123
- p2879: 0.00200883; = p2293*(p1020+p1022)
- p2427: 0; = p2235*p2217
- p2032: 0.448886
- p1888: 0.00103834; = p1480*1000/p0818
- p1323: 0; = IF(((p0745*1000*p0750/100)+(p0754*1000*p0759/100))/p0801<0;0;((p0745*1000*p0750/100)+(p0754*1000*p0759/100))/p0801)
- p2826: 0; = p2240*(p1020+p1022)
- p0932: 0; = p0801*p0926
- p2845: 0; = p2259*(p1079+p1081)
- p1963j: 0.000830602; = p1725*p1929+p1726*p1930+p1727*p1931+p1728*p1932+p1729*p1933+p1730*p1934+p1731*p1935+p1732*p1936+p1733*p1937+p1734*p1938+p1735*p1939+p1736*p1940+p1737*p1941+p1738*p1942+p1739*p1943+p1740*p1944+p1741*p1945+p1742*p1946+p1743*p1947
- p4146: 6.18096e-6; = p1797*p3479
- p0770: 82.154; = p0110*(1+p0638*p0242/100)
- p0960: 0; = if(and(p0683>0;or(p0807=480;p0807=32;p0807=1;and(p0807=60;p0901<0.03)));p0936;0)
- p2467: 0; = p2271*p1073
- p3860: 5.01835e-6; = p1923*p3477
- p2952: 0.00073673; = p2366*(p1020+p1022)
- p1313: 0; = p1307*p1252/p0818
- p2848: 0; = p2262*(p1079+p1081)
- p2100: 0.705744
- p2119: 0.679049
- p3169: 0; = p2388*p1082
- p3291: 0
- p3467: 0; = p3372*p1241
- p5251: 9.58604e-6; = p1872*p3484
- p2573: 0; = p2377*p1073
- p2458: 0; = p2262*p1073
- p5290: 9.93253e-6; = p1911*p3484
- p3964: 1.65319e-6; = p1821*p3478
- p1041: 0.299887
- p2213: 0.000155017; = p1116-p2212
- p0551: 0; = IF(p0287<0.5;-SQRT(p0007*EXP(p0419^2*p0008)-p0007);SQRT(p0007*EXP(p0419^2*p0008)-p0007))
- p1032: 0; = IF(p1012=0;p1026*p0001/(p0818*p0002);0)
- p3081: 0; = p2300*p1082
- p3463: 0; = p3368*p1241
- p3469: 0; = p3374*p1241
- p3225: 0.00115394; = p3221*p1229
- p0286: 0.5
- p0693: 0
- p1128: 0.41415; = if(p1121=0;IF(p1123=1;0;IF(p1123+p1124>1;1-p1123;p1124));0)
- p0210: 0
- p3317: 0; = if(and(p1232=0;p3253<>0);p3253*(p3261*p3277-p3312)/p3316;0)
- p2178: 0.0877082; = (p0895*p0831/(1-p0831))/(p0818)
- p2731: 7.1892e-5; = p2340*(p1078+p1080)
- p0741: 4.302; = p0081*(1+p0609*p0213/100)
- p0803: 0
- p2221: 0.00718025; = p1155-p2220
- p3138: 1.36257e-5; = p2357*p1023
- p0804: 1.876e6
- p1786: 0
- p1567: 0
- p0532: 0; = SQRT(2)*(IF((2*p0400-1)<0;-1;IF((2*p0400-1)>0;1;0))*SQRT(SQRT((2/(pi()*0.140012289)+LN(1-(2*p0400-1)^2)/2)^2-LN(1-(2*p0400-1)^2)/0.140012289)-(2/(pi()*0.140012289)+LN(1-(2*p0400-1)^2)/2)))
- p2528: 8.38476e-5; = p2332*p1014
- p2611: 0; = p2415*p1073
- p1396: 14
- p3406: 0; = p3368*p1238
- p2131: 2.02013e-6; = p2015*p2059*p2093/(p0818*1000)
- p1564: 0.822
- p2037: 3.44
- p1343: 0.00036835; = p1342*p0001/(p0818*p0002)
- p1236: 0; = if(p1232>0;0;p0728/100)
- p0842: -0.227484
- p3015: 0; = p2429*(p1129+p1131)
- p0666: 0; = IF(p0402<0.5;-SQRT(p0007*EXP(p0534^2*p0008)-p0007);SQRT(p0007*EXP(p0534^2*p0008)-p0007))
- p2990: 0; = p2404*(p1020+p1022)
- p0807: 480
- p2301: 0.00147255; = p2227*p2208
- p2588: 0; = p2392*p1123
- p1958: 8748
- p1633: 0
- p0765: 0
- p3415: 0; = p3377*p1238
- p3417: 0; = p3379*p1238
- p3147: 2.93349e-5; = p2366*p1023
- p2578: 0; = p2382*p1073
- p1774: 0
- p1698: 0
- p1306: 0; = p1302*p1252/p0818
- p2917: 2.46637e-7; = p2331*(p1020+p1022)
- p2740: 3.97623e-5; = p2349*(p1078+p1080)
- p4812: 0; = p1845*p3482
- p1304: 0; = p1300*p1252/p0818
- p1614: 0
- p3151: 8.56257e-7; = p2370*p1023
- p2581: 0; = p2385*p1073
- p2647: 0; = p2256*(p1019+p1021)
- p0010: 20.193
- p3014: 0; = p2428*(p1129+p1131)
- p2322: 1.62184e-5; = p2224*p2189
- p1619: 0.938128
- p0885: 100; = IF(p0689+p0884=100;0;100-(p0689+p0884))
- p3360: 0; = if(p1232=0;p3310+p3321+p3332+p3343+p3354;0)
- p1647: 0
- p2321: 9.522e-5; = p2224*p2188
- p4861: 0; = p1894*p3482
- p2075: 0.072
- p3276: 0
- p1005: 0; = p1001*p0888
- p2420: 0; = p2235*p2210
- p2062: 3.76588
- p2087: 0.856281
- p2030: 8.87
- p4912: 0; = p1945*p3482
- p2022: 0.00132831; = p2018*p2015/p0818-p2021
- p2024: 0.748682
- p3370: 0; = if(p1232=0;p3245*p3358/p0818;0)
- p1584: 0
- p1716: 0
- p5018: 1.70503e-5; = p1845*p3483
- p0876: 0; = p0866*p0856
- p0816: 0
- p3834: 0.000101036; = p1897*p3477
- p1882: 0
- p2175: 0.00120024; = p0895*p0908/p0818
- p1273: 0; = p1267*p1252/p0818
- p1254: 0; = if(p1232>0;0;p0736/100)
- p5234: 7.73813e-6; = p1855*p3484
- p1963g: 0.00102137; = p1667*p1871+p1668*p1872+p1669*p1873+p1670*p1874+p1671*p1875+p1672*p1876+p1673*p1877+p1674*p1878+p1675*p1879+p1676*p1880+p1677*p1881+p1678*p1882+p1679*p1883+p1680*p1884+p1681*p1885+p1682*p1886+p1683*p1887+p1684*p1888+p1685*p1889
- p0079: 7.736
- p1053: 2.50257e6; = IF(p1012=0;p1046*p1036;0)
- p5258: 7.50714e-7; = p1879*p3484
- p0392: 0.5
- p0278: 0.5
- p2891: 6.85052e-6; = p2305*(p1079+p1081)
- p2592: 0; = p2396*p1014
- p3632: 2.01553e-5; = p1901*p3476
- p2813: 0; = p2422*(p1078+p1080)
- p4361: 0; = p1806*p3480
- p1034: 0.000200979; = IF(p1012=0;p1028*p0001/(p0818*p0002);0)
- p4306: 8.20481e-7; = p1957*p3479
- p0500: 0; = SQRT(2)*(IF((2*p0368-1)<0;-1;IF((2*p0368-1)>0;1;0))*SQRT(SQRT((2/(pi()*0.140012289)+LN(1-(2*p0368-1)^2)/2)^2-LN(1-(2*p0368-1)^2)/0.140012289)-(2/(pi()*0.140012289)+LN(1-(2*p0368-1)^2)/2)))
- p2012: 0.0163823
- p2909: 3.42211e-6; = p2323*(p1020+p1022)
- p0104: 98.332
- p2205: 0.00411172; = 2*14.0067*p2204/30.973762
- p2245: 0; = p2222*p2190
- p1798: 0
- p0243: 40.168
- p1292: 0; = IF(p1287+p1290+p1291=p1261;0;p1261-(p1287+p1290+p1291))
- p3224: 0.501945; = IF(p3216=0;0;1-p3221-p3222-p3223)
- p1295: 0; = p1291*p1252/p0818
- p4042: 2.33809e-5; = p1899*p3478
- p3143: 1.18807e-5; = p2362*p1023
- p3430: 0; = p3373*p1239
- p5321: 4.38879e-6; = p1942*p3484
- p2465: 0; = p2269*p1073
- p1766: 0
- p4626: 4.70084e-7; = p1865*p3481
- p0177: 10.274
- p1956: 0
- p3816: 4.34924e-6; = p1879*p3477
- p3128: 0; = p2347*p1082
- p1694: 0
- p1219: 0; = if(p1218=0;0;SQRT(2)*(IF((2*p1218-1)<0;-1;IF((2*p1218-1)>0;1;0))*SQRT(SQRT((2/(pi()*0.140012289)+LN(1-(2*p1218-1)^2)/2)^2-LN(1-(2*p1218-1)^2)/0.140012289)-(2/(pi()*0.140012289)+LN(1-(2*p1218-1)^2)/2))))
- p1826: 0
- p2180: 2.23994e-7; = p3233*p1188/(p0818)
- p2557: 0.000904894; = p2361*p1014
- p2300: 0.00980954; = p2227*p2207
- p1911: 0.000191009; = p1503*1000/p0818
- p1624: 0
- p1645: 0
- p1118: 0.00102028; = IF(p1071=0;p1108/(p1113*p0818);0)
- p2002: 750
- p2128: 6.42639e-6; = p2015*p2056*p2090/(p0818*1000)
- p1635: 0
- p0023: 10.85
- p0342: 0.5
- p2574: 0; = p2378*p1073
- p2625: 0; = p2429*p1123
- p3315: 0; = if(and(p1232=0;p3253<>0);p3264*p3289;0)
- p0475: 0; = SQRT(2)*(IF((2*p0343-1)<0;-1;IF((2*p0343-1)>0;1;0))*SQRT(SQRT((2/(pi()*0.140012289)+LN(1-(2*p0343-1)^2)/2)^2-LN(1-(2*p0343-1)^2)/0.140012289)-(2/(pi()*0.140012289)+LN(1-(2*p0343-1)^2)/2)))
- p5038: 7.4564e-8; = p1865*p3483
- p2818: 0; = p2427*(p1078+p1080)
- p0813: 1.56522; = if(p0807=480;1.56521739130435;0)
- p1963c: 0.000354674; = p1588*p1792+p1589*p1793+p1590*p1794+p1591*p1795+p1592*p1796+p1593*p1797+p1594*p1798+p1595*p1799+p1596*p1800+p1597*p1801+p1598*p1802+p1599*p1803+p1600*p1804+p1601*p1805+p1602*p1806+p1603*p1807+p1604*p1808+p1605*p1809+p1606*p1810+p1607*p1811
- p1925: 0
- p1664: 0
- p0271: 10.601
- p2081: 0.0019
- p2491: 0.000430277; = p2295*p1014
- p1801: 0
- p3084: 0; = p2303*p1082
- p1257: 0; = if(p1232>0;0;IF(p1253+p1256=1;0;IF(p1253+p1256+p1255>1;1-(p1253+p1256);p1255)))
- p3408: 0; = p3370*p1238
- p0591: 0; = IF(p0327<0.5;-SQRT(p0007*EXP(p0459^2*p0008)-p0007);SQRT(p0007*EXP(p0459^2*p0008)-p0007))
- p3445: 0; = p3369*p1240
- p0700: 0
- p1082: 0; = IF(p1071=0;IF(p1073+p1078+p1079+p1080+p1081=1;0;1-(p1073+p1078+p1079+p1080+p1081));0)
- p1103: 0.663396; = IF(p1071=0;IF(p1096+p1101+p1102=1;0;IF(p1096+p1101+p1102+p1099>1;1-(p1096+p1101+p1102);p1099));0)
- p2453: 0; = p2257*p1014
- p2761: 1.96461e-5; = p2370*(p1019+p1021)
- p1878: 0
- p1560: 0
- p0685: 0
- p2441: 0; = p2245*p1014
- p0635: 0; = IF(p0371<0.5;-SQRT(p0007*EXP(p0503^2*p0008)-p0007);SQRT(p0007*EXP(p0503^2*p0008)-p0007))
- p2243: 0; = p2222*p2188
- p1886: 0
- p2533: 4.3892e-5; = p2337*p1073
- p3383: 0; = p3364*p1234
- p2134: 1.4156e-5; = p2015*p2062*p2096/(p0818*1000)
- p5118: 1.54099e-6; = p1945*p3483
- p1707: 0.356204
- p0879: 0.553224; = p0878*p0001*p0003/(p0818*p0002)
- p2837: 0; = p2251*(p1020+p1022)
- p4090: 1.41702e-6; = p1947*p3478
- p0130: 13.34
- p3399: 0; = p3380*p1234
- p0400: 0.5
- p2628: 0; = p2237*(p1019+p1021)
- p5248: 8.08461e-7; = p1869*p3484
- p3097: 4.73198e-7; = p2316*p1023
- p0007: 14; = p0006-1
- p3274: 0
- p2943: 0.000342201; = p2357*(p1020+p1022)
- p0445: 0; = SQRT(2)*(IF((2*p0313-1)<0;-1;IF((2*p0313-1)>0;1;0))*SQRT(SQRT((2/(pi()*0.140012289)+LN(1-(2*p0313-1)^2)/2)^2-LN(1-(2*p0313-1)^2)/0.140012289)-(2/(pi()*0.140012289)+LN(1-(2*p0313-1)^2)/2)))
- p3165: 0; = p2384*p1082
- p0577: 0; = IF(p0313<0.5;-SQRT(p0007*EXP(p0445^2*p0008)-p0007);SQRT(p0007*EXP(p0445^2*p0008)-p0007))
- p1813: 0
- p2540: 1.58249e-7; = p2344*p1073
- p1626: 0.955501
- p4385: 0; = p1830*p3480
- p1152: 0.415074
- p4272: 8.20481e-7; = p1923*p3479
- p2894: 0.000924158; = p2308*(p1079+p1081)
- p2275: 0.0010024; = p2230*p2221
- p1131: 0; = if(p1121=0;IF(p1123+p1128+p1129+p1130=1;0;IF(p1123+p1128+p1129+p1130+p1127>1;1-(p1123+p1128+p1129+p1130);p1127));0)
- p3062: 4.54375e-6; = p2281*p1023
- p0110: 82.154
- p5267: 5.39937e-5; = p1888*p3484
- p1286: 0; = p1282*p1252/p0818
- p3625: 0.000258332; = p1894*p3476
- p3437: 0; = p3380*p1239
- p1711: 0
- p1734: 0
- p1695: 0.8025
- p1914: 0
- p1742: 0
- p3113: 9.61762e-7; = p2332*p1023
- p2509: 0; = p2313*p1123
- p1213: 4
- p2200: 0.022453; = p1056/p0818
- p0718: 41.415; = p0058*(1+p0586*p0190/100)
- p3389: 0; = p3370*p1234
- p2255: 0; = p2222*p2201
- p4782: 0; = p1815*p3482
- p2682: 8.52334e-6; = p2291*(p1019+p1021)
- p2905: 9.53363e-6; = p2319*(p1020+p1022)
- p0935: 0; = p0929*p0001/(p0818*p0002)
- p2424: 0; = p2235*p2214
- p3331: 0; = if(and(p1232=0;p3255<>0);p3255*(p3268-p3326)/p3327;0)
- p5076: 3.38024e-6; = p1903*p3483
- p3309: 0; = if(and(p1232=0;p3252<>0);p3252*(p3260-p3304)/p3305;0)
- p0043: 1119.07
- p2195: 0.00785457; = p2194*p2193
- p1021: 0.09724; = IF(p1012=0;IF(p1014+p1019+p1020=1;0;IF(p1014+p1019+p1020+p1017>1;1-(p1014+p1019+p1020);p1017));0)
- p2810: 0; = p2419*(p1078+p1080)
- p3270: 0
- p3034: 0; = p2253*p1023
- p1650: 0
- p2252: 0; = p2222*p2198
- p3199: 0; = p2418*p1082
- p2916: 1.12179e-7; = p2330*(p1020+p1022)
- p2539: 4.52962e-5; = p2343*p1073
- p2289: 0.0376832; = p2223*p2196
- p1248: 0; = if(p1232>0;0;p1243*p0001/(p0818*p0002))
- p0459: 0; = SQRT(2)*(IF((2*p0327-1)<0;-1;IF((2*p0327-1)>0;1;0))*SQRT(SQRT((2/(pi()*0.140012289)+LN(1-(2*p0327-1)^2)/2)^2-LN(1-(2*p0327-1)^2)/0.140012289)-(2/(pi()*0.140012289)+LN(1-(2*p0327-1)^2)/2)))
- p1077: 0; = IF(p1071=0;p0715/100;0)
- p1394: 556
- p2704: 0.00126179; = p2313*(p1128+p1130)
- p1263: 0; = if(p1232>0;0;IF(p1259=1;0;IF(p1259+p1260>1;1-p1259;p1260)))
- p2008: 0.316979; = ((p1982*p1985+p1988*p1991+p1994*p1997+p2002*p2005)/p0818)*p0005*p0002/1000
- p1288: 0
- p1984: 30
- p5336: 8.66209e-7; = p1957*p3484
- p2665: 0.0002389; = p2274*(p1128+p1130)
- p0777: 0
- p3339: 0; = if(and(p1232=0;p3254<>0);p3254*(p3269*p3277-p3334)/p3338;0)
- p3300: 0; = if(p1293+p1294+p1295+p1296=0;0;p1293/(p1293+p1294+p1295+p1296))
- p3249: 0
- p0927: 1; = IF(p0918+p0923+p0924+p0925+p0926=1;0;1-(p0918+p0923+p0924+p0925+p0926))
- p0787: 19.524; = p0127*(1+p0655*p0259/100)
- p1870: 2.66525e-5; = p1462*1000/p0818
- p1573: 0
- p1701: 0
- p1075: 0.52079; = IF(p1071=0;p0713/100;0)
- p1133: 0; = if(p1121=0;p1123*(p0716/100)*p0703*1000;0)
- p3167: 0; = p2386*p1082
- p4359: 0; = p1804*p3480
- p1135: 317968; = if(p1121=0;p1129*(p0716/100)*p0703*1000;0)
- p1481: 160
- p0536: 0; = SQRT(2)*(IF((2*p0404-1)<0;-1;IF((2*p0404-1)>0;1;0))*SQRT(SQRT((2/(pi()*0.140012289)+LN(1-(2*p0404-1)^2)/2)^2-LN(1-(2*p0404-1)^2)/0.140012289)-(2/(pi()*0.140012289)+LN(1-(2*p0404-1)^2)/2)))
- p2555: 0.000415295; = p2359*p1014
- p1963f: 7.97079e-5; = p1647*p1851+p1648*p1852+p1649*p1853+p1650*p1854+p1651*p1855+p1652*p1856+p1653*p1857+p1654*p1858+p1655*p1859+p1656*p1860+p1657*p1861+p1658*p1862+p1659*p1863+p1660*p1864+p1661*p1865+p1662*p1866+p1663*p1867+p1664*p1868+p1665*p1869+p1666*p1870
- p2292: 0.000111273; = p2223*p2199
- p0772: 95.835; = p0112*(1+p0640*p0244/100)
- p2960: 0.00148974; = p2374*(p1020+p1022)
- p3066: 2.8498e-6; = p2285*p1023
- p0868: 0; = IF(p0858+p0864+p0865+p0866+p0867=1;0;IF(p0858+p0864+p0865+p0866+p0867+p0863>1;1-(p0858+p0864+p0865+p0866+p0867);p0863))
- p0439: 0; = SQRT(2)*(IF((2*p0307-1)<0;-1;IF((2*p0307-1)>0;1;0))*SQRT(SQRT((2/(pi()*0.140012289)+LN(1-(2*p0307-1)^2)/2)^2-LN(1-(2*p0307-1)^2)/0.140012289)-(2/(pi()*0.140012289)+LN(1-(2*p0307-1)^2)/2)))
- p0872: 0; = p0864*p0856
- p2698: 0.000180793; = p2307*(p1078+p1080)
- p2882: 0.001421; = p2296*(p1020+p1022)
- p2043: 0.636483
- p1761: 0
- p2997: 0; = p2411*(p1020+p1022)
- p2088: 0.798875
- p1246: 0; = if(p1232>0;0;p1241*(p0725/100)*p0723*1000)
- p0942: 0; = if(and(p0683=0;p0948=0);p0936;0)
- p2751: 0.00139819; = p2360*(p1019+p1021)
- p2139: 2.14062e-6; = p2015*p2067*p2101/(p0818*1000)
- p2675: 0.000260012; = p2284*(p1019+p1021)
- p2569: 0.000451094; = p2373*p1014
- p3073: 8.16743e-7; = p2292*p1023
- p1225: 1.088; = IF(p1221=0;0;p1223+1.2*p1224)
- p4790: 0; = p1823*p3482
- p0753: 0
- p2304: 0.00376515; = p2227*p2211
- p0641: 0; = IF(p0377<0.5;-SQRT(p0007*EXP(p0509^2*p0008)-p0007);SQRT(p0007*EXP(p0509^2*p0008)-p0007))
- p1043: 0.183763
- p1730: 0
- p2521: 2.41756e-5; = p2325*p1014
- p0744: 94.791; = p0084*(1+p0612*p0216/100)
- p1565: 0
- p2903: 1.13944e-6; = p2317*(p1020+p1022)
- p2142: 1.78083e-6; = p2015*p2070*p2104/(p0818*1000)
- p0048: 9.724
- p0094: 8879.3
- p0736: 0
- p1261: 0; = if(p1232>0;0;p0732/100)
- p3266: 0
- p2150: 7.74249e-7; = p2015*p2078*p2112/(p0818*1000)
- p0721: 0
- p2229: 0; = if(p0774*p0778+p0775*p0779+p0776*p0780+p0777*p0781=0;0;p0781*p0777/(p0774*p0778+p0775*p0779+p0776*p0780+p0777*p0781))
- p2475: 0.00113308; = p2279*p1014
- p1746: 0
- p1558: 0.399536
- p2277: 0.00536164; = p2223*p2183
- p0926: 0; = IF(p0918+p0923+p0924+p0925=1;0;IF(p0918+p0923+p0924+p0925+p0922>1;1-(p0918+p0923+p0924+p0925);p0922))
- p1168: 3.00514e-6; = p1164*p1167/p0818
- p2416: 0; = p2235*p2206
- p2198: 0.000104278; = 22.98976928*p2197/14.0067
- p1731: 0
- p0126: 91.127
- p3690: 0.00118292; = p1963*p3476
- p5124: 2.16236e-5; = p1951*p3483
- p1522: 973
- p1627: 0
- p0323: 0.5
- p2883: 0.00210086; = p2297*(p1079+p1081)
- p1305: 0; = p1301*p1252/p0818
- p4452: 0; = p1897*p3480
- p3027: 0; = p2246*p1023
- p2076: 0.057
- p1489: 302
- p3586: 3.29367e-5; = p1855*p3476
- p2057: 3.28794
- p0916: 0.812309; = p0826+p0828+p0829+(p0832*(1+p0894))/p0818
- p0232: 42.984
- p1315: 0; = p1311*p1252/p0818
- p1297: 0
- p2093: 0.260958
- p1968: 275000; = if(p0807=480;p0802*p0811;0)
- p0006: 15
- p1656: 0
- p0818: 9.0048e8; = p0806*p0807
- p3145: 2.41782e-5; = p2364*p1023
- p2148: 3.77198e-7; = p2015*p2076*p2110/(p0818*1000)
- p1892: 0
- p2929: 0.000248995; = p2343*(p1079+p1081)
- p0733: 0
- p0928: 0; = p0801*p0918
- p0216: 4.544
- p2719: 7.6307e-5; = p2328*(p1019+p1021)
- p0860: 0.931037; = p0672*1000/p0856
- p0272: 11.728
- p0806: 1.876e6; = p0804+p0805
- p2688: 0.00155095; = p2297*(p1078+p1080)
- p0135: 99.986
- p1637: 0
- p2768: 0; = p2377*(p1078+p1080)
- p1967: 825000; = if(p0807=480;p0802*p0810;0)
- p0692: 0
- p3272: 0
- p0307: 0.5
- p2803: 0; = p2412*(p1019+p1021)
- p3705: 6.15584e-5; = p1768*p3477
- p0869: 0.00107946; = IF(p0858+p0864+p0865+p0866+p0867+p0868=1;0;1-(p0858+p0864+p0865+p0866+p0867+p0868))
- p2691: 0.00377147; = p2300*(p1078+p1080)
- p3012: 0; = p2426*(p1079+p1081)
- p1769: 0
- p3427: 0; = p3370*p1239
- p3461: 0; = p3366*p1241
- p5074: 2.03808e-6; = p1901*p3483
- p2720: 6.24396e-8; = p2329*(p1019+p1021)
- p0865: 0.931037; = IF(p0858+p0864=1;0;IF(p0858+p0864+p0860>1;1-(p0858+p0864);p0860))
- p1578: 0
- p3118: 0; = p2337*p1082
- p2668: 0.000902954; = p2277*(p1019+p1021)
- p0008: 0.0739645; = (p0007-1.5)/(p0007-1)^2
- p0863: 0; = p0675*1000/p0856
- p2632: 0; = p2241*(p1019+p1021)
- p1985: 3.12113e8; = (if(p1057=0;0;p1050/p1057)+if(p1058=0;0;p1051/p1058)+if(p1059=0;0;p1052/p1059)+if(p1060=0;0;p1053/p1060)+if(p1061=0;0;p1054/p1061)+if(p1062=0;0;p1055/p1062)+if(p1063=0;0;p1056/p1063))*(1+p1157)
- p1148: 0.070543; = if(p1121=0;IF(p1146=1;0;1-p1146);0)
- p0936: 0; = p0930*p0001/(p0818*p0002)
- p2948: 0.000298376; = p2362*(p1020+p1022)
- p3200: 0; = p2419*p1082
- p4788: 0; = p1821*p3482
- p1144: 5.18757e-5; = if(p1121=0;p1138*p0001/(p0818*p0002);0)
- p1823: 8.32889e-5; = p1415*1000/p0818
- p4926: 0; = p1963*p3482
- p0108: 53.072
- p2156: 1.75956e-7; = p2015*p2085*p2118/(p0818*1000)
- p2389: 0.00669855; = p2233*p2218
- p1576: 0
- p1899: 0.000109941; = p1491*1000/p0818
- p4008: 7.08512e-7; = p1865*p3478
- p3159: 0; = p2378*p1082
- p1788: 0
- p3215: 0.450791; = p1222*3*15.9994/100.0869
- p1767: 0
- p0734: 0
- p2212: 1.48244e-5; = p1106/p0818
- p2577: 0; = p2381*p1073
- p1848: 0
- p3288: 0
- p1636: 0
- p3232: 1.37755e-7; = p1182/p0818
- p3470: 0; = p3375*p1241
- p0138: 26.723
- p1728: 0
- p0874: 1.04276e6; = p0865*p0856
- p2922: 0.000266774; = p2336*(p1079+p1081)
- p1534: 76
- p2492: 0.00493278; = p2296*p1014
- p3316: 0; = if(and(p1232=0;p3253<>0);1-(p3312+p3313+p3314+p3315);0)
- p4855: 0; = p1888*p3482
- p3450: 0; = p3374*p1240
- p3032: 0; = p2251*p1023
- p3397: 0; = p3378*p1234
- p1091: 0.000154306; = IF(p1071=0;p1085*p0001/(p0818*p0002);0)
- p3432: 0; = p3375*p1239
- p3061: 3.15708e-5; = p2280*p1023
- p2951: 0.00343685; = p2365*(p1020+p1022)
- p3090: 0; = p2309*p1082
- p1696: 0
- p2210: 0.000324027; = 6*1.00794*p2208/30.973762
- p3277: 0
- p2974: 0; = p2388*(p1079+p1081)
- p3372: 0; = if(p1232=0;p3245*p3360/p0818;0)
- p3161: 0; = p2380*p1082
- p1858: 0
- p0509: 0; = SQRT(2)*(IF((2*p0377-1)<0;-1;IF((2*p0377-1)>0;1;0))*SQRT(SQRT((2/(pi()*0.140012289)+LN(1-(2*p0377-1)^2)/2)^2-LN(1-(2*p0377-1)^2)/0.140012289)-(2/(pi()*0.140012289)+LN(1-(2*p0377-1)^2)/2)))
- p1919: 0
- p3204: 0; = p2423*p1082
- p0861: 0; = p0673*1000/p0856
- p2110: 0.856281
- p0534: 0; = SQRT(2)*(IF((2*p0402-1)<0;-1;IF((2*p0402-1)>0;1;0))*SQRT(SQRT((2/(pi()*0.140012289)+LN(1-(2*p0402-1)^2)/2)^2-LN(1-(2*p0402-1)^2)/0.140012289)-(2/(pi()*0.140012289)+LN(1-(2*p0402-1)^2)/2)))
- p1493: 82
- p1079: 0.52079; = IF(p1071=0;IF(p1073+p1078=1;0;IF(p1073+p1078+p1075>1;1-(p1073+p1078);p1075));0)
- p1290: 0; = IF(p1287=p1264;0;IF(p1287+p1288>p1264;p1264-p1287;p1288))
- p1915: 0
- p4922: 0; = p1955*p3482
- p0082: 99.137
- p1834: 0
- p2791: 0; = p2400*(p1019+p1021)
- p0789: 0
- p1655: 0
- p2341: 8.4559e-5; = p2228*p2209
- p2940: 0.00472039; = p2354*(p1020+p1022)
- p2901: 5.41387e-5; = p2315*(p1020+p1022)
- p1745: 0
- p0483: 0; = SQRT(2)*(IF((2*p0351-1)<0;-1;IF((2*p0351-1)>0;1;0))*SQRT(SQRT((2/(pi()*0.140012289)+LN(1-(2*p0351-1)^2)/2)^2-LN(1-(2*p0351-1)^2)/0.140012289)-(2/(pi()*0.140012289)+LN(1-(2*p0351-1)^2)/2)))
- p1099: 0.663396
- p1836: 0
- p2559: 0.000260469; = p2363*p1014
- p2676: 6.53863e-5; = p2285*(p1019+p1021)
- p2297: 0.00403398; = p2227*p2204
- p5268: 9.23956e-6; = p1889*p3484
- p2501: 1.24622e-6; = p2305*p1073
- p2674: 0.000227158; = p2283*(p1019+p1021)
- p2931: 9.09642e-6; = p2345*(p1079+p1081)
- p0327: 0.5
- p0944: 0; = if(and(p0683=0;p0950=0);p0938;0)
- p4729: 0; = p1762*p3482
- p1462: 24
- p1566: 0
- p3782: 0.000229506; = p1845*p3477
- p2853: 0; = p2267*(p1079+p1081)
- p4294: 3.39132e-6; = p1945*p3479
- p1763: 0
- p4995: 9.19623e-7; = p1822*p3483
- p2712: 1.6036e-5; = p2321*(p1019+p1021)
- p3400: 0; = p3362*p1238
- p2047: 2.31846e-13; = p2015*p2045/(p0818*1000000000000)
- p3327: 0; = if(and(p1232=0;p3255<>0);1-(p3323+p3324+p3325+p3326);0)
- p1244: 0; = if(p1232>0;0;p1239*(p0725/100)*p0723*1000)
- p1817: 0
- p2884: 0.00190006; = p2298*(p1079+p1081)
- p0258: 28.721
- p0887: 0; = 1000*p0886*p0001*p0003*p0004/(p0818*p0002)
- p1800: 0
- p5130: 3.7282e-7; = p1957*p3483
- p0715: 0
- p4260: 9.40818e-6; = p1911*p3479
- p0139: 100.513
- p1320: 4.46812; = IF(((p0745*1000*p0747/100)+(p0754*1000*p0756/100))/p0801<0;0;((p0745*1000*p0747/100)+(p0754*1000*p0756/100))/p0801)
- p2034: 3.07707e-5; = p2015*p2030*p2032/(p0818*1000)
- p5338: 0.000277914; = p1963*p3484
- p4221: 9.07999e-6; = p1872*p3479
- p3458: 0; = p3363*p1241
- p2326: 0.000213831; = p2224*p2193
- p1569: 0
- p0683: 10.85; = p0023*(1+p0551*p0155/100)
- p3115: 5.93436e-8; = p2334*p1023
- p3425: 0; = p3368*p1239
- p0359: 0.5
- p2899: 0.00153255; = p2313*(p1129+p1131)
- p1157: 0.24835
- p1902: 0
- p4660: 1.55128e-5; = p1899*p3481
- p1080: 0; = IF(p1071=0;IF(p1073+p1078+p1079=1;0;IF(p1073+p1078+p1079+p1076>1;1-(p1073+p1078+p1079);p1076));0)
- p2313: 0.00304671; = p2231*p2220
- p2798: 0; = p2407*(p1019+p1021)
- p3121: 0; = p2340*p1082
- p2214: 0.000529951; = p1107/p0818
- p2689: 0.00140271; = p2298*(p1078+p1080)
- p2197: 6.35325e-5; = p1055/p0818
- p3108: 3.36446e-7; = p2327*p1023
- p2445: 0; = p2249*p1014
- p1038: 0.0086688
- p1835: 0
- p2487: 3.23863e-5; = p2291*p1014
- p2183: 0.0110472; = p1064-p2182
- p2372: 0.004898; = p2225*p2201
- p4576: 1.81766e-5; = p1815*p3481
- p3043: 0; = p2262*p1082
- p1720: 0
- p2164: 0.0027993; = (p2015/p0818)-(p2022)-(p2035+p2036+p2052)-(p2017/p0818)-(p2039+p2041+p2044+p2158+p2159+p2160+p2161+p2162)
- p2005: 1.33995e7; = p1963*p0818+p1959*1000+p1170+p1176+p1182
- p0622: 0; = IF(p0358<0.5;-SQRT(p0007*EXP(p0490^2*p0008)-p0007);SQRT(p0007*EXP(p0490^2*p0008)-p0007))
- p3088: 0; = p2307*p1082
- p2478: 0.00506755; = p2282*p1014
- p3037: 0; = p2256*p1023
- p2284: 0.00154392; = p2223*p2190
- p4703: 1.19088e-5; = p1942*p3481
- p2888: 0.000346797; = p2302*(p1079+p1081)
- p2904: 3.92474e-6; = p2318*(p1020+p1022)
- p1202: 0.7
- p2055: 5.59471
- p0757: 29.335; = p0097*(1+p0625*p0229/100)
- p2638: 0; = p2247*(p1019+p1021)
- p0776: 51.197; = p0116*(1+p0644*p0248/100)
- p2335: 9.26877e-5; = p2224*p2203
- p0103: 1119.07
- p1173: 0.5
- p1869: 1.55473e-5; = p1461*1000/p0818
- p1959: 8585.9; = if(p0738*p0740*p0739>0;p0738*1000*(p0740/100)*p0739/1000;p1958)
- p1818: 0
- p0496: 0; = SQRT(2)*(IF((2*p0364-1)<0;-1;IF((2*p0364-1)>0;1;0))*SQRT(SQRT((2/(pi()*0.140012289)+LN(1-(2*p0364-1)^2)/2)^2-LN(1-(2*p0364-1)^2)/0.140012289)-(2/(pi()*0.140012289)+LN(1-(2*p0364-1)^2)/2)))
- p2601: 0; = p2405*p1014
- p1203: 3
- p2296: 0.00770855; = p2223*p2203
- p1324: 2.09271; = IF(((p0745*1000*p0751/100)+(p0754*1000*p0760/100))/p0801<0;0;((p0745*1000*p0751/100)+(p0754*1000*p0760/100))/p0801)
- p0084: 94.791
- p2160: 5.53732e-7; = p2015*p2084*p2122/(p0818*1000)
- p2921: 1.7086e-5; = p2335*(p1020+p1022)
- p3021: 0; = p2240*p1023
- p2748: 0.000312629; = p2357*(p1019+p1021)
- p1678: 0
- p0499: 0; = SQRT(2)*(IF((2*p0367-1)<0;-1;IF((2*p0367-1)>0;1;0))*SQRT(SQRT((2/(pi()*0.140012289)+LN(1-(2*p0367-1)^2)/2)^2-LN(1-(2*p0367-1)^2)/0.140012289)-(2/(pi()*0.140012289)+LN(1-(2*p0367-1)^2)/2)))
- p3431: 0; = p3374*p1239
- p3433: 0; = p3376*p1239
- p4259: 2.35205e-6; = p1910*p3479
- p3322: 0; = if(and(p1232=0;p3253<>0);p3253-(p3317+p3318+p3319+p3320+p3321);0)
- p3155: 5.93182e-5; = p2374*p1023
- p3466: 0; = p3371*p1241
- p2102: 0.922577
- p0884: 0; = IF(p0689=100;0;IF(p0689+p0688>100;100-p0689;p0688))
- p2504: 0.000168119; = p2308*p1073
- p0140: 56.486
- p1204: 0.980791
- p2083: 2.17294
- p3477: 0.301262; = if(p1328+p1330+p1332+p1334+p1336+p1338+p1340+p1342+p1344=0;0;p1330/(p1328+p1330+p1332+p1334+p1336+p1338+p1340+p1342+p1344))
- p4246: 1.6519e-5; = p1897*p3479
- p3030: 0; = p2249*p1023
- p1846: 0
- p0938: 0; = p0932*p0001/(p0818*p0002)
- p0174: 0
- p2105: 0.888194
- p2616: 0; = p2420*p1073
- p2288: 0.00381215; = p2223*p2195
- p3042: 0; = p2261*p1082
- p0930: 0; = p0801*p0924
- p0754: 8879.3; = p0094*(1+p0622*p0226/100)
- p3048: 0; = p2267*p1082
- p1556: 0
- p4478: 0; = p1923*p3480
- p4032: 3.77873e-5; = p1889*p3478
- p2552: 0.000344875; = p2356*p1014
- p3201: 0; = p2420*p1082
- p0638: 0; = IF(p0374<0.5;-SQRT(p0007*EXP(p0506^2*p0008)-p0007);SQRT(p0007*EXP(p0506^2*p0008)-p0007))
- p3208: 0; = p2427*p1082
- p2865: 0.000326409; = p2279*(p1020+p1022)
- p1793: 0
- p0855: 4.7512; = p0854*p0001*p0003/(p0818*p0002)
- p1011: 0; = p1010*p0001*p0004/(p0818*p0002)
- p3436: 0; = p3379*p1239
- p1704: 0
- p0394: 0.5
- p1192: 1.85444e-7; = p1188*p1191/p0818
- p2998: 0; = p2412*(p1020+p1022)
- p1414: 37
- p1811: 0
- p2745: 0.00431247; = p2354*(p1019+p1021)
- p3423: 0; = p3366*p1239
- p3198: 0; = p2417*p1082
- p1557: 0
- p1847: 0
- p2896: 0.000424156; = p2310*(p1079+p1081)
- p3343: 0; = if(and(p1232=0;p3254<>0);IF((p3339+p3340+p3341+p3342)+(p3254*(p3269*(1-p3277))/p3338)>p3254;p3254-(p3339+p3340+p3341+p3342);p3254*(p3269*(1-p3277))/p3338);0)
- p3122: 0; = p2341*p1082
- p2934: 6.00958e-6; = p2348*(p1079+p1081)
- p2161: 6.83992e-8; = p2015*p2085*p2123/(p0818*1000)
- p1012: 0
- p1643: 0
- p2260: 0; = p2226*p2206
- p2371: 0.0114246; = p2225*p2200
- p0956: 0; = if(and(p0683>0;or(p0807=56;p0807=100;and(p0807=60;p0901>0.06)));p0938;0)
- p3848: 5.75437e-5; = p1911*p3477
- p2486: 1.97316e-5; = p2290*p1014
- p2306: 0.00013755; = p2227*p2213
- p0570: 0; = IF(p0306<0.5;-SQRT(p0007*EXP(p0438^2*p0008)-p0007);SQRT(p0007*EXP(p0438^2*p0008)-p0007))
- p4214: 1.64096e-7; = p1865*p3479
- p1218: 0.5
- p0825: 8.2484e8; = p0818*p0822
- p1843: 0
- p1030: 0.000697669; = IF(p1012=0;p1024*p0001/(p0818*p0002);0)
- p2507: 0; = p2311*p1123
- p3016: 0; = p2430*(p1129+p1131)
- p2963: 0; = p2377*(p1079+p1081)
- p2070: 0.282
- p3164: 0; = p2383*p1082
- p4616: 2.09971e-5; = p1855*p3481
- p2357: 0.00185636; = p2225*p2185
- p0478: 0; = SQRT(2)*(IF((2*p0346-1)<0;-1;IF((2*p0346-1)>0;1;0))*SQRT(SQRT((2/(pi()*0.140012289)+LN(1-(2*p0346-1)^2)/2)^2-LN(1-(2*p0346-1)^2)/0.140012289)-(2/(pi()*0.140012289)+LN(1-(2*p0346-1)^2)/2)))
- p3076: 4.93543e-6; = p2295*p1023
- p3452: 0; = p3376*p1240
- p4582: 1.09686e-6; = p1821*p3481
- p2995: 0; = p2409*(p1020+p1022)
- p1154: 0.131161; = if(p1152*p0818=0;0;p1150/(p1152*p0818))
- p1345: 0.000855822; = IF(p1318=0;p1344*p0001/(p0818*p0002);0)
- p1050: 4.53175e7; = IF(p1012=0;p1037*p1036;0)
- p3334: 0; = IF(or(p3254=0;p1232>0);0;p3269*p3277*(p3300*p3292+(1-p3300)*p3296))
- p1563: 0
- p4988: 2.88314e-6; = p1815*p3483
- p2984: 0; = p2398*(p1020+p1022)
- p2634: 0; = p2243*(p1019+p1021)
- p2547: 0; = p2351*p1123
- p0768: 53.072; = p0108*(1+p0636*p0240/100)
- p0751: 24.819; = p0091*(1+p0619*p0223/100)
- p3008: 0; = p2422*(p1079+p1081)
- p0345: 0.5
- p1933: 0
- p2044: 3.44321e-7; = p2015*p2042*p2043/(p0818*1000)
- p1028: 202848; = IF(p1012=0;p1022*(p0704/100)*p0703*1000;0)
- p1056: 2.02185e7; = IF(p1012=0;p1049*p1036;0)
- p0371: 0.5
- p1195: 0.45
- p0918: 0; = p0680*1000/p0801
- p0817: 0
- p0628: 0; = IF(p0364<0.5;-SQRT(p0007*EXP(p0496^2*p0008)-p0007);SQRT(p0007*EXP(p0496^2*p0008)-p0007))
- p1945: 6.88522e-5; = p1537*1000/p0818
- p2863: 0.000988365; = p2277*(p1020+p1022)
- p1719: 0.4576
- p2400: 0; = p2234*p2189
- p0931: 0; = p0801*p0925
- p1125: 0.50302; = if(p1121=0;p0719/100;0)
- p3216: 0.06; = IF(OR(p1226=0;p1228=0);0;1-p3213-p3214-p3215)
- p1827: 0
- p0881: 0; = p0880*p0001*p0003/(p0818*p0002)
- p0088: 12.001
- p3172: 4.21107e-5; = p2391*p1132
- p1229: 0.00785127; = IF(p1221=0;0;p1228*p1221)
- p3092: 0.00332502; = p2311*p1132
- p1210: 0.18
- p1188: 333.977; = p1187*p0801
- p5005: 1.28996e-5; = p1832*p3483
- p0213: 5.67
- p3465: 0; = p3370*p1241
- p1918: 0
- p1942: 8.43994e-5; = p1534*1000/p0818
- p2403: 0; = p2234*p2192
- p2270: 0; = p2226*p2216
- p1220: 0; = IF(p1218<0.5;-SQRT(p1214*EXP(p1219^2*p1215)-p1214);SQRT(p1214*EXP(p1219^2*p1215)-p1214))
- p0096: 51.091
- p0738: 1118.79; = p0078*(1+p0606*p0210/100)
- p2996: 0; = p2410*(p1020+p1022)
- p0667: 0; = IF(p0403<0.5;-SQRT(p0007*EXP(p0535^2*p0008)-p0007);SQRT(p0007*EXP(p0535^2*p0008)-p0007))
- p2359: 0.000648989; = p2225*p2187
- p2722: 2.25323e-7; = p2331*(p1019+p1021)
- p2191: 0.000799965; = 8*1.00794*p2189/(2*14.0067)
- p5302: 8.66209e-7; = p1923*p3484
- p1068: 0.122139; = IF(p1012=0;p1054/(p1061*p0818);0)
- p3338: 0; = if(and(p1232=0;p3254<>0);1-(p3334+p3335+p3336+p3337);0)
- p1258: 0; = if(p1232>0;0;IF(p1253+p1256+p1257=1;0;1-(p1253+p1256+p1257)))
- p2165: 1.50967; = (p0833-p2014)/p0818-p0839
- p2471: 0; = p2275*p1123
- p3364: 0; = if(p1232=0;p3244*p3358/p0818;0)
- p2913: 8.44964e-6; = p2327*(p1020+p1022)
- p1950: 0
- p3046: 0; = p2265*p1082
- p1828: 0
- p3244: 0; = p0791/100
- p0969: 1.21389e7; = p0966*p0683*p0682*1000
- p1790: 0
- p2318: 2.12908e-5; = p2224*p2185
- p5052: 3.23111e-7; = p1879*p3483
- p2324: 4.6684e-6; = p2224*p2191
- p4100: 3.54256e-6; = p1957*p3478
- p1932: 0
- p1065: 0.00470753; = IF(p1012=0;p1051/(p1058*p0818);0)
- p2918: 2.41541e-5; = p2332*(p1020+p1022)
- p2374: 0.0080815; = p2225*p2203
- p0986: 0; = IF(p0982+p0985=1;0;IF(p0982+p0985+p0984>1;1-(p0982+p0985);p0984))
- p0587: 0; = IF(p0323<0.5;-SQRT(p0007*EXP(p0455^2*p0008)-p0007);SQRT(p0007*EXP(p0455^2*p0008)-p0007))
- p3451: 0; = p3375*p1240
- p2114: 0.832356
- p1883: 0
- p4836: 0; = p1869*p3482
- p4864: 0; = p1897*p3482
- p1666: 0.885279
- p3958: 2.73958e-5; = p1815*p3478
- p0950: 0; = if(and(p0683=0;or(p0807=480;p0807=32;p0807=1;and(p0807=60;p0901<0.03)));p0938;0)
- p2750: 0.000109296; = p2359*(p1019+p1021)
- p2630: 0; = p2239*(p1019+p1021)
- p0730: 0
- p0441: 0; = SQRT(2)*(IF((2*p0309-1)<0;-1;IF((2*p0309-1)>0;1;0))*SQRT(SQRT((2/(pi()*0.140012289)+LN(1-(2*p0309-1)^2)/2)^2-LN(1-(2*p0309-1)^2)/0.140012289)-(2/(pi()*0.140012289)+LN(1-(2*p0309-1)^2)/2)))
- p1604: 0
- p4153: 7.65782e-7; = p1804*p3479
- p1610: 0
- p1946: 0
- p0506: 0; = SQRT(2)*(IF((2*p0374-1)<0;-1;IF((2*p0374-1)>0;1;0))*SQRT(SQRT((2/(pi()*0.140012289)+LN(1-(2*p0374-1)^2)/2)^2-LN(1-(2*p0374-1)^2)/0.140012289)-(2/(pi()*0.140012289)+LN(1-(2*p0374-1)^2)/2)))
- p2346: 5.97124e-5; = p2228*p2214
- p1693: 0.384846
- p2842: 0; = p2256*(p1020+p1022)
- p5070: 7.50611e-6; = p1897*p3483
- p3303: 0; = if(and(p1232=0;p3252<>0);p3259*p3289;0)
- p1589: 0
- p1638: 0
- p0188: 11.728
- p4585: 2.49145e-5; = p1824*p3481
- p2201: 0.00962615; = 12.01*p2200/(2*14.0067)
- p3186: 0; = p2405*p1023
- p1163: 0.00483226
- p2410: 0; = p2234*p2200
- p1094: 0; = IF(p1071=0;p1088*p0001/(p0818*p0002);0)
- p2776: 0; = p2385*(p1078+p1080)
- p4218: 7.65782e-7; = p1869*p3479
- p1683: 0.849738
- p1266: 0; = if(p1232>0;0;IF(p1259+p1263+p1264+p1265=1;0;1-(p1259+p1263+p1264+p1265)))
- p1568: 0
- p2332: 0.00013103; = p2224*p2200
- p2377: 0; = p2229*p2206
- p0361: 0.5
- p0654: 0; = IF(p0390<0.5;-SQRT(p0007*EXP(p0522^2*p0008)-p0007);SQRT(p0007*EXP(p0522^2*p0008)-p0007))
- p3095: 0.000438534; = p2314*p1132
- p3083: 0; = p2302*p1082
- p1327a: 0.771235; = (p0745*1000/p0801)*(1-(p0746+p0747+p0748+p0749+p0750+p0751+p0752+p0753)/100)+(p0754*1000/p0801)*(1-(p0755+p0756+p0757+p0758+p0759+p0760+p0761+p0762)/100)
- p0137: 47.283
- p2290: 3.0835e-5; = p2223*p2197
- p3356: 0; = if(p1232=0;p3306+p3317+p3328+p3339+p3350;0)
- p1175: 0.000402674
- p0634: 0; = IF(p0370<0.5;-SQRT(p0007*EXP(p0502^2*p0008)-p0007);SQRT(p0007*EXP(p0502^2*p0008)-p0007))
- p1237: 0; = if(p1232>0;0;p0729/100)
- p0677: 0
- p2671: 0.000724365; = p2280*(p1019+p1021)
- p3250: 0
- p0743: 2.19; = p0083*(1+p0611*p0215/100)
- p0737: 0
- p3047: 0; = p2266*p1082
- p0386: 0.5
- p1199: -0.29
- p0996: 0; = if(p0888=0;0;if((p0691*p0690*1000*p0692/100)/p0888>1;1;(p0691*p0690*1000*p0692/100)/p0888))
- p3349: 0; = if(and(p1232=0;p3256<>0);1-(p3345+p3346+p3347+p3348);0)
- p1109: 4.09379e6; = IF(p1071=0;p1105*p1103*p1095;0)
- p2807: 0; = p2416*(p1078+p1080)
- p0287: 0.5
- p3478: 0.212667; = if(p1328+p1330+p1332+p1334+p1336+p1338+p1340+p1342+p1344=0;0;p1332/(p1328+p1330+p1332+p1334+p1336+p1338+p1340+p1342+p1344))
- p5147: 1.06255e-5; = p1768*p3484
- p1920: 0
- p4968: 2.23692e-7; = p1795*p3483
- p2821: 0; = p2430*(p1128+p1130)
- p2808: 0; = p2417*(p1078+p1080)
- p1787: 4.21997e-5; = p1379*1000/p0818
- p1743: 0.948955
- p3654: 3.68694e-6; = p1923*p3476
- p1616: 0
- p3966: 1.77128e-5; = p1823*p3478
- p3368: 0; = if(p1232=0;p3245*p3356/p0818;0)
- p3308: 0; = if(and(p1232=0;p3252<>0);p3252*(p3259-p3303)/p3305;0)
- p3473: 0; = p3378*p1241
- p2846: 0; = p2260*(p1079+p1081)
- p1166: 6.01028e-6; = p1164/p0818
- p3125: 0; = p2344*p1082
- p1691: 0
- p2778: 0; = p2387*(p1078+p1080)
- p1241: 0; = if(p1232>0;0;IF(p1234+p1238+p1239+p1240=1;0;1-(p1234+p1238+p1239+p1240)))
- p3173: 7.31775e-5; = p2392*p1132
- p0309: 0.5
- p2396: 0; = p2234*p2185
- p0889: 0; = 1000*p0888*p0001*p0003*p0004/(p0818*p0002)
- p2385: 0; = p2229*p2214
- p1825: 0
- p2562: 0.00255745; = p2366*p1014
- p3350: 0; = if(and(p1232=0;p3256<>0);p3256*(p3273*p3277-p3345)/p3349;0)
- p3007: 0; = p2421*(p1079+p1081)
- p1755: 0
- p1709: 0
- p3295: 0
- p1223: 0.56
- p0316: 0.5
- p1153: 0.365265
- p2975: 0.0033695; = p2389*(p1129+p1131)
- p1111: 0.0872841
- p1717: 0
- p2914: 8.3525e-5; = p2328*(p1020+p1022)
- p2018: 0.1978
- p4631: 3.76067e-6; = p1870*p3481
- p2608: 0; = p2412*p1014
- p0269: 6.901
- p0898: 0.45335
- p1039: 0.0725313
- p2355: 0.00562104; = p2225*p2183
- p2898: 0.0284555; = p2312*(p1129+p1131)
- p2141: 1.344e-6; = p2015*p2069*p2103/(p0818*1000)
- p1750: 0
- p0828: 0.136719; = if(p0827=0;0;p0819-p0827/p0818)
- p1957: 1.66578e-5; = p1549*1000/p0818
- p4111: 2.22077e-5; = p1762*p3479
- p1145: 6.3536e7; = if(p1121=0;p0799*p0702*1000*p0800/100;0)
- p3212: 0; = p2431*p1132
- p0946: 0; = if(and(p0683=0;or(p0807=480;p0807=32;p0807=1;and(p0807=60;p0901<0.03)));p0934;0)
- p0487: 0; = SQRT(2)*(IF((2*p0355-1)<0;-1;IF((2*p0355-1)>0;1;0))*SQRT(SQRT((2/(pi()*0.140012289)+LN(1-(2*p0355-1)^2)/2)^2-LN(1-(2*p0355-1)^2)/0.140012289)-(2/(pi()*0.140012289)+LN(1-(2*p0355-1)^2)/2)))
- p2414: 0; = p2235*p2204
- p3068: 0.000130533; = p2287*p1023
- p2383: 0; = p2229*p2212
- p3435: 0; = p3378*p1239
- p2657: 0; = p2266*(p1078+p1080)
- p1416: 159
- p0680: 0
- p2871: 7.15712e-5; = p2285*(p1020+p1022)
- p3285: 0
- p2050: 0.952062
- p1658: 0
- p1278: 0
- p2113: 0.832356
- p1117: 0.00252982; = IF(p1071=0;p1107/(p1112*p0818);0)
- p4606: 0.000107493; = p1845*p3481
- p3024: 0; = p2243*p1023
- p0417: 0; = SQRT(2)*(IF((2*p0285-1)<0;-1;IF((2*p0285-1)>0;1;0))*SQRT(SQRT((2/(pi()*0.140012289)+LN(1-(2*p0285-1)^2)/2)^2-LN(1-(2*p0285-1)^2)/0.140012289)-(2/(pi()*0.140012289)+LN(1-(2*p0285-1)^2)/2)))
- p1104: 0.242165; = IF(p1071=0;IF(p1096+p1101+p1102+p1103=1;0;1-(p1096+p1101+p1102+p1103));0)
- p2235: 0; = 1-(p2226+p2227+p2228+p2229)
- p1318: 0; = p1317*p0001/(p0818*p0002)
- p2298: 0.00364843; = p2227*p2205
- p3826: 5.35291e-5; = p1889*p3477
- p4323: 0; = p1768*p3480
- p0625: 0; = IF(p0361<0.5;-SQRT(p0007*EXP(p0493^2*p0008)-p0007);SQRT(p0007*EXP(p0493^2*p0008)-p0007))
- p2462: 0; = p2266*p1073
- p3126: 0; = p2345*p1082
- p3347: 0; = if(and(p1232=0;p3256<>0);p3275*p3289;0)
- p2429: 0; = p2236*p2219
- p0955: 0; = if(and(p0683>0;or(p0807=56;p0807=100;and(p0807=60;p0901>0.06)));p0937;0)
- p4094: 0.000205468; = p1951*p3478
- p0609: 0; = IF(p0345<0.5;-SQRT(p0007*EXP(p0477^2*p0008)-p0007);SQRT(p0007*EXP(p0477^2*p0008)-p0007))
- p2522: 0.000136833; = p2326*p1014
- p2244: 0; = p2222*p2189
- p2968: 0; = p2382*(p1079+p1081)
- p0080: 99.202
- p2887: 0.000766892; = p2301*(p1079+p1081)
- p2651: 0; = p2260*(p1078+p1080)
- p0752: 0
- p1688: 0
- p1940: 0
- p4013: 5.6681e-6; = p1870*p3478
- p0215: 5.082
- p5083: 1.06875e-6; = p1910*p3483
- p2902: 1.18841e-5; = p2316*(p1020+p1022)
- p1581: 0
- p1407: 116
- p1138: 52358.3; = if(p1121=0;p1132*(p0716/100)*p0703*1000;0)
- p2789: 0; = p2398*(p1019+p1021)
- p0998: 0; = if(p0888=0;0;if((p0699*p0698*1000*p0700/100)/p0888>1;1;(p0699*p0698*1000*p0700/100)/p0888))
- p2795: 0; = p2404*(p1019+p1021)
- p1997: 1.60156e8; = (if(p1152=0;0;p1150/p1152)+if(p1153=0;0;p1151/p1153))*(1+p1157)
- p0914: 2.40139e7; = p0825*p0911+p0827*p0912+(p0830+p0895)*p0824*p0913
- p0652: 0; = IF(p0388<0.5;-SQRT(p0007*EXP(p0520^2*p0008)-p0007);SQRT(p0007*EXP(p0520^2*p0008)-p0007))
- p2488: 7.12046e-5; = p2292*p1014
- p1422: 9
- p5183: 8.08461e-7; = p1804*p3484
- p4773: 0; = p1806*p3482
- p2654: 0; = p2263*(p1078+p1080)
- p0377: 0.5
- p4015: 3.92043e-5; = p1872*p3478
- p2262: 0; = p2226*p2208
- p2788: 0; = p2397*(p1019+p1021)
- p3352: 0; = if(and(p1232=0;p3256<>0);p3256*(p3275-p3347)/p3349;0)
- p1503: 172
- p3141: 6.09389e-5; = p2360*p1023
- p0526: 0; = SQRT(2)*(IF((2*p0394-1)<0;-1;IF((2*p0394-1)>0;1;0))*SQRT(SQRT((2/(pi()*0.140012289)+LN(1-(2*p0394-1)^2)/2)^2-LN(1-(2*p0394-1)^2)/0.140012289)-(2/(pi()*0.140012289)+LN(1-(2*p0394-1)^2)/2)))
- p2312: 0.0565694; = p2231*p2219
- p2314: 0.00529438; = p2231*p2221
- p3628: 7.42304e-5; = p1897*p3476
- p1554: 0
- p3217: 0.00815643; = p3213*p1228
- p2579: 0; = p2383*p1073
- p0846: 0.428161; = p0841*p0845^3+p0842*p0845^2+p0843*p0845+p0844
- p1049: 0.183763; = IF(p1012=0;IF(p1037+p1044+p1045+p1046+p1047+p1048=1;0;1-(p1037+p1044+p1045+p1046+p1047+p1048));0)
- p3410: 0; = p3372*p1238
- p0767: 24.603; = p0107*(1+p0635*p0239/100)
- p0759: 0
- p3421: 0; = p3364*p1239
- p3965: 8.73831e-6; = p1822*p3478
- p3105: 3.4266e-8; = p2324*p1023
- p5181: 3.21075e-5; = p1802*p3484
- p1217: 48.8293
- p4420: 0; = p1865*p3480
- p3152: 8.38567e-5; = p2371*p1023
- p0920: 0; = p0676*1000/p0801
- p0086: 40.59
- p2828: 0; = p2242*(p1020+p1022)
- p3479: 0.0492551; = if(p1328+p1330+p1332+p1334+p1336+p1338+p1340+p1342+p1344=0;0;p1334/(p1328+p1330+p1332+p1334+p1336+p1338+p1340+p1342+p1344))
- p1298: 0
- p3082: 0; = p2301*p1082
- p0959: 0; = if(and(p0683>0;or(p0807=480;p0807=32;p0807=1;and(p0807=60;p0901<0.03)));p0935;0)
- p2446: 0; = p2250*p1014
- p3686: 9.65979e-5; = p1955*p3476
- p0980: 0; = IF(p0977=0;0;p0977*p0001/(p0818*p0002))
- p2831: 0; = p2245*(p1020+p1022)
- p2401: 0; = p2234*p2190
- p4219: 1.31277e-6; = p1870*p3479
- p0982: 0; = if(p0886=0;0;min(1;(p0691*p0690*1000*p0693/100)/p0886))
- p4640: 2.03703e-6; = p1879*p3481
- p2708: 1.04097e-6; = p2317*(p1019+p1021)
- p0947: 0; = if(and(p0683=0;or(p0807=480;p0807=32;p0807=1;and(p0807=60;p0901<0.03)));p0935;0)
- p2234: 0; = 1-(p2222+p2223+p2224+p2225)
- p1654: 0
- p3057: 0.000179281; = p2276*p1023
- p3230: 4.49064e-7; = p1170/p0818
- p2061: 0.518824
- p2276: 0.0244253; = p2223*p2182
- p0240: 7.815
- p2861: 0.00050423; = p2275*(p1129+p1131)
- p1677: 0
- p0958: 0; = if(and(p0683>0;or(p0807=480;p0807=32;p0807=1;and(p0807=60;p0901<0.03)));p0934;0)
- p0829: 0.0832195; = if(p0807=480;p0814*(1-p0824);0)
- p4648: 1.09686e-5; = p1887*p3481
- p2207: 0.0110552; = p1119-p2205-p2204-p2206
- p2192: 0.00647384; = p1067-p2189-p2190-p2191
- p5244: 1.73242e-7; = p1865*p3484
- p2208: 0.00165954; = p1110/p0818
- p0894: 0.2085
- p3127: 0; = p2346*p1082
- p2645: 0; = p2254*(p1019+p1021)
- p1864: 0
- p2232: 0; = if(p0783*p0787+p0784*p0788+p0785*p0789+p0786*p0790=0;0;p0789*p0785/(p0783*p0787+p0784*p0788+p0785*p0789+p0786*p0790))
- p3332: 0; = if(and(p1232=0;p3255<>0);IF((p3328+p3329+p3330+p3331)+(p3255*(p3265*(1-p3277))/p3327)>p3255;p3255-(p3328+p3329+p3330+p3331);p3255*(p3265*(1-p3277))/p3327);0)
- p0902: 0.0377084
- p4591: 1.41025e-6; = p1830*p3481
- p1944: 0
- p3385: 0; = p3366*p1234
- p2279: 0.00177069; = p2223*p2185
- p1894: 0.00116716; = p1486*1000/p0818
- p2718: 7.71946e-6; = p2327*(p1019+p1021)
- p0686: 0
- p2941: 0.00103618; = p2355*(p1020+p1022)
- p1026: 0; = IF(p1012=0;p1020*(p0704/100)*p0703*1000;0)
- p5043: 5.96512e-7; = p1870*p3483
- p1201: 0.65
- p3110: 2.72137e-9; = p2329*p1023
- p1866: 0
- p1903: 0.000151031; = p1495*1000/p0818
- p1851: 0
- p1072: 0; = p1071*p0001/(p0818*p0002)
- p0447: 0; = SQRT(2)*(IF((2*p0315-1)<0;-1;IF((2*p0315-1)>0;1;0))*SQRT(SQRT((2/(pi()*0.140012289)+LN(1-(2*p0315-1)^2)/2)^2-LN(1-(2*p0315-1)^2)/0.140012289)-(2/(pi()*0.140012289)+LN(1-(2*p0315-1)^2)/2)))
- p2906: 1.3721e-6; = p2320*(p1020+p1022)
- p2248: 0; = p2222*p2193
- p0690: 0
- p2926: 9.73824e-5; = p2340*(p1079+p1081)
- p0798: 26.723; = p0138*(1+p0666*p0270/100)
- p5174: 5.19725e-7; = p1795*p3484
- p3206: 0; = p2425*p1082
- p3139: 3.30982e-5; = p2358*p1023
- p2770: 0; = p2379*(p1078+p1080)
- p0726: 0
- p3459: 0; = p3364*p1241
- p2749: 0.00075941; = p2358*(p1019+p1021)
- p0009: 9.288
- p0805: 0
- p5045: 4.12588e-6; = p1872*p3483
- p1019: 0.07117; = IF(p1012=0;IF(p1014=1;0;IF(p1014+p1015>1;1-p1014;p1015));0)
- p3373: 0; = if(p1232=0;p3245*p3361/p0818;0)
- p1617: 0.49725
- p2422: 0; = p2235*p2212
- p0644: 0; = IF(p0380<0.5;-SQRT(p0007*EXP(p0512^2*p0008)-p0007);SQRT(p0007*EXP(p0512^2*p0008)-p0007))
- p0228: 7.706
- p3003: 0; = p2417*(p1079+p1081)
- p2615: 0; = p2419*p1073
- p2118: 0.679049
- p1906: 0
- p1415: 75
- p1782: 0
- p2977: 0.000255735; = p2391*(p1129+p1131)
- p2353: 0; = p2232*p2221
- p5330: 5.02401e-5; = p1951*p3484
- p3535: 3.44115e-6; = p1804*p3476
- p2444: 0; = p2248*p1014
- p4098: 9.28151e-5; = p1955*p3478
- p5211: 2.99708e-5; = p1832*p3484
- p1342: 371776; = p1326*p0801
- p3457: 0; = p3362*p1241
- p2785: 0; = p2394*(p1019+p1021)
- p2472: 0.01563; = p2276*p1014
- p3271: 0
- p0576: 0; = IF(p0312<0.5;-SQRT(p0007*EXP(p0444^2*p0008)-p0007);SQRT(p0007*EXP(p0444^2*p0008)-p0007))
- p0706: 7.117; = p0046*(1+p0574*p0178/100)
- p2805: 0; = p2414*(p1078+p1080)
- p3036: 0; = p2255*p1023
- p0511: 0; = SQRT(2)*(IF((2*p0379-1)<0;-1;IF((2*p0379-1)>0;1;0))*SQRT(SQRT((2/(pi()*0.140012289)+LN(1-(2*p0379-1)^2)/2)^2-LN(1-(2*p0379-1)^2)/0.140012289)-(2/(pi()*0.140012289)+LN(1-(2*p0379-1)^2)/2)))
- p3825: 0.00031281; = p1888*p3477
- p1715: 0
- p2126: 5.61821e-6; = p2015*p2054*p2088/(p0818*1000)
- p2910: 8.60572e-7; = p2324*(p1020+p1022)
- p2797: 0; = p2406*(p1019+p1021)
- p4512: 0; = p1957*p3480
- p4925: 0; = p1962*p3482
- p2862: 0.00450255; = p2276*(p1020+p1022)
- p4837: 0; = p1870*p3482
- p1738: 0.54188
- p1981: 400
- p3792: 4.48306e-5; = p1855*p3477
- p3111: 4.4667e-9; = p2330*p1023
- p3157: 0; = p2376*p1082
- p3454: 0; = p3378*p1240
- p2924: 7.81315e-5; = p2338*(p1079+p1081)
- p0957: 0; = if(and(p0683>0;or(p0807=56;p0807=100;and(p0807=60;p0901>0.06)));p0939;0)
- p0802: 1.1e6
- p4584: 1.17521e-5; = p1823*p3481
- p2500: 0.00035671; = p2304*p1073
- p2982: 0; = p2396*(p1020+p1022)
- p0181: 19.889
- p2677: 0.000529148; = p2286*(p1019+p1021)
- p1861: 0
- p3279: 0
- p2727: 0.000196944; = p2336*(p1078+p1080)
- p2890: 0.00196085; = p2304*(p1079+p1081)
- p1108: 92220.3; = IF(p1071=0;p1105*p1102*p1095;0)
- p3166: 0; = p2385*p1082
- p1673: 0
- p2783: 0.000365887; = p2392*(p1128+p1130)
- p1744: 0
- p0696: 0
- p0379: 0.5
- p3444: 0; = p3368*p1240
- p0507: 0; = SQRT(2)*(IF((2*p0375-1)<0;-1;IF((2*p0375-1)>0;1;0))*SQRT(SQRT((2/(pi()*0.140012289)+LN(1-(2*p0375-1)^2)/2)^2-LN(1-(2*p0375-1)^2)/0.140012289)-(2/(pi()*0.140012289)+LN(1-(2*p0375-1)^2)/2)))
- p2084: 0.21
- p0364: 0.5
- p3724: 1.27132e-5; = p1787*p3477
- p2187: 0.00127547; = 4*1.00794*p2186/(2*14.0067)
- p0843: 0.117921
- p2738: 8.66348e-5; = p2347*(p1078+p1080)
- p5185: 3.46483e-7; = p1806*p3484
- p0492: 0; = SQRT(2)*(IF((2*p0360-1)<0;-1;IF((2*p0360-1)>0;1;0))*SQRT(SQRT((2/(pi()*0.140012289)+LN(1-(2*p0360-1)^2)/2)^2-LN(1-(2*p0360-1)^2)/0.140012289)-(2/(pi()*0.140012289)+LN(1-(2*p0360-1)^2)/2)))
- p0155: 3.191
- p3302: 0; = if(and(p1232=0;p3252<>0);p3258*(p3278*(p3282*p1256+p3286*(p1253+p1257)+p1258*p3288+p3297*p3287));0)
- p0664: 0; = IF(p0400<0.5;-SQRT(p0007*EXP(p0532^2*p0008)-p0007);SQRT(p0007*EXP(p0532^2*p0008)-p0007))
- p2215: 0.00199987; = p1117-p2214
- p2618: 0; = p2422*p1073
- p1063: 0.455
- p1856: 0
- p0845: 0.5
- p2881: 0.000123951; = p2295*(p1020+p1022)
- p4387: 0; = p1832*p3480
- p2834: 0; = p2248*(p1020+p1022)
- p2138: 5.96746e-7; = p2015*p2066*p2100/(p0818*1000)
- p0455: 0; = SQRT(2)*(IF((2*p0323-1)<0;-1;IF((2*p0323-1)>0;1;0))*SQRT(SQRT((2/(pi()*0.140012289)+LN(1-(2*p0323-1)^2)/2)^2-LN(1-(2*p0323-1)^2)/0.140012289)-(2/(pi()*0.140012289)+LN(1-(2*p0323-1)^2)/2)))
- p0808: 735000
- p0538: 0; = IF(p0274<0.5;-SQRT(p0007*EXP(p0406^2*p0008)-p0007);SQRT(p0007*EXP(p0406^2*p0008)-p0007))
- p0778: 0
- p1156: 0.451867; = p1064+p1065+p1066+p1067+p1068+p1069+p1070+p1116+p1117+p1118+p1119+p1120+p1154+p1155
- p2591: 0; = p2395*p1014
- p4799: 0; = p1832*p3482
- p0537: 0; = IF(p0273<0.5;-SQRT(p0007*EXP(p0405^2*p0008)-p0007);SQRT(p0007*EXP(p0405^2*p0008)-p0007))
- p1833: 0
- p2576: 0; = p2380*p1073
- p3029: 0; = p2248*p1023
- p2066: 0.109412
- p2015: 6.95909e6; = p0830*p2011*p2013
- p0315: 0.5
- p0573: 0; = IF(p0309<0.5;-SQRT(p0007*EXP(p0441^2*p0008)-p0007);SQRT(p0007*EXP(p0441^2*p0008)-p0007))
- p2181: 2.23994e-7; = p0887+p0889+p0893+p2180
- p4897: 0; = p1930*p3482
- p2609: 0; = p2413*p1014
- p2621: 0; = p2425*p1073
- p0762: 4.187; = p0102*(1+p0630*p0234/100)
- p1700: 0
- p2448: 0; = p2252*p1014
- p4164: 6.34505e-6; = p1815*p3479
- p2584: 0; = p2388*p1073
- p1116: 0.000169841; = IF(p1071=0;p1106/(p1111*p0818);0)
- p4716: 6.1581e-5; = p1955*p3481
- p1551: 0
- p0909: 1.86718e7; = p0825*p0906+p0827*p0907+(p0830+p0895)*p0824*p0908
- p1360: 184
- p3052: 0; = p2271*p1082
- p0735: 0
- p0419: 0; = SQRT(2)*(IF((2*p0287-1)<0;-1;IF((2*p0287-1)>0;1;0))*SQRT(SQRT((2/(pi()*0.140012289)+LN(1-(2*p0287-1)^2)/2)^2-LN(1-(2*p0287-1)^2)/0.140012289)-(2/(pi()*0.140012289)+LN(1-(2*p0287-1)^2)/2)))
- p1868: 0
- p0227: 16.986
- p2886: 0.00510871; = p2300*(p1079+p1081)
- p2059: 1.00168
- p2103: 0.912485
- p0961: 0; = if(and(p0683>0;or(p0807=480;p0807=32;p0807=1;and(p0807=60;p0901<0.03)));p0937;0)
- p0355: 0.5
- p0993: 0; = p0989*p0001*p0004/(p0818*p0002)
- p0979: 0; = IF(p0976=0;0;p0976*p0001/(p0818*p0002))
- p1293: 0; = p1287*p1252/p0818
- p1577: 0
- p5132: 0.000119616; = p1963*p3483
- p1963k: 0.000570933; = p1744*p1948+p1745*p1949+p1746*p1950+p1747*p1951+p1748*p1952+p1749*p1953+p1750*p1954+p1751*p1955+p1752*p1956+p1753*p1957+p1961*p1962
- p1341: 0; = p1340*p0001/(p0818*p0002)
- p1865: 3.33156e-6; = p1457*1000/p0818
- p2518: 1.03783e-5; = p2322*p1014
- p2068: 0.153529
- p1732: 0
- p3847: 1.43859e-5; = p1910*p3477
- p2607: 0; = p2411*p1014
- p1276: 0; = p1272*p1252/p0818
- p2705: 0.00219267; = p2314*(p1128+p1130)
- p1247: 0; = if(p1232>0;0;p1242*p0001/(p0818*p0002))
- p1437: 686
- p0815: 0
- p1789: 0
- p2700: 3.4938e-5; = p2309*(p1078+p1080)
- p2231: 0.737353; = if(p0783*p0787+p0784*p0788+p0785*p0789+p0786*p0790=0;0;p0788*p0784/(p0783*p0787+p0784*p0788+p0785*p0789+p0786*p0790))
- p2045: 30
- p2907: 1.75529e-5; = p2321*(p1020+p1022)
- p0729: 0
- p4633: 2.60113e-5; = p1872*p3481
- p2835: 0; = p2249*(p1020+p1022)
- p0983: 0; = if(p0886=0;0;min(1;(p0695*p0694*1000*p0697/100)/p0886))
- p3231: 5.00838e-7; = p1176/p0818
- p2479: 0.000863135; = p2283*p1014
- p3251: 0; = p1252-(p3252+p3253+p3254+p3255+p3256)
- p1179: 0.5
- p0485: 0; = SQRT(2)*(IF((2*p0353-1)<0;-1;IF((2*p0353-1)>0;1;0))*SQRT(SQRT((2/(pi()*0.140012289)+LN(1-(2*p0353-1)^2)/2)^2-LN(1-(2*p0353-1)^2)/0.140012289)-(2/(pi()*0.140012289)+LN(1-(2*p0353-1)^2)/2)))
- p1751: 0.791173
- p2194: 0.214362
- p0717: 0
- p1703: 0
- p3175: 0; = p2394*p1023
- p3123: 0; = p2342*p1082
- p2545: 9.79811e-6; = p2349*p1073
- p2484: 0.00243943; = p2288*p1014
- p2806: 0; = p2415*(p1078+p1080)
- p3182: 0; = p2401*p1023
- p3563: 0.000127568; = p1832*p3476
- p3824: 2.3419e-5; = p1887*p3477
- p0954: 0; = if(and(p0683>0;or(p0807=56;p0807=100;and(p0807=60;p0901>0.06)));p0936;0)
- p0370: 0.5
- p2567: 0.00731073; = p2371*p1014
- p3116: 6.80327e-7; = p2335*p1023
- p1996: 30
- p1733: 0
- p2278: 0.000514071; = p2223*p2184
- p2855: 0; = p2269*(p1079+p1081)
- p0523: 0; = SQRT(2)*(IF((2*p0391-1)<0;-1;IF((2*p0391-1)>0;1;0))*SQRT(SQRT((2/(pi()*0.140012289)+LN(1-(2*p0391-1)^2)/2)^2-LN(1-(2*p0391-1)^2)/0.140012289)-(2/(pi()*0.140012289)+LN(1-(2*p0391-1)^2)/2)))
- p2349: 0.000103421; = p2228*p2217
- p1587: 0
- p1863: 0
- p0449: 0; = SQRT(2)*(IF((2*p0317-1)<0;-1;IF((2*p0317-1)>0;1;0))*SQRT(SQRT((2/(pi()*0.140012289)+LN(1-(2*p0317-1)^2)/2)^2-LN(1-(2*p0317-1)^2)/0.140012289)-(2/(pi()*0.140012289)+LN(1-(2*p0317-1)^2)/2)))
- p3330: 0; = if(and(p1232=0;p3255<>0);p3255*(p3267-p3325)/p3327;0)
- p1970: 1.12e6; = p0801
- p2966: 0; = p2380*(p1079+p1081)
- p3107: 1.56952e-6; = p2326*p1023
- p1090: 0.000113916; = IF(p1071=0;p1084*p0001/(p0818*p0002);0)
- p2339: 0.00124565; = p2228*p2207
- p2352: 0; = p2232*p2220
- p3443: 0; = p3367*p1240
- p2052: 9.5191e-6; = p2015*p2049*(1-p2050)/(p0818*1000)
- p2949: 7.50338e-5; = p2363*(p1020+p1022)
- p1947: 6.66311e-6; = p1539*1000/p0818
- p3346: 0; = if(and(p1232=0;p3256<>0);p3274*(p3281*(p3285*p1256+p3286*(p1253+p1257)+p1258*p3288));0)
- p2497: 0.00013951; = p2301*p1073
- p2125: 9.63821e-6; = p2015*p2053*p2087/(p0818*1000)
- p3117: 0; = p2336*p1082
- p1312: 0; = IF(p1307+p1310+p1311=p1266;0;p1266-(p1307+p1310+p1311))
- p0903: 0.0175
- p2840: 0; = p2254*(p1020+p1022)
- p2849: 0; = p2263*(p1079+p1081)
- p0703: 1119.07; = p0043*(1+p0571*p0175/100)
- p2124: 0.263965
- p0684: 0
- p1303: 0; = p1297*p1252/p0818
- p1101: 0.0773317; = IF(p1071=0;IF(p1096=1;0;IF(p1096+p1097>1;1-p1096;p1097));0)
- p2600: 0; = p2404*p1014
- p2408: 0; = p2234*p2198
- p2542: 5.65716e-6; = p2346*p1073
- p1086: 0; = IF(p1071=0;p1080*(p0710/100)*p0703*1000;0)
- p3035: 0; = p2254*p1023
- p2530: 5.17365e-6; = p2334*p1014
- p2174: 0.00954737; = p0895*p0903/p0818
- p2155: 9.49647e-7; = p2015*p2084*p2117/(p0818*1000)
- p2223: 0.485342; = if(p0765*p0769+p0766*p0770+p0767*p0771+p0768*p0772=0;0;p0770*p0766/(p0765*p0769+p0766*p0770+p0767*p0771+p0768*p0772))
- p2203: 0.0158827; = p1070-p2200-p2201-p2202
- p0184: 35.931
- p3091: 0; = p2310*p1082
- p2962: 0; = p2376*(p1079+p1081)
- p4514: 0; = p1963*p3480
- p1252: 0; = if(p1232>0;0;p0724*2000*p0723*1000*p0725/100)
- p3281: 0
- p4243: 5.74884e-5; = p1894*p3479
- p1307: 0
- p4870: 0; = p1903*p3482
- p1052: 7.98025e6; = IF(p1012=0;p1045*p1036;0)
- p0270: 15.759
- p3146: 0.000136848; = p2365*p1023
- p5278: 5.71698e-6; = p1899*p3484
- p2958: 0.000902897; = p2372*(p1020+p1022)
- p2029: 6.19
- p2356: 0.000538942; = p2225*p2184
- p0850: 0
- p4370: 0; = p1815*p3480
- p0252: 46.512
- p0702: 1119.07; = p0042*(1+p0570*p0174/100)
- p0852: 0; = p0847*p0851^3+p0848*p0851^2+p0849*p0851+p0850
- p3135: 0.000187955; = p2354*p1023
- p2639: 0; = p2248*(p1019+p1021)
- p0810: 0.75
- p2064: 0.676706
- p2735: 6.42199e-7; = p2344*(p1078+p1080)
- p2703: 0.0234282; = p2312*(p1128+p1130)
- p3481: 0.141101; = if(p1328+p1330+p1332+p1334+p1336+p1338+p1340+p1342+p1344=0;0;p1338/(p1328+p1330+p1332+p1334+p1336+p1338+p1340+p1342+p1344))
- p1114: 0.216028
- p2147: 4.59935e-7; = p2015*p2075*p2109/(p0818*1000)
- p5309: 5.61881e-5; = p1930*p3484
- p4172: 4.1024e-6; = p1823*p3479
- p0154: 0
- p2038: 0.304457
- p0859: 0; = p0671*1000/p0856
- p4250: 4.4853e-6; = p1901*p3479
- p1260: 0; = if(p1232>0;0;p0731/100)
- p2786: 0; = p2395*(p1019+p1021)
- p2912: 3.94177e-5; = p2326*(p1020+p1022)
- p1027: 107003; = IF(p1012=0;p1021*(p0704/100)*p0703*1000;0)
- p4997: 3.95189e-6; = p1824*p3483
- p2025: 1.90937e-5; = p2015*p2023*p2024/(p0818*1000)
- p1785: 0
- p2309: 9.0873e-5; = p2227*p2216
- p2763: 0.000824872; = p2372*(p1019+p1021)
- p3325: 0; = if(and(p1232=0;p3255<>0);p3267*p3289;0)
- p1999: 7.21864e7; = (p1228+p1229)*p0818+p1164
- p2060: 0.272353
- p1752: 0
- p0533: 0; = SQRT(2)*(IF((2*p0401-1)<0;-1;IF((2*p0401-1)>0;1;0))*SQRT(SQRT((2/(pi()*0.140012289)+LN(1-(2*p0401-1)^2)/2)^2-LN(1-(2*p0401-1)^2)/0.140012289)-(2/(pi()*0.140012289)+LN(1-(2*p0401-1)^2)/2)))
- p1155: 0.0113122; = if(p1153*p0818=0;0;p1151/(p1153*p0818))
- p0888: 0; = p0686*1000*p0687*p0884/100
- p2459: 0; = p2263*p1073
- p3806: 4.68379e-6; = p1869*p3477
- p3220: 0.00433843; = p3216*p1228
- p1629: 0
- p0351: 0.5
- p3010: 0; = p2424*(p1079+p1081)
- p1334: 818183; = p1322*p0801
- p0608: 0; = IF(p0344<0.5;-SQRT(p0007*EXP(p0476^2*p0008)-p0007);SQRT(p0007*EXP(p0476^2*p0008)-p0007))
- p0540: 0; = IF(p0276<0.5;-SQRT(p0007*EXP(p0408^2*p0008)-p0007);SQRT(p0007*EXP(p0408^2*p0008)-p0007))
- p0183: 46.365
- p3211: 0; = p2430*p1132
- p0856: 1.12e6; = p0801
- p5276: 1.74397e-5; = p1897*p3484
- p1212: 0.0307574; = if(p1211=0;0;if(p1193>0;0;(p1207+p1208+p1209)*p1210/(2000*p1211)))
- p2631: 0; = p2240*(p1019+p1021)
- p3077: 5.65808e-5; = p2296*p1023
- p0404: 0.5
- p0515: 0; = SQRT(2)*(IF((2*p0383-1)<0;-1;IF((2*p0383-1)>0;1;0))*SQRT(SQRT((2/(pi()*0.140012289)+LN(1-(2*p0383-1)^2)/2)^2-LN(1-(2*p0383-1)^2)/0.140012289)-(2/(pi()*0.140012289)+LN(1-(2*p0383-1)^2)/2)))
- p1147: 0.070543
- p2724: 9.46056e-6; = p2333*(p1019+p1021)
- p3357: 0; = if(p1232=0;p3307+p3318+p3329+p3340+p3351;0)
- p0477: 0; = SQRT(2)*(IF((2*p0345-1)<0;-1;IF((2*p0345-1)>0;1;0))*SQRT(SQRT((2/(pi()*0.140012289)+LN(1-(2*p0345-1)^2)/2)^2-LN(1-(2*p0345-1)^2)/0.140012289)-(2/(pi()*0.140012289)+LN(1-(2*p0345-1)^2)/2)))
- p0967: 0
- p1585: 0
- p0771: 2.371; = p0111*(1+p0639*p0243/100)
- p1040: 0.0227455
- p0656: 0; = IF(p0392<0.5;-SQRT(p0007*EXP(p0524^2*p0008)-p0007);SQRT(p0007*EXP(p0524^2*p0008)-p0007))
- p0791: 0
- p1233: 0.00110968; = p1232*p0001/(p0818*p0002)
- p0042: 1119.07
- p2816: 0; = p2425*(p1078+p1080)
- p1891: 0
- p0910: 0.0207354; = p0909/p0818
- p0091: 24.819
- p1070: 0.0493474; = IF(p1012=0;p1056/(p1063*p0818);0)
- p4443: 0; = p1888*p3480
- p2415: 0; = p2235*p2205
- p0682: 1118.79; = p0022*(1+p0550*p0154/100)
- p0349: 0.5
- p2959: 0.000129947; = p2373*(p1020+p1022)
- p0276: 0.5
- p1162: 0.00124378; = p1161/p0818
- p2655: 0; = p2264*(p1078+p1080)
- p2872: 0.0005792; = p2286*(p1020+p1022)
- p2648: 0; = p2257*(p1019+p1021)
- p1186: 6.88776e-8; = p1182*p1185/p0818
- p0984: 0; = if(p0886=0;0;min(1;(p0699*p0698*1000*p0701/100)/p0886))
- p1860: 0
- p1963e: 0.000611989; = p1628*p1832+p1629*p1833+p1630*p1834+p1631*p1835+p1632*p1836+p1633*p1837+p1634*p1838+p1635*p1839+p1636*p1840+p1637*p1841+p1638*p1842+p1639*p1843+p1640*p1844+p1641*p1845+p1642*p1846+p1643*p1847+p1644*p1848+p1645*p1849+p1646*p1850
- p1760: 0
- p1093: 0; = IF(p1071=0;p1087*p0001/(p0818*p0002);0)
- p2240: 0; = p2222*p2185
- p1277: 0
- p4565: 2.19373e-6; = p1804*p3481
- p2606: 0; = p2410*p1014
- p2707: 1.08571e-5; = p2316*(p1019+p1021)
- p1895: 0
- p1972: 0.000817396; = if(p0807=480;p1967*p0001/(p0818*p0002);0)
- p1251: 0; = if(p1232>0;0;p1246*p0001/(p0818*p0002))
- p4252: 7.43903e-6; = p1903*p3479
- p4935: 1.0091e-5; = p1762*p3483
- p3237: 0.854735
- p2239: 0; = p2222*p2184
- p2054: 0.91
- p1398: 6
- p0235: 0
- p2538: 3.45894e-6; = p2342*p1073
- p1631: 0
- p0794: 0
- p1805: 0
- p2107: 0.881623
- p2549: 0; = p2353*p1123
- p3177: 0; = p2396*p1023
- p2734: 0.000183819; = p2343*(p1078+p1080)
- p3059: 3.77328e-6; = p2278*p1023
- p4593: 8.13246e-5; = p1832*p3481
- p0185: 24.457
- p2523: 2.93317e-5; = p2327*p1014
- p2830: 0; = p2244*(p1020+p1022)
- p3000: 0; = p2414*(p1079+p1081)
- p0870: 20193; = p0858*p0856
- p0748: 12.001; = p0088*(1+p0616*p0220/100)
- p2027: 0.428799
- p0796: 98.332; = p0136*(1+p0664*p0268/100)
- p3096: 2.15568e-6; = p2315*p1023
- p1613: 0
- p1146: 0.929457
- p1806: 6.66311e-6; = p1398*1000/p0818
- p0111: 2.371
- p2425: 0; = p2235*p2215
- p2602: 0; = p2406*p1014
- p1291: 0; = IF(p1287+p1290=p1264;0;IF(p1287+p1290+p1289>p1264;p1264-(p1287+p1290);p1289))
- p3367: 0; = if(p1232=0;p3244*p3361/p0818;0)
- p2319: 5.17176e-5; = p2224*p2186
- p2843: 0; = p2257*(p1020+p1022)
- p2342: 3.65098e-5; = p2228*p2210
- p0504: 0; = SQRT(2)*(IF((2*p0372-1)<0;-1;IF((2*p0372-1)>0;1;0))*SQRT(SQRT((2/(pi()*0.140012289)+LN(1-(2*p0372-1)^2)/2)^2-LN(1-(2*p0372-1)^2)/0.140012289)-(2/(pi()*0.140012289)+LN(1-(2*p0372-1)^2)/2)))
- p2792: 0; = p2401*(p1019+p1021)
- p3409: 0; = p3371*p1238
- p2756: 0.00313985; = p2365*(p1019+p1021)
- p1708: 0
- p1783: 0
- p2140: 1.09464e-6; = p2015*p2068*p2102/(p0818*1000)
- p1194: 1.48
- p2857: 0; = p2271*(p1079+p1081)
- p0212: 0.738
- p0254: 11.728
- p1209: 7.0185; = p1206*p0818*p0822/p0801
- p2463: 0; = p2267*p1073
- p1215: 0.375; = IF(p1214=0;0;(p1214-1.5)/(p1214-1)^2)
- p1897: 0.000335377; = p1489*1000/p0818
- p0247: 12.115
- p3402: 0; = p3364*p1238
- p2303: 0.000287517; = p2227*p2210
- p3345: 0; = if(and(p1232=0;p3256<>0);p3273*p3277*p3293;0)
- p2681: 5.19292e-6; = p2290*(p1019+p1021)
- p3761: 5.31945e-5; = p1824*p3477
- p2028: 0.000242109; = p2015*p2026*p2027/(p0818*1000)
- p1078: 0.38447; = IF(p1071=0;IF(p1073=1;0;IF(p1073+p1074>1;1-p1073;p1074));0)
- p3002: 0; = p2416*(p1079+p1081)
- p4427: 0; = p1872*p3480
- p2701: 0.00031313; = p2310*(p1078+p1080)
- p3184: 0; = p2403*p1023
- p3311: 0; = if(and(p1232=0;p3252<>0);p3252-(p3306+p3307+p3308+p3309+p3310);0)
- p1579: 0
- p1580: 0
- p1973: 0.000272465; = if(p0807=480;p1968*p0001/(p0818*p0002);0)
- p4194: 3.75233e-5; = p1845*p3479
- p0974: 0.5
- p2747: 9.07633e-5; = p2356*(p1019+p1021)
- p3221: 0.146975; = IF(p3216=0;0;p1223*12.0107/100.0869+(1-p1224)*12.0107/84.3139)
- p0922: 0; = p0677*1000/p0801
- p2473: 0.00343097; = p2277*p1014
- p0120: 8.726
- p0346: 0.5
- p1808: 0
- p0004: 0.0254
- p1648: 0
- p0716: 56.486; = p0056*(1+p0584*p0188/100)
- p0180: 29.365
- p1574: 0
- p2604: 0; = p2408*p1014
- p2635: 0; = p2244*(p1019+p1021)
- p2014: 8.07787e6; = p0833*p2011*p2013
- p2524: 0.000289945; = p2328*p1014
- p3071: 2.26329e-7; = p2290*p1023
- p1937: 0
- p0580: 0; = IF(p0316<0.5;-SQRT(p0007*EXP(p0448^2*p0008)-p0007);SQRT(p0007*EXP(p0448^2*p0008)-p0007))
- p3194: 0; = p2413*p1023
- p2658: 0; = p2267*(p1078+p1080)
- p1025: 78315.7; = IF(p1012=0;p1019*(p0704/100)*p0703*1000;0)
- p0022: 1118.79
- p3286: 0
- p3264: 0
- p1599: 0
- p2793: 0; = p2402*(p1019+p1021)
- p0522: 0; = SQRT(2)*(IF((2*p0390-1)<0;-1;IF((2*p0390-1)>0;1;0))*SQRT(SQRT((2/(pi()*0.140012289)+LN(1-(2*p0390-1)^2)/2)^2-LN(1-(2*p0390-1)^2)/0.140012289)-(2/(pi()*0.140012289)+LN(1-(2*p0390-1)^2)/2)))
- p1909: 0
- p2266: 0; = p2226*p2212
- p2680: 0.00634623; = p2289*(p1019+p1021)
- p0484: 0; = SQRT(2)*(IF((2*p0352-1)<0;-1;IF((2*p0352-1)>0;1;0))*SQRT(SQRT((2/(pi()*0.140012289)+LN(1-(2*p0352-1)^2)/2)^2-LN(1-(2*p0352-1)^2)/0.140012289)-(2/(pi()*0.140012289)+LN(1-(2*p0352-1)^2)/2)))
- p2659: 0; = p2268*(p1078+p1080)
- p0376: 0.5
- p4832: 0; = p1865*p3482
- p5003: 2.23692e-7; = p1830*p3483
- p0388: 0.5
- p0824: 0.8615
- p5201: 2.13665e-6; = p1822*p3484
- p4102: 0.0011366; = p1963*p3478
- p2711: 1.25353e-6; = p2320*(p1019+p1021)
- p1839: 0
- p0049: 18.434
- p2367: 0.0395063; = p2225*p2196
- p2169: 0.00286127; = p2166*(p0908)
- p5326: 3.46483e-7; = p1947*p3484
- p3053: 0.000629538; = p2272*p1132
- p1561: 0
- p2348: 1.15394e-5; = p2228*p2216
- p1081: 0; = IF(p1071=0;IF(p1073+p1078+p1079+p1080=1;0;IF(p1073+p1078+p1079+p1080+p1077>1;1-(p1073+p1078+p1079+p1080);p1077));0)
- p0756: 51.091; = p0096*(1+p0624*p0228/100)
- p3380: 0; = p3251/p0818
- p2663: 0.00314769; = p2272*(p1128+p1130)
- p2622: 0; = p2426*p1073
- p1003: 0; = p0999*p0888
- p0613: 0; = IF(p0349<0.5;-SQRT(p0007*EXP(p0481^2*p0008)-p0007);SQRT(p0007*EXP(p0481^2*p0008)-p0007))
- p2986: 0; = p2400*(p1020+p1022)
- p2393: 0; = p2234*p2182
- p2652: 0; = p2261*(p1078+p1080)
- p1555: 0
- p1143: 0; = if(p1121=0;p1137*p0001/(p0818*p0002);0)
- p0631: 0; = IF(p0367<0.5;-SQRT(p0007*EXP(p0499^2*p0008)-p0007);SQRT(p0007*EXP(p0499^2*p0008)-p0007))
- p3320: 0; = if(and(p1232=0;p3253<>0);p3253*(p3264-p3315)/p3316;0)
- p1113: 0.100377
- p2185: 0.00364834; = p1065-p2184
- p3267: 0
- p2190: 0.0031811; = 32.065*p2189/(2*14.0067)
- p2404: 0; = p2234*p2193
- p0699: 0
- p2490: 0.00298964; = p2294*p1014
- p1618: 0.660002
- p1240: 0; = if(p1232>0;0;IF(p1234+p1238+p1239=1;0;IF(p1234+p1238+p1239+p1237>1;1-(p1234+p1238+p1239);p1237)))
- p3150: 3.89455e-7; = p2369*p1023
- p3241: 2.07084e-9; = p3234*p1188*p3236/p0818
- p1543: 870
- p2733: 1.40369e-5; = p2342*(p1078+p1080)
- p3234: 0.39606; = 1-p3233
- p2942: 9.93486e-5; = p2356*(p1020+p1022)
- p2955: 9.78094e-6; = p2369*(p1020+p1022)
- p2470: 0; = p2274*p1123
- p2801: 0; = p2410*(p1019+p1021)
- p1804: 1.55473e-5; = p1396*1000/p0818
- p2285: 0.000388256; = p2223*p2191
- p0977: 0; = IF(p0687=0;IF(OR(p0686=0;p0688=0);0;p0686*1000*p0688/100);0)
- p0182: 15.759
- p3100: 3.79607e-7; = p2319*p1023
- p2035: 2.55734e-5; = p2015*p2029*(1-p2031)/(p0818*1000)
- p1207: 198.031; = if(p1193>0;0;(p1194*p1050/p1057+p1195*p1051/p1058+p1196*p1052/p1059+p1197*p1053/p1060+p1198*p1054/p1061+p1199*p1055/p1062+p1200*p1056/p1063)/(p0702*1000)+(p1201*p1109/p1114+p1202*p1110/p1115)/(p0702*1000)+p1203*p1170/p0801+p1204*p1176/p0801)
- p1603: 0
- p2773: 0; = p2382*(p1078+p1080)
- p1609: 0
- p1316: 0; = p1312*p1252/p0818
- p5209: 5.19725e-7; = p1830*p3484
- p4066: 3.54256e-6; = p1923*p3478
- p4658: 4.73218e-5; = p1897*p3481
- p3174: 0; = p2393*p1023
- p1676: 0
- p3428: 0; = p3371*p1239
- p0689: 0
- p2419: 0; = p2235*p2209
- p0482: 0; = SQRT(2)*(IF((2*p0350-1)<0;-1;IF((2*p0350-1)>0;1;0))*SQRT(SQRT((2/(pi()*0.140012289)+LN(1-(2*p0350-1)^2)/2)^2-LN(1-(2*p0350-1)^2)/0.140012289)-(2/(pi()*0.140012289)+LN(1-(2*p0350-1)^2)/2)))
- p1130: 0; = if(p1121=0;IF(p1123+p1128+p1129=1;0;IF(p1123+p1128+p1129+p1126>1;1-(p1123+p1128+p1129);p1126));0)
- p1572: 0
- p2575: 0; = p2379*p1073
- p1659: 0
- p0317: 0.5
- p5337: 0; = p1962*p3484
- p0675: 0
- p5334: 2.26947e-5; = p1955*p3484
- p0479: 0; = SQRT(2)*(IF((2*p0347-1)<0;-1;IF((2*p0347-1)>0;1;0))*SQRT(SQRT((2/(pi()*0.140012289)+LN(1-(2*p0347-1)^2)/2)^2-LN(1-(2*p0347-1)^2)/0.140012289)-(2/(pi()*0.140012289)+LN(1-(2*p0347-1)^2)/2)))
- p0822: 0.916
- p0612: 0; = IF(p0348<0.5;-SQRT(p0007*EXP(p0480^2*p0008)-p0007);SQRT(p0007*EXP(p0480^2*p0008)-p0007))
- p1061: 0.3
- p2311: 0.0401427; = p2231*p2218
- p1149: 0.830148
- p3699: 0.00013583; = p1762*p3477
- p3342: 0; = if(and(p1232=0;p3254<>0);p3254*(p3272-p3337)/p3338;0)
- p1686: 0
- p1837: 0
- p3209: 0; = p2428*p1132
- p1994: 750
- p2474: 0.000328959; = p2278*p1014
- p3233: 0.60394
- p1832: 0.000576359; = p1424*1000/p0818
- p3988: 0.000162013; = p1845*p3478
- p4856: 0; = p1889*p3482
- p2264: 0; = p2226*p2210
- p0830: 2.35621e9; = p0825*(p0821-p0814)*p0824
- p0966: 1; = if(p0683=0;0;IF(p0684/100+p0965=1;0;1-(p0684/100+p0965)))
- p3600: 3.44115e-6; = p1869*p3476
- p1092: 0; = IF(p1071=0;p1086*p0001/(p0818*p0002);0)
- p1727: 0
- p1119: 0.0210446; = IF(p1071=0;p1109/(p1114*p0818);0)
- p2392: 0.000883466; = p2233*p2221
- p0835: 0.00443093; = -LN(1-p0669/100)/p0834
- p3140: 4.76358e-6; = p2359*p1023
- p3460: 0; = p3365*p1241
- p0550: 0; = IF(p0286<0.5;-SQRT(p0007*EXP(p0418^2*p0008)-p0007);SQRT(p0007*EXP(p0418^2*p0008)-p0007))
- p3429: 0; = p3372*p1239
- p2598: 0; = p2402*p1014
- p4718: 2.35042e-6; = p1957*p3481
- p0053: 52.079
- p0820: 0.600863; = if(p0807=480;p0814;0)
- p3323: 0; = if(and(p1232=0;p3255<>0);p3265*p3277*(p3299*p3291+(1-p3299)*p3295);0)
- p2256: 0; = p2222*p2202
- p4425: 0; = p1870*p3480
- p3245: 0; = IF(p3244=1;0;if(p3244+p0792/100>1;1-p3244;p0792/100))
- p3455: 0; = p3379*p1240
- p1910: 4.77523e-5; = p1502*1000/p0818
- p2440: 0; = p2244*p1014
- p2261: 0; = p2226*p2207
- p2065: 0.0758824
- p3482: 0; = if(p1328+p1330+p1332+p1334+p1336+p1338+p1340+p1342+p1344=0;0;p1340/(p1328+p1330+p1332+p1334+p1336+p1338+p1340+p1342+p1344))
- p2502: 1.30315e-5; = p2306*p1073
- p2644: 0; = p2253*(p1019+p1021)
- p4771: 0; = p1804*p3482
- p0731: 0
- p4237: 5.11433e-5; = p1888*p3479
- p3354: 0; = IF((p3350+p3351+p3352+p3353)+IF(p3349=0;0;(p3256*(p3273*(1-p3277))/p3349))>p3256;p3256-(p3350+p3351+p3352+p3353);IF(p3349=0;0;p3256*(p3273*(1-p3277))/p3349))
- p1084: 114975; = IF(p1071=0;p1078*(p0710/100)*p0703*1000;0)
- p3328: 0; = if(and(p1232=0;p3255<>0);p3255*(p3265*p3277-p3323)/p3327;0)
- p2767: 0; = p2376*(p1078+p1080)
- p1275: 0; = p1271*p1252/p0818
- p2090: 0.40001
- p1993: 400
- p0268: 0.898
- p3553: 9.09446e-6; = p1822*p3476
- p1667: 0
- p1057: 0.82
- p3689: 0; = p1962*p3476
- p1570: 0
- p0883: 0.0119786; = p0882*p0001*p0003/(p0818*p0002)
- p2072: 0.134
- p0531: 0; = SQRT(2)*(IF((2*p0399-1)<0;-1;IF((2*p0399-1)>0;1;0))*SQRT(SQRT((2/(pi()*0.140012289)+LN(1-(2*p0399-1)^2)/2)^2-LN(1-(2*p0399-1)^2)/0.140012289)-(2/(pi()*0.140012289)+LN(1-(2*p0399-1)^2)/2)))
- p0643: 0; = IF(p0379<0.5;-SQRT(p0007*EXP(p0511^2*p0008)-p0007);SQRT(p0007*EXP(p0511^2*p0008)-p0007))
- p2168: 0.0227601; = p2166*(p0903)
- p1164: 5412.13; = p1163*p0801
- p4037: 0.000248215; = p1894*p3478
- p3213: 0.112803; = p1222*12.0107/100.0869
- p3289: 0
- p2832: 0; = p2246*(p1020+p1022)
- p3055: 4.778e-5; = p2274*p1132
- p3045: 0; = p2264*p1082
- p2566: 7.46495e-5; = p2370*p1014
- p1379: 38
- p1602: 0.730108
- p2771: 0; = p2380*(p1078+p1080)
- p0535: 0; = SQRT(2)*(IF((2*p0403-1)<0;-1;IF((2*p0403-1)>0;1;0))*SQRT(SQRT((2/(pi()*0.140012289)+LN(1-(2*p0403-1)^2)/2)^2-LN(1-(2*p0403-1)^2)/0.140012289)-(2/(pi()*0.140012289)+LN(1-(2*p0403-1)^2)/2)))
- p0989: 0; = p0985*p0886
- p1896: 0
- p4046: 3.21192e-5; = p1903*p3478
- p0256: 13.911
- p1989: 50
- p2597: 0; = p2401*p1014
- p1729: 0
- p2228: 0.112675; = if(p0774*p0778+p0775*p0779+p0776*p0780+p0777*p0781=0;0;p0780*p0776/(p0774*p0778+p0775*p0779+p0776*p0780+p0777*p0781))
- p2041: 0; = p2015*p2040/(p0818*1000)
- p2026: 73.06
- p2317: 6.18119e-6; = p2224*p2184
- p4173: 8.6971e-6; = p1824*p3479
- p0838: 1.3675e9; = (p0833-p0836)*p0837
- p4238: 8.7518e-6; = p1889*p3479
- p0940: 0; = if(and(p0683=0;p0946=0);p0934;0)
- p2496: 0.000929355; = p2300*p1073
- p2930: 8.69902e-7; = p2344*(p1079+p1081)
- p2310: 0.000814446; = p2227*p2217
- p0766: 59.053; = p0106*(1+p0634*p0238/100)
- p3254: 0; = p1252*(p1287*(1-p3247)+p1290*(1-p3248)+p1291*(1-p3249)+p1292*(1-p3250))
- p1881: 0
- p1669: 0
- p3396: 0; = p3377*p1234
- p4117: 1.00646e-5; = p1768*p3479
- p1571: 0
- p2673: 0.00133367; = p2282*(p1019+p1021)
- p2268: 0; = p2226*p2214
- p1597: 0
- p2629: 0; = p2238*(p1019+p1021)
- p1803: 0
- p0908: 0.0022
- p3183: 0; = p2402*p1023
- p1575: 0
- p2325: 3.77797e-5; = p2224*p2192
- p1722: 0
- p2617: 0; = p2421*p1073
- p2765: 0.00136101; = p2374*(p1019+p1021)
- p4155: 3.28192e-7; = p1806*p3479
- p3379: 0; = if(p1232=0;p3246*p3361/p0818;0)
- p3596: 7.37388e-7; = p1865*p3476
- p2350: 0; = p2232*p2218
- p4548: 5.9544e-6; = p1787*p3481
- p2725: 1.36159e-6; = p2334*(p1019+p1021)
- p1653: 0
- p0056: 56.486
- p1877: 0
- p1185: 0.5
- p1898: 0
- p0493: 0; = SQRT(2)*(IF((2*p0361-1)<0;-1;IF((2*p0361-1)>0;1;0))*SQRT(SQRT((2/(pi()*0.140012289)+LN(1-(2*p0361-1)^2)/2)^2-LN(1-(2*p0361-1)^2)/0.140012289)-(2/(pi()*0.140012289)+LN(1-(2*p0361-1)^2)/2)))
- p4762: 0; = p1795*p3482
- p1097: 0.0773317
- p3419: 0; = p3362*p1239
- p0862: 0.0498545; = p0674*1000/p0856
- p2660: 0; = p2269*(p1078+p1080)
- p3239: 0.013074; = IF(p3238+p3235+p3236=1;0;1-(p3238+p3235+p3236))
- p0221: 24.456
- p2515: 3.30946e-5; = p2319*p1014
- p1245: 0; = if(p1232>0;0;p1240*(p0725/100)*p0723*1000)
- p2106: 0.856281
- p1271: 0; = IF(p1267+p1270=p1259;0;IF(p1267+p1270+p1269>p1259;p1259-(p1267+p1270);p1269))
- p3192: 0; = p2411*p1023
- p2856: 0; = p2270*(p1079+p1081)
- p0911: 0.0049
- p1007: 0; = p1003*p0001*p0004/(p0818*p0002)
- p0058: 41.415
- p1830: 9.99467e-6; = p1422*1000/p0818
- p2641: 0; = p2250*(p1019+p1021)
- p1705: 0
- p0673: 0
- p0849: 0
- p0195: 0
- p0124: 109.57
- p3472: 0; = p3377*p1241
- p2456: 0; = p2260*p1073
- p2812: 0; = p2421*(p1078+p1080)
- p2851: 0; = p2265*(p1079+p1081)
- p1771: 0
- p2179: 0.0134805; = p0970+p0971+p0972
- p1085: 155742; = IF(p1071=0;p1079*(p0710/100)*p0703*1000;0)
- p5176: 6.52544e-6; = p1797*p3484
- p3940: 2.66873e-5; = p1797*p3478
- p2915: 6.83458e-8; = p2329*(p1020+p1022)
- p0896: 0.516338
- p1582: 0
- p3185: 0; = p2404*p1023
- p0178: 54.447
- p2568: 0.00313428; = p2372*p1014
- p2580: 0; = p2384*p1073
- p2529: 3.59474e-5; = p2333*p1014
- p5203: 9.18181e-6; = p1824*p3484
- p3358: 0; = if(p1232=0;p3308+p3319+p3330+p3341+p3352;0)
- p3191: 0; = p2410*p1023
- p0366: 0.5
- p1089: 2.80708e-5; = IF(p1071=0;p1083*p0001/(p0818*p0002);0)
- p0219: 19.276
- p0391: 0.5
- p0880: 0; = p0868*p0856
- p3391: 0; = p3372*p1234
- p0142: 0
- p1190: 3.70888e-7; = p1188/p0818
- p0779: 70.235; = p0119*(1+p0647*p0251/100)
- p3381: 0; = p3362*p1234
- p3422: 0; = p3365*p1239
- p0639: 0; = IF(p0375<0.5;-SQRT(p0007*EXP(p0507^2*p0008)-p0007);SQRT(p0007*EXP(p0507^2*p0008)-p0007))
- p0857: 11.0968; = p0856*p0001*p0003/(p0818*p0002)
- p2283: 0.00134884; = p2223*p2189
- p1757: 0
- p3879: 2.54263e-5; = p1942*p3477
- p2683: 1.87395e-5; = p2292*(p1019+p1021)
- p1966: 0; = if(p0814=0;p0802;0)
- p0390: 0.5
- p2246: 0; = p2222*p2191
- p0800: 56.486; = p0140*(1+p0668*p0272/100)
- p2362: 0.00161862; = p2225*p2190
- p3518: 9.34025e-6; = p1787*p3476
- p2627: 0; = p2431*p1123
- p3973: 2.12554e-6; = p1830*p3478
- p1547: 393
- p1988: 750
- p1890: 0
- p2796: 0; = p2405*(p1019+p1021)
- p3894: 5.01835e-6; = p1957*p3477
- p4136: 2.07855e-6; = p1787*p3479
- p2380: 0; = p2229*p2209
- p3154: 5.17421e-6; = p2373*p1023
- p1927: 0
- p0614: 0; = IF(p0350<0.5;-SQRT(p0007*EXP(p0482^2*p0008)-p0007);SQRT(p0007*EXP(p0482^2*p0008)-p0007))
- p2254: 0; = p2222*p2200
- p3641: 1.05692e-5; = p1910*p3476
- p0906: 0.0041
- p0452: 0; = SQRT(2)*(IF((2*p0320-1)<0;-1;IF((2*p0320-1)>0;1;0))*SQRT(SQRT((2/(pi()*0.140012289)+LN(1-(2*p0320-1)^2)/2)^2-LN(1-(2*p0320-1)^2)/0.140012289)-(2/(pi()*0.140012289)+LN(1-(2*p0320-1)^2)/2)))
- p3248: 0
- p1001: 0; = if(p0978>0;0;if(and(p0687=0;p0691=0;p0695=0;p0699=0);0;IF(p0996+p0999+p1000=1;0;1-(p0996+p0999+p1000))))
- p0970: 0; = p0967/p0818
- p0760: 4.785; = p0100*(1+p0628*p0232/100)
- p1549: 15
- p1949: 0
- p0003: 10000
- p3353: 0; = if(and(p1232=0;p3256<>0);p3256*(p3276-p3348)/p3349;0)
- p1849: 0
- p1850: 0
- p2293: 0.0108974; = p2223*p2200
- p1620: 0.633063
- p2710: 8.70977e-6; = p2319*(p1019+p1021)
- p0897: 0.49875
- p3344: 0; = if(and(p1232=0;p3254<>0);p3254-(p3339+p3340+p3341+p3342+p3343);0)
- p1268: 0
- p1784: 0
- p3293: 0
- p2137: 3.63821e-7; = p2015*p2065*p2099/(p0818*1000)
- p2572: 0; = p2376*p1073
- p2729: 5.76801e-5; = p2338*(p1078+p1080)
- p4513: 0; = p1962*p3480
- p0847: 0
- p2508: 0; = p2312*p1123
- p1562: 0
- p3223: 0.126838; = IF(p3216=0;0;(1-p1223)*24.3050/84.3139)
- p2775: 0; = p2384*(p1078+p1080)
- p0001: 0.404686
- p4085: 1.7949e-5; = p1942*p3478
- p0116: 51.197
- p2226: 0; = if(p0774*p0778+p0775*p0779+p0776*p0780+p0777*p0781=0;0;p0778*p0774/(p0774*p0778+p0775*p0779+p0776*p0780+p0777*p0781))
- p3087: 0; = p2306*p1082
- p0650: 0; = IF(p0386<0.5;-SQRT(p0007*EXP(p0518^2*p0008)-p0007);SQRT(p0007*EXP(p0518^2*p0008)-p0007))
- p1923: 1.66578e-5; = p1515*1000/p0818
- p3390: 0; = p3371*p1234
- p4839: 0; = p1872*p3482
- p1684: 0.698317
- p1289: 0
- p2850: 0; = p2264*(p1079+p1081)
- p2370: 0.000116656; = p2225*p2199
- p2402: 0; = p2234*p2191
- p1182: 124.046; = p1181*p0801
- p0051: 9.474
- p1657: 0
- p0368: 0.5
- p2595: 0; = p2399*p1014
- p2820: 0; = p2429*(p1128+p1130)
- p3195: 0; = p2414*p1082
- p5067: 2.61223e-5; = p1894*p3483
- p0669: 9.288; = p0009*(1+p0537*p0141/100)
- p0648: 0; = IF(p0384<0.5;-SQRT(p0007*EXP(p0516^2*p0008)-p0007);SQRT(p0007*EXP(p0516^2*p0008)-p0007))
- p2136: 4.47811e-6; = p2015*p2064*p2098/(p0818*1000)
- p2503: 4.45504e-5; = p2307*p1073
- p1871: 0
- p2449: 0; = p2253*p1014
- p0769: 0
- p4890: 0; = p1923*p3482
- p0255: 13.624
- p3802: 1.00367e-6; = p1865*p3477
- p1607: 0
- p1046: 0.0227455; = IF(p1012=0;IF(p1037+p1044+p1045=1;0;IF(p1037+p1044+p1045+p1040>1;1-(p1037+p1044+p1045);p1040));0)
- p3484: 0.0520002; = IF(p1344=0;0;p1344/(p1328+p1330+p1332+p1334+p1336+p1338+p1340+p1342+p1344))
- p4204: 7.32963e-6; = p1855*p3479
- p1595: 0
- p1601: 0
- p1167: 0.5
- p0943: 0; = if(and(p0683=0;p0949=0);p0937;0)
- p0045: 63.991
- p0981: 0.00110968; = p0978*p0001/(p0818*p0002)
- p1917: 0
- p3132: 0; = p2351*p1132
- p0695: 0
- p2790: 0; = p2399*(p1019+p1021)
- p1319: 3.28269; = IF(((p0745*1000*p0746/100)+(p0754*1000*p0755/100))/p0801<0;0;((p0745*1000*p0746/100)+(p0754*1000*p0755/100))/p0801)
- p1243: 0; = if(p1232>0;0;p1238*(p0725/100)*p0723*1000)
- p3070: 0.000276595; = p2289*p1023
- p1552: 0
- p4379: 0; = p1824*p3480
- p0773: 26.723; = p0113*(1+p0641*p0245/100)
- p0348: 0.5
- p1160: 0.282044; = (p1156+p1158)*p1159
- p2603: 0; = p2407*p1014
- p2715: 7.86204e-7; = p2324*(p1019+p1021)
- p2308: 0.00177453; = p2227*p2215
- p1029: 8076.96; = IF(p1012=0;IF(p0801<p1023*(p0704/100)*p0703*1000;p0801;p1023*(p0704/100)*p0703*1000);0)
- p1593: 0.689607
- p1121: 0
- p4500: 0; = p1945*p3480
- p0115: 50.091
- p0712: 38.447; = p0052*(1+p0580*p0184/100)
- p2571: 0; = p2375*p1073
- p2728: 0.000178121; = p2337*(p1078+p1080)
- p3011: 0; = p2425*(p1079+p1081)
- p1279: 0
- p3424: 0; = p3367*p1239
- p4567: 9.40169e-7; = p1806*p3481
- p2817: 0; = p2426*(p1078+p1080)
- p1912: 0
- p4868: 0; = p1901*p3482
- p0827: 1.34689e9; = p0818*p0819*p0823
- p0952: 0; = if(and(p0683>0;or(p0807=56;p0807=100;and(p0807=60;p0901>0.06)));p0934;0)
- p3229: 6.01028e-6; = p1164/p0818
- p2527: 8.56164e-7; = p2331*p1014
- p3222: 0.224242; = IF(p3216=0;0;p1223*40.078/100.0869)
- p2282: 0.00791917; = p2223*p2188
- p1646: 0
- p4357: 0; = p1802*p3480
- p2358: 0.0045093; = p2225*p2186
- p2483: 0.01138; = p2287*p1014
- p2250: 0; = p2222*p2196
- p2365: 0.0186441; = p2225*p2193
- p2454: 0; = p2258*p1073
- p3038: 0; = p2257*p1023
- p2382: 0; = p2229*p2211
- p3189: 0; = p2408*p1023
- p1948: 0
- p1665: 0.575
- p3619: 0.000229819; = p1888*p3476
- p0821: 3.91667
- p1900: 0
- p3369: 0; = if(p1232=0;p3245*p3357/p0818;0)
- p0617: 0; = IF(p0353<0.5;-SQRT(p0007*EXP(p0485^2*p0008)-p0007);SQRT(p0007*EXP(p0485^2*p0008)-p0007))
- p1713: 0
- p0083: 2.19
- p3314: 0; = if(and(p1232=0;p3253<>0);p3263*p3289;0)
- p2092: 0.54529
- p1590: 0
- p2048: 7.7282e-14; = p2015*p2046/(p0818*1000000000000)
- p4797: 0; = p1830*p3482
- p0607: 0; = IF(p0343<0.5;-SQRT(p0007*EXP(p0475^2*p0008)-p0007);SQRT(p0007*EXP(p0475^2*p0008)-p0007))
- p2599: 0; = p2403*p1014
- p3634: 3.34283e-5; = p1903*p3476
- p0508: 0; = SQRT(2)*(IF((2*p0376-1)<0;-1;IF((2*p0376-1)>0;1;0))*SQRT(SQRT((2/(pi()*0.140012289)+LN(1-(2*p0376-1)^2)/2)^2-LN(1-(2*p0376-1)^2)/0.140012289)-(2/(pi()*0.140012289)+LN(1-(2*p0376-1)^2)/2)))
- p2159: 1.38113e-5; = p2015*p2083*p2121/(p0818*1000)
- p2800: 0; = p2409*(p1019+p1021)
- p2799: 0; = p2408*(p1019+p1021)
- p2895: 4.73258e-5; = p2309*(p1079+p1081)
- p0694: 0
- p2876: 5.68412e-6; = p2290*(p1020+p1022)
- p0745: 7731.84; = p0085*(1+p0613*p0217/100)
- p2985: 0; = p2399*(p1020+p1022)
- p4030: 1.65319e-5; = p1887*p3478
- p0611: 0; = IF(p0347<0.5;-SQRT(p0007*EXP(p0479^2*p0008)-p0007);SQRT(p0007*EXP(p0479^2*p0008)-p0007))
- p1862: 0
- p1317: 0
- p0343: 0.5
- p1792: 0
- p2073: 0.377647
- p3439: 0; = p3363*p1240
- p2056: 2.07882
- p0260: 10.866
- p1963d: 0.000279129; = p1608*p1812+p1609*p1813+p1610*p1814+p1611*p1815+p1612*p1816+p1613*p1817+p1614*p1818+p1615*p1819+p1616*p1820+p1617*p1821+p1618*p1822+p1619*p1823+p1620*p1824+p1621*p1825+p1622*p1826+p1623*p1827+p1624*p1828+p1625*p1829+p1626*p1830+p1627*p1831
- p2411: 0; = p2234*p2201
- p3341: 0; = if(and(p1232=0;p3254<>0);p3254*(p3271-p3336)/p3338;0)
- p1778: 0
- p2868: 0.00145982; = p2282*(p1020+p1022)
- p3273: 0
- p0372: 0.5
- p2687: 0.0012982; = p2296*(p1019+p1021)
- p0990: 0; = p0986*p0886
- p0732: 0
- p2394: 0; = p2234*p2183
- p3296: 0
- p3554: 1.84347e-5; = p1823*p3476
- p2642: 0; = p2251*(p1019+p1021)
- p2935: 5.38607e-5; = p2349*(p1079+p1081)
- p2859: 0.00538759; = p2273*(p1129+p1131)
- p2173: 0.247331; = p0895*p0898/p0818
- p5224: 3.96146e-5; = p1845*p3484
- p3163: 0; = p2382*p1082
- p1893: 0
- p2373: 0.000704933; = p2225*p2202
- p2007: 0.169056; = ((p1981*p1985+p1987*p1991+p1993*p1997+p2001*p2005)/p0818)*p0005*p0002/1000
- p2945: 0.000119635; = p2359*(p1020+p1022)
- p3453: 0; = p3377*p1240
- p2397: 0; = p2234*p2186
- p1327: 0.771235; = if(p1318=0;if(p1327a=0;1;if(p1327a<0;0;p1327a));0)
- p1588: 0
- p1640: 0
- p2379: 0; = p2229*p2208
- p3896: 0.00161009; = p1963*p3477
- p2766: 0; = p2375*(p1078+p1080)
- p1502: 43
- p0374: 0.5
- p0097: 29.335
- p3362: 0; = if(p1232=0;p3244*p3356/p0818;0)
- p3261: 0
- p2947: 0.000260674; = p2361*(p1020+p1022)
- p1986: 4200
- p3678: 1.47478e-6; = p1947*p3476
- p1628: 0.601994
- p1721: 0
- p2172: 0.683171; = p2166-(p2167+p2168+p2169+p2170)
- p1002: 0; = p0996*p0888
- p0978: 1.12e6; = p0801
- p3661: 0.00023916; = p1930*p3476
- p2686: 0.000113239; = p2295*(p1019+p1021)
- p4994: 1.73983e-7; = p1821*p3483
- p0211: 2.953
- p3732: 3.01101e-6; = p1795*p3477
- p0965: 0; = IF(p0684/100=1;0;IF(p0684/100+p0685/100>1;1-p0684/100;p0685/100))
- p1174: 2.24532e-7; = p1170*p1173/p0818
- p3265: 0
- p0698: 0
- p3262: 0
- p0697: 0
- p3468: 0; = p3373*p1241
- p2089: 0.40001
- p0518: 0; = SQRT(2)*(IF((2*p0386-1)<0;-1;IF((2*p0386-1)>0;1;0))*SQRT(SQRT((2/(pi()*0.140012289)+LN(1-(2*p0386-1)^2)/2)^2-LN(1-(2*p0386-1)^2)/0.140012289)-(2/(pi()*0.140012289)+LN(1-(2*p0386-1)^2)/2)))
- p2272: 0.00760036; = p2230*p2218
- p3305: 0; = if(and(p1232=0;p3252<>0);1-(p3301+p3302+p3303+p3304);0)
- p1069: 0.000397078; = IF(p1012=0;p1055/(p1062*p0818);0)
- p1660: 0
- p3405: 0; = p3367*p1238
- p3004: 0; = p2418*(p1079+p1081)
- p2854: 0; = p2268*(p1079+p1081)
- p1060: 0.21
- p2605: 0; = p2409*p1014
- p0081: 4.302
- p4350: 0; = p1795*p3480
- p2184: 0.00105919; = p1051/p0818
- p2908: 2.98971e-6; = p2322*(p1020+p1022)
- p0832: 3.78798e8; = p0831*p0830/(1-p0831)
- p2624: 0; = p2428*p1123
- p2412: 0; = p2234*p2202
- p3374: 0; = if(p1232=0;p3246*p3356/p0818;0)
- p0584: 0; = IF(p0320<0.5;-SQRT(p0007*EXP(p0452^2*p0008)-p0007);SQRT(p0007*EXP(p0452^2*p0008)-p0007))
- p1169: 0.000361047
- p1939: 0
- p1329: 0.00364273; = p1328*p0001/(p0818*p0002)
- p1339: 0.00232224; = p1338*p0001/(p0818*p0002)
- p3283: 0
- p3333: 0; = if(and(p1232=0;p3255<>0);p3255-(p3328+p3329+p3330+p3331+p3332);0)
- p3114: 4.1233e-7; = p2333*p1023
- p1706: 0.254333
- p4764: 0; = p1797*p3482
- p3050: 0; = p2269*p1082
- p2670: 0.000298202; = p2279*(p1019+p1021)
- p3120: 0; = p2339*p1082
- p1935: 0
- p3171: 0.000781887; = p2390*p1132
- p2878: 2.0512e-5; = p2292*(p1020+p1022)
- p2230: 0.139606; = if(p0783*p0787+p0784*p0788+p0785*p0789+p0786*p0790=0;0;p0787*p0783/(p0783*p0787+p0784*p0788+p0785*p0789+p0786*p0790))
- p2381: 0; = p2229*p2210
- p1272: 0; = IF(p1267+p1270+p1271=p1259;0;p1259-(p1267+p1270+p1271))
- p1924: 0
- p1105: 0.436421
- p2827: 0; = p2241*(p1020+p1022)
- p2281: 0.00061904; = p2223*p2187
- p2548: 0; = p2352*p1123
- p3085: 0; = p2304*p1082
- p2058: 1.24412
- p1344: 863783; = IF(p1318=0;p1327*p0801;0)
- p1196: 0.59
- p1934: 0
- p3404: 0; = p3366*p1238
- p1031: 7.75939e-5; = IF(p1012=0;p1025*p0001/(p0818*p0002);0)
- p4941: 4.57326e-6; = p1768*p3483
- p2983: 0; = p2397*(p1020+p1022)
- p2696: 5.05736e-6; = p2305*(p1078+p1080)
- p2004: 30
- p2726: 1.56095e-5; = p2335*(p1019+p1021)
- p1076: 0; = IF(p1071=0;p0714/100;0)
- p3905: 9.58853e-5; = p1762*p3478
- p2436: 0; = p2240*p1014
- p1337: 0; = p1336*p0001/(p0818*p0002)
- p2328: 0.000453103; = p2224*p2196
- p0375: 0.5
- p4171: 2.02385e-6; = p1822*p3479
- p0799: 100.513; = p0139*(1+p0667*p0271/100)
- p2836: 0; = p2250*(p1020+p1022)
- p0941: 0; = if(and(p0683=0;p0947=0);p0935;0)
- p1815: 0.00012882; = p1407*1000/p0818
- p1205: 0
- p2405: 0; = p2234*p2195
- p0623: 0; = IF(p0359<0.5;-SQRT(p0007*EXP(p0491^2*p0008)-p0007);SQRT(p0007*EXP(p0491^2*p0008)-p0007))
- p2925: 0.00064872; = p2339*(p1079+p1081)
- p0087: 6.05
- p3945: 0.000131311; = p1802*p3478
- p2852: 0; = p2266*(p1079+p1081)
- p3387: 0; = p3368*p1234
- p4529: 2.88318e-5; = p1768*p3481
- p2413: 0; = p2234*p2203
- p3769: 0.000173635; = p1832*p3477
- p2001: 400
- p1963i: 8.78059e-5; = p1706*p1910+p1707*p1911+p1708*p1912+p1709*p1913+p1710*p1914+p1711*p1915+p1712*p1916+p1713*p1917+p1714*p1918+p1715*p1919+p1716*p1920+p1717*p1921+p1718*p1922+p1719*p1923+p1720*p1924+p1721*p1925+p1722*p1926+p1723*p1927+p1724*p1928
- p2841: 0; = p2255*(p1020+p1022)
- p2108: 0.826583
- p5266: 4.04231e-6; = p1887*p3484
- p1242: 0; = if(p1232>0;0;p1234*(p0725/100)*p0723*1000)
- p0725: 0
- p0786: 91.127; = p0126*(1+p0654*p0258/100)
- p1067: 0.0132341; = IF(p1012=0;p1053/(p1060*p0818);0)
- p3440: 0; = p3364*p1240
- p4179: 4.92289e-7; = p1830*p3479
- p1087: 0; = IF(p1071=0;p1081*(p0710/100)*p0703*1000;0)
- p2694: 0.000110542; = p2303*(p1078+p1080)
- p1812: 0
- p4671: 6.73788e-6; = p1910*p3481
- p4308: 0.000263243; = p1963*p3479
- p3104: 1.36261e-7; = p2323*p1023
- p1064: 0.0613731; = IF(p1012=0;p1050/(p1057*p0818);0)
- p0704: 98.332; = p0044*(1+p0572*p0176/100)
- p1515: 15
- p2777: 0; = p2386*(p1078+p1080)
- p1267: 0
- p2331: 1.33794e-6; = p2224*p2199
- p2772: 0; = p2381*(p1078+p1080)
- p1955: 0.000436434; = p1547*1000/p0818
- p2294: 0.00467197; = p2223*p2201
- p1652: 0
- p3838: 2.74336e-5; = p1901*p3477
- p2919: 1.03554e-5; = p2333*(p1020+p1022)
- p2667: 0.00411346; = p2276*(p1019+p1021)
- p1140: 0.000259379; = if(p1121=0;p1134*p0001/(p0818*p0002);0)
- p3298: 0; = if(p1283+p1284+p1285+p1286=0;0;p1283/(p1283+p1284+p1285+p1286))
- p1765: 0
- p1221: 0.108582; = p1216*(1+p1220*p1217/100)
- p0044: 98.332
- p3326: 0; = if(and(p1232=0;p3255<>0);p3268*p3289;0)
- p2610: 0; = p2414*p1073
- p2360: 0.0083023; = p2225*p2188
- p0867: 0.0498545; = IF(p0858+p0864+p0865+p0866=1;0;IF(p0858+p0864+p0865+p0866+p0862>1;1-(p0858+p0864+p0865+p0866);p0862))
- p3537: 1.47478e-6; = p1806*p3476
- p1980: 3521.6
- p1285: 0; = p1281*p1252/p0818
- p2236: 0; = 1-(p2230+p2231+p2232+p2233)
- p2978: 0.000444401; = p2392*(p1129+p1131)
- p3807: 8.02936e-6; = p1870*p3477
- p2825: 0; = p2239*(p1020+p1022)
- p0624: 0; = IF(p0360<0.5;-SQRT(p0007*EXP(p0492^2*p0008)-p0007);SQRT(p0007*EXP(p0492^2*p0008)-p0007))
- p1675: 0.655218
- p3086: 0; = p2305*p1082
- p0542: 0; = IF(p0278<0.5;-SQRT(p0007*EXP(p0410^2*p0008)-p0007);SQRT(p0007*EXP(p0410^2*p0008)-p0007))
- p1747: 0.217583
- p3020: 0; = p2239*p1023
- p3202: 0; = p2421*p1082
- p1062: 0.16
- p0892: 0; = if(p0891=0;0;(1-p1240)*p3251/p0891)
- p0647: 0; = IF(p0383<0.5;-SQRT(p0007*EXP(p0515^2*p0008)-p0007);SQRT(p0007*EXP(p0515^2*p0008)-p0007))
- p0811: 0.25; = if(p0807=480;1-p0810;0)
- p4424: 0; = p1869*p3480
- p3006: 0; = p2420*(p1079+p1081)
- p1294: 0; = p1290*p1252/p0818
- p2182: 0.0503259; = p1050/p0818
- p2438: 0; = p2242*p1014
- p1735: 0
- p0834: 22
- p3967: 3.75511e-5; = p1824*p3478
- p0679: 0
- p3018: 0; = p2237*p1023
- p0929: 0; = p0801*p0923
- p2885: 0.00061529; = p2299*(p1079+p1081)
- p0720: 0
- p3089: 0; = p2308*p1082
- p0636: 0; = IF(p0372<0.5;-SQRT(p0007*EXP(p0504^2*p0008)-p0007);SQRT(p0007*EXP(p0504^2*p0008)-p0007))
- p4044: 1.9366e-5; = p1901*p3478
- p1726: 0.686898
- p1158: 0.112221; = p1156*p1157
- p3240: 1.73471e-8; = p3234*p1188*p3235/p0818
- p0615: 0; = IF(p0351<0.5;-SQRT(p0007*EXP(p0483^2*p0008)-p0007);SQRT(p0007*EXP(p0483^2*p0008)-p0007))
- p2091: 0.374844
- p2640: 0; = p2249*(p1019+p1021)
- p2981: 0; = p2395*(p1020+p1022)
- p2189: 0.00277915; = p1053/p0818
- p2713: 2.73135e-6; = p2322*(p1019+p1021)
- p2329: 3.7076e-7; = p2224*p2197
- p3336: 0; = IF(or(p3254=0;p1232>0);0;p3271*p3289)
- p0238: 5.697
- p1807: 0
- p3001: 0; = p2415*(p1079+p1081)
- p2653: 0; = p2262*(p1078+p1080)
- p0691: 0
- p4022: 3.07022e-6; = p1879*p3478
- p0448: 0; = SQRT(2)*(IF((2*p0316-1)<0;-1;IF((2*p0316-1)>0;1;0))*SQRT(SQRT((2/(pi()*0.140012289)+LN(1-(2*p0316-1)^2)/2)^2-LN(1-(2*p0316-1)^2)/0.140012289)-(2/(pi()*0.140012289)+LN(1-(2*p0316-1)^2)/2)))
- p1987: 400
- p0520: 0; = SQRT(2)*(IF((2*p0388-1)<0;-1;IF((2*p0388-1)>0;1;0))*SQRT(SQRT((2/(pi()*0.140012289)+LN(1-(2*p0388-1)^2)/2)^2-LN(1-(2*p0388-1)^2)/0.140012289)-(2/(pi()*0.140012289)+LN(1-(2*p0388-1)^2)/2)))
- p0904: 1.0812e8; = p0825*p0901+(p0830+p0895)*p0824*p0903
- p1649: 0
- p3099: 1.56274e-7; = p2318*p1023
- p2554: 0.00288554; = p2358*p1014
- p5120: 1.49128e-7; = p1947*p3483
- p2460: 0; = p2264*p1073
- p3133: 0; = p2352*p1132
- p2121: 0.822447
- p0640: 0; = IF(p0376<0.5;-SQRT(p0007*EXP(p0508^2*p0008)-p0007);SQRT(p0007*EXP(p0508^2*p0008)-p0007))
- p2387: 0; = p2229*p2216
- p2286: 0.00314202; = p2223*p2192
- p0347: 0.5
- p0274: 0.5
- p0344: 0.5
- p1100: 0.242165
- p2780: 0.0027742; = p2389*(p1128+p1130)
- p3734: 3.78049e-5; = p1797*p3477
- p2613: 0; = p2417*p1073
- p1820: 0
- p2874: 0.000702732; = p2288*(p1020+p1022)
- p1055: 57209.7; = IF(p1012=0;p1048*p1036;0)
- p2327: 4.58373e-5; = p2224*p2195
- p1102: 0.0149443; = IF(p1071=0;IF(p1096+p1101=1;0;IF(p1096+p1101+p1098>1;1-(p1096+p1101);p1098));0)
- p2536: 1.77154e-5; = p2340*p1073
- p1208: 0; = p1205*p0818*p0822/p0801
- p0854: 479540; = p0801*((1-p0853)*p0846+p0853*p0852)
- p2274: 0.000576845; = p2230*p2220
- p1634: 0
- p1612: 0
- p1170: 404.373; = p1169*p0801
- p4846: 0; = p1879*p3482
- p4918: 0; = p1951*p3482
- p4442: 0; = p1887*p3480
- p0586: 0; = IF(p0322<0.5;-SQRT(p0007*EXP(p0454^2*p0008)-p0007);SQRT(p0007*EXP(p0454^2*p0008)-p0007))
- p2679: 0.000642004; = p2288*(p1019+p1021)
- p1308: 0
- p0814: 0.600863; = if(p0807=480;p0810*p0812+p0811*p0813;0)
- p3355: 0; = if(and(p1232=0;p3256<>0);p3256-(p3350+p3351+p3352+p3353+p3354);0)
- p0438: 0; = SQRT(2)*(IF((2*p0306-1)<0;-1;IF((2*p0306-1)>0;1;0))*SQRT(SQRT((2/(pi()*0.140012289)+LN(1-(2*p0306-1)^2)/2)^2-LN(1-(2*p0306-1)^2)/0.140012289)-(2/(pi()*0.140012289)+LN(1-(2*p0306-1)^2)/2)))
- p3493: 9.97932e-5; = p1762*p3476
- p3170: 0.000554841; = p2389*p1132
- p1191: 0.5
- p2224: 0.00583575; = if(p0765*p0769+p0766*p0770+p0767*p0771+p0768*p0772=0;0;p0771*p0767/(p0765*p0769+p0766*p0770+p0767*p0771+p0768*p0772))
- p1010: 0; = p0890
- p0999: 0; = IF(p0996=1;0;IF(p0996+p0997>1;1-p0996;p0997))
- p2867: 0.000114114; = p2281*(p1020+p1022)
- p0360: 0.5
- p2970: 0; = p2384*(p1079+p1081)
- p2171: 0.209089; = p2165*p0831
- p2442: 0; = p2246*p1014
- p3263: 0
- p2455: 0; = p2259*p1073
- p2344: 1.67035e-6; = p2228*p2212
- p1685: 0.491852
- p3119: 0; = p2338*p1082
- p0668: 0; = IF(p0404<0.5;-SQRT(p0007*EXP(p0536^2*p0008)-p0007);SQRT(p0007*EXP(p0536^2*p0008)-p0007))
- p2233: 0.123041; = if(p0783*p0787+p0784*p0788+p0785*p0789+p0786*p0790=0;0;p0790*p0786/(p0783*p0787+p0784*p0788+p0785*p0789+p0786*p0790))
- p2315: 0.000293689; = p2224*p2182
- p1142: 0; = if(p1121=0;p1136*p0001/(p0818*p0002);0)
- p2858: 0.00382313; = p2272*(p1129+p1131)
- p4650: 2.50712e-5; = p1889*p3481
- p0994: 0; = p0990*p0001*p0004/(p0818*p0002)
- p2787: 0; = p2396*(p1019+p1021)
- p2386: 0; = p2229*p2215
- p2717: 3.60114e-5; = p2326*(p1019+p1021)
- p3180: 0; = p2399*p1023
- p3207: 0; = p2426*p1082
- p0948: 0; = if(and(p0683=0;or(p0807=480;p0807=32;p0807=1;and(p0807=60;p0901<0.03)));p0936;0)
- p3022: 0; = p2241*p1023
- p3258: 0
- p2269: 0; = p2226*p2215
- p1413: 7
- p2080: 0.025
- p1180: 2.50419e-7; = p1176*p1179/p0818
- p0972: 0.0134805; = p0969/p0818
- p2133: 3.07027e-6; = p2015*p2061*p2095/(p0818*1000)
- p3013: 0; = p2427*(p1079+p1081)
- p3238: 0.854735; = IF(p3237+p3235+p3236>1;1-(p3235+p3236);p3237)
- p0616: 0; = IF(p0352<0.5;-SQRT(p0007*EXP(p0484^2*p0008)-p0007);SQRT(p0007*EXP(p0484^2*p0008)-p0007))
- p1791: 0
- p2965: 0; = p2379*(p1079+p1081)
- p2762: 0.00192402; = p2371*(p1019+p1021)
- p4300: 4.75879e-5; = p1951*p3479
- p1772: 0
- p3228: 0.00394091; = p3224*p1229
- p2693: 0.000256021; = p2302*(p1078+p1080)
- p1206: 0.00953
- p4655: 0.000164686; = p1894*p3481
- p2211: 0.00424326; = p1120-p2209-p2208-p2210
- p1127: 0; = if(p1121=0;p0721/100;0)
- p2692: 0.000566153; = p2301*(p1078+p1080)
- p2650: 0; = p2259*(p1078+p1080)
- p3019: 0; = p2238*p1023
- p4377: 0; = p1822*p3480
- p1238: 0; = if(p1232>0;0;IF(p1234=1;0;IF(p1234+p1235>1;1-p1234;p1235)))
- p2752: 0.000238148; = p2361*(p1019+p1021)
- p1922: 0
- p1009: 0; = p1005*p0001*p0004/(p0818*p0002)
- p2519: 1.18794e-5; = p2323*p1014
- p0749: 10.582; = p0089*(1+p0617*p0221/100)
- p1737: 0
- p1211: 0.6
- p3307: 0; = if(and(p1232=0;p3252<>0);p3252*(p3258-p3302)/p3305;0)
- p4236: 3.82891e-6; = p1887*p3479
- p1537: 62
- p3044: 0; = p2263*p1082
- p1539: 6
- p1992: 3900
- p1975: 0.00110968; = p1970*p0001/(p0818*p0002)
- p0418: 0; = SQRT(2)*(IF((2*p0286-1)<0;-1;IF((2*p0286-1)>0;1;0))*SQRT(SQRT((2/(pi()*0.140012289)+LN(1-(2*p0286-1)^2)/2)^2-LN(1-(2*p0286-1)^2)/0.140012289)-(2/(pi()*0.140012289)+LN(1-(2*p0286-1)^2)/2)))
- p2101: 0.620397
- p0851: 0
- p3023: 0; = p2242*p1023
- p2209: 0.000750465; = 14.0067*p2208/30.973762
- p1630: 0
- p3555: 3.90816e-5; = p1824*p3476
- p2525: 2.37253e-7; = p2329*p1014
- p0658: 0; = IF(p0394<0.5;-SQRT(p0007*EXP(p0526^2*p0008)-p0007);SQRT(p0007*EXP(p0526^2*p0008)-p0007))
- p2619: 0; = p2423*p1073
- p1821: 7.77363e-6; = p1413*1000/p0818
- p2480: 0.000987971; = p2284*p1014
- p4754: 0; = p1787*p3482
- p1859: 0
- p1284: 0; = p1280*p1252/p0818
- p0985: 0; = IF(p0982=1;0;IF(p0982+p0983>1;1-p0982;p0983))
- p2706: 4.94602e-5; = p2315*(p1019+p1021)
- p2378: 0; = p2229*p2207
- p1269: 0
- p2280: 0.0043012; = p2223*p2186
- p3335: 0; = IF(or(p3254=0;p1232>0);0;p3270*(p3280*(p3283*p1256+p3286*(p1253+p1257)+p1258*p3288+p3300*p3287)))
- p1015: 0.07117; = IF(p1012=0;p0706/100;0)
- p0886: 0; = p0686*1000*p0687*p0689/100
- p2433: 0; = p2237*p1014
- p4378: 0; = p1823*p3480
- p4454: 0; = p1899*p3480
- p3280: 0
- p3246: 1; = IF(p3244+p3245=1;0;1-(p3244+p3245))
- p3112: 9.82051e-9; = p2331*p1023
- p1491: 99
- p1884: 0
- p1259: 0; = if(p1232>0;0;p0730/100)
- p3168: 0; = p2387*p1082
- p2612: 0; = p2416*p1073
- p3809: 5.55364e-5; = p1872*p3477
- p1901: 9.10625e-5; = p1493*1000/p0818
- p2556: 0.00531272; = p2360*p1014
- p3074: 7.99869e-5; = p2293*p1023
- p1844: 0
- p1768: 0.000204335; = p1360*1000/p0818
- p3359: 0; = if(p1232=0;p3309+p3320+p3331+p3342+p3353;0)
- p4073: 0.000229794; = p1930*p3478
- p1908: 0
- p2664: 0.00443575; = p2273*(p1128+p1130)
- p1024: 704159; = IF(p1012=0;p1014*(p0704/100)*p0703*1000;0)
- p2847: 0; = p2261*(p1079+p1081)
- p5060: 1.73983e-6; = p1887*p3483
- p3416: 0; = p3378*p1238
- p0795: 99.986; = p0135*(1+p0663*p0267/100)
- p1004: 0; = p1000*p0888
- p3438: 0; = p3362*p1240
- p2923: 0.000241276; = p2337*(p1079+p1081)
- p1106: 13349.1; = IF(p1071=0;p1105*p1096*p1095;0)
- p3911: 4.34554e-5; = p1768*p3478
- p0882: 1209; = p0869*p0856
- p2587: 0; = p2391*p1123
- p2237: 0; = p2222*p2182
- p1270: 0; = IF(p1267=p1259;0;IF(p1267+p1268>p1259;p1259-p1267;p1268))
- p2430: 0; = p2236*p2220
- p0384: 0.5
- p5202: 4.33104e-6; = p1823*p3484
- p1679: 0
- p0837: 0.5
- p3401: 0; = p3363*p1238
- p1054: 3.29951e7; = IF(p1012=0;p1047*p1036;0)
- p0606: 0; = IF(p0342<0.5;-SQRT(p0007*EXP(p0474^2*p0008)-p0007);SQRT(p0007*EXP(p0474^2*p0008)-p0007))
- p2391: 0.0005084; = p2233*p2220
- p1759: 0
- p3546: 2.85123e-5; = p1815*p3476
- p2421: 0; = p2235*p2211
- p1962: 0; = p1960*1000/p0818
- p4877: 0; = p1910*p3482
- p2157: 3.2413e-7; = p2015*p2086*p2119/(p0818*1000)
- p0719: 50.302; = p0059*(1+p0587*p0191/100)
- p2814: 0; = p2423*(p1078+p1080)
- p3446: 0; = p3370*p1240
- p0784: 109.57; = p0124*(1+p0652*p0256/100)
- p2759: 5.44415e-6; = p2368*(p1019+p1021)
- p1710: 0
- p1583: 0.806008
- p1802: 0.000617448; = p1394*1000/p0818
- p1457: 3
- p2096: 0.486404
- p2109: 0.826583
- p2512: 4.1254e-5; = p2316*p1014
- p2764: 0.000118718; = p2373*(p1019+p1021)
- p0893: 0; = 1000*(p0890+p0892)*p0001*p0003*p0004/(p0818*p0002)
- p0387: 0.5
- p3688: 3.68694e-6; = p1957*p3476
- p4878: 0; = p1911*p3482
- p1333: 0.00350008; = p1332*p0001/(p0818*p0002)
- p0367: 0.5
- p1841: 0
- p2892: 7.16348e-5; = p2306*(p1079+p1081)
- p3895: 0; = p1962*p3477
- p2216: 0.000102412; = p1108/p0818
- p1280: 0; = IF(p1277=p1263;0;IF(p1277+p1278>p1263;p1263-p1277;p1278))
- p3218: 0.0272168; = p3214*p1228
- p1977: 333.977; = p1252+p1188
- p3101: 5.46341e-8; = p2320*p1023
- p1796: 0
- p2071: 0.151
- p3102: 6.98915e-7; = p2321*p1023
- p0141: 10.054
- p3642: 4.22769e-5; = p1911*p3476
- p3601: 5.89911e-6; = p1870*p3476
- p3561: 2.21216e-6; = p1830*p3476
- p0113: 26.723
- p0403: 0.5
- p1150: 4.90235e7; = if(p1121=0;p1149*p1146*p1145;0)
- p2217: 0.000917868; = p1118-p2216
- p4101: 0; = p1962*p3478
- p2565: 3.39531e-5; = p2369*p1014
- p2543: 2.13483e-5; = p2347*p1073
- p3136: 4.12584e-5; = p2355*p1023
- p1335: 0.000810642; = p1334*p0001/(p0818*p0002)
- p2614: 0; = p2418*p1073
- p1753: 0.92568
- p2489: 0.00697335; = p2293*p1014
- p2079: 0.02
- p2046: 10
- p1332: 3.53264e6; = p1321*p0801
- p1876: 0
- p3196: 0; = p2415*p1082
- p2337: 0.000463289; = p2228*p2205
- p2553: 0.0011879; = p2357*p1014
- p1322: 0.730521; = IF(((p0745*1000*p0749/100)+(p0754*1000*p0758/100))/p0801<0;0;((p0745*1000*p0749/100)+(p0754*1000*p0758/100))/p0801)
- p3471: 0; = p3376*p1241
- p1600: 0.895638
- p1623: 0
- p3403: 0; = p3365*p1238
- p2937: 0; = p2351*(p1129+p1131)
- p2039: 8.09399e-6; = p2015*p2037*p2038/(p0818*1000)
- p0841: 0.178461
- p1253: 0; = if(p1232>0;0;p0735/100)
- p0755: 6.062; = p0095*(1+p0623*p0227/100)
- p3033: 0; = p2252*p1023
- p0962: 0; = if(and(p0683>0;or(p0807=480;p0807=32;p0807=1;and(p0807=60;p0901<0.03)));p0938;0)
- p3474: 0; = p3379*p1241
- p2273: 0.0107105; = p2230*p2219
- p0728: 0
- p3426: 0; = p3369*p1239
- p1172: 4.49064e-7; = p1170/p0818
- p1702: 0
- p2637: 0; = p2246*(p1019+p1021)
- p0919: 0; = p0678*1000/p0801
- p1621: 0
- p1979: 1.21389e7; = p0973
- p3673: 1.86805e-5; = p1942*p3476
- p3060: 1.29969e-5; = p2279*p1023
- p3284: 0
- p0976: 0; = IF(p0687=0;IF(OR(p0686=0;p0689=0);0;p0686*1000*p0689/100);0)
- p2946: 0.00153045; = p2360*(p1020+p1022)
- p3947: 3.30639e-6; = p1804*p3478
- p1249: 0; = if(p1232>0;0;p1244*p0001/(p0818*p0002))
- p1120: 0.00697729; = IF(p1071=0;p1110/(p1115*p0818);0)
- p1852: 0
- p0314: 0.5
- p0444: 0; = SQRT(2)*(IF((2*p0312-1)<0;-1;IF((2*p0312-1)>0;1;0))*SQRT(SQRT((2/(pi()*0.140012289)+LN(1-(2*p0312-1)^2)/2)^2-LN(1-(2*p0312-1)^2)/0.140012289)-(2/(pi()*0.140012289)+LN(1-(2*p0312-1)^2)/2)))
- p1592: 0
- p1780: 0
- p2151: 1.28652e-7; = p2015*p2079*p2113/(p0818*1000)
- p0322: 0.5
- p1641: 0.347885
- p2222: 0; = if(p0765*p0769+p0766*p0770+p0767*p0771+p0768*p0772=0;0;p0769*p0765/(p0765*p0769+p0766*p0770+p0767*p0771+p0768*p0772))
- p0574: 0; = IF(p0310<0.5;-SQRT(p0007*EXP(p0442^2*p0008)-p0007);SQRT(p0007*EXP(p0442^2*p0008)-p0007))
- p1479: 70
- p2933: 0.000117353; = p2347*(p1079+p1081)
- p1328: 3.67662e6; = p1319*p0801
- p2666: 0.000415146; = p2275*(p1128+p1130)
- p2695: 0.00144759; = p2304*(p1078+p1080)
- p1764: 0
- p0519: 0; = SQRT(2)*(IF((2*p0387-1)<0;-1;IF((2*p0387-1)>0;1;0))*SQRT(SQRT((2/(pi()*0.140012289)+LN(1-(2*p0387-1)^2)/2)^2-LN(1-(2*p0387-1)^2)/0.140012289)-(2/(pi()*0.140012289)+LN(1-(2*p0387-1)^2)/2)))
- p4977: 3.47965e-7; = p1804*p3483
- p2167: 0.589617; = p2166*(p0898)
- p2743: 0; = p2352*(p1128+p1130)
- p2305: 1.31541e-5; = p2227*p2212
- p2218: 0.0544416; = p1150/p0818
- p1816: 0
- p0992: 0; = p0988*p0001*p0004/(p0818*p0002)
- p3009: 0; = p2423*(p1079+p1081)
- p1714: 0
- p2661: 0; = p2270*(p1078+p1080)
- p2742: 0; = p2351*(p1128+p1130)
- p0122: 56.486
- p1965: 0.0101119; = p1963+p1959*p1964*1000/p0818
- p1974: 0; = p1969*p0001/(p0818*p0002)
- p1022: 0.18434; = IF(p1012=0;IF(p1014+p1019+p1020+p1021=1;0;IF(p1014+p1019+p1020+p1021+p1018>1;1-(p1014+p1019+p1020+p1021);p1018));0)
- p1559: 0
- p2880: 0.000861231; = p2294*(p1020+p1022)
- p0788: 66.487; = p0128*(1+p0656*p0260/100)
- p2753: 0.000272591; = p2362*(p1019+p1021)
- p1762: 0.000450871; = p1354*1000/p0818
- p3205: 0; = p2424*p1082
- p2506: 7.71607e-5; = p2310*p1073
- p0671: 0
- p3290: 0
- p2744: 0; = p2353*(p1128+p1130)
- p3412: 0; = p3374*p1238
- p1216: 0.108582
- p2116: 0.444424
- p3193: 0; = p2412*p1023
- p3752: 3.88086e-5; = p1815*p3477
- p1810: 0
- p1971: 0; = p1966*p0001/(p0818*p0002)
- p3080: 0; = p2299*p1082
- p3888: 0.000291064; = p1951*p3477
- p0106: 59.053
- p4144: 4.92289e-7; = p1795*p3479
- p0480: 0; = SQRT(2)*(IF((2*p0348-1)<0;-1;IF((2*p0348-1)>0;1;0))*SQRT(SQRT((2/(pi()*0.140012289)+LN(1-(2*p0348-1)^2)/2)^2-LN(1-(2*p0348-1)^2)/0.140012289)-(2/(pi()*0.140012289)+LN(1-(2*p0348-1)^2)/2)))
- p2170: 0.00216872; = p2166*(p0913)
- p1867: 0
- p1129: 0.50302; = if(p1121=0;IF(p1123+p1128=1;0;IF(p1123+p1128+p1125>1;1-(p1123+p1128);p1125));0)
- p2784: 0; = p2393*(p1019+p1021)
- p2964: 0; = p2378*(p1079+p1081)
- p1178: 5.00838e-7; = p1176/p0818
- p4706: 9.71508e-6; = p1945*p3481
- p1045: 0.0725313; = IF(p1012=0;IF(p1037+p1044=1;0;IF(p1037+p1044+p1039>1;1-(p1037+p1044);p1039));0)
- p0708: 9.724; = p0048*(1+p0576*p0180/100)
- p1907: 0
- p1963: 0.00534448; = p1963a+p1963b+p1963c+p1963d+p1963e+p1963f+p1963g+p1963h+p1963i+p1963j+p1963k
- p2961: 0; = p2375*(p1079+p1081)
- p1725: 0
- p1842: 0
- p2206: 0.00133148; = 9*1.00794*p2204/30.973762
- p1712: 0
- p1963b: 3.40133e-5; = p1569*p1773+p1570*p1774+p1571*p1775+p1572*p1776+p1573*p1777+p1574*p1778+p1575*p1779+p1576*p1780+p1577*p1781+p1578*p1782+p1579*p1783+p1580*p1784+p1581*p1785+p1582*p1786+p1583*p1787+p1584*p1788+p1585*p1789+p1586*p1790+p1587*p1791
- p0089: 10.582
- p1672: 0
- p3093: 0.00468564; = p2312*p1132
- p2345: 1.74666e-5; = p2228*p2213
- p2249: 0; = p2222*p2195
- p1044: 0.0086688; = IF(p1012=0;IF(p1037=1;0;IF(p1037+p1038>1;1-p1037;p1038));0)
- p3098: 4.537e-8; = p2317*p1023
- p3361: 0; = if(p1232=0;p3311+p3322+p3333+p3344+p3355;0)
- p3312: 0; = if(and(p1232=0;p3253<>0);p3261*p3277*(p3298*p3290+(1-p3298)*p3294);0)
- p2051: 0.000189051; = p2015*p2049*p2050/(p0818*1000)
- p0774: 0
- p1668: 0.723486
- p1471: 13
- p1165: 0.00110968; = p0801*p0001/(p0818*p0002)
- p3142: 1.03795e-5; = p2361*p1023
- p2031: 0.465411
- p2242: 0; = p2222*p2187
- p0095: 6.062
- p3348: 0; = if(and(p1232=0;p3256<>0);p3276*p3289;0)
- p0973: 1.21389e7; = p0967+p0968+p0969
- p1740: 0
- p2980: 0; = p2394*(p1020+p1022)
- p2176: 0.000909728; = p0895*p0913/p0818
- p2086: 0.0617647
- p0239: 24.976

- p3377: 0; = if(p1232=0;p3246*p3359/p0818;0)
- p2583: 0; = p2387*p1073
- p2199: 0.000229267; = p1069-p2197-p2198
- p2944: 0.000831244; = p2358*(p1020+p1022)
- p2824: 0; = p2238*(p1020+p1022)
- p1122: 0; = p1121*p0001/(p0818*p0002)
- p0921: 0; = p0679*1000/p0801
- p2409: 0; = p2234*p2199
- p3620: 3.93274e-5; = p1889*p3476
- p2366: 0.00399658; = p2225*p2195
- p1126: 0; = if(p1121=0;p0720/100;0)
- p2794: 0; = p2403*(p1019+p1021)
- p1754: 0
- p3552: 1.72057e-6; = p1821*p3476
- p1723: 0
- p1978: 168
- p1651: 0.299611
- p5028: 3.33053e-6; = p1855*p3483
- p1282: 0; = IF(p1277+p1280+p1281=p1260;0;p1260-(p1277+p1280+p1281))
- p1354: 406
- p1134: 261791; = if(p1121=0;p1128*(p0716/100)*p0703*1000;0)
- p1302: 0; = IF(p1297+p1300+p1301=p1262;0;p1262-(p1297+p1300+p1301))
- p3067: 2.30624e-5; = p2286*p1023
- p1681: 0
- p0923: 0; = IF(p0918=1;0;IF(p0918+p0919>1;1-p0918;p0919))
- p1464: 166
- p2227: 0.887325; = if(p0774*p0778+p0775*p0779+p0776*p0780+p0777*p0781=0;0;p0779*p0775/(p0774*p0778+p0775*p0779+p0776*p0780+p0777*p0781))
- p2469: 0; = p2273*p1123
- p0925: 0; = IF(p0918+p0923+p0924=1;0;IF(p0918+p0923+p0924+p0921>1;1-(p0918+p0923+p0924);p0921))
- p1095: 1.41399e7; = IF(p1071=0;p0797*p0702*1000*p0798/100;0)
- p1930: 0.00108053; = p1522*1000/p0818
- p3743: 2.00734e-6; = p1806*p3477
- p0674: 55.837; = p0014*(1+p0542*p0146/100)
- p2760: 8.93571e-6; = p2369*(p1019+p1021)
- p2447: 0; = p2251*p1014
- p2636: 0; = p2245*(p1019+p1021)
- p1632: 0
- p2347: 0.000225336; = p2228*p2215
- p0474: 0; = SQRT(2)*(IF((2*p0342-1)<0;-1;IF((2*p0342-1)>0;1;0))*SQRT(SQRT((2/(pi()*0.140012289)+LN(1-(2*p0342-1)^2)/2)^2-LN(1-(2*p0342-1)^2)/0.140012289)-(2/(pi()*0.140012289)+LN(1-(2*p0342-1)^2)/2)))
- p3259: 0
- p3131: 0; = p2350*p1132
- p2097: 0.40001
- p1137: 0; = if(p1121=0;p1131*(p0716/100)*p0703*1000;0)
- p0873: 0; = p0872*p0001*p0003/(p0818*p0002)
- p1262: 0; = if(p1232>0;0;p0733/100)
- p2514: 1.36242e-5; = p2318*p1014
- p0995: 0; = p0991*p0001*p0004/(p0818*p0002)
- p4854: 0; = p1887*p3482
- p1325: 0; = IF(((p0745*1000*p0752/100)+(p0754*1000*p0761/100))/p0801<0;0;((p0745*1000*p0752/100)+(p0754*1000*p0761/100))/p0801)
- p3064: 9.90047e-6; = p2283*p1023
- p1035: 8.00252e-6; = IF(p1012=0;p1029*p0001/(p0818*p0002);0)
- p1775: 0
- p2464: 0; = p2268*p1073
- p1020: 0; = IF(p1012=0;IF(p1014+p1019=1;0;IF(p1014+p1019+p1016>1;1-(p1014+p1019);p1016));0)
- p2513: 3.95541e-6; = p2317*p1014
- p0949: 0; = if(and(p0683=0;or(p0807=480;p0807=32;p0807=1;and(p0807=60;p0901<0.03)));p0937;0)
- p2376: 0; = p2229*p2205
- p1139: 0; = if(p1121=0;p1133*p0001/(p0818*p0002);0)
- p0785: 0
- p4031: 0.00022082; = p1888*p3478
- p0498: 0; = SQRT(2)*(IF((2*p0366-1)<0;-1;IF((2*p0366-1)>0;1;0))*SQRT(SQRT((2/(pi()*0.140012289)+LN(1-(2*p0366-1)^2)/2)^2-LN(1-(2*p0366-1)^2)/0.140012289)-(2/(pi()*0.140012289)+LN(1-(2*p0366-1)^2)/2)))
- p1222: 0.94
- p3292: 0
- p2560: 0.00210789; = p2364*p1014
- p2094: 0.922577
- p1300: 0; = IF(p1297=p1265;0;IF(p1297+p1298>p1265;p1265-p1297;p1298))
- p4822: 0; = p1855*p3482
- p2956: 2.15044e-5; = p2370*(p1020+p1022)
- p3884: 2.00734e-6; = p1947*p3477
- p2257: 0; = p2222*p2203
- p1187: 0.000298194
- p1006: 0; = p1002*p0001*p0004/(p0818*p0002)
- p3480: 0; = if(p1328+p1330+p1332+p1334+p1336+p1338+p1340+p1342+p1344=0;0;p1336/(p1328+p1330+p1332+p1334+p1336+p1338+p1340+p1342+p1344))
- p3449: 0; = p3373*p1240
- p0259: 43.246
- p0688: 0
- p2166: 1.30058; = p2165*p0824
- p4304: 2.14966e-5; = p1955*p3479
- p4181: 2.83886e-5; = p1832*p3479
- p2757: 0.000673064; = p2366*(p1019+p1021)
- p2920: 1.49038e-6; = p2334*(p1020+p1022)
- p3242: 1.25555e-7; = p3234*p1188*p3238/p0818
- p2723: 2.20668e-5; = p2332*(p1019+p1021)
- p1033: 0.000106017; = IF(p1012=0;p1027*p0001/(p0818*p0002);0)
- p2746: 0.000946639; = p2355*(p1019+p1021)
- p0991: 0; = p0987*p0886
- p0934: 0; = p0928*p0001/(p0818*p0002)
- p2866: 0.000792883; = p2280*(p1020+p1022)
- p2499: 2.72394e-5; = p2303*p1073
- p2656: 0; = p2265*(p1078+p1080)
- p3278: 0
- p2295: 0.000672402; = p2223*p2202
- p2779: 0; = p2388*(p1078+p1080)
- p2077: 0.043
- p3375: 0; = if(p1232=0;p3246*p3357/p0818;0)
- p0864: 0; = IF(p0858=1;0;IF(p0858+p0859>1;1-p0858;p0859))
- p2582: 0; = p2386*p1073
- p1690: 0.624955
- p2893: 0.000244896; = p2307*(p1079+p1081)
- p3398: 0; = p3379*p1234
- p4708: 9.40169e-7; = p1947*p3481
- p0619: 0; = IF(p0355<0.5;-SQRT(p0007*EXP(p0487^2*p0008)-p0007);SQRT(p0007*EXP(p0487^2*p0008)-p0007))
- p1855: 0.00014881; = p1447*1000/p0818
- p2238: 0; = p2222*p2183
- p0844: 0.403763
- p1553: 0
- p0100: 4.785
- p1550: 0
- p0491: 0; = SQRT(2)*(IF((2*p0359-1)<0;-1;IF((2*p0359-1)>0;1;0))*SQRT(SQRT((2/(pi()*0.140012289)+LN(1-(2*p0359-1)^2)/2)^2-LN(1-(2*p0359-1)^2)/0.140012289)-(2/(pi()*0.140012289)+LN(1-(2*p0359-1)^2)/2)))
- p1159: 0.5
- p3005: 0; = p2419*(p1079+p1081)
- p1718: 0
- p2287: 0.0177837; = p2223*p2193
- p0858: 0.0180295; = p0670*1000/p0856
- p0244: 5.864
- p2069: 0.190588
- p2443: 0; = p2247*p1014
- p0153: 0
- p2482: 0.00201061; = p2286*p1014
- p1795: 9.99467e-6; = p1387*1000/p0818
- p2040: 0
- p0701: 0
- p0988: 0; = p0982*p0886
- p5324: 3.58033e-6; = p1945*p3484
- p2078: 0.117
- p0267: 2.917
- p2804: 0; = p2413*(p1019+p1021)
- p0516: 0; = SQRT(2)*(IF((2*p0384-1)<0;-1;IF((2*p0384-1)>0;1;0))*SQRT(SQRT((2/(pi()*0.140012289)+LN(1-(2*p0384-1)^2)/2)^2-LN(1-(2*p0384-1)^2)/0.140012289)-(2/(pi()*0.140012289)+LN(1-(2*p0384-1)^2)/2)))
- p1048: 0.000519971; = IF(p1012=0;IF(p1037+p1044+p1045+p1046+p1047=1;0;IF(p1037+p1044+p1045+p1046+p1047+p1042>1;1-(p1037+p1044+p1045+p1046+p1047);p1042));0)
- p1943: 0
- p1929: 0
- p3017: 0; = p2431*(p1129+p1131)
- p0676: 0
- p4719: 0; = p1962*p3481
- p1781: 0
- p4465: 0; = p1910*p3480
- p3069: 2.79812e-5; = p2288*p1023
- p0761: 0
- p0308: 0.5
- p1037: 0.411884
- p4170: 3.82891e-7; = p1821*p3479
- p3313: 0; = if(and(p1232=0;p3253<>0);p3262*(p3278*(p3282*p1256+p3286*(p1253+p1257)+p1258*p3288+p3298*p3287));0)
- p1639: 0
- p2146: 1.597e-7; = p2015*p2074*p2108/(p0818*1000)
- p3124: 0; = p2343*p1082
- p0012: 1042.76
- p3630: 2.43338e-5; = p1899*p3476
- p1991: 3.56815e7; = (if(p1111=0;0;p1106/p1111)+if(p1112=0;0;p1107/p1112)+if(p1113=0;0;p1108/p1113)+if(p1114=0;0;p1109/p1114)+if(p1115=0;0;p1110/p1115))*(1+p1157)
- p3930: 8.97448e-6; = p1787*p3478
- p1741: 0.527618
- p1058: 0.225
- p0220: 25.804
- p1161: 1.12e6; = p0801
- p2721: 1.02485e-7; = p2330*(p1019+p1021)
- p3376: 0; = if(p1232=0;p3246*p3358/p0818;0)
- p1296: 0; = p1292*p1252/p0818
- p1255: 0; = if(p1232>0;0;p0737/100)
- p0709: 18.434; = p0049*(1+p0577*p0181/100)
- p1447: 134
- p1829: 0
- p1151: 3.72074e6; = if(p1121=0;p1149*p1148*p1145;0)
- p1697: 0.705252
- p0987: 0; = if(p0978>0;0;if(and(p0687=0;p0691=0;p0695=0;p0699=0);0;IF(p0982+p0985+p0986=1;0;1-(p0982+p0985+p0986))))
- p2307: 0.000470239; = p2227*p2214
- p2021: 0.000200328; = p2020/p0818
- p2247: 0; = p2222*p2192
- p3434: 0; = p3377*p1239
- p1611: 0.377871
- p0442: 0; = SQRT(2)*(IF((2*p0310-1)<0;-1;IF((2*p0310-1)>0;1;0))*SQRT(SQRT((2/(pi()*0.140012289)+LN(1-(2*p0310-1)^2)/2)^2-LN(1-(2*p0310-1)^2)/0.140012289)-(2/(pi()*0.140012289)+LN(1-(2*p0310-1)^2)/2)))
- p1758: 0
- p3407: 0; = p3369*p1238
- p2457: 0; = p2261*p1073
- p3039: 0; = p2258*p1082
- p2418: 0; = p2235*p2208
- p1023: 0.00734; = IF(p1012=0;IF(p1014+p1019+p1020+p1021+p1022=1;0;1-(p1014+p1019+p1020+p1021+p1022));0)
- p3075: 3.42923e-5; = p2294*p1023
- p3063: 5.81267e-5; = p2282*p1023
- p3252: 0; = p1252*(p1267*(1-p3247)+p1270*(1-p3248)+p1271*(1-p3249)+p1272*(1-p3250))
- p2466: 0; = p2270*p1073
- p3187: 0; = p2406*p1023
- p2152: 1.60815e-7; = p2015*p2080*p2114/(p0818*1000)
- p0891: 0; = IF(p3251=0;0;62.4*6272640/(12*12*12))
- p2259: 0; = p2226*p2205
- p2758: 0.00665326; = p2367*(p1019+p1021)
- p1773: 0
- p3109: 3.32577e-6; = p2328*p1023
- p2938: 0; = p2352*(p1129+p1131)
- p1872: 0.000184346; = p1464*1000/p0818
- p1183: 0.00110968; = p0801*p0001/(p0818*p0002)
- p0021: 1118.79
- p0063: 1118.79
- p2782: 0.000210554; = p2391*(p1128+p1130)
- p3051: 0; = p2270*p1082
- p2481: 0.000248449; = p2285*p1014
- p2563: 0.0252805; = p2367*p1014
- p2163: 0.00269772; = (p2017-p2020)/p0818-(p2025+p2028+p2033+p2034+p2051+p2125+p2126+p2127+p2128+p2129+p2130+p2131+p2132+p2133+p2134+p2135+p2136+p2137+p2138+p2139+p2140+p2141+p2142+p2143+p2144+p2145+p2146+p2147+p2148+p2149+p2150+p2151+p2152+p2153+p2154+p2155+p2156+p2157)
- p3998: 3.16469e-5; = p1855*p3478
- p2844: 0; = p2258*(p1079+p1081)
- p0262: 40.133
- p2911: 6.96431e-6; = p2325*(p1020+p1022)
- p1926: 0
- p1480: 935
- p0524: 0; = SQRT(2)*(IF((2*p0392-1)<0;-1;IF((2*p0392-1)>0;1;0))*SQRT(SQRT((2/(pi()*0.140012289)+LN(1-(2*p0392-1)^2)/2)^2-LN(1-(2*p0392-1)^2)/0.140012289)-(2/(pi()*0.140012289)+LN(1-(2*p0392-1)^2)/2)))
- p1889: 0.000177683; = p1481*1000/p0818
- p3384: 0; = p3365*p1234
- p2590: 0; = p2394*p1014
- p1875: 0
- p1622: 0
- p1687: 0
- p1831: 0
- p2127: 1.72952e-5; = p2015*p2055*p2089/(p0818*1000)
- p4497: 0; = p1942*p3480
- p3072: 3.71482e-7; = p2291*p1023
- p1874: 0
- p1998: 168
- p2130: 5.24284e-6; = p2015*p2058*p2092/(p0818*1000)
- p3329: 0; = if(and(p1232=0;p3255<>0);p3255*(p3266-p3324)/p3327;0)
- p5042: 3.47965e-7; = p1869*p3483
- p1854: 0
- p0781: 0
- p0229: 16.677
- p1983: 50
- p4317: 0; = p1762*p3480
- p4791: 0; = p1824*p3482
- p2153: 1.25733e-8; = p2015*p2081*p2115/(p0818*1000)
- p2684: 0.00183523; = p2293*(p1019+p1021)
- p1964: 0.5
- p1071: 0
- p1885: 0
- p2802: 0; = p2411*(p1019+p1021)
- p0217: 16.639
- p0836: 797.825; = p0831*p0835*p0801/(1-p0831)
- p2009: 0.0326163; = ((p1983*p1985+p1989*p1991+p1995*p1997+p2003*p2005+p1976*p1977+p1978*p1979+p1998*p1999)/p0818)*p0005*p0002/1000
- p3760: 2.50918e-5; = p1823*p3477
- p1824: 0.000176572; = p1416*1000/p0818
- p1226: 1.12e6; = IF(p1221=0;0;IF(p1193=0;p0801;0))
- p1287: 0
- p2561: 0.0119306; = p2365*p1014
- p3162: 0; = p2381*p1082
- p0223: 9.91
- p2972: 0; = p2386*(p1079+p1081)
- p2976: 0.00474834; = p2390*(p1129+p1131)
- p4970: 2.80858e-6; = p1797*p3483
- p1596: 0
- p2662: 0; = p2271*(p1078+p1080)
- p3363: 0; = if(p1232=0;p3244*p3357/p0818;0)
- p2111: 0.856281
- p0945: 0; = if(and(p0683=0;p0951=0);p0939;0)
- p0848: 0
- p3203: 0; = p2422*p1082
- p3134: 0; = p2353*p1132
- p2987: 0; = p2401*(p1020+p1022)
- p1309: 0
- p2369: 5.30592e-5; = p2225*p2198
- p2889: 0.000149736; = p2303*(p1079+p1081)
- p2432: 0.112221; = p1158
- p1235: 0; = if(p1232>0;0;p0727/100)
- p1321: 3.15414; = IF(((p0745*1000*p0748/100)+(p0754*1000*p0757/100))/p0801<0;0;((p0745*1000*p0748/100)+(p0754*1000*p0757/100))/p0801)
- p5141: 2.34454e-5; = p1762*p3484
- p3144: 2.98768e-6; = p2363*p1023
- p0840: 0.210331; = p0839*p0831
- p3758: 2.3419e-6; = p1821*p3477
- p2714: 3.12638e-6; = p2323*(p1019+p1021)
- p1814: 0
- p3214: 0.376406; = p1222*40.078/100.0869
- p1913: 0
- p0242: 13.222
- p2395: 0; = p2234*p2184
- p2774: 0; = p2383*(p1078+p1080)
- p2685: 0.000786806; = p2294*(p1019+p1021)
- p1857: 0
- p2730: 0.000478914; = p2339*(p1078+p1080)
- p2143: 1.03648e-6; = p2015*p2071*p2105/(p0818*1000)
- p1615: 0
- p1331: 0.00495817; = p1330*p0001/(p0818*p0002)
- p1214: 3; = IF(p1213=0;0;p1213-1)
- p1961: 0
- p2526: 3.89413e-7; = p2330*p1014
- p4053: 1.01553e-5; = p1910*p3478
- p5166: 2.1944e-6; = p1787*p3484
- p1224: 0.44; = IF(p1221=0;0;IF(p1193=0;1-p1223;0))
- p2537: 8.01112e-6; = p2341*p1073
- p3188: 0; = p2407*p1023
- p1336: 0; = p1323*p0801
- p2063: 2.01468
- p2095: 0.765734
- p0933: 1.12e6; = p0801*p0927
- p3056: 8.30292e-5; = p2275*p1132
- p1674: 0
- p1141: 0.000315037; = if(p1121=0;p1135*p0001/(p0818*p0002);0)
- p2330: 6.08543e-7; = p2224*p2198
- p2388: 0; = p2229*p2217
- p5194: 6.69868e-6; = p1815*p3484
- p3340: 0; = if(and(p1232=0;p3254<>0);p3254*(p3270-p3335)/p3338;0)
- p0672: 1042.76; = p0012*(1+p0540*p0144/100)
- p0812: 0.279412; = if(p0807=480;0.095/0.34;0)
- p1982: 750
- p2253: 0; = p2222*p2199
- p2476: 0.00275238; = p2280*p1014
- p4720: 0.000754109; = p1963*p3481
- p0901: 0.01746
- p0871: 0.200069; = p0870*p0001*p0003/(p0818*p0002)
- p3253: 0; = p1252*(p1277*(1-p3247)+p1280*(1-p3248)+p1281*(1-p3249)+p1282*(1-p3250))
- p2932: 3.10976e-5; = p2346*(p1079+p1081)
- p3226: 0.00176058; = p3222*p1229
- p0490: 0; = SQRT(2)*(IF((2*p0358-1)<0;-1;IF((2*p0358-1)>0;1;0))*SQRT(SQRT((2/(pi()*0.140012289)+LN(1-(2*p0358-1)^2)/2)^2-LN(1-(2*p0358-1)^2)/0.140012289)-(2/(pi()*0.140012289)+LN(1-(2*p0358-1)^2)/2)))
- p0775: 50.091; = p0115*(1+p0643*p0247/100)
- p2646: 0; = p2255*(p1019+p1021)
- p0790: 13.34; = p0130*(1+p0658*p0262/100)
- p4979: 1.49128e-7; = p1806*p3483
- p5282: 7.85363e-6; = p1903*p3484
- p3301: 0; = if(and(p1232=0;p3252<>0);p3257*p3277*(p3297*p3290+(1-p3297)*p3294);0)
- p2550: 0.0163862; = p2354*p1014
- p2177: 0.286575; = p0895/p0818-(p2173+p2174+p2175+p2176)
- p2251: 0; = p2222*p2197
- p0877: 0; = p0876*p0001*p0003/(p0818*p0002)
- p5273: 6.06924e-5; = p1894*p3484
- p0512: 0; = SQRT(2)*(IF((2*p0380-1)<0;-1;IF((2*p0380-1)>0;1;0))*SQRT(SQRT((2/(pi()*0.140012289)+LN(1-(2*p0380-1)^2)/2)^2-LN(1-(2*p0380-1)^2)/0.140012289)-(2/(pi()*0.140012289)+LN(1-(2*p0380-1)^2)/2)))
- p1689: 0
- p0665: 0; = IF(p0401<0.5;-SQRT(p0007*EXP(p0533^2*p0008)-p0007);SQRT(p0007*EXP(p0533^2*p0008)-p0007))
- p2702: 0.0166251; = p2311*(p1128+p1130)
- p1389: 113
- p0900: 2.45399; = p0899/p0818
- p1661: 0.776933
- p2364: 0.00329404; = p2225*p2192
- p2434: 0; = p2238*p1014
- p2870: 0.000284607; = p2284*(p1020+p1022)
- p4449: 0; = p1894*p3480
- p2338: 0.000150025; = p2228*p2206
- p1591: 0.677771
- p1671: 0
- p0119: 70.235
- p2154: 9.79869e-7; = p2015*p2082*p2116/(p0818*1000)
- p1123: 0; = if(p1121=0;p0717/100;0)
- p0245: 15.759
- p1879: 1.44367e-5; = p1471*1000/p0818
- p2781: 0.00390943; = p2390*(p1128+p1130)
- p0722: 0
- p1931: 0
- p4307: 0; = p1962*p3479
- p5096: 3.7282e-7; = p1923*p3483
- p4684: 2.35042e-6; = p1923*p3481
- p0059: 50.302
- p2510: 0; = p2314*p1123
- p1310: 0; = IF(p1307=p1266;0;IF(p1307+p1308>p1266;p1266-p1307;p1308))
- p0853: 0; = p0803/(p0802+p0803)
- p4769: 0; = p1802*p3482
- p5131: 0; = p1962*p3483
- p3949: 1.41702e-6; = p1806*p3478
- p2551: 0.00359696; = p2355*p1014
- p3197: 0; = p2416*p1082
- p3528: 2.7775e-5; = p1797*p3476
- p0917: 3.55332; = ((p0825+p0827+((p0830+p0895)+p0814*p0818))/p0818)-(p0900+p0905+p0910+p0915)
- p2517: 6.09323e-5; = p2321*p1014
- p1184: 1.37755e-7; = p1182/p0818
- p4960: 9.44478e-7; = p1787*p3483
- p2129: 9.52473e-6; = p2015*p2057*p2091/(p0818*1000)
- p2104: 0.817136
- p1018: 0.18434; = IF(p1012=0;p0709/100;0)
- p0353: 0.5
- p3526: 2.21216e-6; = p1795*p3476
- p2520: 2.98735e-6; = p2324*p1014
- p2593: 0; = p2397*p1014
- p0899: 2.20977e9; = p0825*p0896+p0827*p0897+(p0830+p0895)*p0824*p0898
- p2439: 0; = p2243*p1014
- p2928: 1.9014e-5; = p2342*(p1079+p1081)
- p0358: 0.5
- p0747: 6.05; = p0087*(1+p0615*p0219/100)
- p3382: 0; = p3363*p1234
- p2809: 0; = p2418*(p1078+p1080)
- p4662: 1.2849e-5; = p1901*p3481
- p4434: 0; = p1879*p3480
- p1088: 0; = IF(p1071=0;p1082*(p0710/100)*p0703*1000;0)
- p4672: 2.69515e-5; = p1911*p3481
- p0819: 1.63246; = p0808*p0809/p0818
- p3464: 0; = p3369*p1241
- p0710: 26.723; = p0050*(1+p0578*p0182/100)
- p3676: 1.52394e-5; = p1945*p3476
- p2049: 25.6942
- p2643: 0; = p2252*(p1019+p1021)
- p3394: 0; = p3375*p1234
- p1608: 0
- p4924: 0; = p1957*p3482
- p2085: 0.0335294
- p4228: 7.11083e-7; = p1879*p3479
- p1124: 0.41415; = if(p1121=0;p0718/100;0)
- p1461: 14
- p2291: 5.06107e-5; = p2223*p2198
- p2193: 0.0366417; = p1054/p0818
- p2495: 0.000111931; = p2299*p1073
- p3235: 0.118093
- p1230: 0.5
- p3393: 0; = p3374*p1234
- p1016: 0; = IF(p1012=0;p0707/100;0)
- p1036: 1.10025e8; = IF(p1012=0;p0795*p0702*1000*p0796/100;0)
- p1424: 519
- p1739: 0
- p2531: 5.93118e-5; = p2335*p1014
- p2042: 0.07
- p0410: 0; = SQRT(2)*(IF((2*p0278-1)<0;-1;IF((2*p0278-1)>0;1;0))*SQRT(SQRT((2/(pi()*0.140012289)+LN(1-(2*p0278-1)^2)/2)^2-LN(1-(2*p0278-1)^2)/0.140012289)-(2/(pi()*0.140012289)+LN(1-(2*p0278-1)^2)/2)))
- p2994: 0; = p2408*(p1020+p1022)
- p1231: 0.0400792; = IF(p1221=0;0;p1230*(p1228+p1229))
- p2839: 0; = p2253*(p1020+p1022)
- p5084: 4.275e-6; = p1911*p3483
- p1963h: 0.00112616; = p1686*p1890+p1687*p1891+p1688*p1892+p1689*p1893+p1690*p1894+p1691*p1895+p1692*p1896+p1693*p1897+p1694*p1898+p1695*p1899+p1696*p1900+p1697*p1901+p1698*p1902+p1699*p1903+p1700*p1904+p1701*p1905+p1702*p1906+p1703*p1907+p1704*p1908+p1705*p1909
- p1189: 0.00110968; = p0801*p0001/(p0818*p0002)
- p4456: 0; = p1901*p3480
- p1486: 1051
- p0907: 0.00734516
- p1281: 0; = IF(p1277+p1280=p1263;0;IF(p1277+p1280+p1279>p1263;p1263-(p1277+p1280);p1279))
- p2145: 2.57304e-6; = p2015*p2073*p2107/(p0818*1000)
- p3304: 0; = if(and(p1232=0;p3252<>0);p3260*p3289;0)
- p0402: 0.5
- p0285: 0.5
- p2869: 0.000248645; = p2283*(p1020+p1022)
- p0191: 19.081
- p2971: 0; = p2385*(p1079+p1081)
- p0454: 0; = SQRT(2)*(IF((2*p0322-1)<0;-1;IF((2*p0322-1)>0;1;0))*SQRT(SQRT((2/(pi()*0.140012289)+LN(1-(2*p0322-1)^2)/2)^2-LN(1-(2*p0322-1)^2)/0.140012289)-(2/(pi()*0.140012289)+LN(1-(2*p0322-1)^2)/2)))
- p1495: 136
- p3148: 0.000289976; = p2367*p1023
- p1682: 0
- p1724: 0
- p0739: 7.736; = p0079*(1+p0607*p0211/100)
- p3411: 0; = p3373*p1238
- p2431: 0; = p2236*p2221
- p1265: 0; = if(p1232>0;0;IF(p1259+p1263+p1264=1;0;IF(p1259+p1263+p1264+p1262>1;1-(p1259+p1263+p1264);p1262)))
- p2351: 0; = p2232*p2219
- p1314: 0; = p1310*p1252/p0818
- p2532: 4.85304e-5; = p2336*p1073
- p4485: 0; = p1930*p3480
- p0912: 0.0117914
- p2815: 0; = p2424*(p1078+p1080)
- p3420: 0; = p3363*p1239
- p4458: 0; = p1903*p3480
- p1845: 0.000761816; = p1437*1000/p0818
- p2149: 2.84553e-7; = p2015*p2077*p2111/(p0818*1000)
- p2000: 4000
- p1954: 0
- p0610: 0; = IF(p0346<0.5;-SQRT(p0007*EXP(p0478^2*p0008)-p0007);SQRT(p0007*EXP(p0478^2*p0008)-p0007))
- p1606: 0
- p2334: 8.08496e-6; = p2224*p2202
- p1680: 0
- p4712: 0.000136324; = p1951*p3481
- p1995: 50
- p2594: 0; = p2398*p1014
- p2399: 0; = p2234*p2188
- p1642: 0
- p0663: 0; = IF(p0399<0.5;-SQRT(p0007*EXP(p0531^2*p0008)-p0007);SQRT(p0007*EXP(p0531^2*p0008)-p0007))
- p0687: 0
- p2010: 0.0126792; = ((p1984*p1985+p1990*p1991+p1996*p1997+p2004*p2005)/p0818)*p0005*p0002/1000
- p4400: 0; = p1845*p3480
- p1311: 0; = IF(p1307+p1310=p1266;0;IF(p1307+p1310+p1309>p1266;p1266-(p1307+p1310);p1309))
- p2954: 5.95912e-6; = p2368*(p1020+p1022)
- p1904: 0
- p0670: 20.193; = p0010*(1+p0538*p0142/100)
- p3442: 0; = p3366*p1240
- p0481: 0; = SQRT(2)*(IF((2*p0349-1)<0;-1;IF((2*p0349-1)>0;1;0))*SQRT(SQRT((2/(pi()*0.140012289)+LN(1-(2*p0349-1)^2)/2)^2-LN(1-(2*p0349-1)^2)/0.140012289)-(2/(pi()*0.140012289)+LN(1-(2*p0349-1)^2)/2)))
- p3618: 1.72057e-5; = p1887*p3476
- p2991: 0; = p2405*(p1020+p1022)
- p1193: 0; = IF(OR(p1036=0;p1095=0);0.0001*p0857;0)
- p2829: 0; = p2243*(p1020+p1022)
- p1822: 4.10892e-5; = p1414*1000/p0818
- p0214: 0.804
- p3275: 0
- p1670: 0
- p3365: 0; = if(p1232=0;p3244*p3359/p0818;0)
- p2220: 0.00413195; = p1151/p0818
- p0052: 38.447
- p1699: 0.762907
- p2299: 0.00118145; = p2227*p2206
- p0579: 0; = IF(p0315<0.5;-SQRT(p0007*EXP(p0447^2*p0008)-p0007);SQRT(p0007*EXP(p0447^2*p0008)-p0007))
- p0793: 0
- p3324: 0; = if(and(p1232=0;p3255<>0);p3266*(p3279*(p3284*p1256+p3286*(p1253+p1257)+p1258*p3288+p3299*p3287));0)
- p1330: 5.0043e6; = p1320*p0801
- p0937: 0; = p0931*p0001/(p0818*p0002)
- p3297: 0; = if(p1273+p1274+p1275+p1276=0;0;p1273/(p1273+p1274+p1275+p1276))
- p0313: 0.5
- p2016: 0.00124243; = (p2014-p2015)/(p0818)
- p0742: 99.137; = p0082*(1+p0610*p0214/100)
- p4502: 0; = p1947*p3480
- p3294: 0
- p2967: 0; = p2381*(p1079+p1081)
- p2428: 0; = p2236*p2218
- p2672: 0.000104253; = p2281*(p1019+p1021)
- p3149: 2.37278e-7; = p2368*p1023
- p0801: 1.12e6
- p2973: 0; = p2387*(p1079+p1081)
- p3310: 0; = if(and(p1232=0;p3252<>0);IF((p3306+p3307+p3308+p3309)+(p3252*(p3257*(1-p3277))/p3305)>p3252;p3252-(p3306+p3307+p3308+p3309);p3252*(p3257*(1-p3277))/p3305);0)
- p3247: 0
- p1976: 0.1766
- p4342: 0; = p1787*p3480
- p2053: 1.45647
- p3158: 0; = p2377*p1082
- p2123: 0.263965
- p3739: 0.000186014; = p1802*p3477
- p2897: 0.0201926; = p2311*(p1129+p1131)
- p1692: 0
- p3282: 0
- p2979: 0; = p2393*(p1020+p1022)
- p1387: 9
- p2099: 0.620397
- p4151: 3.04125e-5; = p1802*p3479
- p2426: 0; = p2235*p2216
- p1176: 450.995; = p1175*p0801
- p3388: 0; = p3369*p1234
- p2067: 0.446471
- p1098: 0.0149443
- p1951: 0.000966151; = p1543*1000/p0818
- p2398: 0; = p2234*p2187
- p0746: 40.59; = p0086*(1+p0614*p0218/100)
- p2950: 0.000607222; = p2364*(p1020+p1022)
- p2999: 0; = p2413*(p1020+p1022)
- p0705: 63.991; = p0045*(1+p0573*p0177/100)
- p2407: 0; = p2234*p2197
- p1326: 0.331943; = IF(((p0745*1000*p0753/100)+(p0754*1000*p0762/100))/p0801<0;0;((p0745*1000*p0753/100)+(p0754*1000*p0762/100))/p0801)
- p4664: 2.13105e-5; = p1903*p3481
- p5128: 9.76789e-6; = p1955*p3483
- p0502: 0; = SQRT(2)*(IF((2*p0370-1)<0;-1;IF((2*p0370-1)>0;1;0))*SQRT(SQRT((2/(pi()*0.140012289)+LN(1-(2*p0370-1)^2)/2)^2-LN(1-(2*p0370-1)^2)/0.140012289)-(2/(pi()*0.140012289)+LN(1-(2*p0370-1)^2)/2)))
- p2819: 0; = p2428*(p1128+p1130)
- p2390: 0.00943966; = p2233*p2219
- p4012: 3.30639e-6; = p1869*p3478
- p1797: 0.000125489; = p1389*1000/p0818
- p2435: 0; = p2239*p1014
- p2375: 0; = p2229*p2204
- p3447: 0; = p3371*p1240
- p2494: 0.000345652; = p2298*p1073
- p3392: 0; = p3373*p1234
- p2633: 0; = p2242*(p1019+p1021)
- p4444: 0; = p1889*p3480
- p4909: 0; = p1942*p3482
- p3610: 3.19535e-6; = p1879*p3476
- p1074: 0.38447; = IF(p1071=0;p0712/100;0)
- p1239: 0; = if(p1232>0;0;IF(p1234+p1238=1;0;IF(p1234+p1238+p1236>1;1-(p1234+p1238);p1236)))
- p0273: 0.5
- p1051: 953784; = IF(p1012=0;p1044*p1036;0)
- p3049: 0; = p2268*p1082
- p1083: 28331.9; = IF(p1071=0;p1073*(p0710/100)*p0703*1000;0)
- p1941: 0
- p1013: 0; = p1012*p0001/(p0818*p0002)
- p2363: 0.00040704; = p2225*p2191
- p2697: 5.28839e-5; = p2306*(p1078+p1080)
- p2754: 6.85497e-5; = p2363*(p1019+p1021)
- p4789: 0; = p1822*p3482
- p2074: 0.025
- p3741: 4.68379e-6; = p1804*p3477
- p3414: 0; = p3376*p1238
- p1198: 0.44
- p1338: 2.34384e6; = p1324*p0801
- p3321: 0; = if(and(p1232=0;p3253<>0);IF((p3317+p3318+p3319+p3320)+(p3253*(p3261*(1-p3277))/p3316)>p3253;p3253-(p3317+p3318+p3319+p3320);p3253*(p3261*(1-p3277))/p3316);0)
- p0890: 0; = p0686*1000*p0687*p0885/100
- p2586: 0; = p2390*p1123
- p5062: 3.97675e-6; = p1889*p3483
- p2033: 2.22641e-5; = p2015*p2029*p2031/(p0818*1000)
- p4040: 7.13235e-5; = p1897*p3478
- p3094: 0.000252359; = p2313*p1132
- p2626: 0; = p2430*p1123
- p3386: 0; = p3367*p1234
- p3065: 1.13324e-5; = p2284*p1023
- p5289: 2.48313e-6; = p1910*p3484
- p2271: 0; = p2226*p2217
- p1256: 0; = if(p1232>0;0;IF(p1253=1;0;IF(p1253+p1254>1;1-p1253;p1254)))
- p2036: 3.77784e-5; = p2015*p2030*(1-p2032)/(p0818*1000)
- p4506: 0; = p1951*p3480
- p2019: 0.13105
- p3054: 0.000887151; = p2273*p1132
- p1073: 0.09474; = IF(p1071=0;p0711/100;0)
- p3306: 0; = if(and(p1232=0;p3252<>0);p3252*(p3257*p3277-p3301)/p3305;0)
- p2361: 0.0014141; = p2225*p2189
- p0380: 0.5
- p1008: 0; = p1004*p0001*p0004/(p0818*p0002)
- p1779: 0
- p0711: 9.474; = p0051*(1+p0579*p0183/100)
- p2875: 0.00694652; = p2289*(p1020+p1022)
- p2716: 6.36248e-6; = p2325*(p1019+p1021)
- p1736: 0
- p3371: 0; = if(p1232=0;p3245*p3359/p0818;0)
- p1777: 0
- p4410: 0; = p1855*p3480
- p0878: 55837; = p0867*p0856
- p2122: 0.341195
- p3176: 0; = p2395*p1023
- p4914: 0; = p1947*p3482
- p0405: 0; = SQRT(2)*(IF((2*p0273-1)<0;-1;IF((2*p0273-1)>0;1;0))*SQRT(SQRT((2/(pi()*0.140012289)+LN(1-(2*p0273-1)^2)/2)^2-LN(1-(2*p0273-1)^2)/0.140012289)-(2/(pi()*0.140012289)+LN(1-(2*p0273-1)^2)/2)))
- p1171: 0.00110968; = p0801*p0001/(p0818*p0002)
- p1301: 0; = IF(p1297+p1300=p1265;0;IF(p1297+p1300+p1299>p1265;p1265-(p1297+p1300);p1299))
- p3079: 0; = p2298*p1082
- p0707: 0
- p0782: 56.486; = p0122*(1+p0650*p0254/100)
- p3413: 0; = p3375*p1238
- p3603: 4.08022e-5; = p1872*p3476
- p4866: 0; = p1899*p3482
- p0320: 0.5
- p2737: 2.29576e-5; = p2346*(p1078+p1080)
- p2544: 1.09324e-6; = p2348*p1073
- p2736: 6.71537e-6; = p2345*(p1078+p1080)
- p0102: 4.187
- p2649: 0; = p2258*(p1078+p1080)
- p0144: 0
- p0764: 98.332; = p0104*(1+p0632*p0236/100)
- p1136: 0; = if(p1121=0;p1130*(p0716/100)*p0703*1000;0)
- p2241: 0; = p2222*p2186
- p1748: 0
- p3040: 0; = p2259*p1082
- p3210: 0; = p2429*p1132
- p3867: 0.000325524; = p1930*p3477
- p2258: 0; = p2226*p2204
- p3318: 0; = if(and(p1232=0;p3253<>0);p3253*(p3262-p3313)/p3316;0)
- p2596: 0; = p2400*p1014
- p0123: 70.646
- p0758: 0
- p3256: 0; = p1252*(p1307*(1-p3247)+p1310*(1-p3248)+p1311*(1-p3249)+p1312*(1-p3250))
- p0002: 0.453592
- p0128: 66.487
- p5115: 1.88896e-6; = p1942*p3483
- p0997: 0; = if(p0888=0;0;if((p0695*p0694*1000*p0696/100)/p0888>1;1;(p0695*p0694*1000*p0696/100)/p0888))
- p0809: 2000
- p3287: 0
- p0866: 0; = IF(p0858+p0864+p0865=1;0;IF(p0858+p0864+p0865+p0861>1;1-(p0858+p0864+p0865);p0861))
- p1250: 0; = if(p1232>0;0;p1245*p0001/(p0818*p0002))
- p2873: 0.00327825; = p2287*(p1020+p1022)
- p2585: 0; = p2389*p1123
- p1112: 0.209482
- p0678: 0
- p3395: 0; = p3376*p1234
- p3682: 0.000213843; = p1951*p3476
- p0831: 0.1385; = 1-p0824
- p3031: 0; = p2250*p1023
- p2202: 0.00138542; = 4*1.00794*p2201/(2*14.0067)
- p2082: 0.285294
- p3179: 0; = p2398*p1023
- p2741: 0; = p2350*(p1128+p1130)
- p3892: 0.000131481; = p1955*p3477
- p0968: 0
- p3026: 0; = p2245*p1023
- p2340: 0.00018699; = p2228*p2208
- p0939: 0.00110968; = p0933*p0001/(p0818*p0002)
- p3106: 2.77303e-7; = p2325*p1023
- p2135: 6.22809e-6; = p2015*p2063*p2097/(p0818*1000)
- p0078: 1118.79
- p2323: 1.85641e-5; = p2224*p2190
- p2265: 0; = p2226*p2211
- p3759: 1.23786e-5; = p1822*p3477
- p0175: 0
- p4630: 2.19373e-6; = p1869*p3481
- p0763: 1119.07; = p0103*(1+p0631*p0235/100)
- p2098: 0.856281
- p3337: 0; = IF(or(p3254=0;p1232>0);0;p3272*p3289)
- p2302: 0.000665907; = p2227*p2209
- p2219: 0.0767196; = p1154-p2218
- p3475: 0; = p3380*p1241
- p2013: 0.65
- p1274: 0; = p1270*p1252/p0818
- p2623: 0; = p2427*p1073
- p0383: 0.5
- p1663: 0
- p0740: 99.202; = p0080*(1+p0608*p0212/100)
- p0352: 0.5
- p2003: 50
- p2196: 0.0776426; = p1068-p2193-p2195
- p2112: 0.856281
- p2368: 3.23268e-5; = p2225*p2197
- p1181: 0.000110755
- p3028: 0; = p2247*p1023
- p3227: 0.000995839; = p3223*p1229
- p1096: 0.00216322
- p4563: 8.71223e-5; = p1802*p3481
- p1905: 0
- p0005: 1.60934
- p4088: 1.46426e-5; = p1945*p3478
- p3299: 0; = if(p1303+p1304+p1305+p1306=0;0;p1303/(p1303+p1304+p1305+p1306))
- p0792: 0
- p2877: 9.32957e-6; = p2291*(p1020+p1022)
- p1047: 0.299887; = IF(p1012=0;IF(p1037+p1044+p1045+p1046=1;0;IF(p1037+p1044+p1045+p1046+p1041>1;1-(p1037+p1044+p1045+p1046);p1041));0)
- p5072: 2.46061e-6; = p1899*p3483
- p2263: 0; = p2226*p2209
- p0350: 0.5
- p0440: 0; = SQRT(2)*(IF((2*p0308-1)<0;-1;IF((2*p0308-1)>0;1;0))*SQRT(SQRT((2/(pi()*0.140012289)+LN(1-(2*p0308-1)^2)/2)^2-LN(1-(2*p0308-1)^2)/0.140012289)-(2/(pi()*0.140012289)+LN(1-(2*p0308-1)^2)/2)))
- p1283: 0; = p1277*p1252/p0818
- p3181: 0; = p2400*p1023
- p3448: 0; = p3372*p1240
- p1960: 0; = IF(p1959-p1958<0;0;p1959-p1958)
- p2423: 0; = p2235*p2213
- p0190: 24.564
- p1770: 0
- p2450: 0; = p2254*p1014
- p3103: 1.19043e-7; = p2322*p1023
- p2558: 0.00103577; = p2362*p1014
- p2589: 0; = p2393*p1014
- p2953: 0.0072826; = p2367*(p1020+p1022)
- p3129: 0; = p2348*p1082
- p4558: 1.77065e-5; = p1797*p3481
- p0975: 0.00674023; = p0973*p0974/p0818
- p0915: 0.0266679; = p0914/p0818
- p3767: 3.01101e-6; = p1830*p3477
- p3255: 0; = p1252*(p1297*(1-p3247)+p1300*(1-p3248)+p1301*(1-p3249)+p1302*(1-p3250))
- p1853: 0
- p1776: 0
- p0046: 7.117
- p0655: 0; = IF(p0391<0.5;-SQRT(p0007*EXP(p0523^2*p0008)-p0007);SQRT(p0007*EXP(p0523^2*p0008)-p0007))
- p0572: 0; = IF(p0308<0.5;-SQRT(p0007*EXP(p0440^2*p0008)-p0007);SQRT(p0007*EXP(p0440^2*p0008)-p0007))
- p0783: 70.646; = p0123*(1+p0651*p0255/100)
- p2860: 0.000290164; = p2274*(p1129+p1131)
- p1963a: 0.000348103; = p1550*p1754+p1551*p1755+p1552*p1756+p1553*p1757+p1554*p1758+p1555*p1759+p1556*p1760+p1557*p1761+p1558*p1762+p1559*p1763+p1560*p1764+p1561*p1765+p1562*p1766+p1563*p1767+p1564*p1768+p1565*p1769+p1566*p1770+p1567*p1771+p1568*p1772
- p1749: 0
- p2939: 0; = p2353*(p1129+p1131)
- p1794: 0
- p0630: 0; = IF(p0366<0.5;-SQRT(p0007*EXP(p0498^2*p0008)-p0007);SQRT(p0007*EXP(p0498^2*p0008)-p0007))
- p2699: 0.000682254; = p2308*(p1078+p1080)
- p2993: 0; = p2407*(p1020+p1022)
- p1840: 0
- p1340: 0; = p1325*p0801
- p3938: 2.12554e-6; = p1795*p3478
- p0797: 47.283; = p0137*(1+p0665*p0269/100)
- p0913: 0.0016675
- p3441: 0; = p3365*p1240
- p2516: 4.76306e-6; = p2320*p1014
- p0446: 0; = SQRT(2)*(IF((2*p0314-1)<0;-1;IF((2*p0314-1)>0;1;0))*SQRT(SQRT((2/(pi()*0.140012289)+LN(1-(2*p0314-1)^2)/2)^2-LN(1-(2*p0314-1)^2)/0.140012289)-(2/(pi()*0.140012289)+LN(1-(2*p0314-1)^2)/2)))
- p0724: 0
- p1594: 0
- p1928: 0
- p1586: 0
- p1042: 0.000519971
- p4556: 1.41025e-6; = p1795*p3481
- p0310: 0.5
- p0146: 0
- p4583: 5.79771e-6; = p1822*p3481
- p3269: 0
- p2678: 0.00299496; = p2287*(p1019+p1021)
- p2900: 0.00266318; = p2314*(p1129+p1131)
- p0401: 0.5
- p2927: 4.40375e-5; = p2341*(p1079+p1081)
- p4523: 6.36181e-5; = p1762*p3481
- p3366: 0; = if(p1232=0;p3244*p3360/p0818;0)
- p2117: 0.585147
- p3058: 3.93545e-5; = p2277*p1023
- p3975: 0.000122573; = p1832*p3478
- p3219: 0.0325954; = p3215*p1228
- p2468: 0; = p2272*p1123
- p4735: 0; = p1768*p3482
- p0503: 0; = SQRT(2)*(IF((2*p0371-1)<0;-1;IF((2*p0371-1)>0;1;0))*SQRT(SQRT((2/(pi()*0.140012289)+LN(1-(2*p0371-1)^2)/2)^2-LN(1-(2*p0371-1)^2)/0.140012289)-(2/(pi()*0.140012289)+LN(1-(2*p0371-1)^2)/2)))
- p0780: 8.726; = p0120*(1+p0648*p0252/100)
- p3319: 0; = if(and(p1232=0;p3253<>0);p3253*(p3263-p3314)/p3316;0)
- p2969: 0; = p2383*(p1079+p1081)
- p2535: 0.000118013; = p2339*p1073
- p0839: 1.51864; = p0838/p0818
- p2823: 0; = p2237*(p1020+p1022)
- p3137: 3.95584e-6; = p2356*p1023
- p0127: 19.524
- p0963: 0.00110968; = if(and(p0683>0;or(p0807=480;p0807=32;p0807=1;and(p0807=60;p0901<0.03)));p0939;0)
- p2188: 0.0163167; = p1066-p2186-p2187
- p2992: 0; = p2406*(p1020+p1022)
- p2477: 0.00039613; = p2281*p1014
- p0176: 0.898
- p0895: 4.91269e8; = p0894*p0830
- p2936: 0; = p2350*(p1129+p1131)
- p1756: 0
- p2132: 1.94184e-6; = p2015*p2060*p2094/(p0818*1000)
- p1177: 0.00110968; = p0801*p0001/(p0818*p0002)
- p3268: 0
- p1969: 0; = p0803
- p0050: 26.723
- p3190: 0; = p2409*p1023
- p1598: 0.392863
- p2006: 1.56231; = ((p1980*p1985+p1986*p1991+p1992*p1997+p2000*p2005)/p0818)*p0005*p0002/1000
- p3351: 0; = if(and(p1232=0;p3256<>0);p3256*(p3274-p3346)/p3349;0)
- p0234: 19.3
- p2343: 0.000478111; = p2228*p2211
- p5280: 4.73527e-6; = p1901*p3484
- p1799: 0
- p0107: 24.603
- p0833: 2.73501e9; = p0830+p0832
- p3483: 0.0223811; = if(p1328+p1330+p1332+p1334+p1336+p1338+p1340+p1342+p1344=0;0;p1342/(p1328+p1330+p1332+p1334+p1336+p1338+p1340+p1342+p1344))
- p0112: 95.835
- p1107: 477210; = IF(p1071=0;p1105*p1101*p1095;0)
- p2417: 0; = p2235*p2207
- p0924: 0; = IF(p0918+p0923=1;0;IF(p0918+p0923+p0920>1;1-(p0918+p0923);p0920))
- p2564: 2.06862e-5; = p2368*p1014
- p1000: 0; = IF(p0996+p0999=1;0;IF(p0996+p0999+p0998>1;1-(p0996+p0999);p0998))
- p1066: 0.0264544; = IF(p1012=0;p1052/(p1059*p0818);0)
- p1110: 1.49439e6; = IF(p1071=0;p1105*p1104*p1095;0)
- p1887: 7.77363e-5; = p1479*1000/p0818
- p3831: 0.000351619; = p1894*p3477
- p2620: 0; = p2424*p1073
- p1819: 0
- p2769: 0; = p2378*(p1078+p1080)
- p1953: 0
- p3462: 0; = p3367*p1241
- p4291: 4.1571e-6; = p1942*p3479
- p0681: 1118.79; = p0021*(1+p0549*p0153/100)
- p2115: 0.856281
- p3236: 0.0140975
- p3156: 0; = p2375*p1082
- p3025: 0; = p2244*p1023
- p3882: 2.07425e-5; = p1945*p3477
- p1938: 0
- p1132: 0.08283; = if(p1121=0;IF(p1123+p1128+p1129+p1130+p1131=1;0;1-(p1123+p1128+p1129+p1130+p1131));0)
- p2811: 0; = p2420*(p1078+p1080)
- p1197: 1.806
- p0571: 0; = IF(p0307<0.5;-SQRT(p0007*EXP(p0439^2*p0008)-p0007);SQRT(p0007*EXP(p0439^2*p0008)-p0007))
- p1200: 0.84
- p1014: 0.63991; = IF(p1012=0;p0705/100;0)
- p3243: 1.9205e-9; = p3234*p1188*p3239/p0818
- p2511: 0.000187935; = p2315*p1014
- p3840: 4.54997e-5; = p1903*p3477
- p1662: 0
- p1625: 0
- p1234: 0; = if(p1232>0;0;p0726/100)
- p3160: 0; = p2379*p1082
- p1809: 0
- p3533: 0.000136663; = p1802*p3476
- p2158: 1.14271e-6; = p2015*p2082*p2120/(p0818*1000)
- p1299: 0
- p2267: 0; = p2226*p2213
- p2017: 3.1549e6; = p2015*p0898
- p0581: 0; = IF(p0317<0.5;-SQRT(p0007*EXP(p0449^2*p0008)-p0007);SQRT(p0007*EXP(p0449^2*p0008)-p0007))
- p2225: 0.508823; = if(p0765*p0769+p0766*p0770+p0767*p0771+p0768*p0772=0;0;p0772*p0768/(p0765*p0769+p0766*p0770+p0767*p0771+p0768*p0772))

## Reference product
- cotton lint; at harvest in 1996; at farm; 90%-93% moisture: 1 kg

## Inputs from technosphere
- CUTOFF apply K fertilizer; broadcast with incorporation: 0.000259379 ha; = p1140
- CUTOFF pesticide, Methomyl; at point-of-sale; kg AI: 7.77363e-5 kg; = p1887
- CUTOFF apply single or mixed K fertilizer; unspec. method: 5.18757e-5 ha; = p1144
- CUTOFF pesticide, Thiodicarb; at point-of-sale; kg AI: 6.88522e-5 kg; = p1945
- CUTOFF sewage sludge; at point-of-sale: 3.70888e-7 kg; = p1190
- CUTOFF phosphatic fertilizer, diammonium phosphate; at point-of-sale: 0.0210446 kg; = p1119
- CUTOFF pesticide, Oxamyl; at point-of-sale; kg AI: 0.000109941 kg; = p1899
- CUTOFF apply pesticide; unspecified application methods: 0.000855822 ha; = p1345
- CUTOFF apply pesticide; broadcast without incorporation: 0.000810642 ha; = p1335
- CUTOFF pesticide, Clethodim; at point-of-sale; kg AI: 9.99467e-6 kg; = p1795
- CUTOFF pesticide, Tribufos; at point-of-sale; kg AI: 0.000966151 kg; = p1951
- CUTOFF pesticide, Acephate; at point-of-sale; kg AI: 0.000450871 kg; = p1762
- CUTOFF pesticide, Disulfoton; at point-of-sale; kg AI: 8.32889e-5 kg; = p1823
- CUTOFF pesticide, Pyrithiobac-sodium; at point-of-sale; kg AI: 1.66578e-5 kg; = p1923
- CUTOFF pesticide, Dimethipin; at point-of-sale; kg AI: 7.77363e-6 kg; = p1821
- CUTOFF apply pesticide; as foliar or directed spray: 0.00232224 ha; = p1339
- CUTOFF sulfur; at point-of-sale: 4.49064e-7 kg; = p1172
- CUTOFF zinc compounds; at point-of-sale: 1.37755e-7 kg; = p1184
- CUTOFF pesticide, Methyl parathion; at point-of-sale; kg AI: 0.00103834 kg; = p1888
- CUTOFF nitrogenous fertilizer, ammonium sulfate; at point-of-sale: 0.0132341 kg; = p1067
- CUTOFF phosphatic fertilizer, monoammonium phosphate; at point-of-sale: 0.00697729 kg; = p1120
- CUTOFF pesticide, beta-Cyfluthrin; at point-of-sale; kg AI: 1.55473e-5 kg; = p1804
- CUTOFF pesticide, Tralomethrin; at point-of-sale; kg AI: 6.66311e-6 kg; = p1947
- cottonseed; at harvest in 1996; at farm; 90%-93% moisture: 1.63246 kg; = p0819
- CUTOFF phosphatic fertilizer, superphosphate grades over 22%; at point-of-sale: 0.00252982 kg; = p1117
- CUTOFF pesticide, Diuron; at point-of-sale; kg AI: 0.000176572 kg; = p1824
- CUTOFF pesticide, Dicrotophos; at point-of-sale; kg AI: 0.00012882 kg; = p1815
- CUTOFF apply K fertilizer; broadcast without incorporation: 0.000315037 ha; = p1141
- CUTOFF irrig svc; unspec wat source & rate, 1996 cotton: 0.00110968 ha; = p0981
- CUTOFF apply P fertilizer; broadcast without incorporation: 0.000154306 ha; = p1091
- CUTOFF limestone, high-grade, pulverized; at point-of-sale: 0.0723071 kg; = p1228
- CUTOFF phosphatic fertilizer, superphos. grades 22% and under; at point-of-sale: 0.000169841 kg; = p1116
- CUTOFF domestic barge transport; average fuel: 0.169056 metric ton*km; = p2007
- CUTOFF pesticide, Thidiazuron; at point-of-sale; kg AI: 8.43994e-5 kg; = p1942
- cotton residue; at harvest in 1996; at farm; 80%-92% moisture: 1.51864 kg; = p0839
- CUTOFF nitrogenous fertilizer, aqueous ammonia; at point-of-sale: 0.00470753 kg; = p1065
- CUTOFF nitrogenous fertilizer, ammonium nitrate; at point-of-sale: 0.0264544 kg; = p1066
- CUTOFF pesticide, Lactofen; at point-of-sale; kg AI: 1.55473e-5 kg; = p1869
- CUTOFF nitrogenous fertilizer, anhydrous ammonia; at point-of-sale: 0.0613731 kg; = p1064
- CUTOFF regional or national trucking; class 8, average fuel: 0.0326163 metric ton*km; = p2009
- CUTOFF sewage sludge storage: 1.85444e-7 kg*a; = p1192
- CUTOFF pesticide, Aldicarb; at point-of-sale; kg AI: 0.000204335 kg; = p1768
- CUTOFF pesticide, Esfenvalerate; at point-of-sale; kg AI: 9.99467e-6 kg; = p1830
- CUTOFF bulk cargo rail transport; diesel: 0.316979 metric ton*km; = p2008
- CUTOFF cotton seeds; seed, unspec. type; at point-of-sale: 0.0134805 kg; = p0972
- CUTOFF sulfuric acid; at point-of-sale: 5.00838e-7 kg; = p1178
- CUTOFF harvest; cotton, stripper harvested: 0.000272465 ha; = p1973
- CUTOFF pesticide, Norflurazon; at point-of-sale; kg AI: 0.000335377 kg; = p1897
- CUTOFF pesticide, Trifluralin; at point-of-sale; kg AI: 0.000436434 kg; = p1955
- CUTOFF apply N fertilizer; broadcast with incorporation: 7.75939e-5 ha; = p1031
- CUTOFF pesticide, Malathion ; at point-of-sale; kg AI: 0.000184346 kg; = p1872
- CUTOFF pesticide, Paraquat dichloride; at point-of-sale; kg AI: 9.10625e-5 kg; = p1901
- CUTOFF fertilizer storage: 0.282044 kg*a; = p1160
- CUTOFF harvest; cotton, spindle picked: 0.000817396 ha; = p1972
- CUTOFF N inhibitor appl svc; unspec rate & type, 1996 cotton: 0.00124378 ha; = p1162
- CUTOFF apply sulfur; unspecified method: 0.00110968 ha; = p1171
- CUTOFF pesticide, 1,1-Dimethylpiperidinium chloride; at point-of-sale; kg AI: 1.44367e-5 kg; = p1879
- CUTOFF pesticide, Clomazone; at point-of-sale; kg AI: 0.000125489 kg; = p1797
- CUTOFF apply pesticide; broadcast by air: 0.00495817 ha; = p1331
- CUTOFF seed storage; cotton: 0.00674023 kg*a; = p0975
- CUTOFF apply single or mixed N fertilizer; unspec. method: 8.00252e-6 ha; = p1035
- CUTOFF apply sulfuric acid; unspecified method: 0.00110968 ha; = p1177
- CUTOFF manure appl svc; unspec rate, 1996 cotton: 0.00110968 ha; = p1233
- CUTOFF pesticide, Propazine; at point-of-sale; kg AI: 0.000177683 kg; = p1889
- CUTOFF apply N fertilizer; no broadcast application: 0.000697669 ha; = p1030
- CUTOFF local area trucking; class 6, average fuel: 0.0126792 metric ton*km; = p2010
- CUTOFF pesticide formulation balance; at point-of-sale: 0.00534448 kg; = p1963
- CUTOFF international vessel transport; average fuel: 1.56231 metric ton*km; = p2006
- CUTOFF pesticide, Carbofuran; at point-of-sale; kg AI: 4.21997e-5 kg; = p1787
- CUTOFF sowing; for unspec. till, cotton: 0.00110968 ha; = p0963
- CUTOFF apply mixed N fertilizer; with incorporation: 0.000106017 ha; = p1033
- CUTOFF potassic fertilizer, potassium chloride; at point-of-sale: 0.131161 kg; = p1154
- CUTOFF sulfur storage: 2.24532e-7 kg*a; = p1174
- CUTOFF gypsum; at point-of-sale: 6.01028e-6 kg; = p1166
- CUTOFF apply pesticide; in seed furrow: 0.00036835 ha; = p1343
- CUTOFF gypsum storage: 3.00514e-6 kg*a; = p1168
- CUTOFF pesticide, Sodium chlorate; at point-of-sale; kg AI: 0.00108053 kg; = p1930
- CUTOFF apply gypsum; unspecified method: 0.00110968 ha; = p1165
- CUTOFF fertilizer filler materials; at point-of-sale: 0.112221 kg; = p1158
- CUTOFF pesticide, Imidacloprid; at point-of-sale; kg AI: 3.33156e-6 kg; = p1865
- CUTOFF apply P fertilizer; no broadcast application: 2.80708e-5 ha; = p1089
- CUTOFF zinc compounds storage: 6.88776e-8 kg*a; = p1186
- CUTOFF liming materials storage: 0.0400792 kg*a; = p1231
- CUTOFF pesticide, Profenofos; at point-of-sale; kg AI: 4.77523e-5 kg; = p1910
- CUTOFF apply pesticide; broadcast with incorporation: 0.00350008 ha; = p1333
- CUTOFF prepare soil; for unspec. till, cotton: 0.00110968 ha; = p0939
- CUTOFF pesticide, MSMA; at point-of-sale; kg AI: 0.00116716 kg; = p1894
- CUTOFF pesticide, Dimethoate; at point-of-sale; kg AI: 4.10892e-5 kg; = p1822
- CUTOFF pesticide, Pendimethalin; at point-of-sale; kg AI: 0.000151031 kg; = p1903
- CUTOFF pesticide, Lambda-cyhalothrin; at point-of-sale; kg AI: 2.66525e-5 kg; = p1870
- CUTOFF sulfuric acid storage: 2.50419e-7 kg*a; = p1180
- CUTOFF apply sewage sludge; unspecified method: 0.00110968 ha; = p1189
- CUTOFF pesticide, Zeta-Cypermethrin; at point-of-sale; kg AI: 1.66578e-5 kg; = p1957
- CUTOFF harvest; cotton residue management: 0.00110968 ha; = p1975
- CUTOFF pesticide, Cyanazine; at point-of-sale; kg AI: 0.000617448 kg; = p1802
- CUTOFF apply P fertilizer; broadcast with incorporation: 0.000113916 ha; = p1090
- CUTOFF dolomite, pulverized; at point-of-sale: 0.00785127 kg; = p1229
- CUTOFF apply liming materials; unspecified method: 0.00110968 ha; = p1227
- CUTOFF pesticide storage: 0.0101119 kg*a; = p1965
- CUTOFF pesticide, Prometryn; at point-of-sale; kg AI: 0.000191009 kg; = p1911
- CUTOFF nitrogenous fertilizer, urea; at point-of-sale: 0.0493474 kg; = p1070
- CUTOFF phosphatic fertilizer, other single phosphates; at point-of-sale: 0.00102028 kg; = p1118
- CUTOFF nitrogenous fertilizer, nitrogen solutions; at point-of-sale: 0.122139 kg; = p1068
- CUTOFF nitrogenous fertilizer, sodium nitrate; at point-of-sale: 0.000397078 kg; = p1069
- CUTOFF pesticide, Cypermethrin; at point-of-sale; kg AI: 6.66311e-6 kg; = p1806
- CUTOFF apply pesticide; banded or side-dressed: 0.00364273 ha; = p1329
- CUTOFF pesticide, Fluometuron; at point-of-sale; kg AI: 0.000761816 kg; = p1845
- CUTOFF apply zinc compounds; unspecified method: 0.00110968 ha; = p1183
- CUTOFF apply mixed N fertilizer; without incorporation: 0.000200979 ha; = p1034
- CUTOFF potassic fertilizer, other single nutrients; at point-of-sale: 0.0113122 kg; = p1155
- CUTOFF pesticide, Ethephon; at point-of-sale; kg AI: 0.000576359 kg; = p1832
- CUTOFF pesticide, Glyphosate; at point-of-sale; kg AI: 0.00014881 kg; = p1855

## Inputs from nature
- Transformation, to annual crop [natural resource, land]: 11.0968 m2; = 1.0 * (p0857)
- Carbon dioxide: 8.99797 kg; = p0900*3.6666666667
- Transformation, from annual crop [natural resource, land]: 11.0968 m2; = 1.0 * (p0879+p0883+p0875+p0871)
- Potassium; from plant uptake; biogenic: 0.0266679 kg; = p0915
- Water, unspecified origin: 0.000812309 m3; = p0916*0.001
- Phosphorus: 0.0207354 kg; = p0910
- Nitrogen: 0.120069 kg; = p0905
- Dry matter except CNPK; from plant uptake: 3.55332 kg; = p0917
- Occupation, annual crop [natural resource, land]: 4.7512 m2*year; = 1.0 * (p0855)

## Emissions to nature
- Pesticide formulation balance; foliar or directed spray: 0.000754109 kg; = p4720
- Other single K nutrients; broadcast w/o incorp. in fert. after plant.; kg K: 0.000255735 kg; = p2977
- Calcium [soil, agricultural]: 0.0289774 kg; = 1.0 * (p3218+p3226)
- Other single K nutrients; broadcast w/ incorp. in fert. in spr. bef. plant.; kg K: 0.00126179 kg; = p2704
- Aqueous ammonia; broadcast w/o incorp. in fert. in spr. bef. plant.: 0.00011507 kg; = p2864*1.2142857143
- Urea; no broadcast in fert. in spr. bef. plant.: 0.0149482 kg; = p2490*5
- Malathion [soil, agricultural]: 0.00012881 kg; = 1.0 * (p4221+p5251+p5045+p4015+p4633+p3603)
- Norflurazon [soil, agricultural]: 0.000234341 kg; = 1.0 * (p4040+p3628+p5070+p4658+p4246+p5276)
- Anhydrous ammonia; unspec. appl. method in fert. at plant.: 2.61761e-6 kg; = p3096*1.2142857143
- Diammonium phosphate; no broadcast in fert. in spr. bef. plant.: 0.0016295 kg; = p2494*4.7142857143
- Ammonium sulfate; no broadcast in fert. at plant.: 4.89264e-5 kg; = p2518*4.7142857143
- Fluometuron [soil, agricultural]: 0.00053231 kg; = 1.0 * (p3988+p5018+p4194+p3576+p4606+p5224)
- Monoammonium phosphate; broadcast w/ incorp. in fert. at plant.: 0.00026705 kg; = p2732*8.2142857143
- Superphosphate, grades>22%; no broadcast in fert. in spr. bef. plant.; kg P: 4.45504e-5 kg; = p2503
- Disulfoton [soil, agricultural]: 5.81972e-5 kg; = 1.0 * (p5202+p4172+p4584+p3966+p4996+p3554)
- Oxygen; applied in limestone: 0.0325954 kg; = p3219
- Diammonium phosphate; broadcast w/ incorp. in fert. in spr. bef. plant.: 0.00661278 kg; = p2689*4.7142857143
- Other single K nutrients; unspec. appl. method in fert. in spr. bef. plant.; kg K: 0.000252359 kg; = p3094
- cis-2-Butene: 3.31978e-7 kg; = p2149*1.1666666667
- Fluometuron: 0.000229506 kg; = p3782
- Aqueous ammonia; no broadcast in fert. in spr. bef. plant.: 0.000399451 kg; = p2474*1.2142857143
- Nitrogen solution; no broadcast in fert. after plant.; no broadcast in fert. after plant.; kg N: 0.0119306 kg; = p2561
- Prometryn [soil, agricultural]: 0.000133465 kg; = 1.0 * (p3642+p5084+p4054+p5290+p4260+p4672)
- Anhydrous ammonia; broadcast w/ incorp. in fert. after plant.: 0.00523657 kg; = p2745*1.2142857143
- Aqueous ammonia; unspec. appl. method in fert. at plant.: 5.50921e-8 kg; = p3098*1.2142857143
- Butadiene [air, non-urban air or from high stacks]: 1.16605e-6 kg; = 1.0 * (p2143*1.125)
- Phosphorous; in below-ground residue: 0.00120024 kg; = p2175
- Butane [air, non-urban air or from high stacks]: 4.69517e-7 kg; = 1.0 * (p2147*1.0208333333)
- Urea; broadcast w/ incorp. in fert. in spr. bef. plant.: 0.00393403 kg; = p2685*5
- Aqueous ammonia; unspec. appl. method in fert. in spr. bef. plant.: 4.58184e-6 kg; = p3059*1.2142857143
- Anhydrous ammonia; unspec. appl. method in fert. after plant.: 0.000228231 kg; = p3135*1.2142857143
- Nitrogen solution; unspec. appl. method in fert. in spr. bef. plant.; unspec. appl. method in fert. in spr. bef. plan...: 0.000130533 kg; = p3068
- Oxygen; applied in dolomite: 0.00394091 kg; = p3228
- Pesticide formulation balance; broadcast by air: 0.00161009 kg; = p3896
- Nitrogen solution; broadcast w/o incorp. in fert. at plant.; broadcast w/o incorp. in fert. at plant.; kg N: 3.94177e-5 kg; = p2912
- Urea; unspec. appl. method in fert. in spr. bef. plant.: 0.000171461 kg; = p3075*5
- Gypsum: 6.01028e-6 kg; = p3229
- S,S,S-tributyl phosphorotrithioate: 0.000675087 kg; = p4094+p4300+p5330+p4712+p3682+p5124
- Monoammonium phosphate; broadcast w/o incorp. in fert. in spr. bef. plant.: 0.00284869 kg; = p2888*8.2142857143
- Diuron: 5.31945e-5 kg; = p3761
- Ammonium nitrate; unspec. appl. method in fert. in spr. bef. plant.: 0.000148834 kg; = p3061*4.7142857143
- Ammonium nitrate; broadcast w/ incorp. in fert. in spr. bef. plant.: 0.00341487 kg; = p2671*4.7142857143
- Superphosphate, grades>22%; no broadcast in fert. at plant.; kg P: 5.65716e-6 kg; = p2542
- Superphosphate, grades>22%; broadcast w/ incorp. in fert. at plant.; kg P: 2.29576e-5 kg; = p2737
- Ammonium nitrate; broadcast w/o incorp. in fert. in spr. bef. plant.: 0.00373788 kg; = p2866*4.7142857143
- Phosphorous; in above-ground residue left on field: 0.00286127 kg; = p2169
- Aqueous ammonia; no broadcast in fert. at plant.: 4.80299e-6 kg; = p2513*1.2142857143
- Acetic acid [air, non-urban air or from high stacks]: 4.32381e-5 kg; = 1.0 * (p2127*2.5)
- Other single K nutrients; broadcast w/ incorp. in fert. in fall bef. plant.; kg K: 0.0002389 kg; = p2665
- Ammonium nitrate; broadcast w/ incorp. in fert. at plant.: 4.10603e-5 kg; = p2710*4.7142857143
- Methanol [air, non-urban air or from high stacks]: 2.53993e-5 kg; = 1.0 * (p2129*2.6666666667)
- Methane: 2.54582e-5 kg; = p2025*1.3333333333
- Nitrogen dioxide: 2.65945e-5 kg; = p2039*3.2857142857
- Ash: 0.00152864 kg; = p2021+p2022
- Clethodim [soil, agricultural]: 6.98366e-6 kg; = 1.0 * (p5174+p4968+p4144+p4556+p3938+p3526)
- Dicrotophos [soil, agricultural]: 9.00116e-5 kg; = 1.0 * (p4988+p4164+p3958+p3546+p5194+p4576)
- Other single K nutrients; broadcast w/o incorp. in fert. in spr. bef. plant.; kg K: 0.00153255 kg; = p2899
- Diammonium phosphate; no broadcast in fert. at plant.: 0.00020692 kg; = p2533*4.7142857143
- Methyl parathion [soil, agricultural]: 0.000725525 kg; = 1.0 * (p3619+p4649+p5061+p5267+p4031+p4237)
- Ammonium nitrate; no broadcast in fert. after plant.: 0.0136033 kg; = p2554*4.7142857143
- Carbon [soil, agricultural]: 0.846259 kg; = 1.0 * (p3225+p3217+p2167+p2173+p3242)
- Trifluralin [air, non-urban air or from high stacks]: 0.000131481 kg; = 1.0 * (p3892)
- Oxamyl: 3.31211e-5 kg; = p3836
- Cyanazine: 0.000186014 kg; = p3739
- Urea; broadcast w/o incorp. in fert. after plant.: 0.00451449 kg; = p2958*5
- Metolachlor [soil, agricultural]: 0.000124154 kg; = 1.0 * (p5268+p4032+p4238+p5062+p3620+p4650)
- Urea; unspec. appl. method in fert. after plant.: 0.000179757 kg; = p3153*5
- Ethene [air, non-urban air or from high stacks]: 1.12446e-5 kg; = 1.0 * (p2125*1.1666666667)
- Other single phosphates; broadcast w/o incorp. in fert. at plant.; kg P: 6.00958e-6 kg; = p2934
- Other single K nutrients; broadcast w/ incorp. in fert. after plant.; kg K: 0.000210554 kg; = p2782
- Monoammonium phosphate; broadcast w/o incorp. in fert. at plant.: 0.000361736 kg; = p2927*8.2142857143
- Particulates, < 10 um: 6.85491e-5 kg; = p2034+p2036
- Ammonium nitrate; unspec. appl. method in fert. at plant.: 1.78958e-6 kg; = p3100*4.7142857143
- Filler materials, applied with synthetic fertilizer: 0.112221 kg; = p2432
- Urea; broadcast w/ incorp. in fert. at plant.: 4.73028e-5 kg; = p2724*5
- Other limestone constituents; applied in limestone: 0.00433843 kg; = p3220
- Water [air, non-urban air or from high stacks]: 1.24243e-6 m3; = 0.001 * (p2016)
- Potassium; in below-ground residue; biogenic: 0.000909728 kg; = p2176
- Dicrotophos: 3.88086e-5 kg; = p3752
- Imidacloprid [soil, agricultural]: 2.32789e-6 kg; = 1.0 * (p5244+p3596+p5038+p4626+p4008+p4214)
- Nitrogen solution; unspec. appl. method in fert. at plant.; unspec. appl. method in fert. at plant.; kg N: 1.56952e-6 kg; = p3107
- Nitrogen solution; broadcast w/o incorp. in fert. after plant.; broadcast w/o incorp. in fert. after plant.; kg N: 0.00343685 kg; = p2951
- Lactofen [air, non-urban air or from high stacks]: 4.68379e-6 kg; = 1.0 * (p3806)
- Sodium nitrate; broadcast w/ incorp. in fert. at plant.: 3.79098e-7 kg; = p2720*6.0714285714
- NMVOC, non-methane volatile organic compounds, unspecified origin [air, non-urban air or from high stacks]: 0.00019857 kg; = 1.0 * (p2052+p2051)
- Esfenvalerate [soil, agricultural]: 6.98366e-6 kg; = 1.0 * (p4179+p5209+p4591+p3973+p3561+p5003)
- Plant dry matter; in aboveground residue left on field: 0.683171 kg; = p2172
- Nitrogen solution; broadcast w/ incorp. in fert. in spr. bef. plant.; broadcast w/ incorp. in fert. in spr. bef. plan...: 0.00299496 kg; = p2678
- Ammonium nitrate; no broadcast in fert. at plant.: 0.000156018 kg; = p2515*4.7142857143
- Carbofuran: 1.27132e-5 kg; = p3724
- Sulfur [soil, agricultural]: 4.49064e-7 kg; = 1.0 * (p3230)
- Lambda-cyhalothrin: 8.02936e-6 kg; = p3807
- Urea; unspec. appl. method in fert. at plant.: 2.06165e-6 kg; = p3114*5
- Aqueous ammonia; broadcast w/o incorp. in fert. at plant.: 1.38361e-6 kg; = p2903*1.2142857143
- Dioxins and furans (PCDD/F); from residue burning: 2.31846e-13 kg TEQ; = p2047
- Tribufos: 0.000291064 kg; = p3888
- Plant dry matter; in below-ground residue: 0.286575 kg; = p2177
- Lactofen [soil, agricultural]: 1.08635e-5 kg; = 1.0 * (p3600+p4218+p5042+p4012+p5248+p4630)
- Ammonium nitrate; broadcast w/o incorp. in fert. after plant.: 0.00391872 kg; = p2944*4.7142857143
- Profenofos: 1.43859e-5 kg; = p3847
- Ammonia [air, non-urban air or from high stacks]: 1.67708e-5 kg; = 1.0 * (p2159*1.2142857143)
- Urea; no broadcast in fert. after plant.: 0.0156714 kg; = p2568*5
- Ethane [air, non-urban air or from high stacks]: 7.02277e-6 kg; = 1.0 * (p2126*1.25)
- isopentane: 1.30796e-7 kg; = p2151*1.0166666667
- Methyl parathion [air, non-urban air or from high stacks]: 0.00031281 kg; = 1.0 * (p3825)
- Ammonium sulfate; unspec. appl. method in fert. at plant.: 5.61204e-7 kg; = p3103*4.7142857143
- Acephate [air, non-urban air or from high stacks]: 0.00013583 kg; = 1.0 * (p3699)
- Sodium nitrate; broadcast w/o incorp. in fert. in spr. bef. plant.: 3.45107e-5 kg; = p2876*6.0714285714
- Isoprene [air, non-urban air or from high stacks]: 2.91611e-6 kg; = 1.0 * (p2145*1.1333333333)
- I butane; from residue burning: 1.63027e-7 kg; = p2146*1.0208333333
- Potassium chloride; broadcast w/o incorp. in fert. after plant.: 0.00746906 kg; = p2975*2.2166666667
- isobutene: 9.0329e-7 kg; = p2150*1.1666666667
- Thiodicarb [air, non-urban air or from high stacks]: 2.07425e-5 kg; = 1.0 * (p3882)
- Zeta-cypermethrin [air, non-urban air or from high stacks]: 5.01835e-6 kg; = 1.0 * (p3894)
- Acetol; from residue burning: 2.90985e-5 kg; = p2134*2.0555555556
- Clethodim [air, non-urban air or from high stacks]: 3.01101e-6 kg; = 1.0 * (p3732)
- Anhydrous ammonia; broadcast w/o incorp. in fert. after plant.: 0.0057319 kg; = p2940*1.2142857143
- Ammonium sulfate; broadcast w/o incorp. in fert. after plant.: 0.00122889 kg; = p2947*4.7142857143
- Monoammonium phosphate; no broadcast in fert. in spr. bef. plant.: 0.000518223 kg; = p2498*8.2142857143
- Nitrogen solution; no broadcast in fert. at plant.; no broadcast in fert. at plant.; kg N: 0.000136833 kg; = p2522
- Urea; broadcast w/o incorp. in fert. in spr. bef. plant.: 0.00430615 kg; = p2880*5
- Formic acid [air, non-urban air or from high stacks]: 7.74381e-6 kg; = 1.0 * (p2131*3.8333333333)
- Ammonium sulfate; broadcast w/ incorp. in fert. at plant.: 1.28763e-5 kg; = p2713*4.7142857143
- Plant dry matter; from residue burning: 0.0027993 kg; = p2164
- Phosphorous; applied in sewage sludge: 2.07084e-9 kg; = p3241
- Sodium chlorate: 0.000755011 kg; = p4073+p5309+p4691+p3661+p5103+p4279
- Other single K nutrients; unspec. appl. method in fert. in fall bef. plant.; kg K: 4.778e-5 kg; = p3055
- Diuron [soil, agricultural]: 0.000123378 kg; = 1.0 * (p4173+p3555+p3967+p4997+p4585+p5203)
- Water: 0.296797 kg; = p2178+p2181+p2171
- Lambda-cyhalothrin [soil, agricultural]: 1.86231e-5 kg; = 1.0 * (p4631+p4013+p5043+p3601+p4219+p5249)
- Superphosphate, grades>22%; broadcast w/ incorp. in fert. in spr. bef. plant.; kg P: 0.000180793 kg; = p2698
- Methyl vinyl ether; from residue burning: 5.86157e-7 kg; = p2137*1.6111111111
- Trifluralin [soil, agricultural]: 0.000304953 kg; = 1.0 * (p3686+p5128+p5334+p4098+p4304+p4716)
- Aqueous ammonia; broadcast w/ incorp. in fert. at plant.: 1.26404e-6 kg; = p2708*1.2142857143
- Propanenitrile: 4.95199e-7 kg; = p2157*1.5277777778
- MSMA [soil, agricultural]: 0.000815536 kg; = 1.0 * (p4655+p4243+p4037+p5273+p5067+p3625)
- Anhydrous ammonia; broadcast w/o incorp. in fert. at plant.: 6.57398e-5 kg; = p2901*1.2142857143
- Sodium chlorate [air, non-urban air or from high stacks]: 0.000325524 kg; = 1.0 * (p3867)
- Superphosphate, grades<= 22%; no broadcast in fert. at plant.; kg P: 1.58249e-7 kg; = p2540
- Tralomethrin: 2.00734e-6 kg; = p3884
- cyclopentane: 1.27828e-8 kg; = p2153*1.0166666667
- Ammonium nitrate; unspec. appl. method in fert. after plant.: 0.000156035 kg; = p3139*4.7142857143
- Nitrogen solution; broadcast w/ incorp. in fert. at plant.; broadcast w/ incorp. in fert. at plant.; kg N: 3.60114e-5 kg; = p2717
- Ammonium sulfate; no broadcast in fert. in spr. bef. plant.: 0.00406907 kg; = p2479*4.7142857143
- Monoammonium phosphate; broadcast w/ incorp. in fert. in spr. bef. plant.: 0.00210303 kg; = p2693*8.2142857143
- Anhydrous ammonia; broadcast w/ incorp. in fert. at plant.: 6.00588e-5 kg; = p2706*1.2142857143
- Glyphosate [air, non-urban air or from high stacks]: 4.48306e-5 kg; = 1.0 * (p3792)
- Dinitrogen monoxide [air, non-urban air or from high stacks]: 5.41075e-7 kg; = 1.0 * (p2044*1.5714285714)
- Malathion: 5.55364e-5 kg; = p3809
- Acetaldehyde [air, non-urban air or from high stacks]: 9.61188e-6 kg; = 1.0 * (p2130*1.8333333333)
- Other single phosphates; broadcast w/o incorp. in fert. in spr. bef. plant.; kg P: 4.73258e-5 kg; = p2895
- Aldicarb [soil, agricultural]: 0.000142777 kg; = 1.0 * (p4941+p3911+p4117+p4529+p3499+p5147)
- Pyrithiobac sodium salt [soil, agricultural]: 1.16394e-5 kg; = 1.0 * (p4272+p4066+p5096+p3654+p5302+p4684)
- Pesticide formulation balance; in seed furrow: 0.000119616 kg; = p5132
- Nitrogen; in below-ground residue: 0.00954737 kg; = p2174
- Zinc compounds: 1.37755e-7 kg; = p3232
- Propane [air, non-urban air or from high stacks]: 2.17656e-6 kg; = 1.0 * (p2142*1.2222222222)
- Dimethoate [soil, agricultural]: 2.87106e-5 kg; = 1.0 * (p3553+p3965+p5201+p4995+p4583+p4171)
- Ammonium sulfate; unspec. appl. method in fert. in spr. bef. plant.: 4.66737e-5 kg; = p3064*4.7142857143
- MSMA: 0.000351619 kg; = p3831
- Ethephon: 0.000173635 kg; = p3769
- Other single phosphates; no broadcast in fert. in spr. bef. plant.; kg P: 8.60931e-6 kg; = p2505
- Formaldehyde [air, non-urban air or from high stacks]: 1.6066e-5 kg; = 1.0 * (p2128*2.5)
- Anhydrous ammonia; no broadcast in fert. at plant.: 0.000228206 kg; = p2511*1.2142857143
- Potassium chloride; unspec. appl. method in fert. in fall bef. plant.: 0.00139548 kg; = p3053*2.2166666667
- Disulfoton: 2.50918e-5 kg; = p3760
- Zeta-cypermethrin [soil, agricultural]: 1.16394e-5 kg; = 1.0 * (p5336+p5130+p4100+p4306+p3688+p4718)
- Acetone [air, non-urban air or from high stacks]: 3.44878e-6 kg; = 1.0 * (p2139*1.6111111111)
- Other single K nutrients; unspec. appl. method in fert. after plant.; kg K: 4.21107e-5 kg; = p3172
- Profenofos [soil, agricultural]: 3.33664e-5 kg; = 1.0 * (p4259+p5083+p3641+p5289+p4671+p4053)
- Anhydrous ammonia; no broadcast in fert. in spr. bef. plant.: 0.0189792 kg; = p2472*1.2142857143
- Other single phosphates; broadcast w/ incorp. in fert. at plant.; kg P: 4.43654e-6 kg; = p2739
- Urea; broadcast w/ incorp. in fert. after plant.: 0.00412436 kg; = p2763*5
- Pendimethalin [soil, agricultural]: 0.000105531 kg; = 1.0 * (p4252+p4664+p5076+p3634+p5282+p4046)
- Prometryn: 5.75437e-5 kg; = p3848
- Dimethipin [soil, agricultural]: 5.43174e-6 kg; = 1.0 * (p4170+p5200+p4582+p4994+p3552+p3964)
- Aqueous ammonia; broadcast w/ incorp. in fert. after plant.: 0.000110213 kg; = p2747*1.2142857143
- Superphosphate, grades<= 22%; broadcast w/ incorp. in fert. at plant.; kg P: 6.42199e-7 kg; = p2735
- Potassium chloride; broadcast w/o incorp. in fert. in spr. bef. plant.: 0.0447602 kg; = p2897*2.2166666667
- Other single phosphates; broadcast w/ incorp. in fert. in spr. bef. plant.; kg P: 3.4938e-5 kg; = p2700
- Other single phosphates; no broadcast in fert. at plant.; kg P: 1.09324e-6 kg; = p2544
- Ammonium sulfate; unspec. appl. method in fert. after plant.: 4.89317e-5 kg; = p3142*4.7142857143
- Superphosphate, grades<= 22%; no broadcast in fert. in spr. bef. plant.; kg P: 1.24622e-6 kg; = p2501
- Anhydrous ammonia; no broadcast in fert. after plant.: 0.0198975 kg; = p2550*1.2142857143
- Acetonitrile [air, non-urban air or from high stacks]: 1.62231e-6 kg; = 1.0 * (p2155*1.7083333333)
- Toluene [air, non-urban air or from high stacks]: 1.472e-6 kg; = 1.0 * (p2141*1.0952380952)
- Superphosphate, grades>22%; broadcast w/o incorp. in fert. at plant.; kg P: 3.10976e-5 kg; = p2932
- Clomazone [soil, agricultural]: 8.76837e-5 kg; = 1.0 * (p4970+p3528+p5176+p4558+p4146+p3940)
- Sodium nitrate; broadcast w/ incorp. in fert. after plant.: 3.30538e-5 kg; = p2759*6.0714285714
- Aqueous ammonia; unspec. appl. method in fert. after plant.: 4.80352e-6 kg; = p3137*1.2142857143
- Dimethipin: 2.3419e-6 kg; = p3758
- Paraquat dichloride: 6.36289e-5 kg; = p4250+p5074+p3632+p5280+p4044+p4662
- Aldicarb: 6.15584e-5 kg; = p3705
- Norflurazon: 0.000101036 kg; = p3834
- Anhydrous ammonia; broadcast w/ incorp. in fert. in spr. bef. plant.: 0.00499491 kg; = p2667*1.2142857143
- Sodium nitrate; broadcast w/o incorp. in fert. after plant.: 3.61804e-5 kg; = p2954*6.0714285714
- Hydrocyanic acid: 2.20471e-6 kg; = p2154*2.25
- Furan [air, non-urban air or from high stacks]: 8.4539e-7 kg; = 1.0 * (p2138*1.4166666667)
- Anhydrous ammonia; broadcast w/o incorp. in fert. in spr. bef. plant.: 0.00546738 kg; = p2862*1.2142857143
- Ammonium sulfate; no broadcast in fert. after plant.: 0.00426593 kg; = p2557*4.7142857143
- Sodium nitrate; broadcast w/o incorp. in fert. at plant.: 4.14957e-7 kg; = p2915*6.0714285714
- Nitrogen solution; no broadcast in fert. in spr. bef. plant.; no broadcast in fert. in spr. bef. plant.; kg N: 0.01138 kg; = p2483
- Sodium nitrate; no broadcast in fert. at plant.: 1.44046e-6 kg; = p2525*6.0714285714
- Glycolaldehyde; from residue burning: 1.55702e-5 kg; = p2135*2.5
- Dimethoate: 1.23786e-5 kg; = p3759
- Pesticide formulation balance; broadcast with incorporation: 0.0011366 kg; = p4102
- Sulfuric acid [soil, agricultural]: 5.00838e-7 kg; = 1.0 * (p3231)
- Nitrogen solution; broadcast w/o incorp. in fert. in spr. bef. plant.; broadcast w/o incorp. in fert. in spr. bef. pl...: 0.00327825 kg; = p2873
- Acephate [soil, agricultural]: 0.000315041 kg; = 1.0 * (p4523+p5141+p3905+p3493+p4111+p4935)
- Potassium; in above-ground residue left on field; biogenic: 0.00216872 kg; = p2170
- Magnesium [soil, agricultural]: 0.000995839 kg; = 1.0 * (p3227)
- Pyrithiobac sodium salt: 5.01835e-6 kg; = p3860
- Sodium nitrate; no broadcast in fert. after plant.: 0.000125595 kg; = p2564*6.0714285714
- Aqueous ammonia; no broadcast in fert. after plant.: 0.000418776 kg; = p2552*1.2142857143
- Diammonium phosphate; broadcast w/o incorp. in fert. in spr. bef. plant.: 0.00895745 kg; = p2884*4.7142857143
- Sodium nitrate; unspec. appl. method in fert. at plant.: 1.65226e-8 kg; = p3110*6.0714285714
- Carbofuran [soil, agricultural]: 2.94866e-5 kg; = 1.0 * (p5166+p4136+p3518+p4548+p4960+p3930)
- Nitrogen solution; broadcast w/ incorp. in fert. after plant.; broadcast w/ incorp. in fert. after plant.; kg N: 0.00313985 kg; = p2756
- Esfenvalerate [air, non-urban air or from high stacks]: 3.01101e-6 kg; = 1.0 * (p3767)
- Phenol [air, non-urban air or from high stacks]: 4.0084e-6 kg; = 1.0 * (p2133*1.3055555556)
- Seeds; used in planting and sowing: 0.0134805 kg; = p2179
- Cyfluthrin [soil, agricultural]: 1.08635e-5 kg; = 1.0 * (p3535+p4565+p5183+p3947+p4977+p4153)
- Metolachlor [air, non-urban air or from high stacks]: 5.35291e-5 kg; = 1.0 * (p3826)
- Superphosphate, grades<= 22%; broadcast w/o incorp. in fert. at plant.; kg P: 8.69902e-7 kg; = p2930
- Potassium chloride; unspec. appl. method in fert. after plant.: 0.0012299 kg; = p3170*2.2166666667
- Imidacloprid: 1.00367e-6 kg; = p3802
- Aqueous ammonia; broadcast w/o incorp. in fert. after plant.: 0.000120638 kg; = p2942*1.2142857143
- Clomazone: 3.78049e-5 kg; = p3734
- Sodium nitrate; broadcast w/ incorp. in fert. in spr. bef. plant.: 3.15284e-5 kg; = p2681*6.0714285714
- Cyanazine [soil, agricultural]: 0.000431435 kg; = 1.0 * (p4151+p3945+p4563+p3533+p5181+p4975)
- Potassium chloride; broadcast w/o incorp. in fert. in fall bef. plant.: 0.00847461 kg; = p2858*2.2166666667
- Cyfluthrin [air, non-urban air or from high stacks]: 4.68379e-6 kg; = 1.0 * (p3741)
- Acrylonitrile: 2.59047e-7 kg; = p2156*1.4722222222
- Ammonium sulfate; broadcast w/o incorp. in fert. at plant.: 1.40943e-5 kg; = p2908*4.7142857143
- Cypermethrin: 2.00734e-6 kg; = p3743
- Ammonium nitrate; no broadcast in fert. in spr. bef. plant.: 0.0129755 kg; = p2476*4.7142857143
- Ammonium sulfate; broadcast w/o incorp. in fert. in spr. bef. plant.: 0.00117218 kg; = p2869*4.7142857143
- Superphosphate, grades<= 22%; broadcast w/o incorp. in fert. in spr. bef. plant.; kg P: 6.85052e-6 kg; = p2891
- Aqueous ammonia; broadcast w/ incorp. in fert. in spr. bef. plant.: 0.000105126 kg; = p2669*1.2142857143
- Potassium chloride; broadcast w/ incorp. in fert. in fall bef. plant.: 0.00697738 kg; = p2663*2.2166666667
- Nitrogen; applied in sewage sludge: 1.73471e-8 kg; = p3240
- Potassium chloride; broadcast w/ incorp. in fert. in spr. bef. plant.: 0.0368523 kg; = p2702*2.2166666667
- Potassium chloride; broadcast w/ incorp. in fert. after plant.: 0.00614948 kg; = p2780*2.2166666667
- Sodium nitrate; no broadcast in fert. in spr. bef. plant.: 0.000119799 kg; = p2486*6.0714285714
- Urea; broadcast w/o incorp. in fert. at plant.: 5.17772e-5 kg; = p2919*5
- Pesticide formulation balance; broadcast without incorporation: 0.000263243 kg; = p4308
- Oxamyl [soil, agricultural]: 7.68203e-5 kg; = 1.0 * (p5278+p4248+p4660+p5072+p4042+p3630)
- Glyphosate [soil, agricultural]: 0.000103979 kg; = 1.0 * (p3586+p4616+p4204+p5234+p5028+p3998)
- Nitrogen; in above-ground residue left on field: 0.0227601 kg; = p2168
- Ammonium nitrate; broadcast w/ incorp. in fert. after plant.: 0.00358008 kg; = p2749*4.7142857143
- Sodium nitrate; unspec. appl. method in fert. after plant.: 1.44062e-6 kg; = p3149*6.0714285714
- Methomyl: 2.3419e-5 kg; = p3824
- trans-2-Butene: 4.40064e-7 kg; = p2148*1.1666666667
- Particulates, < 2.5 um [air, non-urban air or from high stacks]: 4.78375e-5 kg; = 1.0 * (p2035+p2033)
- 1-Butene: 1.03454e-6 kg; = p2144*1.1666666667
- Pesticide formulation balance; unspec. appl. method: 0.000277914 kg; = p5338
- Diammonium phosphate; broadcast w/ incorp. in fert. at plant.: 0.000839712 kg; = p2728*4.7142857143
- Tralomethrin [soil, agricultural]: 4.65577e-6 kg; = 1.0 * (p5326+p4296+p4090+p5120+p3678+p4708)
- Sewage sludge dry matter; applied in sewage sludge: 1.9205e-9 kg; = p3243
- Anhydrous ammonia; unspec. appl. method in fert. in spr. bef. plant.: 0.000217699 kg; = p3057*1.2142857143
- Ammonium sulfate; broadcast w/ incorp. in fert. after plant.: 0.0011227 kg; = p2752*4.7142857143
- Other single K nutrients; broadcast w/o incorp. in fert. in fall bef. plant.; kg K: 0.000290164 kg; = p2860
- Thidiazuron: 2.54263e-5 kg; = p3879
- Carbon monoxide, fossil [air, non-urban air or from high stacks]: 0.000564922 kg; = 1.0 * (p2028*2.3333333333)
- Pendimethalin [air, non-urban air or from high stacks]: 4.54997e-5 kg; = 1.0 * (p3840)
- Pesticide formulation balance; banded or side-dressed: 0.00118292 kg; = p3690
- Ethyne [air, non-urban air or from high stacks]: 2.10366e-6 kg; = 1.0 * (p2132*1.0833333333)
- Diammonium phosphate; broadcast w/o incorp. in fert. at plant.: 0.00113745 kg; = p2923*4.7142857143
- Methomyl [soil, agricultural]: 5.43174e-5 kg; = 1.0 * (p5060+p3618+p4236+p4648+p5266+p4030)
- Sodium nitrate; unspec. appl. method in fert. in spr. bef. plant.: 1.37414e-6 kg; = p3071*6.0714285714
- Superphosphate, grades<= 22%; broadcast w/ incorp. in fert. in spr. bef. plant.; kg P: 5.05736e-6 kg; = p2696
- Ethephon [soil, agricultural]: 0.000402724 kg; = 1.0 * (p5005+p5211+p3975+p4181+p4593+p3563)
- Ammonium sulfate; broadcast w/ incorp. in fert. in spr. bef. plant.: 0.00107089 kg; = p2674*4.7142857143
- Mepiquat chloride: 4.34924e-6 kg; = p3816
- Urea; no broadcast in fert. at plant.: 0.000179737 kg; = p2529*5
- Thiodicarb [soil, agricultural]: 4.81097e-5 kg; = 1.0 * (p5324+p4088+p5118+p4294+p3676+p4706)
- Potassium chloride; unspec. appl. method in fert. in spr. bef. plant.: 0.00737045 kg; = p3092*2.2166666667
- Carbon dioxide, in air: 0.00989163 kg; = p2163*3.6666666667
- Monoammonium phosphate; no broadcast in fert. at plant.: 6.58056e-5 kg; = p2537*8.2142857143
- Mepiquat chloride [soil, agricultural]: 1.00875e-5 kg; = 1.0 * (p4228+p3610+p5052+p4022+p4640+p5258)
- Benzene [air, non-urban air or from high stacks]: 1.18586e-6 kg; = 1.0 * (p2140*1.0833333333)
- Paraquat dichloride: 2.74336e-5 kg; = p3838
- Cypermethrin [soil, agricultural]: 4.65577e-6 kg; = 1.0 * (p5185+p4155+p4567+p3537+p4979+p3949)
- Propene [air, non-urban air or from high stacks]: 5.22446e-6 kg; = 1.0 * (p2136*1.1666666667)
- Thidiazuron [soil, agricultural]: 5.89731e-5 kg; = 1.0 * (p4703+p5115+p5321+p4291+p3673+p4085)
- Pentane [air, non-urban air or from high stacks]: 1.63496e-7 kg; = 1.0 * (p2152*1.0166666667)
- Nitrogen solution; unspec. appl. method in fert. after plant.; unspec. appl. method in fert. after plant.; kg N: 0.000136848 kg; = p3146
- Ammonium nitrate; broadcast w/o incorp. in fert. at plant.: 4.49443e-5 kg; = p2905*4.7142857143
- Superphosphate, grades>22%; broadcast w/o incorp. in fert. in spr. bef. plant.; kg P: 0.000244896 kg; = p2893

## Sampling procedure
A delete-a-group jackknife is used by the USDA to estimate the ARMS sample means and RSEs, based on a 15 sample delete-a-group jackknife. Because of this relatively small sample size, a Students t distribution is used to represent ARMS data probability density functions. Other representations of uncertainty are described in Cooper, J.S., Kahn, E., Noon, M. (2012). LCA Digital Commons Unit Process Data: field crop production Version 1. Prepared for the US Department of Agriculture National Agricultural Library. Retrieved from https://www.lcacommons.gov/discovery/docs/LCA%20Digital%20Commons%20Unit%20Process%20Data%20final%20updated.pdf

## Extrapolations
Data represent an aggregation of processes applied in Mississippi in 1996. Data development is demonstrated by parameterization (exlicitly presents all raw and uncertainty data and all calculations). Flow data quality according to the LCADC convention is provided for all flows.
