# CUTOFF regional or national trucking; class 8, average fuel

Dataset: EcoSpold 2, unit process
Geography: GLO
Time period: 1996-01-02 to 2010-01-01
Scenario: Business-as-Usual
System model: Allocation, ecoinvent default
Generated by: cooperjs@u.washington.edu
isCopyrightProtected: false

## General comment
This unit process/ gate-to-gate dataset provides a crosswalk between the exchange "CUTOFF regional or national trucking; class 8, average fuel" in the USDA LCA Commons to the exchange "transport, lorry >16t, fleet average" in the ecoinvent 2.2 database. As a result of the crosswalk, the geographic representativeness is reduced, with the ecoinvent 2.2 data representing operations in Europe as opposed to operation in South Carolina (US State). The impact on the temporal representativeness is not known. Applicable classifications include ISIC 4923, NAIC 484121, UNSPSC 78101801. This dataset was prepared in ILCD format using the UWDFE Lab Excel to ILCD File Generator (beta version, August 2013).

## Geography
Operations in Europe are used as a surrogate for operations in South Carolina (US State).

## Technology
This process represents transport, lorry >16t, fleet average in South Carolina (US State), measured on a per t*km basis. Included processes are listed in the meta data for the "transport, lorry >16t, fleet average" dataset in the ecoinvent 2.2 database.

## Time period
Start and end dates match the underlying data obtained from the USDA Agricultural Resource Management Survey (ARMS) for all data contained within the USDA Digital Commons.

## Reference product
- CUTOFF regional or national trucking; class 8, average fuel: 1 metric ton*km

## Inputs from technosphere
- transport, lorry >16t, fleet average: 1 metric ton*km

## Sampling procedure
Boundary conditions are described in the meta data for the "transport, lorry >16t, fleet average" dataset in the ecoinvent 2.2 database. Uncertainty is not estimated.

## Extrapolations
No quantitative transformation has been performed. Flow data quality according to the LCADC convention is provided for all flows.
