# corn grain; at harvest in 2005; at farm; 85%-91% moisture

Dataset: EcoSpold 2, unit process
Geography: GLO
Time period: 2005-01-02 to 2006-01-01
Scenario: Business-as-Usual
System model: Allocation, ecoinvent default
Generated by: cooperjs@u.washington.edu
isCopyrightProtected: false

## General comment
This unit process/ gate-to-gate dataset represents the production of 1 kg corn coproduced with silage and residue. The process technologies are an aggregation of those applied in Minnesota in 2005. Applicable classifications include ISIC 0111, NAIC 111150, UNSPSC 50403200; this dataset was prepared in ILCD format using the UWDFE Lab Excel to ILCD File Generator (beta version, August 2013)

Exchange "Tefluthrin-soil agricultural" is the result of combining the following original LCA Commons flows: "Tefluthrin; broadcast without incorporation; kg AI", "Tefluthrin; broadcast with incorporation; kg AI", "Tefluthrin; unspec. appl. method; kg AI", "Tefluthrin; in seed furrow; kg AI", "Tefluthrin; banded or side-dressed; kg AI", "Tefluthrin; foliar or directed spray; kg AI".
Exchange "S-Metolachlor-soil agricultural" is the result of combining the following original LCA Commons flows: "S-Metolachlor; in seed furrow; kg AI", "S-Metolachlor; unspec. appl. method; kg AI", "S-Metolachlor; broadcast without incorporation; kg AI", "S-Metolachlor; banded or side-dressed; kg AI", "S-Metolachlor; foliar or directed spray; kg AI", "S-Metolachlor; broadcast with incorporation; kg AI".
Exchange "NMVOC, non-methane volatile organic compounds, unspecified origin-air low population density" is the result of combining the following original LCA Commons flows: "NMVOCs; from residue burning; kg C, biogenic", "NMVOCs; from residue burning; kg except C, biogenic".
Exchange "Glyphosate-soil agricultural" is the result of combining the following original LCA Commons flows: "Glyphosate; in seed furrow; kg AI", "Glyphosate; foliar or directed spray; kg AI", "Glyphosate; unspec. appl. method; kg AI", "Glyphosate; broadcast without incorporation; kg AI", "Glyphosate; banded or side-dressed; kg AI", "Glyphosate; broadcast with incorporation; kg AI".
Exchange "Nicosulfuron-soil agricultural" is the result of combining the following original LCA Commons flows: "Nicosulfuron; in seed furrow; kg AI", "Nicosulfuron; broadcast without incorporation; kg AI", "Nicosulfuron; broadcast with incorporation; kg AI", "Nicosulfuron; banded or side-dressed; kg AI", "Nicosulfuron; unspec. appl. method; kg AI", "Nicosulfuron; foliar or directed spray; kg AI".
Exchange "Tebupirimphos-soil agricultural" is the result of combining the following original LCA Commons flows: "Tebupirimfos; foliar or directed spray; kg AI", "Tebupirimfos; unspec. appl. method; kg AI", "Tebupirimfos; broadcast with incorporation; kg AI", "Tebupirimfos; broadcast without incorporation; kg AI", "Tebupirimfos; banded or side-dressed; kg AI", "Tebupirimfos; in seed furrow; kg AI".
Exchange "Carbon-soil agricultural" is the result of combining the following original LCA Commons flows: "Carbon; broadcast w/o incorp. in manure in fall before planting; biogenic", "Carbon; using unspec. method in manure in spring before planting; biogenic", "Carbon; applied in dolomite", "Carbon; injected/knifed in manure in fall before planting; biogenic", "Carbon; broadcast w/ incorp. in manure in spring before planting; biogenic", "Carbon; broadcast w/ incorp. in manure in fall before planting; biogenic", "Carbon; injected/knifed in manure in spring before planting; biogenic", "Carbon; applied in sewage sludge", "Carbon; in below-ground residue; biogenic", "Carbon; applied in limestone", "Carbon; broadcast w/o incorp. in manure in spring before planting; biogenic", "Carbon; in above-ground residue left on field; biogenic", "Carbon; using unspec. method in manure in fall before planting; biogenic".
Exchange "Particulates, < 2.5 um-air low population density" is the result of combining the following original LCA Commons flows: "PM2.5; from residue burning; kg C, biogenic", "PM2.5; from residue burning; kg except C, biogenic".
Exchange "Chlorpyrifos-soil agricultural" is the result of combining the following original LCA Commons flows: "Chlorpyrifos; broadcast with incorporation; kg AI", "Chlorpyrifos; foliar or directed spray; kg AI", "Chlorpyrifos; broadcast without incorporation; kg AI", "Chlorpyrifos; banded or side-dressed; kg AI", "Chlorpyrifos; unspec. appl. method; kg AI", "Chlorpyrifos; in seed furrow; kg AI".
Exchange "Glufosinate-ammonium-soil agricultural" is the result of combining the following original LCA Commons flows: "Glufosinate-ammonium; in seed furrow; kg AI", "Glufosinate-ammonium; broadcast without incorporation; kg AI", "Glufosinate-ammonium; broadcast with incorporation; kg AI", "Glufosinate-ammonium; unspec. appl. method; kg AI", "Glufosinate-ammonium; banded or side-dressed; kg AI", "Glufosinate-ammonium; foliar or directed spray; kg AI".
Exchange "Mesotrione-soil agricultural" is the result of combining the following original LCA Commons flows: "Mesotrione; unspec. appl. method; kg AI", "Mesotrione; banded or side-dressed; kg AI", "Mesotrione; broadcast without incorporation; kg AI", "Mesotrione; foliar or directed spray; kg AI", "Mesotrione; broadcast with incorporation; kg AI", "Mesotrione; in seed furrow; kg AI".
Exchange "Rimsulfuron-soil agricultural" is the result of combining the following original LCA Commons flows: "Rimsulfuron; banded or side-dressed; kg AI", "Rimsulfuron; broadcast without incorporation; kg AI", "Rimsulfuron; foliar or directed spray; kg AI", "Rimsulfuron; broadcast with incorporation; kg AI", "Rimsulfuron; in seed furrow; kg AI", "Rimsulfuron; unspec. appl. method; kg AI".
Exchange "Ash-soil agricultural" is the result of combining the following original LCA Commons flows: "Ash; from residue burning; kg except C, biogenic", "Ash; from residue burning; kg C, biogenic".
Exchange "Acetochlor-soil agricultural" is the result of combining the following original LCA Commons flows: "Acetochlor; broadcast with incorporation; kg AI", "Acetochlor; unspec. appl. method; kg AI", "Acetochlor; in seed furrow; kg AI", "Acetochlor; banded or side-dressed; kg AI", "Acetochlor; foliar or directed spray; kg AI", "Acetochlor; broadcast without incorporation; kg AI".
Exchange "Water-soil agricultural" is the result of combining the following original LCA Commons flows: "Water; using unspec. method in manure", "Water; broadcast w/ incorp. in manure", "Water; broadcast w/o incorp. in manure", "Water; in above-ground residue left on field; biogenic", "Water; in below-ground residue; biogenic", "Water; from irrigation and applied with manure and sewage sludge", "Water; injected/knifed in manure".
Exchange "Pendimethalin-soil agricultural" is the result of combining the following original LCA Commons flows: "Pendimethalin; in seed furrow; kg AI", "Pendimethalin; banded or side-dressed; kg AI", "Pendimethalin; unspec. appl. method; kg AI", "Pendimethalin; foliar or directed spray; kg AI", "Pendimethalin; broadcast without incorporation; kg AI", "Pendimethalin; broadcast with incorporation; kg AI".
Exchange "Clopyralid-soil agricultural" is the result of combining the following original LCA Commons flows: "Clopyralid; unspec. appl. method; kg AI", "Clopyralid; banded or side-dressed; kg AI", "Clopyralid; broadcast without incorporation; kg AI", "Clopyralid; in seed furrow; kg AI", "Clopyralid; broadcast with incorporation; kg AI", "Clopyralid; foliar or directed spray; kg AI".
Exchange "VERNOLATE-soil unspecified" is the result of combining the following original LCA Commons flows: "Vernolate; in seed furrow; kg AI", "Vernolate; broadcast without incorporation; kg AI", "Vernolate; broadcast with incorporation; kg AI", "Vernolate; unspec. appl. method; kg AI", "Vernolate; banded or side-dressed; kg AI", "Vernolate; foliar or directed spray; kg AI".
Exchange "Water, unspecified origin-resource in water" is the result of combining the following original LCA Commons flows: "Water; withdrawal from unspec. source, for corn, in 2005", "Water; from plant uptake; biogenic".
Exchange "Diflufenzopyr-sodium-soil agricultural" is the result of combining the following original LCA Commons flows: "Diflufenzopyr-sodium; banded or side-dressed; kg AI", "Diflufenzopyr-sodium; broadcast with incorporation; kg AI", "Diflufenzopyr-sodium; unspec. appl. method; kg AI", "Diflufenzopyr-sodium; broadcast without incorporation; kg AI", "Diflufenzopyr-sodium; foliar or directed spray; kg AI", "Diflufenzopyr-sodium; in seed furrow; kg AI".
Exchange "Metolachlor-soil agricultural" is the result of combining the following original LCA Commons flows: "Propazine; banded or side-dressed; kg AI", "Propazine; foliar or directed spray; kg AI", "Propazine; unspec. appl. method; kg AI", "Propazine; in seed furrow; kg AI", "Propazine; broadcast without incorporation; kg AI", "Propazine; broadcast with incorporation; kg AI".
Exchange "Particulates, < 10 um-air low population density" is the result of combining the following original LCA Commons flows: "PM10; from residue burning; kg C, biogenic", "PM10; from residue burning; kg except C, biogenic".
Exchange "Cyfluthrin-soil agricultural" is the result of combining the following original LCA Commons flows: "Beta-Cyfluthrin; unspec. appl. method; kg AI", "Beta-Cyfluthrin; in seed furrow; kg AI", "Beta-Cyfluthrin; broadcast with incorporation; kg AI", "Beta-Cyfluthrin; foliar or directed spray; kg AI", "Beta-Cyfluthrin; broadcast without incorporation; kg AI", "Beta-Cyfluthrin; banded or side-dressed; kg AI".
Exchange "Flumetsulam-soil agricultural" is the result of combining the following original LCA Commons flows: "Flumetsulam; broadcast without incorporation; kg AI", "Flumetsulam; broadcast with incorporation; kg AI", "Flumetsulam; in seed furrow; kg AI", "Flumetsulam; banded or side-dressed; kg AI", "Flumetsulam; unspec. appl. method; kg AI", "Flumetsulam; foliar or directed spray; kg AI".
Exchange "Atrazine-soil agricultural" is the result of combining the following original LCA Commons flows: "Atrazine; broadcast with incorporation; kg AI", "Atrazine; unspec. appl. method; kg AI", "Atrazine; in seed furrow; kg AI", "Atrazine; broadcast without incorporation; kg AI", "Atrazine; foliar or directed spray; kg AI", "Atrazine; banded or side-dressed; kg AI".
Exchange "Transformation, from arable-resource land" is the result of combining the following original LCA Commons flows: "Transformation; from arable, from other to corn", "Transformation; from arable, from fallow to corn", "Transformation; from arable, from corn to corn", "Transformation; from arable, from soy to corn", "Transformation; from arable, from unspec. use to corn".
Exchange "Calcium-soil agricultural" is the result of combining the following original LCA Commons flows: "Calcium; applied in limestone", "Calcium; applied in dolomite".
Exchange "isopentane-2bdf9967-6dae-4183-88d1-8f612548c51e low population density" was originally named: "I pentane; from residue burning; kg C, biogenic" in this dataset.
Exchange "Acetaldehyde-2bdf9967-6dae-4183-88d1-8f612548c51e low population density" was originally named: "Acetaldehyde; from residue burning; kg C, biogenic" in this dataset.
Exchange "1-Butene-2bdf9967-6dae-4183-88d1-8f612548c51e low population density" was originally named: "1 butene; from residue burning; kg C, biogenic" in this dataset.
Exchange "Water, ground-c19fb2d9-98eb-4cd3-8761-81b71d8a9a1b in water" was originally named: "Water; withdrawal from groundwater, for corn, in 2005" in this dataset.
Exchange "Carbon dioxide, in air-2bdf9967-6dae-4183-88d1-8f612548c51e low population density" was originally named: "Carbon dioxide; from residue burning; kg C, biogenic" in this dataset.
Exchange "Nitrogen dioxide-2bdf9967-6dae-4183-88d1-8f612548c51e low population density" was originally named: "Nitrogen dioxide; from residue burning; kg N, biogenic" in this dataset.
Exchange "Butane-2bdf9967-6dae-4183-88d1-8f612548c51e low population density" was originally named: "N butane; from residue burning; kg C, biogenic" in this dataset.
Exchange "Carbon monoxide, fossil-2bdf9967-6dae-4183-88d1-8f612548c51e low population density" was originally named: "Carbon monoxide; from residue burning; kg C, biogenic" in this dataset.
Exchange "Hydrocyanic acid-2bdf9967-6dae-4183-88d1-8f612548c51e low population density" was originally named: "Hydrogen cyanide; from residue burning; kg C, biogenic" in this dataset.
Exchange "Methanol-2bdf9967-6dae-4183-88d1-8f612548c51e low population density" was originally named: "Methanol; from residue burning; kg C, biogenic" in this dataset.
Exchange "isobutene-2bdf9967-6dae-4183-88d1-8f612548c51e low population density" was originally named: "I butene; from residue burning; kg C, biogenic" in this dataset.
Exchange "Occupation, arable-c19fb2d9-98eb-4cd3-8761-81b71d8a9a1b land" was originally named: "Occupation; arable, as corn" in this dataset.
Exchange "Isoprene-2bdf9967-6dae-4183-88d1-8f612548c51e low population density" was originally named: "Isoprene; from residue burning; kg C, biogenic" in this dataset.
Exchange "Dinitrogen monoxide-2bdf9967-6dae-4183-88d1-8f612548c51e low population density" was originally named: "Dinitrogen monoxide; from residue burning; kg N, biogenic" in this dataset.
Exchange "trans-2-Butene-2bdf9967-6dae-4183-88d1-8f612548c51e low population density" was originally named: "Trans 2 butene; from residue burning; kg C, biogenic" in this dataset.
Exchange "Phenol-2bdf9967-6dae-4183-88d1-8f612548c51e low population density" was originally named: "Phenol; from residue burning; kg C, biogenic" in this dataset.
Exchange "Sulfuric acid-be1c0329-f1a8-4524-8420-a86d2a8dd358 agricultural" was originally named: "Sulfuric acid; as secondary application" in this dataset.
Exchange "Methane-2bdf9967-6dae-4183-88d1-8f612548c51e low population density" was originally named: "Methane; from residue burning; kg C, biogenic" in this dataset.
Exchange "Sulfur-be1c0329-f1a8-4524-8420-a86d2a8dd358 agricultural" was originally named: "Sulfur; as secondary application" in this dataset.
Exchange "Ethene-2bdf9967-6dae-4183-88d1-8f612548c51e low population density" was originally named: "Ethylene; from residue burning; kg C, biogenic" in this dataset.
Exchange "Formic acid-2bdf9967-6dae-4183-88d1-8f612548c51e low population density" was originally named: "Formic acid; from residue burning; kg C, biogenic" in this dataset.
Exchange "Toluene-2bdf9967-6dae-4183-88d1-8f612548c51e low population density" was originally named: "Toluene; from residue burning; kg C, biogenic" in this dataset.
Exchange "Water-2bdf9967-6dae-4183-88d1-8f612548c51e low population density" was originally named: "Water; from residue burning; biogenic" in this dataset.
Exchange "Sulfur dioxide-2bdf9967-6dae-4183-88d1-8f612548c51e low population density" was originally named: "Sulfur dioxide; from residue burning; biogenic" in this dataset.
Exchange "Ethane-2bdf9967-6dae-4183-88d1-8f612548c51e low population density" was originally named: "Ethane; from residue burning; kg C, biogenic" in this dataset.
Exchange "Propane-2bdf9967-6dae-4183-88d1-8f612548c51e low population density" was originally named: "Propane; from residue burning; kg C, biogenic" in this dataset.
Exchange "Carbon dioxide-c19fb2d9-98eb-4cd3-8761-81b71d8a9a1b unspecified" was originally named: "Carbon dioxide; from plant uptake; kg C, biogenic" in this dataset.
Exchange "Ammonia-2bdf9967-6dae-4183-88d1-8f612548c51e low population density" was originally named: "Ammonia; from residue burning; kg N, biogenic" in this dataset.
Exchange "Formaldehyde-2bdf9967-6dae-4183-88d1-8f612548c51e low population density" was originally named: "Formaldehyde; from residue burning; kg C, biogenic" in this dataset.
Exchange "Acetone-2bdf9967-6dae-4183-88d1-8f612548c51e low population density" was originally named: "Acetone; from residue burning; kg C, biogenic" in this dataset.
Exchange "Transformation, to arable-c19fb2d9-98eb-4cd3-8761-81b71d8a9a1b land" was originally named: "Transformation; to arable, to corn" in this dataset.
Exchange "Magnesium-be1c0329-f1a8-4524-8420-a86d2a8dd358 agricultural" was originally named: "Magnesium; applied in dolomite" in this dataset.
Exchange "Acrylonitrile-2bdf9967-6dae-4183-88d1-8f612548c51e low population density" was originally named: "Propenenitrile; from residue burning; kg C, biogenic" in this dataset.
Exchange "Benzene-2bdf9967-6dae-4183-88d1-8f612548c51e low population density" was originally named: "Benzene; from residue burning; kg C, biogenic" in this dataset.
Exchange "Zinc compounds-be1c0329-f1a8-4524-8420-a86d2a8dd358 agricultural" was originally named: "Zinc compounds; as secondary application" in this dataset.
Exchange "cis-2-Butene-2bdf9967-6dae-4183-88d1-8f612548c51e low population density" was originally named: "Cis 2 butene; from residue burning; kg C, biogenic" in this dataset.
Exchange "Phosphorus-c19fb2d9-98eb-4cd3-8761-81b71d8a9a1b unspecified" was originally named: "Phosphorous; from plant uptake; biogenic" in this dataset.
Exchange "Acetonitrile-2bdf9967-6dae-4183-88d1-8f612548c51e low population density" was originally named: "Acetonitrile; from residue burning; kg C, biogenic" in this dataset.
Exchange "Butadiene-2bdf9967-6dae-4183-88d1-8f612548c51e low population density" was originally named: "1,3 butadiene; from residue burning; kg C, biogenic" in this dataset.
Exchange "Furan-2bdf9967-6dae-4183-88d1-8f612548c51e low population density" was originally named: "Furan; from residue burning; kg C, biogenic" in this dataset.
Exchange "Propene-2bdf9967-6dae-4183-88d1-8f612548c51e low population density" was originally named: "Propylene; from residue burning; kg C, biogenic" in this dataset.
Exchange "Pentane-2bdf9967-6dae-4183-88d1-8f612548c51e low population density" was originally named: "N pentane; from residue burning; kg C, biogenic" in this dataset.
Exchange "Acetic acid-2bdf9967-6dae-4183-88d1-8f612548c51e low population density" was originally named: "Acetic acid; from residue burning; kg C, biogenic" in this dataset.
Exchange "Ethyne-2bdf9967-6dae-4183-88d1-8f612548c51e low population density" was originally named: "Acetylene; from residue burning; kg C, biogenic" in this dataset.

## Geography
The unit process is assumed to represent production in Minnesota (US State).

## Technology
This process produces corn grain; at harvest in 2005; at farm; 85%-91% moisture. The process is assumed to represent production in Minnesota (US State). Yields and related inputs and outputs represent a single year of operation, in 2005. This dataset includes consideration of residue burning; soil preparation; planting or sowing; irrigation; application, storage, and transport of fertilizers, manures, liming materials, secondary materials, and pesticides; and harvest. Fate and transport of applications are not included as described in Cooper, J.S., Kahn, E., Noon, M. (2012) LCA Digital Commons Unit Process Data: field crop production Version 1 which is available at https://www.lcacommons.gov/discovery/docs/LCA%20Digital%20Commons%20Unit%20Process%20Data%20final%20updated.pdf

## Time period
Start and end dates match the underlying data obtained from the USDA Agricultural Resource Management Survey (ARMS).
## Parameters
- p3114: 2.50831e-6; = p2333*p1023
- p0263: 9.372
- p2226: 0.414539; = if(p0774*p0778+p0775*p0779+p0776*p0780+p0777*p0781=0;0;p0778*p0774/(p0774*p0778+p0775*p0779+p0776*p0780+p0777*p0781))
- p1050: 3.1474e8; = IF(p1012=0;p1037*p1036;0)
- p0891: 226512; = IF(p3251=0;0;62.4*6272640/(12*12*12))
- p3324: 0.00788004; = if(and(p1232=0;p3255<>0);p3266*(p3279*(p3284*p1256+p3286*(p1253+p1257)+p1258*p3288+p3299*p3287));0)
- p1857: 0
- p0404: 0.5
- p3019: 1.27742e-5; = p2238*p1023
- p3305: 0.884134; = if(and(p1232=0;p3252<>0);1-(p3301+p3302+p3303+p3304);0)
- p2571: 0; = p2375*p1073
- p1210: 0.25
- p2981: 0; = p2395*(p1020+p1022)
- p0829: 0; = if(p0807=480;p0814*(1-p0824);0)
- p0945: 0; = if(and(p0683=0;p0951=0);p0939;0)
- p2547: 0.000323426; = p2351*p1123
- p4120: 2.7637e-6; = p1771*p3479
- p3230: 8.18812e-8; = p1170/p0818
- p3093: 0.0001302; = p2312*p1132
- p5112: 8.23583e-9; = p1939*p3483
- p0421: 0; = SQRT(2)*(IF((2*p0289-1)<0;-1;IF((2*p0289-1)>0;1;0))*SQRT(SQRT((2/(pi()*0.140012289)+LN(1-(2*p0289-1)^2)/2)^2-LN(1-(2*p0289-1)^2)/0.140012289)-(2/(pi()*0.140012289)+LN(1-(2*p0289-1)^2)/2)))
- p3017: 0; = p2431*(p1129+p1131)
- p3195: 0; = p2414*p1082
- p1258: 0.03631; = if(p1232>0;0;IF(p1253+p1256+p1257=1;0;1-(p1253+p1256+p1257)))
- p1550: 0
- p2215: 0.000286664; = p1117-p2214
- p2115: 0.856281
- p3055: 1.59181e-5; = p2274*p1132
- p2247: 0.00031301; = p2222*p2192
- p0985: 1; = IF(p0982=1;0;IF(p0982+p0983>1;1-p0982;p0983))
- p0987: 0; = if(p0978>0;0;if(and(p0687=0;p0691=0;p0695=0;p0699=0);0;IF(p0982+p0985+p0986=1;0;1-(p0982+p0985+p0986))))
- p2347: 7.37075e-5; = p2228*p2215
- p0990: 0; = p0986*p0886
- p0613: 0; = IF(p0349<0.5;-SQRT(p0007*EXP(p0481^2*p0008)-p0007);SQRT(p0007*EXP(p0481^2*p0008)-p0007))
- p2661: 1.10593e-5; = p2270*(p1078+p1080)
- p2194: 0.214362
- p0860: 0; = p0672*1000/p0856
- p2712: 3.56548e-5; = p2321*(p1019+p1021)
- p0441: 0; = SQRT(2)*(IF((2*p0309-1)<0;-1;IF((2*p0309-1)>0;1;0))*SQRT(SQRT((2/(pi()*0.140012289)+LN(1-(2*p0309-1)^2)/2)^2-LN(1-(2*p0309-1)^2)/0.140012289)-(2/(pi()*0.140012289)+LN(1-(2*p0309-1)^2)/2)))
- p1307: 0.0071665
- p2211: 0.00255946; = p1120-p2209-p2208-p2210
- p3735: 0; = p1798*p3477
- p1838: 0
- p1237: 0; = if(p1232>0;0;p0729/100)
- p2666: 0.000242935; = p2275*(p1128+p1130)
- p2012: 0.00288218
- p1766: 0
- p2566: 2.20943e-7; = p2370*p1014
- p2767: 0; = p2376*(p1078+p1080)
- p2945: 3.7107e-7; = p2359*(p1020+p1022)
- p1064: 0.00575056; = IF(p1012=0;p1050/(p1057*p0818);0)
- p1768: 0
- p3280: 0.375
- p3040: 1.13057e-5; = p2259*p1082
- p0180: 26.134
- p0679: 2227.57; = p0019*(1+p0547*p0151/100)
- p1726: 0
- p2893: 1.98538e-6; = p2307*(p1079+p1081)
- p3118: 7.01245e-6; = p2337*p1082
- p2947: 1.34481e-6; = p2361*(p1020+p1022)
- p0344: 0.5
- p2578: 0; = p2382*p1073
- p2620: 0; = p2424*p1073
- p3113: 5.85065e-6; = p2332*p1023
- p2080: 0.025
- p3188: 0; = p2407*p1023
- p2373: 8.41467e-6; = p2225*p2202
- p0002: 0.453592
- p0895: 8.336e9; = p0894*p0830
- p1561: 0.52337
- p3162: 0; = p2381*p1082
- p1784: 0
- p0340: 0.5
- p3029: 5.78418e-5; = p2248*p1023
- p2264: 8.10205e-5; = p2226*p2210
- p2906: 4.68634e-7; = p2320*(p1020+p1022)
- p3351: 1.26588e7; = if(and(p1232=0;p3256<>0);p3256*(p3274-p3346)/p3349;0)
- p1605: 0
- p1412: 388
- p0942: 0; = if(and(p0683=0;p0948=0);p0936;0)
- p0936: 0; = p0930*p0001/(p0818*p0002)
- p2443: 9.75088e-5; = p2247*p1014
- p2180: 2.43577e-8; = p3233*p1188/(p0818)
- p3876: 0; = p1939*p3477
- p2904: 2.22595e-6; = p2318*(p1020+p1022)
- p3389: 4.57062e-5; = p3370*p1234
- p0694: 200.323; = p0034*(1+p0562*p0166/100)
- p0930: 0; = p0801*p0924
- p0968: 4.20732e6; = p0965*p0683*p0682*1000
- p0056: 81.486
- p1930: 0
- p1032: 0; = IF(p1012=0;p1026*p0001/(p0818*p0002);0)
- p0592: 0; = IF(p0328<0.5;-SQRT(p0007*EXP(p0460^2*p0008)-p0007);SQRT(p0007*EXP(p0460^2*p0008)-p0007))
- p2111: 0.856281
- p2568: 1.82135e-5; = p2372*p1014
- p2364: 3.32516e-5; = p2225*p2192
- p2780: 0; = p2389*(p1128+p1130)
- p2773: 0; = p2382*(p1078+p1080)
- p1329: 1.1262e-5; = p1328*p0001/(p0818*p0002)
- p2198: 8.35868e-6; = 22.98976928*p2197/14.0067
- p0993: 3.4074e-7; = p0989*p0001*p0004/(p0818*p0002)
- p0290: 0.5
- p1733: 0
- p2931: 5.51207e-7; = p2345*(p1079+p1081)
- p1034: 8.85606e-6; = IF(p1012=0;p1028*p0001/(p0818*p0002);0)
- p3454: 0; = p3378*p1240
- p3306: 1.85969e8; = if(and(p1232=0;p3252<>0);p3252*(p3257*p3277-p3301)/p3305;0)
- p2030: 10.68
- p1686: 0
- p2399: 0; = p2234*p2188
- p0062: 5.3
- p4983: 6.17687e-8; = p1810*p3483
- p2837: 1.74298e-7; = p2251*(p1020+p1022)
- p3820: 0; = p1883*p3477
- p2789: 0; = p2398*(p1019+p1021)
- p1723: 0.507159
- p1084: 2.76171e6; = IF(p1071=0;p1078*(p0710/100)*p0703*1000;0)
- p2718: 2.74377e-5; = p2327*(p1019+p1021)
- p0453: 0; = SQRT(2)*(IF((2*p0321-1)<0;-1;IF((2*p0321-1)>0;1;0))*SQRT(SQRT((2/(pi()*0.140012289)+LN(1-(2*p0321-1)^2)/2)^2-LN(1-(2*p0321-1)^2)/0.140012289)-(2/(pi()*0.140012289)+LN(1-(2*p0321-1)^2)/2)))
- p1199: -0.29
- p2744: 0.000103119; = p2353*(p1128+p1130)
- p0677: 0
- p0678: 1292.31; = p0018*(1+p0546*p0150/100)
- p2311: 0.0015368; = p2231*p2218
- p2217: 0.000430402; = p1118-p2216
- p5076: 3.7576e-8; = p1903*p3483
- p3067: 1.60793e-5; = p2286*p1023
- p0748: 47.42; = p0088*(1+p0616*p0220/100)
- p2147: 3.38416e-8; = p2015*p2075*p2109/(p0818*1000)
- p2045: 30
- p2448: 9.45974e-7; = p2252*p1014
- p0878: 206231; = p0867*p0856
- p2708: 3.84343e-6; = p2317*(p1019+p1021)
- p0500: 0; = SQRT(2)*(IF((2*p0368-1)<0;-1;IF((2*p0368-1)>0;1;0))*SQRT(SQRT((2/(pi()*0.140012289)+LN(1-(2*p0368-1)^2)/2)^2-LN(1-(2*p0368-1)^2)/0.140012289)-(2/(pi()*0.140012289)+LN(1-(2*p0368-1)^2)/2)))
- p3283: 0.3
- p3224: 0.501945; = IF(p3216=0;0;1-p3221-p3222-p3223)
- p0911: 0.00344444
- p0374: 0.5
- p2554: 8.52543e-6; = p2358*p1014
- p1949: 0
- p2081: 0.0019
- p4160: 7.49197e-8; = p1811*p3479
- p2608: 0; = p2412*p1014
- p1940: 0
- p2944: 2.57826e-6; = p2358*(p1020+p1022)
- p2228: 0.257122; = if(p0774*p0778+p0775*p0779+p0776*p0780+p0777*p0781=0;0;p0780*p0776/(p0774*p0778+p0775*p0779+p0776*p0780+p0777*p0781))
- p2104: 0.817136
- p2390: 0; = p2233*p2219
- p2943: 1.76253e-6; = p2357*(p1020+p1022)
- p0579: 0; = IF(p0315<0.5;-SQRT(p0007*EXP(p0447^2*p0008)-p0007);SQRT(p0007*EXP(p0447^2*p0008)-p0007))
- p2601: 0; = p2405*p1014
- p2271: 0.000178419; = p2226*p2217
- p3127: 4.24625e-7; = p2346*p1082
- p1932: 0
- p0989: 1.00361e6; = p0985*p0886
- p2377: 0; = p2229*p2206
- p2871: 5.51034e-6; = p2285*(p1020+p1022)
- p1174: 4.09406e-8; = p1170*p1173/p0818
- p0669: 22.4283; = p0009*(1+p0537*p0141/100)
- p2052: 7.00406e-7; = p2015*p2049*(1-p2050)/(p0818*1000)
- p2303: 6.41729e-5; = p2227*p2210
- p0619: 0; = IF(p0355<0.5;-SQRT(p0007*EXP(p0487^2*p0008)-p0007);SQRT(p0007*EXP(p0487^2*p0008)-p0007))
- p0396: 0.5
- p1633: 0
- p0240: 10.453
- p1211: 0.6
- p0430: 0; = SQRT(2)*(IF((2*p0298-1)<0;-1;IF((2*p0298-1)>0;1;0))*SQRT(SQRT((2/(pi()*0.140012289)+LN(1-(2*p0298-1)^2)/2)^2-LN(1-(2*p0298-1)^2)/0.140012289)-(2/(pi()*0.140012289)+LN(1-(2*p0298-1)^2)/2)))
- p2140: 8.05428e-8; = p2015*p2068*p2102/(p0818*1000)
- p0141: 90.6883
- p2328: 0.000484066; = p2224*p2196
- p2731: 0.000142985; = p2340*(p1078+p1080)
- p3391: 0.000920328; = p3372*p1234
- p2108: 0.826583
- p1769: 0
- p1556: 0
- p1587: 0
- p1117: 0.000362628; = IF(p1071=0;p1107/(p1112*p0818);0)
- p0330: 0.5
- p0146: 0
- p0158: 35.147
- p1956: 3.19118e-6; = p1548*1000/p0818
- p2188: 0.0013056; = p1066-p2186-p2187
- p0207: 25.348
- p0379: 0.5
- p2220: 0.000579513; = p1151/p0818
- p2763: 3.27589e-5; = p2372*(p1019+p1021)
- p3448: 0; = p3372*p1240
- p1163: 0.00468806
- p2260: 0.000168403; = p2226*p2206
- p3221: 0.146975; = IF(p3216=0;0;p1223*12.0107/100.0869+(1-p1224)*12.0107/84.3139)
- p2529: 2.30023e-5; = p2333*p1014
- p3278: 0.46
- p1945: 0
- p2750: 2.20688e-6; = p2359*(p1019+p1021)
- p2049: 25.6942
- p1096: 0.0010242
- p3277: 0.55
- p1812: 0
- p3259: 0.00796296
- p2819: 0; = p2428*(p1128+p1130)
- p2995: 0; = p2409*(p1020+p1022)
- p0717: 26.889; = p0057*(1+p0585*p0189/100)
- p3954: 2.93223e-7; = p1811*p3478
- p3132: 7.23135e-5; = p2351*p1132
- p2360: 5.03872e-5; = p2225*p2188
- p0243: 13.345
- p0923: 0.177029; = IF(p0918=1;0;IF(p0918+p0919>1;1-p0918;p0919))
- p2922: 2.83891e-5; = p2336*(p1079+p1081)
- p2756: 0.00010135; = p2365*(p1019+p1021)
- p0927: 0.0408381; = IF(p0918+p0923+p0924+p0925+p0926=1;0;1-(p0918+p0923+p0924+p0925+p0926))
- p0035: 5.763
- p4482: 0; = p1927*p3480
- p0842: -0.74294
- p2478: 0.000223442; = p2282*p1014
- p2071: 0.151
- p2754: 2.3022e-6; = p2363*(p1019+p1021)
- p1588: 0
- p2520: 1.61654e-6; = p2324*p1014
- p2642: 1.03661e-6; = p2251*(p1019+p1021)
- p2766: 0; = p2375*(p1078+p1080)
- p2606: 0; = p2410*p1014
- p4147: 6.9925e-8; = p1798*p3479
- p5183: 5.5256e-9; = p1804*p3484
- p2764: 4.71474e-6; = p2373*(p1019+p1021)
- p3077: 4.66483e-5; = p2296*p1023
- p1796: 0
- p1836: 0
- p2168: 0.00315713; = p2166*(p0903)
- p0705: 31.152; = p0045*(1+p0573*p0177/100)
- p4326: 0; = p1771*p3480
- p0773: 91.904; = p0113*(1+p0641*p0245/100)
- p2084: 0.21
- p0246: 9.699
- p0796: 96.365; = p0136*(1+p0664*p0268/100)
- p1008: 0; = p1004*p0001*p0004/(p0818*p0002)
- p2651: 9.35544e-5; = p2260*(p1078+p1080)
- p0997: 0; = if(p0888=0;0;if((p0695*p0694*1000*p0696/100)/p0888>1;1;(p0695*p0694*1000*p0696/100)/p0888))
- p0731: 42.824; = p0071*(1+p0599*p0203/100)
- p3020: 1.73685e-6; = p2239*p1023
- p1825: 0
- p0464: 0; = SQRT(2)*(IF((2*p0332-1)<0;-1;IF((2*p0332-1)>0;1;0))*SQRT(SQRT((2/(pi()*0.140012289)+LN(1-(2*p0332-1)^2)/2)^2-LN(1-(2*p0332-1)^2)/0.140012289)-(2/(pi()*0.140012289)+LN(1-(2*p0332-1)^2)/2)))
- p2615: 0; = p2419*p1073
- p1826: 0
- p1767: 0
- p2082: 0.285294
- p2137: 2.67696e-8; = p2015*p2065*p2099/(p0818*1000)
- p3063: 2.43654e-5; = p2282*p1023
- p0284: 0.5
- p2613: 0; = p2417*p1073
- p3180: 0; = p2399*p1023
- p1192: 2.01657e-8; = p1188*p1191/p0818
- p1957: 0
- p1066: 0.00211678; = IF(p1012=0;p1052/(p1059*p0818);0)
- p2825: 4.81684e-6; = p2239*(p1020+p1022)
- p5111: 2.21338e-8; = p1938*p3483
- p0214: 0.892
- p0175: 0
- p2660: 6.60168e-5; = p2269*(p1078+p1080)
- p4069: 4.56125e-8; = p1926*p3478
- p1001: 1; = if(p0978>0;0;if(and(p0687=0;p0691=0;p0695=0;p0699=0);0;IF(p0996+p0999+p1000=1;0;1-(p0996+p0999+p1000))))
- p1691: 0
- p2775: 0; = p2384*(p1078+p1080)
- p3208: 0; = p2427*p1082
- p2125: 7.0917e-7; = p2015*p2053*p2087/(p0818*1000)
- p0077: 25.065
- p2069: 0.190588
- p3484: 0.0526877; = IF(p1344=0;0;p1344/(p1328+p1330+p1332+p1334+p1336+p1338+p1340+p1342+p1344))
- p3387: 0.000926259; = p3368*p1234
- p2214: 7.5964e-5; = p1107/p0818
- p2505: 5.41022e-6; = p2309*p1073
- p0547: 0; = IF(p0283<0.5;-SQRT(p0007*EXP(p0415^2*p0008)-p0007);SQRT(p0007*EXP(p0415^2*p0008)-p0007))
- p0651: 0; = IF(p0387<0.5;-SQRT(p0007*EXP(p0519^2*p0008)-p0007);SQRT(p0007*EXP(p0519^2*p0008)-p0007))
- p0807: 56
- p0184: 19.032
- p1795: 0
- p0970: 0.000941401; = p0967/p0818
- p2350: 0.000853542; = p2232*p2218
- p2509: 5.44108e-5; = p2313*p1123
- p2887: 2.61621e-5; = p2301*(p1079+p1081)
- p0005: 1.60934
- p1290: 0; = IF(p1287=p1264;0;IF(p1287+p1288>p1264;p1264-p1287;p1288))
- p0896: 0.443532
- p3471: 0; = p3376*p1241
- p3350: 4.70525e7; = if(and(p1232=0;p3256<>0);p3256*(p3273*p3277-p3345)/p3349;0)
- p1291: 0; = IF(p1287+p1290=p1264;0;IF(p1287+p1290+p1289>p1264;p1264-(p1287+p1290);p1289))
- p1100: 0.398071
- p0931: 2.22757e6; = p0801*p0925
- p1565: 0
- p1159: 0.5
- p1640: 0
- p2249: 0.000365001; = p2222*p2195
- p1762: 0
- p2487: 1.43052e-6; = p2291*p1014
- p2026: 53.05
- p1148: 0.116352; = if(p1121=0;IF(p1146=1;0;1-p1146);0)
- p0063: 7300
- p1581: 0
- p2745: 0.000101966; = p2354*(p1019+p1021)
- p0046: 34.1
- p3004: 0; = p2418*(p1079+p1081)
- p0388: 0.5
- p0112: 8.005
- p3410: 0.00125086; = p3372*p1238
- p0081: 1.219
- p1128: 0.528; = if(p1121=0;IF(p1123=1;0;IF(p1123+p1124>1;1-p1123;p1124));0)
- p0102: 41.481
- p2163: 0.000206741; = (p2017-p2020)/p0818-(p2025+p2028+p2033+p2034+p2051+p2125+p2126+p2127+p2128+p2129+p2130+p2131+p2132+p2133+p2134+p2135+p2136+p2137+p2138+p2139+p2140+p2141+p2142+p2143+p2144+p2145+p2146+p2147+p2148+p2149+p2150+p2151+p2152+p2153+p2154+p2155+p2156+p2157)
- p0958: 0; = if(and(p0683>0;or(p0807=480;p0807=32;p0807=1;and(p0807=60;p0901<0.03)));p0934;0)
- p0309: 0.5
- p3456: 0; = p3380*p1240
- p2500: 0.000288347; = p2304*p1073
- p0006: 15
- p1773: 0
- p1055: 339912; = IF(p1012=0;p1048*p1036;0)
- p2411: 0; = p2234*p2201
- p0439: 0; = SQRT(2)*(IF((2*p0307-1)<0;-1;IF((2*p0307-1)>0;1;0))*SQRT(SQRT((2/(pi()*0.140012289)+LN(1-(2*p0307-1)^2)/2)^2-LN(1-(2*p0307-1)^2)/0.140012289)-(2/(pi()*0.140012289)+LN(1-(2*p0307-1)^2)/2)))
- p2236: 0; = 1-(p2230+p2231+p2232+p2233)
- p3129: 2.68438e-7; = p2348*p1082
- p2589: 0; = p2393*p1014
- p1303: 0.00613799; = p1297*p1252/p0818
- p0067: 37.348
- p4944: 8.54467e-7; = p1771*p3483
- p1256: 0.51567; = if(p1232>0;0;IF(p1253=1;0;IF(p1253+p1254>1;1-p1253;p1254)))
- p3125: 1.43966e-8; = p2344*p1082
- p2423: 0; = p2235*p2213
- p2859: 0.000405189; = p2273*(p1129+p1131)
- p3329: 1.51226e7; = if(and(p1232=0;p3255<>0);p3255*(p3266-p3324)/p3327;0)
- p0616: 0; = IF(p0352<0.5;-SQRT(p0007*EXP(p0484^2*p0008)-p0007);SQRT(p0007*EXP(p0484^2*p0008)-p0007))
- p3444: 0; = p3368*p1240
- p2964: 0; = p2378*(p1079+p1081)
- p1332: 7.94456e6; = p1321*p0801
- p2432: 0.0125906; = p1158
- p3098: 2.3302e-7; = p2317*p1023
- p2820: 0; = p2429*(p1128+p1130)
- p0700: 0
- p5056: 6.43424e-8; = p1883*p3483
- p1938: 6.4423e-7; = p1530*1000/p0818
- p0326: 0.5
- p0809: 2000
- p2396: 0; = p2234*p2185
- p3460: 6.22294e-5; = p3365*p1241
- p1720: 0
- p1288: 0.136977
- p0737: 25.065; = p0077*(1+p0605*p0209/100)
- p2046: 10
- p2062: 3.76588
- p2183: 0.0010351; = p1064-p2182
- p0881: 0.0215738; = p0880*p0001*p0003/(p0818*p0002)
- p0672: 0
- p0919: 0.177029; = p0678*1000/p0801
- p2815: 0; = p2424*(p1078+p1080)
- p2856: 1.58462e-6; = p2270*(p1079+p1081)
- p4204: 4.74991e-6; = p1855*p3479
- p3338: 0.848122; = if(and(p1232=0;p3254<>0);1-(p3334+p3335+p3336+p3337);0)
- p2569: 2.62134e-6; = p2373*p1014
- p1132: 0.06012; = if(p1121=0;IF(p1123+p1128+p1129+p1130+p1131=1;0;1-(p1123+p1128+p1129+p1130+p1131));0)
- p0965: 0.03033; = IF(p0684/100=1;0;IF(p0684/100+p0685/100>1;1-p0684/100;p0685/100))
- p3168: 0; = p2387*p1082
- p1224: 0.44; = IF(p1221=0;0;IF(p1193=0;1-p1223;0))
- p0411: 0; = SQRT(2)*(IF((2*p0279-1)<0;-1;IF((2*p0279-1)>0;1;0))*SQRT(SQRT((2/(pi()*0.140012289)+LN(1-(2*p0279-1)^2)/2)^2-LN(1-(2*p0279-1)^2)/0.140012289)-(2/(pi()*0.140012289)+LN(1-(2*p0279-1)^2)/2)))
- p2936: 0.000122048; = p2350*(p1129+p1131)
- p1763: 0
- p0051: 34.312
- p3317: 4.16449e8; = if(and(p1232=0;p3253<>0);p3253*(p3261*p3277-p3312)/p3316;0)
- p0808: 6.4e6
- p2961: 0; = p2375*(p1079+p1081)
- p3292: 0.258
- p0892: 143047; = if(p0891=0;0;(1-p1240)*p3251/p0891)
- p2471: 0.000123717; = p2275*p1123
- p2473: 0.000177149; = p2277*p1014
- p3293: 0.3875
- p2345: 6.92471e-6; = p2228*p2213
- p1054: 3.12838e8; = IF(p1012=0;p1047*p1036;0)
- p3344: 9.21236e6; = if(and(p1232=0;p3254<>0);p3254-(p3339+p3340+p3341+p3342+p3343);0)
- p3755: 0; = p1818*p3477
- p5305: 5.5256e-9; = p1926*p3484
- p1976: 0.272
- p3397: 0; = p3378*p1234
- p3281: 0.46
- p3998: 1.85903e-5; = p1855*p3478
- p3258: 0.0491162
- p2779: 0; = p2388*(p1078+p1080)
- p0236: 1.836
- p1673: 0
- p2007: 0.0204896; = ((p1981*p1985+p1987*p1991+p1993*p1997+p2001*p2005)/p0818)*p0005*p0002/1000
- p1075: 0.0796; = IF(p1071=0;p0713/100;0)
- p1708: 0
- p0473: 0; = SQRT(2)*(IF((2*p0341-1)<0;-1;IF((2*p0341-1)>0;1;0))*SQRT(SQRT((2/(pi()*0.140012289)+LN(1-(2*p0341-1)^2)/2)^2-LN(1-(2*p0341-1)^2)/0.140012289)-(2/(pi()*0.140012289)+LN(1-(2*p0341-1)^2)/2)))
- p2898: 0.000309669; = p2312*(p1129+p1131)
- p1798: 6.29247e-7; = p1390*1000/p0818
- p1635: 0
- p1238: 0.37348; = if(p1232>0;0;IF(p1234=1;0;IF(p1234+p1235>1;1-p1234;p1235)))
- p2867: 5.2822e-6; = p2281*(p1020+p1022)
- p1900: 0
- p2979: 0; = p2393*(p1020+p1022)
- p0587: 0; = IF(p0323<0.5;-SQRT(p0007*EXP(p0455^2*p0008)-p0007);SQRT(p0007*EXP(p0455^2*p0008)-p0007))
- p2437: 8.0253e-5; = p2241*p1014
- p3953: 7.81928e-7; = p1810*p3478
- p0307: 0.5
- p0200: 25.896
- p1777: 0
- p1858: 0
- p1184: 1.42768e-8; = p1182/p0818
- p0736: 51.567; = p0076*(1+p0604*p0208/100)
- p0166: 35.147
- p1852: 0
- p3301: 0.0911354; = if(and(p1232=0;p3252<>0);p3257*p3277*(p3297*p3290+(1-p3297)*p3294);0)
- p1832: 0
- p3339: 2.26594e8; = if(and(p1232=0;p3254<>0);p3254*(p3269*p3277-p3334)/p3338;0)
- p2940: 1.71448e-5; = p2354*(p1020+p1022)
- p1322: 0.278064; = IF(((p0745*1000*p0749/100)+(p0754*1000*p0758/100))/p0801<0;0;((p0745*1000*p0749/100)+(p0754*1000*p0758/100))/p0801)
- p1652: 0.6885
- p1964: 0.5
- p0271: 6.243
- p1678: 0
- p0058: 52.8
- p0023: 19.008
- p3097: 1.71382e-6; = p2316*p1023
- p3369: 0.000417097; = if(p1232=0;p3245*p3357/p0818;0)
- p1249: 4.75516e-6; = if(p1232>0;0;p1244*p0001/(p0818*p0002))
- p3457: 0.000384411; = p3362*p1241
- p1854: 2.44208e-6; = p1446*1000/p0818
- p1212: 0.0989352; = if(p1211=0;0;if(p1193>0;0;(p1207+p1208+p1209)*p1210/(2000*p1211)))
- p0431: 0; = SQRT(2)*(IF((2*p0299-1)<0;-1;IF((2*p0299-1)>0;1;0))*SQRT(SQRT((2/(pi()*0.140012289)+LN(1-(2*p0299-1)^2)/2)^2-LN(1-(2*p0299-1)^2)/0.140012289)-(2/(pi()*0.140012289)+LN(1-(2*p0299-1)^2)/2)))
- p3447: 0; = p3371*p1240
- p1845: 0
- p3009: 0; = p2423*(p1079+p1081)
- p3409: 0.000203797; = p3371*p1238
- p2244: 0.000134372; = p2222*p2189
- p2632: 0.000144343; = p2241*(p1019+p1021)
- p0342: 0.5
- p0684: 45.297; = p0024*(1+p0552*p0156/100)
- p0988: 0; = p0982*p0886
- p2225: 0.0385931; = if(p0765*p0769+p0766*p0770+p0767*p0771+p0768*p0772=0;0;p0772*p0768/(p0765*p0769+p0766*p0770+p0767*p0771+p0768*p0772))
- p0159: 14.217
- p3328: 5.55627e7; = if(and(p1232=0;p3255<>0);p3255*(p3265*p3277-p3323)/p3327;0)
- p2685: 0.000466324; = p2294*(p1019+p1021)
- p0638: 0; = IF(p0374<0.5;-SQRT(p0007*EXP(p0506^2*p0008)-p0007);SQRT(p0007*EXP(p0506^2*p0008)-p0007))
- p3290: 0.195
- p2309: 1.57677e-5; = p2227*p2216
- p0491: 0; = SQRT(2)*(IF((2*p0359-1)<0;-1;IF((2*p0359-1)>0;1;0))*SQRT(SQRT((2/(pi()*0.140012289)+LN(1-(2*p0359-1)^2)/2)^2-LN(1-(2*p0359-1)^2)/0.140012289)-(2/(pi()*0.140012289)+LN(1-(2*p0359-1)^2)/2)))
- p2177: 0.0642478; = p0895/p0818-(p2173+p2174+p2175+p2176)
- p3276: 0.0887032
- p2085: 0.0335294
- p2770: 0; = p2379*(p1078+p1080)
- p2025: 9.53625e-7; = p2015*p2023*p2024/(p0818*1000)
- p4308: 8.54651e-6; = p1963*p3479
- p0703: 7297.92; = p0043*(1+p0571*p0175/100)
- p2996: 0; = p2410*(p1020+p1022)
- p3432: 0; = p3375*p1239
- p0708: 21.93; = p0048*(1+p0576*p0180/100)
- p3364: 0.000522411; = if(p1232=0;p3244*p3358/p0818;0)
- p0599: 0; = IF(p0335<0.5;-SQRT(p0007*EXP(p0467^2*p0008)-p0007);SQRT(p0007*EXP(p0467^2*p0008)-p0007))
- p1242: 309922; = if(p1232>0;0;p1234*(p0725/100)*p0723*1000)
- p0498: 0; = SQRT(2)*(IF((2*p0366-1)<0;-1;IF((2*p0366-1)>0;1;0))*SQRT(SQRT((2/(pi()*0.140012289)+LN(1-(2*p0366-1)^2)/2)^2-LN(1-(2*p0366-1)^2)/0.140012289)-(2/(pi()*0.140012289)+LN(1-(2*p0366-1)^2)/2)))
- p3464: 1.51448e-5; = p3369*p1241
- p1341: 0; = p1340*p0001/(p0818*p0002)
- p0537: 0; = IF(p0273<0.5;-SQRT(p0007*EXP(p0405^2*p0008)-p0007);SQRT(p0007*EXP(p0405^2*p0008)-p0007))
- p0157: 50.205
- p1000: 0; = IF(p0996+p0999=1;0;IF(p0996+p0999+p0998>1;1-(p0996+p0999);p0998))
- p1152: 0.415074
- p3136: 1.35703e-6; = p2355*p1023
- p0590: 0; = IF(p0326<0.5;-SQRT(p0007*EXP(p0458^2*p0008)-p0007);SQRT(p0007*EXP(p0458^2*p0008)-p0007))
- p2826: 1.65914e-5; = p2240*(p1020+p1022)
- p0536: 0; = SQRT(2)*(IF((2*p0404-1)<0;-1;IF((2*p0404-1)>0;1;0))*SQRT(SQRT((2/(pi()*0.140012289)+LN(1-(2*p0404-1)^2)/2)^2-LN(1-(2*p0404-1)^2)/0.140012289)-(2/(pi()*0.140012289)+LN(1-(2*p0404-1)^2)/2)))
- p3186: 0; = p2405*p1023
- p4526: 1.48745e-5; = p1765*p3481
- p4451: 0; = p1896*p3480
- p1147: 0.116352
- p1088: 145812; = IF(p1071=0;p1082*(p0710/100)*p0703*1000;0)
- p0586: 0; = IF(p0322<0.5;-SQRT(p0007*EXP(p0454^2*p0008)-p0007);SQRT(p0007*EXP(p0454^2*p0008)-p0007))
- p2148: 2.77539e-8; = p2015*p2076*p2110/(p0818*1000)
- p1742: 0
- p0450: 0; = SQRT(2)*(IF((2*p0318-1)<0;-1;IF((2*p0318-1)>0;1;0))*SQRT(SQRT((2/(pi()*0.140012289)+LN(1-(2*p0318-1)^2)/2)^2-LN(1-(2*p0318-1)^2)/0.140012289)-(2/(pi()*0.140012289)+LN(1-(2*p0318-1)^2)/2)))
- p2781: 0; = p2390*(p1128+p1130)
- p0341: 0.5
- p0820: 0; = if(p0807=480;p0814;0)
- p1141: 1.13661e-5; = if(p1121=0;p1135*p0001/(p0818*p0002);0)
- p3220: 0.00109654; = p3216*p1228
- p2878: 9.51154e-7; = p2292*(p1020+p1022)
- p1983: 50
- p3480: 0; = if(p1328+p1330+p1332+p1334+p1336+p1338+p1340+p1342+p1344=0;0;p1336/(p1328+p1330+p1332+p1334+p1336+p1338+p1340+p1342+p1344))
- p1076: 0.14378; = IF(p1071=0;p0714/100;0)
- p1935: 0
- p3914: 1.08167e-5; = p1771*p3478
- p3031: 0.000122565; = p2250*p1023
- p1248: 5.63046e-6; = if(p1232>0;0;p1243*p0001/(p0818*p0002))
- p4687: 3.36418e-8; = p1926*p3481
- p2911: 3.95629e-6; = p2325*(p1020+p1022)
- p3291: 0.437
- p3535: 4.83733e-9; = p1804*p3476
- p2734: 0.000365596; = p2343*(p1078+p1080)
- p3335: 0.0280414; = IF(or(p3254=0;p1232>0);0;p3270*(p3280*(p3283*p1256+p3286*(p1253+p1257)+p1258*p3288+p3300*p3287)))
- p2544: 4.23673e-6; = p2348*p1073
- p0331: 0.5
- p2031: 0.465411
- p0644: 0; = IF(p0380<0.5;-SQRT(p0007*EXP(p0512^2*p0008)-p0007);SQRT(p0007*EXP(p0512^2*p0008)-p0007))
- p3390: 0.000149945; = p3371*p1234
- p0018: 1292.31
- p0395: 0.5
- p1320: 0; = IF(((p0745*1000*p0747/100)+(p0754*1000*p0756/100))/p0801<0;0;((p0745*1000*p0747/100)+(p0754*1000*p0756/100))/p0801)
- p3257: 0.849747
- p1786: 0
- p2497: 0.000112773; = p2301*p1073
- p1776: 0
- p0183: 12.74
- p2991: 0; = p2405*(p1020+p1022)
- p1396: 7
- p1926: 1.04875e-7; = p1518*1000/p0818
- p4905: 0; = p1938*p3482
- p1042: 0.000359624
- p2880: 7.84086e-5; = p2294*(p1020+p1022)
- p0003: 10000
- p1662: 0
- p2555: 1.227e-6; = p2359*p1014
- p2532: 0.000122373; = p2336*p1073
- p3215: 0.450791; = p1222*3*15.9994/100.0869
- p3234: 0.39606; = 1-p3233
- p4494: 0; = p1939*p3480
- p2175: 0.000124615; = p0895*p0908/p0818
- p3138: 6.35529e-7; = p2357*p1023
- p1203: 3
- p3333: 6.75868e7; = if(and(p1232=0;p3255<>0);p3255-(p3328+p3329+p3330+p3331+p3332);0)
- p2361: 1.42746e-5; = p2225*p2189
- p2839: 6.2898e-7; = p2253*(p1020+p1022)
- p0514: 0; = SQRT(2)*(IF((2*p0382-1)<0;-1;IF((2*p0382-1)>0;1;0))*SQRT(SQRT((2/(pi()*0.140012289)+LN(1-(2*p0382-1)^2)/2)^2-LN(1-(2*p0382-1)^2)/0.140012289)-(2/(pi()*0.140012289)+LN(1-(2*p0382-1)^2)/2)))
- p2227: 0.328339; = if(p0774*p0778+p0775*p0779+p0776*p0780+p0777*p0781=0;0;p0779*p0775/(p0774*p0778+p0775*p0779+p0776*p0780+p0777*p0781))
- p2415: 0; = p2235*p2205
- p1094: 1.94903e-6; = IF(p1071=0;p1088*p0001/(p0818*p0002);0)
- p0932: 0; = p0801*p0926
- p0282: 0.5
- p2768: 0; = p2377*(p1078+p1080)
- p0283: 0.5
- p1253: 0.19737; = if(p1232>0;0;p0735/100)
- p0869: 0.0143759; = IF(p0858+p0864+p0865+p0866+p0867+p0868=1;0;1-(p0858+p0864+p0865+p0866+p0867+p0868))
- p2639: 0.000954041; = p2248*(p1019+p1021)
- p2525: 7.73237e-8; = p2329*p1014
- p2434: 0.000117145; = p2238*p1014
- p0956: 0; = if(and(p0683>0;or(p0807=56;p0807=100;and(p0807=60;p0901>0.06)));p0938;0)
- p2383: 0; = p2229*p2212
- p3008: 0; = p2422*(p1079+p1081)
- p2582: 0; = p2386*p1073
- p1558: 0
- p3212: 0; = p2431*p1132
- p2790: 0; = p2399*(p1019+p1021)
- p1651: 0.299611
- p4966: 5.50771e-8; = p1793*p3483
- p2686: 6.71145e-5; = p2295*(p1019+p1021)
- p0662: 0; = IF(p0398<0.5;-SQRT(p0007*EXP(p0530^2*p0008)-p0007);SQRT(p0007*EXP(p0530^2*p0008)-p0007))
- p2657: 5.93122e-7; = p2266*(p1078+p1080)
- p3308: 3.7393e6; = if(and(p1232=0;p3252<>0);p3252*(p3259-p3303)/p3305;0)
- p1611: 0
- p2662: 9.91186e-5; = p2271*(p1078+p1080)
- p0890: 150853; = p0686*1000*p0687*p0885/100
- p3361: 1.16877e8; = if(p1232=0;p3311+p3322+p3333+p3344+p3355;0)
- p3028: 1.06329e-5; = p2247*p1023
- p2551: 1.24445e-5; = p2355*p1014
- p1105: 0.436421
- p0025: 3.033
- p2196: 0.00993154; = p1068-p2193-p2195
- p0594: 0; = IF(p0330<0.5;-SQRT(p0007*EXP(p0462^2*p0008)-p0007);SQRT(p0007*EXP(p0462^2*p0008)-p0007))
- p0876: 0; = p0866*p0856
- p0287: 0.5
- p3237: 0.854735
- p2230: 0.456886; = if(p0783*p0787+p0784*p0788+p0785*p0789+p0786*p0790=0;0;p0787*p0783/(p0783*p0787+p0784*p0788+p0785*p0789+p0786*p0790))
- p2002: 750
- p5199: 3.06276e-7; = p1820*p3484
- p0257: 8.766
- p2324: 5.18919e-6; = p2224*p2191
- p1221: 0.224397; = p1216*(1+p1220*p1217/100)
- p0316: 0.5
- p3144: 1.39578e-7; = p2363*p1023
- p0741: 1.219; = p0081*(1+p0609*p0213/100)
- p2224: 0.0487403; = if(p0765*p0769+p0766*p0770+p0767*p0771+p0768*p0772=0;0;p0771*p0767/(p0765*p0769+p0766*p0770+p0767*p0771+p0768*p0772))
- p0122: 81.486
- p3319: 2.11015e7; = if(and(p1232=0;p3253<>0);p3253*(p3263-p3314)/p3316;0)
- p0511: 0; = SQRT(2)*(IF((2*p0379-1)<0;-1;IF((2*p0379-1)>0;1;0))*SQRT(SQRT((2/(pi()*0.140012289)+LN(1-(2*p0379-1)^2)/2)^2-LN(1-(2*p0379-1)^2)/0.140012289)-(2/(pi()*0.140012289)+LN(1-(2*p0379-1)^2)/2)))
- p1758: 0
- p2916: 3.83816e-8; = p2330*(p1020+p1022)
- p1580: 0
- p4870: 0; = p1903*p3482
- p3303: 0.000398148; = if(and(p1232=0;p3252<>0);p3259*p3289;0)
- p0392: 0.5
- p2121: 0.822447
- p3372: 0.00334921; = if(p1232=0;p3245*p3360/p0818;0)
- p1289: 0.25065
- p3122: 2.53033e-6; = p2341*p1082
- p2894: 7.49219e-6; = p2308*(p1079+p1081)
- p2179: 0.00207828; = p0970+p0971+p0972
- p3342: 2.46619e7; = if(and(p1232=0;p3254<>0);p3254*(p3272-p3337)/p3338;0)
- p2384: 0; = p2229*p2213
- p1931: 0
- p0054: 14.378
- p0085: 16753.6
- p2170: 0.00450152; = p2166*(p0913)
- p2647: 4.43816e-5; = p2256*(p1019+p1021)
- p1276: 0; = p1272*p1252/p0818
- p2190: 0.000423369; = 32.065*p2189/(2*14.0067)
- p3082: 7.14528e-6; = p2301*p1082
- p0573: 0; = IF(p0309<0.5;-SQRT(p0007*EXP(p0441^2*p0008)-p0007);SQRT(p0007*EXP(p0441^2*p0008)-p0007))
- p2218: 0.00440118; = p1150/p0818
- p1805: 0
- p2735: 3.67889e-7; = p2344*(p1078+p1080)
- p3359: 1.50814e8; = if(p1232=0;p3309+p3320+p3331+p3342+p3353;0)
- p2927: 9.26468e-6; = p2341*(p1079+p1081)
- p1171: 9.75771e-5; = p0801*p0001/(p0818*p0002)
- p0199: 17.426
- p0991: 0; = p0987*p0886
- p0778: 38.406; = p0118*(1+p0646*p0250/100)
- p3099: 8.02626e-7; = p2318*p1023
- p0154: 0
- p2650: 0.000288904; = p2259*(p1078+p1080)
- p1626: 0
- p0791: 75.85; = p0131*(1+p0659*p0263/100)
- p0848: 0.0997529
- p0815: 0
- p0487: 0; = SQRT(2)*(IF((2*p0355-1)<0;-1;IF((2*p0355-1)>0;1;0))*SQRT(SQRT((2/(pi()*0.140012289)+LN(1-(2*p0355-1)^2)/2)^2-LN(1-(2*p0355-1)^2)/0.140012289)-(2/(pi()*0.140012289)+LN(1-(2*p0355-1)^2)/2)))
- p2992: 0; = p2406*(p1020+p1022)
- p0851: 0.5
- p0210: 0
- p2077: 0.043
- p1235: 0.37348; = if(p1232>0;0;p0727/100)
- p2157: 2.38492e-8; = p2015*p2086*p2119/(p0818*1000)
- p0754: 1512.94; = p0094*(1+p0622*p0226/100)
- p2206: 0.00040624; = 9*1.00794*p2204/30.973762
- p1176: 2551.94; = p1175*p0801
- p5015: 7.20635e-9; = p1842*p3483
- p2488: 3.14514e-6; = p2292*p1014
- p2429: 0; = p2236*p2219
- p1287: 0.26563
- p1610: 0
- p1340: 0; = p1325*p0801
- p1739: 0
- p2536: 8.83124e-5; = p2340*p1073
- p1548: 213
- p1057: 0.82
- p0244: 29.586
- p1573: 0
- p0108: 64.796
- p2118: 0.679049
- p2144: 6.5246e-8; = p2015*p2072*p2106/(p0818*1000)
- p3045: 1.76139e-6; = p2264*p1082
- p2274: 0.000264772; = p2230*p2220
- p2349: 0.000110666; = p2228*p2217
- p1336: 0; = p1323*p0801
- p2408: 0; = p2234*p2198
- p1158: 0.0125906; = p1156*p1157
- p1318: 0; = p1317*p0001/(p0818*p0002)
- p0467: 0; = SQRT(2)*(IF((2*p0335-1)<0;-1;IF((2*p0335-1)>0;1;0))*SQRT(SQRT((2/(pi()*0.140012289)+LN(1-(2*p0335-1)^2)/2)^2-LN(1-(2*p0335-1)^2)/0.140012289)-(2/(pi()*0.140012289)+LN(1-(2*p0335-1)^2)/2)))
- p4032: 1.42702e-6; = p1889*p3478
- p1942: 0
- p2510: 9.45518e-5; = p2314*p1123
- p0774: 61.892; = p0114*(1+p0642*p0246/100)
- p3053: 0.000120892; = p2272*p1132
- p2138: 4.3908e-8; = p2015*p2066*p2100/(p0818*1000)
- p2572: 0; = p2376*p1073
- p2191: 0.000106466; = 8*1.00794*p2189/(2*14.0067)
- p1963e: 1.53726e-7; = p1628*p1832+p1629*p1833+p1630*p1834+p1631*p1835+p1632*p1836+p1633*p1837+p1634*p1838+p1635*p1839+p1636*p1840+p1637*p1841+p1638*p1842+p1639*p1843+p1640*p1844+p1641*p1845+p1642*p1846+p1643*p1847+p1644*p1848+p1645*p1849+p1646*p1850
- p0322: 0.5
- p1997: 9.9221e8; = (if(p1152=0;0;p1150/p1152)+if(p1153=0;0;p1151/p1153))*(1+p1157)
- p5335: 1.68136e-7; = p1956*p3484
- p0389: 0.5
- p1638: 0.732906
- p2698: 1.38563e-5; = p2307*(p1078+p1080)
- p0641: 0; = IF(p0377<0.5;-SQRT(p0007*EXP(p0509^2*p0008)-p0007);SQRT(p0007*EXP(p0509^2*p0008)-p0007))
- p4765: 0; = p1798*p3482
- p2129: 7.00821e-7; = p2015*p2057*p2091/(p0818*1000)
- p1697: 0
- p0792: 24.15; = p0132*(1+p0660*p0264/100)
- p1728: 0
- p1714: 0
- p1782: 0
- p3073: 3.42965e-7; = p2292*p1023
- p0274: 0.5
- p1583: 0
- p3121: 5.59545e-6; = p2340*p1082
- p1883: 1.87276e-6; = p1475*1000/p0818
- p0840: 0.149759; = p0839*p0831
- p3340: 3.04201e7; = if(and(p1232=0;p3254<>0);p3254*(p3270-p3335)/p3338;0)
- p1705: 0
- p0120: 47.671
- p2958: 5.50814e-6; = p2372*(p1020+p1022)
- p1257: 0.25065; = if(p1232>0;0;IF(p1253+p1256=1;0;IF(p1253+p1256+p1255>1;1-(p1253+p1256);p1255)))
- p0337: 0.5
- p3620: 1.51339e-7; = p1889*p3476
- p3331: 7.149e6; = if(and(p1232=0;p3255<>0);p3255*(p3268-p3326)/p3327;0)
- p2792: 0; = p2401*(p1019+p1021)
- p3084: 1.39512e-6; = p2303*p1082
- p3330: 5.24701e6; = if(and(p1232=0;p3255<>0);p3255*(p3267-p3325)/p3327;0)
- p3248: 0.84
- p3748: 0; = p1811*p3477
- p2494: 0.000141332; = p2298*p1073
- p0718: 52.8; = p0058*(1+p0586*p0190/100)
- p1988: 750
- p1342: 627584; = p1326*p0801
- p2285: 5.84899e-5; = p2223*p2191
- p1067: 0.0017613; = IF(p1012=0;p1053/(p1060*p0818);0)
- p0129: 30.219
- p0191: 35.107
- p1592: 0
- p2607: 0; = p2411*p1014
- p2915: 2.33843e-8; = p2329*(p1020+p1022)
- p1058: 0.225
- p2530: 3.31055e-6; = p2334*p1014
- p2942: 5.11703e-7; = p2356*(p1020+p1022)
- p4082: 1.04257e-7; = p1939*p3478
- p0066: 27.479
- p0779: 35.687; = p0119*(1+p0647*p0251/100)
- p0521: 0; = SQRT(2)*(IF((2*p0389-1)<0;-1;IF((2*p0389-1)>0;1;0))*SQRT(SQRT((2/(pi()*0.140012289)+LN(1-(2*p0389-1)^2)/2)^2-LN(1-(2*p0389-1)^2)/0.140012289)-(2/(pi()*0.140012289)+LN(1-(2*p0389-1)^2)/2)))
- p1624: 0
- p2585: 0; = p2389*p1123
- p2622: 0; = p2426*p1073
- p1557: 0
- p1260: 0.42824; = if(p1232>0;0;p0731/100)
- p3185: 0; = p2404*p1023
- p0961: 0; = if(and(p0683>0;or(p0807=480;p0807=32;p0807=1;and(p0807=60;p0901<0.03)));p0937;0)
- p1821: 0
- p0709: 9.421; = p0049*(1+p0577*p0181/100)
- p0527: 0; = SQRT(2)*(IF((2*p0395-1)<0;-1;IF((2*p0395-1)>0;1;0))*SQRT(SQRT((2/(pi()*0.140012289)+LN(1-(2*p0395-1)^2)/2)^2-LN(1-(2*p0395-1)^2)/0.140012289)-(2/(pi()*0.140012289)+LN(1-(2*p0395-1)^2)/2)))
- p1963i: 5.25086e-6; = p1706*p1910+p1707*p1911+p1708*p1912+p1709*p1913+p1710*p1914+p1711*p1915+p1712*p1916+p1713*p1917+p1714*p1918+p1715*p1919+p1716*p1920+p1717*p1921+p1718*p1922+p1719*p1923+p1720*p1924+p1721*p1925+p1722*p1926+p1723*p1927+p1724*p1928
- p0548: 0; = IF(p0284<0.5;-SQRT(p0007*EXP(p0416^2*p0008)-p0007);SQRT(p0007*EXP(p0416^2*p0008)-p0007))
- p2290: 2.79774e-6; = p2223*p2197
- p2903: 6.46242e-7; = p2317*(p1020+p1022)
- p2703: 0.00114347; = p2312*(p1128+p1130)
- p0182: 2.062
- p1924: 0
- p1262: 0.05984; = if(p1232>0;0;p0733/100)
- p2803: 0; = p2412*(p1019+p1021)
- p1844: 0
- p0502: 0; = SQRT(2)*(IF((2*p0370-1)<0;-1;IF((2*p0370-1)>0;1;0))*SQRT(SQRT((2/(pi()*0.140012289)+LN(1-(2*p0370-1)^2)/2)^2-LN(1-(2*p0370-1)^2)/0.140012289)-(2/(pi()*0.140012289)+LN(1-(2*p0370-1)^2)/2)))
- p0648: 0; = IF(p0384<0.5;-SQRT(p0007*EXP(p0516^2*p0008)-p0007);SQRT(p0007*EXP(p0516^2*p0008)-p0007))
- p0973: 1.38718e8; = p0967+p0968+p0969
- p2736: 3.84695e-6; = p2345*(p1078+p1080)
- p1093: 0; = IF(p1071=0;p1087*p0001/(p0818*p0002);0)
- p2567: 4.24832e-5; = p2371*p1014
- p0334: 0.5
- p3003: 0; = p2417*(p1079+p1081)
- p1566: 0
- p3240: 1.88637e-9; = p3234*p1188*p3235/p0818
- p1555: 0
- p3035: 4.36085e-5; = p2254*p1023
- p1434: 14
- p3245: 0.2415; = IF(p3244=1;0;if(p3244+p0792/100>1;1-p3244;p0792/100))
- p0685: 3.033; = p0025*(1+p0553*p0157/100)
- p2462: 3.66332e-7; = p2266*p1073
- p0667: 0; = IF(p0403<0.5;-SQRT(p0007*EXP(p0535^2*p0008)-p0007);SQRT(p0007*EXP(p0535^2*p0008)-p0007))
- p1637: 0
- p0915: 0.0105973; = p0914/p0818
- p2858: 0.00028753; = p2272*(p1129+p1131)
- p3069: 1.87501e-5; = p2288*p1023
- p0506: 0; = SQRT(2)*(IF((2*p0374-1)<0;-1;IF((2*p0374-1)>0;1;0))*SQRT(SQRT((2/(pi()*0.140012289)+LN(1-(2*p0374-1)^2)/2)^2-LN(1-(2*p0374-1)^2)/0.140012289)-(2/(pi()*0.140012289)+LN(1-(2*p0374-1)^2)/2)))
- p0252: 13.459
- p3341: 1.21059e7; = if(and(p1232=0;p3254<>0);p3254*(p3271-p3336)/p3338;0)
- p0346: 0.5
- p3145: 1.12956e-6; = p2364*p1023
- p0834: 0.00038
- p0256: 9.086
- p1650: 0.820679
- p0790: 0
- p2141: 9.88904e-8; = p2015*p2069*p2103/(p0818*1000)
- p3792: 0; = p1855*p3477
- p1560: 0
- p0776: 30.928; = p0116*(1+p0644*p0248/100)
- p3396: 0; = p3377*p1234
- p0830: 3.78909e10; = p0825*p0821*p0824
- p1104: 0.398071; = IF(p1071=0;IF(p1096+p1101+p1102+p1103=1;0;1-(p1096+p1101+p1102+p1103));0)
- p0681: 188.423; = p0021*(1+p0549*p0153/100)
- p0633: 0; = IF(p0369<0.5;-SQRT(p0007*EXP(p0501^2*p0008)-p0007);SQRT(p0007*EXP(p0501^2*p0008)-p0007))
- p2087: 0.856281
- p2371: 0.000136374; = p2225*p2200
- p1794: 0
- p0343: 0.5
- p0784: 64.466; = p0124*(1+p0652*p0256/100)
- p0523: 0; = SQRT(2)*(IF((2*p0391-1)<0;-1;IF((2*p0391-1)>0;1;0))*SQRT(SQRT((2/(pi()*0.140012289)+LN(1-(2*p0391-1)^2)/2)^2-LN(1-(2*p0391-1)^2)/0.140012289)-(2/(pi()*0.140012289)+LN(1-(2*p0391-1)^2)/2)))
- p1343: 8.38874e-6; = p1342*p0001/(p0818*p0002)
- p1912: 0
- p1717: 0
- p2796: 0; = p2405*(p1019+p1021)
- p0106: 120.125
- p1738: 0
- p2238: 0.000376043; = p2222*p2183
- p1315: 0.00472985; = p1311*p1252/p0818
- p3429: 0.00105641; = p3372*p1239
- p2439: 0.000147758; = p2243*p1014
- p2339: 0.000867267; = p2228*p2207
- p0103: 7297.92
- p3658: 4.70603e-7; = p1927*p3476
- p2333: 7.3839e-5; = p2224*p2201
- p0670: 1649.59; = p0010*(1+p0538*p0142/100)
- p0972: 0.00107385; = p0969/p0818
- p2061: 0.518824
- p1031: 3.20552e-5; = IF(p1012=0;p1025*p0001/(p0818*p0002);0)
- p3542: 3.10971e-8; = p1811*p3476
- p1959: 9225.58; = if(p0738*p0740*p0739>0;p0738*1000*(p0740/100)*p0739/1000;p1958)
- p1963d: 3.49403e-6; = p1608*p1812+p1609*p1813+p1610*p1814+p1611*p1815+p1612*p1816+p1613*p1817+p1614*p1818+p1615*p1819+p1616*p1820+p1617*p1821+p1618*p1822+p1619*p1823+p1620*p1824+p1621*p1825+p1622*p1826+p1623*p1827+p1624*p1828+p1625*p1829+p1626*p1830+p1627*p1831
- p0505: 0; = SQRT(2)*(IF((2*p0373-1)<0;-1;IF((2*p0373-1)>0;1;0))*SQRT(SQRT((2/(pi()*0.140012289)+LN(1-(2*p0373-1)^2)/2)^2-LN(1-(2*p0373-1)^2)/0.140012289)-(2/(pi()*0.140012289)+LN(1-(2*p0373-1)^2)/2)))
- p0020: 3482
- p2222: 0.363291; = if(p0765*p0769+p0766*p0770+p0767*p0771+p0768*p0772=0;0;p0769*p0765/(p0765*p0769+p0766*p0770+p0767*p0771+p0768*p0772))
- p0688: 0
- p0767: 14.038; = p0107*(1+p0635*p0239/100)
- p3435: 0; = p3378*p1239
- p2807: 0; = p2416*(p1078+p1080)
- p2721: 2.28269e-7; = p2330*(p1019+p1021)
- p1899: 0
- p3042: 3.03976e-5; = p2261*p1082
- p1266: 0.03631; = if(p1232>0;0;IF(p1259+p1263+p1264+p1265=1;0;1-(p1259+p1263+p1264+p1265)))
- p0272: 3.649
- p3247: 0.94
- p2558: 5.08997e-6; = p2362*p1014
- p0209: 22.246
- p0215: 16.248
- p1667: 0
- p2557: 4.44682e-6; = p2361*p1014
- p2283: 0.000203199; = p2223*p2189
- p1835: 0
- p3120: 1.88544e-5; = p2339*p1082
- p0593: 0; = IF(p0329<0.5;-SQRT(p0007*EXP(p0461^2*p0008)-p0007);SQRT(p0007*EXP(p0461^2*p0008)-p0007))
- p2011: 0.00133556
- p3439: 0; = p3363*p1240
- p2420: 0; = p2235*p2210
- p1982: 750
- p0314: 0.5
- p0772: 8.005; = p0112*(1+p0640*p0244/100)
- p2680: 0.00305708; = p2289*(p1019+p1021)
- p4513: 0; = p1962*p3480
- p1828: 0
- p2909: 1.94403e-6; = p2323*(p1020+p1022)
- p1876: 0
- p2161: 5.03275e-9; = p2015*p2085*p2123/(p0818*1000)
- p0882: 104944; = p0869*p0856
- p2778: 0; = p2387*(p1078+p1080)
- p2969: 0; = p2383*(p1079+p1081)
- p3420: 0.000413204; = p3363*p1239
- p2418: 0; = p2235*p2208
- p1151: 3.86804e7; = if(p1121=0;p1149*p1148*p1145;0)
- p0747: 0
- p0557: 0; = IF(p0293<0.5;-SQRT(p0007*EXP(p0425^2*p0008)-p0007);SQRT(p0007*EXP(p0425^2*p0008)-p0007))
- p1052: 4.73312e7; = IF(p1012=0;p1045*p1036;0)
- p1903: 1.09369e-6; = p1495*1000/p0818
- p3243: 2.0884e-10; = p3234*p1188*p3239/p0818
- p2696: 4.69787e-7; = p2305*(p1078+p1080)
- p1584: 0
- p3358: 4.59711e7; = if(p1232=0;p3308+p3319+p3330+p3341+p3352;0)
- p2805: 0; = p2414*(p1078+p1080)
- p2101: 0.620397
- p2955: 3.0391e-8; = p2369*(p1020+p1022)
- p3012: 0; = p2426*(p1079+p1081)
- p1783: 0
- p2644: 3.74077e-6; = p2253*(p1019+p1021)
- p1799: 0
- p0312: 0.5
- p2123: 0.263965
- p2526: 1.26915e-7; = p2330*p1014
- p0781: 0
- p1672: 0
- p0151: 0
- p3079: 8.95475e-6; = p2298*p1082
- p1693: 0
- p2990: 0; = p2404*(p1020+p1022)
- p3058: 1.93173e-5; = p2277*p1023
- p2032: 0.448886
- p1615: 0
- p0279: 0.5
- p1048: 0.000359624; = IF(p1012=0;IF(p1037+p1044+p1045+p1046+p1047=1;0;IF(p1037+p1044+p1045+p1046+p1047+p1042>1;1-(p1037+p1044+p1045+p1046+p1047);p1042));0)
- p1116: 2.95072e-5; = IF(p1071=0;p1106/(p1111*p0818);0)
- p3167: 0; = p2386*p1082
- p2743: 5.93408e-5; = p2352*(p1128+p1130)
- p0954: 0; = if(and(p0683>0;or(p0807=56;p0807=100;and(p0807=60;p0901>0.06)));p0936;0)
- p0785: 43.217; = p0125*(1+p0653*p0257/100)
- p0749: 12.116; = p0089*(1+p0617*p0221/100)
- p1267: 0.20998
- p1631: 0
- p0531: 0; = SQRT(2)*(IF((2*p0399-1)<0;-1;IF((2*p0399-1)>0;1;0))*SQRT(SQRT((2/(pi()*0.140012289)+LN(1-(2*p0399-1)^2)/2)^2-LN(1-(2*p0399-1)^2)/0.140012289)-(2/(pi()*0.140012289)+LN(1-(2*p0399-1)^2)/2)))
- p0668: 0; = IF(p0404<0.5;-SQRT(p0007*EXP(p0536^2*p0008)-p0007);SQRT(p0007*EXP(p0536^2*p0008)-p0007))
- p2884: 3.27874e-5; = p2298*(p1079+p1081)
- p3142: 4.84908e-7; = p2361*p1023
- p1206: 0.0206875
- p0019: 2227.57
- p2690: 7.41004e-5; = p2299*(p1078+p1080)
- p0605: 0; = IF(p0341<0.5;-SQRT(p0007*EXP(p0473^2*p0008)-p0007);SQRT(p0007*EXP(p0473^2*p0008)-p0007))
- p2066: 0.109412
- p2060: 0.272353
- p1715: 0
- p0515: 0; = SQRT(2)*(IF((2*p0383-1)<0;-1;IF((2*p0383-1)>0;1;0))*SQRT(SQRT((2/(pi()*0.140012289)+LN(1-(2*p0383-1)^2)/2)^2-LN(1-(2*p0383-1)^2)/0.140012289)-(2/(pi()*0.140012289)+LN(1-(2*p0383-1)^2)/2)))
- p0871: 0.220497; = p0870*p0001*p0003/(p0818*p0002)
- p0552: 0; = IF(p0288<0.5;-SQRT(p0007*EXP(p0420^2*p0008)-p0007);SQRT(p0007*EXP(p0420^2*p0008)-p0007))
- p1916: 0
- p2233: 0; = if(p0783*p0787+p0784*p0788+p0785*p0789+p0786*p0790=0;0;p0790*p0786/(p0783*p0787+p0784*p0788+p0785*p0789+p0786*p0790))
- p2617: 0; = p2421*p1073
- p1298: 0.0308577
- p1202: 0.7
- p0994: 0; = p0990*p0001*p0004/(p0818*p0002)
- p4099: 1.38792e-6; = p1956*p3478
- p0826: 0.120333; = 1-p0825/p0818
- p0910: 0.00365973; = p0909/p0818
- p2481: 1.82208e-5; = p2285*p1014
- p2458: 0.00014238; = p2262*p1073
- p2872: 4.45932e-5; = p2286*(p1020+p1022)
- p2523: 1.5255e-5; = p2327*p1014
- p2646: 0.000308371; = p2255*(p1019+p1021)
- p0612: 0; = IF(p0348<0.5;-SQRT(p0007*EXP(p0480^2*p0008)-p0007);SQRT(p0007*EXP(p0480^2*p0008)-p0007))
- p0458: 0; = SQRT(2)*(IF((2*p0326-1)<0;-1;IF((2*p0326-1)>0;1;0))*SQRT(SQRT((2/(pi()*0.140012289)+LN(1-(2*p0326-1)^2)/2)^2-LN(1-(2*p0326-1)^2)/0.140012289)-(2/(pi()*0.140012289)+LN(1-(2*p0326-1)^2)/2)))
- p0947: 0; = if(and(p0683=0;or(p0807=480;p0807=32;p0807=1;and(p0807=60;p0901<0.03)));p0935;0)
- p1239: 0.31542; = if(p1232>0;0;IF(p1234+p1238=1;0;IF(p1234+p1238+p1236>1;1-(p1234+p1238);p1236)))
- p2575: 0; = p2379*p1073
- p3209: 0; = p2428*p1132
- p1619: 0
- p1324: 0.802682; = IF(((p0745*1000*p0751/100)+(p0754*1000*p0760/100))/p0801<0;0;((p0745*1000*p0751/100)+(p0754*1000*p0760/100))/p0801)
- p1596: 0
- p2833: 2.94887e-5; = p2247*(p1020+p1022)
- p2317: 6.85959e-6; = p2224*p2184
- p4159: 1.99786e-7; = p1810*p3479
- p1963c: 3.74227e-6; = p1588*p1792+p1589*p1793+p1590*p1794+p1591*p1795+p1592*p1796+p1593*p1797+p1594*p1798+p1595*p1799+p1596*p1800+p1597*p1801+p1598*p1802+p1599*p1803+p1600*p1804+p1601*p1805+p1602*p1806+p1603*p1807+p1604*p1808+p1605*p1809+p1606*p1810+p1607*p1811
- p2365: 0.000180885; = p2225*p2193
- p1779: 0
- p3233: 0.60394
- p0332: 0.5
- p2259: 0.000520041; = p2226*p2205
- p3367: 0.00132818; = if(p1232=0;p3244*p3361/p0818;0)
- p2987: 0; = p2401*(p1020+p1022)
- p2824: 3.5427e-5; = p2238*(p1020+p1022)
- p3400: 0.00395401; = p3362*p1238
- p3062: 1.90464e-6; = p2281*p1023
- p1123: 0.26889; = if(p1121=0;p0717/100;0)
- p0065: 15.45
- p0906: 0.00342907
- p0656: 0; = IF(p0392<0.5;-SQRT(p0007*EXP(p0524^2*p0008)-p0007);SQRT(p0007*EXP(p0524^2*p0008)-p0007))
- p1995: 50
- p1244: 355746; = if(p1232>0;0;p1239*(p0725/100)*p0723*1000)
- p3050: 2.58344e-6; = p2269*p1082
- p2757: 2.17255e-5; = p2366*(p1019+p1021)
- p2467: 6.1219e-5; = p2271*p1073
- p3014: 0; = p2428*(p1129+p1131)
- p5131: 0; = p1962*p3483
- p0353: 0.5
- p5144: 2.4431e-6; = p1765*p3484
- p1842: 2.09749e-7; = p1434*1000/p0818
- p0886: 1.00361e6; = p0686*1000*p0687*p0689/100
- p4275: 1.16542e-8; = p1926*p3479
- p1863: 0
- p2019: 0.13105
- p1125: 0.14299; = if(p1121=0;p0719/100;0)
- p1606: 0.80434
- p2892: 7.0388e-7; = p2306*(p1079+p1081)
- p5177: 3.31536e-8; = p1798*p3484
- p0140: 81.486
- p2325: 4.19943e-5; = p2224*p2192
- p2963: 0; = p2377*(p1079+p1081)
- p2336: 0.000356647; = p2228*p2204
- p4444: 0; = p1889*p3480
- p1280: 0; = IF(p1277=p1263;0;IF(p1277+p1278>p1263;p1263-p1277;p1278))
- p0850: 0.360109
- p2430: 0; = p2236*p2220
- p2516: 1.54961e-6; = p2320*p1014
- p1880: 0
- p1319: 0.115417; = IF(((p0745*1000*p0746/100)+(p0754*1000*p0755/100))/p0801<0;0;((p0745*1000*p0746/100)+(p0754*1000*p0755/100))/p0801)
- p1802: 0
- p3065: 7.90102e-6; = p2284*p1023
- p0376: 0.5
- p0742: 98.443; = p0082*(1+p0610*p0214/100)
- p0984: 0; = if(p0886=0;0;min(1;(p0699*p0698*1000*p0701/100)/p0886))
- p1130: 0; = if(p1121=0;IF(p1123+p1128+p1129=1;0;IF(p1123+p1128+p1129+p1126>1;1-(p1123+p1128+p1129);p1126));0)
- p1339: 7.83233e-5; = p1338*p0001/(p0818*p0002)
- p2624: 0; = p2428*p1123
- p2250: 0.00360804; = p2222*p2196
- p3473: 0; = p3378*p1241
- p3322: 0; = if(and(p1232=0;p3253<>0);p3253-(p3317+p3318+p3319+p3320+p3321);0)
- p0743: 0.368; = p0083*(1+p0611*p0215/100)
- p1827: 0
- p2933: 5.86712e-6; = p2347*(p1079+p1081)
- p2913: 4.61343e-6; = p2327*(p1020+p1022)
- p0124: 64.466
- p3135: 6.18201e-6; = p2354*p1023
- p1687: 0
- p2785: 0; = p2394*(p1019+p1021)
- p3297: 1; = if(p1273+p1274+p1275+p1276=0;0;p1273/(p1273+p1274+p1275+p1276))
- p1905: 0
- p1007: 0; = p1003*p0001*p0004/(p0818*p0002)
- p2119: 0.679049
- p1112: 0.209482
- p0550: 0; = IF(p0286<0.5;-SQRT(p0007*EXP(p0418^2*p0008)-p0007);SQRT(p0007*EXP(p0418^2*p0008)-p0007))
- p1789: 0
- p3466: 1.98133e-5; = p3371*p1241
- p3406: 0.00125892; = p3368*p1238
- p1952: 0
- p3223: 0.126838; = IF(p3216=0;0;(1-p1223)*24.3050/84.3139)
- p0105: 87.271
- p4926: 0; = p1963*p3482
- p2937: 0.000171991; = p2351*(p1129+p1131)
- p3941: 2.73675e-7; = p1798*p3478
- p2716: 2.35294e-5; = p2325*(p1019+p1021)
- p1823: 0
- p0934: 4.65429e-5; = p0928*p0001/(p0818*p0002)
- p1018: 0.09421; = IF(p1012=0;p0709/100;0)
- p1285: 0; = p1281*p1252/p0818
- p1563: 0
- p1198: 0.44
- p2086: 0.0617647
- p1965: 0.000146018; = p1963+p1959*p1964*1000/p0818
- p0701: 0
- p1072: 0; = p1071*p0001/(p0818*p0002)
- p3219: 0.00823848; = p3215*p1228
- p1017: 0.2193; = IF(p1012=0;p0708/100;0)
- p0478: 0; = SQRT(2)*(IF((2*p0346-1)<0;-1;IF((2*p0346-1)>0;1;0))*SQRT(SQRT((2/(pi()*0.140012289)+LN(1-(2*p0346-1)^2)/2)^2-LN(1-(2*p0346-1)^2)/0.140012289)-(2/(pi()*0.140012289)+LN(1-(2*p0346-1)^2)/2)))
- p2968: 0; = p2382*(p1079+p1081)
- p1987: 400
- p0254: 3.649
- p1608: 0
- p1646: 0
- p0888: 0; = p0686*1000*p0687*p0884/100
- p4252: 1.21536e-7; = p1903*p3479
- p0939: 3.98486e-6; = p0933*p0001/(p0818*p0002)
- p3425: 0.00106321; = p3368*p1239
- p2385: 0; = p2229*p2214
- p2187: 0.000102058; = 4*1.00794*p2186/(2*14.0067)
- p1936: 0
- p1954: 0
- p1073: 0.34312; = IF(p1071=0;p0711/100;0)
- p1325: 0; = IF(((p0745*1000*p0752/100)+(p0754*1000*p0761/100))/p0801<0;0;((p0745*1000*p0752/100)+(p0754*1000*p0761/100))/p0801)
- p3286: 0.185
- p3165: 0; = p2384*p1082
- p2827: 2.42701e-5; = p2241*(p1020+p1022)
- p0739: 1.278; = p0079*(1+p0607*p0211/100)
- p3418: 0.181305; = p3380*p1238
- p2342: 5.02536e-5; = p2228*p2210
- p0259: 13.935
- p0606: 0; = IF(p0342<0.5;-SQRT(p0007*EXP(p0474^2*p0008)-p0007);SQRT(p0007*EXP(p0474^2*p0008)-p0007))
- p2732: 6.46595e-5; = p2341*(p1078+p1080)
- p2600: 0; = p2404*p1014
- p0952: 4.65429e-5; = if(and(p0683>0;or(p0807=56;p0807=100;and(p0807=60;p0901>0.06)));p0934;0)
- p3207: 0; = p2426*p1082
- p2625: 0; = p2429*p1123
- p2688: 0.00025301; = p2297*(p1078+p1080)
- p0646: 0; = IF(p0382<0.5;-SQRT(p0007*EXP(p0514^2*p0008)-p0007);SQRT(p0007*EXP(p0514^2*p0008)-p0007))
- p2570: 3.00516e-5; = p2374*p1014
- p4039: 1.43353e-7; = p1896*p3478
- p2001: 400
- p2355: 3.99478e-5; = p2225*p2183
- p3386: 0.000364971; = p3367*p1234
- p1908: 0
- p3011: 0; = p2425*(p1079+p1081)
- p1741: 0
- p2470: 7.11944e-5; = p2274*p1123
- p2313: 0.000202354; = p2231*p2220
- p3467: 0.00012161; = p3372*p1241
- p3452: 0; = p3376*p1240
- p2136: 3.29495e-7; = p2015*p2064*p2098/(p0818*1000)
- p0347: 0.5
- p2142: 1.31031e-7; = p2015*p2070*p2104/(p0818*1000)
- p1279: 0.25065
- p0418: 0; = SQRT(2)*(IF((2*p0286-1)<0;-1;IF((2*p0286-1)>0;1;0))*SQRT(SQRT((2/(pi()*0.140012289)+LN(1-(2*p0286-1)^2)/2)^2-LN(1-(2*p0286-1)^2)/0.140012289)-(2/(pi()*0.140012289)+LN(1-(2*p0286-1)^2)/2)))
- p1918: 0
- p2546: 0.000229509; = p2350*p1123
- p3139: 9.29663e-7; = p2358*p1023
- p1853: 0
- p4732: 0; = p1765*p3482
- p0261: 15.972
- p0746: 0
- p2848: 3.30306e-5; = p2262*(p1079+p1081)
- p2340: 0.00025738; = p2228*p2208
- p2330: 4.07404e-7; = p2224*p2198
- p2854: 2.50661e-6; = p2268*(p1079+p1081)
- p3295: 0.58
- p3275: 0.0214527
- p2573: 0; = p2377*p1073
- p1920: 0
- p1727: 0
- p2200: 0.00353363; = p1056/p0818
- p0751: 34.975; = p0091*(1+p0619*p0223/100)
- p3146: 6.14465e-6; = p2365*p1023
- p0631: 0; = IF(p0367<0.5;-SQRT(p0007*EXP(p0499^2*p0008)-p0007);SQRT(p0007*EXP(p0499^2*p0008)-p0007))
- p2986: 0; = p2400*(p1020+p1022)
- p0440: 0; = SQRT(2)*(IF((2*p0308-1)<0;-1;IF((2*p0308-1)>0;1;0))*SQRT(SQRT((2/(pi()*0.140012289)+LN(1-(2*p0308-1)^2)/2)^2-LN(1-(2*p0308-1)^2)/0.140012289)-(2/(pi()*0.140012289)+LN(1-(2*p0308-1)^2)/2)))
- p0866: 0; = IF(p0858+p0864+p0865=1;0;IF(p0858+p0864+p0865+p0861>1;1-(p0858+p0864+p0865);p0861))
- p1614: 0.65436
- p2885: 1.06174e-5; = p2299*(p1079+p1081)
- p1679: 0.767009
- p2300: 0.00110748; = p2227*p2207
- p1890: 0
- p1886: 0
- p2291: 4.59205e-6; = p2223*p2198
- p0345: 0.5
- p1801: 0
- p1333: 0.000106193; = p1332*p0001/(p0818*p0002)
- p1704: 0
- p0877: 0; = p0876*p0001*p0003/(p0818*p0002)
- p1719: 0
- p0227: 17.563
- p2255: 0.000550368; = p2222*p2201
- p0729: 0
- p2182: 0.00471546; = p1050/p0818
- p2759: 1.10121e-7; = p2368*(p1019+p1021)
- p1162: 5.79492e-6; = p1161/p0818
- p2846: 1.34049e-5; = p2260*(p1079+p1081)
- p5150: 1.31036e-6; = p1771*p3484
- p0647: 0; = IF(p0383<0.5;-SQRT(p0007*EXP(p0515^2*p0008)-p0007);SQRT(p0007*EXP(p0515^2*p0008)-p0007))
- p1572: 0
- p0455: 0; = SQRT(2)*(IF((2*p0323-1)<0;-1;IF((2*p0323-1)>0;1;0))*SQRT(SQRT((2/(pi()*0.140012289)+LN(1-(2*p0323-1)^2)/2)^2-LN(1-(2*p0323-1)^2)/0.140012289)-(2/(pi()*0.140012289)+LN(1-(2*p0323-1)^2)/2)))
- p0008: 0.0739645; = (p0007-1.5)/(p0007-1)^2
- p2504: 3.22955e-5; = p2308*p1073
- p1243: 421229; = if(p1232>0;0;p1238*(p0725/100)*p0723*1000)
- p3332: 1.01423e8; = if(and(p1232=0;p3255<>0);IF((p3328+p3329+p3330+p3331)+(p3255*(p3265*(1-p3277))/p3327)>p3255;p3255-(p3328+p3329+p3330+p3331);p3255*(p3265*(1-p3277))/p3327);0)
- p0190: 14.779
- p1807: 0
- p0212: 0.689
- p4615: 7.83374e-7; = p1854*p3481
- p5189: 9.47245e-8; = p1810*p3484
- p1699: 0.762907
- p2152: 1.18326e-8; = p2015*p2080*p2114/(p0818*1000)
- p2465: 4.07742e-5; = p2269*p1073
- p0963: 0; = if(and(p0683>0;or(p0807=480;p0807=32;p0807=1;and(p0807=60;p0901<0.03)));p0939;0)
- p2159: 1.01622e-6; = p2015*p2083*p2121/(p0818*1000)
- p1744: 0
- p0095: 55.689
- p1734: 0.7899
- p5069: 1.13243e-8; = p1896*p3483
- p2794: 0; = p2403*(p1019+p1021)
- p3373: 0.000422882; = if(p1232=0;p3245*p3361/p0818;0)
- p0722: 5.3; = p0062*(1+p0590*p0194/100)
- p3791: 0; = p1854*p3477
- p0912: 0.0117949
- p4169: 6.45974e-7; = p1820*p3479
- p2769: 0; = p2378*(p1078+p1080)
- p2788: 0; = p2397*(p1019+p1021)
- p2783: 0; = p2392*(p1128+p1130)
- p4481: 0; = p1926*p3480
- p3226: 0.000919612; = p3222*p1229
- p1992: 3900
- p1861: 0
- p2626: 0; = p2430*p1123
- p3378: 0; = if(p1232=0;p3246*p3360/p0818;0)
- p2503: 8.55808e-6; = p2307*p1073
- p1659: 0
- p5233: 1.28667e-7; = p1854*p3484
- p0068: 31.542
- p0078: 7297.88
- p1729: 0
- p4565: 3.36418e-8; = p1804*p3481
- p0697: 86.933; = p0037*(1+p0565*p0169/100)
- p2033: 1.3153e-6; = p2015*p2029*p2031/(p0818*1000)
- p1939: 2.39713e-7; = p1531*1000/p0818
- p2425: 0; = p2235*p2215
- p1963g: 3.05023e-6; = p1667*p1871+p1668*p1872+p1669*p1873+p1670*p1874+p1671*p1875+p1672*p1876+p1673*p1877+p1674*p1878+p1675*p1879+p1676*p1880+p1677*p1881+p1678*p1882+p1679*p1883+p1680*p1884+p1681*p1885+p1682*p1886+p1683*p1887+p1684*p1888+p1685*p1889
- p0169: 16.33
- p4938: 1.59312e-6; = p1765*p3483
- p2427: 0; = p2235*p2217
- p3365: 0.00171384; = if(p1232=0;p3244*p3359/p0818;0)
- p0803: 400000
- p2359: 3.93876e-6; = p2225*p2187
- p4717: 1.02367e-6; = p1956*p3481
- p2594: 0; = p2398*p1014
- p3793: 0; = p1856*p3477
- p2543: 2.52905e-5; = p2347*p1073
- p1335: 2.71327e-5; = p1334*p0001/(p0818*p0002)
- p2107: 0.881623
- p2474: 2.4086e-5; = p2278*p1014
- p0150: 0
- p4925: 0; = p1962*p3482
- p0639: 0; = IF(p0375<0.5;-SQRT(p0007*EXP(p0507^2*p0008)-p0007);SQRT(p0007*EXP(p0507^2*p0008)-p0007))
- p4993: 1.99719e-7; = p1820*p3483
- p0317: 0.5
- p2816: 0; = p2425*(p1078+p1080)
- p0585: 0; = IF(p0321<0.5;-SQRT(p0007*EXP(p0453^2*p0008)-p0007);SQRT(p0007*EXP(p0453^2*p0008)-p0007))
- p2676: 3.27719e-5; = p2285*(p1019+p1021)
- p3270: 0.0747083
- p2960: 9.08821e-6; = p2374*(p1020+p1022)
- p4026: 8.14508e-7; = p1883*p3478
- p1760: 0
- p0355: 0.5
- p1675: 0
- p2587: 0; = p2391*p1123
- p0907: 0.00295453
- p2484: 0.000171947; = p2288*p1014
- p1772: 0
- p3461: 0.00038195; = p3366*p1241
- p1603: 0
- p1814: 0
- p1025: 2.39813e6; = IF(p1012=0;p1019*(p0704/100)*p0703*1000;0)
- p2263: 0.000187648; = p2226*p2209
- p1879: 0
- p0707: 0
- p0423: 0; = SQRT(2)*(IF((2*p0291-1)<0;-1;IF((2*p0291-1)>0;1;0))*SQRT(SQRT((2/(pi()*0.140012289)+LN(1-(2*p0291-1)^2)/2)^2-LN(1-(2*p0291-1)^2)/0.140012289)-(2/(pi()*0.140012289)+LN(1-(2*p0291-1)^2)/2)))
- p0167: 14.217
- p0542: 0; = IF(p0278<0.5;-SQRT(p0007*EXP(p0410^2*p0008)-p0007);SQRT(p0007*EXP(p0410^2*p0008)-p0007))
- p1837: 0
- p1173: 0.5
- p1955: 0
- p3089: 2.04623e-6; = p2308*p1082
- p2929: 5.23841e-5; = p2343*(p1079+p1081)
- p3434: 0; = p3377*p1239
- p2707: 2.82677e-5; = p2316*(p1019+p1021)
- p1816: 0
- p2541: 2.37601e-6; = p2345*p1073
- p2332: 0.00017223; = p2224*p2200
- p3242: 1.36532e-8; = p3234*p1188*p3238/p0818
- p0082: 98.443
- p2935: 8.80898e-6; = p2349*(p1079+p1081)
- p2314: 0.000351637; = p2231*p2221
- p2294: 0.000832275; = p2223*p2201
- p3985: 9.12249e-8; = p1842*p3478
- p5338: 4.05216e-6; = p1963*p3484
- p1082: 0.02174; = IF(p1071=0;IF(p1073+p1078+p1079+p1080+p1081=1;0;1-(p1073+p1078+p1079+p1080+p1081));0)
- p3161: 0; = p2380*p1082
- p3172: 0; = p2391*p1132
- p0903: 0.0106556
- p1223: 0.56
- p2189: 0.000369874; = p1053/p0818
- p2682: 2.57293e-6; = p2291*(p1019+p1021)
- p0805: 0
- p0960: 0; = if(and(p0683>0;or(p0807=480;p0807=32;p0807=1;and(p0807=60;p0901<0.03)));p0936;0)
- p3318: 4.39769e7; = if(and(p1232=0;p3253<>0);p3253*(p3262-p3313)/p3316;0)
- p3150: 1.09583e-8; = p2369*p1023
- p0844: 0.404961
- p0152: 0
- p2240: 0.00017611; = p2222*p2185
- p1642: 0
- p3690: 3.54742e-6; = p1963*p3476
- p1683: 0
- p2923: 2.56757e-5; = p2337*(p1079+p1081)
- p2508: 0.000582327; = p2312*p1123
- p1304: 0.0160368; = p1300*p1252/p0818
- p2595: 0; = p2399*p1014
- p2235: 0; = 1-(p2226+p2227+p2228+p2229)
- p2440: 4.18595e-5; = p2244*p1014
- p3321: 3.22513e8; = if(and(p1232=0;p3253<>0);IF((p3317+p3318+p3319+p3320)+(p3253*(p3261*(1-p3277))/p3316)>p3253;p3253-(p3317+p3318+p3319+p3320);p3253*(p3261*(1-p3277))/p3316);0)
- p4307: 0; = p1962*p3479
- p2709: 1.32385e-5; = p2318*(p1019+p1021)
- p0957: 3.98486e-6; = if(and(p0683>0;or(p0807=56;p0807=100;and(p0807=60;p0901>0.06)));p0939;0)
- p2059: 1.00168
- p0127: 39.892
- p0738: 7297.88; = p0078*(1+p0606*p0210/100)
- p1860: 0
- p1658: 0
- p0399: 0.5
- p1153: 0.365265
- p2381: 0; = p2229*p2210
- p3476: 0.0461249; = if(p1328+p1330+p1332+p1334+p1336+p1338+p1340+p1342+p1344=0;0;p1328/(p1328+p1330+p1332+p1334+p1336+p1338+p1340+p1342+p1344))
- p1204: 0.980791
- p3112: 3.04276e-8; = p2331*p1023
- p3325: 0.000853147; = if(and(p1232=0;p3255<>0);p3267*p3289;0)
- p0764: 96.365; = p0104*(1+p0632*p0236/100)
- p1866: 0
- p1804: 1.04875e-7; = p1396*1000/p0818
- p3218: 0.00687905; = p3214*p1228
- p2791: 0; = p2400*(p1019+p1021)
- p0143: 0
- p1156: 0.0573652; = p1064+p1065+p1066+p1067+p1068+p1069+p1070+p1116+p1117+p1118+p1119+p1120+p1154+p1155
- p2948: 1.53931e-6; = p2362*(p1020+p1022)
- p1271: 0; = IF(p1267+p1270=p1259;0;IF(p1267+p1270+p1269>p1259;p1259-(p1267+p1270);p1269))
- p0551: 0; = IF(p0287<0.5;-SQRT(p0007*EXP(p0419^2*p0008)-p0007);SQRT(p0007*EXP(p0419^2*p0008)-p0007))
- p0125: 43.217
- p2050: 0.952062
- p0306: 0.5
- p1677: 0
- p0387: 0.5
- p0446: 0; = SQRT(2)*(IF((2*p0314-1)<0;-1;IF((2*p0314-1)>0;1;0))*SQRT(SQRT((2/(pi()*0.140012289)+LN(1-(2*p0314-1)^2)/2)^2-LN(1-(2*p0314-1)^2)/0.140012289)-(2/(pi()*0.140012289)+LN(1-(2*p0314-1)^2)/2)))
- p3416: 0; = p3378*p1238
- p2466: 6.83059e-6; = p2270*p1073
- p0015: 161.399
- p1647: 0
- p4353: 0; = p1798*p3480
- p4287: 7.15899e-8; = p1938*p3479
- p1177: 9.75771e-5; = p0801*p0001/(p0818*p0002)
- p4511: 0; = p1956*p3480
- p3470: 0; = p3375*p1241
- p1613: 0
- p2860: 3.78597e-5; = p2274*(p1129+p1131)
- p3459: 1.89688e-5; = p3364*p1241
- p2946: 4.74697e-6; = p2360*(p1020+p1022)
- p1009: 0; = p1005*p0001*p0004/(p0818*p0002)
- p3474: 0; = p3379*p1241
- p2655: 4.50101e-5; = p2264*(p1078+p1080)
- p1815: 0
- p3080: 2.89978e-6; = p2299*p1082
- p0797: 57.341; = p0137*(1+p0665*p0269/100)
- p1875: 0
- p3282: 0.3
- p2096: 0.486404
- p0819: 0.191771; = p0808*p0809/p0818
- p3627: 1.5203e-8; = p1896*p3476
- p2973: 0; = p2387*(p1079+p1081)
- p0474: 0; = SQRT(2)*(IF((2*p0342-1)<0;-1;IF((2*p0342-1)>0;1;0))*SQRT(SQRT((2/(pi()*0.140012289)+LN(1-(2*p0342-1)^2)/2)^2-LN(1-(2*p0342-1)^2)/0.140012289)-(2/(pi()*0.140012289)+LN(1-(2*p0342-1)^2)/2)))
- p1632: 0
- p1869: 0
- p2882: 0.000129371; = p2296*(p1020+p1022)
- p2037: 2.3
- p1194: 1.48
- p1736: 0
- p2652: 0.000776776; = p2261*(p1078+p1080)
- p1295: 0; = p1291*p1252/p0818
- p3585: 1.12641e-7; = p1854*p3476
- p3320: 8.7251e7; = if(and(p1232=0;p3253<>0);p3253*(p3264-p3315)/p3316;0)
- p0604: 0; = IF(p0340<0.5;-SQRT(p0007*EXP(p0472^2*p0008)-p0007);SQRT(p0007*EXP(p0472^2*p0008)-p0007))
- p2563: 0.000119402; = p2367*p1014
- p2202: 0.000218035; = 4*1.00794*p2201/(2*14.0067)
- p1250: 0; = if(p1232>0;0;p1245*p0001/(p0818*p0002))
- p2006: 0.191516; = ((p1980*p1985+p1986*p1991+p1992*p1997+p2000*p2005)/p0818)*p0005*p0002/1000
- p1896: 3.29606e-7; = p1488*1000/p0818
- p2036: 3.34692e-6; = p2015*p2030*(1-p2032)/(p0818*1000)
- p3238: 0.854735; = IF(p3237+p3235+p3236>1;1-(p3235+p3236);p3237)
- p2941: 3.76348e-6; = p2355*(p1020+p1022)
- p2171: 0.163837; = p2165*p0831
- p1969: 400000; = p0803
- p2692: 0.000182589; = p2301*(p1078+p1080)
- p1037: 0.332992
- p1648: 0
- p4923: 0; = p1956*p3482
- p1111: 0.0872841
- p3001: 0; = p2415*(p1079+p1081)
- p2853: 8.88674e-7; = p2267*(p1079+p1081)
- p0049: 9.421
- p1140: 4.19702e-5; = if(p1121=0;p1134*p0001/(p0818*p0002);0)
- p3154: 2.85846e-7; = p2373*p1023
- p1306: 0.0011292; = p1302*p1252/p0818
- p0349: 0.5
- p2483: 0.000802133; = p2287*p1014
- p3115: 3.61002e-7; = p2334*p1023
- p1214: 29; = IF(p1213=0;0;p1213-1)
- p1923: 0
- p4458: 0; = p1903*p3480
- p2357: 1.87085e-5; = p2225*p2185
- p0400: 0.5
- p2614: 0; = p2418*p1073
- p4657: 1.05731e-7; = p1896*p3481
- p3963: 2.52823e-6; = p1820*p3478
- p1106: 171906; = IF(p1071=0;p1105*p1096*p1095;0)
- p0161: 16.33
- p3227: 0.00052016; = p3223*p1229
- p1481: 219
- p0422: 0; = SQRT(2)*(IF((2*p0290-1)<0;-1;IF((2*p0290-1)>0;1;0))*SQRT(SQRT((2/(pi()*0.140012289)+LN(1-(2*p0290-1)^2)/2)^2-LN(1-(2*p0290-1)^2)/0.140012289)-(2/(pi()*0.140012289)+LN(1-(2*p0290-1)^2)/2)))
- p3036: 1.8696e-5; = p2255*p1023
- p1022: 0.09421; = IF(p1012=0;IF(p1014+p1019+p1020+p1021=1;0;IF(p1014+p1019+p1020+p1021+p1018>1;1-(p1014+p1019+p1020+p1021);p1018));0)
- p2665: 0.000139799; = p2274*(p1128+p1130)
- p2027: 0.428799
- p2029: 4.97
- p2832: 3.64388e-6; = p2246*(p1020+p1022)
- p3264: 0.0887032
- p1080: 0.14378; = IF(p1071=0;IF(p1073+p1078+p1079=1;0;IF(p1073+p1078+p1079+p1076>1;1-(p1073+p1078+p1079);p1076));0)
- p0898: 0.458721
- p2286: 0.000473338; = p2223*p2192
- p2971: 0; = p2385*(p1079+p1081)
- p1819: 0
- p1149: 0.830148
- p0084: 16.851
- p2074: 0.025
- p3030: 1.23991e-5; = p2249*p1023
- p3192: 0; = p2411*p1023
- p1070: 0.00776621; = IF(p1012=0;p1056/(p1063*p0818);0)
- p0777: 0
- p1881: 0
- p0088: 47.42
- p2398: 0; = p2234*p2187
- p3083: 3.23118e-6; = p2302*p1082
- p5028: 1.46855e-6; = p1855*p3483
- p1910: 0
- p2641: 0.00202159; = p2250*(p1019+p1021)
- p1138: 357521; = if(p1121=0;p1132*(p0716/100)*p0703*1000;0)
- p1737: 0
- p0723: 7300; = p0063*(1+p0591*p0195/100)
- p1661: 0
- p0452: 0; = SQRT(2)*(IF((2*p0320-1)<0;-1;IF((2*p0320-1)>0;1;0))*SQRT(SQRT((2/(pi()*0.140012289)+LN(1-(2*p0320-1)^2)/2)^2-LN(1-(2*p0320-1)^2)/0.140012289)-(2/(pi()*0.140012289)+LN(1-(2*p0320-1)^2)/2)))
- p0134: 0.272
- p1775: 0
- p2305: 8.4564e-7; = p2227*p2212
- p2407: 0; = p2234*p2197
- p0221: 19.809
- p0893: 0.997836; = 1000*(p0890+p0892)*p0001*p0003*p0004/(p0818*p0002)
- p0695: 5.763; = p0035*(1+p0563*p0167/100)
- p0733: 5.984; = p0073*(1+p0601*p0205/100)
- p1847: 0
- p1756: 0
- p2592: 0; = p2396*p1014
- p3356: 9.31627e8; = if(p1232=0;p3306+p3317+p3328+p3339+p3350;0)
- p1850: 0
- p3010: 0; = p2424*(p1079+p1081)
- p0753: 0
- p0812: 0; = if(p0807=480;0.095/0.34;0)
- p3421: 0.000164779; = p3364*p1239
- p2838: 2.86082e-7; = p2252*(p1020+p1022)
- p2275: 0.000460104; = p2230*p2221
- p2368: 1.96539e-7; = p2225*p2197
- p0692: 0
- p3262: 0.0787162
- p1195: 0.45
- p3026: 5.2248e-6; = p2245*p1023
- p3041: 3.66107e-6; = p2260*p1082
- p2972: 0; = p2386*(p1079+p1081)
- p2452: 2.46756e-5; = p2256*p1014
- p3254: 5.52853e8; = p1252*(p1287*(1-p3247)+p1290*(1-p3248)+p1291*(1-p3249)+p1292*(1-p3250))
- p1069: 3.18287e-5; = IF(p1012=0;p1055/(p1062*p0818);0)
- p0288: 0.5
- p1963f: 1.75958e-5; = p1647*p1851+p1648*p1852+p1649*p1853+p1650*p1854+p1651*p1855+p1652*p1856+p1653*p1857+p1654*p1858+p1655*p1859+p1656*p1860+p1657*p1861+p1658*p1862+p1659*p1863+p1660*p1864+p1661*p1865+p1662*p1866+p1663*p1867+p1664*p1868+p1665*p1869+p1666*p1870
- p2075: 0.072
- p0875: 0; = p0874*p0001*p0003/(p0818*p0002)
- p4893: 0; = p1926*p3482
- p2405: 0; = p2234*p2195
- p0407: 0; = SQRT(2)*(IF((2*p0275-1)<0;-1;IF((2*p0275-1)>0;1;0))*SQRT(SQRT((2/(pi()*0.140012289)+LN(1-(2*p0275-1)^2)/2)^2-LN(1-(2*p0275-1)^2)/0.140012289)-(2/(pi()*0.140012289)+LN(1-(2*p0275-1)^2)/2)))
- p3840: 0; = p1903*p3477
- p0251: 21.416
- p2501: 2.90156e-7; = p2305*p1073
- p3445: 0; = p3369*p1240
- p0471: 0; = SQRT(2)*(IF((2*p0339-1)<0;-1;IF((2*p0339-1)>0;1;0))*SQRT(SQRT((2/(pi()*0.140012289)+LN(1-(2*p0339-1)^2)/2)^2-LN(1-(2*p0339-1)^2)/0.140012289)-(2/(pi()*0.140012289)+LN(1-(2*p0339-1)^2)/2)))
- p0264: 29.436
- p4288: 2.66381e-8; = p1939*p3479
- p4821: 0; = p1854*p3482
- p2262: 0.000414957; = p2226*p2208
- p0480: 0; = SQRT(2)*(IF((2*p0348-1)<0;-1;IF((2*p0348-1)>0;1;0))*SQRT(SQRT((2/(pi()*0.140012289)+LN(1-(2*p0348-1)^2)/2)^2-LN(1-(2*p0348-1)^2)/0.140012289)-(2/(pi()*0.140012289)+LN(1-(2*p0348-1)^2)/2)))
- p3587: 1.86583e-7; = p1856*p3476
- p5132: 2.64236e-6; = p1963*p3483
- p2561: 5.63492e-5; = p2365*p1014
- p5282: 5.76241e-8; = p1903*p3484
- p2203: 0.0024996; = p1070-p2200-p2201-p2202
- p2449: 2.07982e-6; = p2253*p1014
- p3376: 0; = if(p1232=0;p3246*p3358/p0818;0)
- p1121: 0
- p3374: 0; = if(p1232=0;p3246*p3356/p0818;0)
- p1730: 0
- p3702: 0; = p1765*p3477
- p1636: 0
- p1925: 0
- p0855: 0.458705; = p0854*p0001*p0003/(p0818*p0002)
- p5234: 2.25207e-6; = p1855*p3484
- p2726: 6.82621e-5; = p2335*(p1019+p1021)
- p1168: 2.56365e-7; = p1164*p1167/p0818
- p2243: 0.000474313; = p2222*p2188
- p2441: 4.79137e-5; = p2245*p1014
- p2284: 0.000232588; = p2223*p2190
- p3272: 0.0398246
- p0981: 0; = p0978*p0001/(p0818*p0002)
- p0636: 0; = IF(p0372<0.5;-SQRT(p0007*EXP(p0504^2*p0008)-p0007);SQRT(p0007*EXP(p0504^2*p0008)-p0007))
- p2619: 0; = p2423*p1073
- p1749: 0
- p2053: 1.45647
- p0766: 120.125; = p0106*(1+p0634*p0238/100)
- p0769: 55.948; = p0109*(1+p0637*p0241/100)
- p1680: 0
- p3187: 0; = p2406*p1023
- p1165: 9.75771e-5; = p0801*p0001/(p0818*p0002)
- p0833: 5.88433e10; = p0830+p0832
- p0348: 0.5
- p3025: 4.56461e-6; = p2244*p1023
- p0843: 0.404158
- p1079: 0.0796; = IF(p1071=0;IF(p1073+p1078=1;0;IF(p1073+p1078+p1075>1;1-(p1073+p1078);p1075));0)
- p2939: 2.7926e-5; = p2353*(p1129+p1131)
- p1841: 0
- p2553: 5.82808e-6; = p2357*p1014
- p2596: 0; = p2400*p1014
- p0247: 11.817
- p0075: 19.737
- p1129: 0.14299; = if(p1121=0;IF(p1123+p1128=1;0;IF(p1123+p1128+p1125>1;1-(p1123+p1128);p1125));0)
- p2623: 0; = p2427*p1073
- p2023: 2.24
- p4559: 2.01851e-7; = p1798*p3481
- p2293: 0.00194129; = p2223*p2200
- p1943: 0
- p0073: 5.984
- p1668: 0
- p1114: 0.216028
- p3092: 9.23922e-5; = p2311*p1132
- p0094: 1512.94
- p1622: 0
- p0977: 0; = IF(p0687=0;IF(OR(p0686=0;p0688=0);0;p0686*1000*p0688/100);0)
- p5318: 1.26299e-8; = p1939*p3484
- p2404: 0; = p2234*p2193
- p2694: 3.56506e-5; = p2303*(p1078+p1080)
- p1180: 1.91167e-8; = p1176*p1179/p0818
- p0223: 15.54
- p0237: 9.444
- p1227: 9.75771e-5; = IF(p1221=0;0;p1226*p0001/(p0818*p0002))
- p2242: 3.7077e-5; = p2222*p2187
- p2604: 0; = p2408*p1014
- p0391: 0.5
- p2338: 0.000104453; = p2228*p2206
- p0539: 0; = IF(p0275<0.5;-SQRT(p0007*EXP(p0407^2*p0008)-p0007);SQRT(p0007*EXP(p0407^2*p0008)-p0007))
- p0080: 98.916
- p1948: 0
- p0794: 0.272; = p0134*(1+p0662*p0266/100)
- p1091: 7.13628e-6; = IF(p1071=0;p1085*p0001/(p0818*p0002);0)
- p3549: 1.24388e-8; = p1818*p3476
- p2586: 0; = p2390*p1123
- p1447: 2853
- p1275: 0; = p1271*p1252/p0818
- p1278: 0.220831
- p0922: 0; = p0677*1000/p0801
- p4778: 0; = p1811*p3482
- p3316: 0.860819; = if(and(p1232=0;p3253<>0);1-(p3312+p3313+p3314+p3315);0)
- p1344: 962422; = IF(p1318=0;p1327*p0801;0)
- p1216: 0.224397
- p2114: 0.832356
- p4906: 0; = p1939*p3482
- p1639: 0
- p1089: 3.07613e-5; = IF(p1071=0;p1083*p0001/(p0818*p0002);0)
- p0291: 0.5
- p4493: 0; = p1938*p3480
- p3573: 9.67465e-9; = p1842*p3476
- p2628: 0.000959842; = p2237*(p1019+p1021)
- p1893: 0
- p2221: 0.00100704; = p1155-p2220
- p1979: 1.38718e8; = p0973
- p1063: 0.455
- p1859: 0
- p2599: 0; = p2403*p1014
- p0197: 17.419
- p4977: 3.60317e-9; = p1804*p3483
- p2886: 8.81556e-5; = p2300*(p1079+p1081)
- p1907: 0
- p0595: 0; = IF(p0331<0.5;-SQRT(p0007*EXP(p0463^2*p0008)-p0007);SQRT(p0007*EXP(p0463^2*p0008)-p0007))
- p0417: 0; = SQRT(2)*(IF((2*p0285-1)<0;-1;IF((2*p0285-1)>0;1;0))*SQRT(SQRT((2/(pi()*0.140012289)+LN(1-(2*p0285-1)^2)/2)^2-LN(1-(2*p0285-1)^2)/0.140012289)-(2/(pi()*0.140012289)+LN(1-(2*p0285-1)^2)/2)))
- p2713: 1.01009e-5; = p2322*(p1019+p1021)
- p3206: 0; = p2425*p1082
- p3169: 0; = p2388*p1082
- p2741: 0.00045067; = p2350*(p1128+p1130)
- p3327: 0.778796; = if(and(p1232=0;p3255<>0);1-(p3323+p3324+p3325+p3326);0)
- p3465: 6.03949e-6; = p3370*p1241
- p1053: 2.46877e7; = IF(p1012=0;p1046*p1036;0)
- p3298: 1; = if(p1283+p1284+p1285+p1286=0;0;p1283/(p1283+p1284+p1285+p1286))
- p1002: 0; = p0996*p0888
- p2391: 0; = p2233*p2220
- p1078: 0.41176; = IF(p1071=0;IF(p1073=1;0;IF(p1073+p1074>1;1-p1073;p1074));0)
- p3268: 0.0232481
- p2849: 1.49368e-5; = p2263*(p1079+p1081)
- p0198: 23.687
- p3730: 0; = p1793*p3477
- p1703: 0
- p4167: 2.99679e-8; = p1818*p3479
- p3105: 1.76277e-7; = p2324*p1023
- p2511: 7.15975e-5; = p2315*p1014
- p1259: 0.20998; = if(p1232>0;0;p0730/100)
- p0998: 0; = if(p0888=0;0;if((p0699*p0698*1000*p0700/100)/p0888>1;1;(p0699*p0698*1000*p0700/100)/p0888))
- p3214: 0.376406; = p1222*40.078/100.0869
- p1700: 0
- p0543: 0; = IF(p0279<0.5;-SQRT(p0007*EXP(p0411^2*p0008)-p0007);SQRT(p0007*EXP(p0411^2*p0008)-p0007))
- p2109: 0.826583
- p4603: 6.72837e-8; = p1842*p3481
- p2318: 2.36275e-5; = p2224*p2185
- p3428: 0.000172115; = p3371*p1239
- p2705: 0.000185665; = p2314*(p1128+p1130)
- p0405: 0; = SQRT(2)*(IF((2*p0273-1)<0;-1;IF((2*p0273-1)>0;1;0))*SQRT(SQRT((2/(pi()*0.140012289)+LN(1-(2*p0273-1)^2)/2)^2-LN(1-(2*p0273-1)^2)/0.140012289)-(2/(pi()*0.140012289)+LN(1-(2*p0273-1)^2)/2)))
- p0299: 0.5
- p2912: 2.15217e-5; = p2326*(p1020+p1022)
- p5275: 1.73662e-8; = p1896*p3484
- p3056: 2.76614e-5; = p2275*p1132
- p3414: 0; = p3376*p1238
- p2777: 0; = p2386*(p1078+p1080)
- p1927: 1.02028e-5; = p1519*1000/p0818
- p0900: 0.625525; = p0899/p0818
- p1993: 400
- p0335: 0.5
- p1154: 0.0106034; = if(p1152*p0818=0;0;p1150/(p1152*p0818))
- p0308: 0.5
- p0026: 200.323
- p1791: 0
- p1901: 0
- p2549: 5.25144e-5; = p2353*p1123
- p3353: 1.56189e7; = if(and(p1232=0;p3256<>0);p3256*(p3276-p3348)/p3349;0)
- p0064: 15.378
- p0241: 13.319
- p3088: 5.42238e-7; = p2307*p1082
- p1274: 0; = p1270*p1252/p0818
- p3147: 1.31718e-6; = p2366*p1023
- p0818: 6.67464e10; = p0806*p0807
- p1884: 0
- p0293: 0.5
- p1973: 0; = if(p0807=480;p1968*p0001/(p0818*p0002);0)
- p5029: 1.3898e-7; = p1856*p3483
- p0268: 1.836
- p0248: 6.48
- p0454: 0; = SQRT(2)*(IF((2*p0322-1)<0;-1;IF((2*p0322-1)>0;1;0))*SQRT(SQRT((2/(pi()*0.140012289)+LN(1-(2*p0322-1)^2)/2)^2-LN(1-(2*p0322-1)^2)/0.140012289)-(2/(pi()*0.140012289)+LN(1-(2*p0322-1)^2)/2)))
- p1906: 0
- p2755: 1.86309e-5; = p2364*(p1019+p1021)
- p3199: 0; = p2418*p1082
- p2828: 3.49302e-6; = p2242*(p1020+p1022)
- p2844: 4.57698e-5; = p2258*(p1079+p1081)
- p2039: 3.98186e-7; = p2015*p2037*p2038/(p0818*1000)
- p1747: 0
- p0071: 42.824
- p2256: 7.92103e-5; = p2222*p2202
- p2068: 0.153529
- p3183: 0; = p2402*p1023
- p2507: 0.000413229; = p2311*p1123
- p1600: 0.895638
- p2512: 1.57165e-5; = p2316*p1014
- p1656: 0
- p0535: 0; = SQRT(2)*(IF((2*p0403-1)<0;-1;IF((2*p0403-1)>0;1;0))*SQRT(SQRT((2/(pi()*0.140012289)+LN(1-(2*p0403-1)^2)/2)^2-LN(1-(2*p0403-1)^2)/0.140012289)-(2/(pi()*0.140012289)+LN(1-(2*p0403-1)^2)/2)))
- p2704: 0.000106843; = p2313*(p1128+p1130)
- p4572: 2.16269e-7; = p1811*p3481
- p1929: 0
- p1974: 5.34669e-6; = p1969*p0001/(p0818*p0002)
- p5100: 3.50537e-7; = p1927*p3483
- p2727: 0.000198131; = p2336*(p1078+p1080)
- p2495: 4.57669e-5; = p2299*p1073
- p1579: 0
- p1972: 0; = if(p0807=480;p1967*p0001/(p0818*p0002);0)
- p2004: 30
- p0328: 0.5
- p1790: 0
- p3196: 0; = p2415*p1082
- p3407: 0.000155777; = p3369*p1238
- p2818: 0; = p2427*(p1078+p1080)
- p3481: 0.320782; = if(p1328+p1330+p1332+p1334+p1336+p1338+p1340+p1342+p1344=0;0;p1338/(p1328+p1330+p1332+p1334+p1336+p1338+p1340+p1342+p1344))
- p1820: 5.81305e-6; = p1412*1000/p0818
- p0887: 3.4074; = 1000*p0886*p0001*p0003*p0004/(p0818*p0002)
- p1793: 1.60308e-6; = p1385*1000/p0818
- p2908: 1.69839e-6; = p2322*(p1020+p1022)
- p3130: 2.40587e-6; = p2349*p1082
- p1220: 0; = IF(p1218<0.5;-SQRT(p1214*EXP(p1219^2*p1215)-p1214);SQRT(p1214*EXP(p1219^2*p1215)-p1214))
- p0278: 0.5
- p2999: 0; = p2413*(p1020+p1022)
- p2689: 0.000228828; = p2298*(p1078+p1080)
- p3064: 6.90268e-6; = p2283*p1023
- p2865: 2.50897e-5; = p2279*(p1020+p1022)
- p4366: 0; = p1811*p3480
- p2670: 0.000149217; = p2279*(p1019+p1021)
- p0156: 13.02
- p3413: 0; = p3375*p1238
- p2184: 0.000140738; = p1051/p0818
- p1004: 0; = p1000*p0888
- p0410: 0; = SQRT(2)*(IF((2*p0278-1)<0;-1;IF((2*p0278-1)>0;1;0))*SQRT(SQRT((2/(pi()*0.140012289)+LN(1-(2*p0278-1)^2)/2)^2-LN(1-(2*p0278-1)^2)/0.140012289)-(2/(pi()*0.140012289)+LN(1-(2*p0278-1)^2)/2)))
- p2952: 3.65297e-6; = p2366*(p1020+p1022)
- p2127: 1.27257e-6; = p2015*p2055*p2089/(p0818*1000)
- p0862: 0.0282508; = p0674*1000/p0856
- p3018: 5.81935e-5; = p2237*p1023
- p3417: 0; = p3379*p1238
- p2883: 3.62523e-5; = p2297*(p1079+p1081)
- p2610: 0; = p2414*p1073
- p2413: 0; = p2234*p2203
- p1621: 0
- p3348: 0.00443516; = if(and(p1232=0;p3256<>0);p3276*p3289;0)
- p3747: 0; = p1810*p3477
- p2469: 0.000761951; = p2273*p1123
- p1297: 0.0118106
- p3383: 0.000143553; = p3364*p1234
- p3368: 0.00337079; = if(p1232=0;p3245*p3356/p0818;0)
- p3072: 1.55992e-7; = p2291*p1023
- p2784: 0; = p2393*(p1019+p1021)
- p1146: 0.883648
- p0870: 1.64959e6; = p0858*p0856
- p0438: 0; = SQRT(2)*(IF((2*p0306-1)<0;-1;IF((2*p0306-1)>0;1;0))*SQRT(SQRT((2/(pi()*0.140012289)+LN(1-(2*p0306-1)^2)/2)^2-LN(1-(2*p0306-1)^2)/0.140012289)-(2/(pi()*0.140012289)+LN(1-(2*p0306-1)^2)/2)))
- p1582: 0
- p1915: 0
- p3109: 1.64437e-5; = p2328*p1023
- p2067: 0.446471
- p3478: 0.434924; = if(p1328+p1330+p1332+p1334+p1336+p1338+p1340+p1342+p1344=0;0;p1332/(p1328+p1330+p1332+p1334+p1336+p1338+p1340+p1342+p1344))
- p1894: 0
- p3475: 0.0176266; = p3380*p1241
- p1185: 0.5
- p1363: 1660
- p2131: 1.48639e-7; = p2015*p2059*p2093/(p0818*1000)
- p1028: 662545; = IF(p1012=0;p1022*(p0704/100)*p0703*1000;0)
- p1045: 0.050076; = IF(p1012=0;IF(p1037+p1044=1;0;IF(p1037+p1044+p1039>1;1-(p1037+p1044);p1039));0)
- p0780: 47.671; = p0120*(1+p0648*p0252/100)
- p3426: 0.000131561; = p3369*p1239
- p0836: 2.69784e9; = p0831*p0835*p0801/(1-p0831)
- p3463: 0.000122393; = p3368*p1241
- p1898: 0
- p3422: 0.000540578; = p3365*p1239
- p1833: 0
- p2584: 0; = p2388*p1073
- p1963a: 3.99345e-5; = p1550*p1754+p1551*p1755+p1552*p1756+p1553*p1757+p1554*p1758+p1555*p1759+p1556*p1760+p1557*p1761+p1558*p1762+p1559*p1763+p1560*p1764+p1561*p1765+p1562*p1766+p1563*p1767+p1564*p1768+p1565*p1769+p1566*p1770+p1567*p1771+p1568*p1772
- p0863: 0.0221095; = p0675*1000/p0856
- p2522: 7.11648e-5; = p2326*p1014
- p2605: 0; = p2409*p1014
- p0053: 7.96
- p2899: 2.89345e-5; = p2313*(p1129+p1131)
- p0014: 206.231
- p1800: 0
- p2834: 0.000160415; = p2248*(p1020+p1022)
- p1897: 0
- p0789: 30.219; = p0129*(1+p0657*p0261/100)
- p3260: 0.0343561
- p2372: 5.84666e-5; = p2225*p2201
- p1312: 0.00131842; = IF(p1307+p1310+p1311=p1266;0;p1266-(p1307+p1310+p1311))
- p1989: 50
- p0974: 0.5
- p1887: 0
- p4070: 4.43744e-6; = p1927*p3478
- p1191: 0.5
- p0442: 0; = SQRT(2)*(IF((2*p0310-1)<0;-1;IF((2*p0310-1)>0;1;0))*SQRT(SQRT((2/(pi()*0.140012289)+LN(1-(2*p0310-1)^2)/2)^2-LN(1-(2*p0310-1)^2)/0.140012289)-(2/(pi()*0.140012289)+LN(1-(2*p0310-1)^2)/2)))
- p0503: 0; = SQRT(2)*(IF((2*p0371-1)<0;-1;IF((2*p0371-1)>0;1;0))*SQRT(SQRT((2/(pi()*0.140012289)+LN(1-(2*p0371-1)^2)/2)^2-LN(1-(2*p0371-1)^2)/0.140012289)-(2/(pi()*0.140012289)+LN(1-(2*p0371-1)^2)/2)))
- p3076: 4.06903e-6; = p2295*p1023
- p1810: 1.79785e-6; = p1402*1000/p0818
- p3241: 2.25189e-10; = p3234*p1188*p3236/p0818
- p2636: 8.61776e-5; = p2245*(p1019+p1021)
- p0978: 0
- p2917: 8.43859e-8; = p2331*(p1020+p1022)
- p2312: 0.00216567; = p2231*p2219
- p2112: 0.856281
- p3424: 0.000418936; = p3367*p1239
- p2476: 0.00012136; = p2280*p1014
- p1519: 681
- p2051: 1.39102e-5; = p2015*p2049*p2050/(p0818*1000)
- p1006: 0; = p1002*p0001*p0004/(p0818*p0002)
- p2453: 0.000282886; = p2257*p1014
- p2406: 0; = p2234*p2196
- p0372: 0.5
- p2160: 4.07431e-8; = p2015*p2084*p2122/(p0818*1000)
- p2409: 0; = p2234*p2199
- p0883: 0.0140276; = p0882*p0001*p0003/(p0818*p0002)
- p0873: 0.692106; = p0872*p0001*p0003/(p0818*p0002)
- p3451: 0; = p3375*p1240
- p2134: 1.04159e-6; = p2015*p2062*p2096/(p0818*1000)
- p3047: 2.32107e-8; = p2266*p1082
- p0420: 0; = SQRT(2)*(IF((2*p0288-1)<0;-1;IF((2*p0288-1)>0;1;0))*SQRT(SQRT((2/(pi()*0.140012289)+LN(1-(2*p0288-1)^2)/2)^2-LN(1-(2*p0288-1)^2)/0.140012289)-(2/(pi()*0.140012289)+LN(1-(2*p0288-1)^2)/2)))
- p1200: 0.84
- p2254: 0.00128374; = p2222*p2200
- p0680: 3482; = p0020*(1+p0548*p0152/100)
- p2514: 7.36043e-6; = p2318*p1014
- p1889: 3.28108e-6; = p1481*1000/p0818
- p2094: 0.922577
- p0565: 0; = IF(p0301<0.5;-SQRT(p0007*EXP(p0433^2*p0008)-p0007);SQRT(p0007*EXP(p0433^2*p0008)-p0007))
- p3095: 2.11404e-5; = p2314*p1132
- p0659: 0; = IF(p0395<0.5;-SQRT(p0007*EXP(p0527^2*p0008)-p0007);SQRT(p0007*EXP(p0527^2*p0008)-p0007))
- p1712: 0
- p0524: 0; = SQRT(2)*(IF((2*p0392-1)<0;-1;IF((2*p0392-1)>0;1;0))*SQRT(SQRT((2/(pi()*0.140012289)+LN(1-(2*p0392-1)^2)/2)^2-LN(1-(2*p0392-1)^2)/0.140012289)-(2/(pi()*0.140012289)+LN(1-(2*p0392-1)^2)/2)))
- p3401: 0.000489264; = p3363*p1238
- p3863: 0; = p1926*p3477
- p2901: 2.16525e-5; = p2315*(p1020+p1022)
- p1731: 0
- p0980: 0; = IF(p0977=0;0;p0977*p0001/(p0818*p0002))
- p0289: 0.5
- p0448: 0; = SQRT(2)*(IF((2*p0316-1)<0;-1;IF((2*p0316-1)>0;1;0))*SQRT(SQRT((2/(pi()*0.140012289)+LN(1-(2*p0316-1)^2)/2)^2-LN(1-(2*p0316-1)^2)/0.140012289)-(2/(pi()*0.140012289)+LN(1-(2*p0316-1)^2)/2)))
- p4438: 0; = p1883*p3480
- p1685: 0.491852
- p2091: 0.374844
- p1044: 0.00993849; = IF(p1012=0;IF(p1037=1;0;IF(p1037+p1038>1;1-p1037;p1038));0)
- p0042: 7297.92
- p2387: 0; = p2229*p2216
- p0823: 0.35
- p2302: 0.000148628; = p2227*p2209
- p1865: 0
- p1824: 0
- p3385: 0.00289055; = p3366*p1234
- p2113: 0.832356
- p1803: 0
- p2799: 0; = p2408*(p1019+p1021)
- p1780: 0
- p1222: 0.94
- p2962: 0; = p2376*(p1079+p1081)
- p1330: 0; = p1320*p0801
- p2723: 9.65004e-5; = p2332*(p1019+p1021)
- p1316: 0.000685182; = p1312*p1252/p0818
- p0195: 0
- p1594: 0.735896
- p2574: 0; = p2378*p1073
- p1616: 0.57071
- p3355: 1.10046e7; = if(and(p1232=0;p3256<>0);p3256-(p3350+p3351+p3352+p3353+p3354);0)
- p2746: 2.23828e-5; = p2355*(p1019+p1021)
- p0868: 0.0221095; = IF(p0858+p0864+p0865+p0866+p0867=1;0;IF(p0858+p0864+p0865+p0866+p0867+p0863>1;1-(p0858+p0864+p0865+p0866+p0867);p0863))
- p2910: 4.88874e-7; = p2324*(p1020+p1022)
- p0273: 0.5
- p2268: 3.14901e-5; = p2226*p2214
- p1716: 0
- p5062: 1.12728e-7; = p1889*p3483
- p2591: 0; = p2395*p1014
- p1674: 0
- p1234: 0.27479; = if(p1232>0;0;p0726/100)
- p2643: 1.70143e-6; = p2252*(p1019+p1021)
- p2092: 0.54529
- p2319: 3.45627e-5; = p2224*p2186
- p0402: 0.5
- p1690: 0
- p2760: 1.80746e-7; = p2369*(p1019+p1021)
- p0010: 1649.59
- p3149: 6.67644e-9; = p2368*p1023
- p2301: 0.00032867; = p2227*p2208
- p0734: 0
- p2663: 0.00106172; = p2272*(p1128+p1130)
- p2864: 7.28411e-6; = p2278*(p1020+p1022)
- p2787: 0; = p2396*(p1019+p1021)
- p5306: 5.37562e-7; = p1927*p3484
- p0969: 7.16756e7; = p0966*p0683*p0682*1000
- p0533: 0; = SQRT(2)*(IF((2*p0401-1)<0;-1;IF((2*p0401-1)>0;1;0))*SQRT(SQRT((2/(pi()*0.140012289)+LN(1-(2*p0401-1)^2)/2)^2-LN(1-(2*p0401-1)^2)/0.140012289)-(2/(pi()*0.140012289)+LN(1-(2*p0401-1)^2)/2)))
- p3441: 0; = p3365*p1240
- p2431: 0; = p2236*p2221
- p1554: 0
- p0208: 13.743
- p2542: 6.70182e-6; = p2346*p1073
- p1609: 0
- p2629: 0.000210697; = p2238*(p1019+p1021)
- p0481: 0; = SQRT(2)*(IF((2*p0349-1)<0;-1;IF((2*p0349-1)>0;1;0))*SQRT(SQRT((2/(pi()*0.140012289)+LN(1-(2*p0349-1)^2)/2)^2-LN(1-(2*p0349-1)^2)/0.140012289)-(2/(pi()*0.140012289)+LN(1-(2*p0349-1)^2)/2)))
- p2580: 0; = p2384*p1073
- p1015: 0.341; = IF(p1012=0;p0706/100;0)
- p0702: 7297.92; = p0042*(1+p0570*p0174/100)
- p2208: 0.00100101; = p1110/p0818
- p1885: 0
- p1856: 4.04516e-6; = p1448*1000/p0818
- p2637: 2.16714e-5; = p2246*(p1019+p1021)
- p2993: 0; = p2407*(p1020+p1022)
- p2609: 0; = p2413*p1014
- p3174: 0; = p2393*p1023
- p3123: 1.09251e-6; = p2342*p1082
- p2950: 3.13264e-6; = p2364*(p1020+p1022)
- p5262: 9.86714e-8; = p1883*p3484
- p0864: 0.709292; = IF(p0858=1;0;IF(p0858+p0859>1;1-p0858;p0859))
- p1085: 533884; = IF(p1071=0;p1079*(p0710/100)*p0703*1000;0)
- p2145: 1.89322e-7; = p2015*p2073*p2107/(p0818*1000)
- p1968: 0; = if(p0807=480;p0802*p0811;0)
- p2459: 6.43859e-5; = p2263*p1073
- p0401: 0.5
- p0725: 15.45; = p0065*(1+p0593*p0197/100)
- p0022: 7297.88
- p1190: 4.03314e-8; = p1188/p0818
- p1634: 0
- p1127: 0; = if(p1121=0;p0721/100;0)
- p2436: 5.48619e-5; = p2240*p1014
- p2560: 1.03585e-5; = p2364*p1014
- p0174: 0
- p0139: 67.341
- p1735: 0.749667
- p1740: 0
- p2209: 0.000452667; = 14.0067*p2208/30.973762
- p2135: 4.58257e-7; = p2015*p2063*p2097/(p0818*1000)
- p3289: 0.05
- p3468: 1.53549e-5; = p3373*p1241
- p2352: 0.000112388; = p2232*p2220
- p4305: 3.5462e-7; = p1956*p3479
- p0806: 1.1919e9
- p2276: 0.00259056; = p2223*p2182
- p1873: 0
- p1681: 0
- p1946: 0
- p1709: 0
- p3051: 4.32785e-7; = p2270*p1082
- p0687: 5.763; = p0027*(1+p0555*p0159/100)
- p3442: 0; = p3366*p1240
- p3431: 0; = p3374*p1239
- p3347: 0.00107264; = if(and(p1232=0;p3256<>0);p3275*p3289;0)
- p2852: 8.49849e-8; = p2266*(p1079+p1081)
- p3551: 2.68126e-7; = p1820*p3476
- p3203: 0; = p2422*p1082
- p2414: 0; = p2235*p2204
- p1575: 0
- p3124: 1.43069e-5; = p2343*p1082
- p0821: 1.00219
- p2798: 0; = p2407*(p1019+p1021)
- p1313: 0.00372444; = p1307*p1252/p0818
- p0845: 0.5
- p0795: 134.4; = p0135*(1+p0663*p0267/100)
- p1051: 9.39373e6; = IF(p1012=0;p1044*p1036;0)
- p1576: 0
- p0375: 0.5
- p3334: 0.120868; = IF(or(p3254=0;p1232>0);0;p3269*p3277*(p3300*p3292+(1-p3300)*p3296))
- p2048: 5.68633e-15; = p2015*p2046/(p0818*1000000000000)
- p2576: 0; = p2380*p1073
- p1551: 0
- p1996: 30
- p3266: 0.0545989
- p2814: 0; = p2423*(p1078+p1080)
- p3314: 0.00107264; = if(and(p1232=0;p3253<>0);p3263*p3289;0)
- p3399: 0.133396; = p3380*p1234
- p2326: 0.000228444; = p2224*p2193
- p2648: 0.0005088; = p2257*(p1019+p1021)
- p2416: 0; = p2235*p2206
- p0057: 26.889
- p2638: 0.000175379; = p2247*(p1019+p1021)
- p2193: 0.00468696; = p1054/p0818
- p0920: 0; = p0676*1000/p0801
- p3961: 1.17289e-7; = p1818*p3478
- p1962: 0; = p1960*1000/p0818
- p2139: 1.57505e-7; = p2015*p2067*p2101/(p0818*1000)
- p1233: 0; = p1232*p0001/(p0818*p0002)
- p0447: 0; = SQRT(2)*(IF((2*p0315-1)<0;-1;IF((2*p0315-1)>0;1;0))*SQRT(SQRT((2/(pi()*0.140012289)+LN(1-(2*p0315-1)^2)/2)^2-LN(1-(2*p0315-1)^2)/0.140012289)-(2/(pi()*0.140012289)+LN(1-(2*p0315-1)^2)/2)))
- p3039: 1.25004e-5; = p2258*p1082
- p3048: 2.42711e-7; = p2267*p1082
- p3326: 0.0011624; = if(and(p1232=0;p3255<>0);p3268*p3289;0)
- p5197: 1.42087e-8; = p1818*p3484
- p3027: 1.3139e-6; = p2246*p1023
- p2797: 0; = p2406*(p1019+p1021)
- p2265: 0.001061; = p2226*p2211
- p1187: 0.000368763
- p2403: 0; = p2234*p2192
- p2444: 0.000530435; = p2248*p1014
- p3273: 0.753577
- p0301: 0.5
- p0899: 4.17515e10; = p0825*p0896+p0827*p0897+(p0830+p0895)*p0824*p0898
- p0507: 0; = SQRT(2)*(IF((2*p0375-1)<0;-1;IF((2*p0375-1)>0;1;0))*SQRT(SQRT((2/(pi()*0.140012289)+LN(1-(2*p0375-1)^2)/2)^2-LN(1-(2*p0375-1)^2)/0.140012289)-(2/(pi()*0.140012289)+LN(1-(2*p0375-1)^2)/2)))
- p1774: 0
- p2120: 0.51828
- p3377: 0; = if(p1232=0;p3246*p3359/p0818;0)
- p1135: 850331; = if(p1121=0;p1129*(p0716/100)*p0703*1000;0)
- p1061: 0.3
- p2998: 0; = p2412*(p1020+p1022)
- p0690: 0
- p1623: 0
- p0959: 0; = if(and(p0683>0;or(p0807=480;p0807=32;p0807=1;and(p0807=60;p0901<0.03)));p0935;0)
- p1569: 0
- p1488: 22
- p4203: 2.71376e-7; = p1854*p3479
- p3202: 0; = p2421*p1082
- p0582: 0; = IF(p0318<0.5;-SQRT(p0007*EXP(p0450^2*p0008)-p0007);SQRT(p0007*EXP(p0450^2*p0008)-p0007))
- p0444: 0; = SQRT(2)*(IF((2*p0312-1)<0;-1;IF((2*p0312-1)>0;1;0))*SQRT(SQRT((2/(pi()*0.140012289)+LN(1-(2*p0312-1)^2)/2)^2-LN(1-(2*p0312-1)^2)/0.140012289)-(2/(pi()*0.140012289)+LN(1-(2*p0312-1)^2)/2)))
- p0377: 0.5
- p2334: 1.06271e-5; = p2224*p2202
- p3217: 0.00206153; = p3213*p1228
- p0044: 96.365
- p3191: 0; = p2410*p1023
- p2016: 0.000314436; = (p2014-p2015)/(p0818)
- p3265: 0.696292
- p2830: 1.26592e-5; = p2244*(p1020+p1022)
- p2072: 0.134
- p2817: 0; = p2426*(p1078+p1080)
- p1701: 0
- p0802: 6.85e6
- p0414: 0; = SQRT(2)*(IF((2*p0282-1)<0;-1;IF((2*p0282-1)>0;1;0))*SQRT(SQRT((2/(pi()*0.140012289)+LN(1-(2*p0282-1)^2)/2)^2-LN(1-(2*p0282-1)^2)/0.140012289)-(2/(pi()*0.140012289)+LN(1-(2*p0282-1)^2)/2)))
- p3896: 0; = p1963*p3477
- p3023: 1.2595e-6; = p2242*p1023
- p0696: 0
- p2105: 0.888194
- p2634: 0.000265757; = p2243*(p1019+p1021)
- p2331: 8.95721e-7; = p2224*p2199
- p2379: 0; = p2229*p2208
- p2924: 8.31447e-6; = p2338*(p1079+p1081)
- p0403: 0.5
- p0131: 75.85
- p0921: 0.305147; = p0679*1000/p0801
- p1334: 2.02987e6; = p1322*p0801
- p0285: 0.5
- p0070: 20.998
- p3427: 5.24642e-5; = p3370*p1239
- p3477: 0; = if(p1328+p1330+p1332+p1334+p1336+p1338+p1340+p1342+p1344=0;0;p1330/(p1328+p1330+p1332+p1334+p1336+p1338+p1340+p1342+p1344))
- p1702: 0
- p0902: 0.0130121
- p0935: 1.7274e-5; = p0929*p0001/(p0818*p0002)
- p2162: 9.27085e-9; = p2015*p2086*p2124/(p0818*1000)
- p2907: 5.99507e-6; = p2321*(p1020+p1022)
- p2934: 9.82874e-7; = p2348*(p1079+p1081)
- p0580: 0; = IF(p0316<0.5;-SQRT(p0007*EXP(p0448^2*p0008)-p0007);SQRT(p0007*EXP(p0448^2*p0008)-p0007))
- p3022: 8.75126e-6; = p2241*p1023
- p2715: 2.90751e-6; = p2324*(p1019+p1021)
- p2445: 0.000113705; = p2249*p1014
- p1016: 0; = IF(p1012=0;p0707/100;0)
- p2706: 0.000128775; = p2315*(p1019+p1021)
- p1300: 0.0308577; = IF(p1297=p1265;0;IF(p1297+p1298>p1265;p1265-p1297;p1298))
- p2758: 0.000214757; = p2367*(p1019+p1021)
- p5190: 3.55217e-8; = p1811*p3484
- p0386: 0.5
- p3246: 0; = IF(p3244+p3245=1;0;1-(p3244+p3245))
- p1169: 0.000748668
- p0944: 0; = if(and(p0683=0;p0950=0);p0938;0)
- p3251: 3.24019e10; = p1252-(p3252+p3253+p3254+p3255+p3256)
- p2616: 0; = p2420*p1073
- p2455: 0.000178436; = p2259*p1073
- p3087: 1.92241e-7; = p2306*p1082
- p4894: 0; = p1927*p3482
- p1118: 0.000478424; = IF(p1071=0;p1108/(p1113*p0818);0)
- p2419: 0; = p2235*p2209
- p2896: 1.12489e-5; = p2310*(p1079+p1081)
- p2296: 0.00137322; = p2223*p2203
- p0622: 0; = IF(p0358<0.5;-SQRT(p0007*EXP(p0490^2*p0008)-p0007);SQRT(p0007*EXP(p0490^2*p0008)-p0007))
- p2583: 0; = p2387*p1073
- p3194: 0; = p2413*p1023
- p1688: 0
- p1108: 3.20534e6; = IF(p1071=0;p1105*p1102*p1095;0)
- p3864: 0; = p1927*p3477
- p3173: 0; = p2392*p1132
- p2093: 0.260958
- p2166: 0.296287; = p2165*p0824
- p0986: 0; = IF(p0982+p0985=1;0;IF(p0982+p0985+p0984>1;1-(p0982+p0985);p0984))
- p3408: 6.21214e-5; = p3370*p1238
- p2515: 1.0767e-5; = p2319*p1014
- p0181: 33.679
- p1065: 0.000625501; = IF(p1012=0;p1051/(p1058*p0818);0)
- p3013: 0; = p2427*(p1079+p1081)
- p2701: 7.85076e-5; = p2310*(p1078+p1080)
- p1145: 4.00462e8; = if(p1121=0;p0799*p0702*1000*p0800/100;0)
- p1286: 0; = p1282*p1252/p0818
- p0445: 0; = SQRT(2)*(IF((2*p0313-1)<0;-1;IF((2*p0313-1)>0;1;0))*SQRT(SQRT((2/(pi()*0.140012289)+LN(1-(2*p0313-1)^2)/2)^2-LN(1-(2*p0313-1)^2)/0.140012289)-(2/(pi()*0.140012289)+LN(1-(2*p0313-1)^2)/2)))
- p2005: 1.4368e7; = p1963*p0818+p1959*1000+p1170+p1176+p1182
- p0520: 0; = SQRT(2)*(IF((2*p0388-1)<0;-1;IF((2*p0388-1)>0;1;0))*SQRT(SQRT((2/(pi()*0.140012289)+LN(1-(2*p0388-1)^2)/2)^2-LN(1-(2*p0388-1)^2)/0.140012289)-(2/(pi()*0.140012289)+LN(1-(2*p0388-1)^2)/2)))
- p0800: 81.486; = p0140*(1+p0668*p0272/100)
- p2527: 2.79035e-7; = p2331*p1014
- p3343: 2.49859e8; = if(and(p1232=0;p3254<>0);IF((p3339+p3340+p3341+p3342)+(p3254*(p3269*(1-p3277))/p3338)>p3254;p3254-(p3339+p3340+p3341+p3342);p3254*(p3269*(1-p3277))/p3338);0)
- p0756: 0
- p0045: 31.152
- p2252: 3.03664e-6; = p2222*p2198
- p2873: 0.000242581; = p2287*(p1020+p1022)
- p1829: 0
- p2257: 0.000908084; = p2222*p2203
- p2146: 1.17506e-8; = p2015*p2074*p2108/(p0818*1000)
- p0011: 5177.83
- p2212: 2.57551e-6; = p1106/p0818
- p0933: 298118; = p0801*p0927
- p1855: 4.27439e-5; = p1447*1000/p0818
- p2737: 1.08508e-5; = p2346*(p1078+p1080)
- p4688: 3.27287e-6; = p1927*p3481
- p0021: 188.423
- p0007: 14; = p0006-1
- p1402: 120
- p2921: 1.14777e-5; = p2335*(p1020+p1022)
- p3107: 7.76023e-6; = p2326*p1023
- p2897: 0.000219747; = p2311*(p1129+p1131)
- p3411: 0.000157938; = p3373*p1238
- p0549: 0; = IF(p0285<0.5;-SQRT(p0007*EXP(p0417^2*p0008)-p0007);SQRT(p0007*EXP(p0417^2*p0008)-p0007))
- p2868: 6.75734e-5; = p2282*(p1020+p1022)
- p2234: 0; = 1-(p2222+p2223+p2224+p2225)
- p2710: 1.93655e-5; = p2319*(p1019+p1021)
- p3044: 4.07948e-6; = p2263*p1082
- p2267: 1.11642e-5; = p2226*p2213
- p1095: 3.84591e8; = IF(p1071=0;p0797*p0702*1000*p0798/100;0)
- p1963h: 9.84317e-7; = p1686*p1890+p1687*p1891+p1688*p1892+p1689*p1893+p1690*p1894+p1691*p1895+p1692*p1896+p1693*p1897+p1694*p1898+p1695*p1899+p1696*p1900+p1697*p1901+p1698*p1902+p1699*p1903+p1700*p1904+p1701*p1905+p1702*p1906+p1703*p1907+p1704*p1908+p1705*p1909
- p1254: 0.51567; = if(p1232>0;0;p0736/100)
- p2739: 6.85962e-6; = p2348*(p1078+p1080)
- p2640: 0.00020451; = p2249*(p1019+p1021)
- p2997: 0; = p2411*(p1020+p1022)
- p0373: 0.5
- p2040: 1.19
- p0813: 0; = if(p0807=480;1.56521739130435;0)
- p2055: 5.59471
- p2752: 7.99805e-6; = p2361*(p1019+p1021)
- p2562: 1.20791e-5; = p2366*p1014
- p1751: 0
- p2151: 9.46611e-9; = p2015*p2079*p2113/(p0818*1000)
- p2847: 0.0001113; = p2261*(p1079+p1081)
- p2672: 3.14151e-5; = p2281*(p1019+p1021)
- p3349: 0.82529; = if(and(p1232=0;p3256<>0);1-(p3345+p3346+p3347+p3348);0)
- p1978: 152
- p1891: 0
- p2983: 0; = p2397*(p1020+p1022)
- p1175: 0.000349581
- p4410: 0; = p1855*p3480
- p2800: 0; = p2409*(p1019+p1021)
- p0234: 25.306
- p2124: 0.263965
- p3049: 6.84595e-7; = p2268*p1082
- p1644: 0
- p1663: 0
- p0238: 4.721
- p0518: 0; = SQRT(2)*(IF((2*p0386-1)<0;-1;IF((2*p0386-1)>0;1;0))*SQRT(SQRT((2/(pi()*0.140012289)+LN(1-(2*p0386-1)^2)/2)^2-LN(1-(2*p0386-1)^2)/0.140012289)-(2/(pi()*0.140012289)+LN(1-(2*p0386-1)^2)/2)))
- p3177: 0; = p2396*p1023
- p2165: 0.460124; = (p0833-p2014)/p0818-p0839
- p1448: 270
- p0640: 0; = IF(p0376<0.5;-SQRT(p0007*EXP(p0508^2*p0008)-p0007);SQRT(p0007*EXP(p0508^2*p0008)-p0007))
- p0383: 0.5
- p2518: 5.616e-6; = p2322*p1014
- p2358: 2.73672e-5; = p2225*p2186
- p0384: 0.5
- p5317: 3.39429e-8; = p1938*p3484
- p0176: 1.836
- p4375: 0; = p1820*p3480
- p1871: 0
- p1201: 0.65
- p4984: 2.31633e-8; = p1811*p3483
- p2468: 0.000540694; = p2272*p1123
- p3229: 5.1273e-7; = p1164/p0818
- p0787: 39.892; = p0127*(1+p0655*p0259/100)
- p3346: 0.00859625; = if(and(p1232=0;p3256<>0);p3274*(p3281*(p3285*p1256+p3286*(p1253+p1257)+p1258*p3288));0)
- p1892: 0
- p2889: 5.10816e-6; = p2303*(p1079+p1081)
- p2042: 0.07
- p0786: 0
- p2323: 2.06351e-5; = p2224*p2190
- p1574: 0
- p1126: 0; = if(p1121=0;p0720/100;0)
- p2341: 0.00011639; = p2228*p2209
- p0525: 0; = SQRT(2)*(IF((2*p0393-1)<0;-1;IF((2*p0393-1)>0;1;0))*SQRT(SQRT((2/(pi()*0.140012289)+LN(1-(2*p0393-1)^2)/2)^2-LN(1-(2*p0393-1)^2)/0.140012289)-(2/(pi()*0.140012289)+LN(1-(2*p0393-1)^2)/2)))
- p2577: 0; = p2381*p1073
- p2044: 2.53348e-8; = p2015*p2042*p2043/(p0818*1000)
- p0419: 0; = SQRT(2)*(IF((2*p0287-1)<0;-1;IF((2*p0287-1)>0;1;0))*SQRT(SQRT((2/(pi()*0.140012289)+LN(1-(2*p0287-1)^2)/2)^2-LN(1-(2*p0287-1)^2)/0.140012289)-(2/(pi()*0.140012289)+LN(1-(2*p0287-1)^2)/2)))
- p0740: 98.916; = p0080*(1+p0608*p0212/100)
- p1074: 0.41176; = IF(p1071=0;p0712/100;0)
- p2277: 0.000568659; = p2223*p2183
- p2064: 0.676706
- p1944: 0
- p2874: 5.20002e-5; = p2288*(p1020+p1022)
- p1012: 0
- p2888: 1.18308e-5; = p2302*(p1079+p1081)
- p0185: 41.186
- p1963j: 6.88582e-7; = p1725*p1929+p1726*p1930+p1727*p1931+p1728*p1932+p1729*p1933+p1730*p1934+p1731*p1935+p1732*p1936+p1733*p1937+p1734*p1938+p1735*p1939+p1736*p1940+p1737*p1941+p1738*p1942+p1739*p1943+p1740*p1944+p1741*p1945+p1742*p1946+p1743*p1947
- p1160: 0.0349779; = (p1156+p1158)*p1159
- p1963k: 2.01475e-6; = p1744*p1948+p1745*p1949+p1746*p1950+p1747*p1951+p1748*p1952+p1749*p1953+p1750*p1954+p1751*p1955+p1752*p1956+p1753*p1957+p1961*p1962
- p2772: 0; = p2381*(p1078+p1080)
- p2678: 0.00144272; = p2287*(p1019+p1021)
- p1530: 43
- p1302: 0.00217279; = IF(p1297+p1300+p1301=p1262;0;p1262-(p1297+p1300+p1301))
- p0913: 0.0151931
- p2295: 0.000119783; = p2223*p2202
- p0655: 0; = IF(p0391<0.5;-SQRT(p0007*EXP(p0523^2*p0008)-p0007);SQRT(p0007*EXP(p0523^2*p0008)-p0007))
- p2677: 0.000265212; = p2286*(p1019+p1021)
- p2748: 1.04824e-5; = p2357*(p1019+p1021)
- p2337: 0.00032256; = p2228*p2205
- p1578: 0
- p2167: 0.135913; = p2166*(p0898)
- p0327: 0.5
- p1228: 0.0182756; = IF(p1221=0;0;p0801*p1212*2000/(p1222+p1221*p1225)/p0818)
- p2493: 0.000156267; = p2297*p1073
- p4650: 1.05251e-6; = p1889*p3481
- p3096: 7.80742e-6; = p2315*p1023
- p0255: 9.726
- p1323: 0; = IF(((p0745*1000*p0750/100)+(p0754*1000*p0759/100))/p0801<0;0;((p0745*1000*p0750/100)+(p0754*1000*p0759/100))/p0801)
- p2795: 0; = p2404*(p1019+p1021)
- p3437: 0.15312; = p3380*p1239
- p3081: 2.40767e-5; = p2300*p1082
- p2793: 0; = p2402*(p1019+p1021)
- p2079: 0.02
- p2804: 0; = p2413*(p1019+p1021)
- p0463: 0; = SQRT(2)*(IF((2*p0331-1)<0;-1;IF((2*p0331-1)>0;1;0))*SQRT(SQRT((2/(pi()*0.140012289)+LN(1-(2*p0331-1)^2)/2)^2-LN(1-(2*p0331-1)^2)/0.140012289)-(2/(pi()*0.140012289)+LN(1-(2*p0331-1)^2)/2)))
- p2204: 0.00138707; = p1109/p0818
- p1144: 4.77888e-6; = if(p1121=0;p1138*p0001/(p0818*p0002);0)
- p1217: 16.7773
- p2354: 0.000181984; = p2225*p2182
- p3104: 7.00974e-7; = p2323*p1023
- p3261: 0.908439
- p2374: 9.64675e-5; = p2225*p2203
- p1033: 2.06149e-5; = IF(p1012=0;p1027*p0001/(p0818*p0002);0)
- p0553: 0; = IF(p0289<0.5;-SQRT(p0007*EXP(p0421^2*p0008)-p0007);SQRT(p0007*EXP(p0421^2*p0008)-p0007))
- p3312: 0.0974301; = if(and(p1232=0;p3253<>0);p3261*p3277*(p3298*p3290+(1-p3298)*p3294);0)
- p2178: 0.0690604; = (p0895*p0831/(1-p0831))/(p0818)
- p0368: 0.5
- p1245: 0; = if(p1232>0;0;p1240*(p0725/100)*p0723*1000)
- p1684: 0
- p1296: 0; = p1292*p1252/p0818
- p0949: 0; = if(and(p0683=0;or(p0807=480;p0807=32;p0807=1;and(p0807=60;p0901<0.03)));p0937;0)
- p1310: 0.018724; = IF(p1307=p1266;0;IF(p1307+p1308>p1266;p1266-p1307;p1308))
- p3225: 0.000602741; = p3221*p1229
- p2535: 0.000297577; = p2339*p1073
- p2545: 3.79716e-5; = p2349*p1073
- p1595: 0
- p2241: 0.000257617; = p2222*p2186
- p1834: 0
- p1265: 0.05984; = if(p1232>0;0;IF(p1259+p1263+p1264=1;0;IF(p1259+p1263+p1264+p1262>1;1-(p1259+p1263+p1264);p1262)))
- p1653: 0
- p2097: 0.40001
- p4205: 4.49518e-7; = p1856*p3479
- p2502: 3.03411e-6; = p2306*p1073
- p1928: 0
- p0132: 24.15
- p2047: 1.7059e-14; = p2015*p2045/(p0818*1000000000000)
- p2749: 1.53338e-5; = p2358*(p1019+p1021)
- p3155: 3.277e-6; = p2374*p1023
- p1137: 0; = if(p1121=0;p1131*(p0716/100)*p0703*1000;0)
- p2310: 0.000141318; = p2227*p2217
- p1230: 0.5
- p2229: 0; = if(p0774*p0778+p0775*p0779+p0776*p0780+p0777*p0781=0;0;p0781*p0777/(p0774*p0778+p0775*p0779+p0776*p0780+p0777*p0781))
- p2133: 2.25907e-7; = p2015*p2061*p2095/(p0818*1000)
- p2776: 0; = p2385*(p1078+p1080)
- p2353: 0.000195301; = p2232*p2221
- p3204: 0; = p2423*p1082
- p0673: 0
- p3158: 0; = p2377*p1082
- p0382: 0.5
- p0336: 0.5
- p4971: 2.1619e-8; = p1798*p3483
- p1628: 0
- p1047: 0.33098; = IF(p1012=0;IF(p1037+p1044+p1045+p1046=1;0;IF(p1037+p1044+p1045+p1046+p1041>1;1-(p1037+p1044+p1045+p1046);p1041));0)
- p2251: 1.8501e-6; = p2222*p2197
- p3153: 1.98611e-6; = p2372*p1023
- p2304: 0.000840369; = p2227*p2211
- p1665: 0
- p0425: 0; = SQRT(2)*(IF((2*p0293-1)<0;-1;IF((2*p0293-1)>0;1;0))*SQRT(SQRT((2/(pi()*0.140012289)+LN(1-(2*p0293-1)^2)/2)^2-LN(1-(2*p0293-1)^2)/0.140012289)-(2/(pi()*0.140012289)+LN(1-(2*p0293-1)^2)/2)))
- p1666: 0
- p0250: 11.16
- p0643: 0; = IF(p0379<0.5;-SQRT(p0007*EXP(p0511^2*p0008)-p0007);SQRT(p0007*EXP(p0511^2*p0008)-p0007))
- p2454: 0.000197293; = p2258*p1073
- p2192: 0.000861594; = p1067-p2189-p2190-p2191
- p0924: 0; = IF(p0918+p0923=1;0;IF(p0918+p0923+p0920>1;1-(p0918+p0923);p0920))
- p2949: 3.87097e-7; = p2363*(p1020+p1022)
- p0941: 0; = if(and(p0683=0;p0947=0);p0935;0)
- p0600: 0; = IF(p0336<0.5;-SQRT(p0007*EXP(p0468^2*p0008)-p0007);SQRT(p0007*EXP(p0468^2*p0008)-p0007))
- p2928: 4.00019e-6; = p2342*(p1079+p1081)
- p1086: 964344; = IF(p1071=0;p1080*(p0710/100)*p0703*1000;0)
- p3231: 3.82334e-8; = p1176/p0818
- p2103: 0.912485
- p1846: 0
- p1785: 0
- p4365: 0; = p1810*p3480
- p3193: 0; = p2412*p1023
- p3393: 0; = p3374*p1234
- p3380: 0.485448; = p3251/p0818
- p0270: 2.062
- p3382: 0.000359978; = p3363*p1234
- p0816: 0
- p1986: 4200
- p1921: 0
- p2446: 0.00112398; = p2250*p1014
- p2533: 0.000110677; = p2337*p1073
- p2918: 1.62258e-5; = p2332*(p1020+p1022)
- p1186: 7.1384e-9; = p1182*p1185/p0818
- p2932: 1.55475e-6; = p2346*(p1079+p1081)
- p2719: 0.000271222; = p2328*(p1019+p1021)
- p2806: 0; = p2415*(p1078+p1080)
- p0320: 0.5
- p0642: 0; = IF(p0378<0.5;-SQRT(p0007*EXP(p0510^2*p0008)-p0007);SQRT(p0007*EXP(p0510^2*p0008)-p0007))
- p0758: 0
- p2691: 0.000615251; = p2300*(p1078+p1080)
- p1808: 0
- p1914: 0
- p2397: 0; = p2234*p2186
- p0946: 0; = if(and(p0683=0;or(p0807=480;p0807=32;p0807=1;and(p0807=60;p0901<0.03)));p0934;0)
- p1689: 0
- p2870: 2.19121e-5; = p2284*(p1020+p1022)
- p3141: 1.71165e-6; = p2360*p1023
- p2835: 3.43867e-5; = p2249*(p1020+p1022)
- p0732: 26.563; = p0072*(1+p0600*p0204/100)
- p2279: 0.000266317; = p2223*p2185
- p2938: 1.60703e-5; = p2352*(p1129+p1131)
- p2801: 0; = p2410*(p1019+p1021)
- p0313: 0.5
- p0135: 134.4
- p0107: 14.038
- p1056: 2.35857e8; = IF(p1012=0;p1049*p1036;0)
- p3398: 0; = p3379*p1234
- p2480: 7.24559e-5; = p2284*p1014
- p1692: 0.454882
- p1806: 0
- p0501: 0; = SQRT(2)*(IF((2*p0369-1)<0;-1;IF((2*p0369-1)>0;1;0))*SQRT(SQRT((2/(pi()*0.140012289)+LN(1-(2*p0369-1)^2)/2)^2-LN(1-(2*p0369-1)^2)/0.140012289)-(2/(pi()*0.140012289)+LN(1-(2*p0369-1)^2)/2)))
- p0995: 0; = p0991*p0001*p0004/(p0818*p0002)
- p1599: 0
- p0852: 0.37559; = p0847*p0851^3+p0848*p0851^2+p0849*p0851+p0850
- p2612: 0; = p2416*p1073
- p0415: 0; = SQRT(2)*(IF((2*p0283-1)<0;-1;IF((2*p0283-1)>0;1;0))*SQRT(SQRT((2/(pi()*0.140012289)+LN(1-(2*p0283-1)^2)/2)^2-LN(1-(2*p0283-1)^2)/0.140012289)-(2/(pi()*0.140012289)+LN(1-(2*p0283-1)^2)/2)))
- p1895: 0
- p3164: 0; = p2383*p1082
- p2388: 0; = p2229*p2217
- p0109: 55.948
- p0798: 91.904; = p0138*(1+p0666*p0270/100)
- p2970: 0; = p2384*(p1079+p1081)
- p4991: 9.26531e-9; = p1818*p3483
- p2269: 0.000118834; = p2226*p2215
- p3453: 0; = p3377*p1240
- p2248: 0.00170273; = p2222*p2193
- p1676: 0
- p0572: 0; = IF(p0308<0.5;-SQRT(p0007*EXP(p0440^2*p0008)-p0007);SQRT(p0007*EXP(p0440^2*p0008)-p0007))
- p2356: 5.43151e-6; = p2225*p2184
- p2367: 0.000383289; = p2225*p2196
- p1745: 0
- p2659: 1.7494e-5; = p2268*(p1078+p1080)
- p3267: 0.0170629
- p0298: 0.5
- p0715: 0
- p2169: 0.000295633; = p2166*(p0908)
- p0091: 34.975
- p0975: 0.00103914; = p0973*p0974/p0818
- p0603: 0; = IF(p0339<0.5;-SQRT(p0007*EXP(p0471^2*p0008)-p0007);SQRT(p0007*EXP(p0471^2*p0008)-p0007))
- p2695: 0.000466859; = p2304*(p1078+p1080)
- p1754: 0
- p3179: 0; = p2398*p1023
- p2099: 0.620397
- p3000: 0; = p2414*(p1079+p1081)
- p1649: 0
- p1309: 0.0091011
- p0867: 0.0282508; = IF(p0858+p0864+p0865+p0866=1;0;IF(p0858+p0864+p0865+p0866+p0862>1;1-(p0858+p0864+p0865+p0866);p0862))
- p0194: 51.844
- p3999: 1.75934e-6; = p1856*p3478
- p2008: 0.0384179; = ((p1982*p1985+p1988*p1991+p1994*p1997+p2002*p2005)/p0818)*p0005*p0002/1000
- p3236: 0.0140975
- p2102: 0.922577
- p1746: 0
- p3046: 2.3066e-5; = p2265*p1082
- p1919: 0
- p1077: 0; = IF(p1071=0;p0715/100;0)
- p2266: 1.06765e-6; = p2226*p2212
- p2395: 0; = p2234*p2184
- p0762: 41.481; = p0102*(1+p0630*p0234/100)
- p3285: 0.275
- p1571: 0
- p1225: 1.088; = IF(p1221=0;0;p1223+1.2*p1224)
- p2421: 0; = p2235*p2211
- p1124: 0.528; = if(p1121=0;p0718/100;0)
- p2722: 5.01873e-7; = p2331*(p1019+p1021)
- p2565: 1.00493e-7; = p2369*p1014
- p2378: 0; = p2229*p2207
- p1710: 0
- p2010: 0.00153672; = ((p1984*p1985+p1990*p1991+p1996*p1997+p2004*p2005)/p0818)*p0005*p0002/1000
- p1817: 0
- p2346: 1.9532e-5; = p2228*p2214
- p1598: 0
- p2003: 50
- p1134: 3.1399e6; = if(p1121=0;p1128*(p0716/100)*p0703*1000;0)
- p5221: 1.10512e-8; = p1842*p3484
- p3384: 0.000470945; = p3365*p1234
- p3213: 0.112803; = p1222*12.0107/100.0869
- p1030: 2.92839e-5; = IF(p1012=0;p1024*p0001/(p0818*p0002);0)
- p5099: 3.60317e-9; = p1926*p3483
- p0617: 0; = IF(p0353<0.5;-SQRT(p0007*EXP(p0485^2*p0008)-p0007);SQRT(p0007*EXP(p0485^2*p0008)-p0007))
- p1215: 0.0350765; = IF(p1214=0;0;(p1214-1.5)/(p1214-1)^2)
- p1495: 73
- p0260: 20.157
- p1041: 0.33098
- p0666: 0; = IF(p0402<0.5;-SQRT(p0007*EXP(p0534^2*p0008)-p0007);SQRT(p0007*EXP(p0534^2*p0008)-p0007))
- p0832: 2.09524e10; = p0831*p0830/(1-p0831)
- p1208: 0; = p1205*p0818*p0822/p0801
- p0904: 1.41785e9; = p0825*p0901+p0827*p0902+(p0830+p0895)*p0824*p0903
- p3002: 0; = p2416*(p1079+p1081)
- p2559: 1.27999e-6; = p2363*p1014
- p0674: 206.231; = p0014*(1+p0542*p0146/100)
- p1778: 0
- p4856: 0; = p1889*p3482
- p1967: 0; = if(p0807=480;p0802*p0810;0)
- p3182: 0; = p2401*p1023
- p2477: 1.74664e-5; = p2281*p1014
- p2321: 6.36352e-5; = p2224*p2188
- p0837: 0.5
- p2524: 0.000150796; = p2328*p1014
- p1809: 0
- p2088: 0.798875
- p1981: 400
- p1331: 0; = p1330*p0001/(p0818*p0002)
- p2984: 0; = p2398*(p1020+p1022)
- p0804: 0
- p3524: 7.3942e-8; = p1793*p3476
- p4581: 1.86472e-6; = p1820*p3481
- p1327: 0.131839; = if(p1318=0;if(p1327a=0;1;if(p1327a<0;0;p1327a));0)
- p0001: 0.404686
- p0571: 0; = IF(p0307<0.5;-SQRT(p0007*EXP(p0439^2*p0008)-p0007);SQRT(p0007*EXP(p0439^2*p0008)-p0007))
- p2974: 0; = p2388*(p1079+p1081)
- p1170: 5465.28; = p1169*p0801
- p3228: 0.00205847; = p3224*p1229
- p3101: 1.68979e-7; = p2320*p1023
- p2762: 7.64102e-5; = p2371*(p1019+p1021)
- p5172: 8.44627e-8; = p1793*p3484
- p2116: 0.444424
- p3496: 2.13879e-6; = p1765*p3476
- p2132: 1.42879e-7; = p2015*p2060*p2094/(p0818*1000)
- p3126: 1.50543e-7; = p2345*p1082
- p2210: 0.000195447; = 6*1.00794*p2208/30.973762
- p3449: 0; = p3373*p1240
- p2579: 0; = p2383*p1073
- p3016: 0; = p2430*(p1129+p1131)
- p2130: 3.85763e-7; = p2015*p2058*p2092/(p0818*1000)
- p3875: 0; = p1938*p3477
- p2173: 0.0572899; = p0895*p0898/p0818
- p2063: 2.01468
- p0576: 0; = IF(p0312<0.5;-SQRT(p0007*EXP(p0444^2*p0008)-p0007);SQRT(p0007*EXP(p0444^2*p0008)-p0007))
- p2280: 0.000389573; = p2223*p2186
- p2656: 0.000589425; = p2265*(p1078+p1080)
- p2683: 5.65685e-6; = p2292*(p1019+p1021)
- p1913: 0
- p3210: 0; = p2429*p1132
- p1909: 0
- p0782: 81.486; = p0122*(1+p0650*p0254/100)
- p3299: 0.19737; = if(p1303+p1304+p1305+p1306=0;0;p1303/(p1303+p1304+p1305+p1306))
- p1612: 0
- p3131: 5.1315e-5; = p2350*p1132
- p3450: 0; = p3374*p1240
- p1947: 0
- p1618: 0
- p2537: 3.99359e-5; = p2341*p1073
- p3106: 1.42655e-6; = p2325*p1023
- p2076: 0.057
- p3296: 0.514
- p3075: 2.82724e-5; = p2294*p1023
- p1629: 0
- p2654: 0.000104246; = p2263*(p1078+p1080)
- p1317: 0
- p0724: 15.378; = p0064*(1+p0592*p0196/100)
- p2394: 0; = p2234*p2183
- p3037: 2.69078e-6; = p2256*p1023
- p3586: 1.97156e-6; = p1855*p3476
- p3151: 2.4093e-8; = p2370*p1023
- p4760: 0; = p1793*p3482
- p2635: 7.52886e-5; = p2244*(p1019+p1021)
- p3134: 1.17415e-5; = p2353*p1132
- p0623: 0; = IF(p0359<0.5;-SQRT(p0007*EXP(p0491^2*p0008)-p0007);SQRT(p0007*EXP(p0491^2*p0008)-p0007))
- p1308: 0.018724
- p0024: 45.297
- p1759: 0
- p3091: 3.07225e-6; = p2310*p1082
- p0634: 0; = IF(p0370<0.5;-SQRT(p0007*EXP(p0502^2*p0008)-p0007);SQRT(p0007*EXP(p0502^2*p0008)-p0007))
- p3472: 0; = p3377*p1241
- p2172: 0.15242; = p2166-(p2167+p2168+p2169+p2170)
- p0177: 12.385
- p2438: 1.15502e-5; = p2242*p1014
- p0943: 0; = if(and(p0683=0;p0949=0);p0937;0)
- p1660: 0
- p2753: 9.15481e-6; = p2362*(p1019+p1021)
- p3178: 0; = p2397*p1023
- p2181: 4.40523; = p0887+p0889+p0893+p2180
- p2479: 6.33007e-5; = p2283*p1014
- p2475: 8.2963e-5; = p2279*p1014
- p0955: 2.97753e-5; = if(and(p0683>0;or(p0807=56;p0807=100;and(p0807=60;p0901>0.06)));p0937;0)
- p0859: 0.709292; = p0671*1000/p0856
- p1682: 0
- p3184: 0; = p2403*p1023
- p5235: 2.1313e-7; = p1856*p3484
- p3176: 0; = p2395*p1023
- p0637: 0; = IF(p0373<0.5;-SQRT(p0007*EXP(p0505^2*p0008)-p0007);SQRT(p0007*EXP(p0505^2*p0008)-p0007))
- p2681: 1.56758e-6; = p2290*(p1019+p1021)
- p4616: 1.37115e-5; = p1855*p3481
- p2733: 2.79179e-5; = p2342*(p1078+p1080)
- p0371: 0.5
- p3070: 0.000185345; = p2289*p1023
- p0009: 22.4283
- p2089: 0.40001
- p0865: 0; = IF(p0858+p0864=1;0;IF(p0858+p0864+p0860>1;1-(p0858+p0864);p0860))
- p0905: 0.0212424; = p0904/p0818
- p2895: 1.25511e-6; = p2309*(p1079+p1081)
- p2447: 5.76342e-7; = p2251*p1014
- p1811: 6.74194e-7; = p1403*1000/p0818
- p2199: 1.83774e-5; = p1069-p2197-p2198
- p1087: 0; = IF(p1071=0;p1081*(p0710/100)*p0703*1000;0)
- p0861: 0; = p0673*1000/p0856
- p0267: 4.323
- p2631: 9.86746e-5; = p2240*(p1019+p1021)
- p2122: 0.341195
- p2782: 0; = p2391*(p1128+p1130)
- p1562: 0
- p0469: 0; = SQRT(2)*(IF((2*p0337-1)<0;-1;IF((2*p0337-1)>0;1;0))*SQRT(SQRT((2/(pi()*0.140012289)+LN(1-(2*p0337-1)^2)/2)^2-LN(1-(2*p0337-1)^2)/0.140012289)-(2/(pi()*0.140012289)+LN(1-(2*p0337-1)^2)/2)))
- p3021: 5.98247e-6; = p2240*p1023
- p1172: 8.18812e-8; = p1170/p0818
- p2664: 0.00149619; = p2273*(p1128+p1130)
- p3043: 9.02116e-6; = p2262*p1082
- p3462: 4.82263e-5; = p3367*p1241
- p2808: 0; = p2417*(p1078+p1080)
- p0706: 34.1; = p0046*(1+p0574*p0178/100)
- p2320: 4.97435e-6; = p2224*p2187
- p0591: 0; = IF(p0327<0.5;-SQRT(p0007*EXP(p0459^2*p0008)-p0007);SQRT(p0007*EXP(p0459^2*p0008)-p0007))
- p0699: 0
- p1010: 150853; = p0890
- p2128: 4.72847e-7; = p2015*p2056*p2090/(p0818*1000)
- p0671: 5177.83; = p0011*(1+p0539*p0143/100)
- p3005: 0; = p2419*(p1079+p1081)
- p2450: 0.00039991; = p2254*p1014
- p1937: 0
- p2822: 0; = p2431*(p1128+p1130)
- p0874: 0; = p0865*p0856
- p1218: 0.5
- p1977: 3.46882e10; = p1252+p1188
- p1166: 5.1273e-7; = p1164/p0818
- p4142: 1.78142e-7; = p1793*p3479
- p4785: 0; = p1818*p3482
- p3071: 9.50394e-8; = p2290*p1023
- p2810: 0; = p2419*(p1078+p1080)
- p2550: 5.66918e-5; = p2354*p1014
- p3198: 0; = p2417*p1082
- p2322: 1.80277e-5; = p2224*p2189
- p1627: 0
- p2902: 4.753e-6; = p2316*(p1020+p1022)
- p2496: 0.000379999; = p2300*p1073
- p3436: 0; = p3379*p1239
- p0847: -0.0915989
- p3160: 0; = p2379*p1082
- p3052: 3.87882e-6; = p2271*p1082
- p2020: 983838; = p2015*p2018*p2019
- p0178: 19.264
- p2914: 4.56038e-5; = p2328*(p1020+p1022)
- p0811: 0; = if(p0807=480;1-p0810;0)
- p2627: 0; = p2431*p1123

- p0938: 0; = p0932*p0001/(p0818*p0002)
- p2699: 5.22891e-5; = p2308*(p1078+p1080)
- p0528: 0; = SQRT(2)*(IF((2*p0396-1)<0;-1;IF((2*p0396-1)>0;1;0))*SQRT(SQRT((2/(pi()*0.140012289)+LN(1-(2*p0396-1)^2)/2)^2-LN(1-(2*p0396-1)^2)/0.140012289)-(2/(pi()*0.140012289)+LN(1-(2*p0396-1)^2)/2)))
- p2389: 0; = p2233*p2218
- p2239: 5.11288e-5; = p2222*p2184
- p3181: 0; = p2400*p1023
- p0083: 0.368
- p3345: 0.160606; = if(and(p1232=0;p3256<>0);p3273*p3277*p3293;0)
- p1748: 0
- p2298: 0.000411902; = p2227*p2205
- p3294: 0.279
- p0137: 57.341
- p2000: 4000
- p3038: 3.08476e-5; = p2257*p1023
- p1251: 5.47397e-7; = if(p1232>0;0;p1246*p0001/(p0818*p0002))
- p0416: 0; = SQRT(2)*(IF((2*p0284-1)<0;-1;IF((2*p0284-1)>0;1;0))*SQRT(SQRT((2/(pi()*0.140012289)+LN(1-(2*p0284-1)^2)/2)^2-LN(1-(2*p0284-1)^2)/0.140012289)-(2/(pi()*0.140012289)+LN(1-(2*p0284-1)^2)/2)))
- p2412: 0; = p2234*p2202
- p1036: 9.45187e8; = IF(p1012=0;p0795*p0702*1000*p0796/100;0)
- p2548: 3.022e-5; = p2352*p1123
- p1664: 0
- p3363: 0.00131001; = if(p1232=0;p3244*p3357/p0818;0)
- p1446: 163
- p3143: 5.5504e-7; = p2362*p1023
- p1750: 0
- p2876: 2.63576e-7; = p2290*(p1020+p1022)
- p3395: 0; = p3376*p1234
- p4532: 7.97792e-6; = p1771*p3481
- p3313: 0.0362428; = if(and(p1232=0;p3253<>0);p3262*(p3278*(p3282*p1256+p3286*(p1253+p1257)+p1258*p3288+p3298*p3287));0)
- p0189: 15.666
- p3307: 1.30999e7; = if(and(p1232=0;p3252<>0);p3252*(p3258-p3302)/p3305;0)
- p2930: 5.27126e-8; = p2344*(p1079+p1081)
- p0962: 0; = if(and(p0683>0;or(p0807=480;p0807=32;p0807=1;and(p0807=60;p0901<0.03)));p0938;0)
- p2761: 3.97389e-7; = p2370*(p1019+p1021)
- p4411: 0; = p1856*p3480
- p0029: 86.933
- p0880: 161399; = p0868*p0856
- p3140: 1.338e-7; = p2359*p1023
- p0788: 36.475; = p0128*(1+p0656*p0260/100)
- p3394: 0; = p3375*p1234
- p0879: 0.0275663; = p0878*p0001*p0003/(p0818*p0002)
- p3443: 0; = p3367*p1240
- p2499: 2.2019e-5; = p2303*p1073
- p1299: 0.0149989
- p0052: 41.176
- p3392: 0.000116204; = p3373*p1234
- p4046: 4.75673e-7; = p1903*p3478
- p2073: 0.377647
- p2297: 0.000455431; = p2227*p2204
- p1753: 0
- p1071: 0
- p3239: 0.013074; = IF(p3238+p3235+p3236=1;0;1-(p3238+p3235+p3236))
- p2621: 0; = p2425*p1073
- p0468: 0; = SQRT(2)*(IF((2*p0336-1)<0;-1;IF((2*p0336-1)>0;1;0))*SQRT(SQRT((2/(pi()*0.140012289)+LN(1-(2*p0336-1)^2)/2)^2-LN(1-(2*p0336-1)^2)/0.140012289)-(2/(pi()*0.140012289)+LN(1-(2*p0336-1)^2)/2)))
- p0918: 0.476986; = p0680*1000/p0801
- p3128: 1.6024e-6; = p2347*p1082
- p2751: 2.82319e-5; = p2360*(p1019+p1021)
- p2155: 6.98741e-8; = p2015*p2084*p2117/(p0818*1000)
- p0202: 31.249
- p0123: 77.126
- p2920: 1.00118e-6; = p2334*(p1020+p1022)
- p1822: 0
- p2959: 7.92746e-7; = p2373*(p1020+p1022)
- p1882: 0
- p0721: 0
- p4514: 0; = p1963*p3480
- p1103: 0.551599; = IF(p1071=0;IF(p1096+p1101+p1102=1;0;IF(p1096+p1101+p1102+p1099>1;1-(p1096+p1101+p1102);p1099));0)
- p1283: 0.222557; = p1277*p1252/p0818
- p1241: 0.03631; = if(p1232>0;0;IF(p1234+p1238+p1239+p1240=1;0;1-(p1234+p1238+p1239+p1240)))
- p1564: 0
- p2588: 0; = p2392*p1123
- p3054: 0.000170362; = p2273*p1132
- p1818: 2.69677e-7; = p1410*1000/p0818
- p4081: 2.80191e-7; = p1938*p3478
- p2836: 0.000339914; = p2250*(p1020+p1022)
- p0728: 31.542; = p0068*(1+p0596*p0200/100)
- p0339: 0.5
- p0329: 0.5
- p0650: 0; = IF(p0386<0.5;-SQRT(p0007*EXP(p0518^2*p0008)-p0007);SQRT(p0007*EXP(p0518^2*p0008)-p0007))
- p3117: 7.7535e-6; = p2336*p1082
- p0186: 33.472
- p0940: 0; = if(and(p0683=0;p0946=0);p0934;0)
- p1294: 0; = p1290*p1252/p0818
- p3148: 1.30203e-5; = p2367*p1023
- p4409: 0; = p1854*p3480
- p1970: 7.3e6; = p0801
- p0948: 0; = if(and(p0683=0;or(p0807=480;p0807=32;p0807=1;and(p0807=60;p0901<0.03)));p0936;0)
- p0750: 0
- p0076: 51.567
- p2231: 0.349179; = if(p0783*p0787+p0784*p0788+p0785*p0789+p0786*p0790=0;0;p0788*p0784/(p0783*p0787+p0784*p0788+p0785*p0789+p0786*p0790))
- p1904: 0
- p2335: 0.000121831; = p2224*p2203
- p0971: 6.30344e-5; = p0968/p0818
- p2539: 0.000225804; = p2343*p1073
- p2207: 0.00337298; = p1119-p2205-p2204-p2206
- p2738: 4.09475e-5; = p2347*(p1078+p1080)
- p1178: 3.82334e-8; = p1176/p0818
- p2174: 0.00133079; = p0895*p0903/p0818
- p1761: 0
- p1922: 0
- p2673: 0.000401883; = p2282*(p1019+p1021)
- p1120: 0.00420858; = IF(p1071=0;p1110/(p1115*p0818);0)
- p0828: 0.124651; = if(p0827=0;0;p0819-p0827/p0818)
- p2855: 9.45915e-6; = p2269*(p1079+p1081)
- p2863: 5.35733e-5; = p2277*(p1020+p1022)
- p2219: 0.00620218; = p1154-p2218
- p0914: 7.0733e8; = p0825*p0911+p0827*p0912+(p0830+p0895)*p0824*p0913
- p3614: 8.63808e-8; = p1883*p3476
- p1321: 1.0883; = IF(((p0745*1000*p0748/100)+(p0754*1000*p0757/100))/p0801<0;0;((p0745*1000*p0748/100)+(p0754*1000*p0757/100))/p0801)
- p2528: 5.36531e-5; = p2332*p1014
- p1951: 0
- p3529: 2.9024e-8; = p1798*p3476
- p3302: 0.0226142; = if(and(p1232=0;p3252<>0);p3258*(p3278*(p3282*p1256+p3286*(p1253+p1257)+p1258*p3288+p3297*p3287));0)
- p0817: 0
- p1670: 0
- p2164: 0.00020224; = (p2015/p0818)-(p2022)-(p2035+p2036+p2052)-(p2017/p0818)-(p2039+p2041+p2044+p2158+p2159+p2160+p2161+p2162)
- p1934: 0
- p1099: 0.551599
- p2658: 6.20218e-6; = p2267*(p1078+p1080)
- p2223: 0.549375; = if(p0765*p0769+p0766*p0770+p0767*p0771+p0768*p0772=0;0;p0770*p0766/(p0765*p0769+p0766*p0770+p0767*p0771+p0768*p0772))
- p2308: 9.4123e-5; = p2227*p2215
- p2590: 0; = p2394*p1014
- p2877: 4.32617e-7; = p2291*(p1020+p1022)
- p3274: 0.0768939
- p2245: 0.000153806; = p2222*p2190
- p3163: 0; = p2382*p1082
- p4232: 2.0811e-7; = p1883*p3479
- p0286: 0.5
- p1867: 0
- p0578: 0; = IF(p0314<0.5;-SQRT(p0007*EXP(p0446^2*p0008)-p0007);SQRT(p0007*EXP(p0446^2*p0008)-p0007))
- p2329: 2.48214e-7; = p2224*p2197
- p3483: 0.034357; = if(p1328+p1330+p1332+p1334+p1336+p1338+p1340+p1342+p1344=0;0;p1342/(p1328+p1330+p1332+p1334+p1336+p1338+p1340+p1342+p1344))
- p2531: 3.79529e-5; = p2335*p1014
- p2292: 1.00961e-5; = p2223*p2199
- p3250: 0.875
- p1292: 0; = IF(p1287+p1290+p1291=p1261;0;p1261-(p1287+p1290+p1291))
- p2201: 0.00151495; = 12.01*p2200/(2*14.0067)
- p1139: 2.13738e-5; = if(p1121=0;p1133*p0001/(p0818*p0002);0)
- p1068: 0.0156232; = IF(p1012=0;p1054/(p1061*p0818);0)
- p1209: 166.391; = p1206*p0818*p0822/p0801
- p2730: 0.000481801; = p2339*(p1078+p1080)
- p3375: 0; = if(p1232=0;p3246*p3357/p0818;0)
- p3908: 2.01672e-5; = p1765*p3478
- p1657: 0
- p3833: 0; = p1896*p3477
- p1311: 0.0091011; = IF(p1307+p1310=p1266;0;IF(p1307+p1310+p1309>p1266;p1266-(p1307+p1310);p1309))
- p0113: 91.904
- p2842: 7.46241e-6; = p2256*(p1020+p1022)
- p2386: 0; = p2229*p2215
- p4664: 3.50836e-7; = p1903*p3481
- p2821: 0; = p2430*(p1128+p1130)
- p3430: 0.000133386; = p3373*p1239
- p1696: 0
- p0964: 0; = 56/90000
- p4245: 3.66274e-8; = p1896*p3479
- p1338: 5.85958e6; = p1324*p0801
- p3502: 1.14714e-6; = p1771*p3476
- p2645: 0.000719278; = p2254*(p1019+p1021)
- p1136: 0; = if(p1121=0;p1130*(p0716/100)*p0703*1000;0)
- p3007: 0; = p2421*(p1079+p1081)
- p1040: 0.0261194
- p0950: 0; = if(and(p0683=0;or(p0807=480;p0807=32;p0807=1;and(p0807=60;p0901<0.03)));p0938;0)
- p2375: 0; = p2229*p2204
- p0393: 0.5
- p1933: 0
- p0810: 0
- p1269: 0.0526315
- p1732: 0
- p2669: 4.33212e-5; = p2278*(p1019+p1021)
- p1963b: 0; = p1569*p1773+p1570*p1774+p1571*p1775+p1572*p1776+p1573*p1777+p1574*p1778+p1575*p1779+p1576*p1780+p1577*p1781+p1578*p1782+p1579*p1783+p1580*p1784+p1581*p1785+p1582*p1786+p1583*p1787+p1584*p1788+p1585*p1789+p1586*p1790+p1587*p1791
- p1189: 9.75771e-5; = p0801*p0001/(p0818*p0002)
- p2978: 0; = p2392*(p1129+p1131)
- p2158: 8.40794e-8; = p2015*p2082*p2120/(p0818*1000)
- p0584: 0; = IF(p0320<0.5;-SQRT(p0007*EXP(p0452^2*p0008)-p0007);SQRT(p0007*EXP(p0452^2*p0008)-p0007))
- p5337: 0; = p1962*p3484
- p0136: 96.365
- p1328: 842543; = p1319*p0801
- p1620: 0
- p0598: 0; = IF(p0334<0.5;-SQRT(p0007*EXP(p0466^2*p0008)-p0007);SQRT(p0007*EXP(p0466^2*p0008)-p0007))
- p1240: 0; = if(p1232>0;0;IF(p1234+p1238+p1239=1;0;IF(p1234+p1238+p1239+p1237>1;1-(p1234+p1238+p1239);p1237)))
- p3271: 0.0195489
- p1014: 0.31152; = IF(p1012=0;p0705/100;0)
- p3157: 0; = p2376*p1082
- p2891: 6.73129e-8; = p2305*(p1079+p1081)
- p0037: 86.933
- p3197: 0; = p2416*p1082
- p1961: 0
- p3352: 3.77739e6; = if(and(p1232=0;p3256<>0);p3256*(p3275-p3347)/p3349;0)
- p2090: 0.40001
- p3110: 8.43184e-9; = p2329*p1023
- p0664: 0; = IF(p0400<0.5;-SQRT(p0007*EXP(p0532^2*p0008)-p0007);SQRT(p0007*EXP(p0532^2*p0008)-p0007))
- p1831: 0
- p2742: 0.000635089; = p2351*(p1128+p1130)
- p2717: 0.000127997; = p2326*(p1019+p1021)
- p3232: 1.42768e-8; = p1182/p0818
- p2965: 0; = p2379*(p1079+p1081)
- p4191: 2.33083e-8; = p1842*p3479
- p4101: 0; = p1962*p3478
- p1567: 0.629912
- p3634: 5.04464e-8; = p1903*p3476
- p2630: 2.86475e-5; = p2239*(p1019+p1021)
- p2197: 5.09259e-6; = p1055/p0818
- p1261: 0.26563; = if(p1232>0;0;p0732/100)
- p1994: 750
- p0901: 0.0177532
- p1602: 0
- p3216: 0.06; = IF(OR(p1226=0;p1228=0);0;1-p3213-p3214-p3215)
- p2083: 2.17294
- p4571: 5.76717e-7; = p1810*p3481
- p1277: 0.42824
- p2714: 1.15618e-5; = p2323*(p1019+p1021)
- p4238: 3.64609e-7; = p1889*p3479
- p1157: 0.219481
- p0841: 0.434468
- p2028: 1.29351e-5; = p2015*p2026*p2027/(p0818*1000)
- p1059: 0.335
- p3757: 0; = p1820*p3477
- p0510: 0; = SQRT(2)*(IF((2*p0378-1)<0;-1;IF((2*p0378-1)>0;1;0))*SQRT(SQRT((2/(pi()*0.140012289)+LN(1-(2*p0378-1)^2)/2)^2-LN(1-(2*p0378-1)^2)/0.140012289)-(2/(pi()*0.140012289)+LN(1-(2*p0378-1)^2)/2)))
- p1113: 0.100377
- p0562: 0; = IF(p0298<0.5;-SQRT(p0007*EXP(p0430^2*p0008)-p0007);SQRT(p0007*EXP(p0430^2*p0008)-p0007))
- p0822: 0.879667
- p2675: 0.000130319; = p2284*(p1019+p1021)
- p2611: 0; = p2415*p1073
- p1787: 0
- p2126: 4.13383e-7; = p2015*p2054*p2088/(p0818*1000)
- p0226: 24.372
- p1110: 6.68136e7; = IF(p1071=0;p1105*p1104*p1095;0)
- p0730: 20.998; = p0070*(1+p0598*p0202/100)
- p3094: 1.21655e-5; = p2313*p1132
- p2498: 5.09973e-5; = p2302*p1073
- p2517: 1.98236e-5; = p2321*p1014
- p1252: 3.46882e10; = if(p1232>0;0;p0724*2000*p0723*1000*p0725/100)
- p3284: 0.275
- p0897: 0.458721
- p3381: 0.00290918; = p3362*p1234
- p0115: 52.757
- p1092: 1.28901e-5; = IF(p1071=0;p1086*p0001/(p0818*p0002);0)
- p1990: 30
- p2110: 0.856281
- p1167: 0.5
- p2862: 0.000244056; = p2276*(p1020+p1022)
- p2035: 1.51081e-6; = p2015*p2029*(1-p2031)/(p0818*1000)
- p1718: 0
- p3269: 0.851786
- p1839: 0
- p0849: 0.00398511
- p1196: 0.59
- p4777: 0; = p1810*p3482
- p0155: 3.171
- p0555: 0; = IF(p0291<0.5;-SQRT(p0007*EXP(p0423^2*p0008)-p0007);SQRT(p0007*EXP(p0423^2*p0008)-p0007))
- p0119: 35.687
- p3190: 0; = p2409*p1023
- p1630: 0
- p2597: 0; = p2401*p1014
- p2598: 0; = p2402*p1014
- p3108: 1.6635e-6; = p2327*p1023
- p1264: 0.26563; = if(p1232>0;0;IF(p1259+p1263=1;0;IF(p1259+p1263+p1261>1;1-(p1259+p1263);p1261)))
- p2667: 0.00145149; = p2276*(p1019+p1021)
- p1205: 0
- p5129: 1.09639e-7; = p1956*p3483
- p0318: 0.5
- p2765: 5.40508e-5; = p2374*(p1019+p1021)
- p2831: 1.44901e-5; = p2245*(p1020+p1022)
- p1830: 0
- p3371: 0.000545671; = if(p1232=0;p3245*p3359/p0818;0)
- p2491: 3.73148e-5; = p2295*p1014
- p2117: 0.585147
- p2994: 0; = p2408*(p1020+p1022)
- p2056: 2.07882
- p2697: 4.91248e-6; = p2306*(p1078+p1080)
- p2315: 0.000229833; = p2224*p2182
- p5027: 8.39025e-8; = p1854*p3483
- p3068: 8.74694e-5; = p2287*p1023
- p2287: 0.0025749; = p2223*p2193
- p0857: 0.975771; = p0856*p0001*p0003/(p0818*p0002)
- p0835: 668.336; = -LN(1-p0669/100)/p0834
- p3287: 0.745
- p1268: 0.10828
- p0827: 4.48e9; = p0818*p0819*p0823
- p1038: 0.00993849
- p3244: 0.7585; = p0791/100
- p2845: 4.13953e-5; = p2259*(p1079+p1081)
- p0516: 0; = SQRT(2)*(IF((2*p0384-1)<0;-1;IF((2*p0384-1)>0;1;0))*SQRT(SQRT((2/(pi()*0.140012289)+LN(1-(2*p0384-1)^2)/2)^2-LN(1-(2*p0384-1)^2)/0.140012289)-(2/(pi()*0.140012289)+LN(1-(2*p0384-1)^2)/2)))
- p0771: 46.664; = p0111*(1+p0639*p0243/100)
- p0485: 0; = SQRT(2)*(IF((2*p0353-1)<0;-1;IF((2*p0353-1)>0;1;0))*SQRT(SQRT((2/(pi()*0.140012289)+LN(1-(2*p0353-1)^2)/2)^2-LN(1-(2*p0353-1)^2)/0.140012289)-(2/(pi()*0.140012289)+LN(1-(2*p0353-1)^2)/2)))
- p2829: 4.4685e-5; = p2243*(p1020+p1022)
- p1585: 0
- p3205: 0; = p2424*p1082
- p2253: 6.67637e-6; = p2222*p2199
- p2289: 0.00545614; = p2223*p2196
- p2402: 0; = p2234*p2191
- p2975: 0; = p2389*(p1129+p1131)
- p2022: 9.77357e-5; = p2018*p2015/p0818-p2021
- p2424: 0; = p2235*p2214
- p4102: 3.34496e-5; = p1963*p3478
- p2043: 0.636483
- p2977: 0; = p2391*(p1129+p1131)
- p2711: 2.78713e-6; = p2320*(p1019+p1021)
- p0889: 0; = 1000*p0888*p0001*p0003*p0004/(p0818*p0002)
- p2633: 2.07742e-5; = p2242*(p1019+p1021)
- p3482: 0; = if(p1328+p1330+p1332+p1334+p1336+p1338+p1340+p1342+p1344=0;0;p1340/(p1328+p1330+p1332+p1334+p1336+p1338+p1340+p1342+p1344))
- p2552: 1.69202e-6; = p2356*p1014
- p0188: 3.649
- p3311: 2.90735e7; = if(and(p1232=0;p3252<>0);p3252-(p3306+p3307+p3308+p3309+p3310);0)
- p1707: 0
- p3336: 0.000977444; = IF(or(p3254=0;p1232>0);0;p3271*p3289)
- p1568: 0
- p1764: 0
- p0996: 0; = if(p0888=0;0;if((p0691*p0690*1000*p0692/100)/p0888>1;1;(p0691*p0690*1000*p0692/100)/p0888))
- p0757: 0
- p1797: 0
- p0554: 0; = IF(p0290<0.5;-SQRT(p0007*EXP(p0422^2*p0008)-p0007);SQRT(p0007*EXP(p0422^2*p0008)-p0007))
- p1902: 0
- p1246: 40952.2; = if(p1232>0;0;p1241*(p0725/100)*p0723*1000)
- p1164: 34222.9; = p1163*p0801
- p0211: 5.88
- p0856: 7.3e6; = p0801
- p3402: 0.00019511; = p3364*p1238
- p0770: 61.466; = p0110*(1+p0638*p0242/100)
- p2869: 1.91434e-5; = p2283*(p1020+p1022)
- p0691: 0
- p3279: 0.37
- p2213: 2.69317e-5; = p1116-p2212
- p1097: 0.0302087
- p1107: 5.07033e6; = IF(p1071=0;p1105*p1101*p1095;0)
- p0610: 0; = IF(p0346<0.5;-SQRT(p0007*EXP(p0478^2*p0008)-p0007);SQRT(p0007*EXP(p0478^2*p0008)-p0007))
- p2261: 0.00139824; = p2226*p2207
- p1263: 0.42824; = if(p1232>0;0;IF(p1259=1;0;IF(p1259+p1260>1;1-p1259;p1260)))
- p1109: 9.25822e7; = IF(p1071=0;p1105*p1103*p1095;0)
- p2506: 4.84889e-5; = p2310*p1073
- p3060: 9.04678e-6; = p2279*p1023
- p1026: 0; = IF(p1012=0;p1020*(p0704/100)*p0703*1000;0)
- p3200: 0; = p2419*p1082
- p2150: 5.69685e-8; = p2015*p2078*p2112/(p0818*1000)
- p2018: 0.1978
- p0508: 0; = SQRT(2)*(IF((2*p0376-1)<0;-1;IF((2*p0376-1)>0;1;0))*SQRT(SQRT((2/(pi()*0.140012289)+LN(1-(2*p0376-1)^2)/2)^2-LN(1-(2*p0376-1)^2)/0.140012289)-(2/(pi()*0.140012289)+LN(1-(2*p0376-1)^2)/2)))
- p1213: 30
- p2985: 0; = p2399*(p1020+p1022)
- p0831: 0.356071; = 1-p0824
- p1765: 4.63695e-5; = p1357*1000/p0818
- p2521: 1.30821e-5; = p2325*p1014
- p3433: 0; = p3376*p1239
- p1878: 0
- p2881: 1.12848e-5; = p2295*(p1020+p1022)
- p3895: 0; = p1962*p3477
- p0509: 0; = SQRT(2)*(IF((2*p0377-1)<0;-1;IF((2*p0377-1)>0;1;0))*SQRT(SQRT((2/(pi()*0.140012289)+LN(1-(2*p0377-1)^2)/2)^2-LN(1-(2*p0377-1)^2)/0.140012289)-(2/(pi()*0.140012289)+LN(1-(2*p0377-1)^2)/2)))
- p2369: 3.22588e-7; = p2225*p2198
- p3362: 0.0105869; = if(p1232=0;p3244*p3356/p0818;0)
- p2809: 0; = p2418*(p1078+p1080)
- p1133: 1.59903e6; = if(p1121=0;p1123*(p0716/100)*p0703*1000;0)
- p0027: 5.763
- p1270: 0; = IF(p1267=p1259;0;IF(p1267+p1268>p1259;p1259-p1267;p1268))
- p1024: 2.19081e6; = IF(p1012=0;p1014*(p0704/100)*p0703*1000;0)
- p2841: 5.18502e-5; = p2255*(p1020+p1022)
- p0653: 0; = IF(p0389<0.5;-SQRT(p0007*EXP(p0521^2*p0008)-p0007);SQRT(p0007*EXP(p0521^2*p0008)-p0007))
- p3074: 6.59455e-5; = p2293*p1023
- p2774: 0; = p2383*(p1078+p1080)
- p0719: 14.299; = p0059*(1+p0587*p0191/100)
- p0744: 16.851; = p0084*(1+p0612*p0216/100)
- p2581: 0; = p2385*p1073
- p3404: 0.00392869; = p3366*p1238
- p2956: 6.68178e-8; = p2370*(p1020+p1022)
- p1023: 0.03397; = IF(p1012=0;IF(p1014+p1019+p1020+p1021+p1022=1;0;1-(p1014+p1019+p1020+p1021+p1022));0)
- p1062: 0.16
- p3137: 1.84508e-7; = p2356*p1023
- p1669: 0
- p2021: 1.47399e-5; = p2020/p0818
- p2668: 0.000318619; = p2277*(p1019+p1021)
- p0530: 0; = SQRT(2)*(IF((2*p0398-1)<0;-1;IF((2*p0398-1)>0;1;0))*SQRT(SQRT((2/(pi()*0.140012289)+LN(1-(2*p0398-1)^2)/2)^2-LN(1-(2*p0398-1)^2)/0.140012289)-(2/(pi()*0.140012289)+LN(1-(2*p0398-1)^2)/2)))
- p2100: 0.705744
- p2014: 5.89417e7; = p0833*p2011*p2013
- p1305: 0.00779494; = p1301*p1252/p0818
- p0885: 13.067; = IF(p0689+p0884=100;0;100-(p0689+p0884))
- p3689: 0; = p1962*p3476
- p2850: 6.44923e-6; = p2264*(p1079+p1081)
- p3189: 0; = p2408*p1023
- p3235: 0.118093
- p1864: 0
- p1966: 6.85e6; = if(p0814=0;p0802;0)
- p4373: 0; = p1818*p3480
- p2840: 0.000120941; = p2254*(p1020+p1022)
- p1911: 0
- p2351: 0.00120282; = p2232*p2219
- p1743: 0
- p0378: 0.5
- p1868: 0
- p0609: 0; = IF(p0345<0.5;-SQRT(p0007*EXP(p0477^2*p0008)-p0007);SQRT(p0007*EXP(p0477^2*p0008)-p0007))
- p3263: 0.0214527
- p2812: 0; = p2421*(p1078+p1080)
- p3015: 0; = p2429*(p1129+p1131)
- p1337: 0; = p1336*p0001/(p0818*p0002)
- p0142: 0
- p2270: 1.99073e-5; = p2226*p2216
- p0682: 7297.88; = p0022*(1+p0550*p0154/100)
- p2272: 0.00201084; = p2230*p2218
- p1231: 0.0111883; = IF(p1221=0;0;p1230*(p1228+p1229))
- p0713: 7.96; = p0053*(1+p0581*p0185/100)
- p2392: 0; = p2233*p2221
- p1005: 0; = p1001*p0888
- p1698: 0
- p0406: 0; = SQRT(2)*(IF((2*p0274-1)<0;-1;IF((2*p0274-1)>0;1;0))*SQRT(SQRT((2/(pi()*0.140012289)+LN(1-(2*p0274-1)^2)/2)^2-LN(1-(2*p0274-1)^2)/0.140012289)-(2/(pi()*0.140012289)+LN(1-(2*p0274-1)^2)/2)))
- p3201: 0; = p2420*p1082
- p0366: 0.5
- p3222: 0.224242; = IF(p3216=0;0;p1223*40.078/100.0869)
- p1607: 0.446245
- p2725: 5.95436e-6; = p2334*(p1019+p1021)
- p2700: 8.7596e-6; = p2309*(p1078+p1080)
- p1229: 0.00410098; = IF(p1221=0;0;p1228*p1221)
- p3415: 0; = p3377*p1238
- p3253: 8.91291e8; = p1252*(p1277*(1-p3247)+p1280*(1-p3248)+p1281*(1-p3249)+p1282*(1-p3250))
- p0761: 0
- p0663: 0; = IF(p0399<0.5;-SQRT(p0007*EXP(p0531^2*p0008)-p0007);SQRT(p0007*EXP(p0531^2*p0008)-p0007))
- p4809: 0; = p1842*p3482
- p2070: 0.282
- p0611: 0; = IF(p0347<0.5;-SQRT(p0007*EXP(p0479^2*p0008)-p0007);SQRT(p0007*EXP(p0479^2*p0008)-p0007))
- p0205: 21.356
- p1724: 0
- p2428: 0; = p2236*p2218
- p0004: 0.0254
- p0763: 7297.92; = p0103*(1+p0631*p0235/100)
- p1604: 0
- p0367: 0.5
- p2671: 0.000218278; = p2280*(p1019+p1021)
- p0596: 0; = IF(p0332<0.5;-SQRT(p0007*EXP(p0464^2*p0008)-p0007);SQRT(p0007*EXP(p0464^2*p0008)-p0007))
- p0745: 16753.6; = p0085*(1+p0613*p0217/100)
- p1870: 0
- p2153: 9.25129e-10; = p2015*p2081*p2115/(p0818*1000)
- p2951: 1.70411e-5; = p2365*(p1020+p1022)
- p2490: 0.00025927; = p2294*p1014
- p2306: 8.84272e-6; = p2227*p2213
- p2401: 0; = p2234*p2190
- p1862: 0
- p2024: 0.748682
- p0698: 0
- p0926: 0; = IF(p0918+p0923+p0924+p0925=1;0;IF(p0918+p0923+p0924+p0925+p0922>1;1-(p0918+p0923+p0924+p0925);p0922))
- p0484: 0; = SQRT(2)*(IF((2*p0352-1)<0;-1;IF((2*p0352-1)>0;1;0))*SQRT(SQRT((2/(pi()*0.140012289)+LN(1-(2*p0352-1)^2)/2)^2-LN(1-(2*p0352-1)^2)/0.140012289)-(2/(pi()*0.140012289)+LN(1-(2*p0352-1)^2)/2)))
- p4822: 0; = p1855*p3482
- p0275: 0.5
- p1475: 125
- p1641: 0
- p0630: 0; = IF(p0366<0.5;-SQRT(p0007*EXP(p0498^2*p0008)-p0007);SQRT(p0007*EXP(p0498^2*p0008)-p0007))
- p0854: 3.43169e6; = p0801*((1-p0853)*p0846+p0853*p0852)
- p0079: 1.278
- p3366: 0.0105191; = if(p1232=0;p3244*p3360/p0818;0)
- p2327: 4.89696e-5; = p2224*p2195
- p0359: 0.5
- p0693: 0
- p0872: 5.17783e6; = p0864*p0856
- p0116: 30.928
- p2013: 0.75
- p1643: 0
- p1971: 9.15621e-5; = p1966*p0001/(p0818*p0002)
- p0726: 27.479; = p0066*(1+p0594*p0198/100)
- p2890: 6.68934e-5; = p2304*(p1079+p1081)
- p2534: 3.584e-5; = p2338*p1073
- p1771: 2.48703e-5; = p1363*1000/p0818
- p2186: 0.00070912; = p1052/p0818
- p2540: 2.2722e-7; = p2344*p1073
- p0352: 0.5
- p0475: 0; = SQRT(2)*(IF((2*p0343-1)<0;-1;IF((2*p0343-1)>0;1;0))*SQRT(SQRT((2/(pi()*0.140012289)+LN(1-(2*p0343-1)^2)/2)^2-LN(1-(2*p0343-1)^2)/0.140012289)-(2/(pi()*0.140012289)+LN(1-(2*p0343-1)^2)/2)))
- p2205: 0.0012545; = 2*14.0067*p2204/30.973762
- p0755: 55.689; = p0095*(1+p0623*p0227/100)
- p4719: 0; = p1962*p3481
- p1695: 0
- p3006: 0; = p2420*(p1079+p1081)
- p2603: 0; = p2407*p1014
- p3741: 0; = p1804*p3477
- p2982: 0; = p2396*(p1020+p1022)
- p3252: 4.37029e8; = p1252*(p1267*(1-p3247)+p1270*(1-p3248)+p1271*(1-p3249)+p1272*(1-p3250))
- p0992: 0; = p0988*p0001*p0004/(p0818*p0002)
- p2343: 0.000658091; = p2228*p2211
- p2370: 7.09243e-7; = p2225*p2199
- p1848: 0
- p0147: 0
- p3670: 1.10567e-8; = p1939*p3476
- p4397: 0; = p1842*p3480
- p1115: 0.237849
- p0479: 0; = SQRT(2)*(IF((2*p0347-1)<0;-1;IF((2*p0347-1)>0;1;0))*SQRT(SQRT((2/(pi()*0.140012289)+LN(1-(2*p0347-1)^2)/2)^2-LN(1-(2*p0347-1)^2)/0.140012289)-(2/(pi()*0.140012289)+LN(1-(2*p0347-1)^2)/2)))
- p1589: 0.897233
- p2258: 0.000574997; = p2226*p2204
- p0783: 77.126; = p0123*(1+p0651*p0255/100)
- p4823: 0; = p1856*p3482
- p4276: 1.13378e-6; = p1927*p3479
- p1975: 9.75771e-5; = p1970*p0001/(p0818*p0002)
- p4617: 1.29761e-6; = p1856*p3481
- p1403: 45
- p0310: 0.5
- p2976: 0; = p2390*(p1129+p1131)
- p0652: 0; = IF(p0388<0.5;-SQRT(p0007*EXP(p0520^2*p0008)-p0007);SQRT(p0007*EXP(p0520^2*p0008)-p0007))
- p2954: 1.8516e-8; = p2368*(p1020+p1022)
- p2786: 0; = p2395*(p1019+p1021)
- p2857: 1.42021e-5; = p2271*(p1079+p1081)
- p3249: 0.91
- p0216: 25.253
- p0660: 0; = IF(p0396<0.5;-SQRT(p0007*EXP(p0528^2*p0008)-p0007);SQRT(p0007*EXP(p0528^2*p0008)-p0007))
- p0449: 0; = SQRT(2)*(IF((2*p0317-1)<0;-1;IF((2*p0317-1)>0;1;0))*SQRT(SQRT((2/(pi()*0.140012289)+LN(1-(2*p0317-1)^2)/2)^2-LN(1-(2*p0317-1)^2)/0.140012289)-(2/(pi()*0.140012289)+LN(1-(2*p0317-1)^2)/2)))
- p4771: 0; = p1804*p3482
- p1694: 0
- p3405: 0.00049605; = p3367*p1238
- p0472: 0; = SQRT(2)*(IF((2*p0340-1)<0;-1;IF((2*p0340-1)>0;1;0))*SQRT(SQRT((2/(pi()*0.140012289)+LN(1-(2*p0340-1)^2)/2)^2-LN(1-(2*p0340-1)^2)/0.140012289)-(2/(pi()*0.140012289)+LN(1-(2*p0340-1)^2)/2)))
- p0269: 5.042
- p0601: 0; = IF(p0337<0.5;-SQRT(p0007*EXP(p0469^2*p0008)-p0007);SQRT(p0007*EXP(p0469^2*p0008)-p0007))
- p2953: 3.61097e-5; = p2367*(p1020+p1022)
- p0814: 0; = if(p0807=480;p0810*p0812+p0811*p0813;0)
- p2400: 0; = p2234*p2189
- p4787: 0; = p1820*p3482
- p0793: 0
- p1531: 16
- p1142: 0; = if(p1121=0;p1136*p0001/(p0818*p0002);0)
- p0608: 0; = IF(p0344<0.5;-SQRT(p0007*EXP(p0476^2*p0008)-p0007);SQRT(p0007*EXP(p0476^2*p0008)-p0007))
- p3309: 1.61331e7; = if(and(p1232=0;p3252<>0);p3252*(p3260-p3304)/p3305;0)
- p2442: 1.20491e-5; = p2246*p1014
- p2538: 1.7243e-5; = p2342*p1073
- p2564: 6.12259e-8; = p2368*p1014
- p3469: 0; = p3374*p1241
- p0519: 0; = SQRT(2)*(IF((2*p0387-1)<0;-1;IF((2*p0387-1)>0;1;0))*SQRT(SQRT((2/(pi()*0.140012289)+LN(1-(2*p0387-1)^2)/2)^2-LN(1-(2*p0387-1)^2)/0.140012289)-(2/(pi()*0.140012289)+LN(1-(2*p0387-1)^2)/2)))
- p0242: 7.445
- p0059: 14.299
- p1518: 7
- p0462: 0; = SQRT(2)*(IF((2*p0330-1)<0;-1;IF((2*p0330-1)>0;1;0))*SQRT(SQRT((2/(pi()*0.140012289)+LN(1-(2*p0330-1)^2)/2)^2-LN(1-(2*p0330-1)^2)/0.140012289)-(2/(pi()*0.140012289)+LN(1-(2*p0330-1)^2)/2)))
- p1090: 3.6915e-5; = IF(p1071=0;p1084*p0001/(p0818*p0002);0)
- p0532: 0; = SQRT(2)*(IF((2*p0400-1)<0;-1;IF((2*p0400-1)>0;1;0))*SQRT(SQRT((2/(pi()*0.140012289)+LN(1-(2*p0400-1)^2)/2)^2-LN(1-(2*p0400-1)^2)/0.140012289)-(2/(pi()*0.140012289)+LN(1-(2*p0400-1)^2)/2)))
- p2980: 0; = p2394*(p1020+p1022)
- p0476: 0; = SQRT(2)*(IF((2*p0344-1)<0;-1;IF((2*p0344-1)>0;1;0))*SQRT(SQRT((2/(pi()*0.140012289)+LN(1-(2*p0344-1)^2)/2)^2-LN(1-(2*p0344-1)^2)/0.140012289)-(2/(pi()*0.140012289)+LN(1-(2*p0344-1)^2)/2)))
- p2875: 0.000514023; = p2289*(p1020+p1022)
- p0235: 0
- p3479: 0.111125; = if(p1328+p1330+p1332+p1334+p1336+p1338+p1340+p1342+p1344=0;0;p1334/(p1328+p1330+p1332+p1334+p1336+p1338+p1340+p1342+p1344))
- p0846: 0.475614; = p0841*p0845^3+p0842*p0845^2+p0843*p0845+p0844
- p1553: 0
- p2451: 0.000171451; = p2255*p1014
- p1559: 0
- p2344: 6.62219e-7; = p2228*p2212
- p3119: 2.27081e-6; = p2338*p1082
- p1029: 238899; = IF(p1012=0;IF(p0801<p1023*(p0704/100)*p0703*1000;p0801;p1023*(p0704/100)*p0703*1000);0)
- p2866: 3.67017e-5; = p2280*(p1020+p1022)
- p2461: 0.000364049; = p2265*p1073
- p3175: 0; = p2394*p1023
- p2967: 0; = p2381*(p1079+p1081)
- p1098: 0.0190972
- p3936: 6.97219e-7; = p1793*p3478
- p0775: 52.757; = p0115*(1+p0643*p0247/100)
- p3116: 4.13861e-6; = p2335*p1023
- p3171: 0; = p2390*p1132
- p3078: 9.90106e-6; = p2297*p1082
- p2702: 0.000811428; = p2311*(p1128+p1130)
- p3086: 1.83842e-8; = p2305*p1082
- p1888: 0
- p0370: 0.5
- p0153: 0
- p4644: 6.00747e-7; = p1883*p3481
- p1654: 0
- p0716: 81.486; = p0056*(1+p0584*p0188/100)
- p3893: 0; = p1956*p3477
- p3337: 0.00199123; = IF(or(p3254=0;p1232>0);0;p3272*p3289)
- p0966: 0.5167; = if(p0683=0;0;IF(p0684/100+p0965=1;0;1-(p0684/100+p0965)))
- p4554: 5.1424e-7; = p1793*p3481
- p3370: 0.000166331; = if(p1232=0;p3245*p3358/p0818;0)
- p0217: 5.345
- p0118: 38.406
- p0720: 0
- p2058: 1.24412
- p3360: 9.25662e8; = if(p1232=0;p3310+p3321+p3332+p3343+p3354;0)
- p1293: 0.138048; = p1287*p1252/p0818
- p2489: 0.00060475; = p2293*p1014
- p1122: 0; = p1121*p0001/(p0818*p0002)
- p1980: 3521.6
- p2106: 0.856281
- p0953: 1.7274e-5; = if(and(p0683>0;or(p0807=56;p0807=100;and(p0807=60;p0901>0.06)));p0935;0)
- p2156: 1.29467e-8; = p2015*p2085*p2118/(p0818*1000)
- p1984: 30
- p0089: 12.116
- p3779: 0; = p1842*p3477
- p1645: 0
- p0925: 0.305147; = IF(p0918+p0923+p0924=1;0;IF(p0918+p0923+p0924+p0921>1;1-(p0918+p0923+p0924);p0921))
- p3255: 2.52092e8; = p1252*(p1297*(1-p3247)+p1300*(1-p3248)+p1301*(1-p3249)+p1302*(1-p3250))
- p1586: 0
- p0909: 2.44274e8; = p0825*p0906+p0827*p0907+(p0830+p0895)*p0824*p0908
- p1706: 0
- p1314: 0.00973087; = p1310*p1252/p0818
- p1247: 4.14264e-6; = if(p1232>0;0;p1242*p0001/(p0818*p0002))
- p4153: 1.16542e-8; = p1804*p3479
- p0908: 0.000997792
- p1232: 0
- p2556: 1.56966e-5; = p2360*p1014
- p1999: 1.49359e9; = (p1228+p1229)*p0818+p1164
- p3323: 0.211308; = if(and(p1232=0;p3255<>0);p3265*p3277*(p3299*p3291+(1-p3299)*p3295);0)
- p0928: 3.482e6; = p0801*p0918
- p2017: 1.74104e7; = p2015*p0898
- p2519: 6.42825e-6; = p2323*p1014
- p2057: 3.28794
- p1046: 0.0261194; = IF(p1012=0;IF(p1037+p1044+p1045=1;0;IF(p1037+p1044+p1045+p1040>1;1-(p1037+p1044+p1045);p1040));0)
- p2900: 5.02806e-5; = p2314*(p1129+p1131)
- p1953: 0
- p0675: 161.399; = p0015*(1+p0543*p0147/100)
- p1150: 2.93763e8; = if(p1121=0;p1149*p1146*p1145;0)
- p4738: 0; = p1771*p3482
- p0853: 0.0551724; = p0803/(p0802+p0803)
- p2273: 0.00283369; = p2230*p2219
- p1255: 0.25065; = if(p1232>0;0;p0737/100)
- p2492: 0.000427785; = p2296*p1014
- p2246: 3.86783e-5; = p2222*p2191
- p1182: 952.925; = p1181*p0801
- p2393: 0; = p2234*p2182
- p1345: 1.28644e-5; = IF(p1318=0;p1344*p0001/(p0818*p0002);0)
- p3103: 6.12402e-7; = p2322*p1023
- p0128: 36.475
- p1813: 0
- p0460: 0; = SQRT(2)*(IF((2*p0328-1)<0;-1;IF((2*p0328-1)>0;1;0))*SQRT(SQRT((2/(pi()*0.140012289)+LN(1-(2*p0328-1)^2)/2)^2-LN(1-(2*p0328-1)^2)/0.140012289)-(2/(pi()*0.140012289)+LN(1-(2*p0328-1)^2)/2)))
- p4114: 5.15281e-6; = p1765*p3479
- p3024: 1.61124e-5; = p2243*p1023
- p3455: 0; = p3379*p1240
- p0574: 0; = IF(p0310<0.5;-SQRT(p0007*EXP(p0442^2*p0008)-p0007);SQRT(p0007*EXP(p0442^2*p0008)-p0007))
- p3156: 0; = p2375*p1082
- p2433: 0.000533661; = p2237*p1014
- p0937: 2.97753e-5; = p0931*p0001/(p0818*p0002)
- p1917: 0
- p1625: 0
- p2988: 0; = p2402*(p1020+p1022)
- p1357: 3095
- p0111: 46.664
- p0380: 0.5
- p1591: 0
- p1273: 0.109127; = p1267*p1252/p0818
- p0466: 0; = SQRT(2)*(IF((2*p0334-1)<0;-1;IF((2*p0334-1)>0;1;0))*SQRT(SQRT((2/(pi()*0.140012289)+LN(1-(2*p0334-1)^2)/2)^2-LN(1-(2*p0334-1)^2)/0.140012289)-(2/(pi()*0.140012289)+LN(1-(2*p0334-1)^2)/2)))
- p0213: 6.432
- p3166: 0; = p2385*p1082
- p3388: 0.000114614; = p3369*p1234
- p1020: 0; = IF(p1012=0;IF(p1014+p1019=1;0;IF(p1014+p1019+p1016>1;1-(p1014+p1019);p1016));0)
- p3111: 1.38395e-8; = p2330*p1023
- p3412: 0; = p3374*p1238
- p1963: 7.69091e-5; = p1963a+p1963b+p1963c+p1963d+p1963e+p1963f+p1963g+p1963h+p1963i+p1963j+p1963k
- p1060: 0.21
- p1752: 0.631349
- p4579: 8.65076e-8; = p1818*p3481
- p0315: 0.5
- p0824: 0.643929
- p1552: 0
- p3034: 2.26796e-7; = p2253*p1023
- p2879: 0.000182889; = p2293*(p1020+p1022)
- p2926: 2.04875e-5; = p2340*(p1079+p1081)
- p4863: 0; = p1896*p3482
- p1011: 5.1217e-8; = p1010*p0001*p0004/(p0818*p0002)
- p0581: 0; = IF(p0317<0.5;-SQRT(p0007*EXP(p0449^2*p0008)-p0007);SQRT(p0007*EXP(p0449^2*p0008)-p0007))
- p3440: 0; = p3364*p1240
- p1711: 0
- p2464: 1.08049e-5; = p2268*p1073
- p1013: 0; = p1012*p0001/(p0818*p0002)
- p2232: 0.193935; = if(p0783*p0787+p0784*p0788+p0785*p0789+p0786*p0790=0;0;p0789*p0785/(p0783*p0787+p0784*p0788+p0785*p0789+p0786*p0790))
- p1590: 0
- p2316: 5.04511e-5; = p2224*p2183
- p1410: 18
- p1131: 0; = if(p1121=0;IF(p1123+p1128+p1129+p1130=1;0;IF(p1123+p1128+p1129+p1130+p1127>1;1-(p1123+p1128+p1129+p1130);p1127));0)
- p1755: 0
- p1021: 0.2193; = IF(p1012=0;IF(p1014+p1019+p1020=1;0;IF(p1014+p1019+p1020+p1017>1;1-(p1014+p1019+p1020);p1017));0)
- p2278: 7.73178e-5; = p2223*p2184
- p0512: 0; = SQRT(2)*(IF((2*p0380-1)<0;-1;IF((2*p0380-1)>0;1;0))*SQRT(SQRT((2/(pi()*0.140012289)+LN(1-(2*p0380-1)^2)/2)^2-LN(1-(2*p0380-1)^2)/0.140012289)-(2/(pi()*0.140012289)+LN(1-(2*p0380-1)^2)/2)))
- p1179: 0.5
- p1958: 10181
- p0220: 14.103
- p0711: 34.312; = p0051*(1+p0579*p0183/100)
- p2149: 2.09371e-8; = p2015*p2077*p2111/(p0818*1000)
- p1019: 0.341; = IF(p1012=0;IF(p1014=1;0;IF(p1014+p1015>1;1-p1014;p1015));0)
- p1593: 0
- p2813: 0; = p2422*(p1078+p1080)
- p0735: 19.737; = p0075*(1+p0603*p0207/100)
- p2861: 6.57902e-5; = p2275*(p1129+p1131)
- p0801: 7.3e6
- p0727: 37.348; = p0067*(1+p0595*p0199/100)
- p1327a: 0.131839; = (p0745*1000/p0801)*(1-(p0746+p0747+p0748+p0749+p0750+p0751+p0752+p0753)/100)+(p0754*1000/p0801)*(1-(p0755+p0756+p0757+p0758+p0759+p0760+p0761+p0762)/100)
- p0999: 0; = IF(p0996=1;0;IF(p0996+p0997>1;1-p0996;p0997))
- p0461: 0; = SQRT(2)*(IF((2*p0329-1)<0;-1;IF((2*p0329-1)>0;1;0))*SQRT(SQRT((2/(pi()*0.140012289)+LN(1-(2*p0329-1)^2)/2)^2-LN(1-(2*p0329-1)^2)/0.140012289)-(2/(pi()*0.140012289)+LN(1-(2*p0329-1)^2)/2)))
- p1840: 0
- p2843: 8.55506e-5; = p2257*(p1020+p1022)
- p2724: 4.1372e-5; = p2333*(p1019+p1021)
- p1155: 0.00158655; = if(p1153*p0818=0;0;p1151/(p1153*p0818))
- p0916: 0.627956; = p0826+p0828+(p0832*(1+p0894))/p0818
- p0138: 91.904
- p1003: 0; = p0999*p0888
- p0768: 64.796; = p0108*(1+p0636*p0240/100)
- p2823: 0.00016139; = p2237*(p1020+p1022)
- p2363: 4.10887e-6; = p2225*p2191
- p3032: 6.28478e-8; = p2251*p1023
- p0838: 2.80727e10; = (p0833-p0836)*p0837
- p0538: 0; = IF(p0274<0.5;-SQRT(p0007*EXP(p0406^2*p0008)-p0007);SQRT(p0007*EXP(p0406^2*p0008)-p0007))
- p1161: 386790; = (p0722/100)*p0702*1000
- p1101: 0.0302087; = IF(p1071=0;IF(p1096=1;0;IF(p1096+p1097>1;1-p1096;p1097));0)
- p2435: 1.59276e-5; = p2239*p1014
- p2740: 6.14791e-5; = p2349*(p1078+p1080)
- p3687: 1.47193e-7; = p1956*p3476
- p1770: 0
- p1872: 0
- p1390: 42
- p0563: 0; = IF(p0299<0.5;-SQRT(p0007*EXP(p0431^2*p0008)-p0007);SQRT(p0007*EXP(p0431^2*p0008)-p0007))
- p1219: 0; = if(p1218=0;0;SQRT(2)*(IF((2*p1218-1)<0;-1;IF((2*p1218-1)>0;1;0))*SQRT(SQRT((2/(pi()*0.140012289)+LN(1-(2*p1218-1)^2)/2)^2-LN(1-(2*p1218-1)^2)/0.140012289)-(2/(pi()*0.140012289)+LN(1-(2*p1218-1)^2)/2))))
- p2905: 3.25615e-6; = p2319*(p1020+p1022)
- p1284: 0; = p1280*p1252/p0818
- p1960: 0; = IF(p1959-p1958<0;0;p1959-p1958)
- p2720: 1.39075e-7; = p2329*(p1019+p1021)
- p1301: 0.0149989; = IF(p1297+p1300=p1265;0;IF(p1297+p1300+p1299>p1265;p1265-(p1297+p1300);p1299))
- p0534: 0; = SQRT(2)*(IF((2*p0402-1)<0;-1;IF((2*p0402-1)>0;1;0))*SQRT(SQRT((2/(pi()*0.140012289)+LN(1-(2*p0402-1)^2)/2)^2-LN(1-(2*p0402-1)^2)/0.140012289)-(2/(pi()*0.140012289)+LN(1-(2*p0402-1)^2)/2)))
- p1874: 0
- p0951: 0; = if(and(p0683=0;or(p0807=480;p0807=32;p0807=1;and(p0807=60;p0901<0.03)));p0939;0)
- p0710: 91.904; = p0050*(1+p0578*p0182/100)
- p0196: 16.842
- p1035: 3.1933e-6; = IF(p1012=0;p1029*p0001/(p0818*p0002);0)
- p1601: 0
- p1941: 0
- p1181: 0.000130538
- p2362: 1.63391e-5; = p2225*p2190
- p3315: 0.00443516; = if(and(p1232=0;p3253<>0);p3264*p3289;0)
- p0607: 0; = IF(p0343<0.5;-SQRT(p0007*EXP(p0475^2*p0008)-p0007);SQRT(p0007*EXP(p0475^2*p0008)-p0007))
- p3357: 1.15278e8; = if(p1232=0;p3307+p3318+p3329+p3340+p3351;0)
- p1788: 0
- p2041: 6.76674e-7; = p2015*p2040/(p0818*1000)
- p2674: 0.000113853; = p2283*(p1019+p1021)
- p2925: 6.90344e-5; = p2339*(p1079+p1081)
- p2486: 8.71553e-7; = p2290*p1014
- p2185: 0.000484763; = p1065-p2184
- p3033: 1.03155e-7; = p2252*p1023
- p3085: 1.82696e-5; = p2304*p1082
- p5268: 1.72872e-7; = p1889*p3484
- p0577: 0; = IF(p0313<0.5;-SQRT(p0007*EXP(p0445^2*p0008)-p0007);SQRT(p0007*EXP(p0445^2*p0008)-p0007))
- p4320: 0; = p1765*p3480
- p1877: 0
- p1282: 0; = IF(p1277+p1280+p1281=p1260;0;p1260-(p1277+p1280+p1281))
- p0983: 1; = if(p0886=0;0;min(1;(p0695*p0694*1000*p0697/100)/p0886))
- p0570: 0; = IF(p0306<0.5;-SQRT(p0007*EXP(p0438^2*p0008)-p0007);SQRT(p0007*EXP(p0438^2*p0008)-p0007))
- p1985: 2.74104e9; = (if(p1057=0;0;p1050/p1057)+if(p1058=0;0;p1051/p1058)+if(p1059=0;0;p1052/p1059)+if(p1060=0;0;p1053/p1060)+if(p1061=0;0;p1054/p1061)+if(p1062=0;0;p1055/p1062)+if(p1063=0;0;p1056/p1063))*(1+p1157)
- p1713: 0
- p3403: 0.000640083; = p3365*p1238
- p1617: 0
- p2771: 0; = p2380*(p1078+p1080)
- p1792: 0
- p3438: 0; = p3362*p1240
- p0433: 0; = SQRT(2)*(IF((2*p0301-1)<0;-1;IF((2*p0301-1)>0;1;0))*SQRT(SQRT((2/(pi()*0.140012289)+LN(1-(2*p0301-1)^2)/2)^2-LN(1-(2*p0301-1)^2)/0.140012289)-(2/(pi()*0.140012289)+LN(1-(2*p0301-1)^2)/2)))
- p0929: 1.29231e6; = p0801*p0923
- p0884: 0; = IF(p0689=100;0;IF(p0689+p0688>100;100-p0689;p0688))
- p2282: 0.000717263; = p2223*p2188
- p2485: 0.0016997; = p2289*p1014
- p0894: 0.22
- p1083: 2.30133e6; = IF(p1071=0;p1073*(p0710/100)*p0703*1000;0)
- p2747: 3.04328e-6; = p2356*(p1019+p1021)
- p0799: 67.341; = p0139*(1+p0667*p0271/100)
- p1272: 0; = IF(p1267+p1270+p1271=p1259;0;p1259-(p1267+p1270+p1271))
- p2348: 1.23477e-5; = p2228*p2216
- p1188: 2691.97; = p1187*p0801
- p2143: 7.62635e-8; = p2015*p2071*p2105/(p0818*1000)
- p1027: 1.54226e6; = IF(p1012=0;p1021*(p0704/100)*p0703*1000;0)
- p2065: 0.0758824
- p0114: 61.892
- p1597: 0
- p1385: 107
- p2417: 0; = p2235*p2207
- p3066: 1.9869e-6; = p2285*p1023
- p1998: 152
- p3310: 1.89014e8; = if(and(p1232=0;p3252<>0);IF((p3306+p3307+p3308+p3309)+(p3252*(p3257*(1-p3277))/p3305)>p3252;p3252-(p3306+p3307+p3308+p3309);p3252*(p3257*(1-p3277))/p3305);0)
- p3997: 1.06212e-6; = p1854*p3478
- p2811: 0; = p2420*(p1078+p1080)
- p2422: 0; = p2235*p2212
- p0683: 19.008; = p0023*(1+p0551*p0155/100)
- p0632: 0; = IF(p0368<0.5;-SQRT(p0007*EXP(p0500^2*p0008)-p0007);SQRT(p0007*EXP(p0500^2*p0008)-p0007))
- p0034: 200.323
- p0239: 8.745
- p0321: 0.5
- p2426: 0; = p2235*p2216
- p2649: 0.000319434; = p2258*(p1078+p1080)
- p0704: 96.365; = p0044*(1+p0572*p0176/100)
- p0203: 18.468
- p0976: 0; = IF(p0687=0;IF(OR(p0686=0;p0689=0);0;p0686*1000*p0689/100);0)
- p3061: 1.32338e-5; = p2280*p1023
- p0050: 91.904
- p4720: 2.4671e-5; = p1963*p3481
- p2919: 6.95637e-6; = p2333*(p1020+p1022)
- p0459: 0; = SQRT(2)*(IF((2*p0327-1)<0;-1;IF((2*p0327-1)>0;1;0))*SQRT(SQRT((2/(pi()*0.140012289)+LN(1-(2*p0327-1)^2)/2)^2-LN(1-(2*p0327-1)^2)/0.140012289)-(2/(pi()*0.140012289)+LN(1-(2*p0327-1)^2)/2)))
- p2728: 0.000179195; = p2337*(p1078+p1080)
- p3152: 4.63262e-6; = p2371*p1023
- p1722: 0.728757
- p2851: 8.44552e-5; = p2265*(p1079+p1081)
- p2472: 0.00080701; = p2276*p1014
- p2098: 0.856281
- p0635: 0; = IF(p0371<0.5;-SQRT(p0007*EXP(p0503^2*p0008)-p0007);SQRT(p0007*EXP(p0503^2*p0008)-p0007))
- p1570: 0
- p2684: 0.0010877; = p2293*(p1019+p1021)
- p3102: 2.16169e-6; = p2321*p1023
- p2729: 5.80279e-5; = p2338*(p1078+p1080)
- p3446: 0; = p3370*p1240
- p0504: 0; = SQRT(2)*(IF((2*p0372-1)<0;-1;IF((2*p0372-1)>0;1;0))*SQRT(SQRT((2/(pi()*0.140012289)+LN(1-(2*p0372-1)^2)/2)^2-LN(1-(2*p0372-1)^2)/0.140012289)-(2/(pi()*0.140012289)+LN(1-(2*p0372-1)^2)/2)))
- p2460: 2.77998e-5; = p2264*p1073
- p2687: 0.000769415; = p2296*(p1019+p1021)
- p2618: 0; = p2422*p1073
- p1183: 9.75771e-5; = p0801*p0001/(p0818*p0002)
- p2154: 7.20978e-8; = p2015*p2082*p2116/(p0818*1000)
- p0839: 0.420588; = p0838/p0818
- p3159: 0; = p2378*p1082
- p0245: 2.062
- p2989: 0; = p2403*(p1020+p1022)
- p2802: 0; = p2411*(p1019+p1021)
- p3669: 2.9715e-8; = p1938*p3476
- p1143: 0; = if(p1121=0;p1137*p0001/(p0818*p0002);0)
- p3090: 3.4279e-7; = p2309*p1082
- p3133: 6.75676e-6; = p2352*p1132
- p1043: 0.249535
- p2237: 0.00171309; = p2222*p2182
- p0752: 0
- p1851: 0
- p3657: 4.83733e-9; = p1926*p3476
- p1119: 0.0064208; = IF(p1071=0;p1109/(p1114*p0818);0)
- p2410: 0; = p2234*p2200
- p0043: 7297.92
- p3419: 0.00333933; = p3362*p1239
- p3211: 0; = p2430*p1132
- p0048: 21.93
- p1843: 0
- p1991: 9.36049e8; = (if(p1111=0;0;p1106/p1111)+if(p1112=0;0;p1107/p1112)+if(p1113=0;0;p1108/p1113)+if(p1114=0;0;p1109/p1114)+if(p1115=0;0;p1110/p1115))*(1+p1157)
- p2957: 1.28478e-5; = p2371*(p1020+p1022)
- p1950: 0
- p0714: 14.378; = p0054*(1+p0582*p0186/100)
- p2382: 0; = p2229*p2211
- p3423: 0.00331795; = p3366*p1239
- p4348: 0; = p1793*p3480
- p2054: 0.91
- p0266: 15.741
- p0825: 5.87146e10; = p0818*p0822
- p1671: 0
- p1193: 0; = IF(OR(p1036=0;p1095=0);0.0001*p0857;0)
- p3059: 2.62649e-6; = p2278*p1023
- p0369: 0.5
- p2176: 0.00189747; = p0895*p0913/p0818
- p4850: 0; = p1883*p3482
- p3256: 1.52965e8; = p1252*(p1307*(1-p3247)+p1310*(1-p3248)+p1311*(1-p3249)+p1312*(1-p3250))
- p0917: 0.978338; = (p0825+p0827+(p0830+p0895))/p0818-(p0900+p0905+p0910+p0915)
- p0546: 0; = IF(p0282<0.5;-SQRT(p0007*EXP(p0414^2*p0008)-p0007);SQRT(p0007*EXP(p0414^2*p0008)-p0007))
- p3826: 0; = p1889*p3477
- p0765: 87.271; = p0105*(1+p0633*p0237/100)
- p2602: 0; = p2406*p1014
- p0499: 0; = SQRT(2)*(IF((2*p0367-1)<0;-1;IF((2*p0367-1)>0;1;0))*SQRT(SQRT((2/(pi()*0.140012289)+LN(1-(2*p0367-1)^2)/2)^2-LN(1-(2*p0367-1)^2)/0.140012289)-(2/(pi()*0.140012289)+LN(1-(2*p0367-1)^2)/2)))
- p0759: 0
- p0323: 0.5
- p2078: 0.117
- p1721: 0
- p1236: 0.31542; = if(p1232>0;0;p0728/100)
- p1102: 0.0190972; = IF(p1071=0;IF(p1096+p1101=1;0;IF(p1096+p1101+p1098>1;1-(p1096+p1101);p1098));0)
- p3300: 1; = if(p1293+p1294+p1295+p1296=0;0;p1293/(p1293+p1294+p1295+p1296))
- p0686: 200.323; = p0026*(1+p0554*p0158/100)
- p1281: 0; = IF(p1277+p1280=p1263;0;IF(p1277+p1280+p1279>p1263;p1263-(p1277+p1280);p1279))
- p0676: 0
- p0358: 0.5
- p2593: 0; = p2397*p1014
- p2966: 0; = p2380*(p1079+p1081)
- p3708: 0; = p1771*p3477
- p0712: 41.176; = p0052*(1+p0580*p0184/100)
- p2456: 5.77823e-5; = p2260*p1073
- p4699: 2.06657e-7; = p1938*p3481
- p2693: 8.25689e-5; = p2302*(p1078+p1080)
- p2380: 0; = p2229*p2209
- p1849: 0
- p1049: 0.249535; = IF(p1012=0;IF(p1037+p1044+p1045+p1046+p1047+p1048=1;0;1-(p1037+p1044+p1045+p1046+p1047+p1048));0)
- p0689: 86.933; = p0029*(1+p0557*p0161/100)
- p4359: 0; = p1804*p3480
- p1039: 0.050076
- p2653: 0.000230525; = p2262*(p1078+p1080)
- p3100: 1.1741e-6; = p2319*p1023
- p1197: 1.806
- p2216: 4.80227e-5; = p1108/p0818
- p0967: 6.28351e7; = (p0684/100)*p0683*p0682*1000
- p2281: 5.60684e-5; = p2223*p2187
- p2038: 0.304457
- p2195: 0.00100471; = p2194*p2193
- p1207: 308.498; = if(p1193>0;0;(p1194*p1050/p1057+p1195*p1051/p1058+p1196*p1052/p1059+p1197*p1053/p1060+p1198*p1054/p1061+p1199*p1055/p1062+p1200*p1056/p1063)/(p0702*1000)+(p1201*p1109/p1114+p1202*p1110/p1115)/(p0702*1000)+p1203*p1170/p0801+p1204*p1176/p0801)
- p2513: 2.1369e-6; = p2317*p1014
- p3304: 0.0017178; = if(and(p1232=0;p3252<>0);p3260*p3289;0)
- p2457: 0.000479762; = p2261*p1073
- p2482: 0.000147454; = p2286*p1014
- p1655: 0
- p0110: 61.466
- p0490: 0; = SQRT(2)*(IF((2*p0358-1)<0;-1;IF((2*p0358-1)>0;1;0))*SQRT(SQRT((2/(pi()*0.140012289)+LN(1-(2*p0358-1)^2)/2)^2-LN(1-(2*p0358-1)^2)/0.140012289)-(2/(pi()*0.140012289)+LN(1-(2*p0358-1)^2)/2)))
- p3458: 4.75666e-5; = p3363*p1241
- p0982: 0; = if(p0886=0;0;min(1;(p0691*p0690*1000*p0693/100)/p0886))
- p3057: 8.80012e-5; = p2276*p1023
- p0657: 0; = IF(p0393<0.5;-SQRT(p0007*EXP(p0525^2*p0008)-p0007);SQRT(p0007*EXP(p0525^2*p0008)-p0007))
- p1757: 0
- p2307: 2.4942e-5; = p2227*p2214
- p1081: 0; = IF(p1071=0;IF(p1073+p1078+p1079+p1080=1;0;IF(p1073+p1078+p1079+p1080+p1077>1;1-(p1073+p1078+p1079+p1080);p1077));0)
- p1326: 0.0859704; = IF(((p0745*1000*p0753/100)+(p0754*1000*p0762/100))/p0801<0;0;((p0745*1000*p0753/100)+(p0754*1000*p0762/100))/p0801)
- p3541: 8.29256e-8; = p1810*p3476
- p2015: 3.79542e7; = p0830*p2011*p2013
- p2009: 0.0053779; = ((p1983*p1985+p1989*p1991+p1995*p1997+p2003*p2005+p1976*p1977+p1978*p1979+p1998*p1999)/p0818)*p0005*p0002/1000
- p2679: 0.000309263; = p2288*(p1019+p1021)
- p0979: 0; = IF(p0976=0;0;p0976*p0001/(p0818*p0002))
- p3354: 6.28531e7; = IF((p3350+p3351+p3352+p3353)+IF(p3349=0;0;(p3256*(p3273*(1-p3277))/p3349))>p3256;p3256-(p3350+p3351+p3352+p3353);IF(p3349=0;0;p3256*(p3273*(1-p3277))/p3349))
- p0104: 96.365
- p1725: 0
- p2463: 3.83067e-6; = p2267*p1073
- p0398: 0.5
- p2299: 0.000133385; = p2227*p2206
- p0858: 0.225972; = p0670*1000/p0856
- p4700: 7.68956e-8; = p1939*p3481
- p0665: 0; = IF(p0401<0.5;-SQRT(p0007*EXP(p0533^2*p0008)-p0007);SQRT(p0007*EXP(p0533^2*p0008)-p0007))
- p0477: 0; = SQRT(2)*(IF((2*p0345-1)<0;-1;IF((2*p0345-1)>0;1;0))*SQRT(SQRT((2/(pi()*0.140012289)+LN(1-(2*p0345-1)^2)/2)^2-LN(1-(2*p0345-1)^2)/0.140012289)-(2/(pi()*0.140012289)+LN(1-(2*p0345-1)^2)/2)))
- p2095: 0.765734
- p3379: 0; = if(p1232=0;p3246*p3361/p0818;0)
- p1226: 7.3e6; = IF(p1221=0;0;IF(p1193=0;p0801;0))
- p2366: 3.87747e-5; = p2225*p2195
- p1781: 0
- p0760: 0
- p3170: 0; = p2389*p1132
- p3288: 0.505
- p0204: 34.253
- p3947: 4.56125e-8; = p1804*p3478
- p1577: 0
- p2288: 0.00055196; = p2223*p2195
- p2376: 0; = p2229*p2205
- p0072: 26.563
- p2034: 2.72609e-6; = p2015*p2030*p2032/(p0818*1000)

## Reference product
- corn grain; at harvest in 2005; at farm; 85%-91% moisture: 1 kg

## Inputs from technosphere
- CUTOFF nitrogenous fertilizer, sodium nitrate; at point-of-sale: 3.18287e-5 kg; = p1069
- CUTOFF pesticide, Glyphosate diammonium salt; at point-of-sale; kg AI: 4.04516e-6 kg; = p1856
- CUTOFF apply N fertilizer; no broadcast application: 2.92839e-5 ha; = p1030
- CUTOFF pesticide, Tefluthrin; at point-of-sale; kg AI: 2.39713e-7 kg; = p1939
- CUTOFF planting; for conventional till, corn; <15% residue: 4.65429e-5 ha; = p0952
- CUTOFF prepare soil; for mulch till, corn: 1.7274e-5 ha; = p0935
- CUTOFF apply liming materials; unspecified method: 9.75771e-5 ha; = p1227
- CUTOFF liming materials storage: 0.0111883 kg*a; = p1231
- CUTOFF apply sewage sludge; unspecified method: 9.75771e-5 ha; = p1189
- CUTOFF pesticide, Flumetsulam; at point-of-sale; kg AI: 2.09749e-7 kg; = p1842
- CUTOFF apply single or mixed K fertilizer; unspec. method: 4.77888e-6 ha; = p1144
- CUTOFF phosphatic fertilizer, other single phosphates; at point-of-sale: 0.000478424 kg; = p1118
- CUTOFF planting; for unspec. till, corn: 3.98486e-6 ha; = p0957
- CUTOFF nitrogenous fertilizer, anhydrous ammonia; at point-of-sale: 0.00575056 kg; = p1064
- CUTOFF phosphatic fertilizer, monoammonium phosphate; at point-of-sale: 0.00420858 kg; = p1120
- CUTOFF poultry manure; from unspecified storage; at point-of-sale: 0.0011292 kg; = p1306
- corn residue; at harvest in 2005; at farm; 22%-91% moisture: 0.420588 kg; = p0839
- CUTOFF apply manure; injected/knifed in: 4.75516e-6 ha; = p1249
- CUTOFF apply K fertilizer; no broadcast application: 2.13738e-5 ha; = p1139
- CUTOFF dairy manure; from lagoon storage; at point-of-sale: 0.222557 kg; = p1283
- CUTOFF poultry manure; from semi-solid to solid storage; at point-of-sale: 0.0160368 kg; = p1304
- CUTOFF pesticide, Mesotrione; at point-of-sale; kg AI: 1.87276e-6 kg; = p1883
- CUTOFF international vessel transport; average fuel: 0.191516 metric ton*km; = p2006
- CUTOFF prepare soil; for unspec. till, corn: 3.98486e-6 ha; = p0939
- CUTOFF apply P fertilizer; broadcast with incorporation: 3.6915e-5 ha; = p1090
- CUTOFF apply mixed N fertilizer; with incorporation: 2.06149e-5 ha; = p1033
- CUTOFF pesticide storage: 0.000146018 kg*a; = p1965
- CUTOFF pesticide, Nicosulfuron; at point-of-sale; kg AI: 3.29606e-7 kg; = p1896
- CUTOFF pesticide, Acetochlor; at point-of-sale; kg AI: 4.63695e-5 kg; = p1765
- CUTOFF planting; for reduced till, corn; 15-30% residue: 2.97753e-5 ha; = p0955
- CUTOFF hog manure; from lagoon storage; at point-of-sale: 0.138048 kg; = p1293
- CUTOFF nitrogenous fertilizer, nitrogen solutions; at point-of-sale: 0.0156232 kg; = p1068
- CUTOFF sewage sludge; at point-of-sale: 4.03314e-8 kg; = p1190
- CUTOFF apply sulfuric acid; unspecified method: 9.75771e-5 ha; = p1177
- CUTOFF gypsum; at point-of-sale: 5.1273e-7 kg; = p1166
- CUTOFF apply pesticide; banded or side-dressed: 1.1262e-5 ha; = p1329
- CUTOFF gypsum storage: 2.56365e-7 kg*a; = p1168
- CUTOFF pesticide, Dicamba-potassium; at point-of-sale; kg AI: 1.79785e-6 kg; = p1810
- CUTOFF corn seeds; nonGMO herbicide resistant seed; at point-of-sale: 6.30344e-5 kg; = p0971
- CUTOFF apply pesticide; as foliar or directed spray: 7.83233e-5 ha; = p1339
- CUTOFF domestic barge transport; average fuel: 0.0204896 metric ton*km; = p2007
- CUTOFF corn seeds; GMO herbicide resistant seed; at point-of-sale: 0.000941401 kg; = p0970
- CUTOFF poultry manure; from slurry storage; at point-of-sale: 0.00779494 kg; = p1305
- CUTOFF pesticide, Dicamba-sodium; at point-of-sale; kg AI: 6.74194e-7 kg; = p1811
- CUTOFF phosphatic fertilizer, superphos. grades 22% and under; at point-of-sale: 2.95072e-5 kg; = p1116
- CUTOFF apply N fertilizer; broadcast with incorporation: 3.20552e-5 ha; = p1031
- CUTOFF apply pesticide; in seed furrow: 8.38874e-6 ha; = p1343
- CUTOFF sulfuric acid; at point-of-sale: 3.82334e-8 kg; = p1178
- CUTOFF apply pesticide; broadcast without incorporation: 2.71327e-5 ha; = p1335
- CUTOFF sewage sludge storage: 2.01657e-8 kg*a; = p1192
- CUTOFF zinc compounds; at point-of-sale: 1.42768e-8 kg; = p1184
- CUTOFF pesticide, Glufosinate-ammonium; at point-of-sale; kg AI: 2.44208e-6 kg; = p1854
- CUTOFF apply mixed P fertilizer; with incorporation: 1.28901e-5 ha; = p1092
- CUTOFF harvest; corn: 9.15621e-5 ha; = p1971
- CUTOFF zinc compounds storage: 7.1384e-9 kg*a; = p1186
- CUTOFF apply gypsum; unspecified method: 9.75771e-5 ha; = p1165
- CUTOFF fertilizer storage: 0.0349779 kg*a; = p1160
- CUTOFF apply manure; broadcast without incorporation: 5.63046e-6 ha; = p1248
- CUTOFF pesticide, Rimsulfuron; at point-of-sale; kg AI: 1.04875e-7 kg; = p1926
- CUTOFF pesticide formulation balance; at point-of-sale: 7.69091e-5 kg; = p1963
- CUTOFF unspecified animal manure; from unspecified storage; at point-of-sale: 0.000685182 kg; = p1316
- CUTOFF phosphatic fertilizer, diammonium phosphate; at point-of-sale: 0.0064208 kg; = p1119
- CUTOFF apply pesticide; unspecified application methods: 1.28644e-5 ha; = p1345
- CUTOFF harvest; corn residue management: 9.75771e-5 ha; = p1975
- CUTOFF apply P fertilizer; broadcast without incorporation: 7.13628e-6 ha; = p1091
- CUTOFF pesticide, Diflufenzopyr-sodium; at point-of-sale; kg AI: 2.69677e-7 kg; = p1818
- CUTOFF pesticide, Tebupirimfos; at point-of-sale; kg AI: 6.4423e-7 kg; = p1938
- CUTOFF limestone, high-grade, pulverized; at point-of-sale: 0.0182756 kg; = p1228
- CUTOFF apply sulfur; unspecified method: 9.75771e-5 ha; = p1171
- CUTOFF pesticide, Dimethenamid-p; at point-of-sale; kg AI: 5.81305e-6 kg; = p1820
- CUTOFF pesticide, Glyphosate; at point-of-sale; kg AI: 4.27439e-5 kg; = p1855
- CUTOFF unspecified animal manure; from slurry storage; at point-of-sale: 0.00472985 kg; = p1315
- CUTOFF apply K fertilizer; broadcast with incorporation: 4.19702e-5 ha; = p1140
- CUTOFF seed storage; corn: 0.00103914 kg*a; = p0975
- CUTOFF harvest; corn silage: 5.34669e-6 ha; = p1974
- CUTOFF local area trucking; class 6, average fuel: 0.00153672 metric ton*km; = p2010
- CUTOFF regional or national trucking; class 8, average fuel: 0.0053779 metric ton*km; = p2009
- CUTOFF apply manure; broadcast or spray with incorporation: 4.14264e-6 ha; = p1247
- CUTOFF apply zinc compounds; unspecified method: 9.75771e-5 ha; = p1183
- CUTOFF prepare soil; for conventional till, corn; <15% residue: 4.65429e-5 ha; = p0934
- CUTOFF phosphatic fertilizer, superphosphate grades over 22%; at point-of-sale: 0.000362628 kg; = p1117
- CUTOFF pesticide, Vernolate; at point-of-sale; kg AI: 3.19118e-6 kg; = p1956
- CUTOFF sulfur storage: 4.09406e-8 kg*a; = p1174
- CUTOFF fertilizer filler materials; at point-of-sale: 0.0125906 kg; = p1158
- CUTOFF sulfuric acid storage: 1.91167e-8 kg*a; = p1180
- CUTOFF dolomite, pulverized; at point-of-sale: 0.00410098 kg; = p1229
- CUTOFF apply manure; unspec. method: 5.47397e-7 ha; = p1251
- CUTOFF N inhibitor appl svc; unspec rate & type, 2005 corn: 5.79492e-6 ha; = p1162
- CUTOFF pesticide, Chlorpyrifos; at point-of-sale; kg AI: 1.60308e-6 kg; = p1793
- CUTOFF pesticide, Propazine; at point-of-sale; kg AI: 3.28108e-6 kg; = p1889
- CUTOFF prepare soil; for reduced till, corn; 15-30% residue: 2.97753e-5 ha; = p0937
- CUTOFF potassic fertilizer, potassium chloride; at point-of-sale: 0.0106034 kg; = p1154
- CUTOFF unspecified manure; from semi-solid to solid storage; at point-of-sale: 0.00973087 kg; = p1314
- CUTOFF pesticide, Atrazine; at point-of-sale; kg AI: 2.48703e-5 kg; = p1771
- CUTOFF planting; for mulch till, corn: 1.7274e-5 ha; = p0953
- CUTOFF pesticide, beta-Cyfluthrin; at point-of-sale; kg AI: 1.04875e-7 kg; = p1804
- CUTOFF nitrogenous fertilizer, ammonium nitrate; at point-of-sale: 0.00211678 kg; = p1066
- CUTOFF unspecified animal manure; from lagoon storage; at point-of-sale: 0.00372444 kg; = p1313
- CUTOFF apply P fertilizer; no broadcast application: 3.07613e-5 ha; = p1089
- corn silage; at harvest in 2005; at farm; 28%-40% moisture: 0.191771 kg; = p0819
- CUTOFF corn seeds; seed, unspec. type; at point-of-sale: 0.00107385 kg; = p0972
- CUTOFF nitrogenous fertilizer, aqueous ammonia; at point-of-sale: 0.000625501 kg; = p1065
- CUTOFF apply mixed N fertilizer; without incorporation: 8.85606e-6 ha; = p1034
- CUTOFF apply single or mixed P fertilizer; unspec. method: 1.94903e-6 ha; = p1094
- CUTOFF nitrogenous fertilizer, ammonium sulfate; at point-of-sale: 0.0017613 kg; = p1067
- CUTOFF pesticide, S-Metolachlor; at point-of-sale; kg AI: 1.02028e-5 kg; = p1927
- CUTOFF apply K fertilizer; broadcast without incorporation: 1.13661e-5 ha; = p1141
- CUTOFF pesticide, Clopyralid; at point-of-sale; kg AI: 6.29247e-7 kg; = p1798
- CUTOFF beef manure; from lagoon storage; at point-of-sale: 0.109127 kg; = p1273
- CUTOFF irrigate; unspec. irrigation method, unspec. water source, in 2005: 5.1217e-8 ha-m; = p1011
- CUTOFF potassic fertilizer, other single nutrients; at point-of-sale: 0.00158655 kg; = p1155
- CUTOFF irrigate; pressure, groundwater source, in 2005: 3.4074e-7 ha-m; = p0993
- CUTOFF bulk cargo rail transport; diesel: 0.0384179 metric ton*km; = p2008
- CUTOFF pesticide, Pendimethalin; at point-of-sale; kg AI: 1.09369e-6 kg; = p1903
- CUTOFF apply single or mixed N fertilizer; unspec. method: 3.1933e-6 ha; = p1035
- CUTOFF apply pesticide; broadcast with incorporation: 0.000106193 ha; = p1333
- CUTOFF nitrogenous fertilizer, urea; at point-of-sale: 0.00776621 kg; = p1070
- CUTOFF sulfur; at point-of-sale: 8.18812e-8 kg; = p1172
- CUTOFF poultry manure; from lagoon storage; at point-of-sale: 0.00613799 kg; = p1303

## Inputs from nature
- Water, ground: 3.4074 kg; = p0887
- Transformation, to annual crop [natural resource, land]: 0.975771 m2; = 1.0 * (p0857)
- Dry matter except CNPK; from plant uptake: 0.978338 kg; = p0917
- Nitrogen: 0.0212424 kg; = p0905
- Water, unspecified origin: 0.00162579 m3; = p0893*0.001+p0916*0.001
- Occupation, annual crop [natural resource, land]: 0.458705 m2*year; = 1.0 * (p0855)
- Potassium; from plant uptake; biogenic: 0.0105973 kg; = p0915
- Carbon dioxide: 2.29359 kg; = p0900*3.6666666667
- Phosphorus: 0.00365973 kg; = p0910
- Transformation, from annual crop [natural resource, land]: 0.975771 m2; = 1.0 * (p0879+p0881+p0871+p0873+p0883)

## Emissions to nature
- Potassium; in above-ground residue left on field; biogenic: 0.00450152 kg; = p2170
- Ammonium sulfate; unspec. appl. method in fert. after plant.: 2.28599e-6 kg; = p3142*4.7142857143
- Acetone [air, non-urban air or from high stacks]: 2.53758e-7 kg; = 1.0 * (p2139*1.6111111111)
- Dicamba-sodium; foliar or directed spray: 2.16269e-7 kg; = p4572
- Ammonium sulfate; broadcast w/o incorp. in fert. after plant.: 6.33981e-6 kg; = p2947*4.7142857143
- Other single phosphates; unspec. appl. method in fert. in fall bef. plant.; kg P: 4.32785e-7 kg; = p3051
- Volatile constituents; using unspec. method in man. in spr.bef.plant.: 0.00012161 kg; = p3467
- Plant dry matter; in below-ground residue: 0.0642478 kg; = p2177
- Ammonium sulfate; broadcast w/ incorp. in fert. in fall bef. plant.: 0.000354932 kg; = p2635*4.7142857143
- Anhydrous ammonia; no broadcast in fert. in fall bef. plant.: 0.000648016 kg; = p2433*1.2142857143
- Potassium chloride; broadcast w/ incorp. in fert. at plant.: 0.000998986 kg; = p2741*2.2166666667
- Nonvolatile constituents;broadcast w/o incorp. in man. in spr.bef.plant; exc.CNPK,biogenic: 0.000157938 kg; = p3411
- Other single K nutrients; broadcast w/ incorp. in fert. at plant.; kg K: 5.93408e-5 kg; = p2743
- Gypsum: 5.1273e-7 kg; = p3229
- Zinc compounds: 1.42768e-8 kg; = p3232
- isopentane: 9.62388e-9 kg; = p2151*1.0166666667
- Tebupirimphos [soil, agricultural]: 6.4423e-7 kg; = 1.0 * (p4699+p5317+p4081+p4287+p3669+p5111)
- Urea; broadcast w/o incorp. in fert. at plant.: 3.47819e-5 kg; = p2919*5
- Other single K nutrients; unspec. appl. method in fert. at plant.; kg K: 6.75676e-6 kg; = p3133
- Other single K nutrients; unspec. appl. method in fert. in spr. bef. plant.; kg K: 1.21655e-5 kg; = p3094
- Urea; broadcast w/o incorp. in fert. in fall bef. plant.: 0.000259251 kg; = p2841*5
- Sodium nitrate; broadcast w/ incorp. in fert. in fall bef. plant.: 6.2937e-6 kg; = p2642*6.0714285714
- Other single K nutrients; unspec. appl. method in fert. in fall bef. plant.; kg K: 1.59181e-5 kg; = p3055
- Diflufenzopyr-sodium [soil, agricultural]: 2.69677e-7 kg; = 1.0 * (p3549+p3961+p5197+p4167+p4579+p4991)
- Ammonium sulfate; unspec. appl. method in fert. in spr. bef. plant.: 3.25412e-5 kg; = p3064*4.7142857143
- Ammonium nitrate; unspec. appl. method in fert. after plant.: 4.3827e-6 kg; = p3139*4.7142857143
- Nitrogen; in above-ground residue left on field: 0.00315713 kg; = p2168
- Potassium chloride; unspec. appl. method in fert. at plant.: 0.000113748 kg; = p3131*2.2166666667
- Nitrogen; injected/knifed in manure in spring before planting: 0.000131561 kg; = p3426
- Propane [air, non-urban air or from high stacks]: 1.6015e-7 kg; = 1.0 * (p2142*1.2222222222)
- Ammonium nitrate; unspec. appl. method in fert. in spr. bef. plant.: 6.23879e-5 kg; = p3061*4.7142857143
- Hydrocyanic acid: 1.6222e-7 kg; = p2154*2.25
- Ammonium sulfate; unspec. appl. method in fert. in fall bef. plant.: 2.15189e-5 kg; = p3025*4.7142857143
- Plant dry matter; from residue burning: 0.00020224 kg; = p2164
- Glycolaldehyde; from residue burning: 1.14564e-6 kg; = p2135*2.5
- Diammonium phosphate; broadcast w/o incorp. in fert. in fall bef. plant.: 0.000195149 kg; = p2845*4.7142857143
- Superphosphate, grades<= 22%; broadcast w/ incorp. in fert. in fall bef. plant.; kg P: 5.93122e-7 kg; = p2657
- Nonvolatile constituents; broadcast w/incorp. in man. in spr.bef.plant; exc.CNPK,biogenic: 0.000116204 kg; = p3392
- Dinitrogen monoxide [air, non-urban air or from high stacks]: 3.98118e-8 kg; = 1.0 * (p2044*1.5714285714)
- Acetol; from residue burning: 2.14104e-6 kg; = p2134*2.0555555556
- Potassium chloride; broadcast w/ incorp. in fert. in spr. bef. plant.: 0.00179867 kg; = p2702*2.2166666667
- Pesticide formulation balance; unspec. appl. method: 4.05216e-6 kg; = p5338
- Potassium; broadcast w/ incorp. in manure in fall before planting; biogenic: 0.000470945 kg; = p3384
- Pesticide formulation balance; foliar or directed spray: 2.4671e-5 kg; = p4720
- Other single phosphates; broadcast w/o incorp. in fert. in spr. bef. plant.; kg P: 1.25511e-6 kg; = p2895
- Ammonium nitrate; broadcast w/o incorp. in fert. at plant.: 1.53504e-5 kg; = p2905*4.7142857143
- Glufosinate ammonium [soil, agricultural]: 2.44208e-6 kg; = 1.0 * (p5027+p4203+p3997+p5233+p3585+p4615)
- Carbon monoxide, fossil [air, non-urban air or from high stacks]: 3.0182e-5 kg; = 1.0 * (p2028*2.3333333333)
- Potassium chloride; broadcast w/ incorp. in fert. in fall bef. plant.: 0.00235348 kg; = p2663*2.2166666667
- Butadiene [air, non-urban air or from high stacks]: 8.57965e-8 kg; = 1.0 * (p2143*1.125)
- Urea; broadcast w/ incorp. in fert. in fall bef. plant.: 0.00154186 kg; = p2646*5
- Phosphorous; using unspec. method in manure in fall before planting: 1.89688e-5 kg; = p3459
- Urea; no broadcast in fert. at plant.: 0.000115012 kg; = p2529*5
- Nitrogen solution; broadcast w/ incorp. in fert. in fall bef. plant.; broadcast w/ incorp. in fert. in fall bef. plan...: 0.000954041 kg; = p2639
- Urea; unspec. appl. method in fert. at plant.: 1.25416e-5 kg; = p3114*5
- Dicamba-potassium; unspec. appl. method: 9.47245e-8 kg; = p5189
- Aqueous ammonia; broadcast w/o incorp. in fert. in fall bef. plant.: 5.84903e-6 kg; = p2825*1.2142857143
- Pesticide formulation balance; banded or side-dressed: 3.54742e-6 kg; = p3690
- Nitrogen; using unspec. method in manure in spring before planting: 1.51448e-5 kg; = p3464
- Anhydrous ammonia; broadcast w/o incorp. in fert. in spr. bef. plant.: 0.000296354 kg; = p2862*1.2142857143
- Acetonitrile [air, non-urban air or from high stacks]: 1.19368e-7 kg; = 1.0 * (p2155*1.7083333333)
- Urea; broadcast w/ incorp. in fert. at plant.: 0.00020686 kg; = p2724*5
- Ethyne [air, non-urban air or from high stacks]: 1.54785e-7 kg; = 1.0 * (p2132*1.0833333333)
- Nonvolatile constituents; broadcast w/incorp. in man. in fal.bef.plant; exc.CNPK,biogenic: 0.000364971 kg; = p3386
- Dimethenamid-p; banded or side-dressed: 2.68126e-7 kg; = p3551
- Superphosphate, grades>22%; no broadcast in fert. in spr. bef. plant.; kg P: 8.55808e-6 kg; = p2503
- Phosphorous; broadcast w/o incorp. in manure in spring before planting: 6.21214e-5 kg; = p3408
- Anhydrous ammonia; broadcast w/o incorp. in fert. after plant.: 2.08186e-5 kg; = p2940*1.2142857143
- Monoammonium phosphate; broadcast w/ incorp. in fert. in fall bef. plant.: 0.000856308 kg; = p2654*8.2142857143
- Superphosphate, grades>22%; unspec. appl. method in fert. in spr. bef. plant.; kg P: 5.42238e-7 kg; = p3088
- Oxygen; applied in dolomite: 0.00205847 kg; = p3228
- Nitrogen solution; unspec. appl. method in fert. in spr. bef. plant.; unspec. appl. method in fert. in spr. bef. plan...: 8.74694e-5 kg; = p3068
- Glyphosate diammonium salt; foliar or directed spray: 1.29761e-6 kg; = p4617
- Toluene [air, non-urban air or from high stacks]: 1.08308e-7 kg; = 1.0 * (p2141*1.0952380952)
- Isoprene [air, non-urban air or from high stacks]: 2.14565e-7 kg; = 1.0 * (p2145*1.1333333333)
- Volatile constituents; broadcast w/o incorp. in man. in fal.bef.plant: 0.00392869 kg; = p3404
- Monoammonium phosphate; unspec. appl. method in fert. in spr. bef. plant.: 2.65418e-5 kg; = p3083*8.2142857143
- Anhydrous ammonia; unspec. appl. method in fert. after plant.: 7.50673e-6 kg; = p3135*1.2142857143
- Potassium; broadcast w/o incorp. in manure in spring before planting; biogenic: 0.000203797 kg; = p3409
- Urea; unspec. appl. method in fert. in fall bef. plant.: 9.348e-5 kg; = p3036*5
- Other single phosphates; no broadcast in fert. at plant.; kg P: 4.23673e-6 kg; = p2544
- Acrylonitrile: 1.90604e-8 kg; = p2156*1.4722222222
- Sewage sludge dry matter; applied in sewage sludge: 2.0884e-10 kg; = p3243
- Nitrogen; broadcast w/o incorp. in manure in spring before planting: 0.000155777 kg; = p3407
- Aqueous ammonia; broadcast w/ incorp. in fert. after plant.: 3.69541e-6 kg; = p2747*1.2142857143
- Other single phosphates; unspec. appl. method in fert. in spr. bef. plant.; kg P: 3.4279e-7 kg; = p3090
- Ammonium nitrate; broadcast w/o incorp. in fert. after plant.: 1.21547e-5 kg; = p2944*4.7142857143
- 1-Butene: 7.61203e-8 kg; = p2144*1.1666666667
- Superphosphate, grades>22%; no broadcast in fert. at plant.; kg P: 6.70182e-6 kg; = p2542
- Phosphorous; in above-ground residue left on field: 0.000295633 kg; = p2169
- Urea; unspec. appl. method in fert. in spr. bef. plant.: 0.000141362 kg; = p3075*5
- Aqueous ammonia; unspec. appl. method in fert. after plant.: 2.24046e-7 kg; = p3137*1.2142857143
- Urea; broadcast w/o incorp. in fert. in spr. bef. plant.: 0.000392043 kg; = p2880*5
- Particulates, < 2.5 um [air, non-urban air or from high stacks]: 2.82611e-6 kg; = 1.0 * (p2033+p2035)
- Potassium; using unspec. method in manure in fall before planting; biogenic: 6.22294e-5 kg; = p3460
- Potassium chloride; unspec. appl. method in fert. in fall bef. plant.: 0.000267976 kg; = p3053*2.2166666667
- Aqueous ammonia; unspec. appl. method in fert. in fall bef. plant.: 2.10903e-6 kg; = p3020*1.2142857143
- Monoammonium phosphate; broadcast w/o incorp. in fert. in fall bef. plant.: 0.000122695 kg; = p2849*8.2142857143
- Monoammonium phosphate; broadcast w/o incorp. in fert. in spr. bef. plant.: 9.71816e-5 kg; = p2888*8.2142857143
- Aqueous ammonia; no broadcast in fert. in spr. bef. plant.: 2.92473e-5 kg; = p2474*1.2142857143
- Pesticide formulation balance; broadcast with incorporation: 3.34496e-5 kg; = p4102
- isobutene: 6.64632e-8 kg; = p2150*1.1666666667
- Clopyralid [soil, agricultural]: 6.29247e-7 kg; = 1.0 * (p5177+p3529+p4147+p4971+p3941+p4559)
- Other limestone constituents; applied in limestone: 0.00109654 kg; = p3220
- Monoammonium phosphate; broadcast w/o incorp. in fert. at plant.: 7.61027e-5 kg; = p2927*8.2142857143
- Superphosphate, grades<= 22%; broadcast w/o incorp. in fert. in fall bef. plant.; kg P: 8.49849e-8 kg; = p2852
- Aqueous ammonia; broadcast w/o incorp. in fert. in spr. bef. plant.: 8.84499e-6 kg; = p2864*1.2142857143
- Magnesium [soil, agricultural]: 0.00052016 kg; = 1.0 * (p3227)
- Glyphosate diammonium salt; unspec. appl. method: 2.1313e-7 kg; = p5235
- Diammonium phosphate; broadcast w/ incorp. in fert. at plant.: 0.000844775 kg; = p2728*4.7142857143
- Anhydrous ammonia; broadcast w/ incorp. in fert. after plant.: 0.000123816 kg; = p2745*1.2142857143
- Aqueous ammonia; broadcast w/o incorp. in fert. after plant.: 6.21353e-7 kg; = p2942*1.2142857143
- Sodium nitrate; broadcast w/o incorp. in fert. after plant.: 1.12418e-7 kg; = p2954*6.0714285714
- Other single K nutrients; broadcast w/ incorp. in fert. in fall bef. plant.; kg K: 0.000139799 kg; = p2665
- Dicamba-potassium; broadcast with incorporation: 7.81928e-7 kg; = p3953
- Glyphosate diammonium salt; banded or side-dressed: 1.86583e-7 kg; = p3587
- Superphosphate, grades<= 22%; broadcast w/o incorp. in fert. at plant.; kg P: 5.27126e-8 kg; = p2930
- Monoammonium phosphate; unspec. appl. method in fert. at plant.: 2.07848e-5 kg; = p3122*8.2142857143
- Other single phosphates; no broadcast in fert. in spr. bef. plant.; kg P: 5.41022e-6 kg; = p2505
- Superphosphate, grades>22%; broadcast w/ incorp. in fert. in spr. bef. plant.; kg P: 1.38563e-5 kg; = p2698
- Urea; broadcast w/ incorp. in fert. after plant.: 0.000163794 kg; = p2763*5
- Flumetsulam [soil, agricultural]: 2.09749e-7 kg; = 1.0 * (p4191+p3985+p5015+p3573+p5221+p4603)
- Anhydrous ammonia; broadcast w/ incorp. in fert. at plant.: 0.00015637 kg; = p2706*1.2142857143
- Nitrogen solution; broadcast w/ incorp. in fert. in spr. bef. plant.; broadcast w/ incorp. in fert. in spr. bef. plan...: 0.00144272 kg; = p2678
- Phosphorous; in below-ground residue: 0.000124615 kg; = p2175
- Filler materials, applied with synthetic fertilizer: 0.0125906 kg; = p2432
- Superphosphate, grades<= 22%; broadcast w/ incorp. in fert. in spr. bef. plant.; kg P: 4.69787e-7 kg; = p2696
- Phosphorous; broadcast w/ incorp. in manure in spring before planting: 4.57062e-5 kg; = p3389
- Nitrogen; injected/knifed in manure in fall before planting: 0.000413204 kg; = p3420
- Monoammonium phosphate; no broadcast in fert. at plant.: 0.000328045 kg; = p2537*8.2142857143
- Pendimethalin [soil, agricultural]: 1.09369e-6 kg; = 1.0 * (p5076+p3634+p5282+p4664+p4252+p4046)
- Furan [air, non-urban air or from high stacks]: 6.2203e-8 kg; = 1.0 * (p2138*1.4166666667)
- Cyfluthrin [soil, agricultural]: 1.04875e-7 kg; = 1.0 * (p5183+p4977+p3947+p4565+p4153+p3535)
- Sulfuric acid [soil, agricultural]: 3.82334e-8 kg; = 1.0 * (p3231)
- Nitrogen; applied in sewage sludge: 1.88637e-9 kg; = p3240
- Urea; no broadcast in fert. in spr. bef. plant.: 0.00129635 kg; = p2490*5
- Volatile constituents; using unspec. method in man. in fal.bef.plant: 0.00038195 kg; = p3461
- Dicamba-potassium; in seed furrow: 6.17687e-8 kg; = p4983
- Pesticide formulation balance; in seed furrow: 2.64236e-6 kg; = p5132
- Urea; no broadcast in fert. in fall bef. plant.: 0.000857253 kg; = p2451*5
- Dicamba-sodium; unspec. appl. method: 3.55217e-8 kg; = p5190
- Potassium chloride; no broadcast in fert. in spr. bef. plant.: 0.000915991 kg; = p2507*2.2166666667
- Dicamba-potassium; banded or side-dressed: 8.29256e-8 kg; = p3541
- Dicamba-potassium; broadcast without incorporation: 1.99786e-7 kg; = p4159
- Nitrogen solution; no broadcast in fert. in spr. bef. plant.; no broadcast in fert. in spr. bef. plant.; kg N: 0.000802133 kg; = p2483
- Superphosphate, grades>22%; unspec. appl. method in fert. in fall bef. plant.; kg P: 6.84595e-7 kg; = p3049
- Phosphorous; applied in sewage sludge: 2.25189e-10 kg; = p3241
- Urea; broadcast w/o incorp. in fert. after plant.: 2.75407e-5 kg; = p2958*5
- Nitrogen; broadcast w/o incorp. in manure in fall before planting: 0.000489264 kg; = p3401
- Aqueous ammonia; unspec. appl. method in fert. in spr. bef. plant.: 3.1893e-6 kg; = p3059*1.2142857143
- Potassium; broadcast w/ incorp. in manure in spring before planting; biogenic: 0.000149945 kg; = p3390
- Potassium; injected/knifed in manure in spring before planting; biogenic: 0.000172115 kg; = p3428
- Chlorpyrifos [soil, agricultural]: 1.60308e-6 kg; = 1.0 * (p3936+p4554+p4142+p3524+p5172+p4966)
- Superphosphate, grades>22%; unspec. appl. method in fert. at plant.; kg P: 4.24625e-7 kg; = p3127
- Calcium [soil, agricultural]: 0.00779866 kg; = 1.0 * (p3218+p3226)
- Ammonium nitrate; no broadcast in fert. in spr. bef. plant.: 0.000572125 kg; = p2476*4.7142857143
- Dimethenamid-p; foliar or directed spray: 1.86472e-6 kg; = p4581
- Nitrogen solution; no broadcast in fert. at plant.; no broadcast in fert. at plant.; kg N: 7.11648e-5 kg; = p2522
- Phosphorous; broadcast w/o incorp. in manure in fall before planting: 0.00019511 kg; = p3402
- Ammonium nitrate; unspec. appl. method in fert. in fall bef. plant.: 4.1256e-5 kg; = p3022*4.7142857143
- Aqueous ammonia; no broadcast in fert. after plant.: 2.0546e-6 kg; = p2552*1.2142857143
- Aqueous ammonia; no broadcast in fert. at plant.: 2.59481e-6 kg; = p2513*1.2142857143
- VERNOLATE: 3.19118e-6 kg; = p5129+p4305+p4099+p5335+p3687+p4717
- Ammonium sulfate; broadcast w/o incorp. in fert. in fall bef. plant.: 5.9679e-5 kg; = p2830*4.7142857143
- Phosphorous; injected/knifed in manure in fall before planting: 0.000164779 kg; = p3421
- Aqueous ammonia; unspec. appl. method in fert. at plant.: 2.82953e-7 kg; = p3098*1.2142857143
- Sodium nitrate; no broadcast in fert. at plant.: 4.69466e-7 kg; = p2525*6.0714285714
- Superphosphate, grades<= 22%; no broadcast in fert. at plant.; kg P: 2.2722e-7 kg; = p2540
- Diammonium phosphate; unspec. appl. method in fert. in fall bef. plant.: 5.32983e-5 kg; = p3040*4.7142857143
- Other single phosphates; broadcast w/o incorp. in fert. in fall bef. plant.; kg P: 1.58462e-6 kg; = p2856
- Sodium nitrate; unspec. appl. method in fert. at plant.: 5.11933e-8 kg; = p3110*6.0714285714
- Water: 5.12358 kg; = p3475+p3399+p3418+p2171+p2178+p2181+p3437
- Ammonium nitrate; no broadcast in fert. in fall bef. plant.: 0.000378335 kg; = p2437*4.7142857143
- Metolachlor [soil, agricultural]: 3.28108e-6 kg; = 1.0 * (p3620+p4650+p5268+p5062+p4238+p4032)
- Formic acid [air, non-urban air or from high stacks]: 5.69782e-7 kg; = 1.0 * (p2131*3.8333333333)
- Anhydrous ammonia; unspec. appl. method in fert. in fall bef. plant.: 7.06636e-5 kg; = p3018*1.2142857143
- Anhydrous ammonia; no broadcast in fert. after plant.: 6.884e-5 kg; = p2550*1.2142857143
- Pesticide formulation balance; broadcast without incorporation: 8.54651e-6 kg; = p4308
- Urea; broadcast w/ incorp. in fert. in spr. bef. plant.: 0.00233162 kg; = p2685*5
- Diammonium phosphate; broadcast w/ incorp. in fert. in fall bef. plant.: 0.00136197 kg; = p2650*4.7142857143
- Anhydrous ammonia; broadcast w/o incorp. in fert. at plant.: 2.62924e-5 kg; = p2901*1.2142857143
- Nitrogen solution; broadcast w/o incorp. in fert. in fall bef. plant.; broadcast w/o incorp. in fert. in fall bef. pl...: 0.000160415 kg; = p2834
- Aqueous ammonia; broadcast w/ incorp. in fert. in fall bef. plant.: 3.47862e-5 kg; = p2630*1.2142857143
- Carbon [soil, agricultural]: 0.209825 kg; = 1.0 * (p3400+p3463+p3225+p3419+p3387+p3381+p3425+p3242+p2173+p3217+p3406+p2167+p3457)
- Nitrogen solution; broadcast w/o incorp. in fert. at plant.; broadcast w/o incorp. in fert. at plant.; kg N: 2.15217e-5 kg; = p2912
- Anhydrous ammonia; broadcast w/o incorp. in fert. in fall bef. plant.: 0.000195973 kg; = p2823*1.2142857143
- Potassium chloride; unspec. appl. method in fert. in spr. bef. plant.: 0.000204803 kg; = p3092*2.2166666667
- Sulfur dioxide [air, non-urban air or from high stacks]: 6.76674e-7 kg; = 1.0 * (p2041)
- Other single K nutrients; no broadcast in fert. at plant.; kg K: 3.022e-5 kg; = p2548
- Ash: 0.000112476 kg; = p2022+p2021
- Aqueous ammonia; broadcast w/ incorp. in fert. in spr. bef. plant.: 5.26043e-5 kg; = p2669*1.2142857143
- Ammonium nitrate; broadcast w/o incorp. in fert. in fall bef. plant.: 0.000114416 kg; = p2827*4.7142857143
- Nitrogen solution; broadcast w/ incorp. in fert. after plant.; broadcast w/ incorp. in fert. after plant.; kg N: 0.00010135 kg; = p2756
- cis-2-Butene: 2.44267e-8 kg; = p2149*1.1666666667
- S-Metolachlor: 1.02028e-5 kg; = p5100+p5306+p4276+p3658+p4688+p4070
- Dicamba-sodium; banded or side-dressed: 3.10971e-8 kg; = p3542
- Diammonium phosphate; unspec. appl. method in fert. in spr. bef. plant.: 4.22153e-5 kg; = p3079*4.7142857143
- Dimethenamid-p; unspec. appl. method: 3.06276e-7 kg; = p5199
- Other single phosphates; broadcast w/ incorp. in fert. in fall bef. plant.; kg P: 1.10593e-5 kg; = p2661
- Glyphosate [soil, agricultural]: 4.27439e-5 kg; = 1.0 * (p5028+p4616+p5234+p4204+p3586+p3998)
- Diammonium phosphate; broadcast w/o incorp. in fert. at plant.: 0.000121043 kg; = p2923*4.7142857143
- Acetochlor [soil, agricultural]: 4.63695e-5 kg; = 1.0 * (p3908+p5144+p4938+p3496+p4526+p4114)
- Diammonium phosphate; unspec. appl. method in fert. at plant.: 3.30587e-5 kg; = p3118*4.7142857143
- Superphosphate, grades<= 22%; broadcast w/ incorp. in fert. at plant.; kg P: 3.67889e-7 kg; = p2735
- Ammonium sulfate; broadcast w/ incorp. in fert. at plant.: 4.76187e-5 kg; = p2713*4.7142857143
- Superphosphate, grades<= 22%; broadcast w/o incorp. in fert. in spr. bef. plant.; kg P: 6.73129e-8 kg; = p2891
- Atrazine [soil, agricultural]: 2.48703e-5 kg; = 1.0 * (p3914+p5150+p4944+p4120+p4532+p3502)
- Butane [air, non-urban air or from high stacks]: 3.45466e-8 kg; = 1.0 * (p2147*1.0208333333)
- Nitrogen; broadcast w/ incorp. in manure in fall before planting: 0.000359978 kg; = p3382
- Sodium nitrate; unspec. appl. method in fert. in spr. bef. plant.: 5.77025e-7 kg; = p3071*6.0714285714
- Ammonium sulfate; no broadcast in fert. at plant.: 2.64754e-5 kg; = p2518*4.7142857143
- Anhydrous ammonia; unspec. appl. method in fert. at plant.: 9.48044e-6 kg; = p3096*1.2142857143
- Superphosphate, grades>22%; broadcast w/o incorp. in fert. in spr. bef. plant.; kg P: 1.98538e-6 kg; = p2893
- Monoammonium phosphate; unspec. appl. method in fert. in fall bef. plant.: 3.351e-5 kg; = p3044*8.2142857143
- Superphosphate, grades>22%; no broadcast in fert. in fall bef. plant.; kg P: 1.08049e-5 kg; = p2464
- Potassium chloride; broadcast w/o incorp. in fert. in spr. bef. plant.: 0.000487105 kg; = p2897*2.2166666667
- Potassium chloride; no broadcast in fert. in fall bef. plant.: 0.00119854 kg; = p2468*2.2166666667
- Anhydrous ammonia; no broadcast in fert. at plant.: 8.69398e-5 kg; = p2511*1.2142857143
- Methane: 1.2715e-6 kg; = p2025*1.3333333333
- Ammonium nitrate; no broadcast in fert. after plant.: 4.01913e-5 kg; = p2554*4.7142857143
- Superphosphate, grades<= 22%; unspec. appl. method in fert. in fall bef. plant.; kg P: 2.32107e-8 kg; = p3047
- Ethene [air, non-urban air or from high stacks]: 8.27365e-7 kg; = 1.0 * (p2125*1.1666666667)
- Nitrogen solution; unspec. appl. method in fert. in fall bef. plant.; unspec. appl. method in fert. in fall bef. plan...: 5.78418e-5 kg; = p3029
- Ammonium sulfate; broadcast w/o incorp. in fert. at plant.: 8.00671e-6 kg; = p2908*4.7142857143
- Potassium; injected/knifed in manure in fall before planting; biogenic: 0.000540578 kg; = p3422
- Aqueous ammonia; broadcast w/o incorp. in fert. at plant.: 7.84723e-7 kg; = p2903*1.2142857143
- Propene [air, non-urban air or from high stacks]: 3.84411e-7 kg; = 1.0 * (p2136*1.1666666667)
- Carbon dioxide, in air: 0.000758049 kg; = p2163*3.6666666667
- Plant dry matter; in aboveground residue left on field: 0.15242 kg; = p2172
- Anhydrous ammonia; unspec. appl. method in fert. in spr. bef. plant.: 0.000106859 kg; = p3057*1.2142857143
- Potassium; broadcast w/o incorp. in manure in fall before planting; biogenic: 0.000640083 kg; = p3403
- Other single phosphates; broadcast w/ incorp. in fert. at plant.; kg P: 6.85962e-6 kg; = p2739
- Dicamba-potassium; foliar or directed spray: 5.76717e-7 kg; = p4571
- I butane; from residue burning: 1.19954e-8 kg; = p2146*1.0208333333
- Superphosphate, grades>22%; broadcast w/o incorp. in fert. in fall bef. plant.; kg P: 2.50661e-6 kg; = p2854
- Sulfur [soil, agricultural]: 8.18812e-8 kg; = 1.0 * (p3230)
- Sodium nitrate; broadcast w/ incorp. in fert. after plant.: 6.68591e-7 kg; = p2759*6.0714285714
- Volatile constituents; injected/knifed in man. in fal.bef.plant: 0.00331795 kg; = p3423
- Superphosphate, grades<= 22%; unspec. appl. method in fert. in spr. bef. plant.; kg P: 1.83842e-8 kg; = p3086
- Other single phosphates; broadcast w/o incorp. in fert. at plant.; kg P: 9.82874e-7 kg; = p2934
- Oxygen; applied in limestone: 0.00823848 kg; = p3219
- Aqueous ammonia; no broadcast in fert. in fall bef. plant.: 1.93407e-5 kg; = p2435*1.2142857143
- Superphosphate, grades<= 22%; no broadcast in fert. in spr. bef. plant.; kg P: 2.90156e-7 kg; = p2501
- Aqueous ammonia; broadcast w/ incorp. in fert. at plant.: 4.66702e-6 kg; = p2708*1.2142857143
- Dioxins and furans (PCDD/F); from residue burning: 1.7059e-14 kg TEQ; = p2047
- Nitrogen solution; broadcast w/o incorp. in fert. in spr. bef. plant.; broadcast w/o incorp. in fert. in spr. bef. pl...: 0.000242581 kg; = p2873
- Dimethenamid-p; broadcast with incorporation: 2.52823e-6 kg; = p3963
- Phosphorous; injected/knifed in manure in spring before planting: 5.24642e-5 kg; = p3427
- Potassium chloride; no broadcast in fert. at plant.: 0.000508745 kg; = p2546*2.2166666667
- Ethane [air, non-urban air or from high stacks]: 5.16728e-7 kg; = 1.0 * (p2126*1.25)
- Ammonium sulfate; broadcast w/ incorp. in fert. after plant.: 3.77051e-5 kg; = p2752*4.7142857143
- Urea; no broadcast in fert. after plant.: 9.10676e-5 kg; = p2568*5
- Ammonium sulfate; broadcast w/o incorp. in fert. in spr. bef. plant.: 9.02475e-5 kg; = p2869*4.7142857143
- Propanenitrile: 3.64363e-8 kg; = p2157*1.5277777778
- Nitrogen solution; no broadcast in fert. after plant.; no broadcast in fert. after plant.; kg N: 5.63492e-5 kg; = p2561
- Diammonium phosphate; broadcast w/ incorp. in fert. in spr. bef. plant.: 0.00107876 kg; = p2689*4.7142857143
- Other single phosphates; broadcast w/ incorp. in fert. in spr. bef. plant.; kg P: 8.7596e-6 kg; = p2700
- Methanol [air, non-urban air or from high stacks]: 1.86886e-6 kg; = 1.0 * (p2129*2.6666666667)
- Ammonium sulfate; unspec. appl. method in fert. at plant.: 2.88704e-6 kg; = p3103*4.7142857143
- Sodium nitrate; no broadcast in fert. after plant.: 3.71729e-7 kg; = p2564*6.0714285714
- Potassium chloride; broadcast w/o incorp. in fert. in fall bef. plant.: 0.000637357 kg; = p2858*2.2166666667
- Phosphorous; using unspec. method in manure in spring before planting: 6.03949e-6 kg; = p3465
- Superphosphate, grades<= 22%; no broadcast in fert. in fall bef. plant.; kg P: 3.66332e-7 kg; = p2462
- Urea; unspec. appl. method in fert. after plant.: 9.93056e-6 kg; = p3153*5
- Volatile constituents; injected/knifed in man. in spr.bef.plant.: 0.00105641 kg; = p3429
- Nitrogen; broadcast w/ incorp. in manure in spring before planting: 0.000114614 kg; = p3388
- Pentane [air, non-urban air or from high stacks]: 1.20298e-8 kg; = 1.0 * (p2152*1.0166666667)
- Ammonium nitrate; broadcast w/ incorp. in fert. after plant.: 7.22881e-5 kg; = p2749*4.7142857143
- Nonvolatile constituents;broadcast w/o incorp. in man. in fal.bef.plant; exc.CNPK,biogenic: 0.00049605 kg; = p3405
- Sodium nitrate; unspec. appl. method in fert. in fall bef. plant.: 3.81576e-7 kg; = p3032*6.0714285714
- Potassium; using unspec. method in manure in spring before planting; biogenic: 1.98133e-5 kg; = p3466
- Formaldehyde [air, non-urban air or from high stacks]: 1.18212e-6 kg; = 1.0 * (p2128*2.5)
- Other single K nutrients; broadcast w/o incorp. in fert. at plant.; kg K: 1.60703e-5 kg; = p2938
- Methyl vinyl ether; from residue burning: 4.31289e-8 kg; = p2137*1.6111111111
- Ammonium nitrate; no broadcast in fert. at plant.: 5.07586e-5 kg; = p2515*4.7142857143
- Dicamba-sodium; in seed furrow: 2.31633e-8 kg; = p4984
- Volatile constituents; broadcast w/o incorp. in man. in spr.bef.plant.: 0.00125086 kg; = p3410
- Nitrogen; using unspec. method in manure in fall before planting: 4.75666e-5 kg; = p3458
- Anhydrous ammonia; broadcast w/ incorp. in fert. in spr. bef. plant.: 0.00176252 kg; = p2667*1.2142857143
- Nitrogen dioxide: 1.30833e-6 kg; = p2039*3.2857142857
- Sodium nitrate; broadcast w/o incorp. in fert. at plant.: 1.41976e-7 kg; = p2915*6.0714285714
- Sodium nitrate; broadcast w/o incorp. in fert. in fall bef. plant.: 1.05824e-6 kg; = p2837*6.0714285714
- Anhydrous ammonia; broadcast w/ incorp. in fert. in fall bef. plant.: 0.00116552 kg; = p2628*1.2142857143
- Sodium nitrate; unspec. appl. method in fert. after plant.: 4.05355e-8 kg; = p3149*6.0714285714
- Sodium nitrate; broadcast w/ incorp. in fert. in spr. bef. plant.: 9.51743e-6 kg; = p2681*6.0714285714
- Ammonium nitrate; unspec. appl. method in fert. at plant.: 5.53502e-6 kg; = p3100*4.7142857143
- Potassium chloride; broadcast w/o incorp. in fert. at plant.: 0.00027054 kg; = p2936*2.2166666667
- Sodium nitrate; broadcast w/ incorp. in fert. at plant.: 8.44381e-7 kg; = p2720*6.0714285714
- Sodium nitrate; no broadcast in fert. in fall bef. plant.: 3.49922e-6 kg; = p2447*6.0714285714
- Phenol [air, non-urban air or from high stacks]: 2.94934e-7 kg; = 1.0 * (p2133*1.3055555556)
- Acetaldehyde [air, non-urban air or from high stacks]: 7.07233e-7 kg; = 1.0 * (p2130*1.8333333333)
- Monoammonium phosphate; no broadcast in fert. in spr. bef. plant.: 0.000418907 kg; = p2498*8.2142857143
- Diammonium phosphate; no broadcast in fert. in fall bef. plant.: 0.0008412 kg; = p2455*4.7142857143
- Diammonium phosphate; no broadcast in fert. in spr. bef. plant.: 0.000666279 kg; = p2494*4.7142857143
- Volatile constituents; broadcast w/ incorp. in man. in fal.bef.plant: 0.00289055 kg; = p3385
- Water [air, non-urban air or from high stacks]: 3.14436e-7 m3; = 0.001 * (p2016)
- trans-2-Butene: 3.23795e-8 kg; = p2148*1.1666666667
- Dicamba-sodium; broadcast with incorporation: 2.93223e-7 kg; = p3954
- Diammonium phosphate; broadcast w/o incorp. in fert. in spr. bef. plant.: 0.000154569 kg; = p2884*4.7142857143
- Monoammonium phosphate; broadcast w/ incorp. in fert. in spr. bef. plant.: 0.000678245 kg; = p2693*8.2142857143
- Nonvolatile constituents; injected/knifed in man. in spr.bef.plant; exc.CNPK,biogenic: 0.000133386 kg; = p3430
- cyclopentane: 9.40548e-10 kg; = p2153*1.0166666667
- Ammonium nitrate; broadcast w/o incorp. in fert. in spr. bef. plant.: 0.000173022 kg; = p2866*4.7142857143
- Dicamba-sodium; broadcast without incorporation: 7.49197e-8 kg; = p4160
- NMVOC, non-methane volatile organic compounds, unspecified origin [air, non-urban air or from high stacks]: 1.46106e-5 kg; = 1.0 * (p2051+p2052)
- Glyphosate diammonium salt; in seed furrow: 1.3898e-7 kg; = p5029
- Nitrogen solution; no broadcast in fert. in fall bef. plant.; no broadcast in fert. in fall bef. plant.; kg N: 0.000530435 kg; = p2444
- Superphosphate, grades<= 22%; unspec. appl. method in fert. at plant.; kg P: 1.43966e-8 kg; = p3125
- Seeds; used in planting and sowing: 0.00207828 kg; = p2179
- Superphosphate, grades>22%; broadcast w/o incorp. in fert. at plant.; kg P: 1.55475e-6 kg; = p2932
- Monoammonium phosphate; no broadcast in fert. in fall bef. plant.: 0.000528884 kg; = p2459*8.2142857143
- Nitrogen; in below-ground residue: 0.00133079 kg; = p2174
- Ammonium sulfate; no broadcast in fert. in spr. bef. plant.: 0.000298417 kg; = p2479*4.7142857143
- Monoammonium phosphate; broadcast w/ incorp. in fert. at plant.: 0.000531132 kg; = p2732*8.2142857143
- Ammonium nitrate; broadcast w/ incorp. in fert. in spr. bef. plant.: 0.00102902 kg; = p2671*4.7142857143
- Potassium; in below-ground residue; biogenic: 0.00189747 kg; = p2176
- Benzene [air, non-urban air or from high stacks]: 8.72547e-8 kg; = 1.0 * (p2140*1.0833333333)
- Sodium nitrate; no broadcast in fert. in spr. bef. plant.: 5.29157e-6 kg; = p2486*6.0714285714
- Superphosphate, grades>22%; broadcast w/ incorp. in fert. in fall bef. plant.; kg P: 1.7494e-5 kg; = p2659
- Dimethenamid-p; broadcast without incorporation: 6.45974e-7 kg; = p4169
- Other single K nutrients; no broadcast in fert. in fall bef. plant.; kg K: 7.11944e-5 kg; = p2470
- Ammonium nitrate; broadcast w/ incorp. in fert. in fall bef. plant.: 0.000680474 kg; = p2632*4.7142857143
- Anhydrous ammonia; no broadcast in fert. in spr. bef. plant.: 0.000979941 kg; = p2472*1.2142857143
- Ammonium sulfate; no broadcast in fert. in fall bef. plant.: 0.000197338 kg; = p2440*4.7142857143
- Ammonia [air, non-urban air or from high stacks]: 1.23398e-6 kg; = 1.0 * (p2159*1.2142857143)
- Superphosphate, grades>22%; broadcast w/ incorp. in fert. at plant.; kg P: 1.08508e-5 kg; = p2737
- Nitrogen solution; unspec. appl. method in fert. after plant.; unspec. appl. method in fert. after plant.; kg N: 6.14465e-6 kg; = p3146
- Mesotrione [soil, agricultural]: 1.87276e-6 kg; = 1.0 * (p5262+p3614+p4232+p4644+p4026+p5056)
- Nitrogen solution; unspec. appl. method in fert. at plant.; unspec. appl. method in fert. at plant.; kg N: 7.76023e-6 kg; = p3107
- Nitrogen solution; broadcast w/ incorp. in fert. at plant.; broadcast w/ incorp. in fert. at plant.; kg N: 0.000127997 kg; = p2717
- Ammonium sulfate; no broadcast in fert. after plant.: 2.09636e-5 kg; = p2557*4.7142857143
- Nitrogen solution; broadcast w/o incorp. in fert. after plant.; broadcast w/o incorp. in fert. after plant.; kg N: 1.70411e-5 kg; = p2951
- Glyphosate diammonium salt; broadcast without incorporation: 4.49518e-7 kg; = p4205
- Phosphorous; broadcast w/ incorp. in manure in fall before planting: 0.000143553 kg; = p3383
- Rimsulfuron [soil, agricultural]: 1.04875e-7 kg; = 1.0 * (p3657+p4275+p4687+p4069+p5099+p5305)
- Diammonium phosphate; no broadcast in fert. at plant.: 0.000521761 kg; = p2533*4.7142857143
- Ammonium nitrate; broadcast w/ incorp. in fert. at plant.: 9.12945e-5 kg; = p2710*4.7142857143
- Other single phosphates; no broadcast in fert. in fall bef. plant.; kg P: 6.83059e-6 kg; = p2466
- Ammonium sulfate; broadcast w/ incorp. in fert. in spr. bef. plant.: 0.000536734 kg; = p2674*4.7142857143
- Other single K nutrients; broadcast w/o incorp. in fert. in fall bef. plant.; kg K: 3.78597e-5 kg; = p2860
- Acetic acid [air, non-urban air or from high stacks]: 3.18142e-6 kg; = 1.0 * (p2127*2.5)
- Other single K nutrients; no broadcast in fert. in spr. bef. plant.; kg K: 5.44108e-5 kg; = p2509
- Other single K nutrients; broadcast w/o incorp. in fert. in spr. bef. plant.; kg K: 2.89345e-5 kg; = p2899
- Nonvolatile constituents; injected/knifed in man. in fal.bef.plant; exc.CNPK,biogenic: 0.000418936 kg; = p3424
- Other single phosphates; unspec. appl. method in fert. at plant.; kg P: 2.68438e-7 kg; = p3129
- Tefluthrin [soil, agricultural]: 2.39713e-7 kg; = 1.0 * (p4288+p4082+p5318+p5112+p3670+p4700)
- Glyphosate diammonium salt; broadcast with incorporation: 1.75934e-6 kg; = p3999
- Nicosulfuron [soil, agricultural]: 3.29606e-7 kg; = 1.0 * (p5069+p4245+p4039+p3627+p5275+p4657)
- Particulates, < 10 um: 6.073e-6 kg; = p2034+p2036
- Dimethenamid-p; in seed furrow: 1.99719e-7 kg; = p4993
- Other single K nutrients; broadcast w/ incorp. in fert. in spr. bef. plant.; kg K: 0.000106843 kg; = p2704
- Volatile constituents; broadcast w/ incorp. in man. in spr.bef.plant.: 0.000920328 kg; = p3391
- Sodium nitrate; broadcast w/o incorp. in fert. in spr. bef. plant.: 1.60028e-6 kg; = p2876*6.0714285714

## Sampling procedure
A delete-a-group jackknife is used by the USDA to estimate the ARMS sample means and RSEs, based on a 15 sample delete-a-group jackknife. Because of this relatively small sample size, a Students t distribution is used to represent ARMS data probability density functions. Other representations of uncertainty are described in Cooper, J.S., Kahn, E., Noon, M. (2012). LCA Digital Commons Unit Process Data: field crop production Version 1. Prepared for the US Department of Agriculture National Agricultural Library. Retrieved from https://www.lcacommons.gov/discovery/docs/LCA%20Digital%20Commons%20Unit%20Process%20Data%20final%20updated.pdf

## Extrapolations
Data represent an aggregation of processes applied in Minnesota in 2005. Data development is demonstrated by parameterization (exlicitly presents all raw and uncertainty data and all calculations). Flow data quality according to the LCADC convention is provided for all flows.
