# cotton lint; at harvest in 1999; at farm; 90%-93% moisture

Dataset: EcoSpold 2, unit process
Geography: GLO
Time period: 1999-01-02 to 2000-01-01
Scenario: Business-as-Usual
System model: Allocation, ecoinvent default
Generated by: cooperjs@u.washington.edu
isCopyrightProtected: false

## General comment
This unit process/ gate-to-gate dataset represents the production of 1 kg cotton coproduced with cottonseed and residue. The process technologies are an aggregation of those applied in Louisiana in 1999. Applicable classifications include ISIC 0116, NAIC 111920, UNSPSC 11121802; this dataset was prepared in ILCD format using the UWDFE Lab Excel to ILCD File Generator (beta version, August 2013)

Exchange "S,S,S-tributyl phosphorotrithioate-soil agricultural" is the result of combining the following original LCA Commons flows: "Tribufos; broadcast with incorporation; kg AI", "Tribufos; foliar or directed spray; kg AI", "Tribufos; unspec. appl. method; kg AI", "Tribufos; banded or side-dressed; kg AI", "Tribufos; broadcast without incorporation; kg AI", "Tribufos; chiseled or injected/knifed in; kg AI", "Tribufos; in seed furrow; kg AI".
Exchange "Cyanazine-soil agricultural" is the result of combining the following original LCA Commons flows: "Cyanazine; in seed furrow; kg AI", "Cyanazine; broadcast with incorporation; kg AI", "Cyanazine; foliar or directed spray; kg AI", "Cyanazine; chiseled or injected/knifed in; kg AI", "Cyanazine; unspec. appl. method; kg AI", "Cyanazine; broadcast without incorporation; kg AI", "Cyanazine; banded or side-dressed; kg AI".
Exchange "Metalaxil-soil agricultural" is the result of combining the following original LCA Commons flows: "Metalaxyl; banded or side-dressed; kg AI", "Metalaxyl; broadcast without incorporation; kg AI", "Metalaxyl; in seed furrow; kg AI", "Metalaxyl; unspec. appl. method; kg AI", "Metalaxyl; chiseled or injected/knifed in; kg AI", "Metalaxyl; foliar or directed spray; kg AI", "Metalaxyl; broadcast with incorporation; kg AI".
Exchange "Dimethipin-soil agricultural" is the result of combining the following original LCA Commons flows: "Dimethipin; broadcast without incorporation; kg AI", "Dimethipin; chiseled or injected/knifed in; kg AI", "Dimethipin; in seed furrow; kg AI", "Dimethipin; unspec. appl. method; kg AI", "Dimethipin; banded or side-dressed; kg AI", "Dimethipin; broadcast with incorporation; kg AI", "Dimethipin; foliar or directed spray; kg AI".
Exchange "Ethephon-soil agricultural" is the result of combining the following original LCA Commons flows: "Ethephon; chiseled or injected/knifed in; kg AI", "Ethephon; unspec. appl. method; kg AI", "Ethephon; in seed furrow; kg AI", "Ethephon; broadcast without incorporation; kg AI", "Ethephon; foliar or directed spray; kg AI", "Ethephon; broadcast with incorporation; kg AI", "Ethephon; banded or side-dressed; kg AI".
Exchange "Parathion-methyl-soil agricultural" is the result of combining the following original LCA Commons flows: "Methyl parathion; broadcast without incorporation; kg AI", "Methyl parathion; chiseled or injected/knifed in; kg AI", "Methyl parathion; in seed furrow; kg AI", "Methyl parathion; banded or side-dressed; kg AI", "Methyl parathion; foliar or directed spray; kg AI", "Methyl parathion; unspec. appl. method; kg AI", "Methyl parathion; broadcast with incorporation; kg AI".
Exchange "Etridiazole-soil agricultural" is the result of combining the following original LCA Commons flows: "Etridiazole; banded or side-dressed; kg AI", "Etridiazole; foliar or directed spray; kg AI", "Etridiazole; unspec. appl. method; kg AI", "Etridiazole; broadcast with incorporation; kg AI", "Etridiazole; chiseled or injected/knifed in; kg AI", "Etridiazole; broadcast without incorporation; kg AI", "Etridiazole; in seed furrow; kg AI".
Exchange "Imidacloprid-soil agricultural" is the result of combining the following original LCA Commons flows: "Imidacloprid; unspec. appl. method; kg AI", "Imidacloprid; foliar or directed spray; kg AI", "Imidacloprid; in seed furrow; kg AI", "Imidacloprid; broadcast with incorporation; kg AI", "Imidacloprid; chiseled or injected/knifed in; kg AI", "Imidacloprid; broadcast without incorporation; kg AI", "Imidacloprid; banded or side-dressed; kg AI".
Exchange "Sodium chlorate-soil agricultural" is the result of combining the following original LCA Commons flows: "Sodium chlorate; broadcast without incorporation; kg AI", "Sodium chlorate; banded or side-dressed; kg AI", "Sodium chlorate; broadcast with incorporation; kg AI", "Sodium chlorate; in seed furrow; kg AI", "Sodium chlorate; unspec. appl. method; kg AI", "Sodium chlorate; chiseled or injected/knifed in; kg AI", "Sodium chlorate; foliar or directed spray; kg AI".
Exchange "Deltamethrin-soil agricultural" is the result of combining the following original LCA Commons flows: "Deltamethrin; broadcast with incorporation; kg AI", "Deltamethrin; broadcast without incorporation; kg AI", "Deltamethrin; foliar or directed spray; kg AI", "Deltamethrin; in seed furrow; kg AI", "Deltamethrin; chiseled or injected/knifed in; kg AI", "Deltamethrin; unspec. appl. method; kg AI", "Deltamethrin; banded or side-dressed; kg AI".
Exchange "Dimethoate-soil agricultural" is the result of combining the following original LCA Commons flows: "Dimethoate; chiseled or injected/knifed in; kg AI", "Dimethoate; banded or side-dressed; kg AI", "Dimethoate; broadcast with incorporation; kg AI", "Dimethoate; unspec. appl. method; kg AI", "Dimethoate; in seed furrow; kg AI", "Dimethoate; broadcast without incorporation; kg AI", "Dimethoate; foliar or directed spray; kg AI".
Exchange "NMVOC, non-methane volatile organic compounds, unspecified origin-air low population density" is the result of combining the following original LCA Commons flows: "NMVOCs; from residue burning; kg except C, biogenic", "NMVOCs; from residue burning; kg C, biogenic".
Exchange "Cyclanilide-soil agricultural" is the result of combining the following original LCA Commons flows: "Cyclanilide; broadcast with incorporation; kg AI", "Cyclanilide; broadcast without incorporation; kg AI", "Cyclanilide; in seed furrow; kg AI", "Cyclanilide; foliar or directed spray; kg AI", "Cyclanilide; chiseled or injected/knifed in; kg AI", "Cyclanilide; banded or side-dressed; kg AI", "Cyclanilide; unspec. appl. method; kg AI".
Exchange "Glyphosate-soil agricultural" is the result of combining the following original LCA Commons flows: "Glyphosate; banded or side-dressed; kg AI", "Glyphosate; chiseled or injected/knifed in; kg AI", "Glyphosate; in seed furrow; kg AI", "Glyphosate; broadcast with incorporation; kg AI", "Glyphosate; unspec. appl. method; kg AI", "Glyphosate; foliar or directed spray; kg AI", "Glyphosate; broadcast without incorporation; kg AI".
Exchange "Carbofuran-soil agricultural" is the result of combining the following original LCA Commons flows: "Carbofuran; unspec. appl. method; kg AI", "Carbofuran; broadcast without incorporation; kg AI", "Carbofuran; foliar or directed spray; kg AI", "Carbofuran; broadcast with incorporation; kg AI", "Carbofuran; chiseled or injected/knifed in; kg AI", "Carbofuran; banded or side-dressed; kg AI", "Carbofuran; in seed furrow; kg AI".
Exchange "Norflurazon-soil agricultural" is the result of combining the following original LCA Commons flows: "Norflurazon; broadcast with incorporation; kg AI", "Norflurazon; foliar or directed spray; kg AI", "Norflurazon; chiseled or injected/knifed in; kg AI", "Norflurazon; unspec. appl. method; kg AI", "Norflurazon; broadcast without incorporation; kg AI", "Norflurazon; banded or side-dressed; kg AI", "Norflurazon; in seed furrow; kg AI".
Exchange "Mepiquat chloride-soil agricultural" is the result of combining the following original LCA Commons flows: "1,1-Dimethylpiperidinium chloride; foliar or directed spray; kg AI", "1,1-Dimethylpiperidinium chloride; in seed furrow; kg AI", "1,1-Dimethylpiperidinium chloride; unspec. appl. method; kg AI", "1,1-Dimethylpiperidinium chloride; broadcast without incorporation; kg AI", "1,1-Dimethylpiperidinium chloride; broadcast with incorporation; kg AI", "1,1-Dimethylpiperidinium chloride; banded or side-dressed; kg AI", "1,1-Dimethylpiperidinium chloride; chiseled or injected/knifed in; kg AI".
Exchange "Carbon-soil agricultural" is the result of combining the following original LCA Commons flows: "Carbon; applied in dolomite", "Carbon; applied in sewage sludge", "Carbon; applied in limestone", "Carbon; in above-ground residue left on field; biogenic", "Carbon; in below-ground residue; biogenic".
Exchange "Particulates, < 2.5 um-air low population density" is the result of combining the following original LCA Commons flows: "PM2.5; from residue burning; kg C, biogenic", "PM2.5; from residue burning; kg except C, biogenic".
Exchange "Thidiazuron-soil agricultural" is the result of combining the following original LCA Commons flows: "Thidiazuron; chiseled or injected/knifed in; kg AI", "Thidiazuron; broadcast without incorporation; kg AI", "Thidiazuron; banded or side-dressed; kg AI", "Thidiazuron; foliar or directed spray; kg AI", "Thidiazuron; broadcast with incorporation; kg AI", "Thidiazuron; unspec. appl. method; kg AI", "Thidiazuron; in seed furrow; kg AI".
Exchange "Prometryn-soil agricultural" is the result of combining the following original LCA Commons flows: "Prometryn; unspec. appl. method; kg AI", "Prometryn; foliar or directed spray; kg AI", "Prometryn; broadcast without incorporation; kg AI", "Prometryn; chiseled or injected/knifed in; kg AI", "Prometryn; in seed furrow; kg AI", "Prometryn; banded or side-dressed; kg AI", "Prometryn; broadcast with incorporation; kg AI".
Exchange "Clomazone-soil agricultural" is the result of combining the following original LCA Commons flows: "Clomazone; broadcast without incorporation; kg AI", "Clomazone; banded or side-dressed; kg AI", "Clomazone; foliar or directed spray; kg AI", "Clomazone; in seed furrow; kg AI", "Clomazone; unspec. appl. method; kg AI", "Clomazone; broadcast with incorporation; kg AI", "Clomazone; chiseled or injected/knifed in; kg AI".
Exchange "Zeta-cypermethrin-soil agricultural" is the result of combining the following original LCA Commons flows: "Zeta-Cypermethrin; in seed furrow; kg AI", "Zeta-Cypermethrin; chiseled or injected/knifed in; kg AI", "Zeta-Cypermethrin; unspec. appl. method; kg AI", "Zeta-Cypermethrin; broadcast with incorporation; kg AI", "Zeta-Cypermethrin; banded or side-dressed; kg AI", "Zeta-Cypermethrin; broadcast without incorporation; kg AI", "Zeta-Cypermethrin; foliar or directed spray; kg AI".
Exchange "Fluazifop-P-butyl-soil agricultural" is the result of combining the following original LCA Commons flows: "Fluazifop-p-butyl; broadcast without incorporation; kg AI", "Fluazifop-p-butyl; banded or side-dressed; kg AI", "Fluazifop-p-butyl; chiseled or injected/knifed in; kg AI", "Fluazifop-p-butyl; in seed furrow; kg AI", "Fluazifop-p-butyl; unspec. appl. method; kg AI", "Fluazifop-p-butyl; foliar or directed spray; kg AI", "Fluazifop-p-butyl; broadcast with incorporation; kg AI".
Exchange "Clethodim-soil agricultural" is the result of combining the following original LCA Commons flows: "Clethodim; broadcast without incorporation; kg AI", "Clethodim; unspec. appl. method; kg AI", "Clethodim; foliar or directed spray; kg AI", "Clethodim; banded or side-dressed; kg AI", "Clethodim; broadcast with incorporation; kg AI", "Clethodim; in seed furrow; kg AI", "Clethodim; chiseled or injected/knifed in; kg AI".
Exchange "Ash-soil agricultural" is the result of combining the following original LCA Commons flows: "Ash; from residue burning; kg C, biogenic", "Ash; from residue burning; kg except C, biogenic".
Exchange "Trifluralin-soil agricultural" is the result of combining the following original LCA Commons flows: "Trifluralin; chiseled or injected/knifed in; kg AI", "Trifluralin; broadcast without incorporation; kg AI", "Trifluralin; broadcast with incorporation; kg AI", "Trifluralin; foliar or directed spray; kg AI", "Trifluralin; in seed furrow; kg AI", "Trifluralin; unspec. appl. method; kg AI", "Trifluralin; banded or side-dressed; kg AI".
Exchange "Diuron-soil agricultural" is the result of combining the following original LCA Commons flows: "Diuron; banded or side-dressed; kg AI", "Diuron; broadcast with incorporation; kg AI", "Diuron; foliar or directed spray; kg AI", "Diuron; broadcast without incorporation; kg AI", "Diuron; chiseled or injected/knifed in; kg AI", "Diuron; unspec. appl. method; kg AI", "Diuron; in seed furrow; kg AI".
Exchange "Water-soil agricultural" is the result of combining the following original LCA Commons flows: "Water; in below-ground residue; biogenic", "Water; from irrigation and applied with manure and sewage sludge", "Water; in above-ground residue left on field; biogenic".
Exchange "Dicrotophos-soil agricultural" is the result of combining the following original LCA Commons flows: "Dicrotophos; foliar or directed spray; kg AI", "Dicrotophos; in seed furrow; kg AI", "Dicrotophos; broadcast without incorporation; kg AI", "Dicrotophos; chiseled or injected/knifed in; kg AI", "Dicrotophos; broadcast with incorporation; kg AI", "Dicrotophos; unspec. appl. method; kg AI", "Dicrotophos; banded or side-dressed; kg AI".
Exchange "Quintozene-soil agricultural" is the result of combining the following original LCA Commons flows: "Quintozene; unspec. appl. method; kg AI", "Quintozene; broadcast without incorporation; kg AI", "Quintozene; in seed furrow; kg AI", "Quintozene; foliar or directed spray; kg AI", "Quintozene; banded or side-dressed; kg AI", "Quintozene; chiseled or injected/knifed in; kg AI", "Quintozene; broadcast with incorporation; kg AI".
Exchange "Disulfoton-soil agricultural" is the result of combining the following original LCA Commons flows: "Disulfoton; in seed furrow; kg AI", "Disulfoton; chiseled or injected/knifed in; kg AI", "Disulfoton; unspec. appl. method; kg AI", "Disulfoton; broadcast with incorporation; kg AI", "Disulfoton; foliar or directed spray; kg AI", "Disulfoton; broadcast without incorporation; kg AI", "Disulfoton; banded or side-dressed; kg AI".
Exchange "Pendimethalin-soil agricultural" is the result of combining the following original LCA Commons flows: "Pendimethalin; chiseled or injected/knifed in; kg AI", "Pendimethalin; broadcast with incorporation; kg AI", "Pendimethalin; foliar or directed spray; kg AI", "Pendimethalin; broadcast without incorporation; kg AI", "Pendimethalin; unspec. appl. method; kg AI", "Pendimethalin; in seed furrow; kg AI", "Pendimethalin; banded or side-dressed; kg AI".
Exchange "Oxamyl-soil agricultural" is the result of combining the following original LCA Commons flows: "Oxamyl; in seed furrow; kg AI", "Oxamyl; broadcast without incorporation; kg AI", "Oxamyl; foliar or directed spray; kg AI", "Oxamyl; banded or side-dressed; kg AI", "Oxamyl; unspec. appl. method; kg AI", "Oxamyl; broadcast with incorporation; kg AI", "Oxamyl; chiseled or injected/knifed in; kg AI".
Exchange "Water, unspecified origin-resource in water" is the result of combining the following original LCA Commons flows: "Water; from plant uptake; biogenic", "Water; withdrawal from unspec. source, for cotton, in 1999".
Exchange "Pyrithiobac sodium salt-soil agricultural" is the result of combining the following original LCA Commons flows: "Pyrithiobac-sodium; broadcast without incorporation; kg AI", "Pyrithiobac-sodium; broadcast with incorporation; kg AI", "Pyrithiobac-sodium; in seed furrow; kg AI", "Pyrithiobac-sodium; unspec. appl. method; kg AI", "Pyrithiobac-sodium; banded or side-dressed; kg AI", "Pyrithiobac-sodium; chiseled or injected/knifed in; kg AI", "Pyrithiobac-sodium; foliar or directed spray; kg AI".
Exchange "Acephate-soil agricultural" is the result of combining the following original LCA Commons flows: "Acephate; in seed furrow; kg AI", "Acephate; chiseled or injected/knifed in; kg AI", "Acephate; unspec. appl. method; kg AI", "Acephate; broadcast with incorporation; kg AI", "Acephate; foliar or directed spray; kg AI", "Acephate; broadcast without incorporation; kg AI", "Acephate; banded or side-dressed; kg AI".
Exchange "Metolachlor-soil agricultural" is the result of combining the following original LCA Commons flows: "Propazine; in seed furrow; kg AI", "Propazine; broadcast without incorporation; kg AI", "Propazine; chiseled or injected/knifed in; kg AI", "Propazine; banded or side-dressed; kg AI", "Propazine; broadcast with incorporation; kg AI", "Propazine; unspec. appl. method; kg AI", "Propazine; foliar or directed spray; kg AI".
Exchange "Particulates, < 10 um-air low population density" is the result of combining the following original LCA Commons flows: "PM10; from residue burning; kg C, biogenic", "PM10; from residue burning; kg except C, biogenic".
Exchange "Malathion-soil agricultural" is the result of combining the following original LCA Commons flows: "Malathion ; broadcast without incorporation; kg AI", "Malathion ; foliar or directed spray; kg AI", "Malathion ; chiseled or injected/knifed in; kg AI", "Malathion ; broadcast with incorporation; kg AI", "Malathion ; banded or side-dressed; kg AI", "Malathion ; unspec. appl. method; kg AI", "Malathion ; in seed furrow; kg AI".
Exchange "Cyfluthrin-soil agricultural" is the result of combining the following original LCA Commons flows: "Beta-Cyfluthrin; unspec. appl. method; kg AI", "Beta-Cyfluthrin; foliar or directed spray; kg AI", "Beta-Cyfluthrin; in seed furrow; kg AI", "Beta-Cyfluthrin; broadcast with incorporation; kg AI", "Beta-Cyfluthrin; chiseled or injected/knifed in; kg AI", "Beta-Cyfluthrin; banded or side-dressed; kg AI", "Beta-Cyfluthrin; broadcast without incorporation; kg AI".
Exchange "Bromoxynil-soil agricultural" is the result of combining the following original LCA Commons flows: "Bromoxynil; unspec. appl. method; kg AI", "Bromoxynil; broadcast without incorporation; kg AI", "Bromoxynil; foliar or directed spray; kg AI", "Bromoxynil; in seed furrow; kg AI", "Bromoxynil; broadcast with incorporation; kg AI", "Bromoxynil; banded or side-dressed; kg AI", "Bromoxynil; chiseled or injected/knifed in; kg AI".
Exchange "Cypermethrin-soil agricultural" is the result of combining the following original LCA Commons flows: "Cypermethrin; broadcast with incorporation; kg AI", "Cypermethrin; banded or side-dressed; kg AI", "Cypermethrin; chiseled or injected/knifed in; kg AI", "Cypermethrin; in seed furrow; kg AI", "Cypermethrin; foliar or directed spray; kg AI", "Cypermethrin; broadcast without incorporation; kg AI", "Cypermethrin; unspec. appl. method; kg AI".
Exchange "MSMA-soil agricultural" is the result of combining the following original LCA Commons flows: "MSMA; banded or side-dressed; kg AI", "MSMA; foliar or directed spray; kg AI", "MSMA; broadcast with incorporation; kg AI", "MSMA; chiseled or injected/knifed in; kg AI", "MSMA; in seed furrow; kg AI", "MSMA; broadcast without incorporation; kg AI", "MSMA; unspec. appl. method; kg AI".
Exchange "Transformation, from arable-resource land" is the result of combining the following original LCA Commons flows: "Transformation; from arable, from other to cotton", "Transformation; from arable, from soy to cotton", "Transformation; from arable, from cotton to cotton", "Transformation; from arable, from fallow to cotton", "Transformation; from arable, from unspec. use to cotton", "Transformation; from arable, from corn to cotton".
Exchange "Calcium-soil agricultural" is the result of combining the following original LCA Commons flows: "Calcium; applied in limestone", "Calcium; applied in dolomite".
Exchange "Lambda-cyhalothrin-soil agricultural" is the result of combining the following original LCA Commons flows: "Lambda-cyhalothrin; banded or side-dressed; kg AI", "Lambda-cyhalothrin; broadcast with incorporation; kg AI", "Lambda-cyhalothrin; chiseled or injected/knifed in; kg AI", "Lambda-cyhalothrin; in seed furrow; kg AI", "Lambda-cyhalothrin; unspec. appl. method; kg AI", "Lambda-cyhalothrin; foliar or directed spray; kg AI", "Lambda-cyhalothrin; broadcast without incorporation; kg AI".
Exchange "Bifenthrin-soil agricultural" is the result of combining the following original LCA Commons flows: "Bifenthrin; foliar or directed spray; kg AI", "Bifenthrin; banded or side-dressed; kg AI", "Bifenthrin; broadcast without incorporation; kg AI", "Bifenthrin; unspec. appl. method; kg AI", "Bifenthrin; in seed furrow; kg AI", "Bifenthrin; broadcast with incorporation; kg AI", "Bifenthrin; chiseled or injected/knifed in; kg AI".
Exchange "2,4-D-soil agricultural" is the result of combining the following original LCA Commons flows: "2,4-D; unspec. appl. method; kg AI", "2,4-D; banded or side-dressed; kg AI", "2,4-D; in seed furrow; kg AI", "2,4-D; chiseled or injected/knifed in; kg AI", "2,4-D; broadcast without incorporation; kg AI", "2,4-D; foliar or directed spray; kg AI", "2,4-D; broadcast with incorporation; kg AI".
Exchange "Spinosad-soil agricultural" is the result of combining the following original LCA Commons flows: "Spinosad; in seed furrow; kg AI", "Spinosad; foliar or directed spray; kg AI", "Spinosad; unspec. appl. method; kg AI", "Spinosad; chiseled or injected/knifed in; kg AI", "Spinosad; broadcast without incorporation; kg AI", "Spinosad; banded or side-dressed; kg AI", "Spinosad; broadcast with incorporation; kg AI".
Exchange "Quizalofop ethyl ester-soil agricultural" is the result of combining the following original LCA Commons flows: "Quizalofop, ethyl ; banded or side-dressed; kg AI", "Quizalofop, ethyl ; in seed furrow; kg AI", "Quizalofop, ethyl ; foliar or directed spray; kg AI", "Quizalofop, ethyl ; chiseled or injected/knifed in; kg AI", "Quizalofop, ethyl ; broadcast without incorporation; kg AI", "Quizalofop, ethyl ; broadcast with incorporation; kg AI", "Quizalofop, ethyl ; unspec. appl. method; kg AI".
Exchange "Paraquat dichloride-soil unspecified" is the result of combining the following original LCA Commons flows: "Paraquat dichloride; unspec. appl. method; kg AI", "Paraquat dichloride; banded or side-dressed; kg AI", "Paraquat dichloride; in seed furrow; kg AI", "Paraquat dichloride; broadcast with incorporation; kg AI", "Paraquat dichloride; foliar or directed spray; kg AI", "Paraquat dichloride; broadcast without incorporation; kg AI", "Paraquat dichloride; chiseled or injected/knifed in; kg AI".
Exchange "Aldicarb-soil agricultural" is the result of combining the following original LCA Commons flows: "Aldicarb; foliar or directed spray; kg AI", "Aldicarb; banded or side-dressed; kg AI", "Aldicarb; broadcast without incorporation; kg AI", "Aldicarb; unspec. appl. method; kg AI", "Aldicarb; in seed furrow; kg AI", "Aldicarb; chiseled or injected/knifed in; kg AI", "Aldicarb; broadcast with incorporation; kg AI".
Exchange "Fluometuron-soil agricultural" is the result of combining the following original LCA Commons flows: "Fluometuron; chiseled or injected/knifed in; kg AI", "Fluometuron; in seed furrow; kg AI", "Fluometuron; banded or side-dressed; kg AI", "Fluometuron; foliar or directed spray; kg AI", "Fluometuron; unspec. appl. method; kg AI", "Fluometuron; broadcast with incorporation; kg AI", "Fluometuron; broadcast without incorporation; kg AI".
Exchange "Ammonia-2bdf9967-6dae-4183-88d1-8f612548c51e low population density" was originally named: "Ammonia; from residue burning; kg N, biogenic" in this dataset.
Exchange "Ethane-2bdf9967-6dae-4183-88d1-8f612548c51e low population density" was originally named: "Ethane; from residue burning; kg C, biogenic" in this dataset.
Exchange "Phosphorus-c19fb2d9-98eb-4cd3-8761-81b71d8a9a1b unspecified" was originally named: "Phosphorous; from plant uptake; biogenic" in this dataset.
Exchange "Methane-2bdf9967-6dae-4183-88d1-8f612548c51e low population density" was originally named: "Methane; from residue burning; kg C, biogenic" in this dataset.
Exchange "Carbon dioxide-c19fb2d9-98eb-4cd3-8761-81b71d8a9a1b unspecified" was originally named: "Carbon dioxide; from plant uptake; kg C, biogenic" in this dataset.
Exchange "Acephate-2bdf9967-6dae-4183-88d1-8f612548c51e low population density" was originally named: "Acephate; broadcast by air; kg AI" in this dataset.
Exchange "Norflurazon-2bdf9967-6dae-4183-88d1-8f612548c51e low population density" was originally named: "Norflurazon; broadcast by air; kg AI" in this dataset.
Exchange "Formic acid-2bdf9967-6dae-4183-88d1-8f612548c51e low population density" was originally named: "Formic acid; from residue burning; kg C, biogenic" in this dataset.
Exchange "Propene-2bdf9967-6dae-4183-88d1-8f612548c51e low population density" was originally named: "Propylene; from residue burning; kg C, biogenic" in this dataset.
Exchange "2,4-D-2bdf9967-6dae-4183-88d1-8f612548c51e low population density" was originally named: "2,4-D; broadcast by air; kg AI" in this dataset.
Exchange "Butadiene-2bdf9967-6dae-4183-88d1-8f612548c51e low population density" was originally named: "1,3 butadiene; from residue burning; kg C, biogenic" in this dataset.
Exchange "Magnesium-be1c0329-f1a8-4524-8420-a86d2a8dd358 agricultural" was originally named: "Magnesium; applied in dolomite" in this dataset.
Exchange "Water, surface-c19fb2d9-98eb-4cd3-8761-81b71d8a9a1b in water" was originally named: "Water; withdrawal from surface water, for cotton, in 1999" in this dataset.
Exchange "Butane-2bdf9967-6dae-4183-88d1-8f612548c51e low population density" was originally named: "N butane; from residue burning; kg C, biogenic" in this dataset.
Exchange "Cypermethrin-2bdf9967-6dae-4183-88d1-8f612548c51e low population density" was originally named: "Cypermethrin; broadcast by air; kg AI" in this dataset.
Exchange "Phenol-2bdf9967-6dae-4183-88d1-8f612548c51e low population density" was originally named: "Phenol; from residue burning; kg C, biogenic" in this dataset.
Exchange "Ethene-2bdf9967-6dae-4183-88d1-8f612548c51e low population density" was originally named: "Ethylene; from residue burning; kg C, biogenic" in this dataset.
Exchange "Acrylonitrile-2bdf9967-6dae-4183-88d1-8f612548c51e low population density" was originally named: "Propenenitrile; from residue burning; kg C, biogenic" in this dataset.
Exchange "Dicrotophos-2bdf9967-6dae-4183-88d1-8f612548c51e low population density" was originally named: "Dicrotophos; broadcast by air; kg AI" in this dataset.
Exchange "Tribufos-2bdf9967-6dae-4183-88d1-8f612548c51e low population density" was originally named: "Tribufos; broadcast by air; kg AI" in this dataset.
Exchange "Oxamyl-2bdf9967-6dae-4183-88d1-8f612548c51e low population density" was originally named: "Oxamyl; broadcast by air; kg AI" in this dataset.
Exchange "Acetonitrile-2bdf9967-6dae-4183-88d1-8f612548c51e low population density" was originally named: "Acetonitrile; from residue burning; kg C, biogenic" in this dataset.
Exchange "Transformation, to arable-c19fb2d9-98eb-4cd3-8761-81b71d8a9a1b land" was originally named: "Transformation; to arable, to cotton" in this dataset.
Exchange "Prometryn-2bdf9967-6dae-4183-88d1-8f612548c51e low population density" was originally named: "Prometryn; broadcast by air; kg AI" in this dataset.
Exchange "Cyclanilide-2bdf9967-6dae-4183-88d1-8f612548c51e low population density" was originally named: "Cyclanilide; broadcast by air; kg AI" in this dataset.
Exchange "Isoprene-2bdf9967-6dae-4183-88d1-8f612548c51e low population density" was originally named: "Isoprene; from residue burning; kg C, biogenic" in this dataset.
Exchange "Deltamethrin-2bdf9967-6dae-4183-88d1-8f612548c51e low population density" was originally named: "Deltamethrin; broadcast by air; kg AI" in this dataset.
Exchange "Carbofuran-2bdf9967-6dae-4183-88d1-8f612548c51e low population density" was originally named: "Carbofuran; broadcast by air; kg AI" in this dataset.
Exchange "Glyphosate-2bdf9967-6dae-4183-88d1-8f612548c51e low population density" was originally named: "Glyphosate; broadcast by air; kg AI" in this dataset.
Exchange "Dimethipin-2bdf9967-6dae-4183-88d1-8f612548c51e low population density" was originally named: "Dimethipin; broadcast by air; kg AI" in this dataset.
Exchange "Carbon monoxide, fossil-2bdf9967-6dae-4183-88d1-8f612548c51e low population density" was originally named: "Carbon monoxide; from residue burning; kg C, biogenic" in this dataset.
Exchange "Formaldehyde-2bdf9967-6dae-4183-88d1-8f612548c51e low population density" was originally named: "Formaldehyde; from residue burning; kg C, biogenic" in this dataset.
Exchange "Trifluralin-2bdf9967-6dae-4183-88d1-8f612548c51e low population density" was originally named: "Trifluralin; broadcast by air; kg AI" in this dataset.
Exchange "Furan-2bdf9967-6dae-4183-88d1-8f612548c51e low population density" was originally named: "Furan; from residue burning; kg C, biogenic" in this dataset.
Exchange "Water, ground-c19fb2d9-98eb-4cd3-8761-81b71d8a9a1b in water" was originally named: "Water; withdrawal from groundwater, for cotton, in 1999" in this dataset.
Exchange "Sodium chlorate-2bdf9967-6dae-4183-88d1-8f612548c51e low population density" was originally named: "Sodium chlorate; broadcast by air; kg AI" in this dataset.
Exchange "MSMA-2bdf9967-6dae-4183-88d1-8f612548c51e low population density" was originally named: "MSMA; broadcast by air; kg AI" in this dataset.
Exchange "Ethephon-2bdf9967-6dae-4183-88d1-8f612548c51e low population density" was originally named: "Ethephon; broadcast by air; kg AI" in this dataset.
Exchange "Ethyne-2bdf9967-6dae-4183-88d1-8f612548c51e low population density" was originally named: "Acetylene; from residue burning; kg C, biogenic" in this dataset.
Exchange "Dinitrogen monoxide-2bdf9967-6dae-4183-88d1-8f612548c51e low population density" was originally named: "Dinitrogen monoxide; from residue burning; kg N, biogenic" in this dataset.
Exchange "Dimethoate-2bdf9967-6dae-4183-88d1-8f612548c51e low population density" was originally named: "Dimethoate; broadcast by air; kg AI" in this dataset.
Exchange "Sulfur-be1c0329-f1a8-4524-8420-a86d2a8dd358 agricultural" was originally named: "Sulfur; as secondary application" in this dataset.
Exchange "Pendimethalin-2bdf9967-6dae-4183-88d1-8f612548c51e low population density" was originally named: "Pendimethalin; broadcast by air; kg AI" in this dataset.
Exchange "Acetone-2bdf9967-6dae-4183-88d1-8f612548c51e low population density" was originally named: "Acetone; from residue burning; kg C, biogenic" in this dataset.
Exchange "Lambda-cyhalothrin-2bdf9967-6dae-4183-88d1-8f612548c51e low population density" was originally named: "Lambda-cyhalothrin; broadcast by air; kg AI" in this dataset.
Exchange "Occupation, arable-c19fb2d9-98eb-4cd3-8761-81b71d8a9a1b land" was originally named: "Occupation; arable, as cotton" in this dataset.
Exchange "Etridiazole-2bdf9967-6dae-4183-88d1-8f612548c51e low population density" was originally named: "Etridiazole; broadcast by air; kg AI" in this dataset.
Exchange "Quizalofop ethyl ester-2bdf9967-6dae-4183-88d1-8f612548c51e low population density" was originally named: "Quizalofop, ethyl ; broadcast by air; kg AI" in this dataset.
Exchange "Metalaxil-2bdf9967-6dae-4183-88d1-8f612548c51e low population density" was originally named: "Metalaxyl; broadcast by air; kg AI" in this dataset.
Exchange "Cyanazine-2bdf9967-6dae-4183-88d1-8f612548c51e low population density" was originally named: "Cyanazine; broadcast by air; kg AI" in this dataset.
Exchange "Pyrithiobac sodium salt-2bdf9967-6dae-4183-88d1-8f612548c51e low population density" was originally named: "Pyrithiobac-sodium; broadcast by air; kg AI" in this dataset.
Exchange "Sulfuric acid-be1c0329-f1a8-4524-8420-a86d2a8dd358 agricultural" was originally named: "Sulfuric acid; as secondary application" in this dataset.
Exchange "Acetic acid-2bdf9967-6dae-4183-88d1-8f612548c51e low population density" was originally named: "Acetic acid; from residue burning; kg C, biogenic" in this dataset.
Exchange "Zeta-cypermethrin-2bdf9967-6dae-4183-88d1-8f612548c51e low population density" was originally named: "Zeta-Cypermethrin; broadcast by air; kg AI" in this dataset.
Exchange "Toluene-2bdf9967-6dae-4183-88d1-8f612548c51e low population density" was originally named: "Toluene; from residue burning; kg C, biogenic" in this dataset.
Exchange "Fluazifop-p-butyl-2bdf9967-6dae-4183-88d1-8f612548c51e low population density" was originally named: "Fluazifop-p-butyl; broadcast by air; kg AI" in this dataset.
Exchange "Mepiquat chloride-2bdf9967-6dae-4183-88d1-8f612548c51e low population density" was originally named: "1,1-Dimethylpiperidinium chloride; broadcast by air; kg AI" in this dataset.
Exchange "Clomazone-2bdf9967-6dae-4183-88d1-8f612548c51e low population density" was originally named: "Clomazone; broadcast by air; kg AI" in this dataset.
Exchange "Cyfluthrin-2bdf9967-6dae-4183-88d1-8f612548c51e low population density" was originally named: "Beta-Cyfluthrin; broadcast by air; kg AI" in this dataset.
Exchange "Metolachlor-2bdf9967-6dae-4183-88d1-8f612548c51e low population density" was originally named: "Propazine; broadcast by air; kg AI" in this dataset.
Exchange "Parathion-methyl-2bdf9967-6dae-4183-88d1-8f612548c51e low population density" was originally named: "Methyl parathion; broadcast by air; kg AI" in this dataset.
Exchange "Bromoxynil-2bdf9967-6dae-4183-88d1-8f612548c51e low population density" was originally named: "Bromoxynil; broadcast by air; kg AI" in this dataset.
Exchange "1-Butene-2bdf9967-6dae-4183-88d1-8f612548c51e low population density" was originally named: "1 butene; from residue burning; kg C, biogenic" in this dataset.
Exchange "Malathion-2bdf9967-6dae-4183-88d1-8f612548c51e low population density" was originally named: "Malathion ; broadcast by air; kg AI" in this dataset.
Exchange "isopentane-2bdf9967-6dae-4183-88d1-8f612548c51e low population density" was originally named: "I pentane; from residue burning; kg C, biogenic" in this dataset.
Exchange "Propane-2bdf9967-6dae-4183-88d1-8f612548c51e low population density" was originally named: "Propane; from residue burning; kg C, biogenic" in this dataset.
Exchange "Bifenthrin-2bdf9967-6dae-4183-88d1-8f612548c51e low population density" was originally named: "Bifenthrin; broadcast by air; kg AI" in this dataset.
Exchange "Carbon dioxide, in air-2bdf9967-6dae-4183-88d1-8f612548c51e low population density" was originally named: "Carbon dioxide; from residue burning; kg C, biogenic" in this dataset.
Exchange "Hydrocyanic acid-2bdf9967-6dae-4183-88d1-8f612548c51e low population density" was originally named: "Hydrogen cyanide; from residue burning; kg C, biogenic" in this dataset.
Exchange "Quintozene-2bdf9967-6dae-4183-88d1-8f612548c51e low population density" was originally named: "Quintozene; broadcast by air; kg AI" in this dataset.
Exchange "Clethodim-2bdf9967-6dae-4183-88d1-8f612548c51e low population density" was originally named: "Clethodim; broadcast by air; kg AI" in this dataset.
Exchange "Benzene-2bdf9967-6dae-4183-88d1-8f612548c51e low population density" was originally named: "Benzene; from residue burning; kg C, biogenic" in this dataset.
Exchange "Aldicarb-2bdf9967-6dae-4183-88d1-8f612548c51e low population density" was originally named: "Aldicarb; broadcast by air; kg AI" in this dataset.
Exchange "Thidiazuron-2bdf9967-6dae-4183-88d1-8f612548c51e low population density" was originally named: "Thidiazuron; broadcast by air; kg AI" in this dataset.
Exchange "Methanol-2bdf9967-6dae-4183-88d1-8f612548c51e low population density" was originally named: "Methanol; from residue burning; kg C, biogenic" in this dataset.
Exchange "Disulfoton-2bdf9967-6dae-4183-88d1-8f612548c51e low population density" was originally named: "Disulfoton; broadcast by air; kg AI" in this dataset.
Exchange "Zinc compounds-be1c0329-f1a8-4524-8420-a86d2a8dd358 agricultural" was originally named: "Zinc compounds; as secondary application" in this dataset.
Exchange "Imidacloprid-2bdf9967-6dae-4183-88d1-8f612548c51e low population density" was originally named: "Imidacloprid; broadcast by air; kg AI" in this dataset.
Exchange "cis-2-Butene-2bdf9967-6dae-4183-88d1-8f612548c51e low population density" was originally named: "Cis 2 butene; from residue burning; kg C, biogenic" in this dataset.
Exchange "Water-2bdf9967-6dae-4183-88d1-8f612548c51e low population density" was originally named: "Water; from residue burning; biogenic" in this dataset.
Exchange "trans-2-Butene-2bdf9967-6dae-4183-88d1-8f612548c51e low population density" was originally named: "Trans 2 butene; from residue burning; kg C, biogenic" in this dataset.
Exchange "Pentane-2bdf9967-6dae-4183-88d1-8f612548c51e low population density" was originally named: "N pentane; from residue burning; kg C, biogenic" in this dataset.
Exchange "Diuron-2bdf9967-6dae-4183-88d1-8f612548c51e low population density" was originally named: "Diuron; broadcast by air; kg AI" in this dataset.
Exchange "Fluometuron-2bdf9967-6dae-4183-88d1-8f612548c51e low population density" was originally named: "Fluometuron; broadcast by air; kg AI" in this dataset.
Exchange "Nitrogen dioxide-2bdf9967-6dae-4183-88d1-8f612548c51e low population density" was originally named: "Nitrogen dioxide; from residue burning; kg N, biogenic" in this dataset.
Exchange "isobutene-2bdf9967-6dae-4183-88d1-8f612548c51e low population density" was originally named: "I butene; from residue burning; kg C, biogenic" in this dataset.
Exchange "Acetaldehyde-2bdf9967-6dae-4183-88d1-8f612548c51e low population density" was originally named: "Acetaldehyde; from residue burning; kg C, biogenic" in this dataset.

## Geography
The unit process is assumed to represent production in Louisiana (US State).

## Technology
This process produces cotton lint; at harvest in 1999; at farm; 90%-93% moisture. The process is assumed to represent production in Louisiana (US State). Yields and related inputs and outputs represent a single year of operation, in 1999. This dataset includes consideration of residue burning; soil preparation; planting or sowing; irrigation; application, storage, and transport of fertilizers, manures, liming materials, secondary materials, and pesticides; and harvest. Fate and transport of applications are not included as described in Cooper, J.S., Kahn, E., Noon, M. (2012) LCA Digital Commons Unit Process Data: field crop production Version 1 which is available at https://www.lcacommons.gov/discovery/docs/LCA%20Digital%20Commons%20Unit%20Process%20Data%20final%20updated.pdf

## Time period
Start and end dates match the underlying data obtained from the USDA Agricultural Resource Management Survey (ARMS).
## Parameters
- p2221: 0.00559633; = p1155-p2220
- p0402: 0.5
- p0370: 0.5
- p2987: 0; = p2401*(p1020+p1022)
- p1522: 70
- p4173: 1.05344e-5; = p1824*p3479
- p0531: 0; = SQRT(2)*(IF((2*p0399-1)<0;-1;IF((2*p0399-1)>0;1;0))*SQRT(SQRT((2/(pi()*0.140012289)+LN(1-(2*p0399-1)^2)/2)^2-LN(1-(2*p0399-1)^2)/0.140012289)-(2/(pi()*0.140012289)+LN(1-(2*p0399-1)^2)/2)))
- p1734: 0
- p2152: 3.73721e-7; = p2015*p2080*p2114/(p0818*1000)
- p1880: 0
- p2714: 0.000159768; = p2323*(p1019+p1021)
- p2966: 8.0656e-5; = p2380*(p1079+p1081)
- p1104: 0.275167; = IF(p1071=0;IF(p1096+p1101+p1102+p1103=1;0;1-(p1096+p1101+p1102+p1103));0)
- p2707: 0.000519679; = p2316*(p1019+p1021)
- p1587: 0
- p0882: 0; = p0869*p0856
- p2246: 0.000137623; = p2222*p2191
- p2728: 0; = p2337*(p1078+p1080)
- p1281: 0; = IF(p1277+p1280=p1263;0;IF(p1277+p1280+p1279>p1263;p1263-(p1277+p1280);p1279))
- p2105: 0.888194
- p2006: 1.5201; = ((p1980*p1985+p1986*p1991+p1992*p1997+p2000*p2005)/p0818)*p0005*p0002/1000
- p2258: 0.00398137; = p2226*p2204
- p0517: 0; = SQRT(2)*(IF((2*p0385-1)<0;-1;IF((2*p0385-1)>0;1;0))*SQRT(SQRT((2/(pi()*0.140012289)+LN(1-(2*p0385-1)^2)/2)^2-LN(1-(2*p0385-1)^2)/0.140012289)-(2/(pi()*0.140012289)+LN(1-(2*p0385-1)^2)/2)))
- p2807: 0; = p2416*(p1078+p1080)
- p2213: 0.00090415; = p1116-p2212
- p2413: 0; = p2234*p2203
- p0504: 0; = SQRT(2)*(IF((2*p0372-1)<0;-1;IF((2*p0372-1)>0;1;0))*SQRT(SQRT((2/(pi()*0.140012289)+LN(1-(2*p0372-1)^2)/2)^2-LN(1-(2*p0372-1)^2)/0.140012289)-(2/(pi()*0.140012289)+LN(1-(2*p0372-1)^2)/2)))
- p3625: 0.000109518; = p1894*p3476
- p0754: 6189.46; = p0094*(1+p0622*p0226/100)
- p3425: 0; = p3368*p1239
- p2227: 0.447907; = if(p0774*p0778+p0775*p0779+p0776*p0780+p0777*p0781=0;0;p0779*p0775/(p0774*p0778+p0775*p0779+p0776*p0780+p0777*p0781))
- p3038: 0; = p2257*p1023
- p3538: 3.44397e-7; = p1807*p3476
- p3194: 0; = p2413*p1023
- p1764: 0
- p1583: 0.806008
- p0921: 0; = p0679*1000/p0801
- p0401: 0.5
- p2844: 0.00144432; = p2258*(p1079+p1081)
- p1311: 0; = IF(p1307+p1310=p1266;0;IF(p1307+p1310+p1309>p1266;p1266-(p1307+p1310);p1309))
- p3270: 0
- p2551: 0.00247644; = p2355*p1014
- p2075: 0.072
- p2248: 0.00650596; = p2222*p2193
- p1703: 0
- p2982: 0; = p2396*(p1020+p1022)
- p3888: 0.000298276; = p1951*p3477
- p0995: 1.21137e-5; = p0991*p0001*p0004/(p0818*p0002)
- p1395: 7
- p2594: 0; = p2398*p1014
- p3535: 6.88794e-7; = p1804*p3476
- p1503: 94
- p4155: 5.45825e-7; = p1806*p3479
- p2861: 0.000365396; = p2275*(p1129+p1131)
- p5276: 1.4945e-6; = p1897*p3484
- p0390: 0.5
- p2271: 0.0015107; = p2226*p2217
- p0260: 12.123
- p2040: 0
- p0143: 0
- p1655: 0
- p1707: 0.356204
- p2601: 0; = p2405*p1014
- p1741: 0
- p1227: 0.00126871; = IF(p1221=0;0;p1226*p0001/(p0818*p0002))
- p2921: 0.000459007; = p2335*(p1020+p1022)
- p4995: 3.55829e-7; = p1822*p3483
- p3030: 0; = p2249*p1023
- p2632: 0.000395696; = p2241*(p1019+p1021)
- p2333: 0.00182902; = p2224*p2201
- p4822: 0; = p1855*p3482
- p3432: 0; = p3375*p1239
- p4626: 3.37362e-7; = p1865*p3481
- p3202: 0; = p2421*p1082
- p2216: 0.000390814; = p1108/p0818
- p3263: 0
- p2604: 0; = p2408*p1014
- p1107: 438260; = IF(p1071=0;p1105*p1101*p1095;0)
- p2988: 0; = p2402*(p1020+p1022)
- p2774: 3.99997e-6; = p2383*(p1078+p1080)
- p3388: 0; = p3369*p1234
- p4100: 1.30057e-6; = p1957*p3478
- p2355: 0.00452813; = p2225*p2183
- p0971: 0; = p0968/p0818
- p3086: 1.06735e-6; = p2305*p1082
- p0885: 0.711; = IF(p0689+p0884=100;0;100-(p0689+p0884))
- p0805: 0
- p1108: 169019; = IF(p1071=0;p1105*p1102*p1095;0)
- p4762: 0; = p1795*p3482
- p0772: 52.774; = p0112*(1+p0640*p0244/100)
- p2285: 0.000176472; = p2223*p2191
- p3253: 0; = p1252*(p1277*(1-p3247)+p1280*(1-p3248)+p1281*(1-p3249)+p1282*(1-p3250))
- p1549: 3
- p5280: 2.6901e-6; = p1901*p3484
- p2469: 0.00264633; = p2273*p1123
- p2989: 0; = p2403*(p1020+p1022)
- p0051: 22.669
- p2750: 0.000144866; = p2359*(p1019+p1021)
- p4127: 2.1833e-7; = p1778*p3479
- p1319: 2.288; = IF(((p0745*1000*p0746/100)+(p0754*1000*p0755/100))/p0801<0;0;((p0745*1000*p0746/100)+(p0754*1000*p0755/100))/p0801)
- p1266: 0; = if(p1232>0;0;IF(p1259+p1263+p1264+p1265=1;0;1-(p1259+p1263+p1264+p1265)))
- p1305: 0; = p1301*p1252/p0818
- p5281: 2.46593e-6; = p1902*p3484
- p5268: 7.84614e-6; = p1889*p3484
- p2967: 3.48247e-5; = p2381*(p1079+p1081)
- p3479: 0.0236058; = if(p1328+p1330+p1332+p1334+p1336+p1338+p1340+p1342+p1344=0;0;p1334/(p1328+p1330+p1332+p1334+p1336+p1338+p1340+p1342+p1344))
- p1116: 0.000990615; = IF(p1071=0;p1106/(p1111*p0818);0)
- p1623: 0
- p0907: 0.00734516
- p2061: 0.518824
- p0970: 0.00402101; = p0967/p0818
- p1686: 0
- p2297: 0.00413466; = p2227*p2204
- p1781: 0
- p2095: 0.765734
- p2917: 6.34286e-6; = p2331*(p1020+p1022)
- p4576: 3.37362e-6; = p1815*p3481
- p1621: 0
- p2517: 0.00128386; = p2321*p1014
- p4851: 0; = p1884*p3482
- p0682: 615.164; = p0022*(1+p0550*p0154/100)
- p2721: 5.7092e-6; = p2330*(p1019+p1021)
- p0137: 55.394
- p1600: 0.895638
- p1921: 0
- p3946: 3.03466e-6; = p1803*p3478
- p3236: 0.0140975
- p3233: 0.60394
- p1136: 0; = if(p1121=0;p1130*(p0716/100)*p0703*1000;0)
- p1001: 0.187288; = if(p0978>0;0;if(and(p0687=0;p0691=0;p0695=0;p0699=0);0;IF(p0996+p0999+p1000=1;0;1-(p0996+p0999+p1000))))
- p1925: 6.93674e-6; = p1517*1000/p0818
- p0275: 0.5
- p2198: 0.000113346; = 22.98976928*p2197/14.0067
- p1261: 0; = if(p1232>0;0;p0732/100)
- p1205: 0
- p0895: 2.35945e8; = p0894*p0830
- p2139: 4.97463e-6; = p2015*p2067*p2101/(p0818*1000)
- p2268: 0.000437065; = p2226*p2214
- p1808: 0
- p2037: 3.44
- p2932: 0; = p2346*(p1079+p1081)
- p3373: 0; = if(p1232=0;p3245*p3361/p0818;0)
- p2576: 5.04008e-5; = p2380*p1073
- p0313: 0.5
- p1709: 0
- p4251: 1.80122e-6; = p1902*p3479
- p1176: 95.819; = p1175*p0801
- p1253: 0; = if(p1232>0;0;p0735/100)
- p4250: 1.96497e-6; = p1901*p3479
- p0239: 10.874
- p1052: 3.29523e6; = IF(p1012=0;p1045*p1036;0)
- p2731: 0; = p2340*(p1078+p1080)
- p3153: 0; = p2372*p1023
- p0889: 69.3601; = 1000*p0888*p0001*p0003*p0004/(p0818*p0002)
- p4686: 2.02417e-7; = p1925*p3481
- p2323: 0.000530791; = p2224*p2190
- p2430: 0; = p2236*p2220
- p3469: 0; = p3374*p1241
- p0082: 97.157
- p1170: 382.398; = p1169*p0801
- p0513: 0; = SQRT(2)*(IF((2*p0381-1)<0;-1;IF((2*p0381-1)>0;1;0))*SQRT(SQRT((2/(pi()*0.140012289)+LN(1-(2*p0381-1)^2)/2)^2-LN(1-(2*p0381-1)^2)/0.140012289)-(2/(pi()*0.140012289)+LN(1-(2*p0381-1)^2)/2)))
- p2307: 0.000453893; = p2227*p2214
- p0452: 0; = SQRT(2)*(IF((2*p0320-1)<0;-1;IF((2*p0320-1)>0;1;0))*SQRT(SQRT((2/(pi()*0.140012289)+LN(1-(2*p0320-1)^2)/2)^2-LN(1-(2*p0320-1)^2)/0.140012289)-(2/(pi()*0.140012289)+LN(1-(2*p0320-1)^2)/2)))
- p0914: 1.10579e7; = p0825*p0911+p0827*p0912+(p0830+p0895)*p0824*p0913
- p1693: 0.384846
- p2694: 0.000136326; = p2303*(p1078+p1080)
- p0575: 0; = IF(p0311<0.5;-SQRT(p0007*EXP(p0443^2*p0008)-p0007);SQRT(p0007*EXP(p0443^2*p0008)-p0007))
- p2913: 0.000205738; = p2327*(p1020+p1022)
- p1708: 0
- p2451: 0.00103133; = p2255*p1014
- p2555: 0.000263213; = p2359*p1014
- p3079: 0.00010306; = p2298*p1082
- p3769: 0.000309461; = p1832*p3477
- p5043: 4.44786e-7; = p1870*p3483
- p2710: 0.000383784; = p2319*(p1019+p1021)
- p0104: 99.775
- p0723: 615.284; = p0063*(1+p0591*p0195/100)
- p3188: 0; = p2407*p1023
- p0254: 19.776
- p2577: 2.17615e-5; = p2381*p1073
- p1997: 4.66671e7; = (if(p1152=0;0;p1150/p1152)+if(p1153=0;0;p1151/p1153))*(1+p1157)
- p1630: 0.784351
- p3021: 0; = p2240*p1023
- p0893: 2.25162; = 1000*(p0890+p0892)*p0001*p0003*p0004/(p0818*p0002)
- p0236: 0.231
- p2030: 8.87
- p1097: 0.0685077
- p0807: 480
- p2585: 0.0017573; = p2389*p1123
- p1247: 0; = if(p1232>0;0;p1242*p0001/(p0818*p0002))
- p1843: 0
- p3100: 0; = p2319*p1023
- p3732: 1.49138e-5; = p1795*p3477
- p0584: 0; = IF(p0320<0.5;-SQRT(p0007*EXP(p0452^2*p0008)-p0007);SQRT(p0007*EXP(p0452^2*p0008)-p0007))
- p2911: 0.0001643; = p2325*(p1020+p1022)
- p3304: 0; = if(and(p1232=0;p3252<>0);p3260*p3289;0)
- p2148: 8.76577e-7; = p2015*p2076*p2110/(p0818*1000)
- p3317: 0; = if(and(p1232=0;p3253<>0);p3253*(p3261*p3277-p3312)/p3316;0)
- p2636: 0.000164727; = p2245*(p1019+p1021)
- p1249: 0; = if(p1232>0;0;p1244*p0001/(p0818*p0002))
- p3020: 0; = p2239*p1023
- p0487: 0; = SQRT(2)*(IF((2*p0355-1)<0;-1;IF((2*p0355-1)>0;1;0))*SQRT(SQRT((2/(pi()*0.140012289)+LN(1-(2*p0355-1)^2)/2)^2-LN(1-(2*p0355-1)^2)/0.140012289)-(2/(pi()*0.140012289)+LN(1-(2*p0355-1)^2)/2)))
- p1560: 0
- p2683: 1.65952e-5; = p2292*(p1019+p1021)
- p0056: 44.831
- p2740: 0; = p2349*(p1078+p1080)
- p1986: 4200
- p3136: 0; = p2355*p1023
- p0057: 28.278
- p3001: 0; = p2415*(p1079+p1081)
- p2922: 0; = p2336*(p1079+p1081)
- p0526: 0; = SQRT(2)*(IF((2*p0394-1)<0;-1;IF((2*p0394-1)>0;1;0))*SQRT(SQRT((2/(pi()*0.140012289)+LN(1-(2*p0394-1)^2)/2)^2-LN(1-(2*p0394-1)^2)/0.140012289)-(2/(pi()*0.140012289)+LN(1-(2*p0394-1)^2)/2)))
- p2894: 0.00062137; = p2308*(p1079+p1081)
- p2101: 0.620397
- p1174: 4.42099e-7; = p1170*p1173/p0818
- p1701: 0
- p1991: 3.67893e7; = (if(p1111=0;0;p1106/p1111)+if(p1112=0;0;p1107/p1112)+if(p1113=0;0;p1108/p1113)+if(p1114=0;0;p1109/p1114)+if(p1115=0;0;p1110/p1115))*(1+p1157)
- p2053: 1.45647
- p2110: 0.856281
- p2317: 0.000159945; = p2224*p2184
- p0912: 0.0117914
- p0229: 17.255
- p0749: 3.874; = p0089*(1+p0617*p0221/100)
- p2482: 0.000781044; = p2286*p1014
- p2606: 0; = p2410*p1014
- p3049: 1.20455e-5; = p2268*p1082
- p2845: 0.00130628; = p2259*(p1079+p1081)
- p1219: 0; = if(p1218=0;0;SQRT(2)*(IF((2*p1218-1)<0;-1;IF((2*p1218-1)>0;1;0))*SQRT(SQRT((2/(pi()*0.140012289)+LN(1-(2*p1218-1)^2)/2)^2-LN(1-(2*p1218-1)^2)/0.140012289)-(2/(pi()*0.140012289)+LN(1-(2*p1218-1)^2)/2))))
- p2118: 0.679049
- p0084: 95.902
- p0973: 5.53525e6; = p0967+p0968+p0969
- p0491: 0; = SQRT(2)*(IF((2*p0359-1)<0;-1;IF((2*p0359-1)>0;1;0))*SQRT(SQRT((2/(pi()*0.140012289)+LN(1-(2*p0359-1)^2)/2)^2-LN(1-(2*p0359-1)^2)/0.140012289)-(2/(pi()*0.140012289)+LN(1-(2*p0359-1)^2)/2)))
- p1118: 0.00389347; = IF(p1071=0;p1108/(p1113*p0818);0)
- p2691: 0.00385062; = p2300*(p1078+p1080)
- p1331: 0.0104753; = p1330*p0001/(p0818*p0002)
- p1166: 6.91314e-6; = p1164/p0818
- p1216: 0.108582
- p1559: 0
- p0867: 0.014787; = IF(p0858+p0864+p0865+p0866=1;0;IF(p0858+p0864+p0865+p0866+p0862>1;1-(p0858+p0864+p0865+p0866);p0862))
- p1893: 0.000159545; = p1485*1000/p0818
- p2290: 1.52781e-5; = p2223*p2197
- p2766: 0.00042704; = p2375*(p1078+p1080)
- p0673: 0
- p1013: 0; = p1012*p0001/(p0818*p0002)
- p1062: 0.16
- p1312: 0; = IF(p1307+p1310+p1311=p1266;0;p1266-(p1307+p1310+p1311))
- p0557: 0; = IF(p0293<0.5;-SQRT(p0007*EXP(p0425^2*p0008)-p0007);SQRT(p0007*EXP(p0425^2*p0008)-p0007))
- p2369: 4.97461e-5; = p2225*p2198
- p0220: 15.927
- p3010: 0; = p2424*(p1079+p1081)
- p2890: 0.00169104; = p2304*(p1079+p1081)
- p0153: 0
- p1963j: 0.000145801; = p1725*p1929+p1726*p1930+p1727*p1931+p1728*p1932+p1729*p1933+p1730*p1934+p1731*p1935+p1732*p1936+p1733*p1937+p1734*p1938+p1735*p1939+p1736*p1940+p1737*p1941+p1738*p1942+p1739*p1943+p1740*p1944+p1741*p1945+p1742*p1946+p1743*p1947
- p4390: 2.30915e-8; = p1835*p3480
- p1688: 0
- p0494: 0; = SQRT(2)*(IF((2*p0362-1)<0;-1;IF((2*p0362-1)>0;1;0))*SQRT(SQRT((2/(pi()*0.140012289)+LN(1-(2*p0362-1)^2)/2)^2-LN(1-(2*p0362-1)^2)/0.140012289)-(2/(pi()*0.140012289)+LN(1-(2*p0362-1)^2)/2)))
- p2946: 0.000936462; = p2360*(p1020+p1022)
- p2797: 0; = p2406*(p1019+p1021)
- p3230: 8.84198e-7; = p1170/p0818
- p0752: 0
- p0354: 0.5
- p2393: 0; = p2234*p2182
- p1735: 0
- p4789: 0; = p1822*p3482
- p0195: 0
- p1360: 96
- p3131: 0; = p2350*p1132
- p2480: 0.000383788; = p2284*p1014
- p0269: 14.757
- p2809: 0; = p2418*(p1078+p1080)
- p0804: 901000
- p1563: 0
- p1471: 4
- p0611: 0; = IF(p0347<0.5;-SQRT(p0007*EXP(p0479^2*p0008)-p0007);SQRT(p0007*EXP(p0479^2*p0008)-p0007))
- p2453: 0.00170166; = p2257*p1014
- p2242: 0.000189201; = p2222*p2187
- p1883: 0
- p0869: 0; = IF(p0858+p0864+p0865+p0866+p0867+p0868=1;0;1-(p0858+p0864+p0865+p0866+p0867+p0868))
- p2559: 0.000191459; = p2363*p1014
- p5273: 2.37626e-5; = p1894*p3484
- p1900: 0
- p2676: 5.31182e-5; = p2285*(p1019+p1021)
- p0830: 1.13163e9; = p0825*(p0821-p0814)*p0824
- p1872: 0.00726739; = p1464*1000/p0818
- p0511: 0; = SQRT(2)*(IF((2*p0379-1)<0;-1;IF((2*p0379-1)>0;1;0))*SQRT(SQRT((2/(pi()*0.140012289)+LN(1-(2*p0379-1)^2)/2)^2-LN(1-(2*p0379-1)^2)/0.140012289)-(2/(pi()*0.140012289)+LN(1-(2*p0379-1)^2)/2)))
- p2804: 0; = p2413*(p1019+p1021)
- p3052: 4.16349e-5; = p2271*p1082
- p1292: 0; = IF(p1287+p1290+p1291=p1261;0;p1261-(p1287+p1290+p1291))
- p3162: 2.64566e-6; = p2381*p1082
- p2046: 10
- p2864: 3.21632e-5; = p2278*(p1020+p1022)
- p3311: 0; = if(and(p1232=0;p3252<>0);p3252-(p3306+p3307+p3308+p3309+p3310);0)
- p2709: 0.000165827; = p2318*(p1019+p1021)
- p4486: 1.73186e-8; = p1931*p3480
- p0701: 0
- p2079: 0.02
- p2111: 0.856281
- p2771: 8.51494e-5; = p2380*(p1078+p1080)
- p0739: 10.97; = p0079*(1+p0607*p0211/100)
- p2471: 0.000318771; = p2275*p1123
- p1431: 3
- p5200: 6.72526e-7; = p1821*p3484
- p2454: 0.000902537; = p2258*p1073
- p4485: 4.04101e-7; = p1930*p3480
- p0986: 0; = IF(p0982+p0985=1;0;IF(p0982+p0985+p0984>1;1-(p0982+p0985);p0984))
- p0050: 43.008
- p2564: 1.65755e-5; = p2368*p1014
- p1939: 0
- p2133: 7.13504e-6; = p2015*p2061*p2095/(p0818*1000)
- p2723: 0.00128412; = p2332*(p1019+p1021)
- p0156: 20.392
- p1110: 1.76031e6; = IF(p1071=0;p1105*p1104*p1095;0)
- p3475: 0; = p3380*p1241
- p0822: 0.916
- p4151: 1.19536e-5; = p1802*p3479
- p1744: 0
- p1929: 0
- p1762: 0.00029828; = p1354*1000/p0818
- p0189: 31.927
- p4691: 4.72307e-6; = p1930*p3481
- p3107: 0; = p2326*p1023
- p2348: 0; = p2228*p2216
- p1869: 0
- p1965: 0.0173022; = p1963+p1959*p1964*1000/p0818
- p3620: 3.61617e-5; = p1889*p3476
- p0234: 21.694
- p2298: 0.00373949; = p2227*p2205
- p2207: 0.0224475; = p1119-p2205-p2204-p2206
- p2320: 0.000183506; = p2224*p2187
- p3274: 0
- p1951: 0.000554939; = p1543*1000/p0818
- p1830: 0
- p4037: 0.00013786; = p1894*p3478
- p1758: 0
- p1111: 0.0872841
- p3470: 0; = p3375*p1241
- p0428: 0; = SQRT(2)*(IF((2*p0296-1)<0;-1;IF((2*p0296-1)>0;1;0))*SQRT(SQRT((2/(pi()*0.140012289)+LN(1-(2*p0296-1)^2)/2)^2-LN(1-(2*p0296-1)^2)/0.140012289)-(2/(pi()*0.140012289)+LN(1-(2*p0296-1)^2)/2)))
- p2613: 0; = p2417*p1073
- p4335: 1.96278e-7; = p1780*p3480
- p2916: 2.88495e-6; = p2330*(p1020+p1022)
- p2886: 0.00364742; = p2300*(p1079+p1081)
- p5337: 0; = p1962*p3484
- p4898: 0; = p1931*p3482
- p2843: 0.000473254; = p2257*(p1020+p1022)
- p4924: 0; = p1957*p3482
- p1946: 0
- p4754: 0; = p1787*p3482
- p0931: 0; = p0801*p0925
- p0935: 0; = p0929*p0001/(p0818*p0002)
- p1304: 0; = p1300*p1252/p0818
- p1146: 0.911008
- p1534: 23
- p1636: 0
- p1747: 0.217583
- p4387: 1.43744e-6; = p1832*p3480
- p1201: 0.65
- p2838: 2.97449e-6; = p2252*(p1020+p1022)
- p1699: 0.762907
- p2410: 0; = p2234*p2200
- p0614: 0; = IF(p0350<0.5;-SQRT(p0007*EXP(p0482^2*p0008)-p0007);SQRT(p0007*EXP(p0482^2*p0008)-p0007))
- p3905: 5.59245e-5; = p1762*p3478
- p2455: 0.000816276; = p2259*p1073
- p2240: 0.00056802; = p2222*p2185
- p1283: 0; = p1277*p1252/p0818
- p0966: 0.68583; = if(p0683=0;0;IF(p0684/100+p0965=1;0;1-(p0684/100+p0965)))
- p0385: 0.5
- p2456: 0.000264331; = p2260*p1073
- p2197: 6.90571e-5; = p1055/p0818
- p1954: 0
- p1934: 0
- p2973: 1.71254e-5; = p2387*(p1079+p1081)
- p3084: 9.8103e-6; = p2303*p1082
- p4650: 7.0846e-6; = p1889*p3481
- p0734: 0
- p3453: 0; = p3377*p1240
- p0716: 44.831; = p0056*(1+p0584*p0188/100)
- p1592: 0
- p3554: 3.09957e-6; = p1823*p3476
- p4452: 1.15457e-7; = p1897*p3480
- p0292: 0.5
- p4323: 5.54196e-7; = p1768*p3480
- p1070: 0.0560309; = IF(p1012=0;p1056/(p1063*p0818);0)
- p2726: 0.000908358; = p2335*(p1019+p1021)
- p2595: 0; = p2399*p1014
- p0958: 0; = if(and(p0683>0;or(p0807=480;p0807=32;p0807=1;and(p0807=60;p0901<0.03)));p0934;0)
- p2704: 0.000720323; = p2313*(p1128+p1130)
- p1248: 0; = if(p1232>0;0;p1243*p0001/(p0818*p0002))
- p2176: 0.000909728; = p0895*p0913/p0818
- p3430: 0; = p3373*p1239
- p3895: 0; = p1962*p3477
- p1210: 0.18
- p0635: 0; = IF(p0371<0.5;-SQRT(p0007*EXP(p0503^2*p0008)-p0007);SQRT(p0007*EXP(p0503^2*p0008)-p0007))
- p2400: 0; = p2234*p2189
- p2059: 1.00168
- p2969: 3.78889e-6; = p2383*(p1079+p1081)
- p3319: 0; = if(and(p1232=0;p3253<>0);p3253*(p3263-p3314)/p3316;0)
- p2859: 0.00303338; = p2273*(p1129+p1131)
- p0750: 0.724; = p0090*(1+p0618*p0222/100)
- p0108: 71.232
- p1666: 0.885279
- p2212: 8.6465e-5; = p1106/p0818
- p2116: 0.444424
- p2365: 0.0165496; = p2225*p2193
- p1815: 0.000115612; = p1407*1000/p0818
- p0687: 4.863; = p0027*(1+p0555*p0159/100)
- p1791: 0
- p0427: 0; = SQRT(2)*(IF((2*p0295-1)<0;-1;IF((2*p0295-1)>0;1;0))*SQRT(SQRT((2/(pi()*0.140012289)+LN(1-(2*p0295-1)^2)/2)^2-LN(1-(2*p0295-1)^2)/0.140012289)-(2/(pi()*0.140012289)+LN(1-(2*p0295-1)^2)/2)))
- p2330: 1.89674e-5; = p2224*p2198
- p2439: 0.00132371; = p2243*p1014
- p1979: 5.53525e6; = p0973
- p1572: 0
- p2224: 0.167341; = if(p0765*p0769+p0766*p0770+p0767*p0771+p0768*p0772=0;0;p0771*p0767/(p0765*p0769+p0766*p0770+p0767*p0771+p0768*p0772))
- p1137: 0; = if(p1121=0;p1131*(p0716/100)*p0703*1000;0)
- p2590: 0; = p2394*p1014
- p0140: 44.831
- p0765: 79.286; = p0105*(1+p0633*p0237/100)
- p3282: 0
- p3340: 0; = if(and(p1232=0;p3254<>0);p3254*(p3270-p3335)/p3338;0)
- p0630: 0; = IF(p0366<0.5;-SQRT(p0007*EXP(p0498^2*p0008)-p0007);SQRT(p0007*EXP(p0498^2*p0008)-p0007))
- p3441: 0; = p3365*p1240
- p2431: 0; = p2236*p2221
- p2637: 4.14245e-5; = p2246*(p1019+p1021)
- p1379: 13
- p3125: 0; = p2344*p1082
- p2670: 0.000219238; = p2279*(p1019+p1021)
- p1711: 0
- p2537: 0; = p2341*p1073
- p0180: 51.503
- p3351: 0; = if(and(p1232=0;p3256<>0);p3256*(p3274-p3346)/p3349;0)
- p1995: 50
- p2253: 4.29962e-5; = p2222*p2199
- p2591: 0; = p2395*p1014
- p2549: 0; = p2353*p1123
- p3116: 0; = p2335*p1023
- p2171: 0.207444; = p2165*p0831
- p2372: 0.00479698; = p2225*p2201
- p0213: 9.029
- p2228: 0; = if(p0774*p0778+p0775*p0779+p0776*p0780+p0777*p0781=0;0;p0780*p0776/(p0774*p0778+p0775*p0779+p0776*p0780+p0777*p0781))
- p4111: 7.04114e-6; = p1762*p3479
- p1668: 0.723486
- p0447: 0; = SQRT(2)*(IF((2*p0315-1)<0;-1;IF((2*p0315-1)>0;1;0))*SQRT(SQRT((2/(pi()*0.140012289)+LN(1-(2*p0315-1)^2)/2)^2-LN(1-(2*p0315-1)^2)/0.140012289)-(2/(pi()*0.140012289)+LN(1-(2*p0315-1)^2)/2)))
- p2412: 0; = p2234*p2202
- p1048: 0.000567816; = IF(p1012=0;IF(p1037+p1044+p1045+p1046+p1047=1;0;IF(p1037+p1044+p1045+p1046+p1047+p1042>1;1-(p1037+p1044+p1045+p1046+p1047);p1042));0)
- p0312: 0.5
- p0862: 0.0151447; = p0674*1000/p0856
- p1310: 0; = IF(p1307=p1266;0;IF(p1307+p1308>p1266;p1266-p1307;p1308))
- p0034: 46.227
- p3198: 0; = p2417*p1082
- p1626: 0
- p2711: 5.52352e-5; = p2320*(p1019+p1021)
- p2808: 0; = p2417*(p1078+p1080)
- p2024: 0.748682
- p1878: 0
- p3413: 0; = p3375*p1238
- p4541: 2.29406e-6; = p1780*p3481
- p1852: 0
- p1817: 0
- p2802: 0; = p2411*(p1019+p1021)
- p2273: 0.00935825; = p2230*p2219
- p4272: 6.00407e-7; = p1923*p3479
- p2525: 6.32001e-6; = p2329*p1014
- p1620: 0.633063
- p2818: 0; = p2427*(p1078+p1080)
- p1061: 0.3
- p2708: 4.81434e-5; = p2317*(p1019+p1021)
- p4790: 0; = p1823*p3482
- p0823: 0.91625
- p3182: 0; = p2401*p1023
- p1523: 3
- p3109: 0; = p2328*p1023
- p2091: 0.374844
- p2826: 8.63959e-5; = p2240*(p1020+p1022)
- p0918: 0; = p0680*1000/p0801
- p4788: 0; = p1821*p3482
- p0404: 0.5
- p2757: 0.00106783; = p2366*(p1019+p1021)
- p1225: 1.088; = IF(p1221=0;0;p1223+1.2*p1224)
- p3409: 0; = p3371*p1238
- p0221: 22.078
- p0951: 0; = if(and(p0683=0;or(p0807=480;p0807=32;p0807=1;and(p0807=60;p0901<0.03)));p0939;0)
- p3099: 0; = p2318*p1023
- p0784: 70.126; = p0124*(1+p0652*p0256/100)
- p1615: 0
- p2309: 0.000175048; = p2227*p2216
- p1480: 678
- p2149: 6.61277e-7; = p2015*p2077*p2111/(p0818*1000)
- p1515: 11
- p0029: 77.387
- p2735: 0; = p2344*(p1078+p1080)
- p1948: 0
- p0621: 0; = IF(p0357<0.5;-SQRT(p0007*EXP(p0489^2*p0008)-p0007);SQRT(p0007*EXP(p0489^2*p0008)-p0007))
- p2076: 0.057
- p2738: 0; = p2347*(p1078+p1080)
- p2552: 0.000229419; = p2356*p1014
- p4860: 0; = p1893*p3482
- p2497: 0.000413279; = p2301*p1073
- p2541: 0; = p2345*p1073
- p0863: 0; = p0675*1000/p0856
- p3159: 7.47285e-5; = p2378*p1082
- p2996: 0; = p2410*(p1020+p1022)
- p1426: 2
- p2045: 30
- p3039: 0.000109727; = p2258*p1082
- p2907: 0.000357059; = p2321*(p1020+p1022)
- p0089: 3.874
- p3308: 0; = if(and(p1232=0;p3252<>0);p3252*(p3259-p3303)/p3305;0)
- p2526: 1.03733e-5; = p2330*p1014
- p2831: 8.3239e-5; = p2245*(p1020+p1022)
- p2638: 0.000335234; = p2247*(p1019+p1021)
- p3394: 0; = p3375*p1234
- p2341: 0; = p2228*p2209
- p3440: 0; = p3364*p1240
- p0751: 8.462; = p0091*(1+p0619*p0223/100)
- p5278: 1.1956e-6; = p1899*p3484
- p0920: 0; = p0676*1000/p0801
- p1584: 0
- p3630: 5.51035e-6; = p1899*p3476
- p3328: 0; = if(and(p1232=0;p3255<>0);p3255*(p3265*p3277-p3323)/p3327;0)
- p2718: 0.000407147; = p2327*(p1019+p1021)
- p2698: 0.000173832; = p2307*(p1078+p1080)
- p0177: 13.92
- p3930: 5.6358e-6; = p1787*p3478
- p1387: 12
- p2362: 0.00139211; = p2225*p2190
- p1049: 0.209623; = IF(p1012=0;IF(p1037+p1044+p1045+p1046+p1047+p1048=1;0;1-(p1037+p1044+p1045+p1046+p1047+p1048));0)
- p1268: 0
- p0315: 0.5
- p1881: 0
- p2070: 0.282
- p0127: 19.972
- p4861: 0; = p1894*p3482
- p1179: 0.5
- p1622: 0
- p2542: 0; = p2346*p1073
- p1553: 0
- p1135: 89410.1; = if(p1121=0;p1129*(p0716/100)*p0703*1000;0)
- p2747: 0.000126266; = p2356*(p1019+p1021)
- p0406: 0; = SQRT(2)*(IF((2*p0274-1)<0;-1;IF((2*p0274-1)>0;1;0))*SQRT(SQRT((2/(pi()*0.140012289)+LN(1-(2*p0274-1)^2)/2)^2-LN(1-(2*p0274-1)^2)/0.140012289)-(2/(pi()*0.140012289)+LN(1-(2*p0274-1)^2)/2)))
- p1008: 0; = p1004*p0001*p0004/(p0818*p0002)
- p2801: 0; = p2410*(p1019+p1021)
- p0767: 91.347; = p0107*(1+p0635*p0239/100)
- p0309: 0.5
- p1003: 0; = p0999*p0888
- p2218: 0.0329679; = p1150/p0818
- p0740: 98.487; = p0080*(1+p0608*p0212/100)
- p3029: 0; = p2248*p1023
- p1071: 0
- p1588: 0
- p0991: 231183; = p0987*p0886
- p4512: 1.73186e-8; = p1957*p3480
- p1087: 0; = IF(p1071=0;p1081*(p0710/100)*p0703*1000;0)
- p0778: 32.633; = p0118*(1+p0646*p0250/100)
- p0710: 43.008; = p0050*(1+p0578*p0182/100)
- p1833: 0
- p5066: 6.13805e-6; = p1893*p3483
- p1007: 0; = p1003*p0001*p0004/(p0818*p0002)
- p3009: 0; = p2423*(p1079+p1081)
- p0141: 17.705
- p1231: 0.0431542; = IF(p1221=0;0;p1230*(p1228+p1229))
- p3185: 0; = p2404*p1023
- p3290: 0
- p1634: 0
- p2825: 2.50827e-5; = p2239*(p1020+p1022)
- p1044: 0.00785902; = IF(p1012=0;IF(p1037=1;0;IF(p1037+p1038>1;1-p1037;p1038));0)
- p0828: 0.128197; = if(p0827=0;0;p0819-p0827/p0818)
- p4869: 0; = p1902*p3482
- p0185: 46.132
- p2463: 8.84001e-5; = p2267*p1073
- p1922: 0
- p1978: 198
- p0190: 32.686
- p1828: 0
- p0997: 0; = if(p0888=0;0;if((p0695*p0694*1000*p0696/100)/p0888>1;1;(p0695*p0694*1000*p0696/100)/p0888))
- p1141: 0.000184448; = if(p1121=0;p1135*p0001/(p0818*p0002);0)
- p2531: 0.00165043; = p2335*p1014
- p0477: 0; = SQRT(2)*(IF((2*p0345-1)<0;-1;IF((2*p0345-1)>0;1;0))*SQRT(SQRT((2/(pi()*0.140012289)+LN(1-(2*p0345-1)^2)/2)^2-LN(1-(2*p0345-1)^2)/0.140012289)-(2/(pi()*0.140012289)+LN(1-(2*p0345-1)^2)/2)))
- p2293: 0.00564027; = p2223*p2200
- p0874: 372742; = p0865*p0856
- p2162: 2.9281e-7; = p2015*p2086*p2124/(p0818*1000)
- p1046: 0.0227854; = IF(p1012=0;IF(p1037+p1044+p1045=1;0;IF(p1037+p1044+p1045+p1040>1;1-(p1037+p1044+p1045);p1040));0)
- p3343: 0; = if(and(p1232=0;p3254<>0);IF((p3339+p3340+p3341+p3342)+(p3254*(p3269*(1-p3277))/p3338)>p3254;p3254-(p3339+p3340+p3341+p3342);p3254*(p3269*(1-p3277))/p3338);0)
- p1517: 3
- p5062: 9.34051e-6; = p1889*p3483
- p2908: 7.05322e-5; = p2322*(p1020+p1022)
- p1773: 0
- p3385: 0; = p3366*p1234
- p4456: 2.07823e-7; = p1901*p3480
- p2773: 0.000481449; = p2382*(p1078+p1080)
- p0454: 0; = SQRT(2)*(IF((2*p0322-1)<0;-1;IF((2*p0322-1)>0;1;0))*SQRT(SQRT((2/(pi()*0.140012289)+LN(1-(2*p0322-1)^2)/2)^2-LN(1-(2*p0322-1)^2)/0.140012289)-(2/(pi()*0.140012289)+LN(1-(2*p0322-1)^2)/2)))
- p2834: 0.000989557; = p2248*(p1020+p1022)
- p1687: 0
- p2418: 0; = p2235*p2208
- p1221: 0.108582; = p1216*(1+p1220*p1217/100)
- p0250: 20.479
- p1555: 0
- p2175: 0.00120024; = p0895*p0908/p0818
- p2299: 0.00121094; = p2227*p2206
- p0619: 0; = IF(p0355<0.5;-SQRT(p0007*EXP(p0487^2*p0008)-p0007);SQRT(p0007*EXP(p0487^2*p0008)-p0007))
- p3073: 0; = p2292*p1023
- p0949: 0; = if(and(p0683=0;or(p0807=480;p0807=32;p0807=1;and(p0807=60;p0901<0.03)));p0937;0)
- p3339: 0; = if(and(p1232=0;p3254<>0);p3254*(p3269*p3277-p3334)/p3338;0)
- p3481: 0.0291805; = if(p1328+p1330+p1332+p1334+p1336+p1338+p1340+p1342+p1344=0;0;p1338/(p1328+p1330+p1332+p1334+p1336+p1338+p1340+p1342+p1344))
- p2058: 1.24412
- p0847: 0
- p4094: 0.000104046; = p1951*p3478
- p3210: 0; = p2429*p1132
- p2460: 7.77012e-5; = p2264*p1073
- p0290: 0.5
- p3070: 0; = p2289*p1023
- p1132: 0.02645; = if(p1121=0;IF(p1123+p1128+p1129+p1130+p1131=1;0;1-(p1123+p1128+p1129+p1130+p1131));0)
- p0449: 0; = SQRT(2)*(IF((2*p0317-1)<0;-1;IF((2*p0317-1)>0;1;0))*SQRT(SQRT((2/(pi()*0.140012289)+LN(1-(2*p0317-1)^2)/2)^2-LN(1-(2*p0317-1)^2)/0.140012289)-(2/(pi()*0.140012289)+LN(1-(2*p0317-1)^2)/2)))
- p0164: 50.216
- p0713: 36.277; = p0053*(1+p0581*p0185/100)
- p0453: 0; = SQRT(2)*(IF((2*p0321-1)<0;-1;IF((2*p0321-1)>0;1;0))*SQRT(SQRT((2/(pi()*0.140012289)+LN(1-(2*p0321-1)^2)/2)^2-LN(1-(2*p0321-1)^2)/0.140012289)-(2/(pi()*0.140012289)+LN(1-(2*p0321-1)^2)/2)))
- p1943: 0
- p0987: 0.494291; = if(p0978>0;0;if(and(p0687=0;p0691=0;p0695=0;p0699=0);0;IF(p0982+p0985+p0986=1;0;1-(p0982+p0985+p0986))))
- p3555: 6.64686e-5; = p1824*p3476
- p2778: 1.80795e-5; = p2387*(p1078+p1080)
- p1010: 4297.1; = p0890
- p0872: 72653; = p0864*p0856
- p3120: 0; = p2339*p1082
- p1060: 0.21
- p2281: 0.00024261; = p2223*p2187
- p3114: 0; = p2333*p1023
- p0680: 0
- p3982: 1.30057e-6; = p1839*p3478
- p4362: 5.77287e-9; = p1807*p3480
- p3834: 2.48563e-5; = p1897*p3477
- p0798: 43.008; = p0138*(1+p0666*p0270/100)
- p1149: 0.830148
- p4878: 0; = p1911*p3482
- p3220: 0.00467129; = p3216*p1228
- p0764: 99.775; = p0104*(1+p0632*p0236/100)
- p1437: 229
- p0634: 0; = IF(p0370<0.5;-SQRT(p0007*EXP(p0502^2*p0008)-p0007);SQRT(p0007*EXP(p0502^2*p0008)-p0007))
- p2523: 0.000739763; = p2327*p1014
- p3269: 0
- p0361: 0.5
- p3066: 0; = p2285*p1023
- p1579: 0
- p2392: 0.00105489; = p2233*p2221
- p3133: 0; = p2352*p1132
- p3300: 0; = if(p1293+p1294+p1295+p1296=0;0;p1293/(p1293+p1294+p1295+p1296))
- p1718: 0
- p2582: 0.000104714; = p2386*p1073
- p2262: 0.00175551; = p2226*p2208
- p3251: 0; = p1252-(p3252+p3253+p3254+p3255+p3256)
- p0410: 0; = SQRT(2)*(IF((2*p0278-1)<0;-1;IF((2*p0278-1)>0;1;0))*SQRT(SQRT((2/(pi()*0.140012289)+LN(1-(2*p0278-1)^2)/2)^2-LN(1-(2*p0278-1)^2)/0.140012289)-(2/(pi()*0.140012289)+LN(1-(2*p0278-1)^2)/2)))
- p3277: 0
- p0509: 0; = SQRT(2)*(IF((2*p0377-1)<0;-1;IF((2*p0377-1)>0;1;0))*SQRT(SQRT((2/(pi()*0.140012289)+LN(1-(2*p0377-1)^2)/2)^2-LN(1-(2*p0377-1)^2)/0.140012289)-(2/(pi()*0.140012289)+LN(1-(2*p0377-1)^2)/2)))
- p2353: 0; = p2232*p2221
- p1155: 0.00881679; = if(p1153*p0818=0;0;p1151/(p1153*p0818))
- p2097: 0.40001
- p3088: 1.25093e-5; = p2307*p1082
- p2269: 0.00164934; = p2226*p2215
- p2928: 0; = p2342*(p1079+p1081)
- p4864: 0; = p1897*p3482
- p1090: 0.000209068; = IF(p1071=0;p1084*p0001/(p0818*p0002);0)
- p0762: 3.411; = p0102*(1+p0630*p0234/100)
- p1095: 1.46584e7; = IF(p1071=0;p0797*p0702*1000*p0798/100;0)
- p3036: 0; = p2255*p1023
- p2041: 0; = p2015*p2040/(p0818*1000)
- p0722: 0
- p3760: 1.11853e-5; = p1823*p3477
- p2614: 0; = p2418*p1073
- p3168: 1.30104e-6; = p2387*p1082
- p3164: 2.87845e-7; = p2383*p1082
- p2363: 0.00035008; = p2225*p2191
- p1299: 0
- p0976: 0; = IF(p0687=0;IF(OR(p0686=0;p0689=0);0;p0686*1000*p0689/100);0)
- p1855: 0.000677488; = p1447*1000/p0818
- p2446: 0.00753953; = p2250*p1014
- p2597: 0; = p2401*p1014
- p0981: 0; = p0978*p0001/(p0818*p0002)
- p2002: 750
- p2134: 3.28975e-5; = p2015*p2062*p2096/(p0818*1000)
- p1005: 24791.3; = p1001*p0888
- p2532: 0; = p2336*p1073
- p2745: 0.00620908; = p2354*(p1019+p1021)
- p2208: 0.00407027; = p1110/p0818
- p3287: 0
- p0489: 0; = SQRT(2)*(IF((2*p0357-1)<0;-1;IF((2*p0357-1)>0;1;0))*SQRT(SQRT((2/(pi()*0.140012289)+LN(1-(2*p0357-1)^2)/2)^2-LN(1-(2*p0357-1)^2)/0.140012289)-(2/(pi()*0.140012289)+LN(1-(2*p0357-1)^2)/2)))
- p0683: 8.998; = p0023*(1+p0551*p0155/100)
- p1194: 1.48
- p0864: 0.118135; = IF(p0858=1;0;IF(p0858+p0859>1;1-p0858;p0859))
- p2047: 5.3879e-13; = p2015*p2045/(p0818*1000000000000)
- p1290: 0; = IF(p1287=p1264;0;IF(p1287+p1288>p1264;p1264-p1287;p1288))
- p3335: 0; = IF(or(p3254=0;p1232>0);0;p3270*(p3280*(p3283*p1256+p3286*(p1253+p1257)+p1258*p3288+p3300*p3287)))
- p2226: 0.431301; = if(p0774*p0778+p0775*p0779+p0776*p0780+p0777*p0781=0;0;p0778*p0774/(p0774*p0778+p0775*p0779+p0776*p0780+p0777*p0781))
- p3518: 4.47716e-6; = p1787*p3476
- p0320: 0.5
- p0379: 0.5
- p4539: 2.6989e-7; = p1778*p3481
- p2548: 0; = p2352*p1123
- p1610: 0
- p0833: 1.31356e9; = p0830+p0832
- p2753: 0.000419025; = p2362*(p1019+p1021)
- p0240: 8.183
- p3224: 0.501945; = IF(p3216=0;0;1-p3221-p3222-p3223)
- p1340: 0; = p1325*p0801
- p0891: 0; = IF(p3251=0;0;62.4*6272640/(12*12*12))
- p2625: 0; = p2429*p1123
- p2960: 0.00120384; = p2374*(p1020+p1022)
- p3306: 0; = if(and(p1232=0;p3252<>0);p3252*(p3257*p3277-p3301)/p3305;0)
- p2756: 0.00498143; = p2365*(p1019+p1021)
- p1081: 0; = IF(p1071=0;IF(p1073+p1078+p1079+p1080=1;0;IF(p1073+p1078+p1079+p1080+p1077>1;1-(p1073+p1078+p1079+p1080);p1077));0)
- p2550: 0.0112815; = p2354*p1014
- p1963a: 0.000359646; = p1550*p1754+p1551*p1755+p1552*p1756+p1553*p1757+p1554*p1758+p1555*p1759+p1556*p1760+p1557*p1761+p1558*p1762+p1559*p1763+p1560*p1764+p1561*p1765+p1562*p1766+p1563*p1767+p1564*p1768+p1565*p1769+p1566*p1770+p1567*p1771+p1568*p1772
- p2423: 0; = p2235*p2213
- p3401: 0; = p3363*p1238
- p2586: 0.0024764; = p2390*p1123
- p2527: 2.28068e-5; = p2331*p1014
- p5182: 5.23076e-7; = p1803*p3484
- p2872: 0.000217218; = p2286*(p1020+p1022)
- p2012: 0.0259651
- p3275: 0
- p0262: 27.099
- p2345: 0; = p2228*p2213
- p3074: 0; = p2293*p1023
- p1396: 2
- p0026: 124.28
- p2686: 0.000104754; = p2295*(p1019+p1021)
- p2373: 0.000690393; = p2225*p2202
- p0946: 0; = if(and(p0683=0;or(p0807=480;p0807=32;p0807=1;and(p0807=60;p0901<0.03)));p0934;0)
- p4044: 1.56068e-5; = p1901*p3478
- p3998: 0.000127022; = p1855*p3478
- p0391: 0.5
- p4350: 6.92744e-8; = p1795*p3480
- p2403: 0; = p2234*p2192
- p0667: 0; = IF(p0403<0.5;-SQRT(p0007*EXP(p0535^2*p0008)-p0007);SQRT(p0007*EXP(p0535^2*p0008)-p0007))
- p0730: 0
- p3923: 1.47398e-5; = p1780*p3478
- p1998: 198
- p2132: 4.51267e-6; = p2015*p2060*p2094/(p0818*1000)
- p3563: 8.57549e-5; = p1832*p3476
- p2331: 4.17019e-5; = p2224*p2199
- p1749: 0
- p4892: 0; = p1925*p3482
- p5072: 1.42332e-6; = p1899*p3483
- p2737: 0; = p2346*(p1078+p1080)
- p2484: 0.00097803; = p2288*p1014
- p3273: 0
- p3248: 0
- p2995: 0; = p2409*(p1020+p1022)
- p0897: 0.49875
- p2934: 0; = p2348*(p1079+p1081)
- p1270: 0; = IF(p1267=p1259;0;IF(p1267+p1268>p1259;p1259-p1267;p1268))
- p1173: 0.5
- p2682: 7.54805e-6; = p2291*(p1019+p1021)
- p4444: 6.06151e-7; = p1889*p3480
- p3734: 2.23707e-5; = p1797*p3477
- p1963g: 0.00648396; = p1667*p1871+p1668*p1872+p1669*p1873+p1670*p1874+p1671*p1875+p1672*p1876+p1673*p1877+p1674*p1878+p1675*p1879+p1676*p1880+p1677*p1881+p1678*p1882+p1679*p1883+p1680*p1884+p1681*p1885+p1682*p1886+p1683*p1887+p1684*p1888+p1685*p1889
- p3291: 0
- p4379: 1.11416e-6; = p1824*p3480
- p0294: 0.5
- p2884: 0.00135657; = p2298*(p1079+p1081)
- p3320: 0; = if(and(p1232=0;p3253<>0);p3253*(p3264-p3315)/p3316;0)
- p0692: 30.91; = p0032*(1+p0560*p0164/100)
- p2877: 3.81415e-6; = p2291*(p1020+p1022)
- p0785: 0
- p2635: 0.000143913; = p2244*(p1019+p1021)
- p0272: 19.776
- p2990: 0; = p2404*(p1020+p1022)
- p2666: 0.000413294; = p2275*(p1128+p1130)
- p3155: 0; = p2374*p1023
- p2005: 1.08066e7; = p1963*p0818+p1959*1000+p1170+p1176+p1182
- p1956: 0
- p3008: 0; = p2422*(p1079+p1081)
- p3033: 0; = p2252*p1023
- p0175: 0
- p2267: 0.00038996; = p2226*p2213
- p3174: 0; = p2393*p1023
- p2706: 0.00236743; = p2315*(p1019+p1021)
- p1069: 0.000431607; = IF(p1012=0;p1055/(p1062*p0818);0)
- p1646: 0
- p1662: 0
- p1784: 0
- p0879: 0.187604; = p0878*p0001*p0003/(p0818*p0002)
- p2794: 0; = p2403*(p1019+p1021)
- p3268: 0
- p3386: 0; = p3367*p1234
- p0165: 22.67
- p1208: 0; = p1205*p0818*p0822/p0801
- p5133: 2.3912e-6; = p1754*p3484
- p1920: 0
- p3807: 6.21408e-6; = p1870*p3477
- p3634: 2.44522e-5; = p1903*p3476
- p1124: 0.36663; = if(p1121=0;p0718/100;0)
- p3759: 4.97126e-6; = p1822*p3477
- p2491: 0.000190333; = p2295*p1014
- p2810: 0; = p2419*(p1078+p1080)
- p5218: 2.24175e-7; = p1839*p3484
- p2906: 2.79112e-5; = p2320*(p1020+p1022)
- p0799: 68.348; = p0139*(1+p0667*p0271/100)
- p2514: 0.000301299; = p2318*p1014
- p2048: 1.79597e-13; = p2015*p2046/(p0818*1000000000000)
- p0738: 615.164; = p0078*(1+p0606*p0210/100)
- p4556: 8.09669e-7; = p1795*p3481
- p4633: 0.000212066; = p1872*p3481
- p1919: 0
- p1665: 0
- p0926: 0; = IF(p0918+p0923+p0924+p0925=1;0;IF(p0918+p0923+p0924+p0925+p0922>1;1-(p0918+p0923+p0924+p0925);p0922))
- p1112: 0.209482
- p1631: 0.5
- p1683: 0
- p3196: 0; = p2415*p1082
- p1958: 6648
- p1228: 0.0778548; = IF(p1221=0;0;p0801*p1212*2000/(p1222+p1221*p1225)/p0818)
- p4352: 1.03912e-7; = p1797*p3480
- p2696: 1.48321e-5; = p2305*(p1078+p1080)
- p1947: 0
- p1676: 0
- p0922: 0; = p0677*1000/p0801
- p2736: 0; = p2345*(p1078+p1080)
- p2622: 0; = p2426*p1073
- p0988: 236523; = p0982*p0886
- p4510: 4.2142e-7; = p1955*p3480
- p1910: 0
- p0790: 23.846; = p0130*(1+p0658*p0262/100)
- p3139: 0; = p2358*p1023
- p0218: 10.517
- p3003: 0; = p2417*(p1079+p1081)
- p0771: 15.691; = p0111*(1+p0639*p0243/100)
- p4802: 0; = p1835*p3482
- p1669: 0
- p5124: 2.13497e-5; = p1951*p3483
- p1977: 154.711; = p1252+p1188
- p1780: 7.86164e-5; = p1372*1000/p0818
- p3104: 0; = p2323*p1023
- p1888: 0.0015677; = p1480*1000/p0818
- p2506: 0.000355646; = p2310*p1073
- p1891: 0
- p5157: 2.989e-7; = p1778*p3484
- p3868: 3.72845e-6; = p1931*p3477
- p2722: 1.25523e-5; = p2331*(p1019+p1021)
- p2724: 0.000550534; = p2333*(p1019+p1021)
- p0617: 0; = IF(p0353<0.5;-SQRT(p0007*EXP(p0485^2*p0008)-p0007);SQRT(p0007*EXP(p0485^2*p0008)-p0007))
- p1705: 0
- p1745: 0
- p0714: 0
- p0806: 901000; = p0804+p0805
- p2166: 1.29035; = p2165*p0824
- p0178: 27.479
- p3601: 1.72199e-6; = p1870*p3476
- p3261: 0
- p0753: 4.676; = p0093*(1+p0621*p0225/100)
- p2467: 0.00034246; = p2271*p1073
- p3434: 0; = p3377*p1239
- p3892: 9.07255e-5; = p1955*p3477
- p3193: 0; = p2412*p1023
- p0424: 0; = SQRT(2)*(IF((2*p0292-1)<0;-1;IF((2*p0292-1)>0;1;0))*SQRT(SQRT((2/(pi()*0.140012289)+LN(1-(2*p0292-1)^2)/2)^2-LN(1-(2*p0292-1)^2)/0.140012289)-(2/(pi()*0.140012289)+LN(1-(2*p0292-1)^2)/2)))
- p1589: 0
- p1960: 0; = IF(p1959-p1958<0;0;p1959-p1958)
- p2799: 0; = p2408*(p1019+p1021)
- p1836: 0
- p2011: 0.0105596
- p0362: 0.5
- p0585: 0; = IF(p0321<0.5;-SQRT(p0007*EXP(p0453^2*p0008)-p0007);SQRT(p0007*EXP(p0453^2*p0008)-p0007))
- p0350: 0.5
- p3203: 0; = p2422*p1082
- p1285: 0; = p1281*p1252/p0818
- p5258: 2.989e-7; = p1879*p3484
- p2563: 0.0191788; = p2367*p1014
- p0689: 77.387; = p0029*(1+p0557*p0161/100)
- p2671: 0.000507396; = p2280*(p1019+p1021)
- p4593: 1.68006e-5; = p1832*p3481
- p2165: 1.49779; = (p0833-p2014)/p0818-p0839
- p3098: 0; = p2317*p1023
- p3150: 0; = p2369*p1023
- p1838: 0
- p0854: 263319; = p0801*((1-p0853)*p0846+p0853*p0852)
- p0105: 79.286
- p2631: 0.000170974; = p2240*(p1019+p1021)
- p0857: 12.6871; = p0856*p0001*p0003/(p0818*p0002)
- p3160: 1.35501e-5; = p2379*p1082
- p0021: 615.164
- p4773: 0; = p1806*p3482
- p2553: 0.000790219; = p2357*p1014
- p0287: 0.5
- p2167: 0.584979; = p2166*(p0898)
- p2649: 0.00152479; = p2258*(p1078+p1080)
- p1295: 0; = p1291*p1252/p0818
- p0098: 1.564
- p3145: 0; = p2364*p1023
- p2607: 0; = p2411*p1014
- p1142: 0; = if(p1121=0;p1136*p0001/(p0818*p0002);0)
- p2981: 0; = p2395*(p1020+p1022)
- p0118: 32.633
- p2829: 0.000368141; = p2243*(p1020+p1022)
- p1094: 1.5045e-5; = IF(p1071=0;p1088*p0001/(p0818*p0002);0)
- p3288: 0
- p3480: 0.00249665; = if(p1328+p1330+p1332+p1334+p1336+p1338+p1340+p1342+p1344=0;0;p1336/(p1328+p1330+p1332+p1334+p1336+p1338+p1340+p1342+p1344))
- p1861: 0
- p1100: 0.275167
- p1089: 0.00012375; = IF(p1071=0;p1083*p0001/(p0818*p0002);0)
- p2161: 1.58954e-7; = p2015*p2085*p2123/(p0818*1000)
- p1845: 0.000529504; = p1437*1000/p0818
- p0112: 52.774
- p1679: 0
- p3278: 0
- p1973: 0.000314598; = if(p0807=480;p1968*p0001/(p0818*p0002);0)
- p2483: 0.00456252; = p2287*p1014
- p1085: 95996.7; = IF(p1071=0;p1079*(p0710/100)*p0703*1000;0)
- p1082: 0.02756; = IF(p1071=0;IF(p1073+p1078+p1079+p1080+p1081=1;0;1-(p1073+p1078+p1079+p1080+p1081));0)
- p2947: 0.000184985; = p2361*(p1020+p1022)
- p2513: 8.74739e-5; = p2317*p1014
- p2026: 73.06
- p0581: 0; = IF(p0317<0.5;-SQRT(p0007*EXP(p0449^2*p0008)-p0007);SQRT(p0007*EXP(p0449^2*p0008)-p0007))
- p2254: 0.0043986; = p2222*p2200
- p0083: 7.07
- p1650: 0
- p1566: 0
- p4032: 4.552e-5; = p1889*p3478
- p4595: 1.34945e-7; = p1834*p3481
- p1633: 0
- p3371: 0; = if(p1232=0;p3245*p3359/p0818;0)
- p2792: 0; = p2401*(p1019+p1021)
- p0814: 0.600863; = if(p0807=480;p0810*p0812+p0811*p0813;0)
- p0049: 5.017
- p3170: 0.00016437; = p2389*p1132
- p2931: 0; = p2345*(p1079+p1081)
- p1015: 0.2558; = IF(p1012=0;p0706/100;0)
- p3699: 0.000160323; = p1762*p3477
- p0237: 25.757
- p1692: 0
- p3244: 0; = p0791/100
- p2968: 0.000456043; = p2382*(p1079+p1081)
- p0001: 0.404686
- p4389: 1.15457e-8; = p1834*p3480
- p1569: 0
- p2876: 2.3238e-6; = p2290*(p1020+p1022)
- p3686: 2.5141e-5; = p1955*p3476
- p2994: 0; = p2408*(p1020+p1022)
- p1206: 0.00953
- p3260: 0
- p2270: 0.000168558; = p2226*p2216
- p2793: 0; = p2402*(p1019+p1021)
- p3378: 0; = if(p1232=0;p3246*p3360/p0818;0)
- p3324: 0; = if(and(p1232=0;p3255<>0);p3266*(p3279*(p3284*p1256+p3286*(p1253+p1257)+p1258*p3288+p3299*p3287));0)
- p3015: 0; = p2429*(p1129+p1131)
- p2177: 0.286575; = p0895/p0818-(p2173+p2174+p2175+p2176)
- p0843: 0.117921
- p2375: 0.00111505; = p2229*p2204
- p3642: 3.23733e-5; = p1911*p3476
- p3445: 0; = p3369*p1240
- p1232: 615000; = p0801
- p1476: 3
- p2653: 0.000672326; = p2262*(p1078+p1080)
- p2383: 1.04443e-5; = p2229*p2212
- p1884: 6.93674e-6; = p1476*1000/p0818
- p4045: 1.43063e-5; = p1902*p3478
- p3241: 1.99737e-9; = p3234*p1188*p3236/p0818
- p2903: 2.43276e-5; = p2317*(p1020+p1022)
- p1093: 0; = IF(p1071=0;p1087*p0001/(p0818*p0002);0)
- p0276: 0.5
- p0985: 0; = IF(p0982=1;0;IF(p0982+p0983>1;1-p0982;p0983))
- p1606: 0
- p5290: 7.02416e-6; = p1911*p3484
- p0214: 2.166
- p1223: 0.56
- p0080: 98.487
- p1805: 0
- p0242: 19.888
- p0493: 0; = SQRT(2)*(IF((2*p0361-1)<0;-1;IF((2*p0361-1)>0;1;0))*SQRT(SQRT((2/(pi()*0.140012289)+LN(1-(2*p0361-1)^2)/2)^2-LN(1-(2*p0361-1)^2)/0.140012289)-(2/(pi()*0.140012289)+LN(1-(2*p0361-1)^2)/2)))
- p0688: 21.902; = p0028*(1+p0556*p0160/100)
- p2382: 0.00125711; = p2229*p2211
- p1036: 5.25977e7; = IF(p1012=0;p0795*p0702*1000*p0796/100;0)
- p1337: 4.86576e-5; = p1336*p0001/(p0818*p0002)
- p3438: 0; = p3362*p1240
- p2951: 0.00251719; = p2365*(p1020+p1022)
- p2840: 0.000669027; = p2254*(p1020+p1022)
- p0866: 0; = IF(p0858+p0864+p0865=1;0;IF(p0858+p0864+p0865+p0861>1;1-(p0858+p0864+p0865);p0861))
- p2800: 0; = p2409*(p1019+p1021)
- p3839: 4.10129e-5; = p1902*p3477
- p2039: 1.88098e-5; = p2015*p2037*p2038/(p0818*1000)
- p0915: 0.0255685; = p0914/p0818
- p3176: 0; = p2395*p1023
- p2839: 6.53972e-6; = p2253*(p1020+p1022)
- p4970: 1.60123e-6; = p1797*p3483
- p2027: 0.428799
- p0507: 0; = SQRT(2)*(IF((2*p0375-1)<0;-1;IF((2*p0375-1)>0;1;0))*SQRT(SQRT((2/(pi()*0.140012289)+LN(1-(2*p0375-1)^2)/2)^2-LN(1-(2*p0375-1)^2)/0.140012289)-(2/(pi()*0.140012289)+LN(1-(2*p0375-1)^2)/2)))
- p2806: 0; = p2415*(p1078+p1080)
- p4307: 0; = p1962*p3479
- p3433: 0; = p3376*p1239
- p2993: 0; = p2407*(p1020+p1022)
- p1416: 193
- p2189: 0.00277113; = p1053/p0818
- p3691: 3.97701e-5; = p1754*p3477
- p2050: 0.952062
- p2083: 2.17294
- p3468: 0; = p3373*p1241
- p3141: 0; = p2360*p1023
- p2157: 7.53251e-7; = p2015*p2086*p2119/(p0818*1000)
- p3037: 0; = p2256*p1023
- p1813: 0
- p3546: 1.72199e-5; = p1815*p3476
- p2705: 0.00125173; = p2314*(p1128+p1130)
- p3169: 1.16605e-5; = p2388*p1082
- p2956: 1.66355e-5; = p2370*(p1020+p1022)
- p2866: 0.000256395; = p2280*(p1020+p1022)
- p2063: 2.01468
- p0984: 0; = if(p0886=0;0;min(1;(p0699*p0698*1000*p0701/100)/p0886))
- p1034: 6.35246e-5; = IF(p1012=0;p1028*p0001/(p0818*p0002);0)
- p1035: 0; = IF(p1012=0;p1029*p0001/(p0818*p0002);0)
- p0983: 0; = if(p0886=0;0;min(1;(p0695*p0694*1000*p0697/100)/p0886))
- p2511: 0.00430148; = p2315*p1014
- p0960: 0; = if(and(p0683>0;or(p0807=480;p0807=32;p0807=1;and(p0807=60;p0901<0.03)));p0936;0)
- p2422: 0; = p2235*p2212
- p2396: 0; = p2234*p2185
- p0776: 0
- p2295: 0.000348021; = p2223*p2202
- p3085: 0.00012847; = p2304*p1082
- p0392: 0.5
- p2131: 4.6946e-6; = p2015*p2059*p2093/(p0818*1000)
- p3399: 0; = p3380*p1234
- p2388: 0.000423095; = p2229*p2217
- p3332: 0; = if(and(p1232=0;p3255<>0);IF((p3328+p3329+p3330+p3331)+(p3255*(p3265*(1-p3277))/p3327)>p3255;p3255-(p3328+p3329+p3330+p3331);p3255*(p3265*(1-p3277))/p3327);0)
- p5272: 5.15603e-6; = p1893*p3484
- p0443: 0; = SQRT(2)*(IF((2*p0311-1)<0;-1;IF((2*p0311-1)>0;1;0))*SQRT(SQRT((2/(pi()*0.140012289)+LN(1-(2*p0311-1)^2)/2)^2-LN(1-(2*p0311-1)^2)/0.140012289)-(2/(pi()*0.140012289)+LN(1-(2*p0311-1)^2)/2)))
- p3097: 0; = p2316*p1023
- p3705: 0.00011931; = p1768*p3477
- p1263: 0; = if(p1232>0;0;IF(p1259=1;0;IF(p1259+p1260>1;1-p1259;p1260)))
- p0844: 0.403763
- p4897: 0; = p1930*p3482
- p1911: 0.000217351; = p1503*1000/p0818
- p3337: 0; = IF(or(p3254=0;p1232>0);0;p3272*p3289)
- p1894: 0.000735294; = p1486*1000/p0818
- p0853: 0; = p0803/(p0802+p0803)
- p1222: 0.94
- p3464: 0; = p3369*p1241
- p2472: 0.00568693; = p2276*p1014
- p3031: 0; = p2250*p1023
- p2280: 0.0016857; = p2223*p2186
- p3422: 0; = p3365*p1239
- p2435: 9.01888e-5; = p2239*p1014
- p0216: 2.043
- p2688: 0.00158349; = p2297*(p1078+p1080)
- p1637: 0
- p2784: 0; = p2393*(p1019+p1021)
- p2282: 0.00310363; = p2223*p2188
- p0735: 0
- p0686: 124.28; = p0026*(1+p0554*p0158/100)
- p4976: 6.22701e-7; = p1803*p3483
- p4564: 4.72307e-7; = p1803*p3481
- p0747: 12.11; = p0087*(1+p0615*p0219/100)
- p2265: 0.00448863; = p2226*p2211
- p1608: 0
- p0121: 17.907
- p2304: 0.00466146; = p2227*p2211
- p1909: 0
- p1481: 105
- p3509: 1.37759e-6; = p1778*p3476
- p5061: 6.0313e-5; = p1888*p3483
- p4735: 0; = p1768*p3482
- p3219: 0.0350963; = p3215*p1228
- p3570: 1.03319e-6; = p1839*p3476
- p4515: 2.15912e-6; = p1754*p3481
- p3410: 0; = p3372*p1238
- p4359: 1.15457e-8; = p1804*p3480
- p3295: 0
- p0647: 0; = IF(p0383<0.5;-SQRT(p0007*EXP(p0515^2*p0008)-p0007);SQRT(p0007*EXP(p0515^2*p0008)-p0007))
- p1847: 0
- p2616: 0; = p2420*p1073
- p0623: 0; = IF(p0359<0.5;-SQRT(p0007*EXP(p0491^2*p0008)-p0007);SQRT(p0007*EXP(p0491^2*p0008)-p0007))
- p1924: 0
- p3221: 0.146975; = IF(p3216=0;0;p1223*12.0107/100.0869+(1-p1224)*12.0107/84.3139)
- p2343: 0; = p2228*p2211
- p1043: 0.209623
- p0238: 8.748
- p3383: 0; = p3364*p1234
- p1897: 4.62449e-5; = p1489*1000/p0818
- p0803: 0
- p0288: 0.5
- p3419: 0; = p3362*p1239
- p1619: 0.938128
- p3446: 0; = p3370*p1240
- p2377: 0.00032657; = p2229*p2206
- p1238: 0; = if(p1232>0;0;IF(p1234=1;0;IF(p1234+p1235>1;1-p1234;p1235)))
- p1653: 0
- p2785: 0; = p2394*(p1019+p1021)
- p0674: 9.314; = p0014*(1+p0542*p0146/100)
- p0774: 69.409; = p0114*(1+p0642*p0246/100)
- p2674: 0.000184537; = p2283*(p1019+p1021)
- p2593: 0; = p2397*p1014
- p0945: 0; = if(and(p0683=0;p0951=0);p0939;0)
- p2612: 0; = p2416*p1073
- p2643: 5.88639e-6; = p2252*(p1019+p1021)
- p4101: 0; = p1962*p3478
- p3966: 3.90171e-6; = p1823*p3478
- p0871: 3.31125; = p0870*p0001*p0003/(p0818*p0002)
- p0980: 0; = IF(p0977=0;0;p0977*p0001/(p0818*p0002))
- p0106: 67.765
- p1625: 0
- p1597: 0
- p2813: 0; = p2422*(p1078+p1080)
- p3465: 0; = p3370*p1241
- p2064: 0.676706
- p3183: 0; = p2402*p1023
- p2449: 2.35146e-5; = p2253*p1014
- p3476: 0.148945; = if(p1328+p1330+p1332+p1334+p1336+p1338+p1340+p1342+p1344=0;0;p1328/(p1328+p1330+p1332+p1334+p1336+p1338+p1340+p1342+p1344))
- p1901: 8.32408e-5; = p1493*1000/p0818
- p1558: 0.399536
- p0311: 0.5
- p1647: 0
- p2376: 0.00100847; = p2229*p2205
- p4394: 1.73186e-8; = p1839*p3480
- p3406: 0; = p3368*p1238
- p2679: 0.000538283; = p2288*(p1019+p1021)
- p0777: 35.425; = p0117*(1+p0645*p0249/100)
- p2278: 0.000211461; = p2223*p2184
- p1963: 0.00961836; = p1963a+p1963b+p1963c+p1963d+p1963e+p1963f+p1963g+p1963h+p1963i+p1963j+p1963k
- p3192: 0; = p2411*p1023
- p5012: 2.66872e-7; = p1839*p3483
- p3222: 0.224242; = IF(p3216=0;0;p1223*40.078/100.0869)
- p3214: 0.376406; = p1222*40.078/100.0869
- p2851: 0.00162834; = p2265*(p1079+p1081)
- p1567: 0
- p3050: 4.54559e-5; = p2269*p1082
- p0425: 0; = SQRT(2)*(IF((2*p0293-1)<0;-1;IF((2*p0293-1)>0;1;0))*SQRT(SQRT((2/(pi()*0.140012289)+LN(1-(2*p0293-1)^2)/2)^2-LN(1-(2*p0293-1)^2)/0.140012289)-(2/(pi()*0.140012289)+LN(1-(2*p0293-1)^2)/2)))
- p1140: 0.000208626; = if(p1121=0;p1134*p0001/(p0818*p0002);0)
- p4358: 4.04101e-8; = p1803*p3480
- p0684: 31.417; = p0024*(1+p0552*p0156/100)
- p3246: 1; = IF(p3244+p3245=1;0;1-(p3244+p3245))
- p1763: 0
- p3988: 9.92768e-5; = p1845*p3478
- p4645: 2.02417e-7; = p1884*p3481
- p2082: 0.285294
- p1177: 0.00126871; = p0801*p0001/(p0818*p0002)
- p0968: 0
- p2081: 0.0019
- p3225: 0.00124247; = p3221*p1229
- p4497: 1.32776e-7; = p1942*p3480
- p0444: 0; = SQRT(2)*(IF((2*p0312-1)<0;-1;IF((2*p0312-1)>0;1;0))*SQRT(SQRT((2/(pi()*0.140012289)+LN(1-(2*p0312-1)^2)/2)^2-LN(1-(2*p0312-1)^2)/0.140012289)-(2/(pi()*0.140012289)+LN(1-(2*p0312-1)^2)/2)))
- p4801: 0; = p1834*p3482
- p0618: 0; = IF(p0354<0.5;-SQRT(p0007*EXP(p0486^2*p0008)-p0007);SQRT(p0007*EXP(p0486^2*p0008)-p0007))
- p5005: 2.21504e-5; = p1832*p3483
- p2856: 6.1148e-5; = p2270*(p1079+p1081)
- p2359: 0.000481282; = p2225*p2187
- p3032: 0; = p2251*p1023
- p2337: 0; = p2228*p2205
- p3075: 0; = p2294*p1023
- p2223: 0.221239; = if(p0765*p0769+p0766*p0770+p0767*p0771+p0768*p0772=0;0;p0770*p0766/(p0765*p0769+p0766*p0770+p0767*p0771+p0768*p0772))
- p2136: 1.04068e-5; = p2015*p2064*p2098/(p0818*1000)
- p3026: 0; = p2245*p1023
- p0518: 0; = SQRT(2)*(IF((2*p0386-1)<0;-1;IF((2*p0386-1)>0;1;0))*SQRT(SQRT((2/(pi()*0.140012289)+LN(1-(2*p0386-1)^2)/2)^2-LN(1-(2*p0386-1)^2)/0.140012289)-(2/(pi()*0.140012289)+LN(1-(2*p0386-1)^2)/2)))
- p0944: 0; = if(and(p0683=0;p0950=0);p0938;0)
- p3610: 1.37759e-6; = p1879*p3476
- p2888: 0.000299078; = p2302*(p1079+p1081)
- p2407: 0; = p2234*p2197
- p3135: 0; = p2354*p1023
- p3840: 8.82399e-5; = p1903*p3477
- p1853: 0
- p1039: 0.0626496
- p2992: 0; = p2406*(p1020+p1022)
- p1581: 0
- p3267: 0
- p5183: 1.4945e-7; = p1804*p3484
- p0913: 0.0016675
- p1301: 0; = IF(p1297+p1300=p1265;0;IF(p1297+p1300+p1299>p1265;p1265-(p1297+p1300);p1299))
- p3326: 0; = if(and(p1232=0;p3255<>0);p3268*p3289;0)
- p2881: 5.29341e-5; = p2295*(p1020+p1022)
- p0894: 0.2085
- p1984: 30
- p2187: 0.0010966; = 4*1.00794*p2186/(2*14.0067)
- p3312: 0; = if(and(p1232=0;p3253<>0);p3261*p3277*(p3298*p3290+(1-p3298)*p3294);0)
- p2201: 0.0109299; = 12.01*p2200/(2*14.0067)
- p2991: 0; = p2405*(p1020+p1022)
- p3307: 0; = if(and(p1232=0;p3252<>0);p3252*(p3258-p3302)/p3305;0)
- p3436: 0; = p3379*p1239
- p2964: 0.000983646; = p2378*(p1079+p1081)
- p2173: 0.247331; = p0895*p0898/p0818
- p1338: 275676; = p1324*p0801
- p2720: 3.47837e-6; = p2329*(p1019+p1021)
- p0831: 0.1385; = 1-p0824
- p1936: 0
- p2841: 0.000286828; = p2255*(p1020+p1022)
- p1681: 0
- p0298: 0.5
- p2681: 4.59871e-6; = p2290*(p1019+p1021)
- p2693: 0.00031574; = p2302*(p1078+p1080)
- p5338: 0.000310838; = p1963*p3484
- p2633: 5.69496e-5; = p2242*(p1019+p1021)
- p0307: 0.5
- p2656: 0.00171906; = p2265*(p1078+p1080)
- p0884: 21.902; = IF(p0689=100;0;IF(p0689+p0688>100;100-p0689;p0688))
- p3138: 0; = p2357*p1023
- p0184: 29.574
- p4454: 9.23659e-8; = p1899*p3480
- p0441: 0; = SQRT(2)*(IF((2*p0309-1)<0;-1;IF((2*p0309-1)>0;1;0))*SQRT(SQRT((2/(pi()*0.140012289)+LN(1-(2*p0309-1)^2)/2)^2-LN(1-(2*p0309-1)^2)/0.140012289)-(2/(pi()*0.140012289)+LN(1-(2*p0309-1)^2)/2)))
- p3063: 0; = p2282*p1023
- p2759: 9.12276e-6; = p2368*(p1019+p1021)
- p2260: 0.00116605; = p2226*p2206
- p2202: 0.00157306; = 4*1.00794*p2201/(2*14.0067)
- p0091: 8.462
- p2905: 0.000193932; = p2319*(p1020+p1022)
- p3302: 0; = if(and(p1232=0;p3252<>0);p3258*(p3278*(p3282*p1256+p3286*(p1253+p1257)+p1258*p3288+p3297*p3287));0)
- p3661: 2.41078e-5; = p1930*p3476
- p1811: 0
- p2458: 0.000397957; = p2262*p1073
- p4812: 0; = p1845*p3482
- p3123: 0; = p2342*p1082
- p1906: 0
- p2580: 2.47578e-5; = p2384*p1073
- p1018: 0.05017; = IF(p1012=0;p0709/100;0)
- p2547: 0; = p2351*p1123
- p2427: 0; = p2235*p2217
- p1269: 0
- p2657: 1.42822e-5; = p2266*(p1078+p1080)
- p2741: 0; = p2350*(p1128+p1130)
- p1329: 0.00290281; = p1328*p0001/(p0818*p0002)
- p1953: 0
- p1130: 0; = if(p1121=0;IF(p1123+p1128+p1129=1;0;IF(p1123+p1128+p1129+p1126>1;1-(p1123+p1128+p1129);p1126));0)
- p1757: 0
- p2976: 0.0028386; = p2390*(p1129+p1131)
- p0306: 0.5
- p0849: 0
- p1273: 0; = p1267*p1252/p0818
- p1594: 0
- p1293: 0; = p1287*p1252/p0818
- p2068: 0.153529
- p1724: 0
- p2685: 0.000727853; = p2294*(p1019+p1021)
- p0052: 38.298
- p0974: 0.5
- p2032: 0.448886
- p4400: 1.32199e-6; = p1845*p3480
- p0439: 0; = SQRT(2)*(IF((2*p0307-1)<0;-1;IF((2*p0307-1)>0;1;0))*SQRT(SQRT((2/(pi()*0.140012289)+LN(1-(2*p0307-1)^2)/2)^2-LN(1-(2*p0307-1)^2)/0.140012289)-(2/(pi()*0.140012289)+LN(1-(2*p0307-1)^2)/2)))
- p2303: 0.000355962; = p2227*p2210
- p3016: 0; = p2430*(p1129+p1131)
- p0002: 0.453592
- p2768: 0.00012507; = p2377*(p1078+p1080)
- p1765: 0
- p0086: 36.366
- p4567: 6.74724e-7; = p1806*p3481
- p1457: 5
- p2836: 0.00209684; = p2250*(p1020+p1022)
- p0113: 43.008
- p1427: 4
- p2477: 0.000132684; = p2281*p1014
- p4172: 4.91242e-7; = p1823*p3479
- p1792: 0
- p1981: 400
- p0842: -0.227484
- p0245: 16.995
- p4068: 1.30057e-6; = p1925*p3478
- p0810: 0.75
- p2544: 0; = p2348*p1073
- p1275: 0; = p1271*p1252/p0818
- p3717: 4.22557e-5; = p1780*p3477
- p2887: 0.000661367; = p2301*(p1079+p1081)
- p3361: 0; = if(p1232=0;p3311+p3322+p3333+p3344+p3355;0)
- p2151: 2.98977e-7; = p2015*p2079*p2113/(p0818*1000)
- p2385: 0.000122407; = p2229*p2214
- p2305: 3.87282e-5; = p2227*p2212
- p1030: 0.000692615; = IF(p1012=0;p1024*p0001/(p0818*p0002);0)
- p1721: 0.5
- p2169: 0.00283876; = p2166*(p0908)
- p2954: 4.60988e-6; = p2368*(p1020+p1022)
- p2557: 0.000665145; = p2361*p1014
- p1562: 0
- p1236: 0; = if(p1232>0;0;p0728/100)
- p1694: 0
- p3106: 0; = p2325*p1023
- p1045: 0.0626496; = IF(p1012=0;IF(p1037+p1044=1;0;IF(p1037+p1044+p1039>1;1-(p1037+p1044);p1039));0)
- p1571: 0
- p1233: 0.00126871; = p1232*p0001/(p0818*p0002)
- p0652: 0; = IF(p0388<0.5;-SQRT(p0007*EXP(p0520^2*p0008)-p0007);SQRT(p0007*EXP(p0520^2*p0008)-p0007))
- p1128: 0.36663; = if(p1121=0;IF(p1123=1;0;IF(p1123+p1124>1;1-p1123;p1124));0)
- p4584: 6.07252e-7; = p1823*p3481
- p4237: 3.70069e-5; = p1888*p3479
- p4046: 3.07802e-5; = p1903*p3478
- p0770: 27.964; = p0110*(1+p0638*p0242/100)
- p4565: 1.34945e-7; = p1804*p3481
- p1963k: 0.000260712; = p1744*p1948+p1745*p1949+p1746*p1950+p1747*p1951+p1748*p1952+p1749*p1953+p1750*p1954+p1751*p1955+p1752*p1956+p1753*p1957+p1961*p1962
- p0483: 0; = SQRT(2)*(IF((2*p0351-1)<0;-1;IF((2*p0351-1)>0;1;0))*SQRT(SQRT((2/(pi()*0.140012289)+LN(1-(2*p0351-1)^2)/2)^2-LN(1-(2*p0351-1)^2)/0.140012289)-(2/(pi()*0.140012289)+LN(1-(2*p0351-1)^2)/2)))
- p2147: 1.06885e-6; = p2015*p2075*p2109/(p0818*1000)
- p2639: 0.00195829; = p2248*(p1019+p1021)
- p3449: 0; = p3373*p1240
- p1957: 6.93674e-6; = p1549*1000/p0818
- p0704: 99.775; = p0044*(1+p0572*p0176/100)
- p3467: 0; = p3372*p1241
- p3147: 0; = p2366*p1023
- p0376: 0.5
- p5008: 3.55829e-7; = p1835*p3483
- p0347: 0.5
- p2387: 4.72074e-5; = p2229*p2216
- p2487: 1.37144e-5; = p2291*p1014
- p0861: 0; = p0673*1000/p0856
- p3334: 0; = IF(or(p3254=0;p1232>0);0;p3269*p3277*(p3300*p3292+(1-p3300)*p3296))
- p2440: 0.000261481; = p2244*p1014
- p1191: 0.5
- p3400: 0; = p3362*p1238
- p3408: 0; = p3370*p1238
- p1296: 0; = p1292*p1252/p0818
- p2065: 0.0758824
- p1200: 0.84
- p0933: 615000; = p0801*p0927
- p0677: 0
- p2909: 8.07333e-5; = p2323*(p1020+p1022)
- p1691: 0
- p1088: 7292.96; = IF(p1071=0;p1082*(p0710/100)*p0703*1000;0)
- p1917: 0
- p0681: 615.164; = p0021*(1+p0549*p0153/100)
- p2306: 0.000404975; = p2227*p2213
- p0642: 0; = IF(p0378<0.5;-SQRT(p0007*EXP(p0510^2*p0008)-p0007);SQRT(p0007*EXP(p0510^2*p0008)-p0007))
- p5076: 6.31597e-6; = p1903*p3483
- p2324: 0.00013348; = p2224*p2191
- p2315: 0.00786521; = p2224*p2182
- p1127: 0; = if(p1121=0;p0721/100;0)
- p1101: 0.0685077; = IF(p1071=0;IF(p1096=1;0;IF(p1096+p1097>1;1-p1096;p1097));0)
- p5128: 6.49388e-6; = p1955*p3483
- p0886: 467707; = p0686*1000*p0687*p0689/100
- p0476: 0; = SQRT(2)*(IF((2*p0344-1)<0;-1;IF((2*p0344-1)>0;1;0))*SQRT(SQRT((2/(pi()*0.140012289)+LN(1-(2*p0344-1)^2)/2)^2-LN(1-(2*p0344-1)^2)/0.140012289)-(2/(pi()*0.140012289)+LN(1-(2*p0344-1)^2)/2)))
- p0448: 0; = SQRT(2)*(IF((2*p0316-1)<0;-1;IF((2*p0316-1)>0;1;0))*SQRT(SQRT((2/(pi()*0.140012289)+LN(1-(2*p0316-1)^2)/2)^2-LN(1-(2*p0316-1)^2)/0.140012289)-(2/(pi()*0.140012289)+LN(1-(2*p0316-1)^2)/2)))
- p0698: 0
- p1746: 0
- p0865: 0.606085; = IF(p0858+p0864=1;0;IF(p0858+p0864+p0860>1;1-(p0858+p0864);p0860))
- p2727: 0; = p2336*(p1078+p1080)
- p3411: 0; = p3373*p1238
- p2501: 8.7793e-6; = p2305*p1073
- p1889: 0.000242786; = p1481*1000/p0818
- p0841: 0.178461
- p3586: 0.000100908; = p1855*p3476
- p1803: 1.61857e-5; = p1395*1000/p0818
- p0719: 32.414; = p0059*(1+p0587*p0191/100)
- p3004: 0; = p2418*(p1079+p1081)
- p0724: 0
- p3012: 0; = p2426*(p1079+p1081)
- p0159: 14.364
- p2051: 0.000439338; = p2015*p2049*p2050/(p0818*1000)
- p2868: 0.000472063; = p2282*(p1020+p1022)
- p3362: 0; = if(p1232=0;p3244*p3356/p0818;0)
- p2521: 0.000590766; = p2325*p1014
- p1009: 1.29903e-6; = p1005*p0001*p0004/(p0818*p0002)
- p2325: 0.00108021; = p2224*p2192
- p1657: 0
- p2442: 7.5266e-5; = p2246*p1014
- p2974: 0.000153486; = p2388*(p1079+p1081)
- p1682: 0
- p0850: 0
- p0359: 0.5
- p3372: 0; = if(p1232=0;p3245*p3360/p0818;0)
- p3566: 1.37759e-6; = p1835*p3476
- p1000: 0; = IF(p0996+p0999=1;0;IF(p0996+p0999+p0998>1;1-(p0996+p0999);p0998))
- p3284: 0
- p1047: 0.310052; = IF(p1012=0;IF(p1037+p1044+p1045+p1046=1;0;IF(p1037+p1044+p1045+p1046+p1041>1;1-(p1037+p1044+p1045+p1046);p1041));0)
- p4600: 2.02417e-7; = p1839*p3481
- p1851: 0
- p3178: 0; = p2397*p1023
- p2210: 0.000794722; = 6*1.00794*p2208/30.973762
- p1076: 0; = IF(p1071=0;p0714/100;0)
- p0479: 0; = SQRT(2)*(IF((2*p0347-1)<0;-1;IF((2*p0347-1)>0;1;0))*SQRT(SQRT((2/(pi()*0.140012289)+LN(1-(2*p0347-1)^2)/2)^2-LN(1-(2*p0347-1)^2)/0.140012289)-(2/(pi()*0.140012289)+LN(1-(2*p0347-1)^2)/2)))
- p1016: 0.10194; = IF(p1012=0;p0707/100;0)
- p2417: 0; = p2235*p2207
- p1778: 9.24898e-6; = p1370*1000/p0818
- p1074: 0.38298; = IF(p1071=0;p0712/100;0)
- p1873: 0
- p3897: 1.38727e-5; = p1754*p3478
- p4941: 8.5399e-6; = p1768*p3483
- p2349: 0; = p2228*p2217
- p2566: 5.98155e-5; = p2370*p1014
- p4922: 0; = p1955*p3482
- p1672: 0
- p3950: 4.33523e-7; = p1807*p3478
- p1220: 0; = IF(p1218<0.5;-SQRT(p1214*EXP(p1219^2*p1215)-p1214);SQRT(p1214*EXP(p1219^2*p1215)-p1214))
- p0046: 25.58
- p0694: 46.227; = p0034*(1+p0562*p0166/100)
- p3485: 1.10207e-5; = p1754*p3476
- p1993: 400
- p1399: 1
- p1324: 0.448253; = IF(((p0745*1000*p0751/100)+(p0754*1000*p0760/100))/p0801<0;0;((p0745*1000*p0751/100)+(p0754*1000*p0760/100))/p0801)
- p3352: 0; = if(and(p1232=0;p3256<>0);p3256*(p3275-p3347)/p3349;0)
- p4248: 8.7332e-7; = p1899*p3479
- p2356: 0.000419489; = p2225*p2184
- p4839: 0; = p1872*p3482
- p3398: 0; = p3379*p1234
- p0142: 0
- p2524: 0.00731257; = p2328*p1014
- p0360: 0.5
- p2358: 0.00334404; = p2225*p2186
- p2645: 0.00132398; = p2254*(p1019+p1021)
- p2939: 0; = p2353*(p1129+p1131)
- p2754: 0.000105374; = p2363*(p1019+p1021)
- p0179: 25.849
- p5132: 0.00037004; = p1963*p3483
- p2008: 0.30656; = ((p1982*p1985+p1988*p1991+p1994*p1997+p2002*p2005)/p0818)*p0005*p0002/1000
- p2466: 3.82105e-5; = p2270*p1073
- p1996: 30
- p2044: 8.00172e-7; = p2015*p2042*p2043/(p0818*1000)
- p0819: 1.53071; = p0808*p0809/p0818
- p1328: 1.40712e6; = p1319*p0801
- p0295: 0.5
- p1084: 101345; = IF(p1071=0;p1078*(p0710/100)*p0703*1000;0)
- p2857: 0.000548036; = p2271*(p1079+p1081)
- p1335: 0.000460057; = p1334*p0001/(p0818*p0002)
- p4960: 1.15644e-6; = p1787*p3483
- p1557: 0
- p3344: 0; = if(and(p1232=0;p3254<>0);p3254-(p3339+p3340+p3341+p3342+p3343);0)
- p3180: 0; = p2399*p1023
- p0561: 0; = IF(p0297<0.5;-SQRT(p0007*EXP(p0429^2*p0008)-p0007);SQRT(p0007*EXP(p0429^2*p0008)-p0007))
- p0792: 0
- p2717: 0.00189934; = p2326*(p1019+p1021)
- p1771: 0
- p1242: 0; = if(p1232>0;0;p1234*(p0725/100)*p0723*1000)
- p0780: 0
- p4968: 1.06749e-6; = p1795*p3483
- p3377: 0; = if(p1232=0;p3246*p3359/p0818;0)
- p5141: 9.63954e-6; = p1762*p3484
- p1320: 8.25664; = IF(((p0745*1000*p0747/100)+(p0754*1000*p0756/100))/p0801<0;0;((p0745*1000*p0747/100)+(p0754*1000*p0756/100))/p0801)
- p2695: 0.00178524; = p2304*(p1078+p1080)
- p3313: 0; = if(and(p1232=0;p3253<>0);p3262*(p3278*(p3282*p1256+p3286*(p1253+p1257)+p1258*p3288+p3298*p3287));0)
- p3034: 0; = p2253*p1023
- p3113: 0; = p2332*p1023
- p4925: 0; = p1962*p3482
- p1844: 0
- p2504: 0.000388286; = p2308*p1073
- p2338: 0; = p2228*p2206
- p3397: 0; = p3378*p1234
- p0948: 0; = if(and(p0683=0;or(p0807=480;p0807=32;p0807=1;and(p0807=60;p0901<0.03)));p0936;0)
- p2581: 2.77484e-5; = p2385*p1073
- p3266: 0
- p0910: 0.0200505; = p0909/p0818
- p2855: 0.000598333; = p2269*(p1079+p1081)
- p3006: 0; = p2420*(p1079+p1081)
- p1760: 0
- p3633: 1.13651e-5; = p1902*p3476
- p3082: 5.02447e-5; = p2301*p1082
- p1494: 33
- p2624: 0; = p2428*p1123
- p4117: 5.23992e-6; = p1768*p3479
- p1462: 5
- p2069: 0.190588
- p0506: 0; = SQRT(2)*(IF((2*p0374-1)<0;-1;IF((2*p0374-1)>0;1;0))*SQRT(SQRT((2/(pi()*0.140012289)+LN(1-(2*p0374-1)^2)/2)^2-LN(1-(2*p0374-1)^2)/0.140012289)-(2/(pi()*0.140012289)+LN(1-(2*p0374-1)^2)/2)))
- p2865: 0.000110784; = p2279*(p1020+p1022)
- p3163: 3.4646e-5; = p2382*p1082
- p2291: 2.50766e-5; = p2223*p2198
- p4769: 0; = p1802*p3482
- p0941: 0; = if(and(p0683=0;p0947=0);p0935;0)
- p4856: 0; = p1889*p3482
- p2060: 0.272353
- p0008: 0.0739645; = (p0007-1.5)/(p0007-1)^2
- p2428: 0; = p2236*p2218
- p1832: 0.000575749; = p1424*1000/p0818
- p1627: 0
- p1963h: 0.000793348; = p1686*p1890+p1687*p1891+p1688*p1892+p1689*p1893+p1690*p1894+p1691*p1895+p1692*p1896+p1693*p1897+p1694*p1898+p1695*p1899+p1696*p1900+p1697*p1901+p1698*p1902+p1699*p1903+p1700*p1904+p1701*p1905+p1702*p1906+p1703*p1907+p1704*p1908+p1705*p1909
- p2130: 1.21839e-5; = p2015*p2058*p2092/(p0818*1000)
- p3456: 0; = p3380*p1240
- p3576: 7.88669e-5; = p1845*p3476
- p2204: 0.00923108; = p1109/p0818
- p2786: 0; = p2395*(p1019+p1021)
- p1697: 0.705252
- p0010: 160.511
- p2103: 0.912485
- p1945: 0
- p2647: 8.16934e-5; = p2256*(p1019+p1021)
- p3978: 1.73409e-6; = p1835*p3478
- p2505: 3.96817e-5; = p2309*p1073
- p1543: 240
- p2623: 0; = p2427*p1073
- p4672: 6.34241e-6; = p1911*p3481
- p0808: 331000
- p4996: 8.00615e-7; = p1823*p3483
- p0576: 0; = IF(p0312<0.5;-SQRT(p0007*EXP(p0444^2*p0008)-p0007);SQRT(p0007*EXP(p0444^2*p0008)-p0007))
- p0791: 0
- p0429: 0; = SQRT(2)*(IF((2*p0297-1)<0;-1;IF((2*p0297-1)>0;1;0))*SQRT(SQRT((2/(pi()*0.140012289)+LN(1-(2*p0297-1)^2)/2)^2-LN(1-(2*p0297-1)^2)/0.140012289)-(2/(pi()*0.140012289)+LN(1-(2*p0297-1)^2)/2)))
- p1256: 0; = if(p1232>0;0;IF(p1253=1;0;IF(p1253+p1254>1;1-p1253;p1254)))
- p1859: 0
- p1907: 0
- p0877: 0; = p0876*p0001*p0003/(p0818*p0002)
- p2944: 0.000508628; = p2358*(p1020+p1022)
- p2232: 0; = if(p0783*p0787+p0784*p0788+p0785*p0789+p0786*p0790=0;0;p0789*p0785/(p0783*p0787+p0784*p0788+p0785*p0789+p0786*p0790))
- p3243: 1.85236e-9; = p3234*p1188*p3239/p0818
- p0989: 0; = p0985*p0886
- p0856: 615000; = p0801
- p3000: 0; = p2414*(p1079+p1081)
- p1931: 6.93674e-6; = p1523*1000/p0818
- p2071: 0.151
- p1591: 0.677771
- p1190: 3.57729e-7; = p1188/p0818
- p1195: 0.45
- p1612: 0
- p3013: 0; = p2427*(p1079+p1081)
- p3077: 0; = p2296*p1023
- p4529: 6.47735e-6; = p1768*p3481
- p0158: 28.476
- p2424: 0; = p2235*p2214
- p2702: 0.00737395; = p2311*(p1128+p1130)
- p0795: 85.678; = p0135*(1+p0663*p0267/100)
- p2145: 5.97954e-6; = p2015*p2073*p2107/(p0818*1000)
- p2699: 0.000655987; = p2308*(p1078+p1080)
- p5214: 2.989e-7; = p1835*p3484
- p1752: 0
- p2170: 0.00215165; = p2166*(p0913)
- p2465: 0.00037389; = p2269*p1073
- p1160: 0.267475; = (p1156+p1158)*p1159
- p0928: 0; = p0801*p0918
- p3403: 0; = p3365*p1238
- p5045: 0.000279593; = p1872*p3483
- p3374: 0; = if(p1232=0;p3246*p3356/p0818;0)
- p0587: 0; = IF(p0323<0.5;-SQRT(p0007*EXP(p0455^2*p0008)-p0007);SQRT(p0007*EXP(p0455^2*p0008)-p0007))
- p3272: 0
- p1568: 0
- p2999: 0; = p2413*(p1020+p1022)
- p0940: 0; = if(and(p0683=0;p0946=0);p0934;0)
- p1831: 0
- p3161: 6.12752e-6; = p2380*p1082
- p0838: 6.5678e8; = (p0833-p0836)*p0837
- p3108: 0; = p2327*p1023
- p1731: 0
- p2619: 0; = p2423*p1073
- p2346: 0; = p2228*p2214
- p2354: 0.0206282; = p2225*p2182
- p1905: 0
- p1680: 0.846551
- p3083: 2.27212e-5; = p2302*p1082
- p1935: 0
- p0919: 0; = p0678*1000/p0801
- p0291: 0.5
- p4144: 6.5499e-7; = p1795*p3479
- p0954: 0; = if(and(p0683>0;or(p0807=56;p0807=100;and(p0807=60;p0901>0.06)));p0936;0)
- p0759: 0
- p2554: 0.00182885; = p2358*p1014
- p1251: 0; = if(p1232>0;0;p1246*p0001/(p0818*p0002))
- p1967: 457500; = if(p0807=480;p0802*p0810;0)
- p3830: 8.57542e-5; = p1893*p3477
- p2732: 0; = p2341*(p1078+p1080)
- p2871: 2.68415e-5; = p2285*(p1020+p1022)
- p1096: 0.00584539
- p0223: 21.019
- p0979: 0; = IF(p0976=0;0;p0976*p0001/(p0818*p0002))
- p2783: 0.000386755; = p2392*(p1128+p1130)
- p1930: 0.000161857; = p1522*1000/p0818
- p2587: 0.000171661; = p2391*p1123
- p3292: 0
- p3027: 0; = p2246*p1023
- p1768: 0.000221976; = p1360*1000/p0818
- p1971: 0; = p1966*p0001/(p0818*p0002)
- p2509: 0.000555582; = p2313*p1123
- p2751: 0.00185322; = p2360*(p1019+p1021)
- p0293: 0.5
- p1125: 0.32414; = if(p1121=0;p0719/100;0)
- p2390: 0.00875734; = p2233*p2219
- p1877: 0
- p2769: 0.00103844; = p2378*(p1078+p1080)
- p3416: 0; = p3378*p1238
- p1031: 0.000323955; = IF(p1012=0;p1025*p0001/(p0818*p0002);0)
- p3615: 1.03319e-6; = p1884*p3476
- p1968: 152500; = if(p0807=480;p0802*p0811;0)
- p3122: 0; = p2341*p1082
- p2883: 0.00149993; = p2297*(p1079+p1081)
- p2522: 0.003451; = p2326*p1014
- p4918: 0; = p1951*p3482
- p1604: 0
- p1940: 0
- p3977: 8.67047e-7; = p1834*p3478
- p2035: 5.94305e-5; = p2015*p2029*(1-p2031)/(p0818*1000)
- p0163: 21.505
- p3461: 0; = p3366*p1241
- p1075: 0.36277; = IF(p1071=0;p0713/100;0)
- p3201: 0; = p2420*p1082
- p1067: 0.0131958; = IF(p1012=0;p1053/(p1060*p0818);0)
- p3363: 0; = if(p1232=0;p3244*p3357/p0818;0)
- p1807: 2.31225e-6; = p1399*1000/p0818
- p3349: 0; = if(and(p1232=0;p3256<>0);1-(p3345+p3346+p3347+p3348);0)
- p5203: 1.44219e-5; = p1824*p3484
- p2072: 0.134
- p0317: 0.5
- p2629: 0.000535809; = p2238*(p1019+p1021)
- p3211: 0; = p2430*p1132
- p3256: 0; = p1252*(p1307*(1-p3247)+p1310*(1-p3248)+p1311*(1-p3249)+p1312*(1-p3250))
- p1341: 0; = p1340*p0001/(p0818*p0002)
- p1766: 0
- p1903: 0.000164169; = p1495*1000/p0818
- p1722: 0
- p4136: 7.09572e-7; = p1787*p3479
- p3080: 3.33736e-5; = p2299*p1082
- p3129: 0; = p2348*p1082
- p2215: 0.00382412; = p1117-p2214
- p3044: 2.18789e-5; = p2263*p1082
- p0848: 0
- p3743: 1.24282e-5; = p1806*p3477
- p2663: 0.00243471; = p2272*(p1128+p1130)
- p2481: 9.65128e-5; = p2285*p1014
- p2667: 0.00312994; = p2276*(p1019+p1021)
- p2062: 3.76588
- p0166: 67.114
- p3782: 0.000284605; = p1845*p3477
- p1834: 4.62449e-6; = p1426*1000/p0818
- p1164: 2989.79; = p1163*p0801
- p2567: 0.00611925; = p2371*p1014
- p1769: 0
- p2875: 0.00268876; = p2289*(p1020+p1022)
- p3051: 4.64547e-6; = p2270*p1082
- p1890: 0
- p2183: 0.0103173; = p1064-p2182
- p1020: 0.10194; = IF(p1012=0;IF(p1014+p1019=1;0;IF(p1014+p1019+p1016>1;1-(p1014+p1019);p1016));0)
- p2885: 0.000439294; = p2299*(p1079+p1081)
- p1552: 0
- p3836: 1.9885e-5; = p1899*p3477
- p3042: 0.000266825; = p2261*p1082
- p4478: 6.35016e-8; = p1923*p3480
- p2758: 0.0105555; = p2367*(p1019+p1021)
- p1565: 0
- p1012: 0
- p2874: 0.000272003; = p2288*(p1020+p1022)
- p0358: 0.5
- p1119: 0.0427309; = IF(p1071=0;p1109/(p1114*p0818);0)
- p3964: 3.90171e-6; = p1821*p3478
- p1199: -0.29
- p3975: 0.000107947; = p1832*p3478
- p0124: 70.126
- p4466: 5.4265e-7; = p1911*p3480
- p2479: 0.000335294; = p2283*p1014
- p2408: 0; = p2234*p2198
- p2256: 0.000271407; = p2222*p2202
- p0420: 0; = SQRT(2)*(IF((2*p0288-1)<0;-1;IF((2*p0288-1)>0;1;0))*SQRT(SQRT((2/(pi()*0.140012289)+LN(1-(2*p0288-1)^2)/2)^2-LN(1-(2*p0288-1)^2)/0.140012289)-(2/(pi()*0.140012289)+LN(1-(2*p0288-1)^2)/2)))
- p1051: 413366; = IF(p1012=0;p1044*p1036;0)
- p0612: 0; = IF(p0348<0.5;-SQRT(p0007*EXP(p0480^2*p0008)-p0007);SQRT(p0007*EXP(p0480^2*p0008)-p0007))
- p1849: 0
- p3093: 0.000749676; = p2312*p1132
- p0107: 91.347
- p0955: 0; = if(and(p0683>0;or(p0807=56;p0807=100;and(p0807=60;p0901>0.06)));p0937;0)
- p5202: 6.72526e-7; = p1823*p3484
- p1055: 29865.8; = IF(p1012=0;p1048*p1036;0)
- p0009: 6.835
- p3423: 0; = p3366*p1239
- p1663: 0
- p1086: 0; = IF(p1071=0;p1080*(p0710/100)*p0703*1000;0)
- p3369: 0; = if(p1232=0;p3245*p3357/p0818;0)
- p4184: 2.1833e-7; = p1835*p3479
- p1316: 0; = p1312*p1252/p0818
- p3189: 0; = p2408*p1023
- p0737: 0
- p1150: 1.4258e7; = if(p1121=0;p1149*p1146*p1145;0)
- p3921: 1.73409e-6; = p1778*p3478
- p1902: 7.63041e-5; = p1494*1000/p0818
- p2977: 0.000196769; = p2391*(p1129+p1131)
- p0693: 67.959; = p0033*(1+p0561*p0165/100)
- p1835: 9.24898e-6; = p1427*1000/p0818
- p2918: 0.000648888; = p2332*(p1020+p1022)
- p2850: 0.000124345; = p2264*(p1079+p1081)
- p3144: 0; = p2363*p1023
- p0783: 67.046; = p0123*(1+p0651*p0255/100)
- p1642: 0
- p3455: 0; = p3379*p1240
- p1825: 0
- p0368: 0.5
- p3368: 0; = if(p1232=0;p3245*p3356/p0818;0)
- p2734: 0; = p2343*(p1078+p1080)
- p2515: 0.000697315; = p2319*p1014
- p4333: 2.30915e-8; = p1778*p3480
- p3076: 0; = p2295*p1023
- p2609: 0; = p2413*p1014
- p2336: 0; = p2228*p2204
- p2948: 0.00021174; = p2362*(p1020+p1022)
- p0419: 0; = SQRT(2)*(IF((2*p0287-1)<0;-1;IF((2*p0287-1)>0;1;0))*SQRT(SQRT((2/(pi()*0.140012289)+LN(1-(2*p0287-1)^2)/2)^2-LN(1-(2*p0287-1)^2)/0.140012289)-(2/(pi()*0.140012289)+LN(1-(2*p0287-1)^2)/2)))
- p3390: 0; = p3371*p1234
- p2672: 7.30257e-5; = p2281*(p1019+p1021)
- p0625: 0; = IF(p0361<0.5;-SQRT(p0007*EXP(p0493^2*p0008)-p0007);SQRT(p0007*EXP(p0493^2*p0008)-p0007))
- p5075: 2.93559e-6; = p1902*p3483
- p1988: 750
- p2618: 0; = p2422*p1073
- p4448: 3.98328e-7; = p1893*p3480
- p1072: 0; = p1071*p0001/(p0818*p0002)
- p2018: 0.1978
- p1002: 107579; = p0996*p0888
- p1077: 0; = IF(p1071=0;p0715/100;0)
- p1729: 0
- p1260: 0; = if(p1232>0;0;p0731/100)
- p1068: 0.125694; = IF(p1012=0;p1054/(p1061*p0818);0)
- p5213: 1.4945e-7; = p1834*p3484
- p1447: 293
- p5321: 1.71868e-6; = p1942*p3484
- p2842: 4.12809e-5; = p2256*(p1020+p1022)
- p2846: 0.000423007; = p2260*(p1079+p1081)
- p1317: 0
- p1550: 0.783979
- p2572: 0.000228611; = p2376*p1073
- p1999: 3.73297e7; = (p1228+p1229)*p0818+p1164
- p0550: 0; = IF(p0286<0.5;-SQRT(p0007*EXP(p0418^2*p0008)-p0007);SQRT(p0007*EXP(p0418^2*p0008)-p0007))
- p2478: 0.00169738; = p2282*p1014
- p2499: 8.06929e-5; = p2303*p1073
- p1370: 4
- p0014: 9.314
- p4074: 1.30057e-6; = p1931*p3478
- p4170: 4.91242e-7; = p1821*p3479
- p1083: 59987; = IF(p1071=0;p1073*(p0710/100)*p0703*1000;0)
- p0578: 0; = IF(p0314<0.5;-SQRT(p0007*EXP(p0446^2*p0008)-p0007);SQRT(p0007*EXP(p0446^2*p0008)-p0007))
- p2186: 0.00761937; = p1052/p0818
- p5234: 2.18945e-5; = p1855*p3484
- p1850: 0
- p2087: 0.856281
- p4214: 2.72912e-7; = p1865*p3479
- p1611: 0.377871
- p0875: 7.68945; = p0874*p0001*p0003/(p0818*p0002)
- p1788: 0
- p0827: 6.06558e8; = p0818*p0819*p0823
- p4832: 0; = p1865*p3482
- p0794: 0
- p1252: 0; = if(p1232>0;0;p0724*2000*p0723*1000*p0725/100)
- p0938: 0; = p0932*p0001/(p0818*p0002)
- p1063: 0.455
- p4631: 3.37362e-7; = p1870*p3481
- p3329: 0; = if(and(p1232=0;p3255<>0);p3255*(p3266-p3324)/p3327;0)
- p0219: 17.068
- p1609: 0
- p2822: 0; = p2431*(p1128+p1130)
- p0490: 0; = SQRT(2)*(IF((2*p0358-1)<0;-1;IF((2*p0358-1)>0;1;0))*SQRT(SQRT((2/(pi()*0.140012289)+LN(1-(2*p0358-1)^2)/2)^2-LN(1-(2*p0358-1)^2)/0.140012289)-(2/(pi()*0.140012289)+LN(1-(2*p0358-1)^2)/2)))
- p0957: 0; = if(and(p0683>0;or(p0807=56;p0807=100;and(p0807=60;p0901>0.06)));p0939;0)
- p4013: 2.16762e-6; = p1870*p3478
- p4649: 4.57463e-5; = p1888*p3481
- p1658: 0
- p0802: 610000
- p2912: 0.000959768; = p2326*(p1020+p1022)
- p1284: 0; = p1280*p1252/p0818
- p2615: 0; = p2419*p1073
- p2432: 0.0974779; = p1158
- p1950: 0
- p5103: 6.22701e-6; = p1930*p3483
- p1050: 2.03271e7; = IF(p1012=0;p1037*p1036;0)
- p4274: 1.63747e-7; = p1925*p3479
- p0367: 0.5
- p1578: 0
- p1342: 363457; = p1326*p0801
- p1826: 0
- p2665: 0.000237834; = p2274*(p1128+p1130)
- p3279: 0
- p2384: 0.000109215; = p2229*p2213
- p3758: 1.11853e-5; = p1821*p3477
- p0349: 0.5
- p3619: 0.000233501; = p1888*p3476
- p0524: 0; = SQRT(2)*(IF((2*p0392-1)<0;-1;IF((2*p0392-1)>0;1;0))*SQRT(SQRT((2/(pi()*0.140012289)+LN(1-(2*p0392-1)^2)/2)^2-LN(1-(2*p0392-1)^2)/0.140012289)-(2/(pi()*0.140012289)+LN(1-(2*p0392-1)^2)/2)))
- p2094: 0.922577
- p2073: 0.377647
- p1732: 0
- p3215: 0.450791; = p1222*3*15.9994/100.0869
- p3102: 0; = p2321*p1023
- p0085: 3257.81
- p1638: 0
- p0720: 0
- p4015: 0.00136256; = p1872*p3478
- p2860: 0.000210271; = p2274*(p1129+p1131)
- p2160: 1.28683e-6; = p2015*p2084*p2122/(p0818*1000)
- p3466: 0; = p3371*p1241
- p1147: 0.0889917
- p0898: 0.45335
- p2945: 7.3203e-5; = p2359*(p1020+p1022)
- p0880: 0; = p0868*p0856
- p2099: 0.620397
- p2468: 0.00187788; = p2272*p1123
- p2493: 0.000937287; = p2297*p1073
- p3239: 0.013074; = IF(p3238+p3235+p3236=1;0;1-(p3238+p3235+p3236))
- p4662: 2.42901e-6; = p1901*p3481
- p3071: 0; = p2290*p1023
- p3321: 0; = if(and(p1232=0;p3253<>0);IF((p3317+p3318+p3319+p3320)+(p3253*(p3261*(1-p3277))/p3316)>p3253;p3253-(p3317+p3318+p3319+p3320);p3253*(p3261*(1-p3277))/p3316);0)
- p0139: 68.348
- p1798: 0
- p1739: 0
- p3553: 1.37759e-6; = p1822*p3476
- p4361: 5.77287e-8; = p1806*p3480
- p3355: 0; = if(and(p1232=0;p3256<>0);p3256-(p3350+p3351+p3352+p3353+p3354);0)
- p1586: 0
- p0668: 0; = IF(p0404<0.5;-SQRT(p0007*EXP(p0536^2*p0008)-p0007);SQRT(p0007*EXP(p0536^2*p0008)-p0007))
- p3534: 2.41078e-6; = p1803*p3476
- p1122: 0; = p1121*p0001/(p0818*p0002)
- p2678: 0.0025111; = p2287*(p1019+p1021)
- p0374: 0.5
- p0267: 5.04
- p1059: 0.335
- p3771: 2.48563e-6; = p1834*p3477
- p2985: 0; = p2399*(p1020+p1022)
- p2592: 0; = p2396*p1014
- p4979: 8.89573e-7; = p1806*p3483
- p1661: 0.776933
- p0876: 0; = p0866*p0856
- p0535: 0; = SQRT(2)*(IF((2*p0403-1)<0;-1;IF((2*p0403-1)>0;1;0))*SQRT(SQRT((2/(pi()*0.140012289)+LN(1-(2*p0403-1)^2)/2)^2-LN(1-(2*p0403-1)^2)/0.140012289)-(2/(pi()*0.140012289)+LN(1-(2*p0403-1)^2)/2)))
- p0371: 0.5
- p3402: 0; = p3364*p1238
- p3347: 0; = if(and(p1232=0;p3256<>0);p3275*p3289;0)
- p0481: 0; = SQRT(2)*(IF((2*p0349-1)<0;-1;IF((2*p0349-1)>0;1;0))*SQRT(SQRT((2/(pi()*0.140012289)+LN(1-(2*p0349-1)^2)/2)^2-LN(1-(2*p0349-1)^2)/0.140012289)-(2/(pi()*0.140012289)+LN(1-(2*p0349-1)^2)/2)))
- p2142: 4.13849e-6; = p2015*p2070*p2104/(p0818*1000)
- p1161: 615000; = p0801
- p2364: 0.00283307; = p2225*p2192
- p2578: 0.000284975; = p2382*p1073
- p2575: 0.000111454; = p2379*p1073
- p1278: 0
- p1818: 0
- p0243: 31.124
- p3414: 0; = p3376*p1238
- p2020: 201339; = p2015*p2018*p2019
- p4102: 0.00180335; = p1963*p3478
- p0641: 0; = IF(p0377<0.5;-SQRT(p0007*EXP(p0509^2*p0008)-p0007);SQRT(p0007*EXP(p0509^2*p0008)-p0007))
- p0705: 54.69; = p0045*(1+p0573*p0177/100)
- p0917: 3.51189; = ((p0825+p0827+((p0830+p0895)+p0814*p0818))/p0818)-(p0900+p0905+p0910+p0915)
- p2108: 0.826583
- p2815: 0; = p2424*(p1078+p1080)
- p2239: 0.000164909; = p2222*p2184
- p2284: 0.000701752; = p2223*p2190
- p2043: 0.636483
- p1224: 0.44; = IF(p1221=0;0;IF(p1193=0;1-p1223;0))
- p1616: 0
- p3940: 7.80342e-6; = p1797*p3478
- p0403: 0.5
- p1777: 0
- p4156: 5.45825e-8; = p1807*p3479
- p1714: 0
- p3096: 0; = p2315*p1023
- p1654: 0
- p1131: 0; = if(p1121=0;IF(p1123+p1128+p1129+p1130=1;0;IF(p1123+p1128+p1129+p1130+p1127>1;1-(p1123+p1128+p1129+p1130);p1127));0)
- p0745: 3257.81; = p0085*(1+p0613*p0217/100)
- p0102: 3.411
- p1918: 0
- p2296: 0.00398979; = p2223*p2203
- p4480: 1.73186e-8; = p1925*p3480
- p1193: 0; = IF(OR(p1036=0;p1095=0);0.0001*p0857;0)
- p2935: 0; = p2349*(p1079+p1081)
- p0532: 0; = SQRT(2)*(IF((2*p0400-1)<0;-1;IF((2*p0400-1)>0;1;0))*SQRT(SQRT((2/(pi()*0.140012289)+LN(1-(2*p0400-1)^2)/2)^2-LN(1-(2*p0400-1)^2)/0.140012289)-(2/(pi()*0.140012289)+LN(1-(2*p0400-1)^2)/2)))
- p2241: 0.0013146; = p2222*p2186
- p0560: 0; = IF(p0296<0.5;-SQRT(p0007*EXP(p0428^2*p0008)-p0007);SQRT(p0007*EXP(p0428^2*p0008)-p0007))
- p3358: 0; = if(p1232=0;p3308+p3319+p3330+p3341+p3352;0)
- p2193: 0.0377082; = p1054/p0818
- p0562: 0; = IF(p0298<0.5;-SQRT(p0007*EXP(p0430^2*p0008)-p0007);SQRT(p0007*EXP(p0430^2*p0008)-p0007))
- p3171: 0.000231632; = p2390*p1132
- p0836: 318.177; = p0831*p0835*p0801/(1-p0831)
- p3879: 2.85847e-5; = p1942*p3477
- p0043: 615.284
- p3043: 4.83819e-5; = p2262*p1082
- p3250: 0
- p3041: 3.21363e-5; = p2260*p1082
- p0235: 0
- p4980: 8.89573e-8; = p1807*p3483
- p0934: 0; = p0928*p0001/(p0818*p0002)
- p1963i: 9.25287e-5; = p1706*p1910+p1707*p1911+p1708*p1912+p1709*p1913+p1710*p1914+p1711*p1915+p1712*p1916+p1713*p1917+p1714*p1918+p1715*p1919+p1716*p1920+p1717*p1921+p1718*p1922+p1719*p1923+p1720*p1924+p1721*p1925+p1722*p1926+p1723*p1927+p1724*p1928
- p0523: 0; = SQRT(2)*(IF((2*p0391-1)<0;-1;IF((2*p0391-1)>0;1;0))*SQRT(SQRT((2/(pi()*0.140012289)+LN(1-(2*p0391-1)^2)/2)^2-LN(1-(2*p0391-1)^2)/0.140012289)-(2/(pi()*0.140012289)+LN(1-(2*p0391-1)^2)/2)))
- p0174: 0
- p1294: 0; = p1290*p1252/p0818
- p1801: 0
- p3216: 0.06; = IF(OR(p1226=0;p1228=0);0;1-p3213-p3214-p3215)
- p3392: 0; = p3373*p1234
- p2749: 0.00100656; = p2358*(p1019+p1021)
- p2519: 0.00029029; = p2323*p1014
- p1188: 154.711; = p1187*p0801
- p2445: 0.000762723; = p2249*p1014
- p3327: 0; = if(and(p1232=0;p3255<>0);1-(p3323+p3324+p3325+p3326);0)
- p0994: 0; = p0990*p0001*p0004/(p0818*p0002)
- p1313: 0; = p1307*p1252/p0818
- p0870: 160511; = p0858*p0856
- p2124: 0.263965
- p4458: 4.09874e-7; = p1903*p3480
- p2025: 4.43721e-5; = p2015*p2023*p2024/(p0818*1000)
- p2937: 0; = p2351*(p1129+p1131)
- p1664: 0
- p1245: 0; = if(p1232>0;0;p1240*(p0725/100)*p0723*1000)
- p0024: 31.417
- p0883: 0; = p0882*p0001*p0003/(p0818*p0002)
- p0251: 16.776
- p1643: 0
- p1937: 0
- p1941: 0
- p2109: 0.826583
- p5084: 8.36198e-6; = p1911*p3483
- p2351: 0; = p2232*p2219
- p2459: 0.000179961; = p2263*p1073
- p1755: 0
- p0702: 615.284; = p0042*(1+p0570*p0174/100)
- p0939: 0.00126871; = p0933*p0001/(p0818*p0002)
- p4868: 0; = p1901*p3482
- p2294: 0.00241812; = p2223*p2201
- p5067: 2.82884e-5; = p1894*p3483
- p1288: 0
- p4221: 0.000171553; = p1872*p3479
- p1287: 0
- p1677: 0
- p2979: 0; = p2393*(p1020+p1022)
- p3197: 0; = p2416*p1082
- p3473: 0; = p3378*p1241
- p2610: 0; = p2414*p1073
- p2502: 9.18038e-5; = p2306*p1073
- p4378: 5.19558e-8; = p1823*p3480
- p3533: 7.5423e-5; = p1802*p3476
- p0144: 0
- p3207: 0; = p2426*p1082
- p1624: 0
- p4596: 2.6989e-7; = p1835*p3481
- p1274: 0; = p1270*p1252/p0818
- p3105: 0; = p2324*p1023
- p2247: 0.00111373; = p2222*p2192
- p0936: 0; = p0930*p0001/(p0818*p0002)
- p2556: 0.0033672; = p2360*p1014
- p0840: 0.210331; = p0839*p0831
- p2381: 9.59965e-5; = p2229*p2210
- p1413: 9
- p1489: 20
- p0624: 0; = IF(p0360<0.5;-SQRT(p0007*EXP(p0492^2*p0008)-p0007);SQRT(p0007*EXP(p0492^2*p0008)-p0007))
- p4054: 4.07512e-5; = p1911*p3478
- p2121: 0.822447
- p2620: 0; = p2424*p1073
- p5147: 7.17361e-6; = p1768*p3484
- p0119: 58.646
- p1599: 0.806571
- p1298: 0
- p2128: 1.49344e-5; = p2015*p2056*p2090/(p0818*1000)
- p3255: 0; = p1252*(p1297*(1-p3247)+p1300*(1-p3248)+p1301*(1-p3249)+p1302*(1-p3250))
- p2795: 0; = p2404*(p1019+p1021)
- p1187: 0.000251562
- p0947: 0; = if(and(p0683=0;or(p0807=480;p0807=32;p0807=1;and(p0807=60;p0901<0.03)));p0935;0)
- p1990: 30
- p0210: 0
- p2568: 0.00262347; = p2372*p1014
- p1598: 0.392863
- p2955: 7.56638e-6; = p2369*(p1020+p1022)
- p3744: 1.24282e-6; = p1807*p3477
- p4606: 1.54512e-5; = p1845*p3481
- p2692: 0.000698212; = p2301*(p1078+p1080)
- p2608: 0; = p2412*p1014
- p0793: 0
- p3289: 0
- p3420: 0; = p3363*p1239
- p5201: 2.989e-7; = p1822*p3484
- p0096: 75.666
- p2533: 0; = p2337*p1073
- p0665: 0; = IF(p0401<0.5;-SQRT(p0007*EXP(p0533^2*p0008)-p0007);SQRT(p0007*EXP(p0533^2*p0008)-p0007))
- p3654: 3.78837e-6; = p1923*p3476
- p3124: 0; = p2343*p1082
- p4799: 0; = p1832*p3482
- p2243: 0.00242039; = p2222*p2188
- p1754: 7.39919e-5; = p1346*1000/p0818
- p2066: 0.109412
- p2429: 0; = p2236*p2219
- p1628: 0.601994
- p3238: 0.854735; = IF(p3237+p3235+p3236>1;1-(p3235+p3236);p3237)
- p1339: 0.000568702; = p1338*p0001/(p0818*p0002)
- p0522: 0; = SQRT(2)*(IF((2*p0390-1)<0;-1;IF((2*p0390-1)>0;1;0))*SQRT(SQRT((2/(pi()*0.140012289)+LN(1-(2*p0390-1)^2)/2)^2-LN(1-(2*p0390-1)^2)/0.140012289)-(2/(pi()*0.140012289)+LN(1-(2*p0390-1)^2)/2)))
- p0022: 615.164
- p2812: 0; = p2421*(p1078+p1080)
- p2028: 0.000562642; = p2015*p2026*p2027/(p0818*1000)
- p0613: 0; = IF(p0349<0.5;-SQRT(p0007*EXP(p0481^2*p0008)-p0007);SQRT(p0007*EXP(p0481^2*p0008)-p0007))
- p1715: 0
- p3427: 0; = p3370*p1239
- p2652: 0.00370786; = p2261*(p1078+p1080)
- p1779: 0
- p2153: 2.92192e-8; = p2015*p2081*p2115/(p0818*1000)
- p0712: 38.298; = p0052*(1+p0580*p0184/100)
- p1963b: 6.98302e-5; = p1569*p1773+p1570*p1774+p1571*p1775+p1572*p1776+p1573*p1777+p1574*p1778+p1575*p1779+p1576*p1780+p1577*p1781+p1578*p1782+p1579*p1783+p1580*p1784+p1581*p1785+p1582*p1786+p1583*p1787+p1584*p1788+p1585*p1789+p1586*p1790+p1587*p1791
- p1712: 0
- p1267: 0
- p3848: 0.000116825; = p1911*p3477
- p5211: 1.86066e-5; = p1832*p3484
- p2830: 7.27213e-5; = p2244*(p1020+p1022)
- p0616: 0; = IF(p0352<0.5;-SQRT(p0007*EXP(p0484^2*p0008)-p0007);SQRT(p0007*EXP(p0484^2*p0008)-p0007))
- p1576: 0.47191
- p1750: 0
- p2811: 0; = p2420*(p1078+p1080)
- p3740: 8.69971e-6; = p1803*p3477
- p1839: 6.93674e-6; = p1431*1000/p0818
- p1733: 0
- p1962: 0; = p1960*1000/p0818
- p4806: 0; = p1839*p3482
- p2007: 0.163498; = ((p1981*p1985+p1987*p1991+p1993*p1997+p2001*p2005)/p0818)*p0005*p0002/1000
- p1985: 1.47899e8; = (if(p1057=0;0;p1050/p1057)+if(p1058=0;0;p1051/p1058)+if(p1059=0;0;p1052/p1059)+if(p1060=0;0;p1053/p1060)+if(p1061=0;0;p1054/p1061)+if(p1062=0;0;p1055/p1062)+if(p1063=0;0;p1056/p1063))*(1+p1157)
- p3190: 0; = p2409*p1023
- p3024: 0; = p2243*p1023
- p2196: 0.0799026; = p1068-p2193-p2195
- p4616: 1.97694e-5; = p1855*p3481
- p2546: 0; = p2350*p1123
- p0993: 0; = p0989*p0001*p0004/(p0818*p0002)
- p1864: 0
- p1879: 9.24898e-6; = p1471*1000/p0818
- p2399: 0; = p2234*p2188
- p2701: 0.000600844; = p2310*(p1078+p1080)
- p3045: 9.44658e-6; = p2264*p1082
- p4370: 2.88644e-7; = p1815*p3480
- p0779: 58.646; = p0119*(1+p0647*p0251/100)
- p1582: 0
- p2367: 0.0350681; = p2225*p2196
- p3345: 0; = if(and(p1232=0;p3256<>0);p3273*p3277*p3293;0)
- p0664: 0; = IF(p0400<0.5;-SQRT(p0007*EXP(p0532^2*p0008)-p0007);SQRT(p0007*EXP(p0532^2*p0008)-p0007))
- p5104: 2.66872e-7; = p1931*p3483
- p0766: 67.765; = p0106*(1+p0634*p0238/100)
- p2660: 0.000631666; = p2269*(p1078+p1080)
- p2023: 3.3
- p3018: 0; = p2237*p1023
- p3258: 0
- p0146: 0
- p1163: 0.00486145
- p0787: 19.972; = p0127*(1+p0655*p0259/100)
- p2700: 6.704e-5; = p2309*(p1078+p1080)
- p1309: 0
- p1713: 0
- p3187: 0; = p2406*p1023
- p3314: 0; = if(and(p1232=0;p3253<>0);p3263*p3289;0)
- p1169: 0.000621786
- p0537: 0; = IF(p0273<0.5;-SQRT(p0007*EXP(p0405^2*p0008)-p0007);SQRT(p0007*EXP(p0405^2*p0008)-p0007))
- p4304: 3.98452e-6; = p1955*p3479
- p0811: 0.25; = if(p0807=480;1-p0810;0)
- p1797: 4.16204e-5; = p1389*1000/p0818
- p2500: 0.00105671; = p2304*p1073
- p3364: 0; = if(p1232=0;p3244*p3358/p0818;0)
- p3444: 0; = p3368*p1240
- p2600: 0; = p2404*p1014
- p2492: 0.00218202; = p2296*p1014
- p1719: 0.4576
- p1603: 0.948955
- p1641: 0.347885
- p3752: 6.21408e-5; = p1815*p3477
- p3662: 1.03319e-6; = p1931*p3476
- p0510: 0; = SQRT(2)*(IF((2*p0378-1)<0;-1;IF((2*p0378-1)>0;1;0))*SQRT(SQRT((2/(pi()*0.140012289)+LN(1-(2*p0378-1)^2)/2)^2-LN(1-(2*p0378-1)^2)/0.140012289)-(2/(pi()*0.140012289)+LN(1-(2*p0378-1)^2)/2)))
- p1914: 0
- p0215: 12.633
- p1547: 73
- p1153: 0.365265
- p2261: 0.00968161; = p2226*p2207
- p2562: 0.00194018; = p2366*p1014
- p2858: 0.00215254; = p2272*(p1129+p1131)
- p1740: 0
- p2452: 0.000148432; = p2256*p1014
- p1024: 335742; = IF(p1012=0;p1014*(p0704/100)*p0703*1000;0)
- p3167: 1.27306e-5; = p2386*p1082
- p0654: 0; = IF(p0390<0.5;-SQRT(p0007*EXP(p0522^2*p0008)-p0007);SQRT(p0007*EXP(p0522^2*p0008)-p0007))
- p1667: 0
- p2764: 0.000207808; = p2373*(p1019+p1021)
- p3331: 0; = if(and(p1232=0;p3255<>0);p3255*(p3268-p3326)/p3327;0)
- p0136: 99.775
- p0812: 0.279412; = if(p0807=480;0.095/0.34;0)
- p2558: 0.000761345; = p2362*p1014
- p1899: 3.69959e-5; = p1491*1000/p0818
- p2489: 0.00308466; = p2293*p1014
- p3482: 0; = if(p1328+p1330+p1332+p1334+p1336+p1338+p1340+p1342+p1344=0;0;p1340/(p1328+p1330+p1332+p1334+p1336+p1338+p1340+p1342+p1344))
- p4027: 1.30057e-6; = p1884*p3478
- p2217: 0.00350266; = p1118-p2216
- p1698: 0.784351
- p1167: 0.5
- p4855: 0; = p1888*p3482
- p4719: 0; = p1962*p3481
- p1886: 0
- p2402: 0; = p2234*p2191
- p2436: 0.00031065; = p2240*p1014
- p4171: 2.1833e-7; = p1822*p3479
- p0094: 6189.46
- p2370: 0.000109372; = p2225*p2199
- p1029: 0; = IF(p1012=0;IF(p0801<p1023*(p0704/100)*p0703*1000;p0801;p1023*(p0704/100)*p0703*1000);0)
- p0534: 0; = SQRT(2)*(IF((2*p0402-1)<0;-1;IF((2*p0402-1)>0;1;0))*SQRT(SQRT((2/(pi()*0.140012289)+LN(1-(2*p0402-1)^2)/2)^2-LN(1-(2*p0402-1)^2)/0.140012289)-(2/(pi()*0.140012289)+LN(1-(2*p0402-1)^2)/2)))
- p0742: 97.157; = p0082*(1+p0610*p0214/100)
- p2827: 0.000199951; = p2241*(p1020+p1022)
- p0829: 0.0832195; = if(p0807=480;p0814*(1-p0824);0)
- p2013: 0.65
- p2433: 0.00443499; = p2237*p1014
- p1963c: 0.000282719; = p1588*p1792+p1589*p1793+p1590*p1794+p1591*p1795+p1592*p1796+p1593*p1797+p1594*p1798+p1595*p1799+p1596*p1800+p1597*p1801+p1598*p1802+p1599*p1803+p1600*p1804+p1601*p1805+p1602*p1806+p1603*p1807+p1604*p1808+p1605*p1809+p1606*p1810+p1607*p1811
- p1892: 0
- p1846: 0
- p2347: 0; = p2228*p2215
- p2528: 0.00233318; = p2332*p1014
- p0775: 40.109; = p0115*(1+p0643*p0247/100)
- p0128: 57.832
- p2352: 0; = p2232*p2220
- p3259: 0
- p2873: 0.0012689; = p2287*(p1020+p1022)
- p3341: 0; = if(and(p1232=0;p3254<>0);p3254*(p3271-p3336)/p3338;0)
- p1022: 0.05016; = IF(p1012=0;IF(p1014+p1019+p1020+p1021=1;0;IF(p1014+p1019+p1020+p1021+p1018>1;1-(p1014+p1019+p1020+p1021);p1018));0)
- p0417: 0; = SQRT(2)*(IF((2*p0285-1)<0;-1;IF((2*p0285-1)>0;1;0))*SQRT(SQRT((2/(pi()*0.140012289)+LN(1-(2*p0285-1)^2)/2)^2-LN(1-(2*p0285-1)^2)/0.140012289)-(2/(pi()*0.140012289)+LN(1-(2*p0285-1)^2)/2)))
- p2496: 0.00227922; = p2300*p1073
- p5336: 2.24175e-7; = p1957*p3484
- p0768: 71.232; = p0108*(1+p0636*p0240/100)
- p1602: 0.730108
- p0004: 0.0254
- p5174: 8.96701e-7; = p1795*p3484
- p2929: 0; = p2343*(p1079+p1081)
- p1554: 0
- p4008: 2.16762e-6; = p1865*p3478
- p2093: 0.260958
- p2719: 0.00402466; = p2328*(p1019+p1021)
- p2289: 0.0176776; = p2223*p2196
- p5130: 2.66872e-7; = p1957*p3483
- p0115: 40.109
- p3724: 1.61566e-5; = p1787*p3477
- p3165: 3.00995e-6; = p2384*p1082
- p1343: 0.000749791; = p1342*p0001/(p0818*p0002)
- p0815: 0
- p3426: 0; = p3369*p1239
- p5038: 4.44786e-7; = p1865*p3483
- p0858: 0.260993; = p0670*1000/p0856
- p1120: 0.0171128; = IF(p1071=0;p1110/(p1115*p0818);0)
- p3152: 0; = p2371*p1023
- p3184: 0; = p2403*p1023
- p4927: 2.84663e-6; = p1754*p3483
- p0285: 0.5
- p1596: 0
- p2140: 2.54386e-6; = p2015*p2068*p2102/(p0818*1000)
- p3365: 0; = if(p1232=0;p3244*p3359/p0818;0)
- p2763: 0.00144389; = p2372*(p1019+p1021)
- p3315: 0; = if(and(p1232=0;p3253<>0);p3264*p3289;0)
- p0679: 0
- p3064: 0; = p2283*p1023
- p4279: 3.82077e-6; = p1930*p3479
- p1887: 0
- p4194: 1.24994e-5; = p1845*p3479
- p2520: 7.30003e-5; = p2324*p1014
- p3499: 3.30621e-5; = p1768*p3476
- p3348: 0; = if(and(p1232=0;p3256<>0);p3276*p3289;0)
- p2512: 0.000944228; = p2316*p1014
- p1908: 0
- p0352: 0.5
- p2798: 0; = p2407*(p1019+p1021)
- p2234: 0; = 1-(p2222+p2223+p2224+p2225)
- p0700: 0
- p1684: 0.698317
- p0183: 40.558
- p5194: 3.73626e-6; = p1815*p3484
- p2571: 0.00025277; = p2375*p1073
- p3484: 0.0323171; = IF(p1344=0;0;p1344/(p1328+p1330+p1332+p1334+p1336+p1338+p1340+p1342+p1344))
- p0909: 8.67146e6; = p0825*p0906+p0827*p0907+(p0830+p0895)*p0824*p0908
- p1032: 0.000129101; = IF(p1012=0;p1026*p0001/(p0818*p0002);0)
- p0606: 0; = IF(p0342<0.5;-SQRT(p0007*EXP(p0474^2*p0008)-p0007);SQRT(p0007*EXP(p0474^2*p0008)-p0007))
- p1056: 1.10257e7; = IF(p1012=0;p1049*p1036;0)
- p0656: 0; = IF(p0392<0.5;-SQRT(p0007*EXP(p0524^2*p0008)-p0007);SQRT(p0007*EXP(p0524^2*p0008)-p0007))
- p2144: 2.06072e-6; = p2015*p2072*p2106/(p0818*1000)
- p1103: 0.624059; = IF(p1071=0;IF(p1096+p1101+p1102=1;0;IF(p1096+p1101+p1102+p1099>1;1-(p1096+p1101+p1102);p1099));0)
- p1556: 0
- p2406: 0; = p2234*p2196
- p2677: 0.000429867; = p2286*(p1019+p1021)
- p0573: 0; = IF(p0309<0.5;-SQRT(p0007*EXP(p0441^2*p0008)-p0007);SQRT(p0007*EXP(p0441^2*p0008)-p0007))
- p0382: 0.5
- p2154: 2.27713e-6; = p2015*p2082*p2116/(p0818*1000)
- p2206: 0.00270356; = 9*1.00794*p2204/30.973762
- p1605: 0
- p0555: 0; = IF(p0291<0.5;-SQRT(p0007*EXP(p0423^2*p0008)-p0007);SQRT(p0007*EXP(p0423^2*p0008)-p0007))
- p2628: 0.00244091; = p2237*(p1019+p1021)
- p0998: 0; = if(p0888=0;0;if((p0699*p0698*1000*p0700/100)/p0888>1;1;(p0699*p0698*1000*p0700/100)/p0888))
- p1011: 2.25162e-7; = p1010*p0001*p0004/(p0818*p0002)
- p1207: 186.968; = if(p1193>0;0;(p1194*p1050/p1057+p1195*p1051/p1058+p1196*p1052/p1059+p1197*p1053/p1060+p1198*p1054/p1061+p1199*p1055/p1062+p1200*p1056/p1063)/(p0702*1000)+(p1201*p1109/p1114+p1202*p1110/p1115)/(p0702*1000)+p1203*p1170/p0801+p1204*p1176/p0801)
- p2687: 0.00120093; = p2296*(p1019+p1021)
- p2190: 0.00317192; = 32.065*p2189/(2*14.0067)
- p4427: 1.81441e-5; = p1872*p3480
- p0715: 0
- p1006: 5.63698e-6; = p1002*p0001*p0004/(p0818*p0002)
- p3460: 0; = p3365*p1241
- p0927: 1; = IF(p0918+p0923+p0924+p0925+p0926=1;0;1-(p0918+p0923+p0924+p0925+p0926))
- p0430: 0; = SQRT(2)*(IF((2*p0298-1)<0;-1;IF((2*p0298-1)>0;1;0))*SQRT(SQRT((2/(pi()*0.140012289)+LN(1-(2*p0298-1)^2)/2)^2-LN(1-(2*p0298-1)^2)/0.140012289)-(2/(pi()*0.140012289)+LN(1-(2*p0298-1)^2)/2)))
- p2611: 0; = p2415*p1073
- p2814: 0; = p2423*(p1078+p1080)
- p3130: 0; = p2349*p1082
- p0211: 9.738
- p2415: 0; = p2235*p2205
- p4703: 1.55187e-6; = p1942*p3481
- p1689: 0.2666
- p2107: 0.881623
- p0678: 0
- p1928: 0
- p2444: 0.00355811; = p2248*p1014
- p2021: 0.000465545; = p2020/p0818
- p2391: 0.000607049; = p2233*p2220
- p0079: 10.97
- p2598: 0; = p2402*p1014
- p0114: 69.409
- p3429: 0; = p3372*p1239
- p0835: 0.00321809; = -LN(1-p0669/100)/p0834
- p5070: 1.77915e-6; = p1897*p3483
- p2237: 0.00810932; = p2222*p2182
- p4729: 0; = p1762*p3482
- p2518: 0.00025361; = p2322*p1014
- p1738: 0.54188
- p0353: 0.5
- p2848: 0.000636847; = p2262*(p1079+p1081)
- p2789: 0; = p2398*(p1019+p1021)
- p3380: 0; = p3251/p0818
- p3624: 2.37634e-5; = p1893*p3476
- p4233: 1.63747e-7; = p1884*p3479
- p2143: 2.4087e-6; = p2015*p2071*p2105/(p0818*1000)
- p1318: 0; = p1317*p0001/(p0818*p0002)
- p3407: 0; = p3369*p1238
- p1041: 0.310052
- p2015: 7.7672e6; = p0830*p2011*p2013
- p1027: 27748.3; = IF(p1012=0;p1021*(p0704/100)*p0703*1000;0)
- p2184: 0.000955804; = p1051/p0818
- p1867: 0
- p2669: 6.36497e-5; = p2278*(p1019+p1021)
- p2942: 6.38043e-5; = p2356*(p1020+p1022)
- p2540: 0; = p2344*p1073
- p4246: 1.09165e-6; = p1897*p3479
- p0911: 0.0049
- p2837: 1.81223e-6; = p2251*(p1020+p1022)
- p1144: 1.5051e-5; = if(p1121=0;p1138*p0001/(p0818*p0002);0)
- p2833: 0.000169399; = p2247*(p1020+p1022)
- p2627: 0; = p2431*p1123
- p2287: 0.00834252; = p2223*p2193
- p3265: 0
- p2322: 0.000463722; = p2224*p2189
- p4036: 2.99131e-5; = p1893*p3478
- p1148: 0.0889917; = if(p1121=0;IF(p1146=1;0;1-p1146);0)
- p2122: 0.341195
- p2404: 0; = p2234*p2193
- p2862: 0.00158161; = p2276*(p1020+p1022)
- p2958: 0.00072962; = p2372*(p1020+p1022)
- p0255: 13.856
- p2832: 2.09325e-5; = p2246*(p1020+p1022)
- p2898: 0.00918714; = p2312*(p1129+p1131)
- p0639: 0; = IF(p0375<0.5;-SQRT(p0007*EXP(p0507^2*p0008)-p0007);SQRT(p0007*EXP(p0507^2*p0008)-p0007))
- p2895: 6.35023e-5; = p2309*(p1079+p1081)
- p1912: 0
- p2573: 7.40301e-5; = p2377*p1073
- p0348: 0.5
- p0078: 615.164
- p3404: 0; = p3366*p1238
- p3462: 0; = p3367*p1241
- p1330: 5.07783e6; = p1320*p0801
- p3127: 0; = p2346*p1082
- p0188: 19.776
- p4654: 4.6556e-6; = p1893*p3481
- p1156: 0.437472; = p1064+p1065+p1066+p1067+p1068+p1069+p1070+p1116+p1117+p1118+p1119+p1120+p1154+p1155
- p2697: 0.000155097; = p2306*(p1078+p1080)
- p0769: 18.639; = p0109*(1+p0637*p0241/100)
- p0706: 25.58; = p0046*(1+p0574*p0178/100)
- p0087: 12.11
- p0607: 0; = IF(p0343<0.5;-SQRT(p0007*EXP(p0475^2*p0008)-p0007);SQRT(p0007*EXP(p0475^2*p0008)-p0007))
- p3005: 0; = p2419*(p1079+p1081)
- p0786: 52.548; = p0126*(1+p0654*p0258/100)
- p1640: 0
- p1573: 0
- p1748: 0
- p2102: 0.922577
- p0138: 43.008
- p2332: 0.00426619; = p2224*p2200
- p1115: 0.237849
- p0708: 4.52; = p0048*(1+p0576*p0180/100)
- p2684: 0.00169772; = p2293*(p1019+p1021)
- p3240: 1.67317e-8; = p3234*p1188*p3235/p0818
- p1761: 0
- p2405: 0; = p2234*p2195
- p3112: 0; = p2331*p1023
- p3450: 0; = p3374*p1240
- p1336: 23586.5; = p1323*p0801
- p1014: 0.5469; = IF(p1012=0;p0705/100;0)
- p0542: 0; = IF(p0278<0.5;-SQRT(p0007*EXP(p0410^2*p0008)-p0007);SQRT(p0007*EXP(p0410^2*p0008)-p0007))
- p4660: 1.07956e-6; = p1899*p3481
- p3177: 0; = p2396*p1023
- p0999: 0; = IF(p0996=1;0;IF(p0996+p0997>1;1-p0996;p0997))
- p1262: 0; = if(p1232>0;0;p0733/100)
- p0286: 0.5
- p0972: 0.00877783; = p0969/p0818
- p0896: 0.516338
- p2219: 0.0464587; = p1154-p2218
- p2853: 0.000141466; = p2267*(p1079+p1081)
- p2486: 8.3556e-6; = p2290*p1014
- p0832: 1.81928e8; = p0831*p0830/(1-p0831)
- p0408: 0; = SQRT(2)*(IF((2*p0276-1)<0;-1;IF((2*p0276-1)>0;1;0))*SQRT(SQRT((2/(pi()*0.140012289)+LN(1-(2*p0276-1)^2)/2)^2-LN(1-(2*p0276-1)^2)/0.140012289)-(2/(pi()*0.140012289)+LN(1-(2*p0276-1)^2)/2)))
- p3245: 0; = IF(p3244=1;0;if(p3244+p0792/100>1;1-p3244;p0792/100))
- p0952: 0; = if(and(p0683>0;or(p0807=56;p0807=100;and(p0807=60;p0901>0.06)));p0934;0)
- p3375: 0; = if(p1232=0;p3246*p3357/p0818;0)
- p3007: 0; = p2421*(p1079+p1081)
- p3293: 0
- p0259: 29.473
- p4663: 2.22659e-6; = p1902*p3481
- p1493: 36
- p2510: 0.000965455; = p2314*p1123
- p4523: 8.70394e-6; = p1762*p3481
- p0253: 37.672
- p1659: 0
- p0929: 0; = p0801*p0923
- p1942: 5.31817e-5; = p1534*1000/p0818
- p1025: 157036; = IF(p1012=0;p1019*(p0704/100)*p0703*1000;0)
- p3454: 0; = p3378*p1240
- p1916: 0
- p1842: 0
- p0574: 0; = IF(p0310<0.5;-SQRT(p0007*EXP(p0442^2*p0008)-p0007);SQRT(p0007*EXP(p0442^2*p0008)-p0007))
- p3387: 0; = p3368*p1234
- p2476: 0.00092191; = p2280*p1014
- p2975: 0.00201432; = p2389*(p1129+p1131)
- p0003: 10000
- p2158: 2.65556e-6; = p2015*p2082*p2120/(p0818*1000)
- p3040: 9.92393e-5; = p2259*p1082
- p1182: 98.2958; = p1181*p0801
- p5131: 0; = p1962*p3483
- p3264: 0
- p3117: 0; = p2336*p1082
- p1198: 0.44
- p0903: 0.0175
- p3867: 8.69971e-5; = p1930*p3477
- p3128: 0; = p2347*p1082
- p3089: 4.72061e-5; = p2308*p1082
- p1717: 0
- p1080: 0; = IF(p1071=0;IF(p1073+p1078+p1079=1;0;IF(p1073+p1078+p1079+p1076>1;1-(p1073+p1078+p1079);p1076));0)
- p1121: 0
- p4764: 0; = p1797*p3482
- p3330: 0; = if(and(p1232=0;p3255<>0);p3255*(p3267-p3325)/p3327;0)
- p0636: 0; = IF(p0372<0.5;-SQRT(p0007*EXP(p0504^2*p0008)-p0007);SQRT(p0007*EXP(p0504^2*p0008)-p0007))
- p1785: 0
- p3140: 0; = p2359*p1023
- p3821: 3.72845e-6; = p1884*p3477
- p2252: 1.95561e-5; = p2222*p2198
- p1019: 0.2558; = IF(p1012=0;IF(p1014=1;0;IF(p1014+p1015>1;1-p1014;p1015));0)
- p2658: 0.000149347; = p2267*(p1078+p1080)
- p0649: 0; = IF(p0385<0.5;-SQRT(p0007*EXP(p0517^2*p0008)-p0007);SQRT(p0007*EXP(p0517^2*p0008)-p0007))
- p0268: 0.231
- p4040: 8.67047e-6; = p1897*p3478
- p1670: 0
- p1229: 0.00845366; = IF(p1221=0;0;p1228*p1221)
- p2997: 0; = p2411*(p1020+p1022)
- p2782: 0.000222562; = p2391*(p1128+p1130)
- p1964: 0.5
- p1138: 7295.91; = if(p1121=0;p1132*(p0716/100)*p0703*1000;0)
- p3792: 0.000364145; = p1855*p3477
- p0355: 0.5
- p0023: 8.998
- p3471: 0; = p3376*p1241
- p3565: 6.88794e-7; = p1834*p3476
- p0756: 75.666; = p0096*(1+p0624*p0228/100)
- p2276: 0.0103985; = p2223*p2182
- p0247: 12.18
- p0097: 11.347
- p2100: 0.705744
- p0826: 0.084; = 1-p0825/p0818
- p2892: 0.000146913; = p2306*(p1079+p1081)
- p1240: 0; = if(p1232>0;0;IF(p1234+p1238+p1239=1;0;IF(p1234+p1238+p1239+p1237>1;1-(p1234+p1238+p1239);p1237)))
- p0225: 41.802
- p2646: 0.000567621; = p2255*(p1019+p1021)
- p3656: 1.03319e-6; = p1925*p3476
- p0675: 0
- p2450: 0.00240559; = p2254*p1014
- p5007: 1.77915e-7; = p1834*p3483
- p2570: 0.00432861; = p2374*p1014
- p3091: 4.32379e-5; = p2310*p1082
- p0824: 0.8615
- p0378: 0.5
- p0633: 0; = IF(p0369<0.5;-SQRT(p0007*EXP(p0501^2*p0008)-p0007);SQRT(p0007*EXP(p0501^2*p0008)-p0007))
- p4558: 1.2145e-6; = p1797*p3481
- p2775: 4.1827e-5; = p2384*(p1078+p1080)
- p2569: 0.000377576; = p2373*p1014
- p4514: 2.40137e-5; = p1963*p3480
- p2762: 0.00336788; = p2371*(p1019+p1021)
- p3055: 1.71582e-5; = p2274*p1132
- p4774: 0; = p1807*p3482
- p1944: 0
- p3235: 0.118093
- p2378: 0.00271149; = p2229*p2207
- p1280: 0; = IF(p1277=p1263;0;IF(p1277+p1278>p1263;p1263-p1277;p1278))
- p2292: 5.51335e-5; = p2223*p2199
- p0492: 0; = SQRT(2)*(IF((2*p0360-1)<0;-1;IF((2*p0360-1)>0;1;0))*SQRT(SQRT((2/(pi()*0.140012289)+LN(1-(2*p0360-1)^2)/2)^2-LN(1-(2*p0360-1)^2)/0.140012289)-(2/(pi()*0.140012289)+LN(1-(2*p0360-1)^2)/2)))
- p1214: 3; = IF(p1213=0;0;p1213-1)
- p0063: 615.284
- p2835: 0.000212123; = p2249*(p1020+p1022)
- p1695: 0.8025
- p2357: 0.00144491; = p2225*p2185
- p2004: 30
- p2191: 0.000797656; = 8*1.00794*p2189/(2*14.0067)
- p2138: 1.38679e-6; = p2015*p2066*p2100/(p0818*1000)
- p2425: 0; = p2235*p2215
- p0609: 0; = IF(p0345<0.5;-SQRT(p0007*EXP(p0477^2*p0008)-p0007);SQRT(p0007*EXP(p0477^2*p0008)-p0007))
- p0327: 0.5
- p2371: 0.011189; = p2225*p2200
- p0246: 21.212
- p1286: 0; = p1282*p1252/p0818
- p2984: 0; = p2398*(p1020+p1022)
- p1774: 0
- p1407: 50
- p0691: 4.459; = p0031*(1+p0559*p0163/100)
- p0953: 0; = if(and(p0683>0;or(p0807=56;p0807=100;and(p0807=60;p0901>0.06)));p0935;0)
- p1716: 0
- p1394: 219
- p1279: 0
- p0726: 0
- p2056: 2.07882
- p1601: 0
- p1882: 0
- p2659: 0.000167387; = p2268*(p1078+p1080)
- p3357: 0; = if(p1232=0;p3307+p3318+p3329+p3340+p3351;0)
- p0695: 0
- p0655: 0; = IF(p0391<0.5;-SQRT(p0007*EXP(p0523^2*p0008)-p0007);SQRT(p0007*EXP(p0523^2*p0008)-p0007))
- p3537: 3.44397e-6; = p1806*p3476
- p2641: 0.00414957; = p2250*(p1019+p1021)
- p4975: 1.94816e-5; = p1802*p3483
- p2902: 0.000262602; = p2316*(p1020+p1022)
- p0343: 0.5
- p1660: 0
- p0608: 0; = IF(p0344<0.5;-SQRT(p0007*EXP(p0476^2*p0008)-p0007);SQRT(p0007*EXP(p0476^2*p0008)-p0007))
- p1827: 0
- p3011: 0; = p2425*(p1079+p1081)
- p3776: 3.72845e-6; = p1839*p3477
- p1226: 615000; = IF(p1221=0;0;IF(p1193=0;p0801;0))
- p2589: 0; = p2393*p1014
- p3474: 0; = p3379*p1241
- p3528: 6.19915e-6; = p1797*p3476
- p0394: 0.5
- p1841: 0
- p3447: 0; = p3371*p1240
- p1629: 0
- p0381: 0.5
- p4692: 2.02417e-7; = p1931*p3481
- p2923: 0; = p2337*(p1079+p1081)
- p2328: 0.013371; = p2224*p2196
- p4031: 0.000293929; = p1888*p3478
- p2112: 0.856281
- p3195: 0; = p2414*p1082
- p3682: 8.26553e-5; = p1951*p3476
- p0651: 0; = IF(p0387<0.5;-SQRT(p0007*EXP(p0519^2*p0008)-p0007);SQRT(p0007*EXP(p0519^2*p0008)-p0007))
- p2897: 0.00651936; = p2311*(p1129+p1131)
- p2535: 0; = p2339*p1073
- p3115: 0; = p2334*p1023
- p3418: 0; = p3380*p1238
- p3078: 0.000113951; = p2297*p1082
- p3463: 0; = p3368*p1241
- p2529: 0.00100029; = p2333*p1014
- p0012: 372.742
- p4718: 2.02417e-7; = p1957*p3481
- p3483: 0.0384722; = if(p1328+p1330+p1332+p1334+p1336+p1338+p1340+p1342+p1344=0;0;p1342/(p1328+p1330+p1332+p1334+p1336+p1338+p1340+p1342+p1344))
- p0650: 0; = IF(p0386<0.5;-SQRT(p0007*EXP(p0518^2*p0008)-p0007);SQRT(p0007*EXP(p0518^2*p0008)-p0007))
- p2560: 0.00154941; = p2364*p1014
- p1172: 8.84198e-7; = p1170/p0818
- p4846: 0; = p1879*p3482
- p3690: 0.00143261; = p1963*p3476
- p2820: 0; = p2429*(p1128+p1130)
- p1793: 0
- p2263: 0.000793863; = p2226*p2209
- p0249: 27.506
- p0855: 5.43211; = p0854*p0001*p0003/(p0818*p0002)
- p0117: 35.425
- p3191: 0; = p2410*p1023
- p3350: 0; = if(and(p1232=0;p3256<>0);p3256*(p3273*p3277-p3345)/p3349;0)
- p2117: 0.585147
- p2339: 0; = p2228*p2207
- p1143: 0; = if(p1121=0;p1137*p0001/(p0818*p0002);0)
- p1875: 0
- p0484: 0; = SQRT(2)*(IF((2*p0352-1)<0;-1;IF((2*p0352-1)>0;1;0))*SQRT(SQRT((2/(pi()*0.140012289)+LN(1-(2*p0352-1)^2)/2)^2-LN(1-(2*p0352-1)^2)/0.140012289)-(2/(pi()*0.140012289)+LN(1-(2*p0352-1)^2)/2)))
- p0296: 0.5
- p2086: 0.0617647
- p4042: 6.93637e-6; = p1899*p3478
- p2329: 1.15561e-5; = p2224*p2197
- p2448: 1.06952e-5; = p2252*p1014
- p1926: 0
- p2003: 50
- p2010: 0.0122624; = ((p1984*p1985+p1990*p1991+p1996*p1997+p2004*p2005)/p0818)*p0005*p0002/1000
- p1323: 0.0383521; = IF(((p0745*1000*p0750/100)+(p0754*1000*p0759/100))/p0801<0;0;((p0745*1000*p0750/100)+(p0754*1000*p0759/100))/p0801)
- p2904: 8.37951e-5; = p2318*(p1020+p1022)
- p2300: 0.0100544; = p2227*p2207
- p0923: 0; = IF(p0918=1;0;IF(p0918+p0919>1;1-p0918;p0919))
- p1424: 249
- p2019: 0.13105
- p3249: 0
- p2938: 0; = p2352*(p1129+p1131)
- p4513: 0; = p1962*p3480
- p0699: 0
- p1334: 223010; = p1322*p0801
- p3121: 0; = p2340*p1082
- p1772: 0
- p2409: 0; = p2234*p2199
- p0103: 615.284
- p2879: 0.000857885; = p2293*(p1020+p1022)
- p1822: 9.24898e-6; = p1414*1000/p0818
- p2366: 0.0035476; = p2225*p2195
- p0881: 0; = p0880*p0001*p0003/(p0818*p0002)
- p3062: 0; = p2281*p1023
- p0860: 0.606085; = p0672*1000/p0856
- p3309: 0; = if(and(p1232=0;p3252<>0);p3252*(p3260-p3304)/p3305;0)
- p2574: 0.000614667; = p2378*p1073
- p1795: 2.77469e-5; = p1387*1000/p0818
- p1327: 0.496436; = if(p1318=0;if(p1327a=0;1;if(p1327a<0;0;p1327a));0)
- p2318: 0.000550921; = p2224*p2185
- p1306: 0; = p1302*p1252/p0818
- p0226: 10.099
- p3860: 1.3671e-5; = p1923*p3477
- p4183: 1.09165e-7; = p1834*p3479
- p3945: 9.49416e-5; = p1802*p3478
- p3172: 1.60564e-5; = p2391*p1132
- p2816: 0; = p2425*(p1078+p1080)
- p3148: 0; = p2367*p1023
- p2238: 0.0017801; = p2222*p2183
- p3061: 0; = p2280*p1023
- p2181: 316.684; = p0887+p0889+p0893+p2180
- p1816: 0
- p1254: 0; = if(p1232>0;0;p0736/100)
- p1078: 0.38298; = IF(p1071=0;IF(p1073=1;0;IF(p1073+p1074>1;1-p1073;p1074));0)
- p1113: 0.100377
- p0744: 95.902; = p0084*(1+p0612*p0216/100)
- p4870: 0; = p1903*p3482
- p1858: 0
- p1175: 0.000155803
- p2089: 0.40001
- p2052: 2.21216e-5; = p2015*p2049*(1-p2050)/(p0818*1000)
- p1105: 0.436421
- p5018: 2.03712e-5; = p1845*p3483
- p1203: 3
- p2344: 0; = p2228*p2212
- p1814: 0
- p1561: 0
- p0900: 2.40749; = p0899/p0818
- p1282: 0; = IF(p1277+p1280+p1281=p1260;0;p1260-(p1277+p1280+p1281))
- p2729: 0; = p2338*(p1078+p1080)
- p1992: 3900
- p2803: 0; = p2412*(p1019+p1021)
- p1915: 0
- p0732: 0
- p3384: 0; = p3365*p1234
- p1257: 0; = if(p1232>0;0;IF(p1253+p1256=1;0;IF(p1253+p1256+p1255>1;1-(p1253+p1256);p1255)))
- p0514: 0; = SQRT(2)*(IF((2*p0382-1)<0;-1;IF((2*p0382-1)>0;1;0))*SQRT(SQRT((2/(pi()*0.140012289)+LN(1-(2*p0382-1)^2)/2)^2-LN(1-(2*p0382-1)^2)/0.140012289)-(2/(pi()*0.140012289)+LN(1-(2*p0382-1)^2)/2)))
- p1980: 3521.6
- p3511: 1.17095e-5; = p1780*p3476
- p2949: 5.32472e-5; = p2363*(p1020+p1022)
- p1994: 750
- p0373: 0.5
- p3156: 3.07307e-5; = p2375*p1082
- p3028: 0; = p2247*p1023
- p0111: 15.691
- p0591: 0; = IF(p0327<0.5;-SQRT(p0007*EXP(p0459^2*p0008)-p0007);SQRT(p0007*EXP(p0459^2*p0008)-p0007))
- p0908: 0.0022
- p3231: 2.21557e-7; = p1176/p0818
- p0048: 4.52
- p2327: 0.00135265; = p2224*p2195
- p3389: 0; = p3370*p1234
- p2042: 0.07
- p4425: 2.88644e-8; = p1870*p3480
- p2986: 0; = p2400*(p1020+p1022)
- p0519: 0; = SQRT(2)*(IF((2*p0387-1)<0;-1;IF((2*p0387-1)>0;1;0))*SQRT(SQRT((2/(pi()*0.140012289)+LN(1-(2*p0387-1)^2)/2)^2-LN(1-(2*p0387-1)^2)/0.140012289)-(2/(pi()*0.140012289)+LN(1-(2*p0387-1)^2)/2)))
- p1277: 0
- p1327a: 0.496436; = (p0745*1000/p0801)*(1-(p0746+p0747+p0748+p0749+p0750+p0751+p0752+p0753)/100)+(p0754*1000/p0801)*(1-(p0755+p0756+p0757+p0758+p0759+p0760+p0761+p0762)/100)
- p3218: 0.029305; = p3214*p1228
- p3478: 0.18749; = if(p1328+p1330+p1332+p1334+p1336+p1338+p1340+p1342+p1344=0;0;p1332/(p1328+p1330+p1332+p1334+p1336+p1338+p1340+p1342+p1344))
- p2978: 0.000341933; = p2392*(p1129+p1131)
- p4953: 3.02455e-6; = p1780*p3483
- p0899: 1.04119e9; = p0825*p0896+p0827*p0897+(p0830+p0895)*p0824*p0898
- p2245: 0.000547265; = p2222*p2190
- p1789: 0
- p2791: 0; = p2400*(p1019+p1021)
- p1700: 0
- p2279: 0.000728366; = p2223*p2185
- p1178: 2.21557e-7; = p1176/p0818
- p1987: 400
- p0622: 0; = IF(p0358<0.5;-SQRT(p0007*EXP(p0490^2*p0008)-p0007);SQRT(p0007*EXP(p0490^2*p0008)-p0007))
- p2930: 0; = p2344*(p1079+p1081)
- p3151: 0; = p2370*p1023

- p3958: 2.16762e-5; = p1815*p3478
- p1736: 0
- p2462: 8.45381e-6; = p2266*p1073
- p2288: 0.00178832; = p2223*p2195
- p3437: 0; = p3380*p1239
- p3938: 5.20228e-6; = p1795*p3478
- p0788: 57.832; = p0128*(1+p0656*p0260/100)
- p1038: 0.00785902
- p0707: 10.194; = p0047*(1+p0575*p0179/100)
- p2828: 2.87775e-5; = p2242*(p1020+p1022)
- p0969: 3.79624e6; = p0966*p0683*p0682*1000
- p1230: 0.5
- p4146: 9.82485e-7; = p1797*p3479
- p2470: 0.00018344; = p2274*p1123
- p5251: 0.000234861; = p1872*p3484
- p1389: 18
- p2120: 0.51828
- p0536: 0; = SQRT(2)*(IF((2*p0404-1)<0;-1;IF((2*p0404-1)>0;1;0))*SQRT(SQRT((2/(pi()*0.140012289)+LN(1-(2*p0404-1)^2)/2)^2-LN(1-(2*p0404-1)^2)/0.140012289)-(2/(pi()*0.140012289)+LN(1-(2*p0404-1)^2)/2)))
- p2534: 0; = p2338*p1073
- p1133: 78001.5; = if(p1121=0;p1123*(p0716/100)*p0703*1000;0)
- p2426: 0; = p2235*p2216
- p5074: 3.20246e-6; = p1901*p3483
- p1258: 0; = if(p1232>0;0;IF(p1253+p1256+p1257=1;0;1-(p1253+p1256+p1257)))
- p3025: 0; = p2244*p1023
- p0559: 0; = IF(p0295<0.5;-SQRT(p0007*EXP(p0427^2*p0008)-p0007);SQRT(p0007*EXP(p0427^2*p0008)-p0007))
- p3431: 0; = p3374*p1239
- p3022: 0; = p2241*p1023
- p3333: 0; = if(and(p1232=0;p3255<>0);p3255-(p3328+p3329+p3330+p3331+p3332);0)
- p1645: 0
- p0422: 0; = SQRT(2)*(IF((2*p0290-1)<0;-1;IF((2*p0290-1)>0;1;0))*SQRT(SQRT((2/(pi()*0.140012289)+LN(1-(2*p0290-1)^2)/2)^2-LN(1-(2*p0290-1)^2)/0.140012289)-(2/(pi()*0.140012289)+LN(1-(2*p0290-1)^2)/2)))
- p2777: 0.000176908; = p2386*(p1078+p1080)
- p2863: 0.000347183; = p2277*(p1020+p1022)
- p1823: 2.08102e-5; = p1415*1000/p0818
- p3067: 0; = p2286*p1023
- p1938: 0
- p2565: 2.72061e-5; = p2369*p1014
- p0845: 0.5
- p2194: 0.214362
- p2488: 3.01525e-5; = p2292*p1014
- p0045: 54.69
- p5028: 2.60645e-5; = p1855*p3483
- p0346: 0.5
- p1042: 0.000567816
- p1840: 0
- p1154: 0.0794266; = if(p1152*p0818=0;0;p1150/(p1152*p0818))
- p1770: 0
- p3802: 6.21408e-6; = p1865*p3477
- p0572: 0; = IF(p0308<0.5;-SQRT(p0007*EXP(p0440^2*p0008)-p0007);SQRT(p0007*EXP(p0440^2*p0008)-p0007))
- p2953: 0.00533386; = p2367*(p1020+p1022)
- p2188: 0.0140284; = p1066-p2186-p2187
- p1117: 0.00483748; = IF(p1071=0;p1107/(p1112*p0818);0)
- p1139: 0.000160912; = if(p1121=0;p1133*p0001/(p0818*p0002);0)
- p0222: 21.36
- p5302: 8.21976e-7; = p1923*p3484
- p3381: 0; = p3362*p1234
- p0964: 0; = 56/90000
- p0717: 28.278; = p0057*(1+p0585*p0189/100)
- p2776: 4.68794e-5; = p2385*(p1078+p1080)
- p3146: 0; = p2365*p1023
- p0515: 0; = SQRT(2)*(IF((2*p0383-1)<0;-1;IF((2*p0383-1)>0;1;0))*SQRT(SQRT((2/(pi()*0.140012289)+LN(1-(2*p0383-1)^2)/2)^2-LN(1-(2*p0383-1)^2)/0.140012289)-(2/(pi()*0.140012289)+LN(1-(2*p0383-1)^2)/2)))
- p2249: 0.00139463; = p2222*p2195
- p1346: 32
- p0851: 0
- p2098: 0.856281
- p0727: 0
- p0615: 0; = IF(p0351<0.5;-SQRT(p0007*EXP(p0483^2*p0008)-p0007);SQRT(p0007*EXP(p0483^2*p0008)-p0007))
- p2744: 0; = p2353*(p1128+p1130)
- p0344: 0.5
- p2543: 0; = p2347*p1073
- p1123: 0.28278; = if(p1121=0;p0717/100;0)
- p1134: 101130; = if(p1121=0;p1128*(p0716/100)*p0703*1000;0)
- p0386: 0.5
- p2713: 0.00013958; = p2322*(p1019+p1021)
- p0632: 0; = IF(p0368<0.5;-SQRT(p0007*EXP(p0500^2*p0008)-p0007);SQRT(p0007*EXP(p0500^2*p0008)-p0007))
- p1058: 0.225
- p3305: 0; = if(and(p1232=0;p3252<>0);1-(p3301+p3302+p3303+p3304);0)
- p3254: 0; = p1252*(p1287*(1-p3247)+p1290*(1-p3248)+p1291*(1-p3249)+p1292*(1-p3250))
- p1300: 0; = IF(p1297=p1265;0;IF(p1297+p1298>p1265;p1265-p1297;p1298))
- p1564: 0.822
- p2211: 0.0104072; = p1120-p2209-p2208-p2210
- p2796: 0; = p2405*(p1019+p1021)
- p0729: 0
- p1972: 0.000943795; = if(p0807=480;p1967*p0001/(p0818*p0002);0)
- p3048: 1.07473e-5; = p2267*p1082
- p3552: 3.09957e-6; = p1821*p3476
- p3234: 0.39606; = 1-p3233
- p1862: 0
- p0160: 58.215
- p0357: 0.5
- p1099: 0.624059
- p2650: 0.00137905; = p2259*(p1078+p1080)
- p1969: 0; = p0803
- p3297: 0; = if(p1273+p1274+p1275+p1276=0;0;p1273/(p1273+p1274+p1275+p1276))
- p1186: 1.13642e-7; = p1182*p1185/p0818
- p1415: 9
- p0418: 0; = SQRT(2)*(IF((2*p0286-1)<0;-1;IF((2*p0286-1)>0;1;0))*SQRT(SQRT((2/(pi()*0.140012289)+LN(1-(2*p0286-1)^2)/2)^2-LN(1-(2*p0286-1)^2)/0.140012289)-(2/(pi()*0.140012289)+LN(1-(2*p0286-1)^2)/2)))
- p3186: 0; = p2405*p1023
- p0801: 615000
- p3816: 4.97126e-6; = p1879*p3477
- p2443: 0.000609102; = p2247*p1014
- p4951: 3.55829e-7; = p1778*p3483
- p3826: 0.000130496; = p1889*p3477
- p2919: 0.000278193; = p2333*(p1020+p1022)
- p2036: 8.77938e-5; = p2015*p2030*(1-p2032)/(p0818*1000)
- p2725: 7.92342e-5; = p2334*(p1019+p1021)
- p0943: 0; = if(and(p0683=0;p0949=0);p0937;0)
- p1073: 0.22669; = IF(p1071=0;p0711/100;0)
- p0721: 0
- p3143: 0; = p2362*p1023
- p2494: 0.000847705; = p2298*p1073
- p0820: 0.600863; = if(p0807=480;p0814;0)
- p5263: 2.24175e-7; = p1884*p3484
- p2941: 0.000688729; = p2355*(p1020+p1022)
- p2017: 3.52126e6; = p2015*p0898
- p0646: 0; = IF(p0382<0.5;-SQRT(p0007*EXP(p0514^2*p0008)-p0007);SQRT(p0007*EXP(p0514^2*p0008)-p0007))
- p4926: 0; = p1963*p3482
- p0906: 0.0041
- p2950: 0.00043091; = p2364*(p1020+p1022)
- p1464: 3143
- p3054: 0.000247526; = p2273*p1132
- p5096: 9.7853e-7; = p1923*p3483
- p2824: 0.000270752; = p2238*(p1020+p1022)
- p1244: 0; = if(p1232>0;0;p1239*(p0725/100)*p0723*1000)
- p2545: 0; = p2349*p1073
- p2961: 0.000404505; = p2375*(p1079+p1081)
- p2054: 0.91
- p1824: 0.000446263; = p1416*1000/p0818
- p1865: 1.15612e-5; = p1457*1000/p0818
- p2049: 25.6942
- p0342: 0.5
- p0377: 0.5
- p4988: 4.44786e-6; = p1815*p3483
- p5098: 2.66872e-7; = p1925*p3483
- p0586: 0; = IF(p0322<0.5;-SQRT(p0007*EXP(p0454^2*p0008)-p0007);SQRT(p0007*EXP(p0454^2*p0008)-p0007))
- p1302: 0; = IF(p1297+p1300+p1301=p1262;0;p1262-(p1297+p1300+p1301))
- p3296: 0
- p0508: 0; = SQRT(2)*(IF((2*p0376-1)<0;-1;IF((2*p0376-1)>0;1;0))*SQRT(SQRT((2/(pi()*0.140012289)+LN(1-(2*p0376-1)^2)/2)^2-LN(1-(2*p0376-1)^2)/0.140012289)-(2/(pi()*0.140012289)+LN(1-(2*p0376-1)^2)/2)))
- p3405: 0; = p3367*p1238
- p2819: 0; = p2428*(p1128+p1130)
- p0423: 0; = SQRT(2)*(IF((2*p0291-1)<0;-1;IF((2*p0291-1)>0;1;0))*SQRT(SQRT((2/(pi()*0.140012289)+LN(1-(2*p0291-1)^2)/2)^2-LN(1-(2*p0291-1)^2)/0.140012289)-(2/(pi()*0.140012289)+LN(1-(2*p0291-1)^2)/2)))
- p0274: 0.5
- p2896: 0.000569137; = p2310*(p1079+p1081)
- p1923: 2.54347e-5; = p1515*1000/p0818
- p4909: 0; = p1942*p3482
- p2172: 0.677797; = p2166-(p2167+p2168+p2169+p2170)
- p1235: 0; = if(p1232>0;0;p0727/100)
- p2561: 0.00905098; = p2365*p1014
- p2034: 7.15086e-5; = p2015*p2030*p2032/(p0818*1000)
- p0658: 0; = IF(p0394<0.5;-SQRT(p0007*EXP(p0526^2*p0008)-p0007);SQRT(p0007*EXP(p0526^2*p0008)-p0007))
- p3395: 0; = p3376*p1234
- p0480: 0; = SQRT(2)*(IF((2*p0348-1)<0;-1;IF((2*p0348-1)>0;1;0))*SQRT(SQRT((2/(pi()*0.140012289)+LN(1-(2*p0348-1)^2)/2)^2-LN(1-(2*p0348-1)^2)/0.140012289)-(2/(pi()*0.140012289)+LN(1-(2*p0348-1)^2)/2)))
- p3451: 0; = p3375*p1240
- p2970: 3.96198e-5; = p2384*(p1079+p1081)
- p1720: 0
- p0672: 372.742; = p0012*(1+p0540*p0144/100)
- p2457: 0.00219472; = p2261*p1073
- p0816: 0
- p2009: 0.034763; = ((p1983*p1985+p1989*p1991+p1995*p1997+p2003*p2005+p1976*p1977+p1978*p1979+p1998*p1999)/p0818)*p0005*p0002/1000
- p1725: 0
- p1730: 0
- p0505: 0; = SQRT(2)*(IF((2*p0373-1)<0;-1;IF((2*p0373-1)>0;1;0))*SQRT(SQRT((2/(pi()*0.140012289)+LN(1-(2*p0373-1)^2)/2)^2-LN(1-(2*p0373-1)^2)/0.140012289)-(2/(pi()*0.140012289)+LN(1-(2*p0373-1)^2)/2)))
- p0154: 0
- p3118: 0; = p2337*p1082
- p1092: 0; = IF(p1071=0;p1086*p0001/(p0818*p0002);0)
- p2342: 0; = p2228*p2210
- p2199: 0.000249203; = p1069-p2197-p2198
- p2447: 6.51616e-6; = p2251*p1014
- p3213: 0.112803; = p1222*12.0107/100.0869
- p0440: 0; = SQRT(2)*(IF((2*p0308-1)<0;-1;IF((2*p0308-1)>0;1;0))*SQRT(SQRT((2/(pi()*0.140012289)+LN(1-(2*p0308-1)^2)/2)^2-LN(1-(2*p0308-1)^2)/0.140012289)-(2/(pi()*0.140012289)+LN(1-(2*p0308-1)^2)/2)))
- p0478: 0; = SQRT(2)*(IF((2*p0346-1)<0;-1;IF((2*p0346-1)>0;1;0))*SQRT(SQRT((2/(pi()*0.140012289)+LN(1-(2*p0346-1)^2)/2)^2-LN(1-(2*p0346-1)^2)/0.140012289)-(2/(pi()*0.140012289)+LN(1-(2*p0346-1)^2)/2)))
- p3166: 3.37354e-6; = p2385*p1082
- p2200: 0.025494; = p1056/p0818
- p2088: 0.798875
- p3825: 0.000842629; = p1888*p3477
- p1165: 0.00126871; = p0801*p0001/(p0818*p0002)
- p4103: 1.74664e-6; = p1754*p3479
- p3949: 4.33523e-6; = p1806*p3478
- p0438: 0; = SQRT(2)*(IF((2*p0306-1)<0;-1;IF((2*p0306-1)>0;1;0))*SQRT(SQRT((2/(pi()*0.140012289)+LN(1-(2*p0306-1)^2)/2)^2-LN(1-(2*p0306-1)^2)/0.140012289)-(2/(pi()*0.140012289)+LN(1-(2*p0306-1)^2)/2)))
- p3366: 0; = if(p1232=0;p3244*p3360/p0818;0)
- p2235: 0; = 1-(p2226+p2227+p2228+p2229)
- p0961: 0; = if(and(p0683>0;or(p0807=480;p0807=32;p0807=1;and(p0807=60;p0901<0.03)));p0937;0)
- p2340: 0; = p2228*p2208
- p0736: 0
- p1202: 0.7
- p2817: 0; = p2426*(p1078+p1080)
- p5304: 2.24175e-7; = p1925*p3484
- p2185: 0.00329221; = p1065-p2184
- p0916: 0.803787; = p0826+p0828+p0829+(p0832*(1+p0894))/p0818
- p2869: 9.32496e-5; = p2283*(p1020+p1022)
- p0760: 0
- p0932: 0; = p0801*p0926
- p2159: 3.20963e-5; = p2015*p2083*p2121/(p0818*1000)
- p2852: 1.35286e-5; = p2266*(p1079+p1081)
- p2135: 1.44736e-5; = p2015*p2063*p2097/(p0818*1000)
- p0552: 0; = IF(p0288<0.5;-SQRT(p0007*EXP(p0420^2*p0008)-p0007);SQRT(p0007*EXP(p0420^2*p0008)-p0007))
- p1590: 0
- p1345: 0.000629833; = IF(p1318=0;p1344*p0001/(p0818*p0002);0)
- p1710: 0
- p3232: 2.27284e-7; = p1182/p0818
- p0256: 8.738
- p1690: 0.624955
- p0797: 55.394; = p0137*(1+p0665*p0269/100)
- p3094: 5.19667e-5; = p2313*p1132
- p2092: 0.54529
- p3283: 0
- p3247: 0
- p1106: 37394.4; = IF(p1071=0;p1105*p1096*p1095;0)
- p2914: 0.00203372; = p2328*(p1020+p1022)
- p0610: 0; = IF(p0346<0.5;-SQRT(p0007*EXP(p0478^2*p0008)-p0007);SQRT(p0007*EXP(p0478^2*p0008)-p0007))
- p1325: 0; = IF(((p0745*1000*p0752/100)+(p0754*1000*p0761/100))/p0801<0;0;((p0745*1000*p0752/100)+(p0754*1000*p0761/100))/p0801)
- p1974: 0; = p1969*p0001/(p0818*p0002)
- p1307: 0
- p3019: 0; = p2238*p1023
- p3342: 0; = if(and(p1232=0;p3254<>0);p3254*(p3272-p3337)/p3338;0)
- p1064: 0.0573185; = IF(p1012=0;p1050/(p1057*p0818);0)
- p2880: 0.000367796; = p2294*(p1020+p1022)
- p4457: 1.90505e-7; = p1902*p3480
- p2680: 0.00532094; = p2289*(p1019+p1021)
- p0351: 0.5
- p1656: 0
- p1794: 0
- p0887: 245.072; = 1000*p0886*p0001*p0003*p0004/(p0818*p0002)
- p2715: 4.01776e-5; = p2324*(p1019+p1021)
- p2394: 0; = p2234*p2183
- p3286: 0
- p1673: 0
- p0890: 4297.1; = p0686*1000*p0687*p0885/100
- p1326: 0.590988; = IF(((p0745*1000*p0753/100)+(p0754*1000*p0762/100))/p0801<0;0;((p0745*1000*p0753/100)+(p0754*1000*p0762/100))/p0801)
- p0962: 0; = if(and(p0683>0;or(p0807=480;p0807=32;p0807=1;and(p0807=60;p0901<0.03)));p0938;0)
- p5334: 5.45493e-6; = p1955*p3484
- p2414: 0; = p2235*p2204
- p0580: 0; = IF(p0316<0.5;-SQRT(p0007*EXP(p0448^2*p0008)-p0007);SQRT(p0007*EXP(p0448^2*p0008)-p0007))
- p4164: 2.72912e-6; = p1815*p3479
- p1023: 0; = IF(p1012=0;IF(p1014+p1019+p1020+p1021+p1022=1;0;1-(p1014+p1019+p1020+p1021+p1022));0)
- p1644: 0
- p1989: 50
- p1004: 0; = p1000*p0888
- p3428: 0; = p3371*p1239
- p4548: 8.77141e-7; = p1787*p3481
- p4181: 1.3591e-5; = p1832*p3479
- p0643: 0; = IF(p0379<0.5;-SQRT(p0007*EXP(p0511^2*p0008)-p0007);SQRT(p0007*EXP(p0511^2*p0008)-p0007))
- p0626: 0; = IF(p0362<0.5;-SQRT(p0007*EXP(p0494^2*p0008)-p0007);SQRT(p0007*EXP(p0494^2*p0008)-p0007))
- p0902: 0.0377084
- p0666: 0; = IF(p0402<0.5;-SQRT(p0007*EXP(p0534^2*p0008)-p0007);SQRT(p0007*EXP(p0534^2*p0008)-p0007))
- p1485: 69
- p3280: 0
- p2335: 0.0030178; = p2224*p2203
- p1871: 0
- p2630: 4.96376e-5; = p2239*(p1019+p1021)
- p4420: 2.88644e-8; = p1865*p3480
- p1649: 0
- p2983: 0; = p2397*(p1020+p1022)
- p0992: 1.23935e-5; = p0988*p0001*p0004/(p0818*p0002)
- p0873: 1.49879; = p0872*p0001*p0003/(p0818*p0002)
- p3217: 0.00878222; = p3213*p1228
- p3081: 0.000277098; = p2300*p1082
- p3353: 0; = if(and(p1232=0;p3256<>0);p3256*(p3276-p3348)/p3349;0)
- p0538: 0; = IF(p0274<0.5;-SQRT(p0007*EXP(p0406^2*p0008)-p0007);SQRT(p0007*EXP(p0406^2*p0008)-p0007))
- p2664: 0.00343102; = p2273*(p1128+p1130)
- p2952: 0.00053959; = p2366*(p1020+p1022)
- p2180: 2.16047e-7; = p3233*p1188/(p0818)
- p0690: 78.053; = p0030*(1+p0558*p0162/100)
- p3002: 0; = p2416*(p1079+p1081)
- p3209: 0; = p2428*p1132
- p0369: 0.5
- p0308: 0.5
- p4716: 4.92549e-6; = p1955*p3481
- p2080: 0.025
- p1213: 4
- p3596: 1.72199e-6; = p1865*p3476
- p0818: 4.3248e8; = p0806*p0807
- p2933: 0; = p2347*(p1079+p1081)
- p3058: 0; = p2277*p1023
- p3761: 0.000239863; = p1824*p3477
- p2648: 0.00093655; = p2257*(p1019+p1021)
- p4568: 6.74724e-8; = p1807*p3481
- p2963: 0.00011847; = p2377*(p1079+p1081)
- p2141: 3.12335e-6; = p2015*p2069*p2103/(p0818*1000)
- p1372: 34
- p4582: 6.07252e-7; = p1821*p3481
- p2781: 0.0032107; = p2390*(p1128+p1130)
- p0212: 1.387
- p0676: 0
- p3134: 0; = p2353*p1132
- p2419: 0; = p2235*p2209
- p2104: 0.817136
- p2038: 0.304457
- p1776: 0
- p2940: 0.00313754; = p2354*(p1020+p1022)
- p1782: 0
- p2752: 0.000366079; = p2361*(p1019+p1021)
- p2626: 0; = p2430*p1123
- p5310: 2.24175e-7; = p1931*p3484
- p1829: 0
- p1291: 0; = IF(p1287+p1290=p1264;0;IF(p1287+p1290+p1289>p1264;p1264-(p1287+p1290);p1289))
- p1239: 0; = if(p1232>0;0;IF(p1234+p1238=1;0;IF(p1234+p1238+p1236>1;1-(p1234+p1238);p1236)))
- p2530: 0.000143964; = p2334*p1014
- p2437: 0.000718957; = p2241*p1014
- p0551: 0; = IF(p0287<0.5;-SQRT(p0007*EXP(p0419^2*p0008)-p0007);SQRT(p0007*EXP(p0419^2*p0008)-p0007))
- p0834: 22
- p0446: 0; = SQRT(2)*(IF((2*p0314-1)<0;-1;IF((2*p0314-1)>0;1;0))*SQRT(SQRT((2/(pi()*0.140012289)+LN(1-(2*p0314-1)^2)/2)^2-LN(1-(2*p0314-1)^2)/0.140012289)-(2/(pi()*0.140012289)+LN(1-(2*p0314-1)^2)/2)))
- p3137: 0; = p2356*p1023
- p3017: 0; = p2431*(p1129+p1131)
- p1753: 0.92568
- p2283: 0.000613081; = p2223*p2189
- p2498: 0.00018689; = p2302*p1073
- p2438: 0.000103474; = p2242*p1014
- p0846: 0.428161; = p0841*p0845^3+p0842*p0845^2+p0843*p0845+p0844
- p1796: 0
- p2441: 0.000299299; = p2245*p1014
- p1613: 0
- p4866: 0; = p1899*p3482
- p3204: 0; = p2423*p1082
- p1743: 0
- p3294: 0
- p1129: 0.32414; = if(p1121=0;IF(p1123+p1128=1;0;IF(p1123+p1128+p1125>1;1-(p1123+p1128);p1125));0)
- p3053: 0.000175649; = p2272*p1132
- p4583: 2.6989e-7; = p1822*p3481
- p2209: 0.00184062; = 14.0067*p2208/30.973762
- p3110: 0; = p2329*p1023
- p2113: 0.832356
- p0181: 35.844
- p1414: 4
- p1775: 0
- p0474: 0; = SQRT(2)*(IF((2*p0342-1)<0;-1;IF((2*p0342-1)>0;1;0))*SQRT(SQRT((2/(pi()*0.140012289)+LN(1-(2*p0342-1)^2)/2)^2-LN(1-(2*p0342-1)^2)/0.140012289)-(2/(pi()*0.140012289)+LN(1-(2*p0342-1)^2)/2)))
- p5052: 3.55829e-7; = p1879*p3483
- p2733: 0; = p2342*(p1078+p1080)
- p3090: 4.82433e-6; = p2309*p1082
- p3947: 8.67047e-7; = p1804*p3478
- p2220: 0.00322047; = p1151/p0818
- p1790: 0
- p4252: 3.87536e-6; = p1903*p3479
- p0273: 0.5
- p0047: 10.194
- p4260: 5.13075e-6; = p1911*p3479
- p2321: 0.00234753; = p2224*p2188
- p0372: 0.5
- p0892: 0; = if(p0891=0;0;(1-p1240)*p3251/p0891)
- p0982: 0.505709; = if(p0886=0;0;min(1;(p0691*p0690*1000*p0693/100)/p0886))
- p1308: 0
- p3252: 0; = p1252*(p1267*(1-p3247)+p1270*(1-p3248)+p1271*(1-p3249)+p1272*(1-p3250))
- p0501: 0; = SQRT(2)*(IF((2*p0369-1)<0;-1;IF((2*p0369-1)>0;1;0))*SQRT(SQRT((2/(pi()*0.140012289)+LN(1-(2*p0369-1)^2)/2)^2-LN(1-(2*p0369-1)^2)/0.140012289)-(2/(pi()*0.140012289)+LN(1-(2*p0369-1)^2)/2)))
- p3035: 0; = p2254*p1023
- p1975: 0.00126871; = p1970*p0001/(p0818*p0002)
- p0033: 67.959
- p1617: 0.49725
- p4317: 7.447e-7; = p1762*p3480
- p2310: 0.00156886; = p2227*p2217
- p0126: 52.548
- p2889: 0.000129132; = p2303*(p1079+p1081)
- p3072: 0; = p2291*p1023
- p3142: 0; = p2361*p1023
- p0963: 0.00126871; = if(and(p0683>0;or(p0807=480;p0807=32;p0807=1;and(p0807=60;p0901<0.03)));p0939;0)
- p0485: 0; = SQRT(2)*(IF((2*p0353-1)<0;-1;IF((2*p0353-1)>0;1;0))*SQRT(SQRT((2/(pi()*0.140012289)+LN(1-(2*p0353-1)^2)/2)^2-LN(1-(2*p0353-1)^2)/0.140012289)-(2/(pi()*0.140012289)+LN(1-(2*p0353-1)^2)/2)))
- p0696: 0
- p3095: 9.03045e-5; = p2314*p1132
- p3173: 2.79019e-5; = p2392*p1132
- p2057: 3.28794
- p0499: 0; = SQRT(2)*(IF((2*p0367-1)<0;-1;IF((2*p0367-1)>0;1;0))*SQRT(SQRT((2/(pi()*0.140012289)+LN(1-(2*p0367-1)^2)/2)^2-LN(1-(2*p0367-1)^2)/0.140012289)-(2/(pi()*0.140012289)+LN(1-(2*p0367-1)^2)/2)))
- p2031: 0.465411
- p3911: 4.16182e-5; = p1768*p3478
- p3316: 0; = if(and(p1232=0;p3253<>0);1-(p3312+p3313+p3314+p3315);0)
- p2397: 0; = p2234*p2186
- p0095: 3.593
- p1751: 0.791173
- p2146: 3.71129e-7; = p2015*p2074*p2108/(p0818*1000)
- p0570: 0; = IF(p0306<0.5;-SQRT(p0007*EXP(p0438^2*p0008)-p0007);SQRT(p0007*EXP(p0438^2*p0008)-p0007))
- p0743: 7.07; = p0083*(1+p0611*p0215/100)
- p3715: 4.97126e-6; = p1778*p3477
- p2755: 0.000852755; = p2364*(p1019+p1021)
- p4506: 1.38549e-6; = p1951*p3480
- p1860: 0
- p1904: 0
- p1344: 305308; = IF(p1318=0;p1327*p0801;0)
- p2662: 0.000578568; = p2271*(p1078+p1080)
- p1217: 48.8293
- p2368: 3.03082e-5; = p2225*p2197
- p2461: 0.00101753; = p2265*p1073
- p1276: 0; = p1272*p1252/p0818
- p2244: 0.000478115; = p2222*p2189
- p4664: 4.79054e-6; = p1903*p3481
- p0975: 0.00639942; = p0973*p0974/p0818
- p3862: 3.72845e-6; = p1925*p3477
- p4443: 3.91401e-6; = p1888*p3480
- p1726: 0.686898
- p5249: 3.73626e-7; = p1870*p3484
- p1243: 0; = if(p1232>0;0;p1238*(p0725/100)*p0723*1000)
- p0761: 0
- p3346: 0; = if(and(p1232=0;p3256<>0);p3274*(p3281*(p3285*p1256+p3286*(p1253+p1257)+p1258*p3288));0)
- p0839: 1.51864; = p0838/p0818
- p0637: 0; = IF(p0373<0.5;-SQRT(p0007*EXP(p0505^2*p0008)-p0007);SQRT(p0007*EXP(p0505^2*p0008)-p0007))
- p3226: 0.00189566; = p3222*p1229
- p4434: 2.30915e-8; = p1879*p3480
- p2286: 0.00142813; = p2223*p2192
- p1151: 1.39279e6; = if(p1121=0;p1149*p1148*p1145;0)
- p1706: 0
- p4684: 7.42197e-7; = p1923*p3481
- p2870: 0.000106736; = p2284*(p1020+p1022)
- p2603: 0; = p2407*p1014
- p2319: 0.00127503; = p2224*p2186
- p4977: 1.77915e-7; = p1804*p3483
- p0399: 0.5
- p0388: 0.5
- p1180: 1.10779e-7; = p1176*p1179/p0818
- p1272: 0; = IF(p1267+p1270+p1271=p1259;0;p1259-(p1267+p1270+p1271))
- p1870: 1.15612e-5; = p1462*1000/p0818
- p1102: 0.0264207; = IF(p1071=0;IF(p1096+p1101=1;0;IF(p1096+p1101+p1098>1;1-(p1096+p1101);p1098));0)
- p1053: 1.19846e6; = IF(p1012=0;p1046*p1036;0)
- p2275: 0.00112728; = p2230*p2221
- p0182: 16.995
- p2163: 0.00626927; = (p2017-p2020)/p0818-(p2025+p2028+p2033+p2034+p2051+p2125+p2126+p2127+p2128+p2129+p2130+p2131+p2132+p2133+p2134+p2135+p2136+p2137+p2138+p2139+p2140+p2141+p2142+p2143+p2144+p2145+p2146+p2147+p2148+p2149+p2150+p2151+p2152+p2153+p2154+p2155+p2156+p2157)
- p1671: 0
- p2085: 0.0335294
- p0475: 0; = SQRT(2)*(IF((2*p0343-1)<0;-1;IF((2*p0343-1)>0;1;0))*SQRT(SQRT((2/(pi()*0.140012289)+LN(1-(2*p0343-1)^2)/2)^2-LN(1-(2*p0343-1)^2)/0.140012289)-(2/(pi()*0.140012289)+LN(1-(2*p0343-1)^2)/2)))
- p3424: 0; = p3367*p1239
- p0109: 18.639
- p2742: 0; = p2351*(p1128+p1130)
- p1297: 0
- p1197: 1.806
- p0316: 0.5
- p0703: 615.284; = p0043*(1+p0571*p0175/100)
- p1685: 0.491852
- p2473: 0.00124835; = p2277*p1014
- p0027: 4.863
- p2634: 0.000728536; = p2243*(p1019+p1021)
- p0228: 4.48
- p4098: 3.16472e-5; = p1955*p3478
- p1577: 0
- p4376: 5.19558e-8; = p1821*p3480
- p2395: 0; = p2234*p2184
- p3014: 0; = p2428*(p1129+p1131)
- p3065: 0; = p2284*p1023
- p0718: 36.663; = p0058*(1+p0586*p0190/100)
- p1098: 0.0264207
- p1963d: 0.000362174; = p1608*p1812+p1609*p1813+p1610*p1814+p1611*p1815+p1612*p1816+p1613*p1817+p1614*p1818+p1615*p1819+p1616*p1820+p1617*p1821+p1618*p1822+p1619*p1823+p1620*p1824+p1621*p1825+p1622*p1826+p1623*p1827+p1624*p1828+p1625*p1829+p1626*p1830+p1627*p1831
- p3356: 0; = if(p1232=0;p3306+p3317+p3328+p3339+p3350;0)
- p0781: 17.907; = p0121*(1+p0649*p0253/100)
- p0258: 37.94
- p3181: 0; = p2400*p1023
- p2016: 0.00288731; = (p2014-p2015)/(p0818)
- p2195: 0.00808319; = p2194*p2193
- p1898: 0
- p2920: 4.00383e-5; = p2334*(p1020+p1022)
- p1065: 0.00424802; = IF(p1012=0;p1051/(p1058*p0818);0)
- p1189: 0.00126871; = p0801*p0001/(p0818*p0002)
- p1574: 0.91928
- p1237: 0; = if(p1232>0;0;p0729/100)
- p0800: 44.831; = p0140*(1+p0668*p0272/100)
- p2078: 0.117
- p3338: 0; = if(and(p1232=0;p3254<>0);1-(p3334+p3335+p3336+p3337);0)
- p1983: 50
- p0375: 0.5
- p2957: 0.00170184; = p2371*(p1020+p1022)
- p2536: 0; = p2340*p1073
- p5115: 2.04602e-6; = p1942*p3483
- p0638: 0; = IF(p0374<0.5;-SQRT(p0007*EXP(p0506^2*p0008)-p0007);SQRT(p0007*EXP(p0506^2*p0008)-p0007))
- p3831: 0.000395215; = p1894*p3477
- p4022: 1.73409e-6; = p1879*p3478
- p3448: 0; = p3372*p1240
- p2936: 0; = p2350*(p1129+p1131)
- p3092: 0.000531983; = p2311*p1132
- p1932: 0
- p1321: 2.88011; = IF(((p0745*1000*p0748/100)+(p0754*1000*p0757/100))/p0801<0;0;((p0745*1000*p0748/100)+(p0754*1000*p0757/100))/p0801)
- p3087: 1.11611e-5; = p2306*p1082
- p0081: 3.086
- p4890: 0; = p1923*p3482
- p0904: 5.04071e7; = p0825*p0901+(p0830+p0895)*p0824*p0903
- p3298: 0; = if(p1283+p1284+p1285+p1286=0;0;p1283/(p1283+p1284+p1285+p1286))
- p3205: 0; = p2424*p1082
- p1821: 2.08102e-5; = p1413*1000/p0818
- p2106: 0.856281
- p1079: 0.36277; = IF(p1071=0;IF(p1073+p1078=1;0;IF(p1073+p1078+p1075>1;1-(p1073+p1078);p1075));0)
- p1756: 0
- p1961: 0
- p2464: 9.90783e-5; = p2268*p1073
- p4997: 1.71688e-5; = p1824*p3483
- p2980: 0; = p2394*(p1020+p1022)
- p0502: 0; = SQRT(2)*(IF((2*p0370-1)<0;-1;IF((2*p0370-1)>0;1;0))*SQRT(SQRT((2/(pi()*0.140012289)+LN(1-(2*p0370-1)^2)/2)^2-LN(1-(2*p0370-1)^2)/0.140012289)-(2/(pi()*0.140012289)+LN(1-(2*p0370-1)^2)/2)))
- p2765: 0.00238236; = p2374*(p1019+p1021)
- p0888: 132370; = p0686*1000*p0687*p0884/100
- p0773: 43.008; = p0113*(1+p0641*p0245/100)
- p3673: 7.92113e-6; = p1942*p3476
- p2022: 0.00308688; = p2018*p2015/p0818-p2021
- p2596: 0; = p2400*p1014
- p0942: 0; = if(and(p0683=0;p0948=0);p0936;0)
- p2115: 0.856281
- p2891: 1.40494e-5; = p2305*(p1079+p1081)
- p2416: 0; = p2235*p2206
- p1702: 0
- p0191: 51.796
- p0176: 0.231
- p0868: 0; = IF(p0858+p0864+p0865+p0866+p0867=1;0;IF(p0858+p0864+p0865+p0866+p0867+p0863>1;1-(p0858+p0864+p0865+p0866+p0867);p0863))
- p1728: 0
- p2203: 0.0180339; = p1070-p2200-p2201-p2202
- p0445: 0; = SQRT(2)*(IF((2*p0313-1)<0;-1;IF((2*p0313-1)>0;1;0))*SQRT(SQRT((2/(pi()*0.140012289)+LN(1-(2*p0313-1)^2)/2)^2-LN(1-(2*p0313-1)^2)/0.140012289)-(2/(pi()*0.140012289)+LN(1-(2*p0313-1)^2)/2)))
- p1158: 0.0974779; = p1156*p1157
- p1787: 3.00592e-5; = p1379*1000/p0818
- p2474: 0.000115648; = p2278*p1014
- p2743: 0; = p2352*(p1128+p1130)
- p2770: 0.000188295; = p2379*(p1078+p1080)
- p3111: 0; = p2330*p1023
- p1091: 0.000198035; = IF(p1071=0;p1085*p0001/(p0818*p0002);0)
- p1866: 0
- p0110: 27.964
- p2516: 0.000100359; = p2320*p1014
- p2313: 0.00196471; = p2231*p2220
- p1126: 0; = if(p1121=0;p0720/100;0)
- p0500: 0; = SQRT(2)*(IF((2*p0368-1)<0;-1;IF((2*p0368-1)>0;1;0))*SQRT(SQRT((2/(pi()*0.140012289)+LN(1-(2*p0368-1)^2)/2)^2-LN(1-(2*p0368-1)^2)/0.140012289)-(2/(pi()*0.140012289)+LN(1-(2*p0368-1)^2)/2)))
- p3323: 0; = if(and(p1232=0;p3255<>0);p3265*p3277*(p3299*p3291+(1-p3299)*p3295);0)
- p3393: 0; = p3374*p1234
- p2137: 8.45491e-7; = p2015*p2065*p2099/(p0818*1000)
- p1955: 0.000168794; = p1547*1000/p0818
- p2915: 1.75768e-6; = p2329*(p1020+p1022)
- p2748: 0.000434917; = p2357*(p1019+p1021)
- p2168: 0.0225811; = p2166*(p0903)
- p2926: 0; = p2340*(p1079+p1081)
- p1959: 6646.25; = if(p0738*p0740*p0739>0;p0738*1000*(p0740/100)*p0739/1000;p1958)
- p1570: 0
- p3157: 2.77935e-5; = p2376*p1082
- p2588: 0.000298302; = p2392*p1123
- p0090: 0.724
- p0669: 6.835; = p0009*(1+p0537*p0141/100)
- p3068: 0; = p2287*p1023
- p0757: 11.347; = p0097*(1+p0625*p0229/100)
- p1820: 0
- p5185: 7.47251e-7; = p1806*p3484
- p0486: 0; = SQRT(2)*(IF((2*p0354-1)<0;-1;IF((2*p0354-1)>0;1;0))*SQRT(SQRT((2/(pi()*0.140012289)+LN(1-(2*p0354-1)^2)/2)^2-LN(1-(2*p0354-1)^2)/0.140012289)-(2/(pi()*0.140012289)+LN(1-(2*p0354-1)^2)/2)))
- p1786: 0
- p1863: 0
- p1021: 0.0452; = IF(p1012=0;IF(p1014+p1019+p1020=1;0;IF(p1014+p1019+p1020+p1017>1;1-(p1014+p1019+p1020);p1017));0)
- p1211: 0.6
- p0663: 0; = IF(p0399<0.5;-SQRT(p0007*EXP(p0531^2*p0008)-p0007);SQRT(p0007*EXP(p0531^2*p0008)-p0007))
- p4243: 1.73572e-5; = p1894*p3479
- p3452: 0; = p3376*p1240
- p0405: 0; = SQRT(2)*(IF((2*p0273-1)<0;-1;IF((2*p0273-1)>0;1;0))*SQRT(SQRT((2/(pi()*0.140012289)+LN(1-(2*p0273-1)^2)/2)^2-LN(1-(2*p0273-1)^2)/0.140012289)-(2/(pi()*0.140012289)+LN(1-(2*p0273-1)^2)/2)))
- p2805: 0; = p2414*(p1078+p1080)
- p0044: 99.775
- p0122: 44.831
- p3603: 0.00108244; = p1872*p3476
- p0459: 0; = SQRT(2)*(IF((2*p0327-1)<0;-1;IF((2*p0327-1)>0;1;0))*SQRT(SQRT((2/(pi()*0.140012289)+LN(1-(2*p0327-1)^2)/2)^2-LN(1-(2*p0327-1)^2)/0.140012289)-(2/(pi()*0.140012289)+LN(1-(2*p0327-1)^2)/2)))
- p4129: 1.8558e-6; = p1780*p3479
- p3206: 0; = p2425*p1082
- p1810: 0
- p0763: 615.284; = p0103*(1+p0631*p0235/100)
- p1704: 0
- p2334: 0.000263237; = p2224*p2202
- p0741: 3.086; = p0081*(1+p0609*p0213/100)
- p3442: 0; = p3366*p1240
- p0482: 0; = SQRT(2)*(IF((2*p0350-1)<0;-1;IF((2*p0350-1)>0;1;0))*SQRT(SQRT((2/(pi()*0.140012289)+LN(1-(2*p0350-1)^2)/2)^2-LN(1-(2*p0350-1)^2)/0.140012289)-(2/(pi()*0.140012289)+LN(1-(2*p0350-1)^2)/2)))
- p2787: 0; = p2396*(p1019+p1021)
- p0323: 0.5
- p0817: 0
- p1315: 0; = p1311*p1252/p0818
- p2420: 0; = p2235*p2210
- p0813: 1.56522; = if(p0807=480;1.56521739130435;0)
- p3412: 0; = p3374*p1238
- p0345: 0.5
- p4309: 1.84732e-7; = p1754*p3480
- p2475: 0.000398343; = p2279*p1014
- p2361: 0.00121621; = p2225*p2189
- p1595: 0
- p4280: 1.63747e-7; = p1931*p3479
- p2316: 0.00172651; = p2224*p2183
- p2350: 0; = p2232*p2218
- p1952: 0
- p2849: 0.00028799; = p2263*(p1079+p1081)
- p0123: 67.046
- p3285: 0
- p0387: 0.5
- p2077: 0.043
- p2673: 0.000934193; = p2282*(p1019+p1021)
- p0930: 0; = p0801*p0924
- p2661: 6.45545e-5; = p2270*(p1078+p1080)
- p3047: 1.02778e-6; = p2266*p1082
- p1250: 0; = if(p1232>0;0;p1245*p0001/(p0818*p0002))
- p2090: 0.40001
- p1185: 0.5
- p3628: 6.88794e-6; = p1897*p3476
- p2029: 6.19
- p4342: 7.50473e-8; = p1787*p3480
- p5282: 5.30548e-6; = p1903*p3484
- p5267: 5.06636e-5; = p1888*p3484
- p3459: 0; = p3364*p1241
- p1868: 0
- p3154: 0; = p2373*p1023
- p0709: 5.017; = p0049*(1+p0577*p0181/100)
- p2651: 0.000446573; = p2260*(p1078+p1080)
- p3318: 0; = if(and(p1232=0;p3253<>0);p3253*(p3262-p3313)/p3316;0)
- p2503: 0.000102893; = p2307*p1073
- p3237: 0.854735
- p3149: 0; = p2368*p1023
- p0577: 0; = IF(p0313<0.5;-SQRT(p0007*EXP(p0445^2*p0008)-p0007);SQRT(p0007*EXP(p0445^2*p0008)-p0007))
- p1259: 0; = if(p1232>0;0;p0730/100)
- p2690: 0.000463767; = p2299*(p1078+p1080)
- p4712: 1.61934e-5; = p1951*p3481
- p1040: 0.0227854
- p2867: 3.6901e-5; = p2281*(p1020+p1022)
- p0782: 44.831; = p0122*(1+p0650*p0254/100)
- p4357: 1.26426e-6; = p1802*p3480
- p2579: 2.36762e-6; = p2383*p1073
- p0006: 15
- p2959: 0.000105009; = p2373*(p1020+p1022)
- p0540: 0; = IF(p0276<0.5;-SQRT(p0007*EXP(p0408^2*p0008)-p0007);SQRT(p0007*EXP(p0408^2*p0008)-p0007))
- p4585: 1.30222e-5; = p1824*p3481
- p3772: 4.97126e-6; = p1835*p3477
- p1885: 0
- p1895: 0
- p0028: 21.902
- p3299: 0; = if(p1303+p1304+p1305+p1306=0;0;p1303/(p1303+p1304+p1305+p1306))
- p0579: 0; = IF(p0315<0.5;-SQRT(p0007*EXP(p0447^2*p0008)-p0007);SQRT(p0007*EXP(p0447^2*p0008)-p0007))
- p1651: 0.299611
- p2998: 0; = p2412*(p1020+p1022)
- p0539: 0; = IF(p0275<0.5;-SQRT(p0007*EXP(p0407^2*p0008)-p0007);SQRT(p0007*EXP(p0407^2*p0008)-p0007))
- p3809: 0.00390617; = p1872*p3477
- p0728: 0
- p1159: 0.5
- p2602: 0; = p2406*p1014
- p5244: 3.73626e-7; = p1865*p3484
- p0400: 0.5
- p0088: 32.812
- p4935: 1.14755e-5; = p1762*p3483
- p2761: 3.29209e-5; = p2370*(p1019+p1021)
- p1303: 0; = p1297*p1252/p0818
- p0278: 0.5
- p0227: 21.757
- p2274: 0.000648704; = p2230*p2220
- p2326: 0.00631011; = p2224*p2193
- p3046: 0.000123707; = p2265*p1082
- p1963e: 0.000545448; = p1628*p1832+p1629*p1833+p1630*p1834+p1631*p1835+p1632*p1836+p1633*p1837+p1634*p1838+p1635*p1839+p1636*p1840+p1637*p1841+p1638*p1842+p1639*p1843+p1640*p1844+p1641*p1845+p1642*p1846+p1643*p1847+p1644*p1848+p1645*p1849+p1646*p1850
- p1171: 0.00126871; = p0801*p0001/(p0818*p0002)
- p1215: 0.375; = IF(p1214=0;0;(p1214-1.5)/(p1214-1)^2)
- p2233: 0.188497; = if(p0783*p0787+p0784*p0788+p0785*p0789+p0786*p0790=0;0;p0790*p0786/(p0783*p0787+p0784*p0788+p0785*p0789+p0786*p0790))
- p5176: 1.34505e-6; = p1797*p3484
- p2539: 0; = p2343*p1073
- p3421: 0; = p3364*p1239
- p1580: 0
- p3223: 0.126838; = IF(p3216=0;0;(1-p1223)*24.3050/84.3139)
- p2225: 0.438886; = if(p0765*p0769+p0766*p0770+p0767*p0771+p0768*p0772=0;0;p0772*p0768/(p0765*p0769+p0766*p0770+p0767*p0771+p0768*p0772))
- p1607: 0
- p0297: 0.5
- p1848: 0
- p1802: 0.000506382; = p1394*1000/p0818
- p1723: 0
- p1949: 0
- p3199: 0; = p2418*p1082
- p0558: 0; = IF(p0294<0.5;-SQRT(p0007*EXP(p0426^2*p0008)-p0007);SQRT(p0007*EXP(p0426^2*p0008)-p0007))
- p3158: 9.00026e-6; = p2377*p1082
- p0996: 0.812712; = if(p0888=0;0;if((p0691*p0690*1000*p0692/100)/p0888>1;1;(p0691*p0690*1000*p0692/100)/p0888))
- p3632: 1.23983e-5; = p1901*p3476
- p0498: 0; = SQRT(2)*(IF((2*p0366-1)<0;-1;IF((2*p0366-1)>0;1;0))*SQRT(SQRT((2/(pi()*0.140012289)+LN(1-(2*p0366-1)^2)/2)^2-LN(1-(2*p0366-1)^2)/0.140012289)-(2/(pi()*0.140012289)+LN(1-(2*p0366-1)^2)/2)))
- p1876: 0
- p3103: 0; = p2322*p1023
- p1806: 2.31225e-5; = p1398*1000/p0818
- p2001: 400
- p1184: 2.27284e-7; = p1182/p0818
- p3417: 0; = p3379*p1238
- p0503: 0; = SQRT(2)*(IF((2*p0371-1)<0;-1;IF((2*p0371-1)>0;1;0))*SQRT(SQRT((2/(pi()*0.140012289)+LN(1-(2*p0371-1)^2)/2)^2-LN(1-(2*p0371-1)^2)/0.140012289)-(2/(pi()*0.140012289)+LN(1-(2*p0371-1)^2)/2)))
- p2760: 1.49736e-5; = p2369*(p1019+p1021)
- p1241: 0; = if(p1232>0;0;IF(p1234+p1238+p1239+p1240=1;0;1-(p1234+p1238+p1239+p1240)))
- p4563: 1.47765e-5; = p1802*p3481
- p1028: 30793.2; = IF(p1012=0;p1022*(p0704/100)*p0703*1000;0)
- p3741: 2.48563e-6; = p1804*p3477
- p2746: 0.00136297; = p2355*(p1019+p1021)
- p1322: 0.362619; = IF(((p0745*1000*p0749/100)+(p0754*1000*p0758/100))/p0801<0;0;((p0745*1000*p0749/100)+(p0754*1000*p0758/100))/p0801)
- p2231: 0.610071; = if(p0783*p0787+p0784*p0788+p0785*p0789+p0786*p0790=0;0;p0788*p0784/(p0783*p0787+p0784*p0788+p0785*p0789+p0786*p0790))
- p1246: 0; = if(p1232>0;0;p1241*(p0725/100)*p0723*1000)
- p1289: 0
- p2605: 0; = p2409*p1014
- p5166: 9.71426e-7; = p1787*p3484
- p3322: 0; = if(and(p1232=0;p3253<>0);p3253-(p3317+p3318+p3319+p3320+p3321);0)
- p3415: 0; = p3377*p1238
- p4300: 1.30998e-5; = p1951*p3479
- p1976: 0.1766
- p0244: 15.879
- p2277: 0.00228259; = p2223*p2183
- p1234: 0; = if(p1232>0;0;p0726/100)
- p2655: 0.000131272; = p2264*(p1078+p1080)
- p2583: 1.07015e-5; = p2387*p1073
- p2901: 0.0011963; = p2315*(p1020+p1022)
- p1639: 0
- p4291: 1.2554e-6; = p1942*p3479
- p1652: 0
- p1933: 0
- p1196: 0.59
- p1054: 1.6308e7; = IF(p1012=0;p1047*p1036;0)
- p0031: 4.459
- p1809: 0
- p1648: 0
- p0366: 0.5
- p2434: 0.000973534; = p2238*p1014
- p2214: 0.00101337; = p1107/p0818
- p3119: 0; = p2338*p1082
- p0990: 0; = p0986*p0886
- p2538: 0; = p2342*p1073
- p2821: 0; = p2430*(p1128+p1130)
- p0796: 99.775; = p0136*(1+p0664*p0268/100)
- p2301: 0.0018231; = p2227*p2208
- p2654: 0.000304034; = p2263*(p1078+p1080)
- p4745: 0; = p1778*p3482
- p4837: 0; = p1870*p3482
- p0270: 16.995
- p0321: 0.5
- p2308: 0.00171285; = p2227*p2215
- p2716: 0.000325143; = p2325*(p1019+p1021)
- p0959: 0; = if(and(p0683>0;or(p0807=480;p0807=32;p0807=1;and(p0807=60;p0901<0.03)));p0935;0)
- p2617: 0; = p2421*p1073
- p0733: 0
- p4073: 3.03466e-5; = p1930*p3478
- p2164: 0.00650533; = (p2015/p0818)-(p2022)-(p2035+p2036+p2052)-(p2017/p0818)-(p2039+p2041+p2044+p2158+p2159+p2160+p2161+p2162)
- p2389: 0.00621436; = p2233*p2218
- p2205: 0.00834881; = 2*14.0067*p2204/30.973762
- p1783: 0
- p3688: 1.03319e-6; = p1957*p3476
- p0852: 0; = p0847*p0851^3+p0848*p0851^2+p0849*p0851+p0850
- p1618: 0.660002
- p0645: 0; = IF(p0381<0.5;-SQRT(p0007*EXP(p0513^2*p0008)-p0007);SQRT(p0007*EXP(p0513^2*p0008)-p0007))
- p3739: 0.000272177; = p1802*p3477
- p3179: 0; = p2398*p1023
- p0697: 0
- p3472: 0; = p3377*p1241
- p2847: 0.0035122; = p2261*(p1079+p1081)
- p1674: 0
- p2642: 3.58633e-6; = p2251*(p1019+p1021)
- p3354: 0; = IF((p3350+p3351+p3352+p3353)+IF(p3349=0;0;(p3256*(p3273*(1-p3277))/p3349))>p3256;p3256-(p3350+p3351+p3352+p3353);IF(p3349=0;0;p3256*(p3273*(1-p3277))/p3349))
- p0322: 0.5
- p2129: 2.21347e-5; = p2015*p2057*p2091/(p0818*1000)
- p2127: 4.01927e-5; = p2015*p2055*p2089/(p0818*1000)
- p2788: 0; = p2397*(p1019+p1021)
- p1209: 6.13874; = p1206*p0818*p0822/p0801
- p1114: 0.216028
- p0549: 0; = IF(p0285<0.5;-SQRT(p0007*EXP(p0417^2*p0008)-p0007);SQRT(p0007*EXP(p0417^2*p0008)-p0007))
- p1585: 0
- p0241: 18.89
- p3175: 0; = p2394*p1023
- p1181: 0.000159831
- p0554: 0; = IF(p0290<0.5;-SQRT(p0007*EXP(p0422^2*p0008)-p0007);SQRT(p0007*EXP(p0422^2*p0008)-p0007))
- p1800: 0
- p3458: 0; = p3363*p1241
- p5309: 5.23076e-6; = p1930*p3484
- p0130: 23.846
- p2507: 0.00568749; = p2311*p1123
- p2230: 0.201432; = if(p0783*p0787+p0784*p0788+p0785*p0789+p0786*p0790=0;0;p0787*p0783/(p0783*p0787+p0784*p0788+p0785*p0789+p0786*p0790))
- p4219: 2.72912e-7; = p1870*p3479
- p2640: 0.000419783; = p2249*(p1019+p1021)
- p3526: 4.13276e-6; = p1795*p3476
- p1255: 0; = if(p1232>0;0;p0737/100)
- p4747: 0; = p1780*p3482
- p3367: 0; = if(p1232=0;p3244*p3361/p0818;0)
- p2000: 4000
- p2074: 0.025
- p1575: 0
- p0878: 9094; = p0867*p0856
- p4771: 0; = p1804*p3482
- p3059: 0; = p2278*p1023
- p1271: 0; = IF(p1267+p1270=p1259;0;IF(p1267+p1270+p1269>p1259;p1259-(p1267+p1270);p1269))
- p4152: 3.82077e-7; = p1803*p3479
- p0821: 3.91667
- p1218: 0.5
- p0825: 3.96152e8; = p0818*p0822
- p1854: 0
- p2126: 1.30563e-5; = p2015*p2054*p2088/(p0818*1000)
- p3212: 0; = p2431*p1132
- p0837: 0.5
- p3227: 0.00107224; = p3223*p1229
- p0978: 0
- p1696: 0
- p4791: 0; = p1824*p3482
- p0671: 72.653; = p0011*(1+p0539*p0143/100)
- p2119: 0.679049
- p1495: 71
- p4085: 9.97104e-6; = p1942*p3478
- p0809: 2000
- p5159: 2.54065e-6; = p1780*p3484
- p3200: 0; = p2419*p1082
- p3689: 0; = p1962*p3476
- p3228: 0.00424327; = p3224*p1229
- p2380: 0.000222334; = p2229*p2209
- p0007: 14; = p0006-1
- p3229: 6.91314e-6; = p1164/p0818
- p0058: 36.663
- p0230: 39.632
- p2823: 0.00123343; = p2237*(p1020+p1022)
- p1152: 0.415074
- p0310: 0.5
- p0093: 4.676
- p3457: 0; = p3362*p1241
- p2123: 0.263965
- p1551: 0
- p4306: 1.63747e-7; = p1957*p3479
- p3359: 0; = if(p1232=0;p3309+p3320+p3331+p3342+p3353;0)
- p4242: 3.76619e-6; = p1893*p3479
- p1737: 0
- p3303: 0; = if(and(p1232=0;p3252<>0);p3259*p3289;0)
- p0901: 0.01746
- p0758: 1.564; = p0098*(1+p0626*p0230/100)
- p0161: 16.791
- p3126: 0; = p2345*p1082
- p3242: 1.21101e-7; = p3234*p1188*p3238/p0818
- p0217: 9.936
- p2882: 0.000606847; = p2296*(p1020+p1022)
- p4721: 0; = p1754*p3482
- p1314: 0; = p1310*p1252/p0818
- p2156: 4.08908e-7; = p2015*p2085*p2118/(p0818*1000)
- p0924: 0; = IF(p0918+p0923=1;0;IF(p0918+p0923+p0920>1;1-(p0918+p0923);p0920))
- p1896: 0
- p3262: 0
- p0155: 3.225
- p2644: 1.29418e-5; = p2253*(p1019+p1021)
- p2272: 0.00664078; = p2230*p2218
- p1168: 3.45657e-6; = p1164*p1167/p0818
- p1812: 0
- p2125: 2.23984e-5; = p2015*p2053*p2087/(p0818*1000)
- p0005: 1.60934
- p2314: 0.00341416; = p2231*p2221
- p1332: 1.77127e6; = p1321*p0801
- p1819: 0
- p4410: 1.69145e-6; = p1855*p3480
- p2360: 0.00615688; = p2225*p2188
- p3435: 0; = p3378*p1239
- p3281: 0
- p5186: 7.47251e-8; = p1807*p3484
- p5057: 2.66872e-7; = p1884*p3483
- p1264: 0; = if(p1232>0;0;IF(p1259+p1263=1;0;IF(p1259+p1263+p1261>1;1-(p1259+p1263);p1261)))
- p2854: 0.000158554; = p2268*(p1079+p1081)
- p3376: 0; = if(p1232=0;p3246*p3358/p0818;0)
- p0556: 0; = IF(p0292<0.5;-SQRT(p0007*EXP(p0424^2*p0008)-p0007);SQRT(p0007*EXP(p0424^2*p0008)-p0007))
- p2421: 0; = p2235*p2211
- p1742: 0
- p4308: 0.000227049; = p1963*p3479
- p0533: 0; = SQRT(2)*(IF((2*p0401-1)<0;-1;IF((2*p0401-1)>0;1;0))*SQRT(SQRT((2/(pi()*0.140012289)+LN(1-(2*p0401-1)^2)/2)^2-LN(1-(2*p0401-1)^2)/0.140012289)-(2/(pi()*0.140012289)+LN(1-(2*p0401-1)^2)/2)))
- p3439: 0; = p3363*p1240
- p3056: 2.98165e-5; = p2275*p1132
- p2067: 0.446471
- p0059: 32.414
- p0937: 0; = p0931*p0001/(p0818*p0002)
- p2943: 0.00021977; = p2357*(p1020+p1022)
- p1632: 0
- p2490: 0.00132247; = p2294*p1014
- p3057: 0; = p2276*p1023
- p0859: 0.118135; = p0671*1000/p0856
- p3379: 0; = if(p1232=0;p3246*p3361/p0818;0)
- p0977: 0; = IF(p0687=0;IF(OR(p0686=0;p0688=0);0;p0686*1000*p0688/100);0)
- p3896: 0.0051698; = p1963*p3477
- p0731: 0
- p2379: 0.000491658; = p2229*p2208
- p0011: 72.653
- p2675: 0.000211227; = p2284*(p1019+p1021)
- p2374: 0.00791481; = p2225*p2203
- p2251: 1.19147e-5; = p2222*p2197
- p2155: 2.2069e-6; = p2015*p2084*p2117/(p0818*1000)
- p1192: 1.78864e-7; = p1188*p1191/p0818
- p2264: 0.000342764; = p2226*p2210
- p3838: 4.47413e-5; = p1901*p3477
- p2192: 0.00645515; = p1067-p2189-p2190-p2191
- p3271: 0
- p2779: 0.000162037; = p2388*(p1078+p1080)
- p1162: 0.00142203; = p1161/p0818
- p2250: 0.0137859; = p2222*p2196
- p3382: 0; = p3363*p1234
- p2689: 0.00143215; = p2298*(p1078+p1080)
- p1109: 3.99226e6; = IF(p1071=0;p1105*p1103*p1095;0)
- p4658: 1.34945e-6; = p1897*p3481
- p1678: 0
- p2878: 8.3858e-6; = p2292*(p1020+p1022)
- p2925: 0; = p2339*(p1079+p1081)
- p2900: 0.00110667; = p2314*(p1129+p1131)
- p1033: 5.7243e-5; = IF(p1012=0;p1027*p0001/(p0818*p0002);0)
- p1767: 0
- p1799: 0
- p0314: 0.5
- p0685: 0
- p2229: 0.120793; = if(p0774*p0778+p0775*p0779+p0776*p0780+p0777*p0781=0;0;p0781*p0777/(p0774*p0778+p0775*p0779+p0776*p0780+p0777*p0781))
- p1804: 4.62449e-6; = p1396*1000/p0818
- p5224: 1.7112e-5; = p1845*p3484
- p1837: 0
- p1856: 0
- p3370: 0; = if(p1232=0;p3245*p3358/p0818;0)
- p0383: 0.5
- p4377: 2.30915e-8; = p1822*p3480
- p2927: 0; = p2341*(p1079+p1081)
- p2114: 0.832356
- p3101: 0; = p2320*p1023
- p4238: 5.73116e-6; = p1889*p3479
- p3391: 0; = p3372*p1234
- p1157: 0.222821
- p0032: 30.91
- p0967: 1.73901e6; = (p0684/100)*p0683*p0682*1000
- p0746: 36.366; = p0086*(1+p0614*p0218/100)
- p2259: 0.00360085; = p2226*p2205
- p1183: 0.00126871; = p0801*p0001/(p0818*p0002)
- p4640: 2.6989e-7; = p1879*p3481
- p2962: 0.000365844; = p2376*(p1079+p1081)
- p2621: 0; = p2425*p1073
- p4994: 8.00615e-7; = p1821*p3483
- p2893: 0.000164659; = p2307*(p1079+p1081)
- p2055: 5.59471
- p4204: 1.59927e-5; = p1855*p3479
- p4153: 1.09165e-7; = p1804*p3479
- p2508: 0.00801487; = p2312*p1123
- p0042: 615.284
- p0670: 160.511; = p0010*(1+p0538*p0142/100)
- p1491: 16
- p2398: 0; = p2234*p2187
- p2033: 5.17399e-5; = p2015*p2029*p2031/(p0818*1000)
- p1927: 0
- p2257: 0.00311146; = p2222*p2203
- p2899: 0.000636842; = p2313*(p1129+p1131)
- p2485: 0.00966786; = p2289*p1014
- p1963f: 0.0002222; = p1647*p1851+p1648*p1852+p1649*p1853+p1650*p1854+p1651*p1855+p1652*p1856+p1653*p1857+p1654*p1858+p1655*p1859+p1656*p1860+p1657*p1861+p1658*p1862+p1659*p1863+p1660*p1864+p1661*p1865+p1662*p1866+p1663*p1867+p1664*p1868+p1665*p1869+p1666*p1870
- p2910: 2.03023e-5; = p2324*(p1020+p1022)
- p2965: 0.000178359; = p2379*(p1079+p1081)
- p0571: 0; = IF(p0307<0.5;-SQRT(p0007*EXP(p0439^2*p0008)-p0007);SQRT(p0007*EXP(p0439^2*p0008)-p0007))
- p3336: 0; = IF(or(p3254=0;p1232>0);0;p3271*p3289)
- p5181: 1.63648e-5; = p1802*p3484
- p2182: 0.0470012; = p1050/p0818
- p0030: 78.053
- p2222: 0.172534; = if(p0765*p0769+p0766*p0770+p0767*p0771+p0768*p0772=0;0;p0769*p0765/(p0765*p0769+p0766*p0770+p0767*p0771+p0768*p0772))
- p1486: 318
- p1614: 0
- p3443: 0; = p3367*p1240
- p1635: 0.921542
- p3360: 0; = if(p1232=0;p3310+p3321+p3332+p3343+p3354;0)
- p0426: 0; = SQRT(2)*(IF((2*p0294-1)<0;-1;IF((2*p0294-1)>0;1;0))*SQRT(SQRT((2/(pi()*0.140012289)+LN(1-(2*p0294-1)^2)/2)^2-LN(1-(2*p0294-1)^2)/0.140012289)-(2/(pi()*0.140012289)+LN(1-(2*p0294-1)^2)/2)))
- p1727: 0.836582
- p0711: 22.669; = p0051*(1+p0579*p0183/100)
- p2739: 0; = p2348*(p1078+p1080)
- p4066: 4.76876e-6; = p1923*p3478
- p4782: 0; = p1815*p3482
- p2495: 0.000274509; = p2299*p1073
- p0640: 0; = IF(p0376<0.5;-SQRT(p0007*EXP(p0508^2*p0008)-p0007);SQRT(p0007*EXP(p0508^2*p0008)-p0007))
- p0950: 0; = if(and(p0683=0;or(p0807=480;p0807=32;p0807=1;and(p0807=60;p0901<0.03)));p0938;0)
- p2386: 0.000461925; = p2229*p2215
- p2730: 0; = p2339*(p1078+p1080)
- p2178: 0.0877082; = (p0895*p0831/(1-p0831))/(p0818)
- p2174: 0.00954737; = p0895*p0903/p0818
- p0442: 0; = SQRT(2)*(IF((2*p0310-1)<0;-1;IF((2*p0310-1)>0;1;0))*SQRT(SQRT((2/(pi()*0.140012289)+LN(1-(2*p0310-1)^2)/2)^2-LN(1-(2*p0310-1)^2)/0.140012289)-(2/(pi()*0.140012289)+LN(1-(2*p0310-1)^2)/2)))
- p1759: 0
- p0271: 10.574
- p2971: 4.44056e-5; = p2385*(p1079+p1081)
- p2780: 0.00227837; = p2389*(p1128+p1130)
- p1026: 62580.9; = IF(p1012=0;p1020*(p0704/100)*p0703*1000;0)
- p3208: 0; = p2427*p1082
- p1982: 750
- p3069: 0; = p2288*p1023
- p1017: 0.0452; = IF(p1012=0;p0708/100;0)
- p1037: 0.386463
- p1333: 0.00365402; = p1332*p0001/(p0818*p0002)
- p2236: 0; = 1-(p2230+p2231+p2232+p2233)
- p1057: 0.82
- p1874: 0
- p1593: 0.689607
- p3325: 0; = if(and(p1232=0;p3255<>0);p3267*p3289;0)
- p0631: 0; = IF(p0367<0.5;-SQRT(p0007*EXP(p0499^2*p0008)-p0007);SQRT(p0007*EXP(p0499^2*p0008)-p0007))
- p1204: 0.980791
- p2584: 9.59114e-5; = p2388*p1073
- p2790: 0; = p2399*(p1019+p1021)
- p0520: 0; = SQRT(2)*(IF((2*p0388-1)<0;-1;IF((2*p0388-1)>0;1;0))*SQRT(SQRT((2/(pi()*0.140012289)+LN(1-(2*p0388-1)^2)/2)^2-LN(1-(2*p0388-1)^2)/0.140012289)-(2/(pi()*0.140012289)+LN(1-(2*p0388-1)^2)/2)))
- p0905: 0.116554; = p0904/p0818
- p2924: 0; = p2338*(p1079+p1081)
- p2096: 0.486404
- p4770: 0; = p1803*p3482
- p2179: 0.0127988; = p0970+p0971+p0972
- p3396: 0; = p3377*p1234
- p0162: 31.729
- p3894: 3.72845e-6; = p1957*p3477
- p2401: 0; = p2234*p2190
- p4228: 2.1833e-7; = p1879*p3479
- p2712: 0.000706605; = p2321*(p1019+p1021)
- p3477: 0.537493; = if(p1328+p1330+p1332+p1334+p1336+p1338+p1340+p1342+p1344=0;0;p1330/(p1328+p1330+p1332+p1334+p1336+p1338+p1340+p1342+p1344))
- p4655: 2.14562e-5; = p1894*p3481
- p1066: 0.0227444; = IF(p1012=0;p1052/(p1059*p0818);0)
- p3276: 0
- p3310: 0; = if(and(p1232=0;p3252<>0);IF((p3306+p3307+p3308+p3309)+(p3252*(p3257*(1-p3277))/p3305)>p3252;p3252-(p3306+p3307+p3308+p3309);p3252*(p3257*(1-p3277))/p3305);0)
- p0965: 0; = IF(p0684/100=1;0;IF(p0684/100+p0685/100>1;1-p0684/100;p0685/100))
- p1857: 0
- p0407: 0; = SQRT(2)*(IF((2*p0275-1)<0;-1;IF((2*p0275-1)>0;1;0))*SQRT(SQRT((2/(pi()*0.140012289)+LN(1-(2*p0275-1)^2)/2)^2-LN(1-(2*p0275-1)^2)/0.140012289)-(2/(pi()*0.140012289)+LN(1-(2*p0275-1)^2)/2)))
- p2150: 1.79929e-6; = p2015*p2078*p2112/(p0818*1000)
- p1966: 0; = if(p0814=0;p0802;0)
- p0789: 0
- p2599: 0; = p2403*p1014
- p2014: 9.01591e6; = p0833*p2011*p2013
- p2703: 0.0103914; = p2312*(p1128+p1130)
- p2772: 3.67647e-5; = p2381*(p1078+p1080)
- p0925: 0; = IF(p0918+p0923+p0924=1;0;IF(p0918+p0923+p0924+p0921>1;1-(p0918+p0923+p0924);p0921))
- p4720: 0.000280668; = p1963*p3481
- p0455: 0; = SQRT(2)*(IF((2*p0323-1)<0;-1;IF((2*p0323-1)>0;1;0))*SQRT(SQRT((2/(pi()*0.140012289)+LN(1-(2*p0323-1)^2)/2)^2-LN(1-(2*p0323-1)^2)/0.140012289)-(2/(pi()*0.140012289)+LN(1-(2*p0323-1)^2)/2)))
- p2084: 0.21
- p3965: 1.73409e-6; = p1822*p3478
- p4439: 1.73186e-8; = p1884*p3480
- p3023: 0; = p2242*p1023
- p1398: 10
- p2311: 0.0201128; = p2231*p2218
- p4449: 1.83577e-6; = p1894*p3480
- p0956: 0; = if(and(p0683>0;or(p0807=56;p0807=100;and(p0807=60;p0901>0.06)));p0938;0)
- p0135: 85.678
- p1212: 0.028966; = if(p1211=0;0;if(p1193>0;0;(p1207+p1208+p1209)*p1210/(2000*p1211)))
- p0053: 36.277
- p1145: 1.8853e7; = if(p1121=0;p0799*p0702*1000*p0800/100;0)
- p2668: 0.000687061; = p2277*(p1019+p1021)
- p2302: 0.000824428; = p2227*p2209
- p1675: 0.655218
- p3493: 4.44272e-5; = p1762*p3476
- p5330: 1.7934e-5; = p1951*p3484
- p1913: 0
- p4188: 1.63747e-7; = p1839*p3479
- p2767: 0.000386225; = p2376*(p1078+p1080)
- p2312: 0.0283431; = p2231*p2219
- p1354: 129
- p2255: 0.00188578; = p2222*p2201
- p1265: 0; = if(p1232>0;0;IF(p1259+p1263+p1264=1;0;IF(p1259+p1263+p1264+p1262>1;1-(p1259+p1263+p1264);p1262)))
- p3132: 0; = p2351*p1132
- p0748: 32.812; = p0088*(1+p0616*p0220/100)
- p2266: 3.72924e-5; = p2226*p2212
- p3060: 0; = p2279*p1023
- p2972: 0.000167572; = p2386*(p1079+p1081)
- p0755: 3.593; = p0095*(1+p0623*p0227/100)
- p1970: 615000; = p0801
- p2411: 0; = p2234*p2201
- p3301: 0; = if(and(p1232=0;p3252<>0);p3257*p3277*(p3297*p3290+(1-p3297)*p3294);0)
- p0725: 0
- p3967: 8.367e-5; = p1824*p3478
- p3257: 0

## Reference product
- cotton lint; at harvest in 1999; at farm; 90%-93% moisture: 1 kg

## Inputs from technosphere
- CUTOFF pesticide, Bromoxynil; at point-of-sale; kg AI: 7.86164e-5 kg; = p1780
- CUTOFF pesticide, Pendimethalin; at point-of-sale; kg AI: 0.000164169 kg; = p1903
- CUTOFF apply pesticide; broadcast without incorporation: 0.000460057 ha; = p1335
- CUTOFF pesticide, Cypermethrin; at point-of-sale; kg AI: 2.31225e-5 kg; = p1806
- CUTOFF gypsum; at point-of-sale: 6.91314e-6 kg; = p1166
- CUTOFF nitrogenous fertilizer, ammonium sulfate; at point-of-sale: 0.0131958 kg; = p1067
- CUTOFF pesticide, Sodium chlorate; at point-of-sale; kg AI: 0.000161857 kg; = p1930
- CUTOFF irrigate; gravity, groundwater source, in 1999: 1.23935e-5 ha-m; = p0992
- CUTOFF apply sulfuric acid; unspecified method: 0.00126871 ha; = p1177
- CUTOFF irrigate; unspec. irrigation method, unspec. water source, in 1999: 2.25162e-7 ha-m; = p1011
- CUTOFF apply sewage sludge; unspecified method: 0.00126871 ha; = p1189
- CUTOFF pesticide, Aldicarb; at point-of-sale; kg AI: 0.000221976 kg; = p1768
- CUTOFF pesticide, Dimethipin; at point-of-sale; kg AI: 2.08102e-5 kg; = p1821
- CUTOFF pesticide, Malathion ; at point-of-sale; kg AI: 0.00726739 kg; = p1872
- CUTOFF apply P fertilizer; broadcast without incorporation: 0.000198035 ha; = p1091
- CUTOFF pesticide, Norflurazon; at point-of-sale; kg AI: 4.62449e-5 kg; = p1897
- CUTOFF potassic fertilizer, other single nutrients; at point-of-sale: 0.00881679 kg; = p1155
- CUTOFF seed storage; cotton: 0.00639942 kg*a; = p0975
- CUTOFF sulfuric acid storage: 1.10779e-7 kg*a; = p1180
- CUTOFF apply K fertilizer; broadcast without incorporation: 0.000184448 ha; = p1141
- CUTOFF pesticide, Deltamethrin; at point-of-sale; kg AI: 2.31225e-6 kg; = p1807
- CUTOFF apply gypsum; unspecified method: 0.00126871 ha; = p1165
- CUTOFF pesticide, Fenoxaprop P; at point-of-sale; kg AI: 9.24898e-6 kg; = p1835
- CUTOFF pesticide, Bifenthrin; at point-of-sale; kg AI: 9.24898e-6 kg; = p1778
- CUTOFF pesticide, Pyrithiobac-sodium; at point-of-sale; kg AI: 2.54347e-5 kg; = p1923
- cottonseed; at harvest in 1999; at farm; 90%-93% moisture: 1.53071 kg; = p0819
- CUTOFF regional or national trucking; class 8, average fuel: 0.034763 metric ton*km; = p2009
- CUTOFF nitrogenous fertilizer, sodium nitrate; at point-of-sale: 0.000431607 kg; = p1069
- CUTOFF pesticide, Zeta-Cypermethrin; at point-of-sale; kg AI: 6.93674e-6 kg; = p1957
- CUTOFF harvest; cotton residue management: 0.00126871 ha; = p1975
- CUTOFF pesticide, Dicrotophos; at point-of-sale; kg AI: 0.000115612 kg; = p1815
- CUTOFF pesticide, beta-Cyfluthrin; at point-of-sale; kg AI: 4.62449e-6 kg; = p1804
- CUTOFF apply N fertilizer; broadcast without incorporation: 0.000129101 ha; = p1032
- CUTOFF apply pesticide; broadcast with incorporation: 0.00365402 ha; = p1333
- CUTOFF pesticide, Metalaxyl; at point-of-sale; kg AI: 6.93674e-6 kg; = p1884
- CUTOFF apply K fertilizer; no broadcast application: 0.000160912 ha; = p1139
- CUTOFF apply K fertilizer; broadcast with incorporation: 0.000208626 ha; = p1140
- CUTOFF phosphatic fertilizer, monoammonium phosphate; at point-of-sale: 0.0171128 kg; = p1120
- CUTOFF apply liming materials; unspecified method: 0.00126871 ha; = p1227
- CUTOFF pesticide, Dimethoate; at point-of-sale; kg AI: 9.24898e-6 kg; = p1822
- CUTOFF nitrogenous fertilizer, ammonium nitrate; at point-of-sale: 0.0227444 kg; = p1066
- CUTOFF pesticide, Glyphosate; at point-of-sale; kg AI: 0.000677488 kg; = p1855
- CUTOFF sowing; for unspec. till, cotton: 0.00126871 ha; = p0963
- CUTOFF sewage sludge storage: 1.78864e-7 kg*a; = p1192
- CUTOFF pesticide, Urea, sulfate; at point-of-sale; kg AI: 0.000159545 kg; = p1893
- CUTOFF pesticide, Methyl parathion; at point-of-sale; kg AI: 0.0015677 kg; = p1888
- CUTOFF pesticide, Diuron; at point-of-sale; kg AI: 0.000446263 kg; = p1824
- CUTOFF pesticide, Cyanazine; at point-of-sale; kg AI: 0.000506382 kg; = p1802
- CUTOFF pesticide, Tribufos; at point-of-sale; kg AI: 0.000554939 kg; = p1951
- CUTOFF pesticide, Propazine; at point-of-sale; kg AI: 0.000242786 kg; = p1889
- CUTOFF pesticide, Paraquat dichloride; at point-of-sale; kg AI: 8.32408e-5 kg; = p1901
- CUTOFF irrigate; unspecified irrigation method, groundwater source, in 1999: 1.21137e-5 ha-m; = p0995
- CUTOFF sulfur; at point-of-sale: 8.84198e-7 kg; = p1172
- CUTOFF zinc compounds; at point-of-sale: 2.27284e-7 kg; = p1184
- CUTOFF sewage sludge; at point-of-sale: 3.57729e-7 kg; = p1190
- CUTOFF pesticide, Ethephon; at point-of-sale; kg AI: 0.000575749 kg; = p1832
- CUTOFF apply N fertilizer; broadcast with incorporation: 0.000323955 ha; = p1031
- CUTOFF harvest; cotton, stripper harvested: 0.000314598 ha; = p1973
- CUTOFF pesticide formulation balance; at point-of-sale: 0.00961836 kg; = p1963
- CUTOFF pesticide, Spinosad; at point-of-sale; kg AI: 6.93674e-6 kg; = p1931
- CUTOFF pesticide, Prometryn; at point-of-sale; kg AI: 0.000217351 kg; = p1911
- CUTOFF limestone, high-grade, pulverized; at point-of-sale: 0.0778548 kg; = p1228
- CUTOFF pesticide, 2,4-D; at point-of-sale; kg AI: 7.39919e-5 kg; = p1754
- CUTOFF pesticide, Lambda-cyhalothrin; at point-of-sale; kg AI: 1.15612e-5 kg; = p1870
- CUTOFF fertilizer storage: 0.267475 kg*a; = p1160
- CUTOFF pesticide, Clethodim; at point-of-sale; kg AI: 2.77469e-5 kg; = p1795
- CUTOFF pesticide, Imidacloprid; at point-of-sale; kg AI: 1.15612e-5 kg; = p1865
- CUTOFF nitrogenous fertilizer, anhydrous ammonia; at point-of-sale: 0.0573185 kg; = p1064
- CUTOFF apply mixed N fertilizer; with incorporation: 5.7243e-5 ha; = p1033
- CUTOFF apply pesticide; chiseled or injected/knifed in: 4.86576e-5 ha; = p1337
- CUTOFF sulfuric acid; at point-of-sale: 2.21557e-7 kg; = p1178
- CUTOFF apply P fertilizer; broadcast with incorporation: 0.000209068 ha; = p1090
- CUTOFF apply zinc compounds; unspecified method: 0.00126871 ha; = p1183
- CUTOFF prepare soil; for unspec. till, cotton: 0.00126871 ha; = p0939
- CUTOFF N inhibitor appl svc; unspec rate & type, 1999 cotton: 0.00142203 ha; = p1162
- CUTOFF sulfur storage: 4.42099e-7 kg*a; = p1174
- CUTOFF pesticide, Quintozene; at point-of-sale; kg AI: 7.63041e-5 kg; = p1902
- CUTOFF apply sulfur; unspecified method: 0.00126871 ha; = p1171
- CUTOFF dolomite, pulverized; at point-of-sale: 0.00845366 kg; = p1229
- CUTOFF cotton seeds; seed, unspec. type; at point-of-sale: 0.00877783 kg; = p0972
- CUTOFF apply pesticide; unspecified application methods: 0.000629833 ha; = p1345
- CUTOFF nitrogenous fertilizer, aqueous ammonia; at point-of-sale: 0.00424802 kg; = p1065
- cotton residue; at harvest in 1999; at farm; 80%-92% moisture: 1.51864 kg; = p0839
- CUTOFF pesticide, Fluazifop-p-butyl; at point-of-sale; kg AI: 6.93674e-6 kg; = p1839
- CUTOFF pesticide, Acephate; at point-of-sale; kg AI: 0.00029828 kg; = p1762
- CUTOFF harvest; cotton, spindle picked: 0.000943795 ha; = p1972
- CUTOFF irrigate; gravity, surface water source, in 1999: 5.63698e-6 ha-m; = p1006
- CUTOFF cotton seeds; GMO herbicide resistant seed; at point-of-sale: 0.00402101 kg; = p0970
- CUTOFF pesticide, Carbofuran; at point-of-sale; kg AI: 3.00592e-5 kg; = p1787
- CUTOFF liming materials storage: 0.0431542 kg*a; = p1231
- CUTOFF pesticide, Trifluralin; at point-of-sale; kg AI: 0.000168794 kg; = p1955
- CUTOFF fertilizer filler materials; at point-of-sale: 0.0974779 kg; = p1158
- CUTOFF bulk cargo rail transport; diesel: 0.30656 metric ton*km; = p2008
- CUTOFF pesticide, Cyclanilide; at point-of-sale; kg AI: 1.61857e-5 kg; = p1803
- CUTOFF local area trucking; class 6, average fuel: 0.0122624 metric ton*km; = p2010
- CUTOFF apply pesticide; in seed furrow: 0.000749791 ha; = p1343
- CUTOFF domestic barge transport; average fuel: 0.163498 metric ton*km; = p2007
- CUTOFF apply pesticide; as foliar or directed spray: 0.000568702 ha; = p1339
- CUTOFF pesticide, Oxamyl; at point-of-sale; kg AI: 3.69959e-5 kg; = p1899
- CUTOFF pesticide, MSMA; at point-of-sale; kg AI: 0.000735294 kg; = p1894
- CUTOFF apply mixed N fertilizer; without incorporation: 6.35246e-5 ha; = p1034
- CUTOFF pesticide, Thidiazuron; at point-of-sale; kg AI: 5.31817e-5 kg; = p1942
- CUTOFF apply pesticide; banded or side-dressed: 0.00290281 ha; = p1329
- CUTOFF phosphatic fertilizer, other single phosphates; at point-of-sale: 0.00389347 kg; = p1118
- CUTOFF phosphatic fertilizer, superphos. grades 22% and under; at point-of-sale: 0.000990615 kg; = p1116
- CUTOFF potassic fertilizer, potassium chloride; at point-of-sale: 0.0794266 kg; = p1154
- CUTOFF pesticide, Disulfoton; at point-of-sale; kg AI: 2.08102e-5 kg; = p1823
- CUTOFF apply single or mixed P fertilizer; unspec. method: 1.5045e-5 ha; = p1094
- CUTOFF apply N fertilizer; no broadcast application: 0.000692615 ha; = p1030
- CUTOFF irrigate; unspecified irrigation method, surface water source, in 1999: 1.29903e-6 ha-m; = p1009
- CUTOFF nitrogenous fertilizer, nitrogen solutions; at point-of-sale: 0.125694 kg; = p1068
- CUTOFF gypsum storage: 3.45657e-6 kg*a; = p1168
- CUTOFF pesticide, Clomazone; at point-of-sale; kg AI: 4.16204e-5 kg; = p1797
- CUTOFF manure appl svc; unspec rate, 1999 cotton: 0.00126871 ha; = p1233
- CUTOFF nitrogenous fertilizer, urea; at point-of-sale: 0.0560309 kg; = p1070
- CUTOFF pesticide, Fluometuron; at point-of-sale; kg AI: 0.000529504 kg; = p1845
- CUTOFF pesticide, Etridiazole; at point-of-sale; kg AI: 4.62449e-6 kg; = p1834
- CUTOFF phosphatic fertilizer, superphosphate grades over 22%; at point-of-sale: 0.00483748 kg; = p1117
- CUTOFF phosphatic fertilizer, diammonium phosphate; at point-of-sale: 0.0427309 kg; = p1119
- CUTOFF international vessel transport; average fuel: 1.5201 metric ton*km; = p2006
- CUTOFF apply P fertilizer; no broadcast application: 0.00012375 ha; = p1089
- CUTOFF apply single or mixed K fertilizer; unspec. method: 1.5051e-5 ha; = p1144
- CUTOFF apply pesticide; broadcast by air: 0.0104753 ha; = p1331
- CUTOFF pesticide, 1,1-Dimethylpiperidinium chloride; at point-of-sale; kg AI: 9.24898e-6 kg; = p1879
- CUTOFF zinc compounds storage: 1.13642e-7 kg*a; = p1186
- CUTOFF pesticide, Quizalofop, ethyl ; at point-of-sale; kg AI: 6.93674e-6 kg; = p1925
- CUTOFF pesticide storage: 0.0173022 kg*a; = p1965

## Inputs from nature
- Occupation, annual crop [natural resource, land]: 5.43211 m2*year; = 1.0 * (p0855)
- Carbon dioxide: 8.82746 kg; = p0900*3.6666666667
- Nitrogen: 0.116554 kg; = p0905
- Water, unspecified origin: 0.00305541 m3; = p0916*0.001+p0893*0.001
- Phosphorus: 0.0200505 kg; = p0910
- Water, surface: 69.3601 kg; = p0889
- Transformation, from annual crop [natural resource, land]: 12.6871 m2; = 1.0 * (p0879+p0873+p0875+p0881+p0883+p0871)
- Water, ground: 245.072 kg; = p0887
- Transformation, to annual crop [natural resource, land]: 12.6871 m2; = 1.0 * (p0857)
- Dry matter except CNPK; from plant uptake: 3.51189 kg; = p0917
- Potassium; from plant uptake; biogenic: 0.0255685 kg; = p0915

## Emissions to nature
- Carbofuran [soil, agricultural]: 1.39026e-5 kg; = 1.0 * (p5166+p4136+p4548+p3930+p4342+p3518+p4960)
- Urea; broadcast w/o incorp. in fert. at plant.: 0.00139097 kg; = p2919*5
- trans-2-Butene: 1.02267e-6 kg; = p2148*1.1666666667
- Superphosphate, grades>22%; broadcast w/o incorp. in fert. in fall bef. plant.; kg P: 0.000158554 kg; = p2854
- Potassium chloride; no broadcast in fert. in spr. bef. plant.: 0.0126073 kg; = p2507*2.2166666667
- Monoammonium phosphate; no broadcast in fert. after plant.: 0.000414007 kg; = p2576*8.2142857143
- Furan [air, non-urban air or from high stacks]: 1.96462e-6 kg; = 1.0 * (p2138*1.4166666667)
- Urea, sulfate; chiseled or injected/knifed in; kg AI: 3.98328e-7 kg; = p4448
- Superphosphate, grades<= 22%; unspec. appl. method in fert. in spr. bef. plant.; kg P: 1.06735e-6 kg; = p3086
- Butane [air, non-urban air or from high stacks]: 1.09112e-6 kg; = 1.0 * (p2147*1.0208333333)
- Acrylonitrile: 6.02003e-7 kg; = p2156*1.4722222222
- Superphosphate, grades>22%; unspec. appl. method in fert. after plant.; kg P: 3.37354e-6 kg; = p3166
- Quintozene [soil, agricultural]: 3.52912e-5 kg; = 1.0 * (p5281+p4251+p5075+p4663+p3633+p4457+p4045)
- Plant dry matter; from residue burning: 0.00650533 kg; = p2164
- Dimethipin: 1.11853e-5 kg; = p3758
- Other single K nutrients; unspec. appl. method in fert. in fall bef. plant.; kg K: 1.71582e-5 kg; = p3055
- cis-2-Butene: 7.7149e-7 kg; = p2149*1.1666666667
- Anhydrous ammonia; broadcast w/o incorp. in fert. after plant.: 0.00380987 kg; = p2940*1.2142857143
- Urea; broadcast w/o incorp. in fert. after plant.: 0.0036481 kg; = p2958*5
- Metolachlor [air, non-urban air or from high stacks]: 0.000130496 kg; = 1.0 * (p3826)
- Ammonium sulfate; broadcast w/o incorp. in fert. in spr. bef. plant.: 0.000439605 kg; = p2869*4.7142857143
- Thidiazuron: 2.85847e-5 kg; = p3879
- Aqueous ammonia; broadcast w/ incorp. in fert. in fall bef. plant.: 6.02743e-5 kg; = p2630*1.2142857143
- Nitrogen solution; no broadcast in fert. at plant.; no broadcast in fert. at plant.; kg N: 0.003451 kg; = p2522
- Pesticide formulation balance; in seed furrow: 0.00037004 kg; = p5132
- Ammonium nitrate; broadcast w/ incorp. in fert. in fall bef. plant.: 0.00186542 kg; = p2632*4.7142857143
- Other single phosphates; broadcast w/o incorp. in fert. in fall bef. plant.; kg P: 6.1148e-5 kg; = p2856
- Aqueous ammonia; broadcast w/ incorp. in fert. at plant.: 5.84599e-5 kg; = p2708*1.2142857143
- Sulfuric acid [soil, agricultural]: 2.21557e-7 kg; = 1.0 * (p3231)
- Urea; broadcast w/ incorp. in fert. in spr. bef. plant.: 0.00363927 kg; = p2685*5
- Urea; broadcast w/o incorp. in fert. in spr. bef. plant.: 0.00183898 kg; = p2880*5
- Norflurazon: 2.48563e-5 kg; = p3834
- Ammonium sulfate; broadcast w/ incorp. in fert. at plant.: 0.000658022 kg; = p2713*4.7142857143
- Nitrogen; in above-ground residue left on field: 0.0225811 kg; = p2168
- Oxamyl: 1.9885e-5 kg; = p3836
- Ammonium sulfate; no broadcast in fert. after plant.: 0.00313568 kg; = p2557*4.7142857143
- Potassium chloride; broadcast w/o incorp. in fert. after plant.: 0.00446508 kg; = p2975*2.2166666667
- Ammonium nitrate; broadcast w/ incorp. in fert. at plant.: 0.00180927 kg; = p2710*4.7142857143
- Superphosphate, grades>22%; broadcast w/ incorp. in fert. after plant.; kg P: 4.68794e-5 kg; = p2776
- Ammonium sulfate; broadcast w/o incorp. in fert. after plant.: 0.000872074 kg; = p2947*4.7142857143
- Superphosphate, grades<= 22%; no broadcast in fert. after plant.; kg P: 2.36762e-6 kg; = p2579
- Fenoxaprop P; foliar or directed spray: 2.6989e-7 kg; = p4596
- Other single K nutrients; broadcast w/ incorp. in fert. in fall bef. plant.; kg K: 0.000237834 kg; = p2665
- Deltamethrin: 1.24282e-6 kg; = p3744
- Mepiquat chloride: 4.97126e-6 kg; = p3816
- Diuron [soil, agricultural]: 0.0002064 kg; = 1.0 * (p3555+p3967+p4585+p4173+p4379+p5203+p4997)
- Other single phosphates; broadcast w/ incorp. in fert. in spr. bef. plant.; kg P: 6.704e-5 kg; = p2700
- Monoammonium phosphate; broadcast w/ incorp. in fert. in fall bef. plant.: 0.00249742 kg; = p2654*8.2142857143
- Formic acid [air, non-urban air or from high stacks]: 1.7996e-5 kg; = 1.0 * (p2131*3.8333333333)
- Other single K nutrients; unspec. appl. method in fert. after plant.; kg K: 1.60564e-5 kg; = p3172
- Diammonium phosphate; unspec. appl. method in fert. in spr. bef. plant.: 0.000485856 kg; = p3079*4.7142857143
- Water [air, non-urban air or from high stacks]: 2.88731e-6 m3; = 0.001 * (p2016)
- Other single K nutrients; broadcast w/ incorp. in fert. after plant.; kg K: 0.000222562 kg; = p2782
- Aqueous ammonia; no broadcast in fert. in spr. bef. plant.: 0.00014043 kg; = p2474*1.2142857143
- Urea, sulfate; broadcast without incorporation; kg AI: 3.76619e-6 kg; = p4242
- Monoammonium phosphate; no broadcast in fert. in spr. bef. plant.: 0.00153517 kg; = p2498*8.2142857143
- Prometryn: 0.000116825 kg; = p3848
- Etridiazole [soil, agricultural]: 2.13886e-6 kg; = 1.0 * (p3565+p4595+p5213+p3977+p4389+p4183+p5007)
- Fenoxaprop P; in seed furrow: 3.55829e-7 kg; = p5008
- Particulates, < 10 um: 0.000159302 kg; = p2034+p2036
- Urea, sulfate; foliar or directed spray; kg AI: 4.6556e-6 kg; = p4654
- Superphosphate, grades<= 22%; broadcast w/o incorp. in fert. after plant.; kg P: 3.78889e-6 kg; = p2969
- Aqueous ammonia; no broadcast in fert. in fall bef. plant.: 0.000109515 kg; = p2435*1.2142857143
- Water: 316.979 kg; = p2178+p2181+p2171
- Lambda-cyhalothrin: 6.21408e-6 kg; = p3807
- Ethephon [soil, agricultural]: 0.000266288 kg; = 1.0 * (p4387+p5211+p5005+p4181+p4593+p3975+p3563)
- Anhydrous ammonia; broadcast w/ incorp. in fert. after plant.: 0.00753959 kg; = p2745*1.2142857143
- Urea, sulfate; unspec. appl. method; kg AI: 5.15603e-6 kg; = p5272
- Potassium chloride; unspec. appl. method in fert. in fall bef. plant.: 0.000389355 kg; = p3053*2.2166666667
- Propane [air, non-urban air or from high stacks]: 5.05815e-6 kg; = 1.0 * (p2142*1.2222222222)
- Sodium nitrate; broadcast w/o incorp. in fert. after plant.: 2.79885e-5 kg; = p2954*6.0714285714
- Sodium nitrate; broadcast w/o incorp. in fert. in fall bef. plant.: 1.10028e-5 kg; = p2837*6.0714285714
- Diammonium phosphate; no broadcast in fert. in spr. bef. plant.: 0.00399632 kg; = p2494*4.7142857143
- Nitrogen solution; no broadcast in fert. after plant.; no broadcast in fert. after plant.; kg N: 0.00905098 kg; = p2561
- Superphosphate, grades>22%; unspec. appl. method in fert. in fall bef. plant.; kg P: 1.20455e-5 kg; = p3049
- Cyanazine: 0.000272177 kg; = p3739
- Ethyne [air, non-urban air or from high stacks]: 4.88872e-6 kg; = 1.0 * (p2132*1.0833333333)
- Phenol [air, non-urban air or from high stacks]: 9.31519e-6 kg; = 1.0 * (p2133*1.3055555556)
- Monoammonium phosphate; unspec. appl. method in fert. in fall bef. plant.: 0.000179719 kg; = p3044*8.2142857143
- Zeta-cypermethrin [soil, agricultural]: 3.20829e-6 kg; = 1.0 * (p5130+p4512+p5336+p4100+p3688+p4306+p4718)
- Sodium nitrate; no broadcast in fert. in spr. bef. plant.: 5.07304e-5 kg; = p2486*6.0714285714
- Potassium chloride; broadcast w/ incorp. in fert. after plant.: 0.00505039 kg; = p2780*2.2166666667
- Pesticide formulation balance; broadcast without incorporation: 0.000227049 kg; = p4308
- I butane; from residue burning: 3.78861e-7 kg; = p2146*1.0208333333
- Potassium chloride; broadcast w/o incorp. in fert. in fall bef. plant.: 0.00477147 kg; = p2858*2.2166666667
- Calcium [soil, agricultural]: 0.0312007 kg; = 1.0 * (p3218+p3226)
- Ammonium nitrate; no broadcast in fert. at plant.: 0.00328734 kg; = p2515*4.7142857143
- Anhydrous ammonia; no broadcast in fert. in spr. bef. plant.: 0.00690556 kg; = p2472*1.2142857143
- Urea; broadcast w/ incorp. in fert. in fall bef. plant.: 0.0028381 kg; = p2646*5
- Nitrogen solution; broadcast w/ incorp. in fert. in fall bef. plant.; broadcast w/ incorp. in fert. in fall bef. plan...: 0.00195829 kg; = p2639
- Carbon dioxide, in air: 0.0229873 kg; = p2163*3.6666666667
- Anhydrous ammonia; no broadcast in fert. at plant.: 0.00522323 kg; = p2511*1.2142857143
- Dimethoate [soil, agricultural]: 4.27772e-6 kg; = 1.0 * (p4377+p3553+p3965+p5201+p4995+p4171+p4583)
- Diammonium phosphate; broadcast w/o incorp. in fert. in fall bef. plant.: 0.00615817 kg; = p2845*4.7142857143
- Aqueous ammonia; no broadcast in fert. at plant.: 0.000106218 kg; = p2513*1.2142857143
- Other single K nutrients; no broadcast in fert. in fall bef. plant.; kg K: 0.00018344 kg; = p2470
- Ammonium sulfate; no broadcast in fert. in spr. bef. plant.: 0.00158067 kg; = p2479*4.7142857143
- Acetic acid [air, non-urban air or from high stacks]: 0.000100482 kg; = 1.0 * (p2127*2.5)
- Propene [air, non-urban air or from high stacks]: 1.21412e-5 kg; = 1.0 * (p2136*1.1666666667)
- Anhydrous ammonia; broadcast w/o incorp. in fert. in spr. bef. plant.: 0.00192053 kg; = p2862*1.2142857143
- isopentane: 3.0396e-7 kg; = p2151*1.0166666667
- Pesticide formulation balance; broadcast by air: 0.0051698 kg; = p3896
- Urea; no broadcast in fert. at plant.: 0.00500144 kg; = p2529*5
- Oxamyl [soil, agricultural]: 1.71109e-5 kg; = 1.0 * (p5072+p4248+p4660+p3630+p5278+p4042+p4454)
- Plant dry matter; in aboveground residue left on field: 0.677797 kg; = p2172
- Superphosphate, grades<= 22%; broadcast w/ incorp. in fert. in spr. bef. plant.; kg P: 1.48321e-5 kg; = p2696
- Ammonium nitrate; broadcast w/o incorp. in fert. at plant.: 0.000914252 kg; = p2905*4.7142857143
- Other single phosphates; unspec. appl. method in fert. in spr. bef. plant.; kg P: 4.82433e-6 kg; = p3090
- cyclopentane: 2.97062e-8 kg; = p2153*1.0166666667
- Formaldehyde [air, non-urban air or from high stacks]: 3.7336e-5 kg; = 1.0 * (p2128*2.5)
- Bifenthrin: 4.97126e-6 kg; = p3715
- Ash: 0.00355243 kg; = p2021+p2022
- Potassium chloride; broadcast w/o incorp. in fert. in spr. bef. plant.: 0.0144512 kg; = p2897*2.2166666667
- Other limestone constituents; applied in limestone: 0.00467129 kg; = p3220
- Spinosad: 3.72845e-6 kg; = p3868
- Methyl vinyl ether; from residue burning: 1.36218e-6 kg; = p2137*1.6111111111
- Other single phosphates; no broadcast in fert. in spr. bef. plant.; kg P: 3.96817e-5 kg; = p2505
- Superphosphate, grades<= 22%; unspec. appl. method in fert. in fall bef. plant.; kg P: 1.02778e-6 kg; = p3047
- Disulfoton [soil, agricultural]: 9.62488e-6 kg; = 1.0 * (p4996+p4378+p5202+p3966+p4584+p4172+p3554)
- Other single K nutrients; broadcast w/o incorp. in fert. in spr. bef. plant.; kg K: 0.000636842 kg; = p2899
- Potassium chloride; no broadcast in fert. after plant.: 0.00389534 kg; = p2585*2.2166666667
- Aqueous ammonia; broadcast w/o incorp. in fert. after plant.: 7.74766e-5 kg; = p2942*1.2142857143
- Fluometuron: 0.000284605 kg; = p3782
- Ammonia [air, non-urban air or from high stacks]: 3.8974e-5 kg; = 1.0 * (p2159*1.2142857143)
- Quizalofop ethyl ester [soil, agricultural]: 3.20829e-6 kg; = 1.0 * (p3656+p5098+p4686+p4480+p4274+p4068+p5304)
- NMVOC, non-methane volatile organic compounds, unspecified origin [air, non-urban air or from high stacks]: 0.00046146 kg; = 1.0 * (p2052+p2051)
- Nitrogen; in below-ground residue: 0.00954737 kg; = p2174
- Other single phosphates; no broadcast in fert. after plant.; kg P: 1.07015e-5 kg; = p2583
- S,S,S-tributyl phosphorotrithioate: 0.000256663 kg; = p4094+p4712+p5330+p3682+p4300+p4506+p5124
- Gypsum: 6.91314e-6 kg; = p3229
- Hydrocyanic acid: 5.12355e-6 kg; = p2154*2.25
- Propanenitrile: 1.1508e-6 kg; = p2157*1.5277777778
- Other single phosphates; broadcast w/o incorp. in fert. after plant.; kg P: 1.71254e-5 kg; = p2973
- Deltamethrin [soil, agricultural]: 1.06943e-6 kg; = 1.0 * (p3950+p4156+p4568+p4980+p4362+p5186+p3538)
- Superphosphate, grades>22%; no broadcast in fert. in spr. bef. plant.; kg P: 0.000102893 kg; = p2503
- Glycolaldehyde; from residue burning: 3.61839e-5 kg; = p2135*2.5
- Diammonium phosphate; unspec. appl. method in fert. in fall bef. plant.: 0.000467843 kg; = p3040*4.7142857143
- Other single K nutrients; no broadcast in fert. after plant.; kg K: 0.000171661 kg; = p2587
- Malathion [soil, agricultural]: 0.00336122 kg; = 1.0 * (p4221+p4633+p4427+p4015+p3603+p5251+p5045)
- Potassium chloride; broadcast w/ incorp. in fert. in spr. bef. plant.: 0.0163456 kg; = p2702*2.2166666667
- Zeta-cypermethrin [air, non-urban air or from high stacks]: 3.72845e-6 kg; = 1.0 * (p3894)
- Phosphorous; applied in sewage sludge: 1.99737e-9 kg; = p3241
- Superphosphate, grades<= 22%; no broadcast in fert. in fall bef. plant.; kg P: 8.45381e-6 kg; = p2462
- Pesticide formulation balance; banded or side-dressed: 0.00143261 kg; = p3690
- Tribufos: 0.000298276 kg; = p3888
- Acetonitrile [air, non-urban air or from high stacks]: 3.77012e-6 kg; = 1.0 * (p2155*1.7083333333)
- Zinc compounds: 2.27284e-7 kg; = p3232
- Monoammonium phosphate; broadcast w/ incorp. in fert. after plant.: 0.000699441 kg; = p2771*8.2142857143
- Aqueous ammonia; no broadcast in fert. after plant.: 0.00027858 kg; = p2552*1.2142857143
- Superphosphate, grades>22%; broadcast w/o incorp. in fert. in spr. bef. plant.; kg P: 0.000164659 kg; = p2893
- Cypermethrin: 1.24282e-5 kg; = p3743
- Monoammonium phosphate; broadcast w/o incorp. in fert. in spr. bef. plant.: 0.00245671 kg; = p2888*8.2142857143
- Ethephon: 0.000309461 kg; = p3769
- Methyl parathion [soil, agricultural]: 0.000725074 kg; = 1.0 * (p4237+p4443+p5061+p3619+p4649+p5267+p4031)
- Sodium nitrate; broadcast w/ incorp. in fert. in spr. bef. plant.: 2.79207e-5 kg; = p2681*6.0714285714
- Monoammonium phosphate; broadcast w/o incorp. in fert. in fall bef. plant.: 0.00236563 kg; = p2849*8.2142857143
- Urea, sulfate; banded or side-dressed; kg AI: 2.37634e-5 kg; = p3624
- Dimethoate: 4.97126e-6 kg; = p3759
- Cyanazine [soil, agricultural]: 0.000234205 kg; = 1.0 * (p4975+p3945+p4563+p4357+p5181+p4151+p3533)
- Dinitrogen monoxide [air, non-urban air or from high stacks]: 1.25741e-6 kg; = 1.0 * (p2044*1.5714285714)
- Carbon [soil, agricultural]: 0.842335 kg; = 1.0 * (p3225+p3242+p3217+p2167+p2173)
- Potassium chloride; unspec. appl. method in fert. after plant.: 0.000364353 kg; = p3170*2.2166666667
- Disulfoton: 1.11853e-5 kg; = p3760
- Magnesium [soil, agricultural]: 0.00107224 kg; = 1.0 * (p3227)
- Superphosphate, grades<= 22%; broadcast w/o incorp. in fert. in fall bef. plant.; kg P: 1.35286e-5 kg; = p2852
- Phosphorous; in above-ground residue left on field: 0.00283876 kg; = p2169
- Mepiquat chloride [soil, agricultural]: 4.27772e-6 kg; = 1.0 * (p4640+p5052+p5258+p4228+p4022+p3610+p4434)
- Urea, sulfate; broadcast with incorporation; kg AI: 2.99131e-5 kg; = p4036
- Superphosphate, grades<= 22%; no broadcast in fert. in spr. bef. plant.; kg P: 8.7793e-6 kg; = p2501
- Pesticide formulation balance; unspec. appl. method: 0.000310838 kg; = p5338
- Nitrogen solution; broadcast w/o incorp. in fert. after plant.; broadcast w/o incorp. in fert. after plant.; kg N: 0.00251719 kg; = p2951
- Nitrogen solution; broadcast w/ incorp. in fert. at plant.; broadcast w/ incorp. in fert. at plant.; kg N: 0.00189934 kg; = p2717
- Nitrogen solution; no broadcast in fert. in fall bef. plant.; no broadcast in fert. in fall bef. plant.; kg N: 0.00355811 kg; = p2444
- Diammonium phosphate; broadcast w/ incorp. in fert. after plant.: 0.00182078 kg; = p2767*4.7142857143
- Cyfluthrin [soil, agricultural]: 2.13886e-6 kg; = 1.0 * (p5183+p4565+p4977+p3947+p4359+p3535+p4153)
- Monoammonium phosphate; no broadcast in fert. in fall bef. plant.: 0.00147825 kg; = p2459*8.2142857143
- Other single K nutrients; broadcast w/o incorp. in fert. after plant.; kg K: 0.000196769 kg; = p2977
- Urea; broadcast w/ incorp. in fert. at plant.: 0.00275267 kg; = p2724*5
- Superphosphate, grades>22%; broadcast w/ incorp. in fert. in fall bef. plant.; kg P: 0.000167387 kg; = p2659
- Potassium chloride; unspec. appl. method in fert. in spr. bef. plant.: 0.00117923 kg; = p3092*2.2166666667
- Fluometuron [soil, agricultural]: 0.0002449 kg; = 1.0 * (p4400+p5018+p3576+p4606+p5224+p3988+p4194)
- Ammonium nitrate; broadcast w/o incorp. in fert. in fall bef. plant.: 0.000942628 kg; = p2827*4.7142857143
- Other single phosphates; unspec. appl. method in fert. in fall bef. plant.; kg P: 4.64547e-6 kg; = p3051
- Other single phosphates; no broadcast in fert. in fall bef. plant.; kg P: 3.82105e-5 kg; = p2466
- Acetol; from residue burning: 6.76226e-5 kg; = p2134*2.0555555556
- Imidacloprid: 6.21408e-6 kg; = p3802
- Butadiene [air, non-urban air or from high stacks]: 2.70979e-6 kg; = 1.0 * (p2143*1.125)
- Superphosphate, grades<= 22%; broadcast w/ incorp. in fert. in fall bef. plant.; kg P: 1.42822e-5 kg; = p2657
- Diammonium phosphate; no broadcast in fert. in fall bef. plant.: 0.00384816 kg; = p2455*4.7142857143
- Anhydrous ammonia; no broadcast in fert. after plant.: 0.013699 kg; = p2550*1.2142857143
- isobutene: 2.09917e-6 kg; = p2150*1.1666666667
- Etridiazole: 2.48563e-6 kg; = p3771
- Paraquat dichloride: 4.47413e-5 kg; = p3838
- Oxygen; applied in limestone: 0.0350963 kg; = p3219
- Urea; broadcast w/o incorp. in fert. in fall bef. plant.: 0.00143414 kg; = p2841*5
- Monoammonium phosphate; unspec. appl. method in fert. after plant.: 5.03332e-5 kg; = p3161*8.2142857143
- Sodium chlorate: 7.48601e-5 kg; = p4279+p3661+p4073+p5103+p5309+p4485+p4691
- Urea; no broadcast in fert. after plant.: 0.0131173 kg; = p2568*5
- Ammonium nitrate; no broadcast in fert. in fall bef. plant.: 0.00338937 kg; = p2437*4.7142857143
- Cypermethrin [soil, agricultural]: 1.06943e-5 kg; = 1.0 * (p3949+p3537+p4361+p4979+p4567+p4155+p5185)
- Nitrogen dioxide: 6.18035e-5 kg; = p2039*3.2857142857
- Dioxins and furans (PCDD/F); from residue burning: 5.3879e-13 kg TEQ; = p2047
- Aqueous ammonia; broadcast w/o incorp. in fert. in fall bef. plant.: 3.04575e-5 kg; = p2825*1.2142857143
- Diammonium phosphate; broadcast w/o incorp. in fert. after plant.: 0.00172469 kg; = p2962*4.7142857143
- Ammonium nitrate; broadcast w/o incorp. in fert. in spr. bef. plant.: 0.00120872 kg; = p2866*4.7142857143
- Quizalofop ethyl ester: 3.72845e-6 kg; = p3862
- Prometryn [soil, agricultural]: 0.000100526 kg; = 1.0 * (p5290+p4672+p4260+p4466+p5084+p3642+p4054)
- Other single phosphates; broadcast w/ incorp. in fert. after plant.; kg P: 1.80795e-5 kg; = p2778
- Nitrogen solution; broadcast w/o incorp. in fert. in spr. bef. plant.; broadcast w/o incorp. in fert. in spr. bef. pl...: 0.0012689 kg; = p2873
- Nitrogen solution; broadcast w/ incorp. in fert. after plant.; broadcast w/ incorp. in fert. after plant.; kg N: 0.00498143 kg; = p2756
- Nitrogen; applied in sewage sludge: 1.67317e-8 kg; = p3240
- Superphosphate, grades>22%; no broadcast in fert. after plant.; kg P: 2.77484e-5 kg; = p2581
- Carbon monoxide, fossil [air, non-urban air or from high stacks]: 0.00131283 kg; = 1.0 * (p2028*2.3333333333)
- Metalaxil [soil, agricultural]: 3.20829e-6 kg; = 1.0 * (p3615+p4233+p5057+p5263+p4439+p4645+p4027)
- Trifluralin [air, non-urban air or from high stacks]: 9.07255e-5 kg; = 1.0 * (p3892)
- Sodium chlorate [air, non-urban air or from high stacks]: 8.69971e-5 kg; = 1.0 * (p3867)
- Nitrogen solution; no broadcast in fert. in spr. bef. plant.; no broadcast in fert. in spr. bef. plant.; kg N: 0.00456252 kg; = p2483
- Metalaxil: 3.72845e-6 kg; = p3821
- Metolachlor [soil, agricultural]: 0.00011229 kg; = 1.0 * (p5062+p4238+p4444+p3620+p4032+p5268+p4650)
- Fenoxaprop P; broadcast with incorporation: 1.73409e-6 kg; = p3978
- Seeds; used in planting and sowing: 0.0127988 kg; = p2179
- Urea; no broadcast in fert. in fall bef. plant.: 0.00515667 kg; = p2451*5
- Diammonium phosphate; broadcast w/ incorp. in fert. in fall bef. plant.: 0.00650125 kg; = p2650*4.7142857143
- Other single K nutrients; broadcast w/o incorp. in fert. in fall bef. plant.; kg K: 0.000210271 kg; = p2860
- Spinosad [soil, agricultural]: 3.20829e-6 kg; = 1.0 * (p5104+p4692+p5310+p4486+p4280+p3662+p4074)
- Bromoxynil [soil, agricultural]: 3.63606e-5 kg; = 1.0 * (p5159+p4129+p4541+p4953+p3923+p3511+p4335)
- Fenoxaprop P; unspec. appl. method: 2.989e-7 kg; = p5214
- Toluene [air, non-urban air or from high stacks]: 3.42081e-6 kg; = 1.0 * (p2141*1.0952380952)
- Aqueous ammonia; broadcast w/ incorp. in fert. in spr. bef. plant.: 7.7289e-5 kg; = p2669*1.2142857143
- Carbofuran: 1.61566e-5 kg; = p3724
- Urea, sulfate; broadcast by air; kg AI: 8.57542e-5 kg; = p3830
- Monoammonium phosphate; unspec. appl. method in fert. in spr. bef. plant.: 0.000186639 kg; = p3083*8.2142857143
- Diuron: 0.000239863 kg; = p3761
- Ethene [air, non-urban air or from high stacks]: 2.61315e-5 kg; = 1.0 * (p2125*1.1666666667)
- Potassium chloride; broadcast w/ incorp. in fert. in fall bef. plant.: 0.00539694 kg; = p2663*2.2166666667
- Paraquat dichloride: 3.84995e-5 kg; = p5280+p3632+p5074+p4044+p4662+p4250+p4456
- Fenoxaprop P; broadcast without incorporation: 2.1833e-7 kg; = p4184
- Superphosphate, grades<= 22%; unspec. appl. method in fert. after plant.; kg P: 2.87845e-7 kg; = p3164
- Filler materials, applied with synthetic fertilizer: 0.0974779 kg; = p2432
- Ammonium nitrate; broadcast w/o incorp. in fert. after plant.: 0.00239782 kg; = p2944*4.7142857143
- Methane: 5.91628e-5 kg; = p2025*1.3333333333
- Benzene [air, non-urban air or from high stacks]: 2.75585e-6 kg; = 1.0 * (p2140*1.0833333333)
- Trifluralin [soil, agricultural]: 7.80684e-5 kg; = 1.0 * (p4510+p4304+p4098+p4716+p5128+p5334+p3686)
- Potassium chloride; no broadcast in fert. in fall bef. plant.: 0.00416263 kg; = p2468*2.2166666667
- Acetaldehyde [air, non-urban air or from high stacks]: 2.23372e-5 kg; = 1.0 * (p2130*1.8333333333)
- Acephate [air, non-urban air or from high stacks]: 0.000160323 kg; = 1.0 * (p3699)
- Dicrotophos: 6.21408e-5 kg; = p3752
- Bromoxynil: 4.22557e-5 kg; = p3717
- Superphosphate, grades<= 22%; broadcast w/o incorp. in fert. in spr. bef. plant.; kg P: 1.40494e-5 kg; = p2891
- Other single phosphates; broadcast w/ incorp. in fert. in fall bef. plant.; kg P: 6.45545e-5 kg; = p2661
- Lambda-cyhalothrin [soil, agricultural]: 5.34715e-6 kg; = 1.0 * (p3601+p4013+p4425+p5043+p5249+p4631+p4219)
- Potassium; in below-ground residue; biogenic: 0.000909728 kg; = p2176
- Imidacloprid [soil, agricultural]: 5.34715e-6 kg; = 1.0 * (p5244+p4626+p5038+p4008+p4420+p4214+p3596)
- Fenoxaprop P; banded or side-dressed: 1.37759e-6 kg; = p3566
- Superphosphate, grades>22%; no broadcast in fert. in fall bef. plant.; kg P: 9.90783e-5 kg; = p2464
- Urea; no broadcast in fert. in spr. bef. plant.: 0.00661234 kg; = p2490*5
- Anhydrous ammonia; broadcast w/o incorp. in fert. at plant.: 0.00145265 kg; = p2901*1.2142857143
- Ammonium sulfate; no broadcast in fert. at plant.: 0.00119559 kg; = p2518*4.7142857143
- Fenoxaprop P; broadcast by air: 4.97126e-6 kg; = p3772
- Oxygen; applied in dolomite: 0.00424327 kg; = p3228
- Aldicarb [soil, agricultural]: 0.000102665 kg; = 1.0 * (p4529+p3499+p4117+p5147+p4941+p4323+p3911)
- Fluazifop-P-butyl [soil, agricultural]: 3.20829e-6 kg; = 1.0 * (p4188+p3570+p4394+p5012+p5218+p4600+p3982)
- Pyrithiobac sodium salt [soil, agricultural]: 1.17637e-5 kg; = 1.0 * (p4272+p4066+p5096+p5302+p3654+p4478+p4684)
- Bifenthrin [soil, agricultural]: 4.27772e-6 kg; = 1.0 * (p4539+p3509+p4127+p5157+p4951+p3921+p4333)
- Acephate [soil, agricultural]: 0.000137957 kg; = 1.0 * (p4935+p4317+p5141+p3905+p4523+p4111+p3493)
- Anhydrous ammonia; broadcast w/ incorp. in fert. at plant.: 0.00287473 kg; = p2706*1.2142857143
- Superphosphate, grades>22%; broadcast w/ incorp. in fert. in spr. bef. plant.; kg P: 0.000173832 kg; = p2698
- Ammonium sulfate; broadcast w/o incorp. in fert. at plant.: 0.000332509 kg; = p2908*4.7142857143
- MSMA [soil, agricultural]: 0.000340079 kg; = 1.0 * (p3625+p4655+p4037+p4449+p5067+p4243+p5273)
- Anhydrous ammonia; broadcast w/ incorp. in fert. in fall bef. plant.: 0.00296396 kg; = p2628*1.2142857143
- Ammonium nitrate; no broadcast in fert. in spr. bef. plant.: 0.00434615 kg; = p2476*4.7142857143
- Pesticide formulation balance; foliar or directed spray: 0.000280668 kg; = p4720
- Ammonium sulfate; broadcast w/o incorp. in fert. in fall bef. plant.: 0.000342829 kg; = p2830*4.7142857143
- Sodium nitrate; no broadcast in fert. after plant.: 0.000100637 kg; = p2564*6.0714285714
- Clethodim [air, non-urban air or from high stacks]: 1.49138e-5 kg; = 1.0 * (p3732)
- Ammonium nitrate; no broadcast in fert. after plant.: 0.00862174 kg; = p2554*4.7142857143
- 1-Butene: 2.40418e-6 kg; = p2144*1.1666666667
- Norflurazon [soil, agricultural]: 2.13886e-5 kg; = 1.0 * (p4040+p4658+p4452+p5276+p4246+p3628+p5070)
- Anhydrous ammonia; no broadcast in fert. in fall bef. plant.: 0.00538534 kg; = p2433*1.2142857143
- Glyphosate [soil, agricultural]: 0.000313343 kg; = 1.0 * (p3586+p4410+p5028+p3998+p5234+p4616+p4204)
- Clethodim [soil, agricultural]: 1.28332e-5 kg; = 1.0 * (p4144+p5174+p4556+p3526+p3938+p4968+p4350)
- Nitrogen solution; broadcast w/o incorp. in fert. at plant.; broadcast w/o incorp. in fert. at plant.; kg N: 0.000959768 kg; = p2912
- Superphosphate, grades>22%; broadcast w/o incorp. in fert. after plant.; kg P: 4.44056e-5 kg; = p2971
- 2,4-D [soil, agricultural]: 3.42218e-5 kg; = 1.0 * (p5133+p3485+p4927+p4309+p4103+p4515+p3897)
- Sodium nitrate; broadcast w/ incorp. in fert. at plant.: 2.11187e-5 kg; = p2720*6.0714285714
- Fenoxaprop P; chiseled or injected/knifed in: 2.30915e-8 kg; = p4390
- Acetone [air, non-urban air or from high stacks]: 8.01468e-6 kg; = 1.0 * (p2139*1.6111111111)
- Pentane [air, non-urban air or from high stacks]: 3.7995e-7 kg; = 1.0 * (p2152*1.0166666667)
- Sodium nitrate; no broadcast in fert. in fall bef. plant.: 3.95624e-5 kg; = p2447*6.0714285714
- Sodium nitrate; broadcast w/o incorp. in fert. at plant.: 1.06716e-5 kg; = p2915*6.0714285714
- Diammonium phosphate; broadcast w/ incorp. in fert. in spr. bef. plant.: 0.00675156 kg; = p2689*4.7142857143
- Other single phosphates; broadcast w/o incorp. in fert. in spr. bef. plant.; kg P: 6.35023e-5 kg; = p2895
- Superphosphate, grades<= 22%; broadcast w/ incorp. in fert. after plant.; kg P: 3.99997e-6 kg; = p2774
- Plant dry matter; in below-ground residue: 0.286575 kg; = p2177
- Ammonium sulfate; broadcast w/ incorp. in fert. after plant.: 0.0017258 kg; = p2752*4.7142857143
- Monoammonium phosphate; broadcast w/o incorp. in fert. after plant.: 0.000662532 kg; = p2966*8.2142857143
- Glyphosate [air, non-urban air or from high stacks]: 0.000364145 kg; = 1.0 * (p3792)
- Pesticide formulation balance; broadcast with incorporation: 0.00180335 kg; = p4102
- Urea, sulfate; in seed furrow; kg AI: 6.13805e-6 kg; = p5066
- Potassium; in above-ground residue left on field; biogenic: 0.00215165 kg; = p2170
- Aqueous ammonia; broadcast w/o incorp. in fert. in spr. bef. plant.: 3.90553e-5 kg; = p2864*1.2142857143
- Ammonium nitrate; broadcast w/ incorp. in fert. in spr. bef. plant.: 0.00239201 kg; = p2671*4.7142857143
- Pyrithiobac sodium salt: 1.3671e-5 kg; = p3860
- Other single K nutrients; unspec. appl. method in fert. in spr. bef. plant.; kg K: 5.19667e-5 kg; = p3094
- 2,4-D [air, non-urban air or from high stacks]: 3.97701e-5 kg; = 1.0 * (p3691)
- Thidiazuron [soil, agricultural]: 2.45969e-5 kg; = 1.0 * (p4497+p4291+p3673+p4703+p4085+p5321+p5115)
- Sulfur [soil, agricultural]: 8.84198e-7 kg; = 1.0 * (p3230)
- Particulates, < 2.5 um [air, non-urban air or from high stacks]: 0.00011117 kg; = 1.0 * (p2033+p2035)
- Dimethipin [soil, agricultural]: 9.62488e-6 kg; = 1.0 * (p4170+p4376+p4994+p5200+p3552+p3964+p4582)
- Nitrogen solution; broadcast w/o incorp. in fert. in fall bef. plant.; broadcast w/o incorp. in fert. in fall bef. pl...: 0.000989557 kg; = p2834
- Cyfluthrin [air, non-urban air or from high stacks]: 2.48563e-6 kg; = 1.0 * (p3741)
- Cyclanilide [soil, agricultural]: 7.48601e-6 kg; = 1.0 * (p3946+p4152+p4976+p4564+p4358+p3534+p5182)
- Ammonium sulfate; no broadcast in fert. in fall bef. plant.: 0.0012327 kg; = p2440*4.7142857143
- Ammonium sulfate; broadcast w/ incorp. in fert. in fall bef. plant.: 0.000678445 kg; = p2635*4.7142857143
- Diammonium phosphate; unspec. appl. method in fert. after plant.: 0.000131027 kg; = p3157*4.7142857143
- Ammonium sulfate; broadcast w/ incorp. in fert. in spr. bef. plant.: 0.000869962 kg; = p2674*4.7142857143
- Malathion: 0.00390617 kg; = p3809
- Other single phosphates; unspec. appl. method in fert. after plant.; kg P: 1.30104e-6 kg; = p3168
- Sodium nitrate; broadcast w/o incorp. in fert. in spr. bef. plant.: 1.41088e-5 kg; = p2876*6.0714285714
- Pendimethalin [air, non-urban air or from high stacks]: 8.82399e-5 kg; = 1.0 * (p3840)
- Cyclanilide: 8.69971e-6 kg; = p3740
- Urea; broadcast w/ incorp. in fert. after plant.: 0.00721945 kg; = p2763*5
- Superphosphate, grades>22%; unspec. appl. method in fert. in spr. bef. plant.; kg P: 1.25093e-5 kg; = p3088
- Aldicarb: 0.00011931 kg; = p3705
- Sodium nitrate; no broadcast in fert. at plant.: 3.83715e-5 kg; = p2525*6.0714285714
- Anhydrous ammonia; broadcast w/o incorp. in fert. in fall bef. plant.: 0.00149773 kg; = p2823*1.2142857143
- Other single K nutrients; no broadcast in fert. in spr. bef. plant.; kg K: 0.000555582 kg; = p2509
- Methyl parathion [air, non-urban air or from high stacks]: 0.000842629 kg; = 1.0 * (p3825)
- Methanol [air, non-urban air or from high stacks]: 5.90258e-5 kg; = 1.0 * (p2129*2.6666666667)
- Dicrotophos [soil, agricultural]: 5.34715e-5 kg; = 1.0 * (p4576+p4988+p4164+p4370+p3958+p5194+p3546)
- Sodium nitrate; broadcast w/ incorp. in fert. in fall bef. plant.: 2.17742e-5 kg; = p2642*6.0714285714
- Clomazone: 2.23707e-5 kg; = p3734
- Nitrogen solution; broadcast w/ incorp. in fert. in spr. bef. plant.; broadcast w/ incorp. in fert. in spr. bef. plan...: 0.0025111 kg; = p2678
- Aqueous ammonia; broadcast w/o incorp. in fert. at plant.: 2.95407e-5 kg; = p2903*1.2142857143
- Ammonium nitrate; broadcast w/ incorp. in fert. after plant.: 0.00474519 kg; = p2749*4.7142857143
- Sodium nitrate; broadcast w/ incorp. in fert. after plant.: 5.53882e-5 kg; = p2759*6.0714285714
- Quintozene: 4.10129e-5 kg; = p3839
- Isoprene [air, non-urban air or from high stacks]: 6.77681e-6 kg; = 1.0 * (p2145*1.1333333333)
- Other single K nutrients; broadcast w/ incorp. in fert. in spr. bef. plant.; kg K: 0.000720323 kg; = p2704
- Diammonium phosphate; no broadcast in fert. after plant.: 0.00107774 kg; = p2572*4.7142857143
- Diammonium phosphate; broadcast w/o incorp. in fert. in spr. bef. plant.: 0.00639528 kg; = p2884*4.7142857143
- MSMA: 0.000395215 kg; = p3831
- Fluazifop-p-butyl [air, non-urban air or from high stacks]: 3.72845e-6 kg; = 1.0 * (p3776)
- Clomazone [soil, agricultural]: 1.92498e-5 kg; = 1.0 * (p4146+p3528+p4558+p4970+p5176+p3940+p4352)
- Ethane [air, non-urban air or from high stacks]: 1.63203e-5 kg; = 1.0 * (p2126*1.25)
- Anhydrous ammonia; broadcast w/ incorp. in fert. in spr. bef. plant.: 0.00380065 kg; = p2667*1.2142857143
- Pendimethalin [soil, agricultural]: 7.59296e-5 kg; = 1.0 * (p4458+p4046+p4664+p4252+p5282+p5076+p3634)
- Pesticide formulation balance; chiseled or injected/knifed in: 2.40137e-5 kg; = p4514
- Sewage sludge dry matter; applied in sewage sludge: 1.85236e-9 kg; = p3243
- Aqueous ammonia; broadcast w/ incorp. in fert. after plant.: 0.000153323 kg; = p2747*1.2142857143
- Monoammonium phosphate; broadcast w/ incorp. in fert. in spr. bef. plant.: 0.00259358 kg; = p2693*8.2142857143
- Phosphorous; in below-ground residue: 0.00120024 kg; = p2175

## Sampling procedure
A delete-a-group jackknife is used by the USDA to estimate the ARMS sample means and RSEs, based on a 15 sample delete-a-group jackknife. Because of this relatively small sample size, a Students t distribution is used to represent ARMS data probability density functions. Other representations of uncertainty are described in Cooper, J.S., Kahn, E., Noon, M. (2012). LCA Digital Commons Unit Process Data: field crop production Version 1. Prepared for the US Department of Agriculture National Agricultural Library. Retrieved from https://www.lcacommons.gov/discovery/docs/LCA%20Digital%20Commons%20Unit%20Process%20Data%20final%20updated.pdf

## Extrapolations
Data represent an aggregation of processes applied in Louisiana in 1999. Data development is demonstrated by parameterization (exlicitly presents all raw and uncertainty data and all calculations). Flow data quality according to the LCADC convention is provided for all flows.
