# soybeans; at harvest in 1999; at farm; 85%-92% moisture

Dataset: EcoSpold 2, unit process
Geography: GLO
Time period: 1999-01-02 to 2000-01-01
Scenario: Business-as-Usual
System model: Allocation, ecoinvent default
Generated by: cooperjs@u.washington.edu
isCopyrightProtected: false

## General comment
This unit process/ gate-to-gate dataset represents the production of 1 kg soybeans coproduced with residue. The process technologies are an aggregation of those applied in Minnesota in 1999. Applicable classifications include ISIC 0111, NAIC 111110, UNSPSC 50407053; this dataset was prepared in ILCD format using the UWDFE Lab Excel to ILCD File Generator (beta version, August 2013)

Exchange "Metribuzin-soil agricultural" is the result of combining the following original LCA Commons flows: "Metribuzin; broadcast with incorporation; kg AI", "Metribuzin; foliar or directed spray; kg AI", "Metribuzin; banded or side-dressed; kg AI", "Metribuzin; unspec. appl. method; kg AI", "Metribuzin; broadcast without incorporation; kg AI".
Exchange "Bentazone-soil agricultural" is the result of combining the following original LCA Commons flows: "Bentazon; broadcast without incorporation; kg AI", "Bentazon; broadcast with incorporation; kg AI", "Bentazon; foliar or directed spray; kg AI", "Bentazon; banded or side-dressed; kg AI", "Bentazon; unspec. appl. method; kg AI".
Exchange "NMVOC, non-methane volatile organic compounds, unspecified origin-air low population density" is the result of combining the following original LCA Commons flows: "NMVOCs; from residue burning; kg except C, biogenic", "NMVOCs; from residue burning; kg C, biogenic".
Exchange "Glyphosate-soil agricultural" is the result of combining the following original LCA Commons flows: "Glyphosate; unspec. appl. method; kg AI", "Glyphosate; banded or side-dressed; kg AI", "Glyphosate; broadcast without incorporation; kg AI", "Glyphosate; foliar or directed spray; kg AI", "Glyphosate; broadcast with incorporation; kg AI".
Exchange "Imazethapyr-soil agricultural" is the result of combining the following original LCA Commons flows: "Imazethapyr; broadcast with incorporation; kg AI", "Imazethapyr; banded or side-dressed; kg AI", "Imazethapyr; broadcast without incorporation; kg AI", "Imazethapyr; foliar or directed spray; kg AI", "Imazethapyr; unspec. appl. method; kg AI".
Exchange "Carbon-soil agricultural" is the result of combining the following original LCA Commons flows: "Carbon; using unspec. method in manure at an unknown time", "Carbon; in below-ground residue; biogenic", "Carbon; broadcast w/o incorp. in manure at an unknown time", "Carbon; applied in sewage sludge", "Carbon; applied in limestone", "Carbon; applied in dolomite", "Carbon; broadcast w/ incorp. in manure at an unknown time", "Carbon; in above-ground residue left on field; biogenic".
Exchange "Particulates, < 2.5 um-air low population density" is the result of combining the following original LCA Commons flows: "PM2.5; from residue burning; kg except C, biogenic", "PM2.5; from residue burning; kg C, biogenic".
Exchange "Pesticides, unspecified-soil agricultural" is the result of combining the following original LCA Commons flows: "Unspecified pesticide; unspec. appl. method; kg AI", "Unspecified pesticide; banded or side-dressed; kg AI", "Unspecified pesticide; broadcast with incorporation; kg AI", "Unspecified pesticide; foliar or directed spray; kg AI", "Unspecified pesticide; broadcast without incorporation; kg AI".
Exchange "Sethoxydim-soil agricultural" is the result of combining the following original LCA Commons flows: "Sethoxydim; banded or side-dressed; kg AI", "Sethoxydim; foliar or directed spray; kg AI", "Sethoxydim; broadcast without incorporation; kg AI", "Sethoxydim; unspec. appl. method; kg AI", "Sethoxydim; broadcast with incorporation; kg AI".
Exchange "Fluazifop-P-butyl-soil agricultural" is the result of combining the following original LCA Commons flows: "Fluazifop-p-butyl; banded or side-dressed; kg AI", "Fluazifop-p-butyl; foliar or directed spray; kg AI", "Fluazifop-p-butyl; broadcast with incorporation; kg AI", "Fluazifop-p-butyl; unspec. appl. method; kg AI", "Fluazifop-p-butyl; broadcast without incorporation; kg AI".
Exchange "Lactofen-soil agricultural" is the result of combining the following original LCA Commons flows: "Lactofen; unspec. appl. method; kg AI", "Lactofen; broadcast with incorporation; kg AI", "Lactofen; banded or side-dressed; kg AI", "Lactofen; broadcast without incorporation; kg AI", "Lactofen; foliar or directed spray; kg AI".
Exchange "Ash-soil agricultural" is the result of combining the following original LCA Commons flows: "Ash; from residue burning; kg except C, biogenic", "Ash; from residue burning; kg C, biogenic".
Exchange "Trifluralin-soil agricultural" is the result of combining the following original LCA Commons flows: "Trifluralin; broadcast without incorporation; kg AI", "Trifluralin; unspec. appl. method; kg AI", "Trifluralin; banded or side-dressed; kg AI", "Trifluralin; foliar or directed spray; kg AI", "Trifluralin; broadcast with incorporation; kg AI".
Exchange "Water-soil agricultural" is the result of combining the following original LCA Commons flows: "Water; in below-ground residue; biogenic", "Water; broadcast w/ incorp. in manure", "Water; in above-ground residue left on field; biogenic", "Water; from irrigation and applied with manure and sewage sludge", "Water; broadcast w/o incorp. in manure", "Water; using unspec. method in manure".
Exchange "Pendimethalin-soil agricultural" is the result of combining the following original LCA Commons flows: "Pendimethalin; broadcast with incorporation; kg AI", "Pendimethalin; broadcast without incorporation; kg AI", "Pendimethalin; unspec. appl. method; kg AI", "Pendimethalin; foliar or directed spray; kg AI", "Pendimethalin; banded or side-dressed; kg AI".
Exchange "Water, unspecified origin-resource in water" is the result of combining the following original LCA Commons flows: "Water; from plant uptake; biogenic", "Water; withdrawal from unspec. source, for soybeans, in 1999".
Exchange "Fomesafen-soil agricultural" is the result of combining the following original LCA Commons flows: "Sodium bentazon; unspec. appl. method; kg AI", "Sodium bentazon; broadcast without incorporation; kg AI", "Sodium bentazon; banded or side-dressed; kg AI", "Sodium bentazon; broadcast with incorporation; kg AI", "Sodium bentazon; foliar or directed spray; kg AI".
Exchange "Particulates, < 10 um-air low population density" is the result of combining the following original LCA Commons flows: "PM10; from residue burning; kg C, biogenic", "PM10; from residue burning; kg except C, biogenic".
Exchange "Transformation, from arable-resource land" is the result of combining the following original LCA Commons flows: "Transformation; from arable, from soy to soybeans", "Transformation; from arable, from corn to soybeans", "Transformation; from arable, from fallow to soybeans", "Transformation; from arable, from unspec. use to soybeans", "Transformation; from arable, from small grains to soybeans", "Transformation; from arable, from other to soybeans".
Exchange "Calcium-soil agricultural" is the result of combining the following original LCA Commons flows: "Calcium; applied in limestone", "Calcium; applied in dolomite".
Exchange "Imazamox-soil agricultural" is the result of combining the following original LCA Commons flows: "Imazamox; broadcast with incorporation; kg AI", "Imazamox; banded or side-dressed; kg AI", "Imazamox; foliar or directed spray; kg AI", "Imazamox; broadcast without incorporation; kg AI", "Imazamox; unspec. appl. method; kg AI".
Exchange "Ethyne-2bdf9967-6dae-4183-88d1-8f612548c51e low population density" was originally named: "Acetylene; from residue burning; kg C, biogenic" in this dataset.
Exchange "Formaldehyde-2bdf9967-6dae-4183-88d1-8f612548c51e low population density" was originally named: "Formaldehyde; from residue burning; kg C, biogenic" in this dataset.
Exchange "Phosphorus-c19fb2d9-98eb-4cd3-8761-81b71d8a9a1b unspecified" was originally named: "Phosphorous; from plant uptake; biogenic" in this dataset.
Exchange "Ethene-2bdf9967-6dae-4183-88d1-8f612548c51e low population density" was originally named: "Ethylene; from residue burning; kg C, biogenic" in this dataset.
Exchange "Butane-2bdf9967-6dae-4183-88d1-8f612548c51e low population density" was originally named: "N butane; from residue burning; kg C, biogenic" in this dataset.
Exchange "Transformation, to arable-c19fb2d9-98eb-4cd3-8761-81b71d8a9a1b land" was originally named: "Transformation; to arable, to soybeans" in this dataset.
Exchange "Toluene-2bdf9967-6dae-4183-88d1-8f612548c51e low population density" was originally named: "Toluene; from residue burning; kg C, biogenic" in this dataset.
Exchange "Carbon monoxide, fossil-2bdf9967-6dae-4183-88d1-8f612548c51e low population density" was originally named: "Carbon monoxide; from residue burning; kg C, biogenic" in this dataset.
Exchange "Sulfur dioxide-2bdf9967-6dae-4183-88d1-8f612548c51e low population density" was originally named: "Sulfur dioxide; from residue burning; biogenic" in this dataset.
Exchange "Carbon dioxide-c19fb2d9-98eb-4cd3-8761-81b71d8a9a1b unspecified" was originally named: "Carbon dioxide; from plant uptake; kg C, biogenic" in this dataset.
Exchange "Acetonitrile-2bdf9967-6dae-4183-88d1-8f612548c51e low population density" was originally named: "Acetonitrile; from residue burning; kg C, biogenic" in this dataset.
Exchange "Acetone-2bdf9967-6dae-4183-88d1-8f612548c51e low population density" was originally named: "Acetone; from residue burning; kg C, biogenic" in this dataset.
Exchange "Nitrogen dioxide-2bdf9967-6dae-4183-88d1-8f612548c51e low population density" was originally named: "Nitrogen dioxide; from residue burning; kg N, biogenic" in this dataset.
Exchange "Acetic acid-2bdf9967-6dae-4183-88d1-8f612548c51e low population density" was originally named: "Acetic acid; from residue burning; kg C, biogenic" in this dataset.
Exchange "Isoprene-2bdf9967-6dae-4183-88d1-8f612548c51e low population density" was originally named: "Isoprene; from residue burning; kg C, biogenic" in this dataset.
Exchange "Furan-2bdf9967-6dae-4183-88d1-8f612548c51e low population density" was originally named: "Furan; from residue burning; kg C, biogenic" in this dataset.
Exchange "Sulfuric acid-be1c0329-f1a8-4524-8420-a86d2a8dd358 agricultural" was originally named: "Sulfuric acid; as secondary application" in this dataset.
Exchange "cis-2-Butene-2bdf9967-6dae-4183-88d1-8f612548c51e low population density" was originally named: "Cis 2 butene; from residue burning; kg C, biogenic" in this dataset.
Exchange "Propene-2bdf9967-6dae-4183-88d1-8f612548c51e low population density" was originally named: "Propylene; from residue burning; kg C, biogenic" in this dataset.
Exchange "Ammonia-2bdf9967-6dae-4183-88d1-8f612548c51e low population density" was originally named: "Ammonia; from residue burning; kg N, biogenic" in this dataset.
Exchange "Ethane-2bdf9967-6dae-4183-88d1-8f612548c51e low population density" was originally named: "Ethane; from residue burning; kg C, biogenic" in this dataset.
Exchange "Hydrocyanic acid-2bdf9967-6dae-4183-88d1-8f612548c51e low population density" was originally named: "Hydrogen cyanide; from residue burning; kg C, biogenic" in this dataset.
Exchange "Propane-2bdf9967-6dae-4183-88d1-8f612548c51e low population density" was originally named: "Propane; from residue burning; kg C, biogenic" in this dataset.
Exchange "Carbon dioxide, in air-2bdf9967-6dae-4183-88d1-8f612548c51e low population density" was originally named: "Carbon dioxide; from residue burning; kg C, biogenic" in this dataset.
Exchange "Sulfur-be1c0329-f1a8-4524-8420-a86d2a8dd358 agricultural" was originally named: "Sulfur; as secondary application" in this dataset.
Exchange "Magnesium-be1c0329-f1a8-4524-8420-a86d2a8dd358 agricultural" was originally named: "Magnesium; applied in dolomite" in this dataset.
Exchange "trans-2-Butene-2bdf9967-6dae-4183-88d1-8f612548c51e low population density" was originally named: "Trans 2 butene; from residue burning; kg C, biogenic" in this dataset.
Exchange "Phenol-2bdf9967-6dae-4183-88d1-8f612548c51e low population density" was originally named: "Phenol; from residue burning; kg C, biogenic" in this dataset.
Exchange "Pentane-2bdf9967-6dae-4183-88d1-8f612548c51e low population density" was originally named: "N pentane; from residue burning; kg C, biogenic" in this dataset.
Exchange "Zinc compounds-be1c0329-f1a8-4524-8420-a86d2a8dd358 agricultural" was originally named: "Zinc compounds; as secondary application" in this dataset.
Exchange "isopentane-2bdf9967-6dae-4183-88d1-8f612548c51e low population density" was originally named: "I pentane; from residue burning; kg C, biogenic" in this dataset.
Exchange "Formic acid-2bdf9967-6dae-4183-88d1-8f612548c51e low population density" was originally named: "Formic acid; from residue burning; kg C, biogenic" in this dataset.
Exchange "Acrylonitrile-2bdf9967-6dae-4183-88d1-8f612548c51e low population density" was originally named: "Propenenitrile; from residue burning; kg C, biogenic" in this dataset.
Exchange "Methane-2bdf9967-6dae-4183-88d1-8f612548c51e low population density" was originally named: "Methane; from residue burning; kg C, biogenic" in this dataset.
Exchange "Butadiene-2bdf9967-6dae-4183-88d1-8f612548c51e low population density" was originally named: "1,3 butadiene; from residue burning; kg C, biogenic" in this dataset.
Exchange "Dinitrogen monoxide-2bdf9967-6dae-4183-88d1-8f612548c51e low population density" was originally named: "Dinitrogen monoxide; from residue burning; kg N, biogenic" in this dataset.
Exchange "Occupation, arable-c19fb2d9-98eb-4cd3-8761-81b71d8a9a1b land" was originally named: "Occupation; arable, as soybeans" in this dataset.
Exchange "1-Butene-2bdf9967-6dae-4183-88d1-8f612548c51e low population density" was originally named: "1 butene; from residue burning; kg C, biogenic" in this dataset.
Exchange "Water-2bdf9967-6dae-4183-88d1-8f612548c51e low population density" was originally named: "Water; from residue burning; biogenic" in this dataset.
Exchange "Acetaldehyde-2bdf9967-6dae-4183-88d1-8f612548c51e low population density" was originally named: "Acetaldehyde; from residue burning; kg C, biogenic" in this dataset.
Exchange "Methanol-2bdf9967-6dae-4183-88d1-8f612548c51e low population density" was originally named: "Methanol; from residue burning; kg C, biogenic" in this dataset.
Exchange "Benzene-2bdf9967-6dae-4183-88d1-8f612548c51e low population density" was originally named: "Benzene; from residue burning; kg C, biogenic" in this dataset.
Exchange "isobutene-2bdf9967-6dae-4183-88d1-8f612548c51e low population density" was originally named: "I butene; from residue burning; kg C, biogenic" in this dataset.

## Geography
The unit process is assumed to represent production in Minnesota (US State).

## Technology
This process produces soybeans; at harvest in 1999; at farm; 85%-92% moisture. The process is assumed to represent production in Minnesota (US State). Yields and related inputs and outputs represent a single year of operation, in 1999. This dataset includes consideration of residue burning; soil preparation; planting or sowing; irrigation; application, storage, and transport of fertilizers, manures, liming materials, secondary materials, and pesticides; and harvest. Fate and transport of applications are not included as described in Cooper, J.S., Kahn, E., Noon, M. (2012) LCA Digital Commons Unit Process Data: field crop production Version 1 which is available at https://www.lcacommons.gov/discovery/docs/LCA%20Digital%20Commons%20Unit%20Process%20Data%20final%20updated.pdf

## Time period
Start and end dates match the underlying data obtained from the USDA Agricultural Resource Management Survey (ARMS).
## Parameters
- p1990: 30
- p5022: 0; = p1849*p3483
- p0377: 0.5
- p3240: 4.73673e-9; = p3234*p1188*p3235/p0818
- p2361: 0; = p2225*p2189
- p3069: 6.30175e-10; = p2288*p1023
- p2949: 0; = p2363*(p1020+p1022)
- p1277: 0
- p0154: 0
- p2040: 1.56
- p0876: 783644; = p0866*p0856
- p0755: 0
- p2569: 0; = p2373*p1014
- p2070: 0.282
- p2609: 0; = p2413*p1014
- p3419: 0; = p3362*p1239
- p2002: 750
- p1874: 0
- p2467: 1.6715e-6; = p2271*p1073
- p0044: 13.251
- p2618: 0; = p2422*p1073
- p2228: 0.102765; = if(p0774*p0778+p0775*p0779+p0776*p0780+p0777*p0781=0;0;p0780*p0776/(p0774*p0778+p0775*p0779+p0776*p0780+p0777*p0781))
- p1830: 0
- p1831: 0
- p3360: 1.21847e8; = if(p1232=0;p3310+p3321+p3332+p3343+p3354;0)
- p2717: 0; = p2326*(p1019+p1021)
- p5334: 2.20403e-6; = p1955*p3484
- p0104: 13.251
- p3331: 0; = if(and(p1232=0;p3255<>0);p3255*(p3268-p3326)/p3327;0)
- p2997: 0; = p2411*(p1020+p1022)
- p3122: 0; = p2341*p1082
- p1671: 0
- p2515: 0; = p2319*p1014
- p2626: 0; = p2430*p1123
- p3156: 0; = p2375*p1082
- p1280: 0; = IF(p1277=p1263;0;IF(p1277+p1278>p1263;p1263-p1277;p1278))
- p3325: 0; = if(and(p1232=0;p3255<>0);p3267*p3289;0)
- p2507: 0.00017205; = p2311*p1123
- p0762: 0
- p0270: 35.865
- p1757: 0
- p0860: 0; = p0672*1000/p0856
- p1125: 0.21847; = if(p1121=0;p0719/100;0)
- p2765: 0; = p2374*(p1019+p1021)
- p3109: 0; = p2328*p1023
- p2498: 7.41514e-6; = p2302*p1073
- p2715: 0; = p2324*(p1019+p1021)
- p2181: 0.107092; = p0887+p0889+p0893+p2180
- p1948: 0
- p1682: 0
- p0109: 6.655
- p5128: 0; = p1955*p3483
- p0633: 0; = IF(p0369<0.5;-SQRT(p0007*EXP(p0501^2*p0008)-p0007);SQRT(p0007*EXP(p0501^2*p0008)-p0007))
- p2051: 3.30029e-5; = p2015*p2049*p2050/(p0818*1000)
- p1811: 0
- p1683: 0
- p0667: 0; = IF(p0403<0.5;-SQRT(p0007*EXP(p0535^2*p0008)-p0007);SQRT(p0007*EXP(p0535^2*p0008)-p0007))
- p1963c: 0; = p1588*p1792+p1589*p1793+p1590*p1794+p1591*p1795+p1592*p1796+p1593*p1797+p1594*p1798+p1595*p1799+p1596*p1800+p1597*p1801+p1598*p1802+p1599*p1803+p1600*p1804+p1601*p1805+p1602*p1806+p1603*p1807+p1604*p1808+p1605*p1809+p1606*p1810+p1607*p1811
- p3393: 0.00154525; = p3374*p1234
- p0368: 0.5
- p2681: 3.65014e-7; = p2290*(p1019+p1021)
- p0275: 0.5
- p1989: 50
- p1934: 0
- p2204: 0.000462649; = p1109/p0818
- p0572: 0; = IF(p0308<0.5;-SQRT(p0007*EXP(p0440^2*p0008)-p0007);SQRT(p0007*EXP(p0440^2*p0008)-p0007))
- p0757: 0
- p3169: 0; = p2388*p1082
- p2334: 0; = p2224*p2202
- p3238: 0.854735; = IF(p3237+p3235+p3236>1;1-(p3235+p3236);p3237)
- p0786: 0
- p0837: 0.5
- p2838: 2.65813e-8; = p2252*(p1020+p1022)
- p1701: 0
- p2500: 4.19265e-5; = p2304*p1073
- p2866: 1.33404e-5; = p2280*(p1020+p1022)
- p1720: 0
- p5218: 4.91345e-8; = p1839*p3484
- p1265: 0; = if(p1232>0;0;IF(p1259+p1263+p1264=1;0;IF(p1259+p1263+p1264+p1262>1;1-(p1259+p1263+p1264);p1262)))
- p0401: 0.5
- p2820: 0; = p2429*(p1128+p1130)
- p3160: 0; = p2379*p1082
- p1844: 0
- p0120: 14.094
- p2816: 0; = p2425*(p1078+p1080)
- p1551: 0
- p2160: 9.66661e-8; = p2015*p2084*p2122/(p0818*1000)
- p2146: 2.78791e-8; = p2015*p2074*p2108/(p0818*1000)
- p0139: 57.832
- p0195: 0
- p4252: 1.12338e-5; = p1903*p3479
- p1631: 0.5
- p2854: 1.07929e-6; = p2268*(p1079+p1081)
- p2218: 0.0023709; = p1150/p0818
- p2719: 0; = p2328*(p1019+p1021)
- p1207: 9.91754; = if(p1193>0;0;(p1194*p1050/p1057+p1195*p1051/p1058+p1196*p1052/p1059+p1197*p1053/p1060+p1198*p1054/p1061+p1199*p1055/p1062+p1200*p1056/p1063)/(p0702*1000)+(p1201*p1109/p1114+p1202*p1110/p1115)/(p0702*1000)+p1203*p1170/p0801+p1204*p1176/p0801)
- p3256: 1.53475e8; = p1252*(p1307*(1-p3247)+p1310*(1-p3248)+p1311*(1-p3249)+p1312*(1-p3250))
- p2349: 1.80403e-5; = p2228*p2217
- p2923: 9.61614e-6; = p2337*(p1079+p1081)
- p1088: 0; = IF(p1071=0;p1082*(p0710/100)*p0703*1000;0)
- p2303: 3.19523e-5; = p2227*p2210
- p3345: 0.160606; = if(and(p1232=0;p3256<>0);p3273*p3277*p3293;0)
- p1901: 0
- p0257: 5.898
- p2163: 0.000477108; = (p2017-p2020)/p0818-(p2025+p2028+p2033+p2034+p2051+p2125+p2126+p2127+p2128+p2129+p2130+p2131+p2132+p2133+p2134+p2135+p2136+p2137+p2138+p2139+p2140+p2141+p2142+p2143+p2144+p2145+p2146+p2147+p2148+p2149+p2150+p2151+p2152+p2153+p2154+p2155+p2156+p2157)
- p1928: 1.61031e-6; = p1520*1000/p0818
- p1915: 0
- p1582: 0
- p1075: 0.22363; = IF(p1071=0;p0713/100;0)
- p2684: 0.000134754; = p2293*(p1019+p1021)
- p0125: 66.081
- p0802: 6.9e6
- p1220: 0; = IF(p1218<0.5;-SQRT(p1214*EXP(p1219^2*p1215)-p1214);SQRT(p1214*EXP(p1219^2*p1215)-p1214))
- p2074: 0.025
- p1942: 0
- p2413: 0; = p2234*p2203
- p2105: 0.888194
- p3308: 0; = if(and(p1232=0;p3252<>0);p3252*(p3259-p3303)/p3305;0)
- p3445: 0; = p3369*p1240
- p0652: 0; = IF(p0388<0.5;-SQRT(p0007*EXP(p0520^2*p0008)-p0007);SQRT(p0007*EXP(p0520^2*p0008)-p0007))
- p1182: 1118.81; = p1181*p0801
- p2844: 9.83158e-6; = p2258*(p1079+p1081)
- p0915: 0.0289793; = p0914/p0818
- p1707: 0
- p0632: 0; = IF(p0368<0.5;-SQRT(p0007*EXP(p0500^2*p0008)-p0007);SQRT(p0007*EXP(p0500^2*p0008)-p0007))
- p2870: 5.55356e-6; = p2284*(p1020+p1022)
- p4802: 0; = p1835*p3482
- p1296: 0.0517235; = p1292*p1252/p0818
- p0943: 0; = if(and(p0683=0;p0949=0);p0937;0)
- p1134: 658078; = if(p1121=0;p1128*(p0716/100)*p0703*1000;0)
- p1307: 0
- p1192: 5.06364e-8; = p1188*p1191/p0818
- p1873: 0
- p2988: 0; = p2402*(p1020+p1022)
- p4394: 0; = p1839*p3480
- p5042: 0; = p1869*p3483
- p0908: 0.00297304
- p2287: 0.000293978; = p2223*p2193
- p3440: 0; = p3364*p1240
- p0954: 0; = if(and(p0683>0;or(p0807=56;p0807=100;and(p0807=60;p0901>0.06)));p0936;0)
- p2843: 4.2292e-6; = p2257*(p1020+p1022)
- p2674: 1.46473e-5; = p2283*(p1019+p1021)
- p2409: 0; = p2234*p2199
- p0383: 0.5
- p1584: 0
- p3336: 0.000977444; = IF(or(p3254=0;p1232>0);0;p3271*p3289)
- p3171: 0; = p2390*p1132
- p3084: 0; = p2303*p1082
- p3437: 0; = p3380*p1239
- p2314: 0.000350396; = p2231*p2221
- p0260: 31.633
- p2602: 0; = p2406*p1014
- p0382: 0.5
- p1043: 0.209623
- p0796: 13.251; = p0136*(1+p0664*p0268/100)
- p0670: 4777.83; = p0010*(1+p0538*p0142/100)
- p2613: 0; = p2417*p1073
- p0316: 0.5
- p3024: 1.4649e-10; = p2243*p1023
- p2301: 0.000163648; = p2227*p2208
- p4458: 0; = p1903*p3480
- p2140: 1.91094e-7; = p2015*p2068*p2102/(p0818*1000)
- p2090: 0.40001
- p5282: 1.33225e-6; = p1903*p3484
- p0944: 0; = if(and(p0683=0;p0950=0);p0938;0)
- p2524: 0; = p2328*p1014
- p3394: 0.000381004; = p3375*p1234
- p2009: 0.0225015; = ((p1983*p1985+p1989*p1991+p1995*p1997+p2003*p2005+p1976*p1977+p1978*p1979+p1998*p1999)/p0818)*p0005*p0002/1000
- p0510: 0; = SQRT(2)*(IF((2*p0378-1)<0;-1;IF((2*p0378-1)>0;1;0))*SQRT(SQRT((2/(pi()*0.140012289)+LN(1-(2*p0378-1)^2)/2)^2-LN(1-(2*p0378-1)^2)/0.140012289)-(2/(pi()*0.140012289)+LN(1-(2*p0378-1)^2)/2)))
- p3443: 0; = p3367*p1240
- p1081: 0; = IF(p1071=0;IF(p1073+p1078+p1079+p1080=1;0;IF(p1073+p1078+p1079+p1080+p1077>1;1-(p1073+p1078+p1079+p1080);p1077));0)
- p2434: 1.04958e-6; = p2238*p1014
- p1325: 0; = IF(((p0745*1000*p0752/100)+(p0754*1000*p0761/100))/p0801<0;0;((p0745*1000*p0752/100)+(p0754*1000*p0761/100))/p0801)
- p2085: 0.0335294
- p1975: 0.000359171; = p1970*p0001/(p0818*p0002)
- p2510: 2.92055e-5; = p2314*p1123
- p1727: 0
- p2375: 0; = p2229*p2204
- p1958: 5892
- p2159: 2.41106e-6; = p2015*p2083*p2121/(p0818*1000)
- p2284: 2.47287e-5; = p2223*p2190
- p1016: 0.22458; = IF(p1012=0;p0707/100;0)
- p3434: 0; = p3377*p1239
- p1599: 0
- p3446: 0; = p3370*p1240
- p2782: 0; = p2391*(p1128+p1130)
- p2321: 0; = p2224*p2188
- p2339: 0.000115615; = p2228*p2207
- p1062: 0.16
- p0082: 94.912
- p1692: 0
- p1780: 0
- p3447: 0; = p3371*p1240
- p1173: 0.5
- p3281: 0.46
- p0006: 15
- p3337: 0.00199123; = IF(or(p3254=0;p1232>0);0;p3272*p3289)
- p2308: 0.000153751; = p2227*p2215
- p2750: 0; = p2359*(p1019+p1021)
- p3017: 0; = p2431*(p1129+p1131)
- p1903: 5.45779e-5; = p1495*1000/p0818
- p1961: 0.5
- p0900: 1.14331; = p0899/p0818
- p1965: 0.000349243; = p1963+p1959*p1964*1000/p0818
- p2651: 8.70628e-6; = p2260*(p1078+p1080)
- p3166: 0; = p2385*p1082
- p3154: 0; = p2373*p1023
- p0902: 0
- p1086: 0; = IF(p1071=0;p1080*(p0710/100)*p0703*1000;0)
- p2731: 1.41751e-5; = p2340*(p1078+p1080)
- p0267: 13.725
- p2135: 1.08725e-6; = p2015*p2063*p2097/(p0818*1000)
- p3268: 0.0232481
- p2318: 0; = p2224*p2185
- p2385: 0; = p2229*p2214
- p2571: 0; = p2375*p1073
- p2781: 0; = p2390*(p1128+p1130)
- p3205: 0; = p2424*p1082
- p1877: 0
- p1103: 0.624059; = IF(p1071=0;IF(p1096+p1101+p1102=1;0;IF(p1096+p1101+p1102+p1099>1;1-(p1096+p1101+p1102);p1099));0)
- p3002: 0; = p2416*(p1079+p1081)
- p2945: 0; = p2359*(p1020+p1022)
- p2052: 1.66177e-6; = p2015*p2049*(1-p2050)/(p0818*1000)
- p2386: 0; = p2229*p2215
- p2549: 4.33964e-6; = p2353*p1123
- p2543: 1.97354e-6; = p2347*p1073
- p0403: 0.5
- p0999: 0; = IF(p0996=1;0;IF(p0996+p0997>1;1-p0996;p0997))
- p2757: 0; = p2366*(p1019+p1021)
- p3162: 0; = p2381*p1082
- p3405: 0; = p3367*p1238
- p1765: 0
- p1684: 0
- p1023: 1e-5; = IF(p1012=0;IF(p1014+p1019+p1020+p1021+p1022=1;0;1-(p1014+p1019+p1020+p1021+p1022));0)
- p3982: 1.17405e-6; = p1839*p3478
- p1149: 0.830148
- p3448: 0; = p3372*p1240
- p1290: 0; = IF(p1287=p1264;0;IF(p1287+p1288>p1264;p1264-p1287;p1288))
- p0664: 0; = IF(p0400<0.5;-SQRT(p0007*EXP(p0532^2*p0008)-p0007);SQRT(p0007*EXP(p0532^2*p0008)-p0007))
- p0671: 1086.49; = p0011*(1+p0539*p0143/100)
- p1556: 0
- p1853: 0
- p3270: 0.0747083
- p1637: 0
- p0547: 0; = IF(p0283<0.5;-SQRT(p0007*EXP(p0415^2*p0008)-p0007);SQRT(p0007*EXP(p0415^2*p0008)-p0007))
- p1329: 4.52769e-5; = p1328*p0001/(p0818*p0002)
- p2773: 0; = p2382*(p1078+p1080)
- p3128: 0; = p2347*p1082
- p1164: 34030.2; = p1163*p0801
- p2398: 0; = p2234*p2187
- p1749: 0
- p2041: 2.10464e-6; = p2015*p2040/(p0818*1000)
- p2194: 0.214362
- p2581: 0; = p2385*p1073
- p1017: 0; = IF(p1012=0;p0708/100;0)
- p3055: 0; = p2274*p1132
- p2253: 2.60227e-7; = p2222*p2199
- p3016: 0; = p2430*(p1129+p1131)
- p0156: 17.17
- p4071: 9.39243e-7; = p1928*p3478
- p2537: 9.49903e-7; = p2341*p1073
- p2871: 1.39658e-6; = p2285*(p1020+p1022)
- p1129: 0.21847; = if(p1121=0;IF(p1123+p1128=1;0;IF(p1123+p1128+p1125>1;1-(p1123+p1128);p1125));0)
- p0720: 0
- p2837: 1.61949e-8; = p2251*(p1020+p1022)
- p0355: 0.5
- p2888: 1.65494e-5; = p2302*(p1079+p1081)
- p3011: 0; = p2425*(p1079+p1081)
- p3432: 0; = p3375*p1239
- p3253: 0; = p1252*(p1277*(1-p3247)+p1280*(1-p3248)+p1281*(1-p3249)+p1282*(1-p3250))
- p2706: 0; = p2315*(p1019+p1021)
- p3078: 0; = p2297*p1082
- p3113: 0; = p2332*p1023
- p1708: 0
- p3428: 0; = p3371*p1239
- p1135: 205925; = if(p1121=0;p1129*(p0716/100)*p0703*1000;0)
- p0414: 0; = SQRT(2)*(IF((2*p0282-1)<0;-1;IF((2*p0282-1)>0;1;0))*SQRT(SQRT((2/(pi()*0.140012289)+LN(1-(2*p0282-1)^2)/2)^2-LN(1-(2*p0282-1)^2)/0.140012289)-(2/(pi()*0.140012289)+LN(1-(2*p0282-1)^2)/2)))
- p3356: 8.22379e7; = if(p1232=0;p3306+p3317+p3328+p3339+p3350;0)
- p2924: 3.11395e-6; = p2338*(p1079+p1081)
- p3201: 0; = p2420*p1082
- p1902: 0
- p0349: 0.5
- p3467: 0; = p3372*p1241
- p0072: 42.28
- p1726: 0
- p1131: 0; = if(p1121=0;IF(p1123+p1128+p1129+p1130=1;0;IF(p1123+p1128+p1129+p1130+p1127>1;1-(p1123+p1128+p1129+p1130);p1127));0)
- p0952: 0.000145936; = if(and(p0683>0;or(p0807=56;p0807=100;and(p0807=60;p0901>0.06)));p0934;0)
- p1153: 0.365265
- p0695: 0
- p2780: 0; = p2389*(p1128+p1130)
- p2264: 3.78492e-6; = p2226*p2210
- p3098: 0; = p2317*p1023
- p2894: 3.43833e-5; = p2308*(p1079+p1081)
- p3285: 0.275
- p3189: 0; = p2408*p1023
- p0696: 0
- p3288: 0.505
- p0781: 0
- p3145: 0; = p2364*p1023
- p2702: 0.00144115; = p2311*(p1128+p1130)
- p1755: 0
- p3148: 0; = p2367*p1023
- p0116: 23.876
- p1561: 0
- p2199: 2.20305e-6; = p1069-p2197-p2198
- p2971: 0; = p2385*(p1079+p1081)
- p2953: 0; = p2367*(p1020+p1022)
- p1923: 0
- p1914: 0
- p2589: 0; = p2393*p1014
- p1884: 0
- p3279: 0.37
- p1026: 208350; = IF(p1012=0;p1020*(p0704/100)*p0703*1000;0)
- p3025: 2.89371e-11; = p2244*p1023
- p1585: 0
- p3221: 0.146975; = IF(p3216=0;0;p1223*12.0107/100.0869+(1-p1224)*12.0107/84.3139)
- p0317: 0.5
- p1303: 0; = p1297*p1252/p0818
- p1818: 0
- p3198: 0; = p2417*p1082
- p2131: 3.52657e-7; = p2015*p2059*p2093/(p0818*1000)
- p0067: 65.195
- p3105: 0; = p2324*p1023
- p0454: 0; = SQRT(2)*(IF((2*p0322-1)<0;-1;IF((2*p0322-1)>0;1;0))*SQRT(SQRT((2/(pi()*0.140012289)+LN(1-(2*p0322-1)^2)/2)^2-LN(1-(2*p0322-1)^2)/0.140012289)-(2/(pi()*0.140012289)+LN(1-(2*p0322-1)^2)/2)))
- p2151: 2.24591e-8; = p2015*p2079*p2113/(p0818*1000)
- p0834: 0.00059
- p0579: 0; = IF(p0315<0.5;-SQRT(p0007*EXP(p0447^2*p0008)-p0007);SQRT(p0007*EXP(p0447^2*p0008)-p0007))
- p1575: 0
- p0277: 0.5
- p3438: 0; = p3362*p1240
- p3014: 0; = p2428*(p1129+p1131)
- p0584: 0; = IF(p0320<0.5;-SQRT(p0007*EXP(p0452^2*p0008)-p0007);SQRT(p0007*EXP(p0452^2*p0008)-p0007))
- p0399: 0.5
- p0245: 35.865
- p1341: 0; = p1340*p0001/(p0818*p0002)
- p0827: 0; = p0818*p0819*p0823
- p1295: 0; = p1291*p1252/p0818
- p1252: 2.12717e9; = if(p1232>0;0;p0724*2000*p0723*1000*p0725/100)
- p2149: 4.96749e-8; = p2015*p2077*p2111/(p0818*1000)
- p2273: 0; = p2230*p2219
- p1912: 0
- p1963j: 0; = p1725*p1929+p1726*p1930+p1727*p1931+p1728*p1932+p1729*p1933+p1730*p1934+p1731*p1935+p1732*p1936+p1733*p1937+p1734*p1938+p1735*p1939+p1736*p1940+p1737*p1941+p1738*p1942+p1739*p1943+p1740*p1944+p1741*p1945+p1742*p1946+p1743*p1947
- p3580: 4.68248e-7; = p1849*p3476
- p1648: 0
- p1082: 0; = IF(p1071=0;IF(p1073+p1078+p1079+p1080+p1081=1;0;1-(p1073+p1078+p1079+p1080+p1081));0)
- p1622: 0
- p1038: 0.00785902
- p1630: 0
- p0405: 0; = SQRT(2)*(IF((2*p0273-1)<0;-1;IF((2*p0273-1)>0;1;0))*SQRT(SQRT((2/(pi()*0.140012289)+LN(1-(2*p0273-1)^2)/2)^2-LN(1-(2*p0273-1)^2)/0.140012289)-(2/(pi()*0.140012289)+LN(1-(2*p0273-1)^2)/2)))
- p1946: 0
- p3786: 0; = p1849*p3477
- p2574: 0; = p2378*p1073
- p3110: 0; = p2329*p1023
- p0532: 0; = SQRT(2)*(IF((2*p0400-1)<0;-1;IF((2*p0400-1)>0;1;0))*SQRT(SQRT((2/(pi()*0.140012289)+LN(1-(2*p0400-1)^2)/2)^2-LN(1-(2*p0400-1)^2)/0.140012289)-(2/(pi()*0.140012289)+LN(1-(2*p0400-1)^2)/2)))
- p3261: 0.908439
- p0787: 0
- p2415: 0; = p2235*p2205
- p0509: 0; = SQRT(2)*(IF((2*p0377-1)<0;-1;IF((2*p0377-1)>0;1;0))*SQRT(SQRT((2/(pi()*0.140012289)+LN(1-(2*p0377-1)^2)/2)^2-LN(1-(2*p0377-1)^2)/0.140012289)-(2/(pi()*0.140012289)+LN(1-(2*p0377-1)^2)/2)))
- p2911: 0; = p2325*(p1020+p1022)
- p2043: 0.636483
- p2700: 1.06246e-5; = p2309*(p1078+p1080)
- p0573: 0; = IF(p0309<0.5;-SQRT(p0007*EXP(p0441^2*p0008)-p0007);SQRT(p0007*EXP(p0441^2*p0008)-p0007))
- p2102: 0.922577
- p1681: 0
- p1838: 0
- p1342: 0; = p1326*p0801
- p1758: 0
- p0728: 0
- p2807: 0; = p2416*(p1078+p1080)
- p3033: 1.1836e-12; = p2252*p1023
- p2999: 0; = p2413*(p1020+p1022)
- p2603: 0; = p2407*p1014
- p1969: 0; = p0803
- p1238: 0.65195; = if(p1232>0;0;IF(p1234=1;0;IF(p1234+p1235>1;1-p1234;p1235)))
- p0903: 0.0257527
- p0818: 1.7388e10; = p0806*p0807
- p1881: 0
- p3247: 0
- p2214: 5.07885e-5; = p1107/p0818
- p0747: 0
- p1319: 0.126059; = IF(((p0745*1000*p0746/100)+(p0754*1000*p0755/100))/p0801<0;0;((p0745*1000*p0746/100)+(p0754*1000*p0755/100))/p0801)
- p1809: 0
- p3146: 0; = p2365*p1023
- p2544: 2.0169e-7; = p2348*p1073
- p0680: 2844.2; = p0020*(1+p0548*p0152/100)
- p2157: 5.6584e-8; = p2015*p2086*p2119/(p0818*1000)
- p2606: 0; = p2410*p1014
- p2798: 0; = p2407*(p1019+p1021)
- p1189: 0.000359171; = p0801*p0001/(p0818*p0002)
- p2088: 0.798875
- p2267: 4.30607e-6; = p2226*p2213
- p0997: 0; = if(p0888=0;0;if((p0695*p0694*1000*p0696/100)/p0888>1;1;(p0695*p0694*1000*p0696/100)/p0888))
- p0867: 0.0502909; = IF(p0858+p0864+p0865+p0866=1;0;IF(p0858+p0864+p0865+p0866+p0862>1;1-(p0858+p0864+p0865+p0866);p0862))
- p1699: 0.762907
- p3892: 0; = p1955*p3477
- p1910: 0
- p1808: 0
- p2957: 0; = p2371*(p1020+p1022)
- p0392: 0.5
- p1787: 0
- p0961: 0; = if(and(p0683>0;or(p0807=480;p0807=32;p0807=1;and(p0807=60;p0901<0.03)));p0937;0)
- p1829: 0
- p3246: 1; = IF(p3244+p3245=1;0;1-(p3244+p3245))
- p3168: 0; = p2387*p1082
- p2265: 4.9565e-5; = p2226*p2211
- p3034: 2.60227e-12; = p2253*p1023
- p2604: 0; = p2408*p1014
- p2432: 0.00274179; = p1158
- p2848: 4.33505e-6; = p2262*(p1079+p1081)
- p0751: 12.386; = p0091*(1+p0619*p0223/100)
- p1223: 0.56
- p2561: 0; = p2365*p1014
- p2701: 9.52227e-5; = p2310*(p1078+p1080)
- p3373: 0; = if(p1232=0;p3245*p3361/p0818;0)
- p1177: 0.000359171; = p0801*p0001/(p0818*p0002)
- p0844: 0.389169
- p1326: 0; = IF(((p0745*1000*p0753/100)+(p0754*1000*p0762/100))/p0801<0;0;((p0745*1000*p0753/100)+(p0754*1000*p0762/100))/p0801)
- p0538: 0; = IF(p0274<0.5;-SQRT(p0007*EXP(p0406^2*p0008)-p0007);SQRT(p0007*EXP(p0406^2*p0008)-p0007))
- p1142: 0; = if(p1121=0;p1136*p0001/(p0818*p0002);0)
- p2062: 3.76588
- p3396: 0.000405495; = p3377*p1234
- p0268: 34.629
- p2462: 4.12618e-8; = p2266*p1073
- p0974: 0.5
- p0730: 0
- p3174: 0; = p2393*p1023
- p3086: 0; = p2305*p1082
- p1110: 3.54709e6; = IF(p1071=0;p1105*p1104*p1095;0)
- p0218: 42.32
- p2471: 0; = p2275*p1123
- p1064: 0.000506716; = IF(p1012=0;p1050/(p1057*p0818);0)
- p1660: 0.731714
- p1775: 0
- p1191: 0.5
- p0785: 66.081; = p0125*(1+p0653*p0257/100)
- p2047: 4.04738e-14; = p2015*p2045/(p0818*1000000000000)
- p3382: 0; = p3363*p1234
- p2939: 1.13747e-5; = p2353*(p1129+p1131)
- p0646: 0; = IF(p0382<0.5;-SQRT(p0007*EXP(p0514^2*p0008)-p0007);SQRT(p0007*EXP(p0514^2*p0008)-p0007))
- p1856: 0
- p1621: 0
- p1807: 0
- p3350: 4.77455e7; = if(and(p1232=0;p3256<>0);p3256*(p3273*p3277-p3345)/p3349;0)
- p3123: 0; = p2342*p1082
- p2005: 9.05956e6; = p1963*p0818+p1959*1000+p1170+p1176+p1182
- p2528: 0; = p2332*p1014
- p1980: 3521.6
- p1085: 201723; = IF(p1071=0;p1079*(p0710/100)*p0703*1000;0)
- p2963: 0; = p2377*(p1079+p1081)
- p3342: 5.73151e6; = if(and(p1232=0;p3254<>0);p3254*(p3272-p3337)/p3338;0)
- p2996: 0; = p2410*(p1020+p1022)
- p0768: 0
- p2288: 6.30175e-5; = p2223*p2195
- p3372: 0; = if(p1232=0;p3245*p3360/p0818;0)
- p1745: 0
- p0726: 32.672; = p0066*(1+p0594*p0198/100)
- p0745: 14089.3; = p0085*(1+p0613*p0217/100)
- p2437: 7.75114e-7; = p2241*p1014
- p2712: 0; = p2321*(p1019+p1021)
- p1218: 0.5
- p2080: 0.025
- p3327: 0; = if(and(p1232=0;p3255<>0);1-(p3323+p3324+p3325+p3326);0)
- p3330: 0; = if(and(p1232=0;p3255<>0);p3255*(p3267-p3325)/p3327;0)
- p3045: 0; = p2264*p1082
- p1041: 0.310052
- p1795: 0
- p2968: 0; = p2382*(p1079+p1081)
- p3009: 0; = p2423*(p1079+p1081)
- p0934: 0.000145936; = p0928*p0001/(p0818*p0002)
- p2572: 0; = p2376*p1073
- p3401: 0; = p3363*p1238
- p2550: 0; = p2354*p1014
- p0214: 2.507
- p1836: 0
- p0379: 0.5
- p3229: 1.95711e-6; = p1164/p0818
- p2197: 6.10489e-7; = p1055/p0818
- p3191: 0; = p2410*p1023
- p0917: 1.32164
- p3250: 0.875
- p0704: 13.251; = p0044*(1+p0572*p0176/100)
- p0575: 0; = IF(p0311<0.5;-SQRT(p0007*EXP(p0443^2*p0008)-p0007);SQRT(p0007*EXP(p0443^2*p0008)-p0007))
- p1120: 0.000857671; = IF(p1071=0;p1110/(p1115*p0818);0)
- p1283: 0; = p1277*p1252/p0818
- p1008: 0; = p1004*p0001*p0004/(p0818*p0002)
- p3271: 0.0195489
- p0865: 0; = IF(p0858+p0864=1;0;IF(p0858+p0864+p0860>1;1-(p0858+p0864);p0860))
- p2605: 0; = p2409*p1014
- p5337: 9.65064e-8; = p1962*p3484
- p0223: 23.999
- p3451: 0; = p3375*p1240
- p3478: 0.58327; = if(p1328+p1330+p1332+p1334+p1336+p1338+p1340+p1342+p1344=0;0;p1332/(p1328+p1330+p1332+p1334+p1336+p1338+p1340+p1342+p1344))
- p3262: 0.0787162
- p2555: 0; = p2359*p1014
- p2366: 0; = p2225*p2195
- p3040: 0; = p2259*p1082
- p2698: 2.75492e-5; = p2307*(p1078+p1080)
- p2721: 0; = p2330*(p1019+p1021)
- p2130: 9.15253e-7; = p2015*p2058*p2092/(p0818*1000)
- p0447: 0; = SQRT(2)*(IF((2*p0315-1)<0;-1;IF((2*p0315-1)>0;1;0))*SQRT(SQRT((2/(pi()*0.140012289)+LN(1-(2*p0315-1)^2)/2)^2-LN(1-(2*p0315-1)^2)/0.140012289)-(2/(pi()*0.140012289)+LN(1-(2*p0315-1)^2)/2)))
- p0886: 0; = p0686*1000*p0687*p0689/100
- p0731: 0
- p2616: 0; = p2420*p1073
- p3415: 0.000809141; = p3377*p1238
- p2904: 0; = p2318*(p1020+p1022)
- p2329: 0; = p2224*p2197
- p0438: 0; = SQRT(2)*(IF((2*p0306-1)<0;-1;IF((2*p0306-1)>0;1;0))*SQRT(SQRT((2/(pi()*0.140012289)+LN(1-(2*p0306-1)^2)/2)^2-LN(1-(2*p0306-1)^2)/0.140012289)-(2/(pi()*0.140012289)+LN(1-(2*p0306-1)^2)/2)))
- p0420: 0; = SQRT(2)*(IF((2*p0288-1)<0;-1;IF((2*p0288-1)>0;1;0))*SQRT(SQRT((2/(pi()*0.140012289)+LN(1-(2*p0288-1)^2)/2)^2-LN(1-(2*p0288-1)^2)/0.140012289)-(2/(pi()*0.140012289)+LN(1-(2*p0288-1)^2)/2)))
- p2438: 1.11556e-7; = p2242*p1014
- p1750: 0
- p0878: 352036; = p0867*p0856
- p0772: 0
- p0613: 0; = IF(p0349<0.5;-SQRT(p0007*EXP(p0481^2*p0008)-p0007);SQRT(p0007*EXP(p0481^2*p0008)-p0007))
- p2465: 1.8249e-6; = p2269*p1073
- p2662: 1.12796e-5; = p2271*(p1078+p1080)
- p0143: 0
- p2115: 0.856281
- p3306: 0; = if(and(p1232=0;p3252<>0);p3252*(p3257*p3277-p3301)/p3305;0)
- p0806: 2.898e8
- p2120: 0.51828
- p4616: 1.93825e-5; = p1855*p3481
- p1639: 0
- p2643: 8.02469e-8; = p2252*(p1019+p1021)
- p0103: 7001.23
- p2276: 0.000366427; = p2223*p2182
- p3001: 0; = p2415*(p1079+p1081)
- p2657: 2.78443e-7; = p2266*(p1078+p1080)
- p1597: 0
- p2584: 0; = p2388*p1073
- p2365: 0; = p2225*p2193
- p0778: 6.123; = p0118*(1+p0646*p0250/100)
- p1066: 0.000201069; = IF(p1012=0;p1052/(p1059*p0818);0)
- p2245: 3.31223e-6; = p2222*p2190
- p1121: 0
- p1825: 0
- p2463: 4.31468e-7; = p2267*p1073
- p3305: 0; = if(and(p1232=0;p3252<>0);1-(p3301+p3302+p3303+p3304);0)
- p2664: 0; = p2273*(p1128+p1130)
- p1029: 9.27734; = IF(p1012=0;IF(p0801<p1023*(p0704/100)*p0703*1000;p0801;p1023*(p0704/100)*p0703*1000);0)
- p0687: 0
- p3211: 0; = p2430*p1132
- p2974: 0; = p2388*(p1079+p1081)
- p2279: 2.56665e-5; = p2223*p2185
- p3088: 0; = p2307*p1082
- p2671: 4.02737e-5; = p2280*(p1019+p1021)
- p1644: 0
- p0691: 0
- p1984: 30
- p1005: 0; = p1001*p0888
- p1263: 0; = if(p1232>0;0;IF(p1259=1;0;IF(p1259+p1260>1;1-p1259;p1260)))
- p2829: 3.28987e-6; = p2243*(p1020+p1022)
- p2050: 0.952062
- p4689: 1.99452e-7; = p1928*p3481
- p1147: 0.0889917
- p0282: 0.5
- p2457: 1.07121e-5; = p2261*p1073
- p3157: 0; = p2376*p1082
- p0204: 40.514
- p1878: 0
- p1679: 0
- p2630: 6.76691e-7; = p2239*(p1019+p1021)
- p1010: 0; = p0890
- p2451: 1.11189e-6; = p2255*p1014
- p4390: 0; = p1835*p3480
- p3299: 0; = if(p1303+p1304+p1305+p1306=0;0;p1303/(p1303+p1304+p1305+p1306))
- p2545: 1.80764e-6; = p2349*p1073
- p1718: 0
- p1786: 0
- p3386: 0; = p3367*p1234
- p2799: 0; = p2408*(p1019+p1021)
- p2373: 0; = p2225*p2202
- p2797: 0; = p2406*(p1019+p1021)
- p2445: 8.22298e-7; = p2249*p1014
- p0849: 0
- p0631: 0; = IF(p0367<0.5;-SQRT(p0007*EXP(p0499^2*p0008)-p0007);SQRT(p0007*EXP(p0499^2*p0008)-p0007))
- p0814: 0; = if(p0807=480;p0810*p0812+p0811*p0813;0)
- p1313: 0; = p1307*p1252/p0818
- p2394: 0; = p2234*p2183
- p3406: 0; = p3368*p1238
- p2403: 0; = p2234*p2192
- p2491: 1.19473e-6; = p2295*p1014
- p3141: 0; = p2360*p1023
- p3600: 7.56401e-8; = p1869*p3476
- p2357: 0; = p2225*p2185
- p3217: 0.00590685; = p3213*p1228
- p1926: 0
- p1031: 3.22738e-5; = IF(p1012=0;p1025*p0001/(p0818*p0002);0)
- p1941: 0
- p2590: 0; = p2394*p1014
- p2722: 0; = p2331*(p1019+p1021)
- p3263: 0.0214527
- p1552: 0
- p2772: 0; = p2381*(p1078+p1080)
- p3259: 0.00796296
- p0594: 0; = IF(p0330<0.5;-SQRT(p0007*EXP(p0462^2*p0008)-p0007);SQRT(p0007*EXP(p0462^2*p0008)-p0007))
- p2972: 0; = p2386*(p1079+p1081)
- p2190: 2.80409e-5; = 32.065*p2189/(2*14.0067)
- p1143: 0; = if(p1121=0;p1137*p0001/(p0818*p0002);0)
- p0719: 21.847; = p0059*(1+p0587*p0191/100)
- p2694: 2.16052e-5; = p2303*(p1078+p1080)
- p2906: 0; = p2320*(p1020+p1022)
- p4625: 4.77261e-7; = p1864*p3481
- p3421: 0; = p3364*p1239
- p0893: 0.107092; = 1000*(p0890+p0892)*p0001*p0003*p0004/(p0818*p0002)
- p2960: 0; = p2374*(p1020+p1022)
- p2831: 7.4386e-7; = p2245*(p1020+p1022)
- p1002: 0; = p0996*p0888
- p2337: 4.30002e-5; = p2228*p2205
- p1986: 4200
- p1611: 0
- p1323: 0; = IF(((p0745*1000*p0750/100)+(p0754*1000*p0759/100))/p0801<0;0;((p0745*1000*p0750/100)+(p0754*1000*p0759/100))/p0801)
- p3220: 0.00314187; = p3216*p1228
- p1272: 0; = IF(p1267+p1270+p1271=p1259;0;p1259-(p1267+p1270+p1271))
- p1976: 0.242333
- p2708: 0; = p2317*(p1019+p1021)
- p2111: 0.856281
- p4926: 0; = p1963*p3482
- p2251: 7.21118e-8; = p2222*p2197
- p0688: 0
- p1335: 0.0001488; = p1334*p0001/(p0818*p0002)
- p2789: 0; = p2398*(p1019+p1021)
- p2946: 0; = p2360*(p1020+p1022)
- p4836: 0; = p1869*p3482
- p3316: 0; = if(and(p1232=0;p3253<>0);1-(p3312+p3313+p3314+p3315);0)
- p2428: 0; = p2236*p2218
- p0804: 0
- p2236: 0; = 1-(p2230+p2231+p2232+p2233)
- p1431: 35
- p3328: 0; = if(and(p1232=0;p3255<>0);p3255*(p3265*p3277-p3323)/p3327;0)
- p2823: 1.10224e-5; = p2237*(p1020+p1022)
- p1047: 0.310052; = IF(p1012=0;IF(p1037+p1044+p1045+p1046=1;0;IF(p1037+p1044+p1045+p1046+p1041>1;1-(p1037+p1044+p1045+p1046);p1041));0)
- p2756: 0; = p2365*(p1019+p1021)
- p3005: 0; = p2419*(p1079+p1081)
- p3120: 0; = p2339*p1082
- p0697: 0
- p1244: 0; = if(p1232>0;0;p1239*(p0725/100)*p0723*1000)
- p3102: 0; = p2321*p1023
- p2296: 0.000140594; = p2223*p2203
- p0899: 1.98798e10; = p0825*p0896+(p0830+p0895)*p0824*p0898
- p3313: 0; = if(and(p1232=0;p3253<>0);p3262*(p3278*(p3282*p1256+p3286*(p1253+p1257)+p1258*p3288+p3298*p3287));0)
- p2542: 5.22974e-7; = p2346*p1073
- p2323: 0; = p2224*p2190
- p4828: 0; = p1861*p3482
- p1891: 0
- p2254: 2.66218e-5; = p2222*p2200
- p0487: 0; = SQRT(2)*(IF((2*p0355-1)<0;-1;IF((2*p0355-1)>0;1;0))*SQRT(SQRT((2/(pi()*0.140012289)+LN(1-(2*p0355-1)^2)/2)^2-LN(1-(2*p0355-1)^2)/0.140012289)-(2/(pi()*0.140012289)+LN(1-(2*p0355-1)^2)/2)))
- p0175: 0
- p0644: 0; = IF(p0380<0.5;-SQRT(p0007*EXP(p0512^2*p0008)-p0007);SQRT(p0007*EXP(p0512^2*p0008)-p0007))
- p2054: 0.91
- p2615: 0; = p2419*p1073
- p1139: 4.03112e-6; = if(p1121=0;p1133*p0001/(p0818*p0002);0)
- p2110: 0.856281
- p2855: 4.07288e-6; = p2269*(p1079+p1081)
- p2753: 0; = p2362*(p1019+p1021)
- p1723: 0
- p0732: 42.28; = p0072*(1+p0600*p0204/100)
- p2317: 0; = p2224*p2184
- p3158: 0; = p2377*p1082
- p1571: 0
- p0799: 57.832; = p0139*(1+p0667*p0271/100)
- p1112: 0.209482
- p2847: 2.39077e-5; = p2261*(p1079+p1081)
- p2592: 0; = p2396*p1014
- p1676: 0
- p2704: 0.000140778; = p2313*(p1128+p1130)
- p0882: 0; = p0869*p0856
- p1141: 1.0566e-5; = if(p1121=0;p1135*p0001/(p0818*p0002);0)
- p1834: 0
- p2682: 5.99113e-7; = p2291*(p1019+p1021)
- p0897: 0
- p3460: 0; = p3365*p1241
- p2850: 8.46421e-7; = p2264*(p1079+p1081)
- p4719: 4.89688e-7; = p1962*p3481
- p2975: 0; = p2389*(p1129+p1131)
- p1229: 0.0117504; = IF(p1221=0;0;p1228*p1221)
- p1854: 0
- p3429: 0; = p3372*p1239
- p2347: 1.9696e-5; = p2228*p2215
- p2191: 7.05156e-6; = 8*1.00794*p2189/(2*14.0067)
- p3190: 0; = p2409*p1023
- p1963g: 0; = p1667*p1871+p1668*p1872+p1669*p1873+p1670*p1874+p1671*p1875+p1672*p1876+p1673*p1877+p1674*p1878+p1675*p1879+p1676*p1880+p1677*p1881+p1678*p1882+p1679*p1883+p1680*p1884+p1681*p1885+p1682*p1886+p1683*p1887+p1684*p1888+p1685*p1889
- p0518: 0; = SQRT(2)*(IF((2*p0386-1)<0;-1;IF((2*p0386-1)>0;1;0))*SQRT(SQRT((2/(pi()*0.140012289)+LN(1-(2*p0386-1)^2)/2)^2-LN(1-(2*p0386-1)^2)/0.140012289)-(2/(pi()*0.140012289)+LN(1-(2*p0386-1)^2)/2)))
- p1137: 0; = if(p1121=0;p1131*(p0716/100)*p0703*1000;0)
- p2330: 0; = p2224*p2198
- p1824: 0
- p0505: 0; = SQRT(2)*(IF((2*p0373-1)<0;-1;IF((2*p0373-1)>0;1;0))*SQRT(SQRT((2/(pi()*0.140012289)+LN(1-(2*p0373-1)^2)/2)^2-LN(1-(2*p0373-1)^2)/0.140012289)-(2/(pi()*0.140012289)+LN(1-(2*p0373-1)^2)/2)))
- p3108: 0; = p2327*p1023
- p1306: 0; = p1302*p1252/p0818
- p2806: 0; = p2415*(p1078+p1080)
- p2202: 1.39064e-5; = 4*1.00794*p2201/(2*14.0067)
- p0105: 31.514
- p2526: 0; = p2330*p1014
- p2763: 0; = p2372*(p1019+p1021)
- p1589: 0
- p1955: 9.02922e-5; = p1547*1000/p0818
- p2878: 4.36318e-7; = p2292*(p1020+p1022)
- p2206: 0.000135499; = 9*1.00794*p2204/30.973762
- p2783: 0; = p2392*(p1128+p1130)
- p1974: 0; = p1969*p0001/(p0818*p0002)
- p1094: 0; = IF(p1071=0;p1088*p0001/(p0818*p0002);0)
- p2501: 3.48333e-7; = p2305*p1073
- p1185: 0.5
- p1900: 0
- p2676: 4.21616e-6; = p2285*(p1019+p1021)
- p3895: 0; = p1962*p3477
- p1705: 0
- p1123: 0.08335; = if(p1121=0;p0717/100;0)
- p2929: 1.1987e-5; = p2343*(p1079+p1081)
- p0966: 0.50846; = if(p0683=0;0;IF(p0684/100+p0965=1;0;1-(p0684/100+p0965)))
- p0190: 19.16
- p0754: 0
- p0352: 0.5
- p1580: 0
- p0982: 0; = if(p0886=0;0;min(1;(p0691*p0690*1000*p0693/100)/p0886))
- p0910: 0.0105884; = p0909/p0818
- p2006: 0.044457; = ((p1980*p1985+p1986*p1991+p1992*p1997+p2000*p2005)/p0818)*p0005*p0002/1000
- p1269: 0
- p1944: 0
- p3463: 0; = p3368*p1241
- p2635: 1.96191e-6; = p2244*(p1019+p1021)
- p1222: 0.94
- p2710: 0; = p2319*(p1019+p1021)
- p3207: 0; = p2426*p1082
- p1073: 0.1002; = IF(p1071=0;p0711/100;0)
- p2158: 1.99485e-7; = p2015*p2082*p2120/(p0818*1000)
- p0746: 6.263; = p0086*(1+p0614*p0218/100)
- p2249: 8.44075e-6; = p2222*p2195
- p3127: 0; = p2346*p1082
- p2641: 5.65695e-5; = p2250*(p1019+p1021)
- p0475: 0; = SQRT(2)*(IF((2*p0343-1)<0;-1;IF((2*p0343-1)>0;1;0))*SQRT(SQRT((2/(pi()*0.140012289)+LN(1-(2*p0343-1)^2)/2)^2-LN(1-(2*p0343-1)^2)/0.140012289)-(2/(pi()*0.140012289)+LN(1-(2*p0343-1)^2)/2)))
- p0990: 0; = p0986*p0886
- p3329: 0; = if(and(p1232=0;p3255<>0);p3255*(p3266-p3324)/p3327;0)
- p2862: 8.22921e-5; = p2276*(p1020+p1022)
- p0025: 4.609
- p3177: 0; = p2396*p1023
- p3048: 0; = p2267*p1082
- p1826: 0
- p1746: 0
- p1613: 0
- p2065: 0.0758824
- p2956: 0; = p2370*(p1020+p1022)
- p1627: 0
- p2830: 6.49869e-7; = p2244*(p1020+p1022)
- p3367: 0; = if(p1232=0;p3244*p3361/p0818;0)
- p0152: 0
- p2484: 6.13917e-6; = p2288*p1014
- p0694: 0
- p3119: 0; = p2338*p1082
- p0750: 0
- p2928: 9.1536e-7; = p2342*(p1079+p1081)
- p0836: 2.57284e8; = p0831*p0835*p0801/(1-p0831)
- p1281: 0; = IF(p1277+p1280=p1263;0;IF(p1277+p1280+p1279>p1263;p1263-(p1277+p1280);p1279))
- p0511: 0; = SQRT(2)*(IF((2*p0379-1)<0;-1;IF((2*p0379-1)>0;1;0))*SQRT(SQRT((2/(pi()*0.140012289)+LN(1-(2*p0379-1)^2)/2)^2-LN(1-(2*p0379-1)^2)/0.140012289)-(2/(pi()*0.140012289)+LN(1-(2*p0379-1)^2)/2)))
- p2788: 0; = p2397*(p1019+p1021)
- p0858: 0.682547; = p0670*1000/p0856
- p3183: 0; = p2402*p1023
- p5008: 0; = p1835*p3483
- p0178: 18.591
- p3472: 2.64728e-5; = p3377*p1241
- p1837: 0
- p0416: 0; = SQRT(2)*(IF((2*p0284-1)<0;-1;IF((2*p0284-1)>0;1;0))*SQRT(SQRT((2/(pi()*0.140012289)+LN(1-(2*p0284-1)^2)/2)^2-LN(1-(2*p0284-1)^2)/0.140012289)-(2/(pi()*0.140012289)+LN(1-(2*p0284-1)^2)/2)))
- p0506: 0; = SQRT(2)*(IF((2*p0374-1)<0;-1;IF((2*p0374-1)>0;1;0))*SQRT(SQRT((2/(pi()*0.140012289)+LN(1-(2*p0374-1)^2)/2)^2-LN(1-(2*p0374-1)^2)/0.140012289)-(2/(pi()*0.140012289)+LN(1-(2*p0374-1)^2)/2)))
- p2480: 2.40907e-6; = p2284*p1014
- p2942: 0; = p2356*(p1020+p1022)
- p2155: 1.65782e-7; = p2015*p2084*p2117/(p0818*1000)
- p0404: 0.5
- p2286: 5.03251e-5; = p2223*p2192
- p1181: 0.000159831
- p0938: 0; = p0932*p0001/(p0818*p0002)
- p2660: 1.23148e-5; = p2269*(p1078+p1080)
- p0929: 2.45168e6; = p0801*p0923
- p2268: 4.82622e-6; = p2226*p2214
- p1146: 0.911008
- p2562: 0; = p2366*p1014
- p2622: 0; = p2426*p1073
- p3161: 0; = p2380*p1082
- p3114: 0; = p2333*p1023
- p2294: 8.52107e-5; = p2223*p2201
- p4831: 0; = p1864*p3482
- p2252: 1.1836e-7; = p2222*p2198
- p3344: 2.14099e6; = if(and(p1232=0;p3254<>0);p3254-(p3339+p3340+p3341+p3342+p3343);0)
- p2443: 6.56678e-7; = p2247*p1014
- p2644: 1.76431e-7; = p2253*(p1019+p1021)
- p2655: 2.55925e-6; = p2264*(p1078+p1080)
- p3071: 5.38377e-12; = p2290*p1023
- p1947: 0
- p2169: 0.00214436; = p2166*(p0908)
- p3152: 0; = p2371*p1023
- p1779: 0
- p1564: 0
- p0135: 20.151
- p3222: 0.224242; = IF(p3216=0;0;p1223*40.078/100.0869)
- p2109: 0.826583
- p1036: 1.86948e7; = IF(p1012=0;p0795*p0702*1000*p0796/100;0)
- p1194: 1.48
- p2376: 0; = p2229*p2205
- p0452: 0; = SQRT(2)*(IF((2*p0320-1)<0;-1;IF((2*p0320-1)>0;1;0))*SQRT(SQRT((2/(pi()*0.140012289)+LN(1-(2*p0320-1)^2)/2)^2-LN(1-(2*p0320-1)^2)/0.140012289)-(2/(pi()*0.140012289)+LN(1-(2*p0320-1)^2)/2)))
- p1703: 0
- p3296: 0.514
- p0607: 0; = IF(p0343<0.5;-SQRT(p0007*EXP(p0475^2*p0008)-p0007);SQRT(p0007*EXP(p0475^2*p0008)-p0007))
- p0690: 0
- p5101: 0; = p1928*p3483
- p1962: 3.95356e-6; = p1960*1000/p0818
- p1619: 0
- p0443: 0; = SQRT(2)*(IF((2*p0311-1)<0;-1;IF((2*p0311-1)>0;1;0))*SQRT(SQRT((2/(pi()*0.140012289)+LN(1-(2*p0311-1)^2)/2)^2-LN(1-(2*p0311-1)^2)/0.140012289)-(2/(pi()*0.140012289)+LN(1-(2*p0311-1)^2)/2)))
- p4308: 3.66045e-5; = p1963*p3479
- p0462: 0; = SQRT(2)*(IF((2*p0330-1)<0;-1;IF((2*p0330-1)>0;1;0))*SQRT(SQRT((2/(pi()*0.140012289)+LN(1-(2*p0330-1)^2)/2)^2-LN(1-(2*p0330-1)^2)/0.140012289)-(2/(pi()*0.140012289)+LN(1-(2*p0330-1)^2)/2)))
- p1427: 97
- p3038: 1.88316e-10; = p2257*p1023
- p1967: 0; = if(p0807=480;p0802*p0810;0)
- p3418: 0.0697871; = p3380*p1238
- p1843: 0
- p0315: 0.5
- p4416: 0; = p1861*p3480
- p3422: 0; = p3365*p1239
- p1987: 400
- p4184: 1.14823e-6; = p1835*p3479
- p1014: 0.09742; = IF(p1012=0;p0705/100;0)
- p0003: 10000
- p2495: 1.08916e-5; = p2299*p1073
- p1090: 3.12957e-5; = IF(p1071=0;p1084*p0001/(p0818*p0002);0)
- p1132: 1e-5; = if(p1121=0;IF(p1123+p1128+p1129+p1130+p1131=1;0;1-(p1123+p1128+p1129+p1130+p1131));0)
- p0157: 36.038
- p1602: 0
- p0958: 0; = if(and(p0683>0;or(p0807=480;p0807=32;p0807=1;and(p0807=60;p0901<0.03)));p0934;0)
- p1666: 0
- p1973: 0; = if(p0807=480;p1968*p0001/(p0818*p0002);0)
- p2450: 2.59349e-6; = p2254*p1014
- p2420: 0; = p2235*p2210
- p2255: 1.14134e-5; = p2222*p2201
- p2907: 0; = p2321*(p1020+p1022)
- p1221: 0.224397; = p1216*(1+p1220*p1217/100)
- p0713: 22.363; = p0053*(1+p0581*p0185/100)
- p2139: 3.73693e-7; = p2015*p2067*p2101/(p0818*1000)
- p0912: 0
- p2508: 0.000242454; = p2312*p1123
- p2117: 0.585147
- p2243: 1.4649e-5; = p2222*p2188
- p1737: 0
- p2625: 0; = p2429*p1123
- p2381: 0; = p2229*p2210
- p0056: 13.463
- p2511: 0; = p2315*p1014
- p5269: 2.10576e-8; = p1890*p3484
- p2607: 0; = p2411*p1014
- p2020: 608086; = p2015*p2018*p2019
- p2936: 6.70083e-5; = p2350*(p1129+p1131)
- p2887: 3.65965e-5; = p2301*(p1079+p1081)
- p2718: 0; = p2327*(p1019+p1021)
- p3413: 0.000760271; = p3375*p1238
- p1264: 0.4228; = if(p1232>0;0;IF(p1259+p1263=1;0;IF(p1259+p1263+p1261>1;1-(p1259+p1263);p1261)))
- p2315: 0; = p2224*p2182
- p1913: 0
- p2479: 2.10467e-6; = p2283*p1014
- p2516: 0; = p2320*p1014
- p1152: 0.415074
- p2468: 0; = p2272*p1123
- p3058: 8.04352e-10; = p2277*p1023
- p1045: 0.0626496; = IF(p1012=0;IF(p1037+p1044=1;0;IF(p1037+p1044+p1039>1;1-(p1037+p1044);p1039));0)
- p1594: 0
- p0774: 50.819; = p0114*(1+p0642*p0246/100)
- p2153: 2.19494e-9; = p2015*p2081*p2115/(p0818*1000)
- p2954: 0; = p2368*(p1020+p1022)
- p0722: 0
- p3199: 0; = p2418*p1082
- p3082: 0; = p2301*p1082
- p0288: 0.5
- p1178: 6.27227e-8; = p1176/p0818
- p1764: 0
- p2576: 0; = p2380*p1073
- p0179: 48.807
- p0307: 0.5
- p2588: 0; = p2392*p1123
- p2766: 0; = p2375*(p1078+p1080)
- p2585: 0; = p2389*p1123
- p2411: 0; = p2234*p2201
- p3044: 0; = p2263*p1082
- p1804: 0
- p3391: 0; = p3372*p1234
- p0197: 35.397
- p2611: 0; = p2415*p1073
- p0939: 2.71479e-5; = p0933*p0001/(p0818*p0002)
- p0524: 0; = SQRT(2)*(IF((2*p0392-1)<0;-1;IF((2*p0392-1)>0;1;0))*SQRT(SQRT((2/(pi()*0.140012289)+LN(1-(2*p0392-1)^2)/2)^2-LN(1-(2*p0392-1)^2)/0.140012289)-(2/(pi()*0.140012289)+LN(1-(2*p0392-1)^2)/2)))
- p2573: 0; = p2377*p1073
- p2485: 6.06858e-5; = p2289*p1014
- p2612: 0; = p2416*p1073
- p2425: 0; = p2235*p2215
- p0418: 0; = SQRT(2)*(IF((2*p0286-1)<0;-1;IF((2*p0286-1)>0;1;0))*SQRT(SQRT((2/(pi()*0.140012289)+LN(1-(2*p0286-1)^2)/2)^2-LN(1-(2*p0286-1)^2)/0.140012289)-(2/(pi()*0.140012289)+LN(1-(2*p0286-1)^2)/2)))
- p0306: 0.5
- p3006: 0; = p2420*(p1079+p1081)
- p0740: 94.912; = p0080*(1+p0608*p0212/100)
- p2512: 0; = p2316*p1014
- p2892: 8.12937e-6; = p2306*(p1079+p1081)
- p0689: 0
- p0531: 0; = SQRT(2)*(IF((2*p0399-1)<0;-1;IF((2*p0399-1)>0;1;0))*SQRT(SQRT((2/(pi()*0.140012289)+LN(1-(2*p0399-1)^2)/2)^2-LN(1-(2*p0399-1)^2)/0.140012289)-(2/(pi()*0.140012289)+LN(1-(2*p0399-1)^2)/2)))
- p2633: 7.76372e-7; = p2242*(p1019+p1021)
- p0346: 0.5
- p3143: 0; = p2362*p1023
- p2493: 3.71884e-5; = p2297*p1073
- p3060: 2.56665e-10; = p2279*p1023
- p1054: 5.79635e6; = IF(p1012=0;p1047*p1036;0)
- p3340: 9.17452e6; = if(and(p1232=0;p3254<>0);p3254*(p3270-p3335)/p3338;0)
- p2518: 0; = p2322*p1014
- p0271: 23.972
- p0825: 1.56289e10; = p0818*p0822
- p1778: 0
- p2620: 0; = p2424*p1073
- p1209: 85.4902; = p1206*p0818*p0822/p0801
- p3185: 0; = p2404*p1023
- p1624: 0
- p2188: 0.000124016; = p1066-p2186-p2187
- p2884: 7.50656e-5; = p2298*(p1079+p1081)
- p4716: 1.11836e-5; = p1955*p3481
- p0921: 0.16786; = p0679*1000/p0801
- p5037: 0; = p1864*p3483
- p2915: 0; = p2329*(p1020+p1022)
- p2474: 7.25931e-7; = p2278*p1014
- p1957: 0
- p1284: 0; = p1280*p1252/p0818
- p2812: 0; = p2421*(p1078+p1080)
- p1155: 0.000634062; = if(p1153*p0818=0;0;p1151/(p1153*p0818))
- p3195: 0; = p2414*p1082
- p2640: 5.72275e-6; = p2249*(p1019+p1021)
- p1741: 0
- p3029: 3.93762e-10; = p2248*p1023
- p1725: 0
- p1841: 0
- p1231: 0.0320574; = IF(p1221=0;0;p1230*(p1228+p1229))
- p0079: 0.897
- p0736: 0
- p3260: 0.0343561
- p2399: 0; = p2234*p2188
- p1872: 0
- p2713: 0; = p2322*(p1019+p1021)
- p3475: 0.00228324; = p3380*p1241
- p2309: 1.57129e-5; = p2227*p2216
- p1203: 3
- p2909: 0; = p2323*(p1020+p1022)
- p1601: 0
- p0024: 44.545
- p2899: 4.40521e-5; = p2313*(p1129+p1131)
- p0733: 0
- p0995: 0; = p0991*p0001*p0004/(p0818*p0002)
- p2646: 7.73815e-6; = p2255*(p1019+p1021)
- p0913: 0.00989994
- p0855: 1.4034; = p0854*p0001*p0003/(p0818*p0002)
- p2852: 9.20897e-8; = p2266*(p1079+p1081)
- p2343: 5.36019e-5; = p2228*p2211
- p2779: 0; = p2388*(p1078+p1080)
- p1071: 0
- p3358: 6.64648e6; = if(p1232=0;p3308+p3319+p3330+p3341+p3352;0)
- p3354: 6.37788e7; = IF((p3350+p3351+p3352+p3353)+IF(p3349=0;0;(p3256*(p3273*(1-p3277))/p3349))>p3256;p3256-(p3350+p3351+p3352+p3353);IF(p3349=0;0;p3256*(p3273*(1-p3277))/p3349))
- p4331: 0; = p1776*p3480
- p2822: 0; = p2431*(p1128+p1130)
- p2277: 8.04352e-5; = p2223*p2183
- p2138: 1.04175e-7; = p2015*p2066*p2100/(p0818*1000)
- p1897: 0
- p1713: 0
- p1107: 883110; = IF(p1071=0;p1105*p1101*p1095;0)
- p3283: 0.3
- p3079: 0; = p2298*p1082
- p2801: 0; = p2410*(p1019+p1021)
- p1587: 0
- p1003: 0; = p0999*p0888
- p3133: 2.99615e-10; = p2352*p1132
- p1943: 0
- p1215: 0.0350765; = IF(p1214=0;0;(p1214-1.5)/(p1214-1)^2)
- p3032: 7.21118e-13; = p2251*p1023
- p1048: 0.000567816; = IF(p1012=0;IF(p1037+p1044+p1045+p1046+p1047=1;0;IF(p1037+p1044+p1045+p1046+p1047+p1042>1;1-(p1037+p1044+p1045+p1046+p1047);p1042));0)
- p2470: 0; = p2274*p1123
- p3151: 0; = p2370*p1023
- p3091: 0; = p2310*p1082
- p0402: 0.5
- p2260: 1.28759e-5; = p2226*p2206
- p4188: 4.14312e-7; = p1839*p3479
- p1102: 0.0264207; = IF(p1071=0;IF(p1096+p1101=1;0;IF(p1096+p1101+p1098>1;1-(p1096+p1101);p1098));0)
- p2570: 0; = p2374*p1014
- p1816: 0
- p3423: 0; = p3366*p1239
- p1184: 6.4344e-8; = p1182/p0818
- p3274: 0.0768939
- p1672: 0
- p3435: 0; = p3378*p1239
- p4806: 0; = p1839*p3482
- p2594: 0; = p2398*p1014
- p2104: 0.817136
- p2530: 0; = p2334*p1014
- p2311: 0.00206418; = p2231*p2218
- p1161: 7e6; = p0801
- p0813: 0; = if(p0807=480;1.56521739130435;0)
- p3126: 0; = p2345*p1082
- p0442: 0; = SQRT(2)*(IF((2*p0310-1)<0;-1;IF((2*p0310-1)>0;1;0))*SQRT(SQRT((2/(pi()*0.140012289)+LN(1-(2*p0310-1)^2)/2)^2-LN(1-(2*p0310-1)^2)/0.140012289)-(2/(pi()*0.140012289)+LN(1-(2*p0310-1)^2)/2)))
- p0393: 0.5
- p0989: 0; = p0985*p0886
- p4870: 0; = p1903*p3482
- p0608: 0; = IF(p0344<0.5;-SQRT(p0007*EXP(p0476^2*p0008)-p0007);SQRT(p0007*EXP(p0476^2*p0008)-p0007))
- p2174: 0.00700667; = p0895*p0903/p0818
- p2733: 2.76769e-6; = p2342*(p1078+p1080)
- p2084: 0.21
- p2896: 3.1493e-5; = p2310*(p1079+p1081)
- p0638: 0; = IF(p0374<0.5;-SQRT(p0007*EXP(p0506^2*p0008)-p0007);SQRT(p0007*EXP(p0506^2*p0008)-p0007))
- p0846: 0.390733; = p0841*p0845^3+p0842*p0845^2+p0843*p0845+p0844
- p3100: 0; = p2319*p1023
- p1030: 4.6374e-6; = IF(p1012=0;p1024*p0001/(p0818*p0002);0)
- p1217: 16.7773
- p2057: 3.28794
- p0819: 0; = p0808*p0809/p0818
- p1124: 0.69817; = if(p1121=0;p0718/100;0)
- p0820: 0; = if(p0807=480;p0814;0)
- p2410: 0; = p2234*p2200
- p3136: 0; = p2355*p1023
- p2754: 0; = p2363*(p1019+p1021)
- p0113: 12.884
- p1022: 0; = IF(p1012=0;IF(p1014+p1019+p1020+p1021=1;0;IF(p1014+p1019+p1020+p1021+p1018>1;1-(p1014+p1019+p1020+p1021);p1018));0)
- p0783: 29.154; = p0123*(1+p0651*p0255/100)
- p0367: 0.5
- p2042: 0.07
- p0779: 79.783; = p0119*(1+p0647*p0251/100)
- p3431: 0; = p3374*p1239
- p1625: 0
- p2586: 0; = p2390*p1123
- p0310: 0.5
- p2165: 0.804629; = (p0833-p2014)/p0818-p0839
- p0847: 0
- p1894: 0
- p3249: 0
- p0721: 0
- p1762: 0
- p2356: 0; = p2225*p2184
- p1168: 9.78554e-7; = p1164*p1167/p0818
- p1747: 0
- p3426: 0; = p3369*p1239
- p2229: 0; = if(p0774*p0778+p0775*p0779+p0776*p0780+p0777*p0781=0;0;p0781*p0777/(p0774*p0778+p0775*p0779+p0776*p0780+p0777*p0781))
- p0853: 0; = p0803/(p0802+p0803)
- p2239: 9.98084e-7; = p2222*p2184
- p2112: 0.856281
- p1305: 0; = p1301*p1252/p0818
- p3919: 7.61458e-6; = p1776*p3478
- p2207: 0.00112504; = p1119-p2205-p2204-p2206
- p1606: 0
- p0959: 0; = if(and(p0683>0;or(p0807=480;p0807=32;p0807=1;and(p0807=60;p0901<0.03)));p0935;0)
- p2369: 0; = p2225*p2198
- p1200: 0.84
- p0678: 2451.68; = p0018*(1+p0546*p0150/100)
- p0051: 10.02
- p2384: 0; = p2229*p2213
- p3353: 1.58489e7; = if(and(p1232=0;p3256<>0);p3256*(p3276-p3348)/p3349;0)
- p2475: 2.50043e-6; = p2279*p1014
- p0448: 0; = SQRT(2)*(IF((2*p0316-1)<0;-1;IF((2*p0316-1)>0;1;0))*SQRT(SQRT((2/(pi()*0.140012289)+LN(1-(2*p0316-1)^2)/2)^2-LN(1-(2*p0316-1)^2)/0.140012289)-(2/(pi()*0.140012289)+LN(1-(2*p0316-1)^2)/2)))
- p0439: 0; = SQRT(2)*(IF((2*p0307-1)<0;-1;IF((2*p0307-1)>0;1;0))*SQRT(SQRT((2/(pi()*0.140012289)+LN(1-(2*p0307-1)^2)/2)^2-LN(1-(2*p0307-1)^2)/0.140012289)-(2/(pi()*0.140012289)+LN(1-(2*p0307-1)^2)/2)))
- p2083: 2.17294
- p1968: 0; = if(p0807=480;p0802*p0811;0)
- p1950: 0
- p2628: 3.32759e-5; = p2237*(p1019+p1021)
- p2785: 0; = p2394*(p1019+p1021)
- p0769: 6.655; = p0109*(1+p0637*p0241/100)
- p1574: 0
- p1025: 628994; = IF(p1012=0;p1019*(p0704/100)*p0703*1000;0)
- p2872: 1.1302e-5; = p2286*(p1020+p1022)
- p1753: 0
- p3297: 0; = if(p1273+p1274+p1275+p1276=0;0;p1273/(p1273+p1274+p1275+p1276))
- p3085: 0; = p2304*p1082
- p1169: 0.000621786
- p1240: 0; = if(p1232>0;0;IF(p1234+p1238+p1239=1;0;IF(p1234+p1238+p1239+p1237>1;1-(p1234+p1238+p1239);p1237)))
- p4720: 2.20271e-5; = p1963*p3481
- p2557: 0; = p2361*p1014
- p2059: 1.00168
- p0672: 0
- p2591: 0; = p2395*p1014
- p3311: 0; = if(and(p1232=0;p3252<>0);p3252-(p3306+p3307+p3308+p3309+p3310);0)
- p1007: 0; = p1003*p0001*p0004/(p0818*p0002)
- p1677: 0
- p0283: 0.5
- p0057: 8.335
- p1186: 3.2172e-8; = p1182*p1185/p0818
- p2289: 0.00062293; = p2223*p2196
- p0592: 0; = IF(p0328<0.5;-SQRT(p0007*EXP(p0460^2*p0008)-p0007);SQRT(p0007*EXP(p0460^2*p0008)-p0007))
- p1136: 0; = if(p1121=0;p1130*(p0716/100)*p0703*1000;0)
- p3315: 0; = if(and(p1232=0;p3253<>0);p3264*p3289;0)
- p2354: 0; = p2225*p2182
- p1000: 0; = IF(p0996+p0999=1;0;IF(p0996+p0999+p0998>1;1-(p0996+p0999);p0998))
- p2374: 0; = p2225*p2203
- p3186: 0; = p2405*p1023
- p2108: 0.826583
- p1334: 2.90001e6; = p1322*p0801
- p2597: 0; = p2401*p1014
- p1918: 0
- p3840: 0; = p1903*p3477
- p2132: 3.3899e-7; = p2015*p2060*p2094/(p0818*1000)
- p4514: 0; = p1963*p3480
- p0600: 0; = IF(p0336<0.5;-SQRT(p0007*EXP(p0468^2*p0008)-p0007);SQRT(p0007*EXP(p0468^2*p0008)-p0007))
- p2143: 1.80941e-7; = p2015*p2071*p2105/(p0818*1000)
- p1817: 0
- p3254: 1.12421e8; = p1252*(p1287*(1-p3247)+p1290*(1-p3248)+p1291*(1-p3249)+p1292*(1-p3250))
- p0643: 0; = IF(p0379<0.5;-SQRT(p0007*EXP(p0511^2*p0008)-p0007);SQRT(p0007*EXP(p0511^2*p0008)-p0007))
- p2600: 0; = p2404*p1014
- p1087: 0; = IF(p1071=0;p1081*(p0710/100)*p0703*1000;0)
- p2429: 0; = p2236*p2219
- p3003: 0; = p2417*(p1079+p1081)
- p2680: 0.00042234; = p2289*(p1019+p1021)
- p0833: 2.77768e10; = p0830+p0832
- p3242: 3.42836e-8; = p3234*p1188*p3238/p0818
- p2743: 2.09182e-5; = p2352*(p1128+p1130)
- p2221: 0.000402461; = p1155-p2220
- p2176: 0.00269353; = p0895*p0913/p0818
- p3000: 0; = p2414*(p1079+p1081)
- p0962: 0; = if(and(p0683>0;or(p0807=480;p0807=32;p0807=1;and(p0807=60;p0901<0.03)));p0938;0)
- p3992: 4.36077e-6; = p1849*p3478
- p3054: 0; = p2273*p1132
- p1628: 0
- p4304: 1.85848e-5; = p1955*p3479
- p0735: 0
- p2828: 2.57168e-7; = p2242*(p1020+p1022)
- p2393: 0; = p2234*p2182
- p1072: 0; = p1071*p0001/(p0818*p0002)
- p2873: 6.60215e-5; = p2287*(p1020+p1022)
- p1055: 10615.2; = IF(p1012=0;p1048*p1036;0)
- p1815: 0
- p2423: 0; = p2235*p2213
- p2391: 0; = p2233*p2220
- p0078: 7001.43
- p3442: 0; = p3366*p1240
- p1001: 0; = if(p0978>0;0;if(and(p0687=0;p0691=0;p0695=0;p0699=0);0;IF(p0996+p0999+p1000=1;0;1-(p0996+p0999+p1000))))
- p4424: 0; = p1869*p3480
- p3304: 0; = if(and(p1232=0;p3252<>0);p3260*p3289;0)
- p1035: 4.76021e-10; = IF(p1012=0;p1029*p0001/(p0818*p0002);0)
- p0676: 0
- p1183: 0.000359171; = p0801*p0001/(p0818*p0002)
- p0985: 0; = IF(p0982=1;0;IF(p0982+p0983>1;1-p0982;p0983))
- p1316: 0.0706121; = p1312*p1252/p0818
- p2097: 0.40001
- p4857: 0; = p1890*p3482
- p3144: 0; = p2363*p1023
- p1846: 0
- p3022: 7.95642e-11; = p2241*p1023
- p0848: 0
- p1732: 0
- p2417: 0; = p2235*p2207
- p2387: 0; = p2229*p2216
- p2546: 2.55648e-5; = p2350*p1123
- p0807: 60
- p2291: 8.8366e-7; = p2223*p2198
- p2442: 8.1145e-8; = p2246*p1014
- p0763: 7001.23; = p0103*(1+p0631*p0235/100)
- p1634: 0
- p2380: 0; = p2229*p2209
- p0840: 0.0819826; = p0839*p0831
- p2038: 0.304457
- p0874: 0; = p0865*p0856
- p2333: 0; = p2224*p2201
- p2540: 4.46225e-8; = p2344*p1073
- p2580: 0; = p2384*p1073
- p3012: 0; = p2426*(p1079+p1081)
- p1024: 90379.8; = IF(p1012=0;p1014*(p0704/100)*p0703*1000;0)
- p1157: 0.222821
- p0373: 0.5
- p2053: 1.45647
- p2771: 0; = p2380*(p1078+p1080)
- p2880: 1.91366e-5; = p2294*(p1020+p1022)
- p2346: 5.2193e-6; = p2228*p2214
- p0766: 19.514; = p0106*(1+p0634*p0238/100)
- p4630: 1.49589e-7; = p1869*p3481
- p2363: 0; = p2225*p2191
- p3265: 0.696292
- p0941: 0; = if(and(p0683=0;p0947=0);p0935;0)
- p3106: 0; = p2325*p1023
- p2916: 0; = p2330*(p1020+p1022)
- p3477: 0; = if(p1328+p1330+p1332+p1334+p1336+p1338+p1340+p1342+p1344=0;0;p1330/(p1328+p1330+p1332+p1334+p1336+p1338+p1340+p1342+p1344))
- p1204: 0.980791
- p1275: 0; = p1271*p1252/p0818
- p2383: 0; = p2229*p2212
- p1742: 0
- p2388: 0; = p2229*p2217
- p0539: 0; = IF(p0275<0.5;-SQRT(p0007*EXP(p0407^2*p0008)-p0007);SQRT(p0007*EXP(p0407^2*p0008)-p0007))
- p3248: 0
- p1620: 0
- p1769: 0
- p2026: 68.85
- p0146: 0
- p0023: 68.735
- p2275: 0; = p2230*p2221
- p2941: 0; = p2355*(p1020+p1022)
- p3104: 0; = p2323*p1023
- p1810: 0
- p2619: 0; = p2423*p1073
- p0742: 94.912; = p0082*(1+p0610*p0214/100)
- p1777: 0
- p0478: 0; = SQRT(2)*(IF((2*p0346-1)<0;-1;IF((2*p0346-1)>0;1;0))*SQRT(SQRT((2/(pi()*0.140012289)+LN(1-(2*p0346-1)^2)/2)^2-LN(1-(2*p0346-1)^2)/0.140012289)-(2/(pi()*0.140012289)+LN(1-(2*p0346-1)^2)/2)))
- p2673: 7.41499e-5; = p2282*(p1019+p1021)
- p2827: 1.78685e-6; = p2241*(p1020+p1022)
- p2332: 0; = p2224*p2200
- p0210: 0
- p3362: 0; = if(p1232=0;p3244*p3356/p0818;0)
- p2522: 0; = p2326*p1014
- p2021: 3.49716e-5; = p2020/p0818
- p0861: 0.111949; = p0673*1000/p0856
- p2840: 5.97872e-6; = p2254*(p1020+p1022)
- p2164: 0.000483114; = (p2015/p0818)-(p2022)-(p2035+p2036+p2052)-(p2017/p0818)-(p2039+p2041+p2044+p2158+p2159+p2160+p2161+p2162)
- p3346: 0.0178625; = if(and(p1232=0;p3256<>0);p3274*(p3281*(p3285*p1256+p3286*(p1253+p1257)+p1258*p3288));0)
- p3357: 2.0277e7; = if(p1232=0;p3307+p3318+p3329+p3340+p3351;0)
- p2881: 2.75419e-6; = p2295*(p1020+p1022)
- p1812: 0
- p3376: 0.000382245; = if(p1232=0;p3246*p3358/p0818;0)
- p0738: 7001.43; = p0078*(1+p0606*p0210/100)
- p0586: 0; = IF(p0322<0.5;-SQRT(p0007*EXP(p0454^2*p0008)-p0007);SQRT(p0007*EXP(p0454^2*p0008)-p0007))
- p3378: 0.00700752; = if(p1232=0;p3246*p3360/p0818;0)
- p2834: 8.84311e-6; = p2248*(p1020+p1022)
- p3408: 0; = p3370*p1238
- p2642: 4.88911e-8; = p2251*(p1019+p1021)
- p0552: 0; = IF(p0288<0.5;-SQRT(p0007*EXP(p0420^2*p0008)-p0007);SQRT(p0007*EXP(p0420^2*p0008)-p0007))
- p3323: 0; = if(and(p1232=0;p3255<>0);p3265*p3277*(p3299*p3291+(1-p3299)*p3295);0)
- p2341: 9.48007e-6; = p2228*p2209
- p0155: 3.797
- p2893: 9.11135e-6; = p2307*(p1079+p1081)
- p1301: 0; = IF(p1297+p1300=p1265;0;IF(p1297+p1300+p1299>p1265;p1265-(p1297+p1300);p1299))
- p2421: 0; = p2235*p2211
- p3178: 0; = p2397*p1023
- p0838: 1.37598e10; = (p0833-p0836)*p0837
- p1322: 0.414287; = IF(((p0745*1000*p0749/100)+(p0754*1000*p0758/100))/p0801<0;0;((p0745*1000*p0749/100)+(p0754*1000*p0758/100))/p0801)
- p1784: 0
- p2133: 5.35982e-7; = p2015*p2061*p2095/(p0818*1000)
- p0948: 0; = if(and(p0683=0;or(p0807=480;p0807=32;p0807=1;and(p0807=60;p0901<0.03)));p0936;0)
- p1863: 0
- p1040: 0.0227854
- p0314: 0.5
- p1766: 0
- p0637: 0; = IF(p0373<0.5;-SQRT(p0007*EXP(p0505^2*p0008)-p0007);SQRT(p0007*EXP(p0505^2*p0008)-p0007))
- p0595: 0; = IF(p0331<0.5;-SQRT(p0007*EXP(p0463^2*p0008)-p0007);SQRT(p0007*EXP(p0463^2*p0008)-p0007))
- p2740: 1.21983e-5; = p2349*(p1078+p1080)
- p2914: 0; = p2328*(p1020+p1022)
- p3348: 0.00443516; = if(and(p1232=0;p3256<>0);p3276*p3289;0)
- p1453: 32
- p2237: 4.90803e-5; = p2222*p2182
- p2889: 7.14549e-6; = p2303*(p1079+p1081)
- p0150: 0
- p1845: 0
- p3366: 0; = if(p1232=0;p3244*p3360/p0818;0)
- p0700: 0
- p2266: 4.11795e-7; = p2226*p2212
- p2621: 0; = p2425*p1073
- p0791: 0
- p3153: 0; = p2372*p1023
- p3164: 0; = p2383*p1082
- p3343: 5.80681e7; = if(and(p1232=0;p3254<>0);IF((p3339+p3340+p3341+p3342)+(p3254*(p3269*(1-p3277))/p3338)>p3254;p3254-(p3339+p3340+p3341+p3342);p3254*(p3269*(1-p3277))/p3338);0)
- p1828: 0
- p0665: 0; = IF(p0401<0.5;-SQRT(p0007*EXP(p0533^2*p0008)-p0007);SQRT(p0007*EXP(p0533^2*p0008)-p0007))
- p2627: 0; = p2431*p1123
- p2401: 0; = p2234*p2190
- p1997: 1.34932e8; = (if(p1152=0;0;p1150/p1152)+if(p1153=0;0;p1151/p1153))*(1+p1157)
- p3187: 0; = p2406*p1023
- p0981: 0.000359171; = p0978*p0001/(p0818*p0002)
- p1586: 0
- p3159: 0; = p2378*p1082
- p0933: 529094; = p0801*p0927
- p0321: 0.5
- p4198: 1.53887e-6; = p1849*p3479
- p1340: 0; = p1325*p0801
- p0241: 63.813
- p3411: 0; = p3373*p1238
- p2513: 0; = p2317*p1014
- p1952: 0
- p3135: 0; = p2354*p1023
- p0674: 353.469; = p0014*(1+p0542*p0146/100)
- p1216: 0.224397
- p2241: 7.95642e-6; = p2222*p2186
- p0198: 39.038
- p1211: 0.6
- p1241: 0.02133; = if(p1232>0;0;IF(p1234+p1238+p1239+p1240=1;0;1-(p1234+p1238+p1239+p1240)))
- p0501: 0; = SQRT(2)*(IF((2*p0369-1)<0;-1;IF((2*p0369-1)>0;1;0))*SQRT(SQRT((2/(pi()*0.140012289)+LN(1-(2*p0369-1)^2)/2)^2-LN(1-(2*p0369-1)^2)/0.140012289)-(2/(pi()*0.140012289)+LN(1-(2*p0369-1)^2)/2)))
- p2536: 2.10057e-6; = p2340*p1073
- p2068: 0.153529
- p0932: 0; = p0801*p0926
- p2473: 7.83599e-6; = p2277*p1014
- p1138: 9.42576; = if(p1121=0;p1132*(p0716/100)*p0703*1000;0)
- p3101: 0; = p2320*p1023
- p0550: 0; = IF(p0286<0.5;-SQRT(p0007*EXP(p0418^2*p0008)-p0007);SQRT(p0007*EXP(p0418^2*p0008)-p0007))
- p2514: 0; = p2318*p1014
- p0650: 0; = IF(p0386<0.5;-SQRT(p0007*EXP(p0518^2*p0008)-p0007);SQRT(p0007*EXP(p0518^2*p0008)-p0007))
- p2497: 1.63975e-5; = p2301*p1073
- p3184: 0; = p2403*p1023
- p0810: 0
- p0086: 6.263
- p3341: 2.81345e6; = if(and(p1232=0;p3254<>0);p3254*(p3271-p3336)/p3338;0)
- p1656: 0
- p0238: 15.327
- p1785: 0
- p1840: 0
- p1792: 0
- p2556: 0; = p2360*p1014
- p2351: 0.000432228; = p2232*p2219
- p3449: 0; = p3373*p1240
- p0856: 7e6; = p0801
- p3065: 2.47287e-10; = p2284*p1023
- p1108: 340580; = IF(p1071=0;p1105*p1102*p1095;0)
- p2857: 3.73051e-6; = p2271*(p1079+p1081)
- p2230: 0; = if(p0783*p0787+p0784*p0788+p0785*p0789+p0786*p0790=0;0;p0787*p0783/(p0783*p0787+p0784*p0788+p0785*p0789+p0786*p0790))
- p2559: 0; = p2363*p1014
- p3023: 1.14511e-11; = p2242*p1023
- p3359: 2.15804e7; = if(p1232=0;p3309+p3320+p3331+p3342+p3353;0)
- p3051: 0; = p2270*p1082
- p3389: 0; = p3370*p1234
- p0947: 0; = if(and(p0683=0;or(p0807=480;p0807=32;p0807=1;and(p0807=60;p0901<0.03)));p0935;0)
- p1555: 0
- p0918: 0.406315; = p0680*1000/p0801
- p1032: 1.06905e-5; = IF(p1012=0;p1026*p0001/(p0818*p0002);0)
- p2792: 0; = p2401*(p1019+p1021)
- p2874: 1.41525e-5; = p2288*(p1020+p1022)
- p3036: 1.14134e-10; = p2255*p1023
- p3450: 0; = p3374*p1240
- p2071: 0.151
- p3375: 0.00116615; = if(p1232=0;p3246*p3357/p0818;0)
- p3089: 0; = p2308*p1082
- p2910: 0; = p2324*(p1020+p1022)
- p3231: 6.27227e-8; = p1176/p0818
- p1225: 1.088; = IF(p1221=0;0;p1223+1.2*p1224)
- p0812: 0; = if(p0807=480;0.095/0.34;0)
- p1629: 0
- p3621: 5.40286e-8; = p1890*p3476
- p1626: 0
- p0052: 67.617
- p1105: 0.436421
- p1114: 0.216028
- p2024: 0.748682
- p2579: 0; = p2383*p1073
- p1823: 0
- p2400: 0; = p2234*p2189
- p1865: 0
- p1721: 0
- p0973: 4.81243e8; = p0967+p0968+p0969
- p2922: 1.06323e-5; = p2336*(p1079+p1081)
- p2233: 0; = if(p0783*p0787+p0784*p0788+p0785*p0789+p0786*p0790=0;0;p0790*p0786/(p0783*p0787+p0784*p0788+p0785*p0789+p0786*p0790))
- p2147: 8.02918e-8; = p2015*p2075*p2109/(p0818*1000)
- p0188: 37.311
- p1999: 1.11486e9; = (p1228+p1229)*p0818+p1164
- p3139: 0; = p2358*p1023
- p0904: 1.71047e9; = p0825*p0901+(p0830+p0895)*p0824*p0903
- p0243: 55.379
- p2007: 0.00454568; = ((p1981*p1985+p1987*p1991+p1993*p1997+p2001*p2005)/p0818)*p0005*p0002/1000
- p2991: 0; = p2405*(p1020+p1022)
- p0793: 0
- p2219: 0.00334109; = p1154-p2218
- p2632: 5.39437e-6; = p2241*(p1019+p1021)
- p3427: 0; = p3370*p1239
- p2482: 4.90267e-6; = p2286*p1014
- p2378: 0; = p2229*p2207
- p1046: 0.0227854; = IF(p1012=0;IF(p1037+p1044+p1045=1;0;IF(p1037+p1044+p1045+p1040>1;1-(p1037+p1044+p1045);p1040));0)
- p0212: 2.507
- p0136: 13.251
- p2306: 3.63519e-5; = p2227*p2213
- p4664: 6.76001e-6; = p1903*p3481
- p3015: 0; = p2429*(p1129+p1131)
- p2748: 0; = p2357*(p1019+p1021)
- p0446: 0; = SQRT(2)*(IF((2*p0314-1)<0;-1;IF((2*p0314-1)>0;1;0))*SQRT(SQRT((2/(pi()*0.140012289)+LN(1-(2*p0314-1)^2)/2)^2-LN(1-(2*p0314-1)^2)/0.140012289)-(2/(pi()*0.140012289)+LN(1-(2*p0314-1)^2)/2)))
- p0752: 0
- p2732: 6.41014e-6; = p2341*(p1078+p1080)
- p3402: 0; = p3364*p1238
- p3352: 3.83302e6; = if(and(p1232=0;p3256<>0);p3256*(p3275-p3347)/p3349;0)
- p3476: 0.06263; = if(p1328+p1330+p1332+p1334+p1336+p1338+p1340+p1342+p1344=0;0;p1328/(p1328+p1330+p1332+p1334+p1336+p1338+p1340+p1342+p1344))
- p2568: 0; = p2372*p1014
- p2424: 0; = p2235*p2214
- p1312: 0.5772; = IF(p1307+p1310+p1311=p1266;0;p1266-(p1307+p1310+p1311))
- p0724: 4.005; = p0064*(1+p0592*p0196/100)
- p0780: 14.094; = p0120*(1+p0648*p0252/100)
- p3203: 0; = p2422*p1082
- p0789: 9.721; = p0129*(1+p0657*p0261/100)
- p1715: 0
- p1287: 0
- p2224: 0; = if(p0765*p0769+p0766*p0770+p0767*p0771+p0768*p0772=0;0;p0771*p0767/(p0765*p0769+p0766*p0770+p0767*p0771+p0768*p0772))
- p1712: 0
- p2186: 6.7358e-5; = p1052/p0818
- p3092: 2.06418e-8; = p2311*p1132
- p0014: 353.469
- p0617: 0; = IF(p0353<0.5;-SQRT(p0007*EXP(p0485^2*p0008)-p0007);SQRT(p0007*EXP(p0485^2*p0008)-p0007))
- p1293: 0; = p1287*p1252/p0818
- p2101: 0.620397
- p2981: 0; = p2395*(p1020+p1022)
- p2967: 0; = p2381*(p1079+p1081)
- p0085: 14089.3
- p1833: 0
- p2359: 0; = p2225*p2187
- p0815: 0
- p2098: 0.856281
- p3377: 0.00124111; = if(p1232=0;p3246*p3359/p0818;0)
- p2316: 0; = p2224*p2183
- p3013: 0; = p2427*(p1079+p1081)
- p0737: 0
- p2648: 1.27676e-5; = p2257*(p1019+p1021)
- p0822: 0.898833
- p2447: 7.02513e-9; = p2251*p1014
- p4307: 8.13761e-7; = p1962*p3479
- p1709: 0
- p1655: 0
- p3107: 0; = p2326*p1023
- p2775: 0; = p2384*(p1078+p1080)
- p0707: 22.458; = p0047*(1+p0575*p0179/100)
- p0710: 12.884; = p0050*(1+p0578*p0182/100)
- p2118: 0.679049
- p0440: 0; = SQRT(2)*(IF((2*p0308-1)<0;-1;IF((2*p0308-1)>0;1;0))*SQRT(SQRT((2/(pi()*0.140012289)+LN(1-(2*p0308-1)^2)/2)^2-LN(1-(2*p0308-1)^2)/0.140012289)-(2/(pi()*0.140012289)+LN(1-(2*p0308-1)^2)/2)))
- p3234: 0.39606; = 1-p3233
- p3043: 0; = p2262*p1082
- p0870: 4.77783e6; = p0858*p0856
- p0803: 0
- p1991: 7.41318e7; = (if(p1111=0;0;p1106/p1111)+if(p1112=0;0;p1107/p1112)+if(p1113=0;0;p1108/p1113)+if(p1114=0;0;p1109/p1114)+if(p1115=0;0;p1110/p1115))*(1+p1157)
- p2947: 0; = p2361*(p1020+p1022)
- p2048: 1.34913e-14; = p2015*p2046/(p0818*1000000000000)
- p0002: 0.453592
- p1868: 0
- p0019: 1175.02
- p1250: 0; = if(p1232>0;0;p1245*p0001/(p0818*p0002))
- p3355: 1.11667e7; = if(and(p1232=0;p3256<>0);p3256-(p3350+p3351+p3352+p3353+p3354);0)
- p0764: 13.251; = p0104*(1+p0632*p0236/100)
- p1037: 0.386463
- p2175: 0.00080889; = p0895*p0908/p0818
- p0887: 0; = 1000*p0886*p0001*p0003*p0004/(p0818*p0002)
- p3099: 0; = p2318*p1023
- p2137: 6.3513e-8; = p2015*p2065*p2099/(p0818*1000)
- p2058: 1.24412
- p1925: 0
- p2859: 0; = p2273*(p1129+p1131)
- p4596: 6.9096e-7; = p1835*p3481
- p0380: 0.5
- p3385: 0; = p3366*p1234
- p1951: 0
- p0111: 13.777
- p1673: 0
- p3235: 0.118093
- p1814: 0
- p3209: 0; = p2428*p1132
- p2714: 0; = p2323*(p1019+p1021)
- p1116: 4.96483e-5; = IF(p1071=0;p1106/(p1111*p0818);0)
- p2122: 0.341195
- p2182: 0.000415507; = p1050/p0818
- p0829: 0; = if(p0807=480;p0814*(1-p0824);0)
- p0823: 0
- p0864: 0.155213; = IF(p0858=1;0;IF(p0858+p0859>1;1-p0858;p0859))
- p1235: 0.65195; = if(p1232>0;0;p0727/100)
- p1608: 0
- p2123: 0.263965
- p2955: 0; = p2369*(p1020+p1022)
- p3351: 1.11025e7; = if(and(p1232=0;p3256<>0);p3256*(p3274-p3346)/p3349;0)
- p0773: 12.884; = p0113*(1+p0641*p0245/100)
- p1165: 0.000359171; = p0801*p0001/(p0818*p0002)
- p3403: 0; = p3365*p1238
- p2695: 0.000282928; = p2304*(p1078+p1080)
- p1983: 50
- p0217: 8.969
- p0734: 0
- p2418: 0; = p2235*p2208
- p2200: 0.000225376; = p1056/p0818
- p1219: 0; = if(p1218=0;0;SQRT(2)*(IF((2*p1218-1)<0;-1;IF((2*p1218-1)>0;1;0))*SQRT(SQRT((2/(pi()*0.140012289)+LN(1-(2*p1218-1)^2)/2)^2-LN(1-(2*p1218-1)^2)/0.140012289)-(2/(pi()*0.140012289)+LN(1-(2*p1218-1)^2)/2))))
- p3566: 3.49385e-7; = p1835*p3476
- p0064: 4.005
- p1174: 1.25158e-7; = p1170*p1173/p0818
- p2610: 0; = p2414*p1073
- p2352: 2.99615e-5; = p2232*p2220
- p3301: 0; = if(and(p1232=0;p3252<>0);p3257*p3277*(p3297*p3290+(1-p3297)*p3294);0)
- p2247: 6.74069e-6; = p2222*p2192
- p2031: 0.465411
- p0013: 783.644
- p2969: 0; = p2383*(p1079+p1081)
- p2539: 5.37091e-6; = p2343*p1073
- p0758: 0
- p2937: 9.44288e-5; = p2351*(p1129+p1131)
- p2663: 0; = p2272*(p1128+p1130)
- p1791: 0
- p1113: 0.100377
- p3194: 0; = p2413*p1023
- p0857: 3.59171; = p0856*p0001*p0003/(p0818*p0002)
- p2856: 4.16238e-7; = p2270*(p1079+p1081)
- p1680: 0
- p3059: 7.45156e-11; = p2278*p1023
- p3061: 5.94015e-10; = p2280*p1023
- p0059: 21.847
- p1781: 0
- p2940: 0; = p2354*(p1020+p1022)
- p3457: 0; = p3362*p1241
- p3241: 5.65454e-10; = p3234*p1188*p3236/p0818
- p2902: 0; = p2316*(p1020+p1022)
- p1744: 0
- p2086: 0.0617647
- p1896: 0
- p1736: 0
- p1013: 0; = p1012*p0001/(p0818*p0002)
- p2984: 0; = p2398*(p1020+p1022)
- p2502: 3.64246e-6; = p2306*p1073
- p3420: 0; = p3363*p1239
- p1056: 3.91884e6; = IF(p1012=0;p1049*p1036;0)
- p3081: 0; = p2300*p1082
- p3319: 0; = if(and(p1232=0;p3253<>0);p3253*(p3263-p3314)/p3316;0)
- p0931: 1.17502e6; = p0801*p0925
- p2993: 0; = p2407*(p1020+p1022)
- p2725: 0; = p2334*(p1019+p1021)
- p1614: 0
- p1773: 0
- p0983: 0; = if(p0886=0;0;min(1;(p0695*p0694*1000*p0697/100)/p0886))
- p0703: 7001.23; = p0043*(1+p0571*p0175/100)
- p3464: 0; = p3369*p1241
- p3118: 0; = p2337*p1082
- p4513: 0; = p1962*p3480
- p0309: 0.5
- p1097: 0.0685077
- p3333: 0; = if(and(p1232=0;p3255<>0);p3255-(p3328+p3329+p3330+p3331+p3332);0)
- p2897: 0.000450962; = p2311*(p1129+p1131)
- p3223: 0.126838; = IF(p3216=0;0;(1-p1223)*24.3050/84.3139)
- p2392: 0; = p2233*p2221
- p0011: 1086.49
- p1447: 2721
- p2810: 0; = p2419*(p1078+p1080)
- p3244: 0; = p0791/100
- p2886: 0.000201829; = p2300*(p1079+p1081)
- p3165: 0; = p2384*p1082
- p2001: 400
- p4007: 2.24747e-6; = p1864*p3478
- p1954: 0
- p1101: 0.0685077; = IF(p1071=0;IF(p1096=1;0;IF(p1096+p1097>1;1-p1096;p1097));0)
- p1012: 0
- p3286: 0.185
- p0519: 0; = SQRT(2)*(IF((2*p0387-1)<0;-1;IF((2*p0387-1)>0;1;0))*SQRT(SQRT((2/(pi()*0.140012289)+LN(1-(2*p0387-1)^2)/2)^2-LN(1-(2*p0387-1)^2)/0.140012289)-(2/(pi()*0.140012289)+LN(1-(2*p0387-1)^2)/2)))
- p0474: 0; = SQRT(2)*(IF((2*p0342-1)<0;-1;IF((2*p0342-1)>0;1;0))*SQRT(SQRT((2/(pi()*0.140012289)+LN(1-(2*p0342-1)^2)/2)^2-LN(1-(2*p0342-1)^2)/0.140012289)-(2/(pi()*0.140012289)+LN(1-(2*p0342-1)^2)/2)))
- p2414: 0; = p2235*p2204
- p0963: 0; = if(and(p0683>0;or(p0807=480;p0807=32;p0807=1;and(p0807=60;p0901<0.03)));p0939;0)
- p3193: 0; = p2412*p1023
- p2046: 10
- p3125: 0; = p2344*p1082
- p0684: 44.545; = p0024*(1+p0552*p0156/100)
- p2079: 0.02
- p0906: 0.00672763
- p2624: 0; = p2428*p1123
- p2891: 7.77422e-7; = p2305*(p1079+p1081)
- p2338: 1.39246e-5; = p2228*p2206
- p0591: 0; = IF(p0327<0.5;-SQRT(p0007*EXP(p0459^2*p0008)-p0007);SQRT(p0007*EXP(p0459^2*p0008)-p0007))
- p3792: 0; = p1855*p3477
- p0843: 0.0242
- p2227: 0.802209; = if(p0774*p0778+p0775*p0779+p0776*p0780+p0777*p0781=0;0;p0779*p0775/(p0774*p0778+p0775*p0779+p0776*p0780+p0777*p0781))
- p2523: 0; = p2327*p1014
- p1332: 8.21789e6; = p1321*p0801
- p3172: 0; = p2391*p1132
- p2285: 6.21862e-6; = p2223*p2191
- p0718: 69.817; = p0058*(1+p0586*p0190/100)
- p5063: 0; = p1890*p3483
- p2196: 0.000706367; = p1068-p2193-p2195
- p1198: 0.44
- p0790: 0
- p1650: 0
- p5155: 3.18672e-7; = p1776*p3484
- p1286: 0; = p1282*p1252/p0818
- p0184: 19.104
- p3300: 0; = if(p1293+p1294+p1295+p1296=0;0;p1293/(p1293+p1294+p1295+p1296))
- p2667: 0.000248434; = p2276*(p1019+p1021)
- p1674: 0
- p2095: 0.765734
- p2653: 1.31075e-5; = p2262*(p1078+p1080)
- p2716: 0; = p2325*(p1019+p1021)
- p2794: 0; = p2403*(p1019+p1021)
- p0421: 0; = SQRT(2)*(IF((2*p0289-1)<0;-1;IF((2*p0289-1)>0;1;0))*SQRT(SQRT((2/(pi()*0.140012289)+LN(1-(2*p0289-1)^2)/2)^2-LN(1-(2*p0289-1)^2)/0.140012289)-(2/(pi()*0.140012289)+LN(1-(2*p0289-1)^2)/2)))
- p1693: 0
- p3175: 0; = p2394*p1023
- p1253: 0; = if(p1232>0;0;p0735/100)
- p2965: 0; = p2379*(p1079+p1081)
- p2777: 0; = p2386*(p1078+p1080)
- p1978: 327
- p0993: 0; = p0989*p0001*p0004/(p0818*p0002)
- p0869: 0; = IF(p0858+p0864+p0865+p0866+p0867+p0868=1;0;1-(p0858+p0864+p0865+p0866+p0867+p0868))
- p1069: 3.81556e-6; = IF(p1012=0;p1055/(p1062*p0818);0)
- p2454: 4.40515e-6; = p2258*p1073
- p2192: 5.70658e-5; = p1067-p2189-p2190-p2191
- p2784: 0; = p2393*(p1019+p1021)
- p2564: 0; = p2368*p1014
- p3236: 0.0140975
- p3070: 6.2293e-9; = p2289*p1023
- p2407: 0; = p2234*p2197
- p0384: 0.5
- p3410: 0; = p3372*p1238
- p0551: 0; = IF(p0287<0.5;-SQRT(p0007*EXP(p0419^2*p0008)-p0007);SQRT(p0007*EXP(p0419^2*p0008)-p0007))
- p1228: 0.0523645; = IF(p1221=0;0;p0801*p1212*2000/(p1222+p1221*p1225)/p0818)
- p1245: 0; = if(p1232>0;0;p1240*(p0725/100)*p0723*1000)
- p2986: 0; = p2400*(p1020+p1022)
- p2355: 0; = p2225*p2183
- p1562: 0
- p2049: 25.6942
- p1057: 0.82
- p2172: 0.364511; = p2166-(p2167+p2168+p2169+p2170)
- p3140: 0; = p2359*p1023
- p1461: 21
- p3326: 0; = if(and(p1232=0;p3255<>0);p3268*p3289;0)
- p2082: 0.285294
- p1261: 0.4228; = if(p1232>0;0;p0732/100)
- p0885: 100; = IF(p0689+p0884=100;0;100-(p0689+p0884))
- p0151: 0
- p1095: 2.95373e7; = IF(p1071=0;p0797*p0702*1000*p0798/100;0)
- p4537: 1.61699e-6; = p1776*p3481
- p0512: 0; = SQRT(2)*(IF((2*p0380-1)<0;-1;IF((2*p0380-1)>0;1;0))*SQRT(SQRT((2/(pi()*0.140012289)+LN(1-(2*p0380-1)^2)/2)^2-LN(1-(2*p0380-1)^2)/0.140012289)-(2/(pi()*0.140012289)+LN(1-(2*p0380-1)^2)/2)))
- p1819: 0
- p1318: 0; = p1317*p0001/(p0818*p0002)
- p2876: 1.20909e-7; = p2290*(p1020+p1022)
- p2778: 0; = p2387*(p1078+p1080)
- p1700: 0
- p0805: 0
- p2145: 4.49181e-7; = p2015*p2073*p2107/(p0818*1000)
- p0716: 13.463; = p0056*(1+p0584*p0188/100)
- p3896: 0; = p1963*p3477
- p2177: 0.1375; = p0895/p0818-(p2173+p2174+p2175+p2176)
- p1904: 0
- p2292: 1.94282e-6; = p2223*p2199
- p2488: 1.89269e-7; = p2292*p1014
- p0914: 5.03891e8; = p0825*p0911+(p0830+p0895)*p0824*p0913
- p2808: 0; = p2417*(p1078+p1080)
- p0247: 12.415
- p1794: 0
- p1570: 0
- p2761: 0; = p2370*(p1019+p1021)
- p2256: 1.64264e-6; = p2222*p2202
- p1199: -0.29
- p1145: 5.45111e7; = if(p1121=0;p0799*p0702*1000*p0800/100;0)
- p3111: 0; = p2330*p1023
- p1698: 0
- p3474: 1.63247e-5; = p3379*p1241
- p1167: 0.5
- p3430: 0; = p3373*p1239
- p1820: 0
- p1148: 0.0889917; = if(p1121=0;IF(p1146=1;0;1-p1146);0)
- p1859: 0
- p2675: 1.67658e-5; = p2284*(p1019+p1021)
- p2548: 2.49729e-6; = p2352*p1123
- p2900: 7.6551e-5; = p2314*(p1129+p1131)
- p1172: 2.50316e-7; = p1170/p0818
- p3252: 0; = p1252*(p1267*(1-p3247)+p1270*(1-p3248)+p1271*(1-p3249)+p1272*(1-p3250))
- p0641: 0; = IF(p0377<0.5;-SQRT(p0007*EXP(p0509^2*p0008)-p0007);SQRT(p0007*EXP(p0509^2*p0008)-p0007))
- p1647: 0
- p1239: 0; = if(p1232>0;0;IF(p1234+p1238=1;0;IF(p1234+p1238+p1236>1;1-(p1234+p1238);p1236)))
- p2841: 2.56322e-6; = p2255*(p1020+p1022)
- p2472: 3.56973e-5; = p2276*p1014
- p2966: 0; = p2380*(p1079+p1081)
- p1309: 0
- p3827: 0; = p1890*p3477
- p0005: 1.60934
- p3466: 0; = p3371*p1241
- p0942: 0; = if(and(p0683=0;p0948=0);p0936;0)
- p0350: 0.5
- p2335: 0; = p2224*p2203
- p1190: 1.01273e-7; = p1188/p0818
- p1739: 0
- p3439: 0; = p3363*p1240
- p1063: 0.455
- p1789: 0
- p1963a: 0; = p1550*p1754+p1551*p1755+p1552*p1756+p1553*p1757+p1554*p1758+p1555*p1759+p1556*p1760+p1557*p1761+p1558*p1762+p1559*p1763+p1560*p1764+p1561*p1765+p1562*p1766+p1563*p1767+p1564*p1768+p1565*p1769+p1566*p1770+p1567*p1771+p1568*p1772
- p2144: 1.54801e-7; = p2015*p2072*p2106/(p0818*1000)
- p0792: 0
- p3027: 8.3294e-12; = p2246*p1023
- p2487: 8.60862e-8; = p2291*p1014
- p1711: 0
- p0091: 12.386
- p2720: 0; = p2329*(p1019+p1021)
- p4210: 3.78799e-7; = p1861*p3479
- p1441: 130
- p0499: 0; = SQRT(2)*(IF((2*p0367-1)<0;-1;IF((2*p0367-1)>0;1;0))*SQRT(SQRT((2/(pi()*0.140012289)+LN(1-(2*p0367-1)^2)/2)^2-LN(1-(2*p0367-1)^2)/0.140012289)-(2/(pi()*0.140012289)+LN(1-(2*p0367-1)^2)/2)))
- p0066: 32.672
- p0677: 0
- p3407: 0; = p3369*p1238
- p3075: 8.52107e-10; = p2294*p1023
- p1979: 4.81243e8; = p0973
- p1803: 0
- p0715: 0
- p0058: 69.817
- p2211: 0.000521595; = p1120-p2209-p2208-p2210
- p0137: 32.745
- p2994: 0; = p2408*(p1020+p1022)
- p1118: 0.000195136; = IF(p1071=0;p1108/(p1113*p0818);0)
- p2927: 2.12003e-6; = p2341*(p1079+p1081)
- p2531: 0; = p2335*p1014
- p1100: 0.275167
- p1882: 0
- p1921: 0
- p1598: 0
- p1171: 0.000359171; = p0801*p0001/(p0818*p0002)
- p3137: 0; = p2356*p1023
- p2302: 7.40034e-5; = p2227*p2209
- p1796: 0
- p3335: 0.0141479; = IF(or(p3254=0;p1232>0);0;p3270*(p3280*(p3283*p1256+p3286*(p1253+p1257)+p1258*p3288+p3300*p3287)))
- p1067: 0.000116656; = IF(p1012=0;p1053/(p1060*p0818);0)
- p3361: 1.33077e7; = if(p1232=0;p3311+p3322+p3333+p3344+p3355;0)
- p0468: 0; = SQRT(2)*(IF((2*p0336-1)<0;-1;IF((2*p0336-1)>0;1;0))*SQRT(SQRT((2/(pi()*0.140012289)+LN(1-(2*p0336-1)^2)/2)^2-LN(1-(2*p0336-1)^2)/0.140012289)-(2/(pi()*0.140012289)+LN(1-(2*p0336-1)^2)/2)))
- p3255: 0; = p1252*(p1297*(1-p3247)+p1300*(1-p3248)+p1301*(1-p3249)+p1302*(1-p3250))
- p2003: 50
- p2879: 4.46363e-5; = p2293*(p1020+p1022)
- p0872: 1.08649e6; = p0864*p0856
- p2535: 1.15846e-5; = p2339*p1073
- p1196: 0.59
- p1782: 0
- p2741: 0.00021414; = p2350*(p1128+p1130)
- p0826: 0.101167; = 1-p0825/p0818
- p1906: 0
- p0009: 17.1081
- p2022: 0.000231885; = p2018*p2015/p0818-p2021
- p1111: 0.0872841
- p1288: 0
- p1940: 0
- p3142: 0; = p2361*p1023
- p1887: 0
- p2262: 1.93849e-5; = p2226*p2208
- p2989: 0; = p2403*(p1020+p1022)
- p2978: 0; = p2392*(p1129+p1131)
- p0327: 0.5
- p4949: 0; = p1776*p3483
- p2805: 0; = p2414*(p1078+p1080)
- p2066: 0.109412
- p0854: 2.73513e6; = p0801*((1-p0853)*p0846+p0853*p0852)
- p2293: 0.000198755; = p2223*p2200
- p2503: 4.08244e-6; = p2307*p1073
- p3204: 0; = p2423*p1082
- p1651: 0.299611
- p2703: 0.00203088; = p2312*(p1128+p1130)
- p0286: 0.5
- p3179: 0; = p2398*p1023
- p3213: 0.112803; = p1222*12.0107/100.0869
- p1981: 400
- p3383: 0; = p3364*p1234
- p3215: 0.450791; = p1222*3*15.9994/100.0869
- p1052: 1.17122e6; = IF(p1012=0;p1045*p1036;0)
- p3155: 0; = p2374*p1023
- p2180: 6.11627e-8; = p3233*p1188/(p0818)
- p5012: 0; = p1839*p3483
- p2089: 0.40001
- p0967: 2.1437e8; = (p0684/100)*p0683*p0682*1000
- p3095: 3.50396e-9; = p2314*p1132
- p3196: 0; = p2415*p1082
- p1623: 0
- p3332: 0; = if(and(p1232=0;p3255<>0);IF((p3328+p3329+p3330+p3331)+(p3255*(p3265*(1-p3277))/p3327)>p3255;p3255-(p3328+p3329+p3330+p3331);p3255*(p3265*(1-p3277))/p3327);0)
- p1930: 0
- p2793: 0; = p2402*(p1019+p1021)
- p0894: 0.19
- p0256: 15.413
- p3124: 0; = p2343*p1082
- p1249: 0; = if(p1232>0;0;p1244*p0001/(p0818*p0002))
- p1163: 0.00486145
- p2811: 0; = p2420*(p1078+p1080)
- p1572: 0.0125
- p3094: 2.01639e-9; = p2313*p1132
- p4895: 0; = p1928*p3482
- p2762: 0; = p2371*(p1019+p1021)
- p1267: 0
- p2652: 7.22876e-5; = p2261*(p1078+p1080)
- p1337: 0; = p1336*p0001/(p0818*p0002)
- p2527: 0; = p2331*p1014
- p1858: 0
- p2565: 0; = p2369*p1014
- p3713: 0; = p1776*p3477
- p1862: 0
- p1330: 0; = p1320*p0801
- p2271: 1.66816e-5; = p2226*p2217
- p1208: 105.495; = p1205*p0818*p0822/p0801
- p0702: 7001.23; = p0042*(1+p0570*p0174/100)
- p2282: 0.000109367; = p2223*p2188
- p1294: 0; = p1290*p1252/p0818
- p1805: 0
- p0701: 0
- p1327a: 0.0491316; = (p0745*1000/p0801)*(1-(p0746+p0747+p0748+p0749+p0750+p0751+p0752+p0753)/100)+(p0754*1000/p0801)*(1-(p0755+p0756+p0757+p0758+p0759+p0760+p0761+p0762)/100)
- p2313: 0.000201639; = p2231*p2220
- p2802: 0; = p2411*(p1019+p1021)
- p2242: 1.14511e-6; = p2222*p2187
- p2461: 4.96641e-6; = p2265*p1073
- p1658: 0
- p1642: 0
- p1916: 0
- p2274: 0; = p2230*p2220
- p2056: 2.07882
- p1595: 0
- p2688: 0.000250955; = p2297*(p1078+p1080)
- p0548: 0; = IF(p0284<0.5;-SQRT(p0007*EXP(p0416^2*p0008)-p0007);SQRT(p0007*EXP(p0416^2*p0008)-p0007))
- p3163: 0; = p2382*p1082
- p1714: 0
- p0619: 0; = IF(p0355<0.5;-SQRT(p0007*EXP(p0487^2*p0008)-p0007);SQRT(p0007*EXP(p0487^2*p0008)-p0007))
- p4101: 2.30599e-6; = p1962*p3478
- p0693: 0
- p3115: 0; = p2334*p1023
- p2825: 2.2415e-7; = p2239*(p1020+p1022)
- p1279: 0
- p4445: 0; = p1890*p3480
- p0183: 51.78
- p1058: 0.225
- p2011: 0.00125619
- p1632: 0
- p0901: 0.0656776
- p2187: 9.69433e-6; = 4*1.00794*p2186/(2*14.0067)
- p2100: 0.705744
- p3117: 0; = p2336*p1082
- p2935: 4.03436e-6; = p2349*(p1079+p1081)
- p0928: 2.8442e6; = p0801*p0918
- p1756: 0
- p0809: 0
- p2008: 0.00852315; = ((p1982*p1985+p1988*p1991+p1994*p1997+p2002*p2005)/p0818)*p0005*p0002/1000
- p4218: 2.48587e-7; = p1869*p3479
- p0759: 0
- p2656: 3.35143e-5; = p2265*(p1078+p1080)
- p1285: 0; = p1281*p1252/p0818
- p1919: 0
- p2875: 0.000139898; = p2289*(p1020+p1022)
- p2099: 0.620397
- p2389: 0; = p2233*p2218
- p2867: 1.91998e-6; = p2281*(p1020+p1022)
- p0080: 94.912
- p1033: 0; = IF(p1012=0;p1027*p0001/(p0818*p0002);0)
- p2723: 0; = p2332*(p1019+p1021)
- p5234: 3.81985e-6; = p1855*p3484
- p0308: 0.5
- p3398: 0.000250051; = p3379*p1234
- p3063: 1.09367e-9; = p2282*p1023
- p1227: 0.000359171; = IF(p1221=0;0;p1226*p0001/(p0818*p0002))
- p1176: 1090.62; = p1175*p0801
- p1328: 882416; = p1319*p0801
- p3310: 0; = if(and(p1232=0;p3252<>0);IF((p3306+p3307+p3308+p3309)+(p3252*(p3257*(1-p3277))/p3305)>p3252;p3252-(p3306+p3307+p3308+p3309);p3252*(p3257*(1-p3277))/p3305);0)
- p1751: 0.791173
- p1276: 0; = p1272*p1252/p0818
- p1728: 0
- p2558: 0; = p2362*p1014
- p2952: 0; = p2366*(p1020+p1022)
- p2736: 3.14878e-6; = p2345*(p1078+p1080)
- p0516: 0; = SQRT(2)*(IF((2*p0384-1)<0;-1;IF((2*p0384-1)>0;1;0))*SQRT(SQRT((2/(pi()*0.140012289)+LN(1-(2*p0384-1)^2)/2)^2-LN(1-(2*p0384-1)^2)/0.140012289)-(2/(pi()*0.140012289)+LN(1-(2*p0384-1)^2)/2)))
- p0794: 0
- p3368: 0; = if(p1232=0;p3245*p3356/p0818;0)
- p0936: 0; = p0930*p0001/(p0818*p0002)
- p2595: 0; = p2399*p1014
- p3018: 4.90803e-10; = p2237*p1023
- p4419: 0; = p1864*p3480
- p1670: 0
- p1949: 0
- p3008: 0; = p2422*(p1079+p1081)
- p2738: 1.33178e-5; = p2347*(p1078+p1080)
- p3436: 0; = p3379*p1239
- p1886: 0
- p3772: 0; = p1835*p3477
- p2863: 1.80641e-5; = p2277*(p1020+p1022)
- p1607: 0
- p3037: 1.64264e-11; = p2256*p1023
- p1495: 949
- p1520: 28
- p3173: 0; = p2392*p1132
- p2452: 1.60026e-7; = p2256*p1014
- p0651: 0; = IF(p0387<0.5;-SQRT(p0007*EXP(p0519^2*p0008)-p0007);SQRT(p0007*EXP(p0519^2*p0008)-p0007))
- p1195: 0.45
- p2654: 5.92737e-6; = p2263*(p1078+p1080)
- p3083: 0; = p2302*p1082
- p2752: 0; = p2361*(p1019+p1021)
- p2028: 3.983e-5; = p2015*p2026*p2027/(p0818*1000)
- p2679: 4.27253e-5; = p2288*(p1019+p1021)
- p1998: 327
- p0992: 0; = p0988*p0001*p0004/(p0818*p0002)
- p3121: 0; = p2340*p1082
- p1783: 0
- p2490: 8.30123e-6; = p2294*p1014
- p1917: 0
- p2861: 0; = p2275*(p1129+p1131)
- p2614: 0; = p2418*p1073
- p0345: 0.5
- p1800: 0
- p3387: 0; = p3368*p1234
- p1255: 0; = if(p1232>0;0;p0737/100)
- p2690: 7.34985e-5; = p2299*(p1078+p1080)
- p2649: 2.97269e-5; = p2258*(p1078+p1080)
- p0378: 0.5
- p0706: 67.799; = p0046*(1+p0574*p0178/100)
- p3227: 0.0014904; = p3223*p1229
- p1268: 0
- p3483: 0; = if(p1328+p1330+p1332+p1334+p1336+p1338+p1340+p1342+p1344=0;0;p1342/(p1328+p1330+p1332+p1334+p1336+p1338+p1340+p1342+p1344))
- p2248: 3.93762e-5; = p2222*p2193
- p2908: 0; = p2322*(p1020+p1022)
- p3292: 0.258
- p0708: 0
- p0851: 0
- p0220: 11.231
- p2869: 4.85184e-6; = p2283*(p1020+p1022)
- p2205: 0.000418431; = 2*14.0067*p2204/30.973762
- p0020: 2844.2
- p0685: 4.609; = p0025*(1+p0553*p0157/100)
- p3424: 0; = p3367*p1239
- p0926: 0; = IF(p0918+p0923+p0924+p0925=1;0;IF(p0918+p0923+p0924+p0925+p0922>1;1-(p0918+p0923+p0924+p0925);p0922))
- p0174: 0
- p2448: 1.15306e-8; = p2252*p1014
- p1963f: 5.16651e-5; = p1647*p1851+p1648*p1852+p1649*p1853+p1650*p1854+p1651*p1855+p1652*p1856+p1653*p1857+p1654*p1858+p1655*p1859+p1656*p1860+p1657*p1861+p1658*p1862+p1659*p1863+p1660*p1864+p1661*p1865+p1662*p1866+p1663*p1867+p1664*p1868+p1665*p1869+p1666*p1870
- p1210: 0.46
- p3147: 0; = p2366*p1023
- p2178: 0.0314446; = (p0895*p0831/(1-p0831))/(p0818)
- p2336: 4.75443e-5; = p2228*p2204
- p2210: 3.98304e-5; = 6*1.00794*p2208/30.973762
- p1759: 0
- p0199: 19.892
- p3433: 0; = p3376*p1239
- p2932: 1.16719e-6; = p2346*(p1079+p1081)
- p2327: 0; = p2224*p2195
- p3028: 6.74069e-11; = p2247*p1023
- p0043: 7001.23
- p3469: 0.000100882; = p3374*p1241
- p1798: 0
- p0235: 0
- p4600: 2.49316e-7; = p1839*p3481
- p1560: 0
- p1638: 0
- p3290: 0.195
- p1084: 609932; = IF(p1071=0;p1078*(p0710/100)*p0703*1000;0)
- p2464: 4.83587e-7; = p2268*p1073
- p2998: 0; = p2412*(p1020+p1022)
- p3462: 0; = p3367*p1241
- p2711: 0; = p2320*(p1019+p1021)
- p1547: 1570
- p1806: 0
- p2727: 3.21481e-5; = p2336*(p1078+p1080)
- p1665: 0.575
- p3349: 0.816024; = if(and(p1232=0;p3256<>0);1-(p3345+p3346+p3347+p3348);0)
- p1592: 0
- p2201: 9.66241e-5; = 12.01*p2200/(2*14.0067)
- p3425: 0; = p3368*p1239
- p3390: 0; = p3371*p1234
- p2018: 0.1978
- p0046: 67.799
- p1333: 0.000421661; = p1332*p0001/(p0818*p0002)
- p1869: 1.20773e-6; = p1461*1000/p0818
- p2575: 0; = p2379*p1073
- p3264: 0.0887032
- p3212: 0; = p2431*p1132
- p2819: 0; = p2428*(p1128+p1130)
- p3138: 0; = p2357*p1023
- p0521: 0; = SQRT(2)*(IF((2*p0389-1)<0;-1;IF((2*p0389-1)>0;1;0))*SQRT(SQRT((2/(pi()*0.140012289)+LN(1-(2*p0389-1)^2)/2)^2-LN(1-(2*p0389-1)^2)/0.140012289)-(2/(pi()*0.140012289)+LN(1-(2*p0389-1)^2)/2)))
- p2813: 0; = p2422*(p1078+p1080)
- p0648: 0; = IF(p0384<0.5;-SQRT(p0007*EXP(p0516^2*p0008)-p0007);SQRT(p0007*EXP(p0516^2*p0008)-p0007))
- p2905: 0; = p2319*(p1020+p1022)
- p2036: 6.59504e-6; = p2015*p2030*(1-p2032)/(p0818*1000)
- p0729: 0
- p2860: 0; = p2274*(p1129+p1131)
- p3064: 2.1604e-10; = p2283*p1023
- p2116: 0.444424
- p2193: 0.000333354; = p1054/p0818
- p0342: 0.5
- p1027: 0; = IF(p1012=0;p1021*(p0704/100)*p0703*1000;0)
- p0455: 0; = SQRT(2)*(IF((2*p0323-1)<0;-1;IF((2*p0323-1)>0;1;0))*SQRT(SQRT((2/(pi()*0.140012289)+LN(1-(2*p0323-1)^2)/2)^2-LN(1-(2*p0323-1)^2)/0.140012289)-(2/(pi()*0.140012289)+LN(1-(2*p0323-1)^2)/2)))
- p1117: 0.000242448; = IF(p1071=0;p1107/(p1112*p0818);0)
- p0007: 14; = p0006-1
- p0951: 0; = if(and(p0683=0;or(p0807=480;p0807=32;p0807=1;and(p0807=60;p0901<0.03)));p0939;0)
- p1760: 0
- p0236: 34.629
- p0585: 0; = IF(p0321<0.5;-SQRT(p0007*EXP(p0453^2*p0008)-p0007);SQRT(p0007*EXP(p0453^2*p0008)-p0007))
- p3097: 0; = p2316*p1023
- p3080: 0; = p2299*p1082
- p0115: 32.925
- p0811: 0; = if(p0807=480;1-p0810;0)
- p4404: 0; = p1849*p3480
- p2012: 0.00216523
- p2842: 3.68905e-7; = p2256*(p1020+p1022)
- p2358: 0; = p2225*p2186
- p0909: 1.84111e8
- p1579: 0
- p1212: 0.0770128; = if(p1211=0;0;if(p1193>0;0;(p1207+p1208+p1209)*p1210/(2000*p1211)))
- p0141: 79.9043
- p3225: 0.00172701; = p3221*p1229
- p1956: 0
- p0089: 20.583
- p1959: 5960.74; = if(p0738*p0740*p0739>0;p0738*1000*(p0740/100)*p0739/1000;p1958)
- p2623: 0; = p2427*p1073
- p0705: 9.742; = p0045*(1+p0573*p0177/100)
- p2747: 0; = p2356*(p1019+p1021)
- p2824: 2.41956e-6; = p2238*(p1020+p1022)
- p5248: 2.94807e-8; = p1869*p3484
- p3397: 0.0022895; = p3378*p1234
- p2758: 0; = p2367*(p1019+p1021)
- p2212: 4.33351e-6; = p1106/p0818
- p0896: 0.497045
- p0698: 0
- p3318: 0; = if(and(p1232=0;p3253<>0);p3253*(p3262-p3313)/p3316;0)
- p2430: 0; = p2236*p2220
- p2737: 3.52913e-6; = p2346*(p1078+p1080)
- p3282: 0.3
- p0580: 0; = IF(p0316<0.5;-SQRT(p0007*EXP(p0448^2*p0008)-p0007);SQRT(p0007*EXP(p0448^2*p0008)-p0007))
- p0278: 0.5
- p1908: 0
- p3176: 0; = p2395*p1023
- p2037: 3.16
- p3052: 0; = p2271*p1082
- p1879: 0
- p1128: 0.69817; = if(p1121=0;IF(p1123=1;0;IF(p1123+p1124>1;1-p1123;p1124));0)
- p3042: 0; = p2261*p1082
- p1653: 0
- p3380: 0.107044; = p3251/p0818
- p2903: 0; = p2317*(p1020+p1022)
- p1738: 0
- p2257: 1.88316e-5; = p2222*p2203
- p0919: 0.35024; = p0678*1000/p0801
- p1907: 0
- p1068: 0.00111118; = IF(p1012=0;p1054/(p1061*p0818);0)
- p2348: 2.01287e-6; = p2228*p2216
- p2696: 2.35062e-6; = p2305*(p1078+p1080)
- p0988: 0; = p0982*p0886
- p3039: 0; = p2258*p1082
- p1743: 0
- p0461: 0; = SQRT(2)*(IF((2*p0329-1)<0;-1;IF((2*p0329-1)>0;1;0))*SQRT(SQRT((2/(pi()*0.140012289)+LN(1-(2*p0329-1)^2)/2)^2-LN(1-(2*p0329-1)^2)/0.140012289)-(2/(pi()*0.140012289)+LN(1-(2*p0329-1)^2)/2)))
- p1170: 4352.5; = p1169*p0801
- p2659: 3.26334e-6; = p2268*(p1078+p1080)
- p1761: 0
- p1254: 0; = if(p1232>0;0;p0736/100)
- p3978: 3.25381e-6; = p1835*p3478
- p2290: 5.38377e-7; = p2223*p2197
- p1258: 1; = if(p1232>0;0;IF(p1253+p1256+p1257=1;0;1-(p1253+p1256+p1257)))
- p2726: 0; = p2335*(p1019+p1021)
- p1893: 0
- p4204: 3.22098e-5; = p1855*p3479
- p1050: 7.22484e6; = IF(p1012=0;p1037*p1036;0)
- p1909: 0
- p3219: 0.0236055; = p3215*p1228
- p1065: 3.7554e-5; = IF(p1012=0;p1051/(p1058*p0818);0)
- p3470: 2.48739e-5; = p3375*p1241
- p0969: 2.44693e8; = p0966*p0683*p0682*1000
- p3395: 0.000124887; = p3376*p1234
- p0047: 22.458
- p2033: 3.88668e-6; = p2015*p2029*p2031/(p0818*1000)
- p0460: 0; = SQRT(2)*(IF((2*p0328-1)<0;-1;IF((2*p0328-1)>0;1;0))*SQRT(SQRT((2/(pi()*0.140012289)+LN(1-(2*p0328-1)^2)/2)^2-LN(1-(2*p0328-1)^2)/0.140012289)-(2/(pi()*0.140012289)+LN(1-(2*p0328-1)^2)/2)))
- p0593: 0; = IF(p0329<0.5;-SQRT(p0007*EXP(p0461^2*p0008)-p0007);SQRT(p0007*EXP(p0461^2*p0008)-p0007))
- p3218: 0.0197103; = p3214*p1228
- p2072: 0.134
- p4622: 2.27946e-7; = p1861*p3481
- p3230: 2.50316e-7; = p1170/p0818
- p2168: 0.0185747; = p2166*(p0903)
- p1193: 0; = IF(OR(p1036=0;p1095=0);0.0001*p0857;0)
- p0922: 0; = p0677*1000/p0801
- p0960: 0; = if(and(p0683>0;or(p0807=480;p0807=32;p0807=1;and(p0807=60;p0901<0.03)));p0936;0)
- p2319: 0; = p2224*p2186
- p0681: 0
- p3074: 1.98755e-9; = p2293*p1023
- p3049: 0; = p2268*p1082
- p3007: 0; = p2421*(p1079+p1081)
- p2371: 0; = p2225*p2200
- p1588: 0
- p2925: 2.58549e-5; = p2339*(p1079+p1081)
- p0578: 0; = IF(p0314<0.5;-SQRT(p0007*EXP(p0446^2*p0008)-p0007);SQRT(p0007*EXP(p0446^2*p0008)-p0007))
- p2672: 5.79629e-6; = p2281*(p1019+p1021)
- p0449: 0; = SQRT(2)*(IF((2*p0317-1)<0;-1;IF((2*p0317-1)>0;1;0))*SQRT(SQRT((2/(pi()*0.140012289)+LN(1-(2*p0317-1)^2)/2)^2-LN(1-(2*p0317-1)^2)/0.140012289)-(2/(pi()*0.140012289)+LN(1-(2*p0317-1)^2)/2)))
- p1156: 0.0123049; = p1064+p1065+p1066+p1067+p1068+p1069+p1070+p1116+p1117+p1118+p1119+p1120+p1154+p1155
- p2631: 2.33082e-6; = p2240*(p1019+p1021)
- p0050: 12.884
- p3103: 0; = p2322*p1023
- p0647: 0; = IF(p0383<0.5;-SQRT(p0007*EXP(p0515^2*p0008)-p0007);SQRT(p0007*EXP(p0515^2*p0008)-p0007))
- p1565: 0
- p2094: 0.922577
- p1735: 0
- p0045: 9.742
- p3180: 0; = p2399*p1023
- p3035: 2.66218e-10; = p2254*p1023
- p1889: 0
- p2063: 2.01468
- p2745: 0; = p2354*(p1019+p1021)
- p0114: 50.819
- p0211: 7.519
- p0001: 0.404686
- p3208: 0; = p2427*p1082
- p3030: 8.44075e-11; = p2249*p1023
- p2223: 0.881879; = if(p0765*p0769+p0766*p0770+p0767*p0771+p0768*p0772=0;0;p0770*p0766/(p0765*p0769+p0766*p0770+p0767*p0771+p0768*p0772))
- p1292: 0.4228; = IF(p1287+p1290+p1291=p1261;0;p1261-(p1287+p1290+p1291))
- p3689: 2.47611e-7; = p1962*p3476
- p2478: 1.06546e-5; = p2282*p1014
- p0409: 0; = SQRT(2)*(IF((2*p0277-1)<0;-1;IF((2*p0277-1)>0;1;0))*SQRT(SQRT((2/(pi()*0.140012289)+LN(1-(2*p0277-1)^2)/2)^2-LN(1-(2*p0277-1)^2)/0.140012289)-(2/(pi()*0.140012289)+LN(1-(2*p0277-1)^2)/2)))
- p3087: 0; = p2306*p1082
- p2324: 0; = p2224*p2191
- p2449: 2.53513e-8; = p2253*p1014
- p0010: 4777.83
- p3266: 0.0545989
- p2161: 1.19406e-8; = p2015*p2085*p2123/(p0818*1000)
- p1205: 0.04725
- p0261: 47.901
- p3409: 0; = p3371*p1238
- p2195: 7.14583e-5; = p2194*p2193
- p1695: 0
- p4125: 2.68711e-6; = p1776*p3479
- p0441: 0; = SQRT(2)*(IF((2*p0309-1)<0;-1;IF((2*p0309-1)>0;1;0))*SQRT(SQRT((2/(pi()*0.140012289)+LN(1-(2*p0309-1)^2)/2)^2-LN(1-(2*p0309-1)^2)/0.140012289)-(2/(pi()*0.140012289)+LN(1-(2*p0309-1)^2)/2)))
- p3188: 0; = p2407*p1023
- p2129: 1.66275e-6; = p2015*p2057*p2091/(p0818*1000)
- p0977: 0; = IF(p0687=0;IF(OR(p0686=0;p0688=0);0;p0686*1000*p0688/100);0)
- p0407: 0; = SQRT(2)*(IF((2*p0275-1)<0;-1;IF((2*p0275-1)>0;1;0))*SQRT(SQRT((2/(pi()*0.140012289)+LN(1-(2*p0275-1)^2)/2)^2-LN(1-(2*p0275-1)^2)/0.140012289)-(2/(pi()*0.140012289)+LN(1-(2*p0275-1)^2)/2)))
- p3479: 0.20583; = if(p1328+p1330+p1332+p1334+p1336+p1338+p1340+p1342+p1344=0;0;p1334/(p1328+p1330+p1332+p1334+p1336+p1338+p1340+p1342+p1344))
- p2091: 0.374844
- p2948: 0; = p2362*(p1020+p1022)
- p1180: 3.13614e-8; = p1176*p1179/p0818
- p3322: 0; = if(and(p1232=0;p3253<>0);p3253-(p3317+p3318+p3319+p3320+p3321);0)
- p1343: 0; = p1342*p0001/(p0818*p0002)
- p0042: 7001.23
- p0463: 0; = SQRT(2)*(IF((2*p0331-1)<0;-1;IF((2*p0331-1)>0;1;0))*SQRT(SQRT((2/(pi()*0.140012289)+LN(1-(2*p0331-1)^2)/2)^2-LN(1-(2*p0331-1)^2)/0.140012289)-(2/(pi()*0.140012289)+LN(1-(2*p0331-1)^2)/2)))
- p3273: 0.753577
- p1722: 0
- p0748: 58.327; = p0088*(1+p0616*p0220/100)
- p2599: 0; = p2403*p1014
- p2134: 2.47125e-6; = p2015*p2062*p2096/(p0818*1000)
- p0330: 0.5
- p3181: 0; = p2400*p1023
- p0821: 1.77727
- p1059: 0.335
- p0065: 3.793
- p1028: 0; = IF(p1012=0;p1022*(p0704/100)*p0703*1000;0)
- p0937: 6.02904e-5; = p0931*p0001/(p0818*p0002)
- p1251: 2.90646e-7; = if(p1232>0;0;p1246*p0001/(p0818*p0002))
- p2959: 0; = p2373*(p1020+p1022)
- p2382: 0; = p2229*p2211
- p1717: 0
- p2970: 0; = p2384*(p1079+p1081)
- p1266: 0.5772; = if(p1232>0;0;IF(p1259+p1263+p1264+p1265=1;0;1-(p1259+p1263+p1264+p1265)))
- p1274: 0; = p1270*p1252/p0818
- p2114: 0.832356
- p1970: 7e6; = p0801
- p1724: 0.797375
- p2547: 3.60262e-5; = p2351*p1123
- p2216: 1.95871e-5; = p1108/p0818
- p1932: 0
- p2396: 0; = p2234*p2185
- p1609: 0
- p2769: 0; = p2378*(p1078+p1080)
- p1558: 0
- p2995: 0; = p2409*(p1020+p1022)
- p0274: 0.5
- p2023: 3.15
- p1927: 0
- p2092: 0.54529
- p1675: 0
- p3379: 0.000765338; = if(p1232=0;p3246*p3361/p0818;0)
- p0975: 0.0138384; = p0973*p0974/p0818
- p0251: 14.681
- p1799: 0
- p1963d: 0; = p1608*p1812+p1609*p1813+p1610*p1814+p1611*p1815+p1612*p1816+p1613*p1817+p1614*p1818+p1615*p1819+p1616*p1820+p1617*p1821+p1618*p1822+p1619*p1823+p1620*p1824+p1621*p1825+p1622*p1826+p1623*p1827+p1624*p1828+p1625*p1829+p1626*p1830+p1627*p1831
- p1774: 0
- p3801: 0; = p1864*p3477
- p3129: 0; = p2348*p1082
- p5338: 4.34104e-6; = p1963*p3484
- p2538: 4.10137e-7; = p2342*p1073
- p1593: 0
- p0692: 0
- p2269: 1.82126e-5; = p2226*p2215
- p0987: 0; = if(p0978>0;0;if(and(p0687=0;p0691=0;p0695=0;p0699=0);0;IF(p0982+p0985+p0986=1;0;1-(p0982+p0985+p0986))))
- p3309: 0; = if(and(p1232=0;p3252<>0);p3252*(p3260-p3304)/p3305;0)
- p2926: 4.68813e-6; = p2340*(p1079+p1081)
- p1019: 0.67799; = IF(p1012=0;IF(p1014=1;0;IF(p1014+p1015>1;1-p1014;p1015));0)
- p1964: 0.5
- p0881: 0; = p0880*p0001*p0003/(p0818*p0002)
- p0953: 0.000125796; = if(and(p0683>0;or(p0807=56;p0807=100;and(p0807=60;p0901>0.06)));p0935;0)
- p3303: 0; = if(and(p1232=0;p3252<>0);p3259*p3289;0)
- p0343: 0.5
- p2554: 0; = p2358*p1014
- p2281: 8.54922e-6; = p2223*p2187
- p0123: 29.154
- p3570: 1.26067e-7; = p1839*p3476
- p2833: 1.51382e-6; = p2247*(p1020+p1022)
- p2521: 0; = p2325*p1014
- p3388: 0; = p3369*p1234
- p0177: 50.036
- p0142: 0
- p3454: 0; = p3378*p1240
- p1282: 0; = IF(p1277+p1280+p1281=p1260;0;p1260-(p1277+p1280+p1281))
- p2240: 3.43784e-6; = p2222*p2185
- p0890: 0; = p0686*1000*p0687*p0885/100
- p1772: 0
- p3239: 0.013074; = IF(p3238+p3235+p3236=1;0;1-(p3238+p3235+p3236))
- p0850: 0
- p2075: 0.072
- p3338: 0.742084; = if(and(p1232=0;p3254<>0);1-(p3334+p3335+p3336+p3337);0)
- p1963: 0.000177839; = p1963a+p1963b+p1963c+p1963d+p1963e+p1963f+p1963g+p1963h+p1963i+p1963j+p1963k
- p1015: 0.67799; = IF(p1012=0;p0706/100;0)
- p2422: 0; = p2235*p2212
- p1876: 0
- p0581: 0; = IF(p0317<0.5;-SQRT(p0007*EXP(p0449^2*p0008)-p0007);SQRT(p0007*EXP(p0449^2*p0008)-p0007))
- p1851: 0
- p0666: 0; = IF(p0402<0.5;-SQRT(p0007*EXP(p0534^2*p0008)-p0007);SQRT(p0007*EXP(p0534^2*p0008)-p0007))
- p1691: 0
- p5028: 0; = p1855*p3483
- p1848: 0
- p1821: 0
- p2017: 1.06971e7; = p2015*p0898
- p2979: 0; = p2393*(p1020+p1022)
- p3865: 0; = p1928*p3477
- p2121: 0.822447
- p2776: 0; = p2385*(p1078+p1080)
- p1842: 0
- p3276: 0.0887032
- p1645: 0.61461
- p3468: 0; = p3373*p1241
- p2402: 0; = p2234*p2191
- p4651: 1.0685e-7; = p1890*p3481
- p2534: 1.39524e-6; = p2338*p1073
- p2930: 9.95902e-8; = p2344*(p1079+p1081)
- p2225: 0; = if(p0765*p0769+p0766*p0770+p0767*p0771+p0768*p0772=0;0;p0772*p0768/(p0765*p0769+p0766*p0770+p0767*p0771+p0768*p0772))
- p5034: 0; = p1861*p3483
- p0289: 0.5
- p2670: 1.74016e-5; = p2279*(p1019+p1021)
- p2263: 8.76609e-6; = p2226*p2209
- p3465: 0; = p3370*p1241
- p0795: 20.151; = p0135*(1+p0663*p0267/100)
- p3312: 0; = if(and(p1232=0;p3253<>0);p3261*p3277*(p3298*p3290+(1-p3298)*p3294);0)
- p0053: 22.363
- p2699: 0.000103962; = p2308*(p1078+p1080)
- p1559: 0
- p2015: 2.34586e7; = p0830*p2011*p2013
- p1009: 0; = p1005*p0001*p0004/(p0818*p0002)
- p1259: 0; = if(p1232>0;0;p0730/100)
- p0863: 0; = p0675*1000/p0856
- p1078: 0.67617; = IF(p1071=0;IF(p1073=1;0;IF(p1073+p1074>1;1-p1073;p1074));0)
- p2541: 4.6661e-7; = p2345*p1073
- p3481: 0.12386; = if(p1328+p1330+p1332+p1334+p1336+p1338+p1340+p1342+p1344=0;0;p1338/(p1328+p1330+p1332+p1334+p1336+p1338+p1340+p1342+p1344))
- p0907: 0
- p3010: 0; = p2424*(p1079+p1081)
- p0709: 0
- p2019: 0.13105
- p0866: 0.111949; = IF(p0858+p0864+p0865=1;0;IF(p0858+p0864+p0865+p0861>1;1-(p0858+p0864+p0865);p0861))
- p3258: 0.0491162
- p0889: 0; = 1000*p0888*p0001*p0003*p0004/(p0818*p0002)
- p1456: 67
- p2800: 0; = p2409*(p1019+p1021)
- p2096: 0.486404
- p2973: 0; = p2387*(p1079+p1081)
- p2427: 0; = p2235*p2217
- p1018: 0; = IF(p1012=0;p0709/100;0)
- p3404: 0; = p3366*p1238
- p0119: 79.783
- p1224: 0.44; = IF(p1221=0;0;IF(p1193=0;1-p1223;0))
- p1636: 0
- p2728: 2.90755e-5; = p2337*(p1078+p1080)
- p2344: 4.45335e-7; = p2228*p2212
- p2459: 8.78363e-7; = p2263*p1073
- p1835: 5.57856e-6; = p1427*1000/p0818
- p0723: 7001.43; = p0063*(1+p0591*p0195/100)
- p1302: 0; = IF(p1297+p1300+p1301=p1262;0;p1262-(p1297+p1300+p1301))
- p1299: 0
- p2297: 0.000371141; = p2227*p2204
- p2697: 2.45801e-5; = p2306*(p1078+p1080)
- p3459: 0; = p3364*p1241
- p1963i: 1.28402e-6; = p1706*p1910+p1707*p1911+p1708*p1912+p1709*p1913+p1710*p1914+p1711*p1915+p1712*p1916+p1713*p1917+p1714*p1918+p1715*p1919+p1716*p1920+p1717*p1921+p1718*p1922+p1719*p1923+p1720*p1924+p1721*p1925+p1722*p1926+p1723*p1927+p1724*p1928
- p3096: 0; = p2315*p1023
- p2617: 0; = p2421*p1073
- p2639: 2.66967e-5; = p2248*(p1019+p1021)
- p0761: 0
- p2045: 30
- p1119: 0.00214161; = IF(p1071=0;p1109/(p1114*p0818);0)
- p3031: 8.34371e-10; = p2250*p1023
- p1603: 0
- p2029: 6.19
- p0370: 0.5
- p0725: 3.793; = p0065*(1+p0593*p0197/100)
- p2456: 1.29016e-6; = p2260*p1073
- p2345: 4.65679e-6; = p2228*p2213
- p2353: 5.20653e-5; = p2232*p2221
- p3798: 0; = p1861*p3477
- p1321: 1.17398; = IF(((p0745*1000*p0748/100)+(p0754*1000*p0757/100))/p0801<0;0;((p0745*1000*p0748/100)+(p0754*1000*p0757/100))/p0801)
- p2796: 0; = p2405*(p1019+p1021)
- p3314: 0; = if(and(p1232=0;p3253<>0);p3263*p3289;0)
- p1890: 8.62664e-7; = p1482*1000/p0818
- p3444: 0; = p3368*p1240
- p0336: 0.5
- p2560: 0; = p2364*p1014
- p0776: 23.876; = p0116*(1+p0644*p0248/100)
- p3237: 0.854735
- p4822: 0; = p1855*p3482
- p2845: 8.89192e-6; = p2259*(p1079+p1081)
- p1649: 0
- p1317: 0
- p2958: 0; = p2372*(p1020+p1022)
- p2310: 0.000140827; = p2227*p2217
- p0883: 0; = p0882*p0001*p0003/(p0818*p0002)
- p1314: 0; = p1310*p1252/p0818
- p2440: 2.81905e-7; = p2244*p1014
- p2272: 0; = p2230*p2218
- p0950: 0; = if(and(p0683=0;or(p0807=480;p0807=32;p0807=1;and(p0807=60;p0901<0.03)));p0938;0)
- p2985: 0; = p2399*(p1020+p1022)
- p0004: 0.0254
- p0717: 8.335; = p0057*(1+p0585*p0189/100)
- p2818: 0; = p2427*(p1078+p1080)
- p2496: 9.04319e-5; = p2300*p1073
- p0476: 0; = SQRT(2)*(IF((2*p0344-1)<0;-1;IF((2*p0344-1)>0;1;0))*SQRT(SQRT((2/(pi()*0.140012289)+LN(1-(2*p0344-1)^2)/2)^2-LN(1-(2*p0344-1)^2)/0.140012289)-(2/(pi()*0.140012289)+LN(1-(2*p0344-1)^2)/2)))
- p0410: 0; = SQRT(2)*(IF((2*p0278-1)<0;-1;IF((2*p0278-1)>0;1;0))*SQRT(SQRT((2/(pi()*0.140012289)+LN(1-(2*p0278-1)^2)/2)^2-LN(1-(2*p0278-1)^2)/0.140012289)-(2/(pi()*0.140012289)+LN(1-(2*p0278-1)^2)/2)))
- p2629: 7.30447e-6; = p2238*(p1019+p1021)
- p3112: 0; = p2331*p1023
- p2525: 0; = p2329*p1014
- p1895: 0
- p2868: 2.45617e-5; = p2282*(p1020+p1022)
- p0949: 0; = if(and(p0683=0;or(p0807=480;p0807=32;p0807=1;and(p0807=60;p0901<0.03)));p0937;0)
- p2751: 0; = p2360*(p1019+p1021)
- p4483: 0; = p1928*p3480
- p1922: 0
- p2593: 0; = p2397*p1014
- p1963b: 1.63187e-7; = p1569*p1773+p1570*p1774+p1571*p1775+p1572*p1776+p1573*p1777+p1574*p1778+p1575*p1779+p1576*p1780+p1577*p1781+p1578*p1782+p1579*p1783+p1580*p1784+p1581*p1785+p1582*p1786+p1583*p1787+p1584*p1788+p1585*p1789+p1586*p1790+p1587*p1791
- p0287: 0.5
- p0616: 0; = IF(p0352<0.5;-SQRT(p0007*EXP(p0484^2*p0008)-p0007);SQRT(p0007*EXP(p0484^2*p0008)-p0007))
- p1754: 0
- p0520: 0; = SQRT(2)*(IF((2*p0388-1)<0;-1;IF((2*p0388-1)>0;1;0))*SQRT(SQRT((2/(pi()*0.140012289)+LN(1-(2*p0388-1)^2)/2)^2-LN(1-(2*p0388-1)^2)/0.140012289)-(2/(pi()*0.140012289)+LN(1-(2*p0388-1)^2)/2)))
- p4102: 0.000103728; = p1963*p3478
- p0898: 0.456
- p3067: 5.03251e-10; = p2286*p1023
- p1924: 0
- p1327: 0.0491316; = if(p1318=0;if(p1327a=0;1;if(p1327a<0;0;p1327a));0)
- p2577: 0; = p2381*p1073
- p2476: 5.7869e-6; = p2280*p1014
- p0800: 13.463; = p0140*(1+p0668*p0272/100)
- p1618: 0
- p2215: 0.00019166; = p1117-p2214
- p0273: 0.5
- p2299: 0.000108698; = p2227*p2206
- p3021: 3.43784e-11; = p2240*p1023
- p1162: 0.000402576; = p1161/p0818
- p2509: 1.68066e-5; = p2313*p1123
- p2166: 0.72127; = p2165*p0824
- p1344: 343921; = IF(p1318=0;p1327*p0801;0)
- p0797: 32.745; = p0137*(1+p0665*p0269/100)
- p4046: 3.18336e-5; = p1903*p3478
- p1297: 0
- p0741: 0.897; = p0081*(1+p0609*p0213/100)
- p1685: 0
- p1719: 0
- p2331: 0; = p2224*p2199
- p1662: 0
- p3806: 0; = p1869*p3477
- p1563: 0
- p1080: 0; = IF(p1071=0;IF(p1073+p1078+p1079=1;0;IF(p1073+p1078+p1079+p1076>1;1-(p1073+p1078+p1079);p1076));0)
- p1929: 0
- p1154: 0.00571199; = if(p1152*p0818=0;0;p1150/(p1152*p0818))
- p2851: 1.10842e-5; = p2265*(p1079+p1081)
- p0122: 13.463
- p2552: 0; = p2356*p1014
- p2890: 9.3573e-5; = p2304*(p1079+p1081)
- p2431: 0; = p2236*p2221
- p0269: 9.453
- p2734: 3.6244e-5; = p2343*(p1078+p1080)
- p0536: 0; = SQRT(2)*(IF((2*p0404-1)<0;-1;IF((2*p0404-1)>0;1;0))*SQRT(SQRT((2/(pi()*0.140012289)+LN(1-(2*p0404-1)^2)/2)^2-LN(1-(2*p0404-1)^2)/0.140012289)-(2/(pi()*0.140012289)+LN(1-(2*p0404-1)^2)/2)))
- p1077: 0; = IF(p1071=0;p0715/100;0)
- p3134: 5.20653e-10; = p2353*p1132
- p0930: 0; = p0801*p0924
- p2645: 1.80493e-5; = p2254*(p1019+p1021)
- p2189: 2.44978e-5; = p1053/p0818
- p1246: 5664.49; = if(p1232>0;0;p1241*(p0725/100)*p0723*1000)
- p2919: 0; = p2333*(p1020+p1022)
- p1179: 0.5
- p0614: 0; = IF(p0350<0.5;-SQRT(p0007*EXP(p0482^2*p0008)-p0007);SQRT(p0007*EXP(p0482^2*p0008)-p0007))
- p3287: 0.745
- p1849: 7.47642e-6; = p1441*1000/p0818
- p0871: 2.45151; = p0870*p0001*p0003/(p0818*p0002)
- p1553: 0
- p1687: 0
- p2185: 2.91043e-5; = p1065-p2184
- p2235: 0; = 1-(p2226+p2227+p2228+p2229)
- p3267: 0.0170629
- p1871: 0
- p0657: 0; = IF(p0393<0.5;-SQRT(p0007*EXP(p0525^2*p0008)-p0007);SQRT(p0007*EXP(p0525^2*p0008)-p0007))
- p1042: 0.000567816
- p0546: 0; = IF(p0282<0.5;-SQRT(p0007*EXP(p0414^2*p0008)-p0007);SQRT(p0007*EXP(p0414^2*p0008)-p0007))
- p1604: 0
- p2404: 0; = p2234*p2193
- p0845: 0.5
- p3381: 0; = p3362*p1234
- p0237: 11.337
- p3278: 0.46
- p0682: 7001.43; = p0022*(1+p0550*p0154/100)
- p3167: 0; = p2386*p1082
- p3289: 0.05
- p1591: 0
- p5131: 0; = p1962*p3483
- p2742: 0.000301768; = p2351*(p1128+p1130)
- p2183: 9.12089e-5; = p1064-p2182
- p0653: 0; = IF(p0389<0.5;-SQRT(p0007*EXP(p0521^2*p0008)-p0007);SQRT(p0007*EXP(p0521^2*p0008)-p0007))
- p1126: 0; = if(p1121=0;p0720/100;0)
- p4012: 7.04432e-7; = p1869*p3478
- p0972: 0.0140725; = p0969/p0818
- p2768: 0; = p2377*(p1078+p1080)
- p4277: 3.31449e-7; = p1928*p3479
- p0970: 0.0123286; = p0967/p0818
- p3226: 0.00263493; = p3222*p1229
- p0284: 0.5
- p0839: 0.791338; = p0838/p0818
- p0221: 35.178
- p1615: 0
- p1688: 0
- p2693: 5.00389e-5; = p2302*(p1078+p1080)
- p2362: 0; = p2225*p2190
- p3257: 0.849747
- p2408: 0; = p2234*p2198
- p3041: 0; = p2260*p1082
- p2458: 1.94237e-6; = p2262*p1073
- p1730: 0
- p1731: 0
- p2486: 5.24487e-8; = p2290*p1014
- p3586: 9.8008e-6; = p1855*p3476
- p0743: 0
- p0322: 0.5
- p0140: 13.463
- p2477: 8.32865e-7; = p2281*p1014
- p2608: 0; = p2412*p1014
- p1175: 0.000155803
- p0375: 0.5
- p2232: 0.129367; = if(p0783*p0787+p0784*p0788+p0785*p0789+p0786*p0790=0;0;p0789*p0785/(p0783*p0787+p0784*p0788+p0785*p0789+p0786*p0790))
- p3417: 0.000498962; = p3379*p1238
- p2744: 3.63504e-5; = p2353*(p1128+p1130)
- p1982: 750
- p3284: 0.275
- p0453: 0; = SQRT(2)*(IF((2*p0321-1)<0;-1;IF((2*p0321-1)>0;1;0))*SQRT(SQRT((2/(pi()*0.140012289)+LN(1-(2*p0321-1)^2)/2)^2-LN(1-(2*p0321-1)^2)/0.140012289)-(2/(pi()*0.140012289)+LN(1-(2*p0321-1)^2)/2)))
- p1977: 2.12717e9; = p1252+p1188
- p1034: 0; = IF(p1012=0;p1028*p0001/(p0818*p0002);0)
- p1247: 4.45193e-6; = if(p1232>0;0;p1242*p0001/(p0818*p0002))
- p2839: 5.84418e-8; = p2253*(p1020+p1022)
- p1935: 0
- p0862: 0.0504956; = p0674*1000/p0856
- p0852: 0; = p0847*p0851^3+p0848*p0851^2+p0849*p0851+p0850
- p2587: 0; = p2391*p1123
- p0756: 0
- p5228: 1.82499e-7; = p1849*p3484
- p0980: 0; = IF(p0977=0;0;p0977*p0001/(p0818*p0002))
- p1646: 0
- p2520: 0; = p2324*p1014
- p1083: 90384.3; = IF(p1071=0;p1073*(p0710/100)*p0703*1000;0)
- p1696: 0
- p1590: 0
- p0389: 0.5
- p3384: 0; = p3365*p1234
- p2367: 0; = p2225*p2196
- p1776: 1.3055e-5; = p1368*1000/p0818
- p1049: 0.209623; = IF(p1012=0;IF(p1037+p1044+p1045+p1046+p1047+p1048=1;0;1-(p1037+p1044+p1045+p1046+p1047+p1048));0)
- p1583: 0
- p1702: 0
- p2661: 1.25854e-6; = p2270*(p1078+p1080)
- p2803: 0; = p2412*(p1019+p1021)
- p0542: 0; = IF(p0278<0.5;-SQRT(p0007*EXP(p0410^2*p0008)-p0007);SQRT(p0007*EXP(p0410^2*p0008)-p0007))
- p0388: 0.5
- p1197: 1.806
- p2113: 0.832356
- p3302: 0; = if(and(p1232=0;p3252<>0);p3258*(p3278*(p3282*p1256+p3286*(p1253+p1257)+p1258*p3288+p3297*p3287));0)
- p0669: 17.1081; = p0009*(1+p0537*p0141/100)
- p2076: 0.057
- p2918: 0; = p2332*(p1020+p1022)
- p1338: 1.74511e6; = p1324*p0801
- p0986: 0; = IF(p0982+p0985=1;0;IF(p0982+p0985+p0984>1;1-(p0982+p0985);p0984))
- p3634: 3.41821e-6; = p1903*p3476
- p3321: 0; = if(and(p1232=0;p3253<>0);IF((p3317+p3318+p3319+p3320)+(p3253*(p3261*(1-p3277))/p3316)>p3253;p3253-(p3317+p3318+p3319+p3320);p3253*(p3261*(1-p3277))/p3316);0)
- p2583: 0; = p2387*p1073
- p0879: 0.18063; = p0878*p0001*p0003/(p0818*p0002)
- p2453: 1.83457e-6; = p2257*p1014
- p0711: 10.02; = p0051*(1+p0579*p0183/100)
- p2377: 0; = p2229*p2206
- p0788: 64.21; = p0128*(1+p0656*p0260/100)
- p0541: 0; = IF(p0277<0.5;-SQRT(p0007*EXP(p0409^2*p0008)-p0007);SQRT(p0007*EXP(p0409^2*p0008)-p0007))
- p1271: 0; = IF(p1267+p1270=p1259;0;IF(p1267+p1270+p1269>p1259;p1259-(p1267+p1270);p1269))
- p1096: 0.00584539
- p2533: 4.30862e-6; = p2337*p1073
- p1729: 0
- p0571: 0; = IF(p0307<0.5;-SQRT(p0007*EXP(p0439^2*p0008)-p0007);SQRT(p0007*EXP(p0439^2*p0008)-p0007))
- p0124: 67.328
- p3206: 0; = p2425*p1082
- p2687: 9.53214e-5; = p2296*(p1019+p1021)
- p3131: 3.06716e-9; = p2350*p1132
- p2912: 0; = p2326*(p1020+p1022)
- p2234: 0; = 1-(p2222+p2223+p2224+p2225)
- p0537: 0; = IF(p0273<0.5;-SQRT(p0007*EXP(p0405^2*p0008)-p0007);SQRT(p0007*EXP(p0405^2*p0008)-p0007))
- p0782: 13.463; = p0122*(1+p0650*p0254/100)
- p2749: 0; = p2358*(p1019+p1021)
- p0923: 0.35024; = IF(p0918=1;0;IF(p0918+p0919>1;1-p0918;p0919))
- p0118: 6.123
- p2055: 5.59471
- p3228: 0.00589806; = p3224*p1229
- p1686: 0.505026
- p1966: 6.9e6; = if(p0814=0;p0802;0)
- p1963k: 7.34135e-5; = p1744*p1948+p1745*p1949+p1746*p1950+p1747*p1951+p1748*p1952+p1749*p1953+p1750*p1954+p1751*p1955+p1752*p1956+p1753*p1957+p1961*p1962
- p3452: 0; = p3376*p1240
- p0875: 0; = p0874*p0001*p0003/(p0818*p0002)
- p2885: 2.43082e-5; = p2299*(p1079+p1081)
- p2691: 0.000610253; = p2300*(p1078+p1080)
- p1996: 30
- p0945: 0; = if(and(p0683=0;p0951=0);p0939;0)
- p2977: 0; = p2391*(p1129+p1131)
- p0927: 0.0755849; = IF(p0918+p0923+p0924+p0925+p0926=1;0;1-(p0918+p0923+p0924+p0925+p0926))
- p4922: 0; = p1955*p3482
- p1668: 0
- p1883: 0
- p0842: -0.0620066
- p3374: 0.00472958; = if(p1232=0;p3246*p3356/p0818;0)
- p3399: 0.0349733; = p3380*p1234
- p1953: 0
- p2982: 0; = p2396*(p1020+p1022)
- p1206: 0.03829
- p0272: 37.311
- p0246: 28.252
- p0775: 32.925; = p0115*(1+p0643*p0247/100)
- p2650: 2.68857e-5; = p2259*(p1078+p1080)
- p0739: 0.897; = p0079*(1+p0607*p0211/100)
- p2295: 1.22637e-5; = p2223*p2202
- p2705: 0.000244636; = p2314*(p1128+p1130)
- p1099: 0.624059
- p3364: 0; = if(p1232=0;p3244*p3358/p0818;0)
- p2677: 3.41199e-5; = p2286*(p1019+p1021)
- p1158: 0.00274179; = p1156*p1157
- p1832: 0
- p2405: 0; = p2234*p2195
- p2961: 0; = p2375*(p1079+p1081)
- p1898: 0
- p2846: 2.87943e-6; = p2260*(p1079+p1081)
- p2397: 0; = p2234*p2186
- p1880: 0
- p1992: 3900
- p1060: 0.21
- p3298: 0; = if(p1283+p1284+p1285+p1286=0;0;p1283/(p1283+p1284+p1285+p1286))
- p1159: 0.5
- p0400: 0.5
- p0884: 0; = IF(p0689=100;0;IF(p0689+p0688>100;100-p0689;p0688))
- p2790: 0; = p2399*(p1019+p1021)
- p2126: 9.80782e-7; = p2015*p2054*p2088/(p0818*1000)
- p2322: 0; = p2224*p2189
- p1044: 0.00785902; = IF(p1012=0;IF(p1037=1;0;IF(p1037+p1038>1;1-p1037;p1038));0)
- p2481: 6.05818e-7; = p2285*p1014
- p1861: 1.84035e-6; = p1453*1000/p0818
- p2004: 30
- p0964: 0; = 56/90000
- p0088: 58.327
- p2127: 3.01926e-6; = p2015*p2055*p2089/(p0818*1000)
- p1892: 0
- p0771: 13.777; = p0111*(1+p0639*p0243/100)
- p1855: 0.000156487; = p1447*1000/p0818
- p2729: 9.41538e-6; = p2338*(p1078+p1080)
- p2506: 1.41108e-5; = p2310*p1073
- p1320: 0; = IF(((p0745*1000*p0747/100)+(p0754*1000*p0756/100))/p0801<0;0;((p0745*1000*p0747/100)+(p0754*1000*p0756/100))/p0801)
- p3294: 0.279
- p2106: 0.856281
- p1482: 15
- p0920: 0; = p0676*1000/p0801
- p1963e: 9.23932e-6; = p1628*p1832+p1629*p1833+p1630*p1834+p1631*p1835+p1632*p1836+p1633*p1837+p1634*p1838+p1635*p1839+p1636*p1840+p1637*p1841+p1638*p1842+p1639*p1843+p1640*p1844+p1641*p1845+p1642*p1846+p1643*p1847+p1644*p1848+p1645*p1849+p1646*p1850
- p2350: 0.000306716; = p2232*p2218
- p0841: 0.0397217
- p0656: 0; = IF(p0392<0.5;-SQRT(p0007*EXP(p0524^2*p0008)-p0007);SQRT(p0007*EXP(p0524^2*p0008)-p0007))
- p3130: 0; = p2349*p1082
- p2406: 0; = p2234*p2196
- p3280: 0.375
- p2226: 0.0950258; = if(p0774*p0778+p0775*p0779+p0776*p0780+p0777*p0781=0;0;p0778*p0774/(p0774*p0778+p0775*p0779+p0776*p0780+p0777*p0781))
- p1098: 0.0264207
- p2213: 4.53148e-5; = p1116-p2212
- p0323: 0.5
- p2724: 0; = p2333*(p1019+p1021)
- p0369: 0.5
- p1610: 0
- p2964: 0; = p2378*(p1079+p1081)
- p3077: 1.40594e-9; = p2296*p1023
- p1150: 4.12252e7; = if(p1121=0;p1149*p1146*p1145;0)
- p0129: 9.721
- p2668: 5.45342e-5; = p2277*(p1019+p1021)
- p0533: 0; = SQRT(2)*(IF((2*p0401-1)<0;-1;IF((2*p0401-1)>0;1;0))*SQRT(SQRT((2/(pi()*0.140012289)+LN(1-(2*p0401-1)^2)/2)^2-LN(1-(2*p0401-1)^2)/0.140012289)-(2/(pi()*0.140012289)+LN(1-(2*p0401-1)^2)/2)))
- p3334: 0.2408; = IF(or(p3254=0;p1232>0);0;p3269*p3277*(p3300*p3292+(1-p3300)*p3296))
- p2505: 1.57443e-6; = p2309*p1073
- p0873: 0.55748; = p0872*p0001*p0003/(p0818*p0002)
- p0979: 0; = IF(p0976=0;0;p0976*p0001/(p0818*p0002))
- p2666: 0; = p2275*(p1128+p1130)
- p1243: 173135; = if(p1232>0;0;p1238*(p0725/100)*p0723*1000)
- p1802: 0
- p3400: 0; = p3362*p1238
- p0145: 0
- p2016: 0.000155923; = (p2014-p2015)/(p0818)
- p0515: 0; = SQRT(2)*(IF((2*p0383-1)<0;-1;IF((2*p0383-1)>0;1;0))*SQRT(SQRT((2/(pi()*0.140012289)+LN(1-(2*p0383-1)^2)/2)^2-LN(1-(2*p0383-1)^2)/0.140012289)-(2/(pi()*0.140012289)+LN(1-(2*p0383-1)^2)/2)))
- p3057: 3.66427e-9; = p2276*p1023
- p0891: 226512; = IF(p3251=0;0;62.4*6272640/(12*12*12))
- p0830: 2.48992e10; = p0825*p0821*p0824
- p0749: 20.583; = p0089*(1+p0617*p0221/100)
- p0835: 318.022; = -LN(1-p0669/100)/p0834

- p3482: 0; = if(p1328+p1330+p1332+p1334+p1336+p1338+p1340+p1342+p1344=0;0;p1340/(p1328+p1330+p1332+p1334+p1336+p1338+p1340+p1342+p1344))
- p3369: 0; = if(p1232=0;p3245*p3357/p0818;0)
- p2517: 0; = p2321*p1014
- p0320: 0.5
- p0196: 41.966
- p1576: 0
- p3277: 0.55
- p0727: 65.195; = p0067*(1+p0595*p0199/100)
- p2913: 0; = p2327*(p1020+p1022)
- p1074: 0.67617; = IF(p1071=0;p0712/100;0)
- p0642: 0; = IF(p0378<0.5;-SQRT(p0007*EXP(p0510^2*p0008)-p0007);SQRT(p0007*EXP(p0510^2*p0008)-p0007))
- p2441: 3.22677e-7; = p2245*p1014
- p0991: 0; = p0987*p0886
- p1151: 4.02707e6; = if(p1121=0;p1149*p1148*p1145;0)
- p5307: 3.93076e-8; = p1928*p3484
- p1801: 0
- p2707: 0; = p2316*(p1019+p1021)
- p2078: 0.117
- p0663: 0; = IF(p0399<0.5;-SQRT(p0007*EXP(p0531^2*p0008)-p0007);SQRT(p0007*EXP(p0531^2*p0008)-p0007))
- p4510: 0; = p1955*p3480
- p1278: 0
- p1089: 4.63763e-6; = IF(p1071=0;p1083*p0001/(p0818*p0002);0)
- p4213: 7.93111e-7; = p1864*p3479
- p0502: 0; = SQRT(2)*(IF((2*p0370-1)<0;-1;IF((2*p0370-1)>0;1;0))*SQRT(SQRT((2/(pi()*0.140012289)+LN(1-(2*p0370-1)^2)/2)^2-LN(1-(2*p0370-1)^2)/0.140012289)-(2/(pi()*0.140012289)+LN(1-(2*p0370-1)^2)/2)))
- p2898: 0.0006355; = p2312*(p1129+p1131)
- p2938: 6.5457e-6; = p2352*(p1129+p1131)
- p1664: 0
- p0770: 80.239; = p0110*(1+p0638*p0242/100)
- p1963h: 4.20735e-5; = p1686*p1890+p1687*p1891+p1688*p1892+p1689*p1893+p1690*p1894+p1691*p1895+p1692*p1896+p1693*p1897+p1694*p1898+p1695*p1899+p1696*p1900+p1697*p1901+p1698*p1902+p1699*p1903+p1700*p1904+p1701*p1905+p1702*p1906+p1703*p1907+p1704*p1908+p1705*p1909
- p2865: 5.76418e-6; = p2279*(p1020+p1022)
- p0610: 0; = IF(p0346<0.5;-SQRT(p0007*EXP(p0478^2*p0008)-p0007);SQRT(p0007*EXP(p0478^2*p0008)-p0007))
- p2342: 4.09319e-6; = p2228*p2210
- p3093: 2.90886e-8; = p2312*p1132
- p1734: 0
- p3170: 0; = p2389*p1132
- p1298: 0
- p1939: 0
- p2103: 0.912485
- p1331: 0; = p1330*p0001/(p0818*p0002)
- p1557: 0
- p2032: 0.448886
- p2436: 3.34915e-7; = p2240*p1014
- p3293: 0.3875
- p2683: 1.31721e-6; = p2292*(p1019+p1021)
- p3245: 0; = IF(p3244=1;0;if(p3244+p0792/100>1;1-p3244;p0792/100))
- p0525: 0; = SQRT(2)*(IF((2*p0393-1)<0;-1;IF((2*p0393-1)>0;1;0))*SQRT(SQRT((2/(pi()*0.140012289)+LN(1-(2*p0393-1)^2)/2)^2-LN(1-(2*p0393-1)^2)/0.140012289)-(2/(pi()*0.140012289)+LN(1-(2*p0393-1)^2)/2)))
- p1663: 0
- p2013: 0.75
- p1213: 30
- p1857: 0
- p2246: 8.3294e-7; = p2222*p2191
- p2669: 5.05208e-6; = p2278*(p1019+p1021)
- p2360: 0; = p2225*p2188
- p2179: 0.0276768; = p0970+p0971+p0972
- p2566: 0; = p2370*p1014
- p0798: 12.884; = p0138*(1+p0666*p0270/100)
- p2261: 0.000106907; = p2226*p2207
- p2081: 0.0019
- p4743: 0; = p1776*p3482
- p0957: 2.71479e-5; = if(and(p0683>0;or(p0807=56;p0807=100;and(p0807=60;p0901>0.06)));p0939;0)
- p3272: 0.0398246
- p1697: 0
- p0976: 0; = IF(p0687=0;IF(OR(p0686=0;p0689=0);0;p0686*1000*p0689/100);0)
- p2433: 4.7814e-6; = p2237*p1014
- p0459: 0; = SQRT(2)*(IF((2*p0327-1)<0;-1;IF((2*p0327-1)>0;1;0))*SQRT(SQRT((2/(pi()*0.140012289)+LN(1-(2*p0327-1)^2)/2)^2-LN(1-(2*p0327-1)^2)/0.140012289)-(2/(pi()*0.140012289)+LN(1-(2*p0327-1)^2)/2)))
- p0081: 0.897
- p1232: 0
- p2044: 6.01087e-8; = p2015*p2042*p2043/(p0818*1000)
- p1076: 0; = IF(p1071=0;p0714/100;0)
- p1988: 750
- p0675: 0
- p2222: 0.118121; = if(p0765*p0769+p0766*p0770+p0767*p0771+p0768*p0772=0;0;p0769*p0765/(p0765*p0769+p0766*p0770+p0767*p0771+p0768*p0772))
- p1797: 0
- p3251: 1.86127e9; = p1252-(p3252+p3253+p3254+p3255+p3256)
- p1569: 0
- p2760: 0; = p2369*(p1019+p1021)
- p4033: 5.03166e-7; = p1890*p3478
- p2328: 0; = p2224*p2196
- p2073: 0.377647
- p2069: 0.190588
- p3216: 0.06; = IF(OR(p1226=0;p1228=0);0;1-p3213-p3214-p3215)
- p2034: 5.3717e-6; = p2015*p2030*p2032/(p0818*1000)
- p3224: 0.501945; = IF(p3216=0;0;1-p3221-p3222-p3223)
- p0998: 0; = if(p0888=0;0;if((p0699*p0698*1000*p0700/100)/p0888>1;1;(p0699*p0698*1000*p0700/100)/p0888))
- p0255: 120.493
- p3371: 0; = if(p1232=0;p3245*p3359/p0818;0)
- p3072: 8.8366e-12; = p2291*p1023
- p0940: 0; = if(and(p0683=0;p0946=0);p0934;0)
- p3068: 2.93978e-9; = p2287*p1023
- p4925: 0; = p1962*p3482
- p1324: 0.249301; = IF(((p0745*1000*p0751/100)+(p0754*1000*p0760/100))/p0801<0;0;((p0745*1000*p0751/100)+(p0754*1000*p0760/100))/p0801)
- p3066: 6.21862e-11; = p2285*p1023
- p2962: 0; = p2376*(p1079+p1081)
- p3090: 0; = p2309*p1082
- p2171: 0.0833596; = p2165*p0831
- p3456: 0; = p3380*p1240
- p1690: 0
- p0242: 13.925
- p3056: 0; = p2275*p1132
- p1577: 0
- p3291: 0.437
- p2529: 0; = p2333*p1014
- p1311: 0; = IF(p1307+p1310=p1266;0;IF(p1307+p1310+p1309>p1266;p1266-(p1307+p1310);p1309))
- p3392: 0; = p3373*p1234
- p0406: 0; = SQRT(2)*(IF((2*p0274-1)<0;-1;IF((2*p0274-1)>0;1;0))*SQRT(SQRT((2/(pi()*0.140012289)+LN(1-(2*p0274-1)^2)/2)^2-LN(1-(2*p0274-1)^2)/0.140012289)-(2/(pi()*0.140012289)+LN(1-(2*p0274-1)^2)/2)))
- p4816: 0; = p1849*p3482
- p0868: 0; = IF(p0858+p0864+p0865+p0866+p0867=1;0;IF(p0858+p0864+p0865+p0866+p0867+p0863>1;1-(p0858+p0864+p0865+p0866+p0867);p0863))
- p1740: 0
- p0968: 2.21805e7; = p0965*p0683*p0682*1000
- p2987: 0; = p2401*(p1020+p1022)
- p3062: 8.54922e-11; = p2281*p1023
- p2435: 9.72333e-8; = p2239*p1014
- p0984: 0; = if(p0886=0;0;min(1;(p0699*p0698*1000*p0701/100)/p0886))
- p2634: 9.93186e-6; = p2243*(p1019+p1021)
- p2864: 1.67347e-6; = p2278*(p1020+p1022)
- p2446: 8.12844e-6; = p2250*p1014
- p1920: 0
- p2370: 0; = p2225*p2199
- p2250: 8.34371e-5; = p2222*p2196
- p2119: 0.679049
- p0482: 0; = SQRT(2)*(IF((2*p0350-1)<0;-1;IF((2*p0350-1)>0;1;0))*SQRT(SQRT((2/(pi()*0.140012289)+LN(1-(2*p0350-1)^2)/2)^2-LN(1-(2*p0350-1)^2)/0.140012289)-(2/(pi()*0.140012289)+LN(1-(2*p0350-1)^2)/2)))
- p0828: 0; = if(p0827=0;0;p0819-p0827/p0818)
- p1262: 0; = if(p1232>0;0;p0733/100)
- p3019: 1.07737e-10; = p2238*p1023
- p2832: 1.87062e-7; = p2246*(p1020+p1022)
- p1291: 0; = IF(p1287+p1290=p1264;0;IF(p1287+p1290+p1289>p1264;p1264-(p1287+p1290);p1289))
- p1635: 0.921542
- p2492: 1.36967e-5; = p2296*p1014
- p3149: 0; = p2368*p1023
- p0252: 57.621
- p0106: 19.514
- p0996: 0; = if(p0888=0;0;if((p0691*p0690*1000*p0692/100)/p0888>1;1;(p0691*p0690*1000*p0692/100)/p0888))
- p2300: 0.000902514; = p2227*p2207
- p1864: 3.85323e-6; = p1456*1000/p0818
- p2258: 4.39636e-5; = p2226*p2204
- p2142: 3.10882e-7; = p2015*p2070*p2104/(p0818*1000)
- p2304: 0.000418428; = p2227*p2211
- p0816: 0
- p2379: 0; = p2229*p2208
- p2835: 1.89562e-6; = p2249*(p1020+p1022)
- p4098: 5.26647e-5; = p1955*p3478
- p1237: 0; = if(p1232>0;0;p0729/100)
- p3050: 0; = p2269*p1082
- p2976: 0; = p2390*(p1129+p1131)
- p1567: 0
- p1122: 0; = p1121*p0001/(p0818*p0002)
- p0063: 7001.43
- p1960: 68.7445; = IF(p1959-p1958<0;0;p1959-p1958)
- p1130: 0; = if(p1121=0;IF(p1123+p1128+p1129=1;0;IF(p1123+p1128+p1129+p1126>1;1-(p1123+p1128+p1129);p1126));0)
- p2312: 0.00290886; = p2231*p2219
- p1752: 0
- p3076: 1.22637e-10; = p2295*p1023
- p2162: 2.19958e-8; = p2015*p2086*p2124/(p0818*1000)
- p1748: 0
- p0353: 0.5
- p0176: 34.629
- p2755: 0; = p2364*(p1019+p1021)
- p2770: 0; = p2379*(p1078+p1080)
- p2730: 7.81753e-5; = p2339*(p1078+p1080)
- p0191: 47.437
- p1860: 0
- p3473: 0.00014947; = p3378*p1241
- p2173: 0.124066; = p0895*p0898/p0818
- p1345: 1.76466e-5; = IF(p1318=0;p1344*p0001/(p0818*p0002);0)
- p0817: 0
- p2184: 8.44964e-6; = p1051/p0818
- p0895: 4.73084e9; = p0894*p0830
- p3453: 0; = p3377*p1240
- p1641: 0
- p3132: 4.32228e-9; = p2351*p1132
- p2326: 0; = p2224*p2193
- p2419: 0; = p2235*p2209
- p2154: 1.71058e-7; = p2015*p2082*p2116/(p0818*1000)
- p2372: 0; = p2225*p2201
- p1257: 0; = if(p1232>0;0;IF(p1253+p1256=1;0;IF(p1253+p1256+p1255>1;1-(p1253+p1256);p1255)))
- p1866: 0
- p2128: 1.12187e-6; = p2015*p2056*p2090/(p0818*1000)
- p2582: 0; = p2386*p1073
- p2638: 4.57012e-6; = p2247*(p1019+p1021)
- p1710: 0
- p0744: 0
- p2817: 0; = p2426*(p1078+p1080)
- p3020: 9.98084e-12; = p2239*p1023
- p2689: 0.000226969; = p2298*(p1078+p1080)
- p1885: 0
- p2917: 0; = p2331*(p1020+p1022)
- p3320: 0; = if(and(p1232=0;p3253<>0);p3253*(p3264-p3315)/p3316;0)
- p1643: 0
- p2992: 0; = p2406*(p1020+p1022)
- p2489: 1.93627e-5; = p2293*p1014
- p2980: 0; = p2394*(p1020+p1022)
- p3295: 0.58
- p1689: 0
- p3592: 1.15261e-7; = p1861*p3476
- p1273: 0; = p1267*p1252/p0818
- p1051: 146922; = IF(p1012=0;p1044*p1036;0)
- p0507: 0; = SQRT(2)*(IF((2*p0375-1)<0;-1;IF((2*p0375-1)>0;1;0))*SQRT(SQRT((2/(pi()*0.140012289)+LN(1-(2*p0375-1)^2)/2)^2-LN(1-(2*p0375-1)^2)/0.140012289)-(2/(pi()*0.140012289)+LN(1-(2*p0375-1)^2)/2)))
- p2093: 0.260958
- p3073: 1.94282e-11; = p2292*p1023
- p0254: 37.311
- p2553: 0; = p2357*p1014
- p2107: 0.881623
- p3455: 0; = p3379*p1240
- p1127: 0; = if(p1121=0;p0721/100;0)
- p0419: 0; = SQRT(2)*(IF((2*p0287-1)<0;-1;IF((2*p0287-1)>0;1;0))*SQRT(SQRT((2/(pi()*0.140012289)+LN(1-(2*p0287-1)^2)/2)^2-LN(1-(2*p0287-1)^2)/0.140012289)-(2/(pi()*0.140012289)+LN(1-(2*p0287-1)^2)/2)))
- p2933: 4.40461e-6; = p2347*(p1079+p1081)
- p0679: 1175.02; = p0019*(1+p0547*p0151/100)
- p0760: 0
- p0686: 0
- p3370: 0; = if(p1232=0;p3245*p3358/p0818;0)
- p2494: 3.3634e-5; = p2298*p1073
- p0880: 0; = p0868*p0856
- p2858: 0; = p2272*(p1129+p1131)
- p2767: 0; = p2376*(p1078+p1080)
- p1972: 0; = if(p0807=480;p1967*p0001/(p0818*p0002);0)
- p0831: 0.1036; = 1-p0824
- p0485: 0; = SQRT(2)*(IF((2*p0353-1)<0;-1;IF((2*p0353-1)>0;1;0))*SQRT(SQRT((2/(pi()*0.140012289)+LN(1-(2*p0353-1)^2)/2)^2-LN(1-(2*p0353-1)^2)/0.140012289)-(2/(pi()*0.140012289)+LN(1-(2*p0353-1)^2)/2)))
- p1771: 0
- p2483: 2.86393e-5; = p2287*p1014
- p2746: 0; = p2355*(p1019+p1021)
- p0138: 12.884
- p2882: 3.15746e-5; = p2296*(p1020+p1022)
- p2203: 0.000159426; = p1070-p2200-p2201-p2202
- p2836: 1.87383e-5; = p2250*(p1020+p1022)
- p2795: 0; = p2404*(p1019+p1021)
- p1248: 8.88356e-6; = if(p1232>0;0;p1243*p0001/(p0818*p0002))
- p0110: 80.239
- p1070: 0.000495333; = IF(p1012=0;p1056/(p1063*p0818);0)
- p1187: 0.000251562
- p1092: 0; = IF(p1071=0;p1086*p0001/(p0818*p0002);0)
- p3412: 0.00308345; = p3374*p1238
- p1850: 0
- p0514: 0; = SQRT(2)*(IF((2*p0382-1)<0;-1;IF((2*p0382-1)>0;1;0))*SQRT(SQRT((2/(pi()*0.140012289)+LN(1-(2*p0382-1)^2)/2)^2-LN(1-(2*p0382-1)^2)/0.140012289)-(2/(pi()*0.140012289)+LN(1-(2*p0382-1)^2)/2)))
- p0534: 0; = SQRT(2)*(IF((2*p0402-1)<0;-1;IF((2*p0402-1)>0;1;0))*SQRT(SQRT((2/(pi()*0.140012289)+LN(1-(2*p0402-1)^2)/2)^2-LN(1-(2*p0402-1)^2)/0.140012289)-(2/(pi()*0.140012289)+LN(1-(2*p0402-1)^2)/2)))
- p2220: 0.000231601; = p1151/p0818
- p2901: 0; = p2315*(p1020+p1022)
- p2426: 0; = p2235*p2216
- p1079: 0.22363; = IF(p1071=0;IF(p1073+p1078=1;0;IF(p1073+p1078+p1075>1;1-(p1073+p1078);p1075));0)
- p1654: 0
- p3441: 0; = p3365*p1240
- p1852: 0
- p1867: 0
- p1790: 0
- p0994: 0; = p0990*p0001*p0004/(p0818*p0002)
- p0477: 0; = SQRT(2)*(IF((2*p0345-1)<0;-1;IF((2*p0345-1)>0;1;0))*SQRT(SQRT((2/(pi()*0.140012289)+LN(1-(2*p0345-1)^2)/2)^2-LN(1-(2*p0345-1)^2)/0.140012289)-(2/(pi()*0.140012289)+LN(1-(2*p0345-1)^2)/2)))
- p1945: 0
- p2340: 2.09638e-5; = p2228*p2208
- p2077: 0.043
- p2815: 0; = p2424*(p1078+p1080)
- p0018: 2451.68
- p1994: 750
- p0634: 0; = IF(p0370<0.5;-SQRT(p0007*EXP(p0502^2*p0008)-p0007);SQRT(p0007*EXP(p0502^2*p0008)-p0007))
- p2499: 3.20162e-6; = p2303*p1073
- p2578: 0; = p2382*p1073
- p2298: 0.000335669; = p2227*p2205
- p1339: 8.95416e-5; = p1338*p0001/(p0818*p0002)
- p1888: 0
- p2027: 0.428799
- p1368: 227
- p3458: 0; = p3363*p1241
- p1905: 0
- p1336: 0; = p1323*p0801
- p3484: 0.02441; = IF(p1344=0;0;p1344/(p1328+p1330+p1332+p1334+p1336+p1338+p1340+p1342+p1344))
- p0481: 0; = SQRT(2)*(IF((2*p0349-1)<0;-1;IF((2*p0349-1)>0;1;0))*SQRT(SQRT((2/(pi()*0.140012289)+LN(1-(2*p0349-1)^2)/2)^2-LN(1-(2*p0349-1)^2)/0.140012289)-(2/(pi()*0.140012289)+LN(1-(2*p0349-1)^2)/2)))
- p0574: 0; = IF(p0310<0.5;-SQRT(p0007*EXP(p0442^2*p0008)-p0007);SQRT(p0007*EXP(p0442^2*p0008)-p0007))
- p2686: 8.3147e-6; = p2295*(p1019+p1021)
- p1899: 0
- p1813: 0
- p1550: 0
- p1201: 0.65
- p0978: 7e6; = p0801
- p2563: 0; = p2367*p1014
- p2152: 2.80738e-8; = p2015*p2080*p2114/(p0818*1000)
- p2030: 8.87
- p1605: 0
- p3686: 5.655e-6; = p1955*p3476
- p1667: 0
- p1640: 0
- p2990: 0; = p2404*(p1020+p1022)
- p1767: 0
- p2412: 0; = p2234*p2202
- p0500: 0; = SQRT(2)*(IF((2*p0368-1)<0;-1;IF((2*p0368-1)>0;1;0))*SQRT(SQRT((2/(pi()*0.140012289)+LN(1-(2*p0368-1)^2)/2)^2-LN(1-(2*p0368-1)^2)/0.140012289)-(2/(pi()*0.140012289)+LN(1-(2*p0368-1)^2)/2)))
- p1061: 0.3
- p3347: 0.00107264; = if(and(p1232=0;p3256<>0);p3275*p3289;0)
- p1236: 0; = if(p1232>0;0;p0728/100)
- p2238: 1.07737e-5; = p2222*p2183
- p1657: 0.687857
- p1985: 5.25675e7; = (if(p1057=0;0;p1050/p1057)+if(p1058=0;0;p1051/p1058)+if(p1059=0;0;p1052/p1059)+if(p1060=0;0;p1053/p1060)+if(p1061=0;0;p1054/p1061)+if(p1062=0;0;p1055/p1062)+if(p1063=0;0;p1056/p1063))*(1+p1157)
- p0553: 0; = IF(p0289<0.5;-SQRT(p0007*EXP(p0421^2*p0008)-p0007);SQRT(p0007*EXP(p0421^2*p0008)-p0007))
- p0387: 0.5
- p2305: 3.47638e-6; = p2227*p2212
- p1763: 0
- p2209: 9.22496e-5; = 14.0067*p2208/30.973762
- p2950: 0; = p2364*(p1020+p1022)
- p2390: 0; = p2233*p2219
- p2125: 1.68256e-6; = p2015*p2053*p2087/(p0818*1000)
- p5243: 9.40574e-8; = p1864*p3484
- p1733: 0
- p1704: 0
- p1566: 0
- p2087: 0.856281
- p0213: 7.52
- p1214: 29; = IF(p1213=0;0;p1213-1)
- p3046: 0; = p2265*p1082
- p2943: 0; = p2357*(p1020+p1022)
- p1554: 0
- p1870: 0
- p2455: 3.98413e-6; = p2259*p1073
- p0022: 7001.43
- p1020: 0.22458; = IF(p1012=0;IF(p1014+p1019=1;0;IF(p1014+p1019+p1016>1;1-(p1014+p1019);p1016));0)
- p1256: 0; = if(p1232>0;0;IF(p1253=1;0;IF(p1253+p1254>1;1-p1253;p1254)))
- p1140: 3.37661e-5; = if(p1121=0;p1134*p0001/(p0818*p0002);0)
- p2735: 3.01122e-7; = p2344*(p1078+p1080)
- p0328: 0.5
- p1230: 0.5
- p1931: 0
- p3365: 0; = if(p1232=0;p3244*p3359/p0818;0)
- p1270: 0; = IF(p1267=p1259;0;IF(p1267+p1268>p1259;p1259-p1267;p1268))
- p1160: 0.00752334; = (p1156+p1158)*p1159
- p2551: 0; = p2355*p1014
- p0331: 0.5
- p2259: 3.97617e-5; = p2226*p2205
- p2416: 0; = p2235*p2206
- p3269: 0.851786
- p3214: 0.376406; = p1222*40.078/100.0869
- p0683: 68.735; = p0023*(1+p0551*p0155/100)
- p0250: 66.288
- p0344: 0.5
- p3998: 9.12743e-5; = p1855*p3478
- p2934: 4.50139e-7; = p2348*(p1079+p1081)
- p0877: 0.402089; = p0876*p0001*p0003/(p0818*p0002)
- p0248: 9.077
- p3200: 0; = p2419*p1082
- p0386: 0.5
- p5132: 0; = p1963*p3483
- p3026: 3.31223e-11; = p2245*p1023
- p3507: 8.17633e-7; = p1776*p3476
- p1144: 4.83637e-10; = if(p1121=0;p1138*p0001/(p0818*p0002);0)
- p3339: 3.44924e7; = if(and(p1232=0;p3254<>0);p3254*(p3269*p3277-p3334)/p3338;0)
- p3317: 0; = if(and(p1232=0;p3253<>0);p3253*(p3261*p3277-p3312)/p3316;0)
- p1021: 0; = IF(p1012=0;IF(p1014+p1019+p1020=1;0;IF(p1014+p1019+p1020+p1017>1;1-(p1014+p1019+p1020);p1017));0)
- p1260: 0; = if(p1232>0;0;p0731/100)
- p1006: 0; = p1002*p0001*p0004/(p0818*p0002)
- p3363: 0; = if(p1232=0;p3244*p3357/p0818;0)
- p0905: 0.0983707; = p0904/p0818
- p1716: 0
- p0946: 0; = if(and(p0683=0;or(p0807=480;p0807=32;p0807=1;and(p0807=60;p0901<0.03)));p0934;0)
- p1004: 0; = p1000*p0888
- p1011: 0; = p1010*p0001*p0004/(p0818*p0002)
- p0971: 0.00127562; = p0968/p0818
- p2010: 0.000340926; = ((p1984*p1985+p1990*p1991+p1996*p1997+p2004*p2005)/p0818)*p0005*p0002/1000
- p2658: 2.91164e-6; = p2267*(p1078+p1080)
- p2060: 0.272353
- p2951: 0; = p2365*(p1020+p1022)
- p2849: 1.96036e-6; = p2263*(p1079+p1081)
- p2596: 0; = p2400*p1014
- p2598: 0; = p2402*p1014
- p2877: 1.98452e-7; = p2291*(p1020+p1022)
- p2025: 3.18171e-6; = p2015*p2023*p2024/(p0818*1000)
- p2665: 0; = p2274*(p1128+p1130)
- p2519: 0; = p2323*p1014
- p2601: 0; = p2405*p1014
- p2244: 2.89371e-6; = p2222*p2189
- p2804: 0; = p2413*(p1019+p1021)
- p1669: 0
- p2786: 0; = p2395*(p1019+p1021)
- p1053: 425967; = IF(p1012=0;p1046*p1036;0)
- p0832: 2.87768e9; = p0831*p0830/(1-p0831)
- p2567: 0; = p2371*p1014
- p1768: 0
- p3233: 0.60394
- p0668: 0; = IF(p0404<0.5;-SQRT(p0007*EXP(p0536^2*p0008)-p0007);SQRT(p0007*EXP(p0536^2*p0008)-p0007))
- p0639: 0; = IF(p0375<0.5;-SQRT(p0007*EXP(p0507^2*p0008)-p0007);SQRT(p0007*EXP(p0507^2*p0008)-p0007))
- p0824: 0.8964
- p1109: 8.04454e6; = IF(p1071=0;p1105*p1103*p1095;0)
- p1788: 0
- p1226: 7e6; = IF(p1221=0;0;IF(p1193=0;p0801;0))
- p0587: 0; = IF(p0323<0.5;-SQRT(p0007*EXP(p0455^2*p0008)-p0007);SQRT(p0007*EXP(p0455^2*p0008)-p0007))
- p3659: 1.00853e-7; = p1928*p3476
- p3004: 0; = p2418*(p1079+p1081)
- p2853: 9.62967e-7; = p2267*(p1079+p1081)
- p1827: 0
- p2759: 0; = p2368*(p1019+p1021)
- p3595: 2.41328e-7; = p1864*p3476
- p2325: 0; = p2224*p2192
- p0916: 0.298109; = p0826+(p0832*(1+p0894))/p0818
- p2814: 0; = p2423*(p1078+p1080)
- p4004: 1.07342e-6; = p1861*p3478
- p2231: 0.870633; = if(p0783*p0787+p0784*p0788+p0785*p0789+p0786*p0790=0;0;p0788*p0784/(p0783*p0787+p0784*p0788+p0785*p0789+p0786*p0790))
- p2826: 7.72071e-7; = p2240*(p1020+p1022)
- p1875: 0
- p0189: 48.737
- p2944: 0; = p2358*(p1020+p1022)
- p0911: 0.0154167
- p1104: 0.275167; = IF(p1071=0;IF(p1096+p1101+p1102+p1103=1;0;1-(p1096+p1101+p1102+p1103));0)
- p4610: 9.26029e-7; = p1849*p3481
- p2637: 5.64725e-7; = p2246*(p1019+p1021)
- p3053: 0; = p2272*p1132
- p2532: 4.76394e-6; = p2336*p1073
- p0965: 0.04609; = IF(p0684/100=1;0;IF(p0684/100+p0685/100>1;1-p0684/100;p0685/100))
- p3480: 0; = if(p1328+p1330+p1332+p1334+p1336+p1338+p1340+p1342+p1344=0;0;p1336/(p1328+p1330+p1332+p1334+p1336+p1338+p1340+p1342+p1344))
- p3210: 0; = p2429*p1132
- p2039: 1.29797e-6; = p2015*p2037*p2038/(p0818*1000)
- p0535: 0; = SQRT(2)*(IF((2*p0403-1)<0;-1;IF((2*p0403-1)>0;1;0))*SQRT(SQRT((2/(pi()*0.140012289)+LN(1-(2*p0403-1)^2)/2)^2-LN(1-(2*p0403-1)^2)/0.140012289)-(2/(pi()*0.140012289)+LN(1-(2*p0403-1)^2)/2)))
- p1770: 0
- p2469: 0; = p2273*p1123
- p1578: 0
- p0712: 67.617; = p0052*(1+p0580*p0184/100)
- p1678: 0
- p3324: 0; = if(and(p1232=0;p3255<>0);p3266*(p3279*(p3284*p1256+p3286*(p1253+p1257)+p1258*p3288+p3299*p3287));0)
- p1936: 0
- p0925: 0.16786; = IF(p0918+p0923+p0924=1;0;IF(p0918+p0923+p0924+p0921>1;1-(p0918+p0923+p0924);p0921))
- p4410: 0; = p1855*p3480
- p1596: 0
- p2504: 1.54058e-5; = p2308*p1073
- p0185: 50.197
- p2764: 0; = p2373*(p1019+p1021)
- p3307: 0; = if(and(p1232=0;p3252<>0);p3252*(p3258-p3302)/p3305;0)
- p0714: 0
- p2809: 0; = p2418*(p1078+p1080)
- p1310: 0; = IF(p1307=p1266;0;IF(p1307+p1308>p1266;p1266-p1307;p1308))
- p2014: 2.61698e7; = p0833*p2011*p2013
- p2217: 0.000175548; = p1118-p2216
- p5076: 0; = p1903*p3483
- p2280: 5.94015e-5; = p2223*p2186
- p3243: 5.24402e-10; = p3234*p1188*p3239/p0818
- p1633: 0
- p2931: 1.0414e-6; = p2345*(p1079+p1081)
- p2000: 4000
- p2283: 2.1604e-5; = p2223*p2189
- p0606: 0; = IF(p0342<0.5;-SQRT(p0007*EXP(p0474^2*p0008)-p0007);SQRT(p0007*EXP(p0474^2*p0008)-p0007))
- p2920: 0; = p2334*(p1020+p1022)
- p3690: 1.1138e-5; = p1963*p3476
- p0374: 0.5
- p1694: 0
- p0415: 0; = SQRT(2)*(IF((2*p0283-1)<0;-1;IF((2*p0283-1)>0;1;0))*SQRT(SQRT((2/(pi()*0.140012289)+LN(1-(2*p0283-1)^2)/2)^2-LN(1-(2*p0283-1)^2)/0.140012289)-(2/(pi()*0.140012289)+LN(1-(2*p0283-1)^2)/2)))
- p1661: 0
- p0753: 0
- p1093: 0; = IF(p1071=0;p1087*p0001/(p0818*p0002);0)
- p2278: 7.45156e-6; = p2223*p2184
- p2307: 4.0743e-5; = p2227*p2214
- p1581: 0
- p2895: 3.51388e-6; = p2309*(p1079+p1081)
- p3197: 0; = p2416*p1082
- p1652: 0
- p2983: 0; = p2397*(p1020+p1022)
- p2167: 0.328899; = p2166*(p0898)
- p1242: 86765.2; = if(p1232>0;0;p1234*(p0725/100)*p0723*1000)
- p2883: 8.29983e-5; = p2297*(p1079+p1081)
- p2198: 1.00202e-6; = 22.98976928*p2197/14.0067
- p0609: 0; = IF(p0345<0.5;-SQRT(p0007*EXP(p0477^2*p0008)-p0007);SQRT(p0007*EXP(p0477^2*p0008)-p0007))
- p4239: 1.77562e-7; = p1890*p3479
- p2124: 0.263965
- p1937: 0
- p1308: 0
- p2787: 0; = p2396*(p1019+p1021)
- p0808: 0
- p2678: 0.000199314; = p2287*(p1019+p1021)
- p1300: 0; = IF(p1297=p1265;0;IF(p1297+p1298>p1265;p1265-p1297;p1298))
- p1133: 78563.7; = if(p1121=0;p1123*(p0716/100)*p0703*1000;0)
- p0329: 0.5
- p0484: 0; = SQRT(2)*(IF((2*p0352-1)<0;-1;IF((2*p0352-1)>0;1;0))*SQRT(SQRT((2/(pi()*0.140012289)+LN(1-(2*p0352-1)^2)/2)^2-LN(1-(2*p0352-1)^2)/0.140012289)-(2/(pi()*0.140012289)+LN(1-(2*p0352-1)^2)/2)))
- p2141: 2.34625e-7; = p2015*p2069*p2103/(p0818*1000)
- p2395: 0; = p2234*p2184
- p2460: 3.79249e-7; = p2264*p1073
- p2791: 0; = p2400*(p1019+p1021)
- p1847: 0
- p1938: 0
- p1822: 0
- p2466: 1.865e-7; = p2270*p1073
- p1188: 1760.93; = p1187*p0801
- p1612: 0
- p2821: 0; = p2430*(p1128+p1130)
- p1106: 75351; = IF(p1071=0;p1105*p1096*p1095;0)
- p2739: 1.36105e-6; = p2348*(p1078+p1080)
- p2136: 7.81752e-7; = p2015*p2064*p2098/(p0818*1000)
- p1659: 0
- p0311: 0.5
- p1616: 0
- p2921: 0; = p2335*(p1020+p1022)
- p0924: 0; = IF(p0918+p0923=1;0;IF(p0918+p0923+p0920>1;1-(p0918+p0923);p0920))
- p2368: 0; = p2225*p2197
- p0888: 0; = p0686*1000*p0687*p0884/100
- p0767: 0
- p3202: 0; = p2421*p1082
- p2061: 0.518824
- p3047: 0; = p2266*p1082
- p1911: 0
- p1091: 1.03504e-5; = IF(p1071=0;p1085*p0001/(p0818*p0002);0)
- p3232: 6.4344e-8; = p1182/p0818
- p2208: 0.000203996; = p1110/p0818
- p3471: 8.15329e-6; = p3376*p1241
- p0128: 64.21
- p1600: 0
- p3275: 0.0214527
- p0777: 0
- p2150: 1.35162e-7; = p2015*p2078*p2112/(p0818*1000)
- p2156: 3.0717e-8; = p2015*p2085*p2118/(p0818*1000)
- p0801: 7e6
- p1166: 1.95711e-6; = p1164/p0818
- p1706: 0
- p1793: 0
- p2647: 1.11369e-6; = p2256*(p1019+p1021)
- p1573: 0
- p3182: 0; = p2401*p1023
- p2270: 1.86128e-6; = p2226*p2216
- p1971: 0.00035404; = p1966*p0001/(p0818*p0002)
- p2709: 0; = p2318*(p1019+p1021)
- p3416: 0.00456856; = p3378*p1238
- p0570: 0; = IF(p0306<0.5;-SQRT(p0007*EXP(p0438^2*p0008)-p0007);SQRT(p0007*EXP(p0438^2*p0008)-p0007))
- p0784: 67.328; = p0124*(1+p0652*p0256/100)
- p1202: 0.7
- p2067: 0.446471
- p3150: 0; = p2369*p1023
- p1993: 400
- p0182: 35.865
- p0699: 0
- p2774: 0; = p2383*(p1078+p1080)
- p1039: 0.0626496
- p1568: 0
- p5214: 1.36173e-7; = p1835*p3484
- p3776: 0; = p1839*p3477
- p2444: 3.83603e-6; = p2248*p1014
- p2320: 0; = p2224*p2187
- p1617: 0
- p0859: 0.155213; = p0671*1000/p0856
- p3414: 0.000249205; = p3376*p1238
- p1304: 0; = p1300*p1252/p0818
- p5240: 4.49229e-8; = p1861*p3484
- p2064: 0.676706
- p1289: 0
- p1933: 0
- p2636: 2.24566e-6; = p2245*(p1019+p1021)
- p1115: 0.237849
- p1995: 50
- p2364: 0; = p2225*p2192
- p1839: 2.01288e-6; = p1431*1000/p0818
- p0892: 8217.11; = if(p0891=0;0;(1-p1240)*p3251/p0891)
- p2685: 5.7772e-5; = p2294*(p1019+p1021)
- p3461: 0; = p3366*p1241
- p0765: 31.514; = p0105*(1+p0633*p0237/100)
- p2148: 6.58482e-8; = p2015*p2076*p2110/(p0818*1000)
- p1234: 0.32672; = if(p1232>0;0;p0726/100)
- p1233: 0; = p1232*p0001/(p0818*p0002)
- p0955: 6.02904e-5; = if(and(p0683>0;or(p0807=56;p0807=100;and(p0807=60;p0901>0.06)));p0937;0)
- p2035: 4.4644e-6; = p2015*p2029*(1-p2031)/(p0818*1000)
- p3192: 0; = p2411*p1023
- p0673: 783.644; = p0013*(1+p0541*p0145/100)
- p0956: 0; = if(and(p0683>0;or(p0807=56;p0807=100;and(p0807=60;p0901>0.06)));p0938;0)
- p3116: 0; = p2335*p1023
- p2692: 0.000110654; = p2301*(p1078+p1080)
- p0008: 0.0739645; = (p0007-1.5)/(p0007-1)^2
- p2170: 0.00714053; = p2166*(p0913)
- p2439: 1.4271e-6; = p2243*p1014
- p0935: 0.000125796; = p0929*p0001/(p0818*p0002)
- p1315: 0; = p1311*p1252/p0818

## Reference product
- soybeans; at harvest in 1999; at farm; 85%-92% moisture: 1 kg

## Inputs from technosphere
- CUTOFF zinc compounds; at point-of-sale: 6.4344e-8 kg; = p1184
- CUTOFF apply K fertilizer; no broadcast application: 4.03112e-6 ha; = p1139
- CUTOFF pesticide, Fenoxaprop P; at point-of-sale; kg AI: 5.57856e-6 kg; = p1835
- CUTOFF apply K fertilizer; broadcast without incorporation: 1.0566e-5 ha; = p1141
- CUTOFF limestone, high-grade, pulverized; at point-of-sale: 0.0523645 kg; = p1228
- CUTOFF prepare soil; for conventional till, soybeans; <15% residue: 0.000145936 ha; = p0934
- CUTOFF pesticide, Lactofen; at point-of-sale; kg AI: 1.20773e-6 kg; = p1869
- CUTOFF nitrogenous fertilizer, sodium nitrate; at point-of-sale: 3.81556e-6 kg; = p1069
- CUTOFF pesticide, Imazethapyr; at point-of-sale; kg AI: 3.85323e-6 kg; = p1864
- CUTOFF nitrogenous fertilizer, ammonium sulfate; at point-of-sale: 0.000116656 kg; = p1067
- CUTOFF soya seeds; unspec. type; at point-of-sale: 0.0140725 kg; = p0972
- CUTOFF nitrogenous fertilizer, urea; at point-of-sale: 0.000495333 kg; = p1070
- CUTOFF apply sewage sludge; unspecified method: 0.000359171 ha; = p1189
- CUTOFF pesticide, Fluazifop-p-butyl; at point-of-sale; kg AI: 2.01288e-6 kg; = p1839
- CUTOFF sulfuric acid; at point-of-sale: 6.27227e-8 kg; = p1178
- CUTOFF nitrogenous fertilizer, nitrogen solutions; at point-of-sale: 0.00111118 kg; = p1068
- CUTOFF pesticide, Glyphosate; at point-of-sale; kg AI: 0.000156487 kg; = p1855
- CUTOFF apply sulfuric acid; unspecified method: 0.000359171 ha; = p1177
- CUTOFF fertilizer storage: 0.00752334 kg*a; = p1160
- CUTOFF gypsum; at point-of-sale: 1.95711e-6 kg; = p1166
- CUTOFF apply pesticide; broadcast without incorporation: 0.0001488 ha; = p1335
- CUTOFF pesticide storage: 0.000349243 kg*a; = p1965
- CUTOFF irrig svc; unspec wat source & rate, 1999 soybeans: 0.000359171 ha; = p0981
- CUTOFF harvest; soybeans residue management: 0.000359171 ha; = p1975
- CUTOFF planting; for mulch till, soybeans: 0.000125796 ha; = p0953
- CUTOFF liming materials storage: 0.0320574 kg*a; = p1231
- CUTOFF regional or national trucking; class 8, average fuel: 0.0225015 metric ton*km; = p2009
- CUTOFF N inhibitor appl svc; unspec rate & type, 1999 soybeans: 0.000402576 ha; = p1162
- CUTOFF nitrogenous fertilizer, ammonium nitrate; at point-of-sale: 0.000201069 kg; = p1066
- CUTOFF pesticide, Imazamox; at point-of-sale; kg AI: 1.84035e-6 kg; = p1861
- CUTOFF gypsum storage: 9.78554e-7 kg*a; = p1168
- CUTOFF pesticide, unspecified type; at point-of-sale; kg AI: 3.95356e-6 kg; = p1962
- CUTOFF potassic fertilizer, potassium chloride; at point-of-sale: 0.00571199 kg; = p1154
- CUTOFF prepare soil; for mulch till, soybeans: 0.000125796 ha; = p0935
- CUTOFF soya seeds; GMO herbicide resistant seed; at point-of-sale: 0.0123286 kg; = p0970
- CUTOFF planting; for conventional till, soybeans; <15% residue: 0.000145936 ha; = p0952
- CUTOFF apply pesticide; unspecified application methods: 1.76466e-5 ha; = p1345
- CUTOFF apply N fertilizer; broadcast with incorporation: 3.22738e-5 ha; = p1031
- CUTOFF prepare soil; for unspec. till, soybeans: 2.71479e-5 ha; = p0939
- CUTOFF sulfuric acid storage: 3.13614e-8 kg*a; = p1180
- CUTOFF hog manure; from unspecified storage; at point-of-sale: 0.0517235 kg; = p1296
- CUTOFF unspecified animal manure; from unspecified storage; at point-of-sale: 0.0706121 kg; = p1316
- CUTOFF apply N fertilizer; broadcast without incorporation: 1.06905e-5 ha; = p1032
- CUTOFF international vessel transport; average fuel: 0.044457 metric ton*km; = p2006
- CUTOFF potassic fertilizer, other single nutrients; at point-of-sale: 0.000634062 kg; = p1155
- CUTOFF apply pesticide; banded or side-dressed: 4.52769e-5 ha; = p1329
- CUTOFF pesticide, Bentazon; at point-of-sale; kg AI: 1.3055e-5 kg; = p1776
- CUTOFF sewage sludge storage: 5.06364e-8 kg*a; = p1192
- CUTOFF domestic barge transport; average fuel: 0.00454568 metric ton*km; = p2007
- CUTOFF harvest; soybeans: 0.00035404 ha; = p1971
- CUTOFF pesticide, Metribuzin; at point-of-sale; kg AI: 8.62664e-7 kg; = p1890
- CUTOFF apply P fertilizer; broadcast without incorporation: 1.03504e-5 ha; = p1091
- CUTOFF bulk cargo rail transport; diesel: 0.00852315 metric ton*km; = p2008
- CUTOFF apply manure; broadcast without incorporation: 8.88356e-6 ha; = p1248
- CUTOFF apply zinc compounds; unspecified method: 0.000359171 ha; = p1183
- CUTOFF planting; for unspec. till, soybeans: 2.71479e-5 ha; = p0957
- CUTOFF dolomite, pulverized; at point-of-sale: 0.0117504 kg; = p1229
- CUTOFF pesticide formulation balance; at point-of-sale: 0.000177839 kg; = p1963
- CUTOFF apply P fertilizer; no broadcast application: 4.63763e-6 ha; = p1089
- CUTOFF pesticide, Sethoxydim; at point-of-sale; kg AI: 1.61031e-6 kg; = p1928
- CUTOFF sulfur storage: 1.25158e-7 kg*a; = p1174
- CUTOFF apply K fertilizer; broadcast with incorporation: 3.37661e-5 ha; = p1140
- CUTOFF soya seeds; nonGMO herbicide resistant seed; at point-of-sale: 0.00127562 kg; = p0971
- CUTOFF apply N fertilizer; no broadcast application: 4.6374e-6 ha; = p1030
- CUTOFF apply P fertilizer; broadcast with incorporation: 3.12957e-5 ha; = p1090
- CUTOFF planting; for reduced till, soybeans; 15-30% residue: 6.02904e-5 ha; = p0955
- CUTOFF sewage sludge; at point-of-sale: 1.01273e-7 kg; = p1190
- CUTOFF local area trucking; class 6, average fuel: 0.000340926 metric ton*km; = p2010
- CUTOFF seed storage; soybeans: 0.0138384 kg*a; = p0975
- CUTOFF phosphatic fertilizer, monoammonium phosphate; at point-of-sale: 0.000857671 kg; = p1120
- soybean residue; at harvest in 1999; at farm; 88%-94% moisture: 0.791338 kg; = p0839
- CUTOFF apply manure; broadcast or spray with incorporation: 4.45193e-6 ha; = p1247
- CUTOFF pesticide, Pendimethalin; at point-of-sale; kg AI: 5.45779e-5 kg; = p1903
- CUTOFF zinc compounds storage: 3.2172e-8 kg*a; = p1186
- CUTOFF phosphatic fertilizer, other single phosphates; at point-of-sale: 0.000195136 kg; = p1118
- CUTOFF pesticide, Sodium bentazon; at point-of-sale; kg AI: 7.47642e-6 kg; = p1849
- CUTOFF apply pesticide; as foliar or directed spray: 8.95416e-5 ha; = p1339
- CUTOFF nitrogenous fertilizer, aqueous ammonia; at point-of-sale: 3.7554e-5 kg; = p1065
- CUTOFF sulfur; at point-of-sale: 2.50316e-7 kg; = p1172
- CUTOFF phosphatic fertilizer, diammonium phosphate; at point-of-sale: 0.00214161 kg; = p1119
- CUTOFF apply pesticide; broadcast with incorporation: 0.000421661 ha; = p1333
- CUTOFF pesticide, Trifluralin; at point-of-sale; kg AI: 9.02922e-5 kg; = p1955
- CUTOFF apply single or mixed K fertilizer; unspec. method: 4.83637e-10 ha; = p1144
- CUTOFF nitrogenous fertilizer, anhydrous ammonia; at point-of-sale: 0.000506716 kg; = p1064
- CUTOFF prepare soil; for reduced till, soybeans; 15-30% residue: 6.02904e-5 ha; = p0937
- CUTOFF phosphatic fertilizer, superphosphate grades over 22%; at point-of-sale: 0.000242448 kg; = p1117
- CUTOFF fertilizer filler materials; at point-of-sale: 0.00274179 kg; = p1158
- CUTOFF phosphatic fertilizer, superphos. grades 22% and under; at point-of-sale: 4.96483e-5 kg; = p1116
- CUTOFF apply sulfur; unspecified method: 0.000359171 ha; = p1171
- CUTOFF apply liming materials; unspecified method: 0.000359171 ha; = p1227
- CUTOFF apply manure; unspec. method: 2.90646e-7 ha; = p1251
- CUTOFF apply gypsum; unspecified method: 0.000359171 ha; = p1165
- CUTOFF apply single or mixed N fertilizer; unspec. method: 4.76021e-10 ha; = p1035

## Inputs from nature
- Dry matter except CNPK; from plant uptake: 1.32164 kg; = p0917
- Transformation, from annual crop [natural resource, land]: 3.59171 m2; = 1.0 * (p0873+p0871+p0881+p0883+p0877+p0879)
- Phosphorus: 0.0105884 kg; = p0910
- Potassium; from plant uptake; biogenic: 0.0289793 kg; = p0915
- Nitrogen: 0.0983707 kg; = p0905
- Transformation, to annual crop [natural resource, land]: 3.59171 m2; = 1.0 * (p0857)
- Water, unspecified origin: 0.000405201 m3; = p0916*0.001+p0893*0.001
- Occupation, annual crop [natural resource, land]: 1.4034 m2*year; = 1.0 * (p0855)
- Carbon dioxide: 4.19212 kg; = p0900*3.6666666667

## Emissions to nature
- Carbon monoxide, fossil [air, non-urban air or from high stacks]: 9.29366e-5 kg; = 1.0 * (p2028*2.3333333333)
- Plant dry matter; in below-ground residue: 0.1375 kg; = p2177
- Ammonium nitrate; broadcast w/ incorp. in fert. in spr. bef. plant.: 0.000189862 kg; = p2671*4.7142857143
- Particulates, < 10 um: 1.19667e-5 kg; = p2034+p2036
- Nitrogen solution; broadcast w/o incorp. in fert. in fall bef. plant.; broadcast w/o incorp. in fert. in fall bef. pl...: 8.84311e-6 kg; = p2834
- Urea; broadcast w/o incorp. in fert. in fall bef. plant.: 1.28161e-5 kg; = p2841*5
- Aqueous ammonia; no broadcast in fert. in fall bef. plant.: 1.18069e-7 kg; = p2435*1.2142857143
- Volatile constituents; using unspec. method in man. at unknown time: 0.00014947 kg; = p3473
- Nitrogen solution; unspec. appl. method in fert. in fall bef. plant.; unspec. appl. method in fert. in fall bef. plan...: 3.93762e-10 kg; = p3029
- Diammonium phosphate; no broadcast in fert. at plant.: 2.03121e-5 kg; = p2533*4.7142857143
- Butane [air, non-urban air or from high stacks]: 8.19645e-8 kg; = 1.0 * (p2147*1.0208333333)
- Monoammonium phosphate; no broadcast in fert. in fall bef. plant.: 7.21512e-6 kg; = p2459*8.2142857143
- Gypsum: 1.95711e-6 kg; = p3229
- Calcium [soil, agricultural]: 0.0223452 kg; = 1.0 * (p3218+p3226)
- Pesticide formulation balance; broadcast without incorporation: 3.66045e-5 kg; = p4308
- Anhydrous ammonia; broadcast w/o incorp. in fert. in fall bef. plant.: 1.33844e-5 kg; = p2823*1.2142857143
- Other single phosphates; broadcast w/ incorp. in fert. in spr. bef. plant.; kg P: 1.06246e-5 kg; = p2700
- Acrylonitrile: 4.52223e-8 kg; = p2156*1.4722222222
- Acetol; from residue burning: 5.07979e-6 kg; = p2134*2.0555555556
- Diammonium phosphate; broadcast w/o incorp. in fert. in spr. bef. plant.: 0.000353881 kg; = p2884*4.7142857143
- Diammonium phosphate; no broadcast in fert. in spr. bef. plant.: 0.00015856 kg; = p2494*4.7142857143
- Ammonium nitrate; no broadcast in fert. in fall bef. plant.: 3.65411e-6 kg; = p2437*4.7142857143
- Propene [air, non-urban air or from high stacks]: 9.12044e-7 kg; = 1.0 * (p2136*1.1666666667)
- Sodium nitrate; no broadcast in fert. in fall bef. plant.: 4.26526e-8 kg; = p2447*6.0714285714
- Zinc compounds: 6.4344e-8 kg; = p3232
- Anhydrous ammonia; no broadcast in fert. in fall bef. plant.: 5.80599e-6 kg; = p2433*1.2142857143
- Nitrogen; broadcast w/o incorp. in manure at an unknown time: 0.000760271 kg; = p3413
- Lactofen [soil, agricultural]: 1.20773e-6 kg; = 1.0 * (p5248+p4012+p3600+p4218+p4630)
- Phosphorous; applied in sewage sludge: 5.65454e-10 kg; = p3241
- Formaldehyde [air, non-urban air or from high stacks]: 2.80467e-6 kg; = 1.0 * (p2128*2.5)
- Superphosphate, grades>22%; no broadcast in fert. in fall bef. plant.; kg P: 4.83587e-7 kg; = p2464
- Formic acid [air, non-urban air or from high stacks]: 1.35185e-6 kg; = 1.0 * (p2131*3.8333333333)
- Diammonium phosphate; broadcast w/ incorp. in fert. at plant.: 0.00013707 kg; = p2728*4.7142857143
- Volatile constituents; broadcast w/ incorp. in man. at unknown time: 0.0022895 kg; = p3397
- Other single phosphates; broadcast w/ incorp. in fert. in fall bef. plant.; kg P: 1.25854e-6 kg; = p2661
- Ammonium nitrate; broadcast w/ incorp. in fert. in fall bef. plant.: 2.54306e-5 kg; = p2632*4.7142857143
- Glyphosate [soil, agricultural]: 0.000156487 kg; = 1.0 * (p5234+p3586+p4204+p4616+p3998)
- Other single K nutrients; broadcast w/o incorp. in fert. in spr. bef. plant.; kg K: 4.40521e-5 kg; = p2899
- Ethyne [air, non-urban air or from high stacks]: 3.67239e-7 kg; = 1.0 * (p2132*1.0833333333)
- Trifluralin [soil, agricultural]: 9.02922e-5 kg; = 1.0 * (p4304+p5334+p3686+p4716+p4098)
- Monoammonium phosphate; broadcast w/ incorp. in fert. at plant.: 5.26547e-5 kg; = p2732*8.2142857143
- Fluazifop-P-butyl [soil, agricultural]: 2.01288e-6 kg; = 1.0 * (p3570+p4600+p3982+p5218+p4188)
- Anhydrous ammonia; broadcast w/o incorp. in fert. in spr. bef. plant.: 9.99262e-5 kg; = p2862*1.2142857143
- Other single phosphates; broadcast w/o incorp. in fert. in fall bef. plant.; kg P: 4.16238e-7 kg; = p2856
- Superphosphate, grades<= 22%; no broadcast in fert. in spr. bef. plant.; kg P: 3.48333e-7 kg; = p2501
- Monoammonium phosphate; broadcast w/o incorp. in fert. in spr. bef. plant.: 0.000135941 kg; = p2888*8.2142857143
- Potassium chloride; no broadcast in fert. at plant.: 5.66687e-5 kg; = p2546*2.2166666667
- Phosphorous; in below-ground residue: 0.00080889 kg; = p2175
- Fenoxaprop P; unspec. appl. method: 1.36173e-7 kg; = p5214
- Magnesium [soil, agricultural]: 0.0014904 kg; = 1.0 * (p3227)
- Sodium nitrate; broadcast w/o incorp. in fert. in fall bef. plant.: 9.8326e-8 kg; = p2837*6.0714285714
- Sodium nitrate; broadcast w/ incorp. in fert. in fall bef. plant.: 2.96839e-7 kg; = p2642*6.0714285714
- Metribuzin [soil, agricultural]: 8.62664e-7 kg; = 1.0 * (p4033+p4651+p3621+p5269+p4239)
- isopentane: 2.28334e-8 kg; = p2151*1.0166666667
- Potassium chloride; broadcast w/o incorp. in fert. in spr. bef. plant.: 0.000999632 kg; = p2897*2.2166666667
- Other single phosphates; broadcast w/o incorp. in fert. in spr. bef. plant.; kg P: 3.51388e-6 kg; = p2895
- Urea; no broadcast in fert. in spr. bef. plant.: 4.15061e-5 kg; = p2490*5
- Sodium nitrate; broadcast w/o incorp. in fert. in spr. bef. plant.: 7.34089e-7 kg; = p2876*6.0714285714
- Monoammonium phosphate; no broadcast in fert. at plant.: 7.80278e-6 kg; = p2537*8.2142857143
- Phenol [air, non-urban air or from high stacks]: 6.99754e-7 kg; = 1.0 * (p2133*1.3055555556)
- Potassium chloride; no broadcast in fert. in spr. bef. plant.: 0.000381376 kg; = p2507*2.2166666667
- Nitrogen solution; no broadcast in fert. in fall bef. plant.; no broadcast in fert. in fall bef. plant.; kg N: 3.83603e-6 kg; = p2444
- Dinitrogen monoxide [air, non-urban air or from high stacks]: 9.44565e-8 kg; = 1.0 * (p2044*1.5714285714)
- I butane; from residue burning: 2.84599e-8 kg; = p2146*1.0208333333
- Ash: 0.000266857 kg; = p2022+p2021
- Potassium; in below-ground residue; biogenic: 0.00269353 kg; = p2176
- Potassium chloride; broadcast w/o incorp. in fert. at plant.: 0.000148535 kg; = p2936*2.2166666667
- Superphosphate, grades<= 22%; no broadcast in fert. in fall bef. plant.; kg P: 4.12618e-8 kg; = p2462
- Fenoxaprop P; broadcast without incorporation: 1.14823e-6 kg; = p4184
- Ammonium nitrate; unspec. appl. method in fert. in spr. bef. plant.: 2.80036e-9 kg; = p3061*4.7142857143
- Phosphorous; broadcast w/ incorp. in manure at an unknown time: 0.000124887 kg; = p3395
- Other single phosphates; broadcast w/ incorp. in fert. at plant.; kg P: 1.36105e-6 kg; = p2739
- Imazethapyr [soil, agricultural]: 3.85323e-6 kg; = 1.0 * (p4007+p3595+p4213+p4625+p5243)
- Pesticides, unspecified [soil, agricultural]: 3.95356e-6 kg; = 1.0 * (p5337+p3689+p4101+p4719+p4307)
- Superphosphate, grades<= 22%; broadcast w/o incorp. in fert. in spr. bef. plant.; kg P: 7.77422e-7 kg; = p2891
- Aqueous ammonia; broadcast w/o incorp. in fert. in fall bef. plant.: 2.72182e-7 kg; = p2825*1.2142857143
- Pendimethalin [soil, agricultural]: 5.45779e-5 kg; = 1.0 * (p4046+p4252+p5282+p4664+p3634)
- Potassium chloride; broadcast w/ incorp. in fert. at plant.: 0.000474677 kg; = p2741*2.2166666667
- Ammonia [air, non-urban air or from high stacks]: 2.92772e-6 kg; = 1.0 * (p2159*1.2142857143)
- Urea; broadcast w/o incorp. in fert. in spr. bef. plant.: 9.56831e-5 kg; = p2880*5
- Superphosphate, grades>22%; broadcast w/ incorp. in fert. in fall bef. plant.; kg P: 3.26334e-6 kg; = p2659
- Phosphorous; using unspec. method in manure at an unknown time: 8.15329e-6 kg; = p3471
- Water: 0.32894 kg; = p2178+p3399+p2171+p2181+p3418+p3475
- Superphosphate, grades<= 22%; no broadcast in fert. at plant.; kg P: 4.46225e-8 kg; = p2540
- Ammonium sulfate; no broadcast in fert. in fall bef. plant.: 1.32898e-6 kg; = p2440*4.7142857143
- Anhydrous ammonia; unspec. appl. method in fert. in spr. bef. plant.: 4.44947e-9 kg; = p3057*1.2142857143
- Other single phosphates; no broadcast in fert. in fall bef. plant.; kg P: 1.865e-7 kg; = p2466
- Ammonium sulfate; unspec. appl. method in fert. in spr. bef. plant.: 1.01848e-9 kg; = p3064*4.7142857143
- Ethene [air, non-urban air or from high stacks]: 1.96299e-6 kg; = 1.0 * (p2125*1.1666666667)
- Phosphorous; broadcast w/o incorp. in manure at an unknown time: 0.000249205 kg; = p3414
- Sewage sludge dry matter; applied in sewage sludge: 5.24402e-10 kg; = p3243
- Acetonitrile [air, non-urban air or from high stacks]: 2.8321e-7 kg; = 1.0 * (p2155*1.7083333333)
- 1-Butene: 1.80601e-7 kg; = p2144*1.1666666667
- Aqueous ammonia; broadcast w/o incorp. in fert. in spr. bef. plant.: 2.03207e-6 kg; = p2864*1.2142857143
- Urea; no broadcast in fert. in fall bef. plant.: 5.55945e-6 kg; = p2451*5
- Superphosphate, grades>22%; broadcast w/ incorp. in fert. in spr. bef. plant.; kg P: 2.75492e-5 kg; = p2698
- Pesticide formulation balance; foliar or directed spray: 2.20271e-5 kg; = p4720
- Monoammonium phosphate; broadcast w/o incorp. in fert. in fall bef. plant.: 1.6103e-5 kg; = p2849*8.2142857143
- Bentazone [soil, agricultural]: 1.3055e-5 kg; = 1.0 * (p4125+p3919+p4537+p3507+p5155)
- Pesticide formulation balance; banded or side-dressed: 1.1138e-5 kg; = p3690
- Plant dry matter; in aboveground residue left on field: 0.364511 kg; = p2172
- Ammonium nitrate; broadcast w/o incorp. in fert. in spr. bef. plant.: 6.28904e-5 kg; = p2866*4.7142857143
- Sodium nitrate; unspec. appl. method in fert. in fall bef. plant.: 4.37822e-12 kg; = p3032*6.0714285714
- Aqueous ammonia; unspec. appl. method in fert. in fall bef. plant.: 1.21196e-11 kg; = p3020*1.2142857143
- Acetone [air, non-urban air or from high stacks]: 6.0206e-7 kg; = 1.0 * (p2139*1.6111111111)
- Ammonium sulfate; unspec. appl. method in fert. in fall bef. plant.: 1.36418e-10 kg; = p3025*4.7142857143
- Superphosphate, grades<= 22%; broadcast w/o incorp. in fert. in fall bef. plant.; kg P: 9.20897e-8 kg; = p2852
- Aqueous ammonia; no broadcast in fert. in spr. bef. plant.: 8.81488e-7 kg; = p2474*1.2142857143
- cyclopentane: 2.23152e-9 kg; = p2153*1.0166666667
- Superphosphate, grades>22%; no broadcast in fert. in spr. bef. plant.; kg P: 4.08244e-6 kg; = p2503
- Diammonium phosphate; broadcast w/o incorp. in fert. at plant.: 4.53332e-5 kg; = p2923*4.7142857143
- Superphosphate, grades>22%; broadcast w/o incorp. in fert. in fall bef. plant.; kg P: 1.07929e-6 kg; = p2854
- Superphosphate, grades<= 22%; broadcast w/ incorp. in fert. at plant.; kg P: 3.01122e-7 kg; = p2735
- Monoammonium phosphate; broadcast w/ incorp. in fert. in spr. bef. plant.: 0.000411034 kg; = p2693*8.2142857143
- Other single K nutrients; broadcast w/ incorp. in fert. in spr. bef. plant.; kg K: 0.000140778 kg; = p2704
- Dioxins and furans (PCDD/F); from residue burning: 4.04738e-14 kg TEQ; = p2047
- Urea; broadcast w/ incorp. in fert. in fall bef. plant.: 3.86908e-5 kg; = p2646*5
- Urea; broadcast w/ incorp. in fert. in spr. bef. plant.: 0.00028886 kg; = p2685*5
- Other single K nutrients; no broadcast in fert. in spr. bef. plant.; kg K: 1.68066e-5 kg; = p2509
- Phosphorous; in above-ground residue left on field: 0.00214436 kg; = p2169
- Particulates, < 2.5 um [air, non-urban air or from high stacks]: 8.35109e-6 kg; = 1.0 * (p2035+p2033)
- Nitrogen solution; broadcast w/ incorp. in fert. in spr. bef. plant.; broadcast w/ incorp. in fert. in spr. bef. plan...: 0.000199314 kg; = p2678
- Filler materials, applied with synthetic fertilizer: 0.00274179 kg; = p2432
- Toluene [air, non-urban air or from high stacks]: 2.5697e-7 kg; = 1.0 * (p2141*1.0952380952)
- Fenoxaprop P; broadcast with incorporation: 3.25381e-6 kg; = p3978
- Oxygen; applied in limestone: 0.0236055 kg; = p3219
- Acetic acid [air, non-urban air or from high stacks]: 7.54815e-6 kg; = 1.0 * (p2127*2.5)
- Other single K nutrients; no broadcast in fert. at plant.; kg K: 2.49729e-6 kg; = p2548
- Glycolaldehyde; from residue burning: 2.71812e-6 kg; = p2135*2.5
- Ammonium nitrate; no broadcast in fert. in spr. bef. plant.: 2.72811e-5 kg; = p2476*4.7142857143
- Fenoxaprop P; foliar or directed spray: 6.9096e-7 kg; = p4596
- Sulfur [soil, agricultural]: 2.50316e-7 kg; = 1.0 * (p3230)
- Other single phosphates; no broadcast in fert. at plant.; kg P: 2.0169e-7 kg; = p2544
- Potassium; using unspec. method in manure at an unknown time: 2.64728e-5 kg; = p3472
- Diammonium phosphate; no broadcast in fert. in fall bef. plant.: 1.87823e-5 kg; = p2455*4.7142857143
- Monoammonium phosphate; broadcast w/o incorp. in fert. at plant.: 1.74145e-5 kg; = p2927*8.2142857143
- Nitrogen solution; no broadcast in fert. in spr. bef. plant.; no broadcast in fert. in spr. bef. plant.; kg N: 2.86393e-5 kg; = p2483
- Sodium nitrate; broadcast w/ incorp. in fert. in spr. bef. plant.: 2.21616e-6 kg; = p2681*6.0714285714
- Nitrogen; in above-ground residue left on field: 0.0185747 kg; = p2168
- Propane [air, non-urban air or from high stacks]: 3.79967e-7 kg; = 1.0 * (p2142*1.2222222222)
- Nitrogen; in below-ground residue: 0.00700667 kg; = p2174
- Superphosphate, grades<= 22%; broadcast w/ incorp. in fert. in spr. bef. plant.; kg P: 2.35062e-6 kg; = p2696
- Furan [air, non-urban air or from high stacks]: 1.47581e-7 kg; = 1.0 * (p2138*1.4166666667)
- Fenoxaprop P; banded or side-dressed: 3.49385e-7 kg; = p3566
- Potassium chloride; unspec. appl. method in fert. at plant.: 6.79888e-9 kg; = p3131*2.2166666667
- Sethoxydim [soil, agricultural]: 1.61031e-6 kg; = 1.0 * (p3659+p4689+p4277+p5307+p4071)
- Propanenitrile: 8.64478e-8 kg; = p2157*1.5277777778
- Anhydrous ammonia; unspec. appl. method in fert. in fall bef. plant.: 5.95975e-10 kg; = p3018*1.2142857143
- Urea; unspec. appl. method in fert. in fall bef. plant.: 5.70669e-10 kg; = p3036*5
- Potassium; broadcast w/o incorp. in manure at an unknown time: 0.000809141 kg; = p3415
- Sodium nitrate; no broadcast in fert. in spr. bef. plant.: 3.18439e-7 kg; = p2486*6.0714285714
- Other single K nutrients; unspec. appl. method in fert. in spr. bef. plant.; kg K: 2.01639e-9 kg; = p3094
- Nitrogen solution; broadcast w/ incorp. in fert. in fall bef. plant.; broadcast w/ incorp. in fert. in fall bef. plan...: 2.66967e-5 kg; = p2639
- isobutene: 1.57689e-7 kg; = p2150*1.1666666667
- Carbon [soil, agricultural]: 0.465329 kg; = 1.0 * (p3469+p2173+p3412+p3242+p3217+p3225+p3393+p2167)
- Plant dry matter; from residue burning: 0.000483114 kg; = p2164
- Potassium; in above-ground residue left on field; biogenic: 0.00714053 kg; = p2170
- Ammonium sulfate; broadcast w/ incorp. in fert. in spr. bef. plant.: 6.90517e-5 kg; = p2674*4.7142857143
- Superphosphate, grades<= 22%; broadcast w/ incorp. in fert. in fall bef. plant.; kg P: 2.78443e-7 kg; = p2657
- Ammonium sulfate; broadcast w/o incorp. in fert. in fall bef. plant.: 3.06367e-6 kg; = p2830*4.7142857143
- Water [air, non-urban air or from high stacks]: 1.55923e-7 m3; = 0.001 * (p2016)
- Methyl vinyl ether; from residue burning: 1.02326e-7 kg; = p2137*1.6111111111
- Butadiene [air, non-urban air or from high stacks]: 2.03559e-7 kg; = 1.0 * (p2143*1.125)
- Monoammonium phosphate; no broadcast in fert. in spr. bef. plant.: 6.09101e-5 kg; = p2498*8.2142857143
- Anhydrous ammonia; no broadcast in fert. in spr. bef. plant.: 4.33467e-5 kg; = p2472*1.2142857143
- Monoammonium phosphate; broadcast w/ incorp. in fert. in fall bef. plant.: 4.86891e-5 kg; = p2654*8.2142857143
- Ammonium nitrate; broadcast w/o incorp. in fert. in fall bef. plant.: 8.42373e-6 kg; = p2827*4.7142857143
- Aqueous ammonia; broadcast w/ incorp. in fert. in fall bef. plant.: 8.21696e-7 kg; = p2630*1.2142857143
- Pentane [air, non-urban air or from high stacks]: 2.85417e-8 kg; = 1.0 * (p2152*1.0166666667)
- Ethane [air, non-urban air or from high stacks]: 1.22598e-6 kg; = 1.0 * (p2126*1.25)
- cis-2-Butene: 5.79541e-8 kg; = p2149*1.1666666667
- Benzene [air, non-urban air or from high stacks]: 2.07018e-7 kg; = 1.0 * (p2140*1.0833333333)
- Superphosphate, grades>22%; no broadcast in fert. at plant.; kg P: 5.22974e-7 kg; = p2542
- Potassium chloride; broadcast w/ incorp. in fert. in spr. bef. plant.: 0.00319455 kg; = p2702*2.2166666667
- Urea; unspec. appl. method in fert. in spr. bef. plant.: 4.26054e-9 kg; = p3075*5
- Methanol [air, non-urban air or from high stacks]: 4.434e-6 kg; = 1.0 * (p2129*2.6666666667)
- Carbon dioxide, in air: 0.00174939 kg; = p2163*3.6666666667
- Other single phosphates; broadcast w/o incorp. in fert. at plant.; kg P: 4.50139e-7 kg; = p2934
- trans-2-Butene: 7.68229e-8 kg; = p2148*1.1666666667
- Pesticide formulation balance; broadcast with incorporation: 0.000103728 kg; = p4102
- Diammonium phosphate; broadcast w/ incorp. in fert. in fall bef. plant.: 0.000126747 kg; = p2650*4.7142857143
- Aqueous ammonia; broadcast w/ incorp. in fert. in spr. bef. plant.: 6.13467e-6 kg; = p2669*1.2142857143
- Diammonium phosphate; broadcast w/ incorp. in fert. in spr. bef. plant.: 0.00107 kg; = p2689*4.7142857143
- Other single K nutrients; broadcast w/o incorp. in fert. at plant.; kg K: 6.5457e-6 kg; = p2938
- Other limestone constituents; applied in limestone: 0.00314187 kg; = p3220
- Seeds; used in planting and sowing: 0.0276768 kg; = p2179
- Sulfur dioxide [air, non-urban air or from high stacks]: 2.10464e-6 kg; = 1.0 * (p2041)
- Anhydrous ammonia; broadcast w/ incorp. in fert. in fall bef. plant.: 4.04065e-5 kg; = p2628*1.2142857143
- Oxygen; applied in dolomite: 0.00589806 kg; = p3228
- Sodium nitrate; unspec. appl. method in fert. in spr. bef. plant.: 3.26872e-11 kg; = p3071*6.0714285714
- Acetaldehyde [air, non-urban air or from high stacks]: 1.67796e-6 kg; = 1.0 * (p2130*1.8333333333)
- Sulfuric acid [soil, agricultural]: 6.27227e-8 kg; = 1.0 * (p3231)
- Superphosphate, grades>22%; broadcast w/ incorp. in fert. at plant.; kg P: 3.52913e-6 kg; = p2737
- Pesticide formulation balance; unspec. appl. method: 4.34104e-6 kg; = p5338
- Aqueous ammonia; unspec. appl. method in fert. in spr. bef. plant.: 9.04832e-11 kg; = p3059*1.2142857143
- Nitrogen solution; unspec. appl. method in fert. in spr. bef. plant.; unspec. appl. method in fert. in spr. bef. plan...: 2.93978e-9 kg; = p3068
- Methane: 4.24228e-6 kg; = p2025*1.3333333333
- Volatile constituents; broadcast w/o incorp. in man. at unknown time: 0.00456856 kg; = p3416
- Hydrocyanic acid: 3.8488e-7 kg; = p2154*2.25
- Nitrogen; applied in sewage sludge: 4.73673e-9 kg; = p3240
- Nonvolatile constituents; broadcast w/o incorp. in man. at unknown time; exc.CNPK,biogenic: 0.000498962 kg; = p3417
- Nitrogen; broadcast w/ incorp. in manure at an unknown time: 0.000381004 kg; = p3394
- Superphosphate, grades>22%; broadcast w/o incorp. in fert. at plant.; kg P: 1.16719e-6 kg; = p2932
- Potassium; broadcast w/ incorp. in manure at an unknown time: 0.000405495 kg; = p3396
- Anhydrous ammonia; broadcast w/ incorp. in fert. in spr. bef. plant.: 0.00030167 kg; = p2667*1.2142857143
- Other single phosphates; no broadcast in fert. in spr. bef. plant.; kg P: 1.57443e-6 kg; = p2505
- Ammonium sulfate; broadcast w/o incorp. in fert. in spr. bef. plant.: 2.28729e-5 kg; = p2869*4.7142857143
- Other single K nutrients; broadcast w/ incorp. in fert. at plant.; kg K: 2.09182e-5 kg; = p2743
- Nonvolatile constituents; using unspec. method in man. at unknown time; exc.CNPK,biogenic: 1.63247e-5 kg; = p3474
- Superphosphate, grades>22%; broadcast w/o incorp. in fert. in spr. bef. plant.; kg P: 9.11135e-6 kg; = p2893
- Nitrogen solution; broadcast w/o incorp. in fert. in spr. bef. plant.; broadcast w/o incorp. in fert. in spr. bef. pl...: 6.60215e-5 kg; = p2873
- Other single K nutrients; unspec. appl. method in fert. at plant.; kg K: 2.99615e-10 kg; = p3133
- Diammonium phosphate; broadcast w/o incorp. in fert. in fall bef. plant.: 4.1919e-5 kg; = p2845*4.7142857143
- Ammonium sulfate; no broadcast in fert. in spr. bef. plant.: 9.922e-6 kg; = p2479*4.7142857143
- Superphosphate, grades<= 22%; broadcast w/o incorp. in fert. at plant.; kg P: 9.95902e-8 kg; = p2930
- NMVOC, non-methane volatile organic compounds, unspecified origin [air, non-urban air or from high stacks]: 3.46647e-5 kg; = 1.0 * (p2052+p2051)
- Nonvolatile constituents; broadcast w/ incorp. in man. at unknown time; exc.CNPK,biogenic: 0.000250051 kg; = p3398
- Isoprene [air, non-urban air or from high stacks]: 5.09072e-7 kg; = 1.0 * (p2145*1.1333333333)
- Ammonium sulfate; broadcast w/ incorp. in fert. in fall bef. plant.: 9.24898e-6 kg; = p2635*4.7142857143
- Potassium chloride; unspec. appl. method in fert. in spr. bef. plant.: 4.5756e-8 kg; = p3092*2.2166666667
- Ammonium nitrate; unspec. appl. method in fert. in fall bef. plant.: 3.75088e-10 kg; = p3022*4.7142857143
- Nitrogen; using unspec. method in manure at an unknown time: 2.48739e-5 kg; = p3470
- Imazamox [soil, agricultural]: 1.84035e-6 kg; = 1.0 * (p4004+p3592+p4622+p4210+p5240)
- Nitrogen dioxide: 4.26477e-6 kg; = p2039*3.2857142857
- Fomesafen [soil, agricultural]: 7.47642e-6 kg; = 1.0 * (p5228+p4198+p3580+p3992+p4610)

## Sampling procedure
A delete-a-group jackknife is used by the USDA to estimate the ARMS sample means and RSEs, based on a 15 sample delete-a-group jackknife. Because of this relatively small sample size, a Students t distribution is used to represent ARMS data probability density functions. Other representations of uncertainty are described in Cooper, J.S., Kahn, E., Noon, M. (2012). LCA Digital Commons Unit Process Data: field crop production Version 1. Prepared for the US Department of Agriculture National Agricultural Library. Retrieved from https://www.lcacommons.gov/discovery/docs/LCA%20Digital%20Commons%20Unit%20Process%20Data%20final%20updated.pdf

## Extrapolations
Data represent an aggregation of processes applied in Minnesota in 1999. Data development is demonstrated by parameterization (exlicitly presents all raw and uncertainty data and all calculations). Flow data quality according to the LCADC convention is provided for all flows.
